# silicone product production

Dataset: EcoSpold 2, unit process
Geography: RoW
Time period: 1997-01-01 to 2021-12-31
Technology level: current
Classification: ISIC rev.4 ecoinvent: 2013:Manufacture of plastics and synthetic rubber in primary forms
Classification: EcoSpold01Categories: chemicals/inorganics
Synonyms: organics; silanes; cyclodextrins; silicones; chlorosilanes; silicic acid esters; RTV-1 silicone rubber sealants; hyperpure silicon; vinyl polymers; polydimethylsiloxane; silica
Tags: ConvertedDataset
Scenario: Business-as-Usual
System model: Allocation, cut-off by classification
Generated by: Niels Jungbluth
Published in: Althaus H.-J. 2004
Database: ecoinvent
isCopyrightProtected: true
accessRestrictedTo: 1

## General comment
Average of about 2000 products. The inventory has been calculated as a weighted mean of two production facilities which produce both a range of different products.
[This dataset was already contained in the ecoinvent database version 2. It was not individually updated during the transfer to ecoinvent version 3. Life Cycle Impact Assessment results may still have changed, as they are affected by changes in the supply chain, i.e. in other datasets. This dataset was generated following the ecoinvent quality guidelines for version 2. It may have been subject to central changes described in the ecoinvent version 3 change report (http://www.ecoinvent.org/database/ecoinvent-version-3/reports-of-changes/), and the results of the central updates were reviewed extensively. The changes added e.g. consistent water flows and other information throughout the database. The documentation of this dataset can be found in the ecoinvent reports of version 2, which are still available via the ecoinvent website. The change report linked above covers all central changes that were made during the conversion process.]

## Included activities end
Gate to gate inventory for the production of average silicon products.

## Geography
Production plant in DE. No data for IT, US, IN and other locations.

## Technology
Integrated chemical processing facilities with 150 different factories, e.g. electric furnace, silane distillation, hydrolysis, storage tanks, etc.

## Time period
Reporting time of environmental reports.

## Parameters
- fraction, tap water, to air: 0.205 dimensionless; name fraction_TW_to_air; lognormal variance with pedigree 0.092025, pedigree (4,4,3,2,4)
- fraction, cooling water, recirculating system, to air: 0.771 dimensionless; name fraction_CW_R_to_air; lognormal variance with pedigree 0.0413, pedigree (2,3,1,3,1)
  Calculated based on literature value (Scown, C.D., 2011, Water Footprint of U.S. Transportation Fuels and supplying information of the article) (Vionnet, S., Quantis Water Database - Technical Report, 2012).
- fraction, process water, to air: 0.205 dimensionless; name fraction_PW_to_air; lognormal variance with pedigree 0.092025, pedigree (4,4,3,2,4)
- fraction, cooling water, to air: 0.3875 dimensionless; name fraction_CW_to_air; = (0.5*fraction_CW_OT_to_air)+(0.5*fraction_CW_R_to_air); lognormal variance with pedigree 0.092025, pedigree (4,4,3,2,4)
  Calculated value based on literature value (see comments of the other parametres present in this dataset) and expert opinion. In the case when no industry/literature data are available about the type of cooling or directly fraction, cooling water, to air specific for the process a default assumption is applied. It is assumed that the once-through cooling system is used in 50% of all cases and recirculating system is used in another 50% of all cases.
- fraction, cooling water, cooling pond system, to air: 0.032 dimensionless; name fraction_CW_CP_to_air; lognormal variance with pedigree 0.0413, pedigree (2,3,1,3,1)
  (same comment as for fraction, cooling water, recirculating system, to air)
- fraction, cooling water, once-through system, to air: 0.004 dimensionless; name fraction_CW_OT_to_air; lognormal variance with pedigree 0.0413, pedigree (2,3,1,3,1)
  (same comment as for fraction, cooling water, recirculating system, to air)

## Reference product
- silicone product: 1 kg; By-product classification allocatable product; CPC 34800: Synthetic rubber and factice derived from oils, and mixtures thereof with natural rubber and similar natural g[…]; CAS 63394-02-5
  EcoSpold01Location=RER
  production volume 2.67763 kg
    This is a placeholder value that does not reflect real-world production volumes. This dataset does not currently require a real-world production volume to work in the database framework, and no actual data were collected yet. This has no negative effect on the results of the ecoinvent database.
  property price 0.471 EUR2005
    From UN trade database. http://data.un.org/ Calculated as average price for all chemicals in the category 'Trade of goods , US$, HS 1992, 28 Inorganic chemicals, precious metal compound, isotope'. Import data from the largest economies of the world are used (Brazil, India, USA, China, Japan and EU-27).
  property carbon content, non-fossil 0
    The term silicones is used for compounds in which silicon atoms are linked via oxygen atoms, each silicon atom bearing one or several organic groups. In industrially important silicones, these groups are usually methyl or phenyl (ecoinvent v2.2 report 8_part71 & Ullmann). The chemical formula was considered to be [Si(CH3)2O]n (Ullmann).
  property carbon content, fossil 0.324324
    (same comment as for silicone product)
  property heating value, net 9.83 MJ
    LHV is calculated based on the Carbon content of the product. More details can be found on the respective documentation.
  property carbon content 0.324324
    carbon content on a dry matter basis (reserved; not for manual entry)
  properties: dry mass 1 kg, water in wet mass 0 kg, water content 0, wet mass 1 kg, carbon allocation 0.324324 kg

## Inputs from technosphere
- quicklime, milled, packed: 0.027837 kg; lognormal variance with pedigree 0.0421, pedigree (1,2,5,5,1)
  Environmental report
  EcoSpold01Location=CH
  Uncertainty: Environmental report
  properties: water content 0.010101, wet mass 1 kg, dry mass 0.99 kg
- methylchloride: 0.14665 kg; lognormal variance with pedigree 0.0421, pedigree (1,2,5,5,1)
  Environmental report
  EcoSpold01Location=CH
  Uncertainty: Environmental report
  properties: heating value, net 14.41 MJ, carbon content, fossil 0.24, wet mass 1 kg, dry mass 1 kg
- fluosilicic acid, without water, in 22% solution state: 0.0045933 kg; lognormal variance with pedigree 0.0421, pedigree (1,2,5,5,1)
  EcoSpold01Location=RER
  Silicic acid
  Uncertainty: Silicic acid
  properties: wet mass 1 kg, dry mass 1 kg
- sodium chloride, powder: 0.17305 kg; lognormal variance with pedigree 0.0421, pedigree (1,2,5,5,1)
  EcoSpold01Location=RER
  Environmental report
  Uncertainty: Environmental report
  properties: wet mass 1 kg, dry mass 1 kg
- tap water: 0 kg; name tap_water_input; pedigree (1,1,1,1,1)
  EcoSpold01Location=RER
  Environmental report
  Uncertainty: Environmental report
  properties: carbon content, fossil 0.00178991, water content 2962.17, wet mass 1 kg, dry mass 0.000337476 kg
  note on carbon content, fossil: Bicarbonate content is 2.93 mol/m3. CO2 content is 0.1 mol/m3 (ecoinvent v2.2 report 8, Tab 93.1).
- sulfuric acid: 0.0094393 kg; lognormal variance with pedigree 0.0421, pedigree (1,2,5,5,1)
  Environmental report
  EcoSpold01Location=RER
  Uncertainty: Environmental report
  properties: wet mass 1 kg, dry mass 1 kg
- toluene, liquid: 1.2331e-6 kg; lognormal variance with pedigree 0.0421, pedigree (1,2,5,5,1)
  Environmental report
  EcoSpold01Location=RER
  Uncertainty: Environmental report
  properties: carbon content, fossil 0.913043, dry mass 1 kg, wet mass 1 kg, heating value, net 38.17 MJ
- polyethylene, high density, granulate: 0.0012331 kg; lognormal variance with pedigree 0.0421, pedigree (1,2,5,5,1)
  Environmental report
  EcoSpold01Location=RER
  Uncertainty: Environmental report
  properties: dry mass 1 kg, heating value, net 42.47 MJ, carbon content, fossil 0.857143, wet mass 1 kg
  note on carbon content, fossil: Polyethylene is formed out of a huge amount of ethylene monomers (C2H4) (ecoinvent v2.2 report 11_II). MW=28 g/mol
- isopropanol: 0.00045008 kg; lognormal variance with pedigree 0.3421, pedigree (1,2,5,5,1)
  EcoSpold01Location=RER
  Environmental report
  Uncertainty: Environmental report
  properties: heating value, net 34.3 MJ, carbon content, fossil 0.6, dry mass 1 kg, wet mass 1 kg
- zinc: 9.8647e-6 kg; lognormal variance with pedigree 0.0421, pedigree (1,2,5,5,1)
  Dibutylzinnacetat
  EcoSpold01Location=RER
  Uncertainty: Dibutylzinnacetat
  properties: dry mass 1 kg, wet mass 1 kg
- electricity, medium voltage: 0 kWh; pedigree (1,1,1,1,1)
  Environmental report
  EcoSpold01Location=UCTE
  Uncertainty: Environmental report
- silicon, metallurgical grade: 0.085674 kg; lognormal variance with pedigree 0.0421, pedigree (1,2,5,5,1)
  EcoSpold01Location=NO
  Raw silicon
  Uncertainty: Raw silicon
  properties: wet mass 1 kg, dry mass 1 kg
- heat, district or industrial, natural gas: 0 MJ; pedigree (1,1,1,1,1)
  Environmental report
  EcoSpold01Location=RER
  Uncertainty: Environmental report
  properties: heating value, net 1 MJ
- methanol: 0.096463 kg; lognormal variance with pedigree 0.0421, pedigree (1,2,5,5,1)
  Environmental report
  EcoSpold01Location=CH
  Uncertainty: Environmental report
  properties: carbon content, fossil 0.375, dry mass 1 kg, wet mass 1 kg, heating value, net 26.49 MJ
- sodium hydroxide, without water, in 50% solution state: 0.0024539 kg; lognormal variance with pedigree 0.0421, pedigree (1,2,5,5,1)
  EcoSpold01Location=RER
  Environmental report
  Uncertainty: Environmental report
  properties: wet mass 1 kg, heating value, net 3.03 MJ, dry mass 1 kg
- heat, district or industrial, other than natural gas: 0 MJ; pedigree (1,1,1,1,1)
  Environmental report
  EcoSpold01Location=RER
  Uncertainty: Environmental report
  properties: heating value, net 1 MJ
- electricity, high voltage: 0 kWh; pedigree (1,1,1,1,1)
  EcoSpold01Location=DE
  Electricity production
  Uncertainty: Electricity production
- copper, cathode: 0.0012578 kg; lognormal variance with pedigree 0.0421, pedigree (1,2,5,5,1)
  EcoSpold01Location=RER
  Environmental report
  Uncertainty: Environmental report
  properties: wet mass 1 kg, dry mass 1 kg
- hazardous waste, for incineration: -0.036645 kg; lognormal variance with pedigree 0.0421, pedigree (1,2,5,5,1)
  EcoSpold01Location=CH
  Internal disposal
  Uncertainty: Internal disposal
  production volume 0.109935 kg
    Calculated from the production volume of silicone product in proportion to the respective output amounts.
  properties: carbon content, fossil 0.554667, dry mass 0.75 kg, wet mass 1 kg, heating value, net 17 MJ, water content 0.333333
  note on carbon content, fossil: Tab A.6, ecoinvent v2.2 report 13_I. C content has been calculated after data in the tables, and then referred to 1 kg DM
  note on heating value, net: Value taken from the general comment of the treatment dataset.
- ethylene: 0 kg; pedigree (1,1,1,1,1)
  EcoSpold01Location=RER
  Environmental report, ethanol used in Nünchritz
  Uncertainty: Environmental report, ethanol used in Nünchritz
  properties: wet mass 1 kg, heating value, net 43.22 MJ, carbon content, fossil 0.857143, dry mass 1 kg
- silicon tetrachloride: 0.0011653 kg; lognormal variance with pedigree 0.0421, pedigree (1,2,5,5,1)
  EcoSpold01Location=DE
  Environmental report
  Uncertainty: Environmental report
  properties: wet mass 1 kg, dry mass 1 kg
- silicone factory: 1e-11 unit; lognormal variance with pedigree 0.3421, pedigree (1,2,5,5,1)
  Environmental report
  EcoSpold01Location=RER
  Uncertainty: Environmental report
- cyclohexanol: 8.6316e-6 kg; lognormal variance with pedigree 0.0421, pedigree (1,2,5,5,1)
  Environmental report
  EcoSpold01Location=RER
  Uncertainty: Environmental report
  properties: heating value, net 36.32 MJ, dry mass 1 kg, wet mass 1 kg, carbon content, fossil 0.72
- tin: 7.3985e-5 kg; lognormal variance with pedigree 0.0421, pedigree (1,2,5,5,1)
  EcoSpold01Location=RER
  Environmental report
  Uncertainty: Environmental report
  properties: wet mass 1 kg, dry mass 1 kg
- titanium dioxide: 1.2331e-5 kg; lognormal variance with pedigree 0.0421, pedigree (1,2,5,5,1)
  EcoSpold01Location=RER
  Environmental report
  Uncertainty: Environmental report
  properties: wet mass 1 kg, dry mass 1 kg
- chemical, organic: 0.03825 kg; lognormal variance with pedigree 0.0421, pedigree (1,2,5,5,1)
  Environmental report, different special chemicals
  EcoSpold01Location=GLO
  Uncertainty: Environmental report, different special chemicals
  properties: heating value, net 19.03 MJ, dry mass 1 kg, carbon content, fossil 0.628, wet mass 1 kg
  note on carbon content, fossil: This dataset is an unweighted average of 20 organic substances (listed in Tab 88.1, ecoinvent v2.2 report 8, part II), being part of the top100 chemicals included in this database. The C-content has also been calculated as an unweighted average of the C content of the substances composing this dataset.
- municipal solid waste: 0 kg; pedigree (1,1,1,1,1)
  EcoSpold01Location=CH
  Environmental report
  Uncertainty: Environmental report
  production volume 0 kg
    (same comment as for hazardous waste, for incineration)
  properties: water content 0.297017, dry mass 0.771 kg, wet mass 1 kg, carbon content, non-fossil 0.261655, heating value, net 11.74 MJ, carbon content, fossil 0.171549
  note on carbon content, non-fossil: MSW composition in tab 4.1, ecoinvent v2.2 report 13_I. C content referred to 1 kg DM
- tap water: 0.00416173, 0.000500961, 0.00082792, 0.0208769, 0.000543106, 0.00154486, 0.238905 kg (7 entries); lognormal variance with pedigree 0.0421, pedigree (1,2,5,5,1)
  EcoSpold01Location=RER
  Environmental report
  Uncertainty: Environmental report
- electricity, medium voltage: 0.0070284, 0.00134774, 0.0226258, 0.329073, 0.0463829, 0.151123 kWh (6 entries); lognormal variance with pedigree 0.0421, pedigree (1,2,5,5,1)
  Environmental report
  EcoSpold01Location=UCTE
  Uncertainty: Environmental report
- heat, district or industrial, natural gas: 0.161028, 10.4482 MJ (2 entries); lognormal variance with pedigree 0.0421, pedigree (1,2,5,5,1)
  Environmental report
  EcoSpold01Location=RER
  Uncertainty: Environmental report
- heat, district or industrial, other than natural gas: 0.000146572, 0.361452 MJ (2 entries); lognormal variance with pedigree 0.0421, pedigree (1,2,5,5,1)
  Environmental report
  EcoSpold01Location=RER
  Uncertainty: Environmental report
- electricity, high voltage: 0.00430395, 0.000825108, 0.0139897, 0.201446, 0.0319476, 0.0920958 kWh (6 entries); lognormal variance with pedigree 0.0421, pedigree (1,2,5,5,1)
  EcoSpold01Location=DE
  Electricity production
  Uncertainty: Electricity production
- ethylene: 0.00264364, 0.164766 kg (2 entries); lognormal variance with pedigree 0.0421, pedigree (1,2,5,5,1)
  (same comment as for ethylene)
- municipal solid waste: -3.60339e-5, -9.07964e-6, -1.29754e-5, -0.0254846 kg (4 entries); lognormal variance with pedigree 0.0421, pedigree (1,2,5,5,1)
  EcoSpold01Location=CH
  Environmental report
  Uncertainty: Environmental report
  production volume 0.0766281 kg

## Inputs from nature
- Water, cooling, unspecified natural origin [natural resource, in water]: 0.23914 m3; name water_cooling_UNO_input; lognormal variance with pedigree 0.0421, pedigree (1,2,5,5,1)
  Internal production
  Uncertainty: Internal production
- Water, well, in ground [natural resource, in water]: 0.0026898 m3; name water_well_in_ground_input; lognormal variance with pedigree 0.0421, pedigree (1,2,5,5,1)
  Environmental report
  Uncertainty: Environmental report

## Emissions to nature
- Chloride [water, surface water]: 0.038509 kg; lognormal variance with pedigree 0.0821, pedigree (1,2,5,5,1)
  Environmental report
  Uncertainty: Environmental report
- Sulfate [water, surface water]: 0.00018601 kg; lognormal variance with pedigree 0.0821, pedigree (1,2,5,5,1)
  Environmental report
  Uncertainty: Environmental report
- Lead [water, surface water]: 2.0369e-7 kg; lognormal variance with pedigree 0.6921, pedigree (1,2,5,5,1)
  Environmental report, 1997
  Uncertainty: Environmental report, 1997
- Cadmium, ion [water, surface water]: 9.4682e-7 kg; lognormal variance with pedigree 0.9021, pedigree (1,2,5,5,5)
  Environmental report, 1997, heavy metals
  Uncertainty: Environmental report, 1997, heavy metals
- Nitrogen [water, surface water]: 0.00028512 kg; lognormal variance with pedigree 0.0821, pedigree (1,2,5,5,1)
  Environmental report
  Uncertainty: Environmental report
- Fluoride [water, surface water]: 3.7121e-5 kg; lognormal variance with pedigree 0.0821, pedigree (1,2,5,5,1)
  Environmental report, 1997
  Uncertainty: Environmental report, 1997
- AOX, Adsorbable Organic Halogen as Cl [water, surface water]: 1.0759e-5 kg; lognormal variance with pedigree 0.3421, pedigree (1,2,5,5,1)
  Environmental report
  Uncertainty: Environmental report
- Hydrogen chloride [air, urban air close to ground]: 3.7119e-5 kg; lognormal variance with pedigree 0.0821, pedigree (1,2,5,5,1)
  Volatile anorganic compounds
  Uncertainty: volatile anorganic compounds
- Chromium, ion [water, surface water]: 7.8684e-7 kg; lognormal variance with pedigree 0.6921, pedigree (1,2,5,5,1)
  Environmental report, 1997
  Uncertainty: Environmental report, 1997
- Silicon [air, urban air close to ground]: 8.6073e-5 kg; lognormal variance with pedigree 0.0821, pedigree (1,2,5,5,1)
  Org. Si-compounds
  Uncertainty: Org. Si-compounds
- BOD5, Biological Oxygen Demand [water, surface water]: 7.8542e-5 kg; lognormal variance with pedigree 0.0821, pedigree (1,2,5,5,1)
  Environmental report
  Uncertainty: Environmental report
- Copper, ion [water, surface water]: 6.8482e-7 kg; lognormal variance with pedigree 0.6921, pedigree (1,2,5,5,1)
  Environmental report, 1997
  Uncertainty: Environmental report, 1997
- Iron, ion [water, surface water]: 5.9175e-6 kg; lognormal variance with pedigree 0.6921, pedigree (1,2,5,5,1)
  Environmental report
  Uncertainty: Environmental report
- Hydrocarbons, chlorinated [air, urban air close to ground]: 2.2594e-5 kg; lognormal variance with pedigree 0.0821, pedigree (1,2,5,5,1)
  Environmental report
  Uncertainty: Environmental report
- COD, Chemical Oxygen Demand [water, surface water]: 0.0008826 kg; lognormal variance with pedigree 0.0821, pedigree (1,2,5,5,1)
  Environmental report
  Uncertainty: Environmental report
- Hydrocarbons, aliphatic, alkanes, unspecified [air, urban air close to ground]: 0.0003685 kg; lognormal variance with pedigree 0.0821, pedigree (1,2,5,5,1)
  Environmental report
  Uncertainty: Environmental report
- Water [air, unspecified]: 0.093273 m3; name water_to_air_unspecified; lognormal variance with pedigree 0.0827, pedigree (2,2,5,5,1)
  Calculated value based on literature values and expert opinion. See comments in the parametres' comment field.
  property fraction, origin: unspecified 0.993501; name fraction_origin_unspecified
  property fraction, origin: fresh water 0.00649939; name fraction_origin_fresh_water
  property fraction, origin: salt water 0; name fraction_origin_salt_water
- DOC, Dissolved Organic Carbon [water, surface water]: 0.00071494 kg; lognormal variance with pedigree 0.1521, pedigree (5,2,5,5,1)
  Rough estimation with TOC
  Uncertainty: Rough estimation with TOC
- Water [water, unspecified]: 0.148824 m3; name water_to_water_unspecified; lognormal variance with pedigree 0.0827, pedigree (2,2,5,5,1)
  (same comment as for Water)
  property fraction, origin: unspecified 0.984203; name fraction_origin_unspecified_Ww
  property fraction, origin: salt water 0; name fraction_origin_salt_water_Ww
  property fraction, origin: fresh water 0.0157968; name fraction_origin_fresh_water_Ww
  property wet mass 1000 kg; name WM
  property carbon content, fossil 0; name C_content_fossil
  property dry mass 0 kg; name DM
  property water in wet mass 1000 kg; name WWM
  property carbon content, non-fossil 0; name C_content_non_fossil
- Mercury [water, surface water]: 1.8601e-9 kg; lognormal variance with pedigree 0.6921, pedigree (1,2,5,5,1)
  Environmental report, 1997
  Uncertainty: Environmental report, 1997
- Particulates, > 2.5 um, and < 10um [air, urban air close to ground]: 6.9934e-5 kg; lognormal variance with pedigree 0.3421, pedigree (1,2,5,5,1)
  Dust
  Uncertainty: Dust
- Zinc, ion [water, surface water]: 1.8291e-6 kg; lognormal variance with pedigree 0.6921, pedigree (1,2,5,5,1)
  Environmental report
  Uncertainty: Environmental report
- Sodium, ion [water, surface water]: 0.026951 kg; lognormal variance with pedigree 0.0821, pedigree (1,2,5,5,1)
  Environmental report
  Uncertainty: Environmental report
- Nickel, ion [water, surface water]: 7.98e-7 kg; lognormal variance with pedigree 0.6921, pedigree (1,2,5,5,1)
  Environmental report, 1997
  Uncertainty: Environmental report, 1997
- TOC, Total Organic Carbon [water, surface water]: 0.00071494 kg; lognormal variance with pedigree 0.0821, pedigree (1,2,5,5,1)
  Environmental report
  Uncertainty: Environmental report
- Phosphorus [water, surface water]: 4.6504e-7 kg; lognormal variance with pedigree 0.0821, pedigree (1,2,5,5,1)
  Environmental report
  Uncertainty: Environmental report
- Phosphate [water, surface water]: 4.3037e-6 kg; lognormal variance with pedigree 0.0821, pedigree (1,2,5,5,1)
  Environmental report
  Uncertainty: Environmental report

## Sampling procedure
Environmental reports for 2 plants.

## Extrapolations
Average data for a range of products This dataset has been copied from an original dataset covering the geography RER. The uncertainty has been adjusted accordingly.

## Review by Roland Hischier 2006-09-27
Passed.
none
