# building construction, luxury hotel

Dataset: EcoSpold 2, unit process
Geography: BR
Time period: 2017-01-01 to 2021-12-31
Technology level: current
Classification: ISIC rev.4 ecoinvent: 4100:Construction of buildings
Synonyms: luxury hotel construction; 5 star hotel construction
Tags: single enterprise data
Scenario: Business-as-Usual
System model: Allocation, cut-off by classification
Generated by: Marina Santa Rosa Rocha
Published in: Filimonau, V 2018
Database: ecoinvent
isCopyrightProtected: true
accessRestrictedTo: 1

## General comment
This dataset represents a tourist accommodation facility classed as a luxury hotel (comfort category 5*), located in Campinas, SP, Brazil. It was first opened in 1999 as a brand new resort complex. The complex has capacity to host 1000 people and offers rooms of the following types (total number of rooms is given in brackets): suites with one double bed (453) and suites with two double beds (47). These rooms are distributed among 5 different buildings that are surronded by 7 pools, a gym, a spa, kids area and four conference areas. The laundry is outsourced. The hotel occupies a total area of 58618,2 m2. The average annual occupancy of the hotel is estimated to be 58%, based on Rio de Janeiro"s average occupancy for luxury hotels (Source: Anuário Estatístico da Taxa de Ocupação Hoteleira da Cidade do Rio de Janeiro. ABIH-RJ, 2016) which is equal to 211700 guest nights per year. The load bearing structure of hotel buildings is made of concrete and the facade is made of concrete and brickwork.

## Included activities start
This dataset is modelled to include the inputs for the construction of a hotel building. This includes:energy and water used in construction, land transformation, building structure and outer building shell, foundations, inner walls, roofs, ceiling and windows, doors, floors, finishing and painting, bathroom equipment. Activities include hotel building construction with lifeframe of the hotel building of 75 years. Maintenance is included only through the consideration of the lifetime of the different exchanges. For example, windows are assumed to have a lifetime of 35 years, therefore the exchange amount is multiplied by 75years / 35 years=2.14.

## Included activities end
Activities end with 1 unit of hostel building, including maintenance. Due to data availability, the following building construction processes have been excluded: mirror, urinary, shower, cables, gutter, drains, ventilation.

## Geography
The hotel is based in Campinas, SP, Brazil

## Technology
The level of technology is considered current. The load bearing structure of hotel buildings is made of concrete and the facade is made of concrete and brickwork.

## Time period
The survey was done in the year 2017 with the data provided covering the operational year 2016-2017.

## Parameters
- gross floor area: 58681.2 m2; name GFA
  This represents plot area of the luxury hotel.
- volume: 2.26441e6 m3; = AFA*3
  Building volume. Calculated by multiplying sum of all floor areas (AFA) by the height of the floor. Height of the floor is assumed to be equal to 3 meters.
- sum of all floors area: 754804 m2; name AFA
  This represents the sum of all floors area for the luxury hotel buildings.
- occupancy rate/year: 0.58 dimensionless; name occupancy_y
  The average annual occupancy of the hotel is estimated to be 58%, based on Rio de Janeiro"s average occupancy for luxury hotels (Source: Anuário Estatístico da Taxa de Ocupação Hoteleira da Cidade do Rio de Janeiro. ABIH-RJ, 2016)

## Reference product
- building, luxury hotel: 1 unit; name RP; By-product classification allocatable product; CPC 5312: Non-residential buildings
  production volume 8 unit; name RP_PV
    In 2017 it was estimate that there were 10314 hotels in Brazil (Source: JLL, FOHB and ABR. Lodging Industry in Numbers - Brazil 2017. Available from: http://www.jll.com.br/brazil/pt-br/relatorios/175/hotelaria-em-numeros-2017) Accessed 27 March 2018. A study from the Brazilian Institute of Geography and Statistics (IBGE, 2012) showed that 46,9% of tourism accomodations in main urban areas in Brazil are hotels and 5,8% of these hotels are consider luxury hotels. (Source: IBGE, 2012. Pesquisa de Serviços de Hospedagem 2016 Available from: ftp://ftp.ibge.gov.br/Comercio_e_Servicos/Pesquisa_Servicos_de_Hospedagem/2011/psh2011.pdf. Accessed 27 March 2018). These percentages are used as a proxy to calculate the total amount of luxury hotels in Brazil: 10314*0,469*0,058 = 278 luxury hotels. Another study from IBGE (2017) showed that from 2011 to 2016 the Brazilian hotel supply increased 15% (Source: IBGE, 2017. Pesquisa de Serviços de Hospedagem 2016 Available from: https://biblioteca.ibge.gov.br/index.php/biblioteca-catalogo?view=detalhes&id=2100623 Accessed 04 June 2018). Assuming this growth distributes equally across the years and various categories of hotels in Brazil, it can be estimated that the number of luxury hotel properties annually constructed in Brazil is equal to: 278 hotels * (0.15/5) = 8 hotels.
  property lifetime capacity 2.7375e7 guest night; name lifetime_guests; = 1000*365* lifetime
    The total capacity of the hotel is 1000 guests. The lifetime capacity is calculated accordingly.
  property price 1.86447e8 EUR2005; name RP_price_EUR2005
    Calculated based on inputs: The price of the product has been calculated as a sum of the values of the material and energy inputs for this product. This value is therefore a rough estimation. It may underestimate the real price since there are additional expenses when producing any product. These expences can include for example labour costs, treatment of waste materials and profit for the producer. Please consider carefully whether this level of data quality is acceptable for your application.
  property lifetime 75 year; name lifetime
    Estimated value. The lifetime of a hotel building is assumed to be equal to 75 years which is an average of the 50-100 years" estimates available in the literature. Source: Filimonau et al. 2011. Reviewing the carbon footprint analysis of hotels: Life Cycle Energy Analysis (LCEA) as a holistic method for carbon impact appraisal of tourist accommodation. Journal of Cleaner Production, 19, 1917-1930.

## By-products
- iron scrap, unsorted: 0 kg; CPC 39310: Slag, dross, scalings and other waste from the manufacture of iron or steel; By-product classification Recyclable; pedigree (1,1,1,1,1)
  Calculated value. Amount of output material is set equal to the amount of input material, steel.
  production volume 0 kg; = RP_PV * (scrap_steel / RP)
    Calculated from production volume of reference product using the relative outputs.
  property price 0.149 EUR2005; name scrap_steel_price_EUR2005
    Temporary price data. Calculated as 90% of purchasers price based on: estimated at 85% of sorted scrap
  property carbon content 0
    carbon content on a dry matter basis (reserved; not for manual entry)
  properties: carbon content, non-fossil 0, carbon content, fossil 0, dry mass 1 kg, water content 0, water in wet mass 0 kg, wet mass 1 kg, carbon allocation 0 kg
- aluminium scrap, post-consumer: 0 kg; CPC 39363: Waste and scrap of aluminium; By-product classification Recyclable; pedigree (1,1,1,1,1)
  Calculated value. Amount of output material is set equal to the amount of respective input material, window frame, aluminium multiplied by its wet mass (assumed to equals the density) plus structural aluminium.
  production volume 0 kg; = RP_PV * (scrap_alu / RP)
    Calculated from production volume of reference product using the relative outputs.
  property price 0.685 EUR2005; name scrap_alu_price_EUR2005
    Temporary price data. Calculated as 90% of purchasers price based on: estimated at 85% of new scrap
  property carbon content 0
    carbon content on a dry matter basis (reserved; not for manual entry)
  properties: water in wet mass 0 kg, carbon content, fossil 0, water content 0, dry mass 1 kg, carbon content, non-fossil 0, wet mass 1 kg, carbon allocation 0 kg

## Inputs from technosphere
- door, inner, wood: 1246.17 m2; name door_inner_w; = 550*1,981*0,610*(lifetime/40); lognormal variance with pedigree 0.122825, pedigree (1,4,2,2,5)
  Estimated value. No data but based on 500 apartments and a number of administrative rooms, an approximation of 550 doors is used. Dimensions of a standar assumed to be 1,981 x 0,610 m and include wooden door frame. Souce: https://www.jbkind.com/info-centre/standard-door-sizes. Assumed service life of 40 years. Source: Cobut et al. 2015. The environmental footprint of interior wood doors in non-residential buildings - part 1: life cycle assessment. Journal of Cleaner Production, 109, 232-246. In terms of outputs, assumed to have gone to used door, inner, wood.
  properties: carbon content, fossil 0.074995, water content 0.0526316, wet mass 27.6 kg, carbon content, non-fossil 0.715131, dry mass 26.22 kg
- blower and heat exchange unit, central, 600-1200 m3/h: 15 unit; = 4*lifetime/20; lognormal variance with pedigree 0.422225, pedigree (1,4,2,2,5)
  Calculated value. Represents here 4 central air-conditioning units. The amount of exchange is calculated as: amount of input product * (lifetime of the hotel / lifetime of the product). Assumed service life of the air-conditioning unit is 20 years. Source: ASHRAE 2018. ASHRAE Equipment Life Expectancy chart. Available from: http://www.culluminc.com/wp-content/uploads/2013/02/ASHRAE_Chart_HVAC_Life_Expectancy%201.pdf Accessed 23 March 2018.
  properties: dry mass 143 kg, carbon content, non-fossil 5.13903e-7, wet mass 143 kg, carbon content, fossil 0.00852676
- wastewater, average: -377402 m3; name wastewater; = (tap_water/1000)*-1; lognormal variance with pedigree 0.122825, pedigree (1,4,2,2,5)
  Calculated value. The amount is set equal to the amount of input material, tap water with conversion from kg to m3. 1 m3 of water is assumed to be equal to 1000 kg of water.
  production volume 3.01922e6 m3; = wastewater*RP_PV/RP
    Calculated from production volume of reference product using the relative outputs.
  property price 0 EUR2005; name wastewater_price_EUR2005
  properties: carbon content, non-fossil 0.194039, water content 2882.2, wet mass 1000 kg, dry mass 0.346837 kg
  note on carbon content, non-fossil: 0.0673 kg TOC/m3 (Tab A.17, ecoinvent v2.2 report 13_I). TOC was considered as Total Carbon.
- ceramic tile: 827526 kg; name tile; = (4485,236708*12.3)*(lifetime/5); lognormal variance with pedigree 0.122825, pedigree (1,4,2,2,5)
  Calculated value. The amount of exchange is calculated as: amount of input product * (lifetime of the hotel / lifetime of the product). Combined of all instances of use across the building floor and roof. Assuming 12.3 kg of tiles is required to cover 1 m2 of floor area. Source: Victoria Plumbing 2018. British ceramic tile. Available from: https://victoriaplum.com/product/british-ceramic-tile-metro-bevel-white-gloss-tile-100mm-x-200mm Accessed 16 March 2018. Assumed service life of 5 years for floor ceramic tile which is equivalent to the period of major refurbishments in hotels. Source: Filimonau et al. 2011. Reviewing the carbon footprint analysis of hotels: Life Cycle Energy Analysis (LCEA) as a holistic method for carbon impact appraisal of tourist accommodation. Journal of Cleaner Production, 19(17-18), 1917-1930. In terms of outputs assumed to have gone to insert waste.
  properties: dry mass 1 kg, wet mass 1 kg
- waste gypsum plasterboard: -1.2367e7 kg; name waste_g; = (gypsum)*-1; lognormal variance with pedigree 0.123425, pedigree (2,4,2,2,5)
  Calculated value. Amount of output material is set equal to the amount of respective input material, gypsum plasterboard.
  production volume 9.89363e7 kg; = waste_g*RP_PV/RP
    Calculated from production volume of reference product using the relative outputs.
  property price 0 EUR2005; name waste_g_price_EUR2005
  properties: wet mass 1 kg, dry mass 0.807 kg, water content 0.239157
- inert waste: -1.00184e6 kg; name inert_w; = (sanitary+ tile+natural_stone)*-1; lognormal variance with pedigree 0.122825, pedigree (1,4,2,2,5)
  Calculated value. Amount of output material is set equal to the amount of respective input material, sanitary ceramics. It also contains waste ceramic tile and natural stone.
  production volume 8.01469e6 kg; = inert_w*RP_PV/RP
    Calculated from production volume of reference product using the relative outputs.
  property price 0 EUR2005; name inert_w_price_EUR2005
  properties: dry mass 1 kg, wet mass 1 kg
- sanitary ceramics: 151895 kg; name sanitary; = ((500*15)*(lifetime/15)+(500*35)*(lifetime/15)+(163*33)*(lifetime/15)); lognormal variance with pedigree 0.422225, pedigree (1,4,2,2,5)
  Calculated value. The amount of exchange is calculated as: amount of input product * (lifetime of the hotel / lifetime of the product). This flow represents ceramic washing basin and ceramic toilet seat. The hotel has 500 washing basins, 500 toilet seats and 163 bath tubes. Washing basins are assumed to weigh 15kg (information taken from IKEA (2018) for the product "TÖRNVIKEN Countertop wash-basin", source retrieved from: http://www.ikea.com/gb/en/products/washstands-taps/wash-basins/t%C3%B6rnviken-countertop-wash-basin-white-art-90291518/, accessed 12 Feb 2018). The assumed lifetime is 15 years. Toilet seats are assumed to weigh 35kg (information taken from B&Q (2018) for the product "COOKE & LEWIS FABIENNE CLOSE-COUPLED TOILET WITH SOFT CLOSE SEAT", source retrieved from: https://www.diy.com/departments/cooke-lewis-fabienne-close-coupled-toilet-with-soft-close-seat/1142804_BQ.prd?B/R_Toilets_C_CT, accessed 12 Feb 2018). The assumed lifetime is 15 years. Bath tubes are assumed to weigh 33kg (information taken from B&Q (2018) for the product COOKE & LEWIS CONWAY STEEL RECTANGULAR STRAIGHT BATH (L)1700MM (W)700MM, source retrieved from: https://www.diy.com/departments/cooke-lewis-conway-steel-rectangular-straight-bath-l-1700mm-w-700mm/194437_BQ.prd, accessed 23 March 2018). The assumed lifetime is 15 years. In terms of outputs, assumed to have gone to inert waste.
  properties: dry mass 1 kg, wet mass 1 kg
- steel, low-alloyed, hot rolled: 19295 kg; name steel; = 3511,367719*0,7*7850/1000; lognormal variance with pedigree 0.123425, pedigree (2,4,2,2,5)
  Calculated value. Assumed thickness of steel 0.7 mm. Source: MCRMA 2004. PROFILED METAL ROOFING DESIGN GUIDE. MCRMA Technical Paper No. 6. Available from: http://www.mcrma.co.uk/pdf/mcrma_t06.pdf Accessed 16 March 2018. Assumed density of steel 7850 kg/m3. Source: The Calculator site 2018. Metal converter. Available from: https://www.thecalculatorsite.com/conversions/substances/metal.php Accessed 23 March 2018. Assumed service life of 75 years which is equal to the service life of the hotel building with minor refurbishments throughout. In terms of outputs, assumed to have gone to scrap steel.
  properties: wet mass 1 kg, dry mass 1 kg, carbon content, fossil 0.005
  note on carbon content, fossil: Low alloyed steel composition given in Tab. 3.2 ecoinvent v2.2 report 10_partII. Steel assumed to have a C content of 0.5%
- flat glass, coated: 7.00494e6 kg; name glass; = (124532,2861*15)*(lifetime/20); lognormal variance with pedigree 0.122825, pedigree (1,4,2,2,5)
  Calculated value. The amount of exchange is calculated as: amount of input product * (lifetime of the hotel / lifetime of the product). Assuming 15 kg of window glass is required to cover 1m2 of area (double-glazed windows). Assumed average service life of 20 years. Source: Howard et al. 2007. Comparative service life assessment of window systems. Available from: http://www.fwpa.com.au/images/marketaccess/PR07.1047%20Final%20Report%20WEB.pdf Accessed 16 March 2018. In terms of outputs assumed to have gone to waste glass.
  properties: wet mass 1 kg, dry mass 1 kg
- waste wood, untreated: -616959 kg; name waste_w; = ( (sawnwood* beam_WM)+ (plywood* ply_i_WM))*-1; lognormal variance with pedigree 0.123425, pedigree (2,4,2,2,5)
  Calculated value. The amount is set equal to the amount of input materials, sawnwood, with conversion made from volume to weight. The conversion is based on the density reported in the property section for the respective products (see the wet mass property).
  production volume 4.93567e6 kg; = waste_w*RP_PV/RP
    Calculated from production volume of reference product using the relative outputs.
  property price 0 EUR2005; name waste_w_price_EUR2005
  properties: carbon content, non-fossil 0.48632, water content 0.25, heating value, net 13.99 MJ, dry mass 0.8 kg, wet mass 1 kg
  note on heating value, net: Value taken from the general comment of the treatment dataset.
- used door, inner, wood: -1246.17 m2; name used_door; = (door_inner_w)*-1; lognormal variance with pedigree 0.122825, pedigree (1,4,2,2,5)
  Calculated value. Amount of output material is set equal to the amount of respective input material, door, inner, wood.
  production volume 9969.38 m2; = used_door*RP_PV/RP
    Calculated from production volume of reference product using the relative outputs.
  property price 0 EUR2005; name used_door_price_EUR2005
  properties: water content 0.0526316, wet mass 27.6 kg, carbon content, non-fossil 0.715131, dry mass 26.22 kg, carbon content, fossil 0.074995
- diesel, burned in building machine: 1.13311e7 MJ; name diesel; = 1.39*3.6*volume; lognormal variance with pedigree 0.422225, pedigree (1,4,2,2,5)
  Calculated value. Assuming that 1.39 kWh/m3 of diesel is necessary to construct a building. Source: Zabalza et al. 2013. Use of LCA as a Tool for Building Ecodesign. A Case Study of a Low Energy Building in Spain. Energies, 6(8), 3901-3921. Assuming 1 kWh = 3.6 MJ
  properties: heating value, net 1 MJ
- sawnwood, beam, softwood, dried (u=10%), planed: 70.6871 m3; name sawnwood; = 7440,746534*9,5/1000; lognormal variance with pedigree 0.123425, pedigree (2,4,2,2,5)
  Calculated value. Represents here all wood used in flooring and for wall decoration. Combined of all instances of use across the building. Assumed thickness of wood to be 9.5 mm. Source: APA 2016. Wall construction. An excerpt of the engineering wood construction guide. Available from: https://www.buildgp.com/DocumentViewer.aspx?elementid=10198 Accessed 25 March 2018. Assumed service life of 75 years with minor refurbishments throughout. In terms of outputs assumed to have gone to waste wood, untreated.
  property wet mass 425.92 kg; name beam_WM
  properties: heating value, net 5700.67 MJ, carbon content, non-fossil 0.494, water content 0.1, dry mass 387.2 kg
- concrete, normal: 543130 m3; name concrete; = 530340,9602+(30759,5812186821*225/1000)+5868,12; lognormal variance with pedigree 0.122825, pedigree (1,4,2,2,5)
  Calculated value.
  Combined of all instances of use across the building structure, walls and floor (5.4E+05m3). Assumed thickness of floor concrete of 225 mm, Insulation 2011. Thermafloor TF70. INSULATION FOR SOLID CONCRETE AND SUSPENDED GROUND FLOORS. Available from http://kingspaninsulation.co.uk/getattachment/5fdd04b2-e58e-4622-97bb-5861799ab02a/Thermafloor-TF70-pdf.pdf Accessed 23 March 2018. Assumed service life of 75 years which is equal to the service life of the hotel building with minor refurbishments throughout.
  Additionally the concrete for foundations is account for (5868m3). Estimated value based on the hotel area. In terms of outputs assumed to have gone to waste concrete.
  property wet mass 2380 kg; name concrete_WM
  properties: water content 0.086758, dry mass 2190 kg
- natural stone plate, cut: 22414.7 kg; name natural_stone; = ((99374,50064*22/1000)*2,7)+((277977,7515*22/1000)*2,7); lognormal variance with pedigree 0.123425, pedigree (2,4,2,2,5)
  Calculated value. Used here in place of marble. Combined of all instances of use across the building. Assumed thickness of marble is 22 mm. Source: Erdly and Schwartz 2004. Building facade maintenance, repair, and inspection. ASTM International, West Conshohocken, USA. Assumed density of marble is 2.7 kg/m3. Source: The Engineering Toolbox 2018. Densities of common solids. Available from: https://www.engineeringtoolbox.com/density-solids-d_1265.html Accessed 25 March 2018. Assumed service life of 75 years which is equal to the service life of the hotel building with minor refurbishments throughout. In terms of outputs assumed to have gone to inert waste.
  properties: wet mass 1 kg, dry mass 1 kg
- plywood: 713.065 m3; = 37529,72172*19/1000; lognormal variance with pedigree 0.123425, pedigree (2,4,2,2,5)
  Calculated value. Represents here wood used as ceiling material and for decoration. Assumed average thickness of plywood is 19mm. Source: Plymaster 2018. Interior Plywood. Available from: (http://plymaster.com.au/plywood-products-interior.htm#/1) Accessed 25 March 2018. Assumed service life of 75 years with minor refurbishments throughout. In terms of outputs assumed to have gone to waste wood, untreated.
  property wet mass 823 kg; name ply_i_WM
  properties: heating value, net 11688.9 MJ, water content 0.070778, carbon content, fossil 0.09783, dry mass 768.6 kg, price 400 EUR2005, carbon content, non-fossil 0.409818
- tap water: 3.77402e8 kg; name tap_water; = (0.5*1000*AFA); lognormal variance with pedigree 0.422225, pedigree (1,4,2,2,5)
  Calculated value. Assuming that 0.5 kl per 1 m2 of floor area (AFA) is required in building construction. Source: Crawford et al. 2005. In terms of outputs assumed to have gone to wastewater. Value double checked in McCormack, et al. 2007.
  Reference:
  Crawford, Robert and Treloar, Graham 2005, An assessment of the energy and water embodied in commercial building construction, in Australian Life Cycle Assessment Conference (4th : 2005 : Novotel, Sydney, N.S.W.), Australian Life Cycle Assessment Society, Sydney, N.S.W., pp. 1-10.
  McCormack, et al. 2007. Modelling direct and indirect water requirements of construction. Building research & information. 35(2), 156-162.
  properties: dry mass 0.000337476 kg, carbon content, fossil 0.00178991, wet mass 1 kg, water content 2962.17
  note on carbon content, fossil: Bicarbonate content is 2.93 mol/m3. CO2 content is 0.1 mol/m3 (ecoinvent v2.2 report 8, Tab 93.1).
- aluminium, cast alloy: 986435 kg; name aluminium; = 30445,51406*(12/1000)*2700; lognormal variance with pedigree 0.123425, pedigree (2,4,2,2,5)
  Calculated value. Represents here all aluminium parts used in construction of the building structure and walls. Combined of all instance of use across the buidling. Assumed thickness of aluminium is 12 mm. Source: Singh and Verma, 2008. Investigations for deducing wall
  thickness of aluminium shell casting using three dimensional printing. Journal of Achievements in Materials and Manufacturing Engineering, 31(2), 565-569. Available from: http://jamme.acmsse.h2.pl/papers_vol31_2/31259.pdf Accessed 25 March 2018. Assumed density of aluminium is 2700 kg/m3. Source: AmBrSoft Quality Softwares 2018. Materials density table. Available from: http://www.ambrsoft.com/CalcPhysics/Density/Table_2.htm Accessed 25 March 2018. Assumed service life of 75 years which is equal to the service life of the hotel building with minor refurbishments throughout. In terms of outputs assumed to have gone to scrap aluminium.
  properties: wet mass 1 kg, dry mass 1 kg
- glass wool mat: 57351.7 kg; name wool_mat; = (14337,92962*0,1*40); lognormal variance with pedigree 0.123425, pedigree (2,4,2,2,5)
  Calculated value. Used here in place of acustic tile as a more conventional product. The amount of exchange is calculated as: amount of input product * (lifetime of the hotel / lifetime of the product). Combined of all instances of use across the building structure, walls and ceiling. Assumed service life of 75 years which is equal to the service life of the hotel building with minor refurbishments throughout. Assumed thickiness of glass wool 100 mm. Source: Knauf Insulation 2018. Knauf Insulation. Available from: http://www.knaufinsulation.co.uk/products/glass-mineral-wool-rolls/loft-insulation-rolls/earthwool-loft-roll-44 Accessed 16 March 2018. The density of glass wool is assumed to be 40 kg/m3 based on the specifications in ecoinvent dataset "glass wool mat production, CH 2000" accessed 22 Janaury 2018. In terms of outputs, assumed to have gone to waste glass.
  properties: wet mass 1 kg, dry mass 1 kg, carbon content, fossil 0.0107327
  note on carbon content, fossil: A share of 16 w-% for the binders is taken into account. The binder used in this study is a mixture of phenol, formaldehyde and urea resins (ecoinvent v2.2 report 16_part XIV), and the C content was calculated as a weigthed average of phenol, formaldehyde and urea C content.
- window frame, aluminium, U=1.6 W/m2K: 259331 m2; name window; = 121020,9184*(lifetime/35); lognormal variance with pedigree 0.2106, pedigree (5,5,5,5,5)
  Calculated value. The amount of exchange is calculated as: amount of input product * (lifetime of the hotel / lifetime of the product). Assumed service life of 35 years. Source: Asif et al. 2002. LIFE CYCLE OF WINDOW MATERIALS - A COMPARATIVE ASSESSMENT. Available from: http://ohp.parks.ca.gov/pages/1054/files/uk%20window%20frame%20lca.pdf Accessed 16 March 2018.
  property wet mass 50.7 kg; name window_WM
  properties: dry mass 50.7 kg, heating value, net 219.49 MJ, carbon content, fossil 0.142876
- waste concrete: -1.29265e9 kg; name waste_concrete; = ((concrete* concrete_WM))*-1; lognormal variance with pedigree 0.122825, pedigree (1,4,2,2,5)
  Calculated value. Amount of output material is set equal to the amount of respective input material, concrete, foundation. Conversion is made from m3 of concrete to kg of concrete based on the density reported in the properties section for the product "concrete, normal" (see wet mass property).
  production volume 1.03412e10 kg; = waste_concrete*RP_PV
    Calculated from production volume of reference product using the relative outputs.
  property price 0 EUR2005; name waste_concrete_price_EUR2005
  properties: dry mass 0.5 kg, water content 1, wet mass 1 kg
- window frame, wood-metal, U=1.6 W/m2K: 7524.36 m2; name window_metal; = 3511,367719*lifetime/35; lognormal variance with pedigree 0.123425, pedigree (2,4,2,2,5)
  Calculated value. The amount of exchange is calculated as: amount of input product * (lifetime of the hotel / lifetime of the product). Assumed service life of 35 years. Source: Asif et al. 2002. LIFE CYCLE OF WINDOW MATERIALS - A COMPARATIVE ASSESSMENT. Available from: http://ohp.parks.ca.gov/pages/1054/files/uk%20window%20frame%20lca.pdf Accessed 16 March 2018. In terms of outputs assumed to have gone to used window frame, wood-metal.
  properties: heating value, net 1429.1 MJ, water content 0.0526316, carbon content, non-fossil 0.546509, dry mass 79.23 kg, wet mass 83.4 kg, carbon content, fossil 0.0530468
- waste polyvinylchloride: -1.43526e6 kg; name waste_polyvin; = (PVC)*-1; lognormal variance with pedigree 0.123425, pedigree (2,4,2,2,5)
  Calculated value. Amount of output material is set equal to the amount of respective input material, PVC.
  production volume 1.1482e7 kg; = waste_polyvin*RP_PV/RP
    Calculated from production volume of reference product using the relative outputs.
  property price 0 EUR2005; name waste_polyvin_price_EUR2005
  properties: carbon content, fossil 0.440882, wet mass 1 kg, heating value, net 21.51 MJ, water content 0.00200401, dry mass 0.998 kg
- waste glass: -7.06229e6 kg; name waste_glass; = (glass+wool_mat)*-1; lognormal variance with pedigree 0.122825, pedigree (1,4,2,2,5)
  Calculated value. Amount of output material is set equal to the amount of respective input material, flat glass and glass wool mat.
  production volume 5.64983e7 kg; = waste_glass*RP_PV/RP
    Calculated from production volume of reference product using the relative outputs.
  property price 0 EUR2005; name waste_glass_price_EUR2005
  properties: dry mass 1 kg, wet mass 1 kg, heating value, net 0.05 MJ
  note on heating value, net: Value extracted from "treatment of waste glass, open dump, very wet infiltration class (1000mm)"
- gypsum plasterboard: 1.2367e7 kg; name gypsum; = ((675081,5867+317054,3378+553743,2481)*12.5)/1000*640; lognormal variance with pedigree 0.123425, pedigree (2,4,2,2,5)
  Calculated value. Combined of all instances of all across the building walls, ceiling and roof. Assumed thickness of roof plasterboard 12.5 mm. Source: Practical DYI 2018. Types of plasterboard. Available from: https://www.practicaldiy.com/general-building/plasterboard/plasterboard.php Accessed 23 March 2018. Assumed density of plasterboard 640 kg/m3. Source: British Gypsum 2018. What is the density of Gyproc plasterboards? Available from: http://www.british-gypsum.com/technical-advice/faqs/114-what-is-the-density-of-gyproc-plasterboards Accessed 23 March 2018. Assumed service life of 75 years with minor refurbishments throughout. In terms of outputs assumed to have gone to waste gypsum plasterboard.
  properties: dry mass 1 kg, wet mass 1 kg, carbon content, fossil 0.00113571, carbon content, non-fossil 0.0188747
- electricity, low voltage: 679324 kWh; name el; = 0.3* volume; lognormal variance with pedigree 0.422225, pedigree (1,4,2,2,5)
  Calculated value. Assuming that 0.30 kWh/m3 of electricity is necessary to construct a building. Source: Zabalza et al. 2013. Use of LCA as a Tool for Building Ecodesign. A Case Study of a Low Energy Building in Spain. Energies, 6 (8), 3901-3921.
- used window frame, wood-metal: -7524.36 m2; name used_window; = (window_metal)*-1; lognormal variance with pedigree 0.123425, pedigree (2,4,2,2,5)
  Calculated value. Amount of output material is set equal to the amount of respective input material, window frame, wood-metal.
  production volume 60194.9 m2; = used_window*RP_PV/RP
    Calculated from production volume of reference product using the relative outputs.
  property price 0 EUR2005; name used_window_price_EUR2005
  properties: carbon content, non-fossil 0.546509, water content 0.0526316, dry mass 79.23 kg, carbon content, fossil 0.0530468, wet mass 83.4 kg
- polyvinylchloride, bulk polymerised: 1.43526e6 kg; name PVC; = (332812,8345*2.3)*(lifetime/40); lognormal variance with pedigree 0.123425, pedigree (2,4,2,2,5)
  Calculated value. Represents here the floor material. The amount of exchange is calculated as: amount of input product * (lifetime of the hotel / lifetime of the product). No data on the type of flooring was provided by the case study hotel so PVC was used as proxy. This is because PVC flooring is most cost-effective for hotels. Source: Mikulski 2015. TOP HOSPITALITY FLOORING OPTIONS FOR HOTELS. Available from: http://www.businessflooring.net/blog/top-hospitality-flooring-options-for-hotels Accessed 16 March 2018. Combined of all instances of use across the building structure and walls.Assumed density of PVC 2.3 kg/m2. Source: The colour flooring company 2018. VINYL FLOORING TECHNICAL SPECIFICATIONS. Available from: https://www.colourflooring.co.uk/pages/vinyl-flooring-technical-specifications Accessed 16 March 2018. Assumed service life of PVC floors is 40 years. Source: Bowyer et al. 2009. LIFE CYCLE ASSESSMENT OF FLOORING MATERIALS A GUIDE TO INTELLIGENT SELECTION. Doviteil Partners. Available from: http://www.dovetailinc.org/report_pdfs/2009/dovetailfloors0809.pdf Accessed 16 March 2018. In terms of outputs, assumed to have gone to waste PVC.
  properties: carbon content, fossil 0.387097, wet mass 1 kg, heating value, net 21.5 MJ, dry mass 1 kg
  note on carbon content, fossil: Monomer is vynyl chloride, C2H3Cl (ecoinvent v2.2 report 11_II). MW=62 g/mol
- elevator, hydraulic: 86.25 unit; = 23*lifetime/20; lognormal variance with pedigree 0.422225, pedigree (1,4,2,2,5)
  Calculated value. The amount of exchange is calculated as: amount of input product * (lifetime of the hotel / lifetime of the product). Assumed service life of elevator unit is 20 years. Source: Miljögiraff 2015. LCA of elevator lifting service in property. Miljögiraff Report 56. Available from: https://www.researchgate.net/profile/Marcus_Wendin/publication/301295772_Elevators_towards_a_circular_economy/links/5717790f08ae2679a8c772db/Elevators-towards-a-circular-economy.pdf Accessed 23 March 2018.
  properties: carbon content, fossil 42.2962, wet mass 2490 kg, lifetime 80 year, dry mass 2490 kg
- iron scrap, unsorted: -19295 kg; lognormal variance with pedigree 0.123425, pedigree (2,4,2,2,5)
  (same comment as for iron scrap, unsorted)
  production volume 154360 kg
  properties: dry mass 1 kg, wet mass 1 kg
- aluminium scrap, post-consumer: -1.41345e7 kg; lognormal variance with pedigree 0.123425, pedigree (2,4,2,2,5)
  (same comment as for aluminium scrap, post-consumer)
  production volume 1.13076e8 kg
  properties: dry mass 1 kg, wet mass 1 kg

## Inputs from nature
- Transformation, from urban, green area [natural resource, land]: 58681.2 m2; = GFA; lognormal variance with pedigree 0.242225, pedigree (1,4,2,2,5)
  Calculated value. Based on survey data.
- Occupation, urban, continuously built [natural resource, land]: 4.40109e6 m2*year; = GFA* lifetime; lognormal variance with pedigree 0.162225, pedigree (1,4,2,2,5)
  Calculated value. Based on survey data, the gross floor area multiplied by the lifetime of the building.
- Transformation, to urban, continuously built [natural resource, land]: 58681.2 m2; = GFA; lognormal variance with pedigree 0.242225, pedigree (1,4,2,2,5)
  Calculated value. Based on survey data.

## Sampling procedure
Primary data from the hotel supplemented with literature-based calculations and estimates, where appropriate.

## Extrapolations
This dataset has been extrapolated from year 2018 to the year of the calculation (2021). The uncertainty has been adjusted accordingly.
