# base plaster production

Dataset: EcoSpold 2, unit process
Geography: CH
Time period: 1995-01-01 to 2021-12-31
Technology level: current
Classification: ISIC rev.4 ecoinvent: 2394:Manufacture of cement, lime and plaster
Classification: EcoSpold01Categories: mortar and plaster/production
Synonyms: Zementputz
Tags: ConvertedDataset
Scenario: Business-as-Usual
System model: Allocation, cut-off by classification
Generated by: Daniel Kellenberger (obsolete)
Published in: Kellenberger D. 2004
Database: ecoinvent
isCopyrightProtected: true
accessRestrictedTo: 1

## General comment
The raw materials are mixed in following ratio: sand: 0.772kg, cement: 0.205kg, lime hydrated: 0.023kg, additives: 0.0002kg. After mixing it is internally transported to the packing installation and packed. For the use 0.082 kg water has to be added (not included in this module). No direct process emissions are taken into account as they play a subordinate role compared to the emissions of the raw material production (e.g. drying of silica sand) and because no data are available. For inventoring the infrastructure, a yearly production amount of 150'000 tons is assumed. The lifespan of the machines is assumed to be 20 years.
[This dataset was already contained in the ecoinvent database version 2. It was not individually updated during the transfer to ecoinvent version 3. Life Cycle Impact Assessment results may still have changed, as they are affected by changes in the supply chain, i.e. in other datasets. This dataset was generated following the ecoinvent quality guidelines for version 2. It may have been subject to central changes described in the ecoinvent version 3 change report (http://www.ecoinvent.org/database/ecoinvent-version-3/reports-of-changes/), and the results of the central updates were reviewed extensively. The changes added e.g. consistent water flows and other information throughout the database. The documentation of this dataset can be found in the ecoinvent reports of version 2, which are still available via the ecoinvent website. The change report linked above covers all central changes that were made during the conversion process.]

## Included activities end
Includes the whole manufacturing process to produce base plaster (raw material provision, raw material mixing, packing, and storage), transports to plant, and infrastructure. No requirements for administration are included. No additional buildings and land-use have been taken into account as it is assumed that the mixing process takes place in an existing building of the sand/cement industry or on the construction site

## Geography
The amount of raw materials is based on estimations. The transportation distance is an estimation. For the infrastructure RER-, for the silica sand DE- and for the organic chemicals GLO-modules are used as proxy

## Technology
Assumed average current technology. The raw materials are mixed in a certain ratio, transported to the packing installation and packed.

## Reference product
- base plaster: 1 kg; By-product classification allocatable product; CPC 37410: Plasters
  production volume 0.0336675 kg
    This is a placeholder value that does not reflect real-world production volumes. This dataset does not currently require a real-world production volume to work in the database framework, and no actual data were collected yet. This has no negative effect on the results of the ecoinvent database. The placeholder value of this activity was scaled according to the nominal GDP of 2005 (source: United Nations, http://data.un.org/Glossary.aspx?q=GDP+%28current+US%24%29, accessed 20130726) to reflect an appropriate share of the global production volume, which is also a placeholder value.
  property price 1 EUR2005
    Calculated value based on data from United Nations Commodity Trade Statistics Database (comtrade.un.org). UN comtrade category: 680990 Articles of plater etc, other than plasterboard. Year 2005. Using exchange rate of 1EURO = 1.209 USD. Average of price of import into 5 main markets (EU, US, JP, IN and CN).
  property carbon content, non-fossil 0
    Raw materials are listed in Tab 5.2, ecoinvent v2.2 report 7, part XVII. C content is calculated after C content of raw materials
  property carbon content, fossil 0
    (same comment as for base plaster)
  property carbon content 0
    carbon content on a dry matter basis (reserved; not for manual entry)
  properties: wet mass 1 kg, dry mass 1 kg, water in wet mass 0 kg, water content 0, carbon allocation 0 kg

## Inputs from technosphere
All rows: lognormal variance with pedigree 0.69, pedigree (1,1,5,1,1)
- silica sand: 0.772 kg
  estimated
  properties: dry mass 0.99 kg, wet mass 1 kg, water content 0.010101
- conveyor belt: 3.33e-8 m
  estimated
- packing, cement: 1 kg
  estimated
  This exchange has an activity link directly to the producing activity because the product is primarily consumed in the same geographical area where it is produced.
- lime, hydrated, packed: 0.023 kg
  estimated
  properties: water content 0.00300903, dry mass 0.997 kg, wet mass 1 kg
- cement, Portland: 0.205 kg
  estimated
  properties: wet mass 1 kg, dry mass 1 kg
- electricity, medium voltage: 0.0278 kWh
  estimated
- chemical, organic: 0.0002 kg
  estimated
  properties: wet mass 1 kg, carbon content, fossil 0.628, dry mass 1 kg, heating value, net 19.03 MJ
  note on carbon content, fossil: This dataset is an unweighted average of 20 organic substances (listed in Tab 88.1, ecoinvent v2.2 report 8, part II), being part of the top100 chemicals included in this database. The C-content has also been calculated as an unweighted average of the C content of the substances composing this dataset.
- industrial machine, heavy, unspecified: 6.67e-6 kg
  estimated

## Sampling procedure
estimation

## Extrapolations
This dataset has been extrapolated from year 2001 to the year of the calculation (2021). The uncertainty has been adjusted accordingly.

## Review by Roberto Dones 2004-04-05
passed
