# treatment of used locomotive

Dataset: EcoSpold 2, unit process
Geography: RoW
Time period: 1993-01-01 to 2021-12-31
Technology level: current
Classification: ISIC rev.4 ecoinvent: 3830:Materials recovery
Classification: EcoSpold01Categories: transport systems/train
Tags: Treatment; ConvertedDataset
Scenario: Business-as-Usual
System model: Allocation, cut-off by classification
Generated by: Michael Spielmann (obsolete)
Published in: Spielmann M. 2007
Database: ecoinvent
isCopyrightProtected: true
accessRestrictedTo: 1

## General comment
The data is based on the bulk material composition of the RE 460, a locomotive which is currently used for goods transportation in Switzerland and also in Germany. The life span of the locomotive Re 460 is assumed to be 40 years resulting in a life time performance of 9.6 Mio. kilometres.
[This dataset was already contained in the ecoinvent database version 2. It was not individually updated during the transfer to ecoinvent version 3. Life Cycle Impact Assessment results may still have changed, as they are affected by changes in the supply chain, i.e. in other datasets. This dataset was generated following the ecoinvent quality guidelines for version 2. It may have been subject to central changes described in the ecoinvent version 3 change report (http://www.ecoinvent.org/database/ecoinvent-version-3/reports-of-changes/), and the results of the central updates were reviewed extensively. The changes added e.g. consistent water flows and other information throughout the database. The documentation of this dataset can be found in the ecoinvent reports of version 2, which are still available via the ecoinvent website. The change report linked above covers all central changes that were made during the conversion process.]

## Included activities end
The inventory includes waste treatment processes for non metal components of a locomotive. For the transport of disposed materials standard distances have been applied.

## Geography
Data represents Swiss and German conditions

## Technology
no technologies are specified

## Time period
Data represents a locomotive currently in operation

## Reference product
- used locomotive: -1 unit; By-product classification Waste; CPC 39990: Other wastes n.e.c.
  EcoSpold01Location=RER
  production volume 2.67763 unit
    This is a placeholder value that does not reflect real-world production volumes. This dataset does not currently require a real-world production volume to work in the database framework, and no actual data were collected yet. This has no negative effect on the results of the ecoinvent database.
  property price 0 EUR2005
    Waste products are assigned a price of zero as they are assumed to require further treatment.
  property carbon content, fossil 0.101404
    Calculated from C content in input materials in the infrastructure
  property carbon content, non-fossil 0.00220235
    Calculated from C content in input materials in the infrastructure
  property carbon content 0.103607
    carbon content on a dry matter basis (reserved; not for manual entry)
  properties: water content 0, wet mass 84000 kg, dry mass 84000 kg, water in wet mass 0 kg, carbon allocation 8702.96 kg

## Inputs from technosphere
- waste mineral oil: -3560 kg; lognormal variance with pedigree 0.054, pedigree (3,1,5,5,1)
  Oral communication
  EcoSpold01Location=CH
  Uncertainty: oral communication
  production volume 10680 kg
    Calculated from the production volume of used locomotive in proportion to the respective output amounts.
  properties: water content 0.111111, carbon content, fossil 0.864444, dry mass 0.9 kg, wet mass 1 kg, heating value, net 34.7 MJ
  note on carbon content, fossil: Tab A.6, ecoinvent v2.2 report 13_I. C content has been calculated after data in the tables, and then referred to 1 kg DM
  note on heating value, net: Value taken from the general comment of the treatment dataset.
- waste glass: 0 kg; pedigree (1,1,1,1,1)
  Material composition locomotive
  EcoSpold01Location=CH
  Uncertainty: material composition locomotive
  production volume 0 kg
    (same comment as for waste mineral oil)
  properties: dry mass 1 kg, wet mass 1 kg, heating value, net 0.05 MJ
  note on heating value, net: Value extracted from "treatment of waste glass, open dump, very wet infiltration class (1000mm)"
- waste emulsion paint: -385 kg; lognormal variance with pedigree 0.054, pedigree (3,1,5,5,1)
  EcoSpold01Location=CH
  Material composition locomotive
  Uncertainty: material composition locomotive
  production volume 1155 kg
    (same comment as for waste mineral oil)
  properties: carbon content, fossil 0.27, wet mass 1 kg, dry mass 1 kg, heating value, net 8.18 MJ
  note on carbon content, fossil: Tab A.4, ecoinvent v2.2 report 13_I. C content has been calculated after data in the tables, and then referred to 1 kg DM
- waste plastic, mixture: 0 kg; pedigree (1,1,1,1,1)
  (same comment as for waste emulsion paint)
  production volume 0 kg
    (same comment as for waste mineral oil)
  properties: water content 0.180638, wet mass 1 kg, carbon content, fossil 0.747344, dry mass 0.847 kg, heating value, net 30.79 MJ
  note on carbon content, fossil: C content in 1 kg DM was calculated using data in Tab A.2, ecoinvent v2.2 report 13_I
- waste polyvinylchloride: 0 kg; pedigree (1,1,1,1,1)
  (same comment as for waste glass)
  production volume 0 kg
    (same comment as for waste mineral oil)
  properties: water content 0.00200401, carbon content, fossil 0.440882, wet mass 1 kg, dry mass 0.998 kg, heating value, net 21.51 MJ
  note on carbon content, fossil: C content in 1 kg DM was calculated using data in Tab A.1, ecoinvent v2.2 report 13_I
- waste glass: -22.2148, -2.04749, -0.0464506, -0.191028, -0.290086, -0.854779, -209.355 kg (7 entries); lognormal variance with pedigree 0.054, pedigree (3,1,5,5,1)
  (same comment as for waste glass)
  production volume 705 kg
- waste plastic, mixture: -822.132, -54.9317, -4.1544, -22.6888, -9.166, -21.5451, -5755.38 kg (7 entries); lognormal variance with pedigree 0.054, pedigree (3,1,5,5,1)
  (same comment as for waste emulsion paint)
  production volume 20070 kg
- waste polyvinylchloride: -43.1343, -2.88207, -0.217966, -1.1904, -0.480907, -1.13039, -301.964 kg (7 entries); lognormal variance with pedigree 0.054, pedigree (3,1,5,5,1)
  (same comment as for waste glass)
  production volume 1053 kg

## Sampling procedure
Data based on expert estimate on the material consumption of a locomotive.

## Extrapolations
Data for Switzerland is used as an estimate for Europe This dataset has been copied from an original dataset covering the geography RER. The uncertainty has been adjusted accordingly.

## Review by Niels Jungbluth 2003-07-23
passed
