# bark chips production, softwood, at sawmill

Dataset: EcoSpold 2, unit process
Geography: RoW
Time period: 2011-01-01 to 2021-12-31
Technology level: current
Classification: ISIC rev.4 ecoinvent: 1610:Sawmilling and planing of wood
Scenario: Business-as-Usual
System model: Allocation, cut-off by classification
Generated by: Frank Werner
Database: ecoinvent
isCopyrightProtected: true
accessRestrictedTo: 1

## General comment
This dataset represents the service of the handling of bark from softwood at sawmill with an output of one kg of bark, measured in oven-dry mass of bark.
The process chain in a sawmill is a net of interlinked processes; the process structure depends on the individual design and technologies in place for each sawmill. The structuring of the sawmilling processes is based on the identification of the core processes in a sawmill that are attributable to several co-products (such as upstream processes like forestry and transport of logs to the sawmill) sorting, storing and the sawing of the (debarked) log. Other processes are attributable directly to one of the co-products such as the chipping of residual wood (either after sawing or as part of the profile chipping), the chipping of the bark (the "debarking") or the suction of saw dust as collection and internal transport.
The following figure illustrates the general structure of the sawmilling processes before eventual drying and planing:
The data was provided by and approved by the Swiss forest industry (Holzindustrie Schweiz HIS).

## Included activities start
Bark chips production starts with the bark taken off the stem as part of the over-all sawing process (see respective dataset) and includes all the handling of the bark in the sawmill.

## Included activities end
This activity ends with the bark chips stored in a silo at the saw mill. The dataset does not include dust emissions due to a high water content in the wood.

## Geography
Extrapolated from average Swiss conditions.

## Reference product
- bark: 0 kg; CPC 31230: Wood in chips or particles; By-product classification allocatable product
  the bark is produced in the over-all sawing process and treated in this DS as the handling of bark within the sawmill.
  production volume 0 kg; = p_barkchips
    see comment on the by-product
  property heating value, net 7.37 MJ
    LHV is calculated based on the Carbon content of the product. More details can be found on the respective documentation.
  property price 0.034 EUR2005
    Data on Import/Export (USD/kg) from UN data has been used. (http://data.un.org/Data.aspx?d=ComTrade&f=_l1Code%3a45, [accessed 10th June 2010]) Commodity: 'Sawdust, wood waste or scrap'. A density of 250 kg/m3 was used to convert from M3 to kg (data on density: http://wiki.answers.com/Q/What_is_the_density_of_sawdust, [Accessed 13 June 2010]).
  property carbon content 0.494
    carbon content on a dry matter basis (reserved; not for manual entry)
  properties: dry mass 1 kg, wet mass 2.4 kg, water in wet mass 1.4 kg, water content 1.4, carbon content, fossil 0, carbon content, non-fossil 0.494, carbon allocation 0.494 kg
- bark chips, wet, measured as dry mass: 1 kg; name barkchip_wet; CPC 31230: Wood in chips or particles; By-product classification allocatable product; pedigree (1,1,1,1,1)
  bark chips stored in the silo resulting from the treatment of the reference product
  production volume 1.68741e10 kg; name p_barkchips; = 1078320*1.64/(1-0.12)*0.12*380/1079420*296662059
  property price 0.034 EUR2005; name barkchip_wet_price_EUR2005
  properties: carbon content, non-fossil 0.494, dry mass 1 kg, water content 1.4, heating value, net 4.81 MJ, carbon content, fossil 0, wet mass 2.4 kg, water in wet mass 1.4 kg, carbon content 0.494, carbon allocation 0.494 kg

## By-products
- bark chips, wet, measured as dry mass: 0 kg; CPC 31230: Wood in chips or particles; By-product classification allocatable product; pedigree (1,1,1,1,1)
  bark chips stored in the silo resulting from the treatment of the reference product
  production volume 0 kg; name p_barkchips; = 1078320*1.64/(1-0.12)*0.12*380/1079420*296662059
    Calculated from production volume of sawnwood x conversion efficiency of sawmilling process (to estimate log input under bark), extrapolated to log over bark via (1-bark ratio) and estimation of bark via bark ratio (of log over bark, multiplied with average basic bark density for Swiss conditions; extrapolated to GLO values via the ratio of sawnwood (C) production according to FAOStat
  property heating value, net 4.81 MJ
    (same comment as for bark)
  property carbon content 0.494
    carbon content on a dry matter basis (reserved; not for manual entry)
  properties: carbon content, non-fossil 0.494, dry mass 1 kg, water content 1.4, carbon content, fossil 0, wet mass 2.4 kg, water in wet mass 1.4 kg, carbon allocation 0.494 kg

## Inputs from technosphere
- electricity, medium voltage: 0 kWh; name elec_midvol; pedigree (1,1,1,1,1)
  data from Swiss industry
- bark: 1 kg
  (same comment as for bark)
  production volume 1.68741e10 kg
  properties: dry mass 1 kg, wet mass 2.4 kg, water content 1.4, heating value, net 7.37 MJ, price 0.034 EUR2005, carbon content, non-fossil 0.494
- electricity, medium voltage: 0.000263841, 5.05933e-5, 0.000412423, 0.000849357, 0.0123531, 0.00174118, 0.00502946 kWh (7 entries); lognormal variance with pedigree 0.0112, pedigree (2,1,4,5,1)
  data from Swiss industry

## Sampling procedure
complementary literature and sampling from sawmills
