# natural gas, burned in gas turbine, for compressor station

Dataset: EcoSpold 2, unit process
Geography: NL
Time period: 1990-01-01 to 2021-12-31
Technology level: current
Classification: ISIC rev.4 ecoinvent: 3510:Electric power generation, transmission and distribution
Classification: EcoSpold01Categories: natural gas/power plants
Tags: ConvertedDataset
Scenario: Business-as-Usual
System model: Allocation, cut-off by classification
Generated by: Thomas Heck
Published in: Faist Emmenegger, M. 2007
Database: ecoinvent
isCopyrightProtected: true
accessRestrictedTo: 1

## General comment
[This dataset was already contained in the ecoinvent database version 2. It was not individually updated during the transfer to ecoinvent version 3. Life Cycle Impact Assessment results may still have changed, as they are affected by changes in the supply chain, i.e. in other datasets. This dataset was generated following the ecoinvent quality guidelines for version 2. It may have been subject to central changes described in the ecoinvent version 3 change report (http://www.ecoinvent.org/database/ecoinvent-version-3/reports-of-changes/), and the results of the central updates were reviewed extensively. The changes added e.g. consistent water flows and other information throughout the database. The documentation of this dataset can be found in the ecoinvent reports of version 2, which are still available via the ecoinvent website. The change report linked above covers all central changes that were made during the conversion process.]

## Included activities end
The module includes fuel input, infrastructure, and emissions to air.

## Geography
CO2 emissions derived from country-specific composition of gas.

## Technology
For infrastructure, a 10MWe gas turbine was assumed.

## Time period
Data of mid 1990s

## Reference product
- electricity, medium voltage: 1 kWh; CPC 17100: Electrical energy; By-product classification allocatable product
  EcoSpold01Location=NL
  production volume 0.092 kWh
    Dummy value to be replaced by measured, estimated or calculated value
  property price 0.1 EUR2005
    Calculated to be between the price of electricity, high voltage and electricity, low voltage.
  properties: Corresponding fuel use 1 MJ

## Inputs from technosphere
- gas turbine, 10MW electrical: 1.25e-9 unit; lognormal variance with pedigree 0.16, pedigree (1,1,5,1,1)
  EcoSpold01Location=RER
  uncertainty of lifetime
- natural gas, high pressure: 0.298913 m3
  EcoSpold01Location=NL
  properties: carbon content, fossil 0.602381, dry mass 0.84 kg, wet mass 0.84 kg, heating value, net 39 MJ
  note on carbon content, fossil: An average C content of 0.506 kg C/ m3 has been assumed (this average has been calculated using data in Tab 3.5, ecoinvent v2.2 report 6_V
  note on heating value, net: Literature value, Source: United Nations Statistics Division (2018) International Recommendations for Energy Statistics (IRES). Available at: http://unstats.un.org/unsd/statcom/doc11/BG-IRES.pdf.

## Emissions to nature
- Mercury [air, urban air close to ground]: 1.63043e-9 kg; lognormal variance with pedigree 0.69, pedigree (1,1,5,1,1)
  basic uncertainty for heavy metal; trace element in natural gas
- Dioxins, measured as 2,3,7,8-tetrachlorodibenzo-p-dioxin [air, urban air close to ground]: 0 kg; pedigree (1,1,1,1,1)
  rough estimate, high uncertainty
- Dinitrogen monoxide [air, urban air close to ground]: 1.08696e-5 kg; lognormal variance with pedigree 0.34, pedigree (1,1,5,1,1)
  rough estimate
- Carbon monoxide, fossil [air, urban air close to ground]: 0.000434783 kg; lognormal variance with pedigree 0.34, pedigree (1,1,5,1,1)
  rough estimate
- Methane, fossil [air, urban air close to ground]: 4.8913e-5 kg; lognormal variance with pedigree 0.69, pedigree (1,1,5,1,1)
  rough estimate
- NMVOC, non-methane volatile organic compounds, unspecified origin [air, urban air close to ground]: 1.08696e-5 kg; lognormal variance with pedigree 0.69, pedigree (1,1,5,1,1)
  rough estimate
- Sulfur dioxide [air, urban air close to ground]: 5.97826e-6 kg; lognormal variance with pedigree 0.04, pedigree (1,1,5,1,1)
  composition of natural gas
- Carbon dioxide, fossil [air, urban air close to ground]: 0.608696 kg; lognormal variance with pedigree 0.04, pedigree (1,1,5,1,1)
  composition of natural gas
- Nitrogen oxides [air, urban air close to ground]: 0.00211957 kg; lognormal variance with pedigree 0.34, pedigree (1,1,5,1,1)
  rough estimate

## Sampling procedure
Literature

## Extrapolations
This dataset has been extrapolated from year 2000 to the year of the calculation (2021). The uncertainty has been adjusted accordingly.

## Review by Michael Spielmann (obsolete) 2003-07-25
passed
