# sulfate pulp production, from eucalyptus, bleached

Dataset: EcoSpold 2, unit process
Geography: RLA
Time period: 2017-01-01 to 2021-12-31
Technology level: current
Classification: ISIC rev.4 ecoinvent: 1701:Manufacture of pulp, paper and paperboard
Classification: EcoSpold01Categories: paper & cardboard/pulps
Synonyms: Kraftzellstoff; kraft pulp
Scenario: Business-as-Usual
System model: Allocation, cut-off by classification
Share of production covered: 46 %
Generated by: AISBL
Database: ecoinvent
isCopyrightProtected: true
accessRestrictedTo: 1

## General comment
This dataset represents an aggregation of the production of Elemental Chlorine Free (ECF) and Totally Chlorine Free (TCF) kraft pulp, obtained from Latin Americal eucalyptus wood in 2017. Industry data was used which was provided by the European Pulp Industry Sector (EPIS).The used values are a weighted average of all corresponding pulp mills. The represented technology is considered state of the art for a Latin American average.
PULP is a clean, wood-based, renewable and biodegradable raw material to make different paper, board and other products. The pulp, or fibers from the wood are separated in a kraft cooking process in a so-called fiber line. In a recovery line, the chemicals used in the cooking process are recovered to be used again and energy is produced. The third process is effluent treatment where gaseous and liquid discharges to the environment are continuously minimized and monitored.
MAIN END USES FOR MARKET PULP
• Tissue (toilet paper)
• Graphic papers
• Specialty products
• Packaging
• Fluff pulp
• Viscose
• CMC etc.
MAIN END USES FOR MARKET PULP
• Tissue (toilet paper)
• Graphic papers
• Specialty products
• Packaging
• Fluff pulp
• Viscose
• CMC etc.
PRODUCTS GENERATED IN THE PULPING PROCESS include crude tall oil, turpentine, biogas from sludge, electricity, heat etc.
EXAMPLES OF NEW BIO-PRODUCTS FROM PULP MILLS - from pulp, lignin, bark and wood residues
• Bio-fuels
• Bio-chemicals
• Bio-composites
• Bio-plastics
• Bio-fibrils
• Bio-medical products
CAPACITIES
The world’s total market pulp capacity is ca 64 million tons. The Western European capacity for market pulp is ca. 13 million tons. The Latin American eucalyptus pulp capacity is ca. 22 million tons. (2018)
SPECIES
Softwood pulp is made from coniferous trees, most typically from different species of pine and spruce.
Hardwood pulp is made from non-coniferous trees, in Nordic countries primarily of birch. Eucalyptus hardwood pulp is made exclusively of eucalyptus species.
CHARACTERISTICS
Softwood fibers are long and slender and are used to give the paper and board products their strength properties.
Hardwood fibers are short and can be rounder and their number per gram of pulp is much larger; they give the end product its smoothness, softness and optical properties like opacity (that you cannot see through the paper).

## Included activities start
This acitivity starts with the transport of the wood to the pulp factory. (Pulpwood inputs have activity links to their supplying activities and are therefore not supplied via market datasets.)

## Included activities end
The process includes transports to the pulp mill, wood handling, chemical pulping and bleaching, drying process, energy production on-site, recovery cycles of chemicals and internal waste water treatment.
Only key emission factors were provided by the industry, the remaining emissions from on-site energy production from externally supplied fuels were calculated, using emission profiles from ecoinvent combustion processes. Moreover, the following "internal" biogenic fuels are represented by the calculated emissions but do not have the corresponding fuel input from technosphere, because they are supplied from within the system boundaries: Biogas: 0.00315991 m3, Bark/other woods or biomass: 1.36602214 MJ, methanol: 0.00340653 m3. The following biofuels are not included in the emission approximation due to a likely mismatch of the emission of a black liquor boiler and wood chips combustion and for the lack of an appropriate proxy: black liquor, tall oil pitch and sludge. The activity ends when the kraft pulp is ready to be sold.

## Geography
Representing Latin Americal, since data is coming from Brazil, Uruguay, Chile and Argentinia

## Technology
Average Latin America technology in 2017 of kraft pulp production of ECF and TCF pulp

## Time period
Data gathered in 2016 and represents data of 2015 values. Recent technology valid for the upcoming years.

## Reference product
- sulfate pulp, bleached: 0 kg; By-product classification allocatable product; CPC 32112: Chemical wood pulp, other than dissolving grades
  production volume 2e10 kg; name APV_RP
    The annual production volumes in 2017 for MARKET PULP is as follows: Bleached Eucalyptus kraft pulp in Latin America and South Africa: ca. 20 million tons (100% of LA). Source: EPIS Online
  property carbon content, non-fossil 0.494
    C content of dry mass of sulfate pulp is 0.494 kgC/kg dry wood (ecoinvent v2.2 report 6_IX & ecoinvent v2.2 report 9). No other C containing products in the formulation of the pulp.
  property carbon content 0.494
    carbon content on a dry matter basis (reserved; not for manual entry)
  property true value 0.355
    allocation property applied in "true value" allocation // value calculated from revenue
  properties: dry mass 0.9 kg, wet mass 1 kg, price 0.355 EUR2005, carbon content, fossil 0, water content 0.111111, water in wet mass 0.1 kg, heating value, net 13.23 MJ, carbon allocation 0.4446 kg
- electricity, high voltage: 1 kWh; name a_el; By-product classification allocatable product; CPC 17100: Electrical energy; pedigree (1,1,1,1,1)
  Data provided by industry (EPIS) 2017
  production volume 4.4824e9 kWh; = a_el*APV_RP
    Calculated from production volume of reference product using the relative outputs.
  property price 0.0977 EUR2005; name a_el_price_EUR2005
    Temporary price data. Calculated as 90% of purchasers price based on: 94% of the average price (to account for a 6% loss in transformation and transmission) for electricity for industrial consumersin 2005 (excluded taxes). From IEA.
  property true value relation 3.6; name a_el_true_value_relation
    property to calculate "true value" from
  property true value 0.0309358; name a_el_true_value
    allocation property applied in "true value" allocation // value calculated from true value relation

## By-products
- waste packaging paper: 0 kg; CPC 39240: Waste and scrap of paper or paperboard; By-product classification Recyclable; pedigree (1,1,1,1,1)
  Data provided by industry (EPIS) 2017. Represents waste packaging such as corrugated containers, cartonboard etc. Can be also plastic or anything that is recyclable is separated and recycled, glass, metal, paper. Is produced in small side tasks of the overall pulp process in order to "keep the pulp site funktioning".
  production volume 0 kg; = a_wpp*APV_RP
    Calculated from production volume of reference product using the relative outputs.
  property price 0.1 EUR2005; name a_wpp_price_EUR2005
    For paper and board waste the price, in 2005, according to [http://ec.europa.eu/eurostat] is about 1 EUR/kg corresponding to a purchase price of 0.099 similar to the price of UN comodittie: Waste, scrap of paper, board, nes (including unsorted).
  properties: heating value, net 14.11 MJ
- digester sludge: 0 kg; CPC 39920: Sewage sludge; By-product classification Recyclable; pedigree (1,1,1,1,1)
  Data provided by industry (EPIS) 2017
  production volume 0 kg; = a_ds*APV_RP
    Calculated from production volume of reference product using the relative outputs.
  property heating value, net 2.42 MJ
    Value taken from the general comment of the treatment dataset.
  property price 0 EUR2005; name a_ds_price_EUR2005
    Assumed without economic value
  property carbon content 0.3444
    carbon content on a dry matter basis (reserved; not for manual entry)
  properties: water in wet mass 0.95 kg, wet mass 1 kg, dry mass 0.05 kg, water content 19, carbon content, non-fossil 0.3444, carbon content, fossil 0, carbon allocation 0.01722 kg
- heat, district or industrial, other than natural gas: 0 MJ; name a_heat; By-product classification allocatable product; CPC 17300: Steam and hot water; pedigree (1,1,1,1,1)
  Data provided by industry (EPIS) 2017. Represents steam and warm water output sold externally
  production volume 5.11081e10 MJ; = a_heat*APV_RP
    Calculated from production volume of reference product using the relative outputs.
  property price 0.0106 EUR2005; name a_heat_price_EUR2005
    Average European district heat price from Ecoheatcool and Euroheat 2005-2006, Ecoheat Work package 1: The European heat market. Final report. 10.6 EUR/GJ i s the price of district heat. http://www.solarthermalworld.org/files/Ecoheatcool%20WP1%20Web.pdf?download
  property true value relation 0.1842; name a_heat_true_value_relation
    property to calculate "true value" from
  property corresponding fuel use, propane, furnace >100kW 1.05263 MJ; = 1/0.95
    Lower heating value of the fuel input related to the heat/electricity output, taken directly from ecoinvent v3.0 dataset "heat production, natural gas, at industrial furnace >100kW, GLO 2000".
  property true value 0.018048; name a_heat_true_value
    (same comment as for electricity, high voltage)
  properties: heating value, net 1 MJ

## Inputs from technosphere
- hydrogen peroxide, without water, in 50% solution state: 0.00205588 kg; lognormal variance with pedigree 0.0009, pedigree (1,2,2,1,1)
  Data provided by industry (EPIS) 2017
  properties: dry mass 1 kg, wet mass 1 kg, heating value, net 7.13 MJ
- chemical, inorganic: 8.02944e-5 kg; lognormal variance with pedigree 0.0009, pedigree (1,2,2,1,1)
  Data provided by industry (EPIS) 2017. Representing Sodium Bisulfite (NaHSO3) and Biocide
  properties: carbon content, fossil 0.003, wet mass 1 kg, dry mass 1 kg
  note on carbon content, fossil: This dataset is an unweighted average of 20 inorganic substances (listed in Tab 88.1, ecoinvent v2.2 report 8, part II), being part of the top100 chemicals included in this database. The C-content has also been calculated as an unweighted average of the C content of the substances composing this dataset.
- sodium chlorate, powder: 0.00126216 kg; lognormal variance with pedigree 0.0009, pedigree (1,2,2,1,1)
  Data provided by industry (EPIS) 2017
  properties: wet mass 1 kg, dry mass 1 kg
- natural gas, high pressure: 0.0098376 m3; lognormal variance with pedigree 0.0009, pedigree (1,2,2,1,1)
  Data provided by industry (EPIS) 2017, indicated in energy content. Calculation into mass/volume was done by using the following conversion factor: Natural gas: MJ/m3 39. Source: Ecoinvent, during technical review.
  properties: dry mass 0.84 kg, heating value, gross 39 MJ, heating value, net 39 MJ, wet mass 0.84 kg, carbon content, fossil 0.602381
  note on heating value, net: Literature value, Source: United Nations Statistics Division (2018) International Recommendations for Energy Statistics (IRES). Available at: http://unstats.un.org/unsd/statcom/doc11/BG-IRES.pdf.
  note on carbon content, fossil: An average C content of 0.506 kg C/ m3 has been assumed (this average has been calculated using data in Tab 3.5, ecoinvent v2.2 report 6_V
- green liquor dregs: -0.00384286 kg; name a_gld; lognormal variance with pedigree 0.0009, pedigree (1,2,2,1,1)
  Data provided by industry (EPIS) 2017
  production volume 2.2494e8 kg; = a_gld*APV_RP
    Calculated from the production volume of sulfate pulp in proportion to the respective output amounts.
  property price 0 EUR2005; name a_gld_price_EUR2005
  properties: wet mass 1 kg, carbon content, non-fossil 0.390667, dry mass 0.75 kg, water content 0.333333
  note on carbon content, non-fossil: Tab 6.25, ecoinvent v2.2 report 11_III & Tab A.9, ecoinvent v2.2 report 13_I
- diesel: 0 kg; pedigree (1,1,1,1,1)
  Data provided by industry (EPIS) 2017, indicated in energy content. Calculation into mass/volume was done by using the following conversion factor: Diesel oil: MJ/kg 45.6. Source: http://www.fao.org/docrep/T0269e/t0269e0c.htm
  properties: carbon content, fossil 0.865, wet mass 1 kg, heating value, net 42.8 MJ, dry mass 1 kg
  note on carbon content, fossil: C-content of diesel is 86.5% (ecoinvent v2.2 report 6_IV, Tab 3.14)
- transport, freight, lorry >32 metric ton, EURO5: 0.0913289 metric ton*km; lognormal variance with pedigree 0.0063, pedigree (1,2,2,1,1)
  Data provided by industry (EPIS) 2017
- chlorine dioxide: 0.00365186 kg; lognormal variance with pedigree 0.0009, pedigree (1,2,2,1,1)
  Data provided by industry (EPIS) 2017
  properties: dry mass 1 kg, wet mass 1 kg
- sulfuric acid: 0.00458806 kg; lognormal variance with pedigree 0.0009, pedigree (1,2,2,1,1)
  Data provided by industry (EPIS) 2017
  properties: wet mass 1 kg, dry mass 1 kg
- pulp factory: 1.63664e-11 unit; lognormal variance with pedigree 0.3023, pedigree (3,2,2,1,1)
  Own estimation with yearly production volume and a lifetime of a factory of 50 years
- sodium hydroxide, without water, in 50% solution state: 0.00634087 kg; lognormal variance with pedigree 0.0009, pedigree (1,2,2,1,1)
  Data provided by industry (EPIS) 2017
  properties: dry mass 1 kg, heating value, net 3.03 MJ, wet mass 1 kg
- quicklime, milled, loose: 0.000632447 kg; lognormal variance with pedigree 0.0009, pedigree (1,2,2,1,1)
  Data provided by industry (EPIS) 2017. Calcium oxide (CaO)
  properties: dry mass 0.99 kg, water content 0.010101, wet mass 1 kg
- transport, freight train: 0.00092014 metric ton*km; lognormal variance with pedigree 0.0063, pedigree (1,2,2,1,1)
  Data provided by industry (EPIS) 2017
- waste wood, untreated: 0 kg; name a_ww; pedigree (1,1,1,1,1)
  Data provided by industry (EPIS) 2017. Represents bark and wood wastes
  production volume 0 kg
    Calculated from production volume of reference product using the relative outputs.
  property price 0 EUR2005; name a_ww_price_EUR2005
  properties: water content 0.25, wet mass 1 kg, carbon content, non-fossil 0.48632, heating value, net 13.99 MJ, dry mass 0.8 kg
  note on heating value, net: Value taken from the general comment of the treatment dataset.
- sodium sulfate, anhydrite: 5.9452e-5 kg; lognormal variance with pedigree 0.0009, pedigree (1,2,2,1,1)
  Data provided by industry (EPIS) 2017
  properties: dry mass 1 kg, wet mass 1 kg
- malusil: 0.000540193 kg; lognormal variance with pedigree 0.0063, pedigree (1,2,2,1,1)
  Data provided by industry (EPIS) 2017. Represents Talc or talcum (H2Mg3(SiO3)4 or Mg3Si4O10(OH)2)
  properties: dry mass 1 kg, wet mass 1 kg
- transport, freight, inland waterways, barge: 0.00968111 metric ton*km; lognormal variance with pedigree 0.0009, pedigree (1,2,2,1,1)
  Data provided by industry (EPIS) 2017
- magnesium oxide: 0.000769801 kg; lognormal variance with pedigree 0.0009, pedigree (1,2,2,1,1)
  Data provided by industry (EPIS) 2017
  properties: dry mass 1 kg, wet mass 1 kg
- sawlog and veneer log, eucalyptus ssp., measured as solid wood under bark: 0.00120442 m3; lognormal variance with pedigree 0.0009, pedigree (1,2,2,1,1)
  Data provided by industry (EPIS) 2017. Approximates her eucalyptus from Latin America. The following information are important to justify this decision: The age at which eucalyptus is harvested is some 6-7 years while mixed hardwood is 40-70 years. Therefore Latin America hardwood is not a good proxy. The growing practices are similar in South Asia and Latin America.
  properties: water content 0.5, heating value, net 11336.5 MJ, dry mass 650 kg, wet mass 975 kg, carbon content, non-fossil 0.494
- magnesium sulfate: 6.76523e-5 kg; lognormal variance with pedigree 0.0009, pedigree (1,2,2,1,1)
  Data provided by industry (EPIS) 2017
  properties: dry mass 1 kg, wet mass 1 kg
- hazardous waste, for incineration: -3.75846e-6 kg; name a_hw; lognormal variance with pedigree 0.0009, pedigree (1,2,2,1,1)
  Data provided by industry (EPIS) 2017
  production volume 220000 kg; = a_hw*APV_RP
    Calculated from production volume of reference product using the relative outputs.
  property price 0 EUR2005; name a_hw_price_EUR2005
  properties: carbon content, fossil 0.554667, wet mass 1 kg, dry mass 0.75 kg, water content 0.333333, heating value, net 17 MJ
  note on carbon content, fossil: Tab A.6, ecoinvent v2.2 report 13_I. C content has been calculated after data in the tables, and then referred to 1 kg DM
- sodium hypochlorite, without water, in 15% solution state: 6.38938e-5 kg; lognormal variance with pedigree 0.0009, pedigree (1,2,2,1,1)
  Data provided by industry (EPIS) 2017
  properties: wet mass 1 kg, dry mass 1 kg
- limestone residue: -0.00673175 kg; name a_lsr; lognormal variance with pedigree 0.0009, pedigree (1,2,2,1,1)
  Data provided by industry (EPIS) 2017; including lime kiln ash, lime mud and lime sludge
  production volume 3.9404e8 kg; = a_lsr*APV_RP
    (same comment as for green liquor dregs)
  property price 0 EUR2005; name a_lsr_price_EUR2005
  properties: wet mass 1 kg, water content 0.00502513, carbon content, fossil 0.120005, dry mass 0.995 kg
  note on carbon content, fossil: The waste is characterised as "calcium carbonate waste" (CaCO3)
- oxygen, liquid: 0.00588712 kg; lognormal variance with pedigree 0.0009, pedigree (1,2,2,1,1)
  Data provided by industry (EPIS) 2017
  properties: wet mass 1 kg, dry mass 1 kg
- sludge from pulp and paper production: -0.00157685 kg; name a_sd; lognormal variance with pedigree 0.0009, pedigree (1,2,2,1,1)
  Data provided by industry (EPIS) 2017
  production volume 9.23e7 kg; = a_sd*APV_RP
    Calculated from production volume of reference product using the relative outputs.
  property price 0 EUR2005; name a_sd_price_EUR2005
  properties: water content 0.333333, dry mass 0.75 kg, carbon content, non-fossil 0.21, heating value, net 2.65 MJ, wet mass 1 kg
- heavy fuel oil: 0 kg; pedigree (1,1,1,1,1)
  Data provided by industry (EPIS) 2017, indicated in energy content. Calculation into mass/volume was done by using the following conversion factor: Heavy fuel oil: MJ/kg 42.6. Source: http://www.fao.org/docrep/T0269e/t0269e0c.htm
  properties: wet mass 1 kg, heating value, net 41.2 MJ, dry mass 1 kg, carbon content, fossil 0.849
- municipal solid waste: -3.69013e-5 kg; name a_msw; lognormal variance with pedigree 0.0009, pedigree (1,2,2,1,1)
  Data provided by industry (EPIS) 2017. Represents genaral trash and domestic waste
  production volume 2.16e6 kg; = a_msw*APV_RP
    (same comment as for green liquor dregs)
  properties: water content 0.297017, carbon content, fossil 0.171549, wet mass 1 kg, dry mass 0.771 kg, carbon content, non-fossil 0.261655, heating value, net 11.74 MJ
  note on carbon content, fossil: MSW composition in tab 4.1, ecoinvent v2.2 report 13_I. C content referred to 1 kg DM
- aluminium sulfate, powder: 0.000158197 kg; lognormal variance with pedigree 0.0009, pedigree (1,2,2,1,1)
  Data provided by industry (EPIS) 2017
  properties: wet mass 1 kg, dry mass 1 kg
- residue from cooling tower: -3.07511e-6 kg; name a_ethylgl; lognormal variance with pedigree 0.0009, pedigree (1,2,2,1,1)
  Data provided by industry (EPIS) 2017. Representing waste water cooling towers filling.
  production volume 180000 kg; = a_ethylgl*APV_RP
    Calculated from production volume of reference product using the relative outputs.
  property price 0 EUR2005; name a_ethylgl_price_EUR2005
  properties: dry mass 0.7 kg, water content 0.428571, carbon content, fossil 0.0544233, wet mass 1 kg
- calcium carbonate, precipitated: 0.00110157 kg; lognormal variance with pedigree 0.0009, pedigree (1,2,2,1,1)
  Data provided by industry (EPIS) 2017
- chemical, organic: 0.000233025 kg; lognormal variance with pedigree 0.0063, pedigree (1,2,2,1,1)
  Data provided by industry (EPIS) 2017. Represents Peracetic acid (C2H4O3), Defoamer, Antifoam, Polymer and Sodium metabisulphite (Na2S2O5)
  properties: dry mass 1 kg, carbon content, fossil 0.628, heating value, net 19.03 MJ, wet mass 1 kg
  note on carbon content, fossil: This dataset is an unweighted average of 20 organic substances (listed in Tab 88.1, ecoinvent v2.2 report 8, part II), being part of the top100 chemicals included in this database. The C-content has also been calculated as an unweighted average of the C content of the substances composing this dataset.
- hydrochloric acid, without water, in 30% solution state: 0.000396347 kg; lognormal variance with pedigree 0.0009, pedigree (1,2,2,1,1)
  Data provided by industry (EPIS) 2017
  properties: heating value, net 3.32 MJ, wet mass 1 kg, dry mass 1 kg
- electricity, high voltage: 0.00398192 kWh; lognormal variance with pedigree 0.0009, pedigree (1,2,2,1,1)
  Data provided by industry (EPIS) 2017
- ozone, liquid: 9.43032e-5 kg; lognormal variance with pedigree 0.0009, pedigree (1,2,2,1,1)
  Data provided by industry (EPIS) 2017
  properties: wet mass 1 kg, dry mass 1 kg
- transport, freight, sea, bulk carrier for dry goods: 0.00900562 metric ton*km; lognormal variance with pedigree 0.0063, pedigree (1,2,2,1,1)
  Data provided by industry (EPIS) 2017
- waste mineral oil: -0.00119792 kg; name a_wmo; lognormal variance with pedigree 0.0009, pedigree (1,2,2,1,1)
  Data provided by industry (EPIS) 2017. Represents lubricants residues, oil, fats and lubricants wastes: The running of the equipment and conveyors and their maintenance require lubrication. lubricants are oils and greases
  production volume 7.012e7 kg; = a_wmo*APV_RP
    Calculated from production volume of reference product using the relative outputs.
  property price 0 EUR2005; name a_wmo_price_EUR2005
  properties: carbon content, fossil 0.864444, heating value, net 34.7 MJ, dry mass 0.9 kg, wet mass 1 kg, water content 0.111111
- sulfur: 3.41678e-7 kg; lognormal variance with pedigree 0.0009, pedigree (1,2,2,1,1)
  Data provided by industry (EPIS) 2017
  properties: wet mass 1 kg, dry mass 1 kg
- light fuel oil: 0 kg; pedigree (1,1,1,1,1)
  Data provided by industry (EPIS) 2017, indicated in energy content. Calculation into mass/volume was done by using the following conversion factor: Light fuel oil: MJ/kg 43.5. Source: http://www.fao.org/docrep/T0269e/t0269e0c.htm
  properties: dry mass 1 kg, carbon content, fossil 0.862, wet mass 1 kg, heating value, net 42.6 MJ
- waste packaging paper: -5.63769e-5 kg; lognormal variance with pedigree 0.0009, pedigree (1,2,2,1,1)
  (same comment as for waste packaging paper)
  production volume 3.3e6 kg
- digester sludge: -0.00128676 kg; lognormal variance with pedigree 0.0009, pedigree (1,2,2,1,1)
  Data provided by industry (EPIS) 2017
  production volume 7.532e7 kg
  properties: heating value, net 2.42 MJ, wet mass 1 kg, dry mass 0.05 kg, water content 19, carbon content, non-fossil 0.3444
- diesel: 3.39719e-6, 7.06658e-5, 9.98992e-6 kg (3 entries); lognormal variance with pedigree 0.0009, pedigree (1,2,2,1,1)
  (same comment as for diesel)
- waste wood, untreated: -0.000412547, -0.00332257, -0.000175055 kg (3 entries); lognormal variance with pedigree 0.0009, pedigree (1,2,2,1,1)
  Data provided by industry (EPIS) 2017. Represents bark and wood wastes
  production volume 2.2888e8 kg
- heavy fuel oil: 0.00097438, 0.00374023, 0.000567394 kg (3 entries); lognormal variance with pedigree 0.0009, pedigree (1,2,2,1,1)
  (same comment as for heavy fuel oil)
- light fuel oil: 8.56249e-5, 0.000593726, 7.95165e-5 kg (3 entries); lognormal variance with pedigree 0.0009, pedigree (1,2,2,1,1)
  (same comment as for light fuel oil)

## Inputs from nature
- Carbon dioxide, non-fossil, resource correction [natural resource, in air]: -0.617213 kg; pedigree (1,1,1,1,1)
  This exchange has been added after economic allocation in order to re-balance the non-fossil carbon dioxide resource extraction.
- Water, unspecified natural origin [natural resource, in water]: 0.0100457 m3; lognormal variance with pedigree 0.0009, pedigree (1,2,2,1,1)
  Key emission provided by industry (EPIS) 2017

## Emissions to nature
- Nitrogen [water, surface water]: 4.06597e-5 kg; lognormal variance with pedigree 0.0403, pedigree (1,2,2,1,1)
  Data provided by industry (EPIS) 2017
- Sulfur dioxide [air, urban air close to ground]: 4.47599e-5 kg; lognormal variance with pedigree 0.0009, pedigree (1,2,2,1,1)
  Key emission provided by industry (EPIS) 2017
- Phosphorus [water, surface water]: 1.64006e-5 kg; lognormal variance with pedigree 0.0403, pedigree (1,2,2,1,1)
  Data provided by industry (EPIS) 2017
- Hydrocarbons, aliphatic, unsaturated [air, urban air close to ground]: 1.93562e-6 kg; lognormal variance with pedigree 0.1406, pedigree (2,5,3,1,4)
  Estimation based on fuel input data and emission factors from corresponding ecoinvent fuel combustion datasets (see "Extrapolations" comment). Apart from external fuel inputs, internal fuels such as bark, black liquor, sludge, tall oil pitch, wood pellets are generated during the process and supply considerable amounts of process energy. Emissions from some internal biofuels (bark, wood pellets) are approximated with the combustion of wood chips. black liquor, sludge and tall oil pitch were not included in the emissions calculations because no specific emission profiles, e.g. for the black liquor recovery process, were available. Emissions from these internal energy generation processes are therefore only reflected in the key emission factors provided by the industry, other emissions constitute a data gap. Biogas and methanol are approximated with the combustion of natural gas, whereby CO2, CO and CH4 emissions stemming from biogas were modeled as non-fossil.
  Uncertainty: e
- Copper [air, urban air close to ground]: 4.23145e-8 kg; lognormal variance with pedigree 0.7406, pedigree (2,5,3,1,4)
  (same comment as for Hydrocarbons, aliphatic, unsaturated)
- Nickel [air, urban air close to ground]: 1.08819e-7 kg; lognormal variance with pedigree 0.7406, pedigree (2,5,3,1,4)
  (same comment as for Hydrocarbons, aliphatic, unsaturated)
- Zinc [air, urban air close to ground]: 2.23683e-7 kg; lognormal variance with pedigree 0.7406, pedigree (2,5,3,1,4)
  (same comment as for Hydrocarbons, aliphatic, unsaturated)
- Benzene, ethyl- [air, urban air close to ground]: 1.86696e-8 kg; lognormal variance with pedigree 0.1406, pedigree (2,5,3,1,4)
  (same comment as for Hydrocarbons, aliphatic, unsaturated)
- Dinitrogen monoxide [air, urban air close to ground]: 1.79608e-6 kg; lognormal variance with pedigree 0.1406, pedigree (2,5,3,1,4)
  (same comment as for Hydrocarbons, aliphatic, unsaturated)
- Cobalt [air, urban air close to ground]: 7.07715e-9 kg; lognormal variance with pedigree 0.7406, pedigree (2,5,3,1,4)
  (same comment as for Hydrocarbons, aliphatic, unsaturated)
- Carbon dioxide, non-fossil [air, urban air close to ground]: 0.710691 kg; lognormal variance with pedigree 0.0009, pedigree (1,2,2,1,1)
  Key emission provided by industry (EPIS) 2017
- Benzene, hexachloro- [air, urban air close to ground]: 4.4807e-15 kg; lognormal variance with pedigree 0.1406, pedigree (2,5,3,1,4)
  (same comment as for Hydrocarbons, aliphatic, unsaturated)
- Nitrogen oxides [air, urban air close to ground]: 0.00042949 kg; lognormal variance with pedigree 0.0403, pedigree (1,2,2,1,1)
  Key emission provided by industry (EPIS) 2017
- Acetaldehyde [air, urban air close to ground]: 7.06017e-8 kg; lognormal variance with pedigree 0.1406, pedigree (2,5,3,1,4)
  (same comment as for Hydrocarbons, aliphatic, unsaturated)
- Methanol [air, urban air close to ground]: 1.09374e-7 kg; lognormal variance with pedigree 0.1406, pedigree (2,5,3,1,4)
  (same comment as for Hydrocarbons, aliphatic, unsaturated)
- Hydrogen fluoride [air, urban air close to ground]: 1.06179e-8 kg; lognormal variance with pedigree 0.1406, pedigree (2,5,3,1,4)
  (same comment as for Hydrocarbons, aliphatic, unsaturated)
- TOC, Total Organic Carbon [water, surface water]: 0.00112378 kg; lognormal variance with pedigree 0.0403, pedigree (1,2,2,1,1)
  Data provided by industry (EPIS) 2017
- Hydrogen chloride [air, urban air close to ground]: 3.12204e-7 kg; lognormal variance with pedigree 0.1406, pedigree (2,5,3,1,4)
  (same comment as for Hydrocarbons, aliphatic, unsaturated)
- Propionic acid [air, urban air close to ground]: 9.42332e-9 kg; lognormal variance with pedigree 0.1406, pedigree (2,5,3,1,4)
  (same comment as for Hydrocarbons, aliphatic, unsaturated)
- Carbon dioxide, fossil [air, urban air close to ground]: 0.0505684 kg; lognormal variance with pedigree 0.0009, pedigree (1,2,2,1,1)
  Key emission provided by industry (EPIS) 2017
- Benzo(a)pyrene [air, urban air close to ground]: 3.22884e-10 kg; lognormal variance with pedigree 0.1406, pedigree (2,5,3,1,4)
  (same comment as for Hydrocarbons, aliphatic, unsaturated)
- BOD5, Biological Oxygen Demand [water, surface water]: 0.000302727 kg; lognormal variance with pedigree 0.0403, pedigree (1,2,2,1,1)
  Data provided by industry (EPIS) 2017
- Formaldehyde [air, urban air close to ground]: 2.56914e-7 kg; lognormal variance with pedigree 0.1406, pedigree (2,5,3,1,4)
  (same comment as for Hydrocarbons, aliphatic, unsaturated)
- Sodium [air, urban air close to ground]: 9.69861e-7 kg; lognormal variance with pedigree 0.7406, pedigree (2,5,3,1,4)
  (same comment as for Hydrocarbons, aliphatic, unsaturated)
- Vanadium [air, urban air close to ground]: 2.14459e-7 kg; lognormal variance with pedigree 0.7406, pedigree (2,5,3,1,4)
  (same comment as for Hydrocarbons, aliphatic, unsaturated)
- Iron [air, urban air close to ground]: 1.75856e-7 kg; lognormal variance with pedigree 0.7406, pedigree (2,5,3,1,4)
  (same comment as for Hydrocarbons, aliphatic, unsaturated)
- Ammonia [air, urban air close to ground]: 1.08416e-6 kg; lognormal variance with pedigree 0.1406, pedigree (2,5,3,1,4)
  (same comment as for Hydrocarbons, aliphatic, unsaturated)
- Water [water, unspecified]: 0.00317112 m3; lognormal variance with pedigree 0.0403, pedigree (1,2,2,1,1)
  Data provided by industry (EPIS) 2017
  property dry mass 0 kg; name DM
  property carbon content, non-fossil 0; name C_content_non_fossil
  property carbon content, fossil 0; name C_content_fossil
  property wet mass 1000 kg; name WM
  property water in wet mass 1000 kg; name WWM
  property fraction, origin: unspecified 1; name fraction_origin_unspecified_Ww
  property fraction, origin: salt water 0; name fraction_origin_salt_water_Ww
  property fraction, origin: fresh water 0; name fraction_origin_fresh_water_Ww
- Selenium [air, urban air close to ground]: 2.57351e-9 kg; lognormal variance with pedigree 0.7406, pedigree (2,5,3,1,4)
  (same comment as for Hydrocarbons, aliphatic, unsaturated)
- Lead [air, urban air close to ground]: 4.66545e-8 kg; lognormal variance with pedigree 0.7406, pedigree (2,5,3,1,4)
  (same comment as for Hydrocarbons, aliphatic, unsaturated)
- Phosphorus [air, urban air close to ground]: 1.86696e-7 kg; lognormal variance with pedigree 0.1406, pedigree (2,5,3,1,4)
  (same comment as for Hydrocarbons, aliphatic, unsaturated)
- Potassium [air, urban air close to ground]: 1.45623e-5 kg; lognormal variance with pedigree 0.7406, pedigree (2,5,3,1,4)
  (same comment as for Hydrocarbons, aliphatic, unsaturated)
- NMVOC, non-methane volatile organic compounds, unspecified origin [air, urban air close to ground]: 6.53436e-6 kg; lognormal variance with pedigree 0.1406, pedigree (2,5,3,1,4)
  (same comment as for Hydrocarbons, aliphatic, unsaturated)
- Suspended solids, unspecified [water, surface water]: 0.000455457 kg; lognormal variance with pedigree 0.0403, pedigree (1,2,2,1,1)
  Data provided by industry (EPIS) 2017
- Calcium [air, urban air close to ground]: 3.66416e-6 kg; lognormal variance with pedigree 0.4006, pedigree (2,5,3,1,4)
  (same comment as for Hydrocarbons, aliphatic, unsaturated)
- Benzene [air, urban air close to ground]: 7.55318e-7 kg; lognormal variance with pedigree 0.1406, pedigree (2,5,3,1,4)
  (same comment as for Hydrocarbons, aliphatic, unsaturated)
- Cadmium [air, urban air close to ground]: 4.35623e-10 kg; lognormal variance with pedigree 0.7406, pedigree (2,5,3,1,4)
  (same comment as for Hydrocarbons, aliphatic, unsaturated)
- Sulfur oxides [air, unspecified]: 3.41678e-7 kg; lognormal variance with pedigree 0.0009, pedigree (1,2,2,1,1)
  Data provided by industry (EPIS) 2017
- Chromium VI [air, urban air close to ground]: 3.56159e-11 kg; lognormal variance with pedigree 0.7406, pedigree (2,5,3,1,4)
  (same comment as for Hydrocarbons, aliphatic, unsaturated)
- Water [air, unspecified]: 0.00687457 m3; lognormal variance with pedigree 0.0403, pedigree (1,2,2,1,1)
  Data provided by industry (EPIS) 2017. Mainly cooling water and assumed to evaporate
  property fraction, origin: unspecified 1; name fraction_origin_unspecified
  property fraction, origin: fresh water 0; name fraction_origin_fresh_water
  property fraction, origin: salt water 0; name fraction_origin_salt_water
- Carbon monoxide, fossil [air, urban air close to ground]: 2.54619e-6 kg; lognormal variance with pedigree 0.7406, pedigree (2,5,3,1,4)
  (same comment as for Hydrocarbons, aliphatic, unsaturated)
- Carbon monoxide, non-fossil [air, urban air close to ground]: 0.000217649 kg; lognormal variance with pedigree 0.6503, pedigree (1,2,2,1,1)
  Key emission provided by industry (EPIS) 2017
- Bromine [air, urban air close to ground]: 3.73393e-8 kg; lognormal variance with pedigree 0.1406, pedigree (2,5,3,1,4)
  (same comment as for Hydrocarbons, aliphatic, unsaturated)
- Acetic acid [air, urban air close to ground]: 1.9935e-7 kg; lognormal variance with pedigree 0.1406, pedigree (2,5,3,1,4)
  (same comment as for Hydrocarbons, aliphatic, unsaturated)
- Pentane [air, urban air close to ground]: 5.72957e-7 kg; lognormal variance with pedigree 0.1406, pedigree (2,5,3,1,4)
  (same comment as for Hydrocarbons, aliphatic, unsaturated)
- Particulates, < 2.5 um [air, unspecified]: 0.000141113 kg; lognormal variance with pedigree 0.0009, pedigree (1,2,2,1,1)
  Key emission provided by industry (EPIS) 2017: Represents dust (unspecified) and Particulate Matter
- Acetone [air, urban air close to ground]: 3.21688e-8 kg; lognormal variance with pedigree 0.1406, pedigree (2,5,3,1,4)
  (same comment as for Hydrocarbons, aliphatic, unsaturated)
- COD, Chemical Oxygen Demand [water, surface water]: 0.00280928 kg; lognormal variance with pedigree 0.0403, pedigree (1,2,2,1,1)
  Data provided by industry (EPIS) 2017
- Methane, non-fossil [air, urban air close to ground]: 2.88466e-6 kg; lognormal variance with pedigree 0.1406, pedigree (2,5,3,1,4)
  (same comment as for Hydrocarbons, aliphatic, unsaturated)
- Butane [air, urban air close to ground]: 3.41152e-7 kg; lognormal variance with pedigree 0.4006, pedigree (2,5,3,1,4)
  (same comment as for Hydrocarbons, aliphatic, unsaturated)
- Magnesium [air, urban air close to ground]: 2.24035e-7 kg; lognormal variance with pedigree 0.7406, pedigree (2,5,3,1,4)
  (same comment as for Hydrocarbons, aliphatic, unsaturated)
- Methane, fossil [air, urban air close to ground]: 8.94104e-7 kg; lognormal variance with pedigree 0.1406, pedigree (2,5,3,1,4)
  (same comment as for Hydrocarbons, aliphatic, unsaturated)
- Hydrocarbons, aliphatic, alkanes, unspecified [air, urban air close to ground]: 7.12263e-7 kg; lognormal variance with pedigree 0.1406, pedigree (2,5,3,1,4)
  (same comment as for Hydrocarbons, aliphatic, unsaturated)
- Propane [air, urban air close to ground]: 1.0139e-7 kg; lognormal variance with pedigree 0.1406, pedigree (2,5,3,1,4)
  (same comment as for Hydrocarbons, aliphatic, unsaturated)
- Fluorine [air, urban air close to ground]: 3.1116e-8 kg; lognormal variance with pedigree 0.1406, pedigree (2,5,3,1,4)
  (same comment as for Hydrocarbons, aliphatic, unsaturated)
- DOC, Dissolved Organic Carbon [water, surface water]: 0.00112378 kg; lognormal variance with pedigree 0.0403, pedigree (1,2,2,1,1)
  Calculated as equal to TOC.
- AOX, Adsorbable Organic Halogen as Cl [water, surface water]: 1.77673e-5 kg; lognormal variance with pedigree 0.0403, pedigree (1,2,2,1,1)
  Data provided by industry (EPIS) 2017
- Particulates, > 10 um [air, urban air close to ground]: 5.14701e-7 kg; lognormal variance with pedigree 0.0509, pedigree (1,3,2,3,1)
  Estimation based on fuel input data and emission factors from corresponding ecoinvent fuel combustion datasets (see "Extrapolations" comment). Apart from external fuel inputs, internal fuels such as bark, black liquor, sludge, tall oil pitch, wood pellets are generated during the process and supply considerable amounts of process energy. Emissions from some internal biofuels (bark, wood pellets) are approximated with the combustion of wood chips. black liquor, sludge and tall oil pitch were not included in the emissions calculations because no specific emission profiles, e.g. for the black liquor recovery process, were available. Emissions from these internal energy generation processes are therefore only reflected in the key emission factors provided by the industry, other emissions constitute a data gap. Biogas and methanol are approximated with the combustion of natural gas, whereby CO2, CO and CH4 emissions stemming from biogas were modeled as non-fossil.
  Uncertainty: a
- PAH, polycyclic aromatic hydrocarbons [air, urban air close to ground]: 1.17647e-8 kg; lognormal variance with pedigree 0.1406, pedigree (2,5,3,1,4)
  (same comment as for Hydrocarbons, aliphatic, unsaturated)
- Chromium [air, urban air close to ground]: 3.52595e-9 kg; lognormal variance with pedigree 0.7406, pedigree (2,5,3,1,4)
  (same comment as for Hydrocarbons, aliphatic, unsaturated)
- Hydrocarbons, aromatic [air, urban air close to ground]: 3.32485e-8 kg; lognormal variance with pedigree 0.1406, pedigree (2,5,3,1,4)
  (same comment as for Hydrocarbons, aliphatic, unsaturated)
- Chlorine [air, urban air close to ground]: 1.12018e-7 kg; lognormal variance with pedigree 0.4006, pedigree (2,5,3,1,4)
  (same comment as for Hydrocarbons, aliphatic, unsaturated)
- m-Xylene [air, urban air close to ground]: 7.46786e-8 kg; lognormal variance with pedigree 0.1406, pedigree (2,5,3,1,4)
  (same comment as for Hydrocarbons, aliphatic, unsaturated)
- Dioxins, measured as 2,3,7,8-tetrachlorodibenzo-p-dioxin [air, urban air close to ground]: 1.94188e-14 kg; lognormal variance with pedigree 0.1406, pedigree (2,5,3,1,4)
  (same comment as for Hydrocarbons, aliphatic, unsaturated)
- Particulates, > 2.5 um, and < 10um [air, unspecified]: 3.36895e-6 kg; lognormal variance with pedigree 0.0009, pedigree (1,2,2,1,1)
  Estimation based on fuel input data and emission factors from corresponding ecoinvent fuel combustion datasets (see "Extrapolations" comment). Apart from external fuel inputs, internal fuels such as bark, black liquor, sludge, tall oil pitch, wood pellets are generated during the process and supply considerable amounts of process energy. Emissions from some internal biofuels (bark, wood pellets) are approximated with the combustion of wood chips. black liquor, sludge and tall oil pitch were not included in the emissions calculations because no specific emission profiles, e.g. for the black liquor recovery process, were available. Emissions from these internal energy generation processes are therefore only reflected in the key emission factors provided by the industry, other emissions constitute a data gap. Biogas and methanol are approximated with the combustion of natural gas, whereby CO2, CO and CH4 emissions stemming from biogas were modeled as non-fossil.
- Arsenic [air, urban air close to ground]: 3.41028e-9 kg; lognormal variance with pedigree 0.1406, pedigree (2,5,3,1,4)
  (same comment as for Hydrocarbons, aliphatic, unsaturated)
- Hydrogen sulfide [air, urban air close to ground]: 6.15021e-6 kg; lognormal variance with pedigree 0.0403, pedigree (1,2,2,1,1)
  Key emission provided by industry (EPIS) 2017. Hydrogen sulfide is expressing the total of theTRS (Total Reduced Sulphur Compounds), namely H2S, CS2, COS, C2H6S, CH4S, C2H6S2,
- Phenol, pentachloro- [air, urban air close to ground]: 5.04078e-12 kg; lognormal variance with pedigree 0.1406, pedigree (2,5,3,1,4)
  (same comment as for Hydrocarbons, aliphatic, unsaturated)
- Ethanol [air, urban air close to ground]: 6.43377e-8 kg; lognormal variance with pedigree 0.1406, pedigree (2,5,3,1,4)
  (same comment as for Hydrocarbons, aliphatic, unsaturated)
- Molybdenum [air, urban air close to ground]: 1.71567e-9 kg; lognormal variance with pedigree 0.7406, pedigree (2,5,3,1,4)
  (same comment as for Hydrocarbons, aliphatic, unsaturated)
- Toluene [air, urban air close to ground]: 2.88442e-7 kg; lognormal variance with pedigree 0.1406, pedigree (2,5,3,1,4)
  (same comment as for Hydrocarbons, aliphatic, unsaturated)
- Mercury [air, urban air close to ground]: 2.50994e-10 kg; lognormal variance with pedigree 0.7406, pedigree (2,5,3,1,4)
  (same comment as for Hydrocarbons, aliphatic, unsaturated)
- Manganese [air, urban air close to ground]: 1.05795e-7 kg; lognormal variance with pedigree 0.7406, pedigree (2,5,3,1,4)
  (same comment as for Hydrocarbons, aliphatic, unsaturated)

## Sampling procedure
Weighted average of several mills providing 46% of the Latin America capacity of bleached kraft pulp from eucalyptus.

## Extrapolations
Industry data provided key emission factors for CO2, CO, NOx, SO2, H2S and particulates. Additional air emissions resulting from on-site energy productioni, i.e. the combustion of fuels, were calculated based on industrial heating datasets from the ecoinvent database. The following combustion processes were used:
light fuel oil: heat production, light fuel oil, at industrial furnace 1MW, Europe without Switzerland.
heavy fuel oil: heat production, heavy fuel oil, at industrial furnace 1MW, Europe without Switzerland.
hard coal: heat production, at hard coal industrial furnace 1-10MW, Europe without Switzerland.
natural gas: heat production, natural gas, at industrial furnace >100kW, Europe without Switzerland.
lignite briquettes: heat production, lignite briquette, at stove 5-15kW, Europe without Switzerland.
wood chips: heat production, wood chips from industry, at furnace 1000kW, CH
