# treatment of wastewater from liquid crystal display backlight production, capacity 1.1E10l/year

Dataset: EcoSpold 2, unit process
Geography: RoW
Time period: 1994-01-01 to 2021-12-31
Technology level: current
Classification: ISIC rev.4 ecoinvent: 3700:Sewerage
Classification: EcoSpold01Categories: waste management/wastewater treatment
Tags: ConvertedDataset; Treatment
Scenario: Business-as-Usual
System model: Allocation, cut-off by classification
Generated by: Roland Hischier
Published in: Hischier R. 2007
Database: ecoinvent
isCopyrightProtected: true
accessRestrictedTo: 1

## General comment
Wastewater purified in a moderatly large municipal wastewater treatment plant (capacity class 2), with an average capacity size of 71100 per-captia-equivalents PCE.
Wastewater contains (in kg/m3): BOD: 2.03 (GSD=122.5%); Ntot.: 0.000676 (GSD=122.5%); Hg: 0.0000563 (GSD=223.8%); Ni: 0.00225 (GSD=223.8%); Pb: 0.000563 (GSD=223.8%); Fe: 0.0563 (GSD=224.1%);
[This dataset was already contained in the ecoinvent database version 2. It was not individually updated during the transfer to ecoinvent version 3. Life Cycle Impact Assessment results may still have changed, as they are affected by changes in the supply chain, i.e. in other datasets. This dataset was generated following the ecoinvent quality guidelines for version 2. It may have been subject to central changes described in the ecoinvent version 3 change report (http://www.ecoinvent.org/database/ecoinvent-version-3/reports-of-changes/), and the results of the central updates were reviewed extensively. The changes added e.g. consistent water flows and other information throughout the database. The documentation of this dataset can be found in the ecoinvent reports of version 2, which are still available via the ecoinvent website. The change report linked above covers all central changes that were made during the conversion process.]

## Included activities end
Infrastructure materials for municipal wastewater treatment plant, transports, dismantling. Land use burdens.

## Geography
Specific to the technology mix encountered in Switzerland in 2000. Well applicable to modern treatment practices in Europe, North America or Japan.

## Technology
Three stage wastewater treatment (mechanical, biological, chemical) including sludge digestion (fermentation) according to the average technology in Switzerland

## Parameters
- fraction, process water, to air: 0.1 dimensionless; name fraction_PW_to_air; lognormal variance with pedigree 0.092025, pedigree (4,4,3,2,4)

## Reference product
- wastewater from liquid crystal display backlight production: -1 m3; CPC 39920: Sewage sludge; By-product classification Waste
  EcoSpold01Location=CH
  production volume 3.96633 m3
    This is a placeholder value that does not reflect real-world production volumes. This dataset does not currently require a real-world production volume to work in the database framework, and no actual data were collected yet. This has no negative effect on the results of the ecoinvent database.
  property price 0 EUR2005
    Waste products are assigned a price of zero as they are assumed to require further treatment.
  property carbon content, fossil 0.641966
    BOD is 2.03e-3 kg/kg (Tab 12.14, ecoinvent v2.2 report 18_III). BOD was converted to TOC, using conversion factors in Tab 4.10 (ecoinvent v2.2 report 13_IV). TOC was considered as Total Carbon.
  property carbon content 0.641966
    carbon content on a dry matter basis (reserved; not for manual entry)
  properties: water content 486.009, carbon content, non-fossil 0, dry mass 2.05335 kg, wet mass 1000 kg, water in wet mass 997.947 kg, carbon allocation 1.31818 kg

## Inputs from technosphere
- wastewater treatment facility, capacity 1.1E10l/year: 1.9883e-9 unit; lognormal variance with pedigree 0.042, pedigree (1,1,5,5,1)
  EcoSpold01Location=CH
  uncertainty heeded in exchanges of the module
- chemical, organic: 7.3834e-5 kg; lognormal variance with pedigree 0.702, pedigree (1,1,5,5,1)
  EcoSpold01Location=GLO
  burden from sludge incineration. Uncertainty calculated from wastewater composition and treatment model
  properties: heating value, net 19.03 MJ, carbon content, fossil 0.628, wet mass 1 kg, dry mass 1 kg
  note on carbon content, fossil: This dataset is an unweighted average of 20 organic substances (listed in Tab 88.1, ecoinvent v2.2 report 8, part II), being part of the top100 chemicals included in this database. The C-content has also been calculated as an unweighted average of the C content of the substances composing this dataset.
- liquid manure spreading, by vacuum tanker: 0.0034735 m3; lognormal variance with pedigree 0.042, pedigree (1,1,5,5,1)
  burden from sludge spreading. Uncertainty calculated from wastewater composition and treatment model
  EcoSpold01Location=CH
- process-specific burdens, municipal waste incineration: 0 kg; pedigree (1,1,1,1,1)
  EcoSpold01Location=CH
  burden from sludge incineration. Uncertainty calculated from wastewater composition and treatment model
- hydrochloric acid, without water, in 30% solution state: 3.1405e-7 kg; lognormal variance with pedigree 0.462, pedigree (1,1,5,5,1)
  EcoSpold01Location=RER
  burden from sludge incineration. Uncertainty calculated from wastewater composition and treatment model
  properties: dry mass 1 kg, heating value, net 3.32 MJ, wet mass 1 kg
- iron (III) chloride, without water, in 40% solution state: 2.3868e-5 kg; lognormal variance with pedigree 0.472, pedigree (1,1,5,5,1)
  direct wastewater treatment plant burden plus burden from sludge incineration. Uncertainty calculated from wastewater composition and treatment model
  EcoSpold01Location=CH
  properties: dry mass 1 kg, wet mass 1 kg
- cement, unspecified: 0 kg; pedigree (1,1,1,1,1)
  burden from sludge incineration. Uncertainty calculated from wastewater composition and treatment model
  EcoSpold01Location=CH
  properties: wet mass 1 kg, dry mass 1 kg
- waste graphical paper: -0.0155 kg; lognormal variance with pedigree 0.042, pedigree (1,1,5,5,1)
  EcoSpold01Location=CH
  direct wastewater treatment plant burden. Uncertainty calculated from wastewater composition and treatment model
  production volume 0.062 kg
    Calculated from the production volume of wastewater from liquid crystal display backlight production in proportion to the respective output amounts.
  properties: heating value, net 14.12 MJ, water content 0.126126, dry mass 0.888 kg, wet mass 1 kg, carbon content, non-fossil 0.454955
  note on heating value, net: Value taken from the general comment of the treatment dataset.
- chemical, inorganic: 5.2342e-7 kg; lognormal variance with pedigree 0.462, pedigree (1,1,5,5,1)
  burden from sludge incineration. Uncertainty calculated from wastewater composition and treatment model
  EcoSpold01Location=GLO
  properties: dry mass 1 kg, wet mass 1 kg, carbon content, fossil 0.003
  note on carbon content, fossil: This dataset is an unweighted average of 20 inorganic substances (listed in Tab 88.1, ecoinvent v2.2 report 8, part II), being part of the top100 chemicals included in this database. The C-content has also been calculated as an unweighted average of the C content of the substances composing this dataset.
- waste cement, hydrated: 0 kg; pedigree (1,1,1,1,1)
  (same comment as for cement, unspecified)
  production volume 0 kg
    (same comment as for waste graphical paper)
  properties: wet mass 1 kg, dry mass 1 kg
- heat, district or industrial, other than natural gas: 0 MJ; pedigree (1,1,1,1,1)
  (same comment as for process-specific burdens, municipal waste incineration)
  properties: heating value, net 1 MJ
- electricity, low voltage: 0 kWh; pedigree (1,1,1,1,1)
  direct wastewater treatment plant burden. Uncertainty calculated from wastewater composition and treatment model
  EcoSpold01Location=CH
- waste plastic, mixture: 0 kg; pedigree (1,1,1,1,1)
  (same comment as for electricity, low voltage)
  production volume 0 kg
    (same comment as for waste graphical paper)
  properties: heating value, net 30.79 MJ, carbon content, fossil 0.747344, water content 0.180638, wet mass 1 kg, dry mass 0.847 kg
  note on carbon content, fossil: C content in 1 kg DM was calculated using data in Tab A.2, ecoinvent v2.2 report 13_I
- sodium hydroxide, without water, in 50% solution state: 8.623e-8 kg; lognormal variance with pedigree 0.102, pedigree (1,1,5,5,1)
  burden from sludge incineration. Uncertainty calculated from wastewater composition and treatment model
  EcoSpold01Location=RER
  properties: dry mass 1 kg, wet mass 1 kg, heating value, net 3.03 MJ
- quicklime, milled, packed: 1.5634e-8 kg; lognormal variance with pedigree 0.112, pedigree (1,1,5,5,1)
  (same comment as for cement, unspecified)
  properties: water content 0.010101, dry mass 0.99 kg, wet mass 1 kg
- residual material landfill: 7.466e-12 unit; lognormal variance with pedigree 0.072, pedigree (1,1,5,5,1)
  (same comment as for process-specific burdens, municipal waste incineration)
- ammonia, anhydrous, liquid: 0 kg; pedigree (1,1,1,1,1)
  (same comment as for process-specific burdens, municipal waste incineration)
  properties: dry mass 1 kg, wet mass 1 kg
- process-specific burdens, slag landfill: 0 kg; pedigree (1,1,1,1,1)
  (same comment as for cement, unspecified)
- chromium oxide, flakes: 1.0137e-9 kg; lognormal variance with pedigree 0.542, pedigree (1,1,5,5,1)
  (same comment as for sodium hydroxide, without water, in 50% solution state)
  properties: dry mass 1 kg, wet mass 1 kg
- titanium dioxide: 4.9673e-8 kg; lognormal variance with pedigree 0.542, pedigree (1,1,5,5,1)
  (same comment as for hydrochloric acid, without water, in 30% solution state)
  properties: wet mass 1 kg, dry mass 1 kg
- municipal waste incineration facility: 2.6499e-10 unit; lognormal variance with pedigree 0.042, pedigree (1,1,5,5,1)
  (same comment as for process-specific burdens, municipal waste incineration)
- slag landfill: 4.2507e-11 unit; lognormal variance with pedigree 0.072, pedigree (1,1,5,5,1)
  (same comment as for process-specific burdens, municipal waste incineration)
- electricity, high voltage: 0 kWh; pedigree (1,1,1,1,1)
  (same comment as for cement, unspecified)
- process-specific burdens, residual material landfill: 0 kg; pedigree (1,1,1,1,1)
  (same comment as for cement, unspecified)
- heat, district or industrial, natural gas: 0 MJ; pedigree (1,1,1,1,1)
  (same comment as for sodium hydroxide, without water, in 50% solution state)
  properties: heating value, net 1 MJ
- sewer grid, 1.1E10l/year, 242 km: 1.6832e-7 km; lognormal variance with pedigree 0.042, pedigree (1,1,5,5,1)
  EcoSpold01Location=CH
  uncertainty heeded in exchanges of the module
- process-specific burdens, municipal waste incineration: 0.299847, 0.760153 kg (2 entries); lognormal variance with pedigree 0.042, pedigree (1,1,5,5,1)
  (same comment as for process-specific burdens, municipal waste incineration)
- cement, unspecified: 0.000206991, 4.30687e-5, 3.15449e-6, 8.99133e-6, 0.000203342, 5.98494e-6, 6.57324e-5, 7.95288e-6, 0.000888282 kg (9 entries); lognormal variance with pedigree 0.082, pedigree (1,1,5,5,1)
  (same comment as for cement, unspecified)
- waste cement, hydrated: -0.00101374, -0.00256996 kg (2 entries); lognormal variance with pedigree 0.082, pedigree (1,1,5,5,1)
  (same comment as for cement, unspecified)
  production volume 0.0142141 kg
- heat, district or industrial, other than natural gas: 0.000351734, 0.0212394, 0.867389 MJ (3 entries); lognormal variance with pedigree 0.052, pedigree (1,1,5,5,1)
  (same comment as for process-specific burdens, municipal waste incineration)
- electricity, low voltage: 0.00863228, 0.00157177, 0.0354809, 0.123962, 0.0253075, 0.388551, 0.0628607, 0.180504 kWh (8 entries); lognormal variance with pedigree 0.172, pedigree (1,1,5,5,1)
  (same comment as for electricity, low voltage)
- waste plastic, mixture: -0.00172425, -0.000115208, -8.71297e-6, -4.75849e-5, -1.92238e-5, -4.51863e-5, -0.00146914, -0.0120707 kg (8 entries); lognormal variance with pedigree 0.042, pedigree (1,1,5,5,1)
  (same comment as for electricity, low voltage)
  production volume 0.0614782 kg
- ammonia, anhydrous, liquid: 3.63741e-7, 3.12679e-8, 4.86449e-8, 9.63827e-8, 9.44296e-8, 9.89724e-9, 4.42443e-8, 1.04669e-6 kg (8 entries); lognormal variance with pedigree 0.222, pedigree (1,1,5,5,1)
  (same comment as for process-specific burdens, municipal waste incineration)
- process-specific burdens, slag landfill: 0.00676353, 0.0171465 kg (2 entries); lognormal variance with pedigree 0.072, pedigree (1,1,5,5,1)
  (same comment as for cement, unspecified)
- electricity, high voltage: 0.00153999, 0.000295232, 0.00680025, 0.0222856, 0.00500565, 0.0720794, 0.0114311, 0.0329528 kWh (8 entries); lognormal variance with pedigree 0.492, pedigree (1,1,5,5,1)
  (same comment as for cement, unspecified)
- process-specific burdens, residual material landfill: 0.00101374, 0.00256996 kg (2 entries); lognormal variance with pedigree 0.072, pedigree (1,1,5,5,1)
  (same comment as for cement, unspecified)
- heat, district or industrial, natural gas: 1.6952e-6, 4.06203e-5, 0.000109991 MJ (3 entries); lognormal variance with pedigree 0.222, pedigree (1,1,5,5,1)
  (same comment as for sodium hydroxide, without water, in 50% solution state)

## Emissions to nature
- Nickel [soil, agricultural]: 0.0003425 kg; lognormal variance with pedigree 0.712, pedigree (1,1,5,5,1)
  emission from sludge spreading. Uncertainty calculated from wastewater composition and treatment model
- NMVOC, non-methane volatile organic compounds, unspecified origin [air, urban air close to ground]: 4.6518e-5 kg; lognormal variance with pedigree 0.262, pedigree (1,1,5,5,1)
  direct digester gas emission. Uncertainty calculated from wastewater composition and treatment model
- Nitrogen [water, surface water]: 1.18e-5 kg; lognormal variance with pedigree 0.082, pedigree (1,1,5,5,1)
  direct wastewater treatment plant emission. Uncertainty calculated from wastewater composition and treatment model
- Lead [air, urban air close to ground]: 1.1426e-8 kg; lognormal variance with pedigree 0.752, pedigree (1,1,5,5,1)
  direct digester gas emission plus emission from sludge incineration. Uncertainty calculated from wastewater composition and treatment model
- Nickel, ion [water, ground-, long-term]: 0.00050849 kg; lognormal variance with pedigree 0.712, pedigree (1,1,5,5,1)
  emission from sludge incineration. Uncertainty calculated from wastewater composition and treatment model
- Mercury [water, ground-, long-term]: 1.2411e-6 kg; lognormal variance with pedigree 2.972, pedigree (1,1,5,5,1)
  (same comment as for Nickel, ion)
- Mercury [soil, agricultural]: 1.5043e-5 kg; lognormal variance with pedigree 0.712, pedigree (1,1,5,5,1)
  (same comment as for Nickel)
- Carbon dioxide, fossil [air, urban air close to ground]: 3.7535 kg; lognormal variance with pedigree 0.062, pedigree (1,1,5,5,1)
  (same comment as for Nickel, ion)
- Iron, ion [water, ground-, long-term]: 0.0079649 kg; lognormal variance with pedigree 1.542, pedigree (1,1,5,5,1)
  (same comment as for Nickel, ion)
- Nickel, ion [water, surface water]: 0.0013647 kg; lognormal variance with pedigree 0.662, pedigree (1,1,5,5,1)
  sewer overload discharge plus direct wastewater treatment plant emission plus emission from sludge incineration. Uncertainty calculated from wastewater composition and treatment model
- BOD5, Biological Oxygen Demand [water, surface water]: 0.19248 kg; lognormal variance with pedigree 0.072, pedigree (1,1,5,5,1)
  (same comment as for Nickel, ion)
- Cyanide [air, urban air close to ground]: 3.0957e-8 kg; lognormal variance with pedigree 0.242, pedigree (1,1,5,5,1)
  (same comment as for Nickel, ion)
- COD, Chemical Oxygen Demand [water, surface water]: 0.58831 kg; lognormal variance with pedigree 0.042, pedigree (1,1,5,5,1)
  (same comment as for Nickel, ion)
- TOC, Total Organic Carbon [water, surface water]: 0.15683 kg; lognormal variance with pedigree 0.072, pedigree (1,1,5,5,1)
  (same comment as for Nickel, ion)
- Lead [soil, agricultural]: 0.00019381 kg; lognormal variance with pedigree 0.712, pedigree (1,1,5,5,1)
  (same comment as for Nickel)
- Nickel [air, urban air close to ground]: 2.3439e-11 kg; lognormal variance with pedigree 0.812, pedigree (1,1,5,5,1)
  (same comment as for Lead)
- TOC, Total Organic Carbon [water, ground-, long-term]: 0.0021115 kg; lognormal variance with pedigree 0.112, pedigree (1,1,5,5,1)
  (same comment as for Nickel, ion)
- COD, Chemical Oxygen Demand [water, ground-, long-term]: 0.005336 kg; lognormal variance with pedigree 0.112, pedigree (1,1,5,5,1)
  (same comment as for Nickel, ion)
- Nitrate [water, surface water]: 0.0011633 kg; lognormal variance with pedigree 0.062, pedigree (1,1,5,5,1)
  (same comment as for Nickel, ion)
- DOC, Dissolved Organic Carbon [water, ground-, long-term]: 0.0021115 kg; lognormal variance with pedigree 0.112, pedigree (1,1,5,5,1)
  (same comment as for Nickel, ion)
- Methane, fossil [air, urban air close to ground]: 0.010238 kg; lognormal variance with pedigree 0.142, pedigree (1,1,5,5,1)
  (same comment as for Nickel, ion)
- Ammonia [air, urban air close to ground]: 8.5765e-6 kg; lognormal variance with pedigree 0.282, pedigree (1,1,5,5,1)
  direct digester gas emission plus emission from sludge incineration plus emission from sludge spreading. Uncertainty calculated from wastewater composition and treatment model
- Nitrite [water, surface water]: 1.5509e-5 kg; lognormal variance with pedigree 0.082, pedigree (1,1,5,5,1)
  (same comment as for Nitrogen)
- Nitrogen oxides [air, urban air close to ground]: 1.6856e-5 kg; lognormal variance with pedigree 0.082, pedigree (1,1,5,5,1)
  (same comment as for Lead)
- Iron, ion [water, surface water]: 0.028578 kg; lognormal variance with pedigree 0.662, pedigree (1,1,5,5,1)
  (same comment as for Nickel, ion)
- Carbon monoxide, fossil [air, urban air close to ground]: 0.0032648 kg; lognormal variance with pedigree 0.162, pedigree (1,1,5,5,1)
  (same comment as for Nickel, ion)
- BOD5, Biological Oxygen Demand [water, ground-, long-term]: 0.0017454 kg; lognormal variance with pedigree 0.112, pedigree (1,1,5,5,1)
  (same comment as for Nickel, ion)
- Mercury [air, urban air close to ground]: 9.4797e-11 kg; lognormal variance with pedigree 0.742, pedigree (1,1,5,5,1)
  (same comment as for Lead)
- Water [water, unspecified]: 0.9 m3; name water_to_water_unspecified; lognormal variance with pedigree 0.0827, pedigree (2,2,5,5,1)
  Calculated value based on water balance.
  property dry mass 0 kg; name DM
  property carbon content, non-fossil 0; name C_content_non_fossil
  property fraction, origin: unspecified 0; name fraction_origin_unspecified_Ww
  property fraction, origin: salt water 0; name fraction_origin_salt_water_Ww
  property fraction, origin: fresh water 1; name fraction_origin_fresh_water_Ww
  property wet mass 1000 kg; name WM
  property water in wet mass 1000 kg; name WWM
  property carbon content, fossil 0; name C_content_fossil
- Iron [air, urban air close to ground]: 5.6768e-7 kg; lognormal variance with pedigree 0.752, pedigree (1,1,5,5,1)
  (same comment as for Lead)
- Ammonium, ion [water, surface water]: 0.00026555 kg; lognormal variance with pedigree 0.062, pedigree (1,1,5,5,1)
  (same comment as for Nitrogen)
- Water [air, unspecified]: 0.1 m3; name water_to_air_unspecified; lognormal variance with pedigree 0.0827, pedigree (2,2,5,5,1)
  Calculated value based on water balance.
  property fraction, origin: unspecified 1; name fraction_origin_unspecified
  property fraction, origin: salt water 0; name fraction_origin_salt_water
  property fraction, origin: fresh water 0; name fraction_origin_fresh_water
- DOC, Dissolved Organic Carbon [water, surface water]: 0.14684 kg; lognormal variance with pedigree 0.042, pedigree (1,1,5,5,1)
  (same comment as for Nickel, ion)
- Nitrate [water, ground-, long-term]: 1.2356e-6 kg; lognormal variance with pedigree 0.082, pedigree (1,1,5,5,1)
  (same comment as for Nickel, ion)
- Lead [water, ground-, long-term]: 2.1896e-5 kg; lognormal variance with pedigree 6.922, pedigree (1,1,5,5,1)
  (same comment as for Nickel, ion)
- Iron [soil, agricultural]: 0.010724 kg; lognormal variance with pedigree 0.712, pedigree (1,1,5,5,1)
  (same comment as for Nickel)
- Lead [water, surface water]: 6.1882e-5 kg; lognormal variance with pedigree 0.602, pedigree (1,1,5,5,1)
  (same comment as for Nickel, ion)
- Mercury [water, surface water]: 1.7657e-5 kg; lognormal variance with pedigree 0.642, pedigree (1,1,5,5,1)
  (same comment as for Nickel, ion)
- Dinitrogen monoxide [air, urban air close to ground]: 2.4957e-6 kg; lognormal variance with pedigree 0.072, pedigree (1,1,5,5,1)
  direct wastewater treatment plant emission plus direct digester gas emission plus emission from sludge incineration plus emission from sludge spreading. Uncertainty calculated from wastewater composition and treatment model
- Carbon [soil, agricultural]: 0.13636 kg; lognormal variance with pedigree 0.112, pedigree (1,1,5,5,1)
  (same comment as for Nickel)

## Extrapolations
wastewater compositions from literature and/or estimates This dataset has been copied from an original dataset covering the geography CH. The uncertainty has been adjusted accordingly.

## Review by Jürgen Sutter 2009-02-07
passed.
