# treatment of municipal solid waste, incineration

Dataset: EcoSpold 2, unit process
Geography: CA-QC
Time period: 2006-01-01 to 2021-12-31
Technology level: current
Classification: ISIC rev.4 ecoinvent: 3821:Treatment and disposal of non-hazardous waste
Synonyms: Kehrichtverbrennung; municipal waste incineration; Siedlungsabfallverbrennung
Tags: Recontextualization
Scenario: Business-as-Usual
System model: Allocation, cut-off by classification
Share of production covered: 1.8 %
Generated by: Geneviève Martineau
Published in: Doka G. 2013
Database: ecoinvent
isCopyrightProtected: true
accessRestrictedTo: 1

## General comment
This dataset represents the activity of waste disposal of municipal solid waste in a municipal solid waste incinerator (MSWI) // Recommended use of this dataset: For average municipal/communal waste mixture. Not suitable to represent any single specific waste material, like plastics, paper, cardboard. If your waste is a specific mixture of waste materials, inventory the respective waste materials individually. // Inventoried waste contains 92.8% average municipal solid waste, burnable part; 7.23% average municipal solid waste, unburnable (inert) part; . // Waste composition (wet, in ppm): upper heating value 13.05 MJ/kg; lower heating value 11.7 MJ/kg; H2O 225260; O 261060; H 43105; C 338960; S 1532.3; N 3206.1; P 757.42; B 7.3826; Cl 6670; Br 129.32; F 366.39; I 0.012418; Ag 0.73279; As 1.4061; Ba 152.96; Cd 8.0053; Co 1.3807; Cr 139.58; Cu 930.87; Hg 0.65684; Mn 266.19; Mo 2.0065; Ni 52.342; Pb 413.61; Sb 53.368; Se 0.3281; Sn 99.553; V 9.4572; Zn 1127.9; Be 470.85; Sc n.a.; Sr n.a.; Ti 2616.4; Tl n.a.; W n.a.; Si 49786; Fe 23628; Ca 18346; Al 11395; K 2132.7; Mg 2568.9; Na 4741.6; // Share of carbon in waste that is biogenic 61.1%. // Share of metals in waste not oxidised and bulk-recyclable (exclude very small or thin parts) Iron: 72.06%; Alu: 38.71%; Copper: 45.44%. // One kg of this waste produces 0.2221 kg of slag and 0.02224 kg of residues, which are landfilled. Additional solidification with 0.008896 kg of cement. // Net energy production: 1.39MJ/kg electric energy and 2.85MJ/kg thermal energy. // Recovery of metal scrap to recycling: 9.7909g iron scrap, 1.2162g aluminium scrap, 0.12319g copper scrap.

## Included activities start
waste incineration from waste reception gate and delivery into waste bunker at incinerator plant site (without transports to the incinerator)

## Included activities end
Waste-specific short-term emissions to water from leachate. Long-term emissions from landfill to ground water.

## Geography
Specific to the technology mix encountered in Switzerland in 2010. Well applicable to modern incineration practices in Europe, North America or Japan.

## Technology
average Swiss MSWI plants in 2010 (grate incinerators) with electrostatic precipitator for fly ash (ESP), wet flue gas scrubber and 25% SNCR , 42.77% SCR-high dust , 32.68% SCR-low dust -DeNOx facilities and 0% without Denox (weighted according to mass of burnt waste, representing Swiss average). Efficiency of iron scrap separation from slag : 58%. Efficiency of non-ferrous scrap separation from slag : 31%. Gross electric efficiency technology mix 15.84% and Gross thermal efficiency technology mix 28.51%
Data quality indicators adjusted accordingly.

## Time period
Waste composition as given in literature reference, theoretical data or other source. Transfer coefficients for modern MSWI.

## Reference product
- municipal solid waste: -1 kg; name ref; CPC 39910: Municipal waste; By-product classification Waste
  Main reference product of this activity (supply of disposal service).
  production volume 0 kg; name ref_PV
    0
  property price 0 EUR2005
    Waste products are assigned a price of zero as they are assumed to require further treatment.
  property heating value, net 11.74 MJ
    Value taken from the general comment of the treatment dataset.
  property carbon content 0.433204
    carbon content on a dry matter basis (reserved; not for manual entry)
  properties: water in wet mass 0.229 kg, dry mass 0.771 kg, wet mass 1 kg, water content 0.297017, carbon content, non-fossil 0.261655, carbon content, fossil 0.171549, carbon allocation 0.334 kg

## By-products
- electricity, for reuse in municipal waste incineration only: 0 kWh; name E_el_prod_MSWI; CPC 17100: Electrical energy; By-product classification allocatable product
  Based on literarure data, the majority of MSW in Canada is landfilled with only 5% of them actually incinerated. Canada has 14 incineration plants where not all of them generate energy out of their processes. Additionally, statistical data from electricity production do not quote electricity production from MSWI plants. Due to that information the amount of energy produced in MSWI in Canada is neglected and thus this amount is set to 0.
  Literature: Human Activity and the Environment 2012 has been prepared by the Environment Accounts and Statistics Division under the direction of Robert Smith (Director) and Doug Trant (Chief). Michelle Tait was the editor and project
  manager and Iman Mustapha managed dissemination and production.
  State of Waste Management in Canada, Prepared for: Canadian Council of Ministers of Environment, 2014, Prepared by: Giroux Environmental Consulting.
  production volume 0 kWh; = E_el_prod_MSWI*ref_PV/abs(ref)
    Calculated from the production volume of municipal solid waste, in proportion to the respective output amounts.
  property true value relation 3.6; name E_el_prod_MSWI_true_value_relation
    property to calculate "true value" from
  property price 0.1 EUR2005; name E_el_prod_MSWI_price_EUR2005
    Estimated to be the same price as in case of electricity, medium voltage.
  property exergy 3.6 MJ; name E_el_prod_MSWI_exergy
    This exergy property is based on the exergy content of the product.
- iron scrap, sorted, pressed: 0 kg; CPC 39310: Slag, dross, scalings and other waste from the manufacture of iron or steel; By-product classification Recyclable; pedigree (1,1,1,1,1)
  Iron scrap recovered from this waste.
  Uncertainty: u
  production volume 0 kg; = Fe_scrap*ref_PV/abs(ref)
    (same comment as for electricity, for reuse in municipal waste incineration only)
  property price 0.175 EUR2005
    Temporary price data. Calculated as 90% of purchasers price based on: 2005 import and export prices (total trades (USD) divided by total weight (kg) in biggest economies of the world: EU27, USA, Brasil, China, India, Japan and Russia) from UN Commodity Trade Statistics Database (http://data.un.org/Explorer.aspxDatabase [Accessed 2011.06.20]). Commodity: Waste or scrap, of cast iron
  property carbon content 0
    carbon content on a dry matter basis (reserved; not for manual entry)
  properties: wet mass 1 kg, water in wet mass 0 kg, carbon content, non-fossil 0, dry mass 1 kg, water content 0, carbon content, fossil 0, carbon allocation 0 kg
- heat, for reuse in municipal waste incineration only: 0 MJ; name E_th_prod_MSWI; By-product classification allocatable product; CPC 17300: Steam and hot water
  (same comment as for electricity, for reuse in municipal waste incineration only)
  production volume 0 MJ; = E_th_prod_MSWI*ref_PV/abs(ref)
    (same comment as for electricity, for reuse in municipal waste incineration only)
  property price 0.0106 EUR2005; name E_th_prod_MSWI_price_EUR2005
    Average European district heat price from Ecoheatcool and Euroheat 2005-2006, Ecoheat Work package 1: The European heat market. Final report. 10.6 EUR/GJ i s the price of district heat. http://www.solarthermalworld.org/files/Ecoheatcool%20WP1%20Web.pdf?download
  property exergy 0.1842 MJ; name E_th_prod_MSWI_exergy
    This exergy property is based on the exergy content of the product.
  property true value relation 0.1842; name E_th_prod_MSWI_true_value_relation
    property to calculate "true value" from
- aluminium scrap, post-consumer, prepared for melting: 0 kg; By-product classification Recyclable; CPC 39363: Waste and scrap of aluminium; pedigree (1,1,1,1,1)
  Aluminium scrap recovered from this waste.
  Uncertainty: u
  production volume 0 kg; = Al_scrap*ref_PV/abs(ref)
    (same comment as for electricity, for reuse in municipal waste incineration only)
  property price 0.806 EUR2005
    Temporary price data. Calculated as 90% of purchasers price based on: 2005 import and export prices (total trades (USD) divided by total weight (kg) in biggest economies of the world: EU27, USA, Brasil, China, India, Japan and Russia) from UN Commodity Trade Statistics Database (http://data.un.org/Explorer.aspxDatabase [Accessed 2011.06.17]). Commodity: Waste or scrap, aluminium
  property carbon content 0
    carbon content on a dry matter basis (reserved; not for manual entry)
  properties: wet mass 1 kg, dry mass 1 kg, carbon content, non-fossil 0, water content 0, water in wet mass 0 kg, carbon content, fossil 0, carbon allocation 0 kg
- copper scrap, sorted, pressed: 0 kg; CPC 39361: Waste and scrap of copper; By-product classification Recyclable; pedigree (1,1,1,1,1)
  Copper scrap recovered from this waste.
  Uncertainty: u
  production volume 0 kg; = Cu_scrap*ref_PV/abs(ref)
    (same comment as for electricity, for reuse in municipal waste incineration only)
  property price 2.84 EUR2005
    Temporary price data. Calculated as 90% of purchasers price based on: Source: USGS Mineral Yearbook 2007, Table 1 in <http://minerals.usgs.gov/minerals/pubs/commodity/recycle/myb1-2007-recyc.pdf>
  property carbon content 0
    carbon content on a dry matter basis (reserved; not for manual entry)
  properties: carbon content, non-fossil 0, water in wet mass 0 kg, dry mass 1 kg, carbon content, fossil 0, wet mass 1 kg, water content 0, carbon allocation 0 kg

## Inputs from technosphere
- chromium oxide, flakes: 8.9376e-7 kg; lognormal variance with pedigree 1.01862, pedigree (1,1,4,2,2)
  Input to DeNOx stage.
  Uncertainty: u
  properties: dry mass 1 kg, wet mass 1 kg
- chemical, organic: 1.284e-5 kg; lognormal variance with pedigree 1.40952, pedigree (1,1,4,2,2)
  Auxilliary inputs for the wastewater treatment stage of the incinerator plant. Proxy for (pure) Trisodium-trimercapto-s-triazine (CAS 17766-26-6), used as 15% diluted solution, aka TMT15.
  Uncertainty: u
  properties: carbon content, fossil 0.628, dry mass 1 kg, wet mass 1 kg, heating value, net 19.03 MJ
- hydrochloric acid, without water, in 30% solution state: 5.73e-5 kg; lognormal variance with pedigree 0.283905, pedigree (1,1,4,2,2)
  Auxilliary inputs for the wastewater treatment stage of the incinerator plant.
  Uncertainty: u
  properties: dry mass 1 kg, wet mass 1 kg, heating value, net 3.32 MJ
- waste cement, hydrated: -0.02224 kg; name waste_cement; lognormal variance with pedigree 0.037678, pedigree (1,1,4,2,2)
  Hydrated cement output for solidification of landfilled residual material.
  Uncertainty: U
  production volume 0 kg; = waste_cement*ref_PV/abs(ref)
    (same comment as for electricity, for reuse in municipal waste incineration only)
  property price 0 EUR2005; name BP_amount_3_price_EUR2005
  properties: wet mass 1 kg, dry mass 1 kg
- residual material landfill: 4.6333e-11 unit; lognormal variance with pedigree 0.028594, pedigree (1,1,4,2,2)
  Landfill infrastructure required for landfilling of incineration residues.
  Uncertainty: u
- transport, freight, lorry, unspecified: 0.0097129 metric ton*km; lognormal variance with pedigree 0.028708, pedigree (1,1,4,2,2)
  Transport services to transport incineration residues to landfills.
  Uncertainty: u
- ammonia, anhydrous, liquid: 0.000699 kg; lognormal variance with pedigree 0.677395, pedigree (1,1,4,2,2)
  Input to DeNOx stage (100% NH3).
  Uncertainty: u
  properties: dry mass 1 kg, wet mass 1 kg
- quicklime, milled, packed: 0.0032775 kg; lognormal variance with pedigree 0.407075, pedigree (1,1,4,2,2)
  Auxilliary inputs for the flue gas treatment stage of the incinerator plant.
  Uncertainty: u
  properties: dry mass 0.99 kg, water content 0.010101, wet mass 1 kg
- titanium dioxide: 4.3794e-5 kg; lognormal variance with pedigree 1.01862, pedigree (1,1,4,2,2)
  Input to DeNOx stage (TiO2 catalyst carrier)
  Uncertainty: u
  properties: dry mass 1 kg, wet mass 1 kg
- water, decarbonised: 1.39 kg; lognormal variance with pedigree 0.245855, pedigree (1,1,4,2,2)
  Incinerator process water used in flue gas scrubber stage.
  Uncertainty: u
  properties: wet mass 1 kg
- process-specific burdens, slag landfill: 0.22058 kg; lognormal variance with pedigree 0.032702, pedigree (1,1,4,2,2)
  Mass-specific expenditures required for landfilling of bottom ash.
  Uncertainty: u
- slag landfill: 3.9215e-10 unit; lognormal variance with pedigree 0.032702, pedigree (1,1,4,2,2)
  Landfill infrastructure required for landfilling of bottom ash.
  Uncertainty: u
- process-specific burdens, residual material landfill: 0.02224 kg; lognormal variance with pedigree 0.028594, pedigree (1,1,4,2,2)
  Mass-specific expenditures required for landfilling of incineration residues.
  Uncertainty: u
- municipal waste incineration facility: 2.5e-10 unit
  Demands per kilogram waste.
- chemical, inorganic: 0.000218 kg; lognormal variance with pedigree 0.283905, pedigree (1,1,4,2,2)
  Auxilliary inputs for the wastewater treatment stage of the incinerator plant. Proxy for Polyelectrolyte.
  Uncertainty: u
  properties: dry mass 1 kg, wet mass 1 kg, carbon content, fossil 0.003
- sodium hydroxide, without water, in 50% solution state: 0.001122 kg; lognormal variance with pedigree 0.221665, pedigree (1,1,4,2,2)
  (same comment as for quicklime, milled, packed)
  properties: heating value, net 3.03 MJ, wet mass 1 kg, dry mass 1 kg
- cement, unspecified: 0.008896 kg; lognormal variance with pedigree 0.037678, pedigree (1,1,4,2,2)
  Cement required for solidification of landfilled residual material.
  Uncertainty: U
  properties: wet mass 1 kg, dry mass 1 kg
- heat, district or industrial, natural gas: 0.13071 MJ; lognormal variance with pedigree 0.677395, pedigree (1,1,4,2,2)
  Input to DeNOx stage, to heat up flue gas in low-dust SCR.
  Uncertainty: u
  properties: heating value, net 1 MJ
- iron (III) chloride, without water, in 40% solution state: 5.96e-5 kg; lognormal variance with pedigree 0.245855, pedigree (1,1,4,2,2)
  (same comment as for hydrochloric acid, without water, in 30% solution state)
  properties: dry mass 1 kg, wet mass 1 kg
- iron scrap, sorted, pressed: -0.0097909 kg; lognormal variance with pedigree 0.286335, pedigree (1,1,4,2,2)
  Iron scrap recovered from this waste.
  Uncertainty: u
  properties: wet mass 1 kg, price 0.175 EUR2005, dry mass 1 kg
- aluminium scrap, post-consumer, prepared for melting: -0.0012162 kg; lognormal variance with pedigree 0.370425, pedigree (1,1,4,2,2)
  Aluminium scrap recovered from this waste.
  Uncertainty: u
  properties: wet mass 1 kg, dry mass 1 kg, price 0.806 EUR2005
- copper scrap, sorted, pressed: -0.00012319 kg; lognormal variance with pedigree 0.685545, pedigree (1,1,4,2,2)
  Copper scrap recovered from this waste.
  Uncertainty: u
  properties: dry mass 1 kg, price 2.84 EUR2005, wet mass 1 kg

## Inputs from nature
- Oxygen [natural resource, in air]: 1.3366 kg; lognormal variance with pedigree 0.039021, pedigree (1,1,4,2,2)
  Oxygen from ambient air needed to combust and oxidise this waste. Net demand, i.e. without O2 leaving the plant in flue gas uncombusted.
  Uncertainty: u

## Emissions to nature
- Magnesium [water, ground-, long-term]: 0.0023487 kg; lognormal variance with pedigree 0.529855, pedigree (1,1,4,2,2)
  Long-term emissions from landfilling of incineration residues.
  Uncertainty: u
- Iron, ion [water, ground-, long-term]: 0.0070942 kg; lognormal variance with pedigree 0.399485, pedigree (1,1,4,2,2)
  Long-term emissions from landfilling of incineration residues.
  Uncertainty: u
- Aluminium [water, ground-, long-term]: 0.0076603 kg; lognormal variance with pedigree 0.339635, pedigree (1,1,4,2,2)
  Long-term emissions from landfilling of incineration residues.
  Uncertainty: u
- Manganese [water, ground-, long-term]: 0.00024822 kg; lognormal variance with pedigree 0.857685, pedigree (1,1,4,2,2)
  Long-term emissions from landfilling of incineration residues.
  Uncertainty: u
- Barium [air, urban air close to ground]: 1.4517e-7 kg; lognormal variance with pedigree 0.936325, pedigree (1,1,4,2,2)
  Emission to air from waste composition and transfer coefficients.
  Uncertainty: u
- Cadmium [air, urban air close to ground]: 4.0205e-9 kg; lognormal variance with pedigree 1.33242, pedigree (1,1,4,2,2)
  Emission to air from waste composition and transfer coefficients.
  Uncertainty: u
- Magnesium [air, urban air close to ground]: 2.0069e-6 kg; lognormal variance with pedigree 0.566165, pedigree (1,1,4,2,2)
  Emission to air from waste composition and transfer coefficients.
  Uncertainty: u
- Particulates, < 2.5 um [air, urban air close to ground]: 4.0887e-6 kg; lognormal variance with pedigree 0.451115, pedigree (1,1,4,2,2)
  Incomplete combustion product emitted to air.
  Uncertainty: u
- Water [air, urban air close to ground]: 0.001459 m3; lognormal variance with pedigree 0.680305, pedigree (1,1,4,2,2)
  Water vapour from waste humidity, hydrogen oxidation and part of the process water.
  Uncertainty: U
- Lead [air, urban air close to ground]: 2.0575e-8 kg; lognormal variance with pedigree 0.818915, pedigree (1,1,4,2,2)
  Emission to air from waste composition and transfer coefficients.
  Uncertainty: u
- Particulates, > 2.5 um, and < 10um [air, urban air close to ground]: 2.0546e-8 kg; lognormal variance with pedigree 0.222505, pedigree (1,1,4,2,2)
  Incomplete combustion product emitted to air.
  Uncertainty: u
- Chromium, ion [water, surface water]: 1.9086e-9 kg; lognormal variance with pedigree 0.974795, pedigree (1,1,4,2,2)
  Emissions to water from waste composition and transfer coefficients in incinerator and landfills.
  Uncertainty: u
- Calcium [air, urban air close to ground]: 9.0376e-5 kg; lognormal variance with pedigree 0.315415, pedigree (1,1,4,2,2)
  Emission to air from waste composition and transfer coefficients.
  Uncertainty: u
- Sulfate [water, ground-, long-term]: 0.0038197 kg; lognormal variance with pedigree 0.360275, pedigree (1,1,4,2,2)
  Long-term emissions from landfilling of incineration residues.
  Uncertainty: u
- Manganese [water, surface water]: 1.8522e-8 kg; lognormal variance with pedigree 1.49032, pedigree (1,1,4,2,2)
  (same comment as for Chromium, ion)
- Benzene [air, urban air close to ground]: 3.4246e-8 kg; lognormal variance with pedigree 0.110145, pedigree (1,1,4,2,2)
  Incomplete combustion product emitted to air.
  Uncertainty: u
- Aluminium [air, urban air close to ground]: 5.6947e-9 kg; lognormal variance with pedigree 0.434155, pedigree (1,1,4,2,2)
  Emission to air from waste composition and transfer coefficients.
  Uncertainty: u
- NMVOC, non-methane volatile organic compounds, unspecified origin [air, urban air close to ground]: 1.5585e-6 kg; lognormal variance with pedigree 0.110145, pedigree (1,1,4,2,2)
  Incomplete combustion product emitted to air.
  Uncertainty: u
- Chromium [air, urban air close to ground]: 2.1464e-8 kg; lognormal variance with pedigree 0.958395, pedigree (1,1,4,2,2)
  Emission to air from waste composition and transfer coefficients.
  Uncertainty: u
- Carbon dioxide, non-fossil [air, urban air close to ground]: 0.75153 kg; lognormal variance with pedigree 0.040591, pedigree (1,1,4,2,2)
  Emission to air from waste composition and transfer coefficients.
  Uncertainty: u
- DOC, Dissolved Organic Carbon [water, surface water]: 0.00017534 kg; lognormal variance with pedigree 0.060914, pedigree (1,1,4,2,2)
  (same comment as for Chromium, ion)
- Potassium, ion [water, surface water]: 0.00046364 kg; lognormal variance with pedigree 0.338075, pedigree (1,1,4,2,2)
  (same comment as for Chromium, ion)
- Magnesium [water, surface water]: 1.1409e-5 kg; lognormal variance with pedigree 0.794115, pedigree (1,1,4,2,2)
  (same comment as for Chromium, ion)
- Benzene, pentachloro- [air, urban air close to ground]: 1.8093e-10 kg; lognormal variance with pedigree 0.110145, pedigree (1,1,4,2,2)
  Incomplete combustion product emitted to air.
  Uncertainty: u
- Methane, non-fossil [air, urban air close to ground]: 3.1409e-7 kg; lognormal variance with pedigree 0.110145, pedigree (1,1,4,2,2)
  Incomplete combustion product emitted to air.
  Uncertainty: u
- Arsenic, ion [water, ground-, long-term]: 6.9776e-7 kg; lognormal variance with pedigree 1.53402, pedigree (1,1,4,2,2)
  Long-term emissions from landfilling of incineration residues.
  Uncertainty: u
- Vanadium [air, urban air close to ground]: 3.5323e-8 kg; lognormal variance with pedigree 1.29602, pedigree (1,1,4,2,2)
  Emission to air from waste composition and transfer coefficients.
  Uncertainty: u
- Titanium [air, urban air close to ground]: 1.3305e-6 kg; lognormal variance with pedigree 0.566165, pedigree (1,1,4,2,2)
  Emission to air from waste composition and transfer coefficients.
  Uncertainty: u
- Dioxins, measured as 2,3,7,8-tetrachlorodibenzo-p-dioxin [air, urban air close to ground]: 6.8487e-14 kg; lognormal variance with pedigree 0.451115, pedigree (1,1,4,2,2)
  Incomplete combustion product emitted to air.
  Uncertainty: u
- Nitrate [water, surface water]: 4.0869e-5 kg; lognormal variance with pedigree 0.362845, pedigree (1,1,4,2,2)
  (same comment as for Chromium, ion)
- Iodine [air, urban air close to ground]: 6.8922e-12 kg; lognormal variance with pedigree 1.95122, pedigree (1,1,4,2,2)
  Emission to air from waste composition and transfer coefficients.
  Uncertainty: u
- Antimony [air, urban air close to ground]: 2.6684e-11 kg; lognormal variance with pedigree 1.12753, pedigree (1,1,4,2,2)
  Emission to air from waste composition and transfer coefficients.
  Uncertainty: u
- Phosphate [water, surface water]: 4.2208e-7 kg; lognormal variance with pedigree 0.533145, pedigree (1,1,4,2,2)
  (same comment as for Chromium, ion)
- Nickel, ion [water, ground-, long-term]: 5.1263e-5 kg; lognormal variance with pedigree 1.04293, pedigree (1,1,4,2,2)
  Long-term emissions from landfilling of incineration residues.
  Uncertainty: u
- Tin, ion [water, ground-, long-term]: 5.2384e-5 kg; lognormal variance with pedigree 1.33943, pedigree (1,1,4,2,2)
  Long-term emissions from landfilling of incineration residues.
  Uncertainty: u
- Boron [water, ground-, long-term]: 6.2781e-6 kg; lognormal variance with pedigree 1.15033, pedigree (1,1,4,2,2)
  Long-term emissions from landfilling of incineration residues.
  Uncertainty: u
- Nickel, ion [water, surface water]: 3.4079e-8 kg; lognormal variance with pedigree 1.68762, pedigree (1,1,4,2,2)
  (same comment as for Chromium, ion)
- Benzo(a)pyrene [air, urban air close to ground]: 7.6208e-13 kg; lognormal variance with pedigree 0.451115, pedigree (1,1,4,2,2)
  Incomplete combustion product emitted to air.
  Uncertainty: u
- Selenium [water, ground-, long-term]: 2.182e-7 kg; lognormal variance with pedigree 1.19093, pedigree (1,1,4,2,2)
  Long-term emissions from landfilling of incineration residues.
  Uncertainty: u
- Tin, ion [water, surface water]: 2.3895e-9 kg; lognormal variance with pedigree 1.52442, pedigree (1,1,4,2,2)
  (same comment as for Chromium, ion)
- Bromine [water, ground-, long-term]: 1.2464e-5 kg; lognormal variance with pedigree 0.939415, pedigree (1,1,4,2,2)
  Long-term emissions from landfilling of incineration residues.
  Uncertainty: u
- COD, Chemical Oxygen Demand [water, ground-, long-term]: 0.0046666 kg; lognormal variance with pedigree 0.039363, pedigree (1,1,4,2,2)
  Long-term emissions from landfilling of incineration residues.
  Uncertainty: u
- TOC, Total Organic Carbon [water, ground-, long-term]: 0.0018466 kg; lognormal variance with pedigree 0.039363, pedigree (1,1,4,2,2)
  Long-term emissions from landfilling of incineration residues.
  Uncertainty: u
- Sodium, ion [water, surface water]: 0.0010044 kg; lognormal variance with pedigree 0.232415, pedigree (1,1,4,2,2)
  (same comment as for Chromium, ion)
- Copper [air, urban air close to ground]: 4.6516e-8 kg; lognormal variance with pedigree 0.716865, pedigree (1,1,4,2,2)
  Emission to air from waste composition and transfer coefficients.
  Uncertainty: u
- Nitrogen oxides [air, urban air close to ground]: 0.00026025 kg; lognormal variance with pedigree 0.729905, pedigree (1,1,4,2,2)
  Sum of fuel-Nox and thermal-NOx emitted to air after DeNOx stage.
  Uncertainty: u
- Aluminium [water, surface water]: 7.9785e-7 kg; lognormal variance with pedigree 0.747615, pedigree (1,1,4,2,2)
  (same comment as for Chromium, ion)
- Toluene [air, urban air close to ground]: 6.8492e-8 kg; lognormal variance with pedigree 0.110145, pedigree (1,1,4,2,2)
  Incomplete combustion product emitted to air.
  Uncertainty: u
- Carbon monoxide, fossil [air, urban air close to ground]: 2.2619e-5 kg; lognormal variance with pedigree 0.856155, pedigree (1,1,4,2,2)
  Incomplete combustion product emitted to air.
  Uncertainty: u
- Copper, ion [water, surface water]: 7.6217e-8 kg; lognormal variance with pedigree 0.826455, pedigree (1,1,4,2,2)
  (same comment as for Chromium, ion)
- Bromine [air, urban air close to ground]: 6.4593e-8 kg; lognormal variance with pedigree 0.958395, pedigree (1,1,4,2,2)
  Emission to air from waste composition and transfer coefficients.
  Uncertainty: u
- Cobalt [water, surface water]: 2.2149e-10 kg; lognormal variance with pedigree 2.09532, pedigree (1,1,4,2,2)
  (same comment as for Chromium, ion)
- Zinc, ion [water, surface water]: 8.4669e-8 kg; lognormal variance with pedigree 0.602465, pedigree (1,1,4,2,2)
  (same comment as for Chromium, ion)
- Dinitrogen monoxide [air, urban air close to ground]: 4.7817e-5 kg; lognormal variance with pedigree 1.29042, pedigree (1,1,4,2,2)
  Nitrogen species emitted to air after DeNOx stage.
  Uncertainty: u
- Mercury [water, ground-, long-term]: 4.7813e-8 kg; lognormal variance with pedigree 3.05112, pedigree (1,1,4,2,2)
  Long-term emissions from landfilling of incineration residues.
  Uncertainty: u
- Antimony [water, surface water]: 1.1495e-5 kg; lognormal variance with pedigree 1.05363, pedigree (1,1,4,2,2)
  (same comment as for Chromium, ion)
- Arsenic, ion [water, surface water]: 7.0038e-7 kg; lognormal variance with pedigree 1.41722, pedigree (1,1,4,2,2)
  (same comment as for Chromium, ion)
- Barium [water, ground-, long-term]: 0.00013458 kg; lognormal variance with pedigree 0.962455, pedigree (1,1,4,2,2)
  Long-term emissions from landfilling of incineration residues.
  Uncertainty: u
- Mercury [air, urban air close to ground]: 1.8438e-8 kg; lognormal variance with pedigree 1.63522, pedigree (1,1,4,2,2)
  Emission to air from waste composition and transfer coefficients.
  Uncertainty: u
- Cyanide [air, urban air close to ground]: 1.0273e-5 kg; lognormal variance with pedigree 1.29042, pedigree (1,1,4,2,2)
  Nitrogen species emitted to air after DeNOx stage.
  Uncertainty: u
- Titanium, ion [water, ground-, long-term]: 0.00078316 kg; lognormal variance with pedigree 0.768475, pedigree (1,1,4,2,2)
  Long-term emissions from landfilling of incineration residues.
  Uncertainty: u
- Hydrogen fluoride [air, urban air close to ground]: 2.4719e-6 kg; lognormal variance with pedigree 0.809305, pedigree (1,1,4,2,2)
  Emission to air from waste composition and transfer coefficients.
  Uncertainty: u
- Heat, waste [water, surface water]: 2.5451 MJ; lognormal variance with pedigree 0.065053, pedigree (1,1,4,2,2)
  Waste heat generated from heating value of this waste plus any electricity required to process it.
  Uncertainty: u
- Carbon dioxide, fossil [air, urban air close to ground]: 0.47757 kg; lognormal variance with pedigree 0.040591, pedigree (1,1,4,2,2)
  Emission to air from waste composition and transfer coefficients.
  Uncertainty: u
- Nitrate [water, ground-, long-term]: 0.00011531 kg; lognormal variance with pedigree 0.522805, pedigree (1,1,4,2,2)
  Long-term emissions from landfilling of incineration residues.
  Uncertainty: u
- Lead [water, ground-, long-term]: 0.00028461 kg; lognormal variance with pedigree 2.53132, pedigree (1,1,4,2,2)
  Long-term emissions from landfilling of incineration residues.
  Uncertainty: u
- Chromium VI [water, ground-, long-term]: 3.0074e-6 kg; lognormal variance with pedigree 3.48723, pedigree (1,1,4,2,2)
  Long-term emissions from landfilling of incineration residues.
  Uncertainty: u
- Chloride [water, surface water]: 0.0051848 kg; lognormal variance with pedigree 0.286575, pedigree (1,1,4,2,2)
  (same comment as for Chromium, ion)
- Hydrogen chloride [air, urban air close to ground]: 3.4257e-6 kg; lognormal variance with pedigree 0.448985, pedigree (1,1,4,2,2)
  Emission to air from waste composition and transfer coefficients.
  Uncertainty: u
- Vanadium, ion [water, surface water]: 6.1158e-9 kg; lognormal variance with pedigree 1.48622, pedigree (1,1,4,2,2)
  (same comment as for Chromium, ion)
- Beryllium [water, ground-, long-term]: 0.00044076 kg; lognormal variance with pedigree 0.724685, pedigree (1,1,4,2,2)
  Long-term emissions from landfilling of incineration residues.
  Uncertainty: u
- Methane, fossil [air, urban air close to ground]: 1.996e-7 kg; lognormal variance with pedigree 0.110145, pedigree (1,1,4,2,2)
  Incomplete combustion product emitted to air.
  Uncertainty: u
- Cadmium, ion [water, surface water]: 8.1641e-10 kg; lognormal variance with pedigree 1.13922, pedigree (1,1,4,2,2)
  (same comment as for Chromium, ion)
- Cobalt [air, urban air close to ground]: 1.2717e-9 kg; lognormal variance with pedigree 1.55652, pedigree (1,1,4,2,2)
  Emission to air from waste composition and transfer coefficients.
  Uncertainty: u
- Ammonia [air, urban air close to ground]: 8.2185e-7 kg; lognormal variance with pedigree 0.729905, pedigree (1,1,4,2,2)
  Nitrogen species emitted to air after DeNOx stage.
  Uncertainty: u
- Iodide [water, ground-, long-term]: 0 kg; pedigree (1,1,1,1,1)
  Long-term emissions from landfilling of incineration residues.
  Uncertainty: u
- Antimony [water, ground-, long-term]: 2.4086e-5 kg; lognormal variance with pedigree 0.882385, pedigree (1,1,4,2,2)
  Long-term emissions from landfilling of incineration residues.
  Uncertainty: u
- Chloride [water, ground-, long-term]: 0.0014819 kg; lognormal variance with pedigree 0.384235, pedigree (1,1,4,2,2)
  Long-term emissions from landfilling of incineration residues.
  Uncertainty: u
- Silicon [water, surface water]: 5.1658e-6 kg; lognormal variance with pedigree 0.576815, pedigree (1,1,4,2,2)
  (same comment as for Chromium, ion)
- Nickel [air, urban air close to ground]: 3.33e-8 kg; lognormal variance with pedigree 1.07612, pedigree (1,1,4,2,2)
  Emission to air from waste composition and transfer coefficients.
  Uncertainty: u
- Calcium, ion [water, surface water]: 0.00015708 kg; lognormal variance with pedigree 0.314235, pedigree (1,1,4,2,2)
  (same comment as for Chromium, ion)
- Phosphate [water, ground-, long-term]: 0.00010078 kg; lognormal variance with pedigree 4.82383, pedigree (1,1,4,2,2)
  Long-term emissions from landfilling of incineration residues.
  Uncertainty: u
- Mercury [water, surface water]: 8.7829e-10 kg; lognormal variance with pedigree 1.25333, pedigree (1,1,4,2,2)
  (same comment as for Chromium, ion)
- Benzene, hexachloro- [air, urban air close to ground]: 7.1606e-11 kg; lognormal variance with pedigree 0.110145, pedigree (1,1,4,2,2)
  Incomplete combustion product emitted to air.
  Uncertainty: u
- Chromium VI [water, surface water]: 6.9028e-7 kg; lognormal variance with pedigree 1.00649, pedigree (1,1,4,2,2)
  (same comment as for Chromium, ion)
- Fluoride [water, surface water]: 2.8016e-5 kg; lognormal variance with pedigree 0.488585, pedigree (1,1,4,2,2)
  (same comment as for Chromium, ion)
- Carbon monoxide, non-fossil [air, urban air close to ground]: 3.5595e-5 kg; lognormal variance with pedigree 0.856155, pedigree (1,1,4,2,2)
  Incomplete combustion product emitted to air.
  Uncertainty: u
- Potassium [air, urban air close to ground]: 1.0506e-5 kg; lognormal variance with pedigree 0.580345, pedigree (1,1,4,2,2)
  Emission to air from waste composition and transfer coefficients.
  Uncertainty: u
- Zinc, ion [water, ground-, long-term]: 0.00053977 kg; lognormal variance with pedigree 1.78293, pedigree (1,1,4,2,2)
  Long-term emissions from landfilling of incineration residues.
  Uncertainty: u
- Bromine [water, surface water]: 0.00011679 kg; lognormal variance with pedigree 0.442335, pedigree (1,1,4,2,2)
  (same comment as for Chromium, ion)
- Selenium [water, surface water]: 1.0556e-7 kg; lognormal variance with pedigree 1.38833, pedigree (1,1,4,2,2)
  (same comment as for Chromium, ion)
- TOC, Total Organic Carbon [water, surface water]: 0.00017534 kg; lognormal variance with pedigree 0.060914, pedigree (1,1,4,2,2)
  (same comment as for Chromium, ion)
- Sulfate [water, surface water]: 0.00075429 kg; lognormal variance with pedigree 0.289945, pedigree (1,1,4,2,2)
  (same comment as for Chromium, ion)
- Fluoride [water, ground-, long-term]: 0.0003285 kg; lognormal variance with pedigree 0.441135, pedigree (1,1,4,2,2)
  Long-term emissions from landfilling of incineration residues.
  Uncertainty: u
- Calcium, ion [water, ground-, long-term]: 0.015386 kg; lognormal variance with pedigree 0.291405, pedigree (1,1,4,2,2)
  Long-term emissions from landfilling of incineration residues.
  Uncertainty: u
- Phenol, pentachloro- [air, urban air close to ground]: 1.4914e-11 kg; lognormal variance with pedigree 0.110145, pedigree (1,1,4,2,2)
  Incomplete combustion product emitted to air.
  Uncertainty: u
- Silicon [water, ground-, long-term]: 0.0019035 kg; lognormal variance with pedigree 5.49303, pedigree (1,1,4,2,2)
  Long-term emissions from landfilling of incineration residues.
  Uncertainty: u
- Barium [water, surface water]: 2.2754e-8 kg; lognormal variance with pedigree 1.69853, pedigree (1,1,4,2,2)
  (same comment as for Chromium, ion)
- Cobalt [water, ground-, long-term]: 1.2509e-6 kg; lognormal variance with pedigree 1.49612, pedigree (1,1,4,2,2)
  Long-term emissions from landfilling of incineration residues.
  Uncertainty: u
- COD, Chemical Oxygen Demand [water, surface water]: 0.00040223 kg; lognormal variance with pedigree 0.060679, pedigree (1,1,4,2,2)
  (same comment as for Chromium, ion)
- Cadmium, ion [water, ground-, long-term]: 6.929e-7 kg; lognormal variance with pedigree 6.62312, pedigree (1,1,4,2,2)
  Long-term emissions from landfilling of incineration residues.
  Uncertainty: u
- Sodium [air, urban air close to ground]: 2.3358e-5 kg; lognormal variance with pedigree 0.482155, pedigree (1,1,4,2,2)
  Emission to air from waste composition and transfer coefficients.
  Uncertainty: u
- BOD5, Biological Oxygen Demand [water, ground-, long-term]: 0.0015264 kg; lognormal variance with pedigree 0.039363, pedigree (1,1,4,2,2)
  Long-term emissions from landfilling of incineration residues.
  Uncertainty: u
- Boron [water, surface water]: 5.7843e-8 kg; lognormal variance with pedigree 1.53992, pedigree (1,1,4,2,2)
  (same comment as for Chromium, ion)
- Manganese [air, urban air close to ground]: 8.9524e-9 kg; lognormal variance with pedigree 0.884895, pedigree (1,1,4,2,2)
  Emission to air from waste composition and transfer coefficients.
  Uncertainty: u
- Molybdenum [air, urban air close to ground]: 1.3371e-9 kg; lognormal variance with pedigree 1.50622, pedigree (1,1,4,2,2)
  Emission to air from waste composition and transfer coefficients.
  Uncertainty: u
- Silicon [air, urban air close to ground]: 2.4893e-8 kg; lognormal variance with pedigree 0.271615, pedigree (1,1,4,2,2)
  Emission to air from waste composition and transfer coefficients.
  Uncertainty: u
- Lead [water, surface water]: 2.6881e-8 kg; lognormal variance with pedigree 0.729315, pedigree (1,1,4,2,2)
  (same comment as for Chromium, ion)
- Titanium, ion [water, surface water]: 6.0282e-7 kg; lognormal variance with pedigree 0.433325, pedigree (1,1,4,2,2)
  (same comment as for Chromium, ion)
- Sulfur dioxide [air, urban air close to ground]: 1.5247e-5 kg; lognormal variance with pedigree 0.622985, pedigree (1,1,4,2,2)
  Emission to air from waste composition and transfer coefficients.
  Uncertainty: u
- Iron, ion [water, surface water]: 2.3409e-7 kg; lognormal variance with pedigree 0.942685, pedigree (1,1,4,2,2)
  (same comment as for Chromium, ion)
- Selenium [air, urban air close to ground]: 3.7185e-9 kg; lognormal variance with pedigree 1.72742, pedigree (1,1,4,2,2)
  Emission to air from waste composition and transfer coefficients.
  Uncertainty: u
- Phosphorus [air, urban air close to ground]: 7.6203e-7 kg; lognormal variance with pedigree 0.724115, pedigree (1,1,4,2,2)
  Emission to air from waste composition and transfer coefficients.
  Uncertainty: u
- Heat, waste [air, urban air close to ground]: 9.579 MJ; lognormal variance with pedigree 0.065053, pedigree (1,1,4,2,2)
  (same comment as for Heat, waste)
- Silver, ion [water, ground-, long-term]: 5.9299e-7 kg; lognormal variance with pedigree 1.58003, pedigree (1,1,4,2,2)
  Long-term emissions from landfilling of incineration residues.
  Uncertainty: u
- Tin [air, urban air close to ground]: 4.9776e-11 kg; lognormal variance with pedigree 1.04662, pedigree (1,1,4,2,2)
  Emission to air from waste composition and transfer coefficients.
  Uncertainty: u
- Water [water, surface water]: 0.00046375 m3; lognormal variance with pedigree 1.05492, pedigree (1,1,4,2,2)
  Process water released to surface water.
  Uncertainty: u
- Potassium, ion [water, ground-, long-term]: 0.0016585 kg; lognormal variance with pedigree 0.290515, pedigree (1,1,4,2,2)
  Long-term emissions from landfilling of incineration residues.
  Uncertainty: u
- Copper, ion [water, ground-, long-term]: 0.00075344 kg; lognormal variance with pedigree 0.666725, pedigree (1,1,4,2,2)
  Long-term emissions from landfilling of incineration residues.
  Uncertainty: u
- Sodium, ion [water, ground-, long-term]: 0.0037138 kg; lognormal variance with pedigree 0.306105, pedigree (1,1,4,2,2)
  Long-term emissions from landfilling of incineration residues.
  Uncertainty: u
- Molybdenum [water, surface water]: 3.2368e-7 kg; lognormal variance with pedigree 0.952545, pedigree (1,1,4,2,2)
  (same comment as for Chromium, ion)
- DOC, Dissolved Organic Carbon [water, ground-, long-term]: 0.0018466 kg; lognormal variance with pedigree 0.039363, pedigree (1,1,4,2,2)
  Long-term emissions from landfilling of incineration residues.
  Uncertainty: u
- Iodide [water, surface water]: 1.2412e-8 kg; lognormal variance with pedigree 1.44312, pedigree (1,1,4,2,2)
  (same comment as for Chromium, ion)
- Molybdenum [water, ground-, long-term]: 1.6815e-6 kg; lognormal variance with pedigree 1.48683, pedigree (1,1,4,2,2)
  Long-term emissions from landfilling of incineration residues.
  Uncertainty: u
- Silver, ion [water, surface water]: 1.4952e-9 kg; lognormal variance with pedigree 1.58272, pedigree (1,1,4,2,2)
  (same comment as for Chromium, ion)
- Vanadium, ion [water, ground-, long-term]: 1.5379e-6 kg; lognormal variance with pedigree 2.07002, pedigree (1,1,4,2,2)
  Long-term emissions from landfilling of incineration residues.
  Uncertainty: u
- Zinc [air, urban air close to ground]: 5.6648e-7 kg; lognormal variance with pedigree 0.673445, pedigree (1,1,4,2,2)
  Emission to air from waste composition and transfer coefficients.
  Uncertainty: u
- BOD5, Biological Oxygen Demand [water, surface water]: 0.00039198 kg; lognormal variance with pedigree 0.062905, pedigree (1,1,4,2,2)
  (same comment as for Chromium, ion)
- Iron [air, urban air close to ground]: 1.1832e-8 kg; lognormal variance with pedigree 0.354115, pedigree (1,1,4,2,2)
  Emission to air from waste composition and transfer coefficients.
  Uncertainty: u
- Beryllium [water, surface water]: 2.9532e-7 kg; lognormal variance with pedigree 1.34702, pedigree (1,1,4,2,2)
  (same comment as for Chromium, ion)
- Arsenic [air, urban air close to ground]: 7.9133e-9 kg; lognormal variance with pedigree 1.54222, pedigree (1,1,4,2,2)
  Emission to air from waste composition and transfer coefficients.
  Uncertainty: u

## Extrapolations
This dataset has been extrapolated from year 2012 to the year of the calculation (2021). The uncertainty has been adjusted accordingly.
