# heat production, wood pellet, at furnace 300kW

Dataset: EcoSpold 2, unit process
Geography: CH
Time period: 2000-01-01 to 2021-01-31
Technology level: current
Classification: ISIC rev.4 ecoinvent: 3530:Steam and air conditioning supply
Classification: EcoSpold01Categories: wood energy/heating systems
Scenario: Business-as-Usual
System model: Allocation, cut-off by classification
Share of production covered: 100 %
Generated by: Christian Bauer
Published in: Bauer, C. 2007
Database: ecoinvent
isCopyrightProtected: true
accessRestrictedTo: 1

## General comment
Activity represents combustion of wood pellets in average wood pellet furnaces in Switzerland in 2014. The inventory shall be considered valid for boilers with nominal capacities in the approximate range of 100 to 500 kW. The activity represents average annual operation including start/stop (warm up and cool down), which reduces the efficiency compared to rated values provided by boiler manufacturers and increases some emission factors such as CO. Air emission factors as well as other exchanges correspond to v2.2 except of PM, CO, NOx, CH4 and NMVOC. These key emission factors were updated based on latest available information.

## Included activities start
From reception of wood pellets.

## Included activities end
This activity represents the combustion of wood pellets until heat production at the boiler outlet. Included are the infrastructure, the wood requirements (average pellets, u=10%), the emissions to air, the electricity needed for operation, and the disposal of the ashes.

## Geography
valid for average Switzerland

## Technology
Boiler of average technology installed in CH in 2014

## Time period
Some emission data are from the second half of the 1990´s. However, key emission factors (PM, CO, NOx, CH4 and NMVOC) are updated in 2014

## Parameters
- scaling factor: 1.33333 dimensionless; name scaling_factor; = 1/0.75
  the scaling factor corresponds to the inverse of the annual use efficiency. This efficiency represents an average annual value including start/stop operation (warm-up and cool down), which reduces the efficiency compared to rated values of the manufacturer. Source: Thomas Nussbaumer, Verenum, January 2014, personal communication.

## Reference product
- heat, central or small-scale, other than natural gas: 1 MJ; = 0.75 * scaling_factor; source T. Nussbaumer 2014; CPC 17300: Steam and hot water; By-product classification allocatable product
  EcoSpold01Location=CH
  Original dataset referred to 1MJ energy input (end energy). Amount was scaled to 1 using annual use efficiency of 0.75 (according to source).
  production volume 2.672e8 MJ; name heat_apv; = 6.68e8*0.4
    Literature value corresponding to useful energy in table F, heating device category 12b according to the source. 40% of total considered as "current" technology corresponding to average of installed devices in this category. This fraction was estimated based on the trend in recent years: installations after 2007 (update of Swiss emission standards) are categorized as "modern".
  property price 0.0106 EUR2005
    Average European district heat price from Ecoheatcool and Euroheat 2005-2006, Ecoheat Work package 1: The European heat market. Final report. 10.6 EUR/GJ i s the price of district heat. http://www.solarthermalworld.org/files/Ecoheatcool%20WP1%20Web.pdf?download
  properties: Corresponding fuel use 1.17647 MJ, heating value, net 1 MJ

## Inputs from technosphere
- wood pellet, measured as dry mass: 0.0711533 kg; = 0.053365 * scaling_factor; source Bauer, C. 2007; lognormal variance with pedigree 0.4707, pedigree (2,2,5,1,1)
  EcoSpold01Location=RER
  Literature value. Original amount (from the source, ecoinvent v2.2) was scaled to the amount of the new reference product using the annual efficiency. Corresponds to a LHV of 18.7 MJ/kg.
  properties: dry mass 1 kg, wet mass 1.1 kg, carbon content, non-fossil 0.494, water content 0.1, heating value, net 13.38 MJ
  note on carbon content, non-fossil: C content of dry mass is 0.494 kgC/kg dry wood (ecoinvent v2.2 report 9).
- furnace, pellets, with silo, 300kW: 3.08642e-8 unit; = 1/(20*2000*300*3.6) * scaling_factor; lognormal variance with pedigree 0.4707, pedigree (2,2,5,1,1)
  Calculated value. Assuming 20 years lifetime, 2000 operational hours per year, 300kW capactiy.
- electricity, low voltage: 0.00556 kWh; = 0.00417 * scaling_factor; source Bauer, C. 2007; lognormal variance with pedigree 0.4707, pedigree (2,2,5,1,1)
  EcoSpold01Location=CH
  general assuption
  Amount was scaled to the amount of reference product.
- wood ash mixture, pure: -0.000317333 kg; name wood_ash; = (0.000238 * scaling_factor)*-1; source Bauer, C. 2007; lognormal variance with pedigree 0.002, pedigree (1,1,3,1,1)
  homogeneous fuel
  Amount was scaled to the amount of reference product.
  EcoSpold01Location=CH
  production volume 84791.5 kg; = heat_apv*wood_ash
    Calculated from the production volume of wood pellet, mixed, burned in furnace 50kW in proportion to the respective output amounts.
  property price 0 EUR2005; name wood_ash_price_EUR2005
  properties: wet mass 1 kg, carbon content, non-fossil 0.012, dry mass 1 kg

## Emissions to nature
- Sodium [air, urban air close to ground]: 1.73333e-6 kg; = 1.3E-06 * scaling_factor; source Bauer, C. 2007; lognormal variance with pedigree 0.4707, pedigree (2,2,5,1,1)
  extrapolation, based on measuring data of other emissions
  Amount was scaled to the amount of reference product.
- Magnesium [air, urban air close to ground]: 4.8e-7 kg; = 3.6E-07 * scaling_factor; source Bauer, C. 2007; lognormal variance with pedigree 0.4707, pedigree (2,2,5,1,1)
  (same comment as for Sodium)
- Potassium [air, urban air close to ground]: 3.12e-5 kg; = 2.34E-05 * scaling_factor; source Bauer, C. 2007; lognormal variance with pedigree 0.4707, pedigree (2,2,5,1,1)
  (same comment as for Sodium)
- Phenol, pentachloro- [air, urban air close to ground]: 1.08e-11 kg; = 8.1E-12 * scaling_factor; source Bauer, C. 2007; lognormal variance with pedigree 0.4707, pedigree (2,2,5,1,1)
  (same comment as for Sodium)
- Benzene [air, urban air close to ground]: 1.21333e-6 kg; = 9.1E-07 * scaling_factor; source Bauer, C. 2007; lognormal variance with pedigree 0.4707, pedigree (2,2,5,1,1)
  (same comment as for Sodium)
- Hydrocarbons, aliphatic, unsaturated [air, urban air close to ground]: 4.13333e-6 kg; = 3.1E-06 * scaling_factor; source Bauer, C. 2007; lognormal variance with pedigree 0.4707, pedigree (2,2,5,1,1)
  (same comment as for Sodium)
- Ammonia [air, urban air close to ground]: 2.30667e-6 kg; = 1.73E-06 * scaling_factor; source Bauer, C. 2007; lognormal variance with pedigree 0.4707, pedigree (2,2,5,1,1)
  (same comment as for Sodium)
- Dinitrogen monoxide [air, urban air close to ground]: 3.33333e-6 kg; = 2.5E-06 * scaling_factor; source Bauer, C. 2007; lognormal variance with pedigree 0.4707, pedigree (2,2,5,1,1)
  (same comment as for Sodium)
- Cadmium [air, urban air close to ground]: 9.33333e-10 kg; = 7E-10 * scaling_factor; source Bauer, C. 2007; lognormal variance with pedigree 0.4707, pedigree (2,2,5,1,1)
  (same comment as for Sodium)
- Dioxins, measured as 2,3,7,8-tetrachlorodibenzo-p-dioxin [air, urban air close to ground]: 4.13333e-14 kg; = 3.1E-14 * scaling_factor; source Bauer, C. 2007; lognormal variance with pedigree 0.4707, pedigree (2,2,5,1,1)
  (same comment as for Sodium)
- Phosphorus [air, urban air close to ground]: 4e-7 kg; = 3E-07 * scaling_factor; source Bauer, C. 2007; lognormal variance with pedigree 0.4707, pedigree (2,2,5,1,1)
  (same comment as for Sodium)
- Carbon dioxide, non-fossil [air, urban air close to ground]: 0.128667 kg; = 0.0965 * scaling_factor; source Bauer, C. 2007; lognormal variance with pedigree 0.4707, pedigree (2,2,5,1,1)
  uncertainty of carbon content in the wood
  Amount was scaled to the amount of reference product.
- Lead [air, urban air close to ground]: 3.33333e-8 kg; = 2.5E-08 * scaling_factor; source Bauer, C. 2007; lognormal variance with pedigree 0.4707, pedigree (2,2,5,1,1)
  (same comment as for Sodium)
- Toluene [air, urban air close to ground]: 4e-7 kg; = 3E-07 * scaling_factor; source Bauer, C. 2007; lognormal variance with pedigree 0.4707, pedigree (2,2,5,1,1)
  (same comment as for Sodium)
- NMVOC, non-methane volatile organic compounds, unspecified origin [air, urban air close to ground]: 9.33333e-6 kg; = 7E-06 * scaling_factor; source T. Nussbaumer 2014; lognormal variance with pedigree 0.0327, pedigree (2,2,3,1,1)
  estimation
- Chromium VI [air, urban air close to ground]: 5.33333e-11 kg; = 4E-11 * scaling_factor; source Bauer, C. 2007; lognormal variance with pedigree 0.4707, pedigree (2,2,5,1,1)
  range of data
  Amount was scaled to the amount of reference product.
- Benzo(a)pyrene [air, urban air close to ground]: 6.66667e-10 kg; = 5E-10 * scaling_factor; source Bauer, C. 2007; lognormal variance with pedigree 0.4707, pedigree (2,2,5,1,1)
  (same comment as for Sodium)
- Copper [air, urban air close to ground]: 2.93333e-8 kg; = 2.2E-08 * scaling_factor; source Bauer, C. 2007; lognormal variance with pedigree 0.4707, pedigree (2,2,5,1,1)
  (same comment as for Sodium)
- Water [air, urban air close to ground]: 7.12e-5 m3; lognormal variance with pedigree 0.0083, pedigree (2,2,3,1,2)
  calculated value, supposed to ensure correct water balance
- Manganese [air, urban air close to ground]: 2.26667e-7 kg; = 1.7E-07 * scaling_factor; source Bauer, C. 2007; lognormal variance with pedigree 0.4707, pedigree (2,2,5,1,1)
  (same comment as for Sodium)
- Sulfur dioxide [air, urban air close to ground]: 3.33333e-6 kg; = 2.5E-06 * scaling_factor; source Bauer, C. 2007; lognormal variance with pedigree 0.4707, pedigree (2,2,5,1,1)
  (same comment as for Sodium)
- Particulates, > 2.5 um, and < 10um [air, urban air close to ground]: 3.33333e-6 kg; = 2.5E-06 * scaling_factor; source T. Nussbaumer 2014; lognormal variance with pedigree 0.0327, pedigree (2,2,3,1,1)
  estimation
- Zinc [air, urban air close to ground]: 4e-7 kg; = 3E-07 * scaling_factor; source Bauer, C. 2007; lognormal variance with pedigree 0.4707, pedigree (2,2,5,1,1)
  (same comment as for Sodium)
- Chromium [air, urban air close to ground]: 5.28e-9 kg; = 3.96E-09 * scaling_factor; source Bauer, C. 2007; lognormal variance with pedigree 0.4707, pedigree (2,2,5,1,1)
  (same comment as for Sodium)
- Chlorine [air, urban air close to ground]: 2.4e-7 kg; = 1.8E-07 * scaling_factor; source Bauer, C. 2007; lognormal variance with pedigree 0.4707, pedigree (2,2,5,1,1)
  (same comment as for Sodium)
- Hydrocarbons, aliphatic, alkanes, unspecified [air, urban air close to ground]: 1.21333e-6 kg; = 9.1E-07 * scaling_factor; source Bauer, C. 2007; lognormal variance with pedigree 0.4707, pedigree (2,2,5,1,1)
  (same comment as for Sodium)
- Fluorine [air, urban air close to ground]: 6.66667e-8 kg; = 5E-08 * scaling_factor; source Bauer, C. 2007; lognormal variance with pedigree 0.4707, pedigree (2,2,5,1,1)
  (same comment as for Sodium)
- Acetaldehyde [air, urban air close to ground]: 8.13333e-8 kg; = 6.1E-08 * scaling_factor; source Bauer, C. 2007; lognormal variance with pedigree 0.4707, pedigree (2,2,5,1,1)
  (same comment as for Sodium)
- Particulates, < 2.5 um [air, urban air close to ground]: 6e-5 kg; = 4.5E-05 * scaling_factor; source T. Nussbaumer 2014; lognormal variance with pedigree 0.0327, pedigree (2,2,3,1,1)
  estimation
- Carbon monoxide, non-fossil [air, urban air close to ground]: 0.0002 kg; = 1.5E-04 * scaling_factor; source T. Nussbaumer 2014; lognormal variance with pedigree 0.0327, pedigree (2,2,3,1,1)
  estimation
- Methane, non-fossil [air, urban air close to ground]: 4e-6 kg; = 3E-06 * scaling_factor; source Bauer, C. 2007; lognormal variance with pedigree 0.4707, pedigree (2,2,5,1,1)
  (same comment as for Sodium)
- Calcium [air, urban air close to ground]: 7.8e-6 kg; = 5.85E-06 * scaling_factor; source Bauer, C. 2007; lognormal variance with pedigree 0.4707, pedigree (2,2,5,1,1)
  (same comment as for Sodium)
- Benzene, ethyl- [air, urban air close to ground]: 4e-8 kg; = 3E-08 * scaling_factor; source Bauer, C. 2007; lognormal variance with pedigree 0.4707, pedigree (2,2,5,1,1)
  (same comment as for Sodium)
- Nitrogen oxides [air, urban air close to ground]: 9.33333e-5 kg; = 7E-05 * scaling_factor; source T. Nussbaumer 2014; lognormal variance with pedigree 0.0327, pedigree (2,2,3,1,1)
  estimation
- Bromine [air, urban air close to ground]: 8e-8 kg; = 6E-08 * scaling_factor; source Bauer, C. 2007; lognormal variance with pedigree 0.4707, pedigree (2,2,5,1,1)
  (same comment as for Sodium)
- Nickel [air, urban air close to ground]: 8e-9 kg; = 6E-09 * scaling_factor; source Bauer, C. 2007; lognormal variance with pedigree 0.4707, pedigree (2,2,5,1,1)
  (same comment as for Sodium)
- Mercury [air, urban air close to ground]: 4e-10 kg; = 3E-10 * scaling_factor; source Bauer, C. 2007; lognormal variance with pedigree 0.4707, pedigree (2,2,5,1,1)
  (same comment as for Sodium)
- Arsenic [air, urban air close to ground]: 1.33333e-9 kg; = 1E-09 * scaling_factor; source Bauer, C. 2007; lognormal variance with pedigree 0.4707, pedigree (2,2,5,1,1)
  (same comment as for Sodium)
- Formaldehyde [air, urban air close to ground]: 1.73333e-7 kg; = 1.3E-07 * scaling_factor; source Bauer, C. 2007; lognormal variance with pedigree 0.4707, pedigree (2,2,5,1,1)
  (same comment as for Sodium)
- PAH, polycyclic aromatic hydrocarbons [air, urban air close to ground]: 1.48e-8 kg; = 1.11E-08 * scaling_factor; source Bauer, C. 2007; lognormal variance with pedigree 0.4707, pedigree (2,2,5,1,1)
  (same comment as for Sodium)
- m-Xylene [air, urban air close to ground]: 1.6e-7 kg; = 1.2E-07 * scaling_factor; source Bauer, C. 2007; lognormal variance with pedigree 0.4707, pedigree (2,2,5,1,1)
  (same comment as for Sodium)
- Benzene, hexachloro- [air, urban air close to ground]: 9.6e-15 kg; = 7.2E-15 * scaling_factor; source Bauer, C. 2007; lognormal variance with pedigree 0.4707, pedigree (2,2,5,1,1)
  (same comment as for Sodium)

## Sampling procedure
literature

## Extrapolations
This dataset has been extrapolated from year 2014 to the year of the calculation (2021). The uncertainty has been adjusted accordingly.
