# palm date production, organic

Dataset: EcoSpold 2, unit process
Geography: GLO
Time period: 2012-01-01 to 2021-12-31
Technology level: current
Classification: ISIC rev.4 ecoinvent: 0122:Growing of tropical and subtropical fruits
Synonyms: L.; Phoenix Dactylifera
Scenario: Business-as-Usual
System model: Allocation, cut-off by classification
Generated by: Kenza Benabderrazik
Database: ecoinvent
isCopyrightProtected: true
accessRestrictedTo: 1

## General comment
This dataset represent the production of 1 kg of palm dates (fresh matter). The yield is 7281kg/ha.The average of palm trees per hectare is 100 (thus we count 72.81 kg of palm dates per tree). The lifetime of a palm tree is estimated at 80 years, during which the first 5 years the palm tree grows but does not produce fruit. This data takes into account these 5 first years. The organic production of palm date precludes the use of pesticides and funigides. The production of palm date are mainly manual and does not require machineries.

## Included activities start
This activity starts when planting palm trees in the field.The production of the cutting is not considered. All processes of the agricultural production are included, such as the ressources used for the fruit growth.

## Included activities end
The dataset includs all the operations for the production of the fruits during one year. It includes Soil cultivation, harvesting, irrigating. This activity ends when the fruit is harvested and transported to a storage facility (10 km from the field).

## Geography
This dataset is an extrapolation that refers to an average production in south Tunisia - Chott Djerid - Tozeur

## Technology
Organic production

## Time period
The yield data have been collected for the year 2012

## Reference product
- palm date, organic: 1 kg; By-product classification allocatable product; CPC 01314: Dates
  production volume 5.80511e8 kg
    Correspond to the production of palm date in the world according to the FAOSTAT, in 2012. It has been supposed that 1/13th of this production is organic. This assumption has been made by extrapolation of the tunisian ratio.
  property price 0.564 EUR2005
    Calculated value based on data from United Nations Commodity Trade Statistics Database (comtrade.un.org). UN comtrade category: 80410 Dates, fresh or dried. Year: 2005. Using exchange rate of 1EURO = 1.209 USD. Average of price of import into 5 main markets (EU, US, JP, IN and CN). Price increased by 20% (expert judgement) to reflect, that it is organic production.
  property carbon content 0.251
    carbon content on a dry matter basis (reserved; not for manual entry)
  properties: fat (total lipid) content 0.0014 kg, wet mass 1 kg, protein content 0.015, dry mass 0.791139 kg, carbon content, fossil 0, water in wet mass 0.208861 kg, carbohydrates content 0.549 kg, water content 0.264, carbon content, non-fossil 0.251, carbon allocation 0.198576 kg

## Inputs from technosphere
- irrigation: 3.085 m3; name w_irr; lognormal variance with pedigree 0.0206, pedigree (4,4,4,1,2)
  The water is drawn form two aquifers, the total amount is estimated to 225 m3 per tree per year.
  In order to irrigate the field, a pump was set up by the tunisan governement. Each farmer has to pay for the electric consumption of the pump.
  Irrigation in the field is a surface irrigation, water is pumped from the water table and is carried in the palm by irrigation canals. Besides the hydraulic pump, irrigation is not mechanized (no sprinkler system).
  The hydraulic system is then the irrigation pipelines and irrigation rooms in cement. The cement is used for the construction of water chambers to irriguate the plam treses. There is about 24 chambers for 1 ha. With a density of 2162 kg/m3 for the cement and a volume of 0.314 m3 for one room, we assume that each rooms weighs 675 kg. Also we assume that the lifetime of the cement in those conditions is about 15 years.
  properties: dry mass 0.11 kg, water content 9089.91, wet mass 1000 kg
- packaging, for pesticides: 0.00824 kg; lognormal variance with pedigree 0.0592, pedigree (4,3,4,5,4)
  Total amount of active substance/s of pesticides needed for the production of palm date, organic is calculated to be circa 4.12E-03 kg. Pesticide/s used in this dataset is/are: 'sulfur'. The total amount of active substance/s is doubled in order to account for the packaging of the dilluted product of pesticide/s that is/are applied. Therefore, 8.24E-03 kg of packaging for pesticides is justified with this exchange.
  properties: carbon content, fossil 0.85714, dry mass 1 kg, heating value, net 25.97 MJ, wet mass 1 kg, price 0.0642 EUR2005
- sulfur: 0.00412 kg; lognormal variance with pedigree 0.0592, pedigree (4,4,4,4,4)
  In order to replace chemical pesticide and fungicides for the organic production, a mixture of 80% sulfure is used in the field. We count 300g per palm tree each year
  properties: dry mass 1 kg, wet mass 1 kg
- transport, freight, lorry 16-32 metric ton, EURO3: 0 metric ton*km; pedigree (1,1,1,1,1)
  Once the palm dates are collected, they are then transported by a lorry to a storage unit 10 km away from the fields.
- transport, tractor and trailer, agricultural: 0 metric ton*km; pedigree (1,1,1,1,1)
  The palm dates are collected and the tillage is made with a tractor. This engine is not used really often, and for only small distance.But as it is the only machinery used inside the field it seems important to modelise it.
- poultry manure, fresh: 0.4944 kg; lognormal variance with pedigree 0.0986, pedigree (4,4,4,4,4)
  Manure is the main organic fertilizer used in the field. For organic production 36 kg per palm tree per year is used. It comes from the animals that belong to the farmer or it is purshased in local markets.
  properties: dry mass 0.38 kg, carbon content, non-fossil 0.33389, water content 1.63158, wet mass 1 kg
- transport, freight, lorry 16-32 metric ton, EURO3: 0.00103663, 0.000872625, 0.00809074 metric ton*km (3 entries); lognormal variance with pedigree 0.1386, pedigree (4,4,4,1,2)
  (same comment as for transport, freight, lorry 16-32 metric ton, EURO3)
- transport, tractor and trailer, agricultural: 0.000243, 0.059757 metric ton*km (2 entries); lognormal variance with pedigree 0.1386, pedigree (4,4,4,1,2)
  (same comment as for transport, tractor and trailer, agricultural)

## Inputs from nature
- Transformation, from permanent crop, irrigated, intensive [natural resource, land]: 0.0183 m2; lognormal variance with pedigree 0.0266, pedigree (4,4,4,1,2)
  Values calculated from a crop of 1 ha based in tunisia with a mean yield of 7281 kg/ha every year. The lifetime of the crop is 80 years
- Occupation, permanent crop, irrigated, intensive [natural resource, land]: 1.465 m2*year; lognormal variance with pedigree 0.0206, pedigree (4,4,4,1,2)
  The field is located in the south of tunisia - Near the desert. The crop is then irrigated regularly to fullfill the need of the palm trees. Values calculated from a crop of 1 ha based in tunisia with a mean yield of 7281 kg/ha every year. The lifetime of the crop is 80 years, knowing that dates are produced only 75 years
- Carbon dioxide, in air [natural resource, in air]: 0.7282 kg; lognormal variance with pedigree 0.0586, pedigree (4,4,4,1,4)
  The dry matter content is 0.79114, the C content on a dry matter basis 0.251, 0.79114*0.251=0.1986 kg C/kg dates harvested. This value has to be multiplied by the yield and converted to CO2: 0.1986*44/12=6177.3 kg CO2. This amount of CO2 is taken up from the air and converted to the product.
- Transformation, to permanent crop, irrigated, intensive [natural resource, land]: 0.0183 m2; lognormal variance with pedigree 0.0266, pedigree (4,4,4,1,2)
  (same comment as for Transformation, from permanent crop, irrigated, intensive)

## Emissions to nature
- Ammonia [air, low population density, long-term]: 0.00078 kg; lognormal variance with pedigree 0.0986, pedigree (4,4,4,4,4)
  emission to air calculated regarding the ecoinvent report n°15 published in 2007
- Dinitrogen monoxide [air, low population density, long-term]: 0.0083 kg; lognormal variance with pedigree 0.0986, pedigree (4,4,4,4,4)
  emission to air calculated regarding the ecoinvent report n°15 published in 2007
- Water [water, surface water]: 0.617 m3; = w_irr*0.2; lognormal variance with pedigree 0.3186, pedigree (4,4,4,1,2)
  When modelling water use (irrigation) during agricultural production the default assumption is, that 80% of water used for irrigation is released to the ground (groundwater) and 20% to surface water bodies.
- Nitrogen oxides [air, low population density, long-term]: 0.00017 kg; lognormal variance with pedigree 0.0986, pedigree (4,4,4,4,4)
  Emission to air calculated regarding the ecoinvent report n°15 published in 2007
- Water [water, ground-]: 2.468 m3; = w_irr*0.8; lognormal variance with pedigree 0.3186, pedigree (4,4,4,1,2)
  (same comment as for Water)
- Sulfur [soil, agricultural]: 0.00412 kg; lognormal variance with pedigree 0.0986, pedigree (4,4,4,4,4)
  It has been decided to model 100% of the emissions to soil

## Sampling procedure
Data were compiled from informations provided by farmers in the region of Tozeur, Tunisia. The datas were verified and adjusted by experts in palm date. The yield of the organic production has been defined by the General Direction of Organic Agricultre (Tunisia). As the production of palm date occurs in an arid regions, no emission to water are included (leaching of NO3, PO4, heavy metals , soil erosion, etc. ).

## Extrapolations
This dataset has been extrapolated from year 2012 to the year of the calculation (2021). The uncertainty has been adjusted accordingly.
