# electricity production, hard coal

Dataset: EcoSpold 2, unit process
Geography: KR
Time period: 1980-01-01 to 2021-12-31
Technology level: modern
Classification: EcoSpold01Categories: hard coal/power plants
Classification: ISIC rev.4 ecoinvent: 3510:Electric power generation, transmission and distribution
Synonyms: other bituminous coal; anthracite; coking coal
Tags: coal power; fossil fuels; hard coal power
Scenario: Business-as-Usual
System model: Allocation, cut-off by classification
Generated by: Karin Treyer
Published in: Röder, A. 2007
Database: ecoinvent
isCopyrightProtected: true
accessRestrictedTo: 1

## General comment
This dataset represents the production of high voltage electricity in an average hard coal power plant in South Korea in 2012. "Hard coal" includes anthracite, coking coal and other bituminous coal according to the definition of the IEA electricity information 2014. (IEA. 2014. Electricity Information 2014. ISBN 978-92-64-21692-1. International Energy Agency (IEA), Paris Cedex (FR).)
All exchanges in this dataset except for emissions of SO2, NOx and particles are production-weighted averages of the figures in the datasets in ecoinvent version two, which are valid for the following 14 countries: AT, BE, ES, FR, IT, NL, PT, DE, CZ, HR, PL, SK, CN, US. The exception values are production-weighted averages of version 2 countries and the new countries in version 3 (AU, CA, CL, ID, IN, KR, MX, MY, PE, RU, TH, TR, TW, TZ, UA, ZA)
Comments on the inventory data of emissions:
- For the assessment of main characteristics (sulphur and ash content of coal, efficiency of the plant) and CO2 a bottom-up approach has been used. It consists in the collection of information about single plants.
- The size distribution of particle emissions has been derived from German data.
- Halogene emissions have been estimated on the basis of the content of the species in the country-specific coal input mix, assuming average retention rates.
- For CO and particle emissions average values for the former UCTE are included (Union for the Coordination of the Transmission of Electricity, since 2009 replaced by ENTSO-E European Network of Transmission System Operators for Electricity).
- The country specific emission depend on the share of DeNOx.
- Emissions of trace elements were calculated by means of a formula (CORINAIR) using the ash content in the country-specific coal input mix and average transfer coefficients for coal power plants, taking into account the share of DeSOx installed.
- Emission of uranium and thorium radioactive isotopes were assumed proportional to the corresponding element emitted with particles; the other non-gaseous radioactive isotopes of the uranium and thorium decay chain were assumed proportional to the emitted U-238 or Th-232.
- The emission of gaseous radon and K-40 are taken from the literature.
IEA. 2009. Coal information, 2009 edition. Documentation for beyond 2020 files. International Energy Agency.
European Environment Agency (1991) CORINAIR Inventory; VOC"s Default Emission Factors

## Included activities start
From the constructed hard coal power plant ready to produce electricity.
From reception of hard coal and operating materials at power plant gate.

## Included activities end
This activity ends with 1kWh of high voltage electricity produced at the power plant and arrived at the busbar.

This dataset includes:
- all operation and maintenance activities and materials of the power plants.
- Use of fuel oil for startup
- Particle removal (dedusting of the flue gas)

- Desulfurisation and denitrification. These processes are described in separate modules; it can be decided by changing the values of NOx and SOx retained whether and how much DeNOx and DeSOx are installed.
- Cooling: It is assumed that all plants use wet cooling with a cooling tower. No cooling tower is included in this dataset (will be implemented in future versions)
- Loss of feed water
- Transport of the hard coal from the delivering country to South Korea, but not the transports within South Korea.

This dataset doesn"t include
- raw materials extraction, decommissioning and waste treatment as these activities are already included in the infrastructure datasets
- transformation of the electricity produced
- The disposal of non-recycled ashes is modelled separately.

## Technology
POWER PLANT:
Hard coal power plant input is a market mix of 100MWe power plants (representing all power plants with a capacity <250MWe and 7% of the installed capacity) and 500MWe power plants (representing all power plants with a capacity >250MWe and 93% of the installed capacity). The plants are used for middle load with 4000 hours of operation at full capacity per year. The plants are assumed to operate 150000 hours during its lifetime.
OTHER DATA:
- Share of installed capacity with desulfurisation 1% (figure based on
- Average efficiency of desulfurisation installations: 91% (figure based on
- Share of installed capacity with denitrification (primary and/or secondary installations): 1% (figure based on
- Average efficiency of denitrification installations: 8% (estimation based on Dones et al. 27, p.128. Valid for selective catalytic reaction systems)
- Share of installed capacity with particle filters: 1% (figure based on IEA 212 )
- Average efficiency of particle filters: 99.7% (figure based on IEA 212 and estimation)
- IEA 2012. Coal Power Database. International Energy Agency Clean Coal Centre, London
- IEA/OECD. 2010. Electricity Information 2010. International Energy Agency (IEA), Paris Cedex (FR). Part IV. Detailed OECD Electricity And Heat Data.
- Dones, R., Bauer, C., Röder, A. (2007) Kohle. In: Dones, R. (Ed.) et al., Sachbilanzen von Energiesystemen: Grundlagen für den ökologischen Vergleich von Energiesystemen und den Einbezug von Energiesystemen in Ökobilanzen für die Schweiz. Final report ecoinvent No.

## Time period
The Annual Production Volume is valid for the year 2012.

## Parameters
- water consumption, electricity production from hard coal, once-through and cooli: 0.0014 m3/kWh; name WConsumption_EP_HC_once_through_andCP_CS; lognormal variance with pedigree 0.092025, pedigree (4,4,3,2,4)
  Estimated based on literature (Scown, 2011, Water Footprint of U.S. Transportation Fuels, SI). The amount of water consumed while burning lignite and peat is assumed to be the same as in case of coal.
  nan
- fraction, water, completely softened, to air: 0.15 dimensionless; name fraction_WCS_to_air; = fraction_PW_to_air; lognormal variance with pedigree 0.092025, pedigree (4,4,3,2,4)
  Calculated value. See comment in the other parametres present in this dataset. Water, completely softened is considered to be always used as process water, thus process water fractions to air are applied to all water, completely softened input flows to calculate the amount of water consumed in the processes.
  nan
- once-through and cooling pond cooling systems as a fraction of all cooling syste: 0.625 dimensionless; name once_through_andCP_CS_fractio_from_allCS; lognormal variance with pedigree 0.092025, pedigree (4,4,3,2,4)
  Calculated as an average of data available for Europe (Floerke, 2008, Future changes of freshwater needs in the electricity production sector) and USA (NERL, 2011, Estimating freshwater needs to meet future thermoelectric generation requirements).
  nan
- water withdrawal, electricity production from hard coal, recirculating CS: 0.0021 m3/kWh; name WWithdrawal_EP_HC_recirculating_CS; lognormal variance with pedigree 0.092025, pedigree (4,4,3,2,4)
  Estimated based on literature (Scown, 2011, Water Footprint of U.S. Transportation Fuels, SI). The amount of water withdrawn while burning lignite and peat is assumed to be the same as in case of coal.
  nan
- water withdrawal, electricity production from hard coal, once-through and coolin: 0.0815 m3/kWh; name WWithdrawal_EP_HC_once_through_andCP_CS; lognormal variance with pedigree 0.092025, pedigree (4,4,3,2,4)
  (same comment as for water withdrawal, electricity production from hard coal, recirculating)
- recirculating cooling system as a fraction of all cooling systems: 0.375 dimensionless; name recirculating_CS_fraction_from_allCS; lognormal variance with pedigree 0.092025, pedigree (4,4,3,2,4)
  (same comment as for once-through and cooling pond cooling systems as a fraction of all coo)
- water consumption, electricity production from hard coal, recirculating CS: 0.0018 m3/kWh; name WConsumption_EP_HC_recirculatingCS; lognormal variance with pedigree 0.092025, pedigree (4,4,3,2,4)
  (same comment as for water consumption, electricity production from hard coal, once-through)
- fraction, cooling water, to air: 0.0299662 dimensionless; name fraction_CW_to_air; = (WConsumption_EP_HC_recirculatingCS*recirculating_CS_fraction_from_allCS+WConsumption_EP_HC_once_through_andCP_CS*once_through_andCP_CS_fractio_from_allCS)/(WWithdrawal_EP_HC_recirculating_CS*recirculating_CS_fraction_from_allCS+WWithdrawal_EP_HC_once_through_andCP_CS*once_through_andCP_CS_fractio_from_allCS); lognormal variance with pedigree 0.092025, pedigree (4,4,3,2,4)
  Calculated
  nan
- fraction, process water, to air: 0.15 dimensionless; name fraction_PW_to_air; lognormal variance with pedigree 0.092025, pedigree (4,4,3,2,4)
  Literature value. In case when no industry/process specific data are available, default evaporation fraction value is used. This value is 15% and is based on literature (Statistics Canada, 2007 & Shaffer, K.H., 2008, Consumptive water use in the Great Lakes Basin, USGS & Shiklomanov, 2003, World Water Resources at the Beginning of the 21st Century) and has been approved by an expert.
  nan
- fraction, water, decarbonised, to air: 0.0299662 dimensionless; name fraction_WDC_to_air; = fraction_CW_to_air; lognormal variance with pedigree 0.092025, pedigree (4,4,3,2,4)
  Calculated value. See comments in the other parametres present in this dataset. Decarbonised water is considered to be always used as cooling water, thus cooling water fractions to air are applied to all carbonised water input flows to calculate the amount of water consumed in the processes.
  nan
- efficiency: 0.34 dimensionless; lognormal variance with pedigree 0.003325, pedigree (3,2,1,2,2)
  Literature value/calculated value. Net electrical efficiency based on the lower heating value (LHV). For all OECD countries, the IEA Electricity information 2014 provides data for the year 2012 on fuel input (TJ, Net calorific value NCV) and gross electricity production (GWh) as well as heat production (TJ) in tables 8 and 9 for each country for electricity only and Combined Heat and Power (CHP) plants each. Together with the information on own use (see parameter "losses"), the net electrical efficiency based on the NCV is calculated.
  For all non-OECD countries, data from the IEA electricity information 2014, tables 1.3 (electricity production) and table 1.5 (fuel input) have been used. These tables do not provide information on how much of the electricity has been produced in electricity only and in CHP plants, but gives the total value only.
  output relative to input (requires additional specification)
- factor: input of MJ for the production of 1 kWh: 10.5882 MJ/kWh; name factor_MJ_kWh; = 1*3.6/efficiency; lognormal variance with pedigree 0.0532, pedigree (4,4,3,4,4)
  Calculated value. 3.6 MJ = 1kWh.
  nan
- gross electricity production: 2.101e11 kWh; name gross_electricity; lognormal variance with pedigree 0.0012, pedigree (2,1,1,1,1)
  Literature value/statistics. Taken from the IEA electricity information 2014, table 1.3.
  IEA. 2014. Electricity Information 2014. ISBN 978-92-64-21692-1. International Energy Agency (IEA), Paris Cedex (FR).
  nan
- losses from gross electricity production: 0.12 dimensionless; name losses_gross_net; lognormal variance with pedigree 0.003525, pedigree (3,2,2,2,2)
  Calculated value. Own use of electricity plants in this country in 2012. For the OECD countries, the OECD iLibrary provides gross and net electricity values for the specific sector "Total Fuel Combustion", from which the loss value is being calculated. This value is then applied to all fossil fuel datasets, as no data on a more detailed level were available.
  OECD. 2014. IEA Electricity Information Statistics: OECD - Electricity and heat generation. OECD iLibrary. Online database. DOI : 10.1787/elect-data-en
  nan
  Uncertainty: G

## Reference product
- electricity, high voltage: 1 kWh; name electricity; By-product classification allocatable product; CPC 17100: Electrical energy
  production volume 1.84888e11 kWh; name electricity_apv; = gross_electricity*(1- losses_gross_net)
    Calculated value
  property price 0.0977 EUR2005
    Temporary price data. Calculated as 90% of purchasers price based on: 94% of the average price (to account for a 6% loss in transformation and transmission) for electricity for industrial consumersin 2005 (excluded taxes). From IEA.

## Inputs from technosphere
- water, completely softened: 0.0635294 kg; name water_completely_softened; = factor_MJ_kWh*0.006; lognormal variance with pedigree 0.086, pedigree (4,5,5,5,3)
  Literature value/calculated value. Feed water for the steam circuit lost when producing 1kWh of electricity from hard coal, based on the value for burning 1MJ of hard coal. Röder et al. 2007, Tab. 9.65 and Tab. 9.66, p. 160f.
  properties: wet mass 1 kg
- hard coal ash: -0.0792 kg; name amount_ash; = (factor_MJ_kWh*0.00748)*-1; lognormal variance with pedigree 0.1306, pedigree (5,3,5,5,3)
  Literature value/calculated value. Hard coal ash produced when producing 1kWh of electricity from hard coal, based on the value for burning 1MJ of hard coal. Weighted average with electricity production data (Itten&Frischknecht 2012) and values of 12 countries
  (AT, BE, ES, FR, IT, NL, PT, DE, CZ, HR, PL, SK). These values were valid for the ash being disposed off. Now, total amount of ash has been calculated (disposed+recycled) with the data in Tab. 9.69 p. 165 in Röder et al. 2007. Globally, 74% of the lignite ash are recycled, 26% go to disposal.
  Source:
  Itten R. and Frischknecht R. (2012) Life Cycle Inventories of Electricity Mixes and Grid. ESU-services Ltd., Uster, Switzerland.
  production volume 1.46431e10 kg; = amount_ash/electricity*electricity_apv
    Calculated from the production volume of hard coal, burned in power plant in proportion to the respective output amounts.
  property price 0 EUR2005; name amount_ash_price_EUR2005
  properties: dry mass 1 kg, wet mass 1 kg
- hard coal: 0.190144 kg; = 0.0438* factor_MJ_kWh*0.41; lognormal variance with pedigree 0.0026, pedigree (1,1,3,1,1)
  exchange present because of parent/child relationship
  property wet mass 1 kg; name WM
  property dry mass 0.94 kg; name DM
  property water content 0.0638298; name water_content
  property carbon content, non-fossil 0; name C_content_non_fossil
  property carbon content, fossil 0.845; name C_content_fossil
  property water in wet mass 0.06 kg; name WWM
  properties: heating value, net 27.91 MJ
  note on heating value, net: Based on the Characterization factor of Hard coal in the CED method
  note on carbon content, fossil: C content 75-94% (specified in Tab 1.1, report 6, part VI). A mean content of 0.845 kg C/ kg dry hard coal was considered
- NOx retained, by selective catalytic reduction: 0.0102 kg; name nox_retained; source IEA 2012; lognormal variance with pedigree 0.0057, pedigree (3,2,3,1,2)
  Calculated value departing from the installed denitrification in form of Selective Catalytic Reduction (SCR), its efficiency and the NOx emitted in the air (see Technology Comment for details).
  properties: wet mass 1 kg, dry mass 1 kg
- SOx retained, in hard coal flue gas desulfurisation: 0.00259 kg; name sox_retained; source IEA 2012; lognormal variance with pedigree 0.0057, pedigree (3,2,3,1,2)
  Calculated value departing from the installed desulfurisation, its efficiency and the SO2 emitted in the air (see Technology Comment for details).
  properties: dry mass 1 kg, wet mass 1 kg
- water, decarbonised: 2.11765 kg; name water_decarbonised_user; = factor_MJ_kWh*0.2; lognormal variance with pedigree 0.086, pedigree (4,5,5,5,3)
  Literature value/calculated value. Cooling water, decarbonised, for the cooling water circuit lost when producing 1kWh of electricity from hard coal, based on the value for burning 1MJ of hard coal. Röder et al. 2007, Tab. 9.65 and Tab. 9.66, p. 160f. These tables give an amount of 0.15 kg/MJ burned, which is valid for the assumption of 75% wet cooling and 25% run-through cooling. However, this revised dataset assumes 100% wet cooling.
  properties: wet mass 1 kg
- hard coal: 0, 0, 0 kg (3 entries)
  exchange present because of parent/child relationship
- chlorine, liquid: 0 kg
  Exchange present due to parent child relationship
- hard coal power plant: 1.33333e-11 unit; name hard_coal_power_plant; = 1/ (150000*500*1000); source Röder, A. 2007; lognormal variance with pedigree 0.4006, pedigree (5,3,5,5,3)
  Calculated value. At the moment, the hard coal power plant input consists of a market mix of a 100MWe power plant and a 500MWe power plant
  .
  For this calculation, 4000 load hours per year are assumed. It is assumed that a total of 150"000h is reached during the lifetime. A capacity of 500MW is taken for the calculation.
- transport, freight, sea, bulk carrier for dry goods: 3.3743 metric ton*km; = 0.18939/1000*10112+0.066067/1000*8420+0.18058/1000*5000; lognormal variance with pedigree 0.31, pedigree (5,5,5,5,5)
  Estimation.
  Transport of the hard coal from Australia to South Korea.
  Estimated AU port: Adelaide
  Estimated KR port: Mokpo
  Calculated distance: 10112 km
  http://www.searates.com/
  Transport of the hard coal from Indonesia to South Korea.
  Estimated ID port: Makassar
  Estimated KR port: Pohang
  Calculated distance: 5000 km
  http://sea-distances.com/
  Transport of the hard coal from Canada to South Korea.
  Estimated CA port: Victoria
  Estimated KR port: Mokpo
  Calculated distance: 8420 km
  http://sea-distances.com/
  Domestic transports within KR are not modelled.
- residue from cooling tower: -5.82353e-5 kg; name amount_residue; = (factor_MJ_kWh*0.000005*1.1)*-1; lognormal variance with pedigree 0.1132, pedigree (5,3,5,5,2)
  Literature value/calculated value. Amount of cooling tower needed for producing 1kWh of electricity from hard coal, based on the value for burning 1MJ of hard coal. Weighted average with electricity production data (Itten&Frischknecht 2012) and values of 14 countries
  (AT, BE, ES, FR, IT, NL, PT, DE, CZ, HR, PL, SK, CN, US) (Röder et al. 2007) .
  Country values calculated from mass balance.
  Source:
  Itten R. and Frischknecht R. (2012) Life Cycle Inventories of Electricity Mixes and Grid. ESU-services Ltd., Uster, Switzerland.
  production volume 1.0767e7 kg; = amount_residue/electricity*electricity_apv
    (same comment as for hard coal ash)
  property price 0 EUR2005; name amount_residue_price_EUR2005
  properties: dry mass 0.7 kg, carbon content, fossil 0.0544233, water content 0.428571, wet mass 1 kg
- light fuel oil: 0.00018 kg; name light_fuel_oil; = factor_MJ_kWh*0.000017; lognormal variance with pedigree 0.056, pedigree (3,4,5,5,1)
  Literature value/calculated value. Light fuel oil use per 1MJ of hard coal burned, use for start-up of the power plant after shut down. Weighted average with electricity production data (Itten&Frischknecht 2012) and ight fuel oil use values of 14 countries
  (AT, BE, ES, FR, IT, NL, PT, DE, CZ, HR, PL, SK, CN, US) (Röder et al. 2007)
  Country values are typical values for hard coal plants.
  Source:
  Itten R. and Frischknecht R. (2012) Life Cycle Inventories of Electricity Mixes and Grid. ESU-services Ltd., Uster, Switzerland.
  properties: carbon content, fossil 0.862, heating value, net 42.6 MJ, dry mass 1 kg, wet mass 1 kg
- hard coal: 0.0695647 kg; = 0.0438* factor_MJ_kWh*0.15; lognormal variance with pedigree 0.0026, pedigree (1,1,3,1,1)
  exchange present because of parent/child relationship
  properties: water content 0.0638298, dry mass 0.94 kg, heating value, net 27.91 MJ, wet mass 1 kg, carbon content, fossil 0.845
- hard coal: 0.199419 kg; name hard_coal_local; = 0.0438* factor_MJ_kWh*0.43; lognormal variance with pedigree 0.21, pedigree (5,5,5,5,5)
  exchange present because of parent/child relationship
  properties: carbon content, fossil 0.845, water content 0.0638298, heating value, net 27.91 MJ, wet mass 1 kg, dry mass 0.94 kg
- hard coal: 0 kg; name hard_coal
  Exchange present due to parent-child relationship.
  properties: dry mass 0.94 kg, carbon content, fossil 0.845, water content 0.0638298, heating value, net 27.91 MJ, wet mass 1 kg

## Inputs from nature
- Water, cooling, unspecified natural origin [natural resource, in water]: 0.0484241 m3; name water_cooling_UNO_input; = ((recirculating_CS_fraction_from_allCS*WWithdrawal_EP_HC_recirculating_CS)+(once_through_andCP_CS_fractio_from_allCS*WWithdrawal_EP_HC_once_through_andCP_CS))/11.31*factor_MJ_kWh; lognormal variance with pedigree 0.130025, pedigree (4,4,5,2,4)
  Calculated based on literature data.

## Emissions to nature
- Particulates, > 10 um [air, non-urban air or from high stacks]: 7.55e-7 kg; name particulates_gt10; source Itten R. 2012; lognormal variance with pedigree 0.124, pedigree (5,1,3,5,1)
  Calculated value. Based on the total particle emissions, global production-weighted average of ecoinvent version 2 countries.
  The shares of the three particulates classes are taken from Dones et al 2007, Tab. 9.39 p. 130 and amount to
  - particulates >10um: 5%
  - particulates 2.5-10 um: 10%
  - particulates < 2.5 um: 85%
  Global total emissions without any particulate filter were calculated to amount to 80 g/kWh and were then figured together with the share of installed particle filter and efficiency of the filter (see technology comment for details).
- Aldehydes, unspecified [air, non-urban air or from high stacks]: 8.29059e-8 kg; name aldehydes_unspecified; = factor_MJ_kWh*0.00000000783; lognormal variance with pedigree 0.1726, pedigree (3,3,5,5,3)
  Literature value/calculated value. Emissions when producing 1kWh of electricity from hard coal, based on the value for burning 1MJ of hard coal. Weighted average with electricity production data (Itten&Frischknecht 2012) and emission values of 14 countries
  (AT, BE, ES, FR, IT, NL, PT, DE, CZ, HR, PL, SK, CN, US) (Röder et al. 2007)
  Country emissions values based on literature.
  Source:
  Itten R. and Frischknecht R. (2012) Life Cycle Inventories of Electricity Mixes and Grid. ESU-services Ltd., Uster, Switzerland.
- Bromine [air, non-urban air or from high stacks]: 3.31412e-6 kg; name bromine; = factor_MJ_kWh*0.000000313; lognormal variance with pedigree 0.2126, pedigree (3,3,5,5,3)
  Literature value/calculated value. Emissions when producing 1kWh of electricity from hard coal, based on the value for burning 1MJ of hard coal. Weighted average with electricity production data (Itten&Frischknecht 2012) and emission values of 14 countries
  (AT, BE, ES, FR, IT, NL, PT, DE, CZ, HR, PL, SK, CN, US) (Röder et al. 2007)
  Country emissions values calculated from trace element balance, input uncertain
  Source:
  Itten R. and Frischknecht R. (2012) Life Cycle Inventories of Electricity Mixes and Grid. ESU-services Ltd., Uster, Switzerland.
- Ethane, 1,1,1-trichloro-, HCFC-140 [air, non-urban air or from high stacks]: 1.74706e-9 kg; name ethane_trichloro; = factor_MJ_kWh*0.000000000165; lognormal variance with pedigree 0.1726, pedigree (3,3,5,5,3)
  (same comment as for Aldehydes, unspecified)
- Thorium-228 [air, non-urban air or from high stacks]: 3.49412e-5 kBq; name throium_228; = factor_MJ_kWh*0.0000033; lognormal variance with pedigree 0.4306, pedigree (5,3,5,5,3)
  (same comment as for Bromine)
- Chromium [air, non-urban air or from high stacks]: 8.68235e-8 kg; name chromium; = factor_MJ_kWh*0.0000000082; lognormal variance with pedigree 0.7806, pedigree (5,3,5,5,3)
  (same comment as for Bromine)
- Sulfate [air, non-urban air or from high stacks]: 4.17176e-9 kg; name sulfate; = factor_MJ_kWh*0.000000000394; lognormal variance with pedigree 0.2106, pedigree (5,3,5,5,3)
  (same comment as for Aldehydes, unspecified)
- Chloroform [air, non-urban air or from high stacks]: 8.55529e-9 kg; name chloroform; = factor_MJ_kWh*0.000000000808; lognormal variance with pedigree 0.1726, pedigree (3,3,5,5,3)
  Literature value/calculated value. Emissions when producing 1kWh of electricity from hard coal, based on the value for burning 1MJ of hard coal. Weighted average with electricity production data (Itten&Frischknecht 2012) and emission values of 14 countries
  (AT, BE, ES, FR, IT, NL, PT, DE, CZ, HR, PL, SK, CN, US) (Röder et al. 2007)
  Source:
  Itten R. and Frischknecht R. (2012) Life Cycle Inventories of Electricity Mixes and Grid. ESU-services Ltd., Uster, Switzerland.
- Water [water, unspecified]: 0.0490812 m3; name water_to_water_unspecified; = (water_completely_softened/1000)*(1-fraction_WCS_to_air)+(water_decarbonised_user/1000)*(1-fraction_WDC_to_air)+water_cooling_UNO_input*(1-fraction_CW_to_air); lognormal variance with pedigree 0.130025, pedigree (4,4,5,2,4)
  Calculated value based on literature values and expert opinion. See comments in the parametres" comment field.
  property fraction, origin: fresh water 0.0429453; name fraction_origin_fresh_water_Ww
  property fraction, origin: unspecified 0.957055; name fraction_origin_unspecified_Ww
  property fraction, origin: salt water 0; name fraction_origin_salt_water_Ww
- Thorium-230 [air, non-urban air or from high stacks]: 1.09059e-5 kBq; name thorium_230; = factor_MJ_kWh*0.00000103; lognormal variance with pedigree 0.3906, pedigree (5,3,5,5,3)
  (same comment as for Aldehydes, unspecified)
- Hydrogen fluoride [air, non-urban air or from high stacks]: 2.99647e-5 kg; name hydrogen_fluoride; = factor_MJ_kWh*0.00000283; lognormal variance with pedigree 0.2506, pedigree (5,3,5,5,3)
  (same comment as for Bromine)
- Styrene [air, non-urban air or from high stacks]: 2.16e-9 kg; name styrene; = factor_MJ_kWh*0.000000000204; lognormal variance with pedigree 0.1726, pedigree (3,3,5,5,3)
  (same comment as for Aldehydes, unspecified)
- Manganese [air, non-urban air or from high stacks]: 3.79059e-7 kg; name manganese; = factor_MJ_kWh*0.0000000358; lognormal variance with pedigree 0.7806, pedigree (5,3,5,5,3)
  (same comment as for Bromine)
- Hexane [air, non-urban air or from high stacks]: 5.87647e-9 kg; name hexane; = factor_MJ_kWh*0.000000000555; lognormal variance with pedigree 0.2106, pedigree (5,3,5,5,3)
  (same comment as for Aldehydes, unspecified)
- Cobalt [air, non-urban air or from high stacks]: 3.53647e-8 kg; name cobalt; = factor_MJ_kWh*0.00000000334; lognormal variance with pedigree 0.7806, pedigree (5,3,5,5,3)
  (same comment as for Bromine)
- Xylene [air, non-urban air or from high stacks]: 5.78118e-6 kg; name xylene; = factor_MJ_kWh*0.000000546; lognormal variance with pedigree 0.112, pedigree (3,5,5,5,1)
  (same comment as for Aldehydes, unspecified)
- Methane, dichloro-, HCC-30 [air, non-urban air or from high stacks]: 2.53059e-8 kg; name methane_dichloro; = factor_MJ_kWh*0.00000000239; lognormal variance with pedigree 0.2106, pedigree (5,3,5,5,3)
  (same comment as for Aldehydes, unspecified)
- PAH, polycyclic aromatic hydrocarbons [air, non-urban air or from high stacks]: 7.93059e-8 kg; name pah; = factor_MJ_kWh*0.00000000749; lognormal variance with pedigree 0.372, pedigree (3,5,5,5,1)
  (same comment as for Aldehydes, unspecified)
- Hydrocarbons, aliphatic, alkanes, unspecified [air, non-urban air or from high stacks]: 1.42941e-6 kg; name hydrocarbons_al_al_unspec; = factor_MJ_kWh*0.000000135; lognormal variance with pedigree 0.112, pedigree (3,5,5,5,1)
  (same comment as for Aldehydes, unspecified)
- Cadmium [air, non-urban air or from high stacks]: 1.10118e-8 kg; name cadmium; = factor_MJ_kWh*0.00000000104; lognormal variance with pedigree 0.7806, pedigree (5,3,5,5,3)
  (same comment as for Bromine)
- Protactinium-234 [air, non-urban air or from high stacks]: 1.09059e-5 kBq; name protactinium_234; = factor_MJ_kWh*0.00000103; lognormal variance with pedigree 0.3526, pedigree (3,3,5,5,3)
  (same comment as for Aldehydes, unspecified)
- Boron [air, non-urban air or from high stacks]: 4.05529e-6 kg; name boron; = factor_MJ_kWh*0.000000383; lognormal variance with pedigree 0.7806, pedigree (5,3,5,5,3)
  (same comment as for Bromine)
- Radon-222 [air, non-urban air or from high stacks]: 0.00527294 kBq; name radon_222; = factor_MJ_kWh*0.000498; lognormal variance with pedigree 0.4306, pedigree (5,3,5,5,3)
  (same comment as for Bromine)
- Hydrocarbons, aliphatic, unsaturated [air, non-urban air or from high stacks]: 1.35529e-6 kg; name hydrocarbons_aliphatic_unsaturated; = factor_MJ_kWh*0.000000128; lognormal variance with pedigree 0.112, pedigree (3,5,5,5,1)
  (same comment as for Aldehydes, unspecified)
- Benzene, ethyl- [air, non-urban air or from high stacks]: 8.20588e-9 kg; name benzene_ethyl; = factor_MJ_kWh*0.000000000775; lognormal variance with pedigree 0.1726, pedigree (3,3,5,5,3)
  (same comment as for Chloroform)
- Pentane [air, non-urban air or from high stacks]: 9.21176e-7 kg; name pentane; = factor_MJ_kWh*0.000000087; lognormal variance with pedigree 0.112, pedigree (3,5,5,5,1)
  (same comment as for Aldehydes, unspecified)
- Nickel [air, non-urban air or from high stacks]: 2.11765e-7 kg; name nickel; = factor_MJ_kWh*0.00000002; lognormal variance with pedigree 0.7806, pedigree (5,3,5,5,3)
  (same comment as for Bromine)
- Particulates, < 2.5 um [air, non-urban air or from high stacks]: 1.28e-5 kg; name particulates_lt2_5; source Itten R. 2012; lognormal variance with pedigree 0.384, pedigree (5,1,3,5,1)
  (same comment as for Particulates, > 10 um)
- Mercury [air, non-urban air or from high stacks]: 2.85882e-8 kg; name mercury; = factor_MJ_kWh*0.0000000027; lognormal variance with pedigree 0.7806, pedigree (5,3,5,5,3)
  (same comment as for Bromine)
- Methane, monochloro-, R-40 [air, non-urban air or from high stacks]: 4.62706e-8 kg; name methane_monochloro; = factor_MJ_kWh*0.00000000437; lognormal variance with pedigree 0.1726, pedigree (3,3,5,5,3)
  (same comment as for Aldehydes, unspecified)
- Furan [air, non-urban air or from high stacks]: 4.36235e-13 kg; name furan; = factor_MJ_kWh*4.12E-14; lognormal variance with pedigree 0.1726, pedigree (3,3,5,5,3)
  (same comment as for Aldehydes, unspecified)
- Toluene [air, non-urban air or from high stacks]: 7.04118e-7 kg; name toluene; = factor_MJ_kWh*0.0000000665; lognormal variance with pedigree 0.112, pedigree (3,5,5,5,1)
  (same comment as for Aldehydes, unspecified)
- Carbon monoxide, fossil [air, non-urban air or from high stacks]: 9.33882e-5 kg; name carbon_monoxide_fossil; = factor_MJ_kWh*0.00000882; lognormal variance with pedigree 0.706, pedigree (3,4,5,5,1)
  (same comment as for Aldehydes, unspecified)
- Molybdenum [air, non-urban air or from high stacks]: 1.21765e-8 kg; name molybdenum; = factor_MJ_kWh*0.00000000115; lognormal variance with pedigree 0.7806, pedigree (5,3,5,5,3)
  (same comment as for Bromine)
- Acenaphthene [air, non-urban air or from high stacks]: 4.44706e-11 kg; name acenaphthene; = factor_MJ_kWh*0.0000000000042; lognormal variance with pedigree 0.1726, pedigree (3,3,5,5,3)
  (same comment as for Aldehydes, unspecified)
- Iodine [air, non-urban air or from high stacks]: 1.68353e-6 kg; name iodine; = factor_MJ_kWh*0.000000159; lognormal variance with pedigree 0.2506, pedigree (5,3,5,5,3)
  (same comment as for Bromine)
- Formaldehyde [air, non-urban air or from high stacks]: 3.84353e-7 kg; name formaldehyde; = factor_MJ_kWh*0.0000000363; lognormal variance with pedigree 0.112, pedigree (3,5,5,5,1)
  (same comment as for Aldehydes, unspecified)
- Magnesium [air, non-urban air or from high stacks]: 9.59294e-7 kg; name magnesium; = factor_MJ_kWh*0.0000000906; lognormal variance with pedigree 0.7406, pedigree (5,3,5,5,3)
  (same comment as for Aldehydes, unspecified)
- Acrolein [air, non-urban air or from high stacks]: 2.53059e-8 kg; name acrolein; = factor_MJ_kWh*0.00000000239; lognormal variance with pedigree 0.3906, pedigree (5,3,5,5,3)
  (same comment as for Aldehydes, unspecified)
- Actinides, radioactive, unspecified [air, non-urban air or from high stacks]: 0.000181059 kBq; name actinides_radioactive_unspecified; = factor_MJ_kWh*0.0000171; lognormal variance with pedigree 0.3526, pedigree (3,3,5,5,3)
  (same comment as for Aldehydes, unspecified)
- Carbon dioxide, fossil [air, non-urban air or from high stacks]: 1.01118 kg; name carbon_dioxide_fossil; = factor_MJ_kWh*0.0955; lognormal variance with pedigree 0.0526, pedigree (3,3,5,5,3)
  (same comment as for Aldehydes, unspecified)
- Zinc [air, non-urban air or from high stacks]: 4.40471e-7 kg; name zinc; = factor_MJ_kWh*0.0000000416; lognormal variance with pedigree 0.7806, pedigree (5,3,5,5,3)
  (same comment as for Bromine)
- Chromium VI [air, non-urban air or from high stacks]: 1.48235e-8 kg; name chromium_vi; = factor_MJ_kWh*0.0000000014; lognormal variance with pedigree 0.5326, pedigree (3,3,5,5,3)
  Literature value/calculated value. Emissions when producing 1kWh of electricity from hard coal, based on the value for burning 1MJ of hard coal. Weighted average with electricity production data (Itten&Frischknecht 2012) and emission values of 14 countries
  (AT, BE, ES, FR, IT, NL, PT, DE, CZ, HR, PL, SK, CN, US) (Röder et al. 2007)
  Country emissions values based on range of data.
  Source:
  Itten R. and Frischknecht R. (2012) Life Cycle Inventories of Electricity Mixes and Grid. ESU-services Ltd., Uster, Switzerland.
- Ethane [air, non-urban air or from high stacks]: 2.57294e-7 kg; name ethane; = factor_MJ_kWh*0.0000000243; lognormal variance with pedigree 0.112, pedigree (3,5,5,5,1)
  (same comment as for Aldehydes, unspecified)
- Ethane, 1,2-dichloro- [air, non-urban air or from high stacks]: 3.48353e-9 kg; name ethane_dichloro; = factor_MJ_kWh*0.000000000329; lognormal variance with pedigree 0.2106, pedigree (5,3,5,5,3)
  (same comment as for Aldehydes, unspecified)
- Ethene, tetrachloro- [air, non-urban air or from high stacks]: 3.74824e-9 kg; name ethene_tetrachloro; = factor_MJ_kWh*0.000000000354; lognormal variance with pedigree 0.2106, pedigree (5,3,5,5,3)
  (same comment as for Aldehydes, unspecified)
- Radium-228 [air, non-urban air or from high stacks]: 6.25765e-5 kBq; name radium_228; = factor_MJ_kWh*0.00000591; lognormal variance with pedigree 0.4306, pedigree (5,3,5,5,3)
  (same comment as for Bromine)
- Methane, fossil [air, non-urban air or from high stacks]: 9.55059e-6 kg; name methane_fossil; = factor_MJ_kWh*0.000000902; lognormal variance with pedigree 0.106, pedigree (3,4,5,5,1)
  (same comment as for Aldehydes, unspecified)
- Beryllium [air, non-urban air or from high stacks]: 1.83176e-9 kg; name beryllium; = factor_MJ_kWh*0.000000000173; lognormal variance with pedigree 0.7026, pedigree (3,3,5,5,3)
  (same comment as for Chloroform)
- Thorium-232 [air, non-urban air or from high stacks]: 5.11412e-5 kBq; name thorium_232; = factor_MJ_kWh*0.00000483; lognormal variance with pedigree 0.4306, pedigree (5,3,5,5,3)
  (same comment as for Bromine)
- Radon-220 [air, non-urban air or from high stacks]: 0.00536824 kBq; name radon_220; = factor_MJ_kWh*0.000507; lognormal variance with pedigree 0.4306, pedigree (5,3,5,5,3)
  (same comment as for Bromine)
- Vanadium [air, non-urban air or from high stacks]: 1.56706e-7 kg; name vanadium; = factor_MJ_kWh*0.0000000148; lognormal variance with pedigree 0.7806, pedigree (5,3,5,5,3)
  (same comment as for Bromine)
- Antimony [air, non-urban air or from high stacks]: 1.27059e-8 kg; name antimony; = factor_MJ_kWh*0.0000000012; lognormal variance with pedigree 0.7806, pedigree (5,3,5,5,3)
  (same comment as for Bromine)
- Hydrocarbons, aliphatic, alkanes, cyclic [air, non-urban air or from high stacks]: 5.05059e-8 kg; name hydrocarbons_al_al_cyclic; = factor_MJ_kWh*0.00000000477; lognormal variance with pedigree 0.1726, pedigree (3,3,5,5,3)
  (same comment as for Aldehydes, unspecified)
- Potassium-40 [air, non-urban air or from high stacks]: 0.000243529 kBq; name potassium_40; = factor_MJ_kWh*0.000023; lognormal variance with pedigree 0.4306, pedigree (5,3,5,5,3)
  (same comment as for Bromine)
- Benzo(a)pyrene [air, non-urban air or from high stacks]: 4.56353e-12 kg; name benzo_a_pyrene; = factor_MJ_kWh*0.000000000000431; lognormal variance with pedigree 0.112, pedigree (3,5,5,5,1)
  (same comment as for Aldehydes, unspecified)
- Lead [air, non-urban air or from high stacks]: 3.92824e-7 kg; name lead; = factor_MJ_kWh*0.0000000371; lognormal variance with pedigree 0.7806, pedigree (5,3,5,5,3)
  (same comment as for Bromine)
- Thorium-234 [air, non-urban air or from high stacks]: 1.09059e-5 kBq; name thorium_234; = factor_MJ_kWh*0.00000103; lognormal variance with pedigree 0.3526, pedigree (3,3,5,5,3)
  (same comment as for Aldehydes, unspecified)
- Water [air, unspecified]: 0.00152407 m3; name water_to_air_unspecified; = (water_completely_softened/1000)*fraction_WCS_to_air+(water_decarbonised_user/1000)*fraction_WDC_to_air+water_cooling_UNO_input*fraction_CW_to_air; lognormal variance with pedigree 0.130025, pedigree (4,4,5,2,4)
  (same comment as for Water)
  property fraction, origin: salt water 0; name fraction_origin_salt_water
  property fraction, origin: fresh water 0.0478809; name fraction_origin_fresh_water
  property fraction, origin: unspecified 0.952119; name fraction_origin_unspecified
- Lead-210 [air, non-urban air or from high stacks]: 0.000733765 kBq; name lead_210; = factor_MJ_kWh*0.0000693; lognormal variance with pedigree 0.4306, pedigree (5,3,5,5,3)
  (same comment as for Bromine)
- Propane [air, non-urban air or from high stacks]: 2.19176e-7 kg; name propane; = factor_MJ_kWh*0.0000000207; lognormal variance with pedigree 0.112, pedigree (3,5,5,5,1)
  (same comment as for Aldehydes, unspecified)
- Uranium-234 [air, non-urban air or from high stacks]: 2.13882e-5 kBq; name uranium_234; = factor_MJ_kWh*0.00000202; lognormal variance with pedigree 0.3906, pedigree (5,3,5,5,3)
  (same comment as for Aldehydes, unspecified)
- Phenol [air, non-urban air or from high stacks]: 1.39765e-9 kg; name phenol; = factor_MJ_kWh*0.000000000132; lognormal variance with pedigree 0.1726, pedigree (3,3,5,5,3)
  (same comment as for Aldehydes, unspecified)
- Arsenic [air, non-urban air or from high stacks]: 1.05565e-7 kg; name arsenic; = factor_MJ_kWh*0.00000000997; lognormal variance with pedigree 0.7806, pedigree (5,3,5,5,3)
  (same comment as for Bromine)
- Selenium [air, non-urban air or from high stacks]: 1.74706e-7 kg; name selenium; = factor_MJ_kWh*0.0000000165; lognormal variance with pedigree 0.7806, pedigree (5,3,5,5,3)
  (same comment as for Bromine)
- Dinitrogen monoxide [air, non-urban air or from high stacks]: 1.39765e-5 kg; name dinitrogen_monoxide; = factor_MJ_kWh*0.00000132; lognormal variance with pedigree 0.106, pedigree (3,4,5,5,1)
  (same comment as for Aldehydes, unspecified)
- Cumene [air, non-urban air or from high stacks]: 4.75412e-10 kg; name cumene; = factor_MJ_kWh*0.0000000000449; lognormal variance with pedigree 0.124, pedigree (1,1,3,5,1)
  (same comment as for Chloroform)
- Copper [air, non-urban air or from high stacks]: 8.69294e-8 kg; name copper; = factor_MJ_kWh*0.00000000821; lognormal variance with pedigree 0.7806, pedigree (5,3,5,5,3)
  (same comment as for Bromine)
- Radium-226 [air, non-urban air or from high stacks]: 0.000193765 kBq; name radium_226; = factor_MJ_kWh*0.0000183; lognormal variance with pedigree 0.3907, pedigree (3,3,5,3,3)
  (same comment as for Bromine)
- Nitrogen oxides [air, non-urban air or from high stacks]: 0.00255 kg; name nitrogen_oxides; source IEA 2012; lognormal variance with pedigree 0.108, pedigree (5,5,5,5,3)
  Rough estimation. Data overtaken from Australia.
- Hydrogen chloride [air, non-urban air or from high stacks]: 0.000280588 kg; name hydrogen_chloride; = factor_MJ_kWh*0.0000265; lognormal variance with pedigree 0.2506, pedigree (5,3,5,5,3)
  (same comment as for Bromine)
- Dioxins, measured as 2,3,7,8-tetrachlorodibenzo-p-dioxin [air, non-urban air or from high stacks]: 1.12235e-13 kg; name dioxins; = factor_MJ_kWh*1.06E-14; lognormal variance with pedigree 0.372, pedigree (3,5,5,5,1)
  (same comment as for Aldehydes, unspecified)
- Cyanide [air, non-urban air or from high stacks]: 2.18118e-7 kg; name cyanide; = factor_MJ_kWh*0.0000000206; lognormal variance with pedigree 0.2106, pedigree (5,3,5,5,3)
  (same comment as for Chloroform)
- Particulates, > 2.5 um, and < 10um [air, non-urban air or from high stacks]: 1.51e-6 kg; name particulates_2_5_to_10; source Itten R. 2012; lognormal variance with pedigree 0.204, pedigree (5,1,3,5,1)
  (same comment as for Particulates, > 10 um)
- Uranium-238 [air, non-urban air or from high stacks]: 0.000168353 kBq; name uranium_238; = factor_MJ_kWh*0.0000159; lognormal variance with pedigree 0.4306, pedigree (5,3,5,5,3)
  (same comment as for Bromine)
- Benzene [air, non-urban air or from high stacks]: 1.47176e-6 kg; name benzene; = factor_MJ_kWh*0.000000139; lognormal variance with pedigree 0.12, pedigree (3,5,5,5,3)
  (same comment as for Aldehydes, unspecified)
- Strontium [air, non-urban air or from high stacks]: 6.26824e-7 kg; name strontium; = factor_MJ_kWh*0.0000000592; lognormal variance with pedigree 0.7806, pedigree (5,3,5,5,3)
  (same comment as for Bromine)
- Polonium-210 [air, non-urban air or from high stacks]: 0.00130235 kBq; name polonium_210; = factor_MJ_kWh*0.000123; lognormal variance with pedigree 0.4306, pedigree (5,3,5,5,3)
  (same comment as for Bromine)
- Propene [air, non-urban air or from high stacks]: 1.00271e-7 kg; name propene; = factor_MJ_kWh*0.00000000947; lognormal variance with pedigree 0.112, pedigree (3,5,5,5,1)
  (same comment as for Aldehydes, unspecified)
- Sulfur dioxide [air, non-urban air or from high stacks]: 0.000522 kg; name sulfur_dioxide; source IEA 2012; lognormal variance with pedigree 0.0057, pedigree (3,2,3,1,2)
  Calculated value based on the IEA Clean Coal Centre Coal Power Database. Calculation was made with the sulfur content of the coal used (weight % as received), the input of coal (Mt/y), the efficiency of the desulfurisation and the capacity of the power plants. According to Röder et al. 2007, about 95% of the sulfur contained in the coal turns into SO2.
- Carbon disulfide [air, non-urban air or from high stacks]: 1.13294e-8 kg; name carbon_disulfide; = factor_MJ_kWh*0.00000000107; lognormal variance with pedigree 0.3526, pedigree (3,3,5,5,3)
  (same comment as for Chloroform)
- Butane [air, non-urban air or from high stacks]: 1.18588e-7 kg; name butane; = factor_MJ_kWh*0.0000000112; lognormal variance with pedigree 0.112, pedigree (3,5,5,5,1)
  (same comment as for Aldehydes, unspecified)
- Barium [air, non-urban air or from high stacks]: 6.87176e-7 kg; name barium; = factor_MJ_kWh*0.0000000649; lognormal variance with pedigree 0.7806, pedigree (5,3,5,5,3)
  (same comment as for Bromine)
- NMVOC, non-methane volatile organic compounds, unspecified origin [air, non-urban air or from high stacks]: 9.84706e-6 kg; name nmvoc; = factor_MJ_kWh*0.00000093; lognormal variance with pedigree 0.1726, pedigree (3,3,5,5,3)
  (same comment as for Aldehydes, unspecified)
- Hydrocarbons, chlorinated [air, non-urban air or from high stacks]: 1.76824e-8 kg; name hydrocarbons_chlorinated; = factor_MJ_kWh*0.00000000167; lognormal variance with pedigree 0.2106, pedigree (5,3,5,5,3)
  (same comment as for Aldehydes, unspecified)

## Sampling procedure
literature and statistics

## Extrapolations
This dataset has been extrapolated from year 2015 to the year of the calculation (2021). The uncertainty has been adjusted accordingly.

## Review by Carl Vadenbo 2015-07-23
The update of the whole electricity sector for the ecoinvent v3.2 database consist of hundreds of datasets. All these datasets have passed through a streamlined review processes where the underlying modelling of production volumes, technology shares and efficiencies was reviewed in detail prior to the datasets being submitted to the database.
