# mine infrastructure construction, open cast, peat

Dataset: EcoSpold 2, unit process
Geography: RoW
Time period: 1983-01-01 to 2021-12-31
Technology level: current
Classification: EcoSpold01Categories: lignite/production
Classification: ISIC rev.4 ecoinvent: 0892:Extraction of peat
Tags: ConvertedDataset
Scenario: Business-as-Usual
System model: Allocation, cut-off by classification
Generated by: Christian Bauer
Published in: Röder, A. 2007
Database: ecoinvent
isCopyrightProtected: true
accessRestrictedTo: 1

## General comment
In first approximation same condition as for open cast mine, lignite, RER, are assumed.
[This dataset was already contained in the ecoinvent database version 2. It was not individually updated during the transfer to ecoinvent version 3. Life Cycle Impact Assessment results may still have changed, as they are affected by changes in the supply chain, i.e. in other datasets. This dataset was generated following the ecoinvent quality guidelines for version 2. It may have been subject to central changes described in the ecoinvent version 3 change report (http://www.ecoinvent.org/database/ecoinvent-version-3/reports-of-changes/), and the results of the central updates were reviewed extensively. The changes added e.g. consistent water flows and other information throughout the database. The documentation of this dataset can be found in the ecoinvent reports of version 2, which are still available via the ecoinvent website. The change report linked above covers all central changes that were made during the conversion process.]

## Included activities end
This module includes an estimation of the most important construction materials and energy use for the mine. Land use for the infrastructure is not included, because due to lack of information it cannot be seperated from the land use during the operation of the mine.

## Geography
Used for NORDEL countries.

## Technology
No information available.

## Reference product
- mine infrastructure, open cast, peat: 1 unit; By-product classification allocatable product; CPC 53261: Mining constructions
  EcoSpold01Location=NORDEL
  production volume 3.92632 unit
    This is a placeholder value that does not reflect real-world production volumes. This dataset does not currently require a real-world production volume to work in the database framework, and no actual data were collected yet. This has no negative effect on the results of the ecoinvent database.
  property price 6.70931e8 EUR2005
    EU27 I/O database(in the 'EU & DK Input Output Database' (available in SimaPro)); -79 Building, non-residential EU 27 (calculated to be 38.169 EUR2003/kg). Based on consumption of (_53 Iron basic, virgin, EU27;7.25517782294095E-3 kg/EUR building; 0.45 EUR2003 per kg DS), (_61 Iron, after first processing, EU27;5.8766830719783E-3kg/EUR building; 0.62 EUR2003 per kg DS), (_65 Fabricated metal products, except machinery, EU27; 8.9167022775554E-3 kg/EUR building; 3.63 EUR2003 per kg DS) and (_66 Machinery and equipment n.e.c., EU27;4.15071881936446E-3 kg/EUR building; 5.71 EUR2003 per kg DS) -17700000 kg

## Inputs from technosphere
- diesel, burned in building machine: 1e8 MJ; lognormal variance with pedigree 0.692, pedigree (1,1,5,5,1)
  EcoSpold01Location=GLO
  own assumption
  properties: heating value, net 1 MJ
- reinforcing steel: 1.3e7 kg; lognormal variance with pedigree 0.692, pedigree (1,1,5,5,1)
  EcoSpold01Location=RER
  own assumption
  properties: carbon content, fossil 0.004, wet mass 1 kg, dry mass 1 kg
- copper, cathode: 700000 kg; lognormal variance with pedigree 0.692, pedigree (1,1,5,5,1)
  own assumption
  EcoSpold01Location=RER
  properties: wet mass 1 kg, dry mass 1 kg
- electricity, medium voltage: 0 kWh; pedigree (1,1,1,1,1)
  own assumption
  EcoSpold01Location=UCTE
- heat, district or industrial, other than natural gas: 0 MJ; pedigree (1,1,1,1,1)
  own assumption
  EcoSpold01Location=RER
  properties: heating value, net 1 MJ
- concrete, normal: 0 m3; pedigree (1,1,1,1,1)
  EcoSpold01Location=CH
  own assumption
  properties: dry mass 2190 kg, wet mass 2380 kg, water content 0.086758
- waste wood, untreated: 0 kg; pedigree (1,1,1,1,1)
  EcoSpold01Location=CH
  own assumption
  production volume 0 kg
    Calculated from the production volume of mine infrastructure, open cast, peat in proportion to the respective output amounts.
  properties: dry mass 0.8 kg, carbon content, non-fossil 0.48632, water content 0.25, wet mass 1 kg, heating value, net 13.99 MJ
  note on carbon content, non-fossil: Tab A.4, ecoinvent v2.2 report 13_I. C content has been referred to 1 kg DM,
  note on heating value, net: Value taken from the general comment of the treatment dataset.
- steel, low-alloyed, hot rolled: 4e6 kg; lognormal variance with pedigree 0.692, pedigree (1,1,5,5,1)
  EcoSpold01Location=RER
  own assumption
  properties: carbon content, fossil 0.005, dry mass 1 kg, wet mass 1 kg
  note on carbon content, fossil: Low alloyed steel composition given in Tab. 3.2 ecoinvent v2.2 report 10_partII. Steel assumed to have a C content of 0.5%
- plywood: 5500 m3; lognormal variance with pedigree 0.692, pedigree (1,1,5,5,1)
  own assumption
  EcoSpold01Location=RER
  properties: wet mass 823 kg, water content 0.070778, price 400 EUR2005, heating value, net 11688.9 MJ, carbon content, non-fossil 0.409818, dry mass 768.6 kg, carbon content, fossil 0.09783
- electricity, medium voltage: 3254.28, 86028.7, 12457.5, 3249.24, 111200, 11128.8, 7760.1, 4872.49, 2736.32, 2320.69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 kWh (19 entries); lognormal variance with pedigree 0.692, pedigree (1,1,5,5,1)
  own assumption
  EcoSpold01Location=UCTE
- heat, district or industrial, other than natural gas: 40530.2, 10526, 9.99489e7 MJ (3 entries); lognormal variance with pedigree 0.692, pedigree (1,1,5,5,1)
  own assumption
  EcoSpold01Location=RER
- concrete, normal: 1567.48, 47.2239, 163.33, 1322.27, 743.776, 3149.68, 106.237 m3 (7 entries); lognormal variance with pedigree 0.692, pedigree (1,1,5,5,1)
  EcoSpold01Location=CH
  own assumption
- waste wood, untreated: -1246.64, -4086.71, -2257.27, -3809.44, -4358.93, -183423, -3882.01, -22774.7, -1665.09, -830.086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 kg (39 entries); lognormal variance with pedigree 0.342, pedigree (1,1,5,5,1)
  EcoSpold01Location=CH
  own assumption
  production volume 9e6 kg

## Sampling procedure
literature

## Extrapolations
none This dataset has been copied from an original dataset covering the geography NORDEL. The uncertainty has been adjusted accordingly.

## Review by Christian Bauer 2003-08-19
passed
