# flat plate solar collector production, Cu absorber

Dataset: EcoSpold 2, unit process
Geography: CH
Time period: 2001-01-01 to 2021-12-31
Technology level: current
Classification: EcoSpold01Categories: solar collector systems/production of components
Classification: ISIC rev.4 ecoinvent: 2815:Manufacture of ovens, furnaces and furnace burners
Tags: ConvertedDataset
Scenario: Business-as-Usual
System model: Allocation, cut-off by classification
Generated by: Niels Jungbluth
Published in: Jungbluth, N. 2007
Database: ecoinvent
isCopyrightProtected: true
accessRestrictedTo: 1

## General comment
The flat plate collector has selective black chrome coating on copper made in the US.
[This dataset was already contained in the ecoinvent database version 2. It was not individually updated during the transfer to ecoinvent version 3. Life Cycle Impact Assessment results may still have changed, as they are affected by changes in the supply chain, i.e. in other datasets. This dataset was generated following the ecoinvent quality guidelines for version 2. It may have been subject to central changes described in the ecoinvent version 3 change report (http://www.ecoinvent.org/database/ecoinvent-version-3/reports-of-changes/), and the results of the central updates were reviewed extensively. The changes added e.g. consistent water flows and other information throughout the database. The documentation of this dataset can be found in the ecoinvent reports of version 2, which are still available via the ecoinvent website. The change report linked above covers all central changes that were made during the conversion process.]

## Included activities end
Production and disposal of a flat plate collector in Switzerland. Including materials, water and energy use of production.

## Geography
Production in CH. Main components are imported from the US. The glass is coated in DK.

## Technology
Assembly of a flat plate collector. The collector has a copper sheet coated by black chrome coating.

## Time period
Material data have been investigated for a collector produced in 2002. Data for energy uses during production have been investigated for 2001.

## Parameters
- fraction, process water, to air: 0.15 dimensionless; name fraction_PW_to_air; lognormal variance with pedigree 0.092025, pedigree (4,4,3,2,4)
  Literature value. In case when no industry/process specific data are available, default evaporation fraction value is used. This value is 15% and is based on literature (Statistics Canada, 2007 & Shaffer, K.H., 2008, Consumptive water use in the Great Lakes Basin, USGS & Shiklomanov, 2003, World Water Resources at the Beginning of the 21st Century) and has been approved by an expert.
- fraction, tap water, to air: 0.15 dimensionless; name fraction_TW_to_air; = fraction_PW_to_air; lognormal variance with pedigree 0.092025, pedigree (4,4,3,2,4)
  Calculated value. See comment in the other parametres present in this dataset. Tap water is considered to be always used as process water, thus process water fractions to air are applied to all tap water input flows to calculate the amount of water consumed in the processes.
- fraction, water, completely softened, to air: 0.15 dimensionless; name fraction_WCS_to_air; = fraction_PW_to_air; lognormal variance with pedigree 0.092025, pedigree (4,4,3,2,4)
  Calculated value. See comment in the other parametres present in this dataset. Water, completely softened is considered to be always used as process water, thus process water fractions to air are applied to all water, completely softened input flows to calculate the amount of water consumed in the processes.

## Reference product
- flat plate solar collector, Cu absorber: 1 m2; CPC 43430: Parts for the goods of subclasses 43410 and 43420; parts of non-electric bakery ovens; By-product classification allocatable product
  EcoSpold01Location=CH
  production volume 0.0336675 m2
    This is a placeholder value that does not reflect real-world production volumes. This dataset does not currently require a real-world production volume to work in the database framework, and no actual data were collected yet. This has no negative effect on the results of the ecoinvent database. The placeholder value of this activity was scaled according to the nominal GDP of 2005 (source: United Nations, http://data.un.org/Glossary.aspx?q=GDP+%28current+US%24%29, accessed 20130726) to reflect an appropriate share of the global production volume, which is also a placeholder value.
  property price 1686 EUR2005
    Undata (Average import and export prices in EU-27); http://data.un.org/Data.aspx?q=photovoltaic&d=ComTrade&f=_l1Code%3a85%3bcmdCode%3a854140. Weight 31 kg.

## By-products
- waste paperboard, unsorted: 0 kg; By-product classification Recyclable; CPC 39240: Waste and scrap of paper or paperboard; pedigree (1,1,1,1,1)
  EcoSpold01Location=CH
  Estimation
  Uncertainty: Estimation
  production volume 0 kg
    Calculated from the production volume of flat plate collector in proportion to the respective output amounts.
  property price 0.03924 EUR2005
    Temporary price data. Calculated as 90% of purchasers price based on: Assumed to be 10% less than for sorted waste paperboard
  property carbon content, non-fossil 0.483259
    C content was calculated for 1 kg DM, using data in Tab A.3, ecoinvent v2.2 report 13_I.
  property carbon content 0.483259
    carbon content on a dry matter basis (reserved; not for manual entry)
  properties: heating value, net 15.92 MJ, carbon content, fossil 0, water content 0.243781, wet mass 1 kg, dry mass 0.804 kg, water in wet mass 0.196 kg, carbon allocation 0.38854 kg

## Inputs from technosphere
- stone wool, packed: 2.43 kg; lognormal variance with pedigree 0.0586, pedigree (2,5,5,1,1)
  EcoSpold01Location=CH
  Questionnaire
  Uncertainty: Questionnaire
  properties: dry mass 1 kg, carbon content, fossil 0.015401, wet mass 1 kg
  note on carbon content, fossil: The chemical composition of the glass fibres used in the rock wool production is similar to the composition of naturally cooled volcano basalt and has a composition listed in Tab. 3.1 and 3.2 in ecoinvent v2.2 report 16, part XIV. Rock wool contains: a minimum of 96% mineral fibres,between 0.5 and 3.0 weight percent of phenolic resin depending on the specific product characteristics, and about 0.2 percent mineral oil (ecoinvent v2.2 report 16, part XIV). An average composition of 1.8% phenolic resin, 0.2% mineral oil, and 98% mineral fibres has been assumed and used to calculate C content of the rock wool
- selective coat, copper sheet, black chrome: 1 m2; lognormal variance with pedigree 0.0586, pedigree (2,5,5,1,1)
  EcoSpold01Location=RER
  Questionnaire
  Uncertainty: Questionnaire
- wastewater, from residence: -0.0094 m3; lognormal variance with pedigree 0.0586, pedigree (2,5,5,1,1)
  Questionnaire
  EcoSpold01Location=CH
  Uncertainty: Questionnaire
  production volume 0.0094 m3
    (same comment as for waste paperboard, unsorted)
  properties: carbon content, non-fossil 0.199421, water content 2962.17, dry mass 0.337476 kg, wet mass 1000 kg
  note on carbon content, non-fossil: 0.0673 kg TOC/m3 (Tab A.17, ecoinvent v2.2 report 13_I). TOC was considered as Total Carbon.
- anti-reflex-coating, etching, solar glass: 1 m2; lognormal variance with pedigree 0.0586, pedigree (2,5,5,1,1)
  EcoSpold01Location=DK
  Questionnaire
  Uncertainty: Questionnaire
- tap water: 9.4 kg; name tap_water_input; lognormal variance with pedigree 0.0766, pedigree (2,5,5,1,3)
  EcoSpold01Location=RER
  Questionnaire
  Uncertainty: Questionnaire
  properties: water content 2962.17, carbon content, fossil 0.00178991, dry mass 0.000337476 kg, wet mass 1 kg
  note on carbon content, fossil: Bicarbonate content is 2.93 mol/m3. CO2 content is 0.1 mol/m3 (ecoinvent v2.2 report 8, Tab 93.1).
- brazing solder, cadmium free: 0.00368 kg; lognormal variance with pedigree 0.0586, pedigree (2,5,5,1,1)
  EcoSpold01Location=RER
  Questionnaire
  Uncertainty: Questionnaire
  properties: wet mass 1 kg, dry mass 1 kg
- steel, chromium steel 18/8, hot rolled: 4.14 kg; lognormal variance with pedigree 0.0586, pedigree (2,5,5,1,1)
  EcoSpold01Location=RER
  Questionnaire, fixing parts
  Uncertainty: Questionnaire, fixing parts
  properties: carbon content, fossil 0.0008, dry mass 1 kg, wet mass 1 kg
  note on carbon content, fossil: Stainless steel model is the grade 304 steel (18/8 stainless, 18% chromium 8% nickel; max. 0.08% C)
- solar collector factory: 2e-7 unit; lognormal variance with pedigree 0.3666, pedigree (2,5,5,1,3)
  EcoSpold01Location=RER
  Questionnaire
  Uncertainty: Questionnaire
- soft solder, Sn97Cu3: 0.0588 kg; lognormal variance with pedigree 0.0586, pedigree (2,5,5,1,1)
  Questionnaire
  EcoSpold01Location=RER
  Uncertainty: Questionnaire
  properties: wet mass 1 kg, dry mass 1 kg
- corrugated board box: 3.68 kg; lognormal variance with pedigree 0.054, pedigree (3,4,5,1,1)
  EcoSpold01Location=CH
  Company information, packaging
  Uncertainty: Company information, packaging
  properties: water content 0.0582011, wet mass 1 kg, carbon content, fossil 0.000656085, dry mass 0.945 kg, carbon content, non-fossil 0.432275, heating value, net 12.86 MJ
  note on carbon content, fossil: Fossil C content was calculated after fossil C contents of chemicals used in the production of board (Tab 10-15 & 10.16 ecoinvent v2.2 report 11_III, part 10)
  note on carbon content, non-fossil: Biogenic C content was calculated after biogenic C contents of chemicals used in the production of board (Tab 10.15 & 10.16, ecoinvent v2.2 report 11_III, part 10).
- aluminium, wrought alloy: 3.93 kg; lognormal variance with pedigree 0.0586, pedigree (2,5,5,1,1)
  Questionnaire
  EcoSpold01Location=RER
  Uncertainty: Questionnaire
  properties: dry mass 1 kg, wet mass 1 kg
- synthetic rubber: 0.732 kg; lognormal variance with pedigree 0.0586, pedigree (2,5,5,1,1)
  EcoSpold01Location=RER
  Questionnaire
  Uncertainty: Questionnaire
  properties: carbon content, fossil 0.871949, wet mass 1 kg, dry mass 1 kg, heating value, net 26.42 MJ
  note on carbon content, fossil: EPDM (Ethylene-propene-diene terpolymer) rubber is a terpolymer of ethylene, propene, and a diene with the residual unsaturated portion of the diene in the side chain (ecoinvent v2.2 report 7-part XX & Ullmann). Chemical formula (deduced from Evidences of Solvent-Induced Miscibility in Polychloroprene-co-Ethylene-Propene Diene Terpolymer Blends, Dubey et al., Journal of Applied Polymer Science, 2009, 111:1884–1891): C20H35
- silicone product: 0.0588 kg; lognormal variance with pedigree 0.0586, pedigree (2,5,5,1,1)
  EcoSpold01Location=RER
  Questionnaire
  Uncertainty: Questionnaire
  properties: dry mass 1 kg, carbon content, fossil 0.324324, wet mass 1 kg, heating value, net 9.83 MJ
  note on carbon content, fossil: The term silicones is used for compounds in which silicon atoms are linked via oxygen atoms, each silicon atom bearing one or several organic groups. In industrially important silicones, these groups are usually methyl or phenyl (ecoinvent v2.2 report 8_part71 & Ullmann). The chemical formula was considered to be [Si(CH3)2O]n (Ullmann).
- electricity, medium voltage: 1.16 kWh; lognormal variance with pedigree 0.0766, pedigree (2,5,5,1,3)
  EcoSpold01Location=CH
  Questionnaire
  Uncertainty: Questionnaire
- propylene glycol, liquid: 1.01 kg; lognormal variance with pedigree 0.0586, pedigree (2,5,5,1,1)
  Questionnaire, extrapolation for life time 10a
  EcoSpold01Location=RER
  Uncertainty: Questionnaire, extrapolation for life time 10a
  properties: dry mass 1 kg, carbon content, fossil 0.473684, wet mass 1 kg, heating value, net 27.09 MJ
- solar glass, low-iron: 9.12 kg; lognormal variance with pedigree 0.0586, pedigree (2,5,5,1,1)
  Questionnaire
  EcoSpold01Location=RER
  Uncertainty: Questionnaire
  properties: dry mass 1 kg, wet mass 1 kg
- water, completely softened: 1.38 kg; name water_softened_input; lognormal variance with pedigree 0.0586, pedigree (2,5,5,1,1)
  EcoSpold01Location=RER
  Questionnaire, extrapolation for life time 10a
  Uncertainty: Questionnaire, extrapolation for life time 10a
  properties: wet mass 1 kg
- copper, cathode: 2.82 kg; lognormal variance with pedigree 0.0586, pedigree (2,5,5,1,1)
  Questionnaire
  EcoSpold01Location=RER
  Uncertainty: Questionnaire
  properties: wet mass 1 kg, dry mass 1 kg
- waste glass sheet: -9.12 kg; lognormal variance with pedigree 0.06, pedigree (3,5,5,1,1)
  Estimation
  EcoSpold01Location=CH
  Uncertainty: Estimation
  production volume 9.12 kg
    (same comment as for waste paperboard, unsorted)
  properties: dry mass 1 kg, wet mass 1 kg
- sheet rolling, copper: 2.82 kg; lognormal variance with pedigree 0.0586, pedigree (2,5,5,1,1)
  EcoSpold01Location=RER
  Questionnaire
  Uncertainty: Questionnaire
- waste plastic, mixture: -0.79 kg; lognormal variance with pedigree 0.06, pedigree (3,5,5,1,1)
  Estimation
  EcoSpold01Location=CH
  Uncertainty: Estimation
  production volume 0.79 kg
    (same comment as for waste paperboard, unsorted)
  properties: heating value, net 30.79 MJ, carbon content, fossil 0.747344, water content 0.180638, dry mass 0.847 kg, wet mass 1 kg
  note on heating value, net: Value taken from the general comment of the treatment dataset.
  note on carbon content, fossil: C content in 1 kg DM was calculated using data in Tab A.2, ecoinvent v2.2 report 13_I
- waste mineral wool: -2.43 kg; lognormal variance with pedigree 0.06, pedigree (3,5,5,1,1)
  EcoSpold01Location=CH
  Estimation
  Uncertainty: Estimation
  production volume 2.43 kg
    (same comment as for waste paperboard, unsorted)
  properties: wet mass 1 kg, dry mass 1 kg
- heat carrier liquid, 40% C3H8O2: -0.00239 m3; lognormal variance with pedigree 0.0586, pedigree (2,5,5,1,1)
  Questionnaire
  EcoSpold01Location=CH
  Uncertainty: Questionnaire
  production volume 0.00239 m3
    (same comment as for waste paperboard, unsorted)
  properties: price 1.08656 EUR2005, water content 157.387, carbon content, fossil 3, dry mass 6.31366 kg, wet mass 1000 kg
  note on carbon content, fossil: The composition of the product was used to estimate its carbon content: 40% (w/v) C3H8O2.
- waste paperboard, unsorted: -3.68 kg; lognormal variance with pedigree 0.06, pedigree (3,5,5,1,1)
  EcoSpold01Location=CH
  Estimation
  Uncertainty: Estimation
  production volume 3.68 kg
  properties: heating value, net 15.92 MJ, price 0.03924 EUR2005, water content 0.243781, wet mass 1 kg, carbon content, non-fossil 0.483259, dry mass 0.804 kg
  note on carbon content, non-fossil: C content was calculated for 1 kg DM, using data in Tab A.3, ecoinvent v2.2 report 13_I.

## Emissions to nature
- Water [air, unspecified]: 0.001617 m3; name water_to_air_unspecified; = (tap_water_input/1000*fraction_TW_to_air)+(water_softened_input/1000*fraction_WCS_to_air); lognormal variance with pedigree 0.0807, pedigree (2,2,5,1,1)
  Calculated value based on literature values and expert opinion. See comments in the parametres' comment field.
  property fraction, origin: fresh water 1; name fraction_origin_fresh_water
  property fraction, origin: salt water 0; name fraction_origin_salt_water
  property fraction, origin: unspecified 0; name fraction_origin_unspecified

## Sampling procedure
Questionnaires.

## Extrapolations
This dataset has been extrapolated from year 2002 to the year of the calculation (2021). The uncertainty has been adjusted accordingly.

## Review by Sebastiano Meier 2003-07-07
Passed.
