# clear-cutting, grassland to arable land, annual crop

Dataset: EcoSpold 2, unit process
Geography: AU
Time period: 2010-01-01 to 2021-12-31
Technology level: current
Classification: ISIC rev.4 ecoinvent: 0161:Support activities for crop production
Tags: WFLDB
Scenario: Business-as-Usual
System model: Allocation, cut-off by classification
Generated by: Vincent Rossi
Database: ecoinvent
isCopyrightProtected: true
accessRestrictedTo: 1

## General comment
This dataset represents the interventions associated with the clear-cutting of grassland for the provision of arable land tenure. NPP (net primary productivity of a given land, in kg C / m2 and year) and VEG (above-ground biomass) values are parameterized.
VEG values have the following sources:
- Forests: Global Forest Resources Assessment 2010: http://www.fao.org/forestry/fra/fra2010/en/
- Grassland: IPCC 2006 Guidelines, Voiume 6, Table 6.4. All values in tonne C/ha, converted to carbon based on 47% carbon content of dry matter biomass (see for example section 6.2.1.4 of IPCC 2006).
- Crops: Cveg croplands, based on Table 11 of the European Commission decision.* All values in tonne C/ha.
* C(2010) 3751: COMMISSION DECISION of 10 June 2010 on guidelines for the calculation of land carbon stocks for the purpose of Annex V to Directive 2009/28/EC, Official Journal of the European Union, L 151/19. Exceptions based on the Table 12 of the EC decision: Coconuts, Jatropha, Jojoba Seeds, Oil palm fruit, Sugar cane
Distinction is made between primary and secondary forests. The respective land area of each type forest is known from FAOSTAT data. Based on empirical values, it is considered that the secondary VEG is 74% of the primary VEG. The same ratio is applied as the weighted average between primary and secondary forest is always equal to the GFRA 2010 value.

## Included activities start
This activity starts with the natural state of grassland.

## Included activities end
The dataset includes the carbon stored in Above-Ground Biomas (AGB), Below-Ground Biomass (BGB) and Dead Organic Matter (DOM) pools. It includes the fluxes from these carbon pools in terms of CO2.
The loss/gain of Soil Organic Carbon (SOC) usually associated with a land tranformation is accounted for in the downstream activity using the arable land tenure, given that it depends on the subsequent land use practice.
This activity ends with the provision of arable land tenure, measured in unit kg carbon Potential Net Primary Production (NPP).

## Parameters
- LUC_crop_specific: 1 dimensionless
  This parameter allows to switch between a 'crop specific' and a 'country specific' approach when calculating the LUC of a crop. By default, the chosen approach is 'crop specific', so the value of the parameter is 1. If you want to apply a 'country specific' approach, turn the parameter to 0.
- Above and below ground biomass: 0.386 dimensionless; name VEG; lognormal variance with pedigree 0.017425, pedigree (2,5,2,2,3)
- NPP0, net primary productivity: 0.455 dimensionless; name NPP; lognormal variance with pedigree 0.022825, pedigree (2,5,2,2,3)

## Reference product
- land tenure, arable land, measured as carbon net primary productivity, annual crop: 1 kg; CPC 7: Financial and related services; real estate services; and rental and leasing services; By-product classification allocatable product
  Yield = 1.0 kg/haLand that is made available for the cultivation of annual crops, expressed in kg carbon net pripary productivity
  production volume 2.13177e8 kg
    This production volume has been estimated by decoupling the different land tenures contributing to the annual land use change (for annual crops and paddy rice), per country, and multiplying by the national annual land use change production volumes for annual crops and paddy rice, respectively. Land use change production volume is estimated based in FAO statistic and following the concept of Total Biomass Appropriation (TBA), developped by Krausmann et al., 2008. The ha of land devoted to annual crops per country is multiplied by the share of TBA of the country, in order to weight the relative land use change of the country, in a Global context. The shares of TBA are calculated in relation to the total sum of TBA of the World. The same is done to estimate land use change associated to paddy rice. Additional source: Nemecek T., Bengoa X., Lansche J., Mouron P., Riedener E., Rossi V. & Humbert S. (2015) Methodological Guidelines for the Life Cycle Inventory of Agricultural Products. Version 3.0, July 2015. World Food LCA Database (WFLDB). Quantis and Agroscope, Lausanne and Zurich, Switzerland.
  property carbon content, non-fossil 1
    The flow is expressed in kg carbon Potential Net Primary Production (NPP0)
  property carbon content 1
    carbon content on a dry matter basis (reserved; not for manual entry)
  properties: price 0 EUR2005, water content 0, water in wet mass 0 kg, dry mass 1 kg, wet mass 1 kg, carbon allocation 1 kg

## Inputs from nature
- Transformation, from grassland, natural (non-use) [natural resource, land]: 2.1978 m2; = 1/NPP
  ; Corresponds to the reference flow.
- Occupation, construction site [natural resource, land]: 0.0422654 m2*year; = 1/52*1/NPP
  Calculated: The time required for the clear cutting is estimated to be one week
- Transformation, to arable land, unspecified use [natural resource, land]: 2.1978 m2; = 1/NPP
  ; Corresponds to the reference flow.
- Carbon, organic, in soil or biomass stock [natural resource, in ground]: 0.848352 kg; = VEG/NPP
  Above and below ground biomass, in kg C per reference flow.

## Emissions to nature
- Carbon dioxide, from soil or biomass stock [air, non-urban air or from high stacks]: 3.11062 kg; = VEG/NPP*44/12
  Calculated Value: Total ecosystem carbon stocks are used to estimate CO2 emissions to the atmosphere (IPCC 2006).; IPCC, Guidelines for National Greenhouse Gas Inventories - Agriculture, Forestry and Other Land Use 2006. Volume 4.

## Sampling procedure
Literature data
Adapted from ecoinvent 3 process, with parametrized NPP (Net Primary Productivity of a given land, in kg C / m2 and year) and VEG (Above and below ground biomass, in kg C / m2) values.

## Extrapolations
This dataset has been extrapolated from year 2015 to the year of the calculation (2021). The uncertainty has been adjusted accordingly.
