# aluminium sulfate production, without water, in 4.33% aluminium solution state

Dataset: EcoSpold 2, unit process
Geography: CA-QC
Time period: 2013-01-01 to 2021-12-31
Technology level: current
Classification: ISIC rev.4 ecoinvent: 2011:Manufacture of basic chemicals
Classification: EcoSpold01Categories: chemicals/inorganics
Synonyms: cake alum; filter alum; aluminium alum
Scenario: Business-as-Usual
System model: Allocation, cut-off by classification
Generated by: Jean-Francois Menard
Database: ecoinvent
isCopyrightProtected: true
accessRestrictedTo: 1

## General comment
This dataset represents the production of aluminium sulfate in the region of Québec. The functional unit represent 1 kg of aluminium sulfate (Al2(SO4)3). The final product is however sold in a 4.33% aluminium solution state, which corresponds to 8.18% Al2O3, 27.45% Al2(SO4)3 or 47.69% solid aluminium sulfate (if the hydrated aluminium sulfate form is assumed to be Al2(SO4)3.14H2O).

## Included activities start
This activity starts with the raw material delivery at the manufacturing plant gate.

## Included activities end
This activity ends with the aluminium sulfate solution at the manufacturing plant gate.
The dataset includes the raw materials and energy consumption for production, waste generation, estimation of the infrastructure (approximation), and sulfuric acid emissions.
The process starts by mixing, using compressed air, water, aluminium hydroxide and sulfuric acid (93% solution) to obtain a 9% aluminium solution, and letting the exothermic reaction run for 1.25 hours. Vapors from the solution are treated using a venturi scrubber but some sulfuric acid emissions still occur. The wash water used in the scrubber is used in the mixing reactor. The solution is then diluted with water to obtain the final 4.33% aluminium concentration and cooled before being passed through a filter press. The aluminium sulfate solution is finally transferred to storage tanks and the filter press sludge (93% solids, non-reacted aluminium hydroxide) is left to completely dry and then sent to sanitary landfill since it is considered to be a non-hazardous waste.

## Geography
Data from a single manufacturing company in the region of Québec. They are used as average for the region of Québec.

## Reference product
- aluminium sulfate, without water, in 4.33% aluminium solution state: 1 kg; name RefProd; CPC 34240: Phosphates of triammonium; salts and peroxysalts of inorganic acids and metals n.e.c.; By-product classification allocatable product; CAS 10043-01-3
  production volume 2.745e7 kg; name ProdVol
    Calculated value. Based on the data providing manufacturing company's production volume and its estimate of its market share for the region of Québec.
  property price 0.47 EUR2005; name RefProd_price_EUR2005
    From UN trade database. http://data.un.org/ Calculated as average price for all chemicals in the category 'Trade of goods , US$, HS 1992, 28 Inorganic chemicals, precious metal compound, isotope'. Import data from the largest economies of the world are used (Brazil, India, USA, China, Japan and EU-27).
  property wet mass 1 kg; name RefProd_WM
  property dry mass 1 kg; name RefProd_DM
  property carbon content, fossil 0; name RefProd_C_content_fossil
    fossil carbon content on a dry matter basis
  property water content 0; name RefProd_water_content
  property carbon content, non-fossil 0; name RefProd_C_content_non_fossil
    biogene carbon content on a dry matter basis
  property water in wet mass 0 kg; name RefProd_WWM
  property carbon content 0
    carbon content on a dry matter basis (reserved; not for manual entry)
  properties: carbon allocation 0 kg

## Inputs from technosphere
- chemical factory, organics: 4e-10 unit; lognormal variance with pedigree 0.48, pedigree (5,5,5,5,5)
  Default value using the generic chemical factory dataset created within the ecoinvent project, based on a 50'000 t annual production and a 50 year lifetime.
  Uncertainty: The uncertainty could not be determined, it has then been maximized.
- inert waste: -0.0036425 kg; name AlumHydrox; lognormal variance with pedigree 0.0106, pedigree (1,4,4,1,1)
  Proxy, measured value. The residue left from the filter press (93% solids at the exit of the filter press but then left to dry completely) is composed entirely of non-reacted aluminium hydroxide and is considered as a non-hazardous inert waste. Represents 0.1% of the final solution product.
  production volume 99986.7 kg; = ProdVol * AlumHydrox / RefProd
    Calculated from production volume of reference product using the relative outputs.
  property price 0 EUR2005; name AlumHydrox_price_EUR2005
  properties: dry mass 1 kg, wet mass 1 kg
- electricity, medium voltage: 0.0402833 kWh; lognormal variance with pedigree 0.0112, pedigree (2,4,4,1,1)
  EcoSpold01Location=UCTE
  Measured and calculated value. Represents the electricity used for the production process itself (air compressor and pumps) and the electricity used for the heating of the exterior piping system during winter, building air conditioning during summer (exothermic reaction) and lighting.
- heat, district or industrial, natural gas: 0.0431561 MJ; = NaturalGas*NaturalGasNetHeatingValue*36.3/NaturalGasFuelUse; lognormal variance with pedigree 0.008, pedigree (1,1,4,1,1)
  Reported as for building heating only. Calculated value (see Exchange Properties).
  Uncertainty: Calculated variable. Uncertainty will be determined from propagation of uncertainty factors of underlying variables. Uncertainty of actual relation between variables not accounted at this time, although this could be included in a future update.
  property heating value, net 1 MJ; name NaturalGasNetHeatingValue
  property Corresponding fuel use 1.0417 MJ; name NaturalGasFuelUse
  property fuel input in physical units, m3 0.00123845 m3; name NaturalGas
  note on heating value, net: net (lower) heating (calorific) value. Value taken from Table 5.1 of report "Overview and methodology, Data quality guidelines for the ecoinvent database version 3" (ecoinvent report No. 1 (v3), 2011).
  note on Corresponding fuel use: Lower heating value of the fuel input related to the heat/electricity output. Assume a 96% energy efficiency based on Section 5.3.6 of report "Life cycle Inventories of Energy Systems, Results for Current Systems in Switzerland and other UCTE Countries" (ecoinvent report No. 5, 2007)
  note on fuel input in physical units, m3: Estimated value. Represents the natural gas used for the building heating.
- water, deionised: 0.0620099 kg; lognormal variance with pedigree 0.0112, pedigree (2,4,4,1,1)
  Calculated value. Calculated from the amount of sulfuric acid and the concentration of the acid solution given by the data providing manufacturing company.
  properties: wet mass 1 kg
- aluminium hydroxide: 0.448756 kg; lognormal variance with pedigree 0.0106, pedigree (1,4,4,1,1)
  EcoSpold01Location=RER
  Measured value.
  properties: dry mass 1 kg, wet mass 1 kg
- tap water: 0.21877 kg; name TapWater; lognormal variance with pedigree 0.0106, pedigree (1,4,4,1,1)
  Measured value. Represents the extra amount of water (0.000219925 kg) added to the reaction tank to compensate for the evaporation losses during the mixing and reaction, and the make-up water (0.218550067 kg) for the cooling system (exothermic reaction).
  properties: water content 2962.17, carbon content, fossil 0.00178991, wet mass 1 kg, dry mass 0.000337476 kg
  note on carbon content, fossil: Bicarbonate content is 2.93 mol/m3. CO2 content is 0.1 mol/m3 (ecoinvent v2.2 report 8, Tab 93.1).
- sulfuric acid: 0.823846 kg; lognormal variance with pedigree 0.0106, pedigree (1,4,4,1,1)
  EcoSpold01Location=RER
  Measured value. Reported amount adjusted for the concentration of the acid solution used (93%) given by the data providing manufacturing company.
  properties: wet mass 1 kg, dry mass 1 kg

## Emissions to nature
- Water [air, non-urban air or from high stacks]: 0.00021877 m3; = TapWater/1000; lognormal variance with pedigree 0.008, pedigree (1,1,4,1,1)
  Calculated value. Based on amount of tap water input, all water is assumed to be evaporated. The water included in the sulfuric acid input is part of the final product solution so not included in the emission flow.
  Uncertainty: Calculated variable. Uncertainty will be determined from propagation of uncertainty factors of underlying variables. Uncertainty of actual relation between variables not accounted at this time, although this could be included in a future update.
- Sulfur dioxide [air, non-urban air or from high stacks]: 2.54975e-6 kg; lognormal variance with pedigree 0.0106, pedigree (1,4,4,1,1)
  Measured value.
- Sulfuric acid [air, non-urban air or from high stacks]: 2.54975e-7 kg; lognormal variance with pedigree 0.0106, pedigree (1,4,4,1,1)
  Measured value.

## Sampling procedure
Data based on questionnaire from one manufacturing company, except for the infrastructure which is based on standard assumptions on plant lifetime and annual production volume.

## Extrapolations
This dataset has been extrapolated from year 2013 to the year of the calculation (2021). The uncertainty has been adjusted accordingly.

## Review by Christian Bauer 2013-12-18
passed
