# paper production, woodfree, uncoated, at non-integrated mill

Dataset: EcoSpold 2, unit process
Geography: RER
Time period: 2000-01-01 to 2021-12-31
Technology level: current
Classification: ISIC rev.4 ecoinvent: 1701:Manufacture of pulp, paper and paperboard
Classification: EcoSpold01Categories: paper & cardboard/graphic paper
Synonyms: uncoated fine paper
Tags: ConvertedDataset
Scenario: Business-as-Usual
System model: Allocation, cut-off by classification
Generated by: Roland Hischier
Published in: Hischier R. 2007
Database: ecoinvent
isCopyrightProtected: true
accessRestrictedTo: 1

## General comment
Woodfree, uncoated paper (also called uncoated fine paper) is one of the most important categories of graphical paper. It contains most of the office papers (e.g. business forms, copier, computer, stationery and book paper). Woodfree paper is defined as containing at least 90% of the fibres in form of chemical pulp. Uncoated paper is defined as not being coated with a coating material like kaolin or calcium carbonate. This dataset represents the production at non-integrated mills which means that market pulp is bought as an input for paper production.

The main sources for the dataset are several environmental reports from European paper mills (Neusiedler (2001), Kymi (1999), Kymi (2001), Nordland Papier (2001)) an the Finnish EcoData database from KCL (KCL (2002)).

Further sources are the German inventory study about graphical paper (Tiedemann et al. (2000)) and the European IPPC documentation for the paper and pulp industry (European Commission (2000)).

References
KCL (2002) KCL EcoData - life cycle inventory database. The Finnish Pulp and Paper Research Institute (KCL), Espoo (Finnland)

Kymi (1999) Environmental Report 1999. UPM-Kymmene Kymi Paper Oy, Kuusankoski (Finland) as pdf-File under: http://www.paper.upm-kymmene.com

Kymi (2001) Kymi Paper Oy Environmental Protection in 2000. UPM-Kymmene Kymi Paper Oy, Kuusankoski (Finland) as pdf-File under: http://www.paper.upm-kymmene.com

Neusiedler (2001) Umwelterklärung der Neusiedler AG - Standort Ulmerfeld-Hausmening. Neusiedler AG, Ulmerfeld-Hausmening (Austria) as pdf-File under: http://www.neusiedler.at/2001/de/pdf/umwelterklaerung_the_2001.pdf

Nordland Papier (2001) Umwelterklärung 2001. UPM-Kymmene Nordland Papier AG, Dörpen (Germany) as pdf-File under: http://www.paper.upm-kymmene.com

Further References
European Commission (2000) Integrated Pollution Prevention and Control (IPPC) - Reference Document on Best Available Techniques in the Pulp and Paper Industry. Institute for Prospective Technological Studies, Sevilla

Tiedemann A., Böttcher Tiedemann C., Buschardt A., Georgi B., Giersberg G., Goosmann G., Gregor H.-D., Mehlhorn B., Modi A., Neitzel H., Oels H.-J., Schmitz S. and Suhr M. (2000) Ökobilanzen für graphische Papiere. Texte 22/00. Umweltbundesamt, Berlin

## Included activities start
This activity starts with the reception of the raw materials, such as sulfate market pulp.

## Included activities end
This dataset represents European production of uncoated, woodfree paper in a non-integrated mill - including pulp preparation, paper production, energy production on-site and internal wastewater treatment.

## Geography
Data from several European fine paper producers used as European average data.

## Technology
Average of present used technology

## Time period
Data represent the average technology in the late 1990ies and early 2000s. The production volume is valid for 2018.

## Parameters
- fraction, cooling water, once-through system, to air: 0.004 dimensionless; name fraction_CW_OT_to_air; lognormal variance with pedigree 0.0413, pedigree (2,3,1,3,1)
  Calculated based on literature value (Scown, C.D., 2011, Water Footprint of U.S. Transportation Fuels and supplying information of the article) (Vionnet, S., Quantis Water Database - Technical Report, 2012).
- fraction, cooling water, recirculating system, to air: 0.771 dimensionless; name fraction_CW_R_to_air; lognormal variance with pedigree 0.0413, pedigree (2,3,1,3,1)
  (same comment as for fraction, cooling water, once-through system, to air)
- fraction, cooling water, to air: 0.3875 dimensionless; name fraction_CW_to_air; = (0.5*fraction_CW_OT_to_air)+(0.5*fraction_CW_R_to_air); lognormal variance with pedigree 0.092025, pedigree (4,4,3,2,4)
  Calculated value based on literature value (see comments of the other parametres present in this dataset) and expert opinion. In the case when no industry/literature data are available about the type of cooling or directly fraction, cooling water, to air specific for the process a default assumption is applied. It is assumed that the once-through cooling system is used in 50% of all cases and recirculating system is used in another 50% of all cases.
- fraction, cooling water, cooling pond system, to air: 0.032 dimensionless; name fraction_CW_CP_to_air; lognormal variance with pedigree 0.0413, pedigree (2,3,1,3,1)
  (same comment as for fraction, cooling water, once-through system, to air)
- fraction, process water, to air: 0.15 dimensionless; name fraction_PW_to_air; lognormal variance with pedigree 0.092025, pedigree (4,4,3,2,4)
  Literature value. In case when no industry/process specific data are available, default evaporation fraction value is used. This value is 15% and is based on literature (Statistics Canada, 2007 & Shaffer, K.H., 2008, Consumptive water use in the Great Lakes Basin, USGS & Shiklomanov, 2003, World Water Resources at the Beginning of the 21st Century) and has been approved by an expert.

## Reference product
- paper, woodfree, uncoated: 1 kg; name ref; CPC 32113: Mechanical wood pulp; semi-chemical wood pulp; pulps of fibrous cellulosic material other than wood; By-product classification allocatable product
  EcoSpold01Location=RER
  production volume 1.81641e9 kg; name PV_ref; = 9082045000*0.2
    Kg/year, valid for 2018,
    retrieved from FAOSTAT, Forestry Production and Trade Statistics, filtered for Regions “Europe”, Elements “production”, Items “Printing and writing papers, uncoated, wood free”, Years “2018”, at http://www.fao.org/faostat/en/#data/FO <http://www.fao.org/faostat/en/>, last accessed April 2020. According to expert judgement 20 % of graphical paper is produced at non-integrated mills.
  property carbon content, non-fossil 0.35
    Biogenic C content was calculated after biogenic C contents of chemicals used in the production of the paper (in Tab 8.54 & 8.55 ecoinvent v2.2 report 11_III, part 8). The cellulose content in 1 kg of paper (on a wet mas basis) was estimated as (1-chemical content), C content of cellulose was considered 0.44 kgC/kg dry mass (ecoinvent v2.2 report, n 15a, pg 40)
  property price 0.756 EUR2005
    Export prices for the World+ according to: http://faostat.fao.org/site/626/DesktopDefault.aspx?PageID=626#ancor downloaded 6 May 2009; calculated as export value divided by export volume.
  property carbon content, fossil 0.0251406
    Fossil C content was calculated after fossil C contents of chemicals used in the production of the paper (in Tab 8.54 & 8.55 ecoinvent v2.2 report 11_III, part 8).
  property carbon content 0.375141
    carbon content on a dry matter basis (reserved; not for manual entry)
  properties: wet mass 1 kg, water content 0.0582011, dry mass 0.945 kg, water in wet mass 0.055 kg, heating value, net 14.11 MJ, carbon allocation 0.354508 kg

## Inputs from technosphere
- lime: 0.1524 kg; lognormal variance with pedigree 0.0421, pedigree (1,4,5,3,1)
  EcoSpold01Location=CH
  Information from one fine paper producer
  Uncertainty: information from one fine paper producer
  properties: carbon content, fossil 0.120005, dry mass 1 kg, wet mass 1 kg
  note on carbon content, fossil: Fossil C content was calculated after fossil C contents of chemicals used in the production of the paper (in Tab 8.54 & 8.55 ecoinvent v2.2 report 11_III, part 8). CaCO3 (MW=100)
- paper mill, non-integrated: 5.44e-11 unit; lognormal variance with pedigree 0.448, pedigree (4,5,5,5,5)
  Own assumption
  EcoSpold01Location=RER
  Uncertainty: own assumption
- alkylketene dimer sizing agent, for paper production: 0.00434 kg; lognormal variance with pedigree 0.0421, pedigree (1,4,5,3,1)
  EcoSpold01Location=RER
  Information from one fine paper producer
  Uncertainty: information from one fine paper producer
  properties: wet mass 1 kg, heating value, net 16.31 MJ, dry mass 1 kg, carbon content, non-fossil 0.538229
  note on carbon content, non-fossil: Biogenic C content was calculated after biogenic C contents of chemicals used in the production of the paper (in Tab 8.54 & 8.55 ecoinvent v2.2 report 11_III, part 8). The cellulose content in 1 kg of paper (on a wet mas basis) was estimated as (1-chemical content), C content of cellulose was considered 0.44 kgC/kg dry mass (ecoinvent v2.2 report, n 15a, pg 40) Chemical formula of alkyl ketene dimer was considered as C38H72O20, and the molecular weight 848g/mol. It is produced from Fatty acids, from vegetarian oil
- sulfate pulp, unbleached: 0.03805 kg; = 0.761*0.05; lognormal variance with pedigree 0.0407, pedigree (1,3,5,3,1)
  Pulp input is 5% unbleached pulp and 95% bleached.
  Uncertainty: average from two european fine paper producers
  properties: carbon content, non-fossil 0.494, wet mass 1 kg, price 0.355 EUR2005, water content 0.111111, heating value, net 13.23 MJ, dry mass 0.9 kg
  note on carbon content, non-fossil: C content of dry mass of sulfate pulp is 0.494 kgC/kg dry wood (ecoinvent v2.2 report 6_IX & ecoinvent v2.2 report 9). No other C containing products in the formulation of the pulp.
- hazardous waste, for underground deposit: -9e-5 kg; name hazardous_waste; lognormal variance with pedigree 0.0407, pedigree (1,3,5,3,1)
  Average from two european fine paper producers
  EcoSpold01Location=DE
  Uncertainty: average from two european fine paper producers
  production volume 163477 kg; = PV_ref*(hazardous_waste/ref)
    Calculated from the production volume of paper, woodfree, uncoated in proportion to the respective output amounts.
  property price 0 EUR2005; name hazardous_waste_price_EUR2005
  properties: wet mass 1 kg, carbon content, fossil 0.554667, dry mass 1 kg
  note on carbon content, fossil: Fossil C content was calculated after fossil C contents of chemicals used in the production of the paper (in Tab 8.54 & 8.55 ecoinvent v2.2 report 11_III, part 8). Tab A.6, ecoinvent v2.2 report 13_I, average hazardous waste composition was used, and referred to 0% water mass. No waste-specific emission are currently inventoried for underground deposits. Accordingly, no waste composition must be specified. For generic, average waste to underground deposit deposition in a 200 liter steel drum without cement solidification is assumed (ecoinvent v2.2 report 13_I).
- municipal solid waste: -0.00672 kg; name msw; lognormal variance with pedigree 0.0407, pedigree (1,3,5,3,1)
  EcoSpold01Location=CH
  Average from two european fine paper producers
  Uncertainty: average from two european fine paper producers
  production volume 1.22063e7 kg; = PV_ref*( msw/ ref)
    (same comment as for hazardous waste, for underground deposit)
  properties: water content 0.297017, carbon content, non-fossil 0.261655, wet mass 1 kg, dry mass 0.771 kg, heating value, net 11.74 MJ, carbon content, fossil 0.171549
  note on carbon content, non-fossil: Biogenic C content was calculated after biogenic C contents of chemicals used in the production of the paper (in Tab 8.54 & 8.55 ecoinvent v2.2 report 11_III, part 8). The cellulose content in 1 kg of paper (on a wet mas basis) was estimated as (1-chemical content), C content of cellulose was considered 0.44 kgC/kg dry mass (ecoinvent v2.2 report, n 15a, pg 40) MSW composition in tab 4.1, ecoinvent v2.2 report 13_I. C content referred to 1 kg DM
  note on heating value, net: Value taken from the general comment of the treatment dataset.
  note on carbon content, fossil: Fossil C content was calculated after fossil C contents of chemicals used in the production of the paper (in Tab 8.54 & 8.55 ecoinvent v2.2 report 11_III, part 8). MSW composition in tab 4.1, ecoinvent v2.2 report 13_I. C content referred to 1 kg DM
- sludge from pulp and paper production: 0 kg; name sludge; pedigree (1,1,1,1,1)
  (same comment as for municipal solid waste)
  production volume 0 kg
    (same comment as for hazardous waste, for underground deposit)
  property price 0 EUR2005; name sludge_price_EUR2005
  properties: water content 0.333333, carbon content, non-fossil 0.21, wet mass 1 kg, dry mass 0.75 kg, heating value, net 2.65 MJ
  note on carbon content, non-fossil: Biogenic C content was calculated after biogenic C contents of chemicals used in the production of the paper (in Tab 8.54 & 8.55 ecoinvent v2.2 report 11_III, part 8). The cellulose content in 1 kg of paper (on a wet mas basis) was estimated as (1-chemical content), C content of cellulose was considered 0.44 kgC/kg dry mass (ecoinvent v2.2 report, n 15a, pg 40) Tab 6.21, ecoinvent v2.2 report 11_III & Tab A.9, ecoinvent v2.2 report 13_I. Sludge from pulp and paper contains 15.75% carbon
- sulfate pulp, bleached: 0.72295 kg; = 0.761*0.95; lognormal variance with pedigree 0.0407, pedigree (1,3,5,3,1)
  (same comment as for sulfate pulp, unbleached)
  properties: carbon content, non-fossil 0.494, dry mass 0.9 kg, water content 0.111111, heating value, net 13.23 MJ, wet mass 1 kg
- chemical, organic: 0.00742 kg; lognormal variance with pedigree 0.0421, pedigree (1,4,5,3,1)
  EcoSpold01Location=GLO
  Information from one fine paper producer
  Uncertainty: information from one fine paper producer
  properties: wet mass 1 kg, carbon content, fossil 0.628, dry mass 1 kg, heating value, net 19.03 MJ
  note on carbon content, fossil: Fossil C content was calculated after fossil C contents of chemicals used in the production of the paper (in Tab 8.54 & 8.55 ecoinvent v2.2 report 11_III, part 8). This dataset is an unweighted average of 20 organic substances (listed in Tab 88.1, ecoinvent v2.2 report 8, part II), being part of the top100 chemicals included in this database. The C-content has also been calculated as an unweighted average of the C content of the substances composing this dataset.
- kaolin: 0.152352 kg; lognormal variance with pedigree 0.0421, pedigree (1,4,5,3,1)
  Information from one fine paper producer
  EcoSpold01Location=RER
  Uncertainty: information from one fine paper producer
  properties: wet mass 1 kg, dry mass 1 kg
- ash from paper production sludge: 0 kg; name ash; pedigree (1,1,1,1,1)
  Average from two european fine paper producers
  EcoSpold01Location=CH
  Uncertainty: average from two european fine paper producers
  production volume 0 kg
    (same comment as for hazardous waste, for underground deposit)
  property price 0 EUR2005; name ash_price_EUR2005
  properties: carbon content, non-fossil 0.0092, wet mass 1 kg, dry mass 1 kg
  note on carbon content, non-fossil: Biogenic C content was calculated after biogenic C contents of chemicals used in the production of the paper (in Tab 8.54 & 8.55 ecoinvent v2.2 report 11_III, part 8). The cellulose content in 1 kg of paper (on a wet mas basis) was estimated as (1-chemical content), C content of cellulose was considered 0.44 kgC/kg dry mass (ecoinvent v2.2 report, n 15a, pg 40) Tab 6.21, ecoinvent v2.2 report 11_III
- electricity, medium voltage: 0.4802 kWh; lognormal variance with pedigree 0.0407, pedigree (1,3,5,3,1)
  Average from two european fine paper producers
  EcoSpold01Location=NORDEL
  Uncertainty: average from two european fine paper producers
- chemical, inorganic: 0.0372 kg; lognormal variance with pedigree 0.0421, pedigree (1,4,5,3,1)
  (same comment as for chemical, organic)
  properties: dry mass 1 kg, wet mass 1 kg, carbon content, fossil 0.003
  note on carbon content, fossil: Fossil C content was calculated after fossil C contents of chemicals used in the production of the paper (in Tab 8.54 & 8.55 ecoinvent v2.2 report 11_III, part 8). This dataset is an unweighted average of 20 inorganic substances (listed in Tab 88.1, ecoinvent v2.2 report 8, part II), being part of the top100 chemicals included in this database. The C-content has also been calculated as an unweighted average of the C content of the substances composing this dataset.
- malusil: 4.8e-5 kg; lognormal variance with pedigree 0.0421, pedigree (1,4,5,3,1)
  Uncertainty: information from one fine paper producer
  properties: wet mass 1 kg, dry mass 1 kg
- optical brighteners, for paper production: 0.00448 kg; lognormal variance with pedigree 0.0421, pedigree (1,4,5,3,1)
  (same comment as for alkylketene dimer sizing agent, for paper production)
  properties: heating value, net 16.9 MJ, wet mass 1 kg, dry mass 1 kg, carbon content, fossil 0.557859
  note on carbon content, fossil: Fossil C content was calculated after fossil C contents of chemicals used in the production of the paper (in Tab 8.54 & 8.55 ecoinvent v2.2 report 11_III, part 8). Mixture of two optical brighteners (DAS-1 and distyrylbiphenyl type), ecoinvent v2.2 report 11-III, pg 298
- potato starch: 0.0397 kg; lognormal variance with pedigree 0.0421, pedigree (1,4,5,3,1)
  Information from one fine paper producer
  EcoSpold01Location=DE
  Uncertainty: information from one fine paper producer
  properties: carbon content, non-fossil 0.46, water content 0.25, wet mass 1 kg, dry mass 0.8 kg, heating value, net 10.66 MJ
  note on carbon content, non-fossil: Biogenic C content was calculated after biogenic C contents of chemicals used in the production of the paper (in Tab 8.54 & 8.55 ecoinvent v2.2 report 11_III, part 8). The cellulose content in 1 kg of paper (on a wet mas basis) was estimated as (1-chemical content), C content of cellulose was considered 0.44 kgC/kg dry mass (ecoinvent v2.2 report, n 15a, pg 40) C-content of starch is considered 46% on dry mass basis (from "Evolutionary and Biochemical Aspects", A.D. Kay and T. Vrede (in Global Ecology, 2010, Elsevier B.V., S.E. Jørgensen Ed.)).
- heat, district or industrial, natural gas: 5.29409 MJ; lognormal variance with pedigree 0.0413, pedigree (1,3,5,3,1)
  EcoSpold01Location=RER
  Heat input as reported by Hischier 2007. Activity Link set to the respective heat supplying activity.
  Uncertainty: average from two european fine paper producers
  properties: heating value, net 1 MJ
- sludge from pulp and paper production: -7.55135e-5, -0.00681449 kg (2 entries); lognormal variance with pedigree 0.0407, pedigree (1,3,5,3,1)
  (same comment as for municipal solid waste)
  production volume 1.25151e7 kg
- ash from paper production sludge: -0.00190033, -4.96734e-5 kg (2 entries); lognormal variance with pedigree 0.0407, pedigree (1,3,5,3,1)
  (same comment as for ash from paper production sludge)
  production volume 3.542e6 kg

## Inputs from nature
- Water, cooling, unspecified natural origin [natural resource, in water]: 0.036 m3; name water_cooling_UNO_input; lognormal variance with pedigree 0.1107, pedigree (1,3,5,3,4)
  Estimation, based on data for sulphate pulp production
  Uncertainty: estimation, based on data for sulphate pulp production
- Water, unspecified natural origin [natural resource, in water]: 0.0103 m3; name water_UNO_input; lognormal variance with pedigree 0.0407, pedigree (1,3,5,3,1)
  Average from two european fine paper producers
  Uncertainty: average from two european fine paper producers

## Emissions to nature
- Water [air, unspecified]: 0.015495 m3; name water_to_air_unspecified; = (water_cooling_UNO_input*fraction_CW_to_air)+(water_UNO_input*fraction_PW_to_air); lognormal variance with pedigree 0.0807, pedigree (2,2,5,1,1)
  Calculated value based on literature values and expert opinion. See comments in the parametres' comment field.
  property fraction, origin: unspecified 1; name fraction_origin_unspecified
  property fraction, origin: fresh water 0; name fraction_origin_fresh_water
  property fraction, origin: salt water 0; name fraction_origin_salt_water
- COD, Chemical Oxygen Demand [water, surface water]: 0.00231 kg; lognormal variance with pedigree 0.0807, pedigree (1,3,5,3,1)
  (same comment as for Water, unspecified natural origin)
- Phosphorus [water, surface water]: 1e-5 kg; lognormal variance with pedigree 0.0807, pedigree (1,3,5,3,1)
  (same comment as for Water, unspecified natural origin)
- DOC, Dissolved Organic Carbon [water, surface water]: 0.000855556 kg; lognormal variance with pedigree 0.0807, pedigree (1,3,5,3,1)
  Calculated as equal to TOC.
  Uncertainty: average from two european fine paper producers
- Water [water, unspecified]: 0.030805 m3; name water_to_water_unspecified; = water_cooling_UNO_input*(1-fraction_CW_to_air)+water_UNO_input*(1-fraction_PW_to_air); lognormal variance with pedigree 0.0807, pedigree (2,2,5,1,1)
  (same comment as for Water)
  property dry mass 0 kg; name DM
  property fraction, origin: salt water 0; name fraction_origin_salt_water_Ww
  property fraction, origin: unspecified 1; name fraction_origin_unspecified_Ww
  property fraction, origin: fresh water 0; name fraction_origin_fresh_water_Ww
  property carbon content, fossil 0; name C_content_fossil
  property wet mass 1000 kg; name WM
  property water in wet mass 1000 kg; name WWM
  property carbon content, non-fossil 0; name C_content_non_fossil
- TOC, Total Organic Carbon [water, surface water]: 0.000855556 kg; lognormal variance with pedigree 0.0807, pedigree (1,3,5,3,1)
  Calculated by default as TOC (gC) = COD/2.7 (COD measured in g O2). Should more correctly be calculated from the carbon content of the specified emissions to water.
  Uncertainty: average from two european fine paper producers
- BOD5, Biological Oxygen Demand [water, surface water]: 0.00032 kg; lognormal variance with pedigree 0.0807, pedigree (1,3,5,3,1)
  (same comment as for Water, unspecified natural origin)
- Suspended solids, unspecified [water, surface water]: 5e-5 kg; lognormal variance with pedigree 0.0807, pedigree (1,3,5,3,1)
  (same comment as for Water, unspecified natural origin)
- Nitrogen [water, surface water]: 4e-5 kg; lognormal variance with pedigree 0.0807, pedigree (1,3,5,3,1)
  (same comment as for Water, unspecified natural origin)

## Sampling procedure
Based on literature and statistics (see dataset field “Published Source”)

## Extrapolations
This dataset has been extrapolated from year 2000 to the year of the calculation (2021). The uncertainty has been adjusted accordingly.

## Review by Hans-Jörg Althaus 2003-08-06
Passed
