# treatment of condensate from light oil boiler, capacity 1.1E10l/year

Dataset: EcoSpold 2, unit process
Geography: RoW
Time period: 1994-01-01 to 2021-12-31
Technology level: current
Classification: ISIC rev.4 ecoinvent: 3700:Sewerage
Classification: EcoSpold01Categories: waste management/wastewater treatment
Tags: ConvertedDataset; Treatment
Scenario: Business-as-Usual
System model: Allocation, cut-off by classification
Generated by: Gabor Doka (obsolete)
Published in: Doka G. 2008
Database: ecoinvent
isCopyrightProtected: true
accessRestrictedTo: 1

## General comment
Wastewater purified in a moderatly large municipal wastewater treatment plant (capacity class 2), with an average capacity size of 71100 per-captia-equivalents PCE.
Wastewater contains (in kg/m3): TOC: 0.025 (GSD=128.4%); SO4-S: 0.084 (GSD=128.4%); NO3-N: 0.002 (GSD=128.4%); Cl: 0.01 (GSD=226.6%); F: 0.00045 (GSD=226.6%); Cr: 0.0004 (GSD=226.6%); Cu: 0.00003 (GSD=226.6%); Ni: 0.002 (GSD=226.6%); Zn: 0.00002 (GSD=226.6%); Fe: 0.002 (GSD=226.6%); Al: 0.02 (GSD=226.6%);
[This dataset was already contained in the ecoinvent database version 2. It was not individually updated during the transfer to ecoinvent version 3. Life Cycle Impact Assessment results may still have changed, as they are affected by changes in the supply chain, i.e. in other datasets. This dataset was generated following the ecoinvent quality guidelines for version 2. It may have been subject to central changes described in the ecoinvent version 3 change report (http://www.ecoinvent.org/database/ecoinvent-version-3/reports-of-changes/), and the results of the central updates were reviewed extensively. The changes added e.g. consistent water flows and other information throughout the database. The documentation of this dataset can be found in the ecoinvent reports of version 2, which are still available via the ecoinvent website. The change report linked above covers all central changes that were made during the conversion process.]

## Included activities end
Infrastructure materials for municipal wastewater treatment plant, transports, dismantling. Land use burdens.

## Geography
Specific to the technology mix encountered in Switzerland in 2000. Well applicable to modern treatment practices in Europe, North America or Japan.

## Technology
Three stage wastewater treatment (mechanical, biological, chemical) including sludge digestion (fermentation) according to the average technology in Switzerland

## Parameters
- fraction, process water, to air: 0.1 dimensionless; name fraction_PW_to_air; lognormal variance with pedigree 0.092025, pedigree (4,4,3,2,4)

## Reference product
- condensate from light oil boiler: -1 m3; By-product classification Waste; CPC 94110: Sewerage and sewage treatment services
  EcoSpold01Location=CH
  production volume 3.96633 m3
    This is a placeholder value that does not reflect real-world production volumes. This dataset does not currently require a real-world production volume to work in the database framework, and no actual data were collected yet. This has no negative effect on the results of the ecoinvent database.
  property price 0 EUR2005
    Waste products are assigned a price of zero as they are assumed to require further treatment.
  property carbon content, fossil 0.0740793
    0.025 kg TOC/m3 (Tab A.18, ecoinvent v2.2 report 13_I). TOC was considered as Total Carbon.
  property heating value, net 0 MJ
    Non combustible products are assumed to have an LHV equal to zero (0).
  property carbon content 0.0740793
    carbon content on a dry matter basis (reserved; not for manual entry)
  properties: water in wet mass 999.663 kg, carbon content, non-fossil 0, water content 2962.17, dry mass 0.337476 kg, wet mass 1000 kg, carbon allocation 0.025 kg

## Inputs from technosphere
- liquid manure spreading, by vacuum tanker: 0.00017697 m3; lognormal variance with pedigree 0.042, pedigree (1,1,5,5,1)
  EcoSpold01Location=CH
  burden from sludge spreading. Uncertainty calculated from wastewater composition and treatment model
- titanium dioxide: 1.2805e-8 kg; lognormal variance with pedigree 0.592, pedigree (1,1,5,5,1)
  EcoSpold01Location=RER
  burden from sludge incineration. Uncertainty calculated from wastewater composition and treatment model
  properties: dry mass 1 kg, wet mass 1 kg
- waste cement, hydrated: 0 kg; pedigree (1,1,1,1,1)
  EcoSpold01Location=CH
  burden from sludge incineration. Uncertainty calculated from wastewater composition and treatment model
  production volume 0 kg
    Calculated from the production volume of condensate from light oil boiler in proportion to the respective output amounts.
  properties: wet mass 1 kg, dry mass 1 kg
- electricity, low voltage: 0 kWh; pedigree (1,1,1,1,1)
  direct wastewater treatment plant burden. Uncertainty calculated from wastewater composition and treatment model
  EcoSpold01Location=CH
- electricity, high voltage: 0 kWh; pedigree (1,1,1,1,1)
  burden from sludge incineration. Uncertainty calculated from wastewater composition and treatment model
  EcoSpold01Location=CH
- chromium oxide, flakes: 2.6133e-10 kg; lognormal variance with pedigree 0.592, pedigree (1,1,5,5,1)
  (same comment as for titanium dioxide)
  properties: dry mass 1 kg, wet mass 1 kg
- wastewater treatment facility, capacity 1.1E10l/year: 1.9883e-9 unit; lognormal variance with pedigree 0.042, pedigree (1,1,5,5,1)
  uncertainty heeded in exchanges of the module
  EcoSpold01Location=CH
- ammonia, anhydrous, liquid: 0 kg; pedigree (1,1,1,1,1)
  (same comment as for electricity, high voltage)
  properties: dry mass 1 kg, wet mass 1 kg
- waste graphical paper: 0 kg; pedigree (1,1,1,1,1)
  (same comment as for electricity, low voltage)
  production volume 0 kg
    (same comment as for waste cement, hydrated)
  properties: heating value, net 14.12 MJ, water content 0.126126, wet mass 1 kg, carbon content, non-fossil 0.454955, dry mass 0.888 kg
  note on heating value, net: Value taken from the general comment of the treatment dataset.
- process-specific burdens, slag landfill: 0 kg; pedigree (1,1,1,1,1)
  (same comment as for waste cement, hydrated)
- municipal waste incineration facility: 1.8909e-11 unit; lognormal variance with pedigree 0.122, pedigree (1,1,5,5,1)
  (same comment as for electricity, high voltage)
- process-specific burdens, residual material landfill: 0 kg; pedigree (1,1,1,1,1)
  (same comment as for waste cement, hydrated)
- iron (III) chloride, without water, in 40% solution state: 5.6876e-6 kg; lognormal variance with pedigree 0.552, pedigree (1,1,5,5,1)
  EcoSpold01Location=CH
  direct wastewater treatment plant burden plus burden from sludge incineration. Uncertainty calculated from wastewater composition and treatment model
  properties: wet mass 1 kg, dry mass 1 kg
- quicklime, milled, packed: 4.0302e-9 kg; lognormal variance with pedigree 0.162, pedigree (1,1,5,5,1)
  (same comment as for electricity, high voltage)
  properties: dry mass 0.99 kg, water content 0.010101, wet mass 1 kg
- heat, district or industrial, other than natural gas: 0 MJ; pedigree (1,1,1,1,1)
  (same comment as for electricity, high voltage)
  properties: heating value, net 1 MJ
- waste plastic, mixture: 0 kg; pedigree (1,1,1,1,1)
  EcoSpold01Location=CH
  direct wastewater treatment plant burden. Uncertainty calculated from wastewater composition and treatment model
  production volume 0 kg
    (same comment as for waste cement, hydrated)
  properties: water content 0.180638, carbon content, fossil 0.747344, dry mass 0.847 kg, wet mass 1 kg, heating value, net 30.79 MJ
  note on carbon content, fossil: C content in 1 kg DM was calculated using data in Tab A.2, ecoinvent v2.2 report 13_I
- sodium hydroxide, without water, in 50% solution state: 2.2229e-8 kg; lognormal variance with pedigree 0.162, pedigree (1,1,5,5,1)
  burden from sludge incineration. Uncertainty calculated from wastewater composition and treatment model
  EcoSpold01Location=RER
  properties: dry mass 1 kg, wet mass 1 kg, heating value, net 3.03 MJ
- residual material landfill: 7.1573e-12 unit; lognormal variance with pedigree 0.072, pedigree (1,1,5,5,1)
  (same comment as for electricity, high voltage)
- hydrochloric acid, without water, in 30% solution state: 2.6937e-8 kg; lognormal variance with pedigree 0.382, pedigree (1,1,5,5,1)
  (same comment as for titanium dioxide)
  properties: wet mass 1 kg, heating value, net 3.32 MJ, dry mass 1 kg
- sewer grid, 1.1E10l/year, 242 km: 1.6832e-7 km; lognormal variance with pedigree 0.042, pedigree (1,1,5,5,1)
  uncertainty heeded in exchanges of the module
  EcoSpold01Location=CH
- heat, district or industrial, natural gas: 0 MJ; pedigree (1,1,1,1,1)
  (same comment as for titanium dioxide)
  properties: heating value, net 1 MJ
- process-specific burdens, municipal waste incineration: 0 kg; pedigree (1,1,1,1,1)
  (same comment as for electricity, high voltage)
- slag landfill: 3.5279e-11 unit; lognormal variance with pedigree 0.072, pedigree (1,1,5,5,1)
  (same comment as for electricity, high voltage)
- cement, unspecified: 0 kg; pedigree (1,1,1,1,1)
  (same comment as for electricity, high voltage)
  properties: wet mass 1 kg, dry mass 1 kg
- chemical, inorganic: 4.4894e-8 kg; lognormal variance with pedigree 0.382, pedigree (1,1,5,5,1)
  burden from sludge incineration. Uncertainty calculated from wastewater composition and treatment model
  EcoSpold01Location=GLO
  properties: carbon content, fossil 0.003, dry mass 1 kg, wet mass 1 kg
  note on carbon content, fossil: This dataset is an unweighted average of 20 inorganic substances (listed in Tab 88.1, ecoinvent v2.2 report 8, part II), being part of the top100 chemicals included in this database. The C-content has also been calculated as an unweighted average of the C content of the substances composing this dataset.
- waste cement, hydrated: -0.000971815, -0.00246368 kg (2 entries); lognormal variance with pedigree 0.082, pedigree (1,1,5,5,1)
  (same comment as for waste cement, hydrated)
  production volume 0.0103065 kg
- electricity, low voltage: 0.00069114, 0.000125843, 0.00284076, 0.00992498, 0.00202624, 0.0311092, 0.00503292, 0.0144519 kWh (8 entries); lognormal variance with pedigree 0.122, pedigree (1,1,5,5,1)
  (same comment as for electricity, low voltage)
- electricity, high voltage: 0.000109888, 2.10667e-5, 0.000485241, 0.00159022, 0.000357185, 0.00514332, 0.000815685, 0.00235139 kWh (8 entries); lognormal variance with pedigree 0.562, pedigree (1,1,5,5,1)
  (same comment as for electricity, high voltage)
- ammonia, anhydrous, liquid: 9.37704e-8, 8.06069e-9, 1.25404e-8, 2.48469e-8, 2.43434e-8, 2.55145e-9, 1.14059e-8, 2.69831e-7 kg (8 entries); lognormal variance with pedigree 0.272, pedigree (1,1,5,5,1)
  (same comment as for electricity, high voltage)
- waste graphical paper: -0.000678029, -0.000103538, -9.05347e-6, -0.000374127, -3.64805e-5, -6.75291e-5, -0.00163575, -0.0125955 kg (8 entries); lognormal variance with pedigree 0.042, pedigree (1,1,5,5,1)
  (same comment as for electricity, low voltage)
  production volume 0.0465 kg
- process-specific burdens, slag landfill: 0.00561364, 0.0142314 kg (2 entries); lognormal variance with pedigree 0.072, pedigree (1,1,5,5,1)
  (same comment as for waste cement, hydrated)
- process-specific burdens, residual material landfill: 0.000971815, 0.00246368 kg (2 entries); lognormal variance with pedigree 0.072, pedigree (1,1,5,5,1)
  (same comment as for waste cement, hydrated)
- heat, district or industrial, other than natural gas: 2.50979e-5, 0.00151553, 0.0618924 MJ (3 entries); lognormal variance with pedigree 0.122, pedigree (1,1,5,5,1)
  (same comment as for electricity, high voltage)
- waste plastic, mixture: -0.00172425, -0.000115208, -8.71297e-6, -4.75849e-5, -1.92238e-5, -4.51863e-5, -0.00146914, -0.0120707 kg (8 entries); lognormal variance with pedigree 0.042, pedigree (1,1,5,5,1)
  (same comment as for waste plastic, mixture)
  production volume 0.0465 kg
- heat, district or industrial, natural gas: 4.37018e-7, 1.04718e-5, 2.83555e-5 MJ (3 entries); lognormal variance with pedigree 0.272, pedigree (1,1,5,5,1)
  (same comment as for titanium dioxide)
- process-specific burdens, municipal waste incineration: 0.0213949, 0.0542391 kg (2 entries); lognormal variance with pedigree 0.122, pedigree (1,1,5,5,1)
  (same comment as for electricity, high voltage)
- cement, unspecified: 0.000198429, 4.12871e-5, 3.024e-6, 8.61938e-6, 0.00019493, 5.73736e-6, 6.30132e-5, 7.6239e-6, 0.000851536 kg (9 entries); lognormal variance with pedigree 0.082, pedigree (1,1,5,5,1)
  (same comment as for electricity, high voltage)

## Emissions to nature
- Nickel, ion [water, ground-, long-term]: 0.00045199 kg; lognormal variance with pedigree 0.732, pedigree (1,1,5,5,1)
  emission from sludge incineration. Uncertainty calculated from wastewater composition and treatment model
- Chloride [water, surface water]: 0.01 kg; lognormal variance with pedigree 0.692, pedigree (1,1,5,5,1)
  sewer overload discharge plus direct wastewater treatment plant emission plus emission from sludge incineration. Uncertainty calculated from wastewater composition and treatment model
- Nickel [air, urban air close to ground]: 2.0835e-11 kg; lognormal variance with pedigree 0.832, pedigree (1,1,5,5,1)
  direct digester gas emission plus emission from sludge incineration. Uncertainty calculated from wastewater composition and treatment model
- COD, Chemical Oxygen Demand [water, ground-, long-term]: 9.7208e-5 kg; lognormal variance with pedigree 0.072, pedigree (1,1,5,5,1)
  (same comment as for Nickel, ion)
- Copper [air, urban air close to ground]: 1.0058e-10 kg; lognormal variance with pedigree 0.782, pedigree (1,1,5,5,1)
  (same comment as for Nickel)
- Aluminium [water, ground-, long-term]: 0.0085323 kg; lognormal variance with pedigree 0.742, pedigree (1,1,5,5,1)
  (same comment as for Nickel, ion)
- Aluminium [soil, agricultural]: 0.007271 kg; lognormal variance with pedigree 0.732, pedigree (1,1,5,5,1)
  emission from sludge spreading. Uncertainty calculated from wastewater composition and treatment model
- Fluoride [water, surface water]: 0.00045 kg; lognormal variance with pedigree 0.692, pedigree (1,1,5,5,1)
  (same comment as for Chloride)
- Sulfate [water, surface water]: 0.25661 kg; lognormal variance with pedigree 0.102, pedigree (1,1,5,5,1)
  (same comment as for Chloride)
- Copper, ion [water, ground-, long-term]: 1.1014e-5 kg; lognormal variance with pedigree 0.752, pedigree (1,1,5,5,1)
  (same comment as for Nickel, ion)
- DOC, Dissolved Organic Carbon [water, surface water]: 0.0028001 kg; lognormal variance with pedigree 0.042, pedigree (1,1,5,5,1)
  (same comment as for Chloride)
- Water [air, unspecified]: 0.1 m3; name water_to_air_unspecified; lognormal variance with pedigree 0.0827, pedigree (2,2,5,5,1)
  Calculated value based on water balance.
  property fraction, origin: salt water 0; name fraction_origin_salt_water
  property fraction, origin: unspecified 1; name fraction_origin_unspecified
  property fraction, origin: fresh water 0; name fraction_origin_fresh_water
- Cyanide [air, urban air close to ground]: 7.9805e-9 kg; lognormal variance with pedigree 0.292, pedigree (1,1,5,5,1)
  (same comment as for Nickel, ion)
- Chromium VI [water, ground-, long-term]: 1.2789e-5 kg; lognormal variance with pedigree 1.112, pedigree (1,1,5,5,1)
  (same comment as for Nickel, ion)
- Water [water, unspecified]: 0.9 m3; name water_to_water_unspecified; lognormal variance with pedigree 0.0827, pedigree (2,2,5,5,1)
  Calculated value based on water balance.
  property fraction, origin: fresh water 1; name fraction_origin_fresh_water_Ww
  property fraction, origin: unspecified 0; name fraction_origin_unspecified_Ww
  property carbon content, fossil 0; name C_content_fossil
  property dry mass 0 kg; name DM
  property water in wet mass 1000 kg; name WWM
  property carbon content, non-fossil 0; name C_content_non_fossil
  property wet mass 1000 kg; name WM
  property fraction, origin: salt water 0; name fraction_origin_salt_water_Ww
- Copper, ion [water, surface water]: 7.7818e-6 kg; lognormal variance with pedigree 0.662, pedigree (1,1,5,5,1)
  (same comment as for Chloride)
- Iron, ion [water, ground-, long-term]: 0.00028294 kg; lognormal variance with pedigree 1.562, pedigree (1,1,5,5,1)
  (same comment as for Nickel, ion)
- Chromium, ion [water, surface water]: 3.8504e-7 kg; lognormal variance with pedigree 0.742, pedigree (1,1,5,5,1)
  (same comment as for Nickel, ion)
- NMVOC, non-methane volatile organic compounds, unspecified origin [air, urban air close to ground]: 8.4744e-7 kg; lognormal variance with pedigree 0.212, pedigree (1,1,5,5,1)
  direct digester gas emission. Uncertainty calculated from wastewater composition and treatment model
- Nitrate [water, ground-, long-term]: 3.1854e-7 kg; lognormal variance with pedigree 0.142, pedigree (1,1,5,5,1)
  (same comment as for Nickel, ion)
- Ammonia [air, urban air close to ground]: 2.2109e-6 kg; lognormal variance with pedigree 0.322, pedigree (1,1,5,5,1)
  direct digester gas emission plus emission from sludge incineration plus emission from sludge spreading. Uncertainty calculated from wastewater composition and treatment model
- Aluminium [water, surface water]: 0.0012005 kg; lognormal variance with pedigree 0.562, pedigree (1,1,5,5,1)
  (same comment as for Chloride)
- Iron, ion [water, surface water]: 0.0010152 kg; lognormal variance with pedigree 0.682, pedigree (1,1,5,5,1)
  (same comment as for Chloride)
- Aluminium [air, urban air close to ground]: 1.8011e-5 kg; lognormal variance with pedigree 0.752, pedigree (1,1,5,5,1)
  (same comment as for Nickel)
- TOC, Total Organic Carbon [water, surface water]: 0.0029977 kg; lognormal variance with pedigree 0.042, pedigree (1,1,5,5,1)
  (same comment as for Chloride)
- Chromium VI [water, surface water]: 0.00020694 kg; lognormal variance with pedigree 0.662, pedigree (1,1,5,5,1)
  (same comment as for Chloride)
- Zinc, ion [water, ground-, long-term]: 1.3138e-7 kg; lognormal variance with pedigree 5.532, pedigree (1,1,5,5,1)
  (same comment as for Nickel, ion)
- Nickel [soil, agricultural]: 0.00030444 kg; lognormal variance with pedigree 0.732, pedigree (1,1,5,5,1)
  (same comment as for Aluminium)
- Methane, fossil [air, urban air close to ground]: 0.00018674 kg; lognormal variance with pedigree 0.102, pedigree (1,1,5,5,1)
  (same comment as for Nickel, ion)
- Zinc [soil, agricultural]: 5.344e-6 kg; lognormal variance with pedigree 0.732, pedigree (1,1,5,5,1)
  (same comment as for Aluminium)
- COD, Chemical Oxygen Demand [water, surface water]: 0.011189 kg; lognormal variance with pedigree 0.042, pedigree (1,1,5,5,1)
  (same comment as for Chloride)
- Nitrogen [water, surface water]: 6.8098e-6 kg; lognormal variance with pedigree 0.132, pedigree (1,1,5,5,1)
  direct wastewater treatment plant emission. Uncertainty calculated from wastewater composition and treatment model
- Nickel, ion [water, surface water]: 0.0012131 kg; lognormal variance with pedigree 0.682, pedigree (1,1,5,5,1)
  (same comment as for Chloride)
- Carbon dioxide, fossil [air, urban air close to ground]: 0.071518 kg; lognormal variance with pedigree 0.052, pedigree (1,1,5,5,1)
  (same comment as for Nickel, ion)
- Copper [soil, agricultural]: 8.5929e-6 kg; lognormal variance with pedigree 0.732, pedigree (1,1,5,5,1)
  (same comment as for Aluminium)
- Carbon [soil, agricultural]: 0.0024842 kg; lognormal variance with pedigree 0.062, pedigree (1,1,5,5,1)
  (same comment as for Aluminium)
- BOD5, Biological Oxygen Demand [water, surface water]: 0.0036744 kg; lognormal variance with pedigree 0.052, pedigree (1,1,5,5,1)
  (same comment as for Chloride)
- Carbon monoxide, fossil [air, urban air close to ground]: 6.7344e-5 kg; lognormal variance with pedigree 0.142, pedigree (1,1,5,5,1)
  (same comment as for Nickel, ion)
- BOD5, Biological Oxygen Demand [water, ground-, long-term]: 3.1796e-5 kg; lognormal variance with pedigree 0.072, pedigree (1,1,5,5,1)
  (same comment as for Nickel, ion)
- Zinc, ion [water, surface water]: 6.1836e-6 kg; lognormal variance with pedigree 0.672, pedigree (1,1,5,5,1)
  (same comment as for Chloride)
- Dinitrogen monoxide [air, urban air close to ground]: 5.4378e-6 kg; lognormal variance with pedigree 0.102, pedigree (1,1,5,5,1)
  direct wastewater treatment plant emission plus direct digester gas emission plus emission from sludge incineration plus emission from sludge spreading. Uncertainty calculated from wastewater composition and treatment model
- Nitrogen oxides [air, urban air close to ground]: 4.3453e-6 kg; lognormal variance with pedigree 0.132, pedigree (1,1,5,5,1)
  (same comment as for Nickel)
- TOC, Total Organic Carbon [water, ground-, long-term]: 3.8465e-5 kg; lognormal variance with pedigree 0.072, pedigree (1,1,5,5,1)
  (same comment as for Nickel, ion)
- Zinc [air, urban air close to ground]: 1.3844e-10 kg; lognormal variance with pedigree 0.782, pedigree (1,1,5,5,1)
  (same comment as for Nickel)
- Iron [soil, agricultural]: 0.00038094 kg; lognormal variance with pedigree 0.732, pedigree (1,1,5,5,1)
  (same comment as for Aluminium)
- Chromium [air, urban air close to ground]: 8.9329e-12 kg; lognormal variance with pedigree 0.822, pedigree (1,1,5,5,1)
  (same comment as for Nickel)
- Nitrate [water, surface water]: 0.0074931 kg; lognormal variance with pedigree 0.102, pedigree (1,1,5,5,1)
  (same comment as for Chloride)
- Iron [air, urban air close to ground]: 2.0166e-8 kg; lognormal variance with pedigree 0.772, pedigree (1,1,5,5,1)
  (same comment as for Nickel)
- DOC, Dissolved Organic Carbon [water, ground-, long-term]: 3.8465e-5 kg; lognormal variance with pedigree 0.072, pedigree (1,1,5,5,1)
  (same comment as for Nickel, ion)
- Chromium [soil, agricultural]: 7.6188e-5 kg; lognormal variance with pedigree 0.732, pedigree (1,1,5,5,1)
  (same comment as for Aluminium)

## Extrapolations
wastewater compositions from literature and/or estimates This dataset has been copied from an original dataset covering the geography CH. The uncertainty has been adjusted accordingly.

## Review by Niels Jungbluth 2009-01-22
passed.
