# expanded perlite production

Dataset: EcoSpold 2, unit process
Geography: RoW
Time period: 1995-01-01 to 2021-12-31
Technology level: current
Classification: ISIC rev.4 ecoinvent: 2399:Manufacture of other non-metallic mineral products n.e.c.
Classification: EcoSpold01Categories: insulation materials/production
Tags: ConvertedDataset
Scenario: Business-as-Usual
System model: Allocation, cut-off by classification
Generated by: Daniel Kellenberger (obsolete)
Published in: Kellenberger D. 2004
Database: ecoinvent
isCopyrightProtected: true
accessRestrictedTo: 1

## General comment
Expanded by shock heating at a temperature of 870 – 1090 °C. It is assumed that light fuel oil is used for heating. Density of expanded perlite: 60 - 300kg/m3
[This dataset was already contained in the ecoinvent database version 2. It was not individually updated during the transfer to ecoinvent version 3. Life Cycle Impact Assessment results may still have changed, as they are affected by changes in the supply chain, i.e. in other datasets. This dataset was generated following the ecoinvent quality guidelines for version 2. It may have been subject to central changes described in the ecoinvent version 3 change report (http://www.ecoinvent.org/database/ecoinvent-version-3/reports-of-changes/), and the results of the central updates were reviewed extensively. The changes added e.g. consistent water flows and other information throughout the database. The documentation of this dataset can be found in the ecoinvent reports of version 2, which are still available via the ecoinvent website. The change report linked above covers all central changes that were made during the conversion process.]

## Included activities end
includes the raw material, the transport to the finishing plant and some internal transports, the heating energy carrier, some packaging materials, the infrastructure and the emissions

## Geography
For some exchanges CH, RER and OCE modules have been used as proxy.

## Technology
Basic principle is a heating of the perlite grains to high temperature. The volume increase is 15 – 30 fold

## Parameters
- fraction, tap water, to air: 0.15 dimensionless; name fraction_TW_to_air; lognormal variance with pedigree 0.092025, pedigree (4,4,3,2,4)
- fraction, process water, to air: 0.15 dimensionless; name fraction_PW_to_air; lognormal variance with pedigree 0.092025, pedigree (4,4,3,2,4)

## Reference product
- expanded perlite: 1 kg; By-product classification allocatable product; CPC 37990: Non-metallic mineral products n.e.c. (including mineral wool, expanded mineral materials, worked mica, article[…]
  EcoSpold01Location=CH
  production volume 3.96633 kg
    This is a placeholder value that does not reflect real-world production volumes. This dataset does not currently require a real-world production volume to work in the database framework, and no actual data were collected yet. This has no negative effect on the results of the ecoinvent database.
  property carbon content, fossil 0
    75% SiO2, 15% Al2O3 (ecoinvent v2.2 report 7, part XXI, pg4). Considered as perlite
  property carbon content, non-fossil 0
    75% SiO2, 15% Al2O3 (ecoinvent v2.2 report 7, part XXI, pg4). Considered as perlite
  property carbon content 0
    carbon content on a dry matter basis (reserved; not for manual entry)
  properties: price 1.77 EUR2005, water content 0, water in wet mass 0 kg, wet mass 1 kg, dry mass 1 kg, carbon allocation 0 kg

## Inputs from technosphere
- packaging film, low density polyethylene: 0.0115 kg; lognormal variance with pedigree 0.078, pedigree (4,5,5,5,1)
  EcoSpold01Location=RER
  properties: carbon content, fossil 0.857143, wet mass 1 kg, dry mass 1 kg, heating value, net 42.47 MJ
  note on carbon content, fossil: Polyethylene is formed out of a huge amount of ethylene monomers (C2H4) (ecoinvent v2.2 report 11_II). MW=28 g/mol
- heat, district or industrial, other than natural gas: 0 MJ; pedigree (1,1,1,1,1)
  EcoSpold01Location=CH
  properties: heating value, net 1 MJ
- tap water: 0 kg; name tap_water_input; pedigree (1,1,1,1,1)
  EcoSpold01Location=RER
  properties: water content 2962.17, dry mass 0.000337476 kg, carbon content, fossil 0.00178991, wet mass 1 kg
  note on carbon content, fossil: Bicarbonate content is 2.93 mol/m3. CO2 content is 0.1 mol/m3 (ecoinvent v2.2 report 8, Tab 93.1).
- perlite: 1.02 kg; lognormal variance with pedigree 0.078, pedigree (4,5,5,5,1)
  EcoSpold01Location=DE
  properties: dry mass 1 kg, wet mass 1 kg
- containerboard, linerboard: 0 kg; pedigree (1,1,1,1,1)
  EcoSpold01Location=RER
  properties: water content 0.0582011, carbon content, fossil 0.00169774, carbon content, non-fossil 0.408159, wet mass 1 kg, dry mass 0.945 kg, heating value, net 15.92 MJ
  note on carbon content, fossil: Fossil C content was calculated after fossil C contents of chemicals used in the production of board (ecoinvent v2.2 report 11_III, part 10)
  note on carbon content, non-fossil: Biogenic C content was calculated after biogenic C contents of chemicals used in the production of board (ecoinvent v2.2 report 11_III, part 10). The cellulose content in 1 kg of paper (on a wet mas basis) was estimated as (1-chemical content), C content of cellulose was considered 0.44 kgC/kg dry mass (ecoinvent v2.2 report, n 15a, pg 40)
- clay pit infrastructure: 2e-10 unit; lognormal variance with pedigree 0.692, pedigree (1,1,5,5,1)
  EcoSpold01Location=CH
- electricity, medium voltage: 0 kWh; pedigree (1,1,1,1,1)
  EcoSpold01Location=UCTE
- inert waste: 0 kg; pedigree (1,1,1,1,1)
  EcoSpold01Location=CH
  estimation
  production volume 0 kg
    Calculated from the production volume of expanded perlite in proportion to the respective output amounts.
  properties: wet mass 1 kg, dry mass 1 kg
- silicone product: 0.05 kg; lognormal variance with pedigree 0.108, pedigree (4,5,5,5,1)
  EcoSpold01Location=RER
  properties: carbon content, fossil 0.324324, heating value, net 9.83 MJ, dry mass 1 kg, wet mass 1 kg
  note on carbon content, fossil: The term silicones is used for compounds in which silicon atoms are linked via oxygen atoms, each silicon atom bearing one or several organic groups. In industrially important silicones, these groups are usually methyl or phenyl (ecoinvent v2.2 report 8_part71 & Ullmann). The chemical formula was considered to be [Si(CH3)2O]n (Ullmann).
- heat, district or industrial, other than natural gas: 0.00319496, 0.192927, 7.87888 MJ (3 entries); lognormal variance with pedigree 0.692, pedigree (1,1,5,5,1)
  EcoSpold01Location=CH
- tap water: 4.67208e-6, 5.62392e-7, 9.29446e-7, 0.000199854, 2.3437e-5, 6.09706e-7, 1.7343e-6, 0.000268201 kg (8 entries); lognormal variance with pedigree 0.078, pedigree (4,5,5,5,1)
  EcoSpold01Location=RER
- containerboard, linerboard: 1.55219e-5, 0.00142448 kg (2 entries); lognormal variance with pedigree 0.078, pedigree (4,5,5,5,1)
  EcoSpold01Location=RER
- electricity, medium voltage: 0.000661153, 0.000126781, 0.00291108, 0.00963808, 0.00212838, 0.0309554, 0.00436318, 0.0142159 kWh (8 entries); lognormal variance with pedigree 0.078, pedigree (4,5,5,5,1)
  EcoSpold01Location=UCTE
- inert waste: -6.63002e-5, -0.0002337 kg (2 entries); lognormal variance with pedigree 0.042, pedigree (1,1,5,5,1)
  EcoSpold01Location=CH
  estimation
  production volume 0.0009 kg

## Emissions to nature
- Water [air, unspecified]: 7.5e-8 m3; name water_to_air_unspecified; lognormal variance with pedigree 0.0827, pedigree (2,2,5,5,1)
  Calculated value based on literature values and expert opinion. See comments in the parametres' comment field.
  property fraction, origin: salt water 0; name fraction_origin_salt_water
  property fraction, origin: fresh water 1; name fraction_origin_fresh_water
  property fraction, origin: unspecified 0; name fraction_origin_unspecified
- Water [water, unspecified]: 4.25e-7 m3; name water_to_water_unspecified; lognormal variance with pedigree 0.0827, pedigree (2,2,5,5,1)
  (same comment as for Water)
  property dry mass 0 kg; name DM
  property fraction, origin: salt water 0; name fraction_origin_salt_water_Ww
  property fraction, origin: unspecified 0; name fraction_origin_unspecified_Ww
  property fraction, origin: fresh water 1; name fraction_origin_fresh_water_Ww
  property carbon content, fossil 0; name C_content_fossil
  property carbon content, non-fossil 0; name C_content_non_fossil
  property wet mass 1000 kg; name WM
  property water in wet mass 1000 kg; name WWM

## Sampling procedure
Literature

## Extrapolations
See geography This dataset has been copied from an original dataset covering the geography CH. The uncertainty has been adjusted accordingly.

## Review by Roberto Dones 2004-04-15
passed
