# silicon tetrachloride production

Dataset: EcoSpold 2, unit process
Geography: GLO
Time period: 1986-01-01 to 2021-12-31
Technology level: current
Classification: ISIC rev.4 ecoinvent: 2011:Manufacture of basic chemicals
Synonyms: silicon (IV) chloride; SiCl4; tetrachlorosilane
Scenario: Business-as-Usual
System model: Allocation, cut-off by classification
Generated by: Tereza Levova
Published in: Seo, E.S.M. 2003
Database: ecoinvent
isCopyrightProtected: true
accessRestrictedTo: 1

## General comment
Production of silicon tetrachloride production by chlorination method using silica sand as raw material.

## Included activities start
The activity starts when the raw materials enters the process.

## Included activities end
Materials entering the process are included as well as energy uses, infrastructure and emissions.

## Technology
Silicon tetrachloride production by chlorination method using silica sand (SiO2) as raw material.
The amount of silicon dioxide (SiO2), carbon and chlorine (Cl2) entering the process is calculated via stoichiometric equation. The efficiency of the reaction is assumed to be 95%, thus the amount of all the substances entering the process is multiplied by (1/0.95). In the case of sodium dioxide the unreacted amount is assumed to be released as solids, inorganic as a part of wastewater. The unreacted amount of carbon is assumed to be converted within the boundaries of the activity into carbon dioxide (either during air emission treatment - flaring or during wastewater treatment). 0.2% of the imput amount of chlorine is assumed to be emitted into the air. Remaining amount of unreacted chlorine is released as chloride as a part of wastewater. It is assumed that internal wastewater treatment is a part of the activity. Its efficiency is assumed to be 90%, thus only 10% of the unreacted amount of substances which are present in the wastewater are lately released into the environment.
(Seo, E.S.M.; Andreoli, M.,; Chiba, R.; 2001, Silicon tetrachloride production by chlorination method using rice husk as raw material)

## Time period
Time of publications plus 10 years.

## Parameters
- fraction, cooling water, to air: 0.3875 dimensionless; name fraction_CW_to_air; = (0.5*fraction_CW_OT_to_air)+(0.5*fraction_CW_R_to_air); lognormal variance with pedigree 0.092025, pedigree (4,4,3,2,4)
  Calculated value based on literature value (see comments of the other parametres present in this dataset) and expert opinion. In the case when no industry/literature data are available about the type of cooling or directly fraction, cooling water, to air specific for the process a default assumption is applied. It is assumed that the once-through cooling system is used in 50% of all cases and recirculating system is used in another 50% of all cases.
- fraction, cooling water, once-through system, to air: 0.004 dimensionless; name fraction_CW_OT_to_air; lognormal variance with pedigree 0.0413, pedigree (2,3,1,3,1)
  Calculated based on literature value (Scown, C.D., 2011, Water Footprint of U.S. Transportation Fuels and supplying information of the article) (Vionnet, S., Quantis Water Database - Technical Report, 2012).
- fraction, cooling water, cooling pond system, to air: 0.032 dimensionless; name fraction_CW_CP_to_air; lognormal variance with pedigree 0.0413, pedigree (2,3,1,3,1)
  (same comment as for fraction, cooling water, once-through system, to air)
- fraction, cooling water, recirculating system, to air: 0.771 dimensionless; name fraction_CW_R_to_air; lognormal variance with pedigree 0.0413, pedigree (2,3,1,3,1)
  (same comment as for fraction, cooling water, once-through system, to air)

## Reference product
- carbon monoxide: 1 kg; name carbon_monoxide_output; = ((2*carbon_monoxide_output_MW)/silicon_tetrachloride_output_MW); By-product classification allocatable product; CPC 34210: Hydrogen, nitrogen, oxygen, carbon dioxide and rare gases; inorganic oxygen compounds of non-metals n.e.c.; CAS 630-08-0; pedigree (1,1,1,1,1)
  Stoichiometric calculation.
  production volume 5.36796e7 kg
    Calculated from production volume of reference product using the relative outputs.
  property heating value, net 12.99 MJ
    LHV is calculated based on the elemental composition of the substance. Based on the CAS number of the substance (000630-08-0), the chemical formula of the substance is found to be: CO, (PubChem 2020).
    Reference: Kim, S., Chen, J., Cheng, T., Gindulyte, A., He, J., He, S., Li, Q., Shoemaker, B. A., Thiessen, P. A., Yu, B., Zaslavsky, L., Zhang, J., & Bolton, E. E. (2019). PubChem 2019 update: improved access to chemical data. Nucleic acids research, 47(D1), D1102–D1109. https://doi.org/10.1093/nar/gky1033
  property price 0.48 EUR2005; name carbon_monoxide_output_price_EUR2005
    From UN trade database. http://data.un.org/ Calculated as average price for all chemicals in the category 'Trade of goods , US$, HS 1992, 28 Inorganic chemicals, precious metal compound, isotope'. Import data from the largest economies of the world are used (Brazil, India, USA, China, Japan and EU-27).
  property carbon content, fossil 0.428571
    CO. It is assumed that CO is produced from partial combustion of heavy heating oil.
  property carbon content, non-fossil 0
    CO. It is assumed that CO is produced from partial combustion of heavy heating oil.
  property molecular weight 28.01 g/mol; name carbon_monoxide_output_MW
  property carbon content 0.428571
    carbon content on a dry matter basis (reserved; not for manual entry)
  property true value 0.158269; name carbon_monoxide_output_true_value
    allocation property applied in "true value" allocation // value calculated from revenue
  properties: dry mass 1 kg, water in wet mass 0 kg, water content 0, wet mass 1 kg, carbon allocation 0.428571 kg
- silicon tetrachloride: 0 kg; name silicon_tetrachloride_output; CPC 342: Basic inorganic chemicals n.e.c.; By-product classification allocatable product; CAS 10026-04-7
  production volume 3.55357e8 kg; name RP_PV_1; = ((4.85E7*4)*(1+0.09)^(2005-1997))-3.12E7
    Estimated based on literature data. According to Williams, 2000 (http://www.it-environment.org/publications/QITS%20report.pdf) total production volume of silicon tetrachloride in the U.S. in 1997 was 4.85E7 kg. The global production volume in 2005 is calculated using an estimate that silicon tetrachloride production annual growth is 9% (based on global chemicals shipments, American Chemistry Council; http://www.americanchemistry.com/Jobs/EconomicStatistics/Industry-Profile/Global-Business-of-Chemistry). In the same report Williams expect the global production to be 3-5 times bigger. Silicon tetrachloride is produced via different types of technologies; from silicon carbide, ferrosilicon, silicon dioxide or as a by-product during production of other chemical compounds. In another activity (representing another technology) modelled within ecoinvent database, called "silicon production, electronic grade" silicon tetrachloride is produced as a by-product. The production volume of silicon tetrachloride produced in that activity is calculated to be 3.12E+07kg. It is assumed, that the remaining amount of silicon tetrachloride is produced by technology described in this activity.
  property price 13.8 EUR2005; name silicon_tetrachloride_output_price_EUR20
    Temporary price data. Calculated as 90% of purchasers price based on: From ecoinvent report, no. 06_XIII, 10, table 5.2, page 32. Based on personal communication with E. Williams in December 2002.
  property molecular weight 169.898 g/mol; name silicon_tetrachloride_output_MW
  property carbon content 0
    carbon content on a dry matter basis (reserved; not for manual entry)
  property true value 13.8; name silicon_tetrachloride_outpu_true_value_0
    allocation property applied in "true value" allocation // value calculated from revenue
  properties: wet mass 1 kg, water in wet mass 0 kg, carbon content, non-fossil 0, dry mass 1 kg, carbon content, fossil 0, water content 0, carbon allocation 0 kg

## Inputs from technosphere
- chlorine, liquid: 0 kg; name chlorine_gaseous_input; pedigree (1,1,1,1,1)
  Stoichiometric calculation. Yield is assumed to be 95%.
  property molecular weight 70.906 g/mol; name chlorine_gaseous_input_MW
  properties: dry mass 1 kg, wet mass 1 kg
- heat, district or industrial, natural gas: 0.0687764 MJ; = 2*silicon_tetrachloride_output; source Gendorf 2000; lognormal variance with pedigree 0.1707, pedigree (4,4,5,3,5)
  Based on data from Gendorf (2000).
  properties: heating value, net 1 MJ
- carbon black: 0.00511808 kg; name carbon_black_input; = (1/0.95)*( (2*carbon_black_input_MW)/ silicon_tetrachloride_output_MW); lognormal variance with pedigree 0.0326, pedigree (4,5,4,1,3)
  Stoichiometric calculation. Yield is assumed to be 95%.
  property molecular weight 12.011 g/mol; name carbon_black_input_MW
  properties: dry mass 1 kg, wet mass 1 kg, carbon content, fossil 0.85, heating value, net 25.76 MJ
- chemical factory, organics: 1.37553e-11 unit; = 4E-10*silicon_tetrachloride_output; source Gendorf 2000; lognormal variance with pedigree 0.4701, pedigree (4,4,5,3,5)
  Estimation based on Gendorf, 2000
- silica sand: 0.0150604 kg; name silica_sand_input; = (1/0.95)*(1/0.85)*( silica_sand_input_MW/ silicon_tetrachloride_output_MW); lognormal variance with pedigree 0.0326, pedigree (4,5,4,1,3)
  Stoichiometric calculation. Yield is assumed to be 95%. Silica sand is assumed to have 85% of SiO2 (molar weight = 60.084 g/mol).
  property molecular weight 60.084 g/mol; name silica_sand_input_MW
  properties: water content 0.010101, wet mass 1 kg, dry mass 0.99 kg
- inert waste, for final disposal: 0 kg; name BP_amount_1; pedigree (1,1,1,1,1)
  Calculated values. It is assumed, that the whole unreacted volume of silica sand on the input of the acticity is released as a part of wastewater. The efficiency of the waste water treatment plant (WWTP) is assumed to be 90%, i.e. 10% of the volume of silica sand on the inflow to the WWTP is released to the environment as solids, inorganic and 90% is collected by the sand filter which is part of the WWTP and further on treated as inert waste and deposited on a landfill.
  production volume 0 kg
    Calculated from production volume of reference product using the relative outputs.
  property price 0 EUR2005; name BP_amount_1_price_EUR2005
  properties: water content 0.00502513, dry mass 0.995 kg, wet mass 1 kg
- electricity, medium voltage: 0.00307926 kWh; lognormal variance with pedigree 0.1707, pedigree (4,4,5,3,5)
  Assumed to be the same as in case of "chloroacetic acid production" (Althaus, 2007, Life Cycle Inventories of Chemicals, ecoinvent report No. 8, Data v2.0).
- chlorine, liquid: 0.00503648, 0.0251777 kg (2 entries); lognormal variance with pedigree 0.0326, pedigree (4,5,4,1,3)
  Stoichiometric calculation. Yield is assumed to be 95%.
  properties: dry mass 1 kg, wet mass 1 kg, molecular weight 70.906 g/mol
- inert waste, for final disposal: -4.61431e-6, -0.000708775 kg (2 entries); lognormal variance with pedigree 0.072, pedigree (4,5,4,1,3)
  (same comment as for inert waste, for final disposal)
  production volume 7.37194e6 kg

## Inputs from nature
- Water, cooling, unspecified natural origin [natural resource, in water]: 0.000825317 m3; name water_cooling_UNO_input; = 0.024*silicon_tetrachloride_output; source Gendorf 2000; lognormal variance with pedigree 0.1707, pedigree (4,4,5,3,5)
  Data from a large chemical plant in Germany (Gendorf, 2000), calculated based on overal cooling water consumption per kilogram of product. This plant produces several different products.

## Emissions to nature
- Solids, inorganic [water, unspecified]: 7.92655e-5 kg; name silica_sand_emissions_water; = ((1/0.95)-1)*silica_sand_input*0.1; lognormal variance with pedigree 0.072, pedigree (4,5,4,1,3)
  I has been assumed, that the whole unreacted volume of silica sand on the input of the acticity is released as a part of wastewater. The efficiency of the waste water treatment plant (WWTP) is assumed to be 90%, i.e. 10% of the volume of silica sand on the inflow to the WWTP is released to the environment as solids, inorganic.
- Carbon dioxide, fossil [air, urban air close to ground]: 0.000987913 kg; name CO2_emissions_air; = (((1/0.95)-1)*carbon_black_input)*(carbon_dioxide_emissions_air_MW/12); lognormal variance with pedigree 0.0326, pedigree (4,5,4,1,3)
  It is assumed that the whole amount of unreacted carbon is later within this activity transformed to carbon dioxide (either during the fume's treatment or waste water treatment).
  property molecular weight 44.0095 g/mol; name carbon_dioxide_emissions_air_MW
- Water [air, unspecified]: 0.00031981 m3; name water_to_air_unspecified; = water_cooling_UNO_input*fraction_CW_to_air; lognormal variance with pedigree 0.130025, pedigree (4,4,5,2,4)
  Calculated value based on literature values and expert opinion. See comments in the parametres' comment field.
  property fraction, origin: salt water 0; name fraction_origin_salt_water
  property fraction, origin: fresh water 0; name fraction_origin_fresh_water
  property fraction, origin: unspecified 1; name fraction_origin_unspecified
- Chloride [water, unspecified]: 7.64896e-5 kg; name chloride_emissions_water; = (((((1/0.95)-1)*chlorine_gaseous_input)- chlorine_emissions_air)*0.1)*( chloride__emissions_water_MW/chlorine_gaseous_input_MW); lognormal variance with pedigree 0.072, pedigree (4,5,4,1,3)
  In case of chlorine (Cl2), part of the unreacted volume evaporates as emission to air (0.2% of the input), the rest is released as chloride (Cl-) as a part of wastewater. The efficiency of the waste water treatment plant (WWTP) is assumed to be 90%, i.e. 10% of the volume of chloride on the inflow to the WWTP is released to the environment (river). The amount of chloride which is released to the environment is calculated based on knowledge of the amount of unreacted chlorine which does not evaporates into air and molecular weight of both elements.
  property molecular weight 35.453 g/mol; name chloride__emissions_water_MW
- Water [water, unspecified]: 0.000505507 m3; name water_to_water_unspecified; = water_cooling_UNO_input*(1-fraction_CW_to_air); lognormal variance with pedigree 0.130025, pedigree (4,4,5,2,4)
  (same comment as for Water)
  property fraction, origin: fresh water 0; name fraction_origin_fresh_water_Ww
  property fraction, origin: unspecified 1; name fraction_origin_unspecified_Ww
  property fraction, origin: salt water 0; name fraction_origin_salt_water_Ww
- Chlorine [air, unspecified]: 6.04284e-5 kg; name chlorine_emissions_air; = 0.002*chlorine_gaseous_input; lognormal variance with pedigree 0.072, pedigree (4,5,4,1,3)
  It is assumed that 0.2% of the input of chlorine is emitted in air.

## Sampling procedure
Literature data and stochiometric calculation.

## Review by Eric Johnson 2012-02-02
I am satisfied with the revisions.
