# graphite production, battery grade

Dataset: EcoSpold 2, unit process
Geography: CN
Time period: 2009-01-01 to 2021-12-31
Technology level: current
Classification: EcoSpold01Categories: chemicals/inorganics
Classification: ISIC rev.4 ecoinvent: 2011:Manufacture of basic chemicals
Tags: ConvertedDataset
Scenario: Business-as-Usual
System model: Allocation, cut-off by classification
Generated by: Dominic Notter
Published in: Hischier, R. 2009
Database: ecoinvent
isCopyrightProtected: true
accessRestrictedTo: 1

## General comment
The functional unit represent 1 kg of graphite battery grade. Large uncertainty of the process data due to weak data on the production process.
[This dataset was already contained in the ecoinvent database version 2. It was not individually updated during the transfer to ecoinvent version 3. Life Cycle Impact Assessment results may still have changed, as they are affected by changes in the supply chain, i.e. in other datasets. This dataset was generated following the ecoinvent quality guidelines for version 2. It may have been subject to central changes described in the ecoinvent version 3 change report (http://www.ecoinvent.org/database/ecoinvent-version-3/reports-of-changes/), and the results of the central updates were reviewed extensively. The changes added e.g. consistent water flows and other information throughout the database. The documentation of this dataset can be found in the ecoinvent reports of version 2, which are still available via the ecoinvent website. The change report linked above covers all central changes that were made during the conversion process.]

## Included activities end
Raw materials, machineries and energy consumption for production, estimated emissions to air from production and infrastructure of the site (approximation). No water emissions. The difference to the dataset "graphite, at plant" is the input of hard coal coke (40 MJ) and electicity (1 kWh).

## Geography
It is assumed that the original dataset (graphite, at plant) can be used for chinese production. Chinese electricity mix is used.

## Technology
Data approximated with data from lime mining, crushing and milling.
Battery grade: Modification: Battery grade graphite is much more energy intense than industrial graphite, that's why aditional inputs (coke and electricity) are added to the ecoinvent original graphite dataset.
Process: Coke is converted to graphite in an electricity-heated oven at 2'800°C according information from www.timcal.com, one of the leading graphite producers in the world (oral communication Dietrich Goers at conference Batteries 2009 in Cannes).
Carbon-precursor (coke) is crushed and mixed, then fed to silos via conveyor belts. The graphitization process takes place in an electric furnace (Acheson-oven) at 2'800°C during about 1 week. The cooling must be very slow and takes another 2-3 weeks before the unloading of the furnace. Purity of synthetic graphite is >99.9%. Typical products of Timcal as active material: Timrex SLP50 with around 45 um particle size.
Input: 1.2 kg coke for 1 kg of graphite.
Energy demand: Q = m x cp x deltaT Q = 1 [kg] x 1.15 [kJ/kgK] x (2800°C - 20°C) [K] = 3200 kJ Energy demand to heat up 1 kg coke to 2800°C.
Energy demand to hold the coke at 2800°C for the graphitisation process during a few days: Assumed to be 10% of the heating energy Total Energy: 3200kJ x 1.1 = 3600kJ = 1 kWh per kg graphite as electricity.
Natural graphite is found in mines, average graphite content is 5-7% in the ores (rock containing graphite). The natural graphite is grinded (ball mill) and mechanically concentrated in a flotation process. Afterwards follows a drying and size separation process: milling, sieving, conditioning. Purity of natural graphite is 93..99.8%.

## Parameters
- fraction, process water, to air: 0.205 dimensionless; name fraction_PW_to_air; lognormal variance with pedigree 0.092025, pedigree (4,4,3,2,4)
  Literature value (Statistics Canada, 2007 & Shaffer, K.H., 2008, Consumptive water use in the Great Lakes Basin, USGS) (Vionnet, S., Quantis Water Database - Technical Report, 2012).

## Reference product
- graphite, battery grade: 1 kg; CPC 342: Basic inorganic chemicals n.e.c.; By-product classification allocatable product; CAS 101239-80-9
  EcoSpold01Location=CN
  production volume 0.197488 kg
    This is a placeholder value that does not reflect real-world production volumes. This dataset does not currently require a real-world production volume to work in the database framework, and no actual data were collected yet. This has no negative effect on the results of the ecoinvent database. The placeholder value of this activity was scaled according to the nominal GDP of 2005 (source: United Nations, http://data.un.org/Glossary.aspx?q=GDP+%28current+US%24%29, accessed 20130726) to reflect an appropriate share of the global production volume, which is also a placeholder value.
  property price 0.44 EUR2005
    Calculated value based on data from United Nations Commodity Trade Statistics Database (comtrade.un.org). UN comtrade category: 250410 Natural graphite in powder or flakes. Year 2005. Using exchange rate of 1EURO = 1.209 USD. Average of price of import into 5 main markets (EU, US, JP, IN and CN).
  property heating value, net 30.3 MJ
    LHV is calculated based on the Carbon content of the product. More details can be found on the respective documentation.
  property carbon content 1
    carbon content on a dry matter basis (reserved; not for manual entry)
  properties: water content 0, carbon content, fossil 1, carbon content, non-fossil 0, dry mass 1 kg, wet mass 1 kg, water in wet mass 0 kg, carbon allocation 1 kg

## Inputs from technosphere
- industrial machine, heavy, unspecified: 0.000231 kg; lognormal variance with pedigree 0.498025, pedigree (5,5,5,2,5)
  EcoSpold01Location=RER
- blasting: 7.73e-5 kg; lognormal variance with pedigree 0.1581, pedigree (4,4,4,3,1)
  EcoSpold01Location=RER
- limestone quarry infrastructure: 5.25e-11 unit; lognormal variance with pedigree 0.0381, pedigree (4,4,4,3,1)
  EcoSpold01Location=CH
- conveyor belt: 2.78e-8 m; lognormal variance with pedigree 0.498025, pedigree (5,5,5,2,5)
  EcoSpold01Location=RER
- heat, district or industrial, other than natural gas: 0.0898 MJ; lognormal variance with pedigree 0.4461, pedigree (5,5,5,3,3)
  EcoSpold01Location=RER
  properties: heating value, net 1 MJ
- heat, central or small-scale, other than natural gas: 0.0033746 MJ; lognormal variance with pedigree 0.096, pedigree (4,5,5,5,3)
  EcoSpold01Location=CH
  properties: heating value, net 1 MJ
- coke: 40 MJ; lognormal variance with pedigree 0.0788, pedigree (2,2,4,3,4)
  EcoSpold01Location=GLO
  properties: water content 0.0638298, carbon content, fossil 0.869149, wet mass 0.034965 kg, dry mass 0.0328671 kg, heating value, net 28.6 MJ
  note on carbon content, fossil: 81.7% C and 6% water in wet mass (ecoinvent v2.1 report 6_VI Table 7.1)
- recultivation, limestone mine: 6.52e-6 m2; lognormal variance with pedigree 0.0101, pedigree (1,4,4,3,1)
  EcoSpold01Location=CH
- electricity, medium voltage: 1.0325 kWh; lognormal variance with pedigree 0.0788, pedigree (2,2,4,3,4)
  EcoSpold01Location=CN
- diesel, burned in building machine: 0.018 MJ; lognormal variance with pedigree 0.0381, pedigree (4,4,4,3,1)
  EcoSpold01Location=GLO
  properties: heating value, net 1 MJ

## Inputs from nature
- Transformation, to mineral extraction site [natural resource, land]: 6.52e-6 m2; lognormal variance with pedigree 0.0387, pedigree (2,4,4,3,3)
- Water, well, in ground [natural resource, in water]: 2.93e-5 m3; name water_well_in_ground_input; lognormal variance with pedigree 0.0387, pedigree (2,4,4,3,3)
- Transformation, from forest, unspecified [natural resource, land]: 6.52e-6 m2; lognormal variance with pedigree 0.0101, pedigree (1,4,4,3,1)
- Metamorphous rock, graphite containing, in ground [natural resource, in ground]: 1.0526 kg; lognormal variance with pedigree 0.0387, pedigree (2,4,4,3,3)
- Occupation, mineral extraction site [natural resource, land]: 8.48e-5 m2*year; lognormal variance with pedigree 0.0387, pedigree (2,4,4,3,3)

## Emissions to nature
- Particulates, > 10 um [air, unspecified]: 4.78e-5 kg; lognormal variance with pedigree 0.1301, pedigree (5,4,4,3,1)
- Water [air, unspecified]: 6.0065e-6 m3; name water_to_air_unspecified; = (water_well_in_ground_input*fraction_PW_to_air); lognormal variance with pedigree 0.0487, pedigree (2,2,4,1,1)
  Calculated value based on literature values and expert opinion. See comments in the parametres' comment field.
  property fraction, origin: fresh water 1; name fraction_origin_fresh_water
  property fraction, origin: salt water 0; name fraction_origin_salt_water
  property fraction, origin: unspecified 0; name fraction_origin_unspecified
- Particulates, < 2.5 um [air, unspecified]: 8.87e-6 kg; lognormal variance with pedigree 0.0901, pedigree (5,4,4,3,1)
- Particulates, > 2.5 um, and < 10um [air, unspecified]: 0.000121 kg; lognormal variance with pedigree 0.0381, pedigree (4,4,4,3,1)
- Water [water, unspecified]: 2.32935e-5 m3; name water_to_water_unspecified; = water_well_in_ground_input*(1-fraction_PW_to_air); lognormal variance with pedigree 0.0487, pedigree (2,2,4,1,1)
  (same comment as for Water)
  property fraction, origin: salt water 0; name fraction_origin_salt_water_Ww
  property fraction, origin: fresh water 1; name fraction_origin_fresh_water_Ww
  property fraction, origin: unspecified 0; name fraction_origin_unspecified_Ww
  property water in wet mass 1000 kg; name WWM
  property dry mass 0 kg; name DM
  property wet mass 1000 kg; name WM
  property carbon content, fossil 0; name C_content_fossil
  property carbon content, non-fossil 0; name C_content_non_fossil

## Sampling procedure
approximation with data from literature, website, oral communication,

## Extrapolations
This dataset has been extrapolated from year 2010 to the year of the calculation (2021). The uncertainty has been adjusted accordingly.

## Review by Christian Bauer 2010-02-08
passed
