# disk drive production, CD/DVD, ROM, for desktop computer

Dataset: EcoSpold 2, unit process
Geography: GLO
Time period: 2002-01-01 to 2021-12-31
Technology level: current
Classification: ISIC rev.4 ecoinvent: 2620:Manufacture of computers and peripheral equipment
Classification: EcoSpold01Categories: electronics/component
Tags: ConvertedDataset
Scenario: Business-as-Usual
System model: Allocation, cut-off by classification
Generated by: Martin Lehmann
Published in: Hischier R. 2007
Database: ecoinvent
isCopyrightProtected: false
accessRestrictedTo: 1

## General comment
This dataset represents the production of 1 unit of a CD/DVD-ROM drive for a desktop computer. It is based on a common CD/DVD-ROM drive in the last 3 years before 2005, model "NEC", IDE drive, with a total weight of 0.938 kg. The dataset includes material information for all the major CD/DVD-ROM drive components (covers, printed wiring board, optical reader, motor(s), tray, etc.). Main data are based on one dissertation work plus CD/DVD-ROM drive specific data provided by leading optical drive manufacturers (Samsung, Plextor, Panasonic).
This dataset represents the production of 1 unit of a CD/DVD-ROM drive for a desktop computer. It is based on a common CD/DVD-ROM drive in the last 3 years before 2005, model "NEC", IDE drive, with a total weight of 0.938 kg. Main data are based on one dissertation work plus CD/DVD-ROM drive specific data provided by leading optical drive manufacturers (Samsung, Plextor, Panasonic).

## Included activities start
From reception of metals and plastics at the factory gate.

## Included activities end
The dataset includes are the materials (mainly metals and plastics) with their respective manufacturing processes (e.g. sheet rolling or blow moulding). Further inventoried is the infrastructure (factory), the electricity for the assembly of the CD/DVD-ROM drive, the respective waste heat, and the required rail and road transport for input materials from the regional storage to the factory. Not included are emissions to air and water (negligible), the heating of the facility, scrap materials (recycled and reused), the packaging, as well as the post consumer disposal, which is attributed to the desktop computer as a whole.

## Geography
A CD/DVD-ROM drive may be assembled anywhere in the world.

## Technology
The production of a CD/DVD-ROM drive for a desktop computer includes the metal processing steps rolling, cutting and section bar extrusion. Plastic parts are blow moulded or extruded into required shapes.

## Reference product
- disk drive, CD/DVD, ROM, for desktop computer: 1 unit; By-product classification allocatable product; CPC 45272: Removable media storage units
  The CD-ROM and DVD-drive consists of three fundamental components:
  A drive motor spins the disc. This drive motor is precisely controlled to rotate between 200 and 500 rpm depending on which track is being read.
  A laser and a lens system focus in and read the bumps.
  A tracking mechanism moves the laser assembly so that the laser's beam can follow the spiral track. The tracking system has to be able to move the laser at micron resolutions.
  CD-ROM discs are read using CD-ROM drives, which are now almost universal on personal computers. A CD-ROM drive may be connected to the computer via an IDE (ATA), SCSI, S-ATA, Firewire, or USB interface or a proprietary interface, such as the Panasonic CD interface. Virtually all modern CD-ROM drives can also play audio CDs as well as Video CDs and other data standards when used in conjunction with the appropriate software.
  There are two optical storage types with CD-ROMs. CD-R works by replacing the aluminium layer in a normal CD with an organic dye compound. This compound is normally reflective, but when the laser focuses on a spot and heats it to a certain temperature, it "burns" the dye, causing it to darken. In order to retrieve the data you wrote to the CD-R, the laser moves back over the disc and thinks that each burnt spot is a bump. The problem with this approach is that you can only write data to a CD-R once. After the dye has been burned in a spot, it cannot be changed back.
  CD-RW fixes this problem by using phase change, which relies on a very special mixture of antimony, indium, silver and tellurium. This particular compound has the following specific property: When heated to one temperature, it crystallizes as it cools and becomes very reflective; when heated to another, higher temperature, the compound does not crystallize when it cools and so becomes dull in appearance.
  CD-RW drives have three laser settings to make use of this property:
  Read - The normal setting that reflects light to the optoelectronic sensor Erase - The laser set to the temperature needed to crystallize the compound
  Write - The laser set to the temperature needed to de-crystallize the compound
  Other optical devices that deviate from the CD standard, such as DVD, employ approaches comparable to CD-R and CD-RW. An older, hybrid technology called magneto-optical (MO) is seldom used anymore. MO uses a laser to heat the surface of the media. Once the surface reaches a particular temperature, a magnetic head moves across the media, changing the polarity of the particles as needed.
  A CD-ROM drive operates by using a laser to reflect light off the bottom of the disc. The reflected light is then read by a photo detector. The overall operation of a CD-ROM drive is as follows:
  The laser diode emits a low-energy infrared beam toward a reflecting mirror.
  The servo motor, on command from the microprocessor, positions the beam onto the correct track on the CD-ROM by moving the reflecting mirror.
  When the beam hits the disc, its refracted light is gathered and focused through the first lens beneath the platter, bounced off the mirror, and sent toward the beam splitter.
  The beam splitter directs the returning laser light toward another focusing lens.
  The last lens directs the light beam to a photo detector that converts the light into electric impulses.
  These incoming impulses are decoded by the microprocessor and sent along to the host computer as data.
  EcoSpold01Location=GLO
  production volume 1 unit
    Unknown
    Dummy value to be replaced by measured, estimated or calculated value
  property carbon content, non-fossil 9.00773e-5
    Calculated as the addition of C contents in the product composition, and then referred to 1 kg DM
  property price 20.5697 EUR2005
    Calculated based on inputs: The price of the product has been calculated as a sum of the values of the material and energy inputs for this product. This value is therefore a rough estimation. It may underestimate the real price since there are additional expenses when producing any product. These expences can include for example labour costs, treatment of waste materials and profit for the producer. Please consider carefully whether this level of data quality is acceptable for your application.
  property carbon content, fossil 0.231154
    (same comment as for disk drive, CD/DVD, ROM, for desktop computer)
  property carbon content 0.231244
    carbon content on a dry matter basis (reserved; not for manual entry)
  properties: water content 0, wet mass 0.938 kg, dry mass 0.938 kg, water in wet mass 0 kg, carbon allocation 0.216907 kg

## Inputs from technosphere
- hot rolling, steel: 0.008 kg; source Mohite 2005; lognormal variance with pedigree 0.0521, pedigree (1,4,5,3,1)
  EcoSpold01Location=RER
  Estimation, based on literature.
- printed wiring board, through-hole mounted, unspecified, Pb free: 0.0308 kg; source Mohite 2005; lognormal variance with pedigree 0.0521, pedigree (1,4,5,3,1)
  EcoSpold01Location=GLO
  Estimation, based on literature.
  properties: dry mass 1 kg, carbon content, fossil 0.132522, wet mass 1 kg
  note on carbon content, fossil: C content was calculated as the addition of C content in the PWB components
- steel, chromium steel 18/8, hot rolled: 0.008 kg; source Mohite 2005; lognormal variance with pedigree 0.0521, pedigree (1,4,5,3,1)
  EcoSpold01Location=RER
  Estimation, based on literature.
  properties: wet mass 1 kg, dry mass 1 kg, carbon content, fossil 0.0008
  note on carbon content, fossil: Stainless steel model is the grade 304 steel (18/8 stainless, 18% chromium 8% nickel; max. 0.08% C)
- printed wiring board, surface mounted, unspecified, Pb containing: 0.0132 kg; source Mohite 2005; lognormal variance with pedigree 0.0521, pedigree (1,4,5,3,1)
  Estimation, based on literature.
  EcoSpold01Location=GLO
  properties: carbon content, fossil 0.132522, dry mass 1 kg, wet mass 1 kg
- printed wiring board, surface mounted, unspecified, Pb free: 0.0308 kg; source Mohite 2005; lognormal variance with pedigree 0.0521, pedigree (1,4,5,3,1)
  Estimation, based on literature.
  EcoSpold01Location=GLO
  properties: wet mass 1 kg, carbon content, fossil 0.132522, dry mass 1 kg
- steel, low-alloyed, hot rolled: 0.57106 kg; source Mohite 2005; lognormal variance with pedigree 0.0521, pedigree (1,4,5,3,1)
  Estimation, based on literature.
  EcoSpold01Location=RER
  properties: carbon content, fossil 0.005, dry mass 1 kg, wet mass 1 kg
  note on carbon content, fossil: Low alloyed steel composition given in Tab. 3.2 ecoinvent v2.2 report 10_partII. Steel assumed to have a C content of 0.5%
- section bar rolling, steel: 0.006 kg; source Mohite 2005; lognormal variance with pedigree 0.0521, pedigree (1,4,5,3,1)
  Estimation, based on literature.
  EcoSpold01Location=RER
- printed wiring board mounting facility: 3.3333e-8 unit; lognormal variance with pedigree 0.3707, pedigree (2,4,5,3,3)
  EcoSpold01Location=GLO
  Calculated Value, via the annual production volume (1.2 mill.) for a hard disk drive factory in China.
- injection moulding: 0.2208 kg; source Mohite 2005; lognormal variance with pedigree 0.0521, pedigree (1,4,5,3,1)
  Estimation, based on literature.
  EcoSpold01Location=RER
- stretch blow moulding: 0.01404 kg; source Mohite 2005; lognormal variance with pedigree 0.0701, pedigree (1,4,5,3,3)
  Estimation, based on literature.
  EcoSpold01Location=RER
- sheet rolling, steel: 0.46906 kg; source Mohite 2005; lognormal variance with pedigree 0.0521, pedigree (1,4,5,3,1)
  EcoSpold01Location=RER
  Estimation, based on literature.
- polycarbonate: 0.034 kg; source Mohite 2005; lognormal variance with pedigree 0.0521, pedigree (1,4,5,3,1)
  Estimation, based on literature.
  EcoSpold01Location=RER
  properties: heating value, net 29.57 MJ, carbon content, fossil 0.755906, dry mass 1 kg, wet mass 1 kg
  note on carbon content, fossil: Polycarbonate means here 2,2-bis(4-hydroxyphenyl)propane polycarbonate – also called bisphenol A polycarbonate ( -(O-C6H4-C(CH3)2-C6H4-O-CO)n- (ecoinvent v2.2 report 11_II), C16H14O3, MW=254 g/mol.
- acrylonitrile-butadiene-styrene copolymer: 0.062 kg; source Mohite 2005; lognormal variance with pedigree 0.0521, pedigree (1,4,5,3,1)
  EcoSpold01Location=RER
  Estimation, based on literature.
  properties: carbon content, fossil 0.853081, dry mass 1 kg, wet mass 1 kg, heating value, net 35.58 MJ
  note on carbon content, fossil: ABS is the abbreviation originating from its monomers acrylonitrile, butadiene and styrene. It was assumed that every monomer was present in the same proportion, so the basic ABS monomer was considered (C8H8·C4H6·C3H3N), and the MW=104+54+53=211 g/mol
- electricity, medium voltage: 1.7 kWh; source Stachura 2006; lognormal variance with pedigree 0.0521, pedigree (1,4,5,3,1)
  EcoSpold01Location=UCTE
  Estimation, based on literature and Mepsaws, a leading metal saw supplier in Italy.
- printed wiring board, through-hole mounted, unspecified, Pb containing: 0.0132 kg; source Mohite 2005; lognormal variance with pedigree 0.0521, pedigree (1,4,5,3,1)
  EcoSpold01Location=GLO
  Estimation, based on literature.
  properties: dry mass 1 kg, wet mass 1 kg, carbon content, fossil 0.132522
- copper, cathode: 0.0351 kg; source Mohite 2005; lognormal variance with pedigree 0.0521, pedigree (1,4,5,3,1)
  EcoSpold01Location=RER
  Estimation, based on literature.
  properties: wet mass 1 kg, dry mass 1 kg
- wire drawing, copper: 0.0351 kg; source Mohite 2005; lognormal variance with pedigree 0.1892, pedigree (2,3,5,1,3)
  Estimation, based on literature.
  EcoSpold01Location=RER
- polyethylene, high density, granulate: 0.13804 kg; source Mohite 2005; lognormal variance with pedigree 0.0521, pedigree (1,4,5,3,1)
  EcoSpold01Location=RER
  Estimation, based on literature.
  properties: wet mass 1 kg, carbon content, fossil 0.857143, dry mass 1 kg, heating value, net 42.47 MJ
  note on carbon content, fossil: Polyethylene is formed out of a huge amount of ethylene monomers (C2H4) (ecoinvent v2.2 report 11_II). MW=28 g/mol

## Sampling procedure
Data is based on literature. Weighting of CD/DVD-ROM drive components happened at a Technical University after professional disassembly.

## Extrapolations
This dataset has been extrapolated from year 2006 to the year of the calculation (2021). The uncertainty has been adjusted accordingly.

## Review by Rolf Frischknecht 2007-11-08
passed.

## Review by Roland Hischier 2011-09-28
Transfer of documentation done.
