# offshore well production, oil/gas

Dataset: EcoSpold 2, unit process
Geography: GLO
Time period: 1990-01-01 to 2021-12-31
Technology level: current
Classification: EcoSpold01Categories: oil/production
Classification: ISIC rev.4 ecoinvent: 0910:Support activities for petroleum and natural gas extraction
Tags: ConvertedDataset
Scenario: Business-as-Usual
System model: Allocation, cut-off by classification
Generated by: Niels Jungbluth
Published in: Jungbluth, N. 2007
Database: ecoinvent
isCopyrightProtected: true
accessRestrictedTo: 1

## General comment
Process for all types of offshore drilling operations.
[This dataset was already contained in the ecoinvent database version 2. It was not individually updated during the transfer to ecoinvent version 3. Life Cycle Impact Assessment results may still have changed, as they are affected by changes in the supply chain, i.e. in other datasets. This dataset was generated following the ecoinvent quality guidelines for version 2. It may have been subject to central changes described in the ecoinvent version 3 change report (http://www.ecoinvent.org/database/ecoinvent-version-3/reports-of-changes/), and the results of the central updates were reviewed extensively. The changes added e.g. consistent water flows and other information throughout the database. The documentation of this dataset can be found in the ecoinvent reports of version 2, which are still available via the ecoinvent website. The change report linked above covers all central changes that were made during the conversion process.]

## Included activities end
All energy uses, materials and emissions for drilling of an offshore bore hole and finishing of the well.

## Geography
Data mainly found for GB and NO.

## Technology
Drilling in the North Sea

## Time period
Time of publication in literature and environmental reports. Most data are valid for the end of the 90ties.

## Parameters
- fraction, process water, to air: 0.15 dimensionless; name fraction_PW_to_air; lognormal variance with pedigree 0.092025, pedigree (4,4,3,2,4)
  Literature value. In case when no industry/process specific data are available, default evaporation fraction value is used. This value is 15% and is based on literature (Statistics Canada, 2007 & Shaffer, K.H., 2008, Consumptive water use in the Great Lakes Basin, USGS & Shiklomanov, 2003, World Water Resources at the Beginning of the 21st Century) and has been approved by an expert.

## Reference product
- offshore well, oil/gas: 1 m; By-product classification allocatable product; CPC 86211: Support services to oil and gas extraction
  EcoSpold01Location=OCE
  production volume 1 m
    About 50km in NO and 100km in GB per year.
    Dummy value to be replaced by measured, estimated or calculated value
  property price 1317.14 EUR2005
    Calculated based on inputs: The price of the product has been calculated as a sum of the values of the material and energy inputs for this product. This value is therefore a rough estimation. It may underestimate the real price since there are additional expenses when producing any product. These expences can include for example labour costs, treatment of waste materials and profit for the producer. Please consider carefully whether this level of data quality is acceptable for your application.

## Inputs from technosphere
- diesel, burned in diesel-electric generating set, 10MW: 18000 MJ; lognormal variance with pedigree 1.37, pedigree (1,1,5,1,1)
  EcoSpold01Location=GLO
  Estimation. High variations of figures in literature
  properties: heating value, net 1 MJ
- lubricating oil: 0 kg; pedigree (1,1,1,1,1)
  High variations of figures in literature
  EcoSpold01Location=RER
  properties: wet mass 1 kg, dry mass 1 kg, carbon content, fossil 0.75, heating value, net 40.2 MJ
  note on carbon content, fossil: Lubricating oil is produced from diesel. C-content/dry mass of fats and oils considered 75%, from: ecoinvent v2.2 report, n 15a, pg 40
  note on heating value, net: Literature value, Source: IPCC 2006, 2006 IPCC Guidelines for National Greenhouse Gas Inventories, Prepared by the National Greenhouse Gas Inventories Programme, Eggleston H.S., Buendia L., Miwa K., Ngara T. and Tanabe K. (eds). Published: IGES, Japan
- natural gas, vented: 4.1 m3; lognormal variance with pedigree 0.16, pedigree (1,1,5,1,1)
  EcoSpold01Location=GLO
  Estimation for process emission. Variations of figures in literature
  properties: heating value, net 39 MJ, wet mass 0.84 kg, carbon content, fossil 0.602381, dry mass 0.84 kg
  note on heating value, net: Literature value, Source: United Nations Statistics Division (2018) International Recommendations for Energy Statistics (IRES). Available at: http://unstats.un.org/unsd/statcom/doc11/BG-IRES.pdf.
  note on carbon content, fossil: An average C content of 0.506 kg C/ m3 has been assumed (this average has been calculated using data in Tab 3.5, ecoinvent v2.2 report 6_V
- petroleum combustion, in drilling tests: 31.6 kg; lognormal variance with pedigree 0.1621, pedigree (1,4,5,3,1)
  Environmental report NO, basic uncertainty estimated with 2
  EcoSpold01Location=GLO
  Uncertainty: Environmental report NO, basic uncertainty estimated with 2
  properties: dry mass 1 kg, carbon content, fossil 0.85, wet mass 1 kg, heating value, net 41.9 MJ
  note on carbon content, fossil: C-content of crude oil is 83-87% (ecoinven report 6_IV, Tab 3.2). An average C-content of 0.85 kg C/kg crude oil was considered
- activated bentonite: 20 kg; lognormal variance with pedigree 0.16, pedigree (1,1,5,1,1)
  High variations of figures in literature
  EcoSpold01Location=DE
  properties: dry mass 1 kg, wet mass 1 kg
- chemical, inorganic: 42.2 kg; lognormal variance with pedigree 1.37, pedigree (1,1,5,1,1)
  EcoSpold01Location=GLO
  High variations of figures in literature
  properties: dry mass 1 kg, carbon content, fossil 0.003, wet mass 1 kg
  note on carbon content, fossil: This dataset is an unweighted average of 20 inorganic substances (listed in Tab 88.1, ecoinvent v2.2 report 8, part II), being part of the top100 chemicals included in this database. The C-content has also been calculated as an unweighted average of the C content of the substances composing this dataset.
- reinforcing steel: 210 kg; lognormal variance with pedigree 0.16, pedigree (1,1,5,1,1)
  Literature, used in bore hole
  EcoSpold01Location=RER
  properties: dry mass 1 kg, carbon content, fossil 0.004, wet mass 1 kg
- drilling waste: -30 kg; lognormal variance with pedigree 0.69, pedigree (1,1,5,1,1)
  Environmental reports and literature
  EcoSpold01Location=CH
  production volume 30 kg
    Calculated from the production volume of onshore well, oil/gas in proportion to the respective output amounts.
  properties: dry mass 0.285 kg, water content 2.50877, wet mass 1 kg, carbon content, fossil 0.105263
  note on carbon content, fossil: C content was calculated for 1 kg DM, using data in Tab A.9, ecoinvent v2.2 report 13_I.
- cement, Portland: 0 kg; pedigree (1,1,1,1,1)
  Literature, used in bore hole
  properties: dry mass 1 kg, wet mass 1 kg
- barite: 270 kg; lognormal variance with pedigree 0.69, pedigree (1,1,5,1,1)
  High variations of figures in literature
  EcoSpold01Location=RER
  properties: dry mass 1 kg, wet mass 1 kg
- hazardous waste, for incineration: 0 kg; pedigree (1,1,1,1,1)
  Environmental reports and literature
  EcoSpold01Location=CH
  production volume 0 kg
    (same comment as for drilling waste)
  properties: carbon content, fossil 0.554667, heating value, net 17 MJ, water content 0.333333, dry mass 0.75 kg, wet mass 1 kg
  note on carbon content, fossil: Tab A.6, ecoinvent v2.2 report 13_I. C content has been calculated after data in the tables, and then referred to 1 kg DM
  note on heating value, net: Value taken from the general comment of the treatment dataset.
- lignite: 0 kg; pedigree (1,1,1,1,1)
  EcoSpold01Location=RER
  High variations of figures in literature
  properties: dry mass 0.42 kg, wet mass 1 kg, carbon content, fossil 0.655, water content 1.38095, heating value, net 8.8 MJ
  note on carbon content, fossil: C content of dry lignite is 58-73% (specified in Tab 1.1, report 6, part VI). A mean content of 0.655 kg C/kg dry lignite was considered.
  note on heating value, net: Based on literature, page 52, Dones R., Bauer C., Bolliger R., Burger B., Faist Emmenegger M., Frischknecht R., Heck T., Jungbluth N., Röder A., Tuchschmid M. (2007) Life Cycle Inventories of Energy Systems: Results for Current Systems in Switzerland and other UCTE Countries. ecoinvent report No. 5. Paul Scherrer Institut Villigen, Swiss Centre for Life Cycle Inventories, Dübendorf, CH.
- waste natural gas, sour: -951 MJ; lognormal variance with pedigree 0.3521, pedigree (1,4,5,3,1)
  Environmental report NO, basic uncertainty estimated with 3
  EcoSpold01Location=GLO
  Uncertainty: Environmental report NO, basic uncertainty estimated with 3
  production volume 951 MJ
    (same comment as for drilling waste)
  properties: carbon content, fossil 0.571226, dry mass 0.027027 kg, wet mass 0.027027 kg
  note on carbon content, fossil: Calculated out of data in Tab 3.4, ecoinvent v2.2 report 6_V.
- chemical, organic: 9.05 kg; lognormal variance with pedigree 0.69, pedigree (1,1,5,1,1)
  High variations of figures in literature
  EcoSpold01Location=GLO
  properties: heating value, net 19.03 MJ, dry mass 1 kg, wet mass 1 kg, carbon content, fossil 0.628
  note on carbon content, fossil: This dataset is an unweighted average of 20 organic substances (listed in Tab 88.1, ecoinvent v2.2 report 8, part II), being part of the top100 chemicals included in this database. The C-content has also been calculated as an unweighted average of the C content of the substances composing this dataset.
- lubricating oil: 10.44, 49.56 kg (2 entries); lognormal variance with pedigree 0.16, pedigree (1,1,5,1,1)
  High variations of figures in literature
  EcoSpold01Location=RER
- cement, Portland: 19.6023, 20.2884, 0.930066, 0.654212, 1.13382, 0.23535, 22.6993, 0.955456, 133.501 kg (9 entries); lognormal variance with pedigree 0.16, pedigree (1,1,5,1,1)
  Literature, used in bore hole
- hazardous waste, for incineration: -1.288, -0.0336675, -2.67833 kg (3 entries); lognormal variance with pedigree 0.34, pedigree (1,1,5,1,1)
  Environmental reports and literature
  EcoSpold01Location=CH
  production volume 4 kg
- lignite: 0.08664, 0.0087686, 0.104591 kg (3 entries); lognormal variance with pedigree 0.16, pedigree (1,1,5,1,1)
  EcoSpold01Location=RER
  High variations of figures in literature

## Inputs from nature
- Occupation, seabed, drilling and mining [natural resource, land]: 260 m2*year; lognormal variance with pedigree 0.1041, pedigree (3,4,5,3,1)
  Estimation 1 year use
  Uncertainty: Estimation 1 year use
- Water, salt, ocean [natural resource, in water]: 1.73 m3; name water_salt_ocean_input; lognormal variance with pedigree 0.1613, pedigree (2,3,5,3,1)
  Environmental report of Saipem, basic uncertainty estimated with 2
  Uncertainty: Environmental report of Saipem, basic uncertainty estimated with 2
- Transformation, from seabed, unspecified [natural resource, land]: 260 m2; lognormal variance with pedigree 0.1841, pedigree (3,4,5,3,1)
  Literature
  Uncertainty: Literature
- Transformation, to seabed, drilling and mining [natural resource, land]: 260 m2; lognormal variance with pedigree 0.1841, pedigree (3,4,5,3,1)
  Literature
  Uncertainty: Literature

## Emissions to nature
- Water [water, unspecified]: 1.4705 m3; name water_to_water_unspecified; = water_salt_ocean_input*(1-fraction_PW_to_air); lognormal variance with pedigree 0.0807, pedigree (2,2,5,1,1)
  Calculated value based on literature values and expert opinion. See comments in the parametres' comment field.
  property fraction, origin: fresh water 0; name fraction_origin_fresh_water_Ww
  property fraction, origin: salt water 1; name fraction_origin_salt_water_Ww
  property fraction, origin: unspecified 0; name fraction_origin_unspecified_Ww
  property carbon content, fossil 0; name C_content_fossil
  property wet mass 1000 kg; name WM
  property water in wet mass 1000 kg; name WWM
  property dry mass 0 kg; name DM
  property carbon content, non-fossil 0; name C_content_non_fossil
- Phenol [water, ocean]: 4.02e-7 kg; lognormal variance with pedigree 0.6926, pedigree (3,3,5,1,1)
  Environmental report
  Uncertainty: Environmental report
- Barite [water, ocean]: 162 kg; lognormal variance with pedigree 0.7121, pedigree (3,4,5,3,3)
  Literature (Barite and Bentonite) from mud
  Uncertainty: Literature (Barite and Bentonite) from mud
- Nitrogen [water, ocean]: 0.0034 kg; lognormal variance with pedigree 0.0901, pedigree (3,5,5,3,1)
  Extrapolation for sum parameter
  Uncertainty: Extrapolation for sum parameter
- Hydrocarbons, aromatic [water, ocean]: 0.231 kg; lognormal variance with pedigree 0.3701, pedigree (4,4,5,3,1)
  Literature, 5% of oil emission
  Uncertainty: Literature, 5% of oil emission
- AOX, Adsorbable Organic Halogen as Cl [water, ocean]: 4.78e-7 kg; lognormal variance with pedigree 0.6926, pedigree (3,3,5,1,1)
  Environmental report
  Uncertainty: Environmental report
- TOC, Total Organic Carbon [water, ocean]: 3.8 kg; lognormal variance with pedigree 0.0901, pedigree (3,5,5,3,1)
  Extrapolation for sum parameter
  Uncertainty: Extrapolation for sum parameter
- Zinc, ion [water, ocean]: 7.6 kg; lognormal variance with pedigree 0.6926, pedigree (3,3,5,1,1)
  Environmental report
  Uncertainty: Environmental report
- DOC, Dissolved Organic Carbon [water, ocean]: 3.8 kg; lognormal variance with pedigree 0.0901, pedigree (3,5,5,3,1)
  Extrapolation for sum parameter
  Uncertainty: Extrapolation for sum parameter
- Arsenic, ion [water, ocean]: 0.00378 kg; lognormal variance with pedigree 0.6926, pedigree (3,3,5,1,1)
  Environmental report
  Uncertainty: Environmental report
- COD, Chemical Oxygen Demand [water, ocean]: 13.9 kg; lognormal variance with pedigree 0.0901, pedigree (3,5,5,3,1)
  Extrapolation for sum parameter
  Uncertainty: Extrapolation for sum parameter
- Potassium, ion [water, ocean]: 0.16 kg; lognormal variance with pedigree 0.3641, pedigree (3,4,5,3,1)
  Literature, anorg. salt, basic uncertainty estimated with 3
  Uncertainty: Literature, anorg. salt, basic uncertainty estimated with 3
- Sulfate [water, ocean]: 0.6 kg; lognormal variance with pedigree 0.1041, pedigree (3,4,5,3,1)
  Literature, lignosuphonate
  Uncertainty: Literature, lignosuphonate
- Glutaraldehyde [water, ocean]: 0.02 kg; lognormal variance with pedigree 0.7121, pedigree (3,4,5,3,3)
  Literature
  Uncertainty: Literature
- Silicon [water, ocean]: 3.06e-5 kg; lognormal variance with pedigree 0.6926, pedigree (3,3,5,1,1)
  Environmental report
  Uncertainty: Environmental report
- Nickel, ion [water, ocean]: 0.000344 kg; lognormal variance with pedigree 0.6926, pedigree (3,3,5,1,1)
  Environmental report
  Uncertainty: Environmental report
- Particulates, > 10 um [air, non-urban air or from high stacks]: 0.0148 kg; lognormal variance with pedigree 0.1801, pedigree (3,5,5,3,1)
  Literature, use of barite
  Uncertainty: Literature, use of barite
- Chloride [water, ocean]: 1.3 kg; lognormal variance with pedigree 0.3641, pedigree (3,4,5,3,1)
  (same comment as for Potassium, ion)
- Hydrocarbons, unspecified [water, ocean]: 3 kg; lognormal variance with pedigree 0.3701, pedigree (4,4,5,3,1)
  Literature, polymers
  Uncertainty: Literature, polymers
- Carboxylic acids, unspecified [water, ocean]: 1.7 kg; lognormal variance with pedigree 0.7121, pedigree (3,4,5,3,3)
  Literature, emulgator
  Uncertainty: Literature, emulgator
- BOD5, Biological Oxygen Demand [water, ocean]: 13.9 kg; lognormal variance with pedigree 0.0901, pedigree (3,5,5,3,1)
  Extrapolation for sum parameter
  Uncertainty: Extrapolation for sum parameter
- Copper, ion [water, ocean]: 0.00915 kg; lognormal variance with pedigree 0.6926, pedigree (3,3,5,1,1)
  Environmental report
  Uncertainty: Environmental report
- Lead [water, ocean]: 0.0132 kg; lognormal variance with pedigree 0.6926, pedigree (3,3,5,1,1)
  Environmental report
  Uncertainty: Environmental report
- Water [air, unspecified]: 0.2595 m3; name water_to_air_unspecified; = (water_salt_ocean_input*fraction_PW_to_air); lognormal variance with pedigree 0.0807, pedigree (2,2,5,1,1)
  (same comment as for Water)
  property fraction, origin: salt water 1; name fraction_origin_salt_water
  property fraction, origin: fresh water 0; name fraction_origin_fresh_water
  property fraction, origin: unspecified 0; name fraction_origin_unspecified
- Mercury [water, ocean]: 0.000279 kg; lognormal variance with pedigree 0.6926, pedigree (3,3,5,1,1)
  Environmental report
  Uncertainty: Environmental report
- Cadmium, ion [water, ocean]: 0.000302 kg; lognormal variance with pedigree 0.6926, pedigree (3,3,5,1,1)
  Environmental report
  Uncertainty: Environmental report
- Chromium, ion [water, ocean]: 0.00172 kg; lognormal variance with pedigree 0.6926, pedigree (3,3,5,1,1)
  Environmental report
  Uncertainty: Environmental report
- Oils, unspecified [water, ocean]: 4.39 kg; lognormal variance with pedigree 0.3413, pedigree (2,3,5,3,1)
  Literature
  Uncertainty: Literature
- Suspended solids, unspecified [water, ocean]: 570 kg; lognormal variance with pedigree 0.0827, pedigree (3,3,5,3,1)
  Literature, drillings, wastes subtracted
  Uncertainty: Literature, drillings, wastes subtracted

## Sampling procedure
Publication in environmental reports and other literature.

## Extrapolations
This dataset has been extrapolated from year 2000 to the year of the calculation (2021). The uncertainty has been adjusted accordingly.

## Review by Michael Spielmann (obsolete) 2003-08-14
Passed.
