# fattening of heifers for beef production, feedlot

Dataset: EcoSpold 2, unit process
Geography: ZA
Time period: 2016-01-01 to 2021-12-31
Technology level: current
Classification: ISIC rev.4 ecoinvent: 0141:Raising of cattle and buffaloes
Scenario: Business-as-Usual
System model: Allocation, cut-off by classification
Generated by: Philippa Notten
Published in: Russo, V, 2017
Database: ecoinvent
isCopyrightProtected: true
accessRestrictedTo: 1

## General comment
This dataset represents the production of 1 kg of live weight of beef cattle from heifers (yearlings) in a large commercial feedlot in South Africa. The dataset is adapted from that of fattening of weaned calves in a feedlot, but with time spent at the feedlot adjusted to account for the higher entry weight. The dataset assumes an average entry weight of 365 kg and average slaughter weight of 485 kg. Applying the same average daily weight gain as the feedlot for fattening of weaners (1.9 kg per day) results in a time in the feedlot for yearlings of just under three and a half months. The same proportional breakdown into adaptation and finishing stages is retained, i.e. for the first third of the time at the feedlot the cattle spend four hours per day on pasture. After that cattle are kept wholly in pens. All other inclusions, exclusions and assumptions are as for "fattening of calves for beef production, feedlot".

## Included activities start
This activity starts with heifers (yearlings) entering the feedlot.

## Included activities end
This activity ends with the provision of fattened cattle at the farm gate, ready to be sent to slaughterhouses as live weight. Emissions from cattle and manure are included, as are their requirements (feed and water). Electricity and diesel use (represented as tractor use in the dataset) are also included. Pasture is predominantly natural with some irrigation.

## Geography
South African values: Not applicable worldwide.

## Technology
Data and assumptions reflect current farming practices in South Africa

## Time period
Period indicated in the reference.

## Parameters
- fraction, process water to water, to surface water: 0.85 dimensionless; name fraction_PWtoW_to_surface_water
- fraction, process water, to air: 0.15 dimensionless; name fraction_PW_to_air; lognormal variance with pedigree 0.094, pedigree (4,4,3,5,4)
  Literature value. In case when no industry/process specific data are available, default evaporation fraction value is used. This value is 15% and is based on literature (Statistics Canada, 2007 & Shaffer, K.H., 2008, Consumptive water use in the Great Lakes Basin, USGS & Shiklomanov, 2003, World Water Resources at the Beginning of the 21st Century) and has been approved by an expert.

## Reference product
- cattle for slaughtering, live weight: 1 kg; name RP_amount_1; CPC 02111: Cattle; By-product classification allocatable product
  Cattle for slaughtering are the fattened heifers.
  production volume 4.97e7 kg; name ref_product_pv
    National total based on cattle slaughter figures for 2015/2016 reported by Levy Admin (2016). The Levy Admin claims that they collect 98.8% of levy fees due. The breakdown in the source of cattle slaughtered is based on the breakdown in cattle grades reported by members of the Red Meat Abattoirs Association of South Africa (2017). It is assumed that the members are representative of the national average. It is further assumed that feedlot cattle are all A-grade cattle, and cull cows are all C-grade (Strydom et al., 2015 and Strydom, 2015).
    Reference(s): Levy Admin (2016) MSMS Data Nov. 2015 to 2016. Available at: http://levyadmin.co.za/wp-content/uploads/1610-4LevySlaugteringsFinal.pdf. (Accessed September 2017); RMAA (2017) Price Information Report - Red Meat Abattoir Association. Available at: http://rvav.co.za/priceinformationreport/. (Accessed September 2017); Strydom, P.E., Frylinck, L., van Heerden, S.M., Hope-Jones, M., Hugo, A., Webb, E.C., Moholisa, E., Liebenberg, B.E. & Sehoole, O.C. (2015) Sources of variation in quality of South African beef: case studies in relation to the red meat classification system, South African Journal of Animal Science (45) 289-301; Strydom, P.E. (2015) The SA beef classification system in 2015 - a critical review of age classification, Red Meat Research and Development South Africa. Available at: http://www.rmrdsa.co.za/Portals/0/Carcass%20Classification/SA%20Classification%20Critical%20review.pdf.
  property price 2.8 EUR2005; name RP_amount_1_price_EUR2005
    Current price for A Grade cattle (feedlot) is R 48/kg and for C Grade (cull cows) R 41/kg. Suggested price [7]: 2.8 /kg. Source: http://www.mpo.co.za/wp-content/uploads/2018/04/Agri-Trends-23-April-2018-GrainsOilseedsLlivestock-Fibre-.pdf
  property energy content 14.9367 MJ
    Energy content calculated from animal fat and protein composition and energy content for animal fat and protein of 39.3 and 23.6 MJ/kg, respectively.
    Johnson, I.R. et al. (2012). J. Anim. Sci. 90(13):4741-475.
    Williams, C.B. (2005). J. Anim. Sci. 83(6):1262-1266.
  property carbon content, non-fossil 0.4928
    Calculated from live weight empty body composition in fat and protein (
    Johnson, I.R. et al. (2012). J. Anim. Sci. 90(13):4741-475 ; Williams, C.B. (2005). J. Anim. Sci. 83(6):1262-1266) and from C content of nutrients (protein, fat) according to A.D. Kay and T. Vrede ("Evolutionary and Biochemical Aspects", in Global Ecology, 2010, Elsevier B.V., S.E. Jørgensen Ed.).
  property carbon content 0.4928
    carbon content on a dry matter basis (reserved; not for manual entry)
  properties: carbon content, fossil 0, water in wet mass 0.4 kg, wet mass 1 kg, dry mass 0.6 kg, water content 0.666667, carbon allocation 0.29568 kg

## By-products
- manure, liquid, cattle: 0 kg; CPC 34654: Excreta of animals useful for manure/fertilizer and fuel preparation; By-product classification Recyclable; pedigree (1,1,1,1,1)
  Manure draining from enclosures. A manure generation rate of 15 kg per head per day for commercial feedlot cattle is assumed based on the total manure generated and total heads of cattle at feedlots in South Africa (DEA, 2017). Cattle spend 4 hours per day on pasture during the adaptation stage, with the adaptation stage accounting for one third of the total time at the feedlot. 90% of manure deposited in the enclosures is assumed to accumulate and be periodically removed (i.e. 10% of manure is assumed to be washed into collection ponds). These figures are based on the practices at a representative feedlot in the region. Reference(s): DEA (2017) Unlocking Barriers and Opportunities for Land-use Based Climate-Change Mitigation Activities in South Africa, Department of Environmental Affairs of South Africa, Available at: https://www.environment.gov.za/sites/default/files/reports/unlockingbarriers_land-usebasedclimatechangemitigation.pdf. (Accessed September 2017).
  production volume 0 kg; = ref_product_pv * (BP_amount_1 / RP_amount_1)
    Calculated from production volume of reference product using the relative outputs.
  property price 0.0042 EUR2005; name BP_amount_1_price_EUR2005
    World market value of manure, deflated with barley world market price and consumer price index, based on [http://www.gov.pe.ca/photos/original/af_NM_manconv.pdf].
  property carbon content 0.68
    carbon content on a dry matter basis (reserved; not for manual entry)
  properties: dry mass 0.075 kg, carbon content, fossil 0, wet mass 1 kg, nitrogen content 0, carbon content, non-fossil 0.68, water content 12.333, water in wet mass 0.925 kg, carbon allocation 0.051 kg
- manure, solid, cattle: 0 kg; CPC 34654: Excreta of animals useful for manure/fertilizer and fuel preparation; By-product classification Recyclable; pedigree (1,1,1,1,1)
  Manure deposited on dry lots excluding that left on pasture during grazing during the adaptation stage. A manure generation rate of 15 kg per head per day for commercial feedlot cattle is assumed based on the total manure generated and total heads of cattle at feedlots in South Africa (DEA, 2017). Cattle spend 4 hours per day on pasture during the adaptation stage, with the adaptation stage accounting for one third of the total time at the feedlot. 90% of manure deposited in the enclosures is assumed to accumulate and be periodically removed (i.e. 10% of manure is assumed to be washed into collection ponds). These figures are based on the practices at a representative feedlot in the region. Reference(s): DEA (2017) Unlocking Barriers and Opportunities for Land-use Based Climate-Change Mitigation Activities in South Africa, Department of Environmental Affairs of South Africa, Available at: https://www.environment.gov.za/sites/default/files/reports/unlockingbarriers_land-usebasedclimatechangemitigation.pdf. (Accessed September 2017).
  production volume 0 kg; = ref_product_pv* manure_solid_byproduct
    Calculated from production volume of reference product using the relative outputs.
  property price 0.0042 EUR2005
    (same comment as for manure, liquid, cattle)
  property carbon content 0.441
    carbon content on a dry matter basis (reserved; not for manual entry)
  properties: wet mass 1 kg, dry mass 0.1715 kg, nitrogen content 0.0277, carbon content, non-fossil 0.441, water content 4.8309, water in wet mass 0.8285 kg, carbon content, fossil 0, carbon allocation 0.0756315 kg

## Inputs from technosphere
- tap water: 0.262 kg; name wash_water; lognormal variance with pedigree 0.0112, pedigree (2,4,4,1,1)
  Municipal water consumption by a representative feedlot in South Africa. Municipal water is used in the washbay (service water) and for general purposes at the feedlot. Water needs are also met by withdrawals from a nearby river.
  properties: wet mass 1 kg, water content 2962.17, dry mass 0.000337476 kg, carbon content, fossil 0.00178991
  note on carbon content, fossil: Bicarbonate content is 2.93 mol/m3. CO2 content is 0.1 mol/m3 (ecoinvent v2.2 report 8, Tab 93.1).
- sodium chloride, powder: 0.0107 kg; lognormal variance with pedigree 0.0112, pedigree (2,4,4,1,1)
  Salt fed at feedlot. Based on total mass of feed per day per head of cattle at the adaptation and finishing stages, and a breakdown of feed components at each stage. Data provided from a representative feedlot in South Africa. When changing the feed of ruminants, an adaptation stage, in this case 45 days, is necessary to allow the microflora in the rumen to adapt to the new feed. The adaptation stage includes 4 hours a day spent on pasture grazing and cattle feed consumption of 5.5 kg/(head.day). During the finishing stage no time is spent on pasture grazing, and feed consumption is increased to 10 kg/(head.day).
  properties: wet mass 1 kg, dry mass 1 kg
- irrigation: 0.00657 m3; lognormal variance with pedigree 0.0112, pedigree (2,4,4,1,1)
  Municipal water used for irrigation of pasture. Based on primary data from representative feedlot in South Africa. 20% of the total pasture area is irrigated.
  properties: water content 9089.91, dry mass 0.11 kg, wet mass 1000 kg
- electricity, low voltage: 0.00345 kWh; lognormal variance with pedigree 0.0098, pedigree (2,3,4,1,1)
  Electricity consumption at a representative feedlot in South Africa. Value excludes electricity for irrigation (the highest use of electricity at the feedlot) and is primarily for mixing feeds.
- alfalfa-grass silage: 0.0311 kg; lognormal variance with pedigree 0.0112, pedigree (2,4,4,1,1)
  Lucerne, assumed to be fed as silage. Quantity fed based on total mass of feed per day per head of cattle at the adaptation and finishing stages, and a breakdown of feed components at each stage. Data provided from a representative feedlot in South Africa. When changing the feed of ruminants, an adaptation stage, in this case 45 days, is necessary to allow the microflora in the rumen to adapt to the new feed. The adaptation stage includes 4 hours a day spent on pasture grazing and cattle feed consumption of 5.5 kg/(head.day). During the finishing stage no time is spent on pasture grazing, and feed consumption is increased to 10 kg/(head.day).
  properties: dry mass 1 kg, energy content 18.55 MJ, water content 1.1739, wet mass 2.1739 kg, carbon content, non-fossil 0.484
- maize silage: 0.611 kg; lognormal variance with pedigree 0.0112, pedigree (2,4,4,1,1)
  Silage fed at feedlot, assumed to be maize silage. Quantity fed based on total mass of feed per day per head of cattle at the adaptation and finishing stages, and a breakdown of feed components at each stage. Data provided from a representative feedlot in South Africa. When changing the feed of ruminants, an adaptation stage, in this case 45 days, is necessary to allow the microflora in the rumen to adapt to the new feed. The adaptation stage includes 4 hours a day spent on pasture grazing and cattle feed consumption of 5.5 kg/(head.day). During the finishing stage no time is spent on pasture grazing, and feed consumption is increased to 10 kg/(head.day).
  properties: carbon content, non-fossil 0.4773, dry mass 0.35 kg, water content 1.85714, energy content 6.6325 MJ, wet mass 1 kg
- energy feed, gross: 1.68 MJ; lognormal variance with pedigree 0.0512, pedigree (2,4,4,1,4)
  DFG (defatted maize germ), a by-product of wet maize milling, is approximated by "energy feed, gross", applying a gross energy value of 20.7 MJ/kg DM and 96% dry matter content as fed (https://www.feedipedia.org/node/716). Quantity fed based on total mass of feed per day per head of cattle at the adaptation and finishing stages, and a breakdown of feed components at each stage. Data provided from a representative feedlot in South Africa. When changing the feed of ruminants, an adaptation stage, in this case 45 days, is necessary to allow the microflora in the rumen to adapt to the new feed. The adaptation stage includes 4 hours a day spent on pasture grazing and cattle feed consumption of 5.5 kg/(head.day). During the finishing stage no time is spent on pasture grazing, and feed consumption is increased to 10 kg/(head.day).
  properties: dry mass 1 kg, wet mass 1 kg
- wheat bran: 0.1714 kg; lognormal variance with pedigree 0.0112, pedigree (2,4,4,1,1)
  Bran, a by-product of wheat milling, fed at feedlot. Quantity fed based on total mass of feed per day per head of cattle at the adaptation and finishing stages, and a breakdown of feed components at each stage. Data provided from a representative feedlot in South Africa. When changing the feed of ruminants, an adaptation stage, in this case 45 days, is necessary to allow the microflora in the rumen to adapt to the new feed. The adaptation stage includes 4 hours a day spent on pasture grazing and cattle feed consumption of 5.5 kg/(head.day). During the finishing stage no time is spent on pasture grazing, and feed consumption is increased to 10 kg/(head.day).
  properties: carbon content, non-fossil 0.475, dry mass 0.87 kg, water content 0.149425, wet mass 1 kg
  note on carbon content, non-fossil: Assumed carbon content, on a dry mass basis according to FAOSTAT. Reference: http://www.fao.org/forestry/17111/en
- lime: 0.023 kg; lognormal variance with pedigree 0.0112, pedigree (2,4,4,1,1)
  Limestone fed at feedlot. Based on total mass of feed per day per head of cattle at the adaptation and finishing stages, and a breakdown of feed components at each stage. Data provided from a representative feedlot in South Africa. When changing the feed of ruminants, an adaptation stage, in this case 45 days, is necessary to allow the microflora in the rumen to adapt to the new feed. The adaptation stage includes 4 hours a day spent on pasture grazing and cattle feed consumption of 5.5 kg/(head.day). During the finishing stage no time is spent on pasture grazing, and feed consumption is increased to 10 kg/(head.day).
  properties: wet mass 1 kg, carbon content, fossil 0.120005, dry mass 1 kg
- rape meal: 0.122 kg; lognormal variance with pedigree 0.0112, pedigree (2,4,4,1,1)
  "Sun feed", comprised primarily of sunflower and/or canola oilseed cake, approximated by rape seed meal. Quantity fed based on total mass of feed per day per head of cattle at the adaptation and finishing stages, and a breakdown of feed components at each stage. Data provided from a representative feedlot in South Africa. When changing the feed of ruminants, an adaptation stage, in this case 45 days, is necessary to allow the microflora in the rumen to adapt to the new feed. The adaptation stage includes 4 hours a day spent on pasture grazing and cattle feed consumption of 5.5 kg/(head.day). During the finishing stage no time is spent on pasture grazing, and feed consumption is increased to 10 kg/(head.day).
  properties: dry mass 0.9 kg, carbon content, non-fossil 0.457233, water content 0.111111, wet mass 1 kg
- transport, tractor and trailer, agricultural: 0.00587 metric ton*km; lognormal variance with pedigree 0.1306, pedigree (2,4,4,1,1)
  Diesel consumption at a representative feedlot in South Africa is 39,000 litres per year. The equivalent tonne.km of tractor use were calculated using the diesel consumption of the dataset: transport, tractor and trailer, agricultural (43.6 g diesel/tonne*km)
- maize chop: 0.551 kg; lognormal variance with pedigree 0.0112, pedigree (2,4,4,1,1)
  Maize chop, a middlings product from dry maize milling, fed at feedlot. Quantity fed based on total mass of feed per day per head of cattle at the adaptation and finishing stages, and a breakdown of feed components at each stage. Data provided from a representative feedlot in South Africa. When changing the feed of ruminants, an adaptation stage, in this case 45 days, is necessary to allow the microflora in the rumen to adapt to the new feed. The adaptation stage includes 4 hours a day spent on pasture grazing and cattle feed consumption of 5.5 kg/(head.day). During the finishing stage no time is spent on pasture grazing, and feed consumption is increased to 10 kg/(head.day).
  properties: carbon content, non-fossil 0.46957, wet mass 1 kg, water content 0.119821, dry mass 0.893 kg
  note on carbon content, non-fossil: A gross energy content of 18.7 MJ/kg dry matter (DM) applied in this dataset, based on properties of "hominy feed" (Feedipedia, 2015). Reference(s): Feedipedia (2015) Animal Feed Resources Information System: Maize Bran and Hominy Feed, Available at: https://www.feedipedia.org/node/712. (Accessed October 2017).
- maize grain: 0.51 kg; lognormal variance with pedigree 0.0112, pedigree (2,4,4,1,1)
  Maize grain fed at feedlot. Quantity based on total mass of feed per day per head of cattle at the adaptation and finishing stages, and a breakdown of feed components at each stage. Data provided from a representative feedlot in South Africa. When changing the feed of ruminants, an adaptation stage, in this case 45 days, is necessary to allow the microflora in the rumen to adapt to the new feed. The adaptation stage includes 4 hours a day spent on pasture grazing and cattle feed consumption of 5.5 kg/(head.day). During the finishing stage no time is spent on pasture grazing, and feed consumption is increased to 10 kg/(head.day).
  properties: carbon content, non-fossil 0.46957, dry mass 0.86 kg, wet mass 1 kg, water content 0.162791
- urea: 0.0295844 kg; lognormal variance with pedigree 0.0112, pedigree (2,4,4,1,1)
  The exchange has been updated from 'urea, as N' into 'urea' and therefore its amount has been scaled (multiplied) from 0.0138 kg by 2.1438 kg of 'urea' per kg of 'urea, as N'. Original comment of the exchange is: Urea mixed in with feed (protein supplement). Quantity based on total mass of feed per day per head of cattle at the adaptation and finishing stages, and a breakdown of feed components at each stage. Data provided from a representative feedlot in South Africa. When changing the feed of ruminants, an adaptation stage, in this case 45 days, is necessary to allow the microflora in the rumen to adapt to the new feed. The adaptation stage includes 4 hours a day spent on pasture grazing and cattle feed consumption of 5.5 kg/(head.day). During the finishing stage no time is spent on pasture grazing, and feed consumption is increased to 10 kg/(head.day).
  properties: carbon content, fossil 0.2, dry mass 1 kg, wet mass 1 kg
- weaned heifers, live weight: 0.869 kg; lognormal variance with pedigree 0.0112, pedigree (2,4,4,1,1)
  Assumes an average entry weight of 365 kg and average slaughter weight of 485 kg (a daily weight gain of 1.9 kg in the feedlot). No losses are considered.
  properties: wet mass 1 kg, water content 0.666667, dry mass 0.6 kg, carbon content, non-fossil 0.4928
- manure, liquid, cattle: -0.349 kg; lognormal variance with pedigree 0.0146, pedigree (2,4,4,1,1)
  (same comment as for manure, liquid, cattle)
  production volume 1.73453e7 kg
  properties: dry mass 0.075 kg, wet mass 1 kg, carbon content, non-fossil 0.68, water content 12.333
- manure, solid, cattle: -3.493 kg; lognormal variance with pedigree 0.0146, pedigree (2,4,4,1,1)
  (same comment as for manure, solid, cattle)
  production volume 1.73602e8 kg
  properties: wet mass 1 kg, dry mass 0.1715 kg, nitrogen content 0.0277, carbon content, non-fossil 0.441, water content 4.8309, price 0.0042 EUR2005

## Inputs from nature
- Occupation, unspecified [natural resource, land]: 0.004 m2*year; lognormal variance with pedigree 0.0126, pedigree (2,4,4,1,1)
  Area of the feedlot enclosures, i.e. excluding pasture. Based on representative feedlot in South Africa. Calculated from the total area of the site (excluding pasture), the number of cattle at the feedlot and time the cattle spend at the feedlot.
- Transformation, to unspecified [natural resource, land]: 0.014 m2; lognormal variance with pedigree 0.0186, pedigree (2,4,4,1,1)
  Area of the feedlot enclosures, excluding pasture. Based on a representative feedlot in South Africa and the number of cattle at the feedlot.
- Transformation, to grassland, natural, for livestock grazing [natural resource, land]: 0.5881 m2; lognormal variance with pedigree 0.0186, pedigree (2,4,4,1,1)
  Area of natural pasture for grazing at a representative feedlot in South Africa.
- Transformation, from grassland, natural, for livestock grazing [natural resource, land]: 0.7451 m2; lognormal variance with pedigree 0.0186, pedigree (2,4,4,1,1)
  Total area of the feedlot (enclosures and land for grazing). Based on a representative feedlot in South Africa. As cattle farming falls predominantly in the grasslands region of South Africa, this is taken as the pre-farm land type.
- Occupation, grassland, natural, for livestock grazing [natural resource, land]: 0.1668 m2*year; lognormal variance with pedigree 0.0126, pedigree (2,4,4,1,1)
  Area of natural pasture at the feedlot. Based on representative feedlot in South Africa. Calculated from the total area of the site (excluding pasture), the number of cattle at the feedlot and time the cattle spend at the feedlot.
- Water, unspecified natural origin [natural resource, in ground]: 0.00369 m3; name drinking_water; lognormal variance with pedigree 0.0112, pedigree (2,4,4,1,1)
  Water extracted from river from a representative feedlot in the region, assumed to be primarily for cattle watering (drinking).
- Occupation, pasture, man made [natural resource, land]: 0.0406 m2*year; lognormal variance with pedigree 0.0126, pedigree (2,4,4,1,1)
  Area of cultivated pasture at the feedlot. Based on representative feedlot in South Africa. Calculated from the total area of the site (excluding pasture), the number of cattle at the feedlot and time the cattle spend at the feedlot.
- Transformation, to pasture, man made [natural resource, land]: 0.143 m2; lognormal variance with pedigree 0.0186, pedigree (2,4,4,1,1)
  Area of cultivated pasture for grazing at a representative feedlot in South Africa.

## Emissions to nature
- Cadmium, ion [water, surface water]: 4.52e-10 kg; lognormal variance with pedigree 0.1006, pedigree (2,4,4,1,1)
  Emissions of heavy metals to soil and surface water estimated from manure left on pasture during grazing based on Nemecek and Schnetzer (2012). The factors applied in the equations are not South African specific and the calculated emissions are thus highly uncertain (especially leached emissions where South African conditions are likely to be very different). A daily manure generation rate of 15 tonnes/(head.year) for cattle in feedlots is applied in the calculations (DEA, 2017), with 4 hours per day spent on grazing for one-third of the total time spent at the feedlot (data from representative feedlot in South Africa). As the pasture is predominantly natural, no fertiliser, seed and pesticide applications have been taken into account. There is however removal of biomass through grazing. Reference(s): Nemecek and Schnetzer (2012) Methods of Assessment of Direct Field Emissions for LCIs of Agricultural Production Systems, Life cycle inventories of Swiss and European agricultural production systems. Reference(s): DEA (2017) Unlocking Barriers and Opportunities for Land-use Based Climate-Change Mitigation Activities in South Africa, Department of Environmental Affairs of South Africa, Available at: https://www.environment.gov.za/sites/default/files/reports/unlockingbarriers_land-usebasedclimatechangemitigation.pdf. (Accessed September 2017),
- Chromium, ion [water, surface water]: 5.73e-7 kg; lognormal variance with pedigree 0.1006, pedigree (2,4,4,1,1)
  (same comment as for Cadmium, ion)
- Water [air, unspecified]: 0.0005928 m3; = (drinking_water+wash_water/1000)*fraction_PW_to_air
  Cattle drinking water is modelled as emitted to air and 15% of water used for other purposes (e.g. washing down stalls etc.) is assumed to be lost to evaporation (with the balance modelled as surface run-off).
- Phosphate [water, surface water]: 0.00331 kg; lognormal variance with pedigree 0.0506, pedigree (2,4,4,1,1)
  Emissions of phosphates through run-off from manure deposited on pasture is from on Nemecek and Schnetzer (2012). The factors applied in the equations are not South African specific and the calculated emissions are thus highly uncertain (especially run-off emissions where South African conditions are likely to be very different). A daily manure generation rate of 15 tonnes/(head.year) for cattle in feedlots is applied in the calculations (DEA, 2017), with 4 hours per day spent on grazing for one-third of the total time spent at the feedlot (data from representative feedlot in South Africa). Reference(s): Nemecek and Schnetzer (2012) Methods of Assessment of Direct Field Emissions for LCIs of Agricultural Production Systems, Life cycle inventories of Swiss and European agricultural production systems. Reference(s): DEA (2017) Unlocking Barriers and Opportunities for Land-use Based Climate-Change Mitigation Activities in South Africa, Department of Environmental Affairs of South Africa, Available at: https://www.environment.gov.za/sites/default/files/reports/unlockingbarriers_land-usebasedclimatechangemitigation.pdf. (Accessed September 2017)
- Zinc, ion [water, surface water]: 1.01e-6 kg; lognormal variance with pedigree 0.1006, pedigree (2,4,4,1,1)
  (same comment as for Cadmium, ion)
- Lead [water, surface water]: 4.39e-9 kg; lognormal variance with pedigree 0.1006, pedigree (2,4,4,1,1)
  (same comment as for Cadmium, ion)
- Ammonia [air, non-urban air or from high stacks]: 0.0187 kg; lognormal variance with pedigree 0.0186, pedigree (2,4,4,1,1)
  Ammonia emissions from manure left in field during grazing, from manure accumulating in the dry lots and from manure washed into storage ponds (with the assumption that 10% of manure runs into storage ponds). Calculations following the IPCC guidelines using a combination of default IPCC and country specific input values. Emission factor per animal at adaptation phase and finishing phase, taking into account feed types and digestibilities, and livestock weight and weight gain from du Toit et al., (2013). Heifers are assumed to spend slightly less time than weaners at the feedlot (100 days), with the duration calculated from average daily weight gain in a representative feedlot in South Africa. Proportional time spent at adaption and finishing is kept the same (i.e. one-third time spent at the adaptation phase (partial grazing) and two-thirds at the finishing phase). Data from a representative feedlot in South Africa. Reference(s): IPCC Guidelines for National Greenhouse Gas Inventories‚ Prepared by the National Greenhouse Gas Inventories Programme‚ IGES, Japan; du Toit C.J.L., Meissner H.H. and van Niekerk W.A. (2013) Direct Methane and Nitrous Oxide Emissions of South African Dairy and Beef Cattle, South African Journal of Animal Science, Volume 43 (3), pp 320-339
- Lead [soil, agricultural]: 1.46e-7 kg; lognormal variance with pedigree 0.0506, pedigree (2,4,4,1,1)
  (same comment as for Cadmium, ion)
- Water [water, surface water]: 0.0033592 m3; = (wash_water/1000+ drinking_water)* fraction_PWtoW_to_surface_water
  Cattle drinking water is modelled as emitted to air and 15% of water used for other purposes (e.g. washing down stalls etc.) is assumed to be lost to evaporation, with the balance modelled as surface run-off.
- Phosphorus [water, surface water]: 0.00223 kg; lognormal variance with pedigree 0.0506, pedigree (2,4,4,1,1)
  Emissions of phosphorous through soil erosion is from Nemecek and Schnetzer (2012). The factors applied in the equations are not South African specific and the calculated emissions are thus highly uncertain. Reference(s): Nemecek and Schnetzer (2012) Methods of Assessment of Direct Field Emissions for LCIs of Agricultural Production Systems, Life cycle inventories of Swiss and European agricultural production systems.
- Methane, non-fossil [air, non-urban air or from high stacks]: 0.0404 kg; source du Toit C.J.L. 2013; lognormal variance with pedigree 0.0186, pedigree (2,4,4,1,1)
  Methane from enteric fermentation and manure management. Calculated from methane emission factors for feedlot cattle in South Africa (58.9 kg/head/year and 0.87 kg/head/year for enteric and manure, respectively) (du Toit et al., 2013). Heifers are assumed to spend slightly less time than weaners at the feedlot (100 days), with the duration calculated from average daily weight gain in a representative feedlot in South Africa. Reference(s): du Toit C.J.L., Meissner H.H. and van Niekerk W.A. (2013) Direct Methane and Nitrous Oxide Emissions of South African Dairy and Beef Cattle, South African Journal of Animal Science, Volume 43 (3), pp 320-339.
- Dinitrogen monoxide [air, non-urban air or from high stacks]: 0.00164 kg; source du Toit C.J.L. 2013; lognormal variance with pedigree 0.0136, pedigree (2,4,4,1,1)
  Direct and indirect emissions of N2O to the air from manure left in field during grazing, from manure accumulating in the dry lots and from manure washed into storage ponds (with the assumption that 10% of manure runs into storage ponds). Calculations following the IPCC guidelines using a combination of default IPCC and country specific input values. Emission factor per animal at adaptation phase and finishing phase, taking into account feed types and digestibilities, and livestock weight and weight gain from du Toit et al., (2013). Heifers are assumed to spend slightly less time than weaners at the feedlot (100 days), with the duration calculated from average daily weight gain in a representative feedlot in South Africa. Proportional time spent at adaption and finishing is kept the same (i.e. one-third time spent at the adaptation phase (partial grazing) and two-thirds at the finishing phase). Data from a representative feedlot in South Africa. Reference(s): IPCC Guidelines for National Greenhouse Gas Inventories‚ Prepared by the National Greenhouse Gas Inventories Programme‚ IGES, Japan; du Toit C.J.L., Meissner H.H. and van Niekerk W.A. (2013) Direct Methane and Nitrous Oxide Emissions of South African Dairy and Beef Cattle, South African Journal of Animal Science, Volume 43 (3), pp 320-339
- Cadmium [soil, agricultural]: 6.48e-9 kg; lognormal variance with pedigree 0.0506, pedigree (2,4,4,1,1)
  (same comment as for Cadmium, ion)
- Nickel [soil, agricultural]: 1.53e-7 kg; lognormal variance with pedigree 0.0506, pedigree (2,4,4,1,1)
  (same comment as for Cadmium, ion)
- Copper [soil, agricultural]: 4.65e-7 kg; lognormal variance with pedigree 0.0506, pedigree (2,4,4,1,1)
  (same comment as for Cadmium, ion)
- Zinc [soil, agricultural]: 3.61e-6 kg; lognormal variance with pedigree 0.0506, pedigree (2,4,4,1,1)
  (same comment as for Cadmium, ion)
- Mercury [water, surface water]: 7.75e-11 kg; lognormal variance with pedigree 0.1006, pedigree (2,4,4,1,1)
  (same comment as for Cadmium, ion)
- Copper, ion [water, surface water]: 2.23e-7 kg; lognormal variance with pedigree 0.1006, pedigree (2,4,4,1,1)
  (same comment as for Cadmium, ion)
- Mercury [soil, agricultural]: 1.09e-8 kg; lognormal variance with pedigree 0.0506, pedigree (2,4,4,1,1)
  (same comment as for Cadmium, ion)

## Sampling procedure
See extrapolation comment below. Data from a large representative feedlot in South Africa provides most of the activity data for the dataset. However, where more representative data are available (such as emission factors for methane and nitrous oxide developed for South Africa's national greenhouse gas inventory) these are applied instead. Emissions of phosphates and heavy metals from manure are estimated according to Nemecek and Schnetzer (2011).

## Extrapolations
This dataset has been extrapolated from year 2016 to the year of the calculation (2021). The uncertainty has been adjusted accordingly.
