# sawnwood production, softwood, dried (u=20%), planed

Dataset: EcoSpold 2, unit process
Geography: Europe without Switzerland
Time period: 2014-01-01 to 2021-12-31
Technology level: current
Classification: ISIC rev.4 ecoinvent: 1610:Sawmilling and planing of wood
Scenario: Business-as-Usual
System model: Allocation, cut-off by classification
Generated by: Frank Werner
Database: ecoinvent
isCopyrightProtected: true
accessRestrictedTo: 1

## General comment
This activity is providing a more generic sawnwood product, combining inputs from the specific products issued from planing. The relative contribution is based on their Production Volumes.

## Included activities start
Entry of the specific products issued of the planing activity

## Included activities end
Delivery of the generic planed product

## Reference product
- sawnwood, softwood, dried (u=20%), planed: 1 m3; By-product classification allocatable product; CPC 31101: Wood, sawn or chipped lengthwise, sliced or peeled, of a thickness exceeding 6 mm, of coniferous wood
  production volume 1.53258e6 m3; = 0.287*5.34E+06
    50% of the Production Volume issued from the planing has been made accesible as this generic product.
    The Production Volumes have been downscaled from GLO to RER using the relative GDP values 2011 (source: United Nations, <http://data.un.org/Glossary.aspx?q=GDP+%28current+US%24%29>, accessed 20130726).
  property heating value, net 6514.84 MJ
    LHV is calculated based on the Carbon content of the product. More details can be found on the respective documentation.The property is based on a value of 12.06MJ/kg
  property price 151 EUR2005
    Temporary price data. Calculated as 90% of purchasers price based on: 2004 export prices for the World+ according to: http://faostat.fao.org/site/626/DesktopDefault.aspx?PageID=626#ancor downloaded 28 April 2009; calculated as export value divided by export volume.
  property carbon content 0.494
    carbon content on a dry matter basis (reserved; not for manual entry)
  properties: dry mass 450 kg, wet mass 540 kg, water in wet mass 90 kg, carbon content, non-fossil 0.494, carbon content, fossil 0, water content 0.2, carbon allocation 222.3 kg

## Inputs from technosphere
- sawnwood, lath, softwood, dried (u=20%), planed: 0.184608 m3; lognormal variance with pedigree 0.1041, pedigree (3,1,3,3,1)
  based on estimated production volumes; see activity datasets
  properties: carbon content, non-fossil 0.494, wet mass 485.76 kg, water content 0.2, dry mass 404.8 kg, heating value, net 5860.46 MJ
- sawnwood, board, softwood, dried (u=20%), planed: 0.449982 m3; lognormal variance with pedigree 0.1041, pedigree (3,1,3,3,1)
  based on estimated production volumes; see activity datasets
  properties: carbon content, non-fossil 0.494, wet mass 464.64 kg, dry mass 387.2 kg, water content 0.2, heating value, net 5605.65 MJ
- sawnwood, beam, softwood, dried (u=20%), planed: 0.519209 m3; lognormal variance with pedigree 0.1041, pedigree (3,1,3,3,1)
  based on estimated production volumes; see activity datasets
  properties: heating value, net 5860.46 MJ, water content 0.2, dry mass 387.2 kg, carbon content, non-fossil 0.494, wet mass 464.64 kg

## Extrapolations
This dataset has been extrapolated from year 2014 to the year of the calculation (2021). The uncertainty has been adjusted accordingly.
