# chlorine, for reuse in titanium tetrachloride production, to generic market for chlorine

Dataset: EcoSpold 2, unit process
Geography: JP
Time period: 2021-01-01 to 2021-12-31
Technology level: current
Classification: ISIC rev.4 ecoinvent: 2011:Manufacture of basic chemicals
Scenario: Business-as-Usual
System model: Allocation, cut-off by classification
Generated by: David FitzGerald
Database: ecoinvent
isCopyrightProtected: true
accessRestrictedTo: 1

## General comment
This activity links chlorine, obtained from the electrolysis of magnesium chloride that is produced during the production of titanium sponge, to the market for chlorine, liquid.
As the chlorine that is recovered through the electrolysis of magnesium chloride is exclusively reused for the production of titanium tetrachloride, it is assumed that it actually does not supply the market for chlorine. For this reason, the production volume is a dummy value.
The purpose of this activity is to link the recovered chlorine to the market for "chlorine, liquid" in the Consequential system model. In that system model, the activities that are consuming chlorine recovered through the electrolysis of magnesium chloride get instead supplied by the marginal suppliers of chlorine, liquid.

## Reference product
- chlorine, liquid: 1 kg; CPC 34231: Chemical elements n.e.c.; inorganic acids except phosphoric, nitric and sulphonitric; inorganic oxygen compoun[…]; By-product classification allocatable product; ISIC rev.4 ecoinvent 2011:Manufacture of basic chemicals; CAS 7782-50-5
  production volume 0.98 kg; = 4*0.245
    Dummy value used, as this activity is assumed to not supply the market for chlorine, liquid. The scaling factor corresponds to Japan's share of the global production volume of chlorine recovered through the electrolysis of magnesium chloride, produced during the production of titanium sponge.
  property price 0.148 EUR2005
    The price for liquid chlorine (0.148 EUR/kg) was calculated as weighted average of the European (238Eur/tonne), US (223EUR/tonne) and the Chinese (84EUR/tonne) (Tecnon OrbiCHem, 2016) price according to the region's market shares (Europe 15%, US 20%, China 45%) scaled to 100% (ruschlor.ru, 2014).
    Reference(s):
    Tecnon OrbiCHem. 2016. Chem-Netfacts, Chemical insight an foresight - on a single page, Chlorine, 1 April 2016, document requested at http://www.orbichem.com/Chem-Netfacts.aspx?P_ID=208, 6 October 2017;
    ruschlor.ru. 2014. International Outlook for the Future of the Chinese Chlor-Alkali Industry retrieved from http://ruschlor.ru/english/images/stories/Pekin%20/Otchet_Engl/_.doc, 6 October 2017
  property carbon content 0
    carbon content on a dry matter basis (reserved; not for manual entry)
  properties: water in wet mass 0 kg, carbon content, fossil 0, water content 0, carbon content, non-fossil 0, wet mass 1 kg, dry mass 1 kg, carbon allocation 0 kg

## Inputs from technosphere
- chlorine, for reuse in titanium tetrachloride production: 1 kg
  properties: dry mass 1 kg, wet mass 1 kg
