# energy and auxilliary inputs, metal working machine, with process heat from hard coal

Dataset: EcoSpold 2, unit process
Geography: RER
Time period: 2006-01-01 to 2021-12-31
Technology level: current
Classification: ISIC rev.4 ecoinvent: 259:Manufacture of other fabricated metal products; metalworking service activit
Classification: EcoSpold01Categories: metals/general manufacturing
Tags: ConvertedDataset
Scenario: Business-as-Usual
System model: Allocation, cut-off by classification
Share of production covered: 0 %
Generated by: Roland Steiner
Published in: Steiner, R. 2007
Database: ecoinvent
isCopyrightProtected: true
accessRestrictedTo: 1

## General comment
1 kg of this process is needed to produce 1 kg of final product. The data is an estimation based on the average consumption of factories separated into process specific (included here) and ancillary processes (included in metal working factory operation).
[This dataset was already contained in the ecoinvent database version 2. It was not individually updated during the transfer to ecoinvent version 3. Life Cycle Impact Assessment results may still have changed, as they are affected by changes in the supply chain, i.e. in other datasets. This dataset was generated following the ecoinvent quality guidelines for version 2. It may have been subject to central changes described in the ecoinvent version 3 change report (http://www.ecoinvent.org/database/ecoinvent-version-3/reports-of-changes/), and the results of the central updates were reviewed extensively. The changes added e.g. consistent water flows and other information throughout the database. The documentation of this dataset can be found in the ecoinvent reports of version 2, which are still available via the ecoinvent website. The change report linked above covers all central changes that were made during the conversion process.]

## Included activities end
This dataset includes the materials, energies and emissions related to the machines used for machining metal products. This is mainly electricity, compressed air and solvents. Process heat is from hard coal.

## Geography
Average data from several local to global sized companies. The main focus is on Germany and Europe.

## Technology
The companies are expected to cover the whole range of metal working.

## Reference product
- energy and auxilliary inputs, metal working machine: 1 kg; name energy_RP; CPC 4421: Machine-tools for working metal; machine-tools for working any material by laser or similar process; By-product classification allocatable product
  EcoSpold01Location=RER
  production volume 1.52733e9 kg; name energy_RP_PV; = 4620000000*0.33059
    Estimated. The european production volume is extrapolated from the global production volume using the nominal GDP of 2005 (source: United Nations, http://data.un.org/Glossary.aspx?q=GDP+%28current+US%24%29, accessed 20130726 and 20130312).
    Gross domestic product (GDP) at current prices is GDP at prices of the current reporting period. Also known as nominal GDP.
    Share of fuel type from ecoinvent v2 report 23; total metal consumption in Europe estimated at 2E11 kg; 60% assumed to be machined in metal products, machinery or transport equipment industries
  property price 0.181772 EUR2005
    Calculated based on inputs: The price of the product has been calculated as a sum of the values of the material and energy inputs for this product. This value is therefore a rough estimation. It may underestimate the real price since there are additional expenses when producing any product. These expences can include for example labour costs, treatment of waste materials and profit for the producer. Please consider carefully whether this level of data quality is acceptable for your application.

## Inputs from technosphere
- electricity, low voltage: 1.15 kWh; lognormal variance with pedigree 0.0586, pedigree (1,3,5,1,3)
  Average of 8 companies
  EcoSpold01Location=UCTE
  Uncertainty: average of 8 companies
- heat, district or industrial, other than natural gas: 3.736 MJ; lognormal variance with pedigree 0.0586, pedigree (1,3,5,1,3)
  EcoSpold01Location=RER
  Average of 8 companies
  Uncertainty: average of 8 companies
  properties: heating value, net 1 MJ
- compressed air, 700 kPa gauge: 0.291 m3; lognormal variance with pedigree 0.0586, pedigree (1,3,5,1,3)
  Average of 8 companies
  EcoSpold01Location=RER
  Uncertainty: average of 8 companies
- solvent, organic: 0.0014 kg; lognormal variance with pedigree 0.0586, pedigree (1,3,5,1,3)
  Average of 8 companies
  EcoSpold01Location=GLO
  Uncertainty: average of 8 companies
  properties: carbon content, fossil 0.63072, wet mass 1 kg, dry mass 1 kg, heating value, net 19.11 MJ
  note on carbon content, fossil: Mixture of 15 of the most often used solvents (list in ecoinvent v2.2 report 11-III, pg 293). C content was calculated as an unweighted average of C content of the different solvents
- lubricating oil: 0.000867 kg; lognormal variance with pedigree 0.0586, pedigree (1,3,5,1,3)
  Average of 8 companies
  EcoSpold01Location=RER
  Uncertainty: average of 8 companies
  properties: carbon content, fossil 0.75, dry mass 1 kg, wet mass 1 kg, heating value, net 40.2 MJ
  note on carbon content, fossil: Lubricating oil is produced from diesel. C-content/dry mass of fats and oils considered 75%, from: ecoinvent v2.2 report, n 15a, pg 40
  note on heating value, net: Literature value, Source: IPCC 2006, 2006 IPCC Guidelines for National Greenhouse Gas Inventories, Prepared by the National Greenhouse Gas Inventories Programme, Eggleston H.S., Buendia L., Miwa K., Ngara T. and Tanabe K. (eds). Published: IGES, Japan
- waste mineral oil: 0 kg; name waste_oil_byP; pedigree (1,1,1,1,1)
  Assumption for disposal route
  EcoSpold01Location=CH
  Uncertainty: assumption for disposal route
  production volume 0 kg
    Calculated from the production volume of energy and auxilliary inputs, metal working machine in proportion to the respective output amounts.
  property price 0 EUR2005; name waste_oil_byP_price_EUR2005
  properties: wet mass 1 kg, water content 0.111111, carbon content, fossil 0.864444, dry mass 0.9 kg, heating value, net 34.7 MJ
  note on carbon content, fossil: Tab A.6, ecoinvent v2.2 report 13_I. C content has been calculated after data in the tables, and then referred to 1 kg DM
  note on heating value, net: Value taken from the general comment of the treatment dataset.
- waste mineral oil: -0.000846055, -2.0945e-5 kg (2 entries); lognormal variance with pedigree 0.0766, pedigree (4,3,5,1,3)
  (same comment as for waste mineral oil)
  production volume 1.32419e6 kg

## Emissions to nature
- Water [air, urban air close to ground]: 0.00112 m3; lognormal variance with pedigree 0.0986, pedigree (1,3,5,1,3)
  Average of 8 companies
  Uncertainty: average of 8 companies
- Hydrocarbons, aliphatic, alkanes, unspecified [air, urban air close to ground]: 0.000558 kg; lognormal variance with pedigree 0.0986, pedigree (1,3,5,1,3)
  Average of 8 companies
  Uncertainty: average of 8 companies
- Ethene, tetrachloro- [air, urban air close to ground]: 7.51e-5 kg; lognormal variance with pedigree 0.0986, pedigree (1,3,5,1,3)
  Average of 8 companies
  Uncertainty: average of 8 companies

## Extrapolations
This dataset has been extrapolated from year 2007 to the year of the calculation (2021). The uncertainty has been adjusted accordingly.

## Review by Sébastien Humbert 2007-09-05
passed
none
