# bisphenol A epoxy based vinyl ester resin production

Dataset: EcoSpold 2, unit process
Geography: RoW
Time period: 2013-01-01 to 2021-12-31
Technology level: current
Classification: ISIC rev.4 ecoinvent: 2013:Manufacture of plastics and synthetic rubber in primary forms
Synonyms: BPA resin
Scenario: Business-as-Usual
System model: Allocation, cut-off by classification
Generated by: Etienne LEES-PERASSO
Published in: Eelco Rietveld 2014
Database: ecoinvent
isCopyrightProtected: true
accessRestrictedTo: 1

## General comment
This dataset represents the production of bisphenol A (BPA) epoxy Vinyl Ester Resins (VER).
This resin belongs to the vinyl ester (or vinylester, VE) composite resin category. They are often used as matrix for composite materials, when applied on glass fibre, carbon fibre or natural fibres (ex: flax).
The perimeter of this data includes the manufacturing of the resin from raw materials.
Resin type is bisphenol A epoxy based vinyl ester resin (VER).
Typical characteristics:
Appearance: Clear liquid resin.
Main applications: Corrosion/chemical resistance.
Other possible applications: Glass flake coatings - heat resistance, pipes, tanks, containers, floor coverings.
Specific weight at 25 °C: 1,05-1,10 g/cm3
Viscosity (mPa.s): V23 - Brookfield at 23 oC, Spindle Speed 50 rpm: 250-450.
Solid content (%) PC53: 56-60.
Their uses are widespread, from transport mean components to pipes, tanks and vessels, etc. They provide high strength and chemical resistance.
The use of one resin over another depends on the user required physical caracteristics.
Data for the life cycle inventory for this resin were primarly taken from the Ernst & Young Report: "Life cycle assessment of four generic unsaturated polyester (UP) resins and one vinyl ester (VE) resins", Revised version, September 2014. The following companies participated in the study: Reichhold, Polynt Composites, Ashland Performance Materials.

## Included activities start
Cradle to gate. This activity starts with the raw materials delivery at the manufacturing plant gate.

## Included activities end
Cradle to gate. This activity ends with the bisphenol A epoxy based vinyl ester resin at the manufacturing plant gate. Packaging is not included.

## Geography
Based on the average production of three European producers: Polynt Composites, Reichhold and Ashland, representing a significant part of the European production. Extrapolated to a global production, based on similar manufacturing technology.

## Technology
This resin is manufactured from styrene, liquid epoxy resin, bisphenol A and glycidyl methacrylic acid.
Resin manufacturing process. Source : "Life cycle assessment of four generic unsaturated polyester (UP) resins and one vinyl ester (VE) resins", Revised version, September 2014, Ernst & Young Accountants
Not included in this dataset, there are different shaping solutions for this resin in order to obtain a usable, finished or semi-finished product. The most common are sheet molding compound (SMC) and bulk moulding compound (BMC). It can be reinforced with fibres, such as glass fibre, in order to modify its mecanical properties and allow new uses.

## Reference product
- bisphenol A epoxy based vinyl ester resin: 1 kg; name RP_amount_1; CPC 34790: Other plastics in primary forms; ion exchangers; By-product classification allocatable product
  This resin belongs to the vinyl ester (or vinylester, VE) composite resin category. They are often used as matrix for composite materials, when applied on glass fibre, carbon fibre or natural fibres (ex: flax). Typical characteristics: Appearance: Clear liquid resin. Main applications: Corrosion/chemical resistance. Other possible applications: Glass flake coatings - heat resistance, pipes, tanks, containers, floor coverings. Specific weight at 25 °C: 1,05-1,10 g/cm3 Viscosity (mPa.s): V23 - Brookfield at 23 oC, Spindle Speed 50 rpm: 250-450. Solid content (%) PC53: 56-60. Their uses are widespread, from transport mean components to pipes, tanks and vessels, etc. They provide high strength and chemical resistance. The use of one resin over another depends on the user required physical caracteristics.
  production volume 5.39497e7 kg; name RP_PV_1
    Global production of BPA epoxy based resin in 2005. No more specific data were available.
  property heating value, net 25.04 MJ
    Calculated LHV from inputs of epoxy resin, liquid and styrene that are the main materials for the production of this resin.
  property price 1.99387 EUR2005
    Calculated based on inputs: The price of the product has been calculated as a sum of the values of the material and energy inputs for this product. This value is therefore a rough estimation. It may underestimate the real price since there are additional expenses when producing any product. These expences can include for example labour costs, treatment of waste materials and profit for the producer. Please consider carefully whether this level of data quality is acceptable for your application.
  property carbon content 0.67494
    carbon content on a dry matter basis (reserved; not for manual entry)
  properties: water in wet mass 0 kg, water content 0, carbon content, fossil 0.67494, carbon content, non-fossil 0, wet mass 1 kg, dry mass 1 kg, carbon allocation 0.67494 kg

## Inputs from technosphere
- bisphenol A, powder: 0.07 kg; name BISPH; lognormal variance with pedigree 0.0034, pedigree (1,3,2,5,1)
  Value based on data from three producers.
  properties: dry mass 1 kg, heating value, net 32.41 MJ, carbon content, fossil 0.789474, wet mass 1 kg
- heat, district or industrial, natural gas: 0.22302 MJ; lognormal variance with pedigree 0.0034, pedigree (1,3,2,5,1)
  Based on a calorific value of 10.5 kWh/m3. Activity link has been defined as the ratio between heat from natural gas and heavy fuel oil iw known.
  properties: heating value, net 1 MJ
- methacrylic acid: 0.12 kg; name METHA; lognormal variance with pedigree 0.0034, pedigree (1,3,2,5,1)
  Value based on data from three producers.
  properties: carbon content, fossil 0.558064, wet mass 1 kg, dry mass 1 kg, heating value, net 25.35 MJ
- nitrogen, liquid: 0.00509 kg; lognormal variance with pedigree 0.0034, pedigree (1,3,2,5,1)
  Value based on data from three producers.
  properties: wet mass 1 kg, dry mass 1 kg
- oxygen, liquid: 0.00227 kg; lognormal variance with pedigree 0.0034, pedigree (1,3,2,5,1)
  Value based on data from three producers.
  properties: wet mass 1 kg, dry mass 1 kg
- electricity, low voltage: 0 kWh; pedigree (1,1,1,1,1)
  Value based on data from three producers.
- chemical factory, organics: 4e-10 unit; lognormal variance with pedigree 0.478, pedigree (4,5,5,5,5)
  Estimation. Data was estimated based on the dataset "chemical plant, organics". This module assumes a built area of about 4.2 ha, an average output of 50'000 t/a, and plant life of fifty years.
- hazardous waste, for incineration: -0.000191 kg; name BP_amount_1; lognormal variance with pedigree 0.004, pedigree (2,3,2,5,1)
  production volume 10304.4 kg; = RP_PV_1 * (BP_amount_1 / RP_amount_1)
    Calculated from production volume of reference product using the relative outputs.
  property price 0 EUR2005; name BP_amount_1_price_EUR2005
  properties: carbon content, fossil 0.554667, dry mass 0.75 kg, wet mass 1 kg, water content 0.333333, heating value, net 17 MJ
  note on carbon content, fossil: Tab A.6, ecoinvent v2.2 report 13_I. C content has been calculated after data in the tables, and then referred to 1 kg DM
  note on heating value, net: Value taken from the general comment of the treatment dataset.
- heat, district or industrial, other than natural gas: 0.209808 MJ; lognormal variance with pedigree 0.0034, pedigree (1,3,2,5,1)
  Based on a calorific value of 12.4 kWh/kg. Activity link has been defined as the ratio between heat from natural gas and heavy fuel oil iw known.
  properties: heating value, net 1 MJ, corresponding fuel use, propane, furnace >100kW 1.05263 MJ
  note on corresponding fuel use, propane, furnace >100kW: Lower heating value of the fuel input related to the heat/electricity output, taken directly from ecoinvent v3.0 dataset "heat production, natural gas, at industrial furnace >100kW, GLO 2000".
- municipal solid waste: 0 kg; name BP_amount_2; pedigree (1,1,1,1,1)
  production volume 0 kg
    Calculated from production volume of reference product using the relative outputs.
  properties: heating value, net 11.74 MJ, dry mass 0.771 kg, wet mass 1 kg, carbon content, fossil 0.171549, carbon content, non-fossil 0.261655, water content 0.297017
  note on carbon content, fossil: MSW composition in tab 4.1, ecoinvent v2.2 report 13_I. C content referred to 1 kg DM
- steam, in chemical industry: 0.16 kg; lognormal variance with pedigree 0.0034, pedigree (1,3,2,5,1)
  Value based on data from three producers.
- wastewater, average: -2.9e-7 m3; name BP_amount_3; lognormal variance with pedigree 0.004, pedigree (2,3,2,5,1)
  production volume 15.6454 m3; = RP_PV_1 * (BP_amount_3 / RP_amount_1)
    Calculated from production volume of reference product using the relative outputs.
  property price 0 EUR2005; name BP_amount_3_price_EUR2005
  properties: dry mass 0.346837 kg, wet mass 1000 kg, water content 2882.2, carbon content, non-fossil 0.194039
  note on carbon content, non-fossil: 0.0673 kg TOC/m3 (Tab A.17, ecoinvent v2.2 report 13_I). TOC was considered as Total Carbon.
- epoxy resin, liquid: 0.39 kg; name EPOXY; lognormal variance with pedigree 0.0034, pedigree (1,3,2,5,1)
  Value based on data from three producers.
  properties: carbon content, fossil 0.42325, dry mass 1 kg, wet mass 1 kg, heating value, net 12.82 MJ
- styrene: 0.42 kg; name STYR; lognormal variance with pedigree 0.0034, pedigree (1,3,2,5,1)
  Value based on data from three producers.
  properties: dry mass 1 kg, wet mass 1 kg, carbon content, fossil 0.923077, heating value, net 37.26 MJ
- electricity, low voltage: 0.00154428, 0.000281184, 0.00452741, 0.0695102, 0.0112455, 0.0322914 kWh (6 entries); lognormal variance with pedigree 0.0034, pedigree (1,3,2,5,1)
  Value based on data from three producers.
- municipal solid waste: -4.09112e-9, -1.03086e-9, -1.47316e-9, -2.8934e-6 kg (4 entries); lognormal variance with pedigree 0.004, pedigree (2,3,2,5,1)
  production volume 156.454 kg

## Emissions to nature
- NMVOC, non-methane volatile organic compounds, unspecified origin [air, unspecified]: 5.3e-5 kg; lognormal variance with pedigree 0.0428, pedigree (1,3,2,5,1)
  Value based on data from three producers.
- Nitrogen [air, unspecified]: 0.00509 kg; lognormal variance with pedigree 0.0508, pedigree (4,3,2,5,1)
  Estimation based on the hypothesis that all used nitrogen is emitted to air.

## Sampling procedure
The data come from three different European producers. The average values have been used.

## Extrapolations
The infrastructure impacts have been assessed based on chemical industry average infrastructure, as no specific data was available.

## Review by Eric Johnson 2015-06-29
Nice work.
