# electricity voltage transformation from medium to low voltage

Dataset: EcoSpold 2, unit process
Geography: CN-SGCC
Time period: 2012-01-01 to 2021-12-31
Technology level: current
Classification: ISIC rev.4 ecoinvent: 3510:Electric power generation, transmission and distribution
Scenario: Business-as-Usual
System model: Allocation, cut-off by classification
Generated by: Karin Treyer
Published in: Itten R. 2014
Database: ecoinvent
isCopyrightProtected: true
accessRestrictedTo: 1

## General comment
This dataset represents the transformation of electricity voltage from medium to low voltage.
Definition of the voltage levels:
- High voltage level above 24 kV (large scale industry)
- Medium voltage level between 1 kV and 24 kV (medium to small scale industry, service sector
and public buildings)
- Low voltage level below 1 kV (Households)
[This dataset is meant to replace the following datasets:
- electricity voltage transformation from medium to low voltage, CN, 2012 - 2012]

## Included activities start
This activity starts with the medium voltage electricity arriving at the transformer station.

## Included activities end
This activity ends with 1kWh of medium voltage electricity transformed to low voltage.

This dataset includes the losses during voltage transformation.

It doesn't include the transformer station itself as this is included in the dataset for the transmission network.

## Technology
Transformers are essential components of the electricity grid. They connect the different voltage levels.
Big power plants feed the electricity at a very high voltage to the electricity grid. Transformers between 600 MVA and 80 MVA can be found in substations, where the high transmission voltage is transformed to the medium distribution voltage. In an additional step the medium voltage is transformed to low voltage using transformers below 2.5 MVA. The small transformers below 2.5 MVA are allocated to the low voltage level, whereas all the other transformers are allocated to the medium voltage level.

## Parameters
- electricity transformation losses: 0 dimensionless; name electricity_transformation_losses; pedigree (1,1,1,1,1)
- total electricity losses within the country: 0 dimensionless; name electricity_losses_total; pedigree (1,1,1,1,1)

## Reference product
- electricity, low voltage: 1 kWh; CPC 17100: Electrical energy; By-product classification allocatable product
  production volume 2.42e12 kWh
    Literature value/ calculated value. For details on the modelling of the electricity volume along the voltage level chain please see the special documentation on ecoQuery.
  property price 0.107 EUR2005
    Temporary price data. Calculated as 90% of purchasers price based on: IEA Key world energy statistics 2004 (www.iea.org/textbase/nppdf/free/2004/keyworld2004.pdf)

## Inputs from technosphere
- electricity, medium voltage: 1.0239 kWh; source IEA 2014; lognormal variance with pedigree 0.0287, pedigree (3,3,4,3,3)
  Calculated value/estimation. This value compensates for the losses during transformation from medium to low voltage. The value for total China is used for this sub-market. The calculation is made based on total electricity losses between net electricity available at the busbar and the use of electricity calculated based on the IEA electricity information 2014, table 1.1, Electrity supply vs. transmission losses. These total losses over the whole chain are then allocated to the different voltage levels as well as transformation and transmission losses based on information in Itten et al. 2014. For details please see the documentation available on ecoQuery.
  IEA. 2014. Electricity Information 2014. ISBN 978-92-64-21692-1. International Energy Agency (IEA), Paris Cedex (FR).
  Itten R., Frischknecht R., Stucki M. 2014. Life Cycle Inventories of Electricity Mixes and Grid. Version 1.3. treeze, Uster, Switzerland
- electricity, medium voltage: 0 kWh; source IEA 2014; undefined min 0.0074, max 0.0074, standardDeviation95 0, pedigree (1,1,4,1,1)
  Electricity arriving from the medium voltage market to the low voltage market.

## Extrapolations
This dataset has been extrapolated from year 2012 to the year of the calculation (2021). The uncertainty has been adjusted accordingly.

## Review by Carl Vadenbo 2015-07-29
The update of the whole electricity sector for the ecoinvent v3.2 database consist of hundreds of datasets. All these datasets have passed through a streamlined review processes where the underlying modelling of production volumes, technology shares and efficiencies was reviewed in detail prior to the datasets being submitted to the database.
