# beam, hardwood, raw, kiln drying to u=20%

Dataset: EcoSpold 2, unit process
Geography: RoW
Time period: 2011-01-01 to 2021-12-31
Technology level: current
Classification: ISIC rev.4 ecoinvent: 1610:Sawmilling and planing of wood
Scenario: Business-as-Usual
System model: Allocation, cut-off by classification
Generated by: [System]
Published in: Bauer, C. 2007
Database: ecoinvent
isCopyrightProtected: true
accessRestrictedTo: 1

## General comment
This dataset represents the service of kiln drying of one m3 sawn hardwood beam. The wood chip used in the process is considered to be supplied internally which are generated from slabs and sidings when sawing. Characteristics of the of wood chips to be burned: dry wood density 640 kg/m3; the low heating value 4208 MJ/m3, humidity when burned is estimated to be around 50 %, which is achieved after some weeks of drying in the storage. Wood chip will be able to supply the entire thermal demand for drying, Air emission factors as well as the boiler efficiency represent average annual operation including start and stop (warm-up and shut-down). The boiler used is considered to be 300 kW and emission profile refers to the facility. Shrinkage ratio of between the moisture content of u=30% - 0% is 0.004 %/%.
The data was provided by and approved by the Swiss forest industry.
Within ecoinvent, three products - boards, beams and laths - are distinguished:
After being sawn, the resulting products can either be air dried down to a moisture content of u=20% (mass of water per dry mass), kiln dried down to u=20% or kiln dried down to u=10%. The activity name indicates the respective product, drying technology and target moisture.

## Included activities start
Kiln drying process starting from sawn hardwood, at the sawmill site, assumed to lose some water before the start of the kiln drying process.

## Included activities end
This activity ends with kiln dried hardwood beam, at sawmill. The dataset includes kiln drying of wet wood assumed as u=50% down to u=20 %, and shrinkage. The dataset does not include air emissions released from the wood, as these emissions are assumed to be similar to natural emissions from decomposition/rotting of wood

## Parameters
- emission of benzene, hexachloro: 9.6e-15 kg/MJ; name ben_hexa
  updated emission profile (amount of emission in kg/MJ heat) based on personal communication, PSI, 2014
- emission of Fluorine: 6.66667e-8 kg/MJ; name Fluorine
  (same comment as for emission of benzene, hexachloro)
- total heat: 840 MJ; name heat_woodchip
  total thermal energy required for the drying process per m3 of output
- moisture content beam: 20 dimensionless; name moisture_beam
  moisture content of beam
- emission of benzene: 1.21333e-6 kg/MJ; name benzene
  (same comment as for emission of benzene, hexachloro)
- furnace, wood chip: 2.31481e-8 unit/MJ; name furnace_energy
  inventory of furnace per MJ of heating demand
- emission of non-methane volatile organic compounds, unspecified origin: 1.4e-5 kg/MJ; name NMVOC
  (same comment as for emission of benzene, hexachloro)
- wood ash: 0.000666667 kg/MJ; name woodash
  generation of wood ash per MJ
- emission of Mercury: 4e-10 kg/MJ; name Mercury
  (same comment as for emission of benzene, hexachloro)
- emission of Particulates >10: 6.66667e-6 kg/MJ; name Particulates_higher_10
  (same comment as for emission of benzene, hexachloro)
- emission of chromium 4: 5.33333e-11 kg/MJ; name chroIV
  (same comment as for emission of benzene, hexachloro)
- emission of toluene: 4e-7 kg/MJ; name toluene
  (same comment as for emission of benzene, hexachloro)
- emission of Particulates 2.5: 0.00012 kg/MJ; name Particulate2_5
  (same comment as for emission of benzene, hexachloro)
- emission of m-Xylene: 1.6e-7 kg/MJ; name mXylene
  (same comment as for emission of benzene, hexachloro)
- shrinkage ratio (u=30% - 0%): 0.004 dimensionless; name shrinkage_ratio
  shrinkage ratio between u=30% to 0%
- emission of sulfur dioxide: 3.33333e-6 kg/MJ; name SO2
  (same comment as for emission of benzene, hexachloro)
- emission of copper: 2.93333e-8 kg/MJ; name copper
  (same comment as for emission of benzene, hexachloro)
- emission of Hydrocarbons, aliphatic, alkanes, unspecified: 1.21333e-6 kg/MJ; name Hydrocarbons_aliphatic_alkanes
  (same comment as for emission of benzene, hexachloro)
- emission of Methane, non-fossil: 3.2e-6 kg/MJ; name Methane_nonfossil
  (same comment as for emission of benzene, hexachloro)
- emission of cadmium: 9.33333e-10 kg/MJ; name cadmium
  (same comment as for emission of benzene, hexachloro)
- emission of bromine: 8e-8 kg/MJ; name bro
  (same comment as for emission of benzene, hexachloro)
- emission of Particulates >2.5 to <10: 6.66667e-6 kg/MJ; name Particulates2_5_to_10
  (same comment as for emission of benzene, hexachloro)
- emission of lead: 3.33333e-8 kg/MJ; name lead
  (same comment as for emission of benzene, hexachloro)
- emission of Nickel: 8e-9 kg/MJ; name Nickel
  (same comment as for emission of benzene, hexachloro)
- emission of benzene, ethyl: 4e-8 kg/MJ; name ben_ethyl
  (same comment as for emission of benzene, hexachloro)
- scaling factor: 1.33333 dimensionless; name scaling_factor; lognormal variance with pedigree 0.0016, pedigree (2,1,1,1,1)
  The scaling factor corresponds to the inverse of the average annual efficiency of the heating system, including start/stop (warm up and cool down). Therefore, this efficiency will be lower than figures provided by manufacturers. The estimated value was provided by T.Nussbaumer, Verenum, and represents the average installed boiler in this size category in Switzerland.
- emission of zinc: 4e-7 kg/MJ; name zinc
  (same comment as for emission of benzene, hexachloro)
- emission of polycyclic aromatic hydrocarbons: 1.48e-8 kg/MJ; name PAH
  (same comment as for emission of benzene, hexachloro)
- emission of Potassium: 3.12e-5 kg/MJ; name Potassium
  (same comment as for emission of benzene, hexachloro)
- emission of Phosphorus: 4e-7 kg/MJ; name Phosphorus
  (same comment as for emission of benzene, hexachloro)
- emission of dinitrogen monoxide: 3.06667e-6 kg/MJ; name N2O
  (same comment as for emission of benzene, hexachloro)
- emission of acetaldehyde: 8.13333e-8 kg/MJ; name acet
  (same comment as for emission of benzene, hexachloro)
- emission of chromium: 5.28e-9 kg/MJ; name chromium
  (same comment as for emission of benzene, hexachloro)
- emission of calcium: 7.8e-6 kg/MJ; name calcium
  (same comment as for emission of benzene, hexachloro)
- emission of Phenol, pentachloro-: 1.08e-11 kg/MJ; name Phenol_pentachloro
  (same comment as for emission of benzene, hexachloro)
- wood density, basic: 588.8 kg/m3; name basic_wood_d
  kg oven-dry matter/wet volume
- emission of dioxin measured as 2,3,7,8-tetrachlorodibenzo-p-dioxin: 4.13333e-14 kg/MJ; name tetrachloro
  (same comment as for emission of benzene, hexachloro)
- emission of chlorine: 2.4e-7 kg/MJ; name ch
  (same comment as for emission of benzene, hexachloro)
- emission of Manganese: 2.26667e-7 kg/MJ; name Manganese
  (same comment as for emission of benzene, hexachloro)
- wood density, dry: 640 kg/m3; name dry_wood_d
  kg oven-dry matter/oven-dry volume
- emission of Magnesium: 4.8e-7 kg/MJ; name Magnesium
  (same comment as for emission of benzene, hexachloro)
- emission of Formaldehyde: 1.73333e-7 kg/MJ; name Formaldehyde
  (same comment as for emission of benzene, hexachloro)
- emission of Nitrogen oxides: 0.00024 kg/MJ; name no2
  (same comment as for emission of benzene, hexachloro)
- emission of arsenic: 1.33333e-9 kg/MJ; name arsenic
  (same comment as for emission of benzene, hexachloro)
- emission of ammonia: 2.30667e-6 kg/MJ; name ammonia
  (same comment as for emission of benzene, hexachloro)
- emission of benzo(a)pyrene: 6.66667e-10 kg/MJ; name benzo
  (same comment as for emission of benzene, hexachloro)
- emission of Hydrocarbons, aliphatic, unsaturated: 4.13333e-6 kg/MJ; name Hydrocarbons_aliphatic
  (same comment as for emission of benzene, hexachloro)
- emission of sodium: 1.73333e-6 kg/MJ; name sodium
  (same comment as for emission of benzene, hexachloro)
- moisture content wood chip: 50 dimensionless; name moisture_woodchip
  moisture content of wood chip
- emission of carbon monoxide, non-fossil: 0.000333333 kg/MJ; name co
  (same comment as for emission of benzene, hexachloro)

## Reference product
- sawnwood, beam, hardwood, raw, dried (u=20%): 1 m3; name beam_raw_kiln; CPC 31102: Wood, sawn or chipped lengthwise, sliced or peeled, of a thickness exceeding 6 mm, of non-coniferous wood; By-product classification allocatable product
  production volume 6.44607e7 m3; name p_sawnwood_dried; = 1340.6/2434*117312627
    Annual production of sawn hardwood (sawnwood NC = non-coniferous from FAOStat for Switzerland), extrapolatedion to global production volume via the production volumes of sawnwood (NC = non-coniferous) in Switzerland and globally according to FAOStat
  property price 265 EUR2005; name beam_raw_kiln_price_EUR2005
    Expert judgement (Urs Luginbühl, Swiss Sawmilling industry, personal communication in June 2014). Cross-reference; FAOSTAT (accessed 20140428). The price is calculated by using data on total world import quantity (m3) and import value (1000 USD), year 2005. 25656806 m3 of Sawnwood (NC) - coniferous was imported in the world in 2005. The import value was 9652714000 USD. The calculated price is thus (9652714000/25656806=376*0.8=) 303 Euro.
  property wet mass 706.56 kg; = basic_wood_d*(1+ water_content)
  property water content 0.2; name water_content
  property heating value, net 8524.3 MJ
    Assumed equal to "sawnwood, beam, hardwood, dried (u=20%), planed".The property is based on a value of 12.06MJ/kg
  property water in wet mass 117.76 kg; name WWM_dried; = basic_wood_d* water_content
  property dry mass 588.8 kg; = basic_wood_d
  property carbon content 0.494
    carbon content on a dry matter basis (reserved; not for manual entry)
  properties: carbon content, non-fossil 0.494, carbon content, fossil 0, carbon allocation 290.867 kg

## Inputs from technosphere
- wood chips, wet, measured as dry mass: 64.2939 kg; name woodchip_hard; lognormal variance with pedigree 0.0106, pedigree (2,1,4,5,1)
  used as a fuel to produce heat for the drying process
  property water content 0.5; name woodchip_hard_water_content
  property carbon content, fossil 0; name woodchip_hard_C_content_fossil
  property heating value, net 11.6133 MJ; name woodchip_hard_Net_Heat_Value
  property dry mass 1 kg; name woodchip_hard_DM
  property water in wet mass 0.5 kg; name woodchip_hard_WWM
  property heating value, gross 19.6 MJ; name woodchip_hard_Gross_Heat_Value
  property carbon content, non-fossil 0.494; name woodchip_hard_C_content_non_fossil
  property wet mass 1.5 kg; name woodchip_hard_WM
  note on heating value, net: net (lower) heating (calorific) value; calculated according to ecoinvent guidelines 2.2
  note on heating value, gross: gross (upper) heating (calorific) value according to ecoinvent guidelines 2.2
- furnace, wood chips, with silo, 300kW: 1.94444e-5 unit; name furnace; lognormal variance with pedigree 0.4406, pedigree (2,1,4,5,1)
  infrastructure for the production of heat from wood chips
- sawnwood, hardwood, raw: 1.04167 m3; name m_sawnwood; source Rudi Wagenführ 2000; lognormal variance with pedigree 0.0106, pedigree (2,1,4,5,1)
  Processed internally within the sawmill
  property water in wet mass 394.24 kg; name WWM_sawnwood
  properties: carbon content, non-fossil 0.494, dry mass 563.2 kg, heating value, net 7462.65 MJ, water content 0.7, wet mass 957.44 kg
- technical wood drying facility: 3.66e-6 unit; name wooddrying; lognormal variance with pedigree 0.4406, pedigree (2,1,4,5,1)
  infrastructure, data from ecoinvent 2.2
- wood ash mixture, pure: -0.56 kg; name wood_ash; lognormal variance with pedigree 0.0112, pedigree (2,1,4,5,1)
  calculated from the amount of wood ash per MJ heat produced times the amount of heat needed for drying; according to updated emission profiles by PSI and heat requirements from industry.
  production volume 3.59984e7 kg; = wood_ash*p_sawnwood_dried/beam_raw_kiln
    Calculated from production volume of reference product using the relative outputs.
  property price 0 EUR2005; name wood_ash_price_EUR2005
  properties: wet mass 1 kg, carbon content, non-fossil 0.012, dry mass 1 kg
- electricity, medium voltage: 0 kWh; name elec_midvol; pedigree (1,1,1,1,1)
  used to run the kiln; industry data
- electricity, medium voltage: 0.29698, 0.0569481, 0.464225, 0.95604, 13.9047, 1.95988, 5.66118 kWh (7 entries); lognormal variance with pedigree 0.0106, pedigree (2,1,4,5,1)
  used to run the kiln; industry data

## Emissions to nature
- Phosphorus [air, urban air close to ground]: 0.000336 kg; lognormal variance with pedigree 0.0112, pedigree (2,1,4,5,1)
  calculated from the emission profile per MJ heat produced times the amount of heat needed for drying; according to updated emission profiles by PSI and heat requirements from industry.
- Manganese [air, urban air close to ground]: 0.0001904 kg; lognormal variance with pedigree 0.0112, pedigree (2,1,4,5,1)
  (same comment as for Phosphorus)
- Sulfur dioxide [air, urban air close to ground]: 0.0028 kg; lognormal variance with pedigree 0.0112, pedigree (2,1,4,5,1)
  (same comment as for Phosphorus)
- Sodium [air, urban air close to ground]: 0.001456 kg; lognormal variance with pedigree 0.0112, pedigree (2,1,4,5,1)
  (same comment as for Phosphorus)
- Water [air, unspecified]: 0.292907 m3; = (m_sawnwood*WWM_sawnwood-beam_raw_kiln*WWM_dried)/1000; lognormal variance with pedigree 0.014, pedigree (1,1,4,1,1)
  difference in water contained in the sawnwood before and after drying, converted from kg to m3
- Arsenic [air, urban air close to ground]: 1.12e-6 kg; lognormal variance with pedigree 0.0112, pedigree (2,1,4,5,1)
  (same comment as for Phosphorus)
- Phenol, pentachloro- [air, urban air close to ground]: 9.072e-9 kg; lognormal variance with pedigree 0.0112, pedigree (2,1,4,5,1)
  (same comment as for Phosphorus)
- Magnesium [air, urban air close to ground]: 0.0004032 kg; lognormal variance with pedigree 0.0112, pedigree (2,1,4,5,1)
  (same comment as for Phosphorus)
- Toluene [air, urban air close to ground]: 0.000336 kg; lognormal variance with pedigree 0.0112, pedigree (2,1,4,5,1)
  (same comment as for Phosphorus)
- Hydrocarbons, aliphatic, alkanes, unspecified [air, urban air close to ground]: 0.0010192 kg; lognormal variance with pedigree 0.0112, pedigree (2,1,4,5,1)
  (same comment as for Phosphorus)
- Carbon dioxide, non-fossil [air, urban air close to ground]: 116.458 kg; lognormal variance with pedigree 0.0112, pedigree (2,1,4,5,1)
  (same comment as for Phosphorus)
- m-Xylene [air, urban air close to ground]: 0.0001344 kg; lognormal variance with pedigree 0.0112, pedigree (2,1,4,5,1)
  (same comment as for Phosphorus)
- Ammonia [air, urban air close to ground]: 0.0019376 kg; lognormal variance with pedigree 0.0112, pedigree (2,1,4,5,1)
  (same comment as for Phosphorus)
- Methane, non-fossil [air, urban air close to ground]: 0.002688 kg; lognormal variance with pedigree 0.0112, pedigree (2,1,4,5,1)
  (same comment as for Phosphorus)
- Bromine [air, urban air close to ground]: 6.72e-5 kg; lognormal variance with pedigree 0.0112, pedigree (2,1,4,5,1)
  (same comment as for Phosphorus)
- Particulates, < 2.5 um [air, urban air close to ground]: 0.1008 kg; lognormal variance with pedigree 0.0112, pedigree (2,1,4,5,1)
  (same comment as for Phosphorus)
- Benzo(a)pyrene [air, urban air close to ground]: 5.6e-7 kg; lognormal variance with pedigree 0.0112, pedigree (2,1,4,5,1)
  (same comment as for Phosphorus)
- Formaldehyde [air, urban air close to ground]: 0.0001456 kg; lognormal variance with pedigree 0.0112, pedigree (2,1,4,5,1)
  (same comment as for Phosphorus)
- Zinc [air, urban air close to ground]: 0.000336 kg; lognormal variance with pedigree 0.0112, pedigree (2,1,4,5,1)
  (same comment as for Phosphorus)
- NMVOC, non-methane volatile organic compounds, unspecified origin [air, urban air close to ground]: 0.01176 kg; lognormal variance with pedigree 0.0112, pedigree (2,1,4,5,1)
  (same comment as for Phosphorus)
- Calcium [air, urban air close to ground]: 0.006552 kg; lognormal variance with pedigree 0.0112, pedigree (2,1,4,5,1)
  (same comment as for Phosphorus)
- Nitrogen oxides [air, urban air close to ground]: 0.2016 kg; lognormal variance with pedigree 0.0112, pedigree (2,1,4,5,1)
  (same comment as for Phosphorus)
- Copper [air, urban air close to ground]: 2.464e-5 kg; lognormal variance with pedigree 0.0112, pedigree (2,1,4,5,1)
  (same comment as for Phosphorus)
- Benzene [air, urban air close to ground]: 0.0010192 kg; lognormal variance with pedigree 0.0112, pedigree (2,1,4,5,1)
  (same comment as for Phosphorus)
- Fluorine [air, urban air close to ground]: 5.6e-5 kg; lognormal variance with pedigree 0.0112, pedigree (2,1,4,5,1)
  (same comment as for Phosphorus)
- Particulates, > 2.5 um, and < 10um [air, unspecified]: 0.0056 kg; lognormal variance with pedigree 0.0166, pedigree (2,1,4,5,1)
  (same comment as for Phosphorus)
- Chromium [air, urban air close to ground]: 4.4352e-6 kg; lognormal variance with pedigree 0.0112, pedigree (2,1,4,5,1)
  (same comment as for Phosphorus)
- Benzene, hexachloro- [air, urban air close to ground]: 8.064e-12 kg; lognormal variance with pedigree 0.0112, pedigree (2,1,4,5,1)
  (same comment as for Phosphorus)
- Acetaldehyde [air, urban air close to ground]: 6.832e-5 kg; lognormal variance with pedigree 0.0112, pedigree (2,1,4,5,1)
  (same comment as for Phosphorus)
- Cadmium [air, urban air close to ground]: 7.84e-7 kg; lognormal variance with pedigree 0.0112, pedigree (2,1,4,5,1)
  (same comment as for Phosphorus)
- Dioxins, measured as 2,3,7,8-tetrachlorodibenzo-p-dioxin [air, urban air close to ground]: 3.472e-11 kg; lognormal variance with pedigree 0.0112, pedigree (2,1,4,5,1)
  (same comment as for Phosphorus)
- Hydrocarbons, aliphatic, unsaturated [air, urban air close to ground]: 0.003472 kg; lognormal variance with pedigree 0.0112, pedigree (2,1,4,5,1)
  (same comment as for Phosphorus)
- Dinitrogen monoxide [air, urban air close to ground]: 0.002576 kg; lognormal variance with pedigree 0.0112, pedigree (2,1,4,5,1)
  (same comment as for Phosphorus)
- Benzene, ethyl- [air, urban air close to ground]: 3.36e-5 kg; lognormal variance with pedigree 0.0112, pedigree (2,1,4,5,1)
  (same comment as for Phosphorus)
- Lead [air, urban air close to ground]: 2.8e-5 kg; lognormal variance with pedigree 0.0112, pedigree (2,1,4,5,1)
  (same comment as for Phosphorus)
- Chlorine [air, urban air close to ground]: 0.0002016 kg; lognormal variance with pedigree 0.0112, pedigree (2,1,4,5,1)
  (same comment as for Phosphorus)
- Chromium VI [air, urban air close to ground]: 4.48e-8 kg; lognormal variance with pedigree 0.0112, pedigree (2,1,4,5,1)
  (same comment as for Phosphorus)
- Nickel [air, urban air close to ground]: 6.72e-6 kg; lognormal variance with pedigree 0.0112, pedigree (2,1,4,5,1)
  (same comment as for Phosphorus)
- PAH, polycyclic aromatic hydrocarbons [air, urban air close to ground]: 1.2432e-5 kg; lognormal variance with pedigree 0.0112, pedigree (2,1,4,5,1)
  (same comment as for Phosphorus)
- Potassium [air, urban air close to ground]: 0.026208 kg; lognormal variance with pedigree 0.0112, pedigree (2,1,4,5,1)
  (same comment as for Phosphorus)
- Mercury [air, urban air close to ground]: 3.36e-7 kg; lognormal variance with pedigree 0.0112, pedigree (2,1,4,5,1)
  (same comment as for Phosphorus)
- Carbon monoxide, non-fossil [air, urban air close to ground]: 0.28 kg; lognormal variance with pedigree 0.0112, pedigree (2,1,4,5,1)
  (same comment as for Phosphorus)

## Sampling procedure
complementary literature and sampling from sawmills

## Extrapolations
extrapolated from CH data, uncertainty modeled accordingly.

## Review by Emilia Moreno Ruiz 2015-11-02
AL added
