# wheat production

Dataset: EcoSpold 2, unit process
Geography: FR
Time period: 2000-01-01 to 2021-12-31
Technology level: current
Classification: ISIC rev.4 ecoinvent: 0111:Growing of cereals (except rice), leguminous crops and oil seeds
Synonyms: Triticum aestivum L.
Scenario: Business-as-Usual
System model: Allocation, cut-off by classification
Share of production covered: 100 %
Generated by: Thomas Nemecek
Published in: Nemecek, T. 2007
Database: ecoinvent
isCopyrightProtected: true
accessRestrictedTo: 1

## General comment
This dataset represents the production of 1 kg of wheat grain (fresh matter). The yield is 6753 kg/ha at a moisture content at storage of 14.5%.
[This dataset was already contained in the ecoinvent database version 2. It was not individually updated during the transfer to ecoinvent version 3. Life Cycle Impact Assessment results may still have changed, as they are affected by changes in the supply chain, i.e. in other datasets. This dataset was generated following the ecoinvent quality guidelines for version 2. It may have been subject to central changes described in the ecoinvent version 3 change report (http://www.ecoinvent.org/database/ecoinvent-version-3/reports-of-changes/), and the results of the central updates were reviewed extensively. The changes added e.g. consistent water flows and other information throughout the database. The documentation of this dataset can be found in the ecoinvent reports of version 2, which are still available via the ecoinvent website. The change report linked above covers all central changes that were made during the conversion process.]

## Included activities start
This activity starts after the harvest of the previous crop. The inputs of seeds, mineral fertilisers and pesticides are considered. It is assumed that no organic fertilisers are applied.

## Included activities end
The dataset includes all machine operations and corresponding machine infrastructure and sheds. Machine operations are: soil cultivation, sowing, fertilisation, weed control, pest and pathogen control, combine-harvest and transport from field to farm (2 km). Further, direct field emissions are included. This activity ends after harvest at the farm gate.

## Geography
Refers to an average production in the region Barrois (FR).

## Technology
conventional production typical for the region

## Time period
The yield data have been collected for the years 2000-2004.

## Parameters
- LUC_crop_specific: 1 dimensionless
  This parameter allows to switch between a "crop specific" and a "country specific" approach when calculating the LUC of a crop. By default, the chosen approach is "crop specific", so the value of the parameter is 1. If you want to apply a "country specific" approach, turn the parameter to 0.
- fraction, irrigation water, to ground water: 0.8 dimensionless; name fraction_IW_to_ground_water; lognormal variance with pedigree 0.0886, pedigree (4,3,1,1,4)
  Literature value (Döll, 2011) cross referenced with expert opinion.
- fraction, irrigation water to surface water: 0.2 dimensionless; name fraction_IW_to_surface_water; lognormal variance with pedigree 0.0886, pedigree (4,3,1,1,4)
  Literature value (Döll, 2011) cross referenced with expert opinion.
- fraction, irrigation water, to air: 0.7945 dimensionless; name fraction_IW_to_air; lognormal variance with pedigree 0.0409, pedigree (2,2,2,1,1)
  Literature value (Siebert, 2010) (Vionnet, S., Quantis Water Database - Technical Report, 2012).

## Reference product
- wheat grain: 1 kg; name REF_PRODUCT; CPC 01112: Wheat, other; By-product classification allocatable product
  EcoSpold01Location=FR
  production volume 3.68855e10 kg
    39712000t in 2004.
    FAOSTAT for France 2005
  property energy content 15.484 MJ; name REF_PRODUCT_energy_content
    See chapter 'Yields and Inputs of Arable Crop Production' in "01_crop production - yields & inputs CH & Europe_v1.0.pdf", section "AGRICULTURAL PRODUCTION IN SWITZERLAND" - pdf-document on the dedicated talk page of ecoinvent (www.ecoinvent.org/documentation)
  property carbon content, non-fossil 0.464601; name REF_PRODUCT_C_content_non_fossil
    biogene carbon content on a dry matter basis
    Composition data obtained from Wheat, soft red winter, in (http://www.nal.usda.gov/fnic/foodcomp/search/). First, composition data were refered to 1 kg dry mass. Then, C-contents were calculated considering a C-content/dry mass of 46% in carbohydrates (including fibres), 53% in proteins and 75% in fats. All data from "Evolutionary and Biochemical Aspects", A.D. Kay and T. Vrede (in Global Ecology, 2010, Elsevier B.V., S.E. Jørgensen Ed.).
  property water content 0.169591; name REF_PRODUCT_water_content; = (1-REF_PRODUCT_DM)/REF_PRODUCT_DM
  property wet mass 1 kg; name REF_PRODUCT_WM
  property dry mass 0.855 kg; name REF_PRODUCT_DM
  property price 0.22 EUR2005; name REF_PRODUCT_price_EUR2005
    Literature value. Based on SAFEX price of R 3,727 per tonne, source: SAGIS, 2018. Retrieved from: http://www.sagis.org.za/safex_historic.html, accessed 28May2018
  property carbon content, fossil 0; name REF_PRODUCT_C_content_fossil
    fossil carbon content on a dry matter basis
  property water in wet mass 0.145 kg; name REF_PRODUCT_WWM; = 1-REF_PRODUCT_DM
  property carbon content 0.464601
    carbon content on a dry matter basis (reserved; not for manual entry)
  properties: carbon allocation 0.397234 kg

## Inputs from technosphere
- combine harvesting: 0.00014809 ha; lognormal variance with pedigree 0.0406, pedigree (2,1,5,1,1)
  EcoSpold01Location=CH
  See chapter 'Yields and Inputs of Arable Crop Production' in "01_crop production - yields & inputs CH & Europe_v1.0.pdf", section "AGRICULTURAL PRODUCTION IN THE EU" - pdf-document on the dedicated talk page of ecoinvent (www.ecoinvent.org/documentation)
- glyphosate: 5.3312e-5 kg; lognormal variance with pedigree 0.0407, pedigree (2,2,5,1,1)
  See chapter 'Yields and Inputs of Arable Crop Production' in "01_crop production - yields & inputs CH & Europe_v1.0.pdf", section "AGRICULTURAL PRODUCTION IN THE EU" - pdf-document on the dedicated talk page of ecoinvent (www.ecoinvent.org/documentation)
  EcoSpold01Location=RER
  properties: carbon content, fossil 0.214286, dry mass 1 kg, wet mass 1 kg
- [sulfonyl]urea-compound: 2.6214e-5 kg; lognormal variance with pedigree 0.0407, pedigree (2,2,5,1,1)
  (same comment as for glyphosate)
  properties: wet mass 1 kg, dry mass 1 kg, carbon content, fossil 0.540853
  note on carbon content, fossil: Approximated as an unweighted average of the C-content of the [sulfonyl]urea-compounds (Tab 2.25 Sutter, 2010) chlorotoluron, Diuron, Linuron and Isoproturon.
- transport, tractor and trailer, agricultural: 0.0019884 metric ton*km; lognormal variance with pedigree 0.0406, pedigree (2,1,5,1,1)
  (same comment as for combine harvesting)
- pyrethroid-compound: 1.6105e-6 kg; lognormal variance with pedigree 0.0407, pedigree (2,2,5,1,1)
  (same comment as for glyphosate)
  properties: wet mass 1 kg, carbon content, fossil 0.623, dry mass 1 kg
  note on carbon content, fossil: C content of pyrethroid-compounds was calculated as an unweigthed average of C content of the substances: cypermethrin, alpha-cypermethrin,beta-cyfluthrin, lambdacyhalothrin. Those substances are classified as pyrethroid-compounds in Tab 2.25, Sutter 2010
- phenoxy-compound: 5.5031e-5 kg; lognormal variance with pedigree 0.0407, pedigree (2,2,5,1,1)
  EcoSpold01Location=RER
  See chapter 'Yields and Inputs of Arable Crop Production' in "01_crop production - yields & inputs CH & Europe_v1.0.pdf", section "AGRICULTURAL PRODUCTION IN THE EU" - pdf-document on the dedicated talk page of ecoinvent (www.ecoinvent.org/documentation)
  properties: carbon content, fossil 0.532559, dry mass 1 kg, wet mass 1 kg
  note on carbon content, fossil: An unweighted average of the C content in mCPA, mCPB, mecoprop, fluazifop-P-butyl, and 2,4-D. Those substances are classified as phenoxy-compounds in Tab 2.25, Sutter 2010
- ammonium sulfate: 0.00222 kg; lognormal variance with pedigree 0.0406, pedigree (2,1,5,1,1)
  (same comment as for phenoxy-compound)
  properties: dry mass 1 kg, wet mass 1 kg
- tillage, harrowing, by spring tine harrow: 0.00025807 ha; lognormal variance with pedigree 0.0406, pedigree (2,1,5,1,1)
  (same comment as for combine harvesting)
- nitrile-compound: 6.1291e-5 kg; lognormal variance with pedigree 0.0407, pedigree (2,2,5,1,1)
  (same comment as for phenoxy-compound)
  properties: wet mass 1 kg, carbon content, fossil 0.344995, dry mass 1 kg
  note on carbon content, fossil: An unweighted average of the C content in chlorothalonil, dichlobenil, bromoxynil, ioxynil, substances classified as nitrile-compounds in Tab 2.25, Sutter 2010
- application of plant protection product, by field sprayer: 0.00102 ha; lognormal variance with pedigree 0.0406, pedigree (2,1,5,1,1)
  See chapter 'Yields and Inputs of Arable Crop Production' in "01_crop production - yields & inputs CH & Europe_v1.0.pdf", section "AGRICULTURAL PRODUCTION IN THE EU" - pdf-document on the dedicated talk page of ecoinvent (www.ecoinvent.org/documentation)
  EcoSpold01Location=CH
- sowing: 0.00014809 ha; lognormal variance with pedigree 0.0406, pedigree (2,1,5,1,1)
  (same comment as for application of plant protection product, by field sprayer)
- irrigation: 0.123183 m3; name water_irrigation_input; source Siebert, S. 2010; lognormal variance with pedigree 0.0427, pedigree (2,2,5,1,1)
  Calculated based on literature values (Döll, 2010) and partially modelled at ETH (Pfister, S.).
  property carbon content, non-fossil 0; name C_content_non_fossil
  property carbon content, fossil 0; name C_content_fossil
  property water content 9089.91; name water_content
  property dry mass 0.11 kg; name DM
  property wet mass 1000 kg; name WM
  property water in wet mass 999.89 kg; name WWM
- inorganic phosphorus fertiliser, as P2O5: 0.0104 kg; lognormal variance with pedigree 0.0406, pedigree (2,1,5,1,1)
  (same comment as for phenoxy-compound)
  properties: dry mass 1 kg, wet mass 1 kg
- organophosphorus-compound, unspecified: 3.406e-7 kg; lognormal variance with pedigree 0.0407, pedigree (2,2,5,1,1)
  (same comment as for glyphosate)
  properties: carbon content, fossil 0.260898, dry mass 1 kg, wet mass 1 kg
  note on carbon content, fossil: C content was calculated as an unweighted average of glyphosate, parathion, and fosetyl-Al. Those substances are classified as organo-phosphorous compounds in Tab 2.25, Sutter 2010
- diphenylether-compound: 1.8498e-5 kg; lognormal variance with pedigree 0.0407, pedigree (2,2,5,1,1)
  (same comment as for phenoxy-compound)
  properties: dry mass 1 kg, carbon content, fossil 0.560061, wet mass 1 kg
  note on carbon content, fossil: C content of diphenylether-compounds was calculated after the C content of thepesticides aclonifen and diflufenican classified as diphenylether-compound in Tab 2.25 of Sutter 2010
- packaging, for fertilisers: 0.094817 kg; lognormal variance with pedigree 0.0912, pedigree (4,3,5,5,4)
  Total amount of active substance/s of fertilisers needed for the production of 'wheat grain' is calculated to be circa 4.74E-02 kg. Fertiliser/s used in this dataset is/are: 'ammonium nitrate, as N', 'ammonium sulfate, as N', 'lime', 'phosphate fertiliser, as P2O5', 'potassium chloride, as K2O', 'urea, as N'. The total amount of active substance/s is doubled in order to account for the packaging of the dilluted product of fertiliser/s that is/are applied. Therefore, 9.48E-02 kg of packaging for fertilisers is justified with this exchange.
  properties: carbon content, fossil 0.825301, heating value, net 25.01 MJ, wet mass 1 kg, dry mass 1 kg, price 0.0642 EUR2005
  note on carbon content, fossil: Considering a chemical formula (C2H4)n for polyethylene, carbon content-fossil is calculated to be 0.856286 kg of Carbon per kg of dry mass.
- lime: 0.0018685 kg; lognormal variance with pedigree 0.0406, pedigree (2,1,5,1,1)
  (same comment as for application of plant protection product, by field sprayer)
  properties: dry mass 1 kg, wet mass 1 kg, carbon content, fossil 0.120005
- ammonium nitrate: 0.0428598 kg; lognormal variance with pedigree 0.0406, pedigree (2,1,5,1,1)
  The exchange has been updated from 'ammonium nitrate, as N' into 'ammonium nitrate' and therefore its amount has been scaled (multiplied) from 0.015 kg by 2.8573 kg of 'ammonium nitrate' per kg of 'ammonium nitrate, as N'. Original comment of the exchange is: See chapter 'Yields and Inputs of Arable Crop Production' in "01_crop production - yields & inputs CH & Europe_v1.0.pdf", section "AGRICULTURAL PRODUCTION IN THE EU" - pdf-document on the dedicated talk page of ecoinvent (www.ecoinvent.org/documentation)
  EcoSpold01Location=RER
  properties: dry mass 1 kg, wet mass 1 kg
- urea: 0.0257256 kg; lognormal variance with pedigree 0.0406, pedigree (2,1,5,1,1)
  The exchange has been updated from 'urea, as N' into 'urea' and therefore its amount has been scaled (multiplied) from 0.012 kg by 2.1438 kg of 'urea' per kg of 'urea, as N'. Original comment of the exchange is: See chapter 'Yields and Inputs of Arable Crop Production' in "01_crop production - yields & inputs CH & Europe_v1.0.pdf", section "AGRICULTURAL PRODUCTION IN THE EU" - pdf-document on the dedicated talk page of ecoinvent (www.ecoinvent.org/documentation)
  EcoSpold01Location=RER
  properties: wet mass 1 kg, carbon content, fossil 0.2, dry mass 1 kg
- tillage, ploughing: 7.7625e-5 ha; lognormal variance with pedigree 0.0406, pedigree (2,1,5,1,1)
  (same comment as for combine harvesting)
- potassium chloride: 0.00937075 kg; lognormal variance with pedigree 0.0406, pedigree (2,1,5,1,1)
  The exchange has been updated from 'potassium chloride, as K2O' into 'potassium chloride' and therefore its amount has been scaled (multiplied) from 0.0059 kg by 1.5829 kg of 'potassium chloride' per kg of 'potassium chloride, as K2O'. Original comment of the exchange is: See chapter 'Yields and Inputs of Arable Crop Production' in "01_crop production - yields & inputs CH & Europe_v1.0.pdf", section "AGRICULTURAL PRODUCTION IN THE EU" - pdf-document on the dedicated talk page of ecoinvent (www.ecoinvent.org/documentation)
  EcoSpold01Location=RER
  properties: wet mass 1 kg, dry mass 1 kg
- packaging, for pesticides: 0.00103086 kg; lognormal variance with pedigree 0.0912, pedigree (4,3,5,5,4)
  Total amount of active substance/s of pesticides needed for the production of wheat grain is calculated to be circa 5.15E-04 kg. Pesticide/s used in this dataset is/are: '[sulfonyl]urea-compound', 'cyclic N-compound', 'diphenylether-compound', 'glyphosate', 'nitrile-compound', 'organophosphorus-compound, unspecified', 'pesticide, unspecified', 'phenoxy-compound', 'pyrethroid-compound'. The total amount of active substance/s is doubled in order to account for the packaging of the dilluted product of pesticide/s that is/are applied. Therefore, 1.03E-03 kg of packaging for pesticides is justified with this exchange.
  properties: carbon content, fossil 0.85714, heating value, net 25.97 MJ, wet mass 1 kg, price 0.0642 EUR2005, dry mass 1 kg
- cyclic N-compound: 1.7632e-5 kg; lognormal variance with pedigree 0.0407, pedigree (2,2,5,1,1)
  (same comment as for glyphosate)
  properties: dry mass 1 kg, wet mass 1 kg, carbon content, fossil 0.641962
  note on carbon content, fossil: Calculated as an unweigthed average of the C content of the cyclic N-compounds where information was avaliable in Sutter, 2010, following the classification in Tab 2.25 in Sutter 2010: Difenoconazole (C19H17Cl2N3O3), Fenpropidin (C19H31N), Fenpropimorph (C20H33NO), Flusilazole (C16H15F2N3Si), Metconazole (C17H22ClN3O), Penconazole (C13H15Cl2N3), Propiconazole (C15H17Cl2N3O2), Tebuconazole (C16H22ClN3O)
- fertilising, by broadcaster: 0.00051831 ha; lognormal variance with pedigree 0.0406, pedigree (2,1,5,1,1)
  (same comment as for combine harvesting)
- tillage, harrowing, by rotary harrow: 7.0463e-5 ha; lognormal variance with pedigree 0.0406, pedigree (2,1,5,1,1)
  (same comment as for application of plant protection product, by field sprayer)
- pesticide, unspecified: 0.0002815 kg; lognormal variance with pedigree 0.0407, pedigree (2,2,5,1,1)
  (same comment as for phenoxy-compound)
  properties: dry mass 1 kg, wet mass 1 kg, carbon content, fossil 0.486978
  note on carbon content, fossil: Mean of C content in all pesticides whose formula has been documented in Sutter 2010
- wheat seed, for sowing: 0.023324 kg; name SEED; lognormal variance with pedigree 0.0406, pedigree (2,1,5,1,1)
  See chapter 'Yields and Inputs of Arable Crop Production' in "01_crop production - yields & inputs CH & Europe_v1.0.pdf", section "AGRICULTURAL PRODUCTION IN THE EU" - pdf-document on the dedicated talk page of ecoinvent (www.ecoinvent.org/documentation)
  property energy content 15.3935 MJ; name SEED_energy_content
  property wet mass 1 kg; name wheat_seed_sowing_WM
  property carbon content, non-fossil 0.447696; name SEED_C_content_non_fossil
  property water in wet mass 0.15 kg; name wheat_seed_sowing_WWM; = 1-SEED_DM
  property dry mass 0.85 kg; name SEED_DM
  property water content 0.176471; name wheat_seed_sowing_water_content; = (1-SEED_DM)/SEED_DM
  note on energy content: See chapter 'Product Properties' in "01_crop production - yields & inputs CH & Europe_v1.0.pdf", section "AGRICULTURAL PRODUCTION IN SWITZERLAND" - pdf-document on the dedicated talk page of ecoinvent (www.ecoinvent.org/documentation)
  note on carbon content, non-fossil: biogene carbon content on a dry matter basis; Composition data obtained from Wheat, soft red winter, in (http://www.nal.usda.gov/fnic/foodcomp/search/). First, composition data were refered to 1 kg dry mass. Then, C-contents were calculated considering a C-content/dry mass of 44% in carbohydrates (including fibres), 53% in proteins and 75% in fats. All data from ecoinvent report, n 15a, pg 40, except C-content in protein, that comes from Determination of protein concentration by total organic carbon analysis, Rouwenhorst et al., 1991, J Biochem and Biophys Methods, 22:119-128.

## Inputs from nature
- Energy, gross calorific value, in biomass [natural resource, biotic]: 15.123 MJ; lognormal variance with pedigree 0.0411891, pedigree (2,1,5,1,1)
- Carbon dioxide, in air [natural resource, in air]: 1.42398 kg; = 44/12 * (REF_PRODUCT_C_content_non_fossil * REF_PRODUCT * REF_PRODUCT_DM - SEED_C_content_non_fossil * SEED * SEED_DM); lognormal variance with pedigree 0.0406, pedigree (2,1,5,1,1)
  Modelled,see chapter 'CO2 binding' in "01_crop production_direct field emissions and natural resources_v1.0.pdf" - pdf-document on the dedicated talk page of ecoinvent (www.ecoinvent.org/documentation)
- Occupation, annual crop, non-irrigated, intensive [natural resource, land]: 1.4809 m2*year; lognormal variance with pedigree 0.0406, pedigree (2,1,5,1,1)
  Modelled, see chapter 'Land use' in "01_crop production_direct field emissions and natural resources_v1.0.pdf" - pdf-document on the dedicated talk page of ecoinvent (www.ecoinvent.org/documentation)
- Transformation, from annual crop, non-irrigated, intensive [natural resource, land]: 1.4809 m2; lognormal variance with pedigree 0.0506, pedigree (2,1,5,1,1)
  (same comment as for Occupation, annual crop, non-irrigated, intensive)
- Transformation, to annual crop, non-irrigated, intensive [natural resource, land]: 1.4809 m2; lognormal variance with pedigree 0.0506, pedigree (2,1,5,1,1)
  (same comment as for Occupation, annual crop, non-irrigated, intensive)

## Emissions to nature
- Flupyrsulfuron-methyl [soil, agricultural]: 4.7694e-8 kg; lognormal variance with pedigree 0.0507, pedigree (2,2,5,1,1)
  Modelled, see chapter 'Emissions of pesticides to agricultural soil' in "01_crop production_direct field emissions and natural resources_v1.0.pdf" - pdf-document on the dedicated talk page of ecoinvent (www.ecoinvent.org/documentation)
- Tebuconazole [soil, agricultural]: 2.9745e-6 kg; lognormal variance with pedigree 0.0507, pedigree (2,2,5,1,1)
  (same comment as for Flupyrsulfuron-methyl)
- Choline chloride [soil, agricultural]: 6.7765e-5 kg; lognormal variance with pedigree 0.0507, pedigree (2,2,5,1,1)
  (same comment as for Flupyrsulfuron-methyl)
- Metosulam [soil, agricultural]: 9.4036e-8 kg; lognormal variance with pedigree 0.0507, pedigree (2,2,5,1,1)
  (same comment as for Flupyrsulfuron-methyl)
- Fenpropimorph [soil, agricultural]: 4.318e-6 kg; lognormal variance with pedigree 0.0507, pedigree (2,2,5,1,1)
  (same comment as for Flupyrsulfuron-methyl)
- Water [air, unspecified]: 0.0978691 m3; name water_to_air_unspecified; = (water_irrigation_input*fraction_IW_to_air); lognormal variance with pedigree 0.0807, pedigree (2,2,5,1,1)
  Calculated value based on literature values and expert opinion. See comments in the parametres' comment field.
  property fraction, origin: salt water 0; name fraction_origin_salt_water
  property fraction, origin: unspecified 0; name fraction_origin_unspecified
  property fraction, origin: fresh water 1; name fraction_origin_fresh_water
- Prohexadione-calcium [soil, agricultural]: 3.7022e-8 kg; lognormal variance with pedigree 0.0507, pedigree (2,2,5,1,1)
  (same comment as for Flupyrsulfuron-methyl)
- Bromoxynil [soil, agricultural]: 1.5024e-5 kg; lognormal variance with pedigree 0.0507, pedigree (2,2,5,1,1)
  (same comment as for Flupyrsulfuron-methyl)
- Zinc, ion [water, ground-]: 2.2034e-6 kg; lognormal variance with pedigree 0.1307, pedigree (2,2,5,1,1)
  Modelled, see chapter 'Emissions of heavy metals to agricultural soil, surface water and ground water' in "01_crop production_direct field emissions and natural resources_v1.0.pdf" - pdf-document on the dedicated talk page of ecoinvent (www.ecoinvent.org/documentation)
- Mercury [soil, agricultural]: -1.1081e-10 kg
  (same comment as for Zinc, ion)
- Kresoxim-methyl [soil, agricultural]: 1.1376e-6 kg; lognormal variance with pedigree 0.0507, pedigree (2,2,5,1,1)
  (same comment as for Flupyrsulfuron-methyl)
- Nickel, ion [water, surface water]: 2.7991e-7 kg; lognormal variance with pedigree 0.1307, pedigree (2,2,5,1,1)
  (same comment as for Zinc, ion)
- Bitertanol [soil, agricultural]: 1.1766e-7 kg; lognormal variance with pedigree 0.0507, pedigree (2,2,5,1,1)
  (same comment as for Flupyrsulfuron-methyl)
- Mecoprop-P [soil, agricultural]: 6.912e-6 kg; lognormal variance with pedigree 0.0507, pedigree (2,2,5,1,1)
  (same comment as for Flupyrsulfuron-methyl)
- Cadmium, ion [water, surface water]: 4.3568e-9 kg; lognormal variance with pedigree 0.1307, pedigree (2,2,5,1,1)
  (same comment as for Zinc, ion)
- Propoxycarbazone-sodium (prop) [soil, agricultural]: 2.0525e-7 kg; lognormal variance with pedigree 0.0507, pedigree (2,2,5,1,1)
  (same comment as for Flupyrsulfuron-methyl)
- Mercury [water, ground-]: 4.4636e-11 kg; lognormal variance with pedigree 0.1307, pedigree (2,2,5,1,1)
  (same comment as for Zinc, ion)
- Triadimenol [soil, agricultural]: 4.1983e-7 kg; lognormal variance with pedigree 0.0507, pedigree (2,2,5,1,1)
  (same comment as for Flupyrsulfuron-methyl)
- Chromium [soil, agricultural]: 2.7493e-6 kg; lognormal variance with pedigree 0.0807, pedigree (2,2,5,1,1)
  (same comment as for Zinc, ion)
- Cloquintocet-mexyl [soil, agricultural]: 1.7571e-6 kg; lognormal variance with pedigree 0.0507, pedigree (2,2,5,1,1)
  (same comment as for Flupyrsulfuron-methyl)
- Chromium, ion [water, surface water]: 4.3709e-7 kg; lognormal variance with pedigree 0.1307, pedigree (2,2,5,1,1)
  (same comment as for Zinc, ion)
- Azoxystrobin [soil, agricultural]: 6.2171e-6 kg; lognormal variance with pedigree 0.0507, pedigree (2,2,5,1,1)
  (same comment as for Flupyrsulfuron-methyl)
- Pyraclostrobin (prop) [soil, agricultural]: 3.9254e-6 kg; lognormal variance with pedigree 0.0507, pedigree (2,2,5,1,1)
  (same comment as for Flupyrsulfuron-methyl)
- MCPA [soil, agricultural]: 4.182e-5 kg; lognormal variance with pedigree 0.0507, pedigree (2,2,5,1,1)
  (same comment as for Flupyrsulfuron-methyl)
- Picoxystrobin [soil, agricultural]: 4.276e-7 kg; lognormal variance with pedigree 0.0507, pedigree (2,2,5,1,1)
  (same comment as for Flupyrsulfuron-methyl)
- Carfentrazone-ethyl [soil, agricultural]: 6.2197e-8 kg; lognormal variance with pedigree 0.0507, pedigree (2,2,5,1,1)
  (same comment as for Flupyrsulfuron-methyl)
- Cadmium, ion [water, ground-]: 6.82e-9 kg; lognormal variance with pedigree 0.1307, pedigree (2,2,5,1,1)
  (same comment as for Zinc, ion)
- Ethephon [soil, agricultural]: 3.406e-7 kg; lognormal variance with pedigree 0.0507, pedigree (2,2,5,1,1)
  (same comment as for Flupyrsulfuron-methyl)
- Prochloraz [soil, agricultural]: 1.4859e-6 kg; lognormal variance with pedigree 0.0507, pedigree (2,2,5,1,1)
  (same comment as for Flupyrsulfuron-methyl)
- Copper, ion [water, surface water]: 3.2389e-7 kg; lognormal variance with pedigree 0.1307, pedigree (2,2,5,1,1)
  (same comment as for Zinc, ion)
- Imidacloprid [soil, agricultural]: 5.4909e-7 kg; lognormal variance with pedigree 0.0507, pedigree (2,2,5,1,1)
  (same comment as for Flupyrsulfuron-methyl)
- Iodosulfuron-methyl-sodium [soil, agricultural]: 2.9761e-8 kg; lognormal variance with pedigree 0.0507, pedigree (2,2,5,1,1)
  (same comment as for Flupyrsulfuron-methyl)
- Zinc [soil, agricultural]: 1.225e-7 kg; lognormal variance with pedigree 0.0807, pedigree (2,2,5,1,1)
  (same comment as for Zinc, ion)
- Metconazole [soil, agricultural]: 5.038e-7 kg; lognormal variance with pedigree 0.0507, pedigree (2,2,5,1,1)
  (same comment as for Flupyrsulfuron-methyl)
- Florasulam [soil, agricultural]: 3.332e-8 kg; lognormal variance with pedigree 0.0507, pedigree (2,2,5,1,1)
  (same comment as for Flupyrsulfuron-methyl)
- Clodinafop-propargyl [soil, agricultural]: 7.0283e-6 kg; lognormal variance with pedigree 0.0507, pedigree (2,2,5,1,1)
  (same comment as for Flupyrsulfuron-methyl)
- Quinoxyfen [soil, agricultural]: 1.7949e-6 kg; lognormal variance with pedigree 0.0507, pedigree (2,2,5,1,1)
  (same comment as for Flupyrsulfuron-methyl)
- Glyphosate [soil, agricultural]: 5.3312e-5 kg; lognormal variance with pedigree 0.0507, pedigree (2,2,5,1,1)
  (same comment as for Flupyrsulfuron-methyl)
- Nickel [soil, agricultural]: 9.2208e-7 kg; lognormal variance with pedigree 0.0807, pedigree (2,2,5,1,1)
  (same comment as for Zinc, ion)
- Water [water, surface water]: 0.00506283 m3; name water_to_water_surface; = water_irrigation_input*(1-fraction_IW_to_air)*fraction_IW_to_surface_water; lognormal variance with pedigree 0.1286, pedigree (4,3,5,1,4)
  Calculated value. See the parameters and their comments to understand the calculation.
  property fraction, origin: fresh water 1; name fraction_origin_fresh_water_Wsw
  property fraction, origin: salt water 0; name fraction_origin_salt_water_Wsw
- Metaldehyde [soil, agricultural]: 2.2213e-5 kg; lognormal variance with pedigree 0.0507, pedigree (2,2,5,1,1)
  (same comment as for Flupyrsulfuron-methyl)
- Propiconazole [soil, agricultural]: 1.8418e-6 kg; lognormal variance with pedigree 0.0507, pedigree (2,2,5,1,1)
  (same comment as for Flupyrsulfuron-methyl)
- Spiroxamine [soil, agricultural]: 1.0218e-6 kg; lognormal variance with pedigree 0.0507, pedigree (2,2,5,1,1)
  (same comment as for Flupyrsulfuron-methyl)
- Mepiquat chloride [soil, agricultural]: 6.2197e-7 kg; lognormal variance with pedigree 0.0507, pedigree (2,2,5,1,1)
  (same comment as for Flupyrsulfuron-methyl)
- Trifloxystrobin [soil, agricultural]: 2.1621e-6 kg; lognormal variance with pedigree 0.0507, pedigree (2,2,5,1,1)
  (same comment as for Flupyrsulfuron-methyl)
- Fenpropidin [soil, agricultural]: 1.7163e-6 kg; lognormal variance with pedigree 0.0507, pedigree (2,2,5,1,1)
  (same comment as for Flupyrsulfuron-methyl)
- Trinexapac-ethyl [soil, agricultural]: 1.3883e-6 kg; lognormal variance with pedigree 0.0507, pedigree (2,2,5,1,1)
  (same comment as for Flupyrsulfuron-methyl)
- Lead [soil, agricultural]: 1.8221e-7 kg; lognormal variance with pedigree 0.0807, pedigree (2,2,5,1,1)
  (same comment as for Zinc, ion)
- Fludioxonil [soil, agricultural]: 7.5175e-7 kg; lognormal variance with pedigree 0.0507, pedigree (2,2,5,1,1)
  (same comment as for Flupyrsulfuron-methyl)
- Chlormequat [soil, agricultural]: 9.7412e-5 kg; lognormal variance with pedigree 0.0507, pedigree (2,2,5,1,1)
  (same comment as for Flupyrsulfuron-methyl)
- Chromium, ion [water, ground-]: 2.889e-6 kg; lognormal variance with pedigree 0.1307, pedigree (2,2,5,1,1)
  (same comment as for Zinc, ion)
- Ioxynil [soil, agricultural]: 1.9833e-5 kg; lognormal variance with pedigree 0.0507, pedigree (2,2,5,1,1)
  (same comment as for Flupyrsulfuron-methyl)
- Nitrate [water, ground-]: 0.0445656 kg; lognormal variance with pedigree 0.0807, pedigree (2,2,5,1,1)
  Modelled with the 'SALCA-NO3 model' described in "01_crop production_direct field emissions and natural resources_v1.0.pdf" - pdf-document on the dedicated talk page of ecoinvent (www.ecoinvent.org/documentation)
- Cypermethrin [soil, agricultural]: 1.1107e-6 kg; lognormal variance with pedigree 0.0507, pedigree (2,2,5,1,1)
  (same comment as for Flupyrsulfuron-methyl)
- Fluroxypyr [soil, agricultural]: 2.0056e-5 kg; lognormal variance with pedigree 0.0507, pedigree (2,2,5,1,1)
  (same comment as for Flupyrsulfuron-methyl)
- Carbon dioxide, fossil [air, non-urban air or from high stacks]: 0.019012 kg; lognormal variance with pedigree 0.0407, pedigree (2,2,5,1,1)
  Modelled, see chapter 'Release of fossil CO2 after urea applications' in "01_crop production_assessment methods of direct field emissions_v1.0.pdf" - pdf-document on the dedicated talk page of ecoinvent (www.ecoinvent.org/documentation)
- Metsulfuron-methyl [soil, agricultural]: 3.874e-7 kg; lognormal variance with pedigree 0.0507, pedigree (2,2,5,1,1)
  (same comment as for Flupyrsulfuron-methyl)
- Nitrogen oxides [air, non-urban air or from high stacks]: 0.000150438 kg; = 0.21 * N2O; lognormal variance with pedigree 0.0707, pedigree (2,2,5,1,1)
  Modelled, see chapter 'Emissions of NOx to the air' in "01_crop production_direct field emissions and natural resources_v1.0.pdf" - pdf-document on the dedicated talk page of ecoinvent (www.ecoinvent.org/documentation)
- Lead [water, ground-]: 6.8734e-9 kg; lognormal variance with pedigree 0.1307, pedigree (2,2,5,1,1)
  (same comment as for Zinc, ion)
- Phosphorus [water, surface water]: 1.8724e-5 kg; lognormal variance with pedigree 0.0807, pedigree (2,2,5,1,1)
  Modelled, see chapter 'Emissions of phosphorous to the water' in "01_crop production_direct field emissions and natural resources_v1.0.pdf" - pdf-document on the dedicated talk page of ecoinvent (www.ecoinvent.org/documentation)
- Lambda-cyhalothrin [soil, agricultural]: 2.499e-7 kg; lognormal variance with pedigree 0.0507, pedigree (2,2,5,1,1)
  (same comment as for Flupyrsulfuron-methyl)
- Copper, ion [water, ground-]: 4.3587e-7 kg; lognormal variance with pedigree 0.1307, pedigree (2,2,5,1,1)
  (same comment as for Zinc, ion)
- Isoproturon [soil, agricultural]: 2.5827e-5 kg; lognormal variance with pedigree 0.0507, pedigree (2,2,5,1,1)
  (same comment as for Flupyrsulfuron-methyl)
- Bifenox [soil, agricultural]: 5.2756e-6 kg; lognormal variance with pedigree 0.0507, pedigree (2,2,5,1,1)
  (same comment as for Flupyrsulfuron-methyl)
- Deltamethrin [soil, agricultural]: 2.499e-7 kg; lognormal variance with pedigree 0.0507, pedigree (2,2,5,1,1)
  (same comment as for Flupyrsulfuron-methyl)
- Lead [water, surface water]: 2.973e-8 kg; lognormal variance with pedigree 0.1307, pedigree (2,2,5,1,1)
  (same comment as for Zinc, ion)
- Cyprodinil [soil, agricultural]: 2.6434e-5 kg; lognormal variance with pedigree 0.0507, pedigree (2,2,5,1,1)
  (same comment as for Flupyrsulfuron-methyl)
- Mecoprop [soil, agricultural]: 2.8063e-5 kg; lognormal variance with pedigree 0.0507, pedigree (2,2,5,1,1)
  (same comment as for Flupyrsulfuron-methyl)
- Clopyralid [soil, agricultural]: 4.2709e-6 kg; lognormal variance with pedigree 0.0507, pedigree (2,2,5,1,1)
  (same comment as for Flupyrsulfuron-methyl)
- Dinitrogen monoxide [air, non-urban air or from high stacks]: 0.000716372 kg; name N2O; lognormal variance with pedigree 0.0707, pedigree (2,2,5,1,1)
  Modelled, see chapter 'Emissions of N2O to the air' in "01_crop production_direct field emissions and natural resources_v1.0.pdf" - pdf-document on the dedicated talk page of ecoinvent (www.ecoinvent.org/documentation)
- Diflufenican [soil, agricultural]: 6.194e-6 kg; lognormal variance with pedigree 0.0507, pedigree (2,2,5,1,1)
  (same comment as for Flupyrsulfuron-methyl)
- Anthraquinone [soil, agricultural]: 7.9097e-6 kg; lognormal variance with pedigree 0.0507, pedigree (2,2,5,1,1)
  (same comment as for Flupyrsulfuron-methyl)
- Mesosulfuron-methyl (prop) [soil, agricultural]: 1.4881e-7 kg; lognormal variance with pedigree 0.0507, pedigree (2,2,5,1,1)
  (same comment as for Flupyrsulfuron-methyl)
- Cadmium [soil, agricultural]: 1.1189e-6 kg; lognormal variance with pedigree 0.0807, pedigree (2,2,5,1,1)
  (same comment as for Zinc, ion)
- Phosphate [water, surface water]: 9.331e-5 kg; lognormal variance with pedigree 0.0807, pedigree (2,2,5,1,1)
  (same comment as for Phosphorus)
- Silthiofam [soil, agricultural]: 2.7584e-6 kg; lognormal variance with pedigree 0.0507, pedigree (2,2,5,1,1)
  (same comment as for Flupyrsulfuron-methyl)
- Water [water, ground-]: 0.0202513 m3; name water_to_water_ground; = water_irrigation_input*(1-fraction_IW_to_air)*fraction_IW_to_ground_water; lognormal variance with pedigree 0.1286, pedigree (4,3,5,1,4)
  Calculated value. See the parameters and their comments to understand the calculation.
  property fraction, origin: unspecified 0; name fraction_origin_unspecified_Wgw
  property fraction, origin: fresh water 1; name fraction_origin_fresh_water_Wgw
  property fraction, origin: salt water 0; name fraction_origin_salt_water_Wgw
- Cyproconazole [soil, agricultural]: 7.1319e-7 kg; lognormal variance with pedigree 0.0507, pedigree (2,2,5,1,1)
  (same comment as for Flupyrsulfuron-methyl)
- Tefluthrin [soil, agricultural]: 8.4476e-8 kg; lognormal variance with pedigree 0.0507, pedigree (2,2,5,1,1)
  (same comment as for Flupyrsulfuron-methyl)
- Bromuconazole [soil, agricultural]: 3.5656e-7 kg; lognormal variance with pedigree 0.0507, pedigree (2,2,5,1,1)
  (same comment as for Flupyrsulfuron-methyl)
- Copper [soil, agricultural]: -1.5e-6 kg
  (same comment as for Zinc, ion)
- Diclofop-methyl [soil, agricultural]: 1.1125e-5 kg; lognormal variance with pedigree 0.0507, pedigree (2,2,5,1,1)
  (same comment as for Flupyrsulfuron-methyl)
- Epoxiconazole [soil, agricultural]: 4.0783e-6 kg; lognormal variance with pedigree 0.0507, pedigree (2,2,5,1,1)
  (same comment as for Flupyrsulfuron-methyl)
- Zinc, ion [water, surface water]: 4.4076e-7 kg; lognormal variance with pedigree 0.1307, pedigree (2,2,5,1,1)
  (same comment as for Zinc, ion)
- Phosphate [water, ground-]: 3.1767e-5 kg; lognormal variance with pedigree 0.0807, pedigree (2,2,5,1,1)
  (same comment as for Phosphorus)
- Ammonia [air, non-urban air or from high stacks]: 0.00279373 kg; lognormal variance with pedigree 0.0507, pedigree (2,2,5,1,1)
  Modelled with the 'AGRAMMON model' described in "01_crop production_direct field emissions and natural resources_v1.0.pdf" - pdf-document on the dedicated talk page of ecoinvent (www.ecoinvent.org/documentation)
- Mercury [water, surface water]: 3.8377e-11 kg; lognormal variance with pedigree 0.1307, pedigree (2,2,5,1,1)
  (same comment as for Zinc, ion)

## Sampling procedure
Data come from a survey in the concerted action GL-Pro of the EU (QLK5-CT-2002-02418). Data were compiled from statistics, pilot networks, fertilising recommendations, documents from extension services, information provided by retailers and expert knowledge. The production data were verified and adjusted by a group of experts in GL-Pro and by other experts.

## Extrapolations
This dataset has been extrapolated from year 2004 to the year of the calculation (2021). The uncertainty has been adjusted accordingly.

## Review by Hans-Jörg Althaus 2007-11-07
passed
