# treatment of waste polyurethane, municipal incineration

Dataset: EcoSpold 2, unit process
Geography: RoW
Time period: 2006-01-01 to 2021-12-31
Technology level: current
Classification: ISIC rev.4 ecoinvent: 3821:Treatment and disposal of non-hazardous waste
Synonyms: Kehrichtverbrennung; Siedlungsabfallverbrennung; municipal waste incineration
Scenario: Business-as-Usual
System model: Allocation, cut-off by classification
Share of production covered: 1.8 %
Generated by: Gabor Doka
Published in: Doka G. 2013
Database: ecoinvent
isCopyrightProtected: true
accessRestrictedTo: 1

## General comment
This dataset represents the activity of waste disposal of waste polyurethane in a municipal solid waste incinerator (MSWI) // Recommended use of this dataset: For PU, which goes to disposal as part of communal waste mixture. // // Waste composition (wet, in ppm): upper heating value 30.9 MJ/kg; lower heating value 30.67 MJ/kg; H2O 2000; O 178700; H 84276; C 640700; S 203.07; N 60922; P n.a.; B n.a.; Cl 24369; Br 70.934; F 14.896; I n.a.; Ag n.a.; As 1.9253; Ba 188.99; Cd 82.301; Co 32.011; Cr 41.41; Cu 321.89; Hg 0.86045; Mn 80.984; Mo n.a.; Ni 20.874; Pb 473.27; Sb 43.54; Se 2.128; Sn 26.555; V 291.99; Zn 566.54; Be 0.50667; Sc n.a.; Sr 89.68; Ti 1013.3; Tl 0.40534; W n.a.; Si n.a.; Fe 3775.4; Ca n.a.; Al 202.67; K n.a.; Mg n.a.; Na 1485; // Share of carbon in waste that is biogenic 0%. // Share of metals in waste not oxidised and bulk-recyclable (exclude very small or thin parts) Iron: 0%; Alu: 0%; Copper: 0%. // One kg of this waste produces 0.02431 kg of slag and 0.01773 kg of residues, which are landfilled. Additional solidification with 0.007092 kg of cement. // Net energy production: 3.93MJ/kg electric energy and 7.68MJ/kg thermal energy. // Recovery of metal scrap to recycling: 0g iron scrap, 0g aluminium scrap, 0g copper scrap.

## Included activities start
waste incineration from waste reception gate and delivery into waste bunker at incinerator plant site (without transports to the incinerator)

## Included activities end
Waste-specific short-term emissions to water from leachate. Long-term emissions from landfill to ground water.

## Geography
Specific to the technology mix encountered in Switzerland in 2010. Well applicable to modern incineration practices in Europe, North America or Japan.

## Technology
average Swiss MSWI plants in 2010 (grate incinerators) with electrostatic precipitator for fly ash (ESP), wet flue gas scrubber and 25% SNCR , 42.77% SCR-high dust , 32.68% SCR-low dust -DeNOx facilities and 0% without Denox (weighted according to mass of burnt waste, representing Swiss average). Efficiency of iron scrap separation from slag : 58%. Efficiency of non-ferrous scrap separation from slag : 31%. Gross electric efficiency technology mix 15.84% and Gross thermal efficiency technology mix 28.51%

## Time period
Waste composition as given in literature reference, theoretical data or other source. Transfer coefficients for modern MSWI.

## Reference product
- waste polyurethane: -1 kg; By-product classification Waste; CPC 39270: Waste, parings and scrap of plastics; CAS 9009-54-5
  Main reference product of this activity (supply of disposal service).
  production volume 3.0288e9 kg
    assumed to be identical to PET, based on resin demand figures for PUR and PET (APME 2011)
  property price 0 EUR2005
    Waste products are assigned a price of zero as they are assumed to require further treatment.
  property heating value, net 30.67 MJ
    Value taken from the general comment of the treatment dataset.
  property carbon content 0.641283
    carbon content on a dry matter basis (reserved; not for manual entry)
  properties: carbon content, non-fossil 0, water content 0.00200401, dry mass 0.998 kg, carbon content, fossil 0.641283, water in wet mass 0.002 kg, wet mass 1 kg, carbon allocation 0.64 kg

## By-products
- heat, for reuse in municipal waste incineration only: 0 MJ; name E_th_prod_MSWI; By-product classification allocatable product; CPC 17300: Steam and hot water; pedigree (1,1,1,1,1)
  Net electricity generated from this waste and used in internal MSWI plant energy redistribution.
  Uncertainty: uncertainty is calculated from uncertainties in waste composition and uncertainties in energy efficiency and the uncertainty in internal energy demand
  production volume 2.3276e10 MJ
    calculated in proportion to reference product waste input to incinerator
  property exergy 0.1842 MJ; name E_th_prod_MSWI_exergy
    This exergy property is based on the exergy content of the product.
  property true value relation 0.1842; name E_th_prod_MSWI_true_value_relation
    property to calculate "true value" from
  property price 0.0106 EUR2005; name E_th_prod_MSWI_price_EUR2005
    Average European district heat price from Ecoheatcool and Euroheat 2005-2006, Ecoheat Work package 1: The European heat market. Final report. 10.6 EUR/GJ i s the price of district heat. http://www.solarthermalworld.org/files/Ecoheatcool%20WP1%20Web.pdf?download
- electricity, for reuse in municipal waste incineration only: 0 kWh; name E_el_prod_MSWI; CPC 17100: Electrical energy; By-product classification allocatable product; pedigree (1,1,1,1,1)
  (same comment as for heat, for reuse in municipal waste incineration only)
  production volume 3.3098e9 kWh
    calculated in proportion to reference product waste input to incinerator
  property exergy 3.6 MJ; name E_el_prod_MSWI_exergy
    This exergy property is based on the exergy content of the product.
  property true value relation 3.6; name E_el_prod_MSWI_true_value_relation
    property to calculate "true value" from
  property price 0.1 EUR2005; name E_el_prod_MSWI_price_EUR2005
    Estimated to be the same price as in case of electricity, medium voltage.

## Inputs from technosphere
- residual material landfill: 3.6936e-11 unit; lognormal variance with pedigree 0.076156, pedigree (1,1,4,1,1)
  Landfill infrastructure required for landfilling of incineration residues.
  Uncertainty: uncertainty is calculated from uncertainties in waste composition and transfer coefficients in incinerator
- ammonia, anhydrous, liquid: 0 kg; pedigree (1,1,1,1,1)
  Input to DeNOx stage (100% NH3).
  Uncertainty: uncertainty calculated from uncertainty in average DeNOx input, uncertainty in the share of thermal NOx, uncertainty of nitrogen content in average municipal waste and the uncertainty in nitrogen content in *this* waste.
  properties: wet mass 1 kg, dry mass 1 kg
- quicklime, milled, packed: 0.013097 kg; lognormal variance with pedigree 0.26849, pedigree (1,1,4,1,1)
  Auxilliary inputs for the flue gas treatment stage of the incinerator plant.
  Uncertainty: uncertainty calculated from uncertainty in average CaO input, of transfer coefficients in the incinerator, and the uncertainty of the waste composition of this waste
  properties: wet mass 1 kg, dry mass 0.99 kg, water content 0.010101
- sodium hydroxide, without water, in 50% solution state: 0.0025736 kg; lognormal variance with pedigree 0.25487, pedigree (1,1,4,1,1)
  Auxilliary inputs for the flue gas treatment stage of the incinerator plant.
  Uncertainty: uncertainty calculated from uncertainty in average NaOH input, of transfer coefficients in the incinerator, and the uncertainty of the waste composition of this waste
  properties: wet mass 1 kg, dry mass 1 kg, heating value, net 3.03 MJ
- iron (III) chloride, without water, in 40% solution state: 9.823e-5 kg; lognormal variance with pedigree 0.24801, pedigree (1,1,4,1,1)
  Auxilliary inputs for the wastewater treatment stage of the incinerator plant.
  Uncertainty: uncertainty calculated from uncertainty in average FeCl3 input, of transfer coefficients in the incinerator, and the uncertainty of the waste composition of this waste
  properties: wet mass 1 kg, dry mass 1 kg
- slag landfill: 4.094e-11 unit; lognormal variance with pedigree 0.048299, pedigree (1,1,4,1,1)
  Landfill infrastructure required for landfilling of bottom ash.
  Uncertainty: uncertainty is calculated from uncertainties in waste composition and transfer coefficients in incinerator
- heat, district or industrial, natural gas: 0 MJ; pedigree (1,1,1,1,1)
  Input to DeNOx stage, to heat up flue gas in low-dust SCR.
  Uncertainty: uncertainty calculated from uncertainty in average DeNOx input, uncertainty in the share of thermal NOx, uncertainty of nitrogen content in average municipal waste and the uncertainty in nitrogen content in *this* waste.
  properties: heating value, net 1 MJ
- hydrochloric acid, without water, in 30% solution state: 0.00019883 kg; lognormal variance with pedigree 0.2474, pedigree (1,1,4,1,1)
  Auxilliary inputs for the wastewater treatment stage of the incinerator plant.
  Uncertainty: uncertainty calculated from uncertainty in average HCl input, of transfer coefficients in the incinerator, and the uncertainty of the waste composition of this waste
  properties: heating value, net 3.32 MJ, dry mass 1 kg, wet mass 1 kg
- transport, freight, lorry, unspecified: 0 metric ton*km; pedigree (1,1,1,1,1)
  Transport services to transport incineration residues to landfills.
  Uncertainty: uncertainty calculated from uncertainty of the waste composition of this waste, uncertainty of transfer coefficients and the uncertainty in generic transportation distances
- titanium dioxide: 0.0004639 kg; lognormal variance with pedigree 1.2006, pedigree (1,1,4,1,1)
  Input to DeNOx stage (TiO2 catalyst carrier)
  Uncertainty: uncertainty calculated from uncertainty in average DeNOx input, uncertainty in the share of thermal NOx, uncertainty of nitrogen content in average municipal waste and the uncertainty in nitrogen content in *this* waste.
  properties: wet mass 1 kg, dry mass 1 kg
- chemical, inorganic: 0.00075645 kg; lognormal variance with pedigree 0.2474, pedigree (1,1,4,1,1)
  Auxilliary inputs for the wastewater treatment stage of the incinerator plant. Proxy for Polyelectrolyte.
  Uncertainty: uncertainty calculated from uncertainty in average Polyelectrolyte input, of transfer coefficients in the incinerator, and the uncertainty of the waste composition of this waste
  properties: dry mass 1 kg, carbon content, fossil 0.003, wet mass 1 kg
- process-specific burdens, slag landfill: 0 kg; pedigree (1,1,1,1,1)
  Mass-specific expenditures required for landfilling of bottom ash.
  Uncertainty: uncertainty is calculated from uncertainties in waste composition and transfer coefficients in incinerator
- municipal waste incineration facility: 2.5e-10 unit
  Demands per kilogram waste.
- chemical, organic: 3.5906e-5 kg; lognormal variance with pedigree 0.85617, pedigree (1,1,4,1,1)
  Auxilliary inputs for the wastewater treatment stage of the incinerator plant. Proxy for (pure) Trisodium-trimercapto-s-triazine (CAS 17766-26-6), used as 15% diluted solution, aka TMT15.
  Uncertainty: uncertainty calculated from uncertainty in average TMT15 input, of transfer coefficients in the incinerator, and the uncertainty of the waste composition of this waste
  properties: dry mass 1 kg, carbon content, fossil 0.628, wet mass 1 kg, heating value, net 19.03 MJ
- water, decarbonised: 0 kg; pedigree (1,1,1,1,1)
  Incinerator process water used in flue gas scrubber stage.
  Uncertainty: uncertainty calculated from uncertainty in average water input, and the uncertainty of the waste composition of this waste
  properties: wet mass 1 kg
- chromium oxide, flakes: 9.4673e-6 kg; lognormal variance with pedigree 1.2006, pedigree (1,1,4,1,1)
  Input to DeNOx stage.
  Uncertainty: uncertainty calculated from uncertainty in average DeNOx input, uncertainty in the share of thermal NOx, uncertainty of nitrogen content in average municipal waste and the uncertainty in nitrogen content in *this* waste.
  properties: wet mass 1 kg, dry mass 1 kg
- cement, unspecified: 0 kg; pedigree (1,1,1,1,1)
  Cement required for solidification of landfilled residual material.
  Uncertainty: Uncertainty calculated from uncertainty of the waste composition of this waste, of transfer coefficients in the incinerator and of the solidification recipe.
  properties: dry mass 1 kg, wet mass 1 kg
- process-specific burdens, residual material landfill: 0 kg; pedigree (1,1,1,1,1)
  Mass-specific expenditures required for landfilling of incineration residues.
  Uncertainty: uncertainty is calculated from uncertainties in waste composition and transfer coefficients in incinerator
- waste cement, hydrated: 0 kg; pedigree (1,1,1,1,1)
  Hydrated cement output for solidification of landfilled residual material.
  Uncertainty: Uncertainty calculated from uncertainty of the waste composition of this waste and transfer coefficients in the incinerator and of the solidification recipe.
  production volume 0 kg
    calculated in proportion to reference product waste input to incinerator
  properties: wet mass 1 kg, dry mass 1 kg
- ammonia, anhydrous, liquid: 0.00155204, 0.000133416, 0.000207561, 0.000411253, 0.000402919, 4.22302e-5, 0.000188785, 0.0044661 kg (8 entries); lognormal variance with pedigree 0.79479, pedigree (1,1,4,1,1)
  (same comment as for ammonia, anhydrous, liquid)
- heat, district or industrial, natural gas: 0.0154108, 0.369273, 0.999916 MJ (3 entries); lognormal variance with pedigree 0.79479, pedigree (1,1,4,1,1)
  (same comment as for heat, district or industrial, natural gas)
- transport, freight, lorry, unspecified: 0.000186573, 2.92104e-5, 0.00141452 metric ton*km (3 entries); lognormal variance with pedigree 0.03418, pedigree (1,1,4,1,1)
  (same comment as for transport, freight, lorry, unspecified)
- process-specific burdens, slag landfill: 0.00651432, 0.0165147 kg (2 entries); lognormal variance with pedigree 0.048299, pedigree (1,1,4,1,1)
  (same comment as for process-specific burdens, slag landfill)
- water, decarbonised: 0.0808614, 0.210401, 0.848596, 0.207223, 0.0417751, 0.137365, 0.00758333, 0.108061, 0.251718, 1.57896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 kg (12 entries); lognormal variance with pedigree 0.24801, pedigree (1,1,4,1,1)
  (same comment as for water, decarbonised)
- cement, unspecified: 0.00102403, 0.000213069, 1.56059e-5, 4.44818e-5, 0.00100597, 2.96087e-5, 0.000325191, 3.93444e-5, 0.0043945 kg (9 entries); lognormal variance with pedigree 0.08524, pedigree (1,1,4,1,1)
  (same comment as for cement, unspecified)
- process-specific burdens, residual material landfill: 0.00501508, 0.0127139 kg (2 entries); lognormal variance with pedigree 0.076156, pedigree (1,1,4,1,1)
  (same comment as for process-specific burdens, residual material landfill)
- waste cement, hydrated: -0.00501508, -0.0127139 kg (2 entries); lognormal variance with pedigree 0.08524, pedigree (1,1,4,1,1)
  (same comment as for waste cement, hydrated)
  production volume 5.3699e7 kg

## Inputs from nature
- Oxygen [natural resource, in air]: 2.5269 kg; lognormal variance with pedigree 0.022476, pedigree (1,1,4,1,1)
  Oxygen from ambient air needed to combust and oxidise this waste. Net demand, i.e. without O2 leaving the plant in flue gas uncombusted.
  Uncertainty: uncertainty is calculated from uncertainties in waste composition and transfer coefficients to flue gas and soild residues in incinerator

## Emissions to nature
- Zinc, ion [water, ground-, long-term]: 0.00017228 kg; lognormal variance with pedigree 2.8668, pedigree (1,1,4,1,1)
  Long-term emissions from landfilling of incineration residues.
  Uncertainty: uncertainty is calculated from uncertainties in waste composition and transfer coefficients in incinerator and landfills.
- Bromine [air, urban air close to ground]: 3.5431e-8 kg; lognormal variance with pedigree 1.0387, pedigree (1,1,4,1,1)
  Emission to air from waste composition and transfer coefficients.
  Uncertainty: uncertainty is calculated from uncertainties in waste composition and transfer coefficients in incinerator
- Arsenic, ion [water, ground-, long-term]: 5.7655e-7 kg; lognormal variance with pedigree 1.493, pedigree (1,1,4,1,1)
  (same comment as for Zinc, ion)
- Nitrate [water, ground-, long-term]: 0.0021912 kg; lognormal variance with pedigree 0.18524, pedigree (1,1,4,1,1)
  (same comment as for Zinc, ion)
- Selenium [water, surface water]: 7.1888e-7 kg; lognormal variance with pedigree 1.1767, pedigree (1,1,4,1,1)
  Emissions to water from waste composition and transfer coefficients in incinerator and landfills.
  Uncertainty: uncertainty is calculated from uncertainties in waste composition and transfer coefficients in incinerator and landfills
- Mercury [air, urban air close to ground]: 2.4397e-8 kg; lognormal variance with pedigree 1.606, pedigree (1,1,4,1,1)
  (same comment as for Bromine)
- Strontium [water, ground-, long-term]: 8.9564e-5 kg; lognormal variance with pedigree 0.98406, pedigree (1,1,4,1,1)
  (same comment as for Zinc, ion)
- Copper, ion [water, surface water]: 4.171e-8 kg; lognormal variance with pedigree 0.76566, pedigree (1,1,4,1,1)
  (same comment as for Selenium)
- Tin [air, urban air close to ground]: 1.7346e-11 kg; lognormal variance with pedigree 1.2223, pedigree (1,1,4,1,1)
  (same comment as for Bromine)
- Mercury [water, surface water]: 9.3447e-10 kg; lognormal variance with pedigree 1.1276, pedigree (1,1,4,1,1)
  (same comment as for Selenium)
- BOD5, Biological Oxygen Demand [water, ground-, long-term]: 0.0015738 kg; lognormal variance with pedigree 0.023619, pedigree (1,1,4,1,1)
  (same comment as for Zinc, ion)
- Thallium [air, urban air close to ground]: 4.0534e-10 kg; lognormal variance with pedigree 1.7127, pedigree (1,1,4,1,1)
  (same comment as for Bromine)
- Benzene, hexachloro- [air, urban air close to ground]: 3.607e-11 kg; lognormal variance with pedigree 0.090068, pedigree (1,1,4,1,1)
  Incomplete combustion product emitted to air.
  Uncertainty: uncertainty calculated from uncertainty in average operation emissions, and the uncertainty of the flue gas volume from this waste.
- Iron, ion [water, ground-, long-term]: 0.0019046 kg; lognormal variance with pedigree 0.67375, pedigree (1,1,4,1,1)
  (same comment as for Zinc, ion)
- Ammonia [air, urban air close to ground]: 8.7056e-6 kg; lognormal variance with pedigree 0.85859, pedigree (1,1,4,1,1)
  Nitrogen species emitted to air after DeNOx stage.
  Uncertainty: uncertainty calculated from uncertainty in average N-emissions and uncertainty in the share of thermal NOx and the uncertainty in nitrogen content in *this* waste.
- Chromium [air, urban air close to ground]: 3.616e-8 kg; lognormal variance with pedigree 1.1049, pedigree (1,1,4,1,1)
  (same comment as for Bromine)
- Thallium [water, ground-, long-term]: 2.3652e-7 kg; lognormal variance with pedigree 1.2704, pedigree (1,1,4,1,1)
  (same comment as for Zinc, ion)
- Sulfur dioxide [air, urban air close to ground]: 2.1596e-6 kg; lognormal variance with pedigree 0.8877, pedigree (1,1,4,1,1)
  (same comment as for Bromine)
- Particulates, > 2.5 um, and < 10um [air, urban air close to ground]: 1.0349e-8 kg; lognormal variance with pedigree 0.19317, pedigree (1,1,4,1,1)
  (same comment as for Benzene, hexachloro-)
- Arsenic [air, urban air close to ground]: 1.5082e-8 kg; lognormal variance with pedigree 1.5056, pedigree (1,1,4,1,1)
  (same comment as for Bromine)
- DOC, Dissolved Organic Carbon [water, surface water]: 0.0003273 kg; lognormal variance with pedigree 0.036818, pedigree (1,1,4,1,1)
  (same comment as for Selenium)
- Manganese [air, urban air close to ground]: 1.5466e-8 kg; lognormal variance with pedigree 1.0313, pedigree (1,1,4,1,1)
  (same comment as for Bromine)
- COD, Chemical Oxygen Demand [water, surface water]: 0.00074948 kg; lognormal variance with pedigree 0.036735, pedigree (1,1,4,1,1)
  (same comment as for Selenium)
- Lead [air, urban air close to ground]: 3.8991e-8 kg; lognormal variance with pedigree 0.79635, pedigree (1,1,4,1,1)
  (same comment as for Bromine)
- Cobalt [water, surface water]: 5.7997e-9 kg; lognormal variance with pedigree 1.4379, pedigree (1,1,4,1,1)
  (same comment as for Selenium)
- Nickel [air, urban air close to ground]: 2.6222e-8 kg; lognormal variance with pedigree 1.2003, pedigree (1,1,4,1,1)
  (same comment as for Bromine)
- Chromium VI [water, ground-, long-term]: 3.7987e-6 kg; lognormal variance with pedigree 1.5566, pedigree (1,1,4,1,1)
  (same comment as for Zinc, ion)
- Hydrogen chloride [air, urban air close to ground]: 1.3906e-5 kg; lognormal variance with pedigree 0.29561, pedigree (1,1,4,1,1)
  (same comment as for Bromine)
- Cadmium, ion [water, ground-, long-term]: 6.0055e-6 kg; lognormal variance with pedigree 6.452, pedigree (1,1,4,1,1)
  (same comment as for Zinc, ion)
- TOC, Total Organic Carbon [water, surface water]: 0.0003273 kg; lognormal variance with pedigree 0.036818, pedigree (1,1,4,1,1)
  (same comment as for Selenium)
- Titanium, ion [water, ground-, long-term]: 0.00030293 kg; lognormal variance with pedigree 0.79367, pedigree (1,1,4,1,1)
  (same comment as for Zinc, ion)
- Tin, ion [water, ground-, long-term]: 1.0163e-5 kg; lognormal variance with pedigree 2.0057, pedigree (1,1,4,1,1)
  (same comment as for Zinc, ion)
- Strontium [water, surface water]: 5.6466e-8 kg; lognormal variance with pedigree 1.6962, pedigree (1,1,4,1,1)
  (same comment as for Selenium)
- Antimony [water, ground-, long-term]: 2.7688e-5 kg; lognormal variance with pedigree 1.047, pedigree (1,1,4,1,1)
  (same comment as for Zinc, ion)
- Nickel, ion [water, surface water]: 1.4025e-8 kg; lognormal variance with pedigree 1.7278, pedigree (1,1,4,1,1)
  (same comment as for Selenium)
- Barium [air, urban air close to ground]: 7.4179e-7 kg; lognormal variance with pedigree 0.89896, pedigree (1,1,4,1,1)
  (same comment as for Bromine)
- Sulfate [water, surface water]: 0.00010302 kg; lognormal variance with pedigree 0.43263, pedigree (1,1,4,1,1)
  (same comment as for Selenium)
- Bromine [water, ground-, long-term]: 6.8369e-6 kg; lognormal variance with pedigree 1.018, pedigree (1,1,4,1,1)
  (same comment as for Zinc, ion)
- Benzo(a)pyrene [air, urban air close to ground]: 3.8388e-13 kg; lognormal variance with pedigree 0.40875, pedigree (1,1,4,1,1)
  (same comment as for Benzene, hexachloro-)
- Antimony [air, urban air close to ground]: 3.4878e-11 kg; lognormal variance with pedigree 1.1563, pedigree (1,1,4,1,1)
  (same comment as for Bromine)
- Copper, ion [water, ground-, long-term]: 0.00028752 kg; lognormal variance with pedigree 0.79946, pedigree (1,1,4,1,1)
  (same comment as for Zinc, ion)
- Sodium [air, urban air close to ground]: 1.2192e-5 kg; lognormal variance with pedigree 0.6225, pedigree (1,1,4,1,1)
  (same comment as for Bromine)
- Nickel, ion [water, ground-, long-term]: 2.0036e-5 kg; lognormal variance with pedigree 1.1492, pedigree (1,1,4,1,1)
  (same comment as for Zinc, ion)
- Fluoride [water, surface water]: 1.139e-6 kg; lognormal variance with pedigree 0.79066, pedigree (1,1,4,1,1)
  (same comment as for Selenium)
- Benzene, pentachloro- [air, urban air close to ground]: 9.1139e-11 kg; lognormal variance with pedigree 0.090068, pedigree (1,1,4,1,1)
  (same comment as for Benzene, hexachloro-)
- Vanadium, ion [water, ground-, long-term]: 0.00013611 kg; lognormal variance with pedigree 0.61832, pedigree (1,1,4,1,1)
  (same comment as for Zinc, ion)
- Copper [air, urban air close to ground]: 2.9482e-8 kg; lognormal variance with pedigree 0.84759, pedigree (1,1,4,1,1)
  (same comment as for Bromine)
- Methane, fossil [air, urban air close to ground]: 2.5876e-7 kg; lognormal variance with pedigree 0.090068, pedigree (1,1,4,1,1)
  (same comment as for Benzene, hexachloro-)
- Titanium, ion [water, surface water]: 3.7782e-7 kg; lognormal variance with pedigree 0.51646, pedigree (1,1,4,1,1)
  (same comment as for Selenium)
- Beryllium [water, surface water]: 3.1734e-10 kg; lognormal variance with pedigree 2.1792, pedigree (1,1,4,1,1)
  (same comment as for Selenium)
- Sodium, ion [water, ground-, long-term]: 0.0010694 kg; lognormal variance with pedigree 0.30789, pedigree (1,1,4,1,1)
  (same comment as for Zinc, ion)
- Particulates, < 2.5 um [air, urban air close to ground]: 2.0596e-6 kg; lognormal variance with pedigree 0.40875, pedigree (1,1,4,1,1)
  (same comment as for Benzene, hexachloro-)
- Beryllium [water, ground-, long-term]: 4.6306e-7 kg; lognormal variance with pedigree 1.5848, pedigree (1,1,4,1,1)
  (same comment as for Zinc, ion)
- Vanadium, ion [water, surface water]: 4.662e-7 kg; lognormal variance with pedigree 0.95401, pedigree (1,1,4,1,1)
  (same comment as for Selenium)
- Lead [water, ground-, long-term]: 0.00022882 kg; lognormal variance with pedigree 3.9136, pedigree (1,1,4,1,1)
  (same comment as for Zinc, ion)
- Lead [water, surface water]: 4.5272e-8 kg; lognormal variance with pedigree 0.64574, pedigree (1,1,4,1,1)
  (same comment as for Selenium)
- Bromine [water, surface water]: 6.4061e-5 kg; lognormal variance with pedigree 0.48894, pedigree (1,1,4,1,1)
  (same comment as for Selenium)
- Manganese [water, ground-, long-term]: 4.996e-5 kg; lognormal variance with pedigree 1.9859, pedigree (1,1,4,1,1)
  (same comment as for Zinc, ion)
- Cadmium [air, urban air close to ground]: 4.1949e-8 kg; lognormal variance with pedigree 1.0166, pedigree (1,1,4,1,1)
  (same comment as for Bromine)
- Zinc [air, urban air close to ground]: 3.7973e-7 kg; lognormal variance with pedigree 0.75986, pedigree (1,1,4,1,1)
  (same comment as for Bromine)
- Zinc, ion [water, surface water]: 5.1114e-8 kg; lognormal variance with pedigree 0.63193, pedigree (1,1,4,1,1)
  (same comment as for Selenium)
- Nitrate [water, surface water]: 0.0007766 kg; lognormal variance with pedigree 0.14313, pedigree (1,1,4,1,1)
  (same comment as for Selenium)
- Selenium [water, ground-, long-term]: 1.3821e-6 kg; lognormal variance with pedigree 1.0835, pedigree (1,1,4,1,1)
  (same comment as for Zinc, ion)
- Benzene [air, urban air close to ground]: 1.725e-8 kg; lognormal variance with pedigree 0.090068, pedigree (1,1,4,1,1)
  (same comment as for Benzene, hexachloro-)
- Tin, ion [water, surface water]: 7.0253e-10 kg; lognormal variance with pedigree 1.789, pedigree (1,1,4,1,1)
  (same comment as for Selenium)
- Aluminium [air, urban air close to ground]: 1.6524e-10 kg; lognormal variance with pedigree 0.95041, pedigree (1,1,4,1,1)
  (same comment as for Bromine)
- Aluminium [water, surface water]: 2.1933e-8 kg; lognormal variance with pedigree 1.1142, pedigree (1,1,4,1,1)
  (same comment as for Selenium)
- Dinitrogen monoxide [air, urban air close to ground]: 0.00090863 kg; lognormal variance with pedigree 0.94987, pedigree (1,1,4,1,1)
  (same comment as for Ammonia)
- Antimony [water, surface water]: 1.5007e-5 kg; lognormal variance with pedigree 1.0818, pedigree (1,1,4,1,1)
  (same comment as for Selenium)
- BOD5, Biological Oxygen Demand [water, surface water]: 0.00073985 kg; lognormal variance with pedigree 0.037441, pedigree (1,1,4,1,1)
  (same comment as for Selenium)
- TOC, Total Organic Carbon [water, ground-, long-term]: 0.0019039 kg; lognormal variance with pedigree 0.023619, pedigree (1,1,4,1,1)
  (same comment as for Zinc, ion)
- Manganese [water, surface water]: 1.2606e-8 kg; lognormal variance with pedigree 0.86288, pedigree (1,1,4,1,1)
  (same comment as for Selenium)
- NMVOC, non-methane volatile organic compounds, unspecified origin [air, urban air close to ground]: 7.8506e-7 kg; lognormal variance with pedigree 0.090068, pedigree (1,1,4,1,1)
  (same comment as for Benzene, hexachloro-)
- Dioxins, measured as 2,3,7,8-tetrachlorodibenzo-p-dioxin [air, urban air close to ground]: 3.4498e-14 kg; lognormal variance with pedigree 0.40875, pedigree (1,1,4,1,1)
  (same comment as for Benzene, hexachloro-)
- Strontium [air, urban air close to ground]: 8.968e-9 kg; lognormal variance with pedigree 1.0166, pedigree (1,1,4,1,1)
  (same comment as for Bromine)
- Sulfate [water, ground-, long-term]: 0.00050296 kg; lognormal variance with pedigree 0.52761, pedigree (1,1,4,1,1)
  (same comment as for Zinc, ion)
- Barium [water, surface water]: 2.5436e-8 kg; lognormal variance with pedigree 1.1862, pedigree (1,1,4,1,1)
  (same comment as for Selenium)
- Vanadium [air, urban air close to ground]: 6.1929e-6 kg; lognormal variance with pedigree 0.83293, pedigree (1,1,4,1,1)
  (same comment as for Bromine)
- Heat, waste [water, surface water]: 5.1954 MJ; lognormal variance with pedigree 0.032969, pedigree (1,1,4,1,1)
  Waste heat generated from heating value of this waste plus any electricity required to process it.
  Uncertainty: uncertainty is calculated from uncertainties in waste composition and uncertainties in energy efficiency and the uncertainty in internal energy demand
- Water [water, surface water]: 0.00047517 m3; lognormal variance with pedigree 1.0654, pedigree (1,1,4,1,1)
  Process water released to surface water.
  Uncertainty: uncertainty calculated from uncertainty in process water input and the uncertainty of fraction to surface water.
- Cadmium, ion [water, surface water]: 7.8881e-9 kg; lognormal variance with pedigree 0.85175, pedigree (1,1,4,1,1)
  (same comment as for Selenium)
- Thallium [water, surface water]: 2.4831e-10 kg; lognormal variance with pedigree 1.8683, pedigree (1,1,4,1,1)
  (same comment as for Selenium)
- Selenium [air, urban air close to ground]: 2.5387e-8 kg; lognormal variance with pedigree 1.4912, pedigree (1,1,4,1,1)
  (same comment as for Bromine)
- Iron, ion [water, surface water]: 9.9249e-8 kg; lognormal variance with pedigree 0.79243, pedigree (1,1,4,1,1)
  (same comment as for Selenium)
- Titanium [air, urban air close to ground]: 8.4072e-7 kg; lognormal variance with pedigree 0.68727, pedigree (1,1,4,1,1)
  (same comment as for Bromine)
- COD, Chemical Oxygen Demand [water, ground-, long-term]: 0.0048114 kg; lognormal variance with pedigree 0.023619, pedigree (1,1,4,1,1)
  (same comment as for Zinc, ion)
- Chloride [water, surface water]: 0.018708 kg; lognormal variance with pedigree 0.21663, pedigree (1,1,4,1,1)
  (same comment as for Selenium)
- Cyanide [air, urban air close to ground]: 0.00019521 kg; lognormal variance with pedigree 0.94987, pedigree (1,1,4,1,1)
  (same comment as for Ammonia)
- Chromium VI [water, surface water]: 1.1573e-6 kg; lognormal variance with pedigree 1.1668, pedigree (1,1,4,1,1)
  (same comment as for Selenium)
- Carbon dioxide, fossil [air, urban air close to ground]: 2.335 kg; lognormal variance with pedigree 0.0140033, pedigree (1,1,4,1,1)
  (same comment as for Bromine)
- Heat, waste [air, urban air close to ground]: 22.69 MJ; lognormal variance with pedigree 0.032969, pedigree (1,1,4,1,1)
  (same comment as for Heat, waste)
- Cobalt [water, ground-, long-term]: 2.6076e-5 kg; lognormal variance with pedigree 1.0472, pedigree (1,1,4,1,1)
  (same comment as for Zinc, ion)
- Cobalt [air, urban air close to ground]: 5.8218e-8 kg; lognormal variance with pedigree 1.1416, pedigree (1,1,4,1,1)
  (same comment as for Bromine)
- Barium [water, ground-, long-term]: 9.5178e-5 kg; lognormal variance with pedigree 2.2496, pedigree (1,1,4,1,1)
  (same comment as for Zinc, ion)
- Phenol, pentachloro- [air, urban air close to ground]: 7.5123e-12 kg; lognormal variance with pedigree 0.090068, pedigree (1,1,4,1,1)
  (same comment as for Benzene, hexachloro-)
- Water [air, urban air close to ground]: 0.0015869 m3; lognormal variance with pedigree 0.6518, pedigree (1,1,4,1,1)
  Water vapour from waste humidity, hydrogen oxidation and part of the process water.
  Uncertainty: Uncertainty calculated from uncertainty in waste composition, process water input and the uncertainty of fraction to air.
- Iron [air, urban air close to ground]: 6.766e-9 kg; lognormal variance with pedigree 0.55847, pedigree (1,1,4,1,1)
  (same comment as for Bromine)
- Arsenic, ion [water, surface water]: 1.3337e-6 kg; lognormal variance with pedigree 1.3787, pedigree (1,1,4,1,1)
  (same comment as for Selenium)
- Mercury [water, ground-, long-term]: 5.4803e-8 kg; lognormal variance with pedigree 3.1552, pedigree (1,1,4,1,1)
  (same comment as for Zinc, ion)
- Sodium, ion [water, surface water]: 0.00040349 kg; lognormal variance with pedigree 0.31634, pedigree (1,1,4,1,1)
  (same comment as for Selenium)
- Nitrogen oxides [air, urban air close to ground]: 0.0027568 kg; lognormal variance with pedigree 0.85859, pedigree (1,1,4,1,1)
  Sum of fuel-Nox and thermal-NOx emitted to air after DeNOx stage.
  Uncertainty: uncertainty calculated from uncertainty in average N-emissions and uncertainty in the share of thermal NOx and the uncertainty in nitrogen content in *this* waste.
- Chloride [water, ground-, long-term]: 0.0056469 kg; lognormal variance with pedigree 0.27299, pedigree (1,1,4,1,1)
  (same comment as for Zinc, ion)
- Aluminium [water, ground-, long-term]: 0.00014656 kg; lognormal variance with pedigree 0.7994, pedigree (1,1,4,1,1)
  (same comment as for Zinc, ion)
- Hydrogen fluoride [air, urban air close to ground]: 1.005e-7 kg; lognormal variance with pedigree 1.2343, pedigree (1,1,4,1,1)
  (same comment as for Bromine)
- Chromium, ion [water, surface water]: 3.2154e-9 kg; lognormal variance with pedigree 1.1232, pedigree (1,1,4,1,1)
  (same comment as for Selenium)
- Carbon monoxide, fossil [air, urban air close to ground]: 2.9324e-5 kg; lognormal variance with pedigree 0.79736, pedigree (1,1,4,1,1)
  (same comment as for Benzene, hexachloro-)
- DOC, Dissolved Organic Carbon [water, ground-, long-term]: 0.0019039 kg; lognormal variance with pedigree 0.023619, pedigree (1,1,4,1,1)
  (same comment as for Zinc, ion)
- Fluoride [water, ground-, long-term]: 1.3355e-5 kg; lognormal variance with pedigree 0.73389, pedigree (1,1,4,1,1)
  (same comment as for Zinc, ion)
- Toluene [air, urban air close to ground]: 3.4501e-8 kg; lognormal variance with pedigree 0.090068, pedigree (1,1,4,1,1)
  (same comment as for Benzene, hexachloro-)
