# lithium fluoride production

Dataset: EcoSpold 2, unit process
Geography: RoW
Time period: 2009-01-01 to 2021-12-31
Technology level: current
Classification: ISIC rev.4 ecoinvent: 2011:Manufacture of basic chemicals
Classification: EcoSpold01Categories: chemicals/inorganics
Synonyms: LiF
Tags: ConvertedDataset
Scenario: Business-as-Usual
System model: Allocation, cut-off by classification
Generated by: Dominic Notter
Published in: Hischier, R. 2009
Database: ecoinvent
isCopyrightProtected: true
accessRestrictedTo: 1

## General comment
The dataset can be used for example as base material to produce LiPF6. Data are based on patents.
[This dataset was already contained in the ecoinvent database version 2. It was not individually updated during the transfer to ecoinvent version 3. Life Cycle Impact Assessment results may still have changed, as they are affected by changes in the supply chain, i.e. in other datasets. This dataset was generated following the ecoinvent quality guidelines for version 2. It may have been subject to central changes described in the ecoinvent version 3 change report (http://www.ecoinvent.org/database/ecoinvent-version-3/reports-of-changes/), and the results of the central updates were reviewed extensively. The changes added e.g. consistent water flows and other information throughout the database. The documentation of this dataset can be found in the ecoinvent reports of version 2, which are still available via the ecoinvent website. The change report linked above covers all central changes that were made during the conversion process.]

## Included activities end
This dataset includes the reaction of lithium carbonate with hydrogen fluoride in an autoklave to lithium fluoride, carbon dioxide and water. The reaction temperatur is 21°C (no need to cool or heat). Energy consumption to evaporate water to dry the salt and CO2 emissions to air from the reaction are calculated. For infrastructure, the ecoinvent dataset "chemical plant, organics" is accounted. Transportation efforts are based on ecoinvent standard estimates.

## Geography
Some Swiss or European datasets are used for global processes.

## Technology
This dataset includes a method of producing lithium fluoride out of lithium carbonate and hydrogen fluoride under ambient conditions (no heating, no cooling, no pressure). Lithium carbonate conversion is 95.5%.

## Parameters
- fraction, water, deionised, to air: 0.205 dimensionless; name fraction_WDI_to_air; = fraction_PW_to_air; lognormal variance with pedigree 0.092025, pedigree (4,4,3,2,4)
  Calculated value. See comment in the other parametres present in this dataset. Deionised water is considered to be always used as process water, thus process water fractions to air are applied to all deionised water input flows to calculate the amount of water consumed in the processes.
- fraction, process water, to air: 0.205 dimensionless; name fraction_PW_to_air; lognormal variance with pedigree 0.092025, pedigree (4,4,3,2,4)
  Literature value (Statistics Canada, 2007 & Shaffer, K.H., 2008, Consumptive water use in the Great Lakes Basin, USGS) (Vionnet, S., Quantis Water Database - Technical Report, 2012).

## Reference product
- lithium fluoride: 1 kg; CPC 34240: Phosphates of triammonium; salts and peroxysalts of inorganic acids and metals n.e.c.; By-product classification allocatable product; CAS 7789-24-4
  EcoSpold01Location=CN
  production volume 3.80251 kg
    This is a placeholder value that does not reflect real-world production volumes. This dataset does not currently require a real-world production volume to work in the database framework, and no actual data were collected yet. This has no negative effect on the results of the ecoinvent database.
  property price 6.09 EUR2005
    Estimation. Average 2005 prices for EU27, USA, China, Japan and India from Import/Export data (US$ and tonnes) in UN Commodity Trade Statistics Database; Commodity: Fluorides of metals except ammonium, sodium, aluminium
  property carbon content 0
    carbon content on a dry matter basis (reserved; not for manual entry)
  properties: water content 0, water in wet mass 0 kg, carbon content, non-fossil 0, carbon content, fossil 0, dry mass 1 kg, wet mass 1 kg, carbon allocation 0 kg

## Inputs from technosphere
- wastewater, average: 0 m3; pedigree (1,1,1,1,1)
  composite
  EcoSpold01Location=CH
  production volume 0 m3
    Calculated from the production volume of lithium fluoride production in proportion to the respective output amounts.
  properties: carbon content, non-fossil 0.194039, water content 2882.2, wet mass 1000 kg, dry mass 0.346837 kg
  note on carbon content, non-fossil: 0.0673 kg TOC/m3 (Tab A.17, ecoinvent v2.2 report 13_I). TOC was considered as Total Carbon.
- ammonia, anhydrous, liquid: 0 kg; pedigree (1,1,1,1,1)
  EcoSpold01Location=RER
  properties: wet mass 1 kg, dry mass 1 kg
- tap water: 0 kg; name tap_water_input; pedigree (1,1,1,1,1)
  Estimated. The amount of added tap water is equal to the amount of wastewater and losses (water to air).
  properties: carbon content, fossil 0.00178991, water content 2962.17, wet mass 1 kg, dry mass 0.000337476 kg
  note on carbon content, fossil: Bicarbonate content is 2.93 mol/m3. CO2 content is 0.1 mol/m3 (ecoinvent v2.2 report 8, Tab 93.1).
- water, deionised: 0 kg; name water_deionised_input; pedigree (1,1,1,1,1)
  EcoSpold01Location=CH
  properties: wet mass 1 kg
- hydrogen fluoride: 0.80571 kg; lognormal variance with pedigree 0.0546, pedigree (2,4,5,5,1)
  EcoSpold01Location=GLO
  properties: heating value, net 6.06 MJ, dry mass 1 kg, wet mass 1 kg
- lithium carbonate: 1.4883 kg; lognormal variance with pedigree 0.0546, pedigree (2,4,5,5,1)
  EcoSpold01Location=GLO
  properties: dry mass 1 kg, wet mass 1 kg, carbon content, fossil 0.16255, heating value, net 4.93 MJ
- chemical factory, organics: 4e-10 unit; lognormal variance with pedigree 0.448, pedigree (5,5,5,5,3)
  EcoSpold01Location=RER
- heat, district or industrial, natural gas: 0 MJ; pedigree (1,1,1,1,1)
  EcoSpold01Location=RER
  properties: heating value, net 1 MJ
- wastewater, average: -0.000348613, -0.00322249 m3 (2 entries); lognormal variance with pedigree 0.04, pedigree (1,1,4,5,1)
  composite
  EcoSpold01Location=CH
  production volume 0.0107133 m3
- ammonia, anhydrous, liquid: 0.000649398, 0.00434035, 0.0010103, 0.00200176, 0.00196119, 0.000205554, 0.000918902, 0.0217385 kg (8 entries); lognormal variance with pedigree 0.072, pedigree (4,4,5,5,1)
  EcoSpold01Location=RER
- tap water: 0.0353959, 0.00426072, 0.00704153, 0.17756, 0.00461917, 0.0131391, 1.51727 kg (7 entries); lognormal variance with pedigree 0.090625, pedigree (4,4,5,2,4)
  (same comment as for tap water)
- water, deionised: 0.0079219, 2.20068 kg (2 entries); lognormal variance with pedigree 0.0546, pedigree (2,4,5,5,1)
  EcoSpold01Location=CH
- heat, district or industrial, natural gas: 0.048615, 1.16588 MJ (2 entries); lognormal variance with pedigree 0.072, pedigree (4,4,5,5,1)
  EcoSpold01Location=RER

## Emissions to nature
- Ammonium, ion [water, unspecified]: 0.034695 kg; lognormal variance with pedigree 0.0946, pedigree (2,4,5,5,1)
- Hydrogen fluoride [air, urban air close to ground]: 0.036257 kg; lognormal variance with pedigree 0.0546, pedigree (2,4,5,5,1)
- Water [air, unspecified]: 0.000452763 m3; name water_to_air_unspecified; lognormal variance with pedigree 0.0507, pedigree (2,2,4,5,1)
  Calculated value based on literature values and expert opinion. See comments in the parametres' comment field.
  property fraction, origin: salt water 0; name fraction_origin_salt_water
  property fraction, origin: unspecified 0; name fraction_origin_unspecified
  property fraction, origin: fresh water 1; name fraction_origin_fresh_water
- Carbon dioxide, fossil [air, unspecified]: 0.88628 kg; lognormal variance with pedigree 0.072, pedigree (4,4,5,5,1)

## Sampling procedure
patent, website, ecoinvent

## Extrapolations
see Geography This dataset has been copied from an original dataset covering the geography CN. The uncertainty has been adjusted accordingly.

## Review by Christian Bauer 2010-02-08
passed
