# cement production, pozzolana and fly ash 36-55%

Dataset: EcoSpold 2, unit process
Geography: PE
Time period: 2014-01-01 to 2021-12-31
Technology level: current
Classification: ISIC rev.4 ecoinvent: 2394:Manufacture of cement, lime and plaster
Synonyms: Portland cement with additions; type IP
Scenario: Business-as-Usual
System model: Allocation, cut-off by classification
Share of production covered: 67 %
Generated by: Simon Gmünder
Published in: Silva, F. B. 2017
Database: ecoinvent
isCopyrightProtected: true
accessRestrictedTo: 1

## General comment
The dataset describes the production of cement type IP according to NTP 334.009 / ASTM C150 for Portland cements.
The weight composition of the cement is: 60% clinker, 2.4% gypsum and 37.6% pozzolana.
The cement density is 3g/ml and the resitance is 35MPa according to the NTP 334.090 standard (product description of cement IP of UNACEM).

## Included activities start
This activity starts with the reception of raw materials.

## Included activities end
This activity ends with the cement produced in the cement mill. Packaging is not included and no production waste is assumed.

## Geography
Representative production of cement type IP in Peru. Data based from main cement producers and personal comunications with local experts.

## Technology
Represent the current technology for cement production in Peru.

## Time period
The production volume of 2016 is considered. Data from sustainability reports of 2014 to 2017 is used.

## Reference product
- cement, pozzolana and fly ash 36-55%: 1 kg; name cement; By-product classification allocatable product; CPC 37440: Portland cement, aluminous cement, slag cement and similar hydraulic cements, except in the form of clinkers
  Refernce product with a density between 3-3.15 g/ml.
  production volume 2.62444e9 kg; name cement_PV; = 10094000000*.26
    Calculated value.
    The total production of cement for Peru was 10’094’000 tons in 2016 (ASOCEM, 2016) provided by 8 integrated clinker and cement plants (GCR, 2016).
    The most produced cements in Peru are portland cement (42%), type IP (26%) and type ICo (11%).
  property price 0.0615 EUR2005; name cement_price_EUR2005
    2005 import and export prices (total trades (USD) divided by total weight (kg) in China, India, USA, Japan, Russia and Europe, major producers and consumers (http://www.cementchina.net/freport/showfre.asp?id=749) from UN Commodity Trade Statistics Database (http://data.un.org/Explorer.aspxDatabase [Accessed 2 July 2010]). Commodity: Cement (portland, aluminious, slag or hydraulic)
  property carbon content 0
    carbon content on a dry matter basis (reserved; not for manual entry)
  properties: carbon content, fossil 0, wet mass 1 kg, carbon content, non-fossil 0, water content 0, water in wet mass 0 kg, dry mass 1 kg, carbon allocation 0 kg

## Inputs from technosphere
- clinker: 0.6 kg; source Nicholas Myers 2017; lognormal variance with pedigree 0.0052, pedigree (3,3,3,1,1)
  Estimated value. The most sold cement of Yura is TIPO IP according to NTP 334.090 / ASTM C595. The blending is 40% of highly reactive pozzolanas (Ing. Guerra, 2017)
  Uncertainty: Variance of log-transformed data was taken from ecoinvent report no 1, table 10.3. Value represents demand of products, electricity etc. for input/output group c.
  properties: wet mass 1 kg, dry mass 1 kg
- clay: 0.376 kg; = (1-clinker-gypsum); lognormal variance with pedigree 0.0126, pedigree (3,5,3,1,1)
  Literature value. Approximation for Pozzolana.
  properties: wet mass 1 kg, water content 0.0362694, dry mass 0.965 kg
- ethylene glycol: 0.00031 kg; source Kellenberger D. 2007; lognormal variance with pedigree 0.0132, pedigree (3,3,4,5,1)
  Literature value. Ancillary product for grinding. As no data from Peruvian producer was founded, the value of Global datastet (cement production, alternative constituents 21-35%) has been used.
  Source: 2007, Kellenberger D., Althaus H.-J., Jungbluth N., Künniger T., Life Cycle Inventories of Building Products, Final report ecoinvent data v2.0, 7, Dübendorf, CH, Swiss Centre for LCI, Empa - TSL, 3 - SeparatePublication, CD-ROM (Accessed on october 15th 2017)
  Uncertainty: Variance of log-transformed data was taken from ecoinvent report no 1, table 10.3. Value represents demand of products, electricity etc. for input/output group c.
  properties: wet mass 1 kg, carbon content, fossil 0.387097, heating value, net 23.44 MJ, dry mass 1 kg
- gypsum, mineral: 0.024 kg; name gypsum; = clinker*0.04; source Manuel Lascarro 2017; lognormal variance with pedigree 0.0113, pedigree (3,3,4,3,1)
  Literature Value. 4% of gypsum per clinker mass (2.4% of total weight).
  Uncertainty: Variance of log-transformed data was taken from ecoinvent report no 1, table 10.3. Value represents demand of products, electricity etc. for input/output group c.
  properties: dry mass 1 kg, wet mass 1 kg
- cement factory: 5.36e-11 unit; = 5.36e-11* cement; lognormal variance with pedigree 0.0146, pedigree (3,5,3,5,1)
  Literature Value. From the global dataset " alternative constituents 21-35%" (retrieved 2018/01/04)
  Uncertainty: Variance of log-transformed data was taken from ecoinvent report no 1, table 10.3. Value represents demand of products, electricity etc. for input/output group c.
- steel, low-alloyed: 0.00011 kg; name steel; source Kellenberger D. 2007; lognormal variance with pedigree 0.0146, pedigree (3,5,3,5,1)
  Literature value. As no data from Peruvian producer was founded, the value of Global datastet (cement production, alternative constituents 21-35%) has been used.
  Source: 2007, Kellenberger D., Althaus H.-J., Jungbluth N., Künniger T., Life Cycle Inventories of Building Products, Final report ecoinvent data v2.0, 7, Dübendorf, CH, Swiss Centre for LCI, Empa - TSL, 3 - SeparatePublication, CD-ROM (Accessed on october 15th 2017)
  Uncertainty: Variance of log-transformed data was taken from ecoinvent report no 1, table 10.3. Value represents demand of products, electricity etc. for input/output group c.
  properties: dry mass 1 kg, wet mass 1 kg, carbon content, fossil 0.005
- electricity, medium voltage: 0.037 kWh; name electricity; lognormal variance with pedigree 0.0113, pedigree (3,3,4,3,1)
  Literature value. the electricity considered for cement production is 37kWh per ton of cement, which is aligned with the current ecoinvent datasets.
  Source: Boesch & Hellweg 2010, 2010, Boesch, M.E., Hellweg, S., Identifying Improvement Potentials in Cement Production with Life Cycle Assessment, Environmental Science & Technology, 44, 23, 9143-9149, 1 - Article, Supporting information is available via http://pubs.acs.org (accessed on october 15th 2017)
  Uncertainty: Variance of log-transformed data was taken from ecoinvent report no 1, table 10.3. Value represents demand of products, electricity etc. for input/output group c.

## Sampling procedure
The data is compiled based on different data sources, including sustainability reports, literature values and expert judgements. Most data is derived from sustainability reports of two principal cement producers of Peru (Pacasmayo and UNACEM). The data is checked, completed and validated by local experts. In total, it is estimated that the data considered is representative for 67% of cement production in all the country (market share of the three main cement producers).
Unit flows were calculated by dividing the amounts of inputs and outputs by the total clinker production in mass.
The amount of the exchanges were calculated considering the arithmetic [weighted] average of the sample. No conversion to the geometric mean of the lognormal distribution was done, for consistency reasons with other Ecoinvent datasets.

## Extrapolations
This dataset has been extrapolated from year 2017 to the year of the calculation (2021). The uncertainty has been adjusted accordingly.
