# treatment of waste reinforced concrete, collection for final disposal

Dataset: EcoSpold 2, unit process
Geography: Europe without Switzerland
Time period: 1994-01-01 to 2021-12-31
Technology level: current
Classification: ISIC rev.4 ecoinvent: 3821:Treatment and disposal of non-hazardous waste
Classification: EcoSpold01Categories: waste management/building demolition
Tags: Treatment
Scenario: Business-as-Usual
System model: Allocation, cut-off by classification
Generated by: [System]
Database: ecoinvent
isCopyrightProtected: true
accessRestrictedTo: 1

## General comment
The waste contains 0.97kg inert material (GSD=100.1%) and 0.03kg steel (GSD=107.9%). Waste density is 2300 kg/m3.

## Included activities end
energy for dismantling, particulate matter emissions from dismantling and handling, transport to dismantling facilities, final disposal of waste material,

## Technology
Building demolition with skid-steer loaders.

## Reference product
- waste reinforced concrete: -1 kg; name RP; By-product classification Waste; CPC 39: Wastes or scraps
  production volume 2.3825e10 kg; name RP_PV; = (2.50E+13*0.106*0.15/3*0.37)-(4.20E+10*0.6)
    Estimated value. Word production of concrete amounts to 25 billion tonnes of which 10.6% are produced in EU (WBCSD 2009). The waste generation is estimated to be 15% (taken from the estimated value for gypsum, source: WRAP "International practice in plasterboard recycling: Canada", n.d). 1/3 of total waste is assumed to be concrete not reinforced, 1/3 concrete reinforced, and 1/3 concrete.
    Eurostat reports treatment methods for municipal waste for EU 27 in 2010 to be: 23% incineration; 37% landfilling; 25% recycling; 14% compost / digestion. The shares sent to landfill and recycling are divided to include sorting. It is assumed that half the product is sent directly to recycling and half goes through sorting; knowing that 40% of the waste sent to sorting is landfilled, while 60% is recycled the corresponding shares are calculated.
    References:
    Eurostat. Municipal waste generation & treatment, by treatment method. Retrieved from: <http://ec.europa.eu/eurostat/web/waste/municipal-waste-generation-and-treatment-by-treatment-method>, accessed 7th July 2016
    WBCSD (2009) Recycling concrete. The Cement Sustainability Initiative. Retrieved from: http://www.wbcsdcement.org/index.php/en/publications, accessed 3 May 2016
    WRAP(n.d.) International practice in plasterboard recycling: Canada. Retrieved from: http://www.wrap.org.uk/sites/files/wrap/Case%20study%20-%20Plasterboard%20recycling%20in%20Canada.pdf, accessed 3 May 2016
  property price 0 EUR2005; name RP_price_EUR2005
    Waste products are assigned a price of zero as they are assumed to require further treatment.
  property carbon content 0
    carbon content on a dry matter basis (reserved; not for manual entry)
  properties: water in wet mass 0.00582 kg, wet mass 1 kg, carbon content, non-fossil 0, carbon content, fossil 0, dry mass 0.99418 kg, water content 0.00585407, carbon allocation 0 kg

## Inputs from technosphere
- diesel, burned in building machine: 0.0612 MJ; lognormal variance with pedigree 0.112, pedigree (1,1,5,5,1)
  energy for demolition. Uncertainty from range in (DAFSTB 1996)
  properties: heating value, net 1 MJ
- inert waste, for final disposal: -0.97 kg; name inert_waste; lognormal variance with pedigree 0.042, pedigree (1,1,5,5,1)
  disposed masses. Uncertainty calculated from uncertainty of waste composition
  production volume 2.31102e10 kg; = inert_waste* RP_PV/abs( RP)
    Calculated from the production volume of waste reinforced concrete in proportion to the respective output amounts.
  property price 0 EUR2005; name inert_waste_price_EUR2005
  properties: wet mass 1 kg, water content 0.00502513, dry mass 0.995 kg
- scrap steel: -0.03 kg; name scrap_steel; lognormal variance with pedigree 0.052, pedigree (1,1,5,5,1)
  disposed masses. Uncertainty calculated from uncertainty of waste composition
  production volume 7.1475e8 kg; = scrap_steel*RP_PV/ABS(RP)
    (same comment as for inert waste, for final disposal)
  property price 0 EUR2005; name scrap_steel_price_EUR2005
  properties: dry mass 1 kg, wet mass 1 kg

## Emissions to nature
- Particulates, > 2.5 um, and < 10um [air, urban air close to ground]: 6.34e-5 kg; lognormal variance with pedigree 0.1832, pedigree (2,3,5,5,1)
  Emission from dismantling and handling. from one extrapolated PM10 emission factor and generic PM fractions from measurements
- Particulates, < 2.5 um [air, urban air close to ground]: 1.66e-5 kg; lognormal variance with pedigree 0.3632, pedigree (2,3,5,5,1)
  (same comment as for Particulates, > 2.5 um, and < 10um)
- Particulates, > 10 um [air, urban air close to ground]: 8.35e-5 kg; lognormal variance with pedigree 0.0932, pedigree (2,3,5,5,1)
  (same comment as for Particulates, > 2.5 um, and < 10um)

## Sampling procedure
waste-specific calculation based on literature data

## Extrapolations
This dataset has been extrapolated from year 2002 to the year of the calculation (2021). The uncertainty has been adjusted accordingly.

## Review by Niels Jungbluth 2003-05-22
Passed. Calculation for standard deviation 95 of transport services differs from standard Pedigree approach in this project and figure obtained by this procedure (2.09). Uncertainty for estimation of distance is not included.
