# ferronickel production

Dataset: EcoSpold 2, unit process
Geography: GLO
Time period: 1994-01-01 to 2021-12-31
Technology level: current
Classification: EcoSpold01Categories: metals/extraction
Classification: ISIC rev.4 ecoinvent: 2410:Manufacture of basic iron and steel
Tags: ConvertedDataset
Scenario: Business-as-Usual
System model: Allocation, cut-off by classification
Share of production covered: 80 %
Generated by: Mischa Classen
Published in: Classen M. 2009
Database: ecoinvent
isCopyrightProtected: true
accessRestrictedTo: 1

## General comment
This datasaet represents the production of 1 kg of ferronickel, 25% Ni, at plant, in 1994. It is designed for the use of the metal as raw material in the manufacturing of stainless steels and alloys. It is not to be used if the impact of ferronickel is considered to be high. In such cases, a more detailed analysis has to be conducted. The data used is mainly based on a study of the energy and material streams resulting from the production of class I nickel. Lacking data mainly on direct process specific emissions were taken form similar processes for copper winning.
[This dataset was already contained in the ecoinvent database version 2. It was not individually updated during the transfer to ecoinvent version 3. Life Cycle Impact Assessment results may still have changed, as they are affected by changes in the supply chain, i.e. in other datasets. This dataset was generated following the ecoinvent quality guidelines for version 2. It may have been subject to central changes described in the ecoinvent version 3 change report (http://www.ecoinvent.org/database/ecoinvent-version-3/reports-of-changes/), and the results of the central updates were reviewed extensively. The changes added e.g. consistent water flows and other information throughout the database. The documentation of this dataset can be found in the ecoinvent reports of version 2, which are still available via the ecoinvent website. The change report linked above covers all central changes that were made during the conversion process.]

## Included activities start
Mining process starting from nickel ore, at ground.

## Included activities end
This activity ends with the refining of ferronickel, at plant.

This dataset includes the beneficiation of nickel ore, the metallurgy of nickel ore, the mining and metallurgy infrastructure, and the disposal of slag.

## Geography
This module represents a global production mix. Some processes like blasting, lime and energy production and transport originate from data sets valid for Switzerland or Europe.

## Technology
Mining is done in open cuts, followed by beneficiation with a simple mechanical separation. Overburden and tailings are disposed inside the mining panels.This module covers the major production route for ferronickel. For electricity mix a mix of 60% hydropower and 40% electricity at grid was chosen.
MINING:
Nickel oxide ores occur in two types: a limonitic type which occurs in the upper zone of a lateritic deposit, in which ferric oxide materials are predominant, and a silicate, occurring at greater depth in the deposit, which has lower iron content, but is usually richer in nickel than the limonite, and contains high levels of magnesia and silica. Most deposits contain both types of ore. Usually it is possible to separate the ore by selective mining and screening into an iron-containing limonite fraction and a magnesium silicate fraction enriched in nickel.
Emissions: The major emissions are due to mineral born pollutants in the effluents. Mining operations generate large amounts of dust. Rain percolate through overburden and accounts to metal emissions to groundwater.
Waste: Overburden is deposed close inside the mine panel.
BENEFICIATION:
Two processes – the Nippon Yakin Oheyama and the MINPRO–PAMCO process – have been developed in which the nickel is first converted by high-temperature treatment to a metallic phase, which can then be separated from the bulk of the ore by standard mineral beneficiation techniques.
Emissions: Beneficiation is done by classification, no emissions arise from this step.
Waste:Since no further beneficiation takes place in the ferronickel production, no beneficiation tailings arise.
METALLURGY AND REFINING:
Metallurgy: The metallurgy of nickel oxide ores differs from that of sulphides in that oxide ores are not amenable to most of the standard mineral beneficiation methods due to the chemical dissemination of the nickel in the oxide minerals. Nickel laterite ores have high moisture contents (typically up to 45 %) as well as chemically bound water in the hydroxide form. For this, the ore has to be dried, usually direct-fired rotary units operating at about 250 °C, to 15 – 20 % moisture. Calcining to dehydrate the ore and prereduction prior to electric furnace smelting are generally carried out. Chemically bound water is released above ca. 400 °C, reduction of the oxides to metal starts at 500 – 600 °C. Dehydration and pre-reduction of the ore in the kiln prior to smelting, optimises the utilisation of energy available from the reductants and fuel, thus reducing energy consumption in the smelting operation.
Class II nickel products such as nickel oxide, metallised nickel oxide, and ferronickel, are produced directly by smelting and roasting. They are sufficiently pure without refining for many nickel applications such as stainless steel production. The rotary kiln – electric furnace smelting process is now used almost universally for the production of ferronickel from oxide ores. Also ores with a low Ni/Fe ratio can be smelted to yield an acceptable ferronickel grade.
Refining: Crude ferronickel produced by the conventional rotary kiln – electric furnace process usually contains high levels of carbon and sulphur. These ferronickels are first treated under reducing conditions to remove sulphur and are then refined sequentially under oxidising conditions with suitable fluxes to remove carbon, silicon, and phosphorus. A variety of equipment is used for the refining of ferronickel, including electric arc furnaces, shaking ladles, and low-frequency induction furnaces for desulphurisation, and oxygen-blown converters for silicon, carbon, and phosphorus removal. Sulphur is generally removed under reducing conditions by adding soda ash, lime, or calcium carbide to the molten ferronickel. Good agitation of the melt is essential to ensure effective mixing of the reagent with the metal phase.
Emissions: In the ore pre-treatment, considerable amounts of lime are added. This decomposes into CO2 to form calcite. Dust carry over from the roasting, smelting and converting processes. Particulate emissions to the air consist of metals and thus are often returned to the leaching process after treatment. Dust consists to a considerable part of heavy metals. The most important pollutants from the production of ferro-alloys in general besides dust are SO2, NOx, CO, CO2, HF, PAH and VOC. Only few SO2 coming from metallurgical coke is formed. Metals and their compounds and substances in suspension are the main pollutants emitted to water. The metals concerned are Zn, Fe, Co, Pb and Hg. Other significant substances are chlorides and sulphates. Wastewaters from wet gas cleaning (if used) of the different metallurgical stages are the most important sources. The leaching stages are usually operated on closed circuit and drainage systems, and are therefore regarded as minor sources.
Waste: The production of metals is related to the generation of several residues and wastes, which are listed in the European Waste Catalogue. The most specific residues are filter dusts, sludge from wet scrubbers, slag from the smelting process, used furnace linings and packaging material like drums or big-gabs. These residues are partly sold as by-products, recycled to the process or in cases of wastes without economic utility transported to a deposit or a landfill.
Some of the process specific residues can be reused or recovered in preliminary process steps (e. g. dross, filter dust) or construction (e. g. cleaned slag). Residues also arise from the treatment of liquid effluents, the main residue being gypsum waste and metal hydroxides from the wastewater neutralisation plant. These residuals have to be disposed, usually in lined ponds.
References:
Kerfoot D. G. E. (1997) Nickel. In: Ullmann's encyclopedia of industrial chemis-try (ed. Anonymous). 5th edition on CD-ROM Edition. Wiley & Sons, London.

## Reference product
- ferronickel: 1 kg; source Hilbrans H. 1999; By-product classification allocatable product; CPC 41114: Ferro-nickel; CAS 11110-39-7
  EcoSpold01Location=GLO
  Ferronickel is a market product of the nickel industry. It consists of an alloy of iron with nickel, with a nickel content of 20 - 50 %. It is used in the manufacturing of stainless steels.
  Uses: Ferro-alloys are mainly used as master alloys in the iron and steel industry, because it is the most economic way to introduce an alloying element in the steel melt. Ferronickel in this case therefore is used as master alloy in the production of stainless steels. Further more it is used as starting materials in the preparation of chemicals and pure metal; as reducing agents (e.g., the use of ferrosilicon to reduce rich slag); as alloying elements in nonferrous alloys and as starting materials for special products such as amorphous metals.
  Literature value.
  production volume 1.8e9 kg
    329'478 t nickel in lateritic raw ore in 1993
    30% of global Ni mine production 1500 million kg (http://minerals.usgs.gov/minerals/pubs/commodity/nickel/myb1-2006-nicke.xls table 10)
  property carbon content, fossil 0.0165
    Ferronickel (CAS 11133-76-9) is a market product of the nickel industry. It consists of an alloy of iron with nickel, with a nickel content of 20 - 50 %, and a C content of 1.5 - 1.8% (Tab. 3.2 ecoinvent v2.2 report 20_part IV). An average C content of 1.65% was considered
  property heating value, net 0 MJ
    Non combustible products are assumed to have an LHV equal to zero (0).
  property price 4.22595 EUR2005
    Calculated value on a per kg nickel basis (i.e. relative to the price of nickel, class 1)
  property carbon content 0.0165
    carbon content on a dry matter basis (reserved; not for manual entry)
  properties: wet mass 1 kg, carbon content, non-fossil 0, water content 0, water in wet mass 0 kg, dry mass 1 kg, carbon allocation 0.0165 kg

## Inputs from technosphere
- mine infrastructure, open cast, non-ferrous metal: 2e-9 unit; lognormal variance with pedigree 0.3601, pedigree (3,2,5,1,3)
  EcoSpold01Location=GLO
  Estimation from dataset author.
- diesel, burned in building machine: 1.9082 MJ; source Hilbrans H. 1999; lognormal variance with pedigree 0.0407, pedigree (2,2,5,1,1)
  EcoSpold01Location=GLO
  Literature value: Consumption of diesel for the mobile equipment used for exploitation like drilling machines, scoop trams and underground trucks. Also, it includes the infrastructure of the machines.
  properties: heating value, net 1 MJ
- electricity, high voltage: 5.5694 kWh; source Hilbrans H. 1999; lognormal variance with pedigree 0.04, pedigree (1,1,5,1,1)
  Calculated value: This ammount results from the addition of the consumption values in the mining (1.39E-01 KWh), drying (3.9E-01 KWh), roasting (4.8E-01 KWh), melting (4.08 KWh), complementary (1.8E-01 KWh), and refining (3E-01 KWh) steps.
  Estimated value: 60% of the total electricity consumption comes from hydropower.
- conveyor belt: 8e-7 m; lognormal variance with pedigree 0.0601, pedigree (3,2,5,1,3)
  Estimation from dataset author: 10’000 m conveyor belts are assumed to have a capacity of 2000 t / h which yields 2E-5 m conveyor belt required per tonne mined raw ore.
  EcoSpold01Location=RER
- nickel smelter slag: -12.675 kg; source Hilbrans H. 1999; lognormal variance with pedigree 0.19, pedigree (1,1,5,1,1)
  Calculated value: This ammount results from the addition of the generation values in the melting step (1.24E+01 kg from slag generation and 3.00E-01 kg from dust in scrubber).
  Proxy: "nickel smelter slag, 0% water" is used as a proxy for slag.
  Proxy: "nickel smelter slag, 0% water" is used as a proxy for dust in scrubber.
  EcoSpold01Location=CH
  production volume 2.2815e10 kg
    Calculated from the production volume of ferronickel, 25% Ni in proportion to the respective output amounts.
  properties: dry mass 1 kg, carbon content, fossil 0.00345, wet mass 1 kg
- heat, district or industrial, natural gas: 28.2625 MJ; source Hilbrans H. 1999; lognormal variance with pedigree 0.04, pedigree (1,1,5,1,1)
  EcoSpold01Location=RER
  Calculated value: This ammount results from the addition of the consumption values in the drying (2.88E+01 MJ) and refining (1 MJ) steps.
  properties: heating value, net 1 MJ
- non-ferrous metal smelter: 6.4826e-11 unit; lognormal variance with pedigree 0.3601, pedigree (3,2,5,1,3)
  EcoSpold01Location=GLO
  Estimation from dataset author.
- heat, district or industrial, other than natural gas: 35.5633 MJ; source Hilbrans H. 1999; lognormal variance with pedigree 0.0408, pedigree (2,2,5,3,1)
  EcoSpold01Location=RER
  Calculated value: This ammount results from the addition of the consumption values in the roasting (4.00E+01 MJ) and melting (3.75 MJ) steps.
  properties: heating value, net 1 MJ
- blasting: 0.0012 kg; source Hilbrans H. 1999; lognormal variance with pedigree 0.0407, pedigree (2,2,5,1,1)
  Literature value.
  EcoSpold01Location=RER
- electricity, high voltage: 3.7129 kWh; source Hilbrans H. 1999; lognormal variance with pedigree 0.04, pedigree (1,1,5,1,1)
  Calculated value: This ammount results from the addition of the consumption values in the mining (9.29E-02 kWh), drying (2.6E-91 KWh), roasting (3.2E-01 KWh), melting (2.72 KWh), complementary (1.2E-01 KWh), and refining (2E-01 KWh) steps.
  Estimated value: 40% of the total electricity consumption comes from the grid.
  EcoSpold01Location=UCTE
- lime, packed: 0 kg; source IPPC 2001; pedigree (1,1,1,1,1)
  Estimation: The input of limestone is estimated roughly with values reported from the related manufacturing processes for ferro-chrome and calcium silicate. Choosing a geometric mean of the values a value of 470 kg limestone per tonne ferro-alloy is required. Consequentially 0.44 kg CO2 per tonne flux is emitted after the formula CaCO3 à CaO + CO2.
  EcoSpold01Location=CH
  properties: carbon content, fossil 0.117492, water content 0.00200401, wet mass 1 kg, dry mass 0.998 kg
  note on carbon content, fossil: Table 3.1, ecoinvent v2.2 report 7, part VII, pg 3. MW CaCO3=100, MW MgCO3=84
- lime, packed: 0.15514, 0.00394988, 0.31019 kg (3 entries); source IPPC 2001; lognormal variance with pedigree 0.1102, pedigree (5,2,5,3,1)
  (same comment as for lime, packed)

## Inputs from nature
- Transformation, to mineral extraction site [natural resource, land]: 5.4938e-5 m2; source IPPC 2002; lognormal variance with pedigree 0.1801, pedigree (3,2,5,1,3)
  Estimation: Transformation and occupation of land through direct exploitation are assumed with the standard value for non-ferrous metals without heap leaching processes of 0.0025 m2/t and 0.075 m2a/t ore mined, that is 0.055 m2/t and 1.65 m2a per tonne Nickel produced.
- Iron, in ground [natural resource, in ground]: 1.25217 kg; = 0.72/0.575
  46% Fe in siderite; 25% Fe in ore; Calculated value. The composition of the reference product is taken from version 2 report 10 “Life cycle inventory of metals” table 3.2 and assumed to be: 25% Ni, 1.5% CO, 1.5%C, and 72% Fe. Yield of ferronickel production is 0.575 (source: table 2.4 “Process-steps involved in the non-ferrous metal modules”). The input of “Nickel, 1.98% in silicates, 1.04% in crude ore, in ground” is therefore of 0.25/0.575 = 0.43kg, and the input of “Iron, 46% in ore, 25% in crude ore, in ground” required is therefore 0.72/0.575 = 1.25kg.
- Transformation, from unspecified [natural resource, land]: 5.4938e-5 m2; source IPPC 2002; lognormal variance with pedigree 0.3601, pedigree (3,2,5,1,3)
  (same comment as for Transformation, to mineral extraction site)
- Nickel, in ground [natural resource, in ground]: 0.434783 kg; = 0.25/0.575; source Hilbrans H. 1999; lognormal variance with pedigree 0.0407, pedigree (2,2,5,1,1)
  1.98% Ni in silicates; 1.04% Ni in ore; Calculated value. The composition of the reference product is taken from version 2 report 10 “Life cycle inventory of metals” table 3.2 and assumed to be: 25% Ni, 1.5% CO, 1.5%C, and 72% Fe. Yield of ferronickel production is 0.575 (source: table 2.4 “Process-steps involved in the non-ferrous metal modules”). The input of “Nickel, 1.98% in silicates, 1.04% in crude ore, in ground” is therefore of 0.25/0.575 = 0.43kg, and the input of “Iron, 46% in ore, 25% in crude ore, in ground” required is therefore 0.72/0.575 = 1.25kg.
- Occupation, mineral extraction site [natural resource, land]: 0.0016481 m2*year; source IPPC 2002; lognormal variance with pedigree 0.1001, pedigree (3,2,5,1,3)
  Estimation: Average lifetime of 30 years assumed.

## Emissions to nature
- Nickel, ion [water, surface water]: 3.4134e-7 kg; source Hilbrans H. 1999; lognormal variance with pedigree 1.37, pedigree (1,1,5,1,1)
  Modelled, based on “ISIC 2420” - pdf-document on the dedicated talk page of ecoinvent (www.ecoinvent.org/documentation).
  See part "Regarding “ferronickel production, 25% Ni, GLO 2003” dataset".
  Further references: IPPC (2001) Integrated Pollution Prevention and Control (IPPC); Reference Document on Best Available Techniques in the Non Ferrous Metals Industries. European Commission. Retrieved from http://www.jrc.es/pub/english.cgi/0/733169
- TOC, Total Organic Carbon [water, surface water]: 3.2565e-5 kg; source Hilbrans H. 1999; lognormal variance with pedigree 1.37, pedigree (1,1,5,1,1)
  Modelled, based on “ISIC 2420” - pdf-document on the dedicated talk page of ecoinvent (www.ecoinvent.org/documentation).
  See part "Regarding “ferronickel production, 25% Ni, GLO 2003” dataset".
- Nitrogen, organic bound [water, surface water]: 0.00018206 kg; source Hilbrans H. 1999; lognormal variance with pedigree 1.37, pedigree (1,1,5,1,1)
  (same comment as for TOC, Total Organic Carbon)
- Boron [air, non-urban air or from high stacks]: 1.0109e-7 kg; lognormal variance with pedigree 0.1001, pedigree (3,2,5,1,3)
  Estimation from dataset author.
- Manganese [water, surface water]: 1.9736e-7 kg; source Hilbrans H. 1999; lognormal variance with pedigree 1.37, pedigree (1,1,5,1,1)
  (same comment as for TOC, Total Organic Carbon)
- Chromium [air, non-urban air or from high stacks]: 1.0108e-6 kg; lognormal variance with pedigree 0.1001, pedigree (3,2,5,1,3)
  Estimation from dataset author.
- Fluorine [air, non-urban air or from high stacks]: 9.6031e-6 kg; lognormal variance with pedigree 0.1001, pedigree (3,2,5,1,3)
  Estimation from dataset author.
- DOC, Dissolved Organic Carbon [water, surface water]: 3.2565e-5 kg; source Hilbrans H. 1999; lognormal variance with pedigree 1.37, pedigree (1,1,5,1,1)
  (same comment as for TOC, Total Organic Carbon)
- Nickel [air, non-urban air or from high stacks]: 3.1793e-5 kg; source NPI 2001; lognormal variance with pedigree 0.66, pedigree (1,1,5,1,1)
  (same comment as for TOC, Total Organic Carbon)
- Mercury [air, non-urban air or from high stacks]: 5.0543e-10 kg; lognormal variance with pedigree 0.1001, pedigree (3,2,5,1,3)
  Estimation from dataset author.
- Cobalt [air, non-urban air or from high stacks]: 3.0202e-5 kg; source NPI 2001; lognormal variance with pedigree 0.69, pedigree (1,1,5,1,1)
  (same comment as for TOC, Total Organic Carbon)
- Dissolved solids [water, surface water]: 4.1357e-5 kg; source Hilbrans H. 1999; lognormal variance with pedigree 1.37, pedigree (1,1,5,1,1)
  (same comment as for TOC, Total Organic Carbon)
- Manganese [air, non-urban air or from high stacks]: 9.6031e-6 kg; lognormal variance with pedigree 0.1001, pedigree (3,2,5,1,3)
  Estimation from dataset author.
- Arsenic [air, non-urban air or from high stacks]: 1.4358e-5 kg; source NPI 2001; lognormal variance with pedigree 0.7, pedigree (1,1,5,1,1)
  (same comment as for TOC, Total Organic Carbon)
- Sulfate [water, surface water]: 0.018857 kg; source Hilbrans H. 1999; lognormal variance with pedigree 1.37, pedigree (1,1,5,1,1)
  (same comment as for TOC, Total Organic Carbon)
- Arsenic, ion [water, surface water]: 1.5266e-7 kg; source Hilbrans H. 1999; lognormal variance with pedigree 1.37, pedigree (1,1,5,1,1)
  (same comment as for Nickel, ion)
- Copper, ion [water, surface water]: 4.2663e-7 kg; source Hilbrans H. 1999; lognormal variance with pedigree 1.37, pedigree (1,1,5,1,1)
  (same comment as for Nickel, ion)
- Mercury [water, surface water]: 2.2728e-9 kg; source Hilbrans H. 1999; lognormal variance with pedigree 1.37, pedigree (1,1,5,1,1)
  (same comment as for Nickel, ion)
- Tin, ion [water, surface water]: 1.9714e-7 kg; source IPPC 2001; lognormal variance with pedigree 1.37, pedigree (1,1,5,1,1)
  (same comment as for TOC, Total Organic Carbon)
- Selenium [air, non-urban air or from high stacks]: 5.0543e-10 kg; lognormal variance with pedigree 0.1001, pedigree (3,2,5,1,3)
  Estimation from dataset author.
- Cobalt [water, surface water]: 6.2516e-9 kg; source Hilbrans H. 1999; lognormal variance with pedigree 1.37, pedigree (1,1,5,1,1)
  (same comment as for TOC, Total Organic Carbon)
- Particulates, > 2.5 um, and < 10um [air, non-urban air or from high stacks]: 0.0052207 kg; source NPI 2001; lognormal variance with pedigree 0.33, pedigree (1,1,5,1,1)
  (same comment as for TOC, Total Organic Carbon)
- Chromium, ion [water, surface water]: 2.0152e-7 kg; source Hilbrans H. 1999; lognormal variance with pedigree 1.37, pedigree (1,1,5,1,1)
  (same comment as for Nickel, ion)
- Particulates, > 10 um [air, non-urban air or from high stacks]: 0.00074688 kg; source NPI 2001; lognormal variance with pedigree 0.18, pedigree (1,1,5,1,1)
  (same comment as for TOC, Total Organic Carbon)
- Lead [air, non-urban air or from high stacks]: 7.6757e-5 kg; source NPI 2001; lognormal variance with pedigree 0.7, pedigree (1,1,5,1,1)
  (same comment as for TOC, Total Organic Carbon)
- Aluminium [water, surface water]: 6.907e-7 kg; source Hilbrans H. 1999; lognormal variance with pedigree 1.37, pedigree (1,1,5,1,1)
  (same comment as for TOC, Total Organic Carbon)
- COD, Chemical Oxygen Demand [water, surface water]: 8.3367e-5 kg; source Hilbrans H. 1999; lognormal variance with pedigree 1.37, pedigree (1,1,5,1,1)
  (same comment as for TOC, Total Organic Carbon)
- Copper [air, non-urban air or from high stacks]: 9.8702e-5 kg; source NPI 2001; lognormal variance with pedigree 0.69, pedigree (1,1,5,1,1)
  (same comment as for TOC, Total Organic Carbon)
- Beryllium [air, non-urban air or from high stacks]: 2.6282e-8 kg; lognormal variance with pedigree 0.1001, pedigree (3,2,5,1,3)
  Estimation from dataset author.
- Calcium, ion [water, surface water]: 0.0054886 kg; source Hilbrans H. 1999; lognormal variance with pedigree 1.37, pedigree (1,1,5,1,1)
  (same comment as for TOC, Total Organic Carbon)
- Antimony [air, non-urban air or from high stacks]: 2.0217e-9 kg; lognormal variance with pedigree 0.1001, pedigree (3,2,5,1,3)
  Estimation from dataset author.
- Zinc [air, non-urban air or from high stacks]: 0.00025034 kg; source NPI 2001; lognormal variance with pedigree 0.69, pedigree (1,1,5,1,1)
  (same comment as for TOC, Total Organic Carbon)
- Zinc, ion [water, surface water]: 1.1917e-6 kg; source Hilbrans H. 1999; lognormal variance with pedigree 1.37, pedigree (1,1,5,1,1)
  (same comment as for Nickel, ion)
- Carbon dioxide, fossil [air, unspecified]: 0.20648 kg; lognormal variance with pedigree 0.1281, pedigree (4,2,5,1,4)
  Estimation from dataset author: Lime addition as melting flux.
  Further references: IPPC (2002) Integrated Pollution Prevention and Control (IPPC); Draft Reference Document on Best Available Techniques for Management of Tailings and Waste-Rock in Mining Activities. European Commission. Retrieved at 01.03.2003 from http://www.jrc.es/pub/english.cgi/0/733169
  Uncertainty: excluding stdev of lime addition
- Dioxins, measured as 2,3,7,8-tetrachlorodibenzo-p-dioxin [air, non-urban air or from high stacks]: 1e-11 kg; source NPI 2001; lognormal variance with pedigree 0.3601, pedigree (3,2,5,1,3)
  (same comment as for TOC, Total Organic Carbon)
- Cadmium, ion [water, surface water]: 2.1347e-8 kg; source Hilbrans H. 1999; lognormal variance with pedigree 1.37, pedigree (1,1,5,1,1)
  (same comment as for Nickel, ion)
- Tin [air, non-urban air or from high stacks]: 1.6052e-5 kg; source NPI 2001; lognormal variance with pedigree 0.7101, pedigree (3,2,5,1,3)
  (same comment as for TOC, Total Organic Carbon)
- Lead [water, surface water]: 1.3266e-7 kg; source Hilbrans H. 1999; lognormal variance with pedigree 1.37, pedigree (1,1,5,1,1)
  (same comment as for Nickel, ion)
- Particulates, < 2.5 um [air, non-urban air or from high stacks]: 0.005141 kg; source NPI 2001; lognormal variance with pedigree 0.22, pedigree (1,1,5,1,1)
  (same comment as for TOC, Total Organic Carbon)
- Iron, ion [water, surface water]: 2.3248e-6 kg; source Hilbrans H. 1999; lognormal variance with pedigree 1.37, pedigree (1,1,5,1,1)
  (same comment as for TOC, Total Organic Carbon)
- BOD5, Biological Oxygen Demand [water, surface water]: 8.3367e-5 kg; lognormal variance with pedigree 1.37, pedigree (1,1,5,1,1)
  Estimation from dataset author.
- Cadmium [air, non-urban air or from high stacks]: 1.1119e-9 kg; lognormal variance with pedigree 0.1001, pedigree (3,2,5,1,3)
  Estimation from dataset author.

## Sampling procedure
literature

## Extrapolations
This dataset has been extrapolated from year 2003 to the year of the calculation (2021). The uncertainty has been adjusted accordingly.

## Review by Bo Weidema 2012-10-01
replaced input of "electricity, high voltage, hydro, run-of-river" with "electricity, high voltage" with a direct activity link to "electricity production, high voltage, hydro, run-of-river".

## Review by Roland Hischier 2011-09-19
Transfer of documentation done.

## Review by Roland Hischier 2009-02-05
vallidated in v1.3
