# ventilation of dwellings, decentralized, 6 x 120 m3/h, steel ducts

Dataset: EcoSpold 2, unit process
Geography: RoW
Time period: 2003-01-01 to 2021-12-31
Technology level: current
Classification: EcoSpold01Categories: ventilation/ventilation systems
Classification: ISIC rev.4 ecoinvent: 4322:Plumbing, heat and air-conditioning installation
Tags: ConvertedDataset
Scenario: Business-as-Usual
System model: Allocation, cut-off by classification
Generated by: Alex Primas
Published in: Hässig, W. 2007
Database: ecoinvent
isCopyrightProtected: true
accessRestrictedTo: 1

## General comment
Life time of system and ducts 50 years. Life time of ventilation unit 20 years. Life time of filters 1 year. Ventilation system for a multi family house. The house considered in the investigation includes 6 flats with 130 m2 floor area each and a ventilation rate of 120 m3/h. The influence of a smaller concrete demand due to embedment of ventilation tubes in the concrete of the floor (-8.05 kg concrete per m2 floor area) is not included.
[This dataset was already contained in the ecoinvent database version 2. It was not individually updated during the transfer to ecoinvent version 3. Life Cycle Impact Assessment results may still have changed, as they are affected by changes in the supply chain, i.e. in other datasets. This dataset was generated following the ecoinvent quality guidelines for version 2. It may have been subject to central changes described in the ecoinvent version 3 change report (http://www.ecoinvent.org/database/ecoinvent-version-3/reports-of-changes/), and the results of the central updates were reviewed extensively. The changes added e.g. consistent water flows and other information throughout the database. The documentation of this dataset can be found in the ecoinvent reports of version 2, which are still available via the ecoinvent website. The change report linked above covers all central changes that were made during the conversion process.]

## Included activities end
Materials used for the construction and renewal of the ventilation system. Electricity for the operation of the system on 12 month per year included. Transport of the components to the construction site. Disposal of the components included. Influence of ventilation ducts on building construction not included.

## Geography
Data representative for a building in Zurich, Switzerland

## Technology
Electricity demand of ventilator (0.4 Wh/m3) representative for DC- or EC-motors and a system design with low pressure drops. Electricity demand of control unit 10 W. Additional 0.3 kWh/(m2 a) electricity demand for defrosting of heat exchanger. Decentral ventilation system without ground heat exchanger. Air intake on the facade and direct to the 6 decentral ventilation units with a short galvanised steel tube (125 mm diameter). Distribution of fresh- and exhaust-air within the flat with galvanised steel ducts (100x50 mm). Exhaust air from the 6 decentral ventilation units with a short galvanised steel tube (400 mm diameter) direct to the exhaust on the facade.

## Time period
Amount of material investigated in 2003

## Reference product
- ventilation of dwellings, decentralized, 6 x 120 m3/h: 1 m2*year; CPC 44815: Fans and ventilating or recycling hoods of the domestic type; By-product classification allocatable product
  EcoSpold01Location=CH
  production volume 3.96633 m2*year
    This is a placeholder value that does not reflect real-world production volumes. This dataset does not currently require a real-world production volume to work in the database framework, and no actual data were collected yet. This has no negative effect on the results of the ecoinvent database.
  property price 0.653551 EUR2005
    Calculated based on inputs: The price of the product has been calculated as a sum of the values of the material and energy inputs for this product. This value is therefore a rough estimation. It may underestimate the real price since there are additional expenses when producing any product. These expences can include for example labour costs, treatment of waste materials and profit for the producer. Please consider carefully whether this level of data quality is acceptable for your application.

## Inputs from technosphere
- blower and heat exchange unit, decentralized, 180-250 m3/h: 0.000308 unit; lognormal variance with pedigree 0.046, pedigree (3,4,5,5,1)
  Questionnaire, Data related to building considered
  EcoSpold01Location=RER
  Uncertainty: Questionnaire, Data related to building considered
  properties: carbon content, fossil 0.225044, carbon content, non-fossil 6.48865e-7, dry mass 43.1 kg, wet mass 43.1 kg
  note on carbon content, fossil: C content was calculated as an addition of C content in the product components
- used air filter decentralized unit, 180-250 m3/h: -0.0151 unit; lognormal variance with pedigree 0.046, pedigree (3,4,5,5,1)
  EcoSpold01Location=CH
  Questionnaire, Data related to building considered
  Uncertainty: Questionnaire, Data related to building considered
  production volume 0 unit
    Calculated from the production volume of ventilation of dwellings, decentralized, 6 x 120 m3/h in proportion to the respective output amounts.
  properties: carbon content, non-fossil 0.154835, carbon content, fossil 0.367027, wet mass 0.22 kg, dry mass 0.22 kg
- flexible duct, aluminium/PET, DN of 125: 0.00103 m; lognormal variance with pedigree 0.046, pedigree (3,4,5,5,1)
  EcoSpold01Location=RER
  Questionnaire, Data related to building considered
  Uncertainty: Questionnaire, Data related to building considered
  properties: carbon content, fossil 0.436512, dry mass 0.205 kg, wet mass 0.205 kg
  note on carbon content, fossil: C content was calculated as an addition of C content in the product components (Flexible tube made of PET, laminated with aluminium foil and strengthened with galvanised steel spiral wire)
- air filter, decentralized unit, 180-250 m3/h: 0.0151 unit; lognormal variance with pedigree 0.046, pedigree (3,4,5,5,1)
  (same comment as for blower and heat exchange unit, decentralized, 180-250 m3/h)
  properties: dry mass 0.22 kg, wet mass 0.22 kg, carbon content, non-fossil 0.154835, carbon content, fossil 0.367027
  note on carbon content, non-fossil: C content was calculated as an addition of C content in the product components (Bag filter made of polyester fleece, frame cardboard). Then, it was referred to 1 kg DM
- used blower and heat exchange unit decentralized, 180-250 m3/h: -0.000308 unit; lognormal variance with pedigree 0.046, pedigree (3,4,5,5,1)
  (same comment as for used air filter decentralized unit, 180-250 m3/h)
  production volume 0 unit
    (same comment as for used air filter decentralized unit, 180-250 m3/h)
  properties: carbon content, fossil 0.225044, dry mass 43.1 kg, wet mass 43.1 kg, carbon content, non-fossil 6.48865e-7
- used ventilation control and wiring decentralized unit: -0.000308 unit; lognormal variance with pedigree 0.046, pedigree (3,4,5,5,1)
  Questionnaire, Data related to building considered
  EcoSpold01Location=CH
  Uncertainty: Questionnaire, Data related to building considered
  production volume 0 unit
    (same comment as for used air filter decentralized unit, 180-250 m3/h)
  properties: carbon content, non-fossil 3.69963e-5, carbon content, fossil 0.275687, wet mass 2.18 kg, dry mass 2.18 kg
- silencer, steel, DN 125: 0.00123 unit; lognormal variance with pedigree 0.046, pedigree (3,4,5,5,1)
  (same comment as for used ventilation control and wiring decentralized unit)
  properties: wet mass 8.3 kg, dry mass 8.3 kg, carbon content, fossil 0.00483456
- used silencer steel, DN 125: -0.00123 unit; lognormal variance with pedigree 0.046, pedigree (3,4,5,5,1)
  (same comment as for used ventilation control and wiring decentralized unit)
  production volume 0 unit
    (same comment as for used air filter decentralized unit, 180-250 m3/h)
  properties: carbon content, fossil 0.00483456, wet mass 8.3 kg, dry mass 8.3 kg
- ventilation system, decentralized, 6 x 120 m3/h, steel ducts: 2.56e-5 unit; lognormal variance with pedigree 0.046, pedigree (3,4,5,5,1)
  (same comment as for used ventilation control and wiring decentralized unit)
- used flexible duct aluminium/PET, DN of 125: -0.00103 m; lognormal variance with pedigree 0.046, pedigree (3,4,5,5,1)
  (same comment as for used ventilation control and wiring decentralized unit)
  production volume 0 m
    (same comment as for used air filter decentralized unit, 180-250 m3/h)
  properties: carbon content, fossil 0.436512, wet mass 0.205 kg, dry mass 0.205 kg
- ventilation control and wiring, decentralized unit: 0.000308 unit; lognormal variance with pedigree 0.046, pedigree (3,4,5,5,1)
  (same comment as for blower and heat exchange unit, decentralized, 180-250 m3/h)
  properties: dry mass 2.18 kg, carbon content, non-fossil 3.69963e-5, wet mass 2.18 kg, carbon content, fossil 0.275687
  note on carbon content, non-fossil: C content was calculated as an addition of C content in the product components, then it was referred to 1 kg DM
- electricity, low voltage: 0 kWh; pedigree (1,1,1,1,1)
  EcoSpold01Location=CH
  Questionnaire, tecnical informations, related to system used
  Uncertainty: Questionnaire, tecnical informations, related to system used
- used air filter in exhaust air valve: -0.0226 unit; lognormal variance with pedigree 0.046, pedigree (3,4,5,5,1)
  (same comment as for used air filter decentralized unit, 180-250 m3/h)
  production volume 0 unit
    (same comment as for used air filter decentralized unit, 180-250 m3/h)
  properties: carbon content, fossil 0.65625, dry mass 0.04 kg, wet mass 0.04 kg
- air filter, in exhaust air valve: 0.0226 unit; lognormal variance with pedigree 0.046, pedigree (3,4,5,5,1)
  (same comment as for flexible duct, aluminium/PET, DN of 125)
  properties: dry mass 0.04 kg, wet mass 0.04 kg, carbon content, fossil 0.65625
  note on carbon content, fossil: C content was calculated as an addition of C content in the product components (Mat filter made of polyester fleece). Then, it was referred to 1 kg DM
- electricity, low voltage: 0.0381049, 0.00693818, 0.156621, 0.547198, 0.111713, 1.71516, 0.277482, 0.796786 kWh (8 entries); lognormal variance with pedigree 0.0432, pedigree (2,3,5,5,1)
  (same comment as for electricity, low voltage)

## Sampling procedure
Questionnaire, technical information and assumptions. Data valid for example building used.

## Extrapolations
none This dataset has been copied from an original dataset covering the geography CH. The uncertainty has been adjusted accordingly.

## Review by Rolf Frischknecht 2007-08-16
passed
none
