# treatment of blast furnace gas, in power plant

Dataset: EcoSpold 2, unit process
Geography: UA
Time period: 1980-01-01 to 2021-12-31
Technology level: current
Classification: EcoSpold01Categories: natural gas/power plants
Classification: ISIC rev.4 ecoinvent: 3510:Electric power generation, transmission and distribution
Synonyms: BFG; top gas
Tags: fossil fuels; industrial gas power
Scenario: Business-as-Usual
System model: Allocation, cut-off by classification
Generated by: Karin Treyer
Published in: Faist Emmenegger, M. 2007
Database: ecoinvent
isCopyrightProtected: true
accessRestrictedTo: 1

## General comment
This dataset has been created as a copy of the dataset for Europe (RER). Production volumes have been adjusted.
This dataset represents the treatment of blast furnace gas in an unspecified gas power plant with high voltage electricity and heat as by-product in Ukraine in 2012.
According to IEA (2008), blast furnace gas is obtained as a by-product in operating blast furnaces; recovered on leaving the furnace and used partly within the plant and partly in other steel industry processes or used in power stations equipped to burn it.
The efficiency calculations are based on IEA/OECD statistics (fuel inputs, electricity produced). No exergy correction could be made due to incomplete data (see ecoinvent report "Erdgas" p. 128 for details).
Water is used for wet cooling and as feed water in the steam circuit. In this dataset, 100% wet cooling and no once-through cooling is assumed.
EMISSIONS:
Emission data have partly been overtaken from a dataset representing the production of electricity in a natural gas power plant. Data have partly been adapted to the different composition of natural gas and blast furnace gas (see tab. 11.16 in ecoinvent report "Erdgas").
Different sources served as basis for assumption of average emissions. Where possible, the most recent sources were taken into account, whereas older sources were taken in order to determine the remaining data gaps. The emissions have been fixed for the former UCTE region* and have been overtaken as such for all countries without value adaptation (adaptation of the uncertainty). See ecoinvent report "Erdgas" given as main source for details (Tab. 11.15 and tab. 11.18). In the following a short overview:
- Emissions of NOx, CO, CO2, SO2, particles, N2O and CH4 are mainly taken from CORINAIR 2001, Rentz et al. 2002, and Swedish EPA 2000 (see tab. 11.1) and are basically valid for European countries.
- NOx emissions are a major challenge in natural gas power plants. With rising temperature, emissions also rise; band widths of NOx emissions in literature are correspondingly large. There are several methods to diminish these emissions.
- CO is a result of incomplete burning. For economic and technical reasons, plant combustion is optimized and CO emissions are low.
- CO2 and SO2 emissions are depending on the composition of the used fuel.. Due to high shares of CO and CO2 in blast furnace gas, CO2 emissions are relatively high for this type of gas. In contrast, some literature sources assume no sulfur in blast furnace gas, so that SO2 emissions are very low in this dataset.
- Organic compound emissions are estimated on the basis of EPA 1998.
- Particles are assumed to be smaller than 2.5 micro-m
Sources:
EMEP/CORINAIR 2001: Joint EMEP/CORINAIR Atmospheric Emission Inventory Guidebook, Third Edition. Copenhagen: European Environment Agency, 2001. http://reports.eea.eu.int/technical_report_2001_3/en.
Rentz O., Karl U., Peter H. (2002). Ermittlung und Evaluierung von Emissionsfaktoren für Feuerungsanlagen in Deutschland für die Jahre 1995, 2000 und 2010. Deutsch- Französisches Institut für Umweltforschung, Uni Karsruhe. Endbericht. Im Auftrag des Umweltbundesamtes. Forschungsbericht 299 43 142. Umweltbundesamt. Berlin.
Swedish EPA (2000) Emission Factors. Swedish Environmental Protection Agency.
IEA/OECD. 2008. Coal information 2008. International Energy Agency (IEA), Paris Cedex (FR)
*former UCTE: Union for the Coordination of the Transmission of Electricity, since 2009 replaced by ENTSO-E European Network of Transmission System Operators for Electricity.

## Included activities start
From the blast furnace gas ready to be treated in a gas power plant and from the gas power plant ready to produce electricity.

## Included activities end
This treatment activity ends with 1MJ of blast furnace gas treated in a gas power plant.

This dataset includes:
- the emissions from burning
- all operation and maintenance activities and materials of the power plants.
- Cooling: It is a assumed that all plants use wet cooling with a cooling tower. No cooling tower is included in this dataset (will be implemented in future versions)

This dataset doesn"t include
- raw materials extraction, decommissioning and waste treatment as these activities are already included in the infrastructure datasets.
- transformation of the by-product electricity.

## Technology
A natural gas power plant with a capacity of 100 MW is taken as power plant infrastructure. No combined heat and power or combined cycle power plants are taken into account.

## Time period
The annual production volume is valid for the year 2012.

## Parameters
- electrical efficiency, global: 0.343 dimensionless; name efficiency_electrical_global; lognormal variance with pedigree 0.0167, pedigree (4,2,1,1,3)
  Literature value/calculated value. Net electrical efficiency based on the lower heating value (LHV).
  For all OECD countries, the IEA Energy statistics of OECD countries 2014 provides data for the year 2012 on fuel input (TJ, Net calorific value NCV) in CHP plants and electricity plants and gross electricity production (GWh) for each country. Together with the information on own use, the net electrical efficiency based on the NCV is calculated. From the statistics, electricity from coke oven gas is modelled in the dataset "treatment of coal gas", while electricity from "recovered gas (including blast furnace gas and other recovered gas) and gas works gas is modelled with the dataset "treatment of blast furnace gas".
  For all non-OECD countries, data from the IEA Energy statistics of non-OECD countries 2014 and the IEA electricity information have been used. The energy statistics source provides data on fuel input from coke oven gas (coal gas) as well as recovered gases and gas works gas (modelled as blast furnace gas). The electricity information provides information on total electricity production with "gases" (=gas works gas, coke oven gas, blast furnace gas and other recovered gases). This electricity production is allocated to the coal gas and blast furnace gas dataset in ecoinvent based on the fuel input. It cannot be differentiated between electricity only and CHP plants as total values only are given.
  IEA. 2014. Electricity Information 2014. ISBN 978-92-64-21692-1. International Energy Agency (IEA), Paris Cedex (FR).
  IEA/OECD. 2014. Energy statistics of non-OECD countries 2014. International Energy Agency (IEA), Paris Cedex (FR).
  IEA/OECD. 2014. Energy statistics of OECD countries 2014. International Energy Agency (IEA), Paris Cedex (FR).
- thermal efficiency: 0.145 dimensionless; name efficiency_thermal; lognormal variance with pedigree 0.0122, pedigree (2,3,1,5,3)
  Estimation. Value taken over from the global dataset.
  Global value: Literature value/calculation for the thermal efficiency. IEA/OECD statistics provided data for OECD countries in total: Fuel input in CHP plants and the electricity and heat output. Not enough detailed data were available for non-OECD countries and/or the whole world, so that for this global dataset, the OECD value was overtaken. Data are for the category "coal manufactured gases" including coke oven gas, blast furnace gas and oxygen steel furnace gas. Fuel input data in the statistics are expressed in gross calorific values. Net calorific values are calculated according to IEA/OECD p. I.7 by multiplying the gross heat content with a factor 0.9, taking therefore the lower factor for coke oven gas, corresponding to a worst case scenario (blast furnace gas and oxygen steel furnace gas have a gross to net ratio of 1).
  IEA/OECD. 2010. Electricity Information 2010. International Energy Agency (IEA), Paris Cedex (FR). Part IV. Detailed OECD Electricity And Heat Data.
  nan
- electrical efficiency, country: 0.3 dimensionless; name efficiency_electrical_country; lognormal variance with pedigree 0.0167, pedigree (4,2,1,1,3)
  Literature value/calculated value. Net electrical efficiency based on the lower heating value (LHV).
  For all OECD countries, the IEA Energy statistics of OECD countries 2014 provides data for the year 2012 on fuel input (TJ, Net calorific value NCV) in CHP plants and electricity plants and gross electricity production (GWh) for each country. Together with the information on own use, the net electrical efficiency based on the NCV is calculated. From the statistics, electricity from coke oven gas is modelled in the dataset "treatment of coal gas", while electricity from "recovered gas (including blast furnace gas and other recovered gas) and gas works gas is modelled with the dataset "treatment of blast furnace gas".
  For all non-OECD countries, data from the IEA Energy statistics of non-OECD countries 2014 and the IEA electricity information have been used. The energy statistics source provides data on fuel input from coke oven gas (coal gas) as well as recovered gases and gas works gas (modelled as blast furnace gas). The electricity information provides information on total electricity production with "gases" (=gas works gas, coke oven gas, blast furnace gas and other recovered gases). This electricity production is allocated to the coal gas and blast furnace gas dataset in ecoinvent based on the fuel input. It cannot be differentiated between electricity only and CHP plants as total values only are given.
  IEA. 2014. Electricity Information 2014. ISBN 978-92-64-21692-1. International Energy Agency (IEA), Paris Cedex (FR).
  IEA/OECD. 2014. Energy statistics of non-OECD countries 2014. International Energy Agency (IEA), Paris Cedex (FR).
  IEA/OECD. 2014. Energy statistics of OECD countries 2014. International Energy Agency (IEA), Paris Cedex (FR).
  The original value calculated by the statistics was 0.029, which seems to be unrealistic. A value of 0.3 is therefore being used (own assumption).
- relation between the global and the country's efficiency: 1.14333 dimensionless; name relation_global_country; = efficiency_electrical_global/ efficiency_electrical_country; undefined min 1, max 1, standardDeviation95 0, pedigree (1,1,1,1,1)
  This factor brings the amounts of the exchanges in the global dataset into relation with the amounts in the country datasets.

## Reference product
- blast furnace gas: 0 MJ; source Faist Emmenegger, M. 2007; CPC 17200: Coal gas, water gas, producer gas and similar gases, other than petroleum gases and other gaseous hydrocarbons; By-product classification Recyclable
  production volume 0 MJ; name apv_blast_furnace_gas; = apv_electricity*3.6*(1/efficiency_electrical_country)
    Calculated value.
  property price 0.004 EUR2005; name blast_furnace_gas_price_EUR2005
    Temporary price data. Calculated as 90% of purchasers price based on: Same price as natural gas per MJ
  property carbon content 0.156611
    carbon content on a dry matter basis (reserved; not for manual entry)
  properties: water in wet mass 0 kg, dry mass 0.367647 kg, carbon content, fossil 0.156611, wet mass 0.367647 kg, carbon content, non-fossil 0, water content 0, carbon allocation 0.0575774 kg
- electricity, high voltage: 1 kWh; = blast_furnace_gas*efficiency_electrical_country*(-1)/3.6; source IEA/OECD 2010, p. II.8ff; By-product classification allocatable product; CPC 17100: Electrical energy; pedigree (1,1,1,1,1)
  Calculated value. 1kWh = 3.6 MJ
  production volume 2e8 kWh; name apv_electricity
  properties: price 0.0977 EUR2005, exergy 3.6 MJ, true value relation 3.6, true value 0.00888742

## By-products
- electricity, high voltage: 0 kWh; source IEA/OECD 2010, p. II.8ff; By-product classification allocatable product; CPC 17100: Electrical energy; undefined min 0.0766667, max 0.0766667, standardDeviation95 0, pedigree (1,1,3,1,1)
  Calculated value. 1kWh = 3.6 MJ
  production volume 0 kWh; name apv_electricity
    Literature value/calculated value. Net electricity production in 2012.
    For all OECD countries, the IEA Energy statistics of OECD countries 2014 provides data for the year 2012 on gross electricity production (GWh) for each country. Together with the information on own use, the net electrical efficiency based on the NCV is calculated. From the statistics, electricity from coke oven gas is modelled in the dataset "treatment of coal gas", while electricity from "recovered gas (including blast furnace gas and other recovered gas) and gas works gas is modelled with the dataset "treatment of blast furnace gas".
    For all non-OECD countries, data from the IEA Energy statistics of non-OECD countries 2014 and the IEA electricity information have been used. The energy statistics source provides data on fuel input from coke oven gas (coal gas) as well as recovered gases and gas works gas (modelled as blast furnace gas). The electricity information provides information on total electricity production with "gases" (=gas works gas, coke oven gas, blast furnace gas and other recovered gases). This electricity production is allocated to the coal gas and blast furnace gas dataset in ecoinvent based on the fuel input. It cannot be differentiated between electricity only and CHP plants as total values only are given.
    IEA. 2014. Electricity Information 2014. ISBN 978-92-64-21692-1. International Energy Agency (IEA), Paris Cedex (FR).
    IEA/OECD. 2014. Energy statistics of non-OECD countries 2014. International Energy Agency (IEA), Paris Cedex (FR).
    IEA/OECD. 2014. Energy statistics of OECD countries 2014. International Energy Agency (IEA), Paris Cedex (FR).
  property price 0.0977 EUR2005
    Temporary price data. Calculated as 90% of purchasers price based on: 94% of the average price (to account for a 6% loss in transformation and transmission) for electricity for industrial consumersin 2005 (excluded taxes). From IEA.
  property exergy 3.6 MJ
    This exergy property is based on the exergy content of the product.
  properties: true value relation 3.6
- heat, district or industrial, other than natural gas: 0 MJ; source IEA/OECD 2010, p. IV.13; By-product classification allocatable product; CPC 17300: Steam and hot water; pedigree (1,1,3,1,1)
  Calculated value
  production volume 3.48e8 MJ; = apv_blast_furnace_gas*efficiency_thermal
    Calculated from production volume of reference product using the relative outputs.
  property price 0.0106 EUR2005
    Average European district heat price from Ecoheatcool and Euroheat 2005-2006, Ecoheat Work package 1: The European heat market. Final report. 10.6 EUR/GJ i s the price of district heat. http://www.solarthermalworld.org/files/Ecoheatcool%20WP1%20Web.pdf?download
  property exergy 0.1842 MJ
    This exergy property is based on the exergy content of the product.
  property true value 0.000791247
    allocation property applied in "true value" allocation // value calculated from true value relation
  properties: heating value, net 1 MJ, true value relation 0.1842

## Inputs from technosphere
- water, completely softened: 0.056979 kg; source Röder, A. 2007; pedigree (1,1,3,1,1)
  Literature value/assumption. Feed water for the steam circuit lost when burning 1MJ of blas furnace gas. Röder et al. 2007, Tab. 9.65 and Tab. 9.66, p. 160f. Faist Emmenegger et al. 2007 state that there have been nearly no information on water use in blast furnace gas power plants and therefore neglected the water use. For consistency reasons, here it is assumed a certain water use also for the treatment of blast furnace gas.
  properties: wet mass 1 kg
- gas power plant, 100MW electrical: 0 unit; source Faist Emmenegger, M. 2007
  Literature value/calculated value. Amount of power plant needed for burning 1MJ of blast furnace gas.
- gas power plant, 100MW electrical: 5.38343e-10 unit; source Faist Emmenegger, M. 2007; lognormal variance with pedigree 0.1707, pedigree (3,3,5,3,3)
  (same comment as for gas power plant, 100MW electrical)
- water, decarbonised: 1.8993 kg; source Röder, A. 2007; pedigree (1,1,3,1,1)
  Literature value/assumption. Cooling water, decarbonised, for the water lost in the cooling water circuit when burning 1MJ of blas furnace gas. Röder et al. 2007, Tab. 9.65 and Tab. 9.66, p. 160f. Faist Emmenegger et al. 2007 state that there have been nearly no information on water use in blast furnace gas power plants and therefore neglected the water use. For consistency reasons, here it is assumed a certain water use also for the treatment of blast furnace gas.
  properties: wet mass 1 kg
- blast furnace gas: 11.019 MJ; source Faist Emmenegger, M. 2007
  production volume 2.4e9 MJ
  properties: dry mass 0.367647 kg, carbon content, fossil 0.156611, wet mass 0.367647 kg

## Inputs from nature
- Water, cooling, unspecified natural origin [natural resource, in water]: 0.00968141 m3; pedigree (1,1,3,1,1)
  Exchange present due to parent child relationship

## Emissions to nature
- Sulfur dioxide [air, non-urban air or from high stacks]: 0.00022038 kg; source Faist Emmenegger, M. 2007, p. Tab. 11.18 p. 135; pedigree (4,3,5,4,4)
  Literature value. Range of values from different references.
- Methane, fossil [air, non-urban air or from high stacks]: 1.1019e-5 kg; source Faist Emmenegger, M. 2007, p. Tab. 11.18 p. 135; pedigree (4,3,5,4,4)
  Literature value. Range of values from different references.
- Benzo(a)pyrene [air, non-urban air or from high stacks]: 5.82904e-12 kg; source Faist Emmenegger, M. 2007, p. Tab. 11.19 p.138; pedigree (4,4,5,3,5)
  Literature value/calculated value. Value overtaken from the dataset of natural gas burned in a normal power plant (electricity production, natural gas, GLO 2008).
  Emissions when burning 1MJ of natural gas. Weighted average with electricity production data (Itten&Frischknecht 2012) and emission values of 11 countries
  (AT, BE, DE, ES, FR, GB, IT, JP, LU, NL, US) (Faist Emmenegger et al. 2007, JP and US in the appendix)
  Country emissions values estimate from range of values from different references. See Tab. 11.19, p. 138 in Faist Emmenegger et al. 2007.
  Source:
  Itten R. and Frischknecht R. (2012) Life Cycle Inventories of Electricity Mixes and Grid. ESU-services Ltd., Uster, Switzerland.
- Propane [air, non-urban air or from high stacks]: 7.76838e-6 kg; source Faist Emmenegger, M. 2007, p. Tab. 11.19 p.138; pedigree (4,4,5,3,5)
  (same comment as for Benzo(a)pyrene)
- Dinitrogen monoxide [air, non-urban air or from high stacks]: 1.1019e-5 kg; source Faist Emmenegger, M. 2007, p. Tab. 11.18 p. 135; pedigree (4,3,5,4,4)
  Literature value. Range of values from different references.
- Particulates, < 2.5 um [air, non-urban air or from high stacks]: 1.1019e-5 kg; source Faist Emmenegger, M. 2007, p. Tab. 11.18 p. 135; pedigree (4,3,5,4,4)
  Literature value. Range of values from different references.
- Benzene [air, non-urban air or from high stacks]: 1.02036e-8 kg; source Faist Emmenegger, M. 2007, p. Tab. 11.19 p.138; pedigree (4,4,5,3,5)
  (same comment as for Benzo(a)pyrene)
- Pentane [air, non-urban air or from high stacks]: 1.26718e-5 kg; source Faist Emmenegger, M. 2007, p. Tab. 11.19 p.138; pedigree (4,4,5,3,5)
  (same comment as for Benzo(a)pyrene)
- Hexane [air, non-urban air or from high stacks]: 8.73805e-6 kg; source Faist Emmenegger, M. 2007, p. Tab. 11.19 p.138; pedigree (4,4,5,3,5)
  (same comment as for Benzo(a)pyrene)
- Acenaphthene [air, non-urban air or from high stacks]: 8.73805e-12 kg; source Faist Emmenegger, M. 2007, p. Tab. 11.19 p.138; pedigree (4,4,5,3,5)
  (same comment as for Benzo(a)pyrene)
- Acetic acid [air, non-urban air or from high stacks]: 1.3333e-6 kg; source Faist Emmenegger, M. 2007, p. Tab. 11.19 p.138; pedigree (3,4,5,3,5)
  (same comment as for Benzo(a)pyrene)
- Acetaldehyde [air, non-urban air or from high stacks]: 8.81518e-9 kg; source Faist Emmenegger, M. 2007, p. Tab. 11.19 p.138; pedigree (4,4,5,3,5)
  (same comment as for Benzo(a)pyrene)
- Water [air, unspecified]: 0.000127546 m3; pedigree (1,1,3,1,1)
  Exchange present due to parent child relationship
- Dioxins, measured as 2,3,7,8-tetrachlorodibenzo-p-dioxin [air, non-urban air or from high stacks]: 0 kg; source Faist Emmenegger, M. 2007, p. Tab. 11.19 p.138; pedigree (4,4,5,3,5)
  (same comment as for Benzo(a)pyrene)
- Formaldehyde [air, non-urban air or from high stacks]: 3.64728e-7 kg; source Faist Emmenegger, M. 2007, p. Tab. 11.19 p.138; pedigree (4,4,5,3,5)
  Literature value/calculated value. Value from the dataset of natural gas burned in a normal power plant (electricity production, natural gas, GLO 2008).
  Emissions when burning 1MJ of natural gas. Weighted average with electricity production data (Itten&Frischknecht 2012) and emission values of 11 countries
  (AT, BE, DE, ES, FR, GB, IT, JP, LU, NL, US) (Faist Emmenegger et al. 2007, JP and US in the appendix)
  Country emissions values estimate from range of values from different references. See Tab. 11.19, p. 138 in Faist Emmenegger et al. 2007.
  Source:
  Itten R. and Frischknecht R. (2012) Life Cycle Inventories of Electricity Mixes and Grid. ESU-services Ltd., Uster, Switzerland.
- Nitrogen oxides [air, non-urban air or from high stacks]: 0.000771329 kg; source Faist Emmenegger, M. 2007, p. Tab. 11.18 p. 135; pedigree (4,3,5,4,4)
  Literature value. Range of values from different references.
- Carbon dioxide, fossil [air, non-urban air or from high stacks]: 2.2038 kg; source Faist Emmenegger, M. 2007, p. Tab. 11.18 p. 135; pedigree (4,3,5,4,4)
  Literature value. Range of values from different references.
- Propionic acid [air, non-urban air or from high stacks]: 1.76304e-7 kg; source Faist Emmenegger, M. 2007, p. Tab. 11.19 p.138; pedigree (4,4,5,3,5)
  (same comment as for Benzo(a)pyrene)
- Carbon monoxide, fossil [air, non-urban air or from high stacks]: 0.000165285 kg; source Faist Emmenegger, M. 2007, p. Tab. 11.18 p. 135; pedigree (4,3,5,4,4)
  Literature value. Range of values from different references.
- Toluene [air, non-urban air or from high stacks]: 1.65285e-8 kg; source Faist Emmenegger, M. 2007, p. Tab. 11.19 p.138; pedigree (4,4,5,3,5)
  (same comment as for Benzo(a)pyrene)
- PAH, polycyclic aromatic hydrocarbons [air, non-urban air or from high stacks]: 8.81518e-8 kg; source Faist Emmenegger, M. 2007, p. Tab. 11.19 p.138; pedigree (4,4,5,3,5)
  (same comment as for Benzo(a)pyrene)
- Ethane [air, non-urban air or from high stacks]: 1.5096e-5 kg; source Faist Emmenegger, M. 2007, p. Tab. 11.19 p.138; pedigree (4,4,5,3,5)
  (same comment as for Benzo(a)pyrene)
- Butane [air, non-urban air or from high stacks]: 1.02036e-5 kg; source Faist Emmenegger, M. 2007, p. Tab. 11.19 p.138; pedigree (4,4,5,3,5)
  (same comment as for Formaldehyde)

## Sampling procedure
Literature and statistics

## Extrapolations
Emission data partly taken over from natural gas power plants.
Emission data partly from old references.
A natural gas power plant is taken as input.

## Review by Carl Vadenbo 2015-05-21
The update of the whole electricity sector for the ecoinvent v3.2 database consist of hundreds of datasets. All these datasets have passed through a streamlined review processes where the underlying modelling of production volumes, technology shares and efficiencies was reviewed in detail prior to the datasets being submitted to the database.
