# electricity, high voltage, production mix

Dataset: EcoSpold 2, unit process, production mix
Geography: CENTREL
Time period: 2021-01-01 to 2021-12-31
Scenario: Business-as-Usual
System model: Allocation, cut-off by classification
Generated by: [System]
Database: ecoinvent
isCopyrightProtected: false
accessRestrictedTo: 1

## Reference product
- electricity, high voltage: 1 kWh; By-product classification allocatable product; CPC 17100: Electrical energy
  production volume 2.2086e11 kWh

## Inputs from technosphere
- electricity, high voltage: 0 kWh; pedigree (1,1,1,1,1)
  Calculated value/estimation. This value compensates for the losses during transmission on the high voltage level and transformation within the high voltage level. The calculation is made based on total electricity losses between net electricity available at the busbar and the use of electricity calculated based on the IEA electricity information 2014, table 1.1, Electrity supply vs. transmission losses. These total losses over the whole chain are then allocated to the different voltage levels as well as transformation and transmission losses based on information in Itten et al. 2014. For details please see the documentation available on ecoQuery.
  IEA. 2014. Electricity Information 2014. ISBN 978-92-64-21692-1. International Energy Agency (IEA), Paris Cedex (FR).
  Itten R., Frischknecht R., Stucki M. 2014. Life Cycle Inventories of Electricity Mixes and Grid. Version 1.3. treeze, Uster, Switzerland
- electricity, high voltage: 4.90695e-5 kWh
  production volume 1.05554e7 kWh
  properties: price 0.0977 EUR2005, Corresponding fuel use 10.1 MJ
- electricity, high voltage: 0, 0, 0, 0, 0, 0, 0 kWh (7 entries)
  properties: price 0.0977 EUR2005
- electricity, high voltage: 0.000959801 kWh
  production volume 2.06463e8 kWh
- electricity, high voltage: 0.00289139 kWh
  production volume 6.21968e8 kWh
- electricity, high voltage: 0.00866276 kWh
  production volume 1.86345e9 kWh
- electricity, high voltage: 0.000793743 kWh
  production volume 1.70742e8 kWh
- electricity, high voltage: 0.000602149 kWh
  production volume 1.29529e8 kWh
- electricity, high voltage: 0.0468056 kWh
  production volume 1.00684e10 kWh
- electricity, high voltage: 3.32111e-6 kWh
  production volume 714406 kWh
- electricity, high voltage: 0.000422287 kWh
  production volume 9.08383e7 kWh
- electricity, high voltage: 0.00300879 kWh
  production volume 6.47223e8 kWh
- electricity, high voltage: 0.0044868 kWh
  production volume 9.65157e8 kWh
- electricity, high voltage: 0.00192478 kWh
  production volume 4.1404e8 kWh
- electricity, high voltage: 0.00132155 kWh
  production volume 2.84279e8 kWh
- electricity, high voltage: 2.34604e-5 kWh
  production volume 5.04657e6 kWh
- electricity, high voltage: 0.00105278 kWh
  production volume 2.26465e8 kWh
- electricity, high voltage: 0.0031701 kWh
  production volume 6.81921e8 kWh
- electricity, high voltage: 0.000855826 kWh
  production volume 1.84097e8 kWh
- electricity, high voltage: 0.00256748 kWh
  production volume 5.52291e8 kWh
- electricity, high voltage: 0.0194304 kWh
  production volume 4.17968e9 kWh
- electricity, high voltage: 0.000946833 kWh
  production volume 2.03674e8 kWh
- electricity, high voltage: 0.0039767 kWh
  production volume 8.55429e8 kWh
- electricity, high voltage: 0.0857262 kWh
  production volume 1.84406e10 kWh
- electricity, high voltage: 4.44048e-5 kWh
  production volume 9.55195e6 kWh
- electricity, high voltage: 0.00163996 kWh
  production volume 3.52772e8 kWh
- electricity, high voltage: 0.000198665 kWh
  production volume 4.27349e7 kWh
- electricity, high voltage: 0.000428154 kWh
  production volume 9.21005e7 kWh
- electricity, high voltage: 0.00931189 kWh
  production volume 2.00309e9 kWh
- electricity, high voltage: 0.0765689 kWh
  production volume 1.64708e10 kWh
- electricity, high voltage: 0.00449551 kWh
  production volume 9.67031e8 kWh
- electricity, high voltage: 0.000210817 kWh
  production volume 4.5349e7 kWh
- electricity, high voltage: 0.00324766 kWh
  production volume 6.98606e8 kWh
- electricity, high voltage: 0.00114226 kWh
  production volume 2.45712e8 kWh
- electricity, high voltage: 0.000655141 kWh
  production volume 1.40928e8 kWh
- electricity, high voltage: 4.35768e-5 kWh
  production volume 9.37384e6 kWh
- electricity, high voltage: 4.38164e-5 kWh
  production volume 9.42537e6 kWh
  properties: price 0.0977 EUR2005, exergy 3.6 MJ
  note on exergy: This exergy property is based on the exergy content of the product.
- electricity, high voltage: 7.30273e-6 kWh
  production volume 1.57089e6 kWh
  properties: exergy 3.6 MJ, price 0.0977 EUR2005
- electricity, high voltage: 0.000877044 kWh
  production volume 1.88661e8 kWh
- electricity, high voltage: 0.0164311 kWh
  production volume 3.53451e9 kWh
- electricity, high voltage: 0.00749997 kWh
  production volume 1.61332e9 kWh
- electricity, high voltage: 0.00478322 kWh
  production volume 1.02892e9 kWh
- electricity, high voltage: 0.0590164 kWh
  production volume 1.2695e10 kWh
- electricity, high voltage: 0.000244641 kWh
  production volume 5.2625e7 kWh
- electricity, high voltage: 0.00226523 kWh
  production volume 4.87274e8 kWh
- electricity, high voltage: 4.42716e-5 kWh
  production volume 9.52328e6 kWh
- electricity, high voltage: 8.85431e-5 kWh
  production volume 1.90466e7 kWh
- electricity, high voltage: 0.000408953 kWh
  production volume 8.79701e7 kWh
- electricity, high voltage: 0.00101452 kWh
  production volume 2.18233e8 kWh
- electricity, high voltage: 0.0117032 kWh
  production volume 2.51748e9 kWh
- electricity, high voltage: 0.00638259 kWh
  production volume 1.37296e9 kWh
- electricity, high voltage: 0.000350531 kWh
  production volume 7.54029e7 kWh
- electricity, high voltage: 0.000131449 kWh
  production volume 2.82761e7 kWh
- electricity, high voltage: 1.79284e-5 kWh
  production volume 3.85659e6 kWh
- electricity, high voltage: 0.00174985 kWh
  production volume 3.76412e8 kWh
- electricity, high voltage: 0.00824488 kWh
  production volume 1.77356e9 kWh
- electricity, high voltage: 0.00947936 kWh
  production volume 2.03911e9 kWh
- electricity, high voltage: 0.0509856 kWh
  production volume 1.09675e10 kWh
- electricity, high voltage: 0.00198407 kWh
  production volume 4.26794e8 kWh
- electricity, high voltage: 0.000684891 kWh
  production volume 1.47327e8 kWh
- electricity, high voltage: 0.00238536 kWh
  production volume 5.13116e8 kWh
- electricity, high voltage: 0.301758 kWh
  production volume 6.49113e10 kWh
- electricity, high voltage: 0.179899 kWh
  production volume 3.86982e10 kWh
- electricity, high voltage: 0.0175435 kWh
  production volume 3.77379e9 kWh
- electricity, high voltage: 0.0058412 kWh
  production volume 1.2565e9 kWh
- electricity, high voltage: 0.00174067 kWh
  production volume 3.74436e8 kWh
- electricity, high voltage: 0.0138858 kWh
  production volume 2.98698e9 kWh
- electricity, high voltage: 0.00294578 kWh
  production volume 6.33669e8 kWh
- electricity, high voltage: 0.00189269 kWh
  production volume 4.07138e8 kWh
