# heat and power co-generation, oil

Dataset: EcoSpold 2, unit process
Geography: US-HICC
Time period: 1980-01-01 to 2021-12-31
Technology level: current
Classification: EcoSpold01Categories: hard coal/power plants
Classification: ISIC rev.4 ecoinvent: 3510:Electric power generation, transmission and distribution
Synonyms: petroleum; heavy fuel oil
Tags: oil power; fossil fuels; United States
Scenario: Business-as-Usual
System model: Allocation, cut-off by classification
Generated by: Karin Treyer
Published in: Jungbluth N. 2003
Database: ecoinvent
isCopyrightProtected: true
accessRestrictedTo: 1

## General comment
This dataset represents the production of high voltage electricity and district heat at a grid-connected oil power plant with a capacity of 500 MW in US - Hawaiian Islands Coordinating Council in 2012.
Emissions are in general calculated/estimated based on the fuel oil type S, European quality. This dataset has been built on the basis of oil electricity production datasets in version 2 of the ecoinvent database which were elaborated by N. Jungbluth 2007 (see main publication in modelling and administrative). The values and emissions are a weighted average of emissions in all datasets in version 2 (which are considered as the global values) multiplied with an efficiency scaling factor. The datasets in version 2 were valid for the following countries: AT, BE, CS, CZ, DE, DK, ES, FI, FR, GB, GR, HR, HU, IE, IT, NL, PT, SE, SI, SK. Weighting was made with electricity production data in those countries based on IEA/OECD 2012. Nothing else than the efficiency has been adjusted in this dataset; besides that no new data collection has taken place
Comments:
- sulfur content of the oil is not adapted to local/average conditions.
- CO2 emissions are presented for the combustion and for the flue gas treatment
- Extensive comments on emissions can be found in Jungbluth 2007, on which this dataset is based on.
Emissions to the water are from flue gas treatment. Most of these data come from two power plants in Portugal (EDP 2001) and data from Slowakia
EDP (2001) Environmental Report 2000. Electricidade de Portugal, S.A., Lisboa, PT, retrieved from: www.edp.pt.
Slovenské elektrárne (2002) Environment Report 2001, Bratislave, SK, retrieved from: www.seas.sk.
IEA/OECD. 2010. Electricity Information 2010. International Energy Agency (IEA), Paris Cedex (FR). Part IV. Detailed OECD Electricity And Heat Data.
[This dataset is meant to replace the following datasets:]

## Included activities start
From the constructed power plant ready to produce electricity and from the fuel ready to be used.

## Included activities end
This activity ends with 1MJ of heavy fuel oil burned in power plant with heat and electricity as main products.

This dataset includes all energy use, use of chemicals, emissions to air and water including treatment of flue gasses and effluents. In an oil power plant, water is needed for cooling, feed water for the steam circuit, for the flue gas treatment, or other cleaning. This dataset only considers water use (evaporation) for cooling and steam circuit.

## Technology
Electricity and heat production in a conventional combined heat and power oil power plant with a capacity of 500 MWe

## Time period
The Annual Production Volume is valid for the year 2012.

## Parameters
- water consumption, electricity production from oil, once-T and coolingP CS: 0.0005 m3/kWh; name WConsumption_EP_oil_onceT_andCP_CS; lognormal variance with pedigree 0.092025, pedigree (4,4,3,2,4)
  Estimated based on literature (Scown, 2011, Water Footprint of U.S. Transportation Fuels, SI).
  nan
- water consumption, electricity production from oil, recirculating CS: 0.0018 m3/kWh; name WConsumption_EP_oil_recirculatingCS; lognormal variance with pedigree 0.092025, pedigree (4,4,3,2,4)
  (same comment as for water consumption, electricity production from oil, once-T and cooling)
- water withdrawal, electricity production from oil, recirculating CS: 0.0021 m3/kWh; name WWithdrawal_EP_oil_recirculating_CS; lognormal variance with pedigree 0.092025, pedigree (4,4,3,2,4)
  (same comment as for water consumption, electricity production from oil, once-T and cooling)
- gross electricity production: 0 kWh; name gross_electricity
  Parameter present due to parent child relationship but not used in this dataset.
  nan
- water withdrawal, electricity production from oil, once-T and coolingP CS: 0.098 m3/kWh; name WWithdrawal_EP_oil_onceT_andCP_CS; lognormal variance with pedigree 0.092025, pedigree (4,4,3,2,4)
  (same comment as for water consumption, electricity production from oil, once-T and cooling)
- recirculating cooling system as a fraction of all cooling systems: 0.48 dimensionless; name recirculating_CS_fraction_from_allCS; lognormal variance with pedigree 0.092025, pedigree (4,4,3,2,4)
  Calculated as an average of data available for Europe (Floerke, 2008, Future changes of freshwater needs in the electricity production sector) and USA (NERL, 2011, Estimating freshwater needs to meet future thermoelectric generation requirements).
  nan
- losses from gross electricity production: 0.06 dimensionless; name losses_gross_net; undefined min 0.06, max 0.06, standardDeviation95 0, pedigree (1,1,1,1,1)
  Calculated value. Own use of electricity plants in this country in 2012. For the OECD countries, the OECD iLibrary provides gross and net electricity values for the specific sector "Total Fuel Combustion", from which the loss value is being calculated. This value is then applied to all fossil fuel datasets, as no data on a more detailed level were available.
  OECD. 2014. IEA Electricity Information Statistics: OECD - Electricity and heat generation. OECD iLibrary. Online database. DOI : 10.1787/elect-data-en
  nan
  Uncertainty: g
- average efficiency of oil power plants, country: 0.369 dimensionless; name efficiency_oil_country; lognormal variance with pedigree 0.016725, pedigree (4,2,1,2,3)
  Literature value/calculated value. Data from the US Energy Information Administration for net electricity production and fuel consumption for electricity generation with petroleum liquids, year 2013. The same value is applied to the datasets modelling electricity only and CHP plants (lack of more detailed data).
  EIA. 2013. Statistics on electricity - Electricity data browser. Generation and thermal output. Net generation for electric power, annual // Consumption for electricity generation (Btu) for electric power. U.S. Energy Information Administration; Independent Statistics&Analysis.
- fraction, water, decarbonised, to air: 0.0216287 dimensionless; name fraction_WDC_to_air; = fraction_CW_to_air; lognormal variance with pedigree 0.092025, pedigree (4,4,3,2,4)
  Calculated value. See comments in the other parametres present in this dataset. Decarbonised water is considered to be always used as cooling water, thus cooling water fractions to air are applied to all carbonised water input flows to calculate the amount of water consumed in the processes.
  nan
- fraction, process water, to air: 0.15 dimensionless; name fraction_PW_to_air; lognormal variance with pedigree 0.092025, pedigree (4,4,3,2,4)
  Literature value. In case when no industry/process specific data are available, default evaporation fraction value is used. This value is 15% and is based on literature (Statistics Canada, 2007 & Shaffer, K.H., 2008, Consumptive water use in the Great Lakes Basin, USGS & Shiklomanov, 2003, World Water Resources at the Beginning of the 21st Century) and has been approved by an expert.
  nan
- factor: input of MJ for the production of 1 kWh: 9.7561 MJ/kWh; name factor_MJ_kWh; = 1*3.6/efficiency_oil_country; lognormal variance with pedigree 0.0006, pedigree (1,1,1,1,1)
  Calculated value. 3.6 MJ = 1kWh.
  nan
- fraction, water, completely softened, to air: 0.15 dimensionless; name fraction_WCS_to_air; = fraction_PW_to_air; lognormal variance with pedigree 0.092025, pedigree (4,4,3,2,4)
  Calculated value. See comment in the other parametres present in this dataset. Water, completely softened is considered to be always used as process water, thus process water fractions to air are applied to all water, completely softened input flows to calculate the amount of water consumed in the processes.
  nan
- relation between the global and the country's efficiency of oil power plants: 0 dimensionless
  Parameter not needed anymore.
- average efficiency of oil power plants, global: 0 dimensionless
  Parameter not needed anymore.
- fraction, cooling water, to air: 0.0216287 dimensionless; name fraction_CW_to_air; = (WConsumption_EP_oil_recirculatingCS*recirculating_CS_fraction_from_allCS+WConsumption_EP_oil_onceT_andCP_CS*once_through_andCP_CS_fractio_from_allCS)/(WWithdrawal_EP_oil_recirculating_CS*recirculating_CS_fraction_from_allCS+WWithdrawal_EP_oil_onceT_andCP_CS*once_through_andCP_CS_fractio_from_allCS); lognormal variance with pedigree 0.092025, pedigree (4,4,3,2,4)
  Calculated value
  nan
- once-through and cooling pond cooling systems as a fraction of all cooling syste: 0.52 dimensionless; name once_through_andCP_CS_fractio_from_allCS; lognormal variance with pedigree 0.092025, pedigree (4,4,3,2,4)
  (same comment as for recirculating cooling system as a fraction of all cooling systems)

## Reference product
- heat, district or industrial, other than natural gas: 1 MJ; name heat; By-product classification allocatable product; CPC 17300: Steam and hot water
  Literature value/calculated value. Net thermal efficiency based on the lower heating value (LHV), total United States.
  For all OECD countries, the IEA Electricity information 2014 provides data for the year 2012 on fuel input (TJ, Net calorific value NCV) and gross electricity production (GWh) as well as heat production (TJ) in tables 8 and 9 for each country for electricity only and Combined Heat and Power (CHP) plants each. Together with the information on own use (see parameter "losses"), the net electrical efficiency based on the NCV is calculated.
  For all non-OECD countries, data from the IEA Energy balances of non-OECD countries 2014 have been used. These tables do not always provide information on how much of the electricity has been produced in electricity only and in CHP plants, but often give the total value only.
  IEA. 2014. Electricity Information 2014. ISBN 978-92-64-21692-1. International Energy Agency (IEA), Paris Cedex (FR).
  IEA/OECD. 2014. Energy balances of non-OECD countries 2014. International Energy Agency (IEA), Paris Cedex (FR).
  production volume 9.4212e9 MJ; name apv_heat; = apv_electricity*3.6
    Calculated value. Production volume only given for total United States in the IEA electricity information 2014. In the United States, the ratio "output of heat (MJ) per kWh of electricity produced (kWh)" amounts to 3.6.
    IEA. 2014. Electricity Information 2014. ISBN 978-92-64-21692-1. International Energy Agency (IEA), Paris Cedex (FR).
  property true value relation 0.1842; name heat_true_value_relation
    property to calculate "true value" from
  property price 0.0106 EUR2005; name heat_price_EUR2005
    Average European district heat price from Ecoheatcool and Euroheat 2005-2006, Ecoheat Work package 1: The European heat market. Final report. 10.6 EUR/GJ i s the price of district heat. http://www.solarthermalworld.org/files/Ecoheatcool%20WP1%20Web.pdf?download
  property exergy 0.1842 MJ; name heat_exergy
    This exergy property is based on the exergy content of the product.
  property true value 0.00285671; name heat_true_value
    allocation property applied in "true value" allocation // value calculated from true value relation
  properties: corresponding fuel use, propane, furnace >100kW 0 MJ, heating value, net 1 MJ

## By-products
- electricity, high voltage: 0 kWh; name electricity; By-product classification allocatable product; CPC 17100: Electrical energy; undefined min 1.25778, max 1.25778, standardDeviation95 0, pedigree (1,1,3,1,1)
  Electricity output per MJ of oil burned.
  production volume 2.617e9 kWh; name apv_electricity
    Literature value. Data from the US Energy Information Administration for 2012, which provides data on net electricity production in each US State with various energy sources. Data from the States were aggregated on the level of US NERC regions. Data were given for the electricity production with total natural gas. This total production is split to production in electricity/CHP plants with a simple or combined cycle. This split is made based on information for total US (not specific to this NERC region) in the IEA electricity information (amount of electricity produced in electricity only and CHP plants) and information on installed electrical capacity with natural gas in the WEPP database.
    EIA. 2014. Statistics on electricity - Electricity data browser. Generation and thermal output. Net generation for electric power, annual. U.S. Energy Information Administration; Independent Statistics&Analysis.
    IEA. 2014. Electricity Information 2014. ISBN 978-92-64-21692-1. International Energy Agency (IEA), Paris Cedex (FR).
    WEPP 2014. World Electric Power Plants Database. PLATTS McGraw Hill Financial. http://www.platts.com/products/world-electric-power-plants-database
  property true value relation 3.6; name electricity_true_value_relation
    property to calculate "true value" from
  property price 0.0977 EUR2005; name electricity_price_EUR2005
    Temporary price data. Calculated as 90% of purchasers price based on: 94% of the average price (to account for a 6% loss in transformation and transmission) for electricity for industrial consumersin 2005 (excluded taxes). From IEA.
  property exergy 3.6 MJ; name electricity_exergy
    This exergy property is based on the exergy content of the product.
  property true value 0.0121501; name electricity_true_value
    (same comment as for heat, district or industrial, other than natural gas)

## Inputs from technosphere
- fly ash and scrubber sludge: -1.16803e-6 kg; name fly_ash; source Jungbluth, N. 2007, p. Tab. 12.27, p. 238; lognormal variance with pedigree 0.0433, pedigree (2,2,5,5,1)
  Average of literature data
  production volume 7563.13 kg; = apv_electricity * fly_ash
    Calculated from the production volume of electricity produced in proportion to the respective output amounts.
  property price 0 EUR2005; name fly_ash_price_EUR2005
  properties: wet mass 1 kg, dry mass 0.1 kg, water content 9, carbon content, fossil 0.167
  note on carbon content, fossil: Tab A.6, ecoinvent v2.2 report 13_I. C content has been calculated after data in the tables, and then referred to 1 kg DM
- ammonia, anhydrous, liquid: 2.5543e-5 kg; source Jungbluth, N. 2007, p. Tab. 12.11 p. 228; lognormal variance with pedigree 0.0546, pedigree (2,4,5,5,1)
  Literature value for flue gas treatment.
  IPPC (2001b) Integrated Pollution Prevention and Control (IPPC): Draft Reference Document on Best Available Techniques for Large Combustion Plants. European Commission Directorate- eneral JRC, Joint Research Centre, Seville, Spain, retrieved from: http://eippcb.jrc.es.
  properties: dry mass 1 kg, wet mass 1 kg
- water, decarbonised: 0.0211781 kg; name water_decarbonised_input; source Jungbluth, N. 2007, p. Tab. 12.10 p. 228; lognormal variance with pedigree 0.0439, pedigree (2,2,5,5,2)
  Literature value/estimation. Estimation based on several literature sources:
  Frischknecht R., Bollens U., Bosshart S., Ciot M., Ciseri L., Doka G., Dones R., Gantner U., Hischier R. and Martin A. (1996) Ökoinventare von Energiesystemen: Grundlagen für den ökologischen Vergleich von Energiesystemen und den Einbezug von Energiesystemen in Ökobilanzen für die Schweiz. 3. Gruppe Energie - Stoffe - Umwelt (ESU), Eidgenössische Technische Hochschule Zürich und Sektion Ganzheitliche Systemanalysen, Paul Scherrer Institut, Villigen, Bundesamt für Energie (Hrsg.), Bern, CH, retrieved from: www.energieforschung.ch.
  Powergen (2001) Environment Report 2000. Powergen UK, Coventry, UK, retrieved from: www.pgen.com
  ESB (1997) Environmental Review 1997. Electricity Supply Board, Dublin, IE, retrieved from: www.esb.ie
  EDP (2001) Environmental Report 2000. Electricidade de Portugal, S.A., Lisboa, PT, retrieved from: www.edp.pt
  IPPC (2001b) Integrated Pollution Prevention and Control (IPPC): Draft Reference Document on Best Available Techniques for Large Combustion Plants. European Commission Directorate-General JRC, Joint Research Centre, Seville, Spain, retrieved from: http://eippcb.jrc.es.
  properties: wet mass 1 kg
- municipal solid waste: -5.65826e-6 kg; name municipal_waste; source Jungbluth, N. 2007; lognormal variance with pedigree 0.0058, pedigree (2,3,3,5,1)
  Average of literature data
  production volume 36638 kg; = apv_electricity * municipal_waste
    (same comment as for fly ash and scrubber sludge)
  property price 0 EUR2005; name municipal_waste_price_EUR2005
  properties: heating value, net 11.74 MJ, water content 0.297017, carbon content, non-fossil 0.261655, wet mass 1 kg, carbon content, fossil 0.171549, dry mass 0.771 kg
  note on heating value, net: Value taken from the general comment of the treatment dataset.
  note on carbon content, non-fossil: MSW composition in tab 4.1, ecoinvent v2.2 report 13_I. C content referred to 1 kg DM
- heavy fuel oil: 0.00982113 kg; source Jungbluth, N. 2007; lognormal variance with pedigree 0.0433, pedigree (2,2,5,5,1)
  Literature data for heating value
  properties: dry mass 1 kg, wet mass 1 kg, heating value, net 41.2 MJ, carbon content, fossil 0.849
- oil power plant, 500MW: 5.0116e-13 unit; source Jungbluth, N. 2007; lognormal variance with pedigree 0.3506, pedigree (2,5,5,5,1)
  Estimation based on case study
- limestone, crushed, washed: 0.000557743 kg; source Jungbluth, N. 2007, p. Tab. 12.11 p. 228; lognormal variance with pedigree 0.0546, pedigree (2,4,5,5,1)
  (same comment as for ammonia, anhydrous, liquid)
  properties: dry mass 0.998 kg, carbon content, fossil 0.117257, water content 0.00200401, wet mass 1 kg
  note on carbon content, fossil: Table 3.1, ecoinvent v2.2 report 7, part VII, pg 3. MW CaCO3=100, MW MgCO3=84. C content of limestone is 0.117257 kg/kg DM
- water, completely softened: 0.00412245 kg; name water_softened_input; source Jungbluth, N. 2007, p. Tab. 12.10 p. 228; lognormal variance with pedigree 0.0439, pedigree (2,2,5,5,2)
  (same comment as for water, decarbonised)
  properties: wet mass 1 kg
- bilge oil: -9.57863e-7 kg; name bilge_oil; source Jungbluth, N. 2007; lognormal variance with pedigree 0.0438, pedigree (2,3,5,5,1)
  Average of literature data
  production volume 6202.29 kg; = apv_electricity * bilge_oil
    (same comment as for fly ash and scrubber sludge)
  property price 0 EUR2005; name bilge_oil_price_EUR2005
  properties: water content 9, dry mass 0.1 kg, wet mass 1 kg, carbon content, fossil 0.84, heating value, net 1.92 MJ
- residue from cooling tower: -4.72869e-6 kg; name cooling_tower; source Jungbluth, N. 2007, p. Tab. 12.27, p. 238; lognormal variance with pedigree 0.0438, pedigree (2,3,5,5,1)
  Average of literature data
  production volume 30618.9 kg; = apv_electricity * cooling_tower
    (same comment as for fly ash and scrubber sludge)
  property price 0 EUR2005; name cooling_tower_price_EUR2005
  properties: wet mass 1 kg, carbon content, fossil 0.0544233, dry mass 0.7 kg, water content 0.428571
- lignite ash: -3.14034e-5 kg; name lignite_ash; source Jungbluth, N. 2007; lognormal variance with pedigree 0.0438, pedigree (2,3,5,5,1)
  Average of literature data
  production volume 203341 kg; = apv_electricity * lignite_ash
    Calculated from the production volume of electricity produced in proportion to the respective output amounts. An extra amount has been added in the global dataset due to parent child relationship.
  property price 0 EUR2005; name lignite_ash_price_EUR2005
  properties: dry mass 1 kg, wet mass 1 kg
- waste mineral oil: -2.85338e-5 kg; name waste_oil; source Jungbluth, N. 2007; lognormal variance with pedigree 0.0438, pedigree (2,3,5,5,1)
  Average of literature data
  production volume 184760 kg; = apv_electricity *waste_oil
    (same comment as for fly ash and scrubber sludge)
  property price 0 EUR2005; name waste_oil_price_EUR2005
  properties: dry mass 0.9 kg, carbon content, fossil 0.864444, heating value, net 34.7 MJ, wet mass 1 kg, water content 0.111111

## Inputs from nature
- Water, cooling, unspecified natural origin [natural resource, in water]: 0.00215708 m3; name water_cooling_UNO_input; = ((recirculating_CS_fraction_from_allCS*WWithdrawal_EP_oil_recirculating_CS)+(once_through_andCP_CS_fractio_from_allCS*WWithdrawal_EP_oil_onceT_andCP_CS))/9.737; source Jungbluth, N. 2007, p. Tab. 12.10 p. 228; lognormal variance with pedigree 0.3432, pedigree (2,3,5,5,1)
  (same comment as for water, decarbonised)

## Emissions to nature
- Oils, unspecified [water, surface water]: 2.23906e-8 kg; source Jungbluth, N. 2007, p. Tab. 12.26, p. 238; lognormal variance with pedigree 0.0633, pedigree (2,2,5,5,2)
  Literature data/estimations. See Tab. 12.26 for details: concentration of pollutants in the wastewater of oil power plants and of flue gas treatment as well as in the condensate and feed water preparation. Mean of values for Europe, range of concentrations.
  Slovenské elektrárne (2002) Environment Report 2001, Bratislave, SK, retrieved from: www.seas.sk.
  EDP (2001) Environmental Report 2000. Electricidade de Portugal, S.A., Lisboa, PT, retrieved from: www.edp.pt.
  IPPC (2001b) Integrated Pollution Prevention and Control (IPPC): Draft Reference Document on Best Available Techniques for Large Combustion Plants. European Commission Directorate- General JRC, Joint Research Centre, Seville, Spain, retrieved from: http://eippcb.jrc.es.
- Cobalt [air, urban air close to ground]: 1.65706e-8 kg; source Jungbluth, N. 2007, p. Tab. 12.23, Tab. 12.24; lognormal variance with pedigree 1.2433, pedigree (2,2,5,5,2)
  Literature data, calculation, estimation. See tab 12.23 with element concentrations in dust (Pacyna 1982, Pacyna 1991); and tab. 12.24 with emission factors of heavy metals in fuel oil S (Richardson 1999, Powergen 2001).
  J.M. Pacyna, "Estimation of Emission Factors of Trace Metals from Oil-Fired Power Plants", Norvegian Institute for Air Research (NILU), Lillestrøm 1982
  J. Pacyna, "Trace Element Emissions from Coal-, and Oil- power Plants in Europe. Methodology of Calculations", Norvegian Institute for Air Research (NILU), Lillestrøm 1982
  J.M. Pacyna, "Emission Factors of Atmospheric Cd, Pb and Zn for Major Source Categories in Europe in 1950 through 1985", Norvegian Institute for Air Research (NILU), Lillestrøm 1991
  Richardson S. (1999) Atmospheric Emission Inventory Guidebook. Second Edition. EMEP: Co-operative Programme for Monitoring and Evaluation of the Long Range Transmission of Air Pollutants in Europe, CORINAIR: The Core Inventory of Air Emissions in Europe, EEA: European Environment Agency, Copenhagen, DK.
  Powergen (2001) Environment Report 2000. Powergen UK, Coventry, UK, retrieved from: www.pgen.com.
- Iron [air, urban air close to ground]: 2.82913e-8 kg; source Jungbluth, N. 2007; lognormal variance with pedigree 0.7126, pedigree (3,3,5,5,3)
  Literature
- Mercury [air, urban air close to ground]: 6.06243e-11 kg; source Jungbluth, N. 2007; lognormal variance with pedigree 1.6633, pedigree (2,2,5,5,2)
  Calculation from ranges
- Ethanol [air, urban air close to ground]: 1.99252e-7 kg; source Jungbluth, N. 2007; lognormal variance with pedigree 0.1233, pedigree (2,2,5,5,2)
  Calculation based on VOC emission. Deviation calculated from ranges
- Sulfur dioxide [air, urban air close to ground]: 6.50272e-5 kg; lognormal variance with pedigree 0.0039, pedigree (2,2,3,1,2)
  Literature value. Data from eGrid 2010, valid for the year 2010.
  eGrid. The Emissions & Generation Resource Integrated Database. Year 2010 eGRID 9th edition Version 1.0 . United States Environmental Protection Agency.
- Sodium [air, urban air close to ground]: 1.2044e-7 kg; source Jungbluth, N. 2007, p. Tab. 12.25; lognormal variance with pedigree 0.1026, pedigree (3,3,5,5,3)
  Literature data/calculation. See Tab. 12.25 for details.
- Vanadium, ion [water, surface water]: 1.4469e-8 kg; source Jungbluth, N. 2007, p. Tab. 12.26, p. 238; lognormal variance with pedigree 0.7033, pedigree (2,2,5,5,2)
  (same comment as for Oils, unspecified)
- Hypochlorite [water, surface water]: 1.3499e-7 kg; source Jungbluth, N. 2007; lognormal variance with pedigree 0.104, pedigree (3,4,5,5,3)
  Literature
- Water [water, unspecified]: 0.000240543 m3; name water_to_water_unspecified; = (water_softened_input/1000)*(1-fraction_WCS_to_air)+(water_decarbonised_input/1000)*(1-fraction_WDC_to_air)+water_cooling_UNO_input*(1-fraction_CW_to_air)*(efficiency_oil_country/3.6); lognormal variance with pedigree 0.130025, pedigree (4,4,5,2,4)
  Calculated value based on literature values and expert opinion. See comments in the parametres" comment field.
  property fraction, origin: unspecified 0.987263; name fraction_origin_unspecified_Ww
  property fraction, origin: fresh water 0.0127368; name fraction_origin_fresh_water_Ww
  property fraction, origin: salt water 0; name fraction_origin_salt_water_Ww
- Particulates, < 2.5 um [air, urban air close to ground]: 3.57279e-6 kg; source Jungbluth, N. 2007, p. Tab. 12.17 / Tab. 12.18; lognormal variance with pedigree 0.3507, pedigree (2,2,5,5,3)
  Literature value/estimation. Compilation from different sources - see Tab. 12.17 fo details. Particle emissions mainly depend on the composition of the fuel, the type of combustion and the combustion conditions.
  Particle size fractions are adopted from Berdowski et al .2002 (see Tab. 12.18).
  Berdowski J., Visschedijk A., Creemers E. and Pulles T. (2002) The Coordinated European Programme on Particulate Matter Emission Inventories, Projections and Guidance (CEPMEIP) Database. TNO-MEP, Apeldoorn, NL, retrieved from: www.air.sk/tno/cepmeip/
- Carbon dioxide, fossil [air, urban air close to ground]: 0.0292606 kg; lognormal variance with pedigree 0.0039, pedigree (2,2,3,1,2)
  (same comment as for Sulfur dioxide)
- Hydrocarbons, aliphatic, unsaturated [air, urban air close to ground]: 1.99252e-8 kg; source Jungbluth, N. 2007; lognormal variance with pedigree 0.1233, pedigree (2,2,5,5,2)
  Calculation based on VOC emission. Deviation calculated from ranges
- Sulfite [water, surface water]: 7.11325e-7 kg; source Jungbluth, N. 2007, p. Tab. 12.26, p. 238; lognormal variance with pedigree 0.0633, pedigree (2,2,5,5,2)
  (same comment as for Oils, unspecified)
- Chromium, ion [water, surface water]: 1.20036e-9 kg; source Jungbluth, N. 2007, p. Tab. 12.26, p. 238; lognormal variance with pedigree 0.6633, pedigree (2,2,5,5,2)
  (same comment as for Oils, unspecified)
- Dinitrogen monoxide [air, urban air close to ground]: 1.6894e-6 kg; source Jungbluth, N. 2007, p. Tab. 12.16 p. 232; lognormal variance with pedigree 0.3833, pedigree (2,2,5,5,2)
  Literature value/estimation. Compilation from different sources - see Tab. 12.16 for details.
- Zinc [air, urban air close to ground]: 1.13569e-8 kg; source Jungbluth, N. 2007; lognormal variance with pedigree 1.2433, pedigree (2,2,5,5,2)
  Calculation based on particle emission. Deviation calculated from ranges
- Lead [water, surface water]: 1.97231e-9 kg; source Jungbluth, N. 2007, p. Tab. 12.26, p. 238; lognormal variance with pedigree 0.5333, pedigree (2,2,5,5,2)
  (same comment as for Oils, unspecified)
- Manganese [water, surface water]: 1.41861e-9 kg; source Jungbluth, N. 2007, p. Tab. 12.26, p. 238; lognormal variance with pedigree 0.0439, pedigree (2,2,5,5,2)
  (same comment as for Oils, unspecified)
- Manganese [air, urban air close to ground]: 5.21369e-9 kg; source Jungbluth, N. 2007, p. Tab. 12.23, Tab. 12.24; lognormal variance with pedigree 1.2433, pedigree (2,2,5,5,2)
  (same comment as for Cobalt)
- Molybdenum [air, urban air close to ground]: 3.60108e-9 kg; source Jungbluth, N. 2007; lognormal variance with pedigree 1.2433, pedigree (2,2,5,5,2)
  Calculation based on particle emission. Deviation calculated from ranges
- Acetone [air, urban air close to ground]: 9.78071e-8 kg; source Jungbluth, N. 2007; lognormal variance with pedigree 0.132, pedigree (1,1,5,5,1)
  Calculation based on VOC emission. Deviation calculated from ranges
- AOX, Adsorbable Organic Halogen as Cl [water, surface water]: 9.78071e-8 kg; source Jungbluth, N. 2007, p. Tab. 12.26, p. 238; lognormal variance with pedigree 0.0439, pedigree (2,2,5,5,2)
  (same comment as for Oils, unspecified)
- Chromium VI [air, urban air close to ground]: 1.25694e-10 kg; source Jungbluth, N. 2007, p. Tab. 12.23, Tab. 12.24; lognormal variance with pedigree 2.2846, pedigree (3,3,5,5,1)
  (same comment as for Cobalt)
- Zinc, ion [water, surface water]: 2.49772e-9 kg; source Jungbluth, N. 2007, p. Tab. 12.26, p. 238; lognormal variance with pedigree 0.2933, pedigree (2,2,5,5,2)
  (same comment as for Oils, unspecified)
- Nickel, ion [water, surface water]: 7.03241e-9 kg; source Jungbluth, N. 2007, p. Tab. 12.26, p. 238; lognormal variance with pedigree 0.3733, pedigree (2,2,5,5,2)
  (same comment as for Oils, unspecified)
- Beryllium [air, urban air close to ground]: 2.25522e-11 kg; source Jungbluth, N. 2007; lognormal variance with pedigree 0.6946, pedigree (3,3,5,5,1)
  Literature
- Hydrocarbons, aromatic [air, urban air close to ground]: 3.98503e-9 kg; source Jungbluth, N. 2007; lognormal variance with pedigree 0.1233, pedigree (2,2,5,5,2)
  Calculation based on VOC emission. Deviation calculated from ranges
- Copper, ion [water, surface water]: 9.94238e-10 kg; source Jungbluth, N. 2007, p. Tab. 12.26, p. 238; lognormal variance with pedigree 0.7533, pedigree (2,2,5,5,2)
  (same comment as for Oils, unspecified)
- Acetic acid [air, urban air close to ground]: 3.98503e-7 kg; source Jungbluth, N. 2007; lognormal variance with pedigree 0.132, pedigree (1,1,5,5,1)
  Calculation based on VOC emission. Deviation calculated from ranges
- Arsenic [air, urban air close to ground]: 3.12821e-9 kg; source Jungbluth, N. 2007, p. Tab. 12.23, Tab. 12.24; lognormal variance with pedigree 1.1933, pedigree (2,2,5,5,2)
  (same comment as for Cobalt)
- Copper [air, urban air close to ground]: 2.04506e-8 kg; source Jungbluth, N. 2007, p. Tab. 12.23, Tab. 12.24; lognormal variance with pedigree 1.3433, pedigree (2,2,5,5,2)
  (same comment as for Cobalt)
- Mercury [water, surface water]: 4.97119e-11 kg; source Jungbluth, N. 2007, p. Tab. 12.26, p. 238; lognormal variance with pedigree 0.5933, pedigree (2,2,5,5,2)
  (same comment as for Oils, unspecified)
- Nitrogen [water, surface water]: 3.22925e-6 kg; source Jungbluth, N. 2007, p. Tab. 12.26, p. 238; lognormal variance with pedigree 0.0633, pedigree (2,2,5,5,2)
  (same comment as for Oils, unspecified)
- Particulates, > 2.5 um, and < 10um [air, urban air close to ground]: 2.50984e-6 kg; source Jungbluth, N. 2007, p. Tab. 12.17 / Tab. 12.18; lognormal variance with pedigree 0.1707, pedigree (2,2,5,5,3)
  (same comment as for Particulates, < 2.5 um)
- Nickel [air, urban air close to ground]: 1.24886e-7 kg; source Jungbluth, N. 2007; lognormal variance with pedigree 1.2433, pedigree (2,2,5,5,2)
  Calculation based on particle emission. Deviation calculated from ranges
- DOC, Dissolved Organic Carbon [water, surface water]: 3.63255e-8 kg; source Jungbluth, N. 2007; lognormal variance with pedigree 0.0439, pedigree (2,2,5,5,2)
  Calculated as equal to TOC.
- Formaldehyde [air, urban air close to ground]: 2.9908e-7 kg; source Jungbluth, N. 2007, p. Tab. 12.19, Tab. 12.20; lognormal variance with pedigree 0.1233, pedigree (2,2,5,5,2)
  Literature/calculation/estimation. Calculation based on VOC emissions in Tab. 12.19 (compilation of different sources) and Veldt 1991.
  C. Veldt, "Default Emission Factors (VOC Profiles), Draft Report, Corinair Inventory Part 7, Commission of the European Community, September 1991
- Hydrogen chloride [air, urban air close to ground]: 1.82277e-8 kg; source Jungbluth, N. 2007, p. Tab. 12.25; lognormal variance with pedigree 0.0912, pedigree (2,3,5,5,3)
  Literature data/calculation. See Tab. 12.25 for details.
- Particulates, > 10 um [air, urban air close to ground]: 3.39496e-6 kg; source Jungbluth, N. 2007, p. Tab. 12.17 / Tab. 12.18; lognormal variance with pedigree 0.0907, pedigree (2,2,5,5,3)
  (same comment as for Particulates, < 2.5 um)
- Methanol [air, urban air close to ground]: 1.99252e-7 kg; source Jungbluth, N. 2007; lognormal variance with pedigree 0.1233, pedigree (2,2,5,5,2)
  Calculation based on VOC emission. Deviation calculated from ranges
- Carbon dioxide, fossil [air, unspecified]: 0.000249772 kg; source Jungbluth, N. 2007, p. Tab. 12.29, Tab. 12.30; lognormal variance with pedigree 0.0606, pedigree (2,5,5,5,1)
  Literature value. CO2 emissions from flue gas treatment with limestone use.
- Cadmium [air, urban air close to ground]: 1.4954e-9 kg; source Jungbluth, N. 2007, p. Tab. 12.23, Tab. 12.24; lognormal variance with pedigree 1.2433, pedigree (2,2,5,5,2)
  (same comment as for Cobalt)
- Suspended solids, unspecified [water, surface water]: 9.78071e-7 kg; source Jungbluth, N. 2007, p. Tab. 12.26, p. 238; lognormal variance with pedigree 0.0833, pedigree (2,2,5,5,2)
  (same comment as for Oils, unspecified)
- Chloride [water, surface water]: 9.65946e-6 kg; source Jungbluth, N. 2007, p. Tab. 12.26, p. 238; lognormal variance with pedigree 0.9233, pedigree (2,2,5,5,2)
  (same comment as for Oils, unspecified)
- Hypochlorite [water, ocean]: 1.47923e-7 kg; source Jungbluth, N. 2007; lognormal variance with pedigree 0.094, pedigree (3,4,5,5,3)
  Literature
- Lead [air, urban air close to ground]: 1.49944e-8 kg; source Jungbluth, N. 2007; lognormal variance with pedigree 1.2433, pedigree (2,2,5,5,2)
  Calculation based on particle emission. Deviation calculated from ranges
- Iron, ion [water, surface water]: 4.97119e-8 kg; source Jungbluth, N. 2007, p. Tab. 12.26, p. 238; lognormal variance with pedigree 0.2733, pedigree (2,2,5,5,2)
  (same comment as for Oils, unspecified)
- Hydrogen fluoride [air, urban air close to ground]: 1.21653e-8 kg; source Jungbluth, N. 2007, p. Tab. 12.25; lognormal variance with pedigree 0.0912, pedigree (2,3,5,5,3)
  Literature data/calculation. See Tab. 12.25 for details.
- Fluoride [water, surface water]: 8.04282e-8 kg; source Jungbluth, N. 2007, p. Tab. 12.26, p. 238; lognormal variance with pedigree 0.7933, pedigree (2,2,5,5,2)
  (same comment as for Oils, unspecified)
- Sulfide [water, surface water]: 2.12589e-8 kg; source Jungbluth, N. 2007, p. Tab. 12.26, p. 238; lognormal variance with pedigree 0.3033, pedigree (2,2,5,5,2)
  (same comment as for Oils, unspecified)
- Benzo(a)pyrene [air, urban air close to ground]: 6.06243e-12 kg; source Jungbluth, N. 2007; lognormal variance with pedigree 0.3726, pedigree (3,3,5,5,3)
  Literature
- Cadmium, ion [water, surface water]: 1.14782e-10 kg; source Jungbluth, N. 2007, p. Tab. 12.26, p. 238; lognormal variance with pedigree 0.4533, pedigree (2,2,5,5,2)
  (same comment as for Oils, unspecified)
- Dioxins, measured as 2,3,7,8-tetrachlorodibenzo-p-dioxin [air, urban air close to ground]: 4.2437e-15 kg; source Jungbluth, N. 2007, p. Tab. 12.22 p. 235; lognormal variance with pedigree 0.3452, pedigree (2,4,5,5,2)
  Measurement made in Great Britain (Powergen 2001) and estimation (see Tab. 12.22)
  Powergen (2001) Environment Report 2000. Powergen UK, Coventry, UK, retrieved from: www.pgen.com.
- Thallium [water, surface water]: 1.46307e-9 kg; source Jungbluth, N. 2007, p. Tab. 12.26, p. 238; lognormal variance with pedigree 0.0439, pedigree (2,2,5,5,2)
  (same comment as for Oils, unspecified)
- Methane, fossil [air, urban air close to ground]: 1.99252e-6 kg; source Jungbluth, N. 2007, p. Tab. 12.19, Tab. 12.20; lognormal variance with pedigree 0.1233, pedigree (2,2,5,5,2)
  (same comment as for Formaldehyde)
- PAH, polycyclic aromatic hydrocarbons [air, urban air close to ground]: 7.03241e-10 kg; source Jungbluth, N. 2007, p. Tab. 12.21, p. 235; lognormal variance with pedigree 0.3626, pedigree (2,4,5,5,3)
  Literature value/estimation. Compilation of different emissions from Masclet et al. 1987- see Tab. 12.21 for details.
  P. Masclet, M.A. Bresson, G. Mouvier, "Polycyclic Aromatic Hydrocarbons Emitted by Power Stations, and the Influence of Combustion Conditions", in Fuel Vol. 66, Nr. 4, S. 556-562
- Calcium [air, urban air close to ground]: 1.21249e-8 kg; source Jungbluth, N. 2007, p. Tab. 12.25; lognormal variance with pedigree 0.0926, pedigree (3,3,5,5,3)
  Literature data/calculation. See Tab. 12.25 for details.
- Propane [air, urban air close to ground]: 1.99252e-8 kg; source Jungbluth, N. 2007, p. Tab. 12.19, Tab. 12.20; lognormal variance with pedigree 0.1233, pedigree (2,2,5,5,2)
  (same comment as for Formaldehyde)
- Benzene [air, urban air close to ground]: 1.99252e-8 kg; source Jungbluth, N. 2007; lognormal variance with pedigree 0.1233, pedigree (2,2,5,5,2)
  Calculation based on VOC emission. Deviation calculated from ranges
- Acetaldehyde [air, urban air close to ground]: 9.78071e-8 kg; source Jungbluth, N. 2007; lognormal variance with pedigree 0.132, pedigree (1,1,5,5,1)
  Calculation based on VOC emission. Deviation calculated from ranges
- Cobalt [water, surface water]: 9.45738e-11 kg; source Jungbluth, N. 2007, p. Tab. 12.26, p. 238; lognormal variance with pedigree 0.0439, pedigree (2,2,5,5,2)
  (same comment as for Oils, unspecified)
- BOD5, Biological Oxygen Demand [water, surface water]: 7.07283e-7 kg; source Jungbluth, N. 2007, p. Tab. 12.26, p. 238; lognormal variance with pedigree 0.3233, pedigree (2,2,5,5,2)
  (same comment as for Oils, unspecified)
- Chromium [air, urban air close to ground]: 5.41577e-9 kg; source Jungbluth, N. 2007, p. Tab. 12.23, Tab. 12.24; lognormal variance with pedigree 1.4553, pedigree (2,2,3,5,2)
  (same comment as for Cobalt)
- TOC, Total Organic Carbon [water, surface water]: 4.04162e-7 kg; source Jungbluth, N. 2007, p. Tab. 12.26, p. 238; lognormal variance with pedigree 0.0439, pedigree (2,2,5,5,2)
  (same comment as for Oils, unspecified)
- Tin, ion [water, surface water]: 4.72869e-11 kg; source Jungbluth, N. 2007, p. Tab. 12.26, p. 238; lognormal variance with pedigree 0.0439, pedigree (2,2,5,5,2)
  (same comment as for Oils, unspecified)
- Selenium [air, urban air close to ground]: 2.36839e-9 kg; source Jungbluth, N. 2007; lognormal variance with pedigree 1.2433, pedigree (2,2,5,5,2)
  Calculation based on particle emission. Deviation calculated from ranges
- Hydrocarbons, aliphatic, alkanes, unspecified [air, urban air close to ground]: 3.98503e-7 kg; source Jungbluth, N. 2007; lognormal variance with pedigree 0.1233, pedigree (2,2,5,5,2)
  Calculation based on VOC emission. Deviation calculated from ranges
- Carbon monoxide, fossil [air, urban air close to ground]: 6.7495e-6 kg; source Jungbluth, N. 2007, p. Tab. 12.13, p. 229; lognormal variance with pedigree 0.1933, pedigree (2,2,5,5,2)
  Literature value/estimation. Compilation from different sources - see Tab. 12.13 for details.
- Ammonia [air, urban air close to ground]: 4.84994e-8 kg; source Jungbluth, N. 2007, p. p.232; lognormal variance with pedigree 1.0433, pedigree (2,2,5,5,2)
  Literature value/estimation. Compilation from different sources
- Vanadium [air, urban air close to ground]: 4.52661e-7 kg; source Jungbluth, N. 2007; lognormal variance with pedigree 1.4233, pedigree (2,2,5,5,2)
  Calculation based on particle emission. Deviation calculated from ranges
- Water [air, unspecified]: 5.85854e-6 m3; name water_to_air_unspecified; = (water_softened_input/1000)*fraction_WCS_to_air+(water_decarbonised_input/1000)*fraction_WDC_to_air+water_cooling_UNO_input*fraction_CW_to_air*(efficiency_oil_country/3.6); lognormal variance with pedigree 0.130025, pedigree (4,4,5,2,4)
  (same comment as for Water)
  property fraction, origin: unspecified 0.974393; name fraction_origin_unspecified
  property fraction, origin: salt water 0; name fraction_origin_salt_water
  property fraction, origin: fresh water 0.0256067; name fraction_origin_fresh_water
- Sulfate [water, surface water]: 7.88115e-5 kg; source Jungbluth, N. 2007, p. Tab. 12.26, p. 238; lognormal variance with pedigree 0.0533, pedigree (2,2,5,5,2)
  (same comment as for Oils, unspecified)
- Arsenic, ion [water, surface water]: 4.72869e-11 kg; source Jungbluth, N. 2007, p. Tab. 12.26, p. 238; lognormal variance with pedigree 0.0439, pedigree (2,2,5,5,2)
  (same comment as for Oils, unspecified)
- Hydrocarbons, unspecified [water, surface water]: 1.46711e-8 kg; source Jungbluth, N. 2007, p. Tab. 12.26, p. 238; lognormal variance with pedigree 0.0733, pedigree (2,2,5,5,2)
  (same comment as for Oils, unspecified)
- Phosphorus [water, surface water]: 7.31533e-9 kg; source Jungbluth, N. 2007, p. Tab. 12.26, p. 238; lognormal variance with pedigree 0.0439, pedigree (2,2,5,5,2)
  (same comment as for Oils, unspecified)
- COD, Chemical Oxygen Demand [water, surface water]: 7.71949e-7 kg; source Jungbluth, N. 2007, p. Tab. 12.26, p. 238; lognormal variance with pedigree 0.5133, pedigree (2,2,5,5,2)
  (same comment as for Oils, unspecified)
- Nitrogen oxides [air, urban air close to ground]: 7.02659e-5 kg; lognormal variance with pedigree 0.0433, pedigree (2,2,3,1,2)
  (same comment as for Sulfur dioxide)

## Sampling procedure
Literature, environmental reports and questionnaires

## Extrapolations
The exchanges in this datasets are a weighted average of the following country oil datasets in the ecoinvent database (weighting with electricity production volumes in 2012):
AT, BE, BR, GR, CN, CS, CZ, DE, DK, ES, FI, FR, GB, GR, HR, HU, IE, IT, JP, MK, NL, NO, PT, PL, SE, SI, SK Data are originally from sources from the 90ies. Uncertainty has been adjusted accordingly.

## Review by Carl Vadenbo 2015-07-24
The update of the whole electricity sector for the ecoinvent v3.2 database consist of hundreds of datasets. All these datasets have passed through a streamlined review processes where the underlying modelling of production volumes, technology shares and efficiencies was reviewed in detail prior to the datasets being submitted to the database.
