# coconut production, dehusked

Dataset: EcoSpold 2, unit process
Geography: PH
Time period: 2009-01-01 to 2021-12-31
Technology level: current
Classification: ISIC rev.4 ecoinvent: 0126:Growing of oleaginous fruits
Tags: WFLDB
Scenario: Business-as-Usual
System model: Allocation, cut-off by classification
Generated by: Cecile Guignard
Published in: Nemecek T. 2015
Database: ecoinvent
isCopyrightProtected: true
accessRestrictedTo: 1

## General comment
This dataset represents the production of 1 kg of coconut after manual dehusking at the farm. The co-product 'coconut husk' in included in the inventory. The reference flow is the average yield per ha and year, from 2009 - 2012: yield (4.4 t/ha) obtained under irrigated conditions (total amount of water 3076 m3/ha). The data are representative for coconut production in the Philippines used for the export market. Mineral NPK fertiliser input is 44-0-56 kg/ha. Organic fertilisers applied amount to 1.67 m3/ha of liquid manure and 1.5 t/ha of solid manure. Total active ingredients (a.i.) applied as pesticides amount to 5.7 kg a.i./ha.
Coconut husk, is considered as a co-product of coconut production. Total coconut husk = 2.82 t/ha
The dataset was modelled within the project 'World Food LCA database (WFLDB)'. The aim of this project was to provide inventories of a broad variety of agricultural products and processes and to cover for each product at least 50% of the global export market. The export share of coconut produced in the Philippines amounts to 55.9 % of the global export (tonnage exported in 2010). The production system regarded in this dataset aimed at representing coconut produced the Philippines for the export market.
Statistical data from FAO used to assess land use change is incomplete for the Philippines. The original land use of 96.8% of perennial cropland transformed in the last 20 years is unknown. To avoid a potentially significant underestimation of land use change impacts, the conservative assumption was made that the unknown land transformation share shall be attributed to transformation from forest land (primary and secondary).
PEF-Quality: data quality rating (DQR) = 2.2 (i.e. good quality). This dataset refers to an average situation; for specific situations exchanges might differ substantially due to site specific parameters

## Included activities start
This activity starts with the nursery producing fruit tree seedlings, i.e.grafted young trees to be planted.

## Included activities end
This activity ends with the waste treatment after the clearing of the orchard (rooting up the trees). The dataset includes all activities during a year in the productive phase of the orchard including the establishment phase per year of lifetime (60 years), the clearing of the orchard including waste treatment.
The establishment phase of the orchard includes tree nursery, soil cultivation, planting trees, sowing grass, installation of trellis system (posts and wires) and irrigation. Fertiliser and pesticide use in a year of the establishment phase is assumed to be half of the amount of a year in the productive phase.
The productive phase of the orchard includes limited machine operations such as fertiliser and pesticide application and irrigation. Most machine use and infrastructure are excluded as many activities (such as harvesting) are assumed to be manual work. Further, direct field emissions and land use change are included. At the end of the productive phase the orchard is cleared by rooting up the trees.
The inputs of seedlings, fertilisers and pesticides as well as packaging of fertilisers and pesticides are considered. The dataset doesn't include emissions from manure storage because these are within the system boundary of animal production. Heavy metal uptake by the crop is considered.

## Technology
Conventional production

## Parameters
- LUC_crop_specific: 1 dimensionless
  This parameter allows to switch between a 'crop specific' and a 'country specific' approach when calculating the LUC of a crop. By default, the chosen approach is 'crop specific', so the value of the parameter is 1. If you want to apply a 'country specific' approach, turn the parameter to 0.
- heavyMetalUptakeSwitch: 1 dimensionless

## Reference product
- coconut, dehusked: 1 kg; CPC 21429: Other shelled nuts; By-product classification allocatable product
  Yield = 4415.4 kg/ha
  production volume 9.49844e9 kg
    Source: FAOSTAT. Average, 2009-2012. Husked (100%) = dehusked (61%) + husk (39%)
  property price 0.26 EUR2005
    Estimated. The price is estimate to be 30% more than of the coconut, husked.
  property carbon content, non-fossil 0.708236
    calculation: C-content of components according to ecoinvent report No. 15a. Source of composition: Souci, S.W., Fachmann, W., Kraut, H. (Hg.: Bundesminsiterium fur Ernahrung, Landwirtschaft und Forsten, Bonn) 'Die Zusammensetzung der Lebensmittel - Nahrwerttabellen', medpharm Scientific Publishers Stuttgart, CRC Press; 2000.
  property carbon content 0.708236
    carbon content on a dry matter basis (reserved; not for manual entry)
  properties: water in wet mass 0.308437 kg, water content 0.446, carbon content, fossil 0, dry mass 0.691563 kg, wet mass 1 kg, carbon allocation 0.48979 kg

## By-products
- coconut husk: 0 kg; CPC 01913: Cereal straw, husks, unprepared, ground, pressed, or in the form of pellets; By-product classification Recyclable
  Yield = 2823.0 kg/ha
  production volume 0 kg
    Calculated from reference product production volume, reference product amount and byproduct amount.
  property price 0.198 EUR2005
    Calculated value based on data from United Nations Commodity Trade Statistics Database (comtrade.un.org). UN comtrade category: 530511 Coconut (coir) fibre, raw. Year: 2005. Using exchange rate of 1EURO = 1.209 USD. Average of price of import into 5 main markets (EU, US, JP, IN and CN).
  property carbon content, non-fossil 0.52
    calculation: C-content of components according to ecoinvent report No. 15a. Source of composition: Jasper Guy Woodroof (1979). 'Coconuts: Production, Processing, Products'. 2nd ed. AVI Publishing Co. Inc.
  property carbon content 0.52
    carbon content on a dry matter basis (reserved; not for manual entry)
  properties: carbon content, fossil 0, dry mass 0.53 kg, water in wet mass 0.47 kg, water content 0.886792, wet mass 1 kg, carbon allocation 0.2756 kg

## Inputs from technosphere
- transport, tractor and trailer, agricultural: 0.00200002 metric ton*km; lognormal variance with pedigree 0.162439, pedigree (4,1,4,1,1)
  On-farm transport: Yield (in tonnes) multiplied by the average distance from field to farm. The distance was assumed to be 2 km (proxy).
- waste wood, untreated: -0.0754813 kg; lognormal variance with pedigree 0.124177, pedigree (2,1,4,1,1)
  Wood from trees after 1-2 years of sorrage at the field (20% water) per lifetime year (estimated 60 years in this dataset) of the orchard
  production volume 7.16954e8 kg
    Calculated from the reference product amount and production volume
  properties: heating value, net 13.99 MJ, dry mass 0.8 kg, carbon content, non-fossil 0.48632, wet mass 1 kg, water content 0.25
  note on heating value, net: Value taken from the general comment of the treatment dataset.
- glyphosate: 0.00114198 kg; lognormal variance with pedigree 0.0138498, pedigree (2,2,4,1,1)
  Proxy: Source for total amount of pesticides: extrapolated with MEXALCA from similar crop. Active ingredient is calculated based on Ecoinvent dataset Palm fruit bunch ID. For calculations see supporting documentation 'WFLDB-Documentation.pdf' (https://ecoquery.ecoinvent.org/File/Reports).
  properties: wet mass 1 kg, dry mass 1 kg, carbon content, fossil 0.214286
- packaging, for fertilisers: 0.0450264 kg; lognormal variance with pedigree 0.0592, pedigree (4,3,4,5,4)
  Total amount of active substance/s of fertilisers needed for the production of 'coconut, dehusked' is calculated to be circa 2.25E-02 kg. Fertiliser/s used in this dataset is/are: 'ammonium sulfate, as N', 'nitrogen fertiliser, as N', 'potassium chloride, as K2O', 'potassium fertiliser, as K2O', 'potassium sulfate, as K2O', 'urea, as N'. The total amount of active substance/s is doubled in order to account for the packaging of the dilluted product of fertiliser/s that is/are applied. Therefore, 4.50E-02 kg of packaging for fertilisers is justified with this exchange.
  properties: price 0.0642 EUR2005, carbon content, fossil 0.825301, wet mass 1 kg, heating value, net 25.01 MJ, dry mass 1 kg
  note on carbon content, fossil: Considering a chemical formula (C2H4)n for polyethylene, carbon content-fossil is calculated to be 0.856286 kg of Carbon per kg of dry mass.
- pyrethroid-compound: 0.000148954 kg; lognormal variance with pedigree 0.0138498, pedigree (2,2,4,1,1)
  (same comment as for glyphosate)
  properties: carbon content, fossil 0.623, wet mass 1 kg, dry mass 1 kg
- planting tree: 0.000660627 unit; lognormal variance with pedigree 0.124177, pedigree (2,1,4,1,1)
  Proxy: Similar to India. This is the number of trees per ha (i.e. 175) divided by the lifetime years of the orchard (i.e, 60 years)
- fruit tree seedling, for planting: 0.00838724 unit; lognormal variance with pedigree 0.124177, pedigree (2,1,4,1,1)
  Proxy: Similar crop and country used. This is the number of trees per ha divided by the lifetime years of the orchard.
  properties: water content 0.73, carbon content, non-fossil 0.439481, wet mass 1 kg, dry mass 0.578035 kg
  note on carbon content, non-fossil: calculation: C-content of components according to ecoinvent report No. 15a. Source of composition: https://ndb.nal.usda.gov/ndb/search/. Unspecific seedling used as proxy.
- establishing orchard: 0.00838724 unit; lognormal variance with pedigree 0.124177, pedigree (2,1,4,1,1)
  (same comment as for fruit tree seedling, for planting)
- irrigation: 0.696549 m3; lognormal variance with pedigree 0.124177, pedigree (2,1,4,1,1)
  Calculated value: The total amount of water used for irrigation (calculated from evapotranspiration, Pfister et al. 2011) multiplied by the country-share of irrigation technique (WFLDB-Guidelines.pdf, Appendix 6.1). See supporting documentation 'WFLDB-Documentation.pdf' chapter 'Water use for irrigation' for L2 data (https://ecoquery.ecoinvent.org/File/Reports).
  properties: wet mass 1000 kg, dry mass 0.11 kg, water content 9089.91
- inorganic nitrogen fertiliser, as N: 0.00496705 kg; lognormal variance with pedigree 0.124177, pedigree (2,1,4,1,1)
  Calculated based on literature values: The nutrient content of the crop multiplied by the country-share of the fertiliser type (IFA 2014). See supporting documentation 'WFLDB-Documentation.pdf' chapter 'Fertiliser application' for L1 data and appendix for the source of nutrient content (https://ecoquery.ecoinvent.org/File/Reports).
  properties: wet mass 1 kg, dry mass 1 kg
- land use change, perennial crop: 2.70644e-5 ha; = 2.70643656294e-05*LUC_crop_specific+1.86846038864e-05*(1-LUC_crop_specific)
  Calculated value. Land use change (LUC) combines land transformation areas calculated with the adapted 'Direct Land Use Change Assessment Tool' version 2014 developed by Blonk Consultants and the carbon losses from soil organic carbon (SOC) and vegetation (VEG) as calculated in ecoinvent v3. See 'WFLDB-Guidelines.pdf', available at https://ecoquery.ecoinvent.org/File/Reports.
- ammonium sulfate: 0.00174188 kg; lognormal variance with pedigree 0.124177, pedigree (2,1,4,1,1)
  Calculated based on literature values: The nutrient content of the crop multiplied by the country-share of the fertiliser type (IFA 2014). See supporting documentation 'WFLDB-Documentation.pdf' chapter 'Fertiliser application' for L1 data and appendix for the source of nutrient content (https://ecoquery.ecoinvent.org/File/Reports).
  Corresponds to 7.69 kg/ha
  properties: wet mass 1 kg, dry mass 1 kg
- urea: 0.00676243 kg; lognormal variance with pedigree 0.124177, pedigree (2,1,4,1,1)
  The exchange has been updated from 'urea, as N' into 'urea' and therefore its amount has been scaled (multiplied) from 0.0032 kg by 2.1438 kg of 'urea' per kg of 'urea, as N'. Original comment of the exchange is: Calculated based on literature values: The nutrient content of the crop multiplied by the country-share of the fertiliser type (IFA 2014). See supporting documentation 'WFLDB-Documentation.pdf' chapter 'Fertiliser application' for L1 data and appendix for the source of nutrient content (https://ecoquery.ecoinvent.org/File/Reports).
  properties: wet mass 1 kg, carbon content, fossil 0.2, dry mass 1 kg
- potassium chloride: 0.00338939 kg; lognormal variance with pedigree 0.124177, pedigree (2,1,4,1,1)
  The exchange has been updated from 'potassium chloride, as K2O' into 'potassium chloride' and therefore its amount has been scaled (multiplied) from 0.0021 kg by 1.5829 kg of 'potassium chloride' per kg of 'potassium chloride, as K2O'. Original comment of the exchange is: Calculated based on literature values: The nutrient content of the crop multiplied by the country-share of the fertiliser type (IFA 2014). See supporting documentation 'WFLDB-Documentation.pdf' chapter 'Fertiliser application' for L1 data and appendix for the source of nutrient content (https://ecoquery.ecoinvent.org/File/Reports).
  Corresponds to 9.45 kg/ha
  properties: wet mass 1 kg, dry mass 1 kg
- inorganic potassium fertiliser, as K2O: 0.00952032 kg; lognormal variance with pedigree 0.124177, pedigree (2,1,4,1,1)
  Calculated based on literature values: The nutrient content of the crop multiplied by the country-share of the fertiliser type (IFA 2014). See supporting documentation 'WFLDB-Documentation.pdf' chapter 'Fertiliser application' for L1 data and appendix for the source of nutrient content (https://ecoquery.ecoinvent.org/File/Reports).
  Corresponds to 42.0 kg/ha
  properties: dry mass 1 kg, wet mass 1 kg
- potassium sulfate: 0.00182826 kg; lognormal variance with pedigree 0.124177, pedigree (2,1,4,1,1)
  The exchange has been updated from 'potassium sulfate, as K2O' into 'potassium sulfate' and therefore its amount has been scaled (multiplied) from 0.001 kg by 1.85 kg of 'potassium sulfate' per kg of 'potassium sulfate, as K2O'. Original comment of the exchange is: Calculated based on literature values: The nutrient content of the crop multiplied by the country-share of the fertiliser type (IFA 2014). See supporting documentation 'WFLDB-Documentation.pdf' chapter 'Fertiliser application' for L1 data and appendix for the source of nutrient content (https://ecoquery.ecoinvent.org/File/Reports).
  Corresponds to 4.36 kg/ha
  properties: dry mass 1 kg, wet mass 1 kg
- packaging, for pesticides: 0.00258187 kg; lognormal variance with pedigree 0.0592, pedigree (4,3,4,5,4)
  Total amount of active substance/s of pesticides needed for the production of coconut, dehusked is calculated to be circa 1.29E-03 kg. Pesticide/s used in this dataset is/are: 'glyphosate', 'pyrethroid-compound'. The total amount of active substance/s is doubled in order to account for the packaging of the dilluted product of pesticide/s that is/are applied. Therefore, 2.58E-03 kg of packaging for pesticides is justified with this exchange.
  properties: wet mass 1 kg, price 0.0642 EUR2005, dry mass 1 kg, heating value, net 25.97 MJ, carbon content, fossil 0.85714
- solid manure loading and spreading, by hydraulic loader and spreader: 0.339901 kg; lognormal variance with pedigree 0.124177, pedigree (2,1,4,1,1)
  This amount corresponds the input of solid manure.
- manure, liquid, cattle: 0.165366 kg; lognormal variance with pedigree 0.124177, pedigree (2,1,4,1,1)
  Calculated based on literature values: The total amount of manure multiplied by the country-share of manure per animal category (FAOSTAT 2015). See supporting documentation 'WFLDB-Documentation.pdf' chapter 'Fertiliser application' (https://ecoquery.ecoinvent.org/File/Reports).
  Corresponds to 0.73 m3/ha
  properties: dry mass 0.075 kg, carbon content, non-fossil 0.68, water content 12.333, wet mass 1 kg
- trellis system, wooden poles, soft wood, tar impregnated: 0.00022648 ha; lognormal variance with pedigree 0.124177, pedigree (2,1,4,1,1)
  Used to attach trees in orchards with a tree density of more than 500 trees per ha.
- manure, liquid, swine: 0.18536 kg; lognormal variance with pedigree 0.124177, pedigree (2,1,4,1,1)
  Calculated based on literature values: The total amount of manure multiplied by the country-share of manure per animal category (FAOSTAT 2015). See supporting documentation 'WFLDB-Documentation.pdf' chapter 'Fertiliser application' (https://ecoquery.ecoinvent.org/File/Reports).
  Corresponds to 0.818 m3/ha
  properties: water content 19, wet mass 1 kg, dry mass 0.05 kg, carbon content, non-fossil 0.64
- poultry manure, dried: 0.0821178 kg; lognormal variance with pedigree 0.124177, pedigree (2,1,4,1,1)
  Calculated based on literature values: The total amount of manure multiplied by the country-share of manure per animal category (FAOSTAT 2015). See supporting documentation 'WFLDB-Documentation.pdf' chapter 'Fertiliser application' (https://ecoquery.ecoinvent.org/File/Reports).
  properties: nickel content 4e-5, phosphorus content 0.0167, lead content 2.92e-6, potassium content 0.024, dry mass 0.865 kg, nitrogen content 0.532, wet mass 1 kg, zinc content 0.000349, carbon content, non-fossil 0.33389, copper content 4.38e-5, mercury content 2e-7, cadmium content 2.92e-7, water content 0.156069
- poultry manure, fresh: 0.0138726 kg; lognormal variance with pedigree 0.124177, pedigree (2,1,4,1,1)
  Calculated based on literature values: The total amount of manure multiplied by the country-share of manure per animal category (FAOSTAT 2015). See supporting documentation 'WFLDB-Documentation.pdf' chapter 'Fertiliser application' (https://ecoquery.ecoinvent.org/File/Reports).
  Corresponds to 0.123 m3/ha
  properties: wet mass 1 kg, dry mass 0.38 kg, carbon content, non-fossil 0.33389, water content 1.63158
- liquid manure spreading, by vacuum tanker: 0.000378471 m3; lognormal variance with pedigree 0.124177, pedigree (2,1,4,1,1)
  This amount corresponds to the input of liquid manure.
- manure, solid, cattle: 0.257783 kg; lognormal variance with pedigree 0.124177, pedigree (2,1,4,1,1)
  Calculated based on literature values: The total amount of manure multiplied by the country-share of manure per animal category (FAOSTAT 2015). See supporting documentation 'WFLDB-Documentation.pdf' chapter 'Fertiliser application' (https://ecoquery.ecoinvent.org/File/Reports).
  Corresponds to 1140.0 kg/ha
  properties: water content 3.5454, carbon content, non-fossil 0.441, wet mass 1 kg, dry mass 0.22 kg
- coconut husk: -0.639353 kg
  Yield = 2823.0 kg/ha
  production volume 6.07286e9 kg
  properties: dry mass 0.53 kg, price 0.198 EUR2005, water content 0.886792, carbon content, non-fossil 0.52, wet mass 1 kg
  note on carbon content, non-fossil: calculation: C-content of components according to ecoinvent report No. 15a. Source of composition: Jasper Guy Woodroof (1979). 'Coconuts: Production, Processing, Products'. 2nd ed. AVI Publishing Co. Inc.

## Inputs from nature
- Occupation, permanent crop, irrigated [natural resource, land]: 2.27092 m2*year; lognormal variance with pedigree 0.0200616, pedigree (2,1,4,1,1)
  Related to the duration from harvest date of previous crop to harvest date of main crop.
- Transformation, from permanent crop, irrigated [natural resource, land]: 0.0377501 m2; = 10000/4415/60
  Calculated value: 10000 m2 divided by the yield and the life time of the perennial crop (60 years).
- Carbon dioxide, in air [natural resource, in air]: 1.30525 kg; lognormal variance with pedigree 0.0138498, pedigree (2,2,4,1,1)
  CO2 uptake by biomass
- Transformation, to permanent crop, irrigated [natural resource, land]: 0.0377501 m2; = 10000/4415/60
  (same comment as for Transformation, from permanent crop, irrigated)
- Energy, gross calorific value, in biomass [natural resource, biotic]: 16.8784 MJ; lognormal variance with pedigree 0.0138498, pedigree (2,2,4,1,1)

## Emissions to nature
- Zinc, ion [water, surface water]: 2.08681e-6 kg; source Freiermuth R.  2006; lognormal variance with pedigree 0.356938, pedigree (2,2,4,1,1)
  Calculated value - Freiermuth (2006). See 'WFLDB-Guidelines.pdf', available at https://ecoquery.ecoinvent.org/File/Reports.
- Nickel, ion [water, surface water]: 6.13987e-7 kg; source Freiermuth R.  2006; lognormal variance with pedigree 0.356938, pedigree (2,2,4,1,1)
  (same comment as for Zinc, ion)
- Cadmium, ion [water, ground-]: 4.42316e-9 kg; source Freiermuth R.  2006; lognormal variance with pedigree 0.356938, pedigree (2,2,4,1,1)
  (same comment as for Zinc, ion)
- Lead [water, surface water]: 1.14248e-7 kg; source Freiermuth R.  2006; lognormal variance with pedigree 0.356938, pedigree (2,2,4,1,1)
  (same comment as for Zinc, ion)
- Chromium, ion [water, ground-]: 3.20062e-6 kg; source Freiermuth R.  2006; lognormal variance with pedigree 0.356938, pedigree (2,2,4,1,1)
  (same comment as for Zinc, ion)
- Copper, ion [water, ground-]: 7.57666e-7 kg; source Freiermuth R.  2006; lognormal variance with pedigree 0.356938, pedigree (2,2,4,1,1)
  (same comment as for Zinc, ion)
- Ammonia [air, non-urban air or from high stacks]: 0.0020782 kg; source EEA 2013; lognormal variance with pedigree 0.0447216, pedigree (2,2,4,1,1)
  Calculated value - EMEP/EEA (2013). See 'WFLDB-Guidelines.pdf', available at https://ecoquery.ecoinvent.org/File/Reports.
- Lead [water, ground-]: 1.47101e-8 kg; source Freiermuth R.  2006; lognormal variance with pedigree 0.356938, pedigree (2,2,4,1,1)
  (same comment as for Zinc, ion)
- Nitrogen oxides [air, non-urban air or from high stacks]: 0.000469856 kg; source EEA 2013; lognormal variance with pedigree 0.124664, pedigree (2,2,4,1,1)
  Calculated value - EEA/EMEP (2013). See 'WFLDB-Guidelines.pdf', available at https://ecoquery.ecoinvent.org/File/Reports.
- Mercury [water, ground-]: 9.28319e-10 kg; source Freiermuth R.  2006; lognormal variance with pedigree 0.356938, pedigree (2,2,4,1,1)
  (same comment as for Zinc, ion)
- Copper, ion [water, surface water]: 1.54002e-6 kg; source Freiermuth R.  2006; lognormal variance with pedigree 0.356938, pedigree (2,2,4,1,1)
  (same comment as for Zinc, ion)
- Phosphorus [water, surface water]: 2.83893e-5 kg; source Prasuhn V.  2006; lognormal variance with pedigree 0.175866, pedigree (2,2,4,1,1)
  Calculated value - Prasuhn (2006) and SQCB-Erosion. See 'WFLDB-Guidelines.pdf', available at https://ecoquery.ecoinvent.org/File/Reports.
- Dinitrogen monoxide [air, non-urban air or from high stacks]: 0.000373231 kg; source IPCC 2006; lognormal variance with pedigree 0.124664, pedigree (2,2,4,1,1)
  Calculated value - IPCC (2006). See 'WFLDB-Guidelines.pdf', available at https://ecoquery.ecoinvent.org/File/Reports.
- Nickel, ion [water, ground-]: 2.22428e-10 kg; source Freiermuth R.  2006; lognormal variance with pedigree 0.356938, pedigree (2,2,4,1,1)
  (same comment as for Zinc, ion)
- Phosphate [water, surface water]: 0.000179728 kg; source Prasuhn V.  2006; lognormal variance with pedigree 0.175866, pedigree (2,2,4,1,1)
  Calculated value - Prasuhn (2006). See 'WFLDB-Guidelines.pdf', available at https://ecoquery.ecoinvent.org/File/Reports.
- Zinc, ion [water, ground-]: 5.23418e-6 kg; source Freiermuth R.  2006; lognormal variance with pedigree 0.356938, pedigree (2,2,4,1,1)
  (same comment as for Zinc, ion)
- Water [air, non-urban air or from high stacks]: 0.315804 m3; lognormal variance with pedigree 0.124177, pedigree (2,1,4,1,1)
  Calculated value - Emission calculated from water balance. See 'WFLDB-Guidelines.pdf', available at https://ecoquery.ecoinvent.org/File/Reports.
- Water [water, surface water]: 0.304593 m3; lognormal variance with pedigree 0.124177, pedigree (2,1,4,1,1)
  (same comment as for Water)
- Chromium, ion [water, surface water]: 7.64914e-7 kg; source Freiermuth R.  2006; lognormal variance with pedigree 0.356938, pedigree (2,2,4,1,1)
  (same comment as for Zinc, ion)
- Water [water, ground-]: 0.0761494 m3; lognormal variance with pedigree 0.124177, pedigree (2,1,4,1,1)
  (same comment as for Water)
- Nitrate [water, ground-]: 0.0351432 kg; source Faist Emmenegger M. 2009; lognormal variance with pedigree 0.175866, pedigree (2,2,4,1,1)
- Cadmium [soil, agricultural]: 3.53519e-8 kg; = 9.16066494542e-08 + ( - 5.625473298e-08)*heavyMetalUptakeSwitch; source Freiermuth R.  2006
  Comment on mathematicalRelation:
  9.16066494542e-08 from Calculated value - Freiermuth (2006). See 'WFLDB-Guidelines.pdf', available at https://ecoquery.ecoinvent.org/File/Reports.
  -5.625473298e-08 from Crop, default, heavy metals uptake model
  Heavy metal uptake can be excluded by setting the parameter heavyMetalUptakeSwitch to zero.
- Chromium [soil, agricultural]: -2.62585e-6 kg; = -2.32391176337e-06 + ( - 3.01938442723e-07)*heavyMetalUptakeSwitch; source Freiermuth R.  2006
  Comment on mathematicalRelation:
  -2.32391176337e-06 from Calculated value - Freiermuth (2006). See 'WFLDB-Guidelines.pdf', available at https://ecoquery.ecoinvent.org/File/Reports.
  Heavy metal uptake can be excluded by setting the parameter heavyMetalUptakeSwitch to zero.
- Copper [soil, agricultural]: 7.34311e-7 kg; = 4.40571635639e-06 + ( - 3.67140525887e-06)*heavyMetalUptakeSwitch; source Freiermuth R.  2006
  Comment on mathematicalRelation:
  4.40571635639e-06 from Calculated value - Freiermuth (2006). See 'WFLDB-Guidelines.pdf', available at https://ecoquery.ecoinvent.org/File/Reports.
  Heavy metal uptake can be excluded by setting the parameter heavyMetalUptakeSwitch to zero.
- Lead [soil, agricultural]: 8.4719e-8 kg; = 3.84313991937e-07 + ( - 2.99594957195e-07)*heavyMetalUptakeSwitch; source Freiermuth R.  2006
  Comment on mathematicalRelation:
  -2.99594957195e-07 from Crop, default, heavy metals uptake model
  Heavy metal uptake can be excluded by setting the parameter heavyMetalUptakeSwitch to zero.
- Mercury [soil, agricultural]: 3.01268e-8 kg; = 5.25954613399e-08 + ( - 2.24686522625e-08)*heavyMetalUptakeSwitch; source Freiermuth R.  2006
  Comment on mathematicalRelation:
  5.25954613399e-08 from Calculated value - Freiermuth (2006). See 'WFLDB-Guidelines.pdf', available at https://ecoquery.ecoinvent.org/File/Reports.
  -2.24686522625e-08 from Crop, default, heavy metals uptake model
  Heavy metal uptake can be excluded by setting the parameter heavyMetalUptakeSwitch to zero.
- Cadmium, ion [water, surface water]: 5.08108e-9 kg; source Freiermuth R.  2006; lognormal variance with pedigree 0.356938, pedigree (2,2,4,1,1)
  (same comment as for Zinc, ion)
- Nickel [soil, agricultural]: 5.40223e-7 kg; = 1.11894732074e-06 + ( - 5.78724582144e-07)*heavyMetalUptakeSwitch; source Freiermuth R.  2006
  Comment on mathematicalRelation:
  1.11894732074e-06 from Calculated value - Freiermuth (2006). See 'WFLDB-Guidelines.pdf', available at https://ecoquery.ecoinvent.org/File/Reports.
  -5.78724582144e-07 from Crop, default, heavy metals uptake model
  Heavy metal uptake can be excluded by setting the parameter heavyMetalUptakeSwitch to zero.
- Zinc [soil, agricultural]: 2.24703e-5 kg; = 4.0211532364e-05 + ( - 1.77412380758e-05)*heavyMetalUptakeSwitch; source Freiermuth R.  2006
  Comment on mathematicalRelation:
  4.0211532364e-05 from Calculated value - Freiermuth (2006). See 'WFLDB-Guidelines.pdf', available at https://ecoquery.ecoinvent.org/File/Reports.
  -1.77412380758e-05 from Crop, default, heavy metals uptake model
  Heavy metal uptake can be excluded by setting the parameter heavyMetalUptakeSwitch to zero.
- Glyphosate [soil, agricultural]: 0.00114198 kg; lognormal variance with pedigree 0.0447216, pedigree (2,2,4,1,1)
  Calculated value - 100% emission in soilAmount of pesticides applied: Ntiamoah and Afrane (2008), type of pesticides applied: Afrane and Ntiamoah (2011). See 'WFLDB-Guidelines.pdf', available at https://ecoquery.ecoinvent.org/File/Reports.
- Cypermethrin [soil, agricultural]: 0.000148954 kg; lognormal variance with pedigree 0.0447216, pedigree (2,2,4,1,1)
  (same comment as for Glyphosate)
- Carbon dioxide, fossil [air, non-urban air or from high stacks]: 0.00742877 kg; lognormal variance with pedigree 0.0138498, pedigree (2,2,4,1,1)
  Calculated value - CO2 emissions from urea and lime. See 'WFLDB-Guidelines.pdf', available at https://ecoquery.ecoinvent.org/File/Reports.
- Mercury [water, surface water]: 2.7155e-9 kg; source Freiermuth R.  2006; lognormal variance with pedigree 0.356938, pedigree (2,2,4,1,1)
  (same comment as for Zinc, ion)
- Phosphate [water, ground-]: 4.1858e-5 kg; source Prasuhn V.  2006; lognormal variance with pedigree 0.175866, pedigree (2,2,4,1,1)
  (same comment as for Phosphate)

## Sampling procedure
WFLDB Methodological Guidelines for the Life Cycle Inventory of Agricultural Products in the latest version, available at: https://ecoquery.ecoinvent.org/File/Reports. Data sources: Data were categorised from level 0 (L0) to level (L4) as follows: L0 = estimate, proxy; L1 = statistical data (e.g. FAOSTAT); L2 = L1 adapted to crop and country; L3 = literature data or L1 resp. L2 data approved by experts; medium detailing (i.e. kg of total N-fertiliser); L4 = L3 data of high detailing (i.e. portion N-fertiliser types).In this dataset data were obtained for yield: L3; Fertilisers: L4; Pesticides: L1; Machinery: L0; Irrigation: L2. For information regarding the calculation of individual exchanges see supporting documentation WFLDB-Documentation.pdf

## Extrapolations
This dataset has been extrapolated from year 2012 to the year of the calculation (2021). The uncertainty has been adjusted accordingly.

## Review by Assumpció ANTON 2016-05-30
Be aware that the use of statistics in input calculations could provide some specific inputs not common for specific crops, this should be corrected if better information is available and better reflexed in DQR . Currently, I would dissent for some of good marks provided, being a revision of criteria applied advisable.

Pesticides will need to be amended periodically checking for update of pesticides' ban.
