# photovoltaics, electric installation for 3kWp module, at building

Dataset: EcoSpold 2, unit process
Geography: RoW
Time period: 1992-01-01 to 2021-12-31
Technology level: current
Classification: ISIC rev.4 ecoinvent: 4390:Other specialized construction activities
Tags: infrastructure; photovoltaic power
Scenario: Business-as-Usual
System model: Allocation, cut-off by classification
Generated by: [System]
Published in: Jungbluth N. 2012
Database: ecoinvent
isCopyrightProtected: true
accessRestrictedTo: 1

## General comment
This infrastructure dataset represents the production of different components and their commissioning for the electric installation of a 3kWp building integrated photovoltaic plant. The electric installation includes all parts between the panel and the grid, but not the inverter as it is modeled in a separate dataset due to its importance. It therefore provides the parts for the connection of the 3kWp PV installation to the grid.
The different parts considered are:
- lightning protection
- cabling in the PV panel area
- fuse box
- cabling from the PV panels to inverter
- cabling from the inverter to the electric meter

## Included activities start
From delivery of the needed materials and parts.

## Included activities end
This activity ends with the finished components of the electric installation.

This dataset includes:
- Materials for the production of the different parts
- Energy use for metal processing (copper wire drawing)
- decommissioning of the installation parts

This dataset doesn't include the energy use for the mounting of the electric installations as this is included in the assembly of all parts for a 3kWp PV plant.
It doesn't include the inverter, as this is modelled in a separate dataset due to its importance.

## Technology
All electric installations for a photovoltaic system with a capacity of 3kWp. The included materials are summarized in the following table.
Source of the table: Jungbluth et al. 2012, p.118

## Time period
The calculation of the annual production volume of the reference product is based on data from 2008. It does not represent an average of the time period 1992-2008.

## Parameters
- share open ground installations, multi-Si, on open ground, total: 0.351918 dimensionless; name pv_openground_total; lognormal variance with pedigree 0.1782, pedigree (4,5,2,5,5)
  Literature value, calculated value. The shares of the different types of cells and mounting systems are taken from Jungbluth N. et al. (2012)and adapted for GLO for open ground PV plants. According to IEA (2009), there were 35.19% grid-connected centralized PV power plants globally. It is assumed that all centralized PV power plants are open ground plants.
  Sources:
  - Jungbluth N., Stucki M., Flury K., Frischknecht R. and Buesser S. (2012) Life Cycle Inventories of Photovoltaic Power Production. ESU-services Ltd., Uster, CH, retrieved from: www.esu-services.ch/data/public-lci-reports/ <http://www.esu-services.ch/data/public-lci-reports
  - IEA. 2009. Trends in Photovoltaic Applications:Survey report of selected IEA countries between1992 and 2008. International Energy Agency (IEA), Report IEA-PVPS T1-18:2009, Paris Cedex (FR)
- Installed capacity: 5490 MW; name capacity_installed; lognormal variance with pedigree 0.0962, pedigree (4,2,5,3,3)
  Literature value. New installed capacity of photovoltaic power in 2008. Valid for grid-connected new capacity. [IEA. 2009. Trends in Photovoltaic Applications:Survey report of selected IEA countries between1992 and 2008. International Energy Agency (IEA), Report IEA-PVPS T1-18:2009, Paris Cedex (FR)]
  Uncertainty: 1) This value is valid for 2008 and gives not any average over the time span 1992-2008.
  2) The given value for new installed grid-connected capacity in 2008 is too low, which is considered in the uncertainty.
  Investigations for the year 2009 showed the following figures:
  - Total installed capacity in 2009 (on- and offgrid or not specified in the sources): 14560MWp GLO, out of it 7450MWp installed in 2009.
  Source: Data from 30 countries (AU,AT, BE, CA, CN, CZ, DK, FI, FR, DE, GR, HU, IN, IT, JP, LU, MY, MX, NL, PT, SI, ZA, KR, ES, SE, CH, TW, TH, GB, US) and 4 sources: [1] [IEA, 2010. Trends in Photovoltaic Applications:Survey report of selected IEA countries between1992 and 2009. International Energy Agency, Report IEA-PVPS T1-19:2010]; [2] [Eurobserver, 2010. Photovoltaic barometer. Systèmes Solaires - le journal du photovoltaïque; Baromètre Photovoltaïque - Eurobserver Nr.3, avril 2010. ]; [3] [Eurobserver, 2011. Photovoltaic barometer. Systèmes Solaires - le journal du photovoltaïque; Baromètre Photovoltaïque - Eurobserver Nr.5, avril 2011.]; [4] [EPIA.Global Market Outlook for Photovoltaics until 2015. European Photovoltaic Industry Association.]
  - Total installed new capacity in 2009, total: 6188 MW (21 countries) [IEA. 2010. Trends in Photovoltaic Applications:Survey report of selected IEA countries between1992 and 2009. International Energy Agency (IEA), Report IEA-PVPS T1-19:2010, Paris Cedex (FR)]
  - New on-grid capacity in 2009: 6113 MW (21 countries) [IEA. 2010. Trends in Photovoltaic Applications:Survey report of selected IEA countries between1992 and 2009. International Energy Agency (IEA), Report IEA-PVPS T1-19:2010, Paris Cedex (FR)]
  This gives a factor of 7447/6188=1.2 between the sources.
- capacity: 0.003 MW; lognormal variance with pedigree 0.0006, pedigree (1,1,1,1,1)

## Reference product
- photovoltaics, electric installation for 3kWp module, at building: 1 unit; By-product classification allocatable product; CPC 5461: Electrical installation services
  EcoSpold01Location=CH
  production volume 1.18176e6 unit; name apv_electric_installation; = (capacity_installed*1000)* (1- pv_openground_total)/(capacity*1000)
    Calculated value. This value is too high, as it is calculated with 3kWp non-open ground installations only. This is a simplifying assumption as not all building PV plants installed have only a capacity of 3kWp. However, it can be said that due to the modular composition of PV plants, this assumption is justifiable.
  property price 71.4311 EUR2005
    Calculated based on inputs: The price of the product has been calculated as a sum of the values of the material and energy inputs for this product. This value is therefore a rough estimation. It may underestimate the real price since there are additional expenses when producing any product. These expences can include for example labour costs, treatment of waste materials and profit for the producer. Please consider carefully whether this level of data quality is acceptable for your application.
  property capacity 3 kWp
    This electric installation has the size to serve a photovoltaic installation with a capacity of 3 kWp.

## Inputs from technosphere
- polyethylene, high density, granulate: 14.41 kg; name hdpe; source Schwarz U. 1992; lognormal variance with pedigree 0.0902, pedigree (4,3,5,4,4)
  Literature value. Used in
  - the (grounding) wires and the heat shrink tube from PV panel to inverter
  - the fuse box
  - the cabling at PV panel area
  - the grounding wires from inverter to electric meter.
  The Radox 125-cable cladding is approximated with HDPE-plastic.
  See also tab. 11.29 in Jungbluth et al. 2012.
  EcoSpold01Location=RER
  properties: carbon content, fossil 0.857143, wet mass 1 kg, dry mass 1 kg, heating value, net 42.47 MJ
  note on carbon content, fossil: Polyethylene is formed out of a huge amount of ethylene monomers (C2H4) (ecoinvent v2.2 report 11_II). MW=28 g/mol
- brass: 0.02 kg; source Schwarz U. 1992; lognormal variance with pedigree 0.0902, pedigree (4,3,5,4,4)
  EcoSpold01Location=CH
  Literature value. Used in the fuse box.
  See also tab. 11.29 in Jungbluth et al. 2012.
  properties: dry mass 1 kg, wet mass 1 kg
- copper, cathode: 14.7 kg; name copper; source Schwarz U. 1992; lognormal variance with pedigree 0.0902, pedigree (4,3,5,4,4)
  EcoSpold01Location=RER
  Literature value. Used in the lightning protection of the PV plant, in wires, in cable lugs, in wire protections, in grounding wires, and in the switch.
  See also tab. 11.29 in Jungbluth et al. 2012.
  properties: dry mass 1 kg, wet mass 1 kg
- zinc: 0.04 kg; source Schwarz U. 1992; lognormal variance with pedigree 0.0902, pedigree (4,3,5,4,4)
  Literature value. Used in the fuse box
  See also tab. 11.29 in Jungbluth et al. 2012.
  EcoSpold01Location=RER
  properties: wet mass 1 kg, dry mass 1 kg
- scrap steel: 0 kg; name scrap_steel
  Calculated value
  production volume 0 kg
    Calculated from production volume of reference product using the relative outputs.
  property lifetime 30 year; name scrap_steel_lifetime
  property price 0 EUR2005; name scrap_steel_price_EUR2005
  properties: dry mass 1 kg, wet mass 1 kg
- steel, low-alloyed, hot rolled: 0.86 kg; name steel_low_alloyed_hot_rolled; source Schwarz U. 1992; lognormal variance with pedigree 0.0902, pedigree (4,3,5,4,4)
  EcoSpold01Location=RER
  Literature value. Used in the fuse box.
  See also tab. 11.29 in Jungbluth et al. 2012.
  properties: carbon content, fossil 0.005, dry mass 1 kg, wet mass 1 kg
  note on carbon content, fossil: Low alloyed steel composition given in Tab. 3.2 ecoinvent v2.2 report 10_partII. Steel assumed to have a C content of 0.5%
- polycarbonate: 0.2 kg; source Schwarz U. 1992; lognormal variance with pedigree 0.0902, pedigree (4,3,5,4,4)
  Literature value. Used in the fuse box.
  See also tab. 11.29 in Jungbluth et al. 2012.
  EcoSpold01Location=RER
  properties: carbon content, fossil 0.755906, wet mass 1 kg, dry mass 1 kg, heating value, net 29.57 MJ
  note on carbon content, fossil: Polycarbonate means here 2,2-bis(4-hydroxyphenyl)propane polycarbonate – also called bisphenol A polycarbonate ( -(O-C6H4-C(CH3)2-C6H4-O-CO)n- (ecoinvent v2.2 report 11_II), C16H14O3, MW=254 g/mol.
- wire drawing, copper: 14.7 kg; = copper; lognormal variance with pedigree 0.042, pedigree (1,1,5,5,1)
  Calculated value
  EcoSpold01Location=RER
- epoxy resin, liquid: 0.002 kg; name epoxy; source Schwarz U. 1992; lognormal variance with pedigree 0.0902, pedigree (4,3,5,4,4)
  (same comment as for steel, low-alloyed, hot rolled)
  properties: carbon content, fossil 0.42325, dry mass 1 kg, wet mass 1 kg, heating value, net 12.82 MJ
- waste polyethylene/polypropylene product: 0 kg; name waste_polyethypolypropy
  Calculated value. Proxy for the treatment of epoxy and polycarbonate
  production volume 0 kg
    Calculated from production volume of reference product using the relative outputs.
  property lifetime 30 year; name waste_polyethypolypropy_lifetime
  property price 0 EUR2005; name waste_polyethypolypropy_price_EUR2005
  properties: water content 0.180638, carbon content, fossil 0.748045, wet mass 1 kg, dry mass 0.847 kg, heating value, net 42.47 MJ
  note on carbon content, fossil: Mixed various plastics was used to estimate the C content of this waste (Tab A.2, ecoinvent v2.2 report 13_I)
- polyvinylchloride, bulk polymerised: 2.13 kg; name pvc; source Schwarz U. 1992; lognormal variance with pedigree 0.0902, pedigree (4,3,5,4,4)
  EcoSpold01Location=RER
  Literature value. Used in the cabling at the PV panel area as PVC-isolation tube.
  See also tab. 11.29 in Jungbluth et al. 2012.
  properties: heating value, net 21.5 MJ, carbon content, fossil 0.387097, dry mass 1 kg, wet mass 1 kg
  note on carbon content, fossil: Monomer is vynyl chloride, C2H3Cl (ecoinvent v2.2 report 11_II). MW=62 g/mol
- scrap copper: 0 kg; name scrap_copper
  Calculated value. Proxy for the treatment of brass.
  production volume 0 kg
    Calculated from production volume of reference product using the relative outputs.
  property price 0 EUR2005; name scrap_copper_price_EUR2005
  property lifetime 30 year; name scrap_copper_lifetime
  properties: dry mass 1 kg, wet mass 1 kg
- waste electric wiring: -29.34 kg; name waste_electric_wiring; = (copper+hdpe+nylon_6)*-1; lognormal variance with pedigree 0.042, pedigree (1,1,5,5,1)
  EcoSpold01Location=CH
  Calculated value. All materials used in and for wires are summed up in this value.
  production volume 3.46728e7 kg; = apv_electric_installation* waste_electric_wiring
    Calculated from the production volume of electric installation, photovoltaic plant in proportion to the respective output amounts.
  property price 0 EUR2005; name waste_electric_wiring_price_EUR2005
  property lifetime 30 year; name waste_electric_wiring_lifetime
  properties: carbon content, fossil 0.34, wet mass 1 kg, dry mass 1 kg
  note on carbon content, fossil: The waste contains 0.615kg cable insulation (Wire insulation is calculated as 66.3% PVC, 31.2% PE and contains 2.5% copper) and 0.385kg copper (ecoinvent v2.2 report 13_I). So, 40% copper and 40%PVC, 20%PE. C contents in PVC and PE from tab A.1, ecoinvent v2.2 report 13_I
- waste polyvinylchloride: 0 kg; name waste_pvc
  Calculated value
  production volume 0 kg
    Calculated from production volume of reference product using the relative outputs.
  property price 0 EUR2005; name waste_pvc_price_EUR2005
  property lifetime 30 year; name waste_pvc_lifetime
  properties: heating value, net 21.51 MJ, water content 0.00200401, carbon content, fossil 0.440882, dry mass 0.998 kg, wet mass 1 kg
  note on heating value, net: Value taken from the general comment of the treatment dataset.
  note on carbon content, fossil: C content in 1 kg DM was calculated using data in Tab A.1, ecoinvent v2.2 report 13_I
- nylon 6: 0.23 kg; name nylon_6; source Schwarz U. 1992; lognormal variance with pedigree 0.0902, pedigree (4,3,5,4,4)
  Literature value. Proxy for all plastics used in all parts.
  See also tab. 11.29 in Jungbluth et al. 2012.
  EcoSpold01Location=RER
  properties: heating value, net 30.9 MJ, carbon content, fossil 0.637168, wet mass 1 kg, dry mass 1 kg
  note on heating value, net: Assumed equal to Nylon-66. Reference: Walters, R. N., Hackett, S. M. and Lyon, R. E. (2000) ‘Heats of combustion of high temperature polymers’, Fire and Materials, 24(5), pp. 245–252. doi: 10.1002/1099-1018(200009/10)24:5<245::AID-FAM744>3.0.CO;2-7.
  note on carbon content, fossil: It is a chain of caprolactam molecules, originating from aminocarboxylic acids - here caproic acid or caprolactam. The structure of nylon 6 is -(NH-(CH2)5-CO)n-, C6H11NO (ecoinvent v2.2 report 11_II). MW=113 g/mol
- scrap steel: -0.219213, -0.680787 kg (2 entries)
  Calculated value
  production volume 1.06358e6 kg
  properties: dry mass 1 kg, wet mass 1 kg, lifetime 30 year
- waste polyethylene/polypropylene product: -0.0571406, -0.144859 kg (2 entries)
  Calculated value. Proxy for the treatment of epoxy and polycarbonate
  production volume 238715 kg
  properties: water content 0.180638, carbon content, fossil 0.748045, wet mass 1 kg, dry mass 0.847 kg, lifetime 30 year, heating value, net 42.47 MJ
- scrap copper: -0.00644, -0.01356 kg (2 entries)
  Calculated value. Proxy for the treatment of brass.
  production volume 23635.1 kg
  properties: dry mass 1 kg, wet mass 1 kg, lifetime 30 year
- waste polyvinylchloride: -0.236945, -0.0158318, -0.00119733, -0.00653908, -0.00264172, -0.00620947, -0.201888, -1.65875 kg (8 entries)
  Calculated value
  production volume 2.52608e6 kg
  properties: heating value, net 21.51 MJ, water content 0.00200401, carbon content, fossil 0.440882, dry mass 0.998 kg, wet mass 1 kg, lifetime 30 year

## Sampling procedure
Detailed analysis of materials for one product in a diploma thesis.

## Extrapolations
This dataset has been copied from an original dataset covering the geography CH. The uncertainty has been adjusted accordingly.
The calculation of the annual production volume of the reference product is based on data from 2008.

## Review by Carl Vadenbo 2012-03-22
The dataset were found to meet the data quality guidelines for the ecoinvent database on 2012.06.04.

Improvements in the following areas/aspects are recommended for future revisions in order to strenghen the overall quality of the dataset:
-energy use and emissions arising during the manufacturing process of the components;
-material losses during manufacturing;
-packaging materials;
-transport of components between the location of the manufacturing processes and the site of the installation.
There is also a discrepancy between the time period of main source of the inventory and its reference year (1992) on one hand, and statistics used to calculate the annual production volume (2008) on the other hand. It is hence recommended that future revisions of this datasets target the collection of more recent inventory data.

## Review by Bo Weidema 2012-03-22
passed

## Review by Roberto Dones 2007-08-23
Passed.
none
