# sawnwood production, hardwood, dried (u=10%), planed

Dataset: EcoSpold 2, unit process
Geography: CH
Time period: 2014-01-01 to 2021-12-31
Technology level: current
Classification: ISIC rev.4 ecoinvent: 1610:Sawmilling and planing of wood
Scenario: Business-as-Usual
System model: Allocation, cut-off by classification
Generated by: Frank Werner
Database: ecoinvent
isCopyrightProtected: true
accessRestrictedTo: 1

## General comment
This activity is providing a more generic sawnwood product, combining inputs from the specific products issued from planing. The relative contribution is based on their Production Volumes.

## Included activities start
Entry of the specific products issued of the planing activity

## Included activities end
Delivery of the generic planed product

## Reference product
- sawnwood, hardwood, dried (u=10%), planed: 1 m3; By-product classification allocatable product; CPC 31102: Wood, sawn or chipped lengthwise, sliced or peeled, of a thickness exceeding 6 mm, of non-coniferous wood
  production volume 57216 m3; = 298000*0.6*0.8*0.8*0.5
    50% of the Production Volume issued from the planing has been made accesible as this generic product.
    The Production Volumes have been estimated from input of sawlogs, 60% yield, 20% drying to u=20% (80% drying to u=10%), and planing of 80%.
  property heating value, net 9569.82 MJ
    LHV is calculated based on the Carbon content of the product. More details can be found on the respective documentation.The property is based on a value of 13.38MJ/kg
  property price 265 EUR2005
    Temporary price data. Calculated as 90% of purchasers price based on: 2004 export prices for the World+ according to: http://faostat.fao.org/site/626/DesktopDefault.aspx?PageID=626#ancor downloaded 28 April 2009; calculated as export value divided by export volume.
  property carbon content 0.494
    carbon content on a dry matter basis (reserved; not for manual entry)
  properties: carbon content, fossil 0, water content 0.1, carbon content, non-fossil 0.494, dry mass 614.4 kg, water in wet mass 61.44 kg, wet mass 675.84 kg, carbon allocation 303.514 kg

## Inputs from technosphere
- sawnwood, beam, hardwood, dried (u=10%), planed: 0.324978 m3; lognormal variance with pedigree 0.104, pedigree (3,1,3,1,1)
  based on estimated production volumes; see activity datasets
  properties: dry mass 614.4 kg, carbon content, non-fossil 0.494, water content 0.1, wet mass 675.84 kg, heating value, net 9045.69 MJ
- sawnwood, lath, hardwood, dried (u=10%), planed: 0.182632 m3; lognormal variance with pedigree 0.104, pedigree (3,1,3,1,1)
  based on estimated production volumes; see activity datasets
  properties: water content 0.1, heating value, net 9045.69 MJ, carbon content, non-fossil 0.494, wet mass 675.85 kg, dry mass 614.4 kg
- sawnwood, board, hardwood, dried (u=10%), planed: 0.49239 m3; lognormal variance with pedigree 0.104, pedigree (3,1,3,1,1)
  based on estimated production volumes; see activity datasets
  properties: wet mass 675.84 kg, dry mass 614.4 kg, heating value, net 9045.69 MJ, water content 0.1, carbon content, non-fossil 0.494

## Extrapolations
This dataset has been extrapolated from year 2014 to the year of the calculation (2021). The uncertainty has been adjusted accordingly.
