# photovoltaic cell production, ribbon-Si

Dataset: EcoSpold 2, unit process
Geography: RoW
Time period: 2004-01-01 to 2021-12-31
Technology level: current
Classification: ISIC rev.4 ecoinvent: 2610:Manufacture of electronic components and boards
Classification: EcoSpold01Categories: photovoltaic/production of components
Synonyms: silicon; multi-crystalline; polycrystalline
Tags: ConvertedDataset
Scenario: Business-as-Usual
System model: Allocation, cut-off by classification
Share of production covered: 6 %
Generated by: Mariska J. de Wild-Scholten
Published in: Jungbluth, N. 2007
Database: ecoinvent
isCopyrightProtected: true
accessRestrictedTo: 1

## General comment
Production of photovoltaic cells (156*156 mm2). Some inputs and emissions aggregated to protect sensitive data. with an efficiency of 15%. Wafer thickness 270-300 um.
[This dataset was already contained in the ecoinvent database version 2. It was not individually updated during the transfer to ecoinvent version 3. Life Cycle Impact Assessment results may still have changed, as they are affected by changes in the supply chain, i.e. in other datasets. This dataset was generated following the ecoinvent quality guidelines for version 2. It may have been subject to central changes described in the ecoinvent version 3 change report (http://www.ecoinvent.org/database/ecoinvent-version-3/reports-of-changes/), and the results of the central updates were reviewed extensively. The changes added e.g. consistent water flows and other information throughout the database. The documentation of this dataset can be found in the ecoinvent reports of version 2, which are still available via the ecoinvent website. The change report linked above covers all central changes that were made during the conversion process.]

## Included activities end
Cleaning, damage etching, texture etching, covering of backside, phosphor dotation, phosphor glass etching, printing of contacts, cleaning and quality testing.

## Geography
Data for production in Europe.

## Technology
Average production technology of photovoltaic cells from wafers.

## Time period
Data investigated in 2004 and recalculated for the cell size in 2005.

## Parameters
- fraction, process water, to air: 0.15 dimensionless; name fraction_PW_to_air; lognormal variance with pedigree 0.092025, pedigree (4,4,3,2,4)
- fraction, cooling water, cooling pond system, to air: 0.032 dimensionless; name fraction_CW_CP_to_air; lognormal variance with pedigree 0.0413, pedigree (2,3,1,3,1)
  Calculated based on literature value (Scown, C.D., 2011, Water Footprint of U.S. Transportation Fuels and supplying information of the article) (Vionnet, S., Quantis Water Database - Technical Report, 2012).
- fraction, water, completely softened, to air: 0.15 dimensionless; name fraction_WCS_to_air; lognormal variance with pedigree 0.092025, pedigree (4,4,3,2,4)
- fraction, cooling water, to air: 0.3875 dimensionless; name fraction_CW_to_air; = (0.5*fraction_CW_OT_to_air)+(0.5*fraction_CW_R_to_air); lognormal variance with pedigree 0.092025, pedigree (4,4,3,2,4)
  Calculated value based on literature value (see comments of the other parametres present in this dataset) and expert opinion. In the case when no industry/literature data are available about the type of cooling or directly fraction, cooling water, to air specific for the process a default assumption is applied. It is assumed that the once-through cooling system is used in 50% of all cases and recirculating system is used in another 50% of all cases.
- fraction, cooling water, recirculating system, to air: 0.771 dimensionless; name fraction_CW_R_to_air; lognormal variance with pedigree 0.0413, pedigree (2,3,1,3,1)
  (same comment as for fraction, cooling water, cooling pond system, to air)
- fraction, cooling water, once-through system, to air: 0.004 dimensionless; name fraction_CW_OT_to_air; lognormal variance with pedigree 0.0413, pedigree (2,3,1,3,1)
  (same comment as for fraction, cooling water, cooling pond system, to air)

## Reference product
- photovoltaic cell, ribbon-Si: 1 m2; By-product classification allocatable product; CPC 47150: Diodes, transistors and similar semi-conductor devices; photosensitive semi-conductor devices; light emitting […]
  EcoSpold01Location=RER
  production volume 115690 m2
    1.3 W/0.024336 m2. Total worldwide production of photovoltaic cells was 243 MW in 2000 (from Tab 7.8 ecoinvent v2 report 6_XII). Distribution among single, multi and ribbon-Si of that was considered 56%, 3% and 41%. This assumption is based in the distribution observed in Fig 2.2, and Tab 12.6
  property price 38.3 EUR2005
    The production volume of this product is small compared to other products supplied by the activities within the same ISIC 3 category. Therefore, an average price of products supplied by the activities in the same ISIC 3 code has been applied.This price is obtained as '_69 Radio, television and communication equipment, EU27' in the 'EU & DK Input Output Database' (available in SimaPro, 19.28 EUR2003 per kg DS). The price is assumed to be valid for both RER2005, world 2005. Weight of product according to Ecoinvent: approx 2 kg per m2.
  property carbon content, fossil 0.0139333
    C content was calculated as the addition of C content in the components
  property carbon content 0.0139333
    carbon content on a dry matter basis (reserved; not for manual entry)
  properties: wet mass 0.68 kg, dry mass 0.68 kg, carbon content, non-fossil 0, water in wet mass 0 kg, water content 0, carbon allocation 0.00947465 kg

## Inputs from technosphere
- hydrochloric acid, without water, in 30% solution state: 0.045611 kg; lognormal variance with pedigree 0.0421, pedigree (1,2,5,5,1)
  De Wild 2007, for surface etching
  EcoSpold01Location=RER
  Uncertainty: de Wild 2007, for surface etching
  properties: dry mass 1 kg, heating value, net 3.32 MJ, wet mass 1 kg
- metallization paste, back side, aluminium: 0.07191 kg; lognormal variance with pedigree 0.0421, pedigree (1,2,5,5,1)
  EcoSpold01Location=RER
  De Wild 2007, for electric contacts
  Uncertainty: de Wild 2007, for electric contacts
  properties: carbon content, fossil 0.107828, dry mass 1 kg, wet mass 1 kg, heating value, net 3.27 MJ
- solvent, organic: 0.0014341 kg; lognormal variance with pedigree 0.0421, pedigree (1,2,5,5,1)
  De Wild 2007, for cleaning
  EcoSpold01Location=GLO
  Uncertainty: de Wild 2007, for cleaning
  properties: carbon content, fossil 0.63072, wet mass 1 kg, dry mass 1 kg, heating value, net 19.11 MJ
  note on carbon content, fossil: Mixture of 15 of the most often used solvents (list in ecoinvent v2.2 report 11-III, pg 293). C content was calculated as an unweighted average of C content of the different solvents
- polystyrene, expandable: 0.00040722 kg; lognormal variance with pedigree 0.0421, pedigree (1,2,5,5,1)
  EcoSpold01Location=RER
  De Wild 2007, packaging
  Uncertainty: de Wild 2007, packaging
  properties: heating value, net 38.67 MJ, wet mass 1 kg, dry mass 1 kg, carbon content, fossil 0.923077
  note on carbon content, fossil: Chemical formula of polystyrene is (C8H8)n (ecoinvent v2.2 report 11_II)
- electricity, medium voltage: 0 kWh; pedigree (1,1,1,1,1)
  EcoSpold01Location=UCTE
  De Wild 2007, company data
  Uncertainty: de Wild 2007, company data
- calcium chloride: 0.021573 kg; lognormal variance with pedigree 0.0421, pedigree (1,2,5,5,1)
  De Wild 2007
  EcoSpold01Location=CH
  Uncertainty: de Wild 2007
  properties: wet mass 1 kg, dry mass 1 kg
- nitrogen, liquid: 1.8532 kg; lognormal variance with pedigree 0.0421, pedigree (1,2,5,5,1)
  EcoSpold01Location=RER
  De Wild 2007, diffusion and damage etching
  Uncertainty: de Wild 2007, diffusion and damage etching
  properties: dry mass 1 kg, wet mass 1 kg
- ethanol, without water, in 99.7% solution state, from ethylene: 0.00064103 kg; lognormal variance with pedigree 0.0421, pedigree (1,2,5,5,1)
  EcoSpold01Location=RER
  De Wild 2007, for cleaning
  Uncertainty: de Wild 2007, for cleaning
  properties: dry mass 1 kg, carbon content, fossil 0.521739, heating value, net 31.58 MJ, wet mass 1 kg
- hydrogen fluoride: 0.037722 kg; lognormal variance with pedigree 0.0421, pedigree (1,2,5,5,1)
  EcoSpold01Location=GLO
  De Wild 2007, for etching phosphor glass
  Uncertainty: de Wild 2007, for etching phosphor glass
  properties: dry mass 1 kg, wet mass 1 kg, heating value, net 6.06 MJ
- wastewater from PV cell production: -0.21734 m3; lognormal variance with pedigree 0.0421, pedigree (1,2,5,5,1)
  EcoSpold01Location=CH
  De Wild 2007, company data, mix of neutral, alkaline and acid solution and organic waste
  Uncertainty: de Wild 2007, company data, mix of neutral, alkaline and acid solution and organic waste
  production volume 25144 m3
    Calculated from the production volume of photovoltaic cell, ribbon-Si in proportion to the respective output amounts.
  properties: wet mass 1000 kg, dry mass 2.2181 kg, carbon content, fossil 0.121726, water content 449.836
  note on carbon content, fossil: TOC = 0.27 kg/m3 (Tab 7.3, ecoinvent v2.2 report 6_XII). TOC was considered as Total Carbon.
- metallization paste, front side: 0.0073964 kg; lognormal variance with pedigree 0.0421, pedigree (1,2,5,5,1)
  (same comment as for metallization paste, back side, aluminium)
  properties: carbon content, fossil 0.0761136, heating value, net 2.31 MJ, dry mass 1 kg, wet mass 1 kg
- isopropanol: 0.078895 kg; lognormal variance with pedigree 0.0421, pedigree (1,2,5,5,1)
  De Wild 2007, for cleaning
  EcoSpold01Location=RER
  Uncertainty: de Wild 2007, for cleaning
  properties: carbon content, fossil 0.6, wet mass 1 kg, heating value, net 34.3 MJ, dry mass 1 kg
- ammonia, anhydrous, liquid: 0 kg; pedigree (1,1,1,1,1)
  EcoSpold01Location=RER
  De Wild 2007, for de-oxidation
  Uncertainty: de Wild 2007, for de-oxidation
  properties: wet mass 1 kg, dry mass 1 kg
- water, completely softened: 0 kg; name water_softened_input; pedigree (1,1,1,1,1)
  De Wild 2007, company data
  EcoSpold01Location=RER
  Uncertainty: de Wild 2007, company data
  properties: wet mass 1 kg
- sodium silicate, spray powder, 80%: 0.074786 kg; lognormal variance with pedigree 0.0421, pedigree (1,2,5,5,1)
  De Wild 2007
  EcoSpold01Location=RER
  Uncertainty: de Wild 2007
  properties: wet mass 1 kg, dry mass 1 kg
- titanium dioxide: 1.4177e-6 kg; lognormal variance with pedigree 0.0421, pedigree (1,2,5,5,1)
  EcoSpold01Location=RER
  De Wild 2007, tetraisopropyltitanate (TPT, a titanium precursor) for titanium dioxide antireflection coating deposition
  Uncertainty: de Wild 2007, tetraisopropyltitanate (TPT, a titanium precursor) for titanium dioxide antireflection coating deposition
  properties: dry mass 1 kg, wet mass 1 kg
- acetic acid, without water, in 98% solution state: 0.0028271 kg; lognormal variance with pedigree 0.0421, pedigree (1,2,5,5,1)
  EcoSpold01Location=RER
  De Wild 2007, for cleaning
  Uncertainty: de Wild 2007, for cleaning
  properties: carbon content, fossil 0.400016, wet mass 1 kg, dry mass 1 kg, heating value, net 14.6 MJ
  note on heating value, net: Based on literature, page 10, Althaus H.-J., Chudacoff M., Hischier R., Jungbluth N., Osses M. and Primas A. (2007) Life Cycle Inventories of Chemicals. Final report ecoinvent data v2.0 No. 8. EMPA, Swiss Centre for Life Cycle Inventories, Dübendorf, CH, Online-Version under: www.ecoinvent.org.
- heat, district or industrial, natural gas: 0 MJ; pedigree (1,1,1,1,1)
  EcoSpold01Location=RER
  De Wild 2007, company data
  Uncertainty: de Wild 2007, company data
  properties: heating value, net 1 MJ
- tetrafluoroethylene: 0.0031558 kg; lognormal variance with pedigree 0.0421, pedigree (1,2,5,5,1)
  De Wild 2007, aggregate value for different fluorinated source gases
  EcoSpold01Location=RER
  Uncertainty: de Wild 2007, aggregate value for different fluorinated source gases
  properties: wet mass 1 kg, dry mass 1 kg, carbon content, fossil 0.24, heating value, net 7.27 MJ
- phosphorus oxychloride: 0.001595 kg; lognormal variance with pedigree 0.0421, pedigree (1,2,5,5,1)
  De Wild 2007, POCl3 for emitter formation
  Uncertainty: de Wild 2007, POCl3 for emitter formation
- photovoltaic cell factory: 4e-7 unit; lognormal variance with pedigree 0.3421, pedigree (1,2,5,5,1)
  EcoSpold01Location=DE
  Estimation with company data
  Uncertainty: estimation with company data
- sodium hydroxide, without water, in 50% solution state: 0.15697 kg; lognormal variance with pedigree 0.0421, pedigree (1,2,5,5,1)
  EcoSpold01Location=RER
  De Wild 2007, for etching and cleaning
  Uncertainty: de Wild 2007, for etching and cleaning
  properties: wet mass 1 kg, heating value, net 3.03 MJ, dry mass 1 kg
- heat, district or industrial, other than natural gas: 0 MJ; pedigree (1,1,1,1,1)
  De Wild 2007, company data
  EcoSpold01Location=RER
  Uncertainty: de Wild 2007, company data
  properties: heating value, net 1 MJ
- argon, liquid: 0.025682 kg; lognormal variance with pedigree 0.0421, pedigree (1,2,5,5,1)
  De Wild 2007, company data
  EcoSpold01Location=RER
  Uncertainty: de Wild 2007, company data
  properties: wet mass 1 kg, dry mass 1 kg
- phosphoric acid, fertiliser grade, without water, in 70% solution state: 0.0076744 kg; lognormal variance with pedigree 0.0421, pedigree (1,2,5,5,1)
  De Wild 2007, for emitter formation. I.e. Ferro FX99-014: hazardous components 1-5% P2O5, 40-90% organic chemicals.
  EcoSpold01Location=GLO
  Uncertainty: de Wild 2007, for emitter formation. I.e. Ferro FX99-014: hazardous components 1-5% P2O5, 40-90% organic chemicals.
  properties: dry mass 1 kg, wet mass 1 kg
- multi-Si wafer, ribbon: 1.0753 m2; lognormal variance with pedigree 0.0421, pedigree (1,2,5,5,1)
  De Wild 2007, 7% losses
  EcoSpold01Location=RER
  Uncertainty: de Wild 2007, 7% losses
  properties: wet mass 0.583 kg, dry mass 0.583 kg
- metallization paste, back side: 0.004931 kg; lognormal variance with pedigree 0.0421, pedigree (1,2,5,5,1)
  (same comment as for metallization paste, back side, aluminium)
  properties: wet mass 1 kg, carbon content, fossil 0.15857, heating value, net 4.8 MJ, dry mass 1 kg
- oxygen, liquid: 0.10191 kg; lognormal variance with pedigree 0.0421, pedigree (1,2,5,5,1)
  De Wild 2007, diffusion
  EcoSpold01Location=RER
  Uncertainty: de Wild 2007, diffusion
  properties: wet mass 1 kg, dry mass 1 kg
- silicone product: 0.0012122 kg; lognormal variance with pedigree 0.0421, pedigree (1,2,5,5,1)
  EcoSpold01Location=RER
  De Wild 2007, silane (SiH4) for silicon nitride deposition
  Uncertainty: de Wild 2007, silane (SiH4) for silicon nitride deposition
  properties: heating value, net 9.83 MJ, dry mass 1 kg, carbon content, fossil 0.324324, wet mass 1 kg
  note on carbon content, fossil: The term silicones is used for compounds in which silicon atoms are linked via oxygen atoms, each silicon atom bearing one or several organic groups. In industrially important silicones, these groups are usually methyl or phenyl (ecoinvent v2.2 report 8_part71 & Ullmann). The chemical formula was considered to be [Si(CH3)2O]n (Ullmann).
- waste, from silicon wafer production, inorganic: -0.27572 kg; lognormal variance with pedigree 0.0421, pedigree (1,2,5,5,1)
  De Wild 2007, company data
  EcoSpold01Location=CH
  Uncertainty: de Wild 2007, company data
  production volume 31897.9 kg
    (same comment as for wastewater from PV cell production)
  properties: wet mass 1 kg, dry mass 0.906 kg, carbon content, fossil 0.0347572, water content 0.103753
- nitric acid, without water, in 50% solution state: 0 kg; pedigree (1,1,1,1,1)
  EcoSpold01Location=RER
  De Wild 2007, for etching phosphor glass
  Uncertainty: de Wild 2007, for etching phosphor glass
  properties: wet mass 1 kg, dry mass 1 kg
- electricity, medium voltage: 0.381219, 0.0731013, 1.22722, 17.8488, 2.5158, 8.19685 kWh (6 entries); lognormal variance with pedigree 0.0421, pedigree (1,2,5,5,1)
  EcoSpold01Location=UCTE
  De Wild 2007, company data
  Uncertainty: de Wild 2007, company data
- ammonia, anhydrous, liquid: 0.00141258, 0.000121428, 0.000188911, 0.0003743, 0.000366715, 3.84357e-5, 0.000171822, 0.0040648 kg (8 entries); lognormal variance with pedigree 0.0421, pedigree (1,2,5,5,1)
  (same comment as for ammonia, anhydrous, liquid)
- water, completely softened: 58.7565, 78.4935 kg (2 entries); lognormal variance with pedigree 0.0421, pedigree (1,2,5,5,1)
  De Wild 2007, company data
  EcoSpold01Location=RER
  Uncertainty: de Wild 2007, company data
- heat, district or industrial, natural gas: 0.0651135, 4.22483 MJ (2 entries); lognormal variance with pedigree 0.0421, pedigree (1,2,5,5,1)
  EcoSpold01Location=RER
  De Wild 2007, company data
  Uncertainty: de Wild 2007, company data
- heat, district or industrial, other than natural gas: 0.000448269, 1.10545 MJ (2 entries); lognormal variance with pedigree 0.0421, pedigree (1,2,5,5,1)
  De Wild 2007, company data
  EcoSpold01Location=RER
  Uncertainty: de Wild 2007, company data
- nitric acid, without water, in 50% solution state: 0.00513761, 0.00125364, 0.00311756, 0.00951842, 0.00149377, 0.000843719, 0.001249, 0.00405429 kg (8 entries); lognormal variance with pedigree 0.0421, pedigree (1,2,5,5,1)
  (same comment as for nitric acid, without water, in 50% solution state)

## Inputs from nature
- Water, cooling, unspecified natural origin [natural resource, in water]: 0.99852 m3; name water_cooling_UNO_input; lognormal variance with pedigree 0.0421, pedigree (1,2,5,5,1)
  De Wild 2007, company data
  Uncertainty: de Wild 2007, company data

## Emissions to nature
- Hydrogen chloride [air, urban air close to ground]: 0.00026627 kg; lognormal variance with pedigree 0.0821, pedigree (1,2,5,5,1)
  De Wild 2007, company data
  Uncertainty: de Wild 2007, company data
- Water [air, unspecified]: 0.407514 m3; name water_to_air_unspecified; lognormal variance with pedigree 0.0827, pedigree (2,2,5,5,1)
  Calculated value based on literature values and expert opinion. See comments in the parametres' comment field.
  property fraction, origin: salt water 0; name fraction_origin_salt_water
  property fraction, origin: fresh water 0.0505197; name fraction_origin_fresh_water
  property fraction, origin: unspecified 0.94948; name fraction_origin_unspecified
- Tin [air, urban air close to ground]: 0.00077252 kg; lognormal variance with pedigree 0.6921, pedigree (1,2,5,5,1)
  De Wild 2007, company data
  Uncertainty: de Wild 2007, company data
- Water [water, unspecified]: 0.510916 m3; name water_to_water_unspecified; lognormal variance with pedigree 0.0827, pedigree (2,2,5,5,1)
  (same comment as for Water)
  property water in wet mass 1000 kg; name WWM
  property dry mass 0 kg; name DM
  property fraction, origin: salt water 0; name fraction_origin_salt_water_Ww
  property carbon content, fossil 0; name C_content_fossil
  property fraction, origin: unspecified 0.839806; name fraction_origin_unspecified_Ww
  property wet mass 1000 kg; name WM
  property fraction, origin: fresh water 0.160194; name fraction_origin_fresh_water_Ww
  property carbon content, non-fossil 0; name C_content_non_fossil
- Methane, tetrafluoro-, R-14 [air, urban air close to ground]: 0.00024763 kg; lognormal variance with pedigree 0.0821, pedigree (1,2,5,5,1)
  De Wild 2007, calculated as 50% of CO2-eq for FC-gases
  Uncertainty: de Wild 2007, calculated as 50% of CO2-eq for FC-gases
- Silicon [air, urban air close to ground]: 7.2732e-5 kg; lognormal variance with pedigree 0.6921, pedigree (1,2,5,5,1)
  De Wild 2007, company data
  Uncertainty: de Wild 2007, company data
- Lead [air, urban air close to ground]: 0.00077252 kg; lognormal variance with pedigree 0.6921, pedigree (1,2,5,5,1)
  De Wild 2007, company data
  Uncertainty: de Wild 2007, company data
- Silver [air, urban air close to ground]: 0.00077252 kg; lognormal variance with pedigree 0.6921, pedigree (1,2,5,5,1)
  De Wild 2007, company data
  Uncertainty: de Wild 2007, company data
- Aluminium [air, urban air close to ground]: 0.00077252 kg; lognormal variance with pedigree 0.6921, pedigree (1,2,5,5,1)
  De Wild 2007, company data
  Uncertainty: de Wild 2007, company data
- Nitrogen oxides [air, urban air close to ground]: 5e-5 kg; lognormal variance with pedigree 0.096, pedigree (3,4,5,5,1)
  Hagedorn 1992, due to nitric acid use
  Uncertainty: Hagedorn 1992, due to nitric acid use
- Sodium [air, urban air close to ground]: 4.8488e-5 kg; lognormal variance with pedigree 0.6921, pedigree (1,2,5,5,1)
  De Wild 2007, company data
  Uncertainty: de Wild 2007, company data
- Ethane, hexafluoro-, HFC-116 [air, urban air close to ground]: 0.00011861 kg; lognormal variance with pedigree 0.0821, pedigree (1,2,5,5,1)
  (same comment as for Methane, tetrafluoro-, R-14)
- NMVOC, non-methane volatile organic compounds, unspecified origin [air, urban air close to ground]: 0.19354 kg; lognormal variance with pedigree 0.0821, pedigree (1,2,5,5,1)
  De Wild 2007, company data
  Uncertainty: de Wild 2007, company data
- Particulates, < 2.5 um [air, urban air close to ground]: 0.0026627 kg; lognormal variance with pedigree 0.3421, pedigree (1,2,5,5,1)
  De Wild 2007, company data
  Uncertainty: de Wild 2007, company data
- Hydrogen fluoride [air, urban air close to ground]: 4.8488e-6 kg; lognormal variance with pedigree 0.0821, pedigree (1,2,5,5,1)
  De Wild 2007, company data
  Uncertainty: de Wild 2007, company data

## Sampling procedure
Data collected from 5 specific processes and companies (4 multi-Si + 1 single-Si processing company).

## Extrapolations
Data 2005 calculated from data 2004 by multiplying amounts of materials by solar cell area factor of 156*156/(125*125) = 1.56; energy scaled linearly with cell side length. This dataset has been copied from an original dataset covering the geography RER. The uncertainty has been adjusted accordingly.

## Review by Roberto Dones 2007-08-23
Passed.
none
