# heat and power co-generation, natural gas, conventional power plant, 100MW electrical

Dataset: EcoSpold 2, unit process
Geography: AR
Time period: 2012-01-01 to 2021-12-31
Technology level: current
Classification: EcoSpold01Categories: natural gas/power plants
Classification: ISIC rev.4 ecoinvent: 3510:Electric power generation, transmission and distribution
Synonyms: cogeneration; CHP
Tags: with true value; natural gas power; fossil fuels
Scenario: Business-as-Usual
System model: Allocation, cut-off by classification
Generated by: Alejandro P Arena
Published in: Suppen, N. 2017
Database: ecoinvent
isCopyrightProtected: true
accessRestrictedTo: 1

## General comment
This dataset represents the production of high voltage electricity and heat in a conventional steam boiler natural gas power plant with CHP (combined heat and power) Argentina in 2014. It has been built based on the database "heat and power co-generation, natural gas, conventional power plant, 100MW electrical"/ GLO 2008 (accessed: 19 January, 2018)
For electricity production with natural gas, four different datasets relying to different power plant types exist:
- conventional power plant with / without CHP
- combined cycle power plant with / without CHP
At the moment, these datasets differ in nothing but the efficiency. High voltage electricity (at the busbar) is the reference product, whereupon heat is a by-product in CHP plants. Out of all fossile fuels, natural gas holds worldwide the highest share of CHP plants besides peat. Furthermore, natural gas power plants are today often designed with combined cycles.
The efficiency calculations are based on national statistics statistics (fuel inputs, electricity produced) and some own calculation assumptions. . Reducing factors such as contaminations of important plant parts, cooling conditions or part load have been taken into account. Even if efficiencies vary with different surrounding temperatures, a medium efficiency is assumed for all countries. Temperature adjustments would be related to high uncertainties.
Water is used for wet cooling and as feed water in the steam circuit. In this dataset, 100% wet cooling and no once-through cooling is assumed.
EMISSIONS:
The values were taken from the original database and were scaling according to the amount of fuel consumed. For that reason, authors decided to maintain also, the original idfferent sources served as basis for assumption of average emissions. Where possible, the most recent sources were taken into account, whereas older sources were taken in order to determine the remaining data gaps. The emissions have been fixed for the former UCTE region* and have been overtaken as such for all countries without value adaptation (adaptation of the uncertainty). See ecoinvent report 'Erdgas' given as main source for details (Tab. 11.15). In the following a short overview:
- Emissions of NOx, CO, CO2, SO2, particles, N2O and CH4 are mainly taken from CORINAIR 2001, EPA, and a variety of other data sources
- NOx emissions are a major challenge in natural gas power plants. With rising temperature, emissions also rise; band widths of NOx emissions in literature are correspondingly large. There are several methods to diminish these emissions.
- CO is a result of incomplete burning. For economic and technical reasons, plant combustion is optimized and CO emissions are low.
- CO2 and SO2 emissions are dependent on the composition of the used fuel. Due to the low sulfur content of the used natural gas, no desulfurization has to take place.
- Organic compound emissions are estimated on the basis of EPA 1998.
- Particles are assumed to be smaller than 2.5 micro-m
former UCTE: Union for the Coordination of the Transmission of Electricity, since 2009 replaced by ENTSO-E European Network of Transmission System Operators for Electricity.
Sources:
- CORINAIR 2001. EMEP/CORINAIR 2001: Joint EMEP/CORINAIR Atmospheric Emission Inventory Guidebook, Third Edition. Copenhagen: European Environment Agency, 2001. http://reports.eea.eu.int/technical_report_2001_3/en.
- EPA 1998. US Environmental Protection Agency (1998). Compilation of Air Pollutant Emission Factors, AP-42, Fifth Edition, Volume I: Chapter 1: External Combustion Sources, Natural Gas Combustion - Final Section - Supplement D , July 1998. CHIEF (Clearinghouse for Inventories and Emission Factors). Research Triangle Park, North Carolina. http://www.epa.gov/ttn/chief/ap42/.
- Rentz O., Karl U., Peter H. (2002). Ermittlung und Evaluierung von Emissionsfaktoren für Feuerungsanlagen in Deutschland für die Jahre 1995, 2000 und 2010. Deutsch- Französisches Institut für Umweltforschung, Uni Karsruhe. Endbericht. Im Auftrag des Umweltbundesamtes. Forschungsbericht 299 43 142. Umweltbundesamt. Berlin. -CAMMESA "COMPAÑÍA ADMINISTRADORA DEL MERCADO MAYORISTA ELÉCTRICO SOCIEDAD ANÓNIMA" Informe anual 2014. Supporting documentation available at:
[This dataset is meant to replace the following datasets:]

## Included activities start
From the constructed natural gas power plant ready to produce electricity.

From reception of natural gas and operating materials at power plant/factory gate

## Included activities end
This activity ends with 1kWh of high voltage electricity and a corresponding amount of heat produced at the power plant and arrived at the busbar.

This dataset includes:
- all operation and maintenance activities and materials of the power plants.
- Cooling: It is a assumed that all plants use wet cooling with a cooling tower.No cooling tower is included in this dataset (will be implemented in future versions)
- decarbonised water use for reduction of NOx emissions
- this dataset diffieres from the base dataset in that here it has been assimilated as if everything were natural gas
This dataset doesn't include
- raw materials extraction, decommissioning and waste treatment as these activities are already included in the infrastructure datasets.
- transformation of the electricity produced.

## Technology
Conventional natural gas power plant of 100MWe. The plant is used for middle load with 5000 hours of operation at full capacity per year. The plant is assumed to operate 180000 hours during its lifetime.

## Time period
The Annual Production Volume is valid for the year 2014.

## Parameters
- factor: input of MJ for the production of 1 kWh: 7.0713 MJ/kWh; name factor_MJ_kWh; = 1*3.6/efficiency; lognormal variance with pedigree 0.0532, pedigree (4,4,3,4,4)
  Calculated value.
  nan
- fraction, water, decarbonised, to air: 0.00510204 dimensionless; name fraction_WDC_to_air; = fraction_CW_to_air; lognormal variance with pedigree 0.092025, pedigree (4,4,3,2,4)
  This factor do not participate in the exchanges calculation for this dataset, since it has been assumed that no decarbonised water is used (there is no LowNox system, and once-through cooling system is used). It has been kept for consistency reasons
- once-through and cooling pond cooling systems as a fraction of all cooling syste: 1 dimensionless; name once_through_andCP_CS_fractio_from_allCS; lognormal variance with pedigree 0.092025, pedigree (4,4,3,2,4)
  All the considered power plants In this dataset are cooled using once- trhough colling systems nan
- gross electricity production: 2.35895e9 kWh; name gross_electricity; lognormal variance with pedigree 0.0033, pedigree (3,2,1,1,2)
  Literature value/calculated value. Gross electricity production of grid-connected electricity in CHP plants in 2014. The gross electricity production was calculated from the net electricity production considering the losses due to auxiliary consumption within the power plant (see the comment for the parameter losses from gross electricity production)..
  The net electricity production was obtained from CAMMESA "COMPAÑÍA ADMINISTRADORA DEL MERCADO MAYORISTA ELÉCTRICO SOCIEDAD ANÓNIMA" Retreived from: http://portalweb.cammesa.com/Memnet1/default.aspx
- water consumption, electricity production from NG, once-T and coolingP CS: 0.0005 m3/kWh; name WConsumption_EP_NG_onceT_andCP_CS; lognormal variance with pedigree 0.092025, pedigree (4,4,3,2,4)
  Estimated based on literature (Scown, 2011, Water Footprint of U.S. Transportation Fuels, SI). Data taken from the GLO 2008 dataset
  nan
- fraction, process water, to air: 0.15 dimensionless; name fraction_PW_to_air; lognormal variance with pedigree 0.092025, pedigree (4,4,3,2,4)
  Literature value taken from the GLO 2008 dataset. In case when no industry/process specific data are available, default evaporation fraction value is used. This value is 15% and is based on literature (Statistics Canada, 2007 & Shaffer, K.H., 2008, Consumptive water use in the Great Lakes Basin, USGS & Shiklomanov, 2003, World Water Resources at the Beginning of the 21st Century) and has been approved by an expert.
  nan
- losses from gross electricity production: 0.07 dimensionless; name losses_gross_net; lognormal variance with pedigree 0.017225, pedigree (4,3,1,2,3)
  Literature value. Own use of electricity plants in this country in 2012. The default loss as described by the IEA in the electricity statistic is applied, which is 0.07 (IEA electricity information 2014: The difference between gross and net electricity production is generally observed to be about 7% for conventional thermal stations, 1% for hydro stations and 6% for nuclear.)
  IEA. 2014. Electricity Information 2014. ISBN 978-92-64-21692-1. International Energy Agency (IEA), Paris Cedex (FR).
  nan
  Uncertainty: generic IEA value used
- fraction, water, completely softened, to air: 0.15 dimensionless; name fraction_WCS_to_air; = fraction_PW_to_air; lognormal variance with pedigree 0.092025, pedigree (4,4,3,2,4)
  Calculated value. See comment in the other parametres present in this dataset. Water, completely softened is considered to be always used as process water, thus process water fractions to air are applied to all water, completely softened input flows to calculate the amount of water consumed in the processes.
  nan
- water withdrawal, electricity production from NG, once-T and coolingP CS: 0.098 m3/kWh; name WWithdrawal_EP_NG_onceT_andCP_CS; lognormal variance with pedigree 0.092025, pedigree (4,4,3,2,4)
  (same comment as for water consumption, electricity production from NG, once-T and coolingP)
- efficiency: 0.5091 dimensionless; lognormal variance with pedigree 0.017225, pedigree (4,3,1,2,3)
  Literature value/calculated value/estimation.
  This figure represents the weighted average of all CHP units which dispatched electricity during 2014 in Argentina. The calculation of the weighted average efficiency was performed considering the specific consumption of every generation unit reported by CAMMESA (available from http://portalweb.cammesa.com/memnet1/revistas/estacional/datos_termicos.html). The efficiency was adapted in order to take into account that 6.69% of the electricity was produced burning GO instead of NG.
  The actual amount of Natural gas consumed have has adjusted in order to take into account the standard LHV for natural gas used in Ecoinvent (39 MJ/m3).
- fraction, cooling water, to air: 0.00510204 dimensionless; name fraction_CW_to_air; = (WConsumption_EP_NG_onceT_andCP_CS*once_through_andCP_CS_fractio_from_allCS)/(WWithdrawal_EP_NG_onceT_andCP_CS*once_through_andCP_CS_fractio_from_allCS); lognormal variance with pedigree 0.092025, pedigree (4,4,3,2,4)
  Calculated
  nan

## Reference product
- heat, district or industrial, natural gas: 1 MJ; name heat; CPC 17300: Steam and hot water; By-product classification allocatable product
  Literature value/calculated value. Since the heat production was not available in the national statistics, this input has been extracted from Energy balances of non-OECD countries.
  As an exception, all exchanges refer to the by-product 'electricity, high voltage, 1kWh'.
  IEA. 2014. Electricity Information 2014. ISBN 978-92-64-21692-1. International Energy Agency (IEA), Paris Cedex (FR).
  IEA/OECD. 2014. Energy balances of non-OECD countries 2014. International Energy Agency (IEA), Paris Cedex (FR).
  production volume 1.39966e10 MJ; name heat_apv; = heat/electricity*electricity_apv
    Calculated value
  property exergy 0.184214 MJ; name exergy
    allocation factor for electricity (=1) vs. heat, where heat is calculated as the termodynamic mean temperature Tm = (Tfeed-Treturn)/ln(Tfeed/Treturn), relative to the application temperature (Tu, typically = 293 K), i.e. (Tm-Tu)/Tm
  property true value relation 0.184214; name true_value_relation
    property to calculate 'true value' from
  property price 0.0106 EUR2005
    Average European district heat price from Ecoheatcool and Euroheat 2005-2006, Ecoheat Work package 1: The European heat market. Final report. 10.6 EUR/GJ i s the price of district heat. http://www.solarthermalworld.org/files/Ecoheatcool%20WP1%20Web.pdf?download
  property true value 0.0406902; name heat_true_value
    allocation property applied in "true value" allocation // value calculated from true value relation
  properties: heating value, net 1 MJ

## By-products
- residue from cooling tower: 0 kg; name cooling_tower_residue; CPC 39: Wastes or scraps; By-product classification Waste; pedigree (1,1,1,1,1)
  Only once--through cooling systems have been considered in this dataset. There are no cooling towers.
  production volume 0 kg; = cooling_tower_residue/electricity* electricity_apv
    (same comment as for residue from cooling tower)
  property price 0 EUR2005; name cooling_tower_residue_price_EUR2005
    Waste products are assigned a price of zero as they are assumed to require further treatment.
  property heating value, net 0 MJ
    Non combustible products are assumed to have an LHV equal to zero (0).
  property carbon content 0.0544233
    carbon content on a dry matter basis (reserved; not for manual entry)
  properties: dry mass 0.7 kg, water content 0.428571, carbon content, non-fossil 0, wet mass 1 kg, carbon content, fossil 0.0544233, water in wet mass 0.3 kg, carbon allocation 0.0380963 kg
- electricity, high voltage: 0 kWh; name electricity; By-product classification allocatable product; CPC 17100: Electrical energy; undefined min 1, max 1, standardDeviation95 0, pedigree (1,1,3,1,1)
  Cogeneration\Gas\Transformation
  production volume 2.19382e9 kWh; name electricity_apv; = gross_electricity* (1-losses_gross_net)
    The net electricity production was obtained from CAMMESA "COMPAÑÍA ADMINISTRADORA DEL MERCADO MAYORISTA ELÉCTRICO SOCIEDAD ANÓNIMA" Retreived from: http://portalweb.cammesa.com/Memnet1/default.aspx
    See comment in parameter Gross electricity production for more information
  property exergy 3.6 MJ
    (same comment as for heat, district or industrial, natural gas)
  property price 0.0977 EUR2005
    Temporary price data. Calculated as 90% of purchasers price based on: 94% of the average price (to account for a 6% loss in transformation and transmission) for electricity for industrial consumersin 2005 (excluded taxes). From IEA.
  property true value 0.124638; name electricity_true_value
    (same comment as for heat, district or industrial, natural gas)
  properties: true value relation 3.6

## Inputs from technosphere
- natural gas, high pressure: 0.00783868 m3; name natural_gas; = factor_MJ_kWh/ natural_gas_Net_Heat_Value; lognormal variance with pedigree 0.002, pedigree (1,1,3,1,1)
  Calculated value for Argentina based on national energy statistics.
  Due to natural gas shortages during the cold season, in certaing power plants oil is burned when required. In this dataset this has been handled as if the total heat input was obtained from natural gas. In this case, 6.6 % of the electricity is generated burning GO instead of NG. The result has then been scaled to the Ecoinvent standard natural gas heating value
  Source: CAMMESA "COMPAÑÍA ADMINISTRADORA DEL MERCADO MAYORISTA ELÉCTRICO SOCIEDAD ANÓNIMA" Informe anual 2014. Supporting documentation available at: <http://portalweb.cammesa.com/Memnet1/default.aspx>
  property heating value, net 34.8 MJ; name natural_gas_Net_Heat_Value
  property heating value, gross 39 MJ; name natural_gas_Gross_Heat_Value
  properties: dry mass 0.84 kg, carbon content, fossil 0.602381, wet mass 0.84 kg
  note on carbon content, fossil: An average C content of 0.506 kg C/ m3 has been assumed (this average has been calculated using data in Tab 3.5, ecoinvent v2.2 report 6_V
- gas power plant, 100MW electrical: 1.51669e-11 unit; name gas_power_plant; = factor_MJ_kWh*0.0000000000556; lognormal variance with pedigree 0.1387, pedigree (3,3,4,3,3)
  Literature value/calculated value, adaptedfor Argentina using the mathematical relation with the factor_MJ_kWh.
  The factor_MJ_kWh has been calculated with information retrieved from CAMMESA for the 2014 year:
  CAMMESA "COMPAÑÍA ADMINISTRADORA DEL MERCADO MAYORISTA ELÉCTRICO SOCIEDAD ANÓNIMA" . Supporting documentation available at: <http://portalweb.cammesa.com/Memnet1/default.aspx> Additional information can be obtained from CAMMESA under request
- water, completely softened: 0.00163672 kg; name water_completely_softened; = factor_MJ_kWh*0.006; lognormal variance with pedigree 0.2266, pedigree (4,3,4,1,1)
  Literature value/calculated value, This value have been adapted from the GLO 2008 dataset using the factor_MJ_kWh.
  The factor_MJ_kWh has been calculated with information retrieved from CAMMESA for the 2014 year:
  CAMMESA "COMPAÑÍA ADMINISTRADORA DEL MERCADO MAYORISTA ELÉCTRICO SOCIEDAD ANÓNIMA" . Supporting documentation available at: <http://portalweb.cammesa.com/Memnet1/default.aspx> Additional information can be obtained from CAMMESA under request
  properties: wet mass 1 kg

## Inputs from nature
- Water, cooling, unspecified natural origin [natural resource, in water]: 0.002546 m3; name water_cooling_UNO_input; = (once_through_andCP_CS_fractio_from_allCS*WWithdrawal_EP_NG_onceT_andCP_CS)/10.5*factor_MJ_kWh; lognormal variance with pedigree 0.098025, pedigree (4,4,4,2,4)
  Calculated value for Argentina.
  Water is used for cooling and as feed water in the steam circuit for compensating losses. It is assumed that all plants use once-through cooling systems
  This value have been adapted from the GLO 2008 dataset using the factor_MJ_kWhThe factor_MJ_kWh has been calculated with information retrieved from CAMMESA for the 2014 year.
  Source: CAMMESA "COMPAÑÍA ADMINISTRADORA DEL MERCADO MAYORISTA ELÉCTRICO SOCIEDAD ANÓNIMA" Informe anual 2014. Supporting documentation available at: <http://portalweb.cammesa.com/Memnet1/default.aspx>

## Emissions to nature
- Benzene [air, non-urban air or from high stacks]: 2.46053e-10 kg; name benzene; = factor_MJ_kWh*0.000000000902; lognormal variance with pedigree 0.6807, pedigree (3,3,5,3,3)
  Literature value/calculated value, adapted from the GLO 2008 dataset using the mathematical relation taken from the original dataset and adapted for Argentina with the factor_MJ_kWh.
  The factor_MJ_kWh has been calculated with information retrieved from CAMMESA for the 2014 year:
  CAMMESA "COMPAÑÍA ADMINISTRADORA DEL MERCADO MAYORISTA ELÉCTRICO SOCIEDAD ANÓNIMA" . Supporting documentation available at: <http://portalweb.cammesa.com/Memnet1/default.aspx> Additional information can be obtained from CAMMESA under request
  services Ltd., Uster, Switzerland.
- Carbon monoxide, fossil [air, non-urban air or from high stacks]: 5.45572e-6 kg; name carbon_monoxide_fossil; = factor_MJ_kWh*0.00002; lognormal variance with pedigree 0.3087, pedigree (3,3,4,3,3)
  Literature value/calculated value, adapted from the GLO 2008 dataset using the mathematical relation taken from the original dataset and adapted for Argentina with the factor_MJ_kWh.
  The factor_MJ_kWh has been calculated with information retrieved from CAMMESA for the 2014 year:
  CAMMESA "COMPAÑÍA ADMINISTRADORA DEL MERCADO MAYORISTA ELÉCTRICO SOCIEDAD ANÓNIMA" . Supporting documentation available at: <http://portalweb.cammesa.com/Memnet1/default.aspx> Additional information can be obtained from CAMMESA under request
  Ltd., Uster, Switzerland.
- Methane, fossil [air, non-urban air or from high stacks]: 2.64875e-7 kg; name methane_fossil; = factor_MJ_kWh*0.000000971; lognormal variance with pedigree 0.6807, pedigree (3,3,5,3,3)
  (same comment as for Benzene)
- Dinitrogen monoxide [air, non-urban air or from high stacks]: 2.66512e-7 kg; name dinitrogen_monoxide; = factor_MJ_kWh*0.000000977; lognormal variance with pedigree 0.3407, pedigree (3,3,5,3,3)
  Literature value/calculated value, adapted from the GLO 2008 dataset using the mathematical relation taken from the original dataset and adapted for Argentina with the factor_MJ_kWh.
  The factor_MJ_kWh has been calculated with information retrieved from CAMMESA for the 2014 year:
  CAMMESA "COMPAÑÍA ADMINISTRADORA DEL MERCADO MAYORISTA ELÉCTRICO SOCIEDAD ANÓNIMA" . Supporting documentation available at: <http://portalweb.cammesa.com/Memnet1/default.aspx> Additional information can be obtained from CAMMESA under request
  , Switzerland.
- Pentane [air, non-urban air or from high stacks]: 3.13704e-7 kg; name pentane; = factor_MJ_kWh*0.00000115; lognormal variance with pedigree 0.6807, pedigree (3,3,5,3,3)
  (same comment as for Benzene)
- Beryllium [air, non-urban air or from high stacks]: 6.73781e-13 kg; name beryllium; = factor_MJ_kWh*0.00000000000247; lognormal variance with pedigree 0.034, pedigree (3,5,4,5,3)
  Literature value/calculated value, adapted from the GLO 2008 dataset using the mathematical relation taken from the original dataset and adapted for Argentina with the factor_MJ_kWh.
  The factor_MJ_kWh has been calculated with information retrieved from CAMMESA for the 2014 year:
  CAMMESA "COMPAÑÍA ADMINISTRADORA DEL MERCADO MAYORISTA ELÉCTRICO SOCIEDAD ANÓNIMA" . Supporting documentation available at: <http://portalweb.cammesa.com/Memnet1/default.aspx> Additional information can be obtained from CAMMESA under request
  ., Uster, Switzerland.
- Ethane [air, non-urban air or from high stacks]: 3.73717e-7 kg; name ethane; = factor_MJ_kWh*0.00000137; lognormal variance with pedigree 0.6807, pedigree (3,3,5,3,3)
  (same comment as for Benzene)
- Carbon dioxide, fossil [air, non-urban air or from high stacks]: 0.0145668 kg; name carbon_dioxide_fossil; = factor_MJ_kWh*0.0534; lognormal variance with pedigree 0.0513, pedigree (3,3,5,3,3)
  Literature value/calculated value, adapted from the GLO 2008 dataset using the mathematical relation taken from the original dataset and adapted for Argentina with the factor_MJ_kWh.
  The factor_MJ_kWh has been calculated with information retrieved from CAMMESA for the 2014 year:
  CAMMESA "COMPAÑÍA ADMINISTRADORA DEL MERCADO MAYORISTA ELÉCTRICO SOCIEDAD ANÓNIMA" . Supporting documentation available at: <http://portalweb.cammesa.com/Memnet1/default.aspx> Additional information can be obtained from CAMMESA under request
  .
- Manganese [air, non-urban air or from high stacks]: 2.13046e-11 kg; name manganese; = factor_MJ_kWh*0.0000000000781; lognormal variance with pedigree 0.034, pedigree (3,5,4,5,3)
  (same comment as for Benzene)
- Selenium [air, non-urban air or from high stacks]: 1.33938e-12 kg; name selenium; = factor_MJ_kWh*0.00000000000491; lognormal variance with pedigree 0.6807, pedigree (3,3,5,3,3)
  (same comment as for Carbon dioxide, fossil)
- Benzo(a)pyrene [air, non-urban air or from high stacks]: 1.44304e-13 kg; name benzo_a_pyrene; = factor_MJ_kWh*0.000000000000529; lognormal variance with pedigree 0.6807, pedigree (3,3,5,3,3)
  (same comment as for Benzene)
- Lead [air, non-urban air or from high stacks]: 2.80969e-11 kg; name lead; = factor_MJ_kWh*0.000000000103; lognormal variance with pedigree 0.034, pedigree (3,5,4,5,3)
  (same comment as for Carbon dioxide, fossil)
- Sulfur dioxide [air, non-urban air or from high stacks]: 1.56034e-7 kg; name sulfur_dioxide; = factor_MJ_kWh*0.000000572; lognormal variance with pedigree 0.0517, pedigree (3,3,5,3,3)
  (same comment as for Benzene)
- PAH, polycyclic aromatic hydrocarbons [air, non-urban air or from high stacks]: 2.18229e-9 kg; name pah; = factor_MJ_kWh*0.000000008; lognormal variance with pedigree 1.1067, pedigree (4,3,5,3,3)
  (same comment as for Dinitrogen monoxide)
- Hexane [air, non-urban air or from high stacks]: 2.16319e-7 kg; name hexane; = factor_MJ_kWh*0.000000793; lognormal variance with pedigree 0.6807, pedigree (3,3,5,3,3)
  Literature value/calculated value, adapted from the GLO 2008 dataset using the mathematical relation taken from the original dataset and adapted for Argentina with the factor_MJ_kWh.
  The factor_MJ_kWh has been calculated with information retrieved from CAMMESA for the 2014 year:
  CAMMESA "COMPAÑÍA ADMINISTRADORA DEL MERCADO MAYORISTA ELÉCTRICO SOCIEDAD ANÓNIMA" . Supporting documentation available at: <http://portalweb.cammesa.com/Memnet1/default.aspx> Additional information can be obtained from CAMMESA under request
- Particulates, < 2.5 um [air, non-urban air or from high stacks]: 1.33938e-7 kg; name particulates_lt2_5; = factor_MJ_kWh*0.000000491; lognormal variance with pedigree 0.3087, pedigree (3,3,4,3,3)
  (same comment as for Hexane)
- Toluene [air, non-urban air or from high stacks]: 4.09179e-10 kg; name toluene; = factor_MJ_kWh*0.0000000015; lognormal variance with pedigree 0.6807, pedigree (3,3,5,3,3)
  (same comment as for Benzene)
- Mercury [air, non-urban air or from high stacks]: 1.87677e-11 kg; name mercury; = factor_MJ_kWh*0.0000000000688; lognormal variance with pedigree 0.6807, pedigree (3,3,5,3,3)
  (same comment as for Hexane)
- Butane [air, non-urban air or from high stacks]: 2.526e-7 kg; name butane; = factor_MJ_kWh*0.000000926; lognormal variance with pedigree 0.6807, pedigree (3,3,5,3,3)
  Literature value/calculated value, adapted from the GLO 2008 dataset using the mathematical relation taken from the original dataset and adapted for Argentina with the factor_MJ_kWh.
  The factor_MJ_kWh has been calculated with information retrieved from CAMMESA for the 2014 year:
  CAMMESA "COMPAÑÍA ADMINISTRADORA DEL MERCADO MAYORISTA ELÉCTRICO SOCIEDAD ANÓNIMA" . Supporting documentation available at: <http://portalweb.cammesa.com/Memnet1/default.aspx> Additional information can be obtained from CAMMESA under request
  services Ltd., Uster, Switzerland., Switzerland.
- Acetaldehyde [air, non-urban air or from high stacks]: 2.18229e-10 kg; name acetaldehyde; = factor_MJ_kWh*0.0000000008; lognormal variance with pedigree 1.1067, pedigree (4,3,5,3,3)
  (same comment as for Benzene)
- Nitrogen oxides [air, non-urban air or from high stacks]: 1.00112e-5 kg; name nitrogen_oxides; = factor_MJ_kWh*0.0000367; lognormal variance with pedigree 0.3087, pedigree (3,3,4,3,3)
  (same comment as for Hexane)
- Formaldehyde [air, non-urban air or from high stacks]: 8.81098e-9 kg; name formaldehyde; = factor_MJ_kWh*0.0000000323; lognormal variance with pedigree 0.6807, pedigree (3,3,5,3,3)
  (same comment as for Butane)
- Chromium [air, non-urban air or from high stacks]: 7.82896e-11 kg; name chromium; = factor_MJ_kWh*0.000000000287; lognormal variance with pedigree 0.034, pedigree (3,5,4,5,3)
  (same comment as for Hexane)
- Acetic acid [air, non-urban air or from high stacks]: 3.30071e-8 kg; name acetic_acid; = factor_MJ_kWh*0.000000121; lognormal variance with pedigree 1.1007, pedigree (3,3,5,3,3)
  Literature value/calculated value, adapted from the GLO 2008 dataset using the mathematical relation taken from the original dataset and adapted for Argentina with the factor_MJ_kWh.
  The factor_MJ_kWh has been calculated with information retrieved from CAMMESA for the 2014 year:
  CAMMESA "COMPAÑÍA ADMINISTRADORA DEL MERCADO MAYORISTA ELÉCTRICO SOCIEDAD ANÓNIMA" . Supporting documentation available at: <http://portalweb.cammesa.com/Memnet1/default.aspx> Additional information can be obtained from CAMMESA under request
  services Ltd., Uster, Switzerland..
- Arsenic [air, non-urban air or from high stacks]: 1.12115e-11 kg; name arsenic; = factor_MJ_kWh*0.0000000000411; lognormal variance with pedigree 0.034, pedigree (3,5,4,5,3)
  (same comment as for Benzene)
- Cadmium [air, non-urban air or from high stacks]: 6.16496e-11 kg; name cadmium; = factor_MJ_kWh*0.000000000226; lognormal variance with pedigree 0.034, pedigree (3,5,4,5,3)
  (same comment as for Acetic acid)
- Propionic acid [air, non-urban air or from high stacks]: 4.36457e-9 kg; name propionic_acid; = factor_MJ_kWh*0.000000016; lognormal variance with pedigree 1.1067, pedigree (4,3,5,3,3)
  (same comment as for Benzene)
- Water [air, unspecified]: 1.32353e-5 m3; name water_to_air_unspecified; = (water_completely_softened/1000)*fraction_WCS_to_air+water_cooling_UNO_input*fraction_CW_to_air; lognormal variance with pedigree 0.098025, pedigree (4,4,4,2,4)
  Calculated value for Argentina. It is a assumed that all plants use once-through cooling systems.
  property fraction, origin: fresh water 0.0386784; name fraction_origin_fresh_water
  property fraction, origin: unspecified 0.961322; name fraction_origin_unspecified
  property fraction, origin: salt water 0; name fraction_origin_salt_water
- Acenaphthene [air, non-urban air or from high stacks]: 2.16319e-13 kg; name acenaphthene; = factor_MJ_kWh*0.000000000000793; lognormal variance with pedigree 0.6807, pedigree (3,3,5,3,3)
  (same comment as for Benzene)
- Water [water, unspecified]: 0.0025344 m3; name water_to_water_unspecified; = (water_completely_softened/1000)*(1-fraction_WCS_to_air)+water_cooling_UNO_input*(1-fraction_CW_to_air); lognormal variance with pedigree 0.098025, pedigree (4,4,4,2,4)
  Calculated value for Argentina
  property fraction, origin: fresh water 0.0311766; name fraction_origin_fresh_water_Ww
  property fraction, origin: unspecified 0.968823; name fraction_origin_unspecified_Ww
  property fraction, origin: salt water 0; name fraction_origin_salt_water_Ww
- Dioxins, measured as 2,3,7,8-tetrachlorodibenzo-p-dioxin [air, non-urban air or from high stacks]: 0 kg; name dioxins; = factor_MJ_kWh*2.9E-17; pedigree (1,1,1,1,1)
  (same comment as for Benzene)
- Nickel [air, non-urban air or from high stacks]: 1.17571e-10 kg; name nickel; = factor_MJ_kWh*0.000000000431; lognormal variance with pedigree 0.034, pedigree (3,5,4,5,3)
  (same comment as for Benzene)
- Cobalt [air, non-urban air or from high stacks]: 4.69192e-12 kg; name cobalt; = factor_MJ_kWh*0.0000000000172; lognormal variance with pedigree 0.034, pedigree (3,5,4,5,3)
  (same comment as for Benzene)
- Propane [air, non-urban air or from high stacks]: 1.92314e-7 kg; name propane; = factor_MJ_kWh*0.000000705; lognormal variance with pedigree 0.6807, pedigree (3,3,5,3,3)
  (same comment as for Dinitrogen monoxide)

## Sampling procedure
Literature and statistics: The net electricity production from co-generation power plant in Argentina during 2014 was 2.19 TWh. Three cogeneration plants dispatched electricity during 2014, Central Térmica Luján de Cuyo with two steam generators providing steam to the petroleum distillery located in Mendoza, Argener providing heat to a steel plant, and Ensenada with one generation unit supplying electricity and heat to the petroleum distillery located in La Plata.Only the last one consumed Natural Gas and Gas Oil, the remaining two consumed only Natural Gas during the reference year
Since more than 93 % was generated burning Natural Gas, these power plants were modelled based on extrapolations from the global dataset “heat and power co-generation, natural gas", GLO, 2008 (accessed: January 19, 2018). Electricity production volume and efficiency were regionalized with data obtained from CAMMESA "COMPAÑÍA ADMINISTRADORA DEL MERCADO MAYORISTA ELÉCTRICO SOCIEDAD ANÓNIMA" Supporting documentation available at: <http://portalweb.cammesa.com/Memnet1/default.aspx>
The total amount of energy consumed was considered as an equivalent volume of natural gas. A further adjustment have been performed in order to take into account the standard LHV for natural gas used in ecoinvent (39 MJ/m3).

## Extrapolations
Exchanges have been extrapolated from the "heat and power co-generation, natural gas, conventional power plant, 100MW electrical"/ GLO 2008 dataset (accessed: 19 January, 2018) using the factor_MJ_kWh..

The efficiency is based on CAMMESA statistics and calculated with own assumptions.
Source: CAMMESA "COMPAÑÍA ADMINISTRADORA DEL MERCADO MAYORISTA ELÉCTRICO SOCIEDAD ANÓNIMA" Supporting documentation available at: <http://portalweb.cammesa.com/Memnet1/default.aspx>

## Review by Christopher Oberschelp 2018-02-08
Review has not been finished as ecoinvent wants to run a full database calculation. There are still open issues present. Review will have to continue after the calculation.
