# steam production, as energy carrier, in chemical industry

Dataset: EcoSpold 2, unit process
Geography: RER
Time period: 2010-01-01 to 2021-12-31
Technology level: current
Classification: ISIC rev.4 ecoinvent: 3530:Steam and air conditioning supply
Scenario: Business-as-Usual
System model: Allocation, cut-off by classification
Generated by: David FitzGerald
Published in: Althaus H.-J. 2007
Database: ecoinvent
isCopyrightProtected: true
accessRestrictedTo: 1

## General comment
This dataset represents the production of 1 MJ of steam used for heating in the chemical and petrochemical industry. It is to be used for heat energy production in an average chemical plant, in case no information is available about the source of the heat energy. The inventory represents the average fuel mix used for steam production in the European chemical and petrochemical industry.
The total energy required for the production of 1 MJ of steam is 1.31 MJ and is based on a study on steam production in the European chemical industry (Boustead 1999). The shares of the fuel mix used for heating are based on data from Eurostat (2017) which correspond to the average fuel mix used by the European chemical and petrochemical industry between 2011 and 2015. The water consumption is based on data collected from 11 chemical plants in Europe (Zah & Hischier 2007).
The energy content of the steam is 2.75 MJ/kg. The overall efficiency is 74% when taking into account the input of recovered energy (0.047 MJ per MJ of steam).
References:
Althaus H.-J., Chudacoff M., Hischier R., Jungbluth N., Osses M. and Primas A. (2007) Life Cycle Inventories of Chemicals. ecoinvent report No. 8, v2.0. EMPA Dübendorf, Swiss Centre for Life Cycle Inventories, Dübendorf, CH.
Boustead I. (1999) Ecoprofiles of plastics and related intermediates, Steam (on-site average). European Centre for Plastics in the Environment (APME), Brussels.
Eurostat (2017) Energy Balances (2017 edition), http://ec.europa.eu/eurostat/web/energy/data/energy-balances (last accessed on the 2017-08-22).
Zah R., Hischier R. (2007) Life Cycle Inventories of Detergents. ecoinvent report No.
12. Swiss Centre for Life Cycle Inventories, Dübendorf, 2007.

## Included activities start
The activity starts with the input of heat, electricity and water.

## Included activities end
The activity ends with the production of 1 MJ heat (=0.3636 kg) steam from cold water. The activity includes water losses, but does not include the use of additives.

## Geography
Average steam production in the European chemical industry.

## Technology
Average technology used in the chemical and plastics industry in Europe.
Two types of boilers are commonly used:
1) fired tube boilers, which are cylinder-shaped, and closed at both ends by tubular plates enclosing the following items: a large diameter furnace tube passing longitudinally through the cylindrical body, and in which combustion occurs; flue gas tubes (or smoke tubes) in which the flue gas circulate.
Schematic view of a fire tube boiler:
These boilers produce steam and high pressure hot water, and their power ranges from 3 to 20 MWt. They are currently most often equipped with low NOx type burners, which use primary measures for the reduction of NOx emissions (natural gas staging technique or/and flue gas recirculation).
2) water tube boiler, which comprises many tubes connected to 1 or 2 tanks; the upper tank containing the water-steam emulsion, and the lower tank containing water.
Schematic view of a water tube boiler:
Most often this type of boiler is built specifically according to the power and specifications required. The range of powers starts at 15 or 20 MWt, up to several hundreds of MWth, and even beyond. They are currently most often equipped with low NOx type burners, that use natural gas staging technique or/and internal flue gas recirculation.
Reference:
Zah R., Hischier R. (2007) Life Cycle Inventories of Detergents. ecoinvent report No.
12. Swiss Centre for Life Cycle Inventories, Dübendorf, 2007.

## Time period
Based on dates of publication of data sources.

## Parameters
- fraction, tap water, to air: 0.15 dimensionless; name fraction_TW_to_air; = fraction_PW_to_air; lognormal variance with pedigree 0.092025, pedigree (4,4,3,2,4)
  Calculated value. See comment in the other parametres present in this dataset. Tap water is considered to be always used as process water, thus process water fractions to air are applied to all tap water input flows to calculate the amount of water consumed in the processes.
- fraction, process water, to air: 0.15 dimensionless; name fraction_PW_to_air; lognormal variance with pedigree 0.092025, pedigree (4,4,3,2,4)
  Literature value. In case when no industry/process specific data are available, default evaporation fraction value is used. This value is 15% and is based on literature (Statistics Canada, 2007 & Shaffer, K.H., 2008, Consumptive water use in the Great Lakes Basin, USGS & Shiklomanov, 2003, World Water Resources at the Beginning of the 21st Century) and has been approved by an expert.

## Reference product
- heat, from steam, in chemical industry: 1 MJ; CPC 17300: Steam and hot water; By-product classification allocatable product
  Energy content of steam = 2.75 MJ/kg or 2.4 MJ/kg (latter if condensed steam is reheated).
  production volume 8.99315e11 MJ; = 53.6994*41868000000*0.4
    According to Cefic (2016), the fuel and power consumption in the EU chemical industry in 2010 amounted to 53.6994 million tonnes of oil equivalent. Roughly 40% of the energy is assumed to be delivered in the form of steam, based on data for the United States (JISEA, 2016).
    References:
    Cefic (2016). The European Chemical Industry - Facts & Figures 2016, Chart 5.1 - Fuel and power consumption in the EU chemical industry.
    The Joint Institute for Strategic Energy Analysis (JISEA) (2016). Generation and Use of Thermal Energy in the U.S. Industrial Sector and Opportunities to Reduce its Carbon Emissions. National Renewable Energy Laboratory (NREL), www.nrel.gov/publications.
  property price 0.0144102 EUR2005
    Calculated based on inputs: The price of the product has been calculated as a sum of the values of the material and energy inputs for this product. This value is therefore a rough estimation. It may underestimate the real price since there are additional expenses when producing any product. These expences can include for example labour costs, treatment of waste materials and profit for the producer. Please consider carefully whether this level of data quality is acceptable for your application.
  properties: heating value, net 1 MJ

## Inputs from technosphere
- heat, district or industrial, other than natural gas: 0.134792 MJ; = (1.31-(electricity_input*3.6))*0.105231; lognormal variance with pedigree 0.0107, pedigree (4,2,3,1,1)
  Value based on statistics from Eurostat (2017), from which the average fuel mix used by the European chemical and petrochemical industry between 2011 and 2015 was calculated.
  The total energy (1.31 MJ) and electricity (0.00808 KWh) required for the production of 1 MJ of heat in the form of steam are based on data collected from 215 steam plants in the EU (Boustead 1999).
  properties: corresponding fuel use, propane, furnace >100kW 1.05263 MJ, heating value, net 1 MJ
  note on corresponding fuel use, propane, furnace >100kW: Lower heating value of the fuel input related to the heat/electricity output, taken directly from ecoinvent v3.0 dataset "heat production, natural gas, at industrial furnace >100kW, GLO 2000".
- heat, district or industrial, other than natural gas: 0.027897 MJ; = (1.31-(electricity_input*3.6))*0.021779; lognormal variance with pedigree 0.0107, pedigree (4,2,3,1,1)
  (same comment as for heat, district or industrial, other than natural gas)
  properties: heating value, net 1 MJ, corresponding fuel use, propane, furnace >100kW 1.05263 MJ
- heat, district or industrial, other than natural gas: 0.00352123 MJ; = (1.31-(electricity_input*3.6))*0.002749; lognormal variance with pedigree 0.0107, pedigree (4,2,3,1,1)
  (same comment as for heat, district or industrial, other than natural gas)
- tap water: 0.0618182 kg; name tap_water_input; = (1.17-1)/2.75; source Dall'Acqua S. 1995; lognormal variance with pedigree 0.019225, pedigree (2,3,4,2,1)
  Value based on data from 11 chemical plants in Europe. 1.17 kg of tap water is required for the production of 1 kg of steam, therefore 0.17 kg of water is lost per kg of steam produced, while the rest is recirculated. Based on the energy content of steam of 2.75 MJ/kg, 0.425 kg of water is used per MJ of steam produced.
  Uncertainty: average from 11 data sets
  properties: carbon content, fossil 0.00178991, dry mass 0.000337476 kg, water content 2962.17, wet mass 1 kg
  note on carbon content, fossil: Bicarbonate content is 2.93 mol/m3. CO2 content is 0.1 mol/m3 (ecoinvent v2.2 report 8, Tab 93.1).
- heat, district or industrial, natural gas: 0.789215 MJ; = (1.31-(electricity_input*3.6))*0.616135; lognormal variance with pedigree 0.0107, pedigree (4,2,3,1,1)
  (same comment as for heat, district or industrial, other than natural gas)
  properties: heating value, net 1 MJ
- heat, district or industrial, other than natural gas: 0.0122532 MJ; = (1.31-(electricity_input*3.6))*0.009566; lognormal variance with pedigree 0.0107, pedigree (4,2,3,1,1)
  (same comment as for heat, district or industrial, other than natural gas)
- heat, district or industrial, other than natural gas: 0.00218267 MJ; = (1.31-(electricity_input*3.6))*0.001704; lognormal variance with pedigree 0.0107, pedigree (4,2,3,1,1)
  (same comment as for heat, district or industrial, other than natural gas)
- heat, district or industrial, other than natural gas: 0.00136161 MJ; = (1.31-(electricity_input*3.6))*0.001063; lognormal variance with pedigree 0.0107, pedigree (4,2,3,1,1)
  (same comment as for heat, district or industrial, other than natural gas)
- heat, district or industrial, other than natural gas: 0.00455108 MJ; = (1.31-(electricity_input*3.6))*0.003553; lognormal variance with pedigree 0.0107, pedigree (4,2,3,1,1)
  (same comment as for heat, district or industrial, other than natural gas)
- heat, district or industrial, other than natural gas: 0.0898457 MJ; = (1.31-(electricity_input*3.6))*0.070142; lognormal variance with pedigree 0.0107, pedigree (4,2,3,1,1)
  (same comment as for heat, district or industrial, other than natural gas)
  properties: heating value, net 1 MJ
- heat, district or industrial, other than natural gas: 0.0835321 MJ; = (1.31-(electricity_input*3.6))*0.065213; lognormal variance with pedigree 0.0107, pedigree (4,2,3,1,1)
  (same comment as for heat, district or industrial, other than natural gas)
- heat, district or industrial, other than natural gas: 0.111628 MJ; = (1.31-(electricity_input*3.6))*0.087147; lognormal variance with pedigree 0.0107, pedigree (4,2,3,1,1)
  (same comment as for heat, district or industrial, other than natural gas)
- heat, district or industrial, other than natural gas: 0.017186 MJ; = (1.31-(electricity_input*3.6))*0.013417; lognormal variance with pedigree 0.0107, pedigree (4,2,3,1,1)
  (same comment as for heat, district or industrial, other than natural gas)
- electricity, medium voltage: 0.00808 kWh; name electricity_input; source Althaus H.-J. 2007; lognormal variance with pedigree 0.0112, pedigree (4,3,3,1,1)
  Literature value based on data collected from 215 steam plants in the EU (Boustead 1999).
  Reference:
  Boustead I. (1999) Ecoprofiles of plastics and related intermediates, Steam (on-site average). European Centre for Plastics in the Environment (APME), Brussels.
- heat, district or industrial, other than natural gas: 0.00214425 MJ; = (1.31-(electricity_input*3.6))*0.001674; lognormal variance with pedigree 0.0107, pedigree (4,2,3,1,1)
  (same comment as for heat, district or industrial, other than natural gas)
- heat, district or industrial, other than natural gas: 0.000803132 MJ; = (1.31-(electricity_input*3.6))*0.000627; lognormal variance with pedigree 0.0107, pedigree (4,2,3,1,1)
  (same comment as for heat, district or industrial, other than natural gas)

## Emissions to nature
- Water [air, unspecified]: 9.27273e-6 m3; = (tap_water_input/1000)*fraction_TW_to_air; lognormal variance with pedigree 0.098025, pedigree (4,4,4,2,4)
  Calculated value based on literature values and expert opinion. See comments in the parametres' comment field.
- Water [water, unspecified]: 5.25455e-5 m3; = (tap_water_input/1000)*(1-fraction_TW_to_air); lognormal variance with pedigree 0.098025, pedigree (4,4,4,2,4)
  (same comment as for Water)

## Sampling procedure
The data is based on literature and statistics.
The fuel consumption mix used for the production of heat is based on statistics from Eurostat (2017), from which the average fuel mix used by the European chemical and petrochemical industry between 2011 and 2015 was calculated.
The total energy (1.31 MJ) and electricity required for the production of 1 MJ of heat in the form of steam are based on data collected from 215 steam plants in the EU (Boustead 1999).
The water consumption is based on data on steam production from 11 European plants that produce sodium silicates or percarbonate (Zah & Hischier 2007).

References:
Eurostat (2017) Energy Balances (2017 edition), http://ec.europa.eu/eurostat/web/energy/data/energy-balances (last accessed on the 2017-08-22).
Althaus H.-J., Chudacoff M., Hischier R., Jungbluth N., Osses M. and Primas A. (2007) Life Cycle Inventories of Chemicals. ecoinvent report No. 8, v2.0. EMPA Dübendorf, Swiss Centre for Life Cycle Inventories, Dübendorf, CH.
Boustead I. (1999) Ecoprofiles of plastics and related intermediates, Steam (on-site average). European Centre for Plastics in the Environment (APME), Brussels.
Zah R., Hischier R. (2007) Life Cycle Inventories of Detergents. ecoinvent report No. 12. Swiss Centre for Life Cycle Inventories, Dübendorf, 2007.

## Extrapolations
This dataset has been extrapolated from year 2017 to the year of the calculation (2021). The uncertainty has been adjusted accordingly.
