# tubular particleboard production

Dataset: EcoSpold 2, unit process
Geography: RER
Time period: 2012-01-01 to 2021-12-31
Technology level: current
Classification: ISIC rev.4 ecoinvent: 1621:Manufacture of veneer sheets and wood-based panels
Synonyms: Röhrenspanplatte
Tags: Swiss brush-up completed
Scenario: Business-as-Usual
System model: Allocation, cut-off by classification
Generated by: Frank Werner
Database: ecoinvent
isCopyrightProtected: true
accessRestrictedTo: 1

## General comment
This dataset represents the production of tubular particleboard in Europe. Data are based on a German production sample.
Particleboard - also known as particle board, and chipboard - is an engineered wood product manufactured from wood chips, sawmill shavings, or even sawdust, and a synthetic resin or other suitable binder, which is pressed and extruded.
Like a bridge construction, tubular particleboard provides an ideal combination of light weight and stability. Compared to solid boards, the weight of tubular particleboard is reduced by up to 60%. Tubular particleboards are used for door cores, isolation boards, furniture, packing, and decoration.
Reference:
Rüter, S. and S. Diederichs (2012): Ökobilanz-Basisdaten für Bauprodukte aus Holz. Arbeitsbericht aus dem Institut für Holztechnologie und Holzbiologie Nr. 2012/1, Johann Heinrich von Thünen-Institut (vTI), Hamburg.
[This dataset is meant to replace the following datasets:]

## Included activities start
From the reception at the factory gate of all materials and fuels used.

## Included activities end
This activity ends with the tubular particleboard produced at the factory gate. The dataset includes the inputs to and outputs of the production processes and the available process emissions. Infrastructure is a rough estimate.

## Geography
Data for Germany used for central Europe

## Technology
Technology reflects a sample of German tubular particleboard production.

## Parameters
- wood_fuel: 891.1; lognormal variance with pedigree 0.0256, pedigree (1,3,1,1,1)
  input of wood fuel used in production; value calculated from Rüter et al. 2012

## Reference product
- tubular particleboard: 1 m3; By-product classification allocatable product
  Reference product. Plywood produced in Germany by processes representative for European average. The reference product is ready for delivery at the wooden board factory.
  A large number of materials can be produced with differing properties and areas of use. Typical uses are as construction plywood for wall, floor, and ceiling panels and also as panels for concrete shuttering, and decorative covering veneers in interior furnishings (e.g. wall panels or doors).
  production volume 1.85e6 m3; name tubular_particleboard_pv
    assumed to be 5% of European particleboard production
  property price 162.75 EUR2005
    Expert judgement; 75% of price of regular particleboard due to reduced material input.
  property heating value, net 3808.36 MJ
    LHV is calculated based on the Carbon content of the product. More details can be found on the respective documentation.The property is based on a value of 14MJ/kg
  property carbon content 0.496754
    carbon content on a dry matter basis (reserved; not for manual entry)
  properties: wet mass 272 kg, water in wet mass 16.32 kg, carbon content, non-fossil 0.428894, carbon content, fossil 0.06786, dry mass 255.68 kg, water content 0.0638298, carbon allocation 127.01 kg

## Inputs from technosphere
- scrap steel: 0 kg; name m_scrap_steel; pedigree (1,1,1,1,1)
  calculated from steel input
  production volume 0 kg
    Calculated from production volume of reference product using the relative outputs.
  property dry mass 1 kg; name w_chromium_steel_DM
  property price 0 EUR2005; name m_scrap_steel_price_EUR2005
  properties: wet mass 1 kg
- pulpwood, softwood, measured as solid wood under bark: 0 m3; pedigree (1,1,1,1,1)
  Literature value; sample from Germany
  properties: dry mass 440 kg, carbon content, non-fossil 0.494, wet mass 748 kg, heating value, net 4483.78 MJ, basic wood density 387.2, water content 0.7
  note on heating value, net: Value based on "softwood forestry, mixed species, sustainable forest management"The property is based on a value of 11.58MJ/kg
- heat, district or industrial, natural gas: 3.7 MJ; lognormal variance with pedigree 0.0092, pedigree (1,3,4,1,1)
  Fuel input, converted to heat output
  properties: heating value, net 1 MJ
- municipal solid waste: -0.345 kg; name w_MSW; lognormal variance with pedigree 0.1298, pedigree (2,3,4,1,5)
  Literature value; sample from Germany
  Uncertainty: a
  production volume 638250 kg; = w_MSW*tubular_particleboard_pv
    Calculated from production volume of reference product using the relative outputs.
  properties: heating value, net 11.74 MJ, carbon content, fossil 0.171549, carbon content, non-fossil 0.261655, water content 0.297017, UVEK_link_1 1004, UVEK_relative_amount_1 -1, wet mass 1 kg, dry mass 0.771 kg
  note on heating value, net: Value taken from the general comment of the treatment dataset.
  note on carbon content, fossil: MSW composition in tab 4.1, ecoinvent v2.2 report 13_I. C content referred to 1 kg DM
  note on UVEK_link_1: to be used only in special submissions in coordination with ecoinvent and the Swiss FOEN
- waste mineral oil: 0 kg; name w_mineral_oil; pedigree (1,1,1,1,1)
  hydraulic oil and engine oil/grease; adjusted for water content of waste oil
  production volume 0 kg
    Calculated from production volume of reference product using the relative outputs.
  property price 0 EUR2005; name w_mineral_oil_price_EUR2005
  properties: wet mass 1 kg, heating value, net 34.7 MJ, UVEK_relative_amount_1 -1, water content 0.111111, UVEK_link_1 1113, dry mass 0.9 kg, carbon content, fossil 0.864444
  note on carbon content, fossil: Tab A.6, ecoinvent v2.2 report 13_I. C content has been calculated after data in the tables, and then referred to 1 kg DM
- wooden board factory, organic bonded boards: 2.62238e-8 unit; lognormal variance with pedigree 0.3961, pedigree (4,5,5,3,4)
  Default value from ecoinvent 2.2
  properties: UVEK_relative_amount_1 1, UVEK_link_1 4946
- wood chips, wet, measured as dry mass: 0 kg; pedigree (1,1,1,1,1)
  Literature value; sample from Germany
  properties: heating value, net 10.84 MJ, water content 1.1, carbon content, non-fossil 0.494, dry mass 1 kg, wet mass 2.1 kg
  note on heating value, net: Value based on the dataset 'softwood forestry, mixed species, sustainable forest management'
- tap water: 36.828 kg; name m_tapwater; lognormal variance with pedigree 0.0099, pedigree (2,3,4,3,1)
  Literature value; sample from Germany
  properties: UVEK_link_1 4285, carbon content, fossil 0.00178991, water content 2962.17, wet mass 1 kg, dry mass 0.000337476 kg, UVEK_relative_amount_1 1
  note on carbon content, fossil: Bicarbonate content is 2.93 mol/m3. CO2 content is 0.1 mol/m3 (ecoinvent v2.2 report 8, Tab 93.1).
- electricity, medium voltage: 35.81 kWh; lognormal variance with pedigree 0.0427, pedigree (1,4,5,3,1)
  Literature value; sample from Germany
  properties: UVEK_link_1 1779, UVEK_relative_amount_1 1
- paraffin: 0.339 kg; lognormal variance with pedigree 0.0092, pedigree (1,3,4,1,1)
  hydrophobing agent
  properties: carbon content, fossil 0.847059, UVEK_relative_amount_1 1, dry mass 1 kg, heating value, net 41.5 MJ, UVEK_link_1 3381, wet mass 1 kg
  note on heating value, net: Indicative value. Reference: Fuels - Higher and Lower Calorific Values, available at: https://www.engineeringtoolbox.com/fuels-higher-calorific-values-d_169.html
- urea formaldehyde resin: 20.1429 kg; lognormal variance with pedigree 0.0427, pedigree (1,4,5,3,1)
  Literature value; sample from Germany
  properties: carbon content, fossil 0.408958, dry mass 1 kg, heating value, net 12.39 MJ, UVEK_link_1 4736, UVEK_relative_amount_1 1, wet mass 1 kg
  note on carbon content, fossil: Chemical formula of the urea formaldehide monomer was assumed to be C3H8N2O
- wastewater from particleboard production: -0.018414 m3; name wastewater; lognormal variance with pedigree 0.0427, pedigree (1,4,5,3,1)
  Literature value; sample from Germany; assumption 50% tap water as wastewater
  production volume 34065.9 m3; = wastewater*tubular_particleboard_pv
    Calculated from production volume of reference product using the relative outputs.
  property price 0 EUR2005; name wastewater_price_EUR2005
  properties: dry mass 0.337476 kg, wet mass 1000 kg, water content 2962.17, carbon content, non-fossil 0.377131
- heat, district or industrial, other than natural gas: 52.8552 MJ; lognormal variance with pedigree 0.0092, pedigree (1,3,4,1,1)
  Fuel input, converted to heat output
  properties: heating value, net 1 MJ
- steel, low-alloyed, hot rolled: 0.27 kg; name m_steel_lowalloyed; lognormal variance with pedigree 0.0267, pedigree (3,5,4,3,3)
  Literature value; sample from Germany
  properties: UVEK_link_1 4222, dry mass 1 kg, UVEK_relative_amount_2 1, carbon content, fossil 0.005, UVEK_link_2 2662, UVEK_relative_amount_1 1, wet mass 1 kg
  note on carbon content, fossil: Low alloyed steel composition given in Tab. 3.2 ecoinvent v2.2 report 10_partII. Steel assumed to have a C content of 0.5%
- lubricating oil: 0.015 kg; name m_lubricating_oil; lognormal variance with pedigree 0.0186, pedigree (4,4,4,1,1)
  Literature value; sample from Germany
  property dry mass 1 kg; name DM_oil
  properties: UVEK_relative_amount_1 1, UVEK_link_1 2866, heating value, net 40.2 MJ, carbon content, fossil 0.75, wet mass 1 kg
  note on heating value, net: Literature value, Source: IPCC 2006, 2006 IPCC Guidelines for National Greenhouse Gas Inventories, Prepared by the National Greenhouse Gas Inventories Programme, Eggleston H.S., Buendia L., Miwa K., Ngara T. and Tanabe K. (eds). Published: IGES, Japan
  note on carbon content, fossil: Lubricating oil is produced from diesel. C-content/dry mass of fats and oils considered 75%, from: ecoinvent v2.2 report, n 15a, pg 40
- furnace, wood chips, with silo, 5000kW: 9.28231e-7 unit; = 1.38888888888889E-09*wood_fuel/1.33333; lognormal variance with pedigree 0.0086, pedigree (1,1,4,1,1)
  Infrastructure factor from DS "Heat, district or industrial, other than natural gas {CH}| heat production, wood chips from industry, at furnace 5000kW | Cut-off, U", multiplied by the input of wood fuel (direct wood fuel plus production residues); correction for assumed efficiency as original value refers to heat output
  properties: UVEK_relative_amount_1 1, UVEK_link_1 10004
- diesel, burned in building machine: 12.84 MJ; lognormal variance with pedigree 0.0427, pedigree (1,4,5,3,1)
  Literature value; sample from Germany
  properties: UVEK_link_9 4433, UVEK_link_8 4417, UVEK_link_1 732, UVEK_relative_amount_8 0.159528, UVEK_relative_amount_9 0.957165, UVEK_relative_amount_1 1, heating value, net 1 MJ
  note on UVEK_link_9: This link has been introduced to model transport specifically for the SAM model; to be used only in special submissions in coordination with ecoinvent and the Swiss FOEN.
  note on UVEK_relative_amount_8: Scaling factor = amount of transport related to adhesives/amount of this input from technosphere. Source for transport distance: Overview and Methodology/2007/Frischknecht et al., i.e. 600 km train, 100 km lorry. To be used only in special submissions in coordination with ecoinvent and the Swiss FOEN
- heat, district or industrial, other than natural gas: 406.537 MJ; lognormal variance with pedigree 0.0092, pedigree (1,3,4,1,1)
  Fuel input, converted to heat output
  properties: UVEK_relative_amount_1 1, heating value, net 1 MJ, UVEK_link_1 2547
- dust collector, electrostatic precipitator, for industrial use: 9.28239e-7 unit; = 1.3889E-09*wood_fuel/1.33333; lognormal variance with pedigree 0.308, pedigree (1,1,4,1,1)
  Literature value; sample from Germany
  properties: UVEK_link_1 10001, UVEK_relative_amount_1 1
- wood ash mixture, pure: 0 kg; name w_wood_ash; pedigree (1,1,1,1,1)
  Amount derived from DS "Heat, district or industrial, other than natural gas {CH}| heat production, wood chips from industry, at furnace 5000kW | Cut-off, U" on heat generation from industrial residual wood per MJ, multiplied by the input of wood fuel (direct wood fuel plus production residues ) scaled to reflect wood input per generated heat
  production volume 0 kg
    Calculated from production volume of reference product using the relative outputs.
  property price 0 EUR2005; name w_wood_ash_price_EUR2005
  properties: wet mass 1 kg, UVEK_link_2 1127, UVEK_link_3 1129, UVEK_relative_amount_3 -1, carbon content, non-fossil 0.012, UVEK_link_1 1128, dry mass 1 kg
- scrap steel: -0.269658, -0.000341647 kg (2 entries); lognormal variance with pedigree 0.0126, pedigree (3,4,4,1,1)
  calculated from steel input
  production volume 499500 kg
  properties: dry mass 1 kg, wet mass 1 kg
- pulpwood, softwood, measured as solid wood under bark: 0.0236741, 0.000289277 m3 (2 entries); lognormal variance with pedigree 0.0092, pedigree (1,3,4,1,1)
  Literature value; sample from Germany
- waste mineral oil: -0.0146376, -0.00036237 kg (2 entries); lognormal variance with pedigree 0.0098, pedigree (2,3,4,1,1)
  hydraulic oil and engine oil/grease; adjusted for water content of waste oil
  production volume 27750 kg
- wood chips, wet, measured as dry mass: 262.031, 9.96923 kg (2 entries); lognormal variance with pedigree 0.0092, pedigree (1,3,4,1,1)
  Literature value; sample from Germany
- wood ash mixture, pure: -0.436577, -0.00897447 kg (2 entries); lognormal variance with pedigree 0.0092, pedigree (1,3,4,1,1)
  (same comment as for wood ash mixture, pure)
  production volume 824270 kg

## Emissions to nature
- Sodium [air, unspecified]: 0.00115843 kg; = 1.73333333333334E-06*wood_fuel/1.33333; lognormal variance with pedigree 0.6912, pedigree (2,3,5,1,1)
  Emission factor from DS "Heat, district or industrial, other than natural gas {CH}| heat production, wood chips from industry, at furnace 5000kW | Cut-off, U" on heat generation from industrial residual wood per MJ, multiplied by the input of wood fuel (direct wood fuel plus production residues ) scaled to reflect wood input per generated heat.
- Bromine [air, unspecified]: 5.34661e-5 kg; = 0.00000008*wood_fuel/1.33333; lognormal variance with pedigree 0.6912, pedigree (2,3,5,1,1)
  (same comment as for Sodium)
- Nitrogen oxides [air, unspecified]: 0.200498 kg; = 0.0003*wood_fuel/1.33333; lognormal variance with pedigree 0.0812, pedigree (2,3,5,1,1)
  (same comment as for Sodium)
- Carbon monoxide, non-fossil [air, unspecified]: 0.17822 kg; = 0.000266666666666667*wood_fuel/1.33333; lognormal variance with pedigree 0.6912, pedigree (2,3,5,1,1)
  (same comment as for Sodium)
- Benzene [air, unspecified]: 0.000810903 kg; = 1.21333333333333E-06*wood_fuel/1.33333; lognormal variance with pedigree 0.0812, pedigree (2,3,5,1,1)
  (same comment as for Sodium)
- Potassium [air, unspecified]: 0.0208518 kg; = 0.0000312*wood_fuel/1.33333; lognormal variance with pedigree 0.0812, pedigree (2,3,5,1,1)
  (same comment as for Sodium)
- Hydrocarbons, aliphatic, alkanes, unspecified [air, unspecified]: 0.000810903 kg; = 1.21333333333333E-06*wood_fuel/1.33333; lognormal variance with pedigree 0.0812, pedigree (2,3,5,1,1)
  (same comment as for Sodium)
- Water [air, unspecified]: 0.0585136 m3; = 0.00006*wood_fuel/1.33333+m_tapwater/2/1000; lognormal variance with pedigree 0.130025, pedigree (4,4,5,2,4)
  Water emissions from the combustion of the wood (emission per MJ, scaled to wood input and extrapolated from wood input to heat generated) plus 50% of tap water input
- Ammonia [air, unspecified]: 0.00154161 kg; = 2.30666666666667E-06*wood_fuel/1.33333; lognormal variance with pedigree 0.0812, pedigree (2,3,5,1,1)
  (same comment as for Sodium)
- Benzene, ethyl- [air, unspecified]: 2.67331e-5 kg; = 0.00000004*wood_fuel/1.33333; lognormal variance with pedigree 0.0812, pedigree (2,3,5,1,1)
  (same comment as for Sodium)
- Formaldehyde [air, unspecified]: 0.0303302 kg; = 1.73333333333334E-07*wood_fuel/1.33333+0.0302144; lognormal variance with pedigree 0.1612, pedigree (2,3,5,1,1)
  Emission factor from DS "Heat, district or industrial, other than natural gas {CH}| heat production, wood chips from industry, at furnace 5000kW | Cut-off, U" on heat generation from industrial residual wood per MJ, multiplied by the input of wood fuel (direct wood fuel plus production residues ) scaled to reflect wood input per generated heat plus estimated emissions from wood and glue drying processes (according to Rüter & Diederichs 2012).
- m-Xylene [air, unspecified]: 0.000106932 kg; name mxylene; = 0.00000016*wood_fuel/1.33333; lognormal variance with pedigree 0.0812, pedigree (2,3,5,1,1)
  (same comment as for Sodium)
- Nickel [air, unspecified]: 5.34661e-6 kg; name nickel; = 0.000000008*wood_fuel/1.33333; lognormal variance with pedigree 0.6912, pedigree (2,3,5,1,1)
  (same comment as for Sodium)
- Methane, non-fossil [air, unspecified]: 0.00133665 kg; = 0.000002*wood_fuel/1.33333; lognormal variance with pedigree 0.0812, pedigree (2,3,5,1,1)
  (same comment as for Sodium)
- Benzo(a)pyrene [air, unspecified]: 4.45551e-7 kg; = 6.66666666666667E-10*wood_fuel/1.33333; lognormal variance with pedigree 0.3412, pedigree (2,3,5,1,1)
  (same comment as for Sodium)
- Fluorine [air, unspecified]: 4.45551e-5 kg; = 6.66666666666667E-08*wood_fuel/1.33333; lognormal variance with pedigree 0.0812, pedigree (2,3,5,1,1)
  (same comment as for Sodium)
- Arsenic [air, unspecified]: 8.91102e-7 kg; = 1.33333333333333E-09*wood_fuel/1.33333; lognormal variance with pedigree 0.6912, pedigree (2,3,5,1,1)
  (same comment as for Sodium)
- Chromium VI [air, unspecified]: 3.56441e-8 kg; = 5.33333333333334E-11*wood_fuel/1.33333; lognormal variance with pedigree 0.6912, pedigree (2,3,5,1,1)
  (same comment as for Sodium)
- Copper [air, unspecified]: 1.96042e-5 kg; = 2.93333333333334E-08*wood_fuel/1.33333; lognormal variance with pedigree 0.6912, pedigree (2,3,5,1,1)
  (same comment as for Sodium)
- Particulates, < 2.5 um [air, unspecified]: 0.0222776 kg; = 0.0000333333333333333*wood_fuel/1.33333; lognormal variance with pedigree 0.3412, pedigree (2,3,5,1,1)
  (same comment as for Sodium)
- Phenol, pentachloro- [air, unspecified]: 7.21793e-9 kg; = 0.0000000000108*wood_fuel/1.33333; lognormal variance with pedigree 0.0812, pedigree (2,3,5,1,1)
  (same comment as for Sodium)
- Zinc [air, unspecified]: 0.000267331 kg; = 0.0000004*wood_fuel/1.33333; lognormal variance with pedigree 0.6912, pedigree (2,3,5,1,1)
  (same comment as for Sodium)
- Chlorine [air, unspecified]: 0.000160398 kg; = 0.00000024*wood_fuel/1.33333; lognormal variance with pedigree 0.6912, pedigree (2,3,5,1,1)
  (same comment as for Sodium)
- Magnesium [air, unspecified]: 0.000320797 kg; name magnesium; = 0.00000048*wood_fuel/1.33333; lognormal variance with pedigree 0.6912, pedigree (2,3,5,1,1)
  (same comment as for Sodium)
- Mercury [air, unspecified]: 2.67331e-7 kg; name mercury; = 0.0000000004*wood_fuel/1.33333; lognormal variance with pedigree 0.6912, pedigree (2,3,5,1,1)
  (same comment as for Sodium)
- Phosphorus [air, unspecified]: 0.000267331 kg; = 0.0000004*wood_fuel/1.33333; lognormal variance with pedigree 0.0812, pedigree (2,3,5,1,1)
  (same comment as for Sodium)
- Manganese [air, unspecified]: 0.000151487 kg; name manganese; = 2.26666666666667E-07*wood_fuel/1.33333; lognormal variance with pedigree 0.6912, pedigree (2,3,5,1,1)
  (same comment as for Sodium)
- Dinitrogen monoxide [air, unspecified]: 0.00204954 kg; = 3.06666666666667E-06*wood_fuel/1.33333; lognormal variance with pedigree 0.0812, pedigree (2,3,5,1,1)
  (same comment as for Sodium)
- Acetaldehyde [air, unspecified]: 5.43572e-5 kg; = 8.13333333333333E-08*wood_fuel/1.33333; lognormal variance with pedigree 0.0812, pedigree (2,3,5,1,1)
  (same comment as for Sodium)
- Hydrocarbons, aliphatic, unsaturated [air, unspecified]: 0.00276242 kg; = 4.13333333333333E-06*wood_fuel/1.33333; lognormal variance with pedigree 0.0812, pedigree (2,3,5,1,1)
  (same comment as for Sodium)
- Carbon dioxide, non-fossil [air, unspecified]: 95.3479 kg; = 0.142666666666666*wood_fuel/1.33333; lognormal variance with pedigree 0.0418, pedigree (2,3,5,1,1)
  (same comment as for Sodium)
- Dioxins, measured as 2,3,7,8-tetrachlorodibenzo-p-dioxin [air, unspecified]: 2.76242e-11 kg; = 4.13333333333333E-14*wood_fuel/1.33333; lognormal variance with pedigree 0.3412, pedigree (2,3,5,1,1)
  (same comment as for Sodium)
- Benzene, hexachloro- [air, unspecified]: 6.41594e-12 kg; = 9.60000000000001E-15*wood_fuel/1.33333; lognormal variance with pedigree 0.0812, pedigree (2,3,5,1,1)
  (same comment as for Sodium)
- Chromium [air, unspecified]: 3.52876e-6 kg; = 5.28000000000001E-09*wood_fuel/1.33333; lognormal variance with pedigree 0.6912, pedigree (2,3,5,1,1)
  (same comment as for Sodium)
- Calcium [air, unspecified]: 0.00521295 kg; = 0.0000078*wood_fuel/1.33333; lognormal variance with pedigree 0.6912, pedigree (2,3,5,1,1)
  (same comment as for Sodium)
- PAH, polycyclic aromatic hydrocarbons [air, unspecified]: 9.89123e-6 kg; name pah; = 0.0000000148*wood_fuel/1.33333; lognormal variance with pedigree 0.3412, pedigree (2,3,5,1,1)
  (same comment as for Sodium)
- NMVOC, non-methane volatile organic compounds, unspecified origin [air, unspecified]: 0.00311886 kg; name nmvoc; = 4.66666666666666E-06*wood_fuel/1.33333; lognormal variance with pedigree 0.0812, pedigree (2,3,5,1,1)
  (same comment as for Sodium)
- Sulfur dioxide [air, unspecified]: 0.00222776 kg; = 3.33333333333334E-06*wood_fuel/1.33333; lognormal variance with pedigree 0.0418, pedigree (2,3,5,1,1)
  (same comment as for Sodium)
- Lead [air, unspecified]: 2.22776e-5 kg; = 3.33333333333333E-08*wood_fuel/1.33333; lognormal variance with pedigree 0.6912, pedigree (2,3,5,1,1)
  (same comment as for Sodium)
- Toluene [air, unspecified]: 0.000267331 kg; = 0.0000004*wood_fuel/1.33333; lognormal variance with pedigree 0.0812, pedigree (2,3,5,1,1)
  (same comment as for Sodium)
- Cadmium [air, unspecified]: 6.23772e-7 kg; = 9.33333333333334E-10*wood_fuel/1.33333; lognormal variance with pedigree 0.6912, pedigree (2,3,5,1,1)
  (same comment as for Sodium)

## Sampling procedure
Literature; emissions profile per MJ wood input from PSI (2014)

## Extrapolations
This dataset has been extrapolated from year 2012 to the year of the calculation (2021). The uncertainty has been adjusted accordingly.
