# heat production, straw, at furnace 300kW

Dataset: EcoSpold 2, unit process
Geography: RER
Time period: 1983-01-01 to 2021-12-31
Technology level: current
Classification: EcoSpold01Categories: wood energy/heating systems
Classification: ISIC rev.4 ecoinvent: 3530:Steam and air conditioning supply
Scenario: Business-as-Usual
System model: Allocation, cut-off by classification
Generated by: Avraam Symeonidis
Database: ecoinvent
isCopyrightProtected: true
accessRestrictedTo: 1

## General comment
Production of heat by burning straw, in a furnace of 300kw capacity for heat production. The infrastructure, and the electricity inputs were obtained from the dataset wood chips, hard wood, burned in furnace 300kw. The emissions were obtained from literature.

## Included activities start
From reception of straw at the furnace

## Included activities end
This module describes the combustion of straw. Included are the infrastructure, the straw requirements , the emissions to air, the electricity needed for operation, and the disposal of the ashes.

## Geography
based on geography of production of straw from barley, rye and wheat.

## Technology
based on technology from wood chips burning dataset and several studies with experimental burning in different furnaces.

## Time period
from oldest to newest publication date of litarature sources

## Reference product
- heat, district or industrial, other than natural gas: 1 MJ; name heat_output; = ABS(straw_input)* 0.85* 15* 0.82; By-product classification allocatable product; CPC 17300: Steam and hot water
  Calculation based on furnace calorific efficiency (82%) )and low calorific value of straw (15MJ/kg dry mass)
  production volume 2.83491e9 MJ; name heat_RP_PV
    Estimation. The production volume is scaled using GDP scaling, from the Global one given the fact that EU accounts for circa 33% of the global GDP. The Production Volume is the sum of the amounts of straw, organic produced in the crop inventories in the Ecoinvent database (rye production, wheat production, barley production). It is estimated, that 30% of this straw is burned to produce heat.
  property corresponding fuel use, propane, furnace >100kW 1.05263 MJ; = 1/0.95
    Lower heating value of the fuel input related to the heat/electricity output, taken directly from ecoinvent v3.0 dataset "heat production, natural gas, at industrial furnace >100kW, GLO 2000".
  property price 0.0106 EUR2005; name heat_output_price_EUR2005
    Average European district heat price from Ecoheatcool and Euroheat 2005-2006, Ecoheat Work package 1: The European heat market. Final report. 10.6 EUR/GJ i s the price of district heat. http://www.solarthermalworld.org/files/Ecoheatcool%20WP1%20Web.pdf?download
  properties: heating value, net 1 MJ

## By-products
- ash, from combustion of straw: 0 kg; source H. Nielsen 2004; By-product classification Recyclable; CPC 86119: Other support services to crop production; pedigree (1,1,1,1,1)
  54 kg of slag are produced per 1 ton of straw burned. The slag is returned to farmland (Nielsen, 2004).This flow is expressed as phosphate fertiliser, as P2O5 and nitrogen fertiliser, as N.
  The slag produced during straw combustion contains 0,8-2.1% P2O5 and 0,05-0,08% N . (http://www.lcafood.dk/processes/energyconversion/heatandpowerfromstraw.htm)
  The average values are used for this inventory.
  production volume 0 kg; = heat_RP_PV * (ABP / heat_output)
    Calculated from production volume of reference product using the relative outputs.
  property price 0 EUR2005; name ABP_price_EUR2005
    Assumed without economic value
  property phosphorus content 0.006322; = 0.0145*0.436
    The slag produced during straw combustion contains 0,8-2.1% P2O5 and 0,05-0,08% N . (http://www.lcafood.dk/processes/energyconversion/heatandpowerfromstraw.htm)
    The average values are used for this inventory.
  property nitrogen content 0.00065; = (((0.05+0.08)/2)/100)
    (same comment as for ash, from combustion of straw)
  property oxygen content 0.008178; = 0.0145*(1-0.436)
    (same comment as for ash, from combustion of straw)
  property carbon content 0
    carbon content on a dry matter basis (reserved; not for manual entry)
  properties: wet mass 1 kg, dry mass 1 kg, water content 0, carbon content, fossil 0, carbon content, non-fossil 0, water in wet mass 0 kg, carbon allocation 0 kg

## Inputs from technosphere
- furnace, wood chips, hardwood storage area, 300kW: 2.20459e-8 unit; = (1/(0.82*20*2765854))* heat_output; source Bauer, C. 2007; lognormal variance with pedigree 0.052, pedigree (1,1,5,5,1)
  due to lack of process specific emission data, it has been adapted from the emission factor (kg/MJ input) given for the combustion of mixed wood chips in a cogen 300KW.
  EcoSpold01Location=CH
  property thermal efficiency 0.82; name furnace_input_thermal_efficiency
- straw: 0.095648 kg; name straw_input; lognormal variance with pedigree 0.0426, pedigree (1,1,5,5,1)
  properties: wet mass 1 kg, dry mass 0.85 kg, carbon content, non-fossil 0.437377, water content 0.176471, heating value, net 14.25 MJ
  note on heating value, net: Literature value, Source: Phyllis2, database for (treated) biomass, algae, feedstocks for biogas production and biochar, https://phyllis.nl/Biomass/View/1271, ECN.TNO
- wood ash mixture, pure: 0 kg; name wood_ash_output; source H. Nielsen 2004; pedigree (1,1,1,1,1)
  The data refer to heat and power production at Masnedo heat and power plant (Denmark) in 1999. The plant is dimensioned to 10MW electricity and 23 MJ heat/sec and is primarily fired with straw (about 400000 t/year).
  Data on slag/ash generation have been derived from the plant's green account in 2002 (from 1999, where input from other biomass than straw was relatifvely low - 10% in terms of mass). As an approximation, all biomass entering the plant has been considered as straw. Data on emissions to air have been determined from emission factors (Gasteknisk Center, 2003).
  8.3 kg of ash are produced per 1 ton of straw burned.
  EcoSpold01Location=CH
  production volume 0 kg; name ash_production
    Calculated from production volume of reference product using the relative outputs.
  property price 0 EUR2005; name wood_ash_output_price_EUR2005
  properties: wet mass 1 kg, dry mass 1 kg, carbon content, non-fossil 0.012
- electricity, low voltage: 0.0050813 kWh; = ( ABS(straw_input)* 0.85* 15)*0.015*(1/3.6); source Bauer, C. 2007; lognormal variance with pedigree 0.052, pedigree (1,1,5,5,1)
  EcoSpold01Location=CH
  general assumption, obtained from dataset "wood chips burned in furnace, 300kW". It is assumed that wood-chips furnace needs energy inputs in the order of 1.5% of the fuel energy input.
  The conversion from MJ to Kwh is 3.6kWh/MJ
- ash, from combustion of straw: -0.00516499 kg; source H. Nielsen 2004; lognormal variance with pedigree 0.0586, pedigree (1,5,5,5,3)
  (same comment as for ash, from combustion of straw)
  production volume 1.46423e7 kg
  properties: wet mass 1 kg, dry mass 1 kg, phosphorus content 0.006322, nitrogen content 0.00065, oxygen content 0.008178
  note on phosphorus content: The slag produced during straw combustion contains 0,8-2.1% P2O5 and 0,05-0,08% N . (http://www.lcafood.dk/processes/energyconversion/heatandpowerfromstraw.htm) The average values are used for this inventory.
- wood ash mixture, pure: -0.000777888, -1.59906e-5 kg (2 entries); source H. Nielsen 2004; lognormal variance with pedigree 0.042, pedigree (1,1,5,5,1)
  (same comment as for wood ash mixture, pure)
  production volume 2.25057e6 kg

## Emissions to nature
- Bromine [air, unspecified]: 4.79675e-7 kg; = 5.9/1E6* ABS(straw_input)* 0.85; source Turn, SQ and Jenkins, BM 1997; lognormal variance with pedigree 0.0892, pedigree (1,5,5,4,4)
  Based on experimental study. Average emission factor (mg/kg dry fuel) for several herbacious fuels (rice, wheat, barley straws; corn stover and sugarcane trash).
  The study reports elemental and water soluble species concentrations and emissions factors obtained from PM collected during test burns. The tests were conducted in a combustion wind tunnel at the University of California, Davis.
  The emission factor of bromine is 5.9
- Carbon dioxide, non-fossil [air, unspecified]: 6.57102e-5 kg; = (687/1E6)* ABS(straw_input); source Nielsen, H. 2004; lognormal variance with pedigree 0.0892, pedigree (1,5,5,4,4)
  687 g of CO2 are produced per 1 ton of straw burned (http://www.lcafood.dk/processes/energyconversion/heatandpowerfromstraw.htm)
- Sodium [air, unspecified]: 1.95122e-6 kg; = 24/1E6* ABS(straw_input)* 0.85; source Turn, SQ and Jenkins, BM 1997; lognormal variance with pedigree 0.0892, pedigree (1,5,5,4,4)
  Based on experimental study. Average emission factor (mg/kg dry fuel) for several herbacious fuels (rice, wheat, barley straws; corn stover and sugarcane trash). The study reports elemental and water soluble species concentrations and emissions factors obtained from particulate matter collected during test burns. The tests were conducted in a combustion wind tunnel at the University of California, Davis.
  The emission factor of sodium is 24.
- Lead [air, unspecified]: 3.25203e-9 kg; = 0.040/1E6* ABS(straw_input)* 0.85; source Turn, SQ and Jenkins, BM 1997; lognormal variance with pedigree 0.0892, pedigree (1,5,5,4,4)
  Based on experimental study. Average emission factor (mg/kg dry fuel) for several herbacious fuels (rice, wheat, barley straws; corn stover and sugarcane trash).
  The study reports elemental and water soluble species concentrations and emissions factors obtained from PM collected during test burns. The tests were conducted in a combustion wind tunnel at the University of California, Davis.
  The emission factor of lead is 0.04
- Arsenic [air, unspecified]: 1.78862e-9 kg; = 0.022/1E6* ABS(straw_input)* 0.85; source Turn, SQ and Jenkins, BM 1997; lognormal variance with pedigree 0.0892, pedigree (1,5,5,4,4)
  Based on experimental study. Average emission factor (mg/kg dry fuel) for several herbacious fuels (rice, wheat, barley straws; corn stover and sugarcane trash).
  The study reports elemental and water soluble species concentrations and emissions factors obtained from PM collected during test burns. The tests were conducted in a combustion wind tunnel at the University of California, Davis.
  The emission factor of arsenic is 0.022
- Zinc [air, unspecified]: 5.28455e-8 kg; = 0.65/1E6* ABS(straw_input)* 0.85; source Turn, SQ and Jenkins, BM 1997; lognormal variance with pedigree 0.0892, pedigree (1,5,5,4,4)
  Based on experimental study. Average emission factor (mg/kg dry fuel) for several herbacious fuels (rice, wheat, barley straws; corn stover and sugarcane trash).
  The study reports elemental and water soluble species concentrations and emissions factors obtained from PM collected during test burns. The tests were conducted in a combustion wind tunnel at the University of California, Davis.
  The emission factor of zinc is 0.65
- Acetaldehyde [air, unspecified]: 9.07317e-8 kg; = 7.44E-08* ABS(straw_input)*15*0.85; source Bauer, C. 2007; lognormal variance with pedigree 0.112, pedigree (4,4,5,5,1)
  due to lack of process specific emission data, it has been adapted from the emission factor (kg/MJ input) given for the combustion of mixed wood chips in a cogen 300KW.
  Uncertainty: Adapted from the dataset 'wood chips, in cogen 6400kWth, wood', according to actual water, carbon and energy content of the fuel (wood chips u=40%)
- Toluene [air, unspecified]: 4.46341e-7 kg; = 3.66E-7* ABS(straw_input)*15*0.85; source Bauer, C. 2007; lognormal variance with pedigree 0.112, pedigree (4,4,5,5,1)
  (same comment as for Acetaldehyde)
- Carbon monoxide, non-fossil [air, unspecified]: 8.70397e-5 kg; = (910/1E6)* ABS(straw_input); source H. Nielsen 2004; lognormal variance with pedigree 0.0892, pedigree (1,5,5,4,4)
  910 g of CO are produced per 1 ton of straw burned.(http://www.lcafood.dk/processes/energyconversion/heatandpowerfromstraw.htm)
- Ammonia [air, unspecified]: 2.57317e-6 kg; = 2.11E-06* ABS(straw_input)*15*0.85; source Bauer, C. 2007; lognormal variance with pedigree 0.082, pedigree (4,4,5,5,1)
  (same comment as for Acetaldehyde)
- Nickel [air, unspecified]: 2.92683e-9 kg; = 0.036/1E6* ABS(straw_input)* 0.85; source Turn, SQ and Jenkins, BM 1997; lognormal variance with pedigree 0.0892, pedigree (1,5,5,4,4)
  Based on experimental study. Average emission factor (mg/kg dry fuel) for several herbacious fuels (rice, wheat, barley straws; corn stover and sugarcane trash).
  The study reports elemental and water soluble species concentrations and emissions factors obtained from PM collected during test burns. The tests were conducted in a combustion wind tunnel at the University of California, Davis.
  The emission factor of nickel is 0.04
- Hydrocarbons, aliphatic, alkanes, unspecified [air, unspecified]: 1.35366e-6 kg; = 1.11E-6* ABS(straw_input)*15*0.85; source Bauer, C. 2007; lognormal variance with pedigree 0.112, pedigree (4,4,5,5,1)
  (same comment as for Acetaldehyde)
- Magnesium [air, unspecified]: 5.35366e-7 kg; = 4.39E-7* ABS(straw_input)*15*0.85; source Bauer, C. 2007; lognormal variance with pedigree 0.112, pedigree (4,4,5,5,1)
  (same comment as for Acetaldehyde)
- Hydrogen chloride [air, unspecified]: 6.40842e-5 kg; = (670/1E6)* ABS(straw_input); source H. Nielsen 2004; lognormal variance with pedigree 0.0586, pedigree (1,5,5,5,3)
  670 g of HCl are produced per 1 ton of straw burned.(http://www.lcafood.dk/processes/energyconversion/heatandpowerfromstraw.htm)
- Aluminium [air, unspecified]: 4.55285e-7 kg; = 5.6/1E6* ABS(straw_input)* 0.85; source Turn, SQ and Jenkins, BM 1997; lognormal variance with pedigree 0.0892, pedigree (1,5,5,4,4)
  Based on experimental study. Average emission factor (mg/kg dry fuel) for several herbacious fuels (rice, wheat, barley straws; corn stover and sugarcane trash).
  The study reports elemental and water soluble species concentrations and emissions factors obtained from particulate matter collected during test burns. The tests were conducted in a combustion wind tunnel at the University of California, Davis.
  The emission factor of aluminium is 5.6
- Dioxins, measured as 2,3,7,8-tetrachlorodibenzo-p-dioxin [air, unspecified]: 3.06074e-14 kg; = (0.32/1E12* ABS(straw_input)); source H. Nielsen 2004; lognormal variance with pedigree 0.0586, pedigree (1,5,5,5,3)
  0.32 micrograms of dioxin are produced per 1 ton of straw burned.(http://www.lcafood.dk/processes/energyconversion/heatandpowerfromstraw.htm)
- Potassium [air, unspecified]: 6.26016e-5 kg; = 770/1E6* ABS(straw_input)* 0.85; source Turn, SQ and Jenkins, BM 1997; lognormal variance with pedigree 0.0892, pedigree (1,5,5,4,4)
  Based on experimental study. Average emission factor (mg/kg dry fuel) for several herbacious fuels (rice, wheat, barley straws; corn stover and sugarcane trash).
  The study reports elemental and water soluble species concentrations and emissions factors obtained from PM collected during test burns. The tests were conducted in a combustion wind tunnel at the University of California, Davis.
  The emission factor of potassium is770.
- Copper [air, unspecified]: 4.87805e-9 kg; = 0.060/1E6* ABS(straw_input)* 0.85; source Turn, SQ and Jenkins, BM 1997; lognormal variance with pedigree 0.0892, pedigree (1,5,5,4,4)
  Based on experimental study. Average emission factor (mg/kg dry fuel) for several herbacious fuels (rice, wheat, barley straws; corn stover and sugarcane trash).
  The study reports elemental and water soluble species concentrations and emissions factors obtained from PM collected during test burns. The tests were conducted in a combustion wind tunnel at the University of California, Davis.
  The emission factor of copper is 0.06
- Benzo(a)pyrene [air, unspecified]: 7.17073e-10 kg; = 5.88E-10* ABS(straw_input)*15*0.85; source Bauer, C. 2007; lognormal variance with pedigree 0.372, pedigree (4,4,5,5,1)
  (same comment as for Acetaldehyde)
- Benzene, hexachloro- [air, unspecified]: 1.07073e-14 kg; = 8.78E-15* ABS(straw_input)*15*0.85; source Bauer, C. 2007; lognormal variance with pedigree 0.372, pedigree (4,4,5,5,1)
  (same comment as for Acetaldehyde)
- Formaldehyde [air, unspecified]: 6.26016e-7 kg; = (30.3+3.5+0.7+2.4+1.6)/5*1E-6* ABS(straw_input)*0.85; source Ramdahl, T. et al. 1983; lognormal variance with pedigree 0.0892, pedigree (1,5,5,4,4)
  Based on average of 5 tests on straw burning. In each test, there has been a chemical analysis for formaldehyde due to emissions from straw incineration, expressed as mg/kg dry fuel burned.
  The burning process took place in a commercial stoker-fed trough-burning furnace with a minimum heat output of 75kW. In this study straw from barley was used as a fuel.
- Particulates, < 2.5 um [air, unspecified]: 6.84146e-5 kg; = 5.61E-5* ABS(straw_input)*15*0.85; source Bauer, C. 2007; lognormal variance with pedigree 0.112, pedigree (4,4,5,5,1)
  (same comment as for Acetaldehyde)
- Chlorine [air, unspecified]: 7.47967e-5 kg; = 920/1E6* ABS(straw_input)* 0.85; source Turn, SQ and Jenkins, BM 1997; lognormal variance with pedigree 0.0892, pedigree (1,5,5,4,4)
  Based on average emission factor (mg/kg dry fuel) for several herbacious fuels (rice, wheat, barley straws; corn stover and sugarcane trash).
  The study reports elemental and water soluble species concentrations and emissions factors obtained from particulate matter collected during test burns. The tests were conducted in a combustion wind tunnel at the University of California, Davis.
  The emission factor of chlorine is 920.
- Cadmium [air, unspecified]: 2.27642e-8 kg; = 0.28/1E6* ABS(straw_input)* 0.85; source Turn, SQ and Jenkins, BM 1997; lognormal variance with pedigree 0.0892, pedigree (1,5,5,4,4)
  Based on experimental study. Average emission factor (mg/kg dry fuel) for several herbacious fuels (rice, wheat, barley straws; corn stover and sugarcane trash).
  The study reports elemental and water soluble species concentrations and emissions factors obtained from PM collected during test burns. The tests were conducted in a combustion wind tunnel at the University of California, Davis.
  The emission factor of cadmium is 0.28
- NMVOC, non-methane volatile organic compounds, unspecified origin [air, unspecified]: 8.92683e-7 kg; = 7.32E-7* ABS(straw_input)*15*0.85; source Bauer, C. 2007; lognormal variance with pedigree 0.112, pedigree (4,4,5,5,1)
  (same comment as for Acetaldehyde)
- Chromium [air, unspecified]: 7.56098e-9 kg; = 0.093/1E6* ABS(straw_input)* 0.85; source Turn, SQ and Jenkins, BM 1997; lognormal variance with pedigree 0.0892, pedigree (1,5,5,4,4)
  Based on experimental study. Average emission factor (mg/kg dry fuel) for several herbacious fuels (rice, wheat, barley straws; corn stover and sugarcane trash).
  The study reports elemental and water soluble species concentrations and emissions factors obtained from particulate matter collected during test burns. The tests were conducted in a combustion wind tunnel at the University of California, Davis.
  The emission factor of chromium is 0.093
- Mercury [air, unspecified]: 4.79675e-9 kg; = 0.059/1E6* ABS(straw_input)* 0.85; source Turn, SQ and Jenkins, BM 1997; lognormal variance with pedigree 0.0892, pedigree (1,5,5,4,4)
  Based on experimental study. Average emission factor (mg/kg dry fuel) for several herbacious fuels (rice, wheat, barley straws; corn stover and sugarcane trash).
  The study reports elemental and water soluble species concentrations and emissions factors obtained from PM collected during test burns. The tests were conducted in a combustion wind tunnel at the University of California, Davis.
  The emission factor of mercury is 0.059
- Silver [air, unspecified]: 2.03252e-8 kg; = 0.25/1E6* ABS(straw_input)* 0.85; source Turn, SQ and Jenkins, BM 1997; lognormal variance with pedigree 0.0892, pedigree (1,5,5,4,4)
  Based on experimental study. Average emission factor (mg/kg dry fuel) for several herbacious fuels (rice, wheat, barley straws; corn stover and sugarcane trash).
  The study reports elemental and water soluble species concentrations and emissions factors obtained from PM collected during test burns. The tests were conducted in a combustion wind tunnel at the University of California, Davis.
  The emission factor of silver is 0.25
- Phenol, pentachloro- [air, unspecified]: 1.20488e-11 kg; = 9.88E-12* ABS(straw_input)*15*0.85; source Bauer, C. 2007; lognormal variance with pedigree 0.112, pedigree (4,4,5,5,1)
  (same comment as for Acetaldehyde)
- Sulfur dioxide [air, unspecified]: 6.50407e-5 kg; = (680/1E6)* ABS(straw_input); source H. Nielsen 2004; lognormal variance with pedigree 0.0586, pedigree (1,5,5,5,3)
  680 g of SO2 are produced per 1 ton of straw burned.(http://www.lcafood.dk/processes/energyconversion/heatandpowerfromstraw.htm)
- Phosphorus [air, unspecified]: 1.46341e-7 kg; = 1.8/1E6* ABS(straw_input)* 0.85; source Turn, SQ and Jenkins, BM 1997; lognormal variance with pedigree 0.0892, pedigree (1,5,5,4,4)
  Based on experimental study. Average emission factor (mg/kg dry fuel) for several herbacious fuels (rice, wheat, barley straws; corn stover and sugarcane trash).
  The study reports elemental and water soluble species concentrations and emissions factors obtained from particulate matter collected during test burns. The tests were conducted in a combustion wind tunnel at the University of California, Davis.
  The emission factor of phosphorous is 29
- Methane, non-fossil [air, unspecified]: 5.95122e-7 kg; = 4.88E-7* ABS(straw_input)*15*0.85; source Bauer, C. 2007; lognormal variance with pedigree 0.112, pedigree (4,4,5,5,1)
  (same comment as for Acetaldehyde)
- Sulfate [air, unspecified]: 1.95122e-5 kg; = 240/1E6* ABS(straw_input)* 0.85; source Turn, SQ and Jenkins, BM 1997; lognormal variance with pedigree 0.0892, pedigree (1,5,5,4,4)
  Based on experimental study. Average emission factor (mg/kg dry fuel) for several herbacious fuels (rice, wheat, barley straws; corn stover and sugarcane trash).
  The study reports elemental and water soluble species concentrations and emissions factors obtained from particulate matter collected during test burns. The tests were conducted in a combustion wind tunnel at the University of California, Davis.
  The emission factor of sulfate is 240.
- Benzene, ethyl- [air, unspecified]: 4.46341e-8 kg; = 3.66E-08* ABS(straw_input)*15*0.85; source Bauer, C. 2007; lognormal variance with pedigree 0.112, pedigree (4,4,5,5,1)
  (same comment as for Acetaldehyde)
- Hydrocarbons, aliphatic, unsaturated [air, unspecified]: 4.60976e-6 kg; = 3.78E-6* ABS(straw_input)*15*0.85; source Bauer, C. 2007; lognormal variance with pedigree 0.112, pedigree (4,4,5,5,1)
  (same comment as for Acetaldehyde)
- Selenium [air, unspecified]: 2.27642e-9 kg; = 0.028/1E6*ABS(straw_input)* 0.85; source Turn, SQ and Jenkins, BM 1997; lognormal variance with pedigree 0.0892, pedigree (1,5,5,4,4)
  Based on experimental study. Average emission factor (mg/kg dry fuel) for several herbacious fuels (rice, wheat, barley straws; corn stover and sugarcane trash).
  The study reports elemental and water soluble species concentrations and emissions factors obtained from PM collected during test burns. The tests were conducted in a combustion wind tunnel at the University of California, Davis.
  The emission factor of selenium is 0.028
- Dinitrogen monoxide [air, unspecified]: 1.91296e-6 kg; = 20/1E6* ABS(straw_input); source H. Nielsen 2004; lognormal variance with pedigree 0.112, pedigree (4,4,5,5,1)
  20 gr of N2O are produced per 1 ton of straw burned (http://www.lcafood.dk/processes/energyconversion/heatandpowerfromstraw.htm)
  Uncertainty: Adapted from the dataset 'wood chips, in cogen 6400kWth, wood', according to actual water, carbon and energy content of the fuel (wood chips u=40%)
- Nitrogen oxides [air, unspecified]: 1.91296e-6 kg; = (20/1E6)* ABS(straw_input); source H. Nielsen 2004; lognormal variance with pedigree 0.0586, pedigree (1,5,5,5,3)
  20 gr N2O are produced per 1 ton of straw burned.(http://www.lcafood.dk/processes/energyconversion/heatandpowerfromstraw.htm)
- Calcium [air, unspecified]: 8.94309e-7 kg; = 11/1E6* ABS(straw_input)* 0.85; source Turn, SQ and Jenkins, BM 1997; lognormal variance with pedigree 0.0892, pedigree (1,5,5,4,4)
  Based on experimental study. Average emission factor (mg/kg dry fuel) for several herbacious fuels (rice, wheat, barley straws; corn stover and sugarcane trash).
  The study reports elemental and water soluble species concentrations and emissions factors obtained from particulate matter collected during test burns. The tests were conducted in a combustion wind tunnel at the University of California, Davis.
  The emission factor of calcium is 11
- Manganese [air, unspecified]: 1.05691e-7 kg; = 1.3/1E6* ABS(straw_input)* 0.85; source Turn, SQ and Jenkins, BM 1997; lognormal variance with pedigree 0.0892, pedigree (1,5,5,4,4)
  Based on experimental study. Average emission factor (mg/kg dry fuel) for several herbacious fuels (rice, wheat, barley straws; corn stover and sugarcane trash).
  The study reports elemental and water soluble species concentrations and emissions factors obtained from particulate matter collected during test burns. The tests were conducted in a combustion wind tunnel at the University of California, Davis.
  The emission factor of manganese is 1.3
- Tin [air, unspecified]: 8.94309e-9 kg; = 0.11/1E6*ABS(straw_input)* 0.85; source Turn, SQ and Jenkins, BM 1997; lognormal variance with pedigree 0.0892, pedigree (1,5,5,4,4)
  Based on experimental study. Average emission factor (mg/kg dry fuel) for several herbacious fuels (rice, wheat, barley straws; corn stover and sugarcane trash).
  The study reports elemental and water soluble species concentrations and emissions factors obtained from PM collected during test burns. The tests were conducted in a combustion wind tunnel at the University of California, Davis.
  The emission factor of tin is 0.11
- Chromium VI [air, unspecified]: 5.95122e-11 kg; = 4.88E-11* ABS(straw_input)*15*0.85; source Bauer, C. 2007; lognormal variance with pedigree 0.722, pedigree (4,4,5,5,1)
  (same comment as for Acetaldehyde)
- Fluorine [air, unspecified]: 7.43902e-8 kg; = 6.10E-8* ABS(straw_input)*15*0.85; source Bauer, C. 2007; lognormal variance with pedigree 0.112, pedigree (4,4,5,5,1)
  (same comment as for Acetaldehyde)
- Iodine [air, unspecified]: 2.43902e-9 kg; = 0.030/1E6* ABS(straw_input)* 0.85; source Turn, SQ and Jenkins, BM 1997; lognormal variance with pedigree 0.0892, pedigree (1,5,5,4,4)
  Based on experimental study. Average emission factor (mg/kg dry fuel) for several herbacious fuels (rice, wheat, barley straws; corn stover and sugarcane trash).
  The study reports elemental and water soluble species concentrations and emissions factors obtained from PM collected during test burns. The tests were conducted in a combustion wind tunnel at the University of California, Davis.
  The emission factor of iodine is 0.03
- m-Xylene [air, unspecified]: 1.78049e-7 kg; = 1.46E-7* ABS(straw_input)*15*0.85; source Bauer, C. 2007; lognormal variance with pedigree 0.112, pedigree (4,4,5,5,1)
  (same comment as for Acetaldehyde)
- Benzene [air, unspecified]: 1.30488e-6 kg; = 1.07E-6* ABS(straw_input)*15*0.85; source Bauer, C. 2007; lognormal variance with pedigree 0.112, pedigree (4,4,5,5,1)
  (same comment as for Acetaldehyde)
- Silicon [air, unspecified]: 2.35772e-6 kg; = 29/1E6* ABS(straw_input)* 0.85; source Turn, SQ and Jenkins, BM 1997; lognormal variance with pedigree 0.0892, pedigree (1,5,5,4,4)
  Based on experimental study. Average emission factor (mg/kg dry fuel) for several herbacious fuels (rice, wheat, barley straws; corn stover and sugarcane trash). The particulates identified have a diameter of <10 micrometers (PM10) and larger than 2.5 micrometers. The study reports elemental and water soluble species concentrations and emissions factors obtained from PM collected during test burns. The tests were conducted in a combustion wind tunnel at the University of California, Davis.
- PAH, polycyclic aromatic hydrocarbons [air, unspecified]: 3.5122e-6 kg; = ((64.3+58.6+43.1+26.0+24.0)/5)*1E-6 * ABS(straw_input)*0.85; source Ramdahl, T. et al. 1983; lognormal variance with pedigree 0.0892, pedigree (1,5,5,4,4)
  Based on average of 5 tests on straw burning. In each test, there has been a chemical analysis for PAH due to emissions from straw incineration, expressed as mg/kg dry fuel burned.
  The burning process took place in a commercial stoker-fed trough-burning furnace with a minimum heat output of 75kW. In this study straw from barley was used as a fuel.
- Antimony [air, unspecified]: 1.78862e-8 kg; = 0.22/1E6* ABS(straw_input)*0.85; source Turn, SQ and Jenkins, BM 1997; lognormal variance with pedigree 0.0892, pedigree (1,5,5,4,4)
  Based on experimental study. Average emission factor (mg/kg dry fuel) for several herbacious fuels (rice, wheat, barley straws; corn stover and sugarcane trash).
  The study reports elemental and water soluble species concentrations and emissions factors obtained from PM collected during test burns. The tests were conducted in a combustion wind tunnel at the University of California, Davis.
  The emission factor of antimony is 0.22
- Cobalt [air, unspecified]: 1.13821e-9 kg; = 0.014/1E6* ABS(straw_input)* 0.85; source Turn, SQ and Jenkins, BM 1997; lognormal variance with pedigree 0.0892, pedigree (1,5,5,4,4)
  Based on experimental study. Average emission factor (mg/kg dry fuel) for several herbacious fuels (rice, wheat, barley straws; corn stover and sugarcane trash).
  The study reports elemental and water soluble species concentrations and emissions factors obtained from PM collected during test burns. The tests were conducted in a combustion wind tunnel at the University of California, Davis.
  The emission factor of cobalt is 0.014
- Iron [air, unspecified]: 3.33333e-7 kg; = 4.1/1E6* ABS(straw_input)* 0.85; source Turn, SQ and Jenkins, BM 1997; lognormal variance with pedigree 0.0892, pedigree (1,5,5,4,4)
  Based on experimental study. Average emission factor (mg/kg dry fuel) for several herbacious fuels (rice, wheat, barley straws; corn stover and sugarcane trash).
  The study reports elemental and water soluble species concentrations and emissions factors obtained from PM collected during test burns. The tests were conducted in a combustion wind tunnel at the University of California, Davis.
  The emission factor of iron is 4.1
- Molybdenum [air, unspecified]: 3.25203e-9 kg; = 0.040/1E6* ABS(straw_input)* 0.85; source Turn, SQ and Jenkins, BM 1997; lognormal variance with pedigree 0.0892, pedigree (1,5,5,4,4)
  Based on experimental study. Average emission factor (mg/kg dry fuel) for several herbacious fuels (rice, wheat, barley straws; corn stover and sugarcane trash).
  The study reports elemental and water soluble species concentrations and emissions factors obtained from PM collected during test burns. The tests were conducted in a combustion wind tunnel at the University of California, Davis.
  The emission factor of molybdenum is 0.04

## Extrapolations
This dataset has been extrapolated from year 2007 to the year of the calculation (2021). The uncertainty has been adjusted accordingly.
