# low voltage system production, for Li-ion battery

Dataset: EcoSpold 2, unit process
Geography: GLO
Time period: 2014-01-01 to 2021-12-31
Technology level: current
Classification: ISIC rev.4 ecoinvent: 2720:Manufacture of batteries and accumulators
Synonyms: LV system; LVS
Scenario: Business-as-Usual
System model: Allocation, cut-off by classification
Generated by: Eleonora Crenna
Published in: Ellingsen, L.A.W. 2014
Database: ecoinvent
isCopyrightProtected: true
accessRestrictedTo: 1

## General comment
This dataset represents the production of 1 kg low voltage system, which is part of the Battery Management System (BMS) of a Li-ion battery. The low voltage system is modelled according to the publication of Ellingsen et al. (2014). It is assumed that the low voltage system is manufactured at an electronic component production plant.
Reference:
Ellingsen, L. A. W., Majeau-Bettez, G., Singh, B., Srivastava, A. K., Valøen, L. O., & Strømman, A. H. (2014). Life cycle assessment of a lithium-ion battery vehicle pack. Journal of Industrial Ecology, 18(1), 113-124.

## Included activities start
The activity starts with the electronic and other material entering the factory.

## Included activities end
The activity ends with the production of low voltage system at the factory gate.

## Geography
Original data were provided by the battery producer Miljøbil Grenland, located in Norway, for a Li-ion battery for use in electric vehicles. (Ellingsen et al. 2014, Life cycle assessment of a lithium‐ion battery vehicle pack. Journal of Industrial Ecology, 18(1), 113-124). Geography uncertainty has been adjusted accordingly.

## Technology
The low voltage system is made of nylon clips and wiring harnesses, modeled as a passive electronic component. Injection molding is used as a proxy for manufacture of clips.

## Time period
The time period is from 2014 (year of the publication of data) and 2020 (year of the dataset)

## Reference product
- low voltage system, for Li-ion battery: 1 kg; CPC 46430: Parts of primary cells, primary batteries and electric accumulators (including separators); By-product classification allocatable product
  production volume 633344 kg; = 191922359 *0.0033
    The PV is expressed in kg. According to UN Comtrade (https://comtrade.un.org/data/, HS code: 850760) 191922359 kg Li-ion batteries were exported from China in 2019. The low voltage system within the battery management system represents on average 0.33% weight of a Li-ion battery.
  property price 44.1333 EUR2005
    Calculated based on inputs: The price of the product has been calculated as a sum of the values of the material and energy inputs for this product. This value is therefore a rough estimation. It may underestimate the real price since there are additional expenses when producing any product. These expences can include for example labour costs, treatment of waste materials and profit for the producer. Please consider carefully whether this level of data quality is acceptable for your application.
  property carbon content 0.330689
    carbon content on a dry matter basis (reserved; not for manual entry)
  properties: carbon content, non-fossil 0.0044199, dry mass 1 kg, carbon content, fossil 0.326269, water content 0, wet mass 1 kg, water in wet mass 0 kg, carbon allocation 0.330689 kg

## Inputs from technosphere
All rows: source Ellingsen, L.A.W. 2014
- electronic component factory: 2e-8 unit; lognormal variance with pedigree 0.366, pedigree (4,5,4,5,4)
  Literature.
- injection moulding: 0.029 kg; lognormal variance with pedigree 0.0192, pedigree (2,5,4,5,1)
  Literature. Proxy for the production of nylon clips.
- electronic component, passive, unspecified: 0.97 kg; lognormal variance with pedigree 0.0192, pedigree (2,5,4,5,1)
  Literature. Proxy for harnesses (electronic components).
  properties: carbon content, non-fossil 0.0045566, carbon content, fossil 0.317311, wet mass 1 kg, dry mass 1 kg
- nylon 6: 0 kg; pedigree (1,1,1,1,1)
  Literature. Proxy for the clips.
  properties: heating value, net 30.9 MJ, dry mass 1 kg, carbon content, fossil 0.637168, wet mass 1 kg
  note on heating value, net: Assumed equal to Nylon-66. Reference: Walters, R. N., Hackett, S. M. and Lyon, R. E. (2000) ‘Heats of combustion of high temperature polymers’, Fire and Materials, 24(5), pp. 245–252. doi: 10.1002/1099-1018(200009/10)24:5<245::AID-FAM744>3.0.CO;2-7.
  note on carbon content, fossil: It is a chain of caprolactam molecules, originating from aminocarboxylic acids - here caproic acid or caprolactam. The structure of nylon 6 is -(NH-(CH2)5-CO)n-, C6H11NO (ecoinvent v2.2 report 11_II). MW=113 g/mol
- nylon 6: 0.00958718, 0.0194128 kg (2 entries); lognormal variance with pedigree 0.0192, pedigree (2,5,4,5,1)
  Literature. Proxy for the clips.

## Sampling procedure
From Literature.

## Extrapolations
This dataset has been extrapolated from year 2020 to the year of the calculation (2021). The uncertainty has been adjusted accordingly.
