# cement production, blast furnace slag 66-80%

Dataset: EcoSpold 2, unit process
Geography: CH
Time period: 2005-01-01 to 2021-12-31
Technology level: current
Classification: ISIC rev.4 ecoinvent: 2394:Manufacture of cement, lime and plaster
Synonyms: blast furnace cement; CEM III/B; Portlandhüttenzement; Hochofenzement
Scenario: Business-as-Usual
System model: Allocation, cut-off by classification
Share of production covered: 100 %
Generated by: Michael Elias Boesch
Published in: Boesch, M.E. 2010
Database: ecoinvent
isCopyrightProtected: true
accessRestrictedTo: 1

## General comment
The dataset describes the production of cement (CEM III/B) in Switzerland.

## Included activities start
From cradle, i.e. including all upstream activities. As source of gypsum, waste gypsum from flue gas treatment is assumed.

## Included activities end
This activity ends with the cement produced in the cement mill. The dataset does not include packaging and administration.

## Reference product
- cement, blast furnace slag 66-80%: 1 kg; name cement; source Boesch, M.E. 2010; CPC 37440: Portland cement, aluminous cement, slag cement and similar hydraulic cements, except in the form of clinkers; By-product classification allocatable product
  production volume 2.125e6 kg; name APV_cement; = 0.05%*4.25e9
    Estimated 0.05% marketshare
  property price 0.0615 EUR2005; name cement_price_EUR2005
    2005 import and export prices (total trades (USD) divided by total weight (kg) in China, India, USA, Japan, Russia and Europe, major producers and consumers (http://www.cementchina.net/freport/showfre.asp?id=749) from UN Commodity Trade Statistics Database (http://data.un.org/Explorer.aspxDatabase [Accessed 2 July 2010]). Commodity: Cement (portland, aluminious, slag or hydraulic)
  property carbon content 0
    carbon content on a dry matter basis (reserved; not for manual entry)
  properties: dry mass 1 kg, carbon content, fossil 0, water in wet mass 0 kg, water content 0, carbon content, non-fossil 0, wet mass 1 kg, carbon allocation 0 kg

## Inputs from technosphere
- electricity, medium voltage: 0.0549 kWh; = 0.0549* cement; source Boesch, M.E. 2010; lognormal variance with pedigree 0.0433, pedigree (3,3,5,3,1)
  Literature Value
- ethylene glycol: 0.00055 kg; = 0.00055* cement; source Kellenberger D. 2007; lognormal variance with pedigree 0.0433, pedigree (3,3,5,3,1)
  Ancillary product for grinding
  properties: dry mass 1 kg, heating value, net 23.44 MJ, carbon content, fossil 0.387097, wet mass 1 kg
- clinker: 0 kg; source Boesch, M.E. 2010; pedigree (1,1,1,1,1)
  Literature Value
  properties: dry mass 1 kg, wet mass 1 kg
- cement factory: 5.36e-11 unit; = 5.36e-11* cement; source Kellenberger D. 2007; lognormal variance with pedigree 0.3406, pedigree (2,1,5,1,1)
  Literature Value
  This exchange has an activity link directly to the producing activity because the product is primarily consumed in the same geographical area where it is produced.
- heat, district or industrial, other than natural gas: 0.2336 MJ; = 0.32*ABS(GGBFS); source Boesch, M.E. 2010; lognormal variance with pedigree 0.0086, pedigree (1,1,4,1,1)
  Heat for drying of blast furnace slag. Literature Value
  properties: heating value, net 1 MJ
- ground granulated blast furnace slag: 0.73 kg; name GGBFS; = 0.73*cement; source Boesch, M.E. 2010; lognormal variance with pedigree 0.0433, pedigree (3,3,5,3,1)
  Literature value
  properties: dry mass 0.99 kg, wet mass 1 kg
- steel, low-alloyed: 0.00011 kg; name steel; = 0.00011* cement; source Kellenberger D. 2007; lognormal variance with pedigree 0.0433, pedigree (3,3,5,3,1)
  Literature value
  property carbon content, fossil 0.005; name C_content_fossil
  property water in wet mass 0 kg; name WWM
  property water content 0; name water_content
  property dry mass 1 kg; name DM
  property wet mass 1 kg; name WM
  property carbon content, non-fossil 0; name C_content_non_fossil
- gypsum, mineral: 0.0135 kg; = 0.0135* cement; source Boesch, M.E. 2010; lognormal variance with pedigree 0.0433, pedigree (3,3,5,3,1)
  Literature Value
  properties: wet mass 1 kg, dry mass 1 kg
- clinker: 0.257 kg; source Boesch, M.E. 2010; lognormal variance with pedigree 0.0433, pedigree (3,3,5,3,1)
  Literature Value

## Emissions to nature
- Heat, waste [air, unspecified]: 0.198 MJ; = 0.198* cement; source Boesch, M.E. 2010; lognormal variance with pedigree 0.0827, pedigree (3,3,5,3,1)
  Literature Value

## Sampling procedure
Data approximates average Swiss production

## Extrapolations
This dataset has been extrapolated from year 2009 to the year of the calculation (2021). The uncertainty has been adjusted accordingly.

## Review by Gabor Doka 2012-06-16
Passed (just). See review comments in 'cement production, Portland blast furnace slag, 25-70% blast furnace slag, GLO, 2005 - 2009' and 'cement production, Portland, CH, 2005 - 2009' which apply to (almost) all cement datasets.
