# fibre, viscose to generic market for silky fibres

Dataset: EcoSpold 2, unit process
Geography: GLO
Time period: 2020-01-01 to 2021-12-31
Technology level: current
Classification: ISIC rev.4 ecoinvent: 2030:Manufacture of man-made fibres
Scenario: Business-as-Usual
System model: Allocation, cut-off by classification
Generated by: Avraam Symeonidis
Database: ecoinvent
isCopyrightProtected: true
accessRestrictedTo: 1

## General comment
This is a renaming activity. It's purpose is to link 'fibre, viscose' to the generic 'market for silky fibres'.

## Included activities start
Activity starts with the reception of 'fibre, viscose'.

## Included activities end
Activity ends with the 'silky fibres' being ready for transportation.

## Reference product
- silky fibre: 1 kg; CPC 26220: Artificial staple fibres, carded, combed or otherwise processed for spinning; By-product classification allocatable product
  production volume 6e8 kg; = 2000000000*0.3
    Assumed 30% of the global production volume to be used in this process. Expert judgement.
  property heating value, net 12.12 MJ
    LHV is calculated based on the Carbon content of the product. More details can be found on the respective documentation.
  property carbon content 0.4
    carbon content on a dry matter basis (reserved; not for manual entry)
  properties: price 11.7644 EUR2005, wet mass 1 kg, carbon content, non-fossil 0.17, water content 0, water in wet mass 0 kg, carbon content, fossil 0.23, dry mass 1 kg, carbon allocation 0.4 kg

## Inputs from technosphere
- fibre, viscose: 1 kg
  properties: dry mass 1 kg, carbon content, non-fossil 0.240535, wet mass 1 kg, heating value, net 7.29 MJ

## Extrapolations
This dataset has been extrapolated from year 2020 to the year of the calculation (2021). The uncertainty has been adjusted accordingly.
