# silicon hydrochloration

Dataset: EcoSpold 2, unit process
Geography: GLO
Time period: 2000-01-01 to 2021-12-31
Technology level: current
Classification: ISIC rev.4 ecoinvent: 2011:Manufacture of basic chemicals
Synonyms: Silicon tetrahydride; Monosilane; 7440-21-3; Silicone; monosaline; Silicon metal
Scenario: Business-as-Usual
System model: Allocation, cut-off by classification
Share of production covered: 100 %
Generated by: [System]
Published in: Jungbluth, N. 2007
Database: ecoinvent
isCopyrightProtected: true
accessRestrictedTo: 1

## General comment
This dataset represents the production of silicon tetrahydride (SiH4) and silicon tetrachloride (SiCl4) by hydrochloration of silicon to trichlorosilane, followed by the disproportionation of trichlorosilane. Silicon tetrachloride is a clear, colorless liquid that fumes strongly in air and hydrolyzes rapidly in water, producing SiO2 gel. It is used for the production of high-purity silicon, highly dispersed silica, as well as corrosion-resistant coatings for metal surfaces. Silicon tetrahydride is used to deposit silicon on surfaces such as glass or silica-coated surfaces. This dataset is based on literature data as well as data from similar processes.
References:
Simmler, W. 2000. Silicon Compounds, Inorganic. Ullmann's Encyclopedia of Industrial Chemistry.

## Included activities start
From the reception of metallurgical grade silicon and hydrochloric acid at the factory gate.

## Included activities end
This activity ends with the trichlorosilane hydrogenation process, including the consumption of raw materials, energy uses, infrastructure and emissions.

## Geography
The inventory is modelled for the world.

## Technology
Hydrochloration of silicon and disproportionation of trichlorosilane are the most important processes to produce silicon tetrahydride.
Industrially, silicon tetrahydride is produced from metallurgical grade silicon (MG-silicon) in a two-step process. In the first step, powdered silicon is reacted with hydrochloric acid at about 300 °C to produce trichlorosilane, HSiCl3, along with hydrogen gas, according to the chemical equation:
Si + 3HCl → HSiCl3 + H2
The hydrogen is re-used in other silicon purification processes and therefore not considered as co-product. In the second step, catalytic disproportionation of trichlorosilane results in SiH4 and SiCl4. For a mixture of trichloro- and dichlorosilane, copper, a mixture of silica and alumina at 300 °C, and quaternary ammonium groups bonded to carbon in an ion-exchange resin have been reported as catalysts for the main reaction leading to silicon tetrahydride.
4 HSiCl3 → 2 H2SiCl2 + 2 SiCl4
2 H2SiCl2 → SiCl4+ SiH4
Purification
In-process purification is achieved by contacting part of the silicon tetrahydride produced with the starting mixture of chlorosilanes, which contains the impurities as chlorides, chiefly those of arsenic, phosphorus, and boron. This procedure converts the contaminants into their more volatile hydrides, which are removed with the off-gas.
Removal of boron compounds from silanes that are to be used for the production of high-purity silicon is very important. When SiH4 is produced from alkali metal hydrides, it is recommended that water should be added to hydrolyze boron hydrides under the alkaline reaction conditions. Water vapor is added during distillation for the same reason. Boron compounds can be removed from SiH4 by adsorption from the gas phase onto activated carbon or silica carriers loaded with compounds that form complexes with boron compounds (AlCl3, FeCl3, C2H5CN, NH2CN, PCl3).
If alkali metal hydrides MH are reacted in organic solvents, it is often unnecessary to include a special stage for removing boron compounds from the silicon compounds, as the former react to form boranate complexes under the following conditions:
References:
Simmer, Walter: Silicon Compounds, Inorganic. Published online: 2002. In: Ullmann's Encyclopedia of Industrial Chemistry, Seventh Edition, 2004 Electronic Release (ed. Fiedler E., Grossmann G., Kersebohm D., Weiss G. and Witte C.). 7 th Electronic Release Edition. Wiley InterScience, New York, Online-Version under: http://www.mrw.interscience.wiley.com/emrw/9783527306732/home

## Time period
Time of publications.

## Parameters
- fraction, cooling water, to air: 0.3875 dimensionless; name fraction_CW_to_air; = (0.5*fraction_CW_OT_to_air)+(0.5*fraction_CW_R_to_air); lognormal variance with pedigree 0.092025, pedigree (4,4,3,2,4)
  Calculated value based on literature value (see comments of the other parametres present in this dataset) and expert opinion. In the case when no industry/literature data are available about the type of cooling or directly fraction, cooling water, to air specific for the process a default assumption is applied. It is assumed that the once-through cooling system is used in 50% of all cases and recirculating system is used in another 50% of all cases.
- fraction, cooling water, recirculating system, to air: 0.771 dimensionless; name fraction_CW_R_to_air; lognormal variance with pedigree 0.0413, pedigree (2,3,1,3,1)
  Calculated based on literature value (Scown, C.D., 2011, Water Footprint of U.S. Transportation Fuels and supplying information of the article) (Vionnet, S., Quantis Water Database - Technical Report, 2012).
- fraction, cooling water, once-through system, to air: 0.004 dimensionless; name fraction_CW_OT_to_air; lognormal variance with pedigree 0.0413, pedigree (2,3,1,3,1)
  (same comment as for fraction, cooling water, recirculating system, to air)
- fraction, cooling water, cooling pond system, to air: 0.032 dimensionless; name fraction_CW_CP_to_air; lognormal variance with pedigree 0.0413, pedigree (2,3,1,3,1)
  (same comment as for fraction, cooling water, recirculating system, to air)

## Reference product
- silicon tetrahydride: 1 kg; name RP; CPC 342: Basic inorganic chemicals n.e.c.; By-product classification allocatable product; CAS 7803-62-5
  Silicon tetrahydride is a gas. Above 600°C, silane decomposes into silicon and hydrogen. The thermal decomposition of silicon tetrahydride takes place as follows:
  SiH4 -->( >600 ºC)--> Si + 2 H2
  Direct use of silicon hydrides involves their decomposition on surfaces, leading to deposition of elemental silicon or silicon compounds. Polycrystalline films of elemental silicon of controllable grain size are deposited on glass or silica-coated surfaces by heating them to 450 - 800 °C in an atmosphere consisting of silicon tetrahydride and tetrabromo- or tetraiodosilane. Chemical vapor deposition is generally followed by annealing and recrystallization with an energy beam. This is used to deposit silicon on insulator surfaces. Amorphous silicon photoconducting layers on electrophotographic plates are made by using a plasma for silane decomposition and silicon deposition. Liquid crystal displays, based on thin film transistors, for screens in monitoring devices, are made from amorphous silicon which is produced on alkali-free glass surfaces in situ by an electric discharge in an atmosphere of silicon tetrahydride at reduced pressure. Residual bonds are saturated by hydrogen atoms to avoid diminishing the semiconductor effect. On the surfaces of transition metals, cleaned by sputtering in an argon atmosphere, silicon tetrahydride and the higher silicon hydrides can be thermally decomposed at ca. 300 °C to form metal silicides. Exposure to air leads to the formation of silicon oxides.
  production volume 347701 kg; name RP_PV
    Estimated value. The global production volume is extrapolated from the European production volume based on reports from Cefic (European Chemical Industry Council), and the American Chemistry Council.
    According to Cefic (2016a) the global sales of chemicals in the year 2015 was 3 534 billion euros. The reported share of sales per region are: EU28 14.7%; Other Europe (Switzerland, Norway, Turkey, Russia and Ukraine) 2.7%; NAFTA (US, Canada and Mexico) 16.5%; Latin America 3.8%; China 39.9%; Japan 3.9%; Republic of Korea 3.2%; India 2.2%; Rest of Asia 11.9%; Rest of the World 1.3%. Cefic also reports the US total sales, which amount to 518.7 billion euros out of the global 3 534 billion euros (14.7%). The same share is reported by the American Chemistry Council (2016), according to which the USA sales account for 15% of global sales for the year 2016.
    European production volume:
    Estimated value. According to the European Chemical Agency, the consumption of Silicon tetrahydride for the year of 2016 is estimated to be 55000 kg. The aforementioned value is the average of the range given in the literature. According to the European Chemical Industry Council (Cefic, 2016a), the total sales of chemicals of the European Union in 2016 amounted to 519 billion euros. Chemical imports were valued at 91 billion euros for the first 11 months of 2016. Based on this, the value for the total imports for the year 2016 was extrapolated, yielding a value of 99.3 billion euros. Furthermore, Cefic (2016b) reports a trade surplus (exports-imports) of 46.4 billion euros (once again extrapolated for the whole year using the value of 42 billion euros for the first 11 months of 2016). Considering all the aforementioned information, the total chemical consumption in the EU is calculated to be 472.6 billion euros (total sales-exports+imports). It is therefore calculated that production is 110% of consumption. This value is used to scale the information on chemical consumption to production. The European production volume is therefore 60500 kg. Since no data were found for the global production this value was scaled accordingly.
    References:
    American Chemistry Council 2016. Outlook: U.S. Chemical Industry Continues to Outpace Industrial Output; Accounts for More Than One-Half of Construction Spending by Manufacturing Sector. Accessible at: https://www.americanchemistry.com/Media/PressReleasesTranscripts/ACC-news-releases/US-Chemical-Industry-Continues-to-Outpace-Industrial-Output.html
    European Chemical Agency, Brief profile of Silane, Accessible at: https://echa.europa.eu/brief-profile/-/briefprofile/100.029.331
    Cefic 2016a. Facts and figures 2016 of the European chemical industry. Accessible at: http://www.cefic.org/Facts-and-Figures/Chemicals-Industry-Profile/
    Cefic 2016b. 2016: EU chemicals output posts positive growth for third year running. Accessible at: http://www.cefic.org/Documents/RESOURCES/Chemical%20Trends%20Report/March-2017-Cefic-Chemicals-Trends-Report.pdf
  property price 82.7 EUR2005
    Calculated from literature (http://www.gelest.com/goods/pdf/Library/Silicon_Hydrides.pdf, accesed 20150806). Cross-reference; The price of "Silicone, >99.99% pure" calculated based on data in the UN Comtrade Database is 24.4 EUR/kg.
  property heating value, net 15.09 MJ
    LHV is calculated based on the elemental composition of the substance. Based on the CAS number of the substance (007803-62-5), the chemical formula of the substance is found to be: H4Si, (PubChem 2020).
    Reference: Kim, S., Chen, J., Cheng, T., Gindulyte, A., He, J., He, S., Li, Q., Shoemaker, B. A., Thiessen, P. A., Yu, B., Zaslavsky, L., Zhang, J., & Bolton, E. E. (2019). PubChem 2019 update: improved access to chemical data. Nucleic acids research, 47(D1), D1102–D1109. https://doi.org/10.1093/nar/gky1033
  property carbon content 0
    carbon content on a dry matter basis (reserved; not for manual entry)
  property true value 4.81603; name RP_true_value
    allocation property applied in "true value" allocation // value calculated from revenue
  properties: wet mass 1 kg, water content 0, carbon content, non-fossil 0, carbon content, fossil 0, water in wet mass 0 kg, dry mass 1 kg, carbon allocation 0 kg

## By-products
- silicon tetrachloride: 0 kg; name BP_silicon_tetrachloride; CPC 342: Basic inorganic chemicals n.e.c.; By-product classification allocatable product; CAS 10026-04-7
  production volume 5.47635e6 kg; = RP_PV*BP_silicon_tetrachloride/ABS(RP)
    Calculated from the production volume of silicon tetrahydride in proportion to the respective output amounts.
  property price 13.8 EUR2005
    Temporary price data. Calculated as 90% of purchasers price based on: From ecoinvent report, no. 06_XIII, 10, table 5.2, page 32. Based on personal communication with E. Williams in December 2002.
  property carbon content 0
    carbon content on a dry matter basis (reserved; not for manual entry)
  property true value 12.6575; name BP_silicon_tetrachloride_true_value
    allocation property applied in "true value" allocation // value calculated from revenue
  properties: wet mass 1 kg, water content 0, water in wet mass 0 kg, dry mass 1 kg, carbon content, non-fossil 0, carbon content, fossil 0, carbon allocation 0 kg

## Inputs from technosphere
All rows: source Jungbluth, N. 2007
- electricity, high voltage: 129.681, 409.867 kWh (2 entries); lognormal variance with pedigree 0.1786, pedigree (4,5,5,5,5)
  Estimation. The energy consumption for the silicon hydrochloration process is estimated from the production of electronic grade silicon. In this dataset an amount of 150 kWh electricity and 160 MJ heat per kg EG-silicon are considered. This values are also used here.The electricity is calculated with the mix that is considered in the literature data.
  Uncertainty: E
- silicon, metallurgical grade: 4.73287 kg; lognormal variance with pedigree 0.076, pedigree (4,5,5,1,1)
  Stoechiometric calculation. The values for the consumption of the raw materials are calculated with an assumed yield of 95 %.
  Uncertainty: S
  properties: wet mass 1 kg, dry mass 1 kg
- hydrochloric acid, without water, in 30% solution state: 0 kg; pedigree (1,1,1,1,1)
  (same comment as for silicon, metallurgical grade)
  properties: dry mass 1 kg, heating value, net 3.32 MJ, wet mass 1 kg
- heat, district or industrial, natural gas: 577.41 MJ; lognormal variance with pedigree 0.1786, pedigree (4,5,5,5,5)
  (same comment as for electricity, high voltage)
  properties: heating value, net 1 MJ
- silicone factory: 4.73287e-11 unit; lognormal variance with pedigree 0.448, pedigree (4,5,5,5,5)
  Estimation. There the infrastructure is estimated based on the module 'silicon plant', which simulates the production of electronic grade silicon.
  Uncertainty: E
- hydrochloric acid, without water, in 30% solution state: 0.722894, 3.23336 kg (2 entries); lognormal variance with pedigree 0.076, pedigree (4,5,5,1,1)
  (same comment as for silicon, metallurgical grade)

## Inputs from nature
- Water, cooling, unspecified natural origin [natural resource, in water]: 205.88 m3; name water_cooling_UNO_input; source Jungbluth, N. 2007; lognormal variance with pedigree 0.198, pedigree (4,5,5,5,5)
  Estimation. The amount of cooling water is estimated from the production of electronic grade silicon.
  Uncertainty: E

## Emissions to nature
- DOC, Dissolved Organic Carbon [water, surface water]: 0.00300537 kg; source Jungbluth, N. 2007; lognormal variance with pedigree 0.188, pedigree (4,5,5,5,5)
  Estimation. Emissions to water from the silicon hydrochloration process are estimated from the production of electronic grade silicon
  Uncertainty: E
- Zinc, ion [water, surface water]: 6.48404e-6 kg; source Jungbluth, N. 2007; lognormal variance with pedigree 0.798, pedigree (4,5,5,5,5)
  (same comment as for DOC, Dissolved Organic Carbon)
- Iron, ion [water, surface water]: 1.85529e-5 kg; source Jungbluth, N. 2007; lognormal variance with pedigree 0.798, pedigree (4,5,5,5,5)
  (same comment as for DOC, Dissolved Organic Carbon)
- Water [water, unspecified]: 126.101 m3; = water_cooling_UNO_input*(1-fraction_CW_to_air); lognormal variance with pedigree 0.0807, pedigree (2,2,5,1,1)
  Calculated as a fraction of the input of water. For more details, refer to the mathematical relation and the parameters.
  property dry mass 0 kg; name DM
  property fraction, origin: unspecified 1; name fraction_origin_unspecified_Ww
  property wet mass 1000 kg; name WM
  property fraction, origin: fresh water 0; name fraction_origin_fresh_water_Ww
  property water in wet mass 1000 kg; name WWM
  property carbon content, non-fossil 0; name C_content_non_fossil
  property fraction, origin: salt water 0; name fraction_origin_salt_water_Ww
  property carbon content, fossil 0; name C_content_fossil
- Copper, ion [water, surface water]: 3.384e-7 kg; source Jungbluth, N. 2007; lognormal variance with pedigree 0.448, pedigree (4,5,5,5,5)
  (same comment as for DOC, Dissolved Organic Carbon)
- Water [air, unspecified]: 79.7785 m3; = (water_cooling_UNO_input*fraction_CW_to_air); lognormal variance with pedigree 0.0807, pedigree (2,2,5,1,1)
  (same comment as for Water)
  property fraction, origin: fresh water 0; name fraction_origin_fresh_water
  property fraction, origin: unspecified 1; name fraction_origin_unspecified
  property fraction, origin: salt water 0; name fraction_origin_salt_water
- COD, Chemical Oxygen Demand [water, surface water]: 0.00667335 kg; source Jungbluth, N. 2007; lognormal variance with pedigree 0.188, pedigree (4,5,5,5,5)
  (same comment as for DOC, Dissolved Organic Carbon)
- TOC, Total Organic Carbon [water, surface water]: 0.00300537 kg; source Jungbluth, N. 2007; lognormal variance with pedigree 0.188, pedigree (4,5,5,5,5)
  (same comment as for DOC, Dissolved Organic Carbon)
- Chloride [water, surface water]: 0.118795 kg; source Jungbluth, N. 2007; lognormal variance with pedigree 0.448, pedigree (4,5,5,5,5)
  (same comment as for DOC, Dissolved Organic Carbon)
- Sodium, ion [water, surface water]: 0.111696 kg; source Jungbluth, N. 2007; lognormal variance with pedigree 0.798, pedigree (4,5,5,5,5)
  (same comment as for DOC, Dissolved Organic Carbon)
- BOD5, Biological Oxygen Demand [water, surface water]: 0.000676801 kg; source Jungbluth, N. 2007; lognormal variance with pedigree 0.188, pedigree (4,5,5,5,5)
  (same comment as for DOC, Dissolved Organic Carbon)
- Phosphate [water, surface water]: 9.27643e-6 kg; source Jungbluth, N. 2007; lognormal variance with pedigree 0.188, pedigree (4,5,5,5,5)
  (same comment as for DOC, Dissolved Organic Carbon)
- AOX, Adsorbable Organic Halogen as Cl [water, surface water]: 4.16966e-5 kg; source Jungbluth, N. 2007; lognormal variance with pedigree 0.188, pedigree (4,5,5,5,5)
  (same comment as for DOC, Dissolved Organic Carbon)
- Nitrogen [water, surface water]: 0.000686267 kg; source Jungbluth, N. 2007; lognormal variance with pedigree 0.188, pedigree (4,5,5,5,5)
  (same comment as for DOC, Dissolved Organic Carbon)

## Sampling procedure
Literature data.

## Extrapolations
Energy consumption, emissions and infrastructure are estimated based on data from a similar process.

## Review by Emilia Moreno Ruiz 2017-08-08
This dataset was additionally reviewed in a separate review process by Eric Johnson of Atlantic Consulting as well as Emilia Moreno Ruiz and Gregor Wernet of ecoinvent.
