# acrylic varnish production, product in 87.5% solution state

Dataset: EcoSpold 2, unit process
Geography: RER
Time period: 1995-01-01 to 2021-12-31
Technology level: current
Classification: EcoSpold01Categories: paintings/production
Classification: ISIC rev.4 ecoinvent: 2022:Manufacture of paints, varnishes and similar coatings, printing ink and mas
Tags: ConvertedDataset
Scenario: Business-as-Usual
System model: Allocation, cut-off by classification
Generated by: Maggie Osses
Published in: Althaus H.-J. 2007
Database: ecoinvent
isCopyrightProtected: true
accessRestrictedTo: 1

## General comment
Manufacturing process is considered with consumption of raw materials, energy, as well as infrastructure and land use. Transport of the raw materials is included. No by-product is generated in the process. Auxiliaries, solid wastes and emissions to air and water (excepting emission of waste-heat) are not included due to the lack of data. Transport and storage of the final product are not included. Transient or unstable operations are not considered, but the production during stable operation conditions. Inventory refers to 1 kg 100% acrylic varnish. The literature source used is von Däniken et al. 1995
[This dataset was already contained in the ecoinvent database version 2. It was not individually updated during the transfer to ecoinvent version 3. Life Cycle Impact Assessment results may still have changed, as they are affected by changes in the supply chain, i.e. in other datasets. This dataset was generated following the ecoinvent quality guidelines for version 2. It may have been subject to central changes described in the ecoinvent version 3 change report (http://www.ecoinvent.org/database/ecoinvent-version-3/reports-of-changes/), and the results of the central updates were reviewed extensively. The changes added e.g. consistent water flows and other information throughout the database. The documentation of this dataset can be found in the ecoinvent reports of version 2, which are still available via the ecoinvent website. The change report linked above covers all central changes that were made during the conversion process.]

## Geography
The literature source used bases on information provided by manufacturing companies. No further information is available on the location and characteristics of these manufacturers. Therefore, the representativeness of these values for the European acrylic varnish industry is unknown.

## Parameters
- fraction, process water, to air: 0.15 dimensionless; name fraction_PW_to_air; lognormal variance with pedigree 0.092025, pedigree (4,4,3,2,4)
  Literature value. In case when no industry/process specific data are available, default evaporation fraction value is used. This value is 15% and is based on literature (Statistics Canada, 2007 & Shaffer, K.H., 2008, Consumptive water use in the Great Lakes Basin, USGS & Shiklomanov, 2003, World Water Resources at the Beginning of the 21st Century) and has been approved by an expert.

## Reference product
- acrylic varnish, without water, in 87.5% solution state: 1 kg; CPC 35110: Paints and varnishes and related products; By-product classification allocatable product
  EcoSpold01Location=RER
  production volume 1.32237 kg
    This is a placeholder value that does not reflect real-world production volumes. This dataset does not currently require a real-world production volume to work in the database framework, and no actual data were collected yet. This has no negative effect on the results of the ecoinvent database. The placeholder value of this activity was scaled according to the nominal GDP of 2005 (source: United Nations, http://data.un.org/Glossary.aspx?q=GDP+%28current+US%24%29, accessed 20130726) to reflect an appropriate share of the global production volume, which is also a placeholder value.
  property price 3.71 EUR2005
    Calculated value based on data from United Nations Commodity Trade Statistics Database (comtrade.un.org). UN comtrade category: 320890 Polymer based paint, varnish in non-aqueous medium ne. Year 2005. Using exchange rate of 1EURO = 1.209 USD. Average of price of import into 5 main markets (EU, US, JP, IN and CN).
  property carbon content, fossil 0.674725
    Isobornyl acrylate (C13H20O2) has been used as a representative example of acrylic varnish (Turpentines, Ullmann).The formulation of this specific varnish includes 50% acrylic binder
  property heating value, net 20.44 MJ
    LHV is calculated based on the Carbon content of the product. More details can be found on the respective documentation.
  property carbon content 0.674725
    carbon content on a dry matter basis (reserved; not for manual entry)
  properties: water content 0, carbon content, non-fossil 0, wet mass 1 kg, water in wet mass 0 kg, dry mass 1 kg, carbon allocation 0.674725 kg

## Inputs from technosphere
- titanium dioxide: 0.2 kg; lognormal variance with pedigree 0.1001, pedigree (3,5,5,3,1)
  EcoSpold01Location=RER
  Data from survey in literature (von Däniken et al. 1995)
  Uncertainty: data from survey in literature (von Däniken et al. 1995)
  properties: wet mass 1 kg, dry mass 1 kg
- ammonia, anhydrous, liquid: 0.00125 kg; lognormal variance with pedigree 0.1001, pedigree (3,5,5,3,1)
  (same comment as for titanium dioxide)
  properties: wet mass 1 kg, dry mass 1 kg
- chemical factory, organics: 4e-10 unit; lognormal variance with pedigree 0.5981, pedigree (4,1,5,3,5)
  EcoSpold01Location=RER
  Estimation
  Uncertainty: estimation
- ethylene glycol: 0.05 kg; lognormal variance with pedigree 0.1001, pedigree (3,5,5,3,1)
  (same comment as for titanium dioxide)
  properties: carbon content, fossil 0.387097, dry mass 1 kg, wet mass 1 kg, heating value, net 23.44 MJ
- electricity, medium voltage: 0.3 kWh; lognormal variance with pedigree 0.1001, pedigree (3,5,5,3,1)
  Data from survey in literature (von Däniken et al. 1995)
  EcoSpold01Location=UCTE
  Uncertainty: data from survey in literature (von Däniken et al. 1995)
- acrylic binder, without water, in 34% solution state: 0.5 kg; lognormal variance with pedigree 0.1001, pedigree (3,5,5,3,1)
  Data from survey in literature (von Däniken et al. 1995)
  EcoSpold01Location=RER
  Uncertainty: data from survey in literature (von Däniken et al. 1995)
  properties: heating value, net 18.18 MJ, carbon content, fossil 0.599846, dry mass 1 kg, wet mass 1 kg
  note on carbon content, fossil: The acrylic acid ethyl ester (ethyl acrylate) is used for both solvent- and water-based paints, and in textiles as a binder in nonwoven fabrics and flocking (Acrylic acid and derivatives: uses, Ullmann). It was used as a representative example of acrylic binders. Its formula is C5H8O2

## Inputs from nature
- Water, unspecified natural origin [natural resource, in water]: 0.000235 m3; name water_UNO_input; lognormal variance with pedigree 0.1001, pedigree (3,5,5,3,1)
  Data from survey in literature (von Däniken et al. 1995)
  Uncertainty: data from survey in literature (von Däniken et al. 1995)

## Emissions to nature
- Water [air, unspecified]: 3.525e-5 m3; name water_to_air_unspecified; = (water_UNO_input*fraction_PW_to_air); lognormal variance with pedigree 0.0807, pedigree (2,2,5,1,1)
  Calculated value based on literature values and expert opinion. See comments in the parametres' comment field.
  property fraction, origin: salt water 0; name fraction_origin_salt_water
  property fraction, origin: unspecified 1; name fraction_origin_unspecified
  property fraction, origin: fresh water 0; name fraction_origin_fresh_water
- Water [water, unspecified]: 0.00019975 m3; name water_to_water_unspecified; = water_UNO_input*(1-fraction_PW_to_air); lognormal variance with pedigree 0.0807, pedigree (2,2,5,1,1)
  (same comment as for Water)
  property fraction, origin: fresh water 0; name fraction_origin_fresh_water_Ww
  property carbon content, fossil 0; name C_content_fossil
  property water in wet mass 1000 kg; name WWM
  property wet mass 1000 kg; name WM
  property dry mass 0 kg; name DM
  property carbon content, non-fossil 0; name C_content_non_fossil
  property fraction, origin: salt water 0; name fraction_origin_salt_water_Ww
  property fraction, origin: unspecified 1; name fraction_origin_unspecified_Ww

## Sampling procedure
see geography

## Extrapolations
This dataset has been extrapolated from year 1995 to the year of the calculation (2021). The uncertainty has been adjusted accordingly.

## Review by Heiko Kunst 2003-07-25
Passed.
