# esterification of soybean oil

Dataset: EcoSpold 2, unit process
Geography: US
Time period: 2009-01-01 to 2021-12-31
Technology level: current
Classification: EcoSpold01Categories: biomass/fuels
Classification: ISIC rev.4 ecoinvent: 1920:Manufacture of refined petroleum products
Synonyms: soybean biodiesel production; biodiesel production; methyl soyate production
Scenario: Business-as-Usual
System model: Allocation, cut-off by classification
Share of production covered: 37 %
Generated by: Anne Greig
Published in: Omni Tech International 2010
Database: ecoinvent
isCopyrightProtected: true
accessRestrictedTo: 1

## General comment
This dataset represents the production of soybean methyl ester, respectively glycerine, from crude soybean oil. Density = 0.88 kg/l

## Included activities start
From reception of raw materials at the factory gate through esterification of crude soybean oil.

## Included activities end
The dataset includes intermediate storage of the oil and products. System boundary is at the esterification plant.

## Geography
Data collected from National Biodiesel Board (NBB) North American members.

## Technology
Typical vegetable oil esterification plant designed for the production of methyl ester (for use in the vehicle fuels market).

## Time period
Data for 2009; current technology for biodiesel plants.

## Parameters
- fraction, tap water, to air: 0.15 dimensionless; name fraction_TW_to_air; = fraction_PW_to_air; lognormal variance with pedigree 0.092025, pedigree (4,4,3,2,4)
  Calculated value. See comment in the other parametres present in this dataset. Tap water is considered to be always used as process water, thus process water fractions to air are applied to all tap water input flows to calculate the amount of water consumed in the processes.
- fraction, process water, to air: 0.15 dimensionless; name fraction_PW_to_air; lognormal variance with pedigree 0.092025, pedigree (4,4,3,2,4)
  Literature value. In case when no industry/process specific data are available, default evaporation fraction value is used. This value is 15% and is based on literature (Statistics Canada, 2007 & Shaffer, K.H., 2008, Consumptive water use in the Great Lakes Basin, USGS & Shiklomanov, 2003, World Water Resources at the Beginning of the 21st Century) and has been approved by an expert.

## Reference product
- fatty acid methyl ester: 1 kg; name RP_amount_1; source Omni Tech International  2010; By-product classification allocatable product; CPC 35491: Biodiesel
  Soy biodiesel; produced from esterification of crude soybean oil. Note that The mass balance shows 93 grams more input than output (2.4%), which can be expected since the data were sampled separately.
  production volume 2.35e9 kg; name RP_PV_1
    700,000,000 U.S. gallons, 3.35 kg/gal. 2008 production volume. Source: National Biodiesel Board (NBB), the trade association representing the US biodiesel industry.
  property heating value, net 37.2 MJ
    Based on literature, report 17, page 439. Jungbluth, N., Chudacoff, M., Dauriat, A., Dinkel, F., Doka, G., Faist Emmenegger, M., Gnansounou, E., Kljun, N., Schleiss, K., Spielmann, M., Stettler, C., Sutter, J. 2007: Life Cycle Inventories of Bioenergy. ecoinvent report No. 17, Swiss Centre for Life Cycle Inventories, Dübendorf, CH.
  property price 0.817 EUR2005
    Temporary price data. Calculated as 90% of purchasers price based on: 2004 import and export prices (total trades (USD) divided by total weight (kg) in EU27, USA, China, Japan and India) from UN Commodity Trade Statistics Database (http://data.un.org/Explorer.aspxDatabase [Accessed 2 July 2010]). Commodity: 'Veg fats, oils or fractions hydrogenated, esterified'.
  property carbon content 0.773
    carbon content on a dry matter basis (reserved; not for manual entry)
  property true value 2.74267; name RP_amount_1_true_value
    allocation property applied in "true value" allocation // value calculated from revenue
  properties: wet mass 1 kg, carbon content, fossil 0.041, carbon content, non-fossil 0.732, water in wet mass 0 kg, dry mass 1 kg, water content 0, carbon allocation 0.773 kg

## By-products
- glycerine: 0 kg; source Omni Tech International  2010; CPC 34570: Glycerol; By-product classification allocatable product; CAS 56-81-5
  Measured value
  EcoSpold01Location=US
  production volume 2.81972e8 kg
    Calculated based on methyl ester production volume
  property price 0.792 EUR2005
    Temporary price data. Calculated as 90% of purchasers price based on: 2004 import and export prices (total trades (USD) divided by total weight (kg) in EU27, USA, China, Japan and India) from UN data - Glycerol (glycerine), nes including synthetic glycerol (http://data.un.org/Data.aspx?q=glycerine&d=ComTrade&f=_l1Code%3a16%3bcmdCode%3a152090; accessed 1 July 10)
  property heating value, net 22.38 MJ
    LHV is calculated based on the elemental composition of the substance. Based on the CAS number of the substance (000056-81-5), the chemical formula of the substance is found to be: C3H8O3, (PubChem 2020).
    Reference: Kim, S., Chen, J., Cheng, T., Gindulyte, A., He, J., He, S., Li, Q., Shoemaker, B. A., Thiessen, P. A., Yu, B., Zaslavsky, L., Zhang, J., & Bolton, E. E. (2019). PubChem 2019 update: improved access to chemical data. Nucleic acids research, 47(D1), D1102–D1109. https://doi.org/10.1093/nar/gky1033
  property carbon content 0.391304
    carbon content on a dry matter basis (reserved; not for manual entry)
  property true value 0.319018
    allocation property applied in "true value" allocation // value calculated from revenue
  properties: water in wet mass 0 kg, dry mass 1 kg, carbon content, fossil 0, wet mass 1 kg, water content 0, carbon content, non-fossil 0.391304, carbon allocation 0.391304 kg

## Inputs from technosphere
All rows: source Omni Tech International  2010
- sodium methoxide: 0.0207233 kg; lognormal variance with pedigree 0.0098, pedigree (2,3,4,1,1)
  Measured value
  properties: heating value, net 13.47 MJ, wet mass 1 kg, carbon content, fossil 0.222222, dry mass 1 kg
- heat, district or industrial, natural gas: 0.778124 MJ; lognormal variance with pedigree 0.0098, pedigree (2,3,4,1,1)
  Measured value
  properties: heating value, net 1 MJ
- sodium hydroxide, without water, in 50% solution state: 0.00087152 kg; lognormal variance with pedigree 0.0098, pedigree (2,3,4,1,1)
  Measured value.
  properties: wet mass 1 kg, heating value, net 3.03 MJ, dry mass 1 kg
- citric acid: 0.000653507 kg; lognormal variance with pedigree 0.0098, pedigree (2,3,4,1,1)
  Measured value
  properties: heating value, net 16.41 MJ, carbon content, fossil 0.375099, dry mass 1 kg, wet mass 1 kg
  note on carbon content, fossil: Calculated based on molecular structure. See tab "chemicals".
- wastewater, average: -4.30266e-5 m3; name BP_amount_1; = (0.0426*3.785/1000)*-1; lognormal variance with pedigree 0.0114, pedigree (3,2,4,3,2)
  Wastewater from process.
  production volume 112874 m3; = RP_PV_1 * (BP_amount_1 / RP_amount_1)
    Calculated from production volume of reference product using the relative outputs.
  property price 0 EUR2005; name BP_amount_1_price_EUR2005
  property carbon content, non-fossil 0.194039; name C_content_non_fossil
  property wet mass 1000 kg; name WM
  property water in wet mass 999.653 kg; name WWM
  property water content 2882.2; name water_content
  property dry mass 0.346837 kg; name DM
  property carbon content, fossil 0; name C_content_fossil
- soybean oil, crude: 0.886997 kg; lognormal variance with pedigree 0.0086, pedigree (1,3,4,1,1)
  main input
  properties: wet mass 1 kg, dry mass 1 kg, carbon content, non-fossil 0.768, heating value, net 38.4 MJ
  note on heating value, net: Values is approximated from HHV from "vegetable oil, crude". Source: Radovanovic,M.; Zivanovic,T.; Stojiljkovic,D.; Jovanovic,V.; Jerinic,N.; Knezevic,S. et.al. Utilization of sunflower husk as a fuel for industrial boilers - 20 years experience. Proc. 5th Eur. Conf. on Industrial Furnaces&Boilers 2000,vol.2,p.221-233. Available at: https://phyllis.nl/Biomass/View/2152
- tap water: 0.303137 kg; name tap_water_input; lognormal variance with pedigree 0.0098, pedigree (2,3,4,1,1)
  Measured value
  EcoSpold01Location=RER
  properties: dry mass 0.000337476 kg, carbon content, fossil 0.00178991, water content 2962.17, wet mass 1 kg
  note on carbon content, fossil: Bicarbonate content is 2.93 mol/m3. CO2 content is 0.1 mol/m3 (ecoinvent v2.2 report 8, Tab 93.1).
- electricity, medium voltage: 0.0320216 kWh; lognormal variance with pedigree 0.0098, pedigree (2,3,4,1,1)
  Measured value
- phosphoric acid, industrial grade, without water, in 85% solution state: 0.000568916 kg; lognormal variance with pedigree 0.0098, pedigree (2,3,4,1,1)
  EcoSpold01Location=RER
  Measured value
  properties: wet mass 1 kg, dry mass 1 kg
- hydrochloric acid, without water, in 30% solution state: 0.0389062 kg; lognormal variance with pedigree 0.0098, pedigree (2,3,4,1,1)
  Measured value
  EcoSpold01Location=RER
  properties: heating value, net 3.32 MJ, dry mass 1 kg, wet mass 1 kg
- methanol: 0.0815216 kg; lognormal variance with pedigree 0.0098, pedigree (2,3,4,1,1)
  Measured value
  EcoSpold01Location=GLO
  properties: heating value, net 26.49 MJ, dry mass 1 kg, wet mass 1 kg, carbon content, fossil 0.375

## Emissions to nature
- Water [air, non-urban air or from high stacks]: 0.000260111 m3; = (1.136-(0.0426*3.785)) / 1000; source Omni Tech International  2010; lognormal variance with pedigree 0.0192, pedigree (3,5,4,1,2)
  Calculated based on water into the system and water leaving as wastewater. This is the quanity evaporated.

## Sampling procedure
Primary data - from National Biodiesel Board (NBB) members. Data collected for a year's period.

## Review by Bo Weidema 2012-03-16
Passed. Documentation adequate, inputs relevant, mass balance correct
