# adhesive production, for metal

Dataset: EcoSpold 2, unit process
Geography: DE
Time period: 1996-01-01 to 2021-12-31
Technology level: current
Classification: ISIC rev.4 ecoinvent: 2029:Manufacture of other chemical products n.e.c.
Classification: EcoSpold01Categories: paintings/production
Tags: ConvertedDataset
Scenario: Business-as-Usual
System model: Allocation, cut-off by classification
Generated by: Martin Lehmann
Published in: Kellenberger D. 2007
Database: ecoinvent
isCopyrightProtected: true
accessRestrictedTo: 1

## General comment
Basic materials applied in the production are organic chemicals, liquid epoxy resin, hydrated lime and silica sand. This dataset does not include any energy consumption in the production phase. Road and rail transport are included.
[This dataset was already contained in the ecoinvent database version 2. It was not individually updated during the transfer to ecoinvent version 3. Life Cycle Impact Assessment results may still have changed, as they are affected by changes in the supply chain, i.e. in other datasets. This dataset was generated following the ecoinvent quality guidelines for version 2. It may have been subject to central changes described in the ecoinvent version 3 change report (http://www.ecoinvent.org/database/ecoinvent-version-3/reports-of-changes/), and the results of the central updates were reviewed extensively. The changes added e.g. consistent water flows and other information throughout the database. The documentation of this dataset can be found in the ecoinvent reports of version 2, which are still available via the ecoinvent website. The change report linked above covers all central changes that were made during the conversion process.]

## Included activities end
The dataset describes the production of a metal adhesive compound used e.g. in the aluminium window frame production.

## Geography
Data retrieved from a safety data sheet by a German producer. Applicable for Europe.

## Technology
Simple mass balance. No process energy included.

## Reference product
- adhesive, for metal: 1 kg; CPC 35499: Other chemical products n.e.c.; By-product classification allocatable product
  EcoSpold01Location=DE
  production volume 0.242058 kg
    This is a placeholder value that does not reflect real-world production volumes. This dataset does not currently require a real-world production volume to work in the database framework, and no actual data were collected yet. This has no negative effect on the results of the ecoinvent database. The placeholder value of this activity was scaled according to the nominal GDP of 2005 (source: United Nations, http://data.un.org/Glossary.aspx?q=GDP+%28current+US%24%29, accessed 20130726) to reflect an appropriate share of the global production volume, which is also a placeholder value.
  property heating value, net 8.68 MJ
    LHV is calculated based on the Carbon content of the product. More details can be found on the respective documentation.
  property price 5.377 EUR2005
    Calculated value based on data from United Nations Commodity Trade Statistics Database (comtrade.un.org). UN comtrade category: 350610 Glues and adhesives of all kinds, package <1kg. Year 2005. Using exchange rate of 1EURO = 1.209 USD. Average of price of import into 5 main markets (EU, US, JP, IN and CN).
  property carbon content, non-fossil 0
    C content was calculated as an addition of C content in the raw materials.
  property carbon content, fossil 0.286533
    C content was calculated as an addition of C content in the raw materials. Basic materials going into the production are organic chemicals, liquid epoxy resin, hydrated lime and silica sand (ecoinvent v2.2 report 7_part XXVI)
  property carbon content 0.286533
    carbon content on a dry matter basis (reserved; not for manual entry)
  properties: dry mass 1 kg, wet mass 1 kg, water content 0, water in wet mass 0 kg, carbon allocation 0.286533 kg

## Inputs from technosphere
- silica sand: 0.0685 kg; lognormal variance with pedigree 0.0527, pedigree (2,4,5,3,1)
  EcoSpold01Location=DE
  properties: dry mass 0.99 kg, water content 0.010101, wet mass 1 kg
- epoxy resin, liquid: 0.616 kg; lognormal variance with pedigree 0.052625, pedigree (2,4,5,2,1)
  EcoSpold01Location=RER
  properties: heating value, net 12.82 MJ, dry mass 1 kg, wet mass 1 kg, carbon content, fossil 0.42325
- lime, hydrated, packed: 0.274 kg; lognormal variance with pedigree 0.0527, pedigree (2,4,5,3,1)
  EcoSpold01Location=CH
  properties: wet mass 1 kg, water content 0.00300903, dry mass 0.997 kg
- chemical factory, organics: 4e-10 unit; lognormal variance with pedigree 0.3527, pedigree (2,4,5,3,1)
  EcoSpold01Location=RER
  activityLink introduced to establish a direct link to the corresponding regional supply of this product
- chemical, organic: 0.0411 kg; lognormal variance with pedigree 0.052625, pedigree (2,4,5,2,1)
  EcoSpold01Location=GLO
  properties: carbon content, fossil 0.628, wet mass 1 kg, dry mass 1 kg, heating value, net 19.03 MJ
  note on carbon content, fossil: This dataset is an unweighted average of 20 organic substances (listed in Tab 88.1, ecoinvent v2.2 report 8, part II), being part of the top100 chemicals included in this database. The C-content has also been calculated as an unweighted average of the C content of the substances composing this dataset.

## Sampling procedure
Company information

## Extrapolations
This dataset has been extrapolated from year 2003 to the year of the calculation (2021). The uncertainty has been adjusted accordingly.

## Review by Rolf Frischknecht 2007-11-07
passed
