# banana production

Dataset: EcoSpold 2, unit process
Geography: EC
Time period: 2009-01-01 to 2021-12-31
Technology level: current
Classification: ISIC rev.4 ecoinvent: 0122:Growing of tropical and subtropical fruits
Tags: WFLDB
Scenario: Business-as-Usual
System model: Allocation, cut-off by classification
Generated by: Marcial Vargas
Published in: Nemecek T. 2015
Database: ecoinvent
isCopyrightProtected: true
accessRestrictedTo: 1

## General comment
This dataset represents the production of 1 kg of banana, at standard water content (78.1%). The reference flow is the average yield per ha and year, from 2009 - 2012: yield (33 t/ha) obtained under irrigated conditions (total amount of water 9309 m3/ha). The data are representative for banana production in Ecuador used for the export market. Mineral NPK fertiliser input is 265-3-131 kg/ha. No organic fertilisers are applied. Total active ingredients (a.i.) applied as pesticides amount to 15.4 kg a.i./ha and 172.9 kg/ha of horticultural oil.
The dataset was modelled within the project 'World Food LCA database (WFLDB)'. The aim of this project was to provide inventories of a broad variety of agricultural products and processes and to cover for each product at least 50% of the global export market. The export share of bananas produced in Ecuador amounts to 29.5% of the global export (tonnage exported in 2010). The production system regarded in this dataset aimed at representing banana produced in Ecuador for the export market.
PEF-Quality: data quality rating (DQR) = 1.7 (i.e. very good quality). This dataset refers to an average situation; for specific situations exchanges might differ substantially due to site specific parameters

## Included activities start
This activity starts with the nursery producing fruit tree seedlings, i.e.grafted young trees to be planted.

## Included activities end
This activity ends with the waste treatment after the clearing of the orchard (rooting up the trees). The dataset includes all activities during a year in the productive phase of the orchard including the establishment phase per year of lifetime (20 years), the clearing of the orchard including waste treatment.
The establishment phase of the orchard includes tree nursery, soil cultivation, planting trees, sowing grass, installation of trellis system (posts and wires) and irrigation. Fertiliser and pesticide use in a year of the establishment phase is assumed to be half of the amount of a year in the productive phase.
The productive phase of the orchard includes machine operations, corresponding infrastructure, fuel use and sheds. Machine operations in the productive phase are: soil cultivation (mulching, mowing), fertiliser and pesticide application, harvesting and irrigation. Further, direct field emissions and land use change are included. At the end of the productive phase the orchard is cleared by rooting up the trees.
The inputs of seedlings, fertilisers and pesticides as well as packaging of fertilisers and pesticides are considered. The dataset doesn't include emissions from manure storage because these are within the system boundary of animal production. Heavy metal uptake by the crop is considered.

## Technology
Conventional production

## Parameters
- LUC_crop_specific: 1 dimensionless
  This parameter allows to switch between a 'crop specific' and a 'country specific' approach when calculating the LUC of a crop. By default, the chosen approach is 'crop specific', so the value of the parameter is 1. If you want to apply a 'country specific' approach, turn the parameter to 0.
- heavyMetalUptakeSwitch: 1 dimensionless

## Reference product
- banana: 1 kg; By-product classification allocatable product; CPC 01312: Bananas
  Banana, Ecuador production
  Yield = 32800.0 kg/ha
  production volume 7.5021e9 kg
    Source: FAOSTAT. Average, 2009-2012
  property price 0.467 EUR2005
    Calculated from the trade statistics for the year 2005 published by the UN (COMTRADE database, accessed 20151105) as an average of 5 biggest importers of banana in the world; USA, BG, DE, UK and JP. Comtrade cathegory: 803: Bananas, including plantains, fresh or dried.
  property carbon content 0.12029
    carbon content on a dry matter basis (reserved; not for manual entry)
  properties: water in wet mass 0.735 kg, dry mass 0.265 kg, wet mass 1 kg, water content 2.77358, carbon content, non-fossil 0.12029, carbon content, fossil 0, carbon allocation 0.0318768 kg

## Inputs from technosphere
- inorganic potassium fertiliser, as K2O: 0.000424878 kg; source Iriarte, A. 2014; lognormal variance with pedigree 0.124177, pedigree (2,1,4,1,1)
  Calculated based on literature values or expert estimation: The total amount of nutrient (Iriarte et al. 2014) multiplied by the country-share of fertiliser type (IFA 2014). See supporting documentation 'WFLDB-Documentation.pdf' chapter 'Fertiliser application' for L3 and L4 data (https://ecoquery.ecoinvent.org/File/Reports).
  properties: dry mass 1 kg, wet mass 1 kg
- ammonium sulfate: 0.000239393 kg; source Iriarte, A. 2014; lognormal variance with pedigree 0.124177, pedigree (2,1,4,1,1)
  Calculated based on literature values or expert estimation: The total amount of nutrient (Iriarte et al. 2014) multiplied by the share of fertiliser type (Iriarte et al. 2014). See supporting documentation 'WFLDB-Documentation.pdf' chapter 'Fertiliser application' for L3 and L4 data (https://ecoquery.ecoinvent.org/File/Reports).
  Corresponds to 7.85 kg/ha
  properties: wet mass 1 kg, dry mass 1 kg
- packaging, for pesticides: 4.87805e-6 kg; lognormal variance with pedigree 0.0592, pedigree (4,3,4,5,4)
  Total amount of active substance/s of pesticides needed for the production of banana is calculated to be circa 2.44E-06 kg. Pesticide/s used in this dataset is/are: 'chemical, organic'. The total amount of active substance/s is doubled in order to account for the packaging of the dilluted product of pesticide/s that is/are applied. Therefore, 4.88E-06 kg of packaging for pesticides is justified with this exchange.
  properties: dry mass 1 kg, wet mass 1 kg, heating value, net 25.97 MJ, price 0.0642 EUR2005, carbon content, fossil 0.85714
- potassium sulfate: 8.98304e-5 kg; source Iriarte, A. 2014; lognormal variance with pedigree 0.124177, pedigree (2,1,4,1,1)
  The exchange has been updated from 'potassium sulfate, as K2O' into 'potassium sulfate' and therefore its amount has been scaled (multiplied) from 0 kg by 1.85 kg of 'potassium sulfate' per kg of 'potassium sulfate, as K2O'. Original comment of the exchange is: Calculated based on literature values or expert estimation: The total amount of nutrient (Iriarte et al. 2014) multiplied by the country-share of fertiliser type (IFA 2014). See supporting documentation 'WFLDB-Documentation.pdf' chapter 'Fertiliser application' for L3 and L4 data (https://ecoquery.ecoinvent.org/File/Reports).
  Corresponds to 1.59 kg/ha
  properties: wet mass 1 kg, dry mass 1 kg
- establishing orchard: 0.000200399 unit; lognormal variance with pedigree 0.124177, pedigree (2,1,4,1,1)
  Proxy: Similar crop and country used. This is the number of trees per ha divided by the lifetime years of the orchard.
- diesel, burned in agricultural machinery: 0.1485 MJ; source Iriarte, A. 2014; lognormal variance with pedigree 0.124177, pedigree (2,1,4,1,1)
  Literature value or expert estimation (Iriarte et al. 2014).
- ammonia, anhydrous, liquid: 0.000294317 kg; source Iriarte, A. 2014; lognormal variance with pedigree 0.124177, pedigree (2,1,4,1,1)
  Calculated based on literature values or expert estimation: The total amount of nutrient (Iriarte et al. 2014) multiplied by the share of fertiliser type (Iriarte et al. 2014). See supporting documentation 'WFLDB-Documentation.pdf' chapter 'Fertiliser application' for L3 and L4 data (https://ecoquery.ecoinvent.org/File/Reports).
  Corresponds to 9.65 kg/ha
  properties: wet mass 1 kg, dry mass 1 kg
- irrigation: 0.283816 m3; lognormal variance with pedigree 0.124177, pedigree (2,1,4,1,1)
  Calculated value: The total amount of water used for irrigation (calculated from evapotranspiration, Pfister et al. 2011) multiplied by the country-share of irrigation technique (WFLDB-Guidelines.pdf, Appendix 6.1). See supporting documentation 'WFLDB-Documentation.pdf' chapter 'Water use for irrigation' for L2 data (https://ecoquery.ecoinvent.org/File/Reports).
  properties: wet mass 1000 kg, dry mass 0.11 kg, water content 9089.91
- electricity, low voltage: 0.0003 kWh; lognormal variance with pedigree 0.124177, pedigree (2,1,4,1,1)
  Literature value or expert estimation ().
- fruit tree seedling, for planting: 0.000200399 unit; lognormal variance with pedigree 0.124177, pedigree (2,1,4,1,1)
  (same comment as for establishing orchard)
  properties: wet mass 1 kg, carbon content, non-fossil 0.439481, water content 0.73, dry mass 0.578035 kg
  note on carbon content, non-fossil: calculation: C-content of components according to ecoinvent report No. 15a. Source of composition: https://ndb.nal.usda.gov/ndb/search/. Unspecific seedling used as proxy.
- ammonium nitrate: 0.0129224 kg; source Iriarte, A. 2014; lognormal variance with pedigree 0.124177, pedigree (2,1,4,1,1)
  The exchange has been updated from 'ammonium nitrate, as N' into 'ammonium nitrate' and therefore its amount has been scaled (multiplied) from 0.0045 kg by 2.8573 kg of 'ammonium nitrate' per kg of 'ammonium nitrate, as N'. Original comment of the exchange is: Calculated based on literature values or expert estimation: The total amount of nutrient (Iriarte et al. 2014) multiplied by the share of fertiliser type (Iriarte et al. 2014). See supporting documentation 'WFLDB-Documentation.pdf' chapter 'Fertiliser application' for L3 and L4 data (https://ecoquery.ecoinvent.org/File/Reports).
  Corresponds to 148.0 kg/ha
  properties: wet mass 1 kg, dry mass 1 kg
- inorganic nitrogen fertiliser, as N: 0.00143287 kg; source Iriarte, A. 2014; lognormal variance with pedigree 0.124177, pedigree (2,1,4,1,1)
  Calculated based on literature values or expert estimation: The total amount of nutrient (Iriarte et al. 2014) multiplied by the share of fertiliser type (Iriarte et al. 2014). See supporting documentation 'WFLDB-Documentation.pdf' chapter 'Fertiliser application' for L3 and L4 data (https://ecoquery.ecoinvent.org/File/Reports).
  Corresponds to 7.95 kg/ha
  properties: dry mass 1 kg, wet mass 1 kg
- naphtha: 0.00573922 kg; source Iriarte, A. 2014; lognormal variance with pedigree 0.0138498, pedigree (2,2,4,1,1)
  Literature value or expert estimation (Iriarte et al. 2014).
  properties: carbon content, fossil 0.919743, wet mass 1 kg, dry mass 1 kg, heating value, net 45 MJ
- planting tree: 0.000200399 unit; lognormal variance with pedigree 0.124177, pedigree (2,1,4,1,1)
  (same comment as for establishing orchard)
- inorganic phosphorus fertiliser, as P2O5: 9.9593e-5 kg; source Iriarte, A. 2014; lognormal variance with pedigree 0.124177, pedigree (2,1,4,1,1)
  Calculated based on literature values or expert estimation: The total amount of nutrient (Iriarte et al. 2014) multiplied by the country-share of fertiliser type (IFA 2014). See supporting documentation 'WFLDB-Documentation.pdf' chapter 'Fertiliser application' for L3 and L4 data (https://ecoquery.ecoinvent.org/File/Reports).
  Corresponds to 0.378 kg/ha
  properties: dry mass 1 kg, wet mass 1 kg
- packaging film, low density polyethylene: 0.00232927 kg; source Iriarte, A. 2014; lognormal variance with pedigree 0.124177, pedigree (2,1,4,1,1)
  LLDPE film used for protecting the banana clusters. Literature value or expert estimation (Iriarte et al. 2014).
  properties: carbon content, fossil 0.857143, heating value, net 42.47 MJ, wet mass 1 kg, dry mass 1 kg
- urea: 0.00352021 kg; source Iriarte, A. 2014; lognormal variance with pedigree 0.124177, pedigree (2,1,4,1,1)
  The exchange has been updated from 'urea, as N' into 'urea' and therefore its amount has been scaled (multiplied) from 0.0016 kg by 2.1438 kg of 'urea' per kg of 'urea, as N'. Original comment of the exchange is: Calculated based on literature values or expert estimation: The total amount of nutrient (Iriarte et al. 2014) multiplied by the share of fertiliser type (Iriarte et al. 2014). See supporting documentation 'WFLDB-Documentation.pdf' chapter 'Fertiliser application' for L3 and L4 data (https://ecoquery.ecoinvent.org/File/Reports).
  properties: wet mass 1 kg, carbon content, fossil 0.2, dry mass 1 kg
- waste wood, untreated: -0.0406402 kg; lognormal variance with pedigree 0.124177, pedigree (2,1,4,1,1)
  Wood from trees after 1-2 years of sorrage at the field (20% water) per lifetime year (20 years) of the orchard
  production volume 3.04887e8 kg
    Calculated from the reference product amount and production volume
  properties: dry mass 0.8 kg, heating value, net 13.99 MJ, wet mass 1 kg, water content 0.25, carbon content, non-fossil 0.48632
  note on heating value, net: Value taken from the general comment of the treatment dataset.
- chemical, organic: 2.43902e-6 kg; source Iriarte, A. 2014; lognormal variance with pedigree 0.124177, pedigree (2,1,4,1,1)
  Literature value or expert estimation (Iriarte et al. 2014).
  properties: wet mass 1 kg, dry mass 1 kg, carbon content, fossil 0.628, heating value, net 19.03 MJ
- potassium chloride: 0.00558213 kg; source Iriarte, A. 2014; lognormal variance with pedigree 0.124177, pedigree (2,1,4,1,1)
  The exchange has been updated from 'potassium chloride, as K2O' into 'potassium chloride' and therefore its amount has been scaled (multiplied) from 0.0035 kg by 1.5829 kg of 'potassium chloride' per kg of 'potassium chloride, as K2O'. Original comment of the exchange is: Calculated based on literature values or expert estimation: The total amount of nutrient (Iriarte et al. 2014) multiplied by the country-share of fertiliser type (IFA 2014). See supporting documentation 'WFLDB-Documentation.pdf' chapter 'Fertiliser application' for L3 and L4 data (https://ecoquery.ecoinvent.org/File/Reports).
  Corresponds to 116.0 kg/ha
  properties: dry mass 1 kg, wet mass 1 kg
- packaging, for fertilisers: 0.0244615 kg; lognormal variance with pedigree 0.0592, pedigree (4,3,4,5,4)
  Total amount of active substance/s of fertilisers needed for the production of 'banana' is calculated to be circa 1.22E-02 kg. Fertiliser/s used in this dataset is/are: 'ammonia, liquid', 'ammonium nitrate, as N', 'ammonium sulfate, as N', 'nitrogen fertiliser, as N', 'phosphate fertiliser, as P2O5', 'potassium chloride, as K2O', 'potassium fertiliser, as K2O', 'potassium sulfate, as K2O', 'urea, as N'. The total amount of active substance/s is doubled in order to account for the packaging of the dilluted product of fertiliser/s that is/are applied. Therefore, 2.45E-02 kg of packaging for fertilisers is justified with this exchange.
  properties: dry mass 1 kg, price 0.0642 EUR2005, wet mass 1 kg, carbon content, fossil 0.825301, heating value, net 25.01 MJ
  note on carbon content, fossil: Considering a chemical formula (C2H4)n for polyethylene, carbon content-fossil is calculated to be 0.856286 kg of Carbon per kg of dry mass.

## Inputs from nature
- Carbon dioxide, in air [natural resource, in air]: 0.344878 kg; lognormal variance with pedigree 0.0138498, pedigree (2,2,4,1,1)
  CO2 uptake by biomass
- Energy, gross calorific value, in biomass [natural resource, biotic]: 3.73628 MJ; lognormal variance with pedigree 0.0138498, pedigree (2,2,4,1,1)
- Transformation, from permanent crop, irrigated [natural resource, land]: 0.0152439 m2; lognormal variance with pedigree 0.0442144, pedigree (2,1,4,1,1)
  10000 m2 divided by the life time of the perennial crop (20 years).
- Transformation, to permanent crop, irrigated [natural resource, land]: 0.0152439 m2; lognormal variance with pedigree 0.0442144, pedigree (2,1,4,1,1)
  10000 m2 divided by the life time of the perennial crop (20 years).
- Occupation, permanent crop, irrigated [natural resource, land]: 0.305701 m2*year; lognormal variance with pedigree 0.0200616, pedigree (2,1,4,1,1)
  Related to the duration from harvest date of previous crop to harvest date of main crop.

## Emissions to nature
- Cadmium, ion [water, ground-]: 1.03046e-9 kg; source Freiermuth R.  2006; lognormal variance with pedigree 0.356938, pedigree (2,2,4,1,1)
  Calculated value - Freiermuth (2006). See 'WFLDB-Guidelines.pdf', available at https://ecoquery.ecoinvent.org/File/Reports.
- Cadmium [soil, agricultural]: 1.26225e-8 kg; = 3.48597560976e-08 + ( - 2.223726e-08)*heavyMetalUptakeSwitch; source Freiermuth R.  2006
  Comment on mathematicalRelation:
  -2.223726e-08 from Crop, default, heavy metals uptake model
  Heavy metal uptake can be excluded by setting the parameter heavyMetalUptakeSwitch to zero.
- Zinc [soil, agricultural]: -6.57548e-6 kg; = 4.3756097561e-07 + ( - 7.013037e-06)*heavyMetalUptakeSwitch; source Freiermuth R.  2006
  Comment on mathematicalRelation:
  4.3756097561e-07 from Calculated value - Freiermuth (2006). See 'WFLDB-Guidelines.pdf', available at https://ecoquery.ecoinvent.org/File/Reports.
  -7.013037e-06 from Crop, default, heavy metals uptake model
  Heavy metal uptake can be excluded by setting the parameter heavyMetalUptakeSwitch to zero.
- Mercury [water, ground-]: 1.17884e-10 kg; source Freiermuth R.  2006; lognormal variance with pedigree 0.356938, pedigree (2,2,4,1,1)
  (same comment as for Cadmium, ion)
- Mineral oil [soil, agricultural]: 0.00573922 kg; lognormal variance with pedigree 0.0447216, pedigree (2,2,4,1,1)
  Calculated value - 100% emission in soil. See 'WFLDB-Guidelines.pdf', available at https://ecoquery.ecoinvent.org/File/Reports.
- Chromium, ion [water, ground-]: 5.44055e-7 kg; source Freiermuth R.  2006; lognormal variance with pedigree 0.356938, pedigree (2,2,4,1,1)
  (same comment as for Cadmium, ion)
- Carbon dioxide, fossil [air, non-urban air or from high stacks]: 0.00278076 kg; lognormal variance with pedigree 0.0138498, pedigree (2,2,4,1,1)
  Calculated value - CO2 emissions from urea and lime. See 'WFLDB-Guidelines.pdf', available at https://ecoquery.ecoinvent.org/File/Reports.
- Lead [water, ground-]: 3.15396e-9 kg; source Freiermuth R.  2006; lognormal variance with pedigree 0.356938, pedigree (2,2,4,1,1)
  (same comment as for Cadmium, ion)
- Ammonia [air, non-urban air or from high stacks]: 0.000685884 kg; source EEA 2013; lognormal variance with pedigree 0.0447216, pedigree (2,2,4,1,1)
  Calculated value - EMEP/EEA (2013). See 'WFLDB-Guidelines.pdf', available at https://ecoquery.ecoinvent.org/File/Reports.
- Copper, ion [water, ground-]: 8.89085e-8 kg; source Freiermuth R.  2006; lognormal variance with pedigree 0.356938, pedigree (2,2,4,1,1)
  (same comment as for Cadmium, ion)
- Nitrogen oxides [air, non-urban air or from high stacks]: 0.000318567 kg; source EEA 2013; lognormal variance with pedigree 0.124664, pedigree (2,2,4,1,1)
  Calculated value - EEA/EMEP (2013). See 'WFLDB-Guidelines.pdf', available at https://ecoquery.ecoinvent.org/File/Reports.
- Dinitrogen monoxide [air, non-urban air or from high stacks]: 0.00019868 kg; source IPCC 2006; lognormal variance with pedigree 0.124664, pedigree (2,2,4,1,1)
  Calculated value - IPCC (2006). See 'WFLDB-Guidelines.pdf', available at https://ecoquery.ecoinvent.org/File/Reports.
- Water [air, non-urban air or from high stacks]: 0.131662 m3; lognormal variance with pedigree 0.124177, pedigree (2,1,4,1,1)
  Calculated value - Emission calculated from water balance. See 'WFLDB-Guidelines.pdf', available at https://ecoquery.ecoinvent.org/File/Reports.
- Zinc, ion [water, ground-]: 4.30457e-7 kg; source Freiermuth R.  2006; lognormal variance with pedigree 0.356938, pedigree (2,2,4,1,1)
  (same comment as for Cadmium, ion)
- Water [water, ground-]: 0.0304308 m3; lognormal variance with pedigree 0.124177, pedigree (2,1,4,1,1)
  (same comment as for Water)
- Phosphate [water, surface water]: 2.36128e-5 kg; source Prasuhn V.  2006; lognormal variance with pedigree 0.175866, pedigree (2,2,4,1,1)
  Calculated value - Prasuhn (2006). See 'WFLDB-Guidelines.pdf', available at https://ecoquery.ecoinvent.org/File/Reports.
- Water [water, surface water]: 0.121723 m3; lognormal variance with pedigree 0.124177, pedigree (2,1,4,1,1)
  (same comment as for Water)
- Phosphorus [water, surface water]: 2.63628e-5 kg; source Prasuhn V.  2006; lognormal variance with pedigree 0.175866, pedigree (2,2,4,1,1)
  Calculated value - Prasuhn (2006) and SQCB-Erosion. See 'WFLDB-Guidelines.pdf', available at https://ecoquery.ecoinvent.org/File/Reports.
- Nitrate [water, ground-]: 0.021772 kg; source Faist Emmenegger M. 2009; lognormal variance with pedigree 0.175866, pedigree (2,2,4,1,1)
- Phosphate [water, ground-]: 5.62104e-6 kg; source Prasuhn V.  2006; lognormal variance with pedigree 0.175866, pedigree (2,2,4,1,1)
  (same comment as for Phosphate)
- Nickel [soil, agricultural]: -5.48066e-7 kg; = -3.19298780488e-07 + ( - 2.287674e-07)*heavyMetalUptakeSwitch; source Freiermuth R.  2006
  Comment on mathematicalRelation:
  -2.287674e-07 from Crop, default, heavy metals uptake model
  Heavy metal uptake can be excluded by setting the parameter heavyMetalUptakeSwitch to zero.
- Cadmium, ion [water, surface water]: 8.16341e-9 kg; source Freiermuth R.  2006; lognormal variance with pedigree 0.356938, pedigree (2,2,4,1,1)
  (same comment as for Cadmium, ion)
- Nickel, ion [water, ground-]: 3.40396e-11 kg; source Freiermuth R.  2006; lognormal variance with pedigree 0.356938, pedigree (2,2,4,1,1)
  (same comment as for Cadmium, ion)
- Chromium, ion [water, surface water]: 8.94665e-7 kg; source Freiermuth R.  2006; lognormal variance with pedigree 0.356938, pedigree (2,2,4,1,1)
  (same comment as for Cadmium, ion)
- Copper, ion [water, surface water]: 1.23256e-6 kg; source Freiermuth R.  2006; lognormal variance with pedigree 0.356938, pedigree (2,2,4,1,1)
  (same comment as for Cadmium, ion)
- Lead [water, surface water]: 1.68948e-7 kg; source Freiermuth R.  2006; lognormal variance with pedigree 0.356938, pedigree (2,2,4,1,1)
  (same comment as for Cadmium, ion)
- Mercury [water, surface water]: 2.11052e-9 kg; source Freiermuth R.  2006; lognormal variance with pedigree 0.356938, pedigree (2,2,4,1,1)
  (same comment as for Cadmium, ion)
- Nickel, ion [water, surface water]: 6.51677e-7 kg; source Freiermuth R.  2006; lognormal variance with pedigree 0.356938, pedigree (2,2,4,1,1)
  (same comment as for Cadmium, ion)
- Chromium [soil, agricultural]: -9.76398e-7 kg; = -8.57042682927e-07 + ( - 1.19355e-07)*heavyMetalUptakeSwitch; source Freiermuth R.  2006
  Comment on mathematicalRelation:
  -8.57042682927e-07 from Calculated value - Freiermuth (2006). See 'WFLDB-Guidelines.pdf', available at https://ecoquery.ecoinvent.org/File/Reports.
  -1.19355e-07 from Crop, default, heavy metals uptake model
  Heavy metal uptake can be excluded by setting the parameter heavyMetalUptakeSwitch to zero.
- Copper [soil, agricultural]: -2.48501e-6 kg; = -1.0337195122e-06 + ( - 1.4512911e-06)*heavyMetalUptakeSwitch; source Freiermuth R.  2006
  Comment on mathematicalRelation:
  -1.0337195122e-06 from Calculated value - Freiermuth (2006). See 'WFLDB-Guidelines.pdf', available at https://ecoquery.ecoinvent.org/File/Reports.
  -1.4512911e-06 from Crop, default, heavy metals uptake model
  Heavy metal uptake can be excluded by setting the parameter heavyMetalUptakeSwitch to zero.
- Zinc, ion [water, surface water]: 1.17875e-6 kg; source Freiermuth R.  2006; lognormal variance with pedigree 0.356938, pedigree (2,2,4,1,1)
  (same comment as for Cadmium, ion)
- Lead [soil, agricultural]: -1.72206e-7 kg; = -5.37774390244e-08 + ( - 1.1842863e-07)*heavyMetalUptakeSwitch; source Freiermuth R.  2006
  Comment on mathematicalRelation:
  -5.37774390244e-08 from Calculated value - Freiermuth (2006). See 'WFLDB-Guidelines.pdf', available at https://ecoquery.ecoinvent.org/File/Reports.
  -1.1842863e-07 from Crop, default, heavy metals uptake model
  Heavy metal uptake can be excluded by setting the parameter heavyMetalUptakeSwitch to zero.
- Mercury [soil, agricultural]: -7.55247e-9 kg; = 1.32929878049e-09 + ( - 8.881764e-09)*heavyMetalUptakeSwitch; source Freiermuth R.  2006
  Comment on mathematicalRelation:
  1.32929878049e-09 from Calculated value - Freiermuth (2006). See 'WFLDB-Guidelines.pdf', available at https://ecoquery.ecoinvent.org/File/Reports.
  -8.881764e-09 from Crop, default, heavy metals uptake model
  Heavy metal uptake can be excluded by setting the parameter heavyMetalUptakeSwitch to zero.

## Sampling procedure
WFLDB Methodological Guidelines for the Life Cycle Inventory of Agricultural Products in the latest version, available at: https://ecoquery.ecoinvent.org/File/Reports. Data sources: Data were categorised from level 0 (L0) to level (L4) as follows: L0 = estimate, proxy; L1 = statistical data (e.g. FAOSTAT); L2 = L1 adapted to crop and country; L3 = literature data or L1 resp. L2 data approved by experts; medium detailing (i.e. kg of total N-fertiliser); L4 = L3 data of high detailing (i.e. portion N-fertiliser types).In this dataset data were obtained for yield: L3; Fertilisers: L4; Pesticides: L1; Machinery: L0; Irrigation: L2. For information regarding the calculation of individual exchanges see supporting documentation WFLDB-Documentation.pdf

## Extrapolations
This dataset has been extrapolated from year 2012 to the year of the calculation (2021). The uncertainty has been adjusted accordingly.

## Review by Assumpció ANTON 2016-05-30
Be aware that the use of statistics in input calculations could provide some specific inputs not common for specific crops, this should be corrected if better information is available and better reflexed in DQR . Currently, I would dissent for some of good marks provided, being a revision of criteria applied advisable.

Pesticides will need to be amended periodically checking for update of pesticides' ban.
