# benzene chlorination

Dataset: EcoSpold 2, unit process
Geography: RER
Time period: 1986-01-01 to 2021-12-31
Technology level: current
Classification: ISIC rev.4 ecoinvent: 2011:Manufacture of basic chemicals
Classification: EcoSpold01Categories: chemicals/organics
Tags: ConvertedDataset; combined production
Scenario: Business-as-Usual
System model: Allocation, cut-off by classification
Generated by: Jürgen Sutter
Published in: Sutter, J. 2007
Database: ecoinvent
isCopyrightProtected: true
accessRestrictedTo: 1

## General comment
Benzene chlorination is the most important process to produce monochlorobenzene. Most monochlorobenzene is now produced in continuously operated plants. Depending on the ratio of benzene to chlorine chosen, one can achieve either a low rate of benzene conversion and little dichlorobenzene formation, or almost complete conversion of the benzene with a higher degree of dichlorobenzene formation. Which of the two alternatives is favoured depends on a profitability calculation in which the distillation costs occassioned by the dichlorobenzenes need to be taken into account.

## Included activities start
From the reception of benzene and chlorine at the factory gate.

## Included activities end
The activity ends by the fractional distillation of the products and their availability for subsequent storage or transport. Operation under stable conditions is assumed. Transient and unstable operations like start-up and close-down are not included. Storage and transport of the final product are also not included.

## Technology
Clorobenzenes are prepared by reaction of liquid benzene with gaseous chlorine in the presence of a catalyst at moderate temperature and atmospheric pressure. Hydrogen chloride is formed as a by-product. Generally, mixtures of isomers and compounds with varying degrees of chlorination are obtained, because any given chlorobenzene can be further chlorinated up to the stage of hexa-chlorobenzene. Because of the directing influence exerted by chlorine, the unfavoured products 1,3-dichlorobenzene, 1,3,5-trichlorobenzene and 1,2,3,5-tetrachlorobenzene are formed to only a small extent if at all. The velocity of chlorination for an individual chlorine compound depends on the compound's structure and, because of this, both the degree of chlorination and also the isomer ratio change continuously during the course of reaction. Sets of data on the composition of products from different reactions are only comparable if they refer to identical reaction conditions and materials having the same degree of chlorination. By altering the reaction conditions and changing the catalyst, one can vary the ratios of different chlorinated products within certain limits. Lewis acids (FeCl3, AlCl3, SbCl3, MnCl2, MoCl2, SnCl4, TiCl4) are used as principal catalysts. The usual catalyst employed in large scale production is ferric chloride, with or without the addition of sulfur compounds.
The ratio of resulting chlorobenzenes to one another is also influenced by the benzene:chlorine ratio. For this reason, the highest selectivity is achieved in batch processes. If the same monochlorobenzene:dichlorobenzene ratio expected from a batch reactor is to result from continuous operation in a single-stage reactor, then a far lower degree of benzene conversion must be accepted as a consequence of the low benzene:chlorine ratio).
The reaction is highly exothermic:
C6H6 + Cl2 --> C6H5Cl + HCl ; delta H = -131.5 kJ/mol
Unwanted heat of reaction can be dissipated either by circulating some of the reactor fluid through an external heat exchanger or by permitting evaporative cooling to occur at the boiling temperature. Circulation cooling has the advantage of enabling the reaction temperature to be varied in accordance with the requirements of a given situation. Evaporative cooling is more economical, however.
Fractional distillation separates the products. Iron catalyst is removed with the distillation residue.Unreacted benzene is recycled to the reactor.

## Time period
Time of publications.

## Reference product
- hydrochloric acid, without water, in 30% solution state: 1 kg; name HCL_out; = 36.46*(mono/112.6+2*(para+ortho)/147); By-product classification allocatable product; CPC 34: Basic chemicals; CAS 7647-01-0; pedigree (1,1,1,1,1)
  The exact concentration of the solution state was not available. 30% solution state is assumed as the most common state of hydrochloric acid.
  production volume 5.13711e6 kg; name HCl_PV; = Ref('a06ee093-dc8a-41f2-9c65-c219ea38b783', 'ProductionVolume') * (ABS(Ref('df17f056-49db-4321-8fb0-3d621551c758')) / ABS(Ref('a06ee093-dc8a-41f2-9c65-c219ea38b783'))
    Stoichiometric relationship
  property price 0.127 EUR2005
    Temporary price data. Calculated as 90% of purchasers price based on: 2004 Import/Export data (total trades (USD) divided by total weight (kg) in EU27, USA, China, Japan and India) from UN Commodity Trade Statistics Database (http://data.un.org/Explorer.aspxDatabase [Accessed 2 July 2010]). Commodity: Hydrogen chloride (hydrochloric acid).
  property heating value, net 3.32 MJ
    LHV is calculated based on the elemental composition of the substance. Based on the CAS number of the substance (007647-01-0), the chemical formula of the substance is found to be: HCl, (PubChem 2020).
    Reference: Kim, S., Chen, J., Cheng, T., Gindulyte, A., He, J., He, S., Li, Q., Shoemaker, B. A., Thiessen, P. A., Yu, B., Zaslavsky, L., Zhang, J., & Bolton, E. E. (2019). PubChem 2019 update: improved access to chemical data. Nucleic acids research, 47(D1), D1102–D1109. https://doi.org/10.1093/nar/gky1033
  property carbon content 0
    carbon content on a dry matter basis (reserved; not for manual entry)
  property true value 0.0432858; name HCL_out_true_value
    allocation property applied in "true value" allocation // value calculated from revenue
  properties: water content 0, dry mass 1 kg, carbon content, fossil 0, carbon content, non-fossil 0, wet mass 1 kg, water in wet mass 0 kg, carbon allocation 0 kg
- monochlorobenzene: 0 kg; name mono; By-product classification allocatable product; CPC 34110: Hydrocarbons and their halogenated, sulphonated, nitrated or nitrosated derivatives; CAS 108-90-7
  EcoSpold01Location=RER
  production volume 1.37892e7 kg; name mono_PV
    Most recent data are from 1998: 152 mio lb. Data source: Kent and Riegel's handbook of industrial chemistry and biotechnology, Vol 1. Page 397. 20% of this assumed to be produced in Europe (According to Eurochlor (http://www.eurochlor.org/monochlorobenzene Accessed 10 Septmber 2010) Europe produced 20% of the monochlorobenzene in the world in 1993.)
  property price 0.726 EUR2005
    Temporary price data. Calculated as 90% of purchasers price based on: 2004 import and export prices (total trades (USD) divided by total weight (kg) in EU27, USA, China, Japan and India) from UN Commodity Trade Statistics Database (http://data.un.org/Explorer.aspxDatabase [Accessed 2 July 2010]). Commodity: 'Chlorobenzene, o-dichlorobenzene and p-dichlorobenzen'
  property heating value, net 24.78 MJ
    LHV is calculated based on the elemental composition of the substance. Based on the CAS number of the substance (000108-90-7), the chemical formula of the substance is found to be: C6H5Cl, (PubChem 2020).
    Reference: Kim, S., Chen, J., Cheng, T., Gindulyte, A., He, J., He, S., Li, Q., Shoemaker, B. A., Thiessen, P. A., Yu, B., Zaslavsky, L., Zhang, J., & Bolton, E. E. (2019). PubChem 2019 update: improved access to chemical data. Nucleic acids research, 47(D1), D1102–D1109. https://doi.org/10.1093/nar/gky1033
  property carbon content 0.642857
    carbon content on a dry matter basis (reserved; not for manual entry)
  property true value 0.764188; name mono_true_value
    allocation property applied in "true value" allocation // value calculated from revenue
  properties: carbon content, non-fossil 0, dry mass 1 kg, wet mass 1 kg, water content 0, water in wet mass 0 kg, carbon content, fossil 0.642857, carbon allocation 0.642857 kg
- o-dichlorobenzene: 0 kg; name ortho; By-product classification allocatable product; CPC 34310: Synthetic organic colouring matter and preparations based thereon; synthetic organic products of a kind used a[…]; CAS 95-50-1
  EcoSpold01Location=RER
  production volume 0 kg; name ortho_PV
    20% of global production volume
  property price 0.726 EUR2005
    (same comment as for monochlorobenzene)
  property heating value, net 18.15 MJ
    LHV is calculated based on the elemental composition of the substance. Based on the CAS number of the substance (000095-50-1), the chemical formula of the substance is found to be: C6H4Cl2, (PubChem 2020).
    Reference: Kim, S., Chen, J., Cheng, T., Gindulyte, A., He, J., He, S., Li, Q., Shoemaker, B. A., Thiessen, P. A., Yu, B., Zaslavsky, L., Zhang, J., & Bolton, E. E. (2019). PubChem 2019 update: improved access to chemical data. Nucleic acids research, 47(D1), D1102–D1109. https://doi.org/10.1093/nar/gky1033
  property carbon content 0.493151
    carbon content on a dry matter basis (reserved; not for manual entry)
  properties: wet mass 1 kg, carbon content, fossil 0.493151, dry mass 1 kg, water in wet mass 0 kg, water content 0, carbon content, non-fossil 0, carbon allocation 0.493151 kg
- p-dichlorobenzene: 0 kg; name para; By-product classification allocatable product; CPC 34110: Hydrocarbons and their halogenated, sulphonated, nitrated or nitrosated derivatives; CAS 106-46-7
  EcoSpold01Location=RER
  production volume 0 kg; name para_PV
    20% of global production volume
  property price 0.726 EUR2005
    (same comment as for monochlorobenzene)
  property heating value, net 18.15 MJ
    LHV is calculated based on the elemental composition of the substance. Based on the CAS number of the substance (000106-46-7), the chemical formula of the substance is found to be: C6H4Cl2, (PubChem 2020).
    Reference: Kim, S., Chen, J., Cheng, T., Gindulyte, A., He, J., He, S., Li, Q., Shoemaker, B. A., Thiessen, P. A., Yu, B., Zaslavsky, L., Zhang, J., & Bolton, E. E. (2019). PubChem 2019 update: improved access to chemical data. Nucleic acids research, 47(D1), D1102–D1109. https://doi.org/10.1093/nar/gky1033
  property carbon content 0.493151
    carbon content on a dry matter basis (reserved; not for manual entry)
  properties: carbon content, non-fossil 0, dry mass 1 kg, wet mass 1 kg, water in wet mass 0 kg, water content 0, carbon content, fossil 0.493151, carbon allocation 0.493151 kg

## Inputs from technosphere
- chlorine, liquid: 0.1215 kg; name chlorine_input; = 2*35.45*(mono/112.6/0.905+2*(para+ortho)/147/0.95); lognormal variance with pedigree 0.0401, pedigree (1,2,5,1,1)
  Overcash 1998 - 2004. Assumed efficiency of chlorine conversion for dichlorobenzenes: 95%. Resulting chlorine conversion efficiency for monochlorobenzene calculated to 90.5%.
  EcoSpold01Location=RER
  Uncertainty: Overcash 1998 - 2004
  properties: wet mass 1 kg, dry mass 1 kg
- benzene: 0.141394 kg; name benzene_input; = 78.1*(mono/112.6+(para+ortho)/147)/0.785; lognormal variance with pedigree 0.0401, pedigree (1,2,5,1,1)
  EcoSpold01Location=RER
  Overcash 1998 - 2004. Calculated efficiency of benzene use: 78.5%
  Uncertainty: Overcash 1998 - 2004
  properties: heating value, net 42.5 MJ, wet mass 1 kg, dry mass 1 kg, carbon content, fossil 0.923077
- water, deionised: 0 kg; pedigree (1,1,1,1,1)
  Overcash 1998 - 2004.
  EcoSpold01Location=CH
  Uncertainty: Overcash 1998 - 2004
  properties: wet mass 1 kg
- heat, district or industrial, natural gas: 0.13585 MJ; = benzene_input*0.96079; lognormal variance with pedigree 0.0401, pedigree (1,2,5,1,1)
  Uncertainty: Overcash 1998 - 2004
  properties: heating value, net 1 MJ
- heat, district or industrial, other than natural gas: 0.0758251 MJ; = benzene_input*0.53627; lognormal variance with pedigree 0.0401, pedigree (1,2,5,1,1)
  Uncertainty: Overcash 1998 - 2004
  properties: heating value, net 1 MJ
- electricity, medium voltage: 0.00855671 kWh; = benzene_input*0.060517; lognormal variance with pedigree 0.0401, pedigree (1,2,5,1,1)
  Overcash 1998 - 2004.
  EcoSpold01Location=UCTE
  Uncertainty: Overcash 1998 - 2004
- chemical factory, organics: 8.85124e-11 unit; = benzene_input*6.26E-10; lognormal variance with pedigree 0.448, pedigree (4,5,5,5,5)
  Estimation
  EcoSpold01Location=RER
  Uncertainty: Estimation
- sodium hydroxide, without water, in 50% solution state: 0.0334877 kg; = benzene_input*0.23684; lognormal variance with pedigree 0.0401, pedigree (1,2,5,1,1)
  EcoSpold01Location=RER
  Overcash 1998 - 2004.
  Uncertainty: Overcash 1998 - 2004
  properties: heating value, net 3.03 MJ, dry mass 1 kg, wet mass 1 kg
- water, deionised: 0.134169, 0.000482975 kg (2 entries); lognormal variance with pedigree 0.0401, pedigree (1,2,5,1,1)
  Overcash 1998 - 2004.
  EcoSpold01Location=CH
  Uncertainty: Overcash 1998 - 2004

## Inputs from nature
- Water, cooling, unspecified natural origin [natural resource, in water]: 0.00406549 m3; = benzene_input*0.028753; lognormal variance with pedigree 0.0401, pedigree (1,2,5,1,1)
  Overcash 1998 - 2004.
  Uncertainty: Overcash 1998 - 2004

## Emissions to nature
- BOD5, Biological Oxygen Demand [water, surface water]: 0.00151059 kg; = COD*0.02; lognormal variance with pedigree 0.0801, pedigree (1,2,5,1,1)
  Calculated from the water emissions
  Uncertainty: Calculated from the water emissions
- Benzene [water, surface water]: 0.0155816 kg; name benzene_to_water; = benzene_input*0.1102; lognormal variance with pedigree 0.3401, pedigree (1,2,5,1,1)
  Overcash 1998 - 2004.
  Uncertainty: Overcash 1998 - 2004
- AOX, Adsorbable Organic Halogen as Cl [water, surface water]: 0.00495176 kg; = chlorobenzene_to_water*0.31+dichlorobenzene_to_water*0.48
  Calculated from the water emissions
  property wet mass 1 kg; name WM
  property dry mass 1 kg; name DM
  property water content 0; name water_content
  property carbon content, fossil 0.224356; name C_content_fossil
  property water in wet mass 0 kg; name WWM
  property carbon content, non-fossil 0.224356; name C_content_non_fossil
- o-Dichlorobenzene [water, surface water]: 0.0010046 kg; name dichlorobenzene_to_water; = (ortho+para)*0.0477; lognormal variance with pedigree 0.0401, pedigree (1,2,5,1,1)
  Overcash 1998 - 2004. Assumed to relate to dichlorobenzenes only.
  Uncertainty: Overcash 1998 - 2004
- Benzene, chloro- [water, surface water]: 0.0144179 kg; name chlorobenzene_to_water; = benzene_input*0.10197; lognormal variance with pedigree 0.0401, pedigree (1,2,5,1,1)
  Overcash 1998 - 2004.
  Uncertainty: Overcash 1998 - 2004
- COD, Chemical Oxygen Demand [water, surface water]: 0.0755293 kg; name COD; = benzene_to_water*2.9+chlorobenzene_to_water*2+dichlorobenzene_to_water*1.5; lognormal variance with pedigree 0.0801, pedigree (1,2,5,1,1)
  Calculated from the water emissions
  Uncertainty: Calculated from the water emissions
- Benzene [air, urban air close to ground]: 0.00395351 kg; = benzene_input*0.027961; lognormal variance with pedigree 0.0801, pedigree (1,2,5,1,1)
  Overcash 1998 - 2004.
  Uncertainty: Overcash 1998 - 2004
- Chloride [water, surface water]: 0.00303749 kg; = chlorine_input*0.025; lognormal variance with pedigree 0.3401, pedigree (1,2,5,1,1)
  Overcash 1998 - 2004. Calculated as 2.5% of chlorine input
  Uncertainty: Overcash 1998 - 2004
- DOC, Dissolved Organic Carbon [water, surface water]: 0.0240548 kg; = benzene_to_water*0.92+chlorobenzene_to_water*0.64+dichlorobenzene_to_water*0.49; lognormal variance with pedigree 0.0801, pedigree (1,2,5,1,1)
  DOC assumed to be equal to TOC
  Uncertainty: Calculated from the water emissions
- Sodium, ion [water, surface water]: 0.00192111 kg; = benzene_input*0.013587; lognormal variance with pedigree 0.6901, pedigree (1,2,5,1,1)
  Overcash 1998 - 2004.
  Uncertainty: Overcash 1998 - 2004
- TOC, Total Organic Carbon [water, surface water]: 0.0240548 kg; = benzene_to_water*0.92+chlorobenzene_to_water*0.64+dichlorobenzene_to_water*0.49; lognormal variance with pedigree 0.0801, pedigree (1,2,5,1,1)
  Calculated from the water emissions
  Uncertainty: Calculated from the water emissions

## Sampling procedure
Data from a database on US industry production for the years 1998-2004 (Overcash 1998-2004).

## Extrapolations
Extrapolated from US production conditions.

## Review by Bo Weidema 2012-02-17
name change of an intermediate exchange

## Review by Roland Hischier 2009-01-28
passed.
none
