# alkyd resin production, long oil, product in 70% white spirit solution state

Dataset: EcoSpold 2, unit process
Geography: RER
Time period: 1995-01-01 to 2021-12-31
Technology level: current
Classification: ISIC rev.4 ecoinvent: 2022:Manufacture of paints, varnishes and similar coatings, printing ink and mas
Classification: EcoSpold01Categories: paintings/production
Tags: ConvertedDataset
Scenario: Business-as-Usual
System model: Allocation, cut-off by classification
Generated by: Hans-Jörg Althaus
Published in: Althaus H.-J. 2007
Database: ecoinvent
isCopyrightProtected: true
accessRestrictedTo: 1

## General comment
Alkyds are a large and diverse family of polyesters. Long oil alkyds are often used in architectural paints. This dataset stands for one specific long oil alkyd and should not be used for other alkyds if its contribution to the overall result is im-portant. The data quality is not sufficient to allow for e.g. a comparative assess-ment of different binders of paints.
[This dataset was already contained in the ecoinvent database version 2. It was not individually updated during the transfer to ecoinvent version 3. Life Cycle Impact Assessment results may still have changed, as they are affected by changes in the supply chain, i.e. in other datasets. This dataset was generated following the ecoinvent quality guidelines for version 2. It may have been subject to central changes described in the ecoinvent version 3 change report (http://www.ecoinvent.org/database/ecoinvent-version-3/reports-of-changes/), and the results of the central updates were reviewed extensively. The changes added e.g. consistent water flows and other information throughout the database. The documentation of this dataset can be found in the ecoinvent reports of version 2, which are still available via the ecoinvent website. The change report linked above covers all central changes that were made during the conversion process.]
[NEW TEXT for v3] The dataset represents solution. The solvent is NOT part of the dataset ... but needs to be added in order to have a full balance.

## Included activities end
Transport of raw materials and production of resin. Packaging is neglected.

## Technology
The dataset models the commonly used solvent process. It assumes the use of soybean oil as fatty acid, phthalic anhydride as polybasic acid and Pentaeritol as polyol.

## Reference product
- alkyd resin, long oil, without solvent, in 70% white spirit solution state: 1 kg; CPC 35110: Paints and varnishes and related products; By-product classification allocatable product
  EcoSpold01Location=RER
  production volume 1.32237 kg
    This is a placeholder value that does not reflect real-world production volumes. This dataset does not currently require a real-world production volume to work in the database framework, and no actual data were collected yet. This has no negative effect on the results of the ecoinvent database. The placeholder value of this activity was scaled according to the nominal GDP of 2005 (source: United Nations, http://data.un.org/Glossary.aspx?q=GDP+%28current+US%24%29, accessed 20130726) to reflect an appropriate share of the global production volume, which is also a placeholder value.
  property heating value, net 20.65 MJ
    LHV is calculated based on the Carbon content of the product. More details can be found on the respective documentation.
  property price 3.37 EUR2005
    From UN trade database. http://data.un.org/ Import data from the largest economies of the world are used (Brazil, India, USA, China, Japan and EU-27). Commodities: 'Acrylic or vinyl polymer paint or varnish, non-aqueou', 'Polyester based paints, varnishes, non-aqueous medium' and 'Polymer based paint, varnish in non-aqueous medium ne'.
  property carbon content, non-fossil 0.412906
    C content was calculated as an addition of C content in the raw materials.
  property carbon content, fossil 0.268755
    C content was calculated as an addition of C content in the raw materials.
  property carbon content 0.681662
    carbon content on a dry matter basis (reserved; not for manual entry)
  properties: water in wet mass 0 kg, dry mass 1 kg, water content 0, wet mass 1 kg, carbon allocation 0.681662 kg

## Inputs from technosphere
- heat, district or industrial, other than natural gas: 1.88345 MJ; lognormal variance with pedigree 0.0621, pedigree (3,4,5,3,3)
  properties: heating value, net 1 MJ
- chemical factory, organics: 4e-10 unit; lognormal variance with pedigree 0.69, pedigree (5,5,5,5,5)
  EcoSpold01Location=RER
  activityLink introduced to establish a direct link to the corresponding regional supply of this product
- phthalic anhydride: 0.268 kg; lognormal variance with pedigree 0.114025, pedigree (4,5,5,2,3)
  EcoSpold01Location=RER
  properties: carbon content, fossil 0.648649, wet mass 1 kg, heating value, net 22.93 MJ, dry mass 1 kg
- electricity, medium voltage: 0.0572752 kWh; lognormal variance with pedigree 0.0621, pedigree (3,4,5,3,3)
  EcoSpold01Location=UCTE
- heat, district or industrial, natural gas: 3.3744 MJ; lognormal variance with pedigree 0.0621, pedigree (3,4,5,3,3)
  properties: heating value, net 1 MJ
- pentaerythritol: 0.227 kg; lognormal variance with pedigree 0.114025, pedigree (4,5,5,2,3)
  EcoSpold01Location=RER
  properties: heating value, net 24.05 MJ, dry mass 1 kg, carbon content, fossil 0.441176, wet mass 1 kg
- xylene: 0.045 kg; lognormal variance with pedigree 0.114025, pedigree (4,5,5,2,3)
  EcoSpold01Location=RER
  properties: dry mass 1 kg, heating value, net 38.84 MJ, wet mass 1 kg, carbon content, fossil 0.905061
- soybean oil, crude: 0.631 kg; lognormal variance with pedigree 0.114025, pedigree (4,5,5,2,3)
  EcoSpold01Location=RER
  properties: heating value, net 38.4 MJ, wet mass 1 kg, carbon content, non-fossil 0.768, dry mass 1 kg
  note on heating value, net: Values is approximated from HHV from "vegetable oil, crude". Source: Radovanovic,M.; Zivanovic,T.; Stojiljkovic,D.; Jovanovic,V.; Jerinic,N.; Knezevic,S. et.al. Utilization of sunflower husk as a fuel for industrial boilers - 20 years experience. Proc. 5th Eur. Conf. on Industrial Furnaces&Boilers 2000,vol.2,p.221-233. Available at: https://phyllis.nl/Biomass/View/2152

## Sampling procedure
A "typical" alkyd is chosen and its raw material consumption is calculated. Energy data are taken from the one source that is known.

## Extrapolations
This dataset has been extrapolated from year 2001 to the year of the calculation (2021). The uncertainty has been adjusted accordingly.

## Review by Heiko Kunst 2003-06-27
Passed.
