# concrete production, 30MPa, ready-mix, exposure classes XC3/XD2/XF1/XA1

Dataset: EcoSpold 2, unit process
Geography: RoW
Time period: 2015-10-25 to 2021-10-25
Technology level: current
Classification: ISIC rev.4 ecoinvent: 2395:Manufacture of articles of concrete, cement and plaster
Classification: EcoSpold01Categories: construction materials/concrete
Synonyms: ready mixed concrete; ready-mix concrete
Tags: combined production
Scenario: Business-as-Usual
System model: Allocation, cut-off by classification
Share of production covered: 18.36 %
Generated by: Marcella Ruschi Mendes Saade
Database: ecoinvent
isCopyrightProtected: true
accessRestrictedTo: 1

## General comment
This dataset represents the production of ready-mix concrete in Austria, with 30MPa compressive strength at 28 days, exposure classes XC3/XD2/XF1/XA1, also abbreviated as B2 according to Austrian standards. Ingredients for 1m3 of fresh concrete are: Cement 282 kg, Water 171 kg, Sand 874 kg, Gravel 1041 kg, chemical admixtures 1.81 kg, supplementary cementitious materials (SCM) 52 kg. The SCM content refers to AHWZ = aufbereitete hydraulisch wirksame Zusatzstoffe: which are processed hydraulic additions for concrete production, consisting of specially processed fly-ash with slag and limestone powder, according to Austrian standard ÖNORM B 3309. 30 MPa concrete is intended for building structures in general, exposed to freeze-thaw, including residential, commercial and industrial uses. Concrete types B are abbreviations used in Austrian practice to refer to a set of exposure conditions. B2, specifically, refers to exposure classes XC3, XD2, XF1 and XA1. According to the european standard EN 206-1, XC exposure classes refer to the risk of "corrosion induced by carbonation", XD to "corrosion induced by chlorides other than from sea water", XF to "freeze/thaw attack with or without de-icing agents" and XA to "chemical attack" (see Table 1 excerpt below). The XC3 class represents, more specifically, a concrete in an environment with moderate humidity, such as concrete inside buildings with moderate or high air humidity, or external concrete sheltered from rain. The XD2 class represents a concrete exposed to a wet or rarely dry environment, such as concrete in swimming pools or exposed to industrial waters containing chlorides.The XF1 class represents concretes exposed to a moderate water saturation, without de-icing agent; such as vertical concrete surfaces exposed to rain and freezing. Last, XA1 represents concrete exposed to a slightly aggressive chemical environment. For more information on the exposure classes we advise the user to refer to the European standard EN 2016-1. The concrete mix documented here is an average of seven concrete manufacturers which, together, represent approximately 90% of ready-mix concrete production in Austria. Exchange properties are declared for the fresh concrete. Concrete dry mass considers the amount of water that reacts with cement to form hydrates. As a consequence, this dataset is not water balanced according to ecoinvent guidelines. The waste generated in production has been accounted for, and the amount of additional inputs was proportionately split up between concrete ingredients, except for inputs of auxiliary materials, such as lubricating oil and rubber. The annual production volume and proportion per strength class data was provided by the Austrian Association for ready mix concrete manufacturers for the year 2018. Distribution by ready-mix exposure classes in Austria is: XC1-19.7%; XC2-23.6%; B1-10.3%; B2-21.5%. Other exposure classes represent, together, 24.9% and we're not modelled here due to their inexpressive individual consumption.
This dataset is a copy of the corresponding regional dataset.

## Included activities start
From reception of raw materials at the ready-mix plant gate.

## Included activities end
This activity ends before the delivery of concrete at the construction site.
The dataset includes the whole manufacturing processes to produce ready-mixed concrete, internal processes (material handling and mixing) and infrastructure.

## Geography
Austrian data. For some exchanges GLO values have been used as proxy. Data quality indicators adjusted accordingly. This dataset is a copy of the corresponding regional dataset.

## Technology
Typical technology for average ready mix concrete production in Austria

## Time period
Mix designs provided referred to 2015, while annual production volumes refer to 2018.

## Parameters
- losses: 0.015 dimensionless; lognormal variance with pedigree 0, pedigree (1,1,1,1,1)
  Measured value. Loss percentage documented by manufacturer with highest production volume

## Reference product
- concrete, 30MPa: 1 m3; name concrete; By-product classification allocatable product
  30 MPa concrete is intended for building structures in general, including residential, commercial and industrial uses.
  production volume 1.24711e7 m3; name PV
    The global production volume was calculated as follows: 1) The total production volume of each country was calculated 2) The production volume was scaled based construction output (*) 3) The average of the results was assumed to be the GLO PV 4) The share of each different technology per country was calculated 5) The weighted average of the shares for each country was used to split the GLO PV into different technologies (*) Construction output assumed per country Country Share ZA 0.50% BR 2.01% CH 0.36% CO 0.58% IN 9.67% PE 0.31% CA-QC 0.37% RNA without CA-QC 9.03% AT 0.40% Source: OECD. 2018. Input-Output Tables. http://www.oecd.org/trade/input-outputtables.htm. United Nations Statistics Division. 2019. UN data. A world of information. http://data.un.org/. Timmer, M.P., E. Dietzenbacher, B. Los, R. Stehrer, and G.J. de Vries. 2015. An Illustrated User Guide to the World Input-Output Database: the Case of Global Automotive Production. Review of International Economics 23(3): 575-605. http://doi.wiley.com/10.1111/roie.12178. The data was adjusted based on PPP, data from: The World Bank. 2019. World Bank Open Data. https://data.worldbank.org/
  property price 185 EUR2005; name concrete_price_EUR2005
    Calculated value based on data from United Nations Commodity Trade Statistics Database (comtrade.un.org). UN comtrade category: 681019 Tiles & flagstones of cement, concrete, artificial ston. Year 2005. Using exchange rate of 1EURO = 1.209 USD. Average of price of import into 5 main markets (EU, US, JP, IN and CN).
  property cement content 282.156 kg; name cement
  property gravel content 1041.16 kg; name gravel
  property wet mass 2421.66 kg; name concrete_density
  property sand content 873.64 kg; name sand
  properties: water content 0.0457753, water in wet mass 106 kg, dry mass 2315.66 kg
- hard coal ash: 0 kg; name flyash; By-product classification Waste; CPC 39: Wastes or scraps
  Approximation, calculated value. Weighted average of values informed by manufacturers. Hard coal ash used as a proxy for supplementary cementitious material "fly ash", which composes the material "Aufbereiteter Hydraulisch Wirksamer Zusatzstoff" (AHWZ), a combination of fly ash, ground granulated blast furnace slag and limestone filler used in concrete manufacturing. Variance of lognormal distribution is 0.1866
  production volume 0 kg
    Calculated from production volume of reference product using relative outputs
  property price 0 EUR2005; name flyash_price_EUR2005
    Waste products are assigned a price of zero as they are assumed to require further treatment.
  property carbon content 0
    carbon content on a dry matter basis (reserved; not for manual entry)
  properties: water in wet mass 0 kg, carbon content, non-fossil 0, wet mass 1 kg, carbon content, fossil 0, water content 0, dry mass 1 kg, carbon allocation 0 kg

## Inputs from technosphere
- cement, unspecified: 0 kg; pedigree (1,1,1,1,1)
  Calculated value. Weighted average of values informed by manufacturers. Losses considered.
  Uncertainty: Variance of logtransformed data calculated based on the sample's coefficient of variation.
  properties: wet mass 1 kg, dry mass 1 kg
- tap water: 0 kg; pedigree (1,1,1,1,1)
  Calculated value. Weighted average of values informed by manufacturers. Losses considered
  EcoSpold01Location=CH
  Uncertainty: Variance of logtransformed data calculated based on the sample's coefficient of variation.
  properties: wet mass 1 kg
- synthetic rubber: 0.07381 kg; name rub; = 0.07381*concrete; lognormal variance with pedigree 0.0053, pedigree (2,2,3,5,1)
  EcoSpold01Location=RER
  Calculated value. Average value from company with largest production volume
  Uncertainty: Value for variance extrapolated from table 10.3 of ecoinvent data quality guidelines
  properties: wet mass 1 kg, dry mass 1 kg, heating value, net 26.42 MJ
- scrap steel: 0 kg; pedigree (1,1,1,1,1)
  Estimation. Based on corresponding input.
  Uncertainty: Value for variance extrapolated from table 10.3 of ecoinvent data quality guidelines
  production volume 0 kg
    Calculated from production volume of reference product using the relative outputs.
  properties: wet mass 1 kg, dry mass 1 kg
- waste mineral oil: 0 kg; pedigree (1,1,1,1,1)
  (same comment as for scrap steel)
  production volume 0 kg
    Calculated from production volume of reference product using the relative outputs.
  properties: dry mass 0.9 kg, carbon content, fossil 0.864444, wet mass 1 kg, water content 0.111111, heating value, net 34.7 MJ
  note on carbon content, fossil: Tab A.6, ecoinvent v2.2 report 13_I. C content has been calculated after data in the tables, and then referred to 1 kg DM
  note on heating value, net: Value taken from the general comment of the treatment dataset.
- gravel, crushed: 0 kg; pedigree (1,1,1,1,1)
  Calculated value. Weighted average of values informed by manufacturers. Calculated based on gravel content (see properties) and losses (see parameters).
  Uncertainty: Variance of logtransformed data calculated based on the sample's coefficient of variation.
  properties: wet mass 1 kg, dry mass 1 kg
- limestone, crushed, for mill: 0 kg; pedigree (1,1,1,1,1)
  Calculated value. Weighted average of values informed by manufacturers. Limestone is a component of the material "Aufbereiteter Hydraulisch Wirksamer Zusatzstoff" (AHWZ), a combination of fly ash, ground granulated blast furnace slag and limestone filler used in concrete manufacturing. Losses considered.
  Uncertainty: Variance of logtransformed data calculated based on the sample's coefficient of variation.
  properties: carbon content, fossil 0.117492, wet mass 1 kg, water content 0.00200401, dry mass 0.998 kg
- chemical, organic: 1.83793 kg; = 1.83793451177*concrete; lognormal variance with pedigree 0.0638957, pedigree (1,1,3,5,1)
  (same comment as for cement, unspecified)
  properties: dry mass 1 kg, bulk density 1140 kg/m3, heating value, net 19.03 MJ, wet mass 1 kg
- waste concrete: 0 kg; name was_concrete; pedigree (1,1,1,1,1)
  Calculated value. Average value from company with largest production volume. Value calculated based on concrete density (see properties) and losses (see parameters).
  Uncertainty: Value for variance extrapolated from table 10.3 of ecoinvent data quality guidelines
  production volume 0 kg
    Calculated from production volume of reference product using the relative outputs.
  property price 0 EUR2005; name was_concrete_price_EUR2005
  properties: dry mass 0.9461 kg, water content 0.0569707, wet mass 1 kg
- concrete mixing factory: 4.57e-7 unit; = 0.000000457*concrete; source Kellenberger D. 2007; lognormal variance with pedigree 0.3326, pedigree (2,5,3,5,1)
  EcoSpold01Location=CH
  Literature value. From ecoinvent dataset "concrete production, 25 MPa, RNA only, GLO, 2006-2006" Access date 10.10.2017
  Uncertainty: Basic uncertainty from original dataset, completeness and geographical score adjusted.
- lubricating oil: 0.03143 kg; name lub_oil; = 0.03143*concrete; lognormal variance with pedigree 0.0053, pedigree (2,2,3,5,1)
  Calculated value. Average value from company with largest production volume
  EcoSpold01Location=RER
  Uncertainty: Value for variance extrapolated from table 10.3 of ecoinvent data quality guidelines
  properties: wet mass 1 kg, dry mass 1 kg, heating value, net 40.2 MJ
  note on heating value, net: Literature value, Source: IPCC 2006, 2006 IPCC Guidelines for National Greenhouse Gas Inventories, Prepared by the National Greenhouse Gas Inventories Programme, Eggleston H.S., Buendia L., Miwa K., Ngara T. and Tanabe K. (eds). Published: IGES, Japan
- steel, low-alloyed, hot rolled: 0.0585 kg; name steel; = 0.0585*concrete; lognormal variance with pedigree 0.0053, pedigree (2,2,3,5,1)
  (same comment as for synthetic rubber)
  properties: wet mass 1 kg, dry mass 1 kg
- waste rubber, unspecified: 0 kg; pedigree (1,1,1,1,1)
  (same comment as for scrap steel)
  production volume 0 kg
    Calculated from production volume of reference product using the relative outputs.
  properties: heating value, net 27.19 MJ, carbon content, fossil 0.853, wet mass 1 kg, dry mass 1 kg
- diesel, burned in building machine: 22.7 MJ; = 22.7*concrete; lognormal variance with pedigree 0.0053, pedigree (2,2,3,5,1)
  Calculated value. Average value from company with largest production volume
  Uncertainty: Value for variance extrapolated from table 10.3 of ecoinvent data quality guidelines
  property density 0.84 kg/l; name density_diesel
  properties: heating value, net 1 MJ
- sand: 0 kg; pedigree (1,1,1,1,1)
  Calculated value. Weighted average of values informed by manufacturers. Calculated based on sand content (see properties) and losses (see parameters).
  Uncertainty: Variance of logtransformed data calculated based on the sample's coefficient of variation.
  properties: dry mass 1 kg, wet mass 1 kg
- electricity, medium voltage: 0 kWh; pedigree (1,1,1,1,1)
  EcoSpold01Location=CH
  Calculated value. Average value from company with largest production volume
  Uncertainty: Value for variance extrapolated from table 10.3 of ecoinvent data quality guidelines
- ground granulated blast furnace slag: 0 kg; name GGBFS; pedigree (1,1,1,1,1)
  Calculated value. Weighted average of values informed by manufacturers. Ground granulated blast furnace slag is a component of the material "Aufbereiteter Hydraulisch Wirksamer Zusatzstoff" (AHWZ), a combination of fly ash, ground granulated blast furnace slag and limestone filler used in concrete manufacturing. Losses considered.
  Uncertainty: Variance of logtransformed data calculated based on the sample's coefficient of variation.
  property water content 0; name GGBFS_water_content
  property carbon content, non-fossil 0; name GGBFS_C_content_non_fossil
  property carbon content, fossil 0; name GGBFS_C_content_fossil
  property dry mass 1 kg; name GGBFS_DM
  property wet mass 1 kg; name GGBFS_WM
  property water in wet mass 0 kg; name GGBFS_WWM
  note on carbon content, fossil: Industry value; Arcelor Mittal, chemical composition of blast furnace slag (http://www.cst.com.br/english/products/co_products/catalog_products/blast_slag/blast_slag.asp, accessed: 20121003).
- wastewater from concrete production: -0.0016 m3; = (0.0016*concrete)*-1; lognormal variance with pedigree 0.0035, pedigree (2,2,2,5,1)
  (same comment as for scrap steel)
  production volume 19953.8 m3; = process_water*PV/concrete
    Calculated from production volume of reference product using the relative outputs.
  properties: water content 2225.48, wet mass 1000 kg, carbon content, fossil 0.027074, dry mass 0.449139 kg
- cement, unspecified: 10.0273, 0.734432, 0.831212, 2.09337, 47.3423, 1.39342, 15.3039, 1.8516, 206.811 kg (9 entries); lognormal variance with pedigree 0.00844056, pedigree (1,1,3,5,1)
  (same comment as for cement, unspecified)
- tap water: 2.69627, 0.324559, 0.241214, 0.536387, 13.5256, 0.351864, 1.00087, 154.78 kg (8 entries); lognormal variance with pedigree 0.00521021, pedigree (1,2,3,5,1)
  (same comment as for tap water)
- scrap steel: -2.38561e-5, -0.0584761 kg (2 entries); lognormal variance with pedigree 0.0053, pedigree (2,2,3,5,1)
  (same comment as for scrap steel)
  production volume 729560 kg
- waste mineral oil: -0.000294382, -0.0311356 kg (2 entries); lognormal variance with pedigree 0.0053, pedigree (2,2,3,5,1)
  (same comment as for scrap steel)
  production volume 391967 kg
- gravel, crushed: 186.198, 17.0464, 1.12544, 852.408 kg (4 entries); lognormal variance with pedigree 0.00891936, pedigree (1,2,3,5,1)
  (same comment as for gravel, crushed)
- limestone, crushed, for mill: 3.59459, 1.68348 kg (2 entries); lognormal variance with pedigree 0.19058, pedigree (1,1,3,5,1)
  (same comment as for limestone, crushed, for mill)
- waste concrete: -0.00941893, -36.3155 kg (2 entries); lognormal variance with pedigree 0.0033, pedigree (2,2,3,1,1)
  (same comment as for waste concrete)
  production volume 4.53012e8 kg
- waste rubber, unspecified: -0.0029737, -0.0708363 kg (2 entries); lognormal variance with pedigree 0.0053, pedigree (2,2,3,5,1)
  (same comment as for scrap steel)
  production volume 920493 kg
- sand: 871.781, 10.438, 4.52588 kg (3 entries); lognormal variance with pedigree 0.017661, pedigree (1,2,3,5,1)
  (same comment as for sand)
- electricity, medium voltage: 0.00107795, 0.0284963, 0.00170854, 0.0102895, 0.00448368, 0.00412644, 0.00751374, 0.00744351, 0.0612566, 0.00413851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 kWh (46 entries); lognormal variance with pedigree 0.004, pedigree (2,3,2,5,1)
  (same comment as for electricity, medium voltage)
- ground granulated blast furnace slag: 18.3715, 4.44284, 0.936947 kg (3 entries); lognormal variance with pedigree 0.19058, pedigree (1,1,3,5,1)
  (same comment as for ground granulated blast furnace slag)
  properties: dry mass 1 kg, wet mass 1 kg

## Inputs from nature
- Water, cooling, unspecified natural origin [natural resource, in water]: 0.0016 m3; name process_water; = 0.0016*concrete; lognormal variance with pedigree 0.0053, pedigree (2,2,3,5,1)
  Calculated value. Average value from company with largest production volume. Water used for cooling or cleaning purposes.
  Uncertainty: Value for variance extrapolated from table 10.3 of ecoinvent data quality guidelines

## Sampling procedure
Data on concrete mixes are a weighted average of seven concrete manufacturers in Austria. For other auxiliary flows, data was taken from the largest concrete manufacturer in Austria. Basic uncertainty was calculated from the coefficient of variation of the sample. No conversion to the geometric mean of the lognormal distribution was done, for consistency reasons with other ecoinvent datasets.
Representativeness is of 18.36% based on the annual production volumes of B2 concrete provided by the seven concrete manufacturers against the annual production volume of B2 concrete for the country provided by the Austrian association of ready-mix concrete manufacturers

## Extrapolations
Auxiliary process flows (steel, lubricating oil, rubber, etc) for the largest manufacturer were used to represent total concrete production in the country. The infrastructure-related flow "concrete mixing factory" has been kept as in the dataset "concrete production, 25 MPa, RNA only, GLO, 2006-2006". In both cases uncertainties were adjusted accordingly. This dataset is a copy of the corresponding regional dataset. Uncertainty was adjusted accordingly.
