# municipal waste incineration facility construction

Dataset: EcoSpold 2, unit process
Geography: RoW
Time period: 1992-01-01 to 2021-12-31
Technology level: current
Classification: EcoSpold01Categories: waste management/municipal incineration
Classification: ISIC rev.4 ecoinvent: 4290:Construction of other civil engineering projects
Synonyms: MSWI; KVA
Tags: ConvertedDataset
Scenario: Business-as-Usual
System model: Allocation, cut-off by classification
Generated by: Gabor Doka (obsolete)
Published in: Doka G. 2007
Database: ecoinvent
isCopyrightProtected: true
accessRestrictedTo: 1

## General comment
Swiss municipal waste incineration plant with 100'000 ton per year capacity. Operational time 40 years
[This dataset was already contained in the ecoinvent database version 2. It was not individually updated during the transfer to ecoinvent version 3. Life Cycle Impact Assessment results may still have changed, as they are affected by changes in the supply chain, i.e. in other datasets. This dataset was generated following the ecoinvent quality guidelines for version 2. It may have been subject to central changes described in the ecoinvent version 3 change report (http://www.ecoinvent.org/database/ecoinvent-version-3/reports-of-changes/), and the results of the central updates were reviewed extensively. The changes added e.g. consistent water flows and other information throughout the database. The documentation of this dataset can be found in the ecoinvent reports of version 2, which are still available via the ecoinvent website. The change report linked above covers all central changes that were made during the conversion process.]

## Included activities end
construction and disposal of municipal waste incineration plant, land use exchanges.

## Geography
Technology encountered in Switzerland. Well applicable to modern grate incinerators.

## Technology
Municipal soild waste incineration plant with waste bunker, grate incinerator, steam boiler, electrostatic precipitator, wet scrubber.

## Reference product
- municipal waste incineration facility: 1 unit; CPC 53290: Other civil engineering works; By-product classification allocatable product
  EcoSpold01Location=CH
  production volume 3.96633 unit
    This is a placeholder value that does not reflect real-world production volumes. This dataset does not currently require a real-world production volume to work in the database framework, and no actual data were collected yet. This has no negative effect on the results of the ecoinvent database.
  property price 2.81537e6 EUR2005
    Calculated based on inputs: The price of the product has been calculated as a sum of the values of the material and energy inputs for this product. This value is therefore a rough estimation. It may underestimate the real price since there are additional expenses when producing any product. These expences can include for example labour costs, treatment of waste materials and profit for the producer. Please consider carefully whether this level of data quality is acceptable for your application.

## Inputs from technosphere
- sand: 0 kg; pedigree (1,1,1,1,1)
  EcoSpold01Location=CH
  Uncertainty: & basic uncertainty of 3;
  properties: dry mass 1 kg, wet mass 1 kg
- waste bitumen sheet: -800000 kg; lognormal variance with pedigree 0.3632, pedigree (2,3,5,5,1)
  EcoSpold01Location=CH
  Uncertainty: & basic uncertainty of 3;
  production volume 2.4e6 kg
    Calculated from the production volume of municipal waste incineration facility in proportion to the respective output amounts.
  properties: heating value, net 40.2 MJ, carbon content, fossil 0.643207, water content 0.0152284, wet mass 1 kg, dry mass 0.985 kg
  note on heating value, net: Literature value, Source: IPCC 2006, 2006 IPCC Guidelines for National Greenhouse Gas Inventories, Prepared by the National Greenhouse Gas Inventories Programme, Eggleston H.S., Buendia L., Miwa K., Ngara T. and Tanabe K. (eds). Published: IGES, Japan
  note on carbon content, fossil: The bitumen sheet is made of 63% bitumen, 24% surface spread and filler (assumed to be pure SiO2), 6% carrier fleece (assumed to be PE) and 7% elastomer (assumed to be PS) (ecoinvent v2.2 report 13_I, pg 40). C content of bitumen, PE and PS from Tab A.6 and A.1 (ecoinvent v2.2 report 13_I, pg 40), respectively. C content of waste also given in the dataset
- steel, chromium steel 18/8, hot rolled: 80000 kg; lognormal variance with pedigree 0.3632, pedigree (2,3,5,5,1)
  EcoSpold01Location=RER
  Uncertainty: & basic uncertainty of 3;
  properties: carbon content, fossil 0.0008, dry mass 1 kg, wet mass 1 kg
  note on carbon content, fossil: Stainless steel model is the grade 304 steel (18/8 stainless, 18% chromium 8% nickel; max. 0.08% C)
- waste concrete, not reinforced: 0 kg; pedigree (1,1,1,1,1)
  EcoSpold01Location=CH
  Uncertainty: & basic uncertainty of 3;
  production volume 0 kg
    (same comment as for waste bitumen sheet)
  properties: wet mass 1 kg, dry mass 1 kg
- cement, unspecified: 0 kg; pedigree (1,1,1,1,1)
  EcoSpold01Location=CH
  Uncertainty: & basic uncertainty of 3;
  properties: dry mass 1 kg, wet mass 1 kg
- gravel, round: 3.5e7 kg; lognormal variance with pedigree 0.3632, pedigree (2,3,5,5,1)
  EcoSpold01Location=CH
  Uncertainty: & basic uncertainty of 3;
  properties: dry mass 1 kg, wet mass 1 kg
- reinforcing steel: 3.92e6 kg; lognormal variance with pedigree 0.3632, pedigree (2,3,5,5,1)
  EcoSpold01Location=RER
  Uncertainty: & basic uncertainty of 3;
  properties: dry mass 1 kg, carbon content, fossil 0.004, wet mass 1 kg
- pitch: 0 kg; pedigree (1,1,1,1,1)
  EcoSpold01Location=CH
  Uncertainty: & basic uncertainty of 3;
  properties: carbon content, fossil 0.83, dry mass 1 kg, wet mass 1 kg, heating value, net 28 MJ
- waste reinforced concrete: 0 kg; pedigree (1,1,1,1,1)
  EcoSpold01Location=CH
  Uncertainty: & basic uncertainty of 3;
  production volume 0 kg
    (same comment as for waste bitumen sheet)
  properties: water content 0.00585407, dry mass 0.99418 kg, wet mass 1 kg
- sand: 151329, 785.631, 9.84789e6 kg (3 entries); lognormal variance with pedigree 0.3632, pedigree (2,3,5,5,1)
  EcoSpold01Location=CH
  Uncertainty: & basic uncertainty of 3;
- waste concrete, not reinforced: -654804, -9.3452e6 kg (2 entries); lognormal variance with pedigree 0.3632, pedigree (2,3,5,5,1)
  EcoSpold01Location=CH
  Uncertainty: & basic uncertainty of 3;
  production volume 3e7 kg
- cement, unspecified: 720535, 149922, 10980.7, 31298.7, 707831, 20833.5, 228814, 27683.9, 3.0921e6 kg (9 entries); lognormal variance with pedigree 0.3632, pedigree (2,3,5,5,1)
  EcoSpold01Location=CH
  Uncertainty: & basic uncertainty of 3;
- pitch: 36675.9, 2090.22, 121535, 94603.1, 4240.5, 6053.72, 534801 kg (7 entries); lognormal variance with pedigree 0.3632, pedigree (2,3,5,5,1)
  EcoSpold01Location=CH
  Uncertainty: & basic uncertainty of 3;
- waste reinforced concrete: -2.69779e6, -3.85022e7 kg (2 entries); lognormal variance with pedigree 0.3632, pedigree (2,3,5,5,1)
  EcoSpold01Location=CH
  Uncertainty: & basic uncertainty of 3;
  production volume 1.236e8 kg

## Inputs from nature
- Occupation, industrial area [natural resource, land]: 120000 m2*year; lognormal variance with pedigree 0.128, pedigree (4,5,5,5,1)
  Estimate on land area, production volume and building, operation and demolition time
  Uncertainty: & basic uncertainty of 1.5; estimate on land area, production volume and building, operation and demolition time
- Transformation, to industrial area [natural resource, land]: 3000 m2; lognormal variance with pedigree 0.188, pedigree (4,5,5,5,1)
  Estimate on land area and production volume
  Uncertainty: & basic uncertainty of 2; estimate on land area and production volume
- Transformation, from unspecified [natural resource, land]: 3000 m2; lognormal variance with pedigree 0.188, pedigree (4,5,5,5,1)
  (same comment as for Transformation, to industrial area)
- Occupation, construction site [natural resource, land]: 15000 m2*year; lognormal variance with pedigree 0.128, pedigree (4,5,5,5,1)
  (same comment as for Occupation, industrial area)

## Sampling procedure
Data from literature and estimates.

## Extrapolations
This dataset has been copied from an original dataset covering the geography CH. The uncertainty has been adjusted accordingly.

## Review by Niels Jungbluth 2003-06-18
Passed.
