# treatment of electric arc furnace dust, residual material landfill

Dataset: EcoSpold 2, unit process
Geography: CH
Time period: 1987-01-01 to 2021-12-31
Technology level: current
Classification: ISIC rev.4 ecoinvent: 3821:Treatment and disposal of non-hazardous waste
Scenario: Business-as-Usual
System model: Allocation, cut-off by classification
Generated by: Avraam Symeonidis
Database: ecoinvent
isCopyrightProtected: true
accessRestrictedTo: 1

## General comment
Steelmaking produces large quantities of by-products, with around 450-500 kg of by-products produced per tonne of steel. The main components of these are slags (approximately 80%), along with dusts and sludges from air pollution abatement equipment (flue gas scrubbing) and mill scale. The physical or chemical natures of these by-products means that it can be difficult to find possible uses. Hence, most of these by-products have historically been disposed of in landfills. However, new legislation and financial instruments, such as landfill taxes, mean that landfilling is now a costly and undesirable management solution. Instead, considerable efforts have been made to recover by-products for internal reuse or to sell them to other industries to recover value. The fraction of steelmaking by-products that is sent to landfill has drastically reduced. This activity represents the disposal of 'electric arc furnace dust' in a residual material landfill. This type of landfill is designed to receive mostly inorganic (low carbon, <5 w-%) wastes in a physically stable form. Further information is provided in ecoinvent report no. 13, Part II: Landfills – Underground Deposits – Landfarming (Doka, 2009).
References
Doka, G. (2009). Life cycle inventories of waste treatment services. Ecoinvent report no. 13. Swiss Centre for Life Cycle Inventories, Dubendorf, Switzerland.
Inventoried waste contains 100% electric arc furnace dust; .
waste composition (wet, in ppm): H2O 1000; O 492290; H n.a.; C 15500; S 4690; N n.a.; P 391; B n.a.; Cl 10900; Br n.a.; F 2090; I n.a.; Ag n.a.; As 36.8; Ba 1510; Cd 192; Co 159; Cr 4430; Cu 1020; Hg 30.2; Mn 19200; Mo 130; Ni 1260; Pb 7040; Sb n.a.; Se 13; Sn n.a.; V 470; Zn 64600; Be n.a.; Sc n.a.; Sr n.a.; Ti n.a.; Tl n.a.; W 8660; Si 21100; Fe 259000; Ca 52300; Al 6330; K 7580; Mg 13000; Na 5080;
Share of carbon in waste that is biogenic 0%.
Additional solidification with 0.4 kg of cement. Note that value for oxygen content was calculated by assuming that other elements in the material are present as oxides and that any missing mass (either not reported or not detected) was assumed to be oxygen.

## Included activities start
Activity starts with the reception of the waste.

## Included activities end
Waste-specific short-term emissions to water from leachate. Long-term emissions from landfill to ground water. Expenditures for solidification with cement.

## Technology
Time period based on the range of years of publication from which composition data were taken. Note that the Residual Material Landfill modelling tool was published in 2009.

## Reference product
- electric arc furnace dust: -1 kg; name RP; By-product classification Waste; CPC 39310: Slag, dross, scalings and other waste from the manufacture of iron or steel
  production volume 1.1152e7 kg; name PVRP
    Assuming that 100% of electric arc furnace dust is sent for disposal in landfill (worldsteel, 2010).
    References:
    Worldsteel (2010). Steel industry by-products. World Steel Association: Brussels, Belgium.
  property arsenic content 3.68368e-5
    The value of 'arsenic content' is documented in Turner & Symeonidis, 2020.
    Reference: Turner David & Symeonidis Avraam, 2020, Life cycle inventories of the treatment of iron and steelmaking by-products, ecoinvent association, Zürich, Switzerland
  property iron content 0.259259
    The value of 'iron content' is documented in Turner & Symeonidis, 2020.
    Reference: Turner David & Symeonidis Avraam, 2020, Life cycle inventories of the treatment of iron and steelmaking by-products, ecoinvent association, Zürich, Switzerland
  property nickel content 0.00126126
    The value of 'nickel content' is documented in Turner & Symeonidis, 2020.
    Reference: Turner David & Symeonidis Avraam, 2020, Life cycle inventories of the treatment of iron and steelmaking by-products, ecoinvent association, Zürich, Switzerland
  property copper content 0.00102102
    The value of 'copper content' is documented in Turner & Symeonidis, 2020.
    Reference: Turner David & Symeonidis Avraam, 2020, Life cycle inventories of the treatment of iron and steelmaking by-products, ecoinvent association, Zürich, Switzerland
  property cobalt content 0.000159159
    The value of 'cobalt content' is documented in Turner & Symeonidis, 2020.
    Reference: Turner David & Symeonidis Avraam, 2020, Life cycle inventories of the treatment of iron and steelmaking by-products, ecoinvent association, Zürich, Switzerland
  property aluminium content 0.00633634
    The value of 'aluminium content' is documented in Turner & Symeonidis, 2020.
    Reference: Turner David & Symeonidis Avraam, 2020, Life cycle inventories of the treatment of iron and steelmaking by-products, ecoinvent association, Zürich, Switzerland
  property mercury content 3.02302e-5
    The value of 'mercury content' is documented in Turner & Symeonidis, 2020.
    Reference: Turner David & Symeonidis Avraam, 2020, Life cycle inventories of the treatment of iron and steelmaking by-products, ecoinvent association, Zürich, Switzerland
  property fluorine content 0.00209209
    The value of 'fluorine content' is documented in Turner & Symeonidis, 2020.
    Reference: Turner David & Symeonidis Avraam, 2020, Life cycle inventories of the treatment of iron and steelmaking by-products, ecoinvent association, Zürich, Switzerland
  property magnesium content 0.013013
    The value of 'magnesium content' is documented in Turner & Symeonidis, 2020.
    Reference: Turner David & Symeonidis Avraam, 2020, Life cycle inventories of the treatment of iron and steelmaking by-products, ecoinvent association, Zürich, Switzerland
  property heating value, net 0 MJ
    Non combustible products are assumed to have an LHV equal to zero (0).
  property price 0 EUR2005; name RP_price_EUR2005
    Waste products are assigned a price of zero as they are assumed to require further treatment.
  property manganese content 0.0192192
    The value of 'manganese content' is documented in Turner & Symeonidis, 2020.
    Reference: Turner David & Symeonidis Avraam, 2020, Life cycle inventories of the treatment of iron and steelmaking by-products, ecoinvent association, Zürich, Switzerland
  property chlorine content 0.0109109
    The value of 'chlorine content' is documented in Turner & Symeonidis, 2020.
    Reference: Turner David & Symeonidis Avraam, 2020, Life cycle inventories of the treatment of iron and steelmaking by-products, ecoinvent association, Zürich, Switzerland
  property vanadium content 0.00047047
    The value of 'vanadium content' is documented in Turner & Symeonidis, 2020.
    Reference: Turner David & Symeonidis Avraam, 2020, Life cycle inventories of the treatment of iron and steelmaking by-products, ecoinvent association, Zürich, Switzerland
  property calcium content 0.0523524
    The value of 'calcium content' is documented in Turner & Symeonidis, 2020.
    Reference: Turner David & Symeonidis Avraam, 2020, Life cycle inventories of the treatment of iron and steelmaking by-products, ecoinvent association, Zürich, Switzerland
  property silicon content 0.0211211
    The value of 'silicon content' is documented in Turner & Symeonidis, 2020.
    Reference: Turner David & Symeonidis Avraam, 2020, Life cycle inventories of the treatment of iron and steelmaking by-products, ecoinvent association, Zürich, Switzerland
  property carbon content, fossil 0.0155155
    The value of 'carbon content, fossil' is documented in Turner & Symeonidis, 2020.
    Reference: Turner David & Symeonidis Avraam, 2020, Life cycle inventories of the treatment of iron and steelmaking by-products, ecoinvent association, Zürich, Switzerland
  property zinc content 0.0646647
    The value of 'zinc content' is documented in Turner & Symeonidis, 2020.
    Reference: Turner David & Symeonidis Avraam, 2020, Life cycle inventories of the treatment of iron and steelmaking by-products, ecoinvent association, Zürich, Switzerland
  property barium content 0.00151151
    The value of 'barium content' is documented in Turner & Symeonidis, 2020.
    Reference: Turner David & Symeonidis Avraam, 2020, Life cycle inventories of the treatment of iron and steelmaking by-products, ecoinvent association, Zürich, Switzerland
  property phosphorus content 0.000391391
    The value of 'phosphorus content' is documented in Turner & Symeonidis, 2020.
    Reference: Turner David & Symeonidis Avraam, 2020, Life cycle inventories of the treatment of iron and steelmaking by-products, ecoinvent association, Zürich, Switzerland
  property selenium content 1.3013e-5
    The value of 'selenium content' is documented in Turner & Symeonidis, 2020.
    Reference: Turner David & Symeonidis Avraam, 2020, Life cycle inventories of the treatment of iron and steelmaking by-products, ecoinvent association, Zürich, Switzerland
  property tungsten content 0.00866867
    The value of 'tungsten content' is documented in Turner & Symeonidis, 2020.
    Reference: Turner David & Symeonidis Avraam, 2020, Life cycle inventories of the treatment of iron and steelmaking by-products, ecoinvent association, Zürich, Switzerland
  property oxygen content 0.492781
    The value of 'oxygen content' is documented in Turner & Symeonidis, 2020.
    Reference: Turner David & Symeonidis Avraam, 2020, Life cycle inventories of the treatment of iron and steelmaking by-products, ecoinvent association, Zürich, Switzerland
  property lead content 0.00704705
    The value of 'lead content' is documented in Turner & Symeonidis, 2020.
    Reference: Turner David & Symeonidis Avraam, 2020, Life cycle inventories of the treatment of iron and steelmaking by-products, ecoinvent association, Zürich, Switzerland
  property sulfur content 0.00469469
    The value of 'sulfur content' is documented in Turner & Symeonidis, 2020.
    Reference: Turner David & Symeonidis Avraam, 2020, Life cycle inventories of the treatment of iron and steelmaking by-products, ecoinvent association, Zürich, Switzerland
  property chromium content 0.00443443
    The value of 'chromium content' is documented in Turner & Symeonidis, 2020.
    Reference: Turner David & Symeonidis Avraam, 2020, Life cycle inventories of the treatment of iron and steelmaking by-products, ecoinvent association, Zürich, Switzerland
  property potassium content 0.00758759
    The value of 'potassium content' is documented in Turner & Symeonidis, 2020.
    Reference: Turner David & Symeonidis Avraam, 2020, Life cycle inventories of the treatment of iron and steelmaking by-products, ecoinvent association, Zürich, Switzerland
  property sodium content 0.00508509
    The value of 'sodium content' is documented in Turner & Symeonidis, 2020.
    Reference: Turner David & Symeonidis Avraam, 2020, Life cycle inventories of the treatment of iron and steelmaking by-products, ecoinvent association, Zürich, Switzerland
  property molybdenum content 0.00013013
    The value of 'molybdenum content' is documented in Turner & Symeonidis, 2020.
    Reference: Turner David & Symeonidis Avraam, 2020, Life cycle inventories of the treatment of iron and steelmaking by-products, ecoinvent association, Zürich, Switzerland
  property cadmium content 0.000192192
    The value of 'cadmium content' is documented in Turner & Symeonidis, 2020.
    Reference: Turner David & Symeonidis Avraam, 2020, Life cycle inventories of the treatment of iron and steelmaking by-products, ecoinvent association, Zürich, Switzerland
  property carbon content, non-fossil 0
    The value of 'carbon content, non-fossil' is documented in Turner & Symeonidis, 2020.
    Reference: Turner David & Symeonidis Avraam, 2020, Life cycle inventories of the treatment of iron and steelmaking by-products, ecoinvent association, Zürich, Switzerland
  property carbon content 0.0155155
    carbon content on a dry matter basis (reserved; not for manual entry)
  properties: water in wet mass 0.001 kg, dry mass 0.999 kg, wet mass 1 kg, water content 0.001001, carbon allocation 0.0155 kg

## Inputs from technosphere
- residual material landfill: 2.08333e-9 unit; lognormal variance with pedigree 0.082, pedigree (1,1,5,5,4)
  demands per kilogram waste. uncertainty is heeded in the module
- process-specific burdens, residual material landfill: 1 kg; lognormal variance with pedigree 0.082, pedigree (1,1,5,5,4)
  demands per kilogram waste. uncertainty is heeded in the module
- cement, unspecified: 0.4 kg; lognormal variance with pedigree 0.091084, pedigree (1,1,5,5,4)
  Cement for solidification of residual material waste. Uncertainty in mass from solidification recipe.
  properties: wet mass 1 kg, dry mass 1 kg
- waste cement, hydrated: -1 kg; name BP; lognormal variance with pedigree 0.091084, pedigree (1,1,5,5,4)
  Hydrated cement for solidification of residual material waste. Uncertainty in mass from solidification recipe.
  production volume 1.1152e7 kg; = PVRP*BP/ABS(RP)
    Calculated based on the production volume of the reference product.
  property price 0 EUR2005; name BP_price_EUR2005
  properties: wet mass 1 kg, dry mass 1 kg

## Emissions to nature
- Selenium [water, surface water]: 4.58456e-6 kg; lognormal variance with pedigree 1.34476, pedigree (1,1,5,5,4)
  uncertainty is calculated from uncertainties in waste composition and transfer coefficients in residual landfill
- Barium [water, ground-, long-term]: 1.2473e-5 kg; lognormal variance with pedigree 6.43719, pedigree (1,1,5,5,4)
  uncertainty is calculated from uncertainties in waste composition and transfer coefficients in incinerator and landfills.
- Fluoride [water, ground-, long-term]: 0.00197674 kg; lognormal variance with pedigree 0.644479, pedigree (1,1,5,5,4)
  (same comment as for Barium)
- Tungsten [water, ground-, long-term]: 0.00560598 kg; lognormal variance with pedigree 0.472106, pedigree (1,1,5,5,4)
  (same comment as for Barium)
- Aluminium [water, surface water]: 3.13702e-6 kg; lognormal variance with pedigree 1.24927, pedigree (1,1,5,5,4)
  (same comment as for Selenium)
- Chromium VI [water, ground-, long-term]: 0.000841201 kg; lognormal variance with pedigree 0.55572, pedigree (1,1,5,5,4)
  (same comment as for Barium)
- Sulfate [water, ground-, long-term]: 0.0125605 kg; lognormal variance with pedigree 0.542789, pedigree (1,1,5,5,4)
  (same comment as for Barium)
- Copper, ion [water, ground-, long-term]: 3.92644e-5 kg; lognormal variance with pedigree 3.38941, pedigree (1,1,5,5,4)
  (same comment as for Barium)
- Cadmium, ion [water, surface water]: 2.17607e-9 kg; lognormal variance with pedigree 2.20065, pedigree (1,1,5,5,4)
  (same comment as for Selenium)
- Mercury [water, surface water]: 2.37979e-9 kg; lognormal variance with pedigree 2.19046, pedigree (1,1,5,5,4)
  (same comment as for Selenium)
- Iron, ion [water, surface water]: 2.16711e-6 kg; lognormal variance with pedigree 1.41312, pedigree (1,1,5,5,4)
  (same comment as for Selenium)
- DOC, Dissolved Organic Carbon [water, surface water]: 1.67227e-5 kg; lognormal variance with pedigree 1.04076, pedigree (1,1,5,5,4)
  (same comment as for Selenium)
- Silicon [water, surface water]: 4.74528e-5 kg; lognormal variance with pedigree 0.911167, pedigree (1,1,5,5,4)
  (same comment as for Selenium)
- BOD5, Biological Oxygen Demand [water, ground-, long-term]: 0.00828024 kg; lognormal variance with pedigree 0.445348, pedigree (1,1,5,5,4)
  (same comment as for Barium)
- Arsenic, ion [water, surface water]: 3.68e-5 kg; lognormal variance with pedigree 1.17709, pedigree (1,1,5,5,4)
  (same comment as for Selenium)
- Potassium, ion [water, ground-, long-term]: 0.00544331 kg; lognormal variance with pedigree 0.48669, pedigree (1,1,5,5,4)
  (same comment as for Barium)
- TOC, Total Organic Carbon [water, ground-, long-term]: 0.0100169 kg; lognormal variance with pedigree 0.445348, pedigree (1,1,5,5,4)
  (same comment as for Barium)
- Copper, ion [water, surface water]: 6.55499e-8 kg; lognormal variance with pedigree 1.75113, pedigree (1,1,5,5,4)
  (same comment as for Selenium)
- COD, Chemical Oxygen Demand [water, surface water]: 4.22609e-5 kg; lognormal variance with pedigree 1.04076, pedigree (1,1,5,5,4)
  (same comment as for Selenium)
- Zinc, ion [water, ground-, long-term]: 0.000791738 kg; lognormal variance with pedigree 5.08792, pedigree (1,1,5,5,4)
  (same comment as for Barium)
- Nickel, ion [water, ground-, long-term]: 0.000456167 kg; lognormal variance with pedigree 0.967542, pedigree (1,1,5,5,4)
  (same comment as for Barium)
- Chloride [water, surface water]: 0.00311751 kg; lognormal variance with pedigree 0.480406, pedigree (1,1,5,5,4)
  (same comment as for Selenium)
- Chromium VI [water, surface water]: 0.000266299 kg; lognormal variance with pedigree 0.716777, pedigree (1,1,5,5,4)
  (same comment as for Selenium)
- Vanadium, ion [water, surface water]: 1.15347e-6 kg; lognormal variance with pedigree 1.37632, pedigree (1,1,5,5,4)
  (same comment as for Selenium)
- Molybdenum [water, surface water]: 0.000129403 kg; lognormal variance with pedigree 1.00911, pedigree (1,1,5,5,4)
  (same comment as for Selenium)
- COD, Chemical Oxygen Demand [water, ground-, long-term]: 0.0253143 kg; lognormal variance with pedigree 0.445348, pedigree (1,1,5,5,4)
  (same comment as for Barium)
- Calcium, ion [water, ground-, long-term]: 0.00472573 kg; lognormal variance with pedigree 1.7098, pedigree (1,1,5,5,4)
  (same comment as for Barium)
- Sodium, ion [water, ground-, long-term]: 0.00317358 kg; lognormal variance with pedigree 0.537974, pedigree (1,1,5,5,4)
  (same comment as for Barium)
- Molybdenum [water, ground-, long-term]: 5.96836e-7 kg; lognormal variance with pedigree 1.0326, pedigree (1,1,5,5,4)
  (same comment as for Barium)
- BOD5, Biological Oxygen Demand [water, surface water]: 1.38234e-5 kg; lognormal variance with pedigree 1.04076, pedigree (1,1,5,5,4)
  (same comment as for Selenium)
- Barium [water, surface water]: 2.08231e-8 kg; lognormal variance with pedigree 1.90363, pedigree (1,1,5,5,4)
  (same comment as for Selenium)
- TOC, Total Organic Carbon [water, surface water]: 1.67227e-5 kg; lognormal variance with pedigree 1.04076, pedigree (1,1,5,5,4)
  (same comment as for Selenium)
- Tungsten [water, surface water]: 0.00305402 kg; lognormal variance with pedigree 0.496256, pedigree (1,1,5,5,4)
  (same comment as for Selenium)
- Cobalt [water, surface water]: 4.53809e-8 kg; lognormal variance with pedigree 1.79926, pedigree (1,1,5,5,4)
  (same comment as for Selenium)
- Arsenic, ion [water, ground-, long-term]: 3.68e-14 kg; lognormal variance with pedigree 1.20072, pedigree (1,1,5,5,4)
  (same comment as for Barium)
- Sodium, ion [water, surface water]: 0.00190642 kg; lognormal variance with pedigree 0.558431, pedigree (1,1,5,5,4)
  (same comment as for Selenium)
- Silicon [water, ground-, long-term]: 0.0210525 kg; lognormal variance with pedigree 0.362454, pedigree (1,1,5,5,4)
  (same comment as for Barium)
- Lead [water, surface water]: 6.09637e-8 kg; lognormal variance with pedigree 1.77063, pedigree (1,1,5,5,4)
  (same comment as for Selenium)
- Cobalt [water, ground-, long-term]: 2.71832e-5 kg; lognormal variance with pedigree 1.76224, pedigree (1,1,5,5,4)
  (same comment as for Barium)
- Vanadium, ion [water, ground-, long-term]: 0.000361248 kg; lognormal variance with pedigree 0.855932, pedigree (1,1,5,5,4)
  (same comment as for Barium)
- Mercury [water, ground-, long-term]: 1.42549e-6 kg; lognormal variance with pedigree 3.53405, pedigree (1,1,5,5,4)
  (same comment as for Barium)
- Iron, ion [water, ground-, long-term]: 0.0012981 kg; lognormal variance with pedigree 7.14154, pedigree (1,1,5,5,4)
  (same comment as for Barium)
- Phosphate [water, ground-, long-term]: 0.000267841 kg; lognormal variance with pedigree 1.4241, pedigree (1,1,5,5,4)
  (same comment as for Barium)
- Manganese [water, ground-, long-term]: 0.000158598 kg; lognormal variance with pedigree 6.12426, pedigree (1,1,5,5,4)
  (same comment as for Barium)
- Lead [water, ground-, long-term]: 3.65172e-5 kg; lognormal variance with pedigree 7.4129, pedigree (1,1,5,5,4)
  (same comment as for Barium)
- Nickel, ion [water, surface water]: 7.61548e-7 kg; lognormal variance with pedigree 1.42795, pedigree (1,1,5,5,4)
  (same comment as for Selenium)
- Manganese [water, surface water]: 2.64771e-7 kg; lognormal variance with pedigree 1.5907, pedigree (1,1,5,5,4)
  (same comment as for Selenium)
- Fluoride [water, surface water]: 0.000113261 kg; lognormal variance with pedigree 0.822156, pedigree (1,1,5,5,4)
  (same comment as for Selenium)
- Selenium [water, ground-, long-term]: 8.41544e-6 kg; lognormal variance with pedigree 1.32061, pedigree (1,1,5,5,4)
  (same comment as for Barium)
- Potassium, ion [water, surface water]: 0.00213669 kg; lognormal variance with pedigree 0.524996, pedigree (1,1,5,5,4)
  (same comment as for Selenium)
- Magnesium [water, surface water]: 2.46594e-6 kg; lognormal variance with pedigree 1.28914, pedigree (1,1,5,5,4)
  (same comment as for Selenium)
- Zinc, ion [water, surface water]: 1.32177e-6 kg; lognormal variance with pedigree 1.40961, pedigree (1,1,5,5,4)
  (same comment as for Selenium)
- Magnesium [water, ground-, long-term]: 0.0014771 kg; lognormal variance with pedigree 1.60077, pedigree (1,1,5,5,4)
  (same comment as for Barium)
- Calcium, ion [water, surface water]: 7.88937e-6 kg; lognormal variance with pedigree 1.1662, pedigree (1,1,5,5,4)
  (same comment as for Selenium)
- Sulfate [water, surface water]: 0.00150955 kg; lognormal variance with pedigree 0.656048, pedigree (1,1,5,5,4)
  (same comment as for Selenium)
- DOC, Dissolved Organic Carbon [water, ground-, long-term]: 0.0100169 kg; lognormal variance with pedigree 0.445348, pedigree (1,1,5,5,4)
  (same comment as for Barium)
- Chloride [water, ground-, long-term]: 0.00778249 kg; lognormal variance with pedigree 0.443059, pedigree (1,1,5,5,4)
  (same comment as for Barium)
- Phosphate [water, surface water]: 4.47146e-7 kg; lognormal variance with pedigree 1.64464, pedigree (1,1,5,5,4)
  (same comment as for Selenium)
- Aluminium [water, ground-, long-term]: 0.00187908 kg; lognormal variance with pedigree 0.873579, pedigree (1,1,5,5,4)
  (same comment as for Barium)
- Cadmium, ion [water, ground-, long-term]: 1.30347e-6 kg; lognormal variance with pedigree 7.18844, pedigree (1,1,5,5,4)
  (same comment as for Barium)

## Sampling procedure
For more details about sampling procedures, refer to: Turner, D. & Symeonidis, A. (2020). Life cycle inventories of the treatment of iron and steelmaking by-products, ecoinvent association, Zürich, Switzerland.

## Extrapolations
This dataset has been extrapolated from year 2017 to the year of the calculation (2021). The uncertainty has been adjusted accordingly.
