# natural gas, high pressure, import from DZ

Dataset: EcoSpold 2, unit process
Geography: CH
Time period: 2012-01-01 to 2021-12-31
Technology level: current
Classification: ISIC rev.4 ecoinvent: 4930:Transport via pipeline
Scenario: Business-as-Usual
System model: Allocation, cut-off by classification
Share of production covered: 100 %
Generated by: Mireille Faist Emmenegger
Published in: Faist Emmenegger, Mireille 2015
Database: ecoinvent
isCopyrightProtected: true
accessRestrictedTo: 1

## General comment
This dataset describes the transport needed for the export of Algerian natural gas to Switzerland (expressed in tkm). The parts of pipeline transport (69%) and of transport per freight ship (LNG, 31%) are taken into account. We use the global average as the LNG is not imported directly but goes through Italy. The dataset includes the pipeline transport for both transport types. An average distance of 2'200 km is estimated for the export. For the pipeline transport 100 km offshore pipeline are included. For the LNG transport a transport of 800 km from production to LNG liquefaction plant and from LNG evaporation plant to network are taken into account. The distance with freight ship is accounted for with 1100km.
'Characteristics are based on the ecoinvent report v2 'Erdgas' from 2007: HV; 41.39 MJ/m-3; density, 0.78 kg/m-3, 0.65 kg CH4/m-3, kg CO2/m-3
'

## Included activities start
'exit gate' of natural gas production field

## Included activities end
'entry gate' of natural gas national market

## Geography
The average weighted export distance is based on the trade movements 2012.

## Technology
The distance to the different countries is based on rough estimates.

## Reference product
- natural gas, high pressure: 1 m3; CPC 12020: Natural gas, liquefied or in the gaseous state; By-product classification allocatable product; CAS 14493-06-2
  production volume 1.95e8 m3
    m3 imported from DZ to CH in 2000. from BP Statistical Review of World Energy, June 2014 and VSG (Verband der Schweizerischen Gasindustrie (VSG)) statistics for the year 2012 (VSG Statistik 2013).Scaled to LHV of ecoinvent v3 (39MJ/m3). Refrence(s): BP (2014). Statistical Review of World Energy, June 2014. Retrieved online from http://www.bp.com/content/dam/bp-country/de_de/PDFs/brochures/BP-statistical-review-of-world-energy-2014-full-report.pdf, 30 August, 2017. VSG (2015). Erdgas in der Schweiz. Ausgabe 2015. VSG-Jahresstatistik. Retrieved online from file:///C:/Users/FlorentineBrunner/Downloads/VSG-Jahresstatistik_2015.pdf, 30 August, 2017.
  property carbon content, fossil 0.602381
    An average C content of 0.506 kg C/ m3 has been assumed (this average has been calculated using data in Tab 3.5, ecoinvent v2.2 report 6_V
  property heating value, net 39 MJ
    Literature value, Source: United Nations Statistics Division (2018) International Recommendations for Energy Statistics (IRES). Available at: http://unstats.un.org/unsd/statcom/doc11/BG-IRES.pdf.
  property price 0.166 EUR2005
    Temporary price data. Calculated as 90% of purchasers price based on: 2005 price for Europe-27 Import (US$ and kg) in UN Commodity Trade Statistics Database - Natural gas in gaseous state (http://data.un.org/Data.aspx?q=natural+gas&d=ComTrade&f=_l1Code%3a28%3bcmdCode%3a271121; accessed 4 January 2011), using density of natural gas of 0.8 kg/m3 for unit conversion.
  property carbon content 0.602381
    carbon content on a dry matter basis (reserved; not for manual entry)
  properties: dry mass 0.84 kg, heating value, gross 0 MJ, wet mass 0.84 kg, carbon content, non-fossil 0, water in wet mass 0 kg, water content 0, carbon allocation 0.506 kg

## Inputs from technosphere
- natural gas, burned in gas motor, for storage: 0.0596 MJ; lognormal variance with pedigree 0.036, pedigree (4,1,4,5,3)
  Data from german industrial expert for 2001, standard technology
  Uncertainty: D
  properties: heating value, net 1 MJ
- natural gas, high pressure: 0.31 m3; name dummy009; lognormal variance with pedigree 0.008, pedigree (1,1,4,1,1)
  Value based on statistics (BP 2014). Activity link reflects proveniance of NG.
  Uncertainty: s
  properties: dry mass 0.84 kg, carbon content, fossil 0.602381, wet mass 0.84 kg, heating value, net 39 MJ
  note on carbon content, fossil: An average C content of 0.506 kg C/ m3 has been assumed (this average has been calculated using data in Tab 3.5, ecoinvent v2.2 report 6_V
  note on heating value, net: Literature value, Source: United Nations Statistics Division (2018) International Recommendations for Energy Statistics (IRES). Available at: http://unstats.un.org/unsd/statcom/doc11/BG-IRES.pdf.
- transport, pipeline, onshore, long distance, natural gas: 1.37748 metric ton*km; = 2200*0.78/1000* dummy003+800*0.78/1000* dummy009; lognormal variance with pedigree 0.1286, pedigree (2,1,4,1,1)
  Average distance multiplied by density of the natural gas and by the share of natural gas transported by onshore pipeline, taking into account the offshore part (100km).Activity link reflects proveniance of NG.
  Uncertainty: A
- transport, pipeline, offshore, long distance, natural gas: 0.05382 metric ton*km; = 100*0.78* dummy003 /1000; lognormal variance with pedigree 0.1286, pedigree (2,1,4,1,1)
  Average distance of offshore pipeline (100km) multiplied by density of the natural gas and by the share of natural gas transported by pipeline).
  Activity link reflects proveniance of NG.
  Uncertainty: A
- natural gas, high pressure: 0.69 m3; name dummy003; lognormal variance with pedigree 0.008, pedigree (1,1,4,1,1)
  (same comment as for natural gas, high pressure)

## Emissions to nature
- Butane [air, non-urban air or from high stacks]: 2.71e-7 kg; lognormal variance with pedigree 0.1286, pedigree (2,1,4,1,1)
  calculated based on average losses and algerian gas composition
  Uncertainty: c
- Propane [air, non-urban air or from high stacks]: 1.61e-6 kg; lognormal variance with pedigree 0.1286, pedigree (2,1,4,1,1)
  calculated based on average losses and algerian gas composition
  Uncertainty: c
- Ethane [air, non-urban air or from high stacks]: 1e-5 kg; lognormal variance with pedigree 0.1286, pedigree (2,1,4,1,1)
  calculated based on average losses and algerian gas composition
  Uncertainty: c
- Mercury [air, non-urban air or from high stacks]: 1e-12 kg; lognormal variance with pedigree 0.116, pedigree (4,1,5,1,3)
  calculated based on average losses and algerian gas composition
  Uncertainty: c
- Methane, fossil [air, non-urban air or from high stacks]: 6.54e-5 kg; lognormal variance with pedigree 0.1286, pedigree (2,1,4,1,1)
  calculated based on average losses and algerian gas composition
  Uncertainty: c

## Sampling procedure
statistics

## Extrapolations
This dataset has been extrapolated from year 2012 to the year of the calculation (2021). The uncertainty has been adjusted accordingly.
