# clover seed production, Swiss integrated production, at farm

Dataset: EcoSpold 2, unit process
Geography: CH
Time period: 2000-01-01 to 2021-12-31
Technology level: current
Classification: ISIC rev.4 ecoinvent: 0119:Growing of other non-perennial crops
Scenario: Business-as-Usual
System model: Allocation, cut-off by classification
Generated by: Thomas Nemecek
Published in: Nemecek, T. 2007
Database: ecoinvent
isCopyrightProtected: true
accessRestrictedTo: 1

## General comment
This dataset represents the production of 1 kg of clover seed (fresh matter). The yield is 400 kg/ha at a moisture content at storage of 10%.
[This dataset was already contained in the ecoinvent database version 2. It was not individually updated during the transfer to ecoinvent version 3. Life Cycle Impact Assessment results may still have changed, as they are affected by changes in the supply chain, i.e. in other datasets. This dataset was generated following the ecoinvent quality guidelines for version 2. It may have been subject to central changes described in the ecoinvent version 3 change report (http://www.ecoinvent.org/database/ecoinvent-version-3/reports-of-changes/), and the results of the central updates were reviewed extensively. The changes added e.g. consistent water flows and other information throughout the database. The documentation of this dataset can be found in the ecoinvent reports of version 2, which are still available via the ecoinvent website. The change report linked above covers all central changes that were made during the conversion process.]

## Included activities start
This activity assumes co-production of clober seeds and forage on an intensive temporary meadow during one year. Included in the dataset are (a) those operations which can be explicitly attributed to seed production and (b) other inputs and the emissions with a share of 50% of the burden of the whole production system, attributing the other 50% to forage production. The activity starts with the soil cultivation and sowing after the harvest of the previous crop. The inputs of seeds, mineral fertilisers and pesticides are considered. Farm manure as an organic fertiliser is only accounted for in terms of direct field emissions; all pre-processes are included in the animal production systems.

## Included activities end
The dataset includes all machine operations and corresponding machine infrastructure and sheds. Machine operations are: sowing, fertilisation, pest control, harvest, transport from field to regional processing center (10 km) and drying of seeds. No ploughing is included as the crop is sown in direct seeding under a cover crop This activity ends after drying of the seeds at the regional processing center.

## Geography
Values refer to the situation in Switzerland.

## Technology
Integrated production

## Reference product
- clover seed, Swiss integrated production, at farm: 1 kg; name REF_PRODUCT; CPC 01919: Forage products, n.e.c.; By-product classification allocatable product
  production volume 4 kg
    This is a placeholder value that does not reflect real-world production volumes. This dataset does not currently require a real-world production volume to work in the database framework, and no actual data were collected yet. This has no negative effect on the results of the ecoinvent database.
  property energy content 16.0776 MJ; name REF_PRODUCT_energy_content
    See chapter 'Product Properties' in '01_crop production - yields & inputs CH & Europe_v1.0.pdf', section 'AGRICULTURAL PRODUCTION IN SWITZERLAND' - pdf-document on the dedicated talk page of ecoinvent (www.ecoinvent.org/documentation)
  property price 0.393146 EUR2005; name REF_PRODUCT_price_EUR2005
    Calculated based on inputs: The price of the product has been calculated as a sum of the values of the material and energy inputs for this product. This value is therefore a rough estimation. It may underestimate the real price since there are additional expenses when producing any product. These expences can include for example labour costs, treatment of waste materials and profit for the producer. Please consider carefully whether this level of data quality is acceptable for your application.
  property dry mass 0.9 kg; name REF_PRODUCT_DM
  property carbon content, non-fossil 0.469421; name REF_PRODUCT_C_content_non_fossil
    biogene carbon content on a dry matter basis
    peas seeds values are used
  property carbon content 0.469421
    carbon content on a dry matter basis (reserved; not for manual entry)
  properties: water in wet mass 0.1 kg, carbon content, fossil 0, water content 0.111111, wet mass 1 kg, carbon allocation 0.422479 kg

## Inputs from technosphere
- inorganic phosphorus fertiliser, as P2O5: 0.1 kg; lognormal variance with pedigree 0.0406, pedigree (2,1,5,1,1)
  Burden of clover seed production is approximated by 50% of the burden of co-production of clover seed and clover for forage on an intensive temporary meadow. For details see '01_crop production - seed production & processing_v1.0.pdf' - pdf-document on the dedicated talk page of ecoinvent (www.ecoinvent.org/documentation).
  Burden of clover seed production is approximated by 50% of the burden of co-production of clover seed and clover for forage on an intensive temporary meadow. For details see '01_crop production - seed production & processing_v1.0.pdf' - pdf-document on the dedicated talk page of ecoinvent (www.ecoinvent.org/documentation).
  properties: dry mass 1 kg, wet mass 1 kg
- fertilising, by broadcaster: 0.00125 ha; lognormal variance with pedigree 0.0406, pedigree (2,1,5,1,1)
  Burden of clover seed production is approximated by 50% of the burden of co-production of clover seed and clover for forage on an intensive temporary meadow. For details see '01_crop production - seed production & processing_v1.0.pdf' - pdf-document on the dedicated talk page of ecoinvent (www.ecoinvent.org/documentation).
  This exchange has an activity link directly to the producing activity because the product is primarily consumed in the same geographical area where it is produced.
- transport, tractor and trailer, agricultural: 0.01 metric ton*km; lognormal variance with pedigree 0.0406, pedigree (2,1,5,1,1)
  Transport of seed to the regional processing centre (10 km).
- drying of bread grain, seed and legumes: 0.28571 l; source Nemecek, T. 2004; lognormal variance with pedigree 0.0406, pedigree (2,1,5,1,1)
  Fully attributed to clover seed production. Calculated according to Nemecek et al. (2004).
  This exchange has an activity link directly to the producing activity because the product is primarily consumed in the same geographical area where it is produced.
- sowing: 0.0025 ha; lognormal variance with pedigree 0.0406, pedigree (2,1,5,1,1)
  Fully attributed to clover seed production.
  This exchange has an activity link directly to the producing activity because the product is primarily consumed in the same geographical area where it is produced.
- [thio]carbamate-compound: 0.0005 kg; lognormal variance with pedigree 0.0406, pedigree (2,1,5,1,1)
  (same comment as for inorganic phosphorus fertiliser, as P2O5)
  properties: carbon content, fossil 0.626349, dry mass 1 kg, wet mass 1 kg
  note on carbon content, fossil: Approximated as an unweighted average of the C-content of the [thio]carbamate-compounds (Tab 2.25 Sutter, 2010) carbofuran,orbencarb, prosulfocarb
- application of plant protection product, by field sprayer: 0.0025 ha; lognormal variance with pedigree 0.0406, pedigree (2,1,5,1,1)
  (same comment as for fertilising, by broadcaster)
- combine harvesting: 0.0025 ha; lognormal variance with pedigree 0.0406, pedigree (2,1,5,1,1)
  (same comment as for sowing)
- potassium chloride: 0.455083 kg; lognormal variance with pedigree 0.0406, pedigree (2,1,5,1,1)
  The exchange has been updated from 'potassium chloride, as K2O' into 'potassium chloride' and therefore its amount has been scaled (multiplied) from 0.2875 kg by 1.5829 kg of 'potassium chloride' per kg of 'potassium chloride, as K2O'. Original comment of the exchange is: Burden of clover seed production is approximated by 50% of the burden of co-production of clover seed and clover for forage on an intensive temporary meadow. For details see '01_crop production - seed production & processing_v1.0.pdf' - pdf-document on the dedicated talk page of ecoinvent (www.ecoinvent.org/documentation).
  Burden of clover seed production is approximated by 50% of the burden of co-production of clover seed and clover for forage on an intensive temporary meadow. For details see '01_crop production - seed production & processing_v1.0.pdf' - pdf-document on the dedicated talk page of ecoinvent (www.ecoinvent.org/documentation).
  properties: dry mass 1 kg, wet mass 1 kg
- clover seed, Swiss integrated production, for sowing: 0.01875 kg; name SEED; lognormal variance with pedigree 0.0406, pedigree (2,1,5,1,1)
  Fully attributed to clover seed production.
  Fully attributed to clover seed production.
  property carbon content, non-fossil 0.469421; name SEED_C_content_non_fossil
  property energy content 16.0776 MJ; name SEED_energy_content
  property dry mass 0.9 kg; name SEED_DM
  properties: water content 0.111111, wet mass 1 kg
  note on carbon content, non-fossil: biogene carbon content on a dry matter basis peas seeds values are used
  note on energy content: See chapter 'Product Properties' in '01_crop production - yields & inputs CH & Europe_v1.0.pdf', section 'AGRICULTURAL PRODUCTION IN SWITZERLAND' - pdf-document on the dedicated talk page of ecoinvent (www.ecoinvent.org/documentation)
- packaging, for fertilisers: 0.775 kg; lognormal variance with pedigree 0.0912, pedigree (4,3,5,5,4)
  Total amount of active substance/s of fertilisers needed for the production of 'clover seed, Swiss integrated production, at farm' is calculated to be circa 3.88E-01 kg. Fertiliser/s used in this dataset is/are: 'phosphate fertiliser, as P2O5', 'potassium chloride, as K2O'. The total amount of active substance/s is doubled in order to account for the packaging of the dilluted product of fertiliser/s that is/are applied. Therefore, 7.75E-01 kg of packaging for fertilisers is justified with this exchange.
  properties: price 0.0642 EUR2005, wet mass 1 kg, carbon content, fossil 0.825301, dry mass 1 kg, heating value, net 25.01 MJ
  note on carbon content, fossil: Considering a chemical formula (C2H4)n for polyethylene, carbon content-fossil is calculated to be 0.856286 kg of Carbon per kg of dry mass.
- packaging, for pesticides: 0.001 kg; lognormal variance with pedigree 0.0912, pedigree (4,3,5,5,4)
  Total amount of active substance/s of pesticides needed for the production of clover seed, Swiss integrated production, at farm is calculated to be circa 5.00E-04 kg. Pesticide/s used in this dataset is/are: '[thio]carbamate-compound'. The total amount of active substance/s is doubled in order to account for the packaging of the dilluted product of pesticide/s that is/are applied. Therefore, 1.00E-03 kg of packaging for pesticides is justified with this exchange.
  properties: dry mass 1 kg, carbon content, fossil 0.85714, price 0.0642 EUR2005, wet mass 1 kg, heating value, net 25.97 MJ

## Inputs from nature
- Transformation, to annual crop, non-irrigated, intensive [natural resource, land]: 12.5 m2; lognormal variance with pedigree 0.0506, pedigree (2,1,5,1,1)
  Modelled, see '01_crop production_direct field emissions and natural resources_v1.0.pdf' - pdf-document on the dedicated talk page of ecoinvent (www.ecoinvent.org/documentation). Burden of clover seed production is approximated by 50% of the burden of co-production of clover seed and clover for forage on an intensive temporary meadow. For details see '01_crop production - seed production & processing_v1.0.pdf' - pdf-document on the dedicated talk page of ecoinvent (www.ecoinvent.org/documentation).
- Energy, gross calorific value, in biomass [natural resource, biotic]: 16.32 MJ; lognormal variance with pedigree 0.12706, pedigree (2,1,5,1,1)
- Carbon dioxide, in air [natural resource, in air]: 1.52004 kg; = 44/12 * (REF_PRODUCT_C_content_non_fossil * REF_PRODUCT * REF_PRODUCT_DM - SEED_C_content_non_fossil * SEED * SEED_DM); lognormal variance with pedigree 0.1307, pedigree (2,2,5,1,1)
  Only output of seed considered. Input of seed fully attributed to seed production. Modelled,see chapter 'CO2 binding' in '01_crop production_direct field emissions and natural resources_v1.0.pdf' - pdf-document on the dedicated talk page of ecoinvent (www.ecoinvent.org/documentation)
- Occupation, annual crop, non-irrigated, intensive [natural resource, land]: 12.5 m2*year; lognormal variance with pedigree 0.0406, pedigree (2,1,5,1,1)
  (same comment as for Transformation, to annual crop, non-irrigated, intensive)
- Transformation, from pasture, man made, intensive [natural resource, land]: 3.625 m2; lognormal variance with pedigree 0.0506, pedigree (2,1,5,1,1)
  (same comment as for Transformation, to annual crop, non-irrigated, intensive)
- Transformation, from annual crop, non-irrigated, intensive [natural resource, land]: 8.875 m2; lognormal variance with pedigree 0.0506, pedigree (2,1,5,1,1)
  (same comment as for Transformation, to annual crop, non-irrigated, intensive)

## Emissions to nature
- Mercury [soil, agricultural]: -3.5565e-8 kg
  (same comment as for Transformation, to annual crop, non-irrigated, intensive)
- Lead [soil, agricultural]: 7.1193e-7 kg; lognormal variance with pedigree 0.0807, pedigree (2,2,5,1,1)
  (same comment as for Transformation, to annual crop, non-irrigated, intensive)
- Lead [water, ground-]: 5.136e-8 kg; lognormal variance with pedigree 0.1307, pedigree (2,2,5,1,1)
  (same comment as for Transformation, to annual crop, non-irrigated, intensive)
- Zinc [soil, agricultural]: -5.1224e-5 kg
  (same comment as for Transformation, to annual crop, non-irrigated, intensive)
- Asulam [soil, agricultural]: 0.0005 kg; lognormal variance with pedigree 0.0507, pedigree (2,2,5,1,1)
  (same comment as for Transformation, to annual crop, non-irrigated, intensive)
- Copper, ion [water, ground-]: 3.0381e-6 kg; lognormal variance with pedigree 0.1307, pedigree (2,2,5,1,1)
  (same comment as for Transformation, to annual crop, non-irrigated, intensive)
- Nickel, ion [water, surface water]: 2.5273e-6 kg; lognormal variance with pedigree 0.1307, pedigree (2,2,5,1,1)
  (same comment as for Transformation, to annual crop, non-irrigated, intensive)
- Chromium, ion [water, ground-]: 2.2883e-5 kg; lognormal variance with pedigree 0.1307, pedigree (2,2,5,1,1)
  (same comment as for Transformation, to annual crop, non-irrigated, intensive)
- Phosphate [water, ground-]: 0.00028867 kg; lognormal variance with pedigree 0.0807, pedigree (2,2,5,1,1)
  (same comment as for Transformation, to annual crop, non-irrigated, intensive)
- Mercury [water, surface water]: 8.8812e-10 kg; lognormal variance with pedigree 0.1307, pedigree (2,2,5,1,1)
  (same comment as for Transformation, to annual crop, non-irrigated, intensive)
- Chromium [soil, agricultural]: -5.3912e-6 kg
  (same comment as for Transformation, to annual crop, non-irrigated, intensive)
- Dinitrogen monoxide [air, non-urban air or from high stacks]: 0.000523887 kg; name N2O; lognormal variance with pedigree 0.0707, pedigree (2,2,5,1,1)
  (same comment as for Transformation, to annual crop, non-irrigated, intensive)
- Nitrogen oxides [air, non-urban air or from high stacks]: 0.000110016 kg; = 0.21 * N2O; lognormal variance with pedigree 0.0707, pedigree (2,2,5,1,1)
  (same comment as for Transformation, to annual crop, non-irrigated, intensive)
- Copper, ion [water, surface water]: 3.2034e-6 kg; lognormal variance with pedigree 0.1307, pedigree (2,2,5,1,1)
  (same comment as for Transformation, to annual crop, non-irrigated, intensive)
- Phosphorus [water, surface water]: 0.00024632 kg; lognormal variance with pedigree 0.0807, pedigree (2,2,5,1,1)
  (same comment as for Transformation, to annual crop, non-irrigated, intensive)
- Cadmium, ion [water, ground-]: 5.4143e-8 kg; lognormal variance with pedigree 0.1307, pedigree (2,2,5,1,1)
  (same comment as for Transformation, to annual crop, non-irrigated, intensive)
- Zinc, ion [water, ground-]: 1.1597e-5 kg; lognormal variance with pedigree 0.1307, pedigree (2,2,5,1,1)
  (same comment as for Transformation, to annual crop, non-irrigated, intensive)
- Zinc, ion [water, surface water]: 4.7092e-6 kg; lognormal variance with pedigree 0.1307, pedigree (2,2,5,1,1)
  (same comment as for Transformation, to annual crop, non-irrigated, intensive)
- Cadmium, ion [water, surface water]: 6.9406e-8 kg; lognormal variance with pedigree 0.1307, pedigree (2,2,5,1,1)
  (same comment as for Transformation, to annual crop, non-irrigated, intensive)
- Cadmium [soil, agricultural]: 4.8078e-6 kg; lognormal variance with pedigree 0.0807, pedigree (2,2,5,1,1)
  (same comment as for Transformation, to annual crop, non-irrigated, intensive)
- Mercury [water, ground-]: 5.498e-10 kg; lognormal variance with pedigree 0.1307, pedigree (2,2,5,1,1)
  (same comment as for Transformation, to annual crop, non-irrigated, intensive)
- Chromium, ion [water, surface water]: 5.3736e-6 kg; lognormal variance with pedigree 0.1307, pedigree (2,2,5,1,1)
  (same comment as for Transformation, to annual crop, non-irrigated, intensive)
- Copper [soil, agricultural]: -3.9198e-5 kg
  (same comment as for Transformation, to annual crop, non-irrigated, intensive)
- Nickel [soil, agricultural]: -1.9587e-6 kg
  (same comment as for Transformation, to annual crop, non-irrigated, intensive)
- Lead [water, surface water]: 4.3679e-7 kg; lognormal variance with pedigree 0.1307, pedigree (2,2,5,1,1)
  (same comment as for Transformation, to annual crop, non-irrigated, intensive)
- Phosphate [water, surface water]: 0.00028867 kg; lognormal variance with pedigree 0.0807, pedigree (2,2,5,1,1)
  (same comment as for Transformation, to annual crop, non-irrigated, intensive)
- Nitrate [water, ground-]: 0.196854 kg; lognormal variance with pedigree 0.0807, pedigree (2,2,5,1,1)
  (same comment as for Transformation, to annual crop, non-irrigated, intensive)

## Sampling procedure
Data derived from literature, recommendations and expert information

## Extrapolations
This dataset has been extrapolated from year 2000 to the year of the calculation (2021). The uncertainty has been adjusted accordingly.

## Review by Assumpció ANTON 2012-01-19
For further versions it could be advisable to add some of intermediate values considered in the Exchanges properties sheet.

Regarding GLO datasets, it could also be interesting to add global average production in the world, so it will give an idea of representativeness of production considered and help to decide score for completeness.

In my opinion, and as a general comment, criteria for quality parameters (GLO and specific) will need more discussion

## Review by Hans-Jörg Althaus 2007-11-07
passed
none

## Review by Martin Kilga 2012-01-19
Validation?
