# wastewater treatment facility construction, capacity 4.7E10l/year

Dataset: EcoSpold 2, unit process
Geography: RoW
Time period: 1996-01-01 to 2021-12-31
Technology level: current
Classification: ISIC rev.4 ecoinvent: 4220:Construction of utility projects
Classification: EcoSpold01Categories: waste management/wastewater treatment
Synonyms: municipal WWTP infrastructure capacity class 1
Tags: ConvertedDataset
Scenario: Business-as-Usual
System model: Allocation, cut-off by classification
Generated by: Gabor Doka (obsolete)
Published in: Doka G. 2007
Database: ecoinvent
isCopyrightProtected: true
accessRestrictedTo: 1

## General comment
For municipal wastewater treatment plant WWTP capacity class 1 with an average per-captia equivalent PCE (Einwohnergleichwert) of 233'225 and an average annual sewage volume of 47.1 million m3/a. A lifetime of 30 years is assumed.
[This dataset was already contained in the ecoinvent database version 2. It was not individually updated during the transfer to ecoinvent version 3. Life Cycle Impact Assessment results may still have changed, as they are affected by changes in the supply chain, i.e. in other datasets. This dataset was generated following the ecoinvent quality guidelines for version 2. It may have been subject to central changes described in the ecoinvent version 3 change report (http://www.ecoinvent.org/database/ecoinvent-version-3/reports-of-changes/), and the results of the central updates were reviewed extensively. The changes added e.g. consistent water flows and other information throughout the database. The documentation of this dataset can be found in the ecoinvent reports of version 2, which are still available via the ecoinvent website. The change report linked above covers all central changes that were made during the conversion process.]

## Included activities end
Infrastructure materials for municipal wastewater treatment plant, transports, dismantling. Land use burdens.

## Geography
Specific to the technology mix encountered in Switzerland in 2000. Well applicable to modern treatment practices in Europe, North America or Japan.

## Technology
Three stage wastewater treatment (mechanical, biological, chemical) including sludge digestion (fermentation) according to the average technology in Switzerland

## Parameters
- fraction, tap water, to air: 0.15 dimensionless; name fraction_TW_to_air; lognormal variance with pedigree 0.092025, pedigree (4,4,3,2,4)
- fraction, process water, to air: 0.15 dimensionless; name fraction_PW_to_air; lognormal variance with pedigree 0.092025, pedigree (4,4,3,2,4)

## Reference product
- wastewater treatment facility, capacity 4.7E10l/year: 1 unit; CPC 53253: Sewage and water treatment plants; By-product classification allocatable product
  production volume 3.96633 unit
    This is a placeholder value that does not reflect real-world production volumes. This dataset does not currently require a real-world production volume to work in the database framework, and no actual data were collected yet. This has no negative effect on the results of the ecoinvent database.
  property price 7.06311e7 EUR2005
    Calculated based on inputs: The price of the product has been calculated as a sum of the values of the material and energy inputs for this product. This value is therefore a rough estimation. It may underestimate the real price since there are additional expenses when producing any product. These expences can include for example labour costs, treatment of waste materials and profit for the producer. Please consider carefully whether this level of data quality is acceptable for your application.

## Inputs from technosphere
- glass fibre: 498000 kg; lognormal variance with pedigree 0.3421, pedigree (1,2,5,5,1)
  Data from 3 plants
  properties: dry mass 1 kg, wet mass 1 kg
- concrete, medium strength: 0 m3; pedigree (1,1,1,1,1)
  Data from 3 plants
  properties: water content 0.086758, dry mass 2190 kg, wet mass 2380 kg
- chemical, organic: 1.03e6 kg; lognormal variance with pedigree 0.3421, pedigree (1,2,5,5,1)
  Data from 3 plants
  properties: heating value, net 19.03 MJ, wet mass 1 kg, dry mass 1 kg, carbon content, fossil 0.628
  note on carbon content, fossil: This dataset is an unweighted average of 20 organic substances (listed in Tab 88.1, ecoinvent v2.2 report 8, part II), being part of the top100 chemicals included in this database. The C-content has also been calculated as an unweighted average of the C content of the substances composing this dataset.
- polyethylene, high density, granulate: 622000 kg; lognormal variance with pedigree 0.3421, pedigree (1,2,5,5,1)
  Data from 3 plants
  properties: carbon content, fossil 0.857143, heating value, net 42.47 MJ, wet mass 1 kg, dry mass 1 kg
  note on carbon content, fossil: Polyethylene is formed out of a huge amount of ethylene monomers (C2H4) (ecoinvent v2.2 report 11_II). MW=28 g/mol
- tap water: 0 kg; name tap_water_input; pedigree (1,1,1,1,1)
  Data from 3 plants
  properties: wet mass 1 kg, water content 2962.17, dry mass 0.000337476 kg, carbon content, fossil 0.00178991
  note on carbon content, fossil: Bicarbonate content is 2.93 mol/m3. CO2 content is 0.1 mol/m3 (ecoinvent v2.2 report 8, Tab 93.1).
- chemical, inorganic: 127000 kg; lognormal variance with pedigree 0.3421, pedigree (1,2,5,5,1)
  Data from 3 plants
  properties: dry mass 1 kg, carbon content, fossil 0.003, wet mass 1 kg
  note on carbon content, fossil: This dataset is an unweighted average of 20 inorganic substances (listed in Tab 88.1, ecoinvent v2.2 report 8, part II), being part of the top100 chemicals included in this database. The C-content has also been calculated as an unweighted average of the C content of the substances composing this dataset.
- aluminium, cast alloy: 221000 kg; lognormal variance with pedigree 0.3421, pedigree (1,2,5,5,1)
  Data from 3 plants
  properties: dry mass 1 kg, wet mass 1 kg
- stone wool, packed: 222000 kg; lognormal variance with pedigree 0.3421, pedigree (1,2,5,5,1)
  Data from 3 plants
  properties: dry mass 1 kg, carbon content, fossil 0.015401, wet mass 1 kg
  note on carbon content, fossil: The chemical composition of the glass fibres used in the rock wool production is similar to the composition of naturally cooled volcano basalt and has a composition listed in Tab. 3.1 and 3.2 in ecoinvent v2.2 report 16, part XIV. Rock wool contains: a minimum of 96% mineral fibres,between 0.5 and 3.0 weight percent of phenolic resin depending on the specific product characteristics, and about 0.2 percent mineral oil (ecoinvent v2.2 report 16, part XIV). An average composition of 1.8% phenolic resin, 0.2% mineral oil, and 98% mineral fibres has been assumed and used to calculate C content of the rock wool
- waste mineral wool: 0 kg; pedigree (1,1,1,1,1)
  Data from 3 plants
  production volume 0 kg
    Calculated from the production volume of wastewater treatment facility, capacity 4.7E10l/year in proportion to the respective output amounts.
  properties: dry mass 1 kg, wet mass 1 kg
- synthetic rubber: 225000 kg; lognormal variance with pedigree 0.3421, pedigree (1,2,5,5,1)
  Data from 3 plants
  properties: wet mass 1 kg, carbon content, fossil 0.871949, dry mass 1 kg, heating value, net 26.42 MJ
  note on carbon content, fossil: EPDM (Ethylene-propene-diene terpolymer) rubber is a terpolymer of ethylene, propene, and a diene with the residual unsaturated portion of the diene in the side chain (ecoinvent v2.2 report 7-part XX & Ullmann). Chemical formula (deduced from Evidences of Solvent-Induced Miscibility in Polychloroprene-co-Ethylene-Propene Diene Terpolymer Blends, Dubey et al., Journal of Applied Polymer Science, 2009, 111:1884–1891): C20H35
- waste reinforced concrete: 0 kg; pedigree (1,1,1,1,1)
  Data from 3 plants
  production volume 0 kg
    (same comment as for waste mineral wool)
  properties: water content 0.00585407, dry mass 0.99418 kg, wet mass 1 kg
- steel, chromium steel 18/8, hot rolled: 1.59e6 kg; lognormal variance with pedigree 0.3421, pedigree (1,2,5,5,1)
  Data from 3 plants
  properties: wet mass 1 kg, carbon content, fossil 0.0008, dry mass 1 kg
  note on carbon content, fossil: Stainless steel model is the grade 304 steel (18/8 stainless, 18% chromium 8% nickel; max. 0.08% C)
- excavation, hydraulic digger: 889000 m3; lognormal variance with pedigree 0.3421, pedigree (1,2,5,5,1)
  Data from 3 plants
- waste bitumen sheet: -128000 kg; lognormal variance with pedigree 0.3421, pedigree (1,2,5,5,1)
  Data from 3 plants
  production volume 384000 kg
    (same comment as for waste mineral wool)
  properties: wet mass 1 kg, dry mass 0.985 kg, heating value, net 40.2 MJ, carbon content, fossil 0.643207, water content 0.0152284
  note on heating value, net: Literature value, Source: IPCC 2006, 2006 IPCC Guidelines for National Greenhouse Gas Inventories, Prepared by the National Greenhouse Gas Inventories Programme, Eggleston H.S., Buendia L., Miwa K., Ngara T. and Tanabe K. (eds). Published: IGES, Japan
  note on carbon content, fossil: The bitumen sheet is made of 63% bitumen, 24% surface spread and filler (assumed to be pure SiO2), 6% carrier fleece (assumed to be PE) and 7% elastomer (assumed to be PS) (ecoinvent v2.2 report 13_I, pg 40). C content of bitumen, PE and PS from Tab A.6 and A.1 (ecoinvent v2.2 report 13_I, pg 40), respectively. C content of waste also given in the dataset
- copper, cathode: 235000 kg; lognormal variance with pedigree 0.3421, pedigree (1,2,5,5,1)
  Data from 3 plants
  properties: dry mass 1 kg, wet mass 1 kg
- extrusion, plastic film: 626000 kg; lognormal variance with pedigree 0.3421, pedigree (1,2,5,5,1)
  Data from 3 plants
- waste polyethylene/polypropylene product: 0 kg; pedigree (1,1,1,1,1)
  Data from 3 plants
  production volume 0 kg
    (same comment as for waste mineral wool)
  properties: wet mass 1 kg, dry mass 0.847 kg, carbon content, fossil 0.748045, heating value, net 42.47 MJ, water content 0.180638
  note on carbon content, fossil: Mixed various plastics was used to estimate the C content of this waste (Tab A.2, ecoinvent v2.2 report 13_I)
- reinforcing steel: 1.98e7 kg; lognormal variance with pedigree 0.3421, pedigree (1,2,5,5,1)
  Data from 3 plants
  properties: wet mass 1 kg, dry mass 1 kg, carbon content, fossil 0.004
- limestone, crushed, washed: 5.5e6 kg; lognormal variance with pedigree 0.3421, pedigree (1,2,5,5,1)
  Data from 3 plants
  properties: carbon content, fossil 0.117257, dry mass 0.998 kg, wet mass 1 kg, water content 0.00200401
  note on carbon content, fossil: Table 3.1, ecoinvent v2.2 report 7, part VII, pg 3. MW CaCO3=100, MW MgCO3=84. C content of limestone is 0.117257 kg/kg DM
- polyethylene, low density, granulate: 4090 kg; lognormal variance with pedigree 0.3421, pedigree (1,2,5,5,1)
  Data from 3 plants
  properties: wet mass 1 kg, carbon content, fossil 0.857143, dry mass 1 kg, heating value, net 42.47 MJ
- electricity, medium voltage: 0 kWh; pedigree (1,1,1,1,1)
  Data from 3 plants
- pitch: 0 kg; pedigree (1,1,1,1,1)
  Data from 3 plants
  properties: wet mass 1 kg, dry mass 1 kg, carbon content, fossil 0.83, heating value, net 28 MJ
- concrete, medium strength: 8904.39, 3258.43, 12630.3, 9282.62, 2545.9, 219378 m3 (6 entries); lognormal variance with pedigree 0.3421, pedigree (1,2,5,5,1)
  Data from 3 plants
- tap water: 291538, 35093.3, 57997.4, 1.24709e7, 1.46247e6, 38045.7, 108220, 1.67357e7 kg (8 entries); lognormal variance with pedigree 0.3421, pedigree (1,2,5,5,1)
  Data from 3 plants
- waste mineral wool: -209388, -510612 kg (2 entries); lognormal variance with pedigree 0.3421, pedigree (1,2,5,5,1)
  Data from 3 plants
  production volume 2.16e6 kg
- waste reinforced concrete: -3.82406e7, -5.45759e8 kg (2 entries); lognormal variance with pedigree 0.3421, pedigree (1,2,5,5,1)
  Data from 3 plants
  production volume 1.752e9 kg
- waste polyethylene/polypropylene product: -240726, -610274 kg (2 entries); lognormal variance with pedigree 0.3421, pedigree (1,2,5,5,1)
  Data from 3 plants
  production volume 2.553e6 kg
- electricity, medium voltage: 98.8678, 18.9586, 435.319, 1441.26, 318.275, 4629.03, 652.464, 2125.82 kWh (8 entries); lognormal variance with pedigree 0.3421, pedigree (1,2,5,5,1)
  Data from 3 plants
- pitch: 5868.14, 334.436, 19445.6, 15136.5, 678.48, 968.595, 85568.2 kg (7 entries); lognormal variance with pedigree 0.3421, pedigree (1,2,5,5,1)
  Data from 3 plants

## Inputs from nature
- Transformation, to industrial area [natural resource, land]: 70000 m2; lognormal variance with pedigree 0.1632, pedigree (2,3,5,5,1)
  Estimate on land area from 3 plants
- Occupation, construction site [natural resource, land]: 70000 m2*year; lognormal variance with pedigree 0.0832, pedigree (2,3,5,5,1)
  Estimate on land area from 3 plants, class capacity size and building, operation time
- Transformation, from pasture, man made [natural resource, land]: 70000 m2; lognormal variance with pedigree 0.1632, pedigree (2,3,5,5,1)
  Estimate on land area from 3 plants
- Occupation, industrial area [natural resource, land]: 2.095e6 m2*year; lognormal variance with pedigree 0.0832, pedigree (2,3,5,5,1)
  Estimate on land area from 3 plants, class capacity size and building, operation time

## Emissions to nature
- Water [air, unspecified]: 4680 m3; name water_to_air_unspecified; lognormal variance with pedigree 0.0827, pedigree (2,2,5,5,1)
  Calculated value based on literature values and expert opinion. See comments in the parametres' comment field.
  property fraction, origin: fresh water 1; name fraction_origin_fresh_water
  property fraction, origin: salt water 0; name fraction_origin_salt_water
  property fraction, origin: unspecified 0; name fraction_origin_unspecified
- Water [water, unspecified]: 26520 m3; name water_to_water_unspecified; lognormal variance with pedigree 0.0827, pedigree (2,2,5,5,1)
  (same comment as for Water)
  property carbon content, non-fossil 0; name C_content_non_fossil
  property fraction, origin: fresh water 1; name fraction_origin_fresh_water_Ww
  property wet mass 1000 kg; name WM
  property fraction, origin: salt water 0; name fraction_origin_salt_water_Ww
  property fraction, origin: unspecified 0; name fraction_origin_unspecified_Ww
  property water in wet mass 1000 kg; name WWM
  property dry mass 0 kg; name DM
  property carbon content, fossil 0; name C_content_fossil

## Sampling procedure
data from literature

## Extrapolations
data from three Swiss WWTP, linearily extrapolated according to capacity class. This dataset has been copied from an original dataset covering the geography CH. The uncertainty has been adjusted accordingly.

## Review by Niels Jungbluth 2003-06-18
Passed.
