# municipal waste collection service by 21 metric ton lorry

Dataset: EcoSpold 2, unit process
Geography: RoW
Time period: 1991-01-01 to 2021-12-31
Technology level: current
Classification: EcoSpold01Categories: waste management/others
Classification: ISIC rev.4 ecoinvent: 3811:Collection of non-hazardous waste
Scenario: Business-as-Usual
System model: Allocation, cut-off by classification
Generated by: Gabor Doka (obsolete)
Published in: Doka G. 2007
Database: ecoinvent
isCopyrightProtected: true
accessRestrictedTo: 1

## General comment
based on a vehicle lifetime of 540'000 vehicle-kilometers

## Included activities end
Diesel fuel consumption, air emissions from fuel combustion for Stop&Go driving, tyre abrasion, brake lining abrasion, road abrasion and re-suspended road dust.

## Geography
Fuel consumption and uncertainty derived from literature values for settlement structure in Swiss and German municipalities.

## Technology
Waste collection and hydraulic compression vehicle. Gross load capactity 8.2 tons. Load factor 50%. Average load 4.1 tons. Emissions extrapolated from data for lorry 16t class (ecoinvent 2000 report No. 14). Adaptations for air emissions to Stop&Go driving from average driving emission factors.

## Reference product
- municipal waste collection service by 21 metric ton lorry: 1 metric ton*km; By-product classification allocatable product; CPC 94231: General waste collection services, residential
  EcoSpold01Location=CH
  production volume 3.96633 metric ton*km
    This is a placeholder value that does not reflect real-world production volumes. This dataset does not currently require a real-world production volume to work in the database framework, and no actual data were collected yet. This has no negative effect on the results of the ecoinvent database.
  property price 0.142645 EUR2005
    Calculated based on inputs: The price of the product has been calculated as a sum of the values of the material and energy inputs for this product. This value is therefore a rough estimation. It may underestimate the real price since there are additional expenses when producing any product. These expences can include for example labour costs, treatment of waste materials and profit for the producer. Please consider carefully whether this level of data quality is acceptable for your application.

## Inputs from technosphere
- road: 0.000641 m*year; lognormal variance with pedigree 0.044, pedigree (3,1,5,5,1)
  EcoSpold01Location=CH
  Road infrastructure maintenance.
  Uncertainty: basic uncertainty of 1
- waste collection lorry, 21 metric ton: 4.52e-7 unit; lognormal variance with pedigree 0.044, pedigree (3,1,5,5,1)
  Lorry infrastructure.
  EcoSpold01Location=CH
- diesel: 0 kg; pedigree (1,1,1,1,1)
  literature average for various Swiss and German municipalities. uncertainty from range in literature data
  EcoSpold01Location=CH
  properties: wet mass 1 kg, carbon content, fossil 0.865, dry mass 1 kg, heating value, net 42.8 MJ
  note on carbon content, fossil: C-content of diesel is 86.5% (ecoinvent v2.2 report 6_IV, Tab 3.14)
- diesel: 0.0122002, 0.000586513, 0.0512358, 0.0246227, 0.00172472, 0.00249288, 0.243137 kg (7 entries); lognormal variance with pedigree 0.052, pedigree (1,1,5,5,1)
  (same comment as for diesel)

## Emissions to nature
- Particulates, < 2.5 um [air, urban air close to ground]: 0.000615 kg; lognormal variance with pedigree 0.1627, pedigree (2,2,5,5,1)
  Fuel emissions for stop&go operation, abrasion of tyres, brake lining, road surface and road dust re-emission.. data from environmental agency
  Uncertainty: basic uncertainty of 2. data from environmental agency
- Lead [air, urban air close to ground]: 4.87e-9 kg; lognormal variance with pedigree 0.718, pedigree (4,5,5,5,1)
  Tyre abrasion. data from published expert estimate
  Uncertainty: basic uncertainty of 5. data from published expert estimate
- Sulfur dioxide [air, urban air close to ground]: 0.000202 kg; lognormal variance with pedigree 0.0426, pedigree (2,1,5,5,1)
  Fuel emissions.. data from published expert estimate
  Uncertainty: basic uncertainty of 1.05. data from published expert estimate
- Selenium [air, urban air close to ground]: 3.36e-9 kg; lognormal variance with pedigree 0.718, pedigree (4,5,5,5,1)
  Fuel emissions. data from published expert estimate
  Uncertainty: basic uncertainty of 5. data from published expert estimate
- Nitrogen oxides [air, urban air close to ground]: 0.00758 kg; lognormal variance with pedigree 0.0826, pedigree (2,1,5,5,1)
  Fuel emissions for stop&go operation.. data from environmental agency
  Uncertainty: basic uncertainty of 1.5. data from environmental agency
- Particulates, > 2.5 um, and < 10um [air, urban air close to ground]: 0.000105 kg; lognormal variance with pedigree 0.1646, pedigree (3,3,5,5,1)
  (same comment as for Particulates, < 2.5 um)
- Zinc [air, urban air close to ground]: 3.33e-6 kg; lognormal variance with pedigree 0.718, pedigree (4,5,5,5,1)
  Fuel emissions and tyre abrasion. data from published expert estimate
  Uncertainty: basic uncertainty of 5. data from published expert estimate
- Ammonia [air, urban air close to ground]: 7.95e-6 kg; lognormal variance with pedigree 0.0826, pedigree (2,1,5,5,1)
  Fuel emissions.. data from environmental agency
  Uncertainty: basic uncertainty of 1.5. data from environmental agency
- Cadmium [air, urban air close to ground]: 4.48e-9 kg; lognormal variance with pedigree 0.718, pedigree (4,5,5,5,1)
  (same comment as for Zinc)
- Carbon monoxide, fossil [air, urban air close to ground]: 0.00273 kg; lognormal variance with pedigree 0.6926, pedigree (2,1,5,5,1)
  Fuel emissions for stop&go operation. data from environmental agency
  Uncertainty: basic uncertainty of 5. data from environmental agency
- Methane, fossil [air, urban air close to ground]: 8.46e-5 kg; lognormal variance with pedigree 0.0826, pedigree (2,1,5,5,1)
  (same comment as for Nitrogen oxides)
- Xylene [air, urban air close to ground]: 2.71e-5 kg; lognormal variance with pedigree 0.0826, pedigree (2,1,5,5,1)
  Fuel emissions for stop&go operation.. data from published expert estimate
  Uncertainty: basic uncertainty of 1.5. data from published expert estimate
- Benzene [air, urban air close to ground]: 6.77e-5 kg; lognormal variance with pedigree 0.0826, pedigree (2,1,5,5,1)
  (same comment as for Nitrogen oxides)
- Chromium [air, urban air close to ground]: 1.69e-8 kg; lognormal variance with pedigree 0.718, pedigree (4,5,5,5,1)
  (same comment as for Selenium)
- NMVOC, non-methane volatile organic compounds, unspecified origin [air, urban air close to ground]: 0.00345 kg; lognormal variance with pedigree 0.0826, pedigree (2,1,5,5,1)
  (same comment as for Nitrogen oxides)
- Dinitrogen monoxide [air, urban air close to ground]: 5.25e-5 kg; lognormal variance with pedigree 0.0826, pedigree (2,1,5,5,1)
  (same comment as for Ammonia)
- Copper [air, urban air close to ground]: 5.71e-7 kg; lognormal variance with pedigree 0.718, pedigree (4,5,5,5,1)
  (same comment as for Selenium)
- Toluene [air, urban air close to ground]: 2.71e-5 kg; lognormal variance with pedigree 0.0826, pedigree (2,1,5,5,1)
  (same comment as for Xylene)
- Particulates, > 10 um [air, urban air close to ground]: 0.000175 kg; lognormal variance with pedigree 0.182, pedigree (3,5,5,5,1)
  (same comment as for Particulates, < 2.5 um)
- Nickel [air, urban air close to ground]: 2.35e-8 kg; lognormal variance with pedigree 0.718, pedigree (4,5,5,5,1)
  (same comment as for Selenium)
- Carbon dioxide, fossil [air, urban air close to ground]: 1.06 kg; lognormal variance with pedigree 0.0426, pedigree (2,1,5,5,1)
  Fuel emissions.. data from environmental agency
  Uncertainty: basic uncertainty of 1.05. data from environmental agency

## Sampling procedure
fuel consumption from specific literature data. Rest extrapolated from lorry 16t class (ecoinvent report No. 14).

## Extrapolations
see Technology/Text This dataset has been copied from an original dataset covering the geography CH. The uncertainty has been adjusted accordingly.

## Review by Carl Vadenbo 2012-06-28
In preparation for the release of ecoinvent v3.0, the inputs of road maintenance and decommissioning was removed from the dataset 'transport, municipal waste collection, lorry 21t, CH' and added to road construction instead. Furthermore, the dataset was renamed and extrapolated to 'municipal waste collection service by 21 metric ton lorry, GLO 1991-1996'. The removal of aforementioned exchanges was reviewed and the dataset was accepted for inclusion into the ecoinvent database on 2012.07.06. It is nevertheless recommended that the dataset is revised and that the meta-data is improved prior to subsequent releases of the database.

## Review by Niels Jungbluth 2005-07-19
Passed.
