# synthetic gas production, from wood, at fixed bed gasifier

Dataset: EcoSpold 2, unit process
Geography: RoW
Time period: 1995-01-01 to 2021-12-31
Technology level: current
Classification: ISIC rev.4 ecoinvent: 3520:Manufacture of gas; distribution of gaseous fuels through mains
Classification: EcoSpold01Categories: biomass/fuels
Synonyms: syngas; synthesis gas
Tags: ConvertedDataset
Scenario: Business-as-Usual
System model: Allocation, cut-off by classification
Share of production covered: 1 %
Generated by: Edgard Gnansounou
Published in: Jungbluth N. 2007
Database: ecoinvent
isCopyrightProtected: true
accessRestrictedTo: 1

## General comment
Composition (% mol.) of the resulting gas is 28.4% H2, 40.6% CO, 23.6% CO2, 5.9% CH4 and 1.5% CnHm (mol.) on a nitrogen and water free basis. Nitrogen content is 47.6%. Density is 1.15 kg/Nm3. Lower heating value of the gas is 5.2 MJ/Nm3. Heat is supplied by syngas combustion. Inventory refers to the net production of 1 Nm3 syngas. Net gas yield is 1.922 Nm3/kg of wood (dry matter).
[This dataset was already contained in the ecoinvent database version 2. It was not individually updated during the transfer to ecoinvent version 3. Life Cycle Impact Assessment results may still have changed, as they are affected by changes in the supply chain, i.e. in other datasets. This dataset was generated following the ecoinvent quality guidelines for version 2. It may have been subject to central changes described in the ecoinvent version 3 change report (http://www.ecoinvent.org/database/ecoinvent-version-3/reports-of-changes/), and the results of the central updates were reviewed extensively. The changes added e.g. consistent water flows and other information throughout the database. The documentation of this dataset can be found in the ecoinvent reports of version 2, which are still available via the ecoinvent website. The change report linked above covers all central changes that were made during the conversion process.]

## Included activities end
This process refers to the conversion of wood chips into synthetic gas. It includes drying (down to 10-15% moisture) and further comminution of wood chips (down to a size of 30x30x30 mm), fixed bed gasification of the wood chips and treatment of the resulting syngas to remove impurities and contaminants.

## Geography
Data from various literatures sources and gasification plants worldwide, and from one pilot plant in CH

## Technology
The technology corresponds to an average indirectly heated, atmospheric Fixed bed gasification, followed by a low temperature wet gas treatment. No energy integration with the subsequent processing of the gas is considered. The Fixed bed gasification plant is typically <2 MWth input capacity.

## Time period
Data from 1995 to 2004, first large scale facilities in the near future

## Parameters
- fraction, process water, to air: 0.15 dimensionless; name fraction_PW_to_air; lognormal variance with pedigree 0.092025, pedigree (4,4,3,2,4)
- fraction, tap water, to air: 0.15 dimensionless; name fraction_TW_to_air; lognormal variance with pedigree 0.092025, pedigree (4,4,3,2,4)

## Reference product
- synthetic gas: 1 m3; CPC 17200: Coal gas, water gas, producer gas and similar gases, other than petroleum gases and other gaseous hydrocarbons; By-product classification allocatable product
  EcoSpold01Location=CH
  production volume 1.41308e6 m3
    Estimate based on: "At present, only a few commercial small-scale biomass power gasifiers are operating globally. The majority are about a hundred rice husk gasifiers, located primarily in China. A declining number of charcoal gasifiers continue operation in Latin America, primarily Brazil. A few wood-fueled power gasifiers are in commercial operation in Latin America as well. The largest unit, about 1 MWeI, is installed in Paraguay." Quote: World Bank technical paper 296 (http://www.woodgas.net/files/World%20bank%20tech%20paper%20296.pdf)
  property carbon content, non-fossil 0.15525
    Density of the gas (1.15 kg/Nm3), and dry mass were used to convert 0.135 kgC/kg in kg C/Nm3. All data from Tab 18.6, ecoinvent v2.2 report n 17.
  property heating value, net 6.21 MJ
    Value taken from the general comment of "synthetic gas production, from wood, at fluidized bed gasifier" dataset.
  property carbon content 0.15525
    carbon content on a dry matter basis (reserved; not for manual entry)
  properties: carbon content, fossil 0, wet mass 1.15 kg, water content 0.100478, price 0.15 EUR2005, water in wet mass 0.105 kg, dry mass 1.045 kg, carbon allocation 0.162236 kg

## Inputs from technosphere
- wood ash mixture, pure: 0 kg; pedigree (1,1,1,1,1)
  EcoSpold01Location=CH
  Average of several literature sources
  Uncertainty: Average of several literature sources
  production volume 0 kg
    Calculated from the production volume of synthetic gas in proportion to the respective output amounts.
  properties: wet mass 1 kg, dry mass 1 kg, carbon content, non-fossil 0.012
- wood chips, wet, measured as dry mass: 0 kg; pedigree (1,1,1,1,1)
  EcoSpold01Location=RER
  Yield from literature survey, distribution from IEA Task 33 CH report
  Uncertainty: Yield from literature survey, distribution from IEA Task 33 CH report
  properties: dry mass 1 kg, water content 1.4, carbon content, non-fossil 0.494, wet mass 2.4 kg, heating value, net 10.84 MJ
  note on carbon content, non-fossil: C content of dry mass is 0.494 kgC/kg dry wood (ecoinvent v2.2 report 9).
  note on heating value, net: Value based on the dataset 'softwood forestry, mixed species, sustainable forest management'
- electricity, medium voltage: 0 kWh; pedigree (1,1,1,1,1)
  Several literature sources
  EcoSpold01Location=CH
  Uncertainty: Several literature sources
- synthetic gas factory: 9.1195e-10 unit; lognormal variance with pedigree 0.396, pedigree (4,5,5,5,3)
  Calculated from the production and input capacity of the reference plant
  EcoSpold01Location=CH
  Uncertainty: Calculated from the production and input capacity of the reference plant
- sodium hydroxide, without water, in 50% solution state: 0.00083927 kg; lognormal variance with pedigree 0.0726, pedigree (3,3,5,5,3)
  Calculated from a typical quality of untreated syngas from wood
  EcoSpold01Location=RER
  Uncertainty: Calculated from a typical quality of untreated syngas from wood
  properties: dry mass 1 kg, wet mass 1 kg, heating value, net 3.03 MJ
- sulfuric acid: 0.0033346 kg; lognormal variance with pedigree 0.0726, pedigree (3,3,5,5,3)
  (same comment as for sodium hydroxide, without water, in 50% solution state)
  properties: dry mass 1 kg, wet mass 1 kg
- wood chips, dry, measured as dry mass: 0.102586 kg; lognormal variance with pedigree 0.0712, pedigree (2,3,5,5,3)
  (same comment as for wood chips, wet, measured as dry mass)
  properties: water content 0.4, dry mass 1 kg, carbon content, non-fossil 0.494, wet mass 1.4 kg, heating value, net 9.99 MJ
- wastewater, from residence: -0.00010147 m3; lognormal variance with pedigree 0.096, pedigree (4,5,5,5,3)
  EcoSpold01Location=CH
  Weak data, specific quality of waste water was not considered
  Uncertainty: Weak data, specific quality of waste water was not considered
  production volume 143.385 m3
    (same comment as for wood ash mixture, pure)
  properties: water content 2962.17, wet mass 1000 kg, carbon content, non-fossil 0.199421, dry mass 0.337476 kg
  note on carbon content, non-fossil: 0.0673 kg TOC/m3 (Tab A.17, ecoinvent v2.2 report 13_I). TOC was considered as Total Carbon.
- industrial furnace, natural gas: 1.8939e-9 unit; lognormal variance with pedigree 0.38, pedigree (3,5,5,5,3)
  Calculation based on energy demand of the process
  EcoSpold01Location=RER
  Uncertainty: Calculation based on energy demand of the process
- tap water: 0 kg; name tap_water_input; pedigree (1,1,1,1,1)
  Weak data, one literature reference only (pilot plant)
  EcoSpold01Location=CH
  Uncertainty: Weak data, one literature reference only (pilot plant)
  properties: wet mass 1 kg, carbon content, fossil 0.00178991, dry mass 0.000337476 kg, water content 2962.17
  note on carbon content, fossil: Bicarbonate content is 2.93 mol/m3. CO2 content is 0.1 mol/m3 (ecoinvent v2.2 report 8, Tab 93.1).
- wood ash mixture, pure: -0.00131493, -0.00274177 kg (2 entries); lognormal variance with pedigree 0.0712, pedigree (2,3,5,5,3)
  (same comment as for wood ash mixture, pure)
  production volume 5732.44 kg
- wood chips, wet, measured as dry mass: 0.000822601, 0.0074124, 0.363056 kg (3 entries); lognormal variance with pedigree 0.0712, pedigree (2,3,5,5,3)
  (same comment as for wood chips, wet, measured as dry mass)
- electricity, medium voltage: 0.000279637, 5.36224e-5, 0.00123125, 0.00407646, 0.000900208, 0.0130927, 0.00184543, 0.00601267 kWh (8 entries); lognormal variance with pedigree 0.0726, pedigree (3,3,5,5,3)
  Several literature sources
  EcoSpold01Location=CH
  Uncertainty: Several literature sources
- tap water: 0.00138237, 0.000166401, 0.000275004, 0.0591329, 0.00693452, 0.0001804, 0.000513145, 0.0793553 kg (8 entries); lognormal variance with pedigree 0.08, pedigree (3,5,5,5,3)
  (same comment as for tap water)

## Emissions to nature
- Butane [air, urban air close to ground]: 2.4877e-7 kg; lognormal variance with pedigree 0.338, pedigree (4,5,5,5,5)
  Calculation, from syngas composition and natural gas combustion
  Uncertainty: Calculation, from syngas composition and natural gas combustion
- Particulates, < 2.5 um [air, urban air close to ground]: 7.1077e-8 kg; lognormal variance with pedigree 0.598, pedigree (4,5,5,5,5)
  (same comment as for Butane)
- Mercury [air, urban air close to ground]: 1.0662e-11 kg; lognormal variance with pedigree 0.938, pedigree (4,5,5,5,5)
  (same comment as for Butane)
- Nitrogen oxides [air, urban air close to ground]: 6.3619e-6 kg; lognormal variance with pedigree 0.338, pedigree (4,5,5,5,5)
  (same comment as for Butane)
- Water [water, unspecified]: 2.4279e-5 m3; name water_to_water_unspecified; = (tap_water_input/1000)*(1-fraction_TW_to_air)-0.00010147; lognormal variance with pedigree 0.0827, pedigree (2,2,5,5,1)
  Calculated value based on literature values and expert opinion. See comments in the parametres' comment field.
  property dry mass 0 kg; name DM
  property fraction, origin: salt water 0; name fraction_origin_salt_water_Ww
  property fraction, origin: fresh water 1; name fraction_origin_fresh_water_Ww
  property fraction, origin: unspecified 0; name fraction_origin_unspecified_Ww
  property carbon content, fossil 0; name C_content_fossil
  property water in wet mass 1000 kg; name WWM
  property carbon content, non-fossil 0; name C_content_non_fossil
  property wet mass 1000 kg; name WM
- Propane [air, urban air close to ground]: 7.1077e-8 kg; lognormal variance with pedigree 0.338, pedigree (4,5,5,5,5)
  (same comment as for Butane)
- Pentane [air, urban air close to ground]: 4.2646e-7 kg; lognormal variance with pedigree 0.338, pedigree (4,5,5,5,5)
  (same comment as for Butane)
- Carbon monoxide, non-fossil [air, urban air close to ground]: 7.4631e-7 kg; lognormal variance with pedigree 0.938, pedigree (4,5,5,5,5)
  (same comment as for Butane)
- Dioxins, measured as 2,3,7,8-tetrachlorodibenzo-p-dioxin [air, urban air close to ground]: 0 kg; pedigree (1,1,1,1,1)
  (same comment as for Butane)
- Methane, non-fossil [air, urban air close to ground]: 7.1077e-7 kg; lognormal variance with pedigree 0.338, pedigree (4,5,5,5,5)
  (same comment as for Butane)
- Benzene [air, urban air close to ground]: 1.4215e-7 kg; lognormal variance with pedigree 0.338, pedigree (4,5,5,5,5)
  (same comment as for Butane)
- Propionic acid [air, urban air close to ground]: 7.1077e-9 kg; lognormal variance with pedigree 0.338, pedigree (4,5,5,5,5)
  (same comment as for Butane)
- Water [air, unspecified]: 2.2191e-5 m3; name water_to_air_unspecified; lognormal variance with pedigree 0.0827, pedigree (2,2,5,5,1)
  (same comment as for Water)
  property fraction, origin: salt water 0; name fraction_origin_salt_water
  property fraction, origin: unspecified 0; name fraction_origin_unspecified
  property fraction, origin: fresh water 1; name fraction_origin_fresh_water
- Benzo(a)pyrene [air, urban air close to ground]: 3.5538e-12 kg; lognormal variance with pedigree 0.598, pedigree (4,5,5,5,5)
  (same comment as for Butane)
- Sulfur dioxide [air, urban air close to ground]: 1.9546e-7 kg; lognormal variance with pedigree 0.298, pedigree (4,5,5,5,5)
  (same comment as for Butane)
- Acetic acid [air, urban air close to ground]: 5.3308e-8 kg; lognormal variance with pedigree 0.338, pedigree (4,5,5,5,5)
  (same comment as for Butane)
- Toluene [air, urban air close to ground]: 7.1077e-8 kg; lognormal variance with pedigree 0.338, pedigree (4,5,5,5,5)
  (same comment as for Butane)
- PAH, polycyclic aromatic hydrocarbons [air, urban air close to ground]: 3.5538e-9 kg; lognormal variance with pedigree 0.598, pedigree (4,5,5,5,5)
  (same comment as for Butane)
- Dinitrogen monoxide [air, urban air close to ground]: 3.5538e-8 kg; lognormal variance with pedigree 0.338, pedigree (4,5,5,5,5)
  (same comment as for Butane)
- Formaldehyde [air, urban air close to ground]: 3.5538e-8 kg; lognormal variance with pedigree 0.338, pedigree (4,5,5,5,5)
  (same comment as for Butane)
- Acetaldehyde [air, urban air close to ground]: 3.5538e-10 kg; lognormal variance with pedigree 0.338, pedigree (4,5,5,5,5)
  (same comment as for Butane)
- Carbon dioxide, non-fossil [air, urban air close to ground]: 0.37368 kg; lognormal variance with pedigree 0.06, pedigree (1,1,5,5,3)
  Calculation, to close carbon balance
  Uncertainty: Calculation, to close carbon balance

## Sampling procedure
Cross-checking of various literature sources and pilot-to-demonstration plant operation data, adapted to Swiss context

## Extrapolations
none This dataset has been copied from an original dataset covering the geography CH. The uncertainty has been adjusted accordingly.

## Review by Niels Jungbluth 2006-10-17
Passed.
none
