# sodium chloride electrolysis

Dataset: EcoSpold 2, unit process
Geography: RoW
Time period: 2010-01-01 to 2021-12-31
Technology level: current
Classification: ISIC rev.4 ecoinvent: 2011:Manufacture of basic chemicals
Scenario: Business-as-Usual
System model: Allocation, cut-off by classification
Generated by: Jürgen Sutter
Database: ecoinvent
isCopyrightProtected: true
accessRestrictedTo: 1

## General comment
Sodium is the best-known alkali metal. Sodium crystallizes from the melt with a body- centered cubic crystal lattice. It has typical metallic properties, including high thermal and electrical conductivity, the electrical conductivity of sodium at 20 °C being about one-third that of copper. It is liquid over a wide temperature range from 97.8 to 881.4 °C and has a fairly low vapor pressure, which is an important requirement for production in an electrolytic cell.
Sodium can be obtained from many of its compounds by high-temperature reduction. In the older thermochemical methods, sodium carbonate or sodium hydroxide was reacted with charcoal or coal, sulfur, or iron. Other compounds of sodium, such as the chloride, sulfide, sulfate, and cyanide were also used. A serious disadvantage of thermochemical methods was that reverse and secondary reactions occurred. Despite these problems, patents were applied for, covering many variations of the thermochemical methods of production. In a Du Pont patent, sodium carbonate or sodium hydroxide was reduced with coal. The gases formed in the reaction were passed through molten tin, which absorbed the sodium vapor. Sodium was then recovered from the tin in an additional process step. According to a patent of Pechiney S. A., NaCl vapor is passed over calcium carbide at 800 – 1000 °C, and the sodium formed is collected in oil. In a Dow Chemical Co. process, sodium carbonate is reduced with coal at > 1200 °C. The sodium vapor formed is condensed in liquid sodium.
Sodium is produced by an electrolysis of sodium chloride.
Frischknecht R., Jungbluth N., Althaus H.-J., Doka G., Dones R., Heck T., Hellweg S., Hischier R., Nemecek T., Rebitzer G. and Spielmann M. (2007) Overview and Methodology. Final report ecoinvent v2.0 No. 1. Swiss Centre for Life Cycle Inventories, Dübendorf, CH, retrieved from: www.ecoinvent.org.

Gendorf (2000) Umwelterklärung 2000, Werk Gendorf. Werk Gendorf, Burgkirchen as pdf-File under: http://www.gendorf.de/pdf/umwelterklaerung2000.pdf

Alfred Klemm, Gabriele Hartmann, Ludwig Lange: Sodium and Sodium Alloys. Published online: 2003. In: Ullmann's Encyclopedia of Industrial Chemistry, Seventh Edition, 2004 Electronic Release (ed. Fiedler E., Grossmann G., Kersebohm D., Weiss G. and Witte C.). 7 th Electronic Release Edition. Wiley InterScience, New York, Online-Version under: DOI: 10.1002/14356007.a24_277

## Included activities end
Sodium chloride electrolysis including materials, energy uses, infrastructure and emissions.

## Geography
The inventory is modelled for the world.

## Technology
Sodium chloride electrolysis

## Parameters
- fraction, cooling water, recirculating system, to air: 0.771 dimensionless; name fraction_CW_R_to_air; lognormal variance with pedigree 0.0413, pedigree (2,3,1,3,1)
  Calculated based on literature value (Scown, C.D., 2011, Water Footprint of U.S. Transportation Fuels and supplying information of the article) (Vionnet, S., Quantis Water Database - Technical Report, 2012).
- fraction, cooling water, once-through system, to air: 0.004 dimensionless; name fraction_CW_OT_to_air; lognormal variance with pedigree 0.0413, pedigree (2,3,1,3,1)
  (same comment as for fraction, cooling water, recirculating system, to air)
- fraction, cooling water, to air: 0.3875 dimensionless; name fraction_CW_to_air; = (0.5*fraction_CW_OT_to_air)+(0.5*fraction_CW_R_to_air); lognormal variance with pedigree 0.092025, pedigree (4,4,3,2,4)
  Calculated value based on literature value (see comments of the other parametres present in this dataset) and expert opinion. In the case when no industry/literature data are available about the type of cooling or directly fraction, cooling water, to air specific for the process a default assumption is applied. It is assumed that the once-through cooling system is used in 50% of all cases and recirculating system is used in another 50% of all cases.
- fraction, cooling water, cooling pond system, to air: 0.032 dimensionless; name fraction_CW_CP_to_air; lognormal variance with pedigree 0.0413, pedigree (2,3,1,3,1)
  (same comment as for fraction, cooling water, recirculating system, to air)

## Reference product
- sodium: 1 kg; name RP_amount_1; CPC 34231: Chemical elements n.e.c.; inorganic acids except phosphoric, nitric and sulphonitric; inorganic oxygen compoun[…]; By-product classification allocatable product; CAS 7440-23-5
  Stoichiometric calculation
  production volume 5.5e7 kg; name RP_PV_1
    1993 (Ulmanns 2003)
  property price 1.69 EUR2005
    2005 import and export prices (total trades (USD) divided by total weight (kg); average 2005 prices for EU27, USA, China, Japan and India from Import/Export data (US$ and tonnes) in UN Commodity Trade Statistics Databasefrom UN Commodity Trade Statistics Database. Commodity: Sodium
  property carbon content, fossil 0
    Calculated based on molecular structure. See tab "chemicals".
  property carbon content 0
    carbon content on a dry matter basis (reserved; not for manual entry)
  property true value 0.63713; name RP_amount_1_true_value
    allocation property applied in "true value" allocation // value calculated from revenue
  properties: dry mass 1 kg, water content 0, water in wet mass 0 kg, wet mass 1 kg, carbon content, non-fossil 0, carbon allocation 0 kg

## By-products
- chlorine, gaseous: 0 kg; name BP_amount_1; CPC 34231: Chemical elements n.e.c.; inorganic acids except phosphoric, nitric and sulphonitric; inorganic oxygen compoun[…]; By-product classification allocatable product; CAS 7782-50-5; pedigree (1,1,1,1,1)
  Stoichiometric calculation
  production volume 8.35942e7 kg; = RP_PV_1 * (BP_amount_1 / RP_amount_1)
    Calculated from production volume of reference product using the relative outputs.
  property price 0.141 EUR2005
    Global average price for gaseous chlorine derived from the global average price of liquid chlorine by substracting the cost of inputs (0.07 KWh of electricity, medium voltage) needed for the liquefaction (0.007EUR/kg of liquid chlorine at an electricity price of 0.1EUR/kWh). The price for liquid chlorine (0.148 EUR/kg) was calculated as weighted average of the European (238Eur/tonne), US (223EUR/tonne) and the Chinese (84EUR/tonne) (Tecnon OrbiCHem, 2016) price according to the region's market shares (Europe 15%, US 20%, China 45%) scaled to 100% (ruschlor.ru, 2014).
    Reference(s):
    Tecnon OrbiCHem. 2016. Chem-Netfacts, Chemical insight an foresight - on a single page, Chlorine, 1 April 2016, document requested at http://www.orbichem.com/Chem-Netfacts.aspx?P_ID=208, 6 October 2017;
    ruschlor.ru. 2014. International Outlook for the Future of the Chinese Chlor-Alkali Industry retrieved from http://ruschlor.ru/english/images/stories/Pekin%20/Otchet_Engl/_.doc, 6 October 2017
  property carbon content 0
    carbon content on a dry matter basis (reserved; not for manual entry)
  property true value 0.080793; name BP_amount_1_true_value
    allocation property applied in "true value" allocation // value calculated from revenue
  properties: carbon content, fossil 0, wet mass 1 kg, carbon content, non-fossil 0, water content 0, dry mass 1 kg, water in wet mass 0 kg, carbon allocation 0 kg

## Inputs from technosphere
- electricity, medium voltage: 0 kWh; pedigree (1,1,1,1,1)
  Ullmanns 2004
- chemical factory, organics: 3.55456e-10 unit; lognormal variance with pedigree 0.218, pedigree (4,5,5,5,5)
  Estimation
- heat, from steam, in chemical industry: 4.70803 MJ; lognormal variance with pedigree 4.178, pedigree (4,5,5,5,5)
  Estimation
  properties: heating value, net 1 MJ
- sodium chloride, powder: 2.35401 kg; lognormal variance with pedigree 0.1207, pedigree (5,3,5,3,1)
  functional unit
  properties: dry mass 1 kg, wet mass 1 kg
- electricity, medium voltage: 0.0139759, 0.00267997, 0.0449912, 0.654356, 0.0922318, 0.300505 kWh (6 entries); lognormal variance with pedigree 0.0807, pedigree (1,3,5,3,1)
  Ullmanns 2004

## Inputs from nature
- Water, cooling, unspecified natural origin [natural resource, in water]: 0.0212803 m3; name water_cooling_UNO_input; lognormal variance with pedigree 0.218, pedigree (4,5,5,5,5)
  Estimation
  Estimation

## Emissions to nature
- Sodium, ion [water, surface water]: 0.0466095 kg; lognormal variance with pedigree 0.218, pedigree (4,5,5,5,5)
  Estimation
- Chloride [water, surface water]: 0.0710912 kg; lognormal variance with pedigree 0.218, pedigree (4,5,5,5,5)
  Estimation
- Water [air, unspecified]: 0.00824611 m3; name water_to_air_unspecified; = water_cooling_UNO_input*fraction_CW_to_air; lognormal variance with pedigree 0.130025, pedigree (4,4,5,2,4)
  Calculated value based on literature values and expert opinion. See comments in the parametres' comment field.
  property fraction, origin: salt water 0; name fraction_origin_salt_water
  property fraction, origin: unspecified 1; name fraction_origin_unspecified
  property fraction, origin: fresh water 0; name fraction_origin_fresh_water
- Water [water, unspecified]: 0.0130342 m3; name water_to_water_unspecified; = water_cooling_UNO_input*(1-fraction_CW_to_air); lognormal variance with pedigree 0.130025, pedigree (4,4,5,2,4)
  (same comment as for Water)
  property fraction, origin: salt water 0; name fraction_origin_salt_water_Ww
  property fraction, origin: unspecified 1; name fraction_origin_unspecified_Ww
  property fraction, origin: fresh water 0; name fraction_origin_fresh_water_Ww

## Extrapolations
Transports and emissions are modelled with standard methods.
