# irrigation, surface

Dataset: EcoSpold 2, unit process
Geography: RoW
Time period: 2015-01-01 to 2021-12-31
Technology level: current
Classification: ISIC rev.4 ecoinvent: 0161:Support activities for crop production
Scenario: Business-as-Usual
System model: Allocation, cut-off by classification
Generated by: Simon Gmünder
Published in: Gmünder S. 2017
Database: ecoinvent
isCopyrightProtected: true
accessRestrictedTo: 1

## General comment
This dataset represents the surface irrigation with a 45% irrigation efficieny (FAO 1989). The inventory includes the water pumping of ground water and surface water. The water supplied to the plants (1m3) and the water evaporated or infiltrated shall be included in the crop production datasets.

## Included activities start
This dataset starts with pumping water from wells and water bodies.

## Included activities end
This dataset ends with delivering water to the plant and includes the water pumping, energy use, but not the water emissions of irrigation (shall be included in the crop production dataset). The basins and furrows used for surface irrigation are typically made from natural materials and no infrastructure is assumed.

## Geography
This dataset contains global data and general, technology specific information.

## Technology
Surface irrigation is the application of water by gravity flow to the surface of the field. This application can be either the entire field is flooded (basin irrigation) or the water is fed into small channels (furrows) or strips of land (borders).

## Time period
The data was collected for the given time range.

## Parameters
- engine eficiency, diesel: 0.6 dimensionless; name engine_efficiency_diesel; lognormal variance with pedigree 0.0193, pedigree (4,5,3,3,2)
  Estimated value. The drive or motor efficiency is mainly dependent on the type of motor and the load. The efficiency typically ranges between 70% and 90% for electric motors and between 50% and 75% for diesel engines. For this study we use an efficiency of 80% for electric motors and 60% for diesel motors.
- engine efficiency, electricity: 0.8 dimensionless; name Engine_efficiency_electricity; lognormal variance with pedigree 0.0193, pedigree (4,5,3,3,2)
  (same comment as for engine eficiency, diesel)
- fraction surface irrigation: 0.8 dimensionless; name fraction_surface_irrigation; = 1- fraction_drip- fraction_sprinkler_irrigation; lognormal variance with pedigree 0.0193, pedigree (4,5,3,3,2)
  Literature value. Share of surface irrigation technology per country. The AQUASTAT database reports water statistics at country level (FAO, 2016). For European countries the agri-environmental indicator “irrigation methods” of the Eurostat database is used (Eurostat, 2017). For Canada, specific statistics are available in the report “Irrigation methods and conservation practices on Canadian farms” (Statistics Canada, 2012). The information for US irrigation data is based on the irrigation farm survey from 2013 (USDA, 2014). The irrigation efficiency is used to convert the share of irrigation technologies per area (ha) to the amount of water used for irrigation (m3). fraction_drip + fraction_sprinkler_irrigation + fraction_surface_irrigation =1
- fraction drip irrigation: 0.04 dimensionless; name fraction_drip; lognormal variance with pedigree 0.0193, pedigree (4,5,3,3,2)
  Literature value. Share of drip irrigation technology per country. The AQUASTAT database reports water statistics at country level (FAO, 2016). For European countries the agri-environmental indicator “irrigation methods” of the Eurostat database is used (Eurostat, 2017). For Canada, specific statistics are available in the report “Irrigation methods and conservation practices on Canadian farms” (Statistics Canada, 2012). The information for US irrigation data is based on the irrigation farm survey from 2013 (USDA, 2014). The irrigation efficiency is used to convert the share of irrigation technologies per area (ha) to the amount of water used for irrigation (m3). fraction_drip + fraction_sprinkler_irrigation + fraction_surface_irrigation =1
- diesel consumption for installation: 0 dimensionless; name diesel_consumption
  Estimated value. No energy consumption is assumed for surface irrigation (Gmuender et al, 2017).
- elevation head ground water: 30 dimensionless; name head_GW; lognormal variance with pedigree 0.0193, pedigree (4,5,3,3,2)
  Approximation. We approximate the average ground water table for each country by overlaying data on the areas with irrigation with information on the average ground water table. (Gmuender et al, 2017)
- elevation head surface water: 7 dimensionless; name head_SW; lognormal variance with pedigree 0.0193, pedigree (4,5,3,3,2)
  Approximation. Surface water irrigation systems can be based purely on gravity or use water pumps to lift water. Since no country specific surface for lift data is available, we assume a 7m lift for surface water for pressurized systems and for gravity systems based on US irrigation survey on lift from surface water irrigation (USDA, 2014).
- fraction sprinkler irrigation: 0.16 dimensionless; name fraction_sprinkler_irrigation; lognormal variance with pedigree 0.0193, pedigree (4,5,3,3,2)
  Literature value. Share of sprinkler irrigation technology per country. The AQUASTAT database reports water statistics at country level (FAO, 2016). For European countries the agri-environmental indicator “irrigation methods” of the Eurostat database is used (Eurostat, 2017). For Canada, specific statistics are available in the report “Irrigation methods and conservation practices on Canadian farms” (Statistics Canada, 2012). The information for US irrigation data is based on the irrigation farm survey from 2013 (USDA, 2014). The irrigation efficiency is used to convert the share of irrigation technologies per area (ha) to the amount of water used for irrigation (m3). fraction_drip + fraction_sprinkler_irrigation + fraction_surface_irrigation =1'
- fraction non-conventional water: 0.000836994 dimensionless; name fraction_NC
  Literature value. The share of water used for irrigation from non-conventional water sources, The Global Map of Irrigation Areas (GMIA) version 5 includes sub-national irrigation statistics for most countries for the base year 2005 (Siebert et al., 2013). GMIA specifies between areas equipped for irrigation with ground water, surface water and non-conventional water sources. Non-conventional water is water from which the water source is not known or from waste water (mainly tap water). The surface water is considered as “water from river” and the ground water withdrawal as “water from well in ground”. fraction_SW + fraction_GW + fraction_NC = 1
- fraction ground water: 0.387289 dimensionless; name fraction_GW; = 1-fraction_NC-fraction_SW; lognormal variance with pedigree 0.0193, pedigree (4,5,3,3,2)
  Literature value. The share of water used for irrigation from ground water sources. The Global Map of Irrigation Areas (GMIA) version 5 includes sub-national irrigation statistics for most countries for the base year 2005 (Siebert et al., 2013). GMIA specifies between areas equipped for irrigation with ground water, surface water and non-conventional water sources. Non-conventional water is water from which the water source is not known or from waste water. The surface water is considered as “water from river” and the ground water withdrawal as “water from well in ground”. fraction_SW + fraction_GW + fraction_NC = 1
- pump efficiency: 0.7 dimensionless; name pump_efficiency; lognormal variance with pedigree 0.0193, pedigree (4,5,3,3,2)
  Estimated value. The water pump efficiency is defined as the water power divided by the power input at the pump shaft and the efficiency losses are cause for example due to friction losses or leakages. The efficiency typically ranges between 50% and 80%. For this study we assume an efficiency of 70%.
- dynamic pressure head: 0 dimensionless; name head_DP
  Approximation. The friction head and pressure head for drip irrigation is assumed to be 2.65 bar or 27m and 3.7 bar or 37.7m for sprinkler systems (FAO 2007). Traditional surface gravity methods do not need external energy for operation.
- fraction surface water: 0.611874 dimensionless; name fraction_SW; lognormal variance with pedigree 0.0193, pedigree (4,5,3,3,2)
  Literature value. The share of water used for irrigation from surface water sources, The Global Map of Irrigation Areas (GMIA) version 5 includes sub-national irrigation statistics for most countries for the base year 2005 (Siebert et al., 2013). GMIA specifies between areas equipped for irrigation with ground water, surface water and non-conventional water sources. Non-conventional water is water from which the water source is not known or from waste water. The surface water is considered as “water from river” and the ground water withdrawal as “water from well in ground”. fraction_SW + fraction_GW + fraction_NC = 1
- fraction of electricity pumps: 0.7 dimensionless; name fraction_el; = 1- fraction_diesel; lognormal variance with pedigree 0.0193, pedigree (4,5,3,3,2)
  Estimated value. Diesel or electrical energy are most commonly used through pumping systems to lift water for irrigation on farms. We use different literature source to estimate the split between electric and diesel water pumps.
- water withdrawal for irrigation: 2.67264e12 dimensionless; name WW_irrigation; lognormal variance with pedigree 0.012625, pedigree (3,1,3,2,3)
  Literature value. Derived from FAO. (2016). AQUASTAT website. Food and Agriculture Organization of the United Nations (FAO).
- fraction of diesel pumps: 0.3 dimensionless; name fraction_diesel; lognormal variance with pedigree 0.0193, pedigree (4,5,3,3,2)
  (same comment as for fraction of electricity pumps)

## Reference product
- irrigation: 1 m3; CPC 86119: Other support services to crop production; By-product classification allocatable product
  production volume 9.02157e11 m3; name PV_surface_irrigation; = WW_irrigation*fraction_surface_irrigation
    Calculated value. Based on the amount of irrigated water (FAO. 2016) and the share of surface irrigation technology per country.
  property price 0.127 EUR2005; name irrigation_price_EUR2005
    Calculated relative to 'Irrigating' ids 6978. Ecoinvent report 15, top page 65: 1/1200
  property carbon content 0
    carbon content on a dry matter basis (reserved; not for manual entry)
  properties: wet mass 1000 kg, carbon content, non-fossil 0, water content 9089.91, carbon content, fossil 0, water in wet mass 999.89 kg, dry mass 0.11 kg, carbon allocation 0 kg

## Inputs from technosphere
- water pump operation, diesel: 0.111313 MJ; = fraction_diesel*(9.8*(fraction_GW*head_GW+fraction_SW*head_SW+head_DP)*1000)/((3.6*1000000)*pump_efficiency*engine_efficiency_diesel)*3.6; lognormal variance with pedigree 0.0133, pedigree (3,4,4,3,2)
  calculated value. The energy required to lift water for irrigation is a function of the lift or total head (Ht), the efficiencies of pumps used for extraction (e1), the driving efficiency (e2) and flow rates (FAO, 2007).
  properties: price 0.07 EUR2005
- water pump operation, electric: 0.194797 MJ; = fraction_el*(9.8*(fraction_GW*head_GW+fraction_SW*head_SW+head_DP)*1000)/((3.6*1000000)*pump_efficiency* Engine_efficiency_electricity)*3.6; lognormal variance with pedigree 0.0133, pedigree (3,4,4,3,2)
  (same comment as for water pump operation, diesel)
  properties: price 0.109 EUR2005
- tap water: 0.836994 kg; = irrigation*fraction_NC*1000
  calculated value
  properties: wet mass 1 kg, carbon content, fossil 0.00178991, water content 2962.17, dry mass 0.000337476 kg
  note on carbon content, fossil: Bicarbonate content is 2.93 mol/m3. CO2 content is 0.1 mol/m3 (ecoinvent v2.2 report 8, Tab 93.1).

## Inputs from nature
- Water, river [natural resource, in water]: 0.611874 m3; = irrigation*fraction_SW; lognormal variance with pedigree 0.0046, pedigree (3,1,3,1,1)
  Literature value.
- Water, well, in ground [natural resource, in water]: 0.387289 m3; = irrigation*fraction_GW; lognormal variance with pedigree 0.0046, pedigree (3,1,3,1,1)
  Literatue value.

## Sampling procedure
Literature values and estimations.

## Extrapolations
The data on water sources, irrigation efficiency and energy demand is compiled based on different data sources, incluiding the Global Map of Irrigation Areas (GMIA), FAO-AQUASTAT libary, national census reports and other internacional organizations or statistical services.
