# treatment of used window frame, plastic, collection for final disposal

Dataset: EcoSpold 2, unit process
Geography: RoW
Time period: 1996-01-01 to 2021-12-31
Technology level: current
Classification: EcoSpold01Categories: waste management/building demolition
Classification: ISIC rev.4 ecoinvent: 3821:Treatment and disposal of non-hazardous waste
Tags: Treatment; ConvertedDataset
Scenario: Business-as-Usual
System model: Allocation, cut-off by classification
Generated by: Martin Lehmann
Published in: Kellenberger D. 2007
Database: ecoinvent
isCopyrightProtected: true
accessRestrictedTo: 1

## General comment
This dataset describes the disposal of a plastic window frame with 1 m2 visible area via a municipal incineration plant. Distance to incineration site is assumed to be 50 km.
[This dataset was already contained in the ecoinvent database version 2. It was not individually updated during the transfer to ecoinvent version 3. Life Cycle Impact Assessment results may still have changed, as they are affected by changes in the supply chain, i.e. in other datasets. This dataset was generated following the ecoinvent quality guidelines for version 2. It may have been subject to central changes described in the ecoinvent version 3 change report (http://www.ecoinvent.org/database/ecoinvent-version-3/reports-of-changes/), and the results of the central updates were reviewed extensively. The changes added e.g. consistent water flows and other information throughout the database. The documentation of this dataset can be found in the ecoinvent reports of version 2, which are still available via the ecoinvent website. The change report linked above covers all central changes that were made during the conversion process.]

## Included activities end
Included processes are the disposal of rubber, plastic (polypropylene, expanded polystyrene, polyvinylchloride), steel, aluminium, copper and zinc, and the transport to the incineration site. Metal parts are too small to be efficiently collected and recycled.

## Geography
Swiss practice of waste management of window frames.

## Technology
Waste management includes incineration of rubber, plastic, steel, aluminium, copper and zinc parts, and the transport to the incineration site by average 28t lorry.

## Reference product
- used window frame, plastic: -1 m2; CPC 39: Wastes or scraps; By-product classification Waste
  EcoSpold01Location=CH
  production volume 3.96633 m2
    This is a placeholder value that does not reflect real-world production volumes. This dataset does not currently require a real-world production volume to work in the database framework, and no actual data were collected yet. This has no negative effect on the results of the ecoinvent database.
  property price 0 EUR2005
    Waste products are assigned a price of zero as they are assumed to require further treatment.
  property carbon content 0.263244
    carbon content on a dry matter basis (reserved; not for manual entry)
  properties: dry mass 94.5 kg, water in wet mass 0 kg, carbon content, fossil 0.263244, wet mass 94.5 kg, carbon content, non-fossil 0, water content 0, carbon allocation 24.8766 kg

## Inputs from technosphere
- waste polyethylene/polypropylene product: 0 kg; pedigree (1,1,1,1,1)
  EcoSpold01Location=CH
  production volume 0 kg
    Calculated from the production volume of used window frame, plastic in proportion to the respective output amounts.
  properties: heating value, net 42.47 MJ, carbon content, fossil 0.748045, water content 0.180638, dry mass 0.847 kg, wet mass 1 kg
  note on carbon content, fossil: Mixed various plastics was used to estimate the C content of this waste (Tab A.2, ecoinvent v2.2 report 13_I)
- waste polyvinylchloride product: 0 kg; pedigree (1,1,1,1,1)
  EcoSpold01Location=CH
  production volume 0 kg
    (same comment as for waste polyethylene/polypropylene product)
  properties: wet mass 1 kg, heating value, net 21.51 MJ, water content 0.00200401, dry mass 0.998 kg, carbon content, fossil 0.440882
- scrap steel: 0 kg; pedigree (1,1,1,1,1)
  EcoSpold01Location=CH
  production volume 0 kg
    (same comment as for waste polyethylene/polypropylene product)
  properties: wet mass 1 kg, dry mass 1 kg
- zinc in car shredder residue: -0.325 kg; lognormal variance with pedigree 0.0526, pedigree (1,3,5,5,1)
  EcoSpold01Location=CH
  production volume 1.28906 kg
    (same comment as for waste polyethylene/polypropylene product)
  properties: wet mass 1 kg, dry mass 1 kg
- waste rubber, unspecified: 0 kg; pedigree (1,1,1,1,1)
  EcoSpold01Location=CH
  production volume 0 kg
    (same comment as for waste polyethylene/polypropylene product)
  properties: carbon content, fossil 0.853, wet mass 1 kg, heating value, net 27.19 MJ, dry mass 1 kg
  note on heating value, net: Value taken from the general comment of the treatment dataset.
- scrap aluminium: 0 kg; pedigree (1,1,1,1,1)
  EcoSpold01Location=CH
  composite
  production volume 0 kg
    (same comment as for waste polyethylene/polypropylene product)
  properties: wet mass 1 kg, dry mass 1 kg
- scrap copper: 0 kg; pedigree (1,1,1,1,1)
  EcoSpold01Location=CH
  production volume 0 kg
    (same comment as for waste polyethylene/polypropylene product)
  properties: dry mass 1 kg, wet mass 1 kg
- waste expanded polystyrene: -0.392 kg; lognormal variance with pedigree 0.0526, pedigree (1,3,5,5,1)
  EcoSpold01Location=CH
  production volume 1.5548 kg
    (same comment as for waste polyethylene/polypropylene product)
  properties: water content 0.0526316, carbon content, fossil 0.864875, wet mass 1 kg, dry mass 0.95 kg, heating value, net 38.67 MJ
  note on carbon content, fossil: Average of different polystyrene extruded. Shares are 50% (w/w) extruded using CO2/acetone as blowing agent, 25% (w/w) using HFC-134a as a blowing agent and 25% (w/w) using HFC-152a as a blowing agent (ecoinvent v2.2 report 16, part XIV, Tab 4.21). Similar result is reported in Tab A.5, ecoinvent report 13_I.
- waste polyethylene/polypropylene product: -0.104098, -0.263902 kg (2 entries); lognormal variance with pedigree 0.0526, pedigree (1,3,5,5,1)
  EcoSpold01Location=CH
  production volume 1.45961 kg
- waste polyvinylchloride product: -15.532, -39.968 kg (2 entries); lognormal variance with pedigree 0.0526, pedigree (1,3,5,5,1)
  EcoSpold01Location=CH
  production volume 220.131 kg
- scrap steel: -6.84433, -21.2557 kg (2 entries); lognormal variance with pedigree 0.0526, pedigree (1,3,5,5,1)
  EcoSpold01Location=CH
  production volume 112.4 kg
- waste rubber, unspecified: -0.399, -0.399 kg (2 entries); lognormal variance with pedigree 0.0526, pedigree (1,3,5,5,1)
  EcoSpold01Location=CH
  production volume 3.16513 kg
- scrap aluminium: -0.33488, -0.70512 kg (2 entries); lognormal variance with pedigree 0.052, pedigree (1,1,5,5,1)
  EcoSpold01Location=CH
  composite
  production volume 4.12499 kg
- scrap copper: -0.00224756, -0.00473244 kg (2 entries); lognormal variance with pedigree 0.0526, pedigree (1,3,5,5,1)
  EcoSpold01Location=CH
  production volume 0.027685 kg

## Sampling procedure
Calculation from window frame material composition

## Extrapolations
see Geography This dataset has been copied from an original dataset covering the geography CH. The uncertainty has been adjusted accordingly.

## Review by Rolf Frischknecht 2010-02-07
passed
