# treatment of scrap steel, inert material landfill

Dataset: EcoSpold 2, unit process
Geography: RoW
Time period: 1995-01-01 to 2021-12-31
Technology level: current
Classification: ISIC rev.4 ecoinvent: 3821:Treatment and disposal of non-hazardous waste
Classification: EcoSpold01Categories: waste management/inert material landfill
Tags: ConvertedDataset; Treatment
Scenario: Business-as-Usual
System model: Allocation, cut-off by classification
Generated by: Gabor Doka (obsolete)
Published in: Doka G. 2007
Database: ecoinvent
isCopyrightProtected: true
accessRestrictedTo: 1

## General comment
[This dataset was already contained in the ecoinvent database version 2. It was not individually updated during the transfer to ecoinvent version 3. Life Cycle Impact Assessment results may still have changed, as they are affected by changes in the supply chain, i.e. in other datasets. This dataset was generated following the ecoinvent quality guidelines for version 2. It may have been subject to central changes described in the ecoinvent version 3 change report (http://www.ecoinvent.org/database/ecoinvent-version-3/reports-of-changes/), and the results of the central updates were reviewed extensively. The changes added e.g. consistent water flows and other information throughout the database. The documentation of this dataset can be found in the ecoinvent reports of version 2, which are still available via the ecoinvent website. The change report linked above covers all central changes that were made during the conversion process.]

## Included activities end
No direct emissions from inert material landfill (leachate) are inventoried as deemed negligible. Module contains only exchanges to process-specific burdens (energy, land use) and infrastructure.

## Geography
Specific to the technology encountered in Switzerland in 2000.

## Technology
landfill with renaturation after closure. 50% of the sites feature a base seal and leachate collection system.

## Reference product
- scrap steel: -1 kg; CPC 39310: Slag, dross, scalings and other waste from the manufacture of iron or steel; By-product classification Waste; CAS 7439-89-6
  EcoSpold01Location=CH
  production volume 3.4667e11 kg; = 585000000000*0.88-3200000000-48344000
    Estimated value. 585billion kg of scrap steel is produced in the World (Statista 2014 & World steel association 2012). 88% of this is recycled (Bureau of international recycling 2015). 3.2E+09 is sent to incineration and 4.8344E+07 is sent to incineration with fly ash extraction (Switzerland). The remaining is assumed to be landfilled.
    Bureau of international recycling (2015) World steel recycling in figures 2010-2014
    Statista (2014) http://www.statista.com/statistics/270835/world-steel-production-and-scrap-consumption/, accessed 6th of May 2016
    World steel association (2012) Steel confirmed as most recycled packaging material in two regions of the world. Retrieved from: <https://www.worldsteel.org/media-centre/Steel-news/Steel-confirmed-as-most-recycled-packaging-material-in-two-regions-of-the-world.html>, accessed 6th of May 2016
  property price 0 EUR2005
    Waste products are assigned a price of zero as they are assumed to require further treatment.
  property carbon content 0
    carbon content on a dry matter basis (reserved; not for manual entry)
  properties: wet mass 1 kg, water content 0, carbon content, fossil 0, water in wet mass 0 kg, carbon content, non-fossil 0, dry mass 1 kg, carbon allocation 0 kg

## Inputs from technosphere
- process-specific burdens, inert material landfill: 1 kg; lognormal variance with pedigree 0.042, pedigree (1,1,5,5,1)
  process-specific burdens per kg waste, uncerteinty heeded in module.
  EcoSpold01Location=CH
- inert material landfill: 1.48e-9 unit; lognormal variance with pedigree 0.042, pedigree (1,1,5,5,1)
  landfill infrastructure per kg waste, uncerteinty heeded in module.
  EcoSpold01Location=CH

## Extrapolations
This dataset has been copied from an original dataset covering the geography CH. The uncertainty has been adjusted accordingly.

## Review by Emilia Moreno Ruiz 2015-11-02
PV edited

## Review by Niels Jungbluth 2003-05-28
Passed.
