# treatment of waste packaging paper, sanitary landfill

Dataset: EcoSpold 2, unit process
Geography: GLO
Time period: 2010-01-01 to 2021-12-31
Technology level: current
Classification: ISIC rev.4 ecoinvent: 3821:Treatment and disposal of non-hazardous waste
Synonyms: municipal waste landfill
Scenario: Business-as-Usual
System model: Allocation, cut-off by classification
Share of production covered: 1 %
Generated by: Avraam Symeonidis
Database: ecoinvent
isCopyrightProtected: true
accessRestrictedTo: 1

## General comment
This dataset represents the activity of waste disposal of waste packaging paper in an sanitary landfill. Recommended use of this dataset: For waste packaging paper, which goes to disposal as part of communal waste mixture. // Waste composition (wet, in ppm): upper heating value 16.77 MJ/kg; lower heating value 14.12 MJ/kg; H2O 110980; O 377790; H 53851; C 403520; S 1381.8; N 4098.6; P 124.15; B 19.101; Cl 1892.4; Br n.a.; F 21.631; I n.a.; Ag n.a.; As 2.2761; Ba 125.43; Cd 1.8323; Co 0.71627; Cr 14.922; Cu 64.327; Hg 0.14537; Mn 39.49; Mo 4.7751; Ni 10.235; Pb 79.273; Sb 0.7879; Se 2.8651; Sn n.a.; V n.a.; Zn 132.49; Be 1.0824; Sc n.a.; Sr 64.751; Ti 191.01; Tl 1.9101; W n.a.; Si 21297; Fe 1305; Ca 3820.1; Al 12415; K 955.03; Mg 4775.1; Na 1020.9; . // Share of carbon in waste that is biogenic 100%. Share of metals in waste not oxidised and bulk-recyclable (exclude very small or thin parts) Iron: 0%; Alu: 0%; Copper: 0%. Overall degradability of waste during 100 years: 27%.

## Included activities start
from final waste deposition (without transports to the site)

## Included activities end
Waste-specific short-term emissions to air via landfill gas and landfill leachate. Waste-specific long-term emissions from landfill.

## Geography
Given name of landfill location is 'Global'. Landfill site with mean annual temperature (MAT) of 14.74 degC, mean annual precipitation (MAP) of 889 mm/year, and net infiltration of 392 mm/year.

## Technology
This is an inventory for a sanitary (controlled) landfill for municipal solid waste. Ultimate average landfill height is 20 meters. Operation phase duration is 30 years.Percentage of landfill gas directly emitted is 47w%. Percentage of landfill gas captured and flared is 18.02w%. Percentage of landfill gas captured and utilised is 34.98%. Conversion efficiencies are 27.8e% for electricity and 13.5e% for useful heat.
Leachate collected during the first 100 years is treated before emission. Based on average waste composition and climate data the end of carbonate phase is estimated to be reached 5693 years after waste deposition.

## Reference product
- waste packaging paper: 0 kg; CPC 39240: Waste and scrap of paper or paperboard; By-product classification Recyclable; pedigree (1,1,1,1,1)
  main reference product of this activity (supply of disposal service).
  Uncertainty: U
  production volume 0 kg
    The amount of the annual production volume is a placeholder value. The contribution of this technology to the different local markets can be found in the markets themselves.
  property price 0.1 EUR2005
    For paper and board waste the price, in 2005, according to [http://ec.europa.eu/eurostat] is about 1 EUR/kg corresponding to a purchase price of 0.099 similar to the price of UN comodittie: Waste, scrap of paper, board, nes (including unsorted).
  property carbon content 0.45389
    carbon content on a dry matter basis (reserved; not for manual entry)
  properties: thallium content 2.1485e-6, magnesium content 0.0053712, strontium content 7.2834e-5, hydrogen content 0.060574, aluminium content 0.013965, heating value, gross 16.768 MJ, heating value, net 14.11 MJ, dry mass 0.88902 kg, antimony content 8.8625e-7, wet mass 1 kg, sulfur content 0.0015543, nickel content 1.1512e-5, cadmium content 2.061e-6, oxygen content 0.42495, calcium content 0.004297, zinc content 0.00014903, titanium content 0.00021485, molybdenum content 5.3712e-6, iron content 0.001468, copper content 7.2357e-5, sodium content 0.0011484, chromium content 1.6785e-5, selenium content 3.2227e-6, lead content 8.9169e-5, water in wet mass 0.11098 kg, cobalt content 8.0568e-7, chlorine content 0.0021286, phosphorus content 0.00013965, mercury content 1.6352e-7, fluorine content 2.4332e-5, potassium content 0.0010742, silicon content 0.023956, boron content 2.1485e-5, beryllium content 1.2175e-6, water content 0.12483, manganese content 4.442e-5, arsenic content 2.5603e-6, barium content 0.00014108, nitrogen content 0.0046102, carbon content, non-fossil 0.45389, carbon allocation 0.403517 kg
- electricity, medium voltage: 1 kWh; CPC 17100: Electrical energy; By-product classification allocatable product; pedigree (1,1,1,1,1)
  net production of electricity from landfill gas utilisation (minus electricity demand for landfill gas pumping).
  Uncertainty: U
  production volume 0.0826 kWh
  properties: true value relation 3.6, price 0.1 EUR2005, true value 0.00901154

## By-products
- electricity, medium voltage: 0 kWh; CPC 17100: Electrical energy; By-product classification allocatable product; pedigree (1,1,1,1,1)
  (same comment as for electricity, medium voltage)
  production volume 0 kWh
    calculated in proportion to reference product waste input to incinerator
  property price 0.1 EUR2005
    Calculated to be between the price of electricity, high voltage and electricity, low voltage.
  properties: true value relation 3.6
- heat, district or industrial, other than natural gas: 0 MJ; By-product classification allocatable product; CPC 17300: Steam and hot water; pedigree (1,1,1,1,1)
  net production of heat from landfill gas utilisation.
  Uncertainty: U
  production volume 0.149 MJ
    calculated in proportion to reference product waste input to incinerator
  properties: carbon content, fossil 0, true value relation 0.1842, carbon content, non-fossil 0, heating value, net 1 MJ, dry mass 1 kg, water content 0, wet mass 1 kg, price 0.0106 EUR2005, water in wet mass 0 kg, carbon content 0, carbon allocation 0 kg, true value 0.000831575

## Inputs from technosphere
- sand: 0 kg; pedigree (1,1,1,1,1)
  for sewer auxiliary materials.
  Uncertainty: U
  properties: wet mass 1 kg, dry mass 1 kg
- excavation, hydraulic digger: 0.00429595 m3; lognormal variance with pedigree 0.082256, pedigree (1,1,3,1,1)
  excavation work for landfill construction, sewer construction and recultivation.
  Uncertainty: U
- process-specific burdens, residual material landfill: 0 kg; pedigree (1,1,1,1,1)
  burden from incineration of sludge from wastewater treatment of the short-term leachate (0-100a).
  Uncertainty: u
- excavation, skid-steer loader: 0.00429595 m3; lognormal variance with pedigree 0.082256, pedigree (1,1,3,1,1)
  (same comment as for excavation, hydraulic digger)
- aluminium sulfate, powder: 0 kg; pedigree (1,1,1,1,1)
  burden from wastewater treatment of the short-term leachate (0-100a).
  Uncertainty: U
  properties: dry mass 1 kg, wet mass 1 kg
- municipal waste incineration facility: 1.00326e-11 unit; lognormal variance with pedigree 0.041062, pedigree (1,1,3,1,1)
  (same comment as for process-specific burdens, residual material landfill)
- heat, district or industrial, other than natural gas: 0.0262732 MJ; lognormal variance with pedigree 0.012282, pedigree (1,1,3,1,1)
  burden from wastewater treatment of the short-term leachate (0-100a) and landfill administrative building space heat demand.
  Uncertainty: U
  properties: heating value, net 1 MJ
- transport, freight, lorry, unspecified: 0.00139786 metric ton*km; lognormal variance with pedigree 0.042118, pedigree (1,1,3,1,1)
  Transport services to transport incineration residues to landfills and filter ash to external treatments (FLUWA).
  Uncertainty: u
- tap water: 0.0205818 kg; lognormal variance with pedigree 0.082256, pedigree (1,1,3,1,1)
  for sewer auxiliary materials.
  Uncertainty: U
  properties: carbon content, fossil 0.00178991, water content 2962.17, dry mass 0.000337476 kg, wet mass 1 kg
- titanium dioxide: 0 kg; pedigree (1,1,1,1,1)
  (same comment as for process-specific burdens, residual material landfill)
  properties: wet mass 1 kg, dry mass 1 kg
- ammonia, anhydrous, liquid: 0 kg; pedigree (1,1,1,1,1)
  (same comment as for process-specific burdens, residual material landfill)
  properties: wet mass 1 kg, dry mass 1 kg
- polypropylene, granulate: 2.47598e-6 kg; lognormal variance with pedigree 0.082256, pedigree (1,1,3,1,1)
  for sewer auxiliary materials.
  Uncertainty: U
  properties: wet mass 1 kg, carbon content, fossil 0.857143, dry mass 1 kg, heating value, net 32.78 MJ
  note on heating value, net: Value extracted from "treatment of waste polypropylene, open burning"
- iron sulfate: 0 kg; pedigree (1,1,1,1,1)
  burden from wastewater treatment of the short-term leachate (0-100a).
  Uncertainty: U
  properties: dry mass 1 kg, wet mass 1 kg
- cement, unspecified: 0.000548907 kg; lognormal variance with pedigree 0.06188, pedigree (1,1,3,1,1)
  (same comment as for process-specific burdens, residual material landfill)
  properties: wet mass 1 kg, dry mass 1 kg
- cast iron: 1.63418e-5 kg; lognormal variance with pedigree 0.082256, pedigree (1,1,3,1,1)
  for sewer auxiliary materials.
  Uncertainty: U
  properties: dry mass 1 kg, wet mass 1 kg, carbon content, fossil 0.04
- electricity, low voltage: 0.168215 kWh; lognormal variance with pedigree 0.060488, pedigree (1,1,3,1,1)
  burden from wastewater treatment of the short-term leachate (0-100a) and landfill administrative building electricity consumption.
  Uncertainty: U
- chemical, inorganic: 1.26247e-7 kg; lognormal variance with pedigree 0.25689, pedigree (1,1,3,1,1)
  (same comment as for process-specific burdens, residual material landfill)
  properties: dry mass 1 kg, carbon content, fossil 0.003, wet mass 1 kg
- reinforcing steel: 9.65639e-5 kg; lognormal variance with pedigree 0.082256, pedigree (1,1,3,1,1)
  for sewer auxiliary materials.
  Uncertainty: U
  properties: dry mass 1 kg, carbon content, fossil 0.004, wet mass 1 kg
- heat, district or industrial, natural gas: 0.0155784 MJ; lognormal variance with pedigree 0.10231, pedigree (1,1,3,1,1)
  burden from wastewater treatment of the short-term leachate and incineration of sludge from this wastewater treatment.
  Uncertainty: u
  properties: heating value, net 1 MJ
- iron (III) chloride, without water, in 40% solution state: 0.000136651 kg; lognormal variance with pedigree 0.313, pedigree (1,1,3,1,1)
  (same comment as for process-specific burdens, residual material landfill)
  properties: dry mass 1 kg, wet mass 1 kg
- steel, chromium steel 18/8, hot rolled: 3.36741e-5 kg; lognormal variance with pedigree 0.082256, pedigree (1,1,3,1,1)
  for sewer auxiliary materials.
  Uncertainty: U
  properties: carbon content, fossil 0.0008, dry mass 1 kg, wet mass 1 kg
- waste cement, hydrated: 0 kg; pedigree (1,1,1,1,1)
  (same comment as for electricity, low voltage)
  production volume 0 kg
    calculated in proportion to reference product waste input to incinerator
  properties: dry mass 1 kg, wet mass 1 kg
- quicklime, milled, packed: 0 kg; pedigree (1,1,1,1,1)
  (same comment as for process-specific burdens, residual material landfill)
  properties: dry mass 0.99 kg, wet mass 1 kg, water content 0.010101
- synthetic rubber: 9.90401e-7 kg; lognormal variance with pedigree 0.082256, pedigree (1,1,3,1,1)
  for sewer auxiliary materials.
  Uncertainty: U
  properties: heating value, net 26.42 MJ, wet mass 1 kg, dry mass 1 kg, carbon content, fossil 0.871949
- chromium oxide, flakes: 2.51575e-8 kg; lognormal variance with pedigree 0.16068, pedigree (1,1,3,1,1)
  burden from incineration of sludge from wastewater treatment of the short-term leachate (0-100a). Proxy for vanadium pentoxide V2O5 in SCR catalyst,
  Uncertainty: u
  properties: dry mass 1 kg, wet mass 1 kg
- chemical, organic: 1.53801e-6 kg; lognormal variance with pedigree 0.40862, pedigree (1,1,3,1,1)
  (same comment as for process-specific burdens, residual material landfill)
  properties: heating value, net 19.03 MJ, dry mass 1 kg, carbon content, fossil 0.628, wet mass 1 kg
- extrusion, plastic pipes: 0.000941055 kg; lognormal variance with pedigree 0.082256, pedigree (1,1,3,1,1)
  for base and interior drain system of landfill, sewer auxiliary materials.
  Uncertainty: U
- waste plastic, mixture: 0 kg; pedigree (1,1,1,1,1)
  burden from wastewater treatment of the short-term leachate (0-100a).
  Uncertainty: U
  production volume 0 kg
    calculated in proportion to reference product waste input to incinerator
  properties: water content 0.180638, dry mass 0.847 kg, carbon content, fossil 0.747344, heating value, net 30.79 MJ, wet mass 1 kg
  note on heating value, net: Value taken from the general comment of the treatment dataset.
- process-specific burdens, municipal waste incineration: 0 kg; pedigree (1,1,1,1,1)
  (same comment as for process-specific burdens, residual material landfill)
- polyvinylchloride, bulk polymerised: 2.47598e-6 kg; lognormal variance with pedigree 0.082256, pedigree (1,1,3,1,1)
  for sewer auxiliary materials.
  Uncertainty: U
  properties: dry mass 1 kg, carbon content, fossil 0.387097, wet mass 1 kg, heating value, net 21.5 MJ
- slag landfill: 1.95127e-11 unit; lognormal variance with pedigree 0.072054, pedigree (1,1,3,1,1)
  (same comment as for process-specific burdens, residual material landfill)
- polyethylene, high density, granulate: 0.00297465 kg; lognormal variance with pedigree 0.082256, pedigree (1,1,3,1,1)
  for base and compartment seals, for base and interior drain system of landfill, sewer auxiliary materials.
  Uncertainty: U
  properties: carbon content, fossil 0.857143, dry mass 1 kg, wet mass 1 kg, heating value, net 42.47 MJ
- hydrochloric acid, without water, in 30% solution state: 0 kg; pedigree (1,1,1,1,1)
  (same comment as for process-specific burdens, residual material landfill)
  properties: dry mass 1 kg, heating value, net 3.32 MJ, wet mass 1 kg
- concrete, normal: 1.58322e-6 m3; lognormal variance with pedigree 0.082256, pedigree (1,1,3,1,1)
  for leachate collection tanks and sewer pipe.
  Uncertainty: U
  properties: wet mass 2380 kg, dry mass 2190 kg, water content 0.086758
- waste graphical paper: 0 kg; pedigree (1,1,1,1,1)
  burden from wastewater treatment of the short-term leachate (0-100a).
  Uncertainty: U
  production volume 0 kg
    calculated in proportion to reference product waste input to incinerator
  properties: wet mass 1 kg, water content 0.126126, dry mass 0.888 kg, heating value, net 14.12 MJ, carbon content, non-fossil 0.454955
- electricity, for reuse in municipal waste incineration only: 0 kWh; pedigree (1,1,1,1,1)
  (same comment as for process-specific burdens, residual material landfill)
- pitch: 0 kg; pedigree (1,1,1,1,1)
  for base and compartment seals and access street construction.
  Uncertainty: U
  properties: wet mass 1 kg, carbon content, fossil 0.83, dry mass 1 kg, heating value, net 28 MJ
- sodium hydroxide, without water, in 50% solution state: 2.17296e-6 kg; lognormal variance with pedigree 0.08066, pedigree (1,1,3,1,1)
  (same comment as for process-specific burdens, residual material landfill)
  properties: heating value, net 3.03 MJ, dry mass 1 kg, wet mass 1 kg
- diesel, burned in building machine: 0.536088 MJ; lognormal variance with pedigree 0.082256, pedigree (1,1,3,1,1)
  for waste distribution and compaction, construction diesel for base and compartment seals, for access street and sewer construction.
  Uncertainty: U
  properties: heating value, net 1 MJ
- process-specific burdens, slag landfill: 0 kg; pedigree (1,1,1,1,1)
  (same comment as for process-specific burdens, residual material landfill)
- sewer grid, 5E9l/year, 110 km: 4.72937e-9 km; lognormal variance with pedigree 0.00259512, pedigree (1,1,3,1,1)
  burden from wastewater treatment of the short-term leachate (0-100a).
  Uncertainty: U
- heat, for reuse in municipal waste incineration only: 0 MJ; pedigree (1,1,1,1,1)
  (same comment as for process-specific burdens, residual material landfill)
- wastewater treatment facility, capacity 5E9l/year: 1.235e-10 unit; lognormal variance with pedigree 0.00259512, pedigree (1,1,3,1,1)
  burden from wastewater treatment of the short-term leachate (0-100a).
  Uncertainty: U
- residual material landfill: 2.85887e-12 unit; lognormal variance with pedigree 0.060937, pedigree (1,1,3,1,1)
  (same comment as for process-specific burdens, residual material landfill)
- gravel, round: 0 kg; pedigree (1,1,1,1,1)
  for base and flank gravel beds and concrete, for access street, for drainage beds, for recultivation layer.
  Uncertainty: U
  properties: wet mass 1 kg, dry mass 1 kg
- waste packaging paper: 0 kg; pedigree (1,1,1,1,1)
  main reference product of this activity (supply of disposal service).
  Uncertainty: U
  properties: magnesium content 0.0053712, hydrogen content 0.060574, aluminium content 0.013965, heating value, gross 16.768 MJ, heating value, net 14.11 MJ, dry mass 0.88902 kg, wet mass 1 kg, oxygen content 0.42495, silicon content 0.023956, price 0.1 EUR2005, water content 0.12483, carbon content, non-fossil 0.45389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
- sand: 5.81907e-8, 1.12088e-5, 1.34205e-7, 0.000729419 kg (4 entries); lognormal variance with pedigree 0.082256, pedigree (1,1,3,1,1)
  for sewer auxiliary materials.
  Uncertainty: U
- process-specific burdens, residual material landfill: 0.000384912, 1.15502e-5, 0.000975805 kg (3 entries); lognormal variance with pedigree 0.060937, pedigree (1,1,3,1,1)
  (same comment as for process-specific burdens, residual material landfill)
- aluminium sulfate, powder: 4.62994e-6, 2.19789e-5 kg (2 entries); lognormal variance with pedigree 0.31855, pedigree (1,1,3,1,1)
  burden from wastewater treatment of the short-term leachate (0-100a).
  Uncertainty: U
- titanium dioxide: 4.10927e-7, 8.21854e-7 kg (2 entries); lognormal variance with pedigree 0.16068, pedigree (1,1,3,1,1)
  (same comment as for process-specific burdens, residual material landfill)
- ammonia, anhydrous, liquid: 6.92567e-7, 4.62888e-6, 1.07746e-6, 2.09156e-6, 2.13482e-6, 9.79986e-7, 8.05667e-6, 2.19218e-7, 2.31836e-5 kg (9 entries); lognormal variance with pedigree 0.10231, pedigree (1,1,3,1,1)
  (same comment as for process-specific burdens, residual material landfill)
- iron sulfate: 3.25482e-5, 6.59059e-5 kg (2 entries); lognormal variance with pedigree 0.31855, pedigree (1,1,3,1,1)
  burden from wastewater treatment of the short-term leachate (0-100a).
  Uncertainty: U
- waste cement, hydrated: -0.000384912, -1.15502e-5, -0.000975805 kg (3 entries); lognormal variance with pedigree 0.06188, pedigree (1,1,3,1,1)
  (same comment as for electricity, low voltage)
  production volume 0.000124 kg
- quicklime, milled, packed: 3.31596e-9, 3.90649e-7 kg (2 entries); lognormal variance with pedigree 0.0812, pedigree (1,1,3,1,1)
  (same comment as for process-specific burdens, residual material landfill)
- waste plastic, mixture: -3.23937e-5, -2.49736e-6, -1.0315e-6, -9.79505e-7, -3.73766e-5, -4.16714e-7, -1.88871e-7, -0.000261657 kg (8 entries); lognormal variance with pedigree 0.00288123, pedigree (1,1,3,1,1)
  burden from wastewater treatment of the short-term leachate (0-100a).
  Uncertainty: U
  production volume 3.04e-5 kg
- process-specific burdens, municipal waste incineration: 0.0112565, 0.000337778, 0.0285367 kg (3 entries); lognormal variance with pedigree 0.041062, pedigree (1,1,3,1,1)
  (same comment as for process-specific burdens, residual material landfill)
- hydrochloric acid, without water, in 30% solution state: 1.38413e-8, 6.19093e-8 kg (2 entries); lognormal variance with pedigree 0.25689, pedigree (1,1,3,1,1)
  (same comment as for process-specific burdens, residual material landfill)
- waste graphical paper: -3.60858e-5, -2.2438e-6, -8.10779e-6, -1.46344e-6, -1.46937e-5, -7.90577e-7, -1.962e-7, -0.00027296 kg (8 entries); lognormal variance with pedigree 0.00288123, pedigree (1,1,3,1,1)
  burden from wastewater treatment of the short-term leachate (0-100a).
  Uncertainty: U
  production volume 3.04e-5 kg
- electricity, for reuse in municipal waste incineration only: 8.57223e-7, 5.8781e-6, 4.04119e-6, 1.59933e-5, 0.000207325, 3.42889e-7, 5.04537e-5, 3.5538e-5, 2.86557e-6, 6.70348e-5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 kWh (26 entries); lognormal variance with pedigree 0.089025, pedigree (1,1,3,1,1)
  (same comment as for process-specific burdens, residual material landfill)
- pitch: 0.00401449, 6.90431e-5, 0.00312488, 0.000199963, 0.00121146, 0.00014007, 2.63949e-5, 0.0176653 kg (8 entries); lognormal variance with pedigree 0.082256, pedigree (1,1,3,1,1)
  for base and compartment seals and access street construction.
  Uncertainty: U
- process-specific burdens, slag landfill: 0.00307874, 9.2385e-5, 0.00780502 kg (3 entries); lognormal variance with pedigree 0.072054, pedigree (1,1,3,1,1)
  (same comment as for process-specific burdens, residual material landfill)
- heat, for reuse in municipal waste incineration only: 3.64006e-6, 2.49604e-5, 1.71603e-5, 6.79131e-5, 0.000880374, 0.00307055, 0.000214244, 0.000150906, 1.21682e-5, 0.000284653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 MJ (26 entries); lognormal variance with pedigree 0.041119, pedigree (1,1,3,1,1)
  (same comment as for process-specific burdens, residual material landfill)
- gravel, round: 0.000461297, 1.77376 kg (2 entries); lognormal variance with pedigree 0.082256, pedigree (1,1,3,1,1)
  (same comment as for gravel, round)
- waste packaging paper: 11.0792, 2.14656e-9, 2.14656e-9, 2.14656e-9, 2.14656e-9, 2.14656e-9, 2.14656e-9, 2.14656e-9 kg (8 entries); lognormal variance with pedigree 0.002, pedigree (1,1,3,1,1)
  main reference product of this activity (supply of disposal service).
  Uncertainty: U
  production volume 1 kg

## Inputs from nature
All rows: lognormal variance with pedigree 0.082256, pedigree (1,1,3,1,1)
- Transformation, to forest, unspecified [natural resource, land]: 0.000553959 m2
  conversion to forest after renaturation.
  Uncertainty: U
- Transformation, to dump site, sanitary landfill [natural resource, land]: 0.000553959 m2
  conversion to landfill area.
  Uncertainty: U
- Occupation, dump site [natural resource, land]: 0.0166188 m2*year
  for landfill operation phase.
  Uncertainty: U
- Transformation, from pasture, man made [natural resource, land]: 0.000664751 m2
  original conversion of landfill area and access road.
  Uncertainty: U
- Transformation, to traffic area, road network [natural resource, land]: 0.000110792 m2
  construction of access road.
  Uncertainty: U
- Transformation, to shrub land, sclerophyllous [natural resource, land]: 0.000553959 m2
  initial restoration and renaturation.
  Uncertainty: U
- Transformation, from dump site, sanitary landfill [natural resource, land]: 0.000553959 m2
  conversion after landfill operation.
  Uncertainty: U
- Transformation, from shrub land, sclerophyllous [natural resource, land]: 0.000553959 m2
  after restoration.
  Uncertainty: U
- Occupation, shrub land, sclerophyllous [natural resource, land]: 0.0027698 m2*year
  restoration and aftercare phase.
  Uncertainty: U
- Occupation, traffic area, road network [natural resource, land]: 0.0204965 m2*year
  for access road.
  Uncertainty: U
- Occupation, construction site [natural resource, land]: 0.0027698 m2*year
  for construction phase of the landfill.
  Uncertainty: U

## Emissions to nature
- Calcium, ion [water, ground-, long-term]: 0.0409631 kg; lognormal variance with pedigree 0.12277, pedigree (1,1,3,1,1)
  Emissions from long-term leachate (>100a) directly from MSW landfill and indirectly via incineration of treatement sludge from leachate treatement.
  Uncertainty: U
- Selenium [air, urban air close to ground]: 2.23822e-15 kg; lognormal variance with pedigree 0.45682, pedigree (1,1,3,1,1)
  Emissions from short-term leachate treatment and incineration of resulting sludge.
  Uncertainty: U
- Lead [air, urban air close to ground]: 4.62024e-11 kg; lognormal variance with pedigree 0.41365, pedigree (1,1,3,1,1)
  (same comment as for Selenium)
- Iron, ion [water, ground-, long-term]: 0.0144561 kg; lognormal variance with pedigree 0.1561, pedigree (1,1,3,1,1)
  (same comment as for Calcium, ion)
- Nickel [air, urban air close to ground]: 3.02318e-14 kg; lognormal variance with pedigree 0.42551, pedigree (1,1,3,1,1)
  (same comment as for Selenium)
- Heat, waste [water, surface water]: 0.642637 MJ; lognormal variance with pedigree 0.10671, pedigree (1,1,3,1,1)
  (same comment as for process-specific burdens, residual material landfill)
- Magnesium [air, urban air close to ground]: 1.19046e-6 kg; lognormal variance with pedigree 0.14443, pedigree (1,1,3,1,1)
  (same comment as for Selenium)
- COD, Chemical Oxygen Demand [water, surface water]: 0.022165 kg; lognormal variance with pedigree 0.10686, pedigree (1,1,3,1,1)
  (same comment as for Selenium)
- Antimony [air, urban air close to ground]: 1.22392e-11 kg; lognormal variance with pedigree 0.62512, pedigree (1,1,3,1,1)
  (same comment as for Selenium)
- Heat, waste [air, urban air close to ground]: 0.832567 MJ; lognormal variance with pedigree 0.050308, pedigree (1,1,3,1,1)
  (same comment as for process-specific burdens, residual material landfill)
- Thallium [air, urban air close to ground]: 1.63573e-10 kg; lognormal variance with pedigree 0.46087, pedigree (1,1,3,1,1)
  (same comment as for Selenium)
- Iron [air, urban air close to ground]: 3.63774e-9 kg; lognormal variance with pedigree 0.25221, pedigree (1,1,3,1,1)
  (same comment as for Selenium)
- DOC, Dissolved Organic Carbon [water, surface water]: 0.00538349 kg; lognormal variance with pedigree 0.10739, pedigree (1,1,3,1,1)
  (same comment as for Selenium)
- Titanium [air, urban air close to ground]: 1.40639e-8 kg; lognormal variance with pedigree 0.3129, pedigree (1,1,3,1,1)
  (same comment as for Selenium)
- Zinc [air, urban air close to ground]: 2.11889e-10 kg; lognormal variance with pedigree 0.3336, pedigree (1,1,3,1,1)
  (same comment as for Selenium)
- Aluminium [air, urban air close to ground]: 2.73235e-6 kg; lognormal variance with pedigree 0.17861, pedigree (1,1,3,1,1)
  (same comment as for Selenium)
- Carbon dioxide, non-fossil [air, non-urban air or from high stacks]: 3.16599 kg; lognormal variance with pedigree 0.002, pedigree (1,1,3,1,1)
  burden from direct release or incineration of landfill biogas.
  Uncertainty: U
- BOD5, Biological Oxygen Demand [water, surface water]: 0.00697634 kg; lognormal variance with pedigree 0.10755, pedigree (1,1,3,1,1)
  (same comment as for Selenium)
- Calcium [air, urban air close to ground]: 2.43299e-7 kg; lognormal variance with pedigree 0.18748, pedigree (1,1,3,1,1)
  (same comment as for Selenium)
- Carbon monoxide, fossil [air, non-urban air or from high stacks]: 0.000193154 kg; lognormal variance with pedigree 0.18207, pedigree (1,1,3,1,1)
  burden from direct release or incineration of landfill biogas.
  Uncertainty: U
- TOC, Total Organic Carbon [water, surface water]: 0.00560839 kg; lognormal variance with pedigree 0.10698, pedigree (1,1,3,1,1)
  (same comment as for Selenium)
- Hydrogen chloride [air, non-urban air or from high stacks]: 0.000205441 kg; lognormal variance with pedigree 0.2383, pedigree (1,1,3,1,1)
  burden from direct release or incineration of landfill biogas; or windblown leachate evaporite in arid climates.
  Uncertainty: U
- Silicon [air, urban air close to ground]: 6.96814e-6 kg; lognormal variance with pedigree 0.16328, pedigree (1,1,3,1,1)
  (same comment as for Selenium)
- Methane, non-fossil [air, non-urban air or from high stacks]: 0.410849 kg; lognormal variance with pedigree 0.03046, pedigree (1,1,3,1,1)
  burden from direct release or incineration of landfill biogas.
  Uncertainty: U
- Arsenic, ion [water, surface water]: 1.07751e-6 kg; lognormal variance with pedigree 0.41496, pedigree (1,1,3,1,1)
  (same comment as for Selenium)
- Particulates, < 2.5 um [air, non-urban air or from high stacks]: 6.48453e-5 kg; lognormal variance with pedigree 0.095619, pedigree (1,1,3,1,1)
  (same comment as for Hydrogen chloride)
- Fluoride [water, surface water]: 4.75297e-6 kg; lognormal variance with pedigree 0.3647, pedigree (1,1,3,1,1)
  Emissions from short-term leachate treatment.
  Uncertainty: U
- Nitrate [water, surface water]: 0.0540476 kg; lognormal variance with pedigree 0.073826, pedigree (1,1,3,1,1)
  (same comment as for Selenium)
- NMVOC, non-methane volatile organic compounds, unspecified origin [air, non-urban air or from high stacks]: 3.65436e-6 kg; lognormal variance with pedigree 0.03046, pedigree (1,1,3,1,1)
  burden from direct release or incineration of landfill biogas.
  Uncertainty: U
- Boron [water, surface water]: 0.000123699 kg; lognormal variance with pedigree 0.29804, pedigree (1,1,3,1,1)
  (same comment as for Selenium)
- Cadmium [air, non-urban air or from high stacks]: 6.42858e-9 kg; lognormal variance with pedigree 0.57549, pedigree (1,1,3,1,1)
  (same comment as for Hydrogen chloride)
- Phosphate [water, surface water]: 2.23988e-5 kg; lognormal variance with pedigree 0.31467, pedigree (1,1,3,1,1)
  (same comment as for Selenium)
- Hydrogen fluoride [air, non-urban air or from high stacks]: 2.5789e-5 kg; lognormal variance with pedigree 0.323, pedigree (1,1,3,1,1)
  (same comment as for Hydrogen chloride)
- Chromium VI [water, surface water]: 2.66344e-7 kg; lognormal variance with pedigree 0.43318, pedigree (1,1,3,1,1)
  (same comment as for Selenium)
- Arsenic [air, non-urban air or from high stacks]: 1.71417e-8 kg; lognormal variance with pedigree 0.54338, pedigree (1,1,3,1,1)
  (same comment as for Hydrogen chloride)
- Sulfate [water, surface water]: 0.0047861 kg; lognormal variance with pedigree 0.18002, pedigree (1,1,3,1,1)
  Emissions from short-term leachate treatment.
  Uncertainty: U
- Nitrogen oxides [air, non-urban air or from high stacks]: 1.68127e-5 kg; lognormal variance with pedigree 0.18233, pedigree (1,1,3,1,1)
  burden from direct release or incineration of landfill biogas.
  Uncertainty: U
- Manganese [water, surface water]: 6.86544e-5 kg; lognormal variance with pedigree 0.28275, pedigree (1,1,3,1,1)
  (same comment as for Selenium)
- Barium [air, non-urban air or from high stacks]: 1.07412e-7 kg; lognormal variance with pedigree 0.48238, pedigree (1,1,3,1,1)
  (same comment as for Hydrogen chloride)
- Cadmium, ion [water, surface water]: 4.89589e-7 kg; lognormal variance with pedigree 0.42262, pedigree (1,1,3,1,1)
  (same comment as for Selenium)
- Sulfur dioxide [air, non-urban air or from high stacks]: 0.000539324 kg; lognormal variance with pedigree 0.23053, pedigree (1,1,3,1,1)
  burden from direct release or incineration of landfill biogas.
  Uncertainty: U
- Barium [water, surface water]: 2.58234e-5 kg; lognormal variance with pedigree 0.25037, pedigree (1,1,3,1,1)
  (same comment as for Selenium)
- Molybdenum [air, non-urban air or from high stacks]: 3.76526e-10 kg; lognormal variance with pedigree 0.66947, pedigree (1,1,3,1,1)
  (same comment as for Hydrogen chloride)
- Chloride [water, surface water]: 0.0143409 kg; lognormal variance with pedigree 0.145, pedigree (1,1,3,1,1)
  Emissions from short-term leachate treatment.
  Uncertainty: U
- Cobalt [air, non-urban air or from high stacks]: 1.72148e-10 kg; lognormal variance with pedigree 0.69459, pedigree (1,1,3,1,1)
  (same comment as for Hydrogen chloride)
- Lead [water, surface water]: 1.53569e-7 kg; lognormal variance with pedigree 0.39972, pedigree (1,1,3,1,1)
  (same comment as for Selenium)
- Copper [air, non-urban air or from high stacks]: 2.6918e-10 kg; lognormal variance with pedigree 0.67841, pedigree (1,1,3,1,1)
  (same comment as for Hydrogen chloride)
- Selenium [water, surface water]: 6.03561e-7 kg; lognormal variance with pedigree 0.42239, pedigree (1,1,3,1,1)
  (same comment as for Selenium)
- Mercury [air, non-urban air or from high stacks]: 1.19134e-8 kg; lognormal variance with pedigree 0.55631, pedigree (1,1,3,1,1)
  (same comment as for Hydrogen chloride)
- Cobalt [water, surface water]: 3.49515e-7 kg; lognormal variance with pedigree 0.43852, pedigree (1,1,3,1,1)
  (same comment as for Selenium)
- Selenium [air, non-urban air or from high stacks]: 2.25916e-10 kg; lognormal variance with pedigree 0.68622, pedigree (1,1,3,1,1)
  (same comment as for Hydrogen chloride)
- Molybdenum [water, surface water]: 8.91032e-7 kg; lognormal variance with pedigree 0.40517, pedigree (1,1,3,1,1)
  (same comment as for Selenium)
- Chromium [air, non-urban air or from high stacks]: 1.27178e-10 kg; lognormal variance with pedigree 0.70417, pedigree (1,1,3,1,1)
  (same comment as for Hydrogen chloride)
- Nickel, ion [water, surface water]: 1.07962e-6 kg; lognormal variance with pedigree 0.39623, pedigree (1,1,3,1,1)
  (same comment as for Selenium)
- Antimony [air, non-urban air or from high stacks]: 6.21265e-11 kg; lognormal variance with pedigree 0.7282, pedigree (1,1,3,1,1)
  (same comment as for Hydrogen chloride)
- Mercury [water, surface water]: 9.42639e-9 kg; lognormal variance with pedigree 0.52978, pedigree (1,1,3,1,1)
  (same comment as for Selenium)
- Manganese [air, non-urban air or from high stacks]: 3.38181e-8 kg; lognormal variance with pedigree 0.52084, pedigree (1,1,3,1,1)
  (same comment as for Hydrogen chloride)
- Beryllium [water, surface water]: 9.55724e-8 kg; lognormal variance with pedigree 0.47025, pedigree (1,1,3,1,1)
  (same comment as for Selenium)
- Zinc [air, non-urban air or from high stacks]: 4.17176e-9 kg; lognormal variance with pedigree 0.58929, pedigree (1,1,3,1,1)
  (same comment as for Hydrogen chloride)
- Iron, ion [water, surface water]: 2.72459e-5 kg; lognormal variance with pedigree 0.2793, pedigree (1,1,3,1,1)
  (same comment as for Selenium)
- Beryllium [air, non-urban air or from high stacks]: 4.70511e-11 kg; lognormal variance with pedigree 0.73741, pedigree (1,1,3,1,1)
  (same comment as for Hydrogen chloride)
- Copper, ion [water, surface water]: 2.44396e-7 kg; lognormal variance with pedigree 0.41189, pedigree (1,1,3,1,1)
  (same comment as for Selenium)
- Lead [air, non-urban air or from high stacks]: 4.65669e-10 kg; lognormal variance with pedigree 0.66061, pedigree (1,1,3,1,1)
  (same comment as for Hydrogen chloride)
- Strontium [water, surface water]: 5.71752e-6 kg; lognormal variance with pedigree 0.33543, pedigree (1,1,3,1,1)
  (same comment as for Selenium)
- Thallium [air, non-urban air or from high stacks]: 8.30318e-11 kg; lognormal variance with pedigree 0.71895, pedigree (1,1,3,1,1)
  (same comment as for Hydrogen chloride)
- Antimony [water, surface water]: 1.68592e-7 kg; lognormal variance with pedigree 0.46444, pedigree (1,1,3,1,1)
  (same comment as for Selenium)
- Nickel [air, non-urban air or from high stacks]: 4.44907e-10 kg; lognormal variance with pedigree 0.66383, pedigree (1,1,3,1,1)
  (same comment as for Hydrogen chloride)
- Titanium, ion [water, surface water]: 1.44927e-5 kg; lognormal variance with pedigree 0.30382, pedigree (1,1,3,1,1)
  (same comment as for Selenium)
- Iron [air, non-urban air or from high stacks]: 1.34036e-8 kg; lognormal variance with pedigree 0.55018, pedigree (1,1,3,1,1)
  (same comment as for Hydrogen chloride)
- Magnesium [water, surface water]: 0.00795164 kg; lognormal variance with pedigree 0.13599, pedigree (1,1,3,1,1)
  (same comment as for Selenium)
- Silicon [air, non-urban air or from high stacks]: 7.96017e-7 kg; lognormal variance with pedigree 0.4224, pedigree (1,1,3,1,1)
  (same comment as for Hydrogen chloride)
- Potassium, ion [water, surface water]: 0.00208843 kg; lognormal variance with pedigree 0.18432, pedigree (1,1,3,1,1)
  Emissions from short-term leachate treatment.
  Uncertainty: U
- Aluminium [air, non-urban air or from high stacks]: 4.64052e-7 kg; lognormal variance with pedigree 0.43798, pedigree (1,1,3,1,1)
  (same comment as for Hydrogen chloride)
- Thallium [water, surface water]: 1.68658e-7 kg; lognormal variance with pedigree 0.45179, pedigree (1,1,3,1,1)
  (same comment as for Selenium)
- Titanium [air, non-urban air or from high stacks]: 7.1392e-9 kg; lognormal variance with pedigree 0.57154, pedigree (1,1,3,1,1)
  (same comment as for Hydrogen chloride)
- Zinc, ion [water, surface water]: 5.80505e-6 kg; lognormal variance with pedigree 0.31741, pedigree (1,1,3,1,1)
  (same comment as for Selenium)
- Calcium [air, non-urban air or from high stacks]: 3.71928e-7 kg; lognormal variance with pedigree 0.44262, pedigree (1,1,3,1,1)
  (same comment as for Hydrogen chloride)
- Calcium, ion [water, surface water]: 0.00134235 kg; lognormal variance with pedigree 0.17904, pedigree (1,1,3,1,1)
  (same comment as for Selenium)
- Heat, waste [soil, industrial]: 22.4265 MJ; lognormal variance with pedigree 0.052021, pedigree (1,1,3,1,1)
  burden from short-term decomposition of waste (0-100a).
  Uncertainty: U
- Aluminium [water, surface water]: 0.000111468 kg; lognormal variance with pedigree 0.17155, pedigree (1,1,3,1,1)
  (same comment as for Selenium)
- Strontium [air, non-urban air or from high stacks]: 2.81478e-9 kg; lognormal variance with pedigree 0.6026, pedigree (1,1,3,1,1)
  (same comment as for Hydrogen chloride)
- BOD5, Biological Oxygen Demand [water, ground-, long-term]: 0.845131 kg; lognormal variance with pedigree 0.008762, pedigree (1,1,3,1,1)
  (same comment as for Calcium, ion)
- Heat, waste [air, non-urban air or from high stacks]: 18.531 MJ; lognormal variance with pedigree 0.033553, pedigree (1,1,3,1,1)
  burden from direct release or incineration of landfill biogas.
  Uncertainty: U
- Sulfate [water, ground-, long-term]: 0.0377235 kg; lognormal variance with pedigree 0.15618, pedigree (1,1,3,1,1)
  (same comment as for Calcium, ion)
- Magnesium [air, non-urban air or from high stacks]: 2.20332e-6 kg; lognormal variance with pedigree 0.38432, pedigree (1,1,3,1,1)
  (same comment as for Hydrogen chloride)
- Silicon [water, surface water]: 0.000191603 kg; lognormal variance with pedigree 0.16036, pedigree (1,1,3,1,1)
  (same comment as for Selenium)
- Sodium [air, non-urban air or from high stacks]: 2.82707e-6 kg; lognormal variance with pedigree 0.37434, pedigree (1,1,3,1,1)
  (same comment as for Hydrogen chloride)
- Chromium, ion [water, surface water]: 7.98532e-10 kg; lognormal variance with pedigree 0.44126, pedigree (1,1,3,1,1)
  (same comment as for Selenium)
- Potassium [air, non-urban air or from high stacks]: 5.22095e-7 kg; lognormal variance with pedigree 0.43018, pedigree (1,1,3,1,1)
  (same comment as for Hydrogen chloride)
- Sodium, ion [water, surface water]: 0.0113085 kg; lognormal variance with pedigree 0.16573, pedigree (1,1,3,1,1)
  Emissions from short-term leachate treatment.
  Uncertainty: U
- Heat, waste [water, ground-, long-term]: 135.631 MJ; lognormal variance with pedigree 0.022396, pedigree (1,1,3,1,1)
  burden from long-term decomposition of waste (>100a).
  Uncertainty: U
- DOC, Dissolved Organic Carbon [water, ground-, long-term]: 3.26382 kg; lognormal variance with pedigree 0.0087628, pedigree (1,1,3,1,1)
  (same comment as for Calcium, ion)
- TOC, Total Organic Carbon [water, ground-, long-term]: 3.26382 kg; lognormal variance with pedigree 0.0087628, pedigree (1,1,3,1,1)
  (same comment as for Calcium, ion)
- Nitrite [water, ground-, long-term]: 0.000328265 kg; lognormal variance with pedigree 0.12723, pedigree (1,1,3,1,1)
  (same comment as for Calcium, ion)
- Ammonium, ion [water, ground-, long-term]: 0.00603117 kg; lognormal variance with pedigree 0.12723, pedigree (1,1,3,1,1)
  (same comment as for Calcium, ion)
- Nitrate [water, ground-, long-term]: 0.000664939 kg; lognormal variance with pedigree 0.11823, pedigree (1,1,3,1,1)
  (same comment as for Calcium, ion)
- COD, Chemical Oxygen Demand [water, ground-, long-term]: 3.56993 kg; lognormal variance with pedigree 0.0087623, pedigree (1,1,3,1,1)
  (same comment as for Calcium, ion)
- Nitrogen, organic bound [water, ground-, long-term]: 0.00985759 kg; lognormal variance with pedigree 0.12723, pedigree (1,1,3,1,1)
  (same comment as for Calcium, ion)
- Hydrogen sulfide [water, ground-, long-term]: 0.000983366 kg; lognormal variance with pedigree 0.15618, pedigree (1,1,3,1,1)
  (same comment as for Calcium, ion)
- Cobalt [water, ground-, long-term]: 7.54382e-6 kg; lognormal variance with pedigree 0.38857, pedigree (1,1,3,1,1)
  (same comment as for Calcium, ion)
- Barium [water, ground-, long-term]: 0.00131842 kg; lognormal variance with pedigree 0.16899, pedigree (1,1,3,1,1)
  (same comment as for Calcium, ion)
- Fluoride [water, ground-, long-term]: 0.000210405 kg; lognormal variance with pedigree 0.29373, pedigree (1,1,3,1,1)
  (same comment as for Calcium, ion)
- Phosphate [water, ground-, long-term]: 0.000280968 kg; lognormal variance with pedigree 0.68577, pedigree (1,1,3,1,1)
  (same comment as for Calcium, ion)
- Boron [water, ground-, long-term]: 6.86931e-5 kg; lognormal variance with pedigree 0.30284, pedigree (1,1,3,1,1)
  (same comment as for Calcium, ion)
- Dinitrogen monoxide [air, urban air close to ground]: 7.53551e-5 kg; lognormal variance with pedigree 0.071162, pedigree (1,1,3,1,1)
  (same comment as for Selenium)
- Chloride [water, ground-, long-term]: 0.00651312 kg; lognormal variance with pedigree 0.14996, pedigree (1,1,3,1,1)
  (same comment as for Calcium, ion)
- Nitrite [water, surface water]: 0.000311502 kg; lognormal variance with pedigree 0.12293, pedigree (1,1,3,1,1)
  (same comment as for Selenium)
- Mercury [water, ground-, long-term]: 1.57003e-6 kg; lognormal variance with pedigree 0.45515, pedigree (1,1,3,1,1)
  (same comment as for Calcium, ion)
- Nitrogen [water, surface water]: 0.000402019 kg; lognormal variance with pedigree 0.076391, pedigree (1,1,3,1,1)
  (same comment as for Selenium)
- Molybdenum [water, ground-, long-term]: 2.42036e-5 kg; lognormal variance with pedigree 0.37269, pedigree (1,1,3,1,1)
  (same comment as for Calcium, ion)
- Ammonium, ion [water, surface water]: 0.0148251 kg; lognormal variance with pedigree 0.083891, pedigree (1,1,3,1,1)
  (same comment as for Selenium)
- Chromium VI [water, ground-, long-term]: 9.38241e-7 kg; lognormal variance with pedigree 1.9947, pedigree (1,1,3,1,1)
  (same comment as for Calcium, ion)
- Nitrogen oxides [air, urban air close to ground]: 0.00026703 kg; lognormal variance with pedigree 0.0799, pedigree (1,1,3,1,1)
  (same comment as for Selenium)
- Copper, ion [water, ground-, long-term]: 0.000712314 kg; lognormal variance with pedigree 0.25684, pedigree (1,1,3,1,1)
  (same comment as for Calcium, ion)
- Methane, non-fossil [air, urban air close to ground]: 0.000197708 kg; lognormal variance with pedigree 0.11961, pedigree (1,1,3,1,1)
  (same comment as for Selenium)
- Cadmium, ion [water, ground-, long-term]: 1.93343e-5 kg; lognormal variance with pedigree 0.37781, pedigree (1,1,3,1,1)
  (same comment as for Calcium, ion)
- Ammonia [air, urban air close to ground]: 2.7329e-5 kg; lognormal variance with pedigree 0.083181, pedigree (1,1,3,1,1)
  (same comment as for Selenium)
- Arsenic, ion [water, ground-, long-term]: 2.41227e-5 kg; lognormal variance with pedigree 0.36511, pedigree (1,1,3,1,1)
  (same comment as for Calcium, ion)
- Carbon dioxide, non-fossil [air, urban air close to ground]: 0.100895 kg; lognormal variance with pedigree 0.10703, pedigree (1,1,3,1,1)
  (same comment as for Selenium)
- Zinc, ion [water, ground-, long-term]: 0.00144938 kg; lognormal variance with pedigree 0.23274, pedigree (1,1,3,1,1)
  (same comment as for Calcium, ion)
- NMVOC, non-methane volatile organic compounds, unspecified origin [air, urban air close to ground]: 8.97491e-7 kg; lognormal variance with pedigree 0.14876, pedigree (1,1,3,1,1)
  (same comment as for Selenium)
- Antimony [water, ground-, long-term]: 1.10564e-6 kg; lognormal variance with pedigree 0.66309, pedigree (1,1,3,1,1)
  (same comment as for Calcium, ion)
- Carbon monoxide, non-fossil [air, urban air close to ground]: 6.90776e-5 kg; lognormal variance with pedigree 0.10797, pedigree (1,1,3,1,1)
  (same comment as for Selenium)
- Beryllium [water, ground-, long-term]: 1.1878e-5 kg; lognormal variance with pedigree 0.38887, pedigree (1,1,3,1,1)
  (same comment as for Calcium, ion)
- Barium [air, urban air close to ground]: 4.03881e-7 kg; lognormal variance with pedigree 0.25443, pedigree (1,1,3,1,1)
  (same comment as for Selenium)
- Manganese [water, ground-, long-term]: 0.000359586 kg; lognormal variance with pedigree 0.22376, pedigree (1,1,3,1,1)
  (same comment as for Calcium, ion)
- Arsenic [air, urban air close to ground]: 3.4423e-10 kg; lognormal variance with pedigree 0.42553, pedigree (1,1,3,1,1)
  (same comment as for Selenium)
- Nickel, ion [water, ground-, long-term]: 0.000112265 kg; lognormal variance with pedigree 0.31575, pedigree (1,1,3,1,1)
  (same comment as for Calcium, ion)
- Boron [air, urban air close to ground]: 1.25062e-5 kg; lognormal variance with pedigree 0.30287, pedigree (1,1,3,1,1)
  (same comment as for Selenium)
- Lead [water, ground-, long-term]: 0.000876973 kg; lognormal variance with pedigree 0.2514, pedigree (1,1,3,1,1)
  (same comment as for Calcium, ion)
- Copper [air, urban air close to ground]: 5.15082e-12 kg; lognormal variance with pedigree 0.42982, pedigree (1,1,3,1,1)
  (same comment as for Selenium)
- Aluminium [water, ground-, long-term]: 0.136994 kg; lognormal variance with pedigree 0.08582, pedigree (1,1,3,1,1)
  (same comment as for Calcium, ion)
- Phosphorus [air, urban air close to ground]: 1.31754e-8 kg; lognormal variance with pedigree 0.32328, pedigree (1,1,3,1,1)
  (same comment as for Selenium)
- Thallium [water, ground-, long-term]: 2.09253e-5 kg; lognormal variance with pedigree 0.3712, pedigree (1,1,3,1,1)
  (same comment as for Calcium, ion)
- Cyanide [air, urban air close to ground]: 7.68253e-7 kg; lognormal variance with pedigree 0.10619, pedigree (1,1,3,1,1)
  (same comment as for Selenium)
- Titanium, ion [water, ground-, long-term]: 0.00209186 kg; lognormal variance with pedigree 0.22016, pedigree (1,1,3,1,1)
  (same comment as for Calcium, ion)
- Mercury [air, urban air close to ground]: 5.04247e-14 kg; lognormal variance with pedigree 0.54336, pedigree (1,1,3,1,1)
  (same comment as for Selenium)
- Manganese [air, urban air close to ground]: 3.62755e-13 kg; lognormal variance with pedigree 0.31807, pedigree (1,1,3,1,1)
  (same comment as for Selenium)
- Strontium [water, ground-, long-term]: 0.00071166 kg; lognormal variance with pedigree 0.25407, pedigree (1,1,3,1,1)
  (same comment as for Calcium, ion)
- Molybdenum [air, urban air close to ground]: 1.4835e-9 kg; lognormal variance with pedigree 0.41362, pedigree (1,1,3,1,1)
  (same comment as for Selenium)
- Selenium [water, ground-, long-term]: 1.05626e-5 kg; lognormal variance with pedigree 0.42688, pedigree (1,1,3,1,1)
  (same comment as for Calcium, ion)
- Cadmium [air, urban air close to ground]: 2.63651e-11 kg; lognormal variance with pedigree 0.43686, pedigree (1,1,3,1,1)
  (same comment as for Selenium)
- Silicon [water, ground-, long-term]: 0.00630018 kg; lognormal variance with pedigree 0.87649, pedigree (1,1,3,1,1)
  (same comment as for Calcium, ion)
- Cobalt [air, urban air close to ground]: 1.07672e-14 kg; lognormal variance with pedigree 0.46904, pedigree (1,1,3,1,1)
  (same comment as for Selenium)
- Magnesium [water, ground-, long-term]: 0.0448873 kg; lognormal variance with pedigree 0.11347, pedigree (1,1,3,1,1)
  (same comment as for Calcium, ion)
- Chromium [air, urban air close to ground]: 1.85255e-14 kg; lognormal variance with pedigree 0.46136, pedigree (1,1,3,1,1)
  (same comment as for Selenium)
- Sodium, ion [water, ground-, long-term]: 1.13107e-11 kg; lognormal variance with pedigree 0.64618, pedigree (1,1,3,1,1)
  (same comment as for Calcium, ion)
- Strontium [air, urban air close to ground]: 5.54513e-10 kg; lognormal variance with pedigree 0.34795, pedigree (1,1,3,1,1)
  (same comment as for Selenium)
- Potassium, ion [water, ground-, long-term]: 0.00849197 kg; lognormal variance with pedigree 0.16846, pedigree (1,1,3,1,1)
  (same comment as for Calcium, ion)
- Beryllium [air, urban air close to ground]: 9.26907e-11 kg; lognormal variance with pedigree 0.47934, pedigree (1,1,3,1,1)
  (same comment as for Selenium)
