# white asparagus production

Dataset: EcoSpold 2, unit process
Geography: FR
Time period: 2009-01-01 to 2021-12-31
Technology level: current
Classification: ISIC rev.4 ecoinvent: 0113:Growing of vegetables and melons, roots and tubers
Tags: WFLDB
Scenario: Business-as-Usual
System model: Allocation, cut-off by classification
Generated by: Eliane Riedener
Published in: Nemecek T. 2015
Database: ecoinvent
isCopyrightProtected: true
accessRestrictedTo: 1

## General comment
This dataset represents the production of 1 kg of asparagus. The average yield from 2009 - 2012 is 4.2 t/ha. The data are representative for asparagus production in France. Mineral NPK fertiliser input is 110-50-150 kg/ha. Organic fertilisers applied amount to 0.19 m3/ha of liquid manure and 0.15 t/ha of solid manure. Total active ingredients (a.i.) applied as pesticides amount to 5.66 kg a.i./ha.
The dataset was modelled within the project 'World Food LCA database (WFLDB)'. The aim of this project was to provide inventories of a broad variety of agricultural products and processes and to cover for each product at least 50% of the global export market. The share of asparagus produced in France amounts to 0.2% of the global production (tonnage produced in 2010). The production system regarded in this dataset aimed at representing asparagus produced in France for the export market.
PEF-Quality: data quality rating (DQR) = 1.3 (i.e. excellent quality). This dataset refers to an average situation; for specific situations exchanges might differ substantially due to site specific parameters

## Included activities start
This activity starts with the nursery producing asparagus crown (seedlings).

## Included activities end
This activity ends with the removal of asparagus roots after the productive phase (7 years). The dataset includes all activities of a year in a year in the productive phase of the asparagus field including the establishment phase (2 years) per year of lifetime (9 years).
The establishment phase of the asparagus field includes the nursery, manual planting, soil cultivation (plough), fertilisation (manure) and PE foil.
The productive phase of the asparagus field includes machine operations, corresponding infrastructure, fuel use and sheds. Machine operations in the productive phase are: soil cultivation, fertiliser and pesticide application, manual harvesting and irrigation. Further, direct field emissions and land use change are included. At the end of the productive phase the field is cleared by removing the asparagus roots.
Heavy metal uptake by the crop is considered.
The inputs of asparagus crowns (seedlings), fertilisers and pesticides as well as packaging of fertilisers and pesticides are considered. The dataset doesn't include emissions from manure storage because these are within the system boundary of animal production.

## Technology
Conventional production

## Parameters
- heavyMetalUptakeSwitch: 1 dimensionless
- LUC_crop_specific: 1 dimensionless
  This parameter allows to switch between a 'crop specific' and a 'country specific' approach when calculating the LUC of a crop. By default, the chosen approach is 'crop specific', so the value of the parameter is 1. If you want to apply a 'country specific' approach, turn the parameter to 0.

## Reference product
- white asparagus: 1 kg; CPC 01211: Asparagus; By-product classification allocatable product
  production volume 2.00122e7 kg
    Source: FAOSTAT. Average, 2009-2012
  property price 2.57 EUR2005
    Calculated from the trade statistics for the year 2005 published by the UN (COMTRADE database, accessed 20151105) as an average of 5 biggest importers of asparagus in the world; USA, DE, JP, CA and FR. Comtrade cathegory: 70920: Asparagus, fresh or chilled.
  property carbon content 0.03149
    carbon content on a dry matter basis (reserved; not for manual entry)
  properties: dry mass 0.071 kg, water in wet mass 0.929 kg, wet mass 1 kg, carbon content, non-fossil 0.03149, water content 13.0845, carbon content, fossil 0, carbon allocation 0.00223579 kg

## Inputs from technosphere
- transport, tractor and trailer, agricultural: 0.00199998 metric ton*km; lognormal variance with pedigree 0.162439, pedigree (4,1,4,1,1)
  On-farm transport: Yield (in tonnes) multiplied by the average distance from field to farm. The distance was assumed to be 2 km (proxy).
- application of plant protection product, by field sprayer: 0.00288247 ha; source Roy G.  2015; lognormal variance with pedigree 0.124664, pedigree (2,2,4,1,1)
  Literature value or expert estimation (Personal written communication, Gregory Roy, Ctifl, 2015). Corresponds to 12 applications per year.
- [thio]carbamate-compound: 6.81694e-5 kg; source Roy G.  2015; lognormal variance with pedigree 0.0138498, pedigree (2,2,4,1,1)
  Literature value or expert estimation (Personal written communication, Gregory Roy, Ctifl, 2015).
  properties: dry mass 1 kg, wet mass 1 kg, carbon content, fossil 0.626349
- acetamide-anillide-compound, unspecified: 0.00027166 kg; source Roy G.  2015; lognormal variance with pedigree 0.0138498, pedigree (2,2,4,1,1)
  (same comment as for [thio]carbamate-compound)
  properties: dry mass 1 kg, carbon content, fossil 0.659175, wet mass 1 kg
- cyclic N-compound: 5.60362e-5 kg; source Roy G.  2015; lognormal variance with pedigree 0.0138498, pedigree (2,2,4,1,1)
  (same comment as for [thio]carbamate-compound)
  properties: wet mass 1 kg, carbon content, fossil 0.641962, dry mass 1 kg
- packaging, for fertilisers: 0.148927 kg; lognormal variance with pedigree 0.0592, pedigree (4,3,4,5,4)
  Total amount of active substance/s of fertilisers needed for the production of 'white asparagus' is calculated to be circa 7.45E-02 kg. Fertiliser/s used in this dataset is/are: 'ammonium nitrate, as N', 'nitrogen fertiliser, as N', 'phosphate fertiliser, as P2O5', 'potassium chloride, as K2O'. The total amount of active substance/s is doubled in order to account for the packaging of the dilluted product of fertiliser/s that is/are applied. Therefore, 1.49E-01 kg of packaging for fertilisers is justified with this exchange.
  properties: dry mass 1 kg, carbon content, fossil 0.825301, wet mass 1 kg, heating value, net 25.01 MJ, price 0.0642 EUR2005
  note on carbon content, fossil: Considering a chemical formula (C2H4)n for polyethylene, carbon content-fossil is calculated to be 0.856286 kg of Carbon per kg of dry mass.
- dinitroaniline-compound: 0.000166048 kg; source Roy G.  2015; lognormal variance with pedigree 0.0138498, pedigree (2,2,4,1,1)
  (same comment as for [thio]carbamate-compound)
  properties: carbon content, fossil 0.55516, wet mass 1 kg, dry mass 1 kg
- inorganic nitrogen fertiliser, as N: 0.0132113 kg; source Marc Lambert 2015; lognormal variance with pedigree 0.124177, pedigree (2,1,4,1,1)
  Calculated based on literature values or expert estimation: The total amount of nutrient (Personal written communication, Gregory Roy, Ctifl, 2016) multiplied by the share of fertiliser type (Personal written communication, Marc Lambert, Yara, 2015). See supporting documentation 'WFLDB-Documentation.pdf' chapter 'Fertiliser application' for L3 and L4 data (https://ecoquery.ecoinvent.org/File/Reports).
  Corresponds to 55.0 kg/ha
  properties: wet mass 1 kg, dry mass 1 kg
- dithiocarbamate-compound: 9.53863e-5 kg; source Roy G.  2015; lognormal variance with pedigree 0.0138498, pedigree (2,2,4,1,1)
  (same comment as for [thio]carbamate-compound)
  properties: wet mass 1 kg, dry mass 1 kg, carbon content, fossil 0.179339
- potassium chloride: 0.0570331 kg; source Marc Lambert 2015; lognormal variance with pedigree 0.124177, pedigree (2,1,4,1,1)
  The exchange has been updated from 'potassium chloride, as K2O' into 'potassium chloride' and therefore its amount has been scaled (multiplied) from 0.036 kg by 1.5829 kg of 'potassium chloride' per kg of 'potassium chloride, as K2O'. Original comment of the exchange is: Calculated based on literature values or expert estimation: The total amount of nutrient (Personal written communication, Gregory Roy, Ctifl, 2019) multiplied by the share of fertiliser type (Personal written communication, Marc Lambert, Yara, 2015). See supporting documentation 'WFLDB-Documentation.pdf' chapter 'Fertiliser application' for L3 and L4 data (https://ecoquery.ecoinvent.org/File/Reports).
  Corresponds to 150.0 kg/ha
  properties: wet mass 1 kg, dry mass 1 kg
- nitrile-compound: 0.000111284 kg; source Roy G.  2015; lognormal variance with pedigree 0.0138498, pedigree (2,2,4,1,1)
  (same comment as for [thio]carbamate-compound)
  properties: carbon content, fossil 0.344995, wet mass 1 kg, dry mass 1 kg
- manure, liquid, cattle: 0.0401993 kg; source Marc Lambert 2015; lognormal variance with pedigree 0.124177, pedigree (2,1,4,1,1)
  Calculated based on literature values: The total amount of manure (Personal written communication, Marc Lambert, Yara, 2015) multiplied by the country-share of manure per animal category (FAOSTAT 2015). See supporting documentation 'WFLDB-Documentation.pdf' chapter 'Fertiliser application' (https://ecoquery.ecoinvent.org/File/Reports).
  Corresponds to 0.167 m3/ha
  properties: wet mass 1 kg, carbon content, non-fossil 0.68, dry mass 0.075 kg, water content 12.333
- organophosphorus-compound, unspecified: 0.000508727 kg; source Roy G.  2015; lognormal variance with pedigree 0.0138498, pedigree (2,2,4,1,1)
  (same comment as for [thio]carbamate-compound)
  properties: wet mass 1 kg, dry mass 1 kg, carbon content, fossil 0.260898
- poultry manure, fresh: 0.000255903 kg; source Marc Lambert 2015; lognormal variance with pedigree 0.124177, pedigree (2,1,4,1,1)
  Calculated based on literature values: The total amount of manure (Personal written communication, Marc Lambert, Yara, 2015) multiplied by the country-share of manure per animal category (FAOSTAT 2015). See supporting documentation 'WFLDB-Documentation.pdf' chapter 'Fertiliser application' (https://ecoquery.ecoinvent.org/File/Reports).
  Corresponds to 0.00213 m3/ha
  properties: dry mass 0.38 kg, carbon content, non-fossil 0.33389, water content 1.63158, wet mass 1 kg
- triazine-compound, unspecified: 4.53276e-5 kg; source Roy G.  2015; lognormal variance with pedigree 0.0138498, pedigree (2,2,4,1,1)
  (same comment as for [thio]carbamate-compound)
  properties: wet mass 1 kg, carbon content, fossil 0.475616, dry mass 1 kg
- manure, liquid, swine: 0.00603287 kg; source Marc Lambert 2015; lognormal variance with pedigree 0.124177, pedigree (2,1,4,1,1)
  Calculated based on literature values: The total amount of manure (Personal written communication, Marc Lambert, Yara, 2015) multiplied by the country-share of manure per animal category (FAOSTAT 2015). See supporting documentation 'WFLDB-Documentation.pdf' chapter 'Fertiliser application' (https://ecoquery.ecoinvent.org/File/Reports).
  Corresponds to 0.0251 m3/ha
  properties: dry mass 0.05 kg, water content 19, carbon content, non-fossil 0.64, wet mass 1 kg
- diphenylether-compound: 3.57686e-5 kg; source Roy G.  2015; lognormal variance with pedigree 0.0138498, pedigree (2,2,4,1,1)
  (same comment as for [thio]carbamate-compound)
  properties: wet mass 1 kg, dry mass 1 kg, carbon content, fossil 0.560061
- manure, solid, cattle: 0.0313466 kg; source Marc Lambert 2015; lognormal variance with pedigree 0.124177, pedigree (2,1,4,1,1)
  Calculated based on literature values: The total amount of manure (Personal written communication, Marc Lambert, Yara, 2015) multiplied by the country-share of manure per animal category (FAOSTAT 2015). See supporting documentation 'WFLDB-Documentation.pdf' chapter 'Fertiliser application' (https://ecoquery.ecoinvent.org/File/Reports).
  Corresponds to 130.0 kg/ha
  properties: wet mass 1 kg, dry mass 0.22 kg, carbon content, non-fossil 0.441, water content 3.5454
- pyrethroid-compound: 1.01491e-6 kg; source Roy G.  2015; lognormal variance with pedigree 0.0138498, pedigree (2,2,4,1,1)
  (same comment as for [thio]carbamate-compound)
  properties: dry mass 1 kg, wet mass 1 kg, carbon content, fossil 0.623
- fertilising, by broadcaster: 0.000720617 ha; source Roy G.  2015; lognormal variance with pedigree 0.124177, pedigree (2,1,4,1,1)
  Literature value or expert estimation (Personal written communication, Gregory Roy, Ctifl, 2015). Corresponds to 3 applications per year.
- asparagus seedling, for planting: 0.85787 unit; source Roy G.  2015; lognormal variance with pedigree 0.124177, pedigree (2,1,4,1,1)
  (same comment as for [thio]carbamate-compound)
  properties: carbon content, non-fossil 0.439481, wet mass 1 kg, water content 0.73, dry mass 0.578035 kg
  note on carbon content, non-fossil: calculation: C-content of components according to ecoinvent report No. 15a. Source of composition: https://ndb.nal.usda.gov/ndb/search/. Unspecific seedling used as proxy.
- poultry manure, dried: 0.00572438 kg; source Marc Lambert 2015; lognormal variance with pedigree 0.124177, pedigree (2,1,4,1,1)
  Calculated based on literature values: The total amount of manure (Personal written communication, Marc Lambert, Yara, 2015) multiplied by the country-share of manure per animal category (FAOSTAT 2015). See supporting documentation 'WFLDB-Documentation.pdf' chapter 'Fertiliser application' (https://ecoquery.ecoinvent.org/File/Reports).
  properties: dry mass 0.865 kg, wet mass 1 kg, potassium content 0.024, nitrogen content 0.532, nickel content 4e-5, water content 0.156069, zinc content 0.000349, cadmium content 2.92e-7, mercury content 2e-7, copper content 4.38e-5, phosphorus content 0.0167, lead content 2.92e-6, carbon content, non-fossil 0.33389
- horticultural fleece: 0.343158 m2; source Blanke M. 2012; lognormal variance with pedigree 0.124177, pedigree (2,1,4,1,1)
  Literature value or expert estimation (Blanke et al. 2012). Amount of fleece used to cover 1kg of asparagus
  properties: dry mass 1 kg, wet mass 1 kg, carbon content, fossil 0.85714
  note on carbon content, fossil: Polypropylene is formed by the polymerisation of propylene, C3H6
- tillage, harrowing, by spring tine harrow: 0.000240206 ha; lognormal variance with pedigree 0.124177, pedigree (2,1,4,1,1)
  Estimation based on a modified MEXALCA-approach (Roches et al. 2010; Nemecek et al. 2012): See supporting documentation 'WFLDB-Documentation.pdf' chapter 'Machinery processes' for L2 data (https://ecoquery.ecoinvent.org/File/Reports).
- irrigation: 0.480411 m3; source Roy G.  2015; lognormal variance with pedigree 0.124177, pedigree (2,1,4,1,1)
  Calculated value: The total amount of water used for irrigation (Personal written communication, Gregory Roy, Ctifl, 2015) multiplied by the country-share of irrigation technique (Personal written communication, Gregory Roy, Ctifl, 2015). See supporting documentation 'WFLDB-Documentation.pdf' chapter 'Water use for irrigation' (https://ecoquery.ecoinvent.org/File/Reports). Total amount of irrigation: 4000 m3/ha*year. Only 50% of the fields are irrigated, leading to 2000 m3/ha*year on average at the country-level.
  properties: wet mass 1000 kg, dry mass 0.11 kg, water content 9089.91
- tillage, ploughing: 3.43158e-5 ha; source Blanke M. 2012; lognormal variance with pedigree 0.124177, pedigree (2,1,4,1,1)
  Literature value or expert estimation (Blanke et al. 2012).
- inorganic phosphorus fertiliser, as P2O5: 0.0120103 kg; source Marc Lambert 2015; lognormal variance with pedigree 0.124177, pedigree (2,1,4,1,1)
  Calculated based on literature values or expert estimation: The total amount of nutrient (Personal written communication, Gregory Roy, Ctifl, 2017) multiplied by the share of fertiliser type (Personal written communication, Marc Lambert, Yara, 2015). See supporting documentation 'WFLDB-Documentation.pdf' chapter 'Fertiliser application' for L3 and L4 data (https://ecoquery.ecoinvent.org/File/Reports).
  Corresponds to 25.0 kg/ha
  properties: wet mass 1 kg, dry mass 1 kg
- solid manure loading and spreading, by hydraulic loader and spreader: 0.0370709 kg; source Roy G.  2015; lognormal variance with pedigree 0.124177, pedigree (2,1,4,1,1)
  This amount corresponds the input of solid manure. Personal written communication, Gregory Roy, Ctifl, 2015
- ammonium nitrate: 0.0377489 kg; source Marc Lambert 2015; lognormal variance with pedigree 0.124177, pedigree (2,1,4,1,1)
  The exchange has been updated from 'ammonium nitrate, as N' into 'ammonium nitrate' and therefore its amount has been scaled (multiplied) from 0.0132 kg by 2.8573 kg of 'ammonium nitrate' per kg of 'ammonium nitrate, as N'. Original comment of the exchange is: Calculated based on literature values or expert estimation: The total amount of nutrient (Personal written communication, Gregory Roy, Ctifl, 2015) multiplied by the share of fertiliser type (Personal written communication, Marc Lambert, Yara, 2015). See supporting documentation 'WFLDB-Documentation.pdf' chapter 'Fertiliser application' for L3 and L4 data (https://ecoquery.ecoinvent.org/File/Reports).
  Corresponds to 55.0 kg/ha
  properties: wet mass 1 kg, dry mass 1 kg
- liquid manure spreading, by vacuum tanker: 4.6744e-5 m3; source Roy G.  2015; lognormal variance with pedigree 0.124177, pedigree (2,1,4,1,1)
  This amount corresponds to the input of liquid manure. Personal written communication, Gregory Roy, Ctifl, 2015
- packaging, for pesticides: 0.00271884 kg; lognormal variance with pedigree 0.0592, pedigree (4,3,4,5,4)
  Total amount of active substance/s of pesticides needed for the production of white asparagus is calculated to be circa 1.36E-03 kg. Pesticide/s used in this dataset is/are: '[thio]carbamate-compound', 'acetamide-anillide-compound, unspecified', 'cyclic N-compound', 'dinitroaniline-compound', 'diphenylether-compound', 'dithiocarbamate-compound', 'nitrile-compound', 'organophosphorus-compound, unspecified', 'pyrethroid-compound', 'triazine-compound, unspecified'. The total amount of active substance/s is doubled in order to account for the packaging of the dilluted product of pesticide/s that is/are applied. Therefore, 2.72E-03 kg of packaging for pesticides is justified with this exchange.
  properties: heating value, net 25.97 MJ, dry mass 1 kg, price 0.0642 EUR2005, wet mass 1 kg, carbon content, fossil 0.85714

## Inputs from nature
- Carbon dioxide, in air [natural resource, in air]: 0.139331 kg; lognormal variance with pedigree 0.0138498, pedigree (2,2,4,1,1)
  CO2 uptake by biomass
- Energy, gross calorific value, in biomass [natural resource, biotic]: 1.47599 MJ; lognormal variance with pedigree 0.0138498, pedigree (2,2,4,1,1)
  Gross energy content is related to MJ/kg dry matter of product. Source: ecoinvent data.
- Transformation, from arable land, unspecified use [natural resource, land]: 0.266895 m2; lognormal variance with pedigree 0.0442144, pedigree (2,1,4,1,1)
  10000 m2 divided by the life time of the perennial crop (9 years).
- Transformation, to arable land, unspecified use [natural resource, land]: 0.266895 m2; lognormal variance with pedigree 0.0442144, pedigree (2,1,4,1,1)
  10000 m2 divided by the life time of the perennial crop (9 years).
- Occupation, annual crop [natural resource, land]: 2.40854 m2*year; lognormal variance with pedigree 0.0200616, pedigree (2,1,4,1,1)
  Related to the duration from harvest date of previous crop to harvest date of main crop.

## Emissions to nature
- Chromium, ion [water, ground-]: 4.87089e-6 kg; source Freiermuth R.  2006; lognormal variance with pedigree 0.356938, pedigree (2,2,4,1,1)
  Calculated value - Freiermuth (2006). See 'WFLDB-Guidelines.pdf', available at https://ecoquery.ecoinvent.org/File/Reports.
- Metribuzin [soil, agricultural]: 4.40901e-5 kg; lognormal variance with pedigree 0.0447216, pedigree (2,2,4,1,1)
  Calculated value - 100% emission in soil. See 'WFLDB-Guidelines.pdf', available at https://ecoquery.ecoinvent.org/File/Reports.
- Nitrate [water, ground-]: 0.0313862 kg; source Richner W. 2014; lognormal variance with pedigree 0.175866, pedigree (2,2,4,1,1)
- Oryzalin [soil, agricultural]: 0.000161515 kg; lognormal variance with pedigree 0.0447216, pedigree (2,2,4,1,1)
  (same comment as for Metribuzin)
- Dimethoate [soil, agricultural]: 0.00012371 kg; lognormal variance with pedigree 0.0447216, pedigree (2,2,4,1,1)
  (same comment as for Metribuzin)
- Ammonia [air, non-urban air or from high stacks]: 0.00301026 kg; source EEA 2013; lognormal variance with pedigree 0.0447216, pedigree (2,2,4,1,1)
  Calculated value - EMEP/EEA (2013). See 'WFLDB-Guidelines.pdf', available at https://ecoquery.ecoinvent.org/File/Reports.
- Water [water, surface water]: 0.150362 m3; lognormal variance with pedigree 0.124177, pedigree (2,1,4,1,1)
  Calculated value - Emission calculated from water balance. See 'WFLDB-Guidelines.pdf', available at https://ecoquery.ecoinvent.org/File/Reports.
- Mercury [water, ground-]: 2.05923e-10 kg; source Freiermuth R.  2006; lognormal variance with pedigree 0.356938, pedigree (2,2,4,1,1)
  (same comment as for Chromium, ion)
- Nitrogen oxides [air, non-urban air or from high stacks]: 0.00105047 kg; source EEA 2013; lognormal variance with pedigree 0.124664, pedigree (2,2,4,1,1)
  Calculated value - EEA/EMEP (2013). See 'WFLDB-Guidelines.pdf', available at https://ecoquery.ecoinvent.org/File/Reports.
- Deltamethrin [soil, agricultural]: 6.16074e-7 kg; lognormal variance with pedigree 0.0447216, pedigree (2,2,4,1,1)
  (same comment as for Metribuzin)
- Cadmium, ion [water, ground-]: 1.0944e-8 kg; source Freiermuth R.  2006; lognormal variance with pedigree 0.356938, pedigree (2,2,4,1,1)
  (same comment as for Chromium, ion)
- Copper, ion [water, surface water]: 1.74711e-6 kg; source Freiermuth R.  2006; lognormal variance with pedigree 0.356938, pedigree (2,2,4,1,1)
  (same comment as for Chromium, ion)
- Dinitrogen monoxide [air, non-urban air or from high stacks]: 0.000615828 kg; source IPCC 2006; lognormal variance with pedigree 0.124664, pedigree (2,2,4,1,1)
  Calculated value - IPCC (2006). See 'WFLDB-Guidelines.pdf', available at https://ecoquery.ecoinvent.org/File/Reports.
- Zinc, ion [water, ground-]: 4.5543e-6 kg; source Freiermuth R.  2006; lognormal variance with pedigree 0.356938, pedigree (2,2,4,1,1)
  (same comment as for Chromium, ion)
- Chromium, ion [water, surface water]: 1.24506e-6 kg; source Freiermuth R.  2006; lognormal variance with pedigree 0.356938, pedigree (2,2,4,1,1)
  (same comment as for Chromium, ion)
- Water [air, non-urban air or from high stacks]: 0.29245 m3; lognormal variance with pedigree 0.124177, pedigree (2,1,4,1,1)
  (same comment as for Water)
- Lambda-cyhalothrin [soil, agricultural]: 3.71129e-7 kg; lognormal variance with pedigree 0.0447216, pedigree (2,2,4,1,1)
  (same comment as for Metribuzin)
- Phosphorus [water, surface water]: 3.31556e-5 kg; source Prasuhn V.  2006; lognormal variance with pedigree 0.175866, pedigree (2,2,4,1,1)
  Calculated value - Prasuhn (2006) and SQCB-Erosion. See 'WFLDB-Guidelines.pdf', available at https://ecoquery.ecoinvent.org/File/Reports.
- Cadmium [soil, agricultural]: 1.64175e-6 kg; = 1.64987629411e-06 + ( - 8.12300487617e-09)*heavyMetalUptakeSwitch; source Freiermuth R.  2006
  Comment on mathematicalRelation:
  1.64987629411e-06 from Calculated value - Freiermuth (2006). See 'WFLDB-Guidelines.pdf', available at https://ecoquery.ecoinvent.org/File/Reports.
  -8.12300487617e-09 from Crop, default, heavy metals uptake model
  Heavy metal uptake can be excluded by setting the parameter heavyMetalUptakeSwitch to zero.
- Chromium [soil, agricultural]: 1.19876e-5 kg; = 1.2031178689e-05 + ( - 4.35989527035e-08)*heavyMetalUptakeSwitch; source Freiermuth R.  2006
  Comment on mathematicalRelation:
  1.2031178689e-05 from Calculated value - Freiermuth (2006). See 'WFLDB-Guidelines.pdf', available at https://ecoquery.ecoinvent.org/File/Reports.
  -4.35989527035e-08 from Crop, default, heavy metals uptake model
  Heavy metal uptake can be excluded by setting the parameter heavyMetalUptakeSwitch to zero.
- Copper [soil, agricultural]: 3.73495e-6 kg; = 4.26509091783e-06 + ( - 5.30139265451e-07)*heavyMetalUptakeSwitch; source Freiermuth R.  2006
  Comment on mathematicalRelation:
  4.26509091783e-06 from Calculated value - Freiermuth (2006). See 'WFLDB-Guidelines.pdf', available at https://ecoquery.ecoinvent.org/File/Reports.
  -5.30139265451e-07 from Crop, default, heavy metals uptake model
  Heavy metal uptake can be excluded by setting the parameter heavyMetalUptakeSwitch to zero.
- Lead [soil, agricultural]: 1.1104e-6 kg; = 1.15365953256e-06 + ( - 4.32605608321e-08)*heavyMetalUptakeSwitch; source Freiermuth R.  2006
  Comment on mathematicalRelation:
  1.15365953256e-06 from Calculated value - Freiermuth (2006). See 'WFLDB-Guidelines.pdf', available at https://ecoquery.ecoinvent.org/File/Reports.
  -4.32605608321e-08 from Crop, default, heavy metals uptake model
  Heavy metal uptake can be excluded by setting the parameter heavyMetalUptakeSwitch to zero.
- Mercury [soil, agricultural]: 1.71728e-8 kg; = 2.0417237155e-08 + ( - 3.24440206577e-09)*heavyMetalUptakeSwitch; source Freiermuth R.  2006
  Comment on mathematicalRelation:
  2.0417237155e-08 from Calculated value - Freiermuth (2006). See 'WFLDB-Guidelines.pdf', available at https://ecoquery.ecoinvent.org/File/Reports.
  Heavy metal uptake can be excluded by setting the parameter heavyMetalUptakeSwitch to zero.
- Phosphate [water, ground-]: 5.16826e-5 kg; source Prasuhn V.  2006; lognormal variance with pedigree 0.175866, pedigree (2,2,4,1,1)
  Calculated value - Prasuhn (2006). See 'WFLDB-Guidelines.pdf', available at https://ecoquery.ecoinvent.org/File/Reports.
- Nickel [soil, agricultural]: 2.50681e-6 kg; = 2.59037736302e-06 + ( - 8.35659926497e-08)*heavyMetalUptakeSwitch; source Freiermuth R.  2006
  Comment on mathematicalRelation:
  2.59037736302e-06 from Calculated value - Freiermuth (2006). See 'WFLDB-Guidelines.pdf', available at https://ecoquery.ecoinvent.org/File/Reports.
  -8.35659926497e-08 from Crop, default, heavy metals uptake model
  Heavy metal uptake can be excluded by setting the parameter heavyMetalUptakeSwitch to zero.
- Azoxystrobin [soil, agricultural]: 0.000108246 kg; lognormal variance with pedigree 0.0447216, pedigree (2,2,4,1,1)
  (same comment as for Metribuzin)
- Cadmium, ion [water, surface water]: 1.34863e-8 kg; source Freiermuth R.  2006; lognormal variance with pedigree 0.356938, pedigree (2,2,4,1,1)
  (same comment as for Chromium, ion)
- Acetamiprid [soil, agricultural]: 1.97935e-5 kg; lognormal variance with pedigree 0.0447216, pedigree (2,2,4,1,1)
  (same comment as for Metribuzin)
- Zinc [soil, agricultural]: 2.01963e-5 kg; = 2.2758040883e-05 + ( - 2.56177846316e-06)*heavyMetalUptakeSwitch; source Freiermuth R.  2006
  Comment on mathematicalRelation:
  2.2758040883e-05 from Calculated value - Freiermuth (2006). See 'WFLDB-Guidelines.pdf', available at https://ecoquery.ecoinvent.org/File/Reports.
  -2.56177846316e-06 from Crop, default, heavy metals uptake model
  Heavy metal uptake can be excluded by setting the parameter heavyMetalUptakeSwitch to zero.
- Boscalid [soil, agricultural]: 0.000264244 kg; lognormal variance with pedigree 0.0447216, pedigree (2,2,4,1,1)
  (same comment as for Metribuzin)
- Lead [water, ground-]: 3.59852e-8 kg; source Freiermuth R.  2006; lognormal variance with pedigree 0.356938, pedigree (2,2,4,1,1)
  (same comment as for Chromium, ion)
- Nickel, ion [water, surface water]: 8.68608e-7 kg; source Freiermuth R.  2006; lognormal variance with pedigree 0.356938, pedigree (2,2,4,1,1)
  (same comment as for Chromium, ion)
- Difenoconazole [soil, agricultural]: 3.09274e-5 kg; lognormal variance with pedigree 0.0447216, pedigree (2,2,4,1,1)
  (same comment as for Metribuzin)
- Mancozeb [soil, agricultural]: 9.27822e-5 kg; lognormal variance with pedigree 0.0447216, pedigree (2,2,4,1,1)
  (same comment as for Metribuzin)
- Lead [water, surface water]: 2.99729e-7 kg; source Freiermuth R.  2006; lognormal variance with pedigree 0.356938, pedigree (2,2,4,1,1)
  (same comment as for Chromium, ion)
- Pyraclostrobin (prop) [soil, agricultural]: 6.63083e-5 kg; lognormal variance with pedigree 0.0447216, pedigree (2,2,4,1,1)
  (same comment as for Metribuzin)
- Water [water, ground-]: 0.0375898 m3; lognormal variance with pedigree 0.124177, pedigree (2,1,4,1,1)
  (same comment as for Water)
- Copper, ion [water, ground-]: 7.99452e-7 kg; source Freiermuth R.  2006; lognormal variance with pedigree 0.356938, pedigree (2,2,4,1,1)
  (same comment as for Chromium, ion)
- Clomazone [soil, agricultural]: 3.78551e-6 kg; lognormal variance with pedigree 0.0447216, pedigree (2,2,4,1,1)
  (same comment as for Metribuzin)
- Mercury [water, surface water]: 2.44794e-9 kg; source Freiermuth R.  2006; lognormal variance with pedigree 0.356938, pedigree (2,2,4,1,1)
  (same comment as for Chromium, ion)
- Cycloxydim [soil, agricultural]: 3.71129e-5 kg; lognormal variance with pedigree 0.0447216, pedigree (2,2,4,1,1)
  (same comment as for Metribuzin)
- Fluazifop [soil, agricultural]: 3.47921e-5 kg; lognormal variance with pedigree 0.0447216, pedigree (2,2,4,1,1)
  Calculated value - 100% emission in soil. See 'WFLDB-Guidelines.pdf', available at https://ecoquery.ecoinvent.org/File/Reports. Fluazifop is not registered in this country, but used as a proxy.
- Zinc, ion [water, surface water]: 1.94163e-6 kg; source Freiermuth R.  2006; lognormal variance with pedigree 0.356938, pedigree (2,2,4,1,1)
  (same comment as for Chromium, ion)
- Glufosinate [soil, agricultural]: 0.000371129 kg; lognormal variance with pedigree 0.0447216, pedigree (2,2,4,1,1)
  (same comment as for Metribuzin)

## Sampling procedure
WFLDB Methodological Guidelines for the Life Cycle Inventory of Agricultural Products in the latest version, available at: (Report section: https://v30.ecoquery.ecoinvent.org/File/Reports). Data sources: Data were categorised from level 0 (L0) to level (L4) as follows: L0 = estimate, proxy; L1 = statistical data (e.g. FAOSTAT); L2 = L1 adapted to crop and country; L3 = literature data or L1 resp. L2 data approved by experts; medium detailing (i.e. kg of total N-fertiliser); L4 = L3 data of high detailing (i.e. portion N-fertiliser types).In this dataset data were obtained for yield: L3; Fertilisers: L4; Pesticides: L4; Machinery: L4; Irrigation: L3. For information regarding the calculation of individual exchanges see supporting documentation WFLDB-Documentation.pdf.

## Extrapolations
This dataset has been extrapolated from year 2012 to the year of the calculation (2021). The uncertainty has been adjusted accordingly.

## Review by Assumpció ANTON 2016-05-30
Be aware that the use of statistics in input calculations could provide some specific inputs not common for specific crops, this should be corrected if better information is available and better reflexed in DQR . Currently, I would dissent for some of good marks provided, being a revision of criteria applied advisable.

Pesticides will need to be amended periodically checking for update of pesticides' ban.
