# phosphoric acid production, dihydrate process

Dataset: EcoSpold 2, unit process
Geography: MA
Time period: 1986-01-01 to 2021-12-31
Technology level: current
Classification: ISIC rev.4 ecoinvent: 2012:Manufacture of fertilizers and nitrogen compounds
Tags: ConvertedDataset
Scenario: Business-as-Usual
System model: Allocation, cut-off by classification
Share of production covered: 30 %
Generated by: Alex Primas
Published in: Althaus H.-J. 2004
Database: ecoinvent
isCopyrightProtected: true
accessRestrictedTo: 1

## General comment
The process describes the production of phosphoric acid from phosphate rock with the dyhydrate process in Morocco. As products of the multi output process fertiliser grade phosphoric acid (impure with 51% P2O5) and dilute fluosilic acid (22% in H2O) was considered.

## Included activities end
Raw materials, processing chemicals and processing energy, direct emissions to air from process, emissions to air and water from phosphogypsum disposal, emission of radioactive substances from gypsum to air and water, transport of raw materials to the plant, estimation for process infrastructure. The process includes data on emissions from phosphogypsum disposal to the ocean.

## Geography
Data for amount of phosphoric acid production from statisitcs of IFA (International Fertiliser Agency). Data on phosphoric acid process from a report concerning one production in Morocco and from different literature sources and studies concerning also other locations other than Morocco (mainly U.S., Florida). Most data asessed for processes used in the Safi-plant were extrapolated for the whole Moroccan production. Only production from dry rock considered as in the mayority of the sites in Morocco used. Data for production of fluosilic acid from one european study (EFMA). This data was was used for the whole Moroccan production.

## Technology
Data refers to wet-phosphoric acid production from phosphate rock by the dihydrate process. Technology with sea water once-through cooling and gypsum disposal to the ocean considered.

## Parameters
- fraction, cooling water, recirculating system, to air: 0.771 dimensionless; name fraction_CW_R_to_air; lognormal variance with pedigree 0.0413, pedigree (2,3,1,3,1)
  Calculated based on literature value (Scown, C.D., 2011, Water Footprint of U.S. Transportation Fuels and supplying information of the article) (Vionnet, S., Quantis Water Database - Technical Report, 2012).
- fraction, cooling water, once-through system, to air: 0.004 dimensionless; name fraction_CW_OT_to_air; lognormal variance with pedigree 0.0413, pedigree (2,3,1,3,1)
  (same comment as for fraction, cooling water, recirculating system, to air)
- fraction, cooling water, to air: 0.3875 dimensionless; name fraction_CW_to_air; = (0.5*fraction_CW_OT_to_air)+(0.5*fraction_CW_R_to_air); lognormal variance with pedigree 0.092025, pedigree (4,4,3,2,4)
  Calculated value based on literature value (see comments of the other parametres present in this dataset) and expert opinion. In the case when no industry/literature data are available about the type of cooling or directly fraction, cooling water, to air specific for the process a default assumption is applied. It is assumed that the once-through cooling system is used in 50% of all cases and recirculating system is used in another 50% of all cases.
- fraction, cooling water, cooling pond system, to air: 0.032 dimensionless; name fraction_CW_CP_to_air; lognormal variance with pedigree 0.0413, pedigree (2,3,1,3,1)
  (same comment as for fraction, cooling water, recirculating system, to air)
- fraction, process water, to air: 0.34 dimensionless; name fraction_PW_to_air; lognormal variance with pedigree 0.092025, pedigree (4,4,3,2,4)
  Literature value (Statistics Canada, 2007 & Shaffer, K.H., 2008, Consumptive water use in the Great Lakes Basin, USGS) (Vionnet, S., Quantis Water Database - Technical Report, 2012).

## Reference product
- phosphoric acid, fertiliser grade, without water, in 70% solution state: 1 kg; By-product classification allocatable product; CPC 34232: Phosphoric acid; CAS 7664-38-2
  production volume 2.04314e9 kg
    Capacity in African region 5.84 Mt P2O5 in 1997, therof 50-60% in Morocco.
    51% P2O5 ; P2O5 data from FAOSTAT ResourceSTAT
  property price 0.242 EUR2005
    Temporary price data. Calculated as 90% of purchasers price based on: 2005 import prices (total trades (USD) divided by total weight (kg) in biggest economies of the world: EU27, USA, Brasil, China, India, Japan and Russia) from UN Commodity Trade Statistics Database (http://data.un.org/Explorer.aspxDatabase [Accessed 2011.06.22]). Commodity: Phosphoric acid and polyphosphoric acids
  property carbon content 0
    carbon content on a dry matter basis (reserved; not for manual entry)
  property true value 0.242
    allocation property applied in "true value" allocation // value calculated from revenue
  properties: water in wet mass 0 kg, wet mass 1 kg, carbon content, non-fossil 0, dry mass 1 kg, carbon content, fossil 0, water content 0, carbon allocation 0 kg

## By-products
- fluosilicic acid, without water, in 22% solution state: 0 kg; By-product classification allocatable product; CPC 34: Basic chemicals; CAS 16961-83-4
  production volume 3.67765e7 kg
    Capacity in African region 5.84 Mt P2O5 in 1997, therof 50-60% in Morocco.
    Calculated relative to the output of phosphoric acid (0.018 kg / kg acid)
  property price 0.706 EUR2005
    Temporary price data. Calculated as 90% of purchasers price based on: 2005 import and export prices (total trades (USD) divided by total weight (kg) in biggest economies of the world: EU27, USA, Brasil, China, India, Japan and Russia) from UN Commodity Trade Statistics Database (http://data.un.org/Explorer.aspxDatabase [Accessed 2011.06.20]). Commodity: Inorganic acids nes
  property carbon content 0
    carbon content on a dry matter basis (reserved; not for manual entry)
  property true value 0.012708
    allocation property applied in "true value" allocation // value calculated from revenue
  properties: carbon content, fossil 0, water content 0, water in wet mass 0 kg, carbon content, non-fossil 0, wet mass 1 kg, dry mass 1 kg, carbon allocation 0 kg

## Inputs from technosphere
- heat, district or industrial, natural gas: 2.90733 MJ; lognormal variance with pedigree 0.0621, pedigree (3,2,5,5,3)
  Average of different literature, split is uncertain
  Uncertainty: A
  properties: heating value, net 1 MJ
- phosphoric acid factory, fertiliser grade: 2.95483e-10 unit; lognormal variance with pedigree 0.448, pedigree (4,5,5,5,4)
  Data from a small plant in Jordania
  Uncertainty: D
- quicklime, milled, loose: 0.0784789 kg; lognormal variance with pedigree 0.0712, pedigree (2,3,5,5,3)
  Data for an average process from literature
  Uncertainty: D
  properties: wet mass 1 kg, dry mass 0.99 kg, water content 0.010101
- sulfuric acid: 1.33253 kg; = 2.75*0.51; lognormal variance with pedigree 0.0726, pedigree (2,4,5,5,3)
  It is assumed that 2.75 kg of sulfuric acid are used per kg of P2O5 in the phosphoric acid, which has a P2O5 content of 51%.
  References: Althaus H.-J., Chudacoff M., Hischier R., Jungbluth N., Osses M. and Primas A. (2007) Life Cycle Inventories of Chemicals. ecoinvent report No. 8, v2.0. EMPA Dübendorf, Swiss Centre for Life Cycle Inventories, Dübendorf, CH, from www.ecoinvent.org.
  Uncertainty: D
  properties: dry mass 1 kg, wet mass 1 kg
- phosphate rock, beneficiated: 1.57733 kg; = 0.51/(0.32*0.96); lognormal variance with pedigree 0.0406, pedigree (1,1,5,1,1)
  It is assumed that the process is 96% efficient in terms of the phosphate rock input. Phosphate rock has a P2O5 equal to 32% and phosphoric acid has a P2O5 content of 51%.
  References: Althaus H.-J., Chudacoff M., Hischier R., Jungbluth N., Osses M. and Primas A. (2007) Life Cycle Inventories of Chemicals. ecoinvent report No. 8, v2.0. EMPA Dübendorf, Swiss Centre for Life Cycle Inventories, Dübendorf, CH, from www.ecoinvent.org.
  properties: dry mass 1 kg, wet mass 1 kg
- heat, district or industrial, other than natural gas: 0.494056 MJ; lognormal variance with pedigree 0.0621, pedigree (3,2,5,5,3)
  Average of different literature, split is uncertain
  Uncertainty: A
  property corresponding fuel use, propane, furnace >100kW 0 MJ; name fuel_use
  properties: heating value, net 1 MJ
  note on corresponding fuel use, propane, furnace >100kW: Lower heating value of the fuel input related to the heat/electricity output, taken directly from ecoinvent v3.0 dataset 'heat production, natural gas, at industrial furnace >100kW, GLO 2000'.
- electricity, medium voltage: 0.09255 kWh; = 191/1000*0.51; lognormal variance with pedigree 0.1126, pedigree (2,1,5,5,4)
  It is assumed that the process requires 191 kWh per tonne of P2O5.
  References: Althaus H.-J., Chudacoff M., Hischier R., Jungbluth N., Osses M. and Primas A. (2007) Life Cycle Inventories of Chemicals. ecoinvent report No. 8, v2.0. EMPA Dübendorf, Swiss Centre for Life Cycle Inventories, Dübendorf, CH, from www.ecoinvent.org.
  Uncertainty: A

## Inputs from nature
- Water, well, in ground [natural resource, in water]: 0.00513153 m3; name water_well_in_ground_input; source EFMA - European Fertilizers Manufacturin 2000; lognormal variance with pedigree 0.052625, pedigree (3,3,5,2,1)
  Data from one relevant source used
  Calculated based on literature (EFMA, 2000, Production of Phosphoric Acid; Byers, W., 2003, Industrial Water Management), (Vionnet, S., Quantis Water Database - Technical Report, 2012). Data calculated as an average from U.S. And Europe. Since the data are average of different process roads the included processes might be slightly different in every read. In general it includes the processes: grinding, processing, filtration, concentration, etc. It assumed that the amount of water used for steam production is the same as in the U.S and that the amount of water used for cooling is an arithmetic average of data for the U.S. and for Europe.
  Uncertainty: D
- Water, cooling, unspecified natural origin [natural resource, in water]: 0.121291 m3; name water_cooling_UNO_input; source EFMA - European Fertilizers Manufacturin 2000; lognormal variance with pedigree 0.0508, pedigree (2,2,5,3,1)
  Data from one relevant source used
  Calculated based on literature (EFMA, 2000, Production of Phosphoric Acid; Byers, W., 2003, Industrial Water Management), (Vionnet, S., Quantis Water Database - Technical Report, 2012). Data calculated as an average from U.S. And Europe. Since the data are average of different process roads the included processes might be slightly different in every read. In general it includes the processes: grinding, processing, filtration, concentration, etc. The process ends when finished phosphoric acid leaves the plant. It assumed that the amount of water used for steam production is the same as in the U.S and that the amount of water used for cooling is an arithmetic average of data for the U.S. and for Europe.
  Uncertainty: D

## Emissions to nature
- Particulates, < 2.5 um [air, non-urban air or from high stacks]: 0.000114013 kg; lognormal variance with pedigree 0.4406, pedigree (2,5,5,5,4)
  Related process data used, uncertain distribution
  Uncertainty: R
- Lead-210 [air, non-urban air or from high stacks]: 0.00026793 kBq; lognormal variance with pedigree 0.564025, pedigree (3,4,5,2,5)
  Data from one survey, distribution uncertain
  Uncertainty: D
- Chromium, ion [water, ocean]: 4.76954e-5 kg; lognormal variance with pedigree 0.714, pedigree (3,4,5,1,1)
  Calculated from composition of phosphate rock
  Uncertainty: C
- Potassium-40 [air, non-urban air or from high stacks]: 2.6793e-5 kBq; lognormal variance with pedigree 0.564025, pedigree (3,4,5,2,5)
  Data from one survey, distribution uncertain
  Uncertainty: D
- Arsenic, ion [water, ocean]: 2.43228e-6 kg; lognormal variance with pedigree 0.714, pedigree (3,4,5,1,1)
  Calculated from composition of phosphate rock
  Uncertainty: C
- Copper, ion [water, ocean]: 5.89067e-6 kg; lognormal variance with pedigree 0.714, pedigree (3,4,5,1,1)
  Calculated from composition of phosphate rock
  Uncertainty: C
- Uranium-238 [water, ocean]: 1.12113 kBq; lognormal variance with pedigree 0.564025, pedigree (3,4,5,2,5)
  Data from one survey, distribution uncertain
  Uncertainty: D
- Lead [water, ocean]: 2.47028e-6 kg; lognormal variance with pedigree 0.714, pedigree (3,4,5,1,1)
  Calculated from composition of phosphate rock
  Uncertainty: C
- Radon-222 [air, non-urban air or from high stacks]: 2.74581 kBq; lognormal variance with pedigree 0.564025, pedigree (3,4,5,2,5)
  Data from one survey, distribution uncertain
  Uncertainty: D
- Hydrogen fluoride [air, non-urban air or from high stacks]: 4.75054e-5 kg; lognormal variance with pedigree 0.4006, pedigree (2,5,5,5,5)
  Large variation possible, average value used
  Uncertainty: l
- Radium-226 [water, ocean]: 2.46078 kBq; lognormal variance with pedigree 0.564025, pedigree (3,4,5,2,5)
  Data from one survey, distribution uncertain
  Uncertainty: D
- Potassium-40 [water, ocean]: 0.26413 kBq; lognormal variance with pedigree 0.564025, pedigree (3,4,5,2,5)
  Data from one survey, distribution uncertain
  Uncertainty: D
- Thorium-228 [air, non-urban air or from high stacks]: 6.68876e-6 kBq; lognormal variance with pedigree 0.564025, pedigree (3,4,5,2,5)
  Data from one survey, distribution uncertain
  Uncertainty: D
- Polonium-210 [air, non-urban air or from high stacks]: 0.000468403 kBq; lognormal variance with pedigree 0.564025, pedigree (3,4,5,2,5)
  Data from one survey, distribution uncertain
  Uncertainty: D
- Radium-226 [air, non-urban air or from high stacks]: 0.000301184 kBq; lognormal variance with pedigree 0.564025, pedigree (3,4,5,2,5)
  Data from one survey, distribution uncertain
  Uncertainty: D
- Polonium-210 [water, ocean]: 3.33488 kBq; lognormal variance with pedigree 0.564025, pedigree (3,4,5,2,5)
  Data from one survey, distribution uncertain
  Uncertainty: D
- Manganese [water, ocean]: 5.91917e-6 kg; lognormal variance with pedigree 0.714, pedigree (3,4,5,1,1)
  Calculated from composition of phosphate rock
  Uncertainty: C
- Sulfate [water, ocean]: 1.66269 kg; lognormal variance with pedigree 0.104, pedigree (3,4,5,1,1)
  Calculated from composition of phosphate rock
  Uncertainty: C
- Particulates, > 2.5 um, and < 10um [air, non-urban air or from high stacks]: 0.000161518 kg; lognormal variance with pedigree 0.2606, pedigree (2,5,5,5,4)
  Related process data used, uncertain distribution
  Uncertainty: R
- Water [water, unspecified]: 0.0776774 m3; name water_to_water_unspecified; = water_cooling_UNO_input*(1-fraction_CW_to_air)+water_well_in_ground_input*(1-fraction_PW_to_air); lognormal variance with pedigree 0.0807, pedigree (2,2,5,1,1)
  Calculated value based on literature values and expert opinion. See comments in the parametres' comment field.
  property fraction, origin: unspecified 0.956399; name fraction_origin_unspecified_Ww
  property fraction, origin: salt water 0; name fraction_origin_salt_water_Ww
  property dry mass 0 kg; name DM
  property water in wet mass 1000 kg; name WWM
  property fraction, origin: fresh water 0.043601; name fraction_origin_fresh_water_Ww
  property wet mass 1000 kg; name WM
  property carbon content, fossil 0; name C_content_fossil
  property carbon content, non-fossil 0; name C_content_non_fossil
- Calcium, ion [water, ocean]: 0.838945 kg; lognormal variance with pedigree 0.104, pedigree (3,4,5,1,1)
  Calculated from composition of phosphate rock
  Uncertainty: C
- Zinc, ion [water, ocean]: 3.23037e-5 kg; lognormal variance with pedigree 0.714, pedigree (3,4,5,1,1)
  Calculated from composition of phosphate rock
  Uncertainty: C
- Particulates, > 10 um [air, non-urban air or from high stacks]: 0.000142516 kg; lognormal variance with pedigree 0.1806, pedigree (2,5,5,5,4)
  Related process data used, uncertain distribution
  Uncertainty: R
- Water [air, unspecified]: 0.0487449 m3; name water_to_air_unspecified; = (water_cooling_UNO_input*fraction_CW_to_air)+(water_well_in_ground_input*fraction_PW_to_air); lognormal variance with pedigree 0.0807, pedigree (2,2,5,1,1)
  (same comment as for Water)
  property fraction, origin: fresh water 0.0357929; name fraction_origin_fresh_water
  property fraction, origin: unspecified 0.964207; name fraction_origin_unspecified
  property fraction, origin: salt water 0; name fraction_origin_salt_water
- Lead-210 [water, ocean]: 1.8052e-5 kBq; lognormal variance with pedigree 0.564025, pedigree (3,4,5,2,5)
  Data from one survey, distribution uncertain
  Uncertainty: D
- Thorium-228 [water, ocean]: 5.3396e-6 kBq; lognormal variance with pedigree 0.564025, pedigree (3,4,5,2,5)
  Data from one survey, distribution uncertain
  Uncertainty: D
- Fluoride [water, ocean]: 0.0583366 kg; lognormal variance with pedigree 0.104, pedigree (3,4,5,1,1)
  Calculated from composition of phosphate rock
  Uncertainty: C
- Uranium-238 [air, non-urban air or from high stacks]: 2.33726e-5 kBq; lognormal variance with pedigree 0.564025, pedigree (3,4,5,2,5)
  Data from one survey, distribution uncertain
  Uncertainty: D
- Nickel, ion [water, ocean]: 3.04985e-5 kg; lognormal variance with pedigree 0.714, pedigree (3,4,5,1,1)
  Calculated from composition of phosphate rock
  Uncertainty: C
- Cadmium, ion [water, ocean]: 8.67448e-6 kg; lognormal variance with pedigree 0.714, pedigree (3,4,5,1,1)
  Calculated from composition of phosphate rock
  Uncertainty: C
- Phosphate [water, ocean]: 0.0368642 kg; lognormal variance with pedigree 0.104, pedigree (3,4,5,1,1)
  Calculated from composition of phosphate rock
  Uncertainty: C
- Carbon dioxide, fossil [air, non-urban air or from high stacks]: 0.118763 kg; lognormal variance with pedigree 0.0706, pedigree (3,3,5,1,3)
  Data for dry rock processing, one source
  Uncertainty: D

## Sampling procedure
Production of phosphoric acid assessed mainly with data from one site in Morocco (capacity about 1.3 Mt P2O5 per year). It was was assumed that the data cover about 30-50% of the Moroccan production. The total amount of fluosilic acid produced is not known. The production was assessed with weak data from one source. Therefore no representativity of the data can be given for fluosilic acid production.
