# flyash brick production

Dataset: EcoSpold 2, unit process
Geography: IN
Time period: 2014-04-01 to 2021-12-31
Technology level: current
Classification: EcoSpold01Categories: construction materials/bricks
Classification: ISIC rev.4 ecoinvent: 2395:Manufacture of articles of concrete, cement and plaster
Tags: combined production
Scenario: Business-as-Usual
System model: Allocation, cut-off by classification
Generated by: P V Kiran Ananth
Published in: Kiran Ananth P. V. 2017
Database: ecoinvent
isCopyrightProtected: true
accessRestrictedTo: 1

## General comment
Pulverized fuel ash-lime bricks are obtained from materials consisting of pulverized fuel ash in major quantity, lime and an accelerator acting as a catalyst. Pulverized fuel ash-lime bricks are generally manufactured by intergrading blending various raw materials are then moulded into bricks and subjected to curing cycles at different temperatures and pressures. These bricks are suitable for use in masonry construction just like common burnt clay bricks.

## Included activities start
Activities start with reception of raw material at manufacturing units.

## Included activities end
Activity includes the whole manufacturing process to produce flyash bricks (raw material provision, raw material mixing, pressing, curing, drying and dispatch), transports to plant, and infrastructure. No material/energy requirement for administration are included.

## Geography
Data represents for southern part of India,

## Technology
Fly ash, Lime, Gypsum and Sand are manually feed into a pan mixer where water is added to the required proportion for homogeneous mixing. The proportion of raw material may vary depending upon quality of raw materials. After mixing, the mixture are allowed to belt conveyor through feed in to automatic brick making machine were the bricks are pressed automatically. Then the bricks are placed on wooden pallets and kept as it is for two days thereafter transported to open area where they are water cured for 10 -15 days. The bricks are sorted and tested before dispatch.

## Time period
Data available for these period.

## Reference product
- flyash brick: 1 kg; name brick; CPC 3731: Bricks, blocks, tiles and other ceramic goods of siliceous earths; By-product classification allocatable product
  production volume 7.72795e9 kg
    Utilization of flyash for manufacturing bricks and tiles in India is 12.0216 million tonnes. It is assumed that 50% is utilized for manufacturing of the flyash bricks. Amount of flyash required for manufacturing bricks is 0.777. Ref- <http://cea.nic.in/reports/others/thermal/tcd/flyash_final_1415.pdf>
  property price 0.083 EUR2005; name brick_price_EUR2005
    Price assumed to be equal to the price of cla and light clay brick.
  property carbon content 0
    carbon content on a dry matter basis (reserved; not for manual entry)
  properties: carbon content, fossil 0, water in wet mass 0 kg, carbon content, non-fossil 0, water content 0, wet mass 1 kg, dry mass 1 kg, carbon allocation 0 kg
- hard coal ash: 0 kg; name ash; By-product classification Waste; CPC 39: Wastes or scraps
  Calculated value. The amount of dry fly ash needed to produce 1kg of flyash brick is 0.778kg.
  production volume 0 kg
    Calculated from production volume of reference product using the relative outputs.
  property price 0 EUR2005; name ash_price_EUR2005
    Waste products are assigned a price of zero as they are assumed to require further treatment.
  property carbon content 0
    carbon content on a dry matter basis (reserved; not for manual entry)
  properties: carbon content, non-fossil 0, carbon content, fossil 0, wet mass 1 kg, water content 0, dry mass 1 kg, water in wet mass 0 kg, carbon allocation 0 kg

## Inputs from technosphere
- tap water: 0.5 kg; name tap_water_input; = 0.5*brick; source Cordes R. 1996; lognormal variance with pedigree 0.0626, pedigree (4,4,3,4,4)
  EcoSpold01Location=RER
  Expert judgement.
  properties: carbon content, fossil 0.00178991, dry mass 0.000337476 kg, water content 2962.17, wet mass 1 kg
  note on carbon content, fossil: Bicarbonate content is 2.93 mol/m3. CO2 content is 0.1 mol/m3 (ecoinvent v2.2 report 8, Tab 93.1).
- conveyor belt: 0.000483 m; = 0.000483*brick; lognormal variance with pedigree 0.0586, pedigree (4,4,3,4,4)
  Expert judgement.
- brick production facility: 1.99133e-10 unit; = 1.99132776757222E-10*brick; lognormal variance with pedigree 0.1386, pedigree (4,3,3,5,5)
  Data referred from ecoinvent dataset of shale brick production, GLO. (accessed 20170823)
  properties: capacity [kg] 6.6957e7 kg, lifetime capacity [kg] 5.02178e9 kg, lifetime 75 year
  note on capacity [kg]: Measured value based on sales of brick for the dataset brick shale production, Québec (source: questionnaire). Represent the real capacity of the facility.
  note on lifetime: Estimation of infrastructure lifetime based on personnal communication with the brick producer (dataset brick shale production, Québec).
- sand: 0.15 kg; = 0.15*brick+ash*0; lognormal variance with pedigree 0.022, pedigree (4,4,3,1,1)
  CII Green Pro Assesment project report on production of flyash bricks.
  EcoSpold01Location=CH
  properties: dry mass 1 kg, wet mass 1 kg
- chemical, organic: 0.0005689 kg; = 0.0005689*brick; lognormal variance with pedigree 0.0132, pedigree (2,5,3,5,1)
  Data referred from ecoinvent dataset of shale brick production, GLO. (accessed 20170823)
  properties: carbon content, fossil 0.628, wet mass 1 kg, dry mass 1 kg, heating value, net 19.03 MJ
  note on carbon content, fossil: This dataset is an unweighted average of 20 organic substances (listed in Tab 88.1, ecoinvent v2.2 report 8, part II), being part of the top100 chemicals included in this database. The C-content has also been calculated as an unweighted average of the C content of the substances composing this dataset.
- chemical, inorganic: 7.654e-5 kg; = 0.00007654*brick; lognormal variance with pedigree 0.0132, pedigree (2,5,3,5,1)
  Data referred from ecoinvent dataset of shale brick production, GLO. (accessed 20170823)
  properties: carbon content, fossil 0.003, dry mass 1 kg, wet mass 1 kg
  note on carbon content, fossil: This dataset is an unweighted average of 20 inorganic substances (listed in Tab 88.1, ecoinvent v2.2 report 8, part II), being part of the top100 chemicals included in this database. The C-content has also been calculated as an unweighted average of the C content of the substances composing this dataset.
- lime, packed: 0.1 kg; = 0.1*brick; lognormal variance with pedigree 0.022, pedigree (4,4,3,1,1)
  (same comment as for sand)
  properties: carbon content, fossil 0.117492, dry mass 0.998 kg, water content 0.00200401, wet mass 1 kg
  note on carbon content, fossil: Table 3.1, ecoinvent v2.2 report 7, part VII, pg 3. MW CaCO3=100, MW MgCO3=84
- electricity, medium voltage: 0.011346 kWh; = 0.011346*brick; lognormal variance with pedigree 0.022, pedigree (4,4,3,1,1)
  EcoSpold01Location=CH
  CII Green Pro Assesment project report on production of flyash bricks.
- solvent, organic: 1.1472e-5 kg; = 0.000011472*brick; lognormal variance with pedigree 0.0526, pedigree (5,5,3,5,1)
  Data referred from ecoinvent dataset of shale brick production, GLO. (accessed 20170823)
  properties: heating value, net 19.11 MJ, wet mass 1 kg, carbon content, fossil 0.63072, dry mass 1 kg
- gypsum, mineral: 0.05 kg; = 0.05*brick; lognormal variance with pedigree 0.018, pedigree (4,4,3,1,1)
  CII Green Pro Assesment project report on production of flyash bricks.
  properties: wet mass 1 kg, dry mass 1 kg

## Emissions to nature
- Water [air, unspecified]: 0.0005 m3; name water_to_air_unspecified; = 0.0005*brick; lognormal variance with pedigree 0.0447, pedigree (2,2,3,5,1)
  Calculated value based on literature values and expert opinion. See comments in the parametres' comment field. Exchange calculated as: ABS(tap_water_input)/1000

## Sampling procedure
Literature

## Extrapolations
Data represents for certain part of India. The uncertainty has been adjusted accordingly.
