# ferrite production

Dataset: EcoSpold 2, unit process
Geography: GLO
Time period: 1998-01-01 to 2021-12-31
Technology level: current
Classification: EcoSpold01Categories: electronics/component
Classification: ISIC rev.4 ecoinvent: 2393:Manufacture of other porcelain and ceramic products
Tags: ConvertedDataset
Scenario: Business-as-Usual
System model: Allocation, cut-off by classification
Generated by: Roland Hischier
Published in: Hischier R. 2007
Database: ecoinvent
isCopyrightProtected: true
accessRestrictedTo: 1

## General comment
This dataset represents the production of 1 kg of MnZn ferrite (type (Mn,Zn)O.F2O3) as one of the specific inputs to a CRT screen. It is a rough estimation of the actual ferrite production for the use in CRT screens. It is assumed for the CRT screen a MnZn ferrite (i.e. a ferrite of the type (Mn, Zn)O∙Fe2O3. Main data about a MnZn ferrite are based on general information from literature as well as estimations based on further processes of the database.
[This dataset was already contained in the ecoinvent database version 2. It was not individually updated during the transfer to ecoinvent version 3. Life Cycle Impact Assessment results may still have changed, as they are affected by changes in the supply chain, i.e. in other datasets. This dataset was generated following the ecoinvent quality guidelines for version 2. It may have been subject to central changes described in the ecoinvent version 3 change report (http://www.ecoinvent.org/database/ecoinvent-version-3/reports-of-changes/), and the results of the central updates were reviewed extensively. The changes added e.g. consistent water flows and other information throughout the database. The documentation of this dataset can be found in the ecoinvent reports of version 2, which are still available via the ecoinvent website. The change report linked above covers all central changes that were made during the conversion process.]

## Included activities start
From reception of raw materials at the factory gate.

## Included activities end
This dataset is a rough estimation of the composition by including raw materials, energy consumption and infrastructure efforts. Waste as well as all kind of emissions are not taken into account.

## Geography
Literature data are used to establish a global valuable dataset.

## Technology
Average production for MnZn soft ferrites: Rotary pipe oven (presintering at 800-1000°C for 1-2 h in presence of air for initial chemical reaction), continuous attritor (regrinding and mixing for size reduction and homogenity), bull mill (grinding and mixing for size reduction and homogenity), pressing(compression molding extruding), continuous or chamber oven (sintering at 1200-1400°C under atmospheric conditions that yield a specific FeO content), mechanical working (face grinding: air gap grinding).

## Reference product
- ferrite: 1 kg; source Ervens W. 2005; By-product classification allocatable product; CPC 4111: Primary materials of the iron and steel industry
  EcoSpold01Location=GLO
  Ferrites are electrically non-conductive ferrimagnetic ceramic compound materials, consisting of various mixtures of iron oxides such as Hematite (Fe2O3) or Magnetite (Fe3O4) and the oxides of other metals. Those that are used in transformer or electromagnetic cores contain nickel, zinc or manganese compounds. They are called soft ferrites. MnZn and NiZn ferrites are the most common materials within the soft ferrites.
  production volume 2.6e8 kg
    Estimated based on qualitative information. 4E+7kg of magnezium-zinc ferrite is produced in China every year (http://www.researchandmarkets.com/reports/836770/2008_report_on_chinas_magnetic_material_market.pdf). It is assumed that this is the majority of the global production volume.
  property carbon content, non-fossil 0
    MnZn ferrite (i.e. a ferrite of the type (Mn, Zn)O·Fe2O3 (ecoinvent v2.2 report 18_III-part5)
  property carbon content, fossil 0
    (same comment as for ferrite)
  property carbon content 0
    carbon content on a dry matter basis (reserved; not for manual entry)
  properties: dry mass 1 kg, wet mass 1 kg, water in wet mass 0 kg, price 0.468 EUR2005, water content 0, carbon allocation 0 kg

## Inputs from technosphere
- heat, district or industrial, natural gas: 0.0363 MJ; lognormal variance with pedigree 0.1361, pedigree (4,5,5,3,4)
  Proxy, due to a lack of specific information, for the total energy consumption the energy consumption of the sintering process in the steel production chain is used.
  EcoSpold01Location=RER
  Uncertainty: Estimation, based on the iron sintering process
  properties: heating value, net 1 MJ
- aluminium oxide factory: 2.5e-11 unit; lognormal variance with pedigree 0.3861, pedigree (4,5,5,3,1)
  Proxy, due to a lack of specific information, the infrastructure module for the aluminium oxide production representing a calcination plant is used.
  EcoSpold01Location=RER
  Uncertainty: Estimation, based on aluminium oxide production site
- portafer: 0.55 kg; source Socolof M. L. 2001; lognormal variance with pedigree 0.34, pedigree (5,5,5,5,5)
  Estimation, the total amount is based on literature and the split on own assumptions.
  EcoSpold01Location=RER
  Uncertainty: assumption by author
  properties: dry mass 1 kg, wet mass 1 kg
- electricity, medium voltage: 0.01 kWh; lognormal variance with pedigree 0.1361, pedigree (4,5,5,3,4)
  EcoSpold01Location=UCTE
  Proxy, due to a lack of specific information, for the total energy consumption the energy consumption of the sintering process in the steel production chain is used.
  Uncertainty: Estimation, based on the iron sintering process
- manganese: 0.3 kg; source Socolof M. L. 2001; lognormal variance with pedigree 0.34, pedigree (5,5,5,5,5)
  EcoSpold01Location=RER
  Estimation, the total amount is based on literature and the split on own assumptions.
  Uncertainty: assumption by author
  properties: dry mass 1 kg, wet mass 1 kg
- zinc oxide: 0.15 kg; source Socolof M. L. 2001; lognormal variance with pedigree 0.34, pedigree (5,5,5,5,5)
  (same comment as for portafer)
  properties: wet mass 1 kg, dry mass 1 kg
- heat, central or small-scale, other than natural gas: 1.43 MJ; lognormal variance with pedigree 0.1361, pedigree (4,5,5,3,4)
  (same comment as for heat, district or industrial, natural gas)
  properties: heating value, net 1 MJ

## Sampling procedure
literature & own estimations

## Extrapolations
This dataset has been extrapolated from year 2006 to the year of the calculation (2021). The uncertainty has been adjusted accordingly.

## Review by Jürgen Sutter 2007-11-08
passed.
