# urea production

Dataset: EcoSpold 2, unit process
Geography: RoW
Time period: 2011-01-01 to 2021-12-31
Technology level: current
Classification: ISIC rev.4 ecoinvent: 2012:Manufacture of fertilizers and nitrogen compounds
Synonyms: Carbamide
Scenario: Business-as-Usual
System model: Allocation, cut-off by classification
Generated by: Anna Kounina
Database: ecoinvent
isCopyrightProtected: true
accessRestrictedTo: 1

## General comment
This dataset is a weighted average from the respective regional datasets.
This dataset represents the production of 1 kg of urea, with 46% N. Urea (formula CO(NH2)2) is a an organic chemical compound naturally found in the urine of mammals that serves an important role in the metabolism of nitrogen-containing compounds. It is a colorless, odorless solid, highly soluble in water, and practically non-toxic. When dissolved in water, it is neither acidic nor alkaline. Over 90% of the world industrial production of urea is for its use as nitrogen (N) fertiliser. It is also used as raw material for the manufacturing of resins, explosives, and various medical and laboratory applications.
Urea is produced from synthetic ammonia and carbon dioxide under high pressure (known as the Bosch–Meiser urea process). As large quantities of carbon dioxide are produced during the ammonia manufacturing process, urea production units are most often combined with an ammonia plant. All the carbon dioxide used in the process is therefore recovered from the ammonia synthesis. The amount of CO2 recovered from the ammonia synthesis and used in urea production, will be inevitably and completely released back to the atmosphere after application of urea to the soil.
The process generates ammonium carbamate, which is then dehydrated with heat to form urea and water:
2NH3 + CO2 → NH2COONH4 → CO(NH2)2 + H2O
The main data sources for this dataset are Fertilizers Europe (2014, 2016). Additional data sources are listed as follows.
References:
Fertilizers Europe (2000): Best Available Techniques for Pollution Prevention and Control in the European Fertilizer Industry. Booklet No. 1 of 8: Production of Ammonia. Fertilizers Europe, Brussels.
Kongshaug G. (1998): Energy Consumption and Greenhouse Gas Emissions in Fertilizer Production. IFA 20th July 1998
Davies J., Haglund C. (1999): Life Cycle Inventory of Fertiliser Production. SIK-Report No 654 1999. Chalmers University of Technology, Sweden.
Fertilizers Europe (2014): Average Emissions Year 2011. Fertilizers Europe Environmental report (internal).
Fertilizers Europe (2000): Best Available Techniques for Pollution Prevention and Control in the European Fertilizer Industry. Booklet No. 5 of 8: Production of urea and urea ammonium nitrate. Fertilizers Europe, Brussels.
Fertilizers Europe (2016): Carbon Footprint Calculator for Fertilizer Production. Specification. Version 2.1
Fertilizers Europe (2016): Average Emissions Year 2014. Fertilizers Europe Environmental report (internal). Used for updated energy and GHG emission in Carbon Footprint Calculator

## Included activities start
The activity includes all the raw and processed materials necessary to produce this product. Liquid ammonia, carbon dioxide, steam and electricity are included. Direct emissions of ammonia, carbon dioxide and particulate matter to air as well as ammonium ion and nitrogen to water are included.

## Included activities end
The activity ends with the final product being ready for transportation at the production site.

## Geography
This dataset is a weighted average built from the following geographies: CN, RER, RNA.

## Technology
Average techlogy from the regional counterparts as given in the geography comment.

## Time period
Primary data were collected on fertiliser production for the year 2011. These data were based on annual average data for the year 2011.

## Reference product
- urea: 1 kg; By-product classification allocatable product; CPC 34611: Urea; CAS 57-13-6
  production volume 7.76971e10 kg
    Value in kg/y. International Fertilizers Association (2014).
  property price 0.457 EUR2005
    Calculated value based on data from United Nations Commodity Trade Statistics Database (comtrade.un.org). UN comtrade category: 310210 Urea, including aqueous solution in packs > 10kg. Year 2005. Using exchange rate of 1EURO = 1.209 USD. Average of price of import into 5 main markets (EU, US, JP, IN and CN).
  property oxygen content 0.266412
    Oxygen content (on a dry matter basis) of urea is calculated from the molecular formula of the substance (CH4N2O).
  property hydrogen content 0.0671317
    Hydrogen content (on a dry matter basis) of urea is calculated from the molecular formula of the substance (CH4N2O).
  property carbon content, fossil 0.199995
    Carbon content, fossil is calculated based on the chemical formula of the substance.
  property nitrogen content 0.466462
    Nitrogen content (on a dry matter basis) of urea is calculated from the molecular formula of the substance (CH4N2O).
  property carbon content 0.199995
    carbon content on a dry matter basis (reserved; not for manual entry)
  properties: dry mass 1 kg, water content 0, wet mass 1 kg, water in wet mass 0 kg, carbon content, non-fossil 0, carbon allocation 0.199995 kg

## Inputs from technosphere
- ammonia, anhydrous, liquid: 0 kg; pedigree (1,1,1,1,1)
  This flow is weighted averages using the exchanges in the corresponding regional data.
  properties: dry mass 1 kg, wet mass 1 kg, nitrogen content 0.822453, hydrogen content 0.177547
  note on nitrogen content: Nitrogen content (on a dry matter basis) of ammonia, anhydrous, liquid is calculated from the molecular formula of the substance (H3N).
  note on hydrogen content: Hydrogen content (on a dry matter basis) of ammonia, anhydrous, liquid is calculated from the molecular formula of the substance (H3N).
- carbon dioxide, in chemical industry: 0.77112 kg; name CO2
  This flow is weighted averages using the exchanges in the corresponding regional data.
  properties: heating value, net 8.27 MJ, dry mass 1 kg, wet mass 1 kg, carbon content, fossil 0.272912, oxygen content 0.727088
  note on carbon content, fossil: Oxygen content (on a dry matter basis) of carbon dioxide, in chemical industry is calculated from the molecular formula of the substance (CO2).
- electricity, low voltage: 0 kWh; pedigree (1,1,1,1,1)
  This flow is weighted averages using the exchanges in the corresponding regional data.
- steam, in chemical industry: 1.41818 kg; lognormal variance with pedigree 0.0466, pedigree (3,4,5,5,1)
  This flow is weighted averages using the exchanges in the corresponding regional data.
  properties: dry mass 1 kg, wet mass 1 kg
- chemical factory, organics: 4.002e-10 unit; lognormal variance with pedigree 0.346, pedigree (3,4,5,5,1)
  This flow is weighted averages using the exchanges in the corresponding regional data.
- ammonia, anhydrous, liquid: 0.0139031, 0.0216297, 0.0419876, 0.00440075, 0.019673, 0.465406 kg (6 entries); lognormal variance with pedigree 0.0466, pedigree (3,4,5,5,1)
  This flow is weighted averages using the exchanges in the corresponding regional data.
- electricity, low voltage: 0.00487506, 0.000887656, 0.0142924, 0.0355005 kWh (4 entries); lognormal variance with pedigree 0.0466, pedigree (3,4,5,5,1)
  This flow is weighted averages using the exchanges in the corresponding regional data.

## Inputs from nature
- Water, cooling, unspecified natural origin [natural resource, in water]: 0.1311 m3; lognormal variance with pedigree 0.0466, pedigree (3,4,5,5,1)
  This flow is weighted averages using the exchanges in the corresponding regional data.
- Water, unspecified natural origin [natural resource, in ground]: 0.00023 m3; lognormal variance with pedigree 0.0466, pedigree (3,4,5,5,1)
  This flow is weighted averages using the exchanges in the corresponding regional data.

## Emissions to nature
- Ammonia [air, urban air close to ground]: 0.00052 kg; lognormal variance with pedigree 0.086, pedigree (3,4,5,5,1)
  This flow is weighted averages using the exchanges in the corresponding regional data.
- Particulates, > 2.5 um, and < 10um [air, urban air close to ground]: 0.00031 kg; lognormal variance with pedigree 0.166, pedigree (3,4,5,5,1)
  This flow is weighted averages using the exchanges in the corresponding regional data.
- Water [water, unspecified]: 0.0804816 m3; lognormal variance with pedigree 0.086, pedigree (3,4,5,5,1)
  This flow is weighted averages using the exchanges in the corresponding regional data.
- Nitrogen [water, surface water]: 0.00043 kg; lognormal variance with pedigree 0.086, pedigree (3,4,5,5,1)
  This flow is weighted averages using the exchanges in the corresponding regional data.
- Water [air, unspecified]: 0.0524084 m3; lognormal variance with pedigree 0.086, pedigree (3,4,5,5,1)
  This flow is weighted averages using the exchanges in the corresponding regional data.
- Carbon dioxide, fossil [air, urban air close to ground]: -0.73312 kg; name CO2_e; = -CO2+0.038; normal variance with pedigree 0.0466, pedigree (3,4,5,5,1)
  This flow is weighted averages using the exchanges in the corresponding regional data.
- Ammonium, ion [water, surface water]: 0.00016744 kg; lognormal variance with pedigree 0.086, pedigree (3,4,5,5,1)
  This flow is weighted averages using the exchanges in the corresponding regional data.

## Extrapolations
This dataset was built as a weighted average of regional datasets of the same activityName. Weights are based on production volumes.
CN: production volume = 6.63e+10 kg/year, weight = 0.7509
RER: production volume = 1.22e+10 kg/year, weight = 0.1379
RNA: production volume = 9.83e+09 kg/year, weight = 0.1112
