# skidder production

Dataset: EcoSpold 2, unit process
Geography: GLO
Time period: 2012-01-01 to 2021-12-31
Technology level: current
Classification: ISIC rev.4 ecoinvent: 2821:Manufacture of agricultural and forestry machinery
Tags: Swiss Brushup completed
Scenario: Business-as-Usual
System model: Allocation, cut-off by classification
Generated by: Frank Werner
Published in: Knechtle N. 1997
Database: ecoinvent
isCopyrightProtected: true
accessRestrictedTo: 1

## Included activities start
The activity starts with the semi-finished products and raw materials at the factory gate.

## Included activities end
The inventory accounts for the input and disposal of all materials, their (pre-) processing and the energy required for the production and maintenance of the forest machinery represented by this dataset. In addition, material for and emissions from disassembly are included.
Infrastructure for the production and maintenance of the machinery is inventoried as a rough guess from lorry production.
The dataset does not contain fuel consumption or related emissions. These issues are inventoried in the respective dataset on the operation of the machinery.

## Geography
The inventories apply to the production in Northern/Central Europe

## Parameters
- maintenance factor: 0.3 dimensionless; name maintenance_factor; lognormal variance with pedigree 0.1048, pedigree (3,4,2,1,2)
  determined from Knechtle 1997
- lifetime of machine, productive machine hours: 12000 hour; name total_PMH; lognormal variance with pedigree 0.1042, pedigree (3,4,2,1,1)
  Personal oral communication, P. Wiss, Präsident des Verbandes Forstunternehmer Schweiz
- weight of the vehicle: 12000 kg/unit; name vehicle_weight

## Reference product
- skidder: 1 unit; By-product classification allocatable product; CPC 441: Agricultural or forestry machinery and parts thereof
  skidder (large) with a total weight of 12,000 kg and with an engine power of 130 kW . Data on fuel consumption etc. can be found in the respective dataset on the operation of the machine.
  production volume 10000 unit; name p_machinery
    unqualified guess, no information available
  property lifetime capacity [h] 12000 hour; = total_PMH
    Total of operation hours expected; in case of forest machinery: total of productive machine hours.
  property lifetime 6.81818 year; name lifetime; = total_PMH/8/220
    total productive machine hours divided by 8 hour/day divided by 220 working days/yera
  property price 15492.2 EUR2005
    Calculated based on inputs: The price of the product has been calculated as a sum of the values of the material and energy inputs for this product. This value is therefore a rough estimation. It may underestimate the real price since there are additional expenses when producing any product. These expences can include for example labour costs, treatment of waste materials and profit for the producer. Please consider carefully whether this level of data quality is acceptable for your application.

## By-products
- scrap lead acid battery: 0 kg; source Spielmann, M. 2007; By-product classification Recyclable; CPC 39364: Waste and scrap of lead; pedigree (1,1,1,1,1)
  production volume 0 kg; = p_machinery*w_lead
    Calculated from production volume of reference product using the relative outputs.
  property price 0 EUR2005; name w_lead_price_EUR2005
    Assumed without economic value

## Inputs from technosphere
- steel, low-alloyed, hot rolled: 708.5 kg; name m_steel_low_alloyed; = (1+maintenance_factor)*545; source Knechtle N. 1997; lognormal variance with pedigree 0.235, pedigree (5,5,5,5,5)
  total material input for production and maintenance (estimated via default factor); the amount of material used in production is extrapolated from reference via total weight of machine
  properties: UVEK_link_8 4417, UVEK_relative_amount_8 1.69372, UVEK_relative_amount_1 1, dry mass 1 kg, UVEK_relative_amount_2 1, carbon content, fossil 0.005, UVEK_link_9 4433, UVEK_relative_amount_9 7.45236, UVEK_link_1 4222, UVEK_link_2 2662, wet mass 1 kg
  note on UVEK_link_8: This link has been introduced to model transport specifically for the SAM model; to be used only in special submissions in coordination with ecoinvent and the Swiss FOEN.
  note on UVEK_relative_amount_8: scaling factor = amount of transport in corresponding KBOB dataset/amount of this input from technosphere. To be used only in special submissions in coordination with ecoinvent and the Swiss FOEN.
  note on UVEK_relative_amount_1: to be used only in special submissions in coordination with ecoinvent and the Swiss FOEN
  note on UVEK_relative_amount_2: to be used only in special submissions in coordination with ecoinvent and the Swiss FOEN.
  note on carbon content, fossil: Low alloyed steel composition given in Tab. 3.2 ecoinvent v2.2 report 10_partII. Steel assumed to have a C content of 0.5%
- copper, cathode: 60 kg; name m_copper; source Knechtle N. 1997; lognormal variance with pedigree 0.235, pedigree (5,5,5,5,5)
  total material input for production (no maintenance according to reference); the amount of material used in production is extrapolated from reference via total weight of machine
  properties: UVEK_relative_amount_1 1, wet mass 1 kg, UVEK_link_1 595, dry mass 1 kg
  note on UVEK_link_1: Should rather link to a consumption mix (or at least to a production mix, including copper from secondary sources)
- wire drawing, copper: 60 kg; = m_copper; source Knechtle N. 1997; lognormal variance with pedigree 0.235, pedigree (5,5,5,5,5)
  properties: UVEK_relative_amount_1 1, UVEK_link_1 4895
- injection moulding: 182 kg; = m_PP; source Knechtle N. 1997; lognormal variance with pedigree 0.23, pedigree (5,5,5,5,5)
  properties: UVEK_link_1 2701, UVEK_relative_amount_1 1
- heat, district or industrial, natural gas: 40721.2 MJ; = (1+maintenance_factor)*31324; source Spielmann, M. 2007; lognormal variance with pedigree 0.235, pedigree (5,5,5,5,5)
  total heat input for production and maintenance (estimated via default factor); the amount of heat used in production is extrapolated from reference via total weight of machine
  properties: heating value, net 1 MJ, UVEK_link_1 2580, UVEK_relative_amount_1 1
  note on UVEK_link_1: From a principal point of view, linking to a dataset representing a technology mix would be preferable.
- wastewater from lorry production: -2.834 m3; name w_WW; = ((1+maintenance_factor)*2.18)*-1; source Spielmann, M. 2007; lognormal variance with pedigree 0.203, pedigree (4,5,5,5,5)
  total production specific waste water from production and maintenance (estimated via default factor); the amount of waste water from production is extrapolated from reference via total weight of machine
  production volume 28340 m3; = p_machinery*w_WW
    Calculated from production volume of reference product using the relative outputs.
  properties: UVEK_relative_amount_1 -1, UVEK_link_1 4575, wet mass 1000 kg, dry mass 0.337476 kg, water content 2962.17
- electronics, for control units: 60 kg; name m_electronics; source Spielmann, M. 2007; lognormal variance with pedigree 0.235, pedigree (5,5,5,5,5)
  (same comment as for copper, cathode)
  property carbon content, fossil 0.337146; name C_content_fossil_electronics
  property wet mass 1 kg; name m_electronics_WM
  property dry mass 1 kg; name m_electronics_DM
  property carbon content, non-fossil 0.00013442; name C_content_non_fossil_electronics
  property water content 0; name water_content
  property water in wet mass 0 kg; name WWM
  properties: UVEK_link_1 2021, UVEK_relative_amount_1 1
- waste glass sheet: 0 kg; name w_glass; source Knechtle N. 1997; pedigree (1,1,1,1,1)
  production volume 0 kg
    Calculated from the production volume of harvester in proportion to the respective output amounts.
  properties: wet mass 1 kg, dry mass 1 kg
- acetylene: 0 kg; name m_acethylene; source Spielmann, M. 2007; pedigree (1,1,1,1,1)
  used during disassembly
  property carbon content, fossil 0.923077; name C_content_fossil_acetylene
  property wet mass 1 kg; name m_acethylene_WM
  property dry mass 1 kg; name m_acethylene_DM
  properties: UVEK_link_1 101, heating value, net 51.2 MJ, UVEK_relative_amount_1 1
  note on heating value, net: Based on literature, page 25 (Value may refer to HHV), Althaus H.-J., Chudacoff M., Hischier R., Jungbluth N., Osses M. and Primas A. (2007) Life Cycle Inventories of Chemicals. Final report ecoinvent data v2.0 No. 8. EMPA, Swiss Centre for Life Cycle Inventories, Dübendorf, CH, Online-Version under: www.ecoinvent.org.
- waste rubber, unspecified: 0 kg; name w_rubber; source Knechtle N. 1997; pedigree (1,1,1,1,1)
  production volume 0 kg
    Calculated from production volume of reference product using the relative outputs.
  property dry mass 1 kg; name w_rubber_DM
  properties: carbon content, fossil 0.853, UVEK_relative_amount_1 -1, wet mass 1 kg, heating value, net 27.19 MJ, UVEK_link_1 1079
  note on heating value, net: Value taken from the general comment of the treatment dataset.
- electricity, medium voltage: 35717 kWh; = (1+maintenance_factor)*27474.6; source Spielmann, M. 2007; lognormal variance with pedigree 0.235, pedigree (5,5,5,5,5)
  total electricity input for production and maintenance (estimated via default factor); the amount of electricity used in production is extrapolated from reference via total weight of machine
  properties: UVEK_relative_amount_1 1, UVEK_link_1 1785
- road vehicle factory: 8.73e-7 unit; source Spielmann M. 2007; lognormal variance with pedigree 0.76, pedigree (5,5,5,5,5)
  no specific information available; proxy as for production of lorry 16 t
  properties: UVEK_relative_amount_1 1, UVEK_link_1 3829
- aluminium, cast alloy: 117 kg; name m_aluminium; = (1+maintenance_factor)*90; source Knechtle N. 1997; lognormal variance with pedigree 0.235, pedigree (5,5,5,5,5)
  (same comment as for steel, low-alloyed, hot rolled)
  properties: wet mass 1 kg, UVEK_relative_amount_1 1, dry mass 1 kg, UVEK_link_1 162
- waste aluminium: -117 kg; name w_aluminium; = (m_aluminium)*-1; source Knechtle N. 1997; lognormal variance with pedigree 0.203, pedigree (4,5,5,5,5)
  production volume 1.17e6 kg; = p_machinery*w_aluminium
    Calculated from production volume of reference product using the relative outputs.
  property dry mass 1 kg; name w_aluminium_DM
  properties: wet mass 1 kg
- polypropylene, granulate: 182 kg; name m_PP; = (1+maintenance_factor)*140; source Knechtle N. 1997; lognormal variance with pedigree 0.235, pedigree (5,5,5,5,5)
  (same comment as for steel, low-alloyed, hot rolled)
  property carbon content, fossil 0.857143; name C_content_fossil_PP
  properties: wet mass 1 kg, heating value, net 32.78 MJ, dry mass 1 kg, UVEK_link_1 3548, UVEK_relative_amount_1 1
  note on heating value, net: Value extracted from "treatment of waste polypropylene, open burning"
  note on carbon content, fossil: Polypropylene is formed by the polymerisation of propylene, C3H6 (ecoinvent v2.2 report 11_II)
- powder coat, steel: 46.774 m2; = (1+maintenance_factor)*35.98; source Spielmann, M. 2007; lognormal variance with pedigree 0.235, pedigree (5,5,5,5,5)
  total powder coating input for production and maintenance (estimated via default factor)
  properties: UVEK_relative_amount_1 1, UVEK_link_1 3613
- flat glass, uncoated: 0 kg; name m_glass; source Knechtle N. 1997; pedigree (1,1,1,1,1)
  (same comment as for steel, low-alloyed, hot rolled)
  properties: UVEK_link_1 2159, wet mass 1 kg, UVEK_relative_amount_1 1, dry mass 1 kg
- waste polypropylene: 0 kg; name w_PP; source Knechtle N. 1997; pedigree (1,1,1,1,1)
  Input of PP correct for water content of waste flow
  production volume 0 kg
    Calculated from production volume of reference product using the relative outputs.
  property water content 0.189061; name WC_waste_PP
  property dry mass 0.841 kg; name DM_waste_polypropylene
  properties: UVEK_relative_amount_1 -1.18906, wet mass 1 kg, UVEK_link_1 1042, heating value, net 32.78 MJ, carbon content, fossil 0.825208
  note on heating value, net: Value assumed for all polypropylene products. Source: Phyllis2, database for (treated) biomass, algae, feedstocks for biogas production and biochar, https://phyllis.nl/Biomass/View/1186, ECN.TNO
- water, completely softened: 0 kg; name m_water_softened; source Spielmann, M. 2007; pedigree (1,1,1,1,1)
  for battery; the amount is extrapolated from reference via total weight of machine
  property dry mass 0 kg; name m_water_softened_DM
  properties: wet mass 1 kg, UVEK_relative_amount_1 1, UVEK_link_1 4851
- synthetic rubber: 730 kg; name m_rubber; = (730); source Knechtle N. 1997; lognormal variance with pedigree 0.235, pedigree (5,5,5,5,5)
  rubber sealings and tubes plus rubber tyres (production and mantenance)
  property carbon content, fossil 0.871949; name C_content_fossil_rubber
  properties: dry mass 1 kg, wet mass 1 kg, UVEK_relative_amount_1 1, UVEK_link_1 4277, heating value, net 26.42 MJ
  note on carbon content, fossil: EPDM (Ethylene-propene-diene terpolymer) rubber is a terpolymer of ethylene, propene, and a diene with the residual unsaturated portion of the diene in the side chain (ecoinvent v2.2 report 7-part XX & Ullmann). Chemical formula (deduced from Evidences of Solvent-Induced Miscibility in Polychloroprene-co-Ethylene-Propene Diene Terpolymer Blends, Dubey et al., Journal of Applied Polymer Science, 2009, 111:1884-1891): C20H35
- waste electric and electronic equipment: -60 kg; name w_electronics; = (m_electronics)*-1; source Spielmann, M. 2007; lognormal variance with pedigree 0.203, pedigree (4,5,5,5,5)
  production volume 600000 kg; = p_machinery*w_electronics
    Calculated from production volume of reference product using the relative outputs.
  property carbon content, non-fossil 0.00013442; name w_electronics_C_content_non_fossil; = C_content_non_fossil_electronics
  property dry mass 1 kg; name w_electronics_DM
  property carbon content, fossil 0.337146; name w_electronics_C_content_fossil; = C_content_fossil_electronics
  properties: UVEK_link_1 928, wet mass 1 kg, UVEK_relative_amount_1 -1
- scrap copper: 0 kg; name w_copper; source Knechtle N. 1997; pedigree (1,1,1,1,1)
  (same comment as for steel, low-alloyed, hot rolled)
  production volume 0 kg
    Calculated from production volume of reference product using the relative outputs.
  property dry mass 1 kg; name w_copper_DM
  properties: wet mass 1 kg
- oxygen, liquid: 0 kg; source Spielmann, M. 2007; pedigree (1,1,1,1,1)
  used during disassembly
  properties: UVEK_link_1 3319, wet mass 1 kg, UVEK_relative_amount_1 1, dry mass 1 kg
- steel, chromium steel 18/8, hot rolled: 1417 kg; name m_chromium_steel; = (1+maintenance_factor)*1090; source Knechtle N. 1997; lognormal variance with pedigree 0.235, pedigree (5,5,5,5,5)
  (same comment as for steel, low-alloyed, hot rolled)
  properties: UVEK_link_1 451, carbon content, fossil 0.0008, UVEK_link_2 2662, UVEK_relative_amount_2 1, UVEK_relative_amount_1 1, wet mass 1 kg, dry mass 1 kg
  note on carbon content, fossil: Stainless steel model is the grade 304 steel (18/8 stainless, 18% chromium 8% nickel; max. 0.08% C)
- steel, low-alloyed: 12043.2 kg; name m_steel_unalloyed; = (1+maintenance_factor)*9264; source Knechtle N. 1997; lognormal variance with pedigree 0.235, pedigree (5,5,5,5,5)
  (same comment as for steel, low-alloyed, hot rolled)
  properties: UVEK_link_1 4222, wet mass 1 kg, carbon content, fossil 0.005, dry mass 1 kg, UVEK_relative_amount_1 1
  note on UVEK_link_1: Supposted to link to a DS for unalloyed steel (not to low-alloyed steel)
- lead: 83.9 kg; name m_lead; source Spielmann, M. 2007; lognormal variance with pedigree 0.235, pedigree (5,5,5,5,5)
  for battery; the amount is extrapolated from reference via total weight of machine
  properties: dry mass 1 kg, UVEK_link_1 2778, UVEK_relative_amount_1 1, wet mass 1 kg
- scrap steel: 0 kg; name w_scrap_steel; source Knechtle N. 1997; pedigree (1,1,1,1,1)
  used for chromium steel, for which no specific dataset is available (15.09.2012)
  production volume 0 kg
    Calculated from production volume of reference product using the relative outputs.
  property dry mass 1 kg; name w_chromium_steel_DM
  properties: wet mass 1 kg
- wastewater, average: 0 m3; name w_sewage; source Spielmann, M. 2007; pedigree (1,1,1,1,1)
  amounts of water inputs converted to m3
  production volume 0 m3
    Calculated from production volume of reference product using the relative outputs.
  properties: dry mass 0.346837 kg, UVEK_relative_amount_1 -1, carbon content, non-fossil 0.194039, wet mass 1000 kg, UVEK_link_1 4590, water content 2882.2
- tap water: 26143 kg; name m_tap_water; = (1+maintenance_factor)*20110; source Spielmann, M. 2007; lognormal variance with pedigree 0.235, pedigree (5,5,5,5,5)
  total water input for production and maintenance (estimated via default factor); the amount of water used in production is extrapolated from reference via total weight of machine
  property carbon content, non-fossil 0; name C_content_non_fossil
  property carbon content, fossil 0.00178991; name C_content_fossil
  properties: dry mass 0.000337476 kg, wet mass 1 kg, water content 2962.17, UVEK_relative_amount_1 1, UVEK_link_1 4285
- scrap lead acid battery: -83.9 kg; source Spielmann, M. 2007; lognormal variance with pedigree 0.203, pedigree (4,5,5,5,5)
  production volume 839000 kg
- waste glass sheet: -21.3166, -0.542721, -82.1407 kg (3 entries); source Knechtle N. 1997; lognormal variance with pedigree 0.203, pedigree (4,5,5,5,5)
  production volume 1.04e6 kg
- acetylene: 0.87, 4.13 kg (2 entries); source Spielmann, M. 2007; lognormal variance with pedigree 0.235, pedigree (5,5,5,5,5)
  used during disassembly
  properties: carbon content, fossil 0.923077, UVEK_link_1 101, heating value, net 51.2 MJ, wet mass 1 kg, dry mass 1 kg, UVEK_relative_amount_1 1
- waste rubber, unspecified: -357.496, -15.0076, -357.496 kg (3 entries); source Knechtle N. 1997; lognormal variance with pedigree 0.203, pedigree (4,5,5,5,5)
  production volume 7.3e6 kg
  properties: carbon content, fossil 0.853, UVEK_relative_amount_1 -1, wet mass 1 kg, dry mass 1 kg, heating value, net 27.19 MJ, UVEK_link_1 1079
- flat glass, uncoated: 17.7592, 86.2408 kg (2 entries); source Knechtle N. 1997; lognormal variance with pedigree 0.235, pedigree (5,5,5,5,5)
  (same comment as for steel, low-alloyed, hot rolled)
- waste polypropylene: -20.8304, -1.6059, -0.663294, -0.62986, -24.0346, -0.267963, -0.121452, -168.256 kg (8 entries); source Knechtle N. 1997; lognormal variance with pedigree 0.203, pedigree (4,5,5,5,5)
  Input of PP correct for water content of waste flow
  production volume 2.16409e6 kg
  properties: UVEK_relative_amount_1 -1.18906, water content 0.189061, wet mass 1 kg, UVEK_link_1 1042, dry mass 0.841 kg, heating value, net 32.78 MJ, carbon content, fossil 0.825208
- water, completely softened: 4.03067, 5.60781, 7.49152 kg (3 entries); source Spielmann, M. 2007; lognormal variance with pedigree 0.235, pedigree (5,5,5,5,5)
  for battery; the amount is extrapolated from reference via total weight of machine
- scrap copper: -19.0325, -0.892962, -40.0746 kg (3 entries); source Knechtle N. 1997; lognormal variance with pedigree 0.203, pedigree (4,5,5,5,5)
  (same comment as for steel, low-alloyed, hot rolled)
  production volume 600000 kg
  properties: dry mass 1 kg, wet mass 1 kg
- oxygen, liquid: 2.58372, 9.41628 kg (2 entries); source Spielmann, M. 2007; lognormal variance with pedigree 0.235, pedigree (5,5,5,5,5)
  used during disassembly
- scrap steel: -3450.01, -4.37104, -10714.3 kg (3 entries); source Knechtle N. 1997; lognormal variance with pedigree 0.203, pedigree (4,5,5,5,5)
  used for chromium steel, for which no specific dataset is available (15.09.2012)
  production volume 1.41687e8 kg
  properties: dry mass 1 kg, wet mass 1 kg
- wastewater, average: -8.17403, -0.884277, -17.1018 m3 (3 entries); source Spielmann, M. 2007; lognormal variance with pedigree 0.203, pedigree (4,5,5,5,5)
  amounts of water inputs converted to m3
  production volume 261601 m3

## Emissions to nature
- Carbon dioxide, fossil [air, non-urban air or from high stacks]: 16.9231 kg; = m_acethylene*C_content_fossil_acetylene/12*(12+2*16); source Spielmann, M. 2007; lognormal variance with pedigree 0.033, pedigree (1,1,4,1,1)
  acethylene converted to CO2

## Sampling procedure
Data on material composition taken from Knechtle (1997), representing a Mahler Unifant; original data was gathered with a questionnaire by the manufacturer

## Extrapolations
This dataset has been extrapolated from year 2012 to the year of the calculation (2021). The uncertainty has been adjusted accordingly.
