# aubergine production, in heated greenhouse

Dataset: EcoSpold 2, unit process
Geography: GLO
Time period: 2010-01-01 to 2021-12-31
Technology level: current
Classification: ISIC rev.4 ecoinvent: 0113:Growing of vegetables and melons, roots and tubers
Synonyms: eggplant
Scenario: Business-as-Usual
System model: Allocation, cut-off by classification
Generated by: Franziska Stössel
Published in: Stoessel, Franziska; 2012
Database: ecoinvent
isCopyrightProtected: false
accessRestrictedTo: 1

## General comment
This dataset represents aubergine production according to the Integrated Production standard in CH.
Yield: 80 t / ha.
Duration of one cropping cycle: 6 months.
Greenhouse production.
The LCA study, from which this LCI has been derived, contains detailed descriptions of the system boundaries and the data sources used (Stoessel et al. 2012). The publication is published and freely available with comprehensive supporting information:
http://pubs.acs.org/doi/pdf/10.1021/es2030577
Franziska Stoessel, Ronnie Juraske, Stephan Pfister, Stefanie Hellweg. (2012) Life Cycle Inventory and Carbon and Water FoodPrint of Fruits and Vegetables: Application to a Swiss Retailer. Environmental Science & Technology 6(46) 3253-3262.
This activity was adapted to include the global average land use change (LUC) emissions according 2nd edition of the Quantis-modified tool developed by Blonk Consultants 'WFLDB-adapted-Blonk 2014 direct-land-use-change-assessment-tool_2015-05-18a.xlsx', tab. 'Country & land use unknown'. The size of the emission depends on (i) the relative crop expansion in all countries of the crop during the last 20 years and (ii) the corresponding, country specific land transformations. The current results are based on the average FAOSTAT data (harvested area) of 2009-2011 and 1989-1991. The weighted average is used which takes into account relative difference in crop expansion into primary forest, secondary forest, grassland, perennial and annual land.
[This dataset is meant to replace the following datasets:
- aubergine production, GLO, 2010 - 2010]

## Included activities start
From seedling production.

## Included activities end
This activity ends with harvest and storage.
The dataset includes a storage period of 0.3 month and it's use of electricity. It also includes the electricity use in the greenhouse. And an average amount of heating energy for the production and the seedling production is included. The pesticide inputs are classified according to their chemical classes and the emmssions are assigned to the soil (100%). Mercury emissions are neglected due to a lack of data while other heavy metal emissions are included. The dataset doesn't include infrastructure for production and storage facilities. No transports for agricultural means of production from the regional storage to the farm are included.

## Technology
Integrated Production

## Parameters
- fraction, irrigation water, to air: 0.586986 dimensionless; name fraction_IW_to_air; lognormal variance with pedigree 0.0409, pedigree (2,2,2,1,1)
  Literature value (Siebert, 2010) (Vionnet, S., Quantis Water Database - Technical Report, 2012).
- fraction, irrigation water to surface water: 0.2 dimensionless; name fraction_IW_to_surface_water; lognormal variance with pedigree 0.0886, pedigree (4,3,1,1,4)
  Literature value (Doll, 2011) cross referenced with expert opinion.
- fraction, irrigation water, to ground water: 0.8 dimensionless; name fraction_IW_to_ground_water; lognormal variance with pedigree 0.0886, pedigree (4,3,1,1,4)
  Literature value (Doll, 2011) cross referenced with expert opinion.

## Reference product
- aubergine: 1 kg; source Stoessel, Franziska; 2012; By-product classification allocatable product; CPC 01233: Eggplants (aubergines)
  production volume 5.12882e9 kg; = 51288169*1000*0.1
    According to FAOSTAT, global production volume of eggplants (aubergines) for 2016 is reported to be 51288169 tonnes. It is assumed that 10% of the total production is associated with production in heated greenhouses.
    Reference: Food and Agriculture Organization of the United Nations (FAO), 2016, Production quantity for eggplants in world, available at: http://www.fao.org/faostat/en/#data/QC
  property price 1.02 EUR2005
    Calculated from the trade statistics for the year 2005 published by the UN (COMTRADE database, accessed 20151105) as an average of 5 biggest importers of aubergine in the world; USA, DE, FR, UK and IT. Comtrade cathegory: 70930: Aubergines (eggplants), fresh or chilled.
  property carbon content 0.0368212
    carbon content on a dry matter basis (reserved; not for manual entry)
  properties: wet mass 1 kg, carbon content, non-fossil 0.0368212, carbon content, fossil 0, water in wet mass 0.927 kg, water content 12.6986, dry mass 0.073 kg, carbon allocation 0.00268795 kg

## Inputs from technosphere
- irrigation: 0.05 m3; name water_irrigation_input; source Stoessel, Franziska; 2012; lognormal variance with pedigree 0.0198, pedigree (2,4,4,4,3)
  Switzerland
  properties: water content 9089.91, dry mass 0.11 kg, wet mass 1000 kg
- pesticide, unspecified: 3.93e-5 kg; source Stoessel, Franziska; 2012; lognormal variance with pedigree 0.0105, pedigree (2,3,4,3,2)
  properties: carbon content, fossil 0.486978, wet mass 1 kg, dry mass 1 kg
  note on carbon content, fossil: Mean of C content in all pesticides whose formula has been documented in Sutter 2010
- packaging, for fertilisers: 0.000111916 kg; lognormal variance with pedigree 0.0592, pedigree (4,3,4,5,4)
  Total amount of active substance/s of fertilisers needed for the production of 'aubergine' is calculated to be circa 5.60E-05 kg. Fertiliser/s used in this dataset is/are: 'ammonium nitrate, as N', 'phosphate fertiliser, as P2O5', 'potassium sulfate, as K2O'. The total amount of active substance/s is doubled in order to account for the packaging of the dilluted product of fertiliser/s that is/are applied. Therefore, 1.12E-04 kg of packaging for fertilisers is justified with this exchange.
  properties: wet mass 1 kg, price 0.0642 EUR2005, heating value, net 25.01 MJ, carbon content, fossil 0.825301, dry mass 1 kg
  note on carbon content, fossil: Considering a chemical formula (C2H4)n for polyethylene, carbon content-fossil is calculated to be 0.856286 kg of Carbon per kg of dry mass.
- heat, central or small-scale, natural gas: 0.0142 MJ; source Stoessel, Franziska; 2012; lognormal variance with pedigree 0.0105, pedigree (2,3,4,3,2)
  properties: heating value, net 1 MJ
- electricity, low voltage: 0.549167 kWh; source Stoessel, Franziska; 2012; lognormal variance with pedigree 0.0105, pedigree (2,3,4,3,2)
- packaging, for pesticides: 3.73052e-5 kg; lognormal variance with pedigree 0.0592, pedigree (4,3,4,5,4)
  Total amount of active substance/s of pesticides needed for the production of aubergine is calculated to be circa 1.87E-05 kg. Pesticide/s used in this dataset is/are: 'pesticide, unspecified'. The total amount of active substance/s is doubled in order to account for the packaging of the dilluted product of pesticide/s that is/are applied. Therefore, 3.73E-05 kg of packaging for pesticides is justified with this exchange.
  properties: wet mass 1 kg, dry mass 1 kg, price 0.0642 EUR2005, heating value, net 25.97 MJ, carbon content, fossil 0.85714
- ammonium nitrate: 0 kg; source Stoessel, Franziska; 2012; pedigree (1,1,1,1,1)
  The exchange has been updated from 'ammonium nitrate, as N' into 'ammonium nitrate' and therefore its amount has been scaled (multiplied) from 0.0045 kg by 2.8573 kg of 'ammonium nitrate' per kg of 'ammonium nitrate, as N'.
  properties: dry mass 1 kg, wet mass 1 kg
- inorganic phosphorus fertiliser, as P2O5: 0 kg; source Stoessel, Franziska; 2012; pedigree (1,1,1,1,1)
  properties: wet mass 1 kg, dry mass 1 kg
- fertilising, by broadcaster: 0.000141 ha; source Stoessel, Franziska; 2012; lognormal variance with pedigree 0.0105, pedigree (2,3,4,3,2)
  Fertilizing by broadcaster is used as a proxy for all the machinery work done in horticultural processes.
- potassium sulfate: 0 kg; source Stoessel, Franziska; 2012; pedigree (1,1,1,1,1)
  The exchange has been updated from 'potassium sulfate, as K2O' into 'potassium sulfate' and therefore its amount has been scaled (multiplied) from 0.0149 kg by 1.85 kg of 'potassium sulfate' per kg of 'potassium sulfate, as K2O'.
  properties: dry mass 1 kg, wet mass 1 kg
- heat, central or small-scale, other than natural gas: 26.6365 MJ; source Stoessel, Franziska; 2012; lognormal variance with pedigree 0.0105, pedigree (2,3,4,3,2)
  properties: heating value, net 1 MJ
- ammonium nitrate: 0.00321399, 0.00222902, 0.00171324, 0.00581597 kg (4 entries); source Stoessel, Franziska; 2012; lognormal variance with pedigree 0.0105, pedigree (2,3,4,3,2)
  (same comment as for ammonium nitrate)
- inorganic phosphorus fertiliser, as P2O5: 0.000198961, 2.02166e-5, 0.000722032, 1.00844e-5, 1.42017e-6, 3.90607e-5, 1.44404e-6, 2.33016e-5, 1.30143e-5, 4.77906e-5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 kg (30 entries); source Stoessel, Franziska; 2012; lognormal variance with pedigree 0.0105, pedigree (2,3,4,3,2)
- potassium sulfate: 0.00479622, 0.0227682 kg (2 entries); source Stoessel, Franziska; 2012; lognormal variance with pedigree 0.0105, pedigree (2,3,4,3,2)
  (same comment as for potassium sulfate)

## Inputs from nature
- Transformation, to annual crop, greenhouse [natural resource, land]: 0.125 m2; source Stoessel, Franziska; 2012; lognormal variance with pedigree 0.0119, pedigree (2,3,4,3,2)
- Transformation, from annual crop, greenhouse [natural resource, land]: 0.125 m2; source Stoessel, Franziska; 2012; lognormal variance with pedigree 0.0119, pedigree (2,3,4,3,2)
- Occupation, annual crop, greenhouse [natural resource, land]: 0.0625 m2*year; source Stoessel, Franziska; 2012; lognormal variance with pedigree 0.0119, pedigree (2,3,4,3,2)
- Energy, gross calorific value, in biomass [natural resource, biotic]: 1.74822 MJ; lognormal variance with pedigree 0.0099, pedigree (2,3,4,3,1)
  Calculated value based on literature. The gross energy is calculated using following formula; gross energy (MJ) = crude protein (kg)*23.04 (MJ/kg)+crude fat (kg)*38.96 (MJ/kg)+crude fibre (kg)*17.95 (MJ/kg)+carbohydrates (kg)*17.17 (MJ/kg) (formula based on expert opinion, cross referenced; Diepenbrock, 2012, Energy Balance in Crop Production). The product composition of fruits and vegetables is extracted from the USDA National Nutrient Database for Standard Reference (http://ndb.nal.usda.gov/, accessed 20131114). Crude protein (g)= 9.8, crude fat (g)= 1.8, crude fibre (g)= 30, ash (g)= 6.6, water (g)= 923, carbohydrates (g)= 58.8. The gross energy per kg of DM is 25.26MJ. The calculated gross energy per kg of reference product is thus 1.75MJ.
- Peat, in ground [natural resource, biotic]: 0.004 kg; source Stoessel, Franziska; 2012; lognormal variance with pedigree 0.0105, pedigree (2,3,4,3,2)

## Emissions to nature
- Water [air, unspecified]: 0.0293493 m3; name water_to_air_unspecified; = water_irrigation_input*fraction_IW_to_air; lognormal variance with pedigree 0.0487, pedigree (2,2,4,1,1)
  Calculated value based on literature values and expert opinion. See comments in the parametres' comment field.
  property fraction, origin: fresh water 1; name fraction_origin_fresh_water
  property fraction, origin: unspecified 0; name fraction_origin_unspecified
  property fraction, origin: salt water 0; name fraction_origin_salt_water
- Pirimicarb [soil, agricultural]: 2.5e-6 kg; source Stoessel, Franziska; 2012; lognormal variance with pedigree 0.0777, pedigree (3,4,5,3,2)
- Pyrethrin [soil, agricultural]: 3.125e-7 kg; source Stoessel, Franziska; 2012; lognormal variance with pedigree 0.0777, pedigree (3,4,5,3,2)
- Chromium [soil, agricultural]: 1.67995e-6 kg; source Thomas Nemecek 2011; lognormal variance with pedigree 0.0847, pedigree (3,4,5,3,2)
- Ammonia [air, non-urban air or from high stacks]: 0.000110257 kg; source Thomas Nemecek 2011; lognormal variance with pedigree 0.0455, pedigree (3,4,5,3,2)
- Lead [soil, agricultural]: 3.08611e-6 kg; source Thomas Nemecek 2011; lognormal variance with pedigree 0.0847, pedigree (3,4,5,3,2)
- Nitrate [water, ground-]: 0.00603171 kg; source Thomas Nemecek 2011; lognormal variance with pedigree 0.0847, pedigree (3,4,5,3,2)
- Dinitrogen monoxide [air, non-urban air or from high stacks]: 8.88219e-5 kg; source Thomas Nemecek 2011; lognormal variance with pedigree 0.0747, pedigree (3,4,5,3,2)
- Water [water, surface water]: 0.00413014 m3; name water_to_water_surface; = water_irrigation_input*(1-fraction_IW_to_air)*fraction_IW_to_surface_water; lognormal variance with pedigree 0.0966, pedigree (4,3,4,1,4)
  Calculated value. See the parameters and their comments to understand the calculation.
  property fraction, origin: salt water 0; name fraction_origin_salt_water_Wsw
  property fraction, origin: fresh water 1; name fraction_origin_fresh_water_Wsw
- Nickel [soil, agricultural]: 6.40278e-7 kg; source Thomas Nemecek 2011; lognormal variance with pedigree 0.0847, pedigree (3,4,5,3,2)
- Nitrogen oxides [air, non-urban air or from high stacks]: 1.86526e-5 kg; source Thomas Nemecek 2011; lognormal variance with pedigree 0.0747, pedigree (3,4,5,3,2)
- Water [water, ground-]: 0.0165206 m3; name water_to_water_ground; = water_irrigation_input*(1-fraction_IW_to_air)*fraction_IW_to_ground_water; lognormal variance with pedigree 0.0966, pedigree (4,3,4,1,4)
  Calculated value. See the parameters and their comments to understand the calculation.
  property fraction, origin: unspecified 0; name fraction_origin_unspecified_Wgw
  property fraction, origin: salt water 0; name fraction_origin_salt_water_Wgw
  property fraction, origin: fresh water 1; name fraction_origin_fresh_water_Wgw
- Cadmium [soil, agricultural]: 2.74222e-7 kg; source Thomas Nemecek 2011; lognormal variance with pedigree 0.0847, pedigree (3,4,5,3,2)
  property wet mass 1 kg; name WM
  property water content 0; name water_content
  property dry mass 1 kg; name DM
  property water in wet mass 0 kg; name WWM
  property carbon content, non-fossil 0; name C_content_non_fossil
  property carbon content, fossil 0; name C_content_fossil
- Copper [soil, agricultural]: 1.25823e-5 kg; source Stoessel, Franziska; 2012; lognormal variance with pedigree 0.0777, pedigree (3,4,5,3,2)
  emission to agricultural soil from fertilizing, erosion, leaching etc. included (according to Nemecek 2011)
- Folpet [soil, agricultural]: 2.365e-5 kg; source Stoessel, Franziska; 2012; lognormal variance with pedigree 0.0777, pedigree (3,4,5,3,2)
- Phosphate [water, ground-]: 4.38e-7 kg; source Stoessel, Franziska; 2012; lognormal variance with pedigree 0.0847, pedigree (3,4,5,3,2)
- Zinc [soil, agricultural]: 3.78151e-6 kg; source Thomas Nemecek 2011; lognormal variance with pedigree 0.0847, pedigree (3,4,5,3,2)
- Carbon dioxide, from soil or biomass stock [air, non-urban air or from high stacks]: 0.00588019 kg; normal variance with pedigree 0.5452, pedigree (3,3,5,5,2)
  Global average LUC emissions according 2nd edition of the Quantis-modified tool developed by Blonk Consultants 'WFLDB-adapted-Blonk 2014 direct-land-use-change-assessment-tool_2015-05-18a.xlsx', tab. 'Country & land use unknown'. The emission are based on the relative change in production areas in all countries for a given crop. The weighted average is used which takes into acount relative difference in crop expansion into primary forest, secondary forest, grassland, perennial and annual land.
  Uncertainty: Uncertainty estimated based on IPCC 2006
- Piperonyl butoxide [soil, agricultural]: 2.815e-7 kg; source Stoessel, Franziska; 2012; lognormal variance with pedigree 0.0777, pedigree (3,4,5,3,2)
- Phosphorus [water, surface water]: 1.53e-6 kg; source Stoessel, Franziska; 2012; lognormal variance with pedigree 0.0847, pedigree (3,4,5,3,2)
- Rotenone [soil, agricultural]: 1.75e-7 kg; source Stoessel, Franziska; 2012; lognormal variance with pedigree 0.0777, pedigree (3,4,5,3,2)

## Sampling procedure
The LCI is based on aubergine production cost tables from Switzerland which is well representative for an Integrated Production in Switzerland. Most probably it is representative for productions in industrialized countries or farms which produces similarly.
Please refer to Stoessel et al. (2012) for more information: http://pubs.acs.org/doi/pdf/10.1021/es2030577
Franziska Stoessel, Ronnie Juraske, Stephan Pfister, Stefanie Hellweg. (2012) Life Cycle Inventory and Carbon and Water FoodPrint of Fruits and Vegetables: Application to a Swiss Retailer. Environmental Science & Technology 6(46) 3253-3262.

## Extrapolations
This dataset has been extrapolated from year 2010 to the year of the calculation (2021). The uncertainty has been adjusted accordingly.
