# treatment of used refrigerant R134a, venting

Dataset: EcoSpold 2, unit process
Geography: GLO
Time period: 2010-01-01 to 2021-12-31
Technology level: current
Classification: ISIC rev.4 ecoinvent: 3822:Treatment and disposal of hazardous waste
Scenario: Business-as-Usual
System model: Allocation, cut-off by classification
Generated by: Tereza Levova
Database: ecoinvent
isCopyrightProtected: true
accessRestrictedTo: 1

## General comment
This dataset represent treatment of used refrigerant R134a by venting.
The refrigerant R134a is widely used refrigerant (mainly in automobile air conditioning systems and othere refrigeration and cooling technologies). It can be treated by primary three different technologies; 1) venting, 2) reclamation and 3) final disposal.
Since the R134a causes global warming venting as a way of treatment is forbidden in some countries. For example in the US (US EPA, http://www.epa.gov/ozone/title6/608/faq.html, accessed 20141105).

## Included activities start
The activity starts, when the used refrigerant is accepted for treatment.

## Included activities end
No energy is used during this process.

## Technology
Venting is simple releasing of the R134a refrigerant to air. This treatment is forbidden in some countries due to R134a global warming potential.

## Reference product
- used refrigerant R134a: -1 kg; name used_refrigerant; CPC 39: Wastes or scraps; By-product classification Waste
  production volume 1.19e8 kg; name used_refrigerant_PV; = 340000000*0.5*0.7
    Calculated based on literature and estimates.
    3.4E8 kg is the amount of refrigerant R134a produced annual.
    It is estimated, that 70% of the refrigerant is vented already during the use phase. Estimated based on the information published by IPCC (http://www.ghgprotocol.org/files/ghgp/tools/hfc-pfc.xls, accessed 20150723).
    The shares of the three different technologies are estimated to be as follows;
    0.5 venting
    0.3 reclamation
    0.2 final disposal
    There are various sources of information which suggest, that the share of venting can be anywhere between 20 - 100%. So the estimated amount used in this dataset is rather uncertain.
  property price 0 EUR2005; name used_refrigerant_price_EUR2005
    Waste products are assigned a price of zero as they are assumed to require further treatment.
  property heating value, net 13.47 MJ
    LHV is calculated based on the elemental composition of the substance. Based on the name of the substance, the chemical formula of the substance is manually found to be: C6H15N.
  property carbon content 0.23529
    carbon content on a dry matter basis (reserved; not for manual entry)
  properties: carbon content, fossil 0.23529, dry mass 1 kg, water in wet mass 0 kg, carbon content, non-fossil 0, water content 0, wet mass 1 kg, carbon allocation 0.23529 kg

## Emissions to nature
- Ethane, 1,1,1,2-tetrafluoro-, HFC-134a [air, unspecified]: 1 kg; = ABS(used_refrigerant); lognormal variance with pedigree 0.042, pedigree (1,1,3,1,1)
  Calculated value.
  It is assumed, that all the refrigerant is vented into air.

## Extrapolations
This dataset has been extrapolated from year 2014 to the year of the calculation (2021). The uncertainty has been adjusted accordingly.

## Review by Gabor Doka 2014-12-19
passed
Fate of R134a disposal is rather uncertain. Possibly revisit this in the future.
