# planing, lath, softwood, u=20%

Dataset: EcoSpold 2, unit process
Geography: CH
Time period: 2011-01-01 to 2021-12-31
Technology level: current
Classification: ISIC rev.4 ecoinvent: 1610:Sawmilling and planing of wood
Tags: Swiss brush-up completed
Scenario: Business-as-Usual
System model: Allocation, cut-off by classification
Share of production covered: 100 %
Generated by: Frank Werner
Published in: BFS 2013
Database: ecoinvent
isCopyrightProtected: true
accessRestrictedTo: 1

## General comment
This dataset represents planing of one m3 air dried softwood lath that has been dried to 20% moisture content. The ratio of air dried respectively kiln dried laths corresponds to the estimated current market mix. The planing mill is assumed to be located on the sawmill site. The suction of the shavings is modeled in a separate activity.
The data was provided by and approved by the Swiss forest industry (Holzindustrie Schweiz HIS).
Within ecoinvent, three products - boards, beams and laths - are distinguished:

## Included activities start
Planing process starting from air dried respectively kiln dried softwood lath with a moisture content of 20%, at sawmill site.

## Included activities end
This activity ends with planed softwood lath, at plant. The dataset includes the planing process at the sawmill site and input of wood. The dataset does not include dust emissions.

## Geography
Represents average Swiss conditions.

## Parameters
- wood density, apparent: 485.76 kg/m3; name wood_d_apparent; = (1+moisture_lath/100)* basic_wood_d
  kg wet matter/wet volume
- wood density, dry: 440 kg/m3; name dry_wood_d
  kg oven-dry matter/oven-dry volume
- share of lath: 87 dimensionless; name share_lath
  share of lath production from volume of sawnwood input
- share of kiln dried wood: 0.8 dimensionless; name share_kiln_dried
  share of kiln dried sawnwood input (as part of input is air dried)
- share of shaving: 13 dimensionless; name share_shaving
  share of shaving production from volume of sawnwood input
- shrinkage ratio (u=30% - 0%): 0.004 dimensionless; name shrinkage_ratio
  shrinkage of volume in % per change (%) in moisture content, relevant between u=30% to 0%
- moisture content lath: 20 dimensionless; name moisture_lath
  moisture content of lath
- wood density, basic: 404.8 kg/m3; name basic_wood_d; = dry_wood_d*(1-moisture_lath*shrinkage_ratio)
  kg oven-dry matter/wet volume

## Reference product
- shavings, softwood, loose, measured as dry mass: 1 kg; name m_shavings; = (lath_raw_u20_kd+lath_raw_u20_ad)* share_shaving/100* basic_wood_d; source BFS 2013; CPC 39283: Non-agglomerated wood waste and scrap; By-product classification allocatable product; pedigree (1,1,1,1,1)
  calculated as dry mass
  production volume 3.91347e6 kg; = m_shavings*p_sawnwood_planed
    Calculated from production volume of reference product using the relative outputs.
  property heating value, net 12.61 MJ
    LHV is calculated based on the Carbon content of the product. More details can be found on the respective documentation.
  property price 0.113 EUR2005
    Calculated based on data from FAOSTAT (accessed 20140429). The price is calculated by using data on total world import quantity (m3) and import value (1000 USD), year 2005. 40461924 m3 of Chips and Particles was imported in the world in 2005. The import value was 3022227000 USD. The calculated price is thus (3022227000/40461924=74.7*0.8=) 62.2 Euro/m3. It is estimated, that the chips and particles are half hardwood (of density 650 kg/m3) and half softwood (of density 450 kg/m3), thus the remaining mixture has a density of 550 kg/m3. The recalculated price is (1/550*62.2=) 0.11 Euro/kg. Using the same approach the calculated price for 2010 was 0.123 Euro/kg.
  property carbon content 0.494
    carbon content on a dry matter basis (reserved; not for manual entry)
  property true value 6.83507; name m_shavings_true_value
    allocation property applied in "true value" allocation // value calculated from revenue
  properties: carbon content, fossil 0, dry mass 1 kg, water content 0.15, wet mass 1.15 kg, carbon content, non-fossil 0.494, water in wet mass 0.15 kg, carbon allocation 0.494 kg
- sawnwood, lath, softwood, dried (u=20%), planed: 0 m3; name lath_planed; source BFS 2013; CPC 31101: Wood, sawn or chipped lengthwise, sliced or peeled, of a thickness exceeding 6 mm, of coniferous wood; By-product classification allocatable product
  production volume 64699 m3; name p_sawnwood_planed; = 71888*0.5+57510*0.5
    estimated to be 50% of respective air dried and kiln dried sawn timber product
  property wet mass 485.76 kg; = basic_wood_d*(1+moisture_lath/100)
  property water content 0.2; = moisture_lath/100
  property water in wet mass 80.96 kg; = basic_wood_d*moisture_lath/100
  property price 160 EUR2005
    Expert judgement (Urs Luginbühl, Swiss Sawmilling industry, personal communication in June 2014). Cross-reference; FAOSTAT (accessed 20140428). The price is calculated by using data on total world import quantity (m3) and import value (1000 USD), year 2005. 109432798 m3 of Sawnwood (C) - coniferous was imported in the world in 2005. The import value was 22249842000 USD. The calculated price is thus (22249842000/109432798=203*0.8=) 164 Euro.
  property dry mass 404.8 kg; = basic_wood_d
  property heating value, net 5860.46 MJ
    LHV is calculated based on the Carbon content of the product. More details can be found on the respective documentation.The property is based on a value of 12.06MJ/kg
  property carbon content 0.494
    carbon content on a dry matter basis (reserved; not for manual entry)
  property true value 160; name lath_planed_true_value
    allocation property applied in "true value" allocation // value calculated from revenue
  properties: carbon content, fossil 0, carbon content, non-fossil 0.494, carbon allocation 199.971 kg

## Inputs from technosphere
- sawnwood, lath, softwood, raw, dried (u=20%): 0.000155705 m3; name lath_raw_u20_ad; = 1/(1-share_shaving/100)*(1-share_kiln_dried); source BFS 2013; lognormal variance with pedigree 0.033, pedigree (1,1,4,1,1)
  input of raw sawn wood to be planed; usually processes within the sawmill that produces the raw sawn wood
  properties: water content 0.2, wet mass 485.76 kg, dry mass 404.8 kg, carbon content, non-fossil 0.494, heating value, net 5860.46 MJ
- electricity, medium voltage: 0.0151041 kWh; name elec_medvol; source BFS 2013; lognormal variance with pedigree 0.0336, pedigree (2,1,4,1,1)
  electricity consumed for the planing; the suction of the shavings in covered in a separate dataset; data from Swiss industry
  properties: UVEK_relative_amount_1 1, UVEK_link_1 1710
  note on UVEK_relative_amount_1: to be used only in special submissions in coordination with ecoinvent and the Swiss FOEN
- planing mill: 4.79885e-10 unit; name planemill; source BFS 2013; lognormal variance with pedigree 0.5586, pedigree (2,1,4,1,1)
  data taken from ecoinvent 2.2 dataset; source: Werner, F., T. Künniger, H.-J. Althaus and K. Richter (2007): Life cycle inventories of wood as fuel and construction material, Duebendorf, November 2002. Centre for life cycle inventories in the ETH domain, Duebendorf.
  properties: UVEK_relative_amount_1 1, UVEK_link_1 3514
- sawnwood, lath, softwood, raw, dried (u=20%): 0.000622819 m3; name lath_raw_u20_kd; = 1/(1-share_shaving/100)*share_kiln_dried; source BFS 2013; lognormal variance with pedigree 0.033, pedigree (1,1,4,1,1)
  (same comment as for sawnwood, lath, softwood, raw, dried (u=20%))
  property water content 0.2; name lath_raw_airdried_water_content
  property carbon content, non-fossil 0.494; name lath_raw_airdried_C_content_non_fossil
  property wet mass 485.76 kg; name lath_raw_airdried_WM; = lath_raw_airdried_DM*(1+ lath_raw_airdried_water_content)
  property dry mass 404.8 kg; name lath_raw_airdried_DM; = basic_wood_d
  property water in wet mass 80.96 kg; name lath_raw_airdried_WWM; = lath_raw_airdried_DM* lath_raw_airdried_water_content
  properties: heating value, net 5860.46 MJ

## Inputs from nature
- Carbon dioxide, non-fossil, resource correction [natural resource, in air]: 1.2405 kg; pedigree (1,1,1,1,1)
  This exchange has been added after economic allocation in order to re-balance the non-fossil carbon dioxide resource extraction.

## Sampling procedure
complementary literature and sampling from sawmills
