# fatty alcohol production, from palm kernel oil

Dataset: EcoSpold 2, unit process
Geography: RoW
Time period: 1995-01-01 to 2021-12-31
Technology level: current
Classification: EcoSpold01Categories: chemicals/organics
Classification: ISIC rev.4 ecoinvent: 2011:Manufacture of basic chemicals
Tags: ConvertedDataset
Scenario: Business-as-Usual
System model: Allocation, cut-off by classification
Generated by: Roland Hischier
Published in: Zah R. 2007
Database: ecoinvent
isCopyrightProtected: true
accessRestrictedTo: 1

## General comment
data based on the ECOSOL study of the European surfactant industry. Allocations in multioutput processes were made, using the relative mass outputs of products.
[This dataset was already contained in the ecoinvent database version 2. It was not individually updated during the transfer to ecoinvent version 3. Life Cycle Impact Assessment results may still have changed, as they are affected by changes in the supply chain, i.e. in other datasets. This dataset was generated following the ecoinvent quality guidelines for version 2. It may have been subject to central changes described in the ecoinvent version 3 change report (http://www.ecoinvent.org/database/ecoinvent-version-3/reports-of-changes/), and the results of the central updates were reviewed extensively. The changes added e.g. consistent water flows and other information throughout the database. The documentation of this dataset can be found in the ecoinvent reports of version 2, which are still available via the ecoinvent website. The change report linked above covers all central changes that were made during the conversion process.]

## Included activities end
This module contains material and energy input, production of waste and emissions for the production of fatty alcohol out of crude palm kernel oil and natural gas. The production of the used methanol in the methyl ester production chain is included into this dataset here (therefore the input of natural gas). Water consumption and infrastructure have been estimated.

## Geography
Data based on the European n-olefins production

## Technology
Average technology, representing a mix of 27% produced from fatty acid splitting, 56% produced from methyl ester on the basis of crude vegetable oil and 17% from methyl ester out of refined oil - typical for European production conditions in the mid 90s

## Time period
data of published literature

## Parameters
- fraction, cooling water, cooling pond system, to air: 0.032 dimensionless; name fraction_CW_CP_to_air; lognormal variance with pedigree 0.0413, pedigree (2,3,1,3,1)
  Calculated based on literature value (Scown, C.D., 2011, Water Footprint of U.S. Transportation Fuels and supplying information of the article) (Vionnet, S., Quantis Water Database - Technical Report, 2012).
- fraction, cooling water, once-through system, to air: 0.004 dimensionless; name fraction_CW_OT_to_air; lognormal variance with pedigree 0.0413, pedigree (2,3,1,3,1)
  (same comment as for fraction, cooling water, cooling pond system, to air)
- fraction, cooling water, to air: 0.3875 dimensionless; name fraction_CW_to_air; = (0.5*fraction_CW_OT_to_air)+(0.5*fraction_CW_R_to_air); lognormal variance with pedigree 0.092025, pedigree (4,4,3,2,4)
  Calculated value based on literature value (see comments of the other parametres present in this dataset) and expert opinion. In the case when no industry/literature data are available about the type of cooling or directly fraction, cooling water, to air specific for the process a default assumption is applied. It is assumed that the once-through cooling system is used in 50% of all cases and recirculating system is used in another 50% of all cases.
- fraction, process water, to air: 0.205 dimensionless; name fraction_PW_to_air; lognormal variance with pedigree 0.092025, pedigree (4,4,3,2,4)
- fraction, cooling water, recirculating system, to air: 0.771 dimensionless; name fraction_CW_R_to_air; lognormal variance with pedigree 0.0413, pedigree (2,3,1,3,1)
  (same comment as for fraction, cooling water, cooling pond system, to air)

## Reference product
- fatty alcohol: 1 kg; By-product classification allocatable product; CPC 34139: Other alcohols, phenols, phenol-alcohols, and their halogenated, sulphonated, nitrated or nitrosated derivativ[…]
  EcoSpold01Location=RER
  production volume 2.8704e8 kg
    Global capacity 2600 million kg, capacity utilisation at 75%. (Source: http://goliath.ecnext.com/coms2/gi_0198-101933/Surfactant-producers-take-a-cautious.html). 23% of this is assumed to be sourced from palm kernel oil.
  property carbon content, fossil 0.0408973
    Fatty alcohols have chain lengths between C6 and C22, their chemical formula is CH3(CH2)nCH2OH (ecoinvent v2.2 report 12, pg 16). As an average, C14 was used. The dataset represents a mix of 27% produced from fatty acid splitting and 73% produced from methyl ester (ecoinvent v2.2 report 12, pg 21). In the methyl esterification, methanol (CH3OH) has a fossil origin
  property heating value, net 41.01 MJ
    LHV is calculated based on the elemental composition of the substance. Based on the name of the substance, the chemical formula of the substance is assumed to be: C16H34O
  property price 2.1 EUR2005
    From ICIS (http://www.icispricing.com/il_shared/Samples/SubPage10100086.asp) Commodity: 'Fatty Alcohols'. Year 2011
  property carbon content, non-fossil 0.743434
    (same comment as for fatty alcohol)
  property carbon content 0.784331
    carbon content on a dry matter basis (reserved; not for manual entry)
  properties: wet mass 1 kg, dry mass 1 kg, water content 0, water in wet mass 0 kg, carbon allocation 0.784331 kg

## Inputs from technosphere
- heat, district or industrial, other than natural gas: 0 MJ; pedigree (1,1,1,1,1)
  EcoSpold01Location=RER
  Estimation, based on ECOSOL data
  Uncertainty: estimation, based on ECOSOL data
  properties: heating value, net 1 MJ
- municipal solid waste: 0 kg; pedigree (1,1,1,1,1)
  EcoSpold01Location=CH
  Data from ECOSOL study (Literature)
  Uncertainty: data from ECOSOL study (Literature)
  production volume 0 kg
    Calculated from the production volume of fatty alcohol in proportion to the respective output amounts.
  properties: heating value, net 11.74 MJ, water content 0.297017, carbon content, non-fossil 0.261655, carbon content, fossil 0.171549, dry mass 0.771 kg, wet mass 1 kg
  note on heating value, net: Value taken from the general comment of the treatment dataset.
  note on carbon content, non-fossil: MSW composition in tab 4.1, ecoinvent v2.2 report 13_I. C content referred to 1 kg DM
- hydrogen, liquid: 0.006 kg; lognormal variance with pedigree 0.0606, pedigree (2,5,5,5,1)
  Data from ECOSOL study (Literature)
  EcoSpold01Location=RER
  Uncertainty: data from ECOSOL study (Literature)
  properties: heating value, net 120.21 MJ, wet mass 1 kg, dry mass 1 kg
- palm kernel oil, crude: 1 kg; lognormal variance with pedigree 0.0606, pedigree (2,5,5,5,1)
  Data from ECOSOL study (Literature)
  EcoSpold01Location=MY
  Uncertainty: data from ECOSOL study (Literature)
  properties: wet mass 1 kg, dry mass 1 kg, carbon content, non-fossil 0.725581, heating value, net 37 MJ
  note on carbon content, non-fossil: C13H27O2. Palm kernel oil (tab 17.4, ecoinvent v2.2 report 17-part 17)
  note on heating value, net: Literature value, Source: Biograce, Condensed list of standard values, version 2 - Public. Available at: https://biograce.net/app/webroot/files/file/BioGrace_condensed_list_of_standard_values_-_version_2_-_Public.doc
- chemical factory, organics: 4e-10 unit; lognormal variance with pedigree 0.52, pedigree (5,5,5,5,4)
  EcoSpold01Location=RER
  Estimated from a large chem. plant
  Uncertainty: estimated from a large chem. plant
- electricity, medium voltage: 0 kWh; pedigree (1,1,1,1,1)
  Estimation, based on ECOSOL data
  EcoSpold01Location=UCTE
  Uncertainty: estimation, based on ECOSOL data
- heat, district or industrial, natural gas: 0 MJ; pedigree (1,1,1,1,1)
  (same comment as for heat, district or industrial, other than natural gas)
  properties: heating value, net 1 MJ
- heat, district or industrial, other than natural gas: 0.00206726, 5.09793 MJ (2 entries); lognormal variance with pedigree 0.078, pedigree (4,5,5,5,1)
  (same comment as for heat, district or industrial, other than natural gas)
- municipal solid waste: -2.75093e-5, -6.93165e-6, -9.90574e-6, -0.0194557 kg (4 entries); lognormal variance with pedigree 0.0606, pedigree (2,5,5,5,1)
  (same comment as for municipal solid waste)
  production volume 5.59728e6 kg
- electricity, medium voltage: 0.00202944, 0.000389158, 0.00653316, 0.095019, 0.013393, 0.0436363 kWh (6 entries); lognormal variance with pedigree 0.078, pedigree (4,5,5,5,1)
  (same comment as for electricity, medium voltage)
- heat, district or industrial, natural gas: 0.102149, 6.62785 MJ (2 entries); lognormal variance with pedigree 0.078, pedigree (4,5,5,5,1)
  (same comment as for heat, district or industrial, other than natural gas)

## Inputs from nature
- Gas, natural, in ground [natural resource, in ground]: 0.0125 m3; lognormal variance with pedigree 0.0606, pedigree (2,5,5,5,1)
  Data from ECOSOL study (Literature)
  Uncertainty: data from ECOSOL study (Literature)
- Water, unspecified natural origin [natural resource, in water]: 0.006 m3; name water_UNO_input; source Hirsinger F. 1995; lognormal variance with pedigree 0.21, pedigree (5,5,5,5,4)
  Estimation: a process water amount of 25% of the cooling water amount is assumed based on literature sources for a large chemical plant.
  Uncertainty: estimated from a large chem. plant
- Water, cooling, unspecified natural origin [natural resource, in water]: 0.024 m3; name water_cooling_UNO_input; source Gendorf 2000; lognormal variance with pedigree 0.21, pedigree (5,5,5,5,4)
  Estimation: a cooling water amount of 0.024 m3/kg product is assumed based on literature sources for a large chemical plant.
  Uncertainty: estimated from a large chem. plant

## Emissions to nature
- Water [water, unspecified]: 0.01947 m3; name water_to_water_unspecified; lognormal variance with pedigree 0.0827, pedigree (2,2,5,5,1)
  Calculated value based on literature values and expert opinion. See comments in the parametres' comment field.
  property fraction, origin: unspecified 1; name fraction_origin_unspecified_Ww
  property fraction, origin: fresh water 0; name fraction_origin_fresh_water_Ww
  property fraction, origin: salt water 0; name fraction_origin_salt_water_Ww
  property carbon content, fossil 0; name C_content_fossil
  property wet mass 1000 kg; name WM
  property water in wet mass 1000 kg; name WWM
  property carbon content, non-fossil 0; name C_content_non_fossil
  property dry mass 0 kg; name DM
- TOC, Total Organic Carbon [water, surface water]: 0.000492593 kg; lognormal variance with pedigree 0.1006, pedigree (2,5,5,5,1)
  Calculated by default as TOC (gC) = COD/2.7 (COD measured in g O2). Should more correctly be calculated from the carbon content of the specified emissions to water.
  Uncertainty: data from ECOSOL study (Literature)
- Water [air, unspecified]: 0.01053 m3; name water_to_air_unspecified; lognormal variance with pedigree 0.0827, pedigree (2,2,5,5,1)
  (same comment as for Water)
  property fraction, origin: salt water 0; name fraction_origin_salt_water
  property fraction, origin: unspecified 1; name fraction_origin_unspecified
  property fraction, origin: fresh water 0; name fraction_origin_fresh_water
- NMVOC, non-methane volatile organic compounds, unspecified origin [air, urban air close to ground]: 0.000205 kg; lognormal variance with pedigree 0.1006, pedigree (2,5,5,5,1)
  Data from ECOSOL study (Literature)
  Uncertainty: data from ECOSOL study (Literature)
- DOC, Dissolved Organic Carbon [water, surface water]: 0.000492593 kg; lognormal variance with pedigree 0.1006, pedigree (2,5,5,5,1)
  Calculated as equal to TOC.
  Uncertainty: data from ECOSOL study (Literature)
- COD, Chemical Oxygen Demand [water, surface water]: 0.00133 kg; lognormal variance with pedigree 0.1006, pedigree (2,5,5,5,1)
  Data from ECOSOL study (Literature)
  Uncertainty: data from ECOSOL study (Literature)
- Dissolved solids [water, surface water]: 0.000428 kg; lognormal variance with pedigree 0.1006, pedigree (2,5,5,5,1)
  Data from ECOSOL study (Literature)
  Uncertainty: data from ECOSOL study (Literature)
- Carbon dioxide, fossil [air, urban air close to ground]: 6.1e-5 kg; lognormal variance with pedigree 0.0606, pedigree (2,5,5,5,1)
  Data from ECOSOL study (Literature)
  Uncertainty: data from ECOSOL study (Literature)
- Oils, unspecified [water, surface water]: 2.08e-5 kg; lognormal variance with pedigree 0.3706, pedigree (2,5,5,5,1)
  Data from ECOSOL study (Literature)
  Uncertainty: data from ECOSOL study (Literature)
- BOD5, Biological Oxygen Demand [water, surface water]: 0.000279 kg; lognormal variance with pedigree 0.1006, pedigree (2,5,5,5,1)
  Data from ECOSOL study (Literature)
  Uncertainty: data from ECOSOL study (Literature)

## Extrapolations
data out of ECOSOL study of European Surfactant Industry. Common translation rules used, reported in Chemical report (Althaus et al. 2003). This dataset has been copied from an original dataset covering the geography RER. The uncertainty has been adjusted accordingly.

## Review by Heiko Kunst 2003-06-20
Passed
Passed
