# rainwater harvesting

Dataset: EcoSpold 2, unit process
Geography: GLO
Time period: 2010-01-01 to 2021-12-31
Technology level: current
Classification: EcoSpold01Categories: water supply/production
Classification: ISIC rev.4 ecoinvent: 3600:Water collection, treatment and supply
Scenario: Business-as-Usual
System model: Allocation, cut-off by classification
Share of production covered: 100 %
Generated by: Avraam Symeonidis
Database: ecoinvent
isCopyrightProtected: true
accessRestrictedTo: 1

## General comment
This dataset represents a process of harvesting water from precipitation in an open system. The water harvested is driven to a storage tank through a polypropylene piping system. There, it is stored until its potential use. The system is assumed to have a harvesting efficiency of 99% meaning that 1% of the water that could actually be harvested is lost through evaporation. The dataset finally incorporates capital costs related to the storage tank. The harvested water does not have a drinking water quality but it can then be used for irrigation, toilet flushing or construction activities like minimizing dust production during constructions or mine operations. This dataset represents a simplified version of water harvesting from rainwater. However, nowadays there are many other and well sophisticated sytems available.

## Included activities start
Activity starts with harvesting water through rainfall. In this dataset, the catchment area (such as roof of a house or an area of a mine) where the water is harvested is not included, as it is assumed that is not build exclusively to harvest water.

## Included activities end
Activity end with the use of the harvested water. The user of this dataset ought to include relevant infrastructure (i.e.: pump) as well as necessary energy consumption attributed to distribution of the water in their activity as it is not included in this dataset.

## Geography
This dataset is valid for all geograpies in the world.

## Parameters
- total water withdrawal: 3.9857e12 m3; name water_withdrawal; = 3985.7*10^9; lognormal variance with pedigree 0.000925, pedigree (1,2,2,2,1)
  Annual freshwater withdrawals, total (billion cubic meters) for each country, derived for the year of 2014 from: The World Bank Statistics, 2016, http://data.worldbank.org accessed 2017-06-15).
- lifetime: 50 year
  The expected lifetime of the water storage.
- evaporation: 0.01 dimensionless; name evap_water; lognormal variance with pedigree 0.000925, pedigree (1,2,2,2,1)
  It is assumed that the collection efficiency is 99% of the harvested water. Hence, 1% losses are attributed to evaporation. The value is solemnly based on expert judgement.

## Reference product
- water, harvested from rainwater: 1 kg; name water_harvested; By-product classification allocatable product; CPC 18000: Natural water; CAS 7732-18-5
  production volume 3.9857e9 kg; name APV; = 0.001*water_withdrawal
    Using expert judgement, the production volume is assumed to be 0.1% of the total water withdrawal for the geography in this dataset.
  property price 0.00344989 EUR2005; name water_harvested_price_EUR2005
    Calculated based on inputs: The price of the product has been calculated as a sum of the values of the material and energy inputs for this product. This value is therefore a rough estimation. It may underestimate the real price since there are additional expenses when producing any product. These expences can include for example labour costs, treatment of waste materials and profit for the producer. Please consider carefully whether this level of data quality is acceptable for your application.
  property carbon content 0.0017899
    carbon content on a dry matter basis (reserved; not for manual entry)
  properties: carbon content, non-fossil 0, water in wet mass 0.99966 kg, dry mass 0.00034 kg, water content 2940.2, carbon content, fossil 0.0017899, wet mass 1 kg, carbon allocation 6.08566e-7 kg

## Inputs from technosphere
- water storage: 6.66667e-10 unit; name water_storage; = water_harvested/(2500000* lifetime*12); lognormal variance with pedigree 0.0059, pedigree (2,2,3,5,2)
  The amount of water storage units needed are calculated by dividing the amount of water harvested with 2500 m3 which is the cpacity of one storage unit.
- extrusion, plastic pipes: 8.03213e-8 kg; = propylene/0.996; lognormal variance with pedigree 0.2106, pedigree (5,5,5,5,5)
  Based on information of this service, 1 kg of this exchange corresponds to 0.996 kg of extruded pipes. Hence, the amount needed is calculated accordingly.
- polypropylene, granulate: 8e-8 kg; name propylene; = 200*0.6* water_storage; lognormal variance with pedigree 0.0059, pedigree (2,2,3,5,2)
  It is assumed that for one storage tank, 200 meters of pipeline are needed with 90 mm of diameter. The weight of polypropylene (PP) pipe is 0.6 kg of PP per meter. Which yields in total 120 kg of PP pipeline system. This amount is then multiplied with the amount of water storage units needed relatively to the reference product. Finally it is assumed that the pipeline system remains on site even after the end of life of the facility.
  properties: carbon content, fossil 0.857143, heating value, net 32.78 MJ, wet mass 1 kg, dry mass 1 kg
  note on heating value, net: Value extracted from "treatment of waste polypropylene, open burning"

## Inputs from nature
- Water, in air [natural resource, in air]: 0.00101 m3; = (water_harvested+evap_water*water_harvested)/1000; lognormal variance with pedigree 0.0059, pedigree (2,2,3,5,2)
  Water from air

## Emissions to nature
- Water [air, non-urban air or from high stacks]: 1e-5 m3; = evap_water*water_harvested/1000; lognormal variance with pedigree 0.0059, pedigree (2,2,3,5,2)
  Water that is lost through evaporation. Using expert judgement it is assumed that is correspond to 1% of the water that is actually harvested.

## Sampling procedure
Sampling Procedure - Values are calculated based on literature value available for the given geography

## Extrapolations
This dataset has been extrapolated from year 2017 to the year of the calculation (2021). The uncertainty has been adjusted accordingly.
