# energy and auxilliary inputs, metal working factory, with heating from light fuel oil

Dataset: EcoSpold 2, unit process
Geography: RER
Time period: 2006-01-01 to 2021-12-31
Technology level: current
Classification: EcoSpold01Categories: metals/general manufacturing
Classification: ISIC rev.4 ecoinvent: 259:Manufacture of other fabricated metal products; metalworking service activit
Tags: ConvertedDataset
Scenario: Business-as-Usual
System model: Allocation, cut-off by classification
Share of production covered: 0 %
Generated by: Roland Steiner
Published in: Steiner, R. 2007
Database: ecoinvent
isCopyrightProtected: true
accessRestrictedTo: 1

## General comment
1 kg of this process is needed to produce 1 kg of final product. The data is an estimation based on the average consumption of factories separated into process specific (included in metal working machine operation) and ancillary processes (included here).
[This dataset was already contained in the ecoinvent database version 2. It was not individually updated during the transfer to ecoinvent version 3. Life Cycle Impact Assessment results may still have changed, as they are affected by changes in the supply chain, i.e. in other datasets. This dataset was generated following the ecoinvent quality guidelines for version 2. It may have been subject to central changes described in the ecoinvent version 3 change report (http://www.ecoinvent.org/database/ecoinvent-version-3/reports-of-changes/), and the results of the central updates were reviewed extensively. The changes added e.g. consistent water flows and other information throughout the database. The documentation of this dataset can be found in the ecoinvent reports of version 2, which are still available via the ecoinvent website. The change report linked above covers all central changes that were made during the conversion process.]

## Included activities end
This dataset includes ancillary processes to operate a metal working factory. This encompasses electricity for lighting and general water consumption. Heat energy is from light fuel oil.

## Geography
Average data from several local to global sized companies. The main focus is on Germany and Europe.

## Technology
The companies are expected to cover the whole range of metal working.

## Parameters
- fraction, process water, to air: 0.15 dimensionless; name fraction_PW_to_air; lognormal variance with pedigree 0.092025, pedigree (4,4,3,2,4)
  Literature value. In case when no industry/process specific data are available, default evaporation fraction value is used. This value is 15% and is based on literature (Statistics Canada, 2007 & Shaffer, K.H., 2008, Consumptive water use in the Great Lakes Basin, USGS & Shiklomanov, 2003, World Water Resources at the Beginning of the 21st Century) and has been approved by an expert.
- fraction, tap water, to air: 0.15 dimensionless; name fraction_TW_to_air; = fraction_PW_to_air; lognormal variance with pedigree 0.092025, pedigree (4,4,3,2,4)
  Calculated value. See comment in the other parametres present in this dataset. Tap water is considered to be always used as process water, thus process water fractions to air are applied to all tap water input flows to calculate the amount of water consumed in the processes.

## Reference product
- energy and auxilliary inputs, metal working factory: 1 kg; CPC 54269: General construction services of other industrial plants; By-product classification allocatable product
  EcoSpold01Location=RER
  production volume 3.288e10 kg
    Unknown
    Share of fuel type from ecoinvent v2 report 23; total metal consumption in Europe estimated at 2E11 kg; 60% assumed to be machined in metal products, machinery or transport equipment industries
  property price 0.0238411 EUR2005
    Calculated based on inputs: The price of the product has been calculated as a sum of the values of the material and energy inputs for this product. This value is therefore a rough estimation. It may underestimate the real price since there are additional expenses when producing any product. These expences can include for example labour costs, treatment of waste materials and profit for the producer. Please consider carefully whether this level of data quality is acceptable for your application.

## Inputs from technosphere
- heat, district or industrial, other than natural gas: 1.254 MJ; lognormal variance with pedigree 0.0586, pedigree (1,3,5,1,3)
  EcoSpold01Location=RER
  Average value of factories with different sizes
  Uncertainty: average value of factories with different sizes
  properties: heating value, net 1 MJ
- tap water: 12.5 kg; name tap_water_input; lognormal variance with pedigree 0.0586, pedigree (1,3,5,1,3)
  (same comment as for heat, district or industrial, other than natural gas)
  properties: water content 2962.17, wet mass 1 kg, dry mass 0.000337476 kg, carbon content, fossil 0.00178991
  note on carbon content, fossil: Bicarbonate content is 2.93 mol/m3. CO2 content is 0.1 mol/m3 (ecoinvent v2.2 report 8, Tab 93.1).
- municipal solid waste: -0.14324 kg; lognormal variance with pedigree 0.0586, pedigree (1,3,5,1,3)
  EcoSpold01Location=CH
  Average value of factories with different sizes
  Uncertainty: average value of factories with different sizes
  production volume 4.70973e9 kg
    Calculated from the production volume of energy and auxilliary inputs, metal working factory in proportion to the respective output amounts.
  properties: dry mass 0.771 kg, wet mass 1 kg, heating value, net 11.74 MJ, carbon content, fossil 0.171549, water content 0.297017, carbon content, non-fossil 0.261655
  note on heating value, net: Value taken from the general comment of the treatment dataset.
  note on carbon content, fossil: MSW composition in tab 4.1, ecoinvent v2.2 report 13_I. C content referred to 1 kg DM
- electricity, low voltage: 0.0509 kWh; lognormal variance with pedigree 0.0586, pedigree (1,3,5,1,3)
  EcoSpold01Location=UCTE
  Average value of factories with different sizes
  Uncertainty: average value of factories with different sizes
- wastewater, average: 0 m3; pedigree (1,1,1,1,1)
  Average value of factories with different sizes
  EcoSpold01Location=CH
  Uncertainty: average value of factories with different sizes
  production volume 0 m3
    (same comment as for municipal solid waste)
  properties: carbon content, non-fossil 0.194039, dry mass 0.346837 kg, water content 2882.2, wet mass 1000 kg
  note on carbon content, non-fossil: 0.0673 kg TOC/m3 (Tab A.17, ecoinvent v2.2 report 13_I). TOC was considered as Total Carbon.
- hazardous waste, for incineration: 0 kg; pedigree (1,1,1,1,1)
  (same comment as for municipal solid waste)
  production volume 0 kg
    (same comment as for municipal solid waste)
  properties: carbon content, fossil 0.554667, water content 0.333333, wet mass 1 kg, dry mass 0.75 kg, heating value, net 17 MJ
  note on carbon content, fossil: Tab A.6, ecoinvent v2.2 report 13_I. C content has been calculated after data in the tables, and then referred to 1 kg DM
- wastewater, average: -0.0109188, -0.00118121 m3 (2 entries); lognormal variance with pedigree 0.0586, pedigree (1,3,5,1,3)
  (same comment as for wastewater, average)
  production volume 3.97848e8 m3
- hazardous waste, for incineration: -0.0238759, -0.000624102 kg (2 entries); lognormal variance with pedigree 0.0586, pedigree (1,3,5,1,3)
  (same comment as for municipal solid waste)
  production volume 8.0556e8 kg

## Emissions to nature
- Water [air, unspecified]: 0.001875 m3; name water_to_air_unspecified; = (tap_water_input/1000*fraction_TW_to_air); lognormal variance with pedigree 0.0807, pedigree (2,2,5,1,1)
  Calculated value based on literature values and expert opinion. See comments in the parametres' comment field.
  property fraction, origin: salt water 0; name fraction_origin_salt_water
  property fraction, origin: unspecified 0; name fraction_origin_unspecified
  property fraction, origin: fresh water 1; name fraction_origin_fresh_water

## Extrapolations
This dataset has been extrapolated from year 2007 to the year of the calculation (2021). The uncertainty has been adjusted accordingly.

## Review by Sébastien Humbert 2007-09-05
passed
none
