# thermoforming of plastic sheets

Dataset: EcoSpold 2, unit process
Geography: FR
Time period: 2012-01-01 to 2021-12-31
Technology level: current
Classification: ISIC rev.4 ecoinvent: 2220:Manufacture of plastics products
Classification: EcoSpold01Categories: plastics/processing
Tags: service
Scenario: Business-as-Usual
System model: Allocation, cut-off by classification
Share of production covered: 60 %
Generated by: Jürgen Reinhard
Published in: Quantis 2015
Database: ecoinvent
isCopyrightProtected: true
accessRestrictedTo: 1

## General comment
This service activity represents thermoforming of plastic sheets of 200 microns to 2 mm thickness in plastic packaging for the food industry. The amount of plastic processed is NOT included. The activity refers to an INPUT of 1 kg of plastic sheets, i.e. all inputs and outputs are expressed per kg of raw materials input, i.e. T, where
t (final product)= 0.946 kg / kg of raw material input
Y ( losses being recycled within the process (=internal recycling), closed loop)= 0.261 kg / kg of raw material
t' (losses recycled in external, opened loop)= 0.053 kg / kg of raw material
T (raw materials, exluding internal recycling)= 1 kg / kg of raw material.
That is, an input of 1 kg of plastic sheet yields 0.946 kg of thermoformed plastic containers. Losses caused during production which are recycled internally are not accounted for explicitly. However, the additional energy requirements associated with the internally recycled plastic are considered.
In detail, the activity includes:
- water and energy consumption
- required auxiliaries such like detergents and solvents
- production infrastructure
- direct emissions to air (VOC)
- wastewater treatment of the used auxiliaries
- end of life of the production wastes incinerated and recycled externally
.
Prepared and submitted by Quantis, financed, supported and followed by Eco-Emballages (Sophie Bonnier, sophie.bonnier@ecoemballages.fr) and Elipso (Vincent Colard, v.colard@elipso.org)

## Included activities start
The activity starts with the arrival of the raw materials, i.e. plastic sheets.

## Included activities end
The activity ends with the production of thermoformed plastic containers. This process contains the auxiliaries and energy demand for the mentioned conversion process of plastics. The processed amount of plastics is NOT included into the dataset. The packaging of raw materials and final product is not considered.

## Geography
information from different French converting companies

## Technology
current technologies

## Time period
time to which data refer

## Parameters
- fraction, process water, to air: 0.15 dimensionless; name fraction_PW_to_air; lognormal variance with pedigree 0.092025, pedigree (4,4,3,2,4)
  Literature value. In case when no industry/process specific data are available, default evaporation fraction value is used. This value is 15% and is based on literature (Statistics Canada, 2007 & Shaffer, K.H., 2008, Consumptive water use in the Great Lakes Basin, USGS & Shiklomanov, 2003, World Water Resources at the Beginning of the 21st Century) and has been approved by an expert.

## Reference product
- thermoforming of plastic sheets: 1 kg; name Ref; CPC 89200: Moulding, pressing, stamping, extruding and similar plastic manufacturing services; By-product classification allocatable product
  Service activity producing plastic sheets of 200 microns to 2 mm thickness used as packaging for the food industry.
  This activity should be used as follows: If an activity requires 1 kg of plastic sheets (produced by an inline plastic sheets and thermoforming process) the user should list (i) 1/0.946 = 1.0571 kg of the service and 1.0571 kg of the plastic type processed.
  production volume 3.5e7 kg; name refP
    Proxy: rough approximation of the production volume of the sampled companies.
  property price 0.12971 EUR2005; name Ref_price_EUR2005
    Calculated based on inputs: The price of the product has been calculated as a sum of the values of the material and energy inputs for this product. This value is therefore a rough estimation. It may underestimate the real price since there are additional expenses when producing any product. These expences can include for example labour costs, treatment of waste materials and profit for the producer. Please consider carefully whether this level of data quality is acceptable for your application.

## By-products
- iron scrap, unsorted: 0 kg; CPC 39310: Slag, dross, scalings and other waste from the manufacture of iron or steel; By-product classification Recyclable; pedigree (1,1,1,1,1)
  Measured value: represents treatment of steel-based auxiliaries. Corresponds to the input of steel, low-alloyed.
  Uncertainty: Default value taken fromTable 10.3. DQG
  production volume 0 kg; = refP * (BP_amount_4 / Ref)
    Calculated from production volume of reference product using the relative outputs.
  property price 0.149 EUR2005
    Temporary price data. Calculated as 90% of purchasers price based on: estimated at 85% of sorted scrap
  property carbon content 0
    carbon content on a dry matter basis (reserved; not for manual entry)
  properties: water in wet mass 0 kg, carbon content, fossil 0, dry mass 1 kg, carbon content, non-fossil 0, water content 0, wet mass 1 kg, carbon allocation 0 kg
- aluminium scrap, post-consumer: 0 kg; CPC 39363: Waste and scrap of aluminium; By-product classification Recyclable; pedigree (1,1,1,1,1)
  Measured value: represents the disposal of the aluminium mould. Corresponds to the input of aluminium, primary, ingot.
  Uncertainty: Default value taken fromTable 10.3. DQG
  production volume 0 kg; = refP * (BP_amount_3 / Ref)
    Calculated from production volume of reference product using the relative outputs.
  property price 0.685 EUR2005
    Temporary price data. Calculated as 90% of purchasers price based on: estimated at 85% of new scrap
  property carbon content 0
    carbon content on a dry matter basis (reserved; not for manual entry)
  properties: carbon content, fossil 0, carbon content, non-fossil 0, water in wet mass 0 kg, water content 0, wet mass 1 kg, dry mass 1 kg, carbon allocation 0 kg

## Inputs from technosphere
- steel, low-alloyed: 7.8115e-7 kg; name steel; lognormal variance with pedigree 0.004425, pedigree (2,3,3,2,2)
  Measured value: represents the amount of steel-based auxiliaries required during processing.
  Uncertainty: Default value taken fromTable 10.3. DQG
  properties: carbon content, fossil 0.005, wet mass 1 kg, dry mass 1 kg
- chemical, organic: 0.00014938 kg; name solv; lognormal variance with pedigree 0.004425, pedigree (2,3,3,2,2)
  Measured value, proxy exchange: represents the detergent and solvents used during processing.
  Uncertainty: Default value taken fromTable 10.3. DQG
  properties: wet mass 1 kg, dry mass 1 kg, carbon content, fossil 0.628, heating value, net 19.03 MJ
  note on carbon content, fossil: This dataset is an unweighted average of 20 organic substances (listed in Tab 88.1, ecoinvent v2.2 report 8, part II), being part of the top100 chemicals included in this database. The C-content has also been calculated as an unweighted average of the C content of the substances composing this dataset.
- wastewater, average: -2.3426e-8 m3; name BP_amount_1; = ((tw*(1-fraction_PW_to_air))/UnitConversion(1, 'm3', 'l'))*-1; lognormal variance with pedigree 0.004425, pedigree (2,3,3,2,2)
  Measured value: represents the treatment of the tap water required for cooling
  Uncertainty: Default value taken fromTable 10.3. DQG
  production volume 0.81991 m3; = refP * (BP_amount_1 / Ref)
    Calculated from production volume of reference product using the relative outputs.
  property price 0 EUR2005; name BP_amount_1_price_EUR2005
  properties: wet mass 1000 kg, dry mass 0.346837 kg, carbon content, non-fossil 0.194039, water content 2882.2
  note on carbon content, non-fossil: 0.0673 kg TOC/m3 (Tab A.17, ecoinvent v2.2 report 13_I). TOC was considered as Total Carbon.
- heat, central or small-scale, natural gas: 0.10585 MJ; lognormal variance with pedigree 0.0044, pedigree (2,3,3,1,2)
  Measured value: represents the amount of heat required for the buildings.
  Uncertainty: Default value from Table 10.3. DQG
  properties: heating value, net 1 MJ
- waste polypropylene: -8.0156e-7 kg; name wp; = (pp)*-1; lognormal variance with pedigree 0.004425, pedigree (2,3,3,2,2)
  Measured value: represents the treatment of the amount of polyethylene based auxilliaries.
  Uncertainty: Default value taken fromTable 10.3. DQG
  production volume 28.0546 kg; = refP * (wp / Ref)
    Calculated from production volume of reference product using the relative outputs.
  property price 0 EUR2005; name wp_price_EUR2005
  properties: dry mass 0.841 kg, wet mass 1 kg, water content 0.189061, carbon content, fossil 0.825208, heating value, net 32.78 MJ
  note on heating value, net: Value assumed for all polypropylene products. Source: Phyllis2, database for (treated) biomass, algae, feedstocks for biogas production and biochar, https://phyllis.nl/Biomass/View/1186, ECN.TNO
- packaging box factory: 1.35143e-9 unit; = 1/014000000/50*0.946; lognormal variance with pedigree 0.341825, pedigree (2,3,5,2,2)
  Measured value: calculated based on the lifetime (50 years) and annual capacity (14000 tons/year) of the packing box factory.
  Uncertainty: Default value from Table 10.3. DQG
- metal working, average for aluminium product manufacturing: 0.0014713 kg; = alu; lognormal variance with pedigree 0.0032, pedigree (1,3,3,1,1)
  Measured value: represent the working of the aluminium required for the copensation of the deterioration of the moulds
  Uncertainty: Default value from Table 10.3. DQG
- extrusion, plastic film: 8.0156e-7 kg; = pp; lognormal variance with pedigree 0.004425, pedigree (2,3,3,2,2)
  Measured value: represent the working of the polypropylene based auxiliaries consumed during processing.
  Uncertainty: Default value from Table 10.3. DQG
- spent solvent mixture: -0.00014938 kg; name BP_amount_5; = (solv)*-1; lognormal variance with pedigree 0.004425, pedigree (2,3,3,2,2)
  Measured value, proxy exchange: represents the disposal of the detergent/solvent consumed as an auxilliary during the process
  Uncertainty: Default value taken fromTable 10.3. DQG
  production volume 5228.3 kg; = refP * (BP_amount_5 / Ref)
    Calculated from production volume of reference product using the relative outputs.
  property price 0 EUR2005; name BP_amount_5_price_EUR2005
  properties: dry mass 0.835 kg, heating value, net 21.7 MJ, water content 0.197605, carbon content, fossil 0.571257, wet mass 1 kg
  note on heating value, net: Value taken from the general comment of the treatment dataset.
  note on carbon content, fossil: Tab A.7, ecoinvent v2.2 report 13_I. C content has been calculated after data in the tables, and then referred to 1 kg DM
- aluminium, primary, ingot: 0.0014713 kg; name alu; lognormal variance with pedigree 0.004425, pedigree (2,3,3,2,2)
  Measured value: represent the aluminium required for the compensation of the deterioration of the moulds
  properties: wet mass 1 kg, dry mass 1 kg
- polypropylene, granulate: 8.0156e-7 kg; name pp; lognormal variance with pedigree 0.004425, pedigree (2,3,3,2,2)
  Measured value: represent the amount of polypropylene based auxiliaries consumed during processing.
  Uncertainty: Default value from Table 10.3. DQG
  properties: heating value, net 32.78 MJ, dry mass 1 kg, wet mass 1 kg, carbon content, fossil 0.857143
  note on heating value, net: Value extracted from "treatment of waste polypropylene, open burning"
- waste plastic, mixture: -0.052355 kg; name wpm_r; = (3.5341E-2+1.7014E-2)*-1; lognormal variance with pedigree 0.004425, pedigree (2,3,3,2,2)
  Measured value: represents the total amount of waste plastic, mixture recycled externally.The first value in the mathematical relation reflects the amount of mono materials, the second value the amount of multi layer materials recycled. In case specific recycling activities for both types of materials become available, this exchange flow should be adapted, i.e. split into two by-products.
  Uncertainty: Default value taken fromTable 10.3. DQG
  production volume 1.83242e6 kg; = refP*(wpm_r/Ref)
    Calculated from production volume of reference product using the relative outputs.
  property price 0 EUR2005; name wpm_r_price_EUR2005
  properties: heating value, net 30.79 MJ, water content 0.180638, dry mass 0.847 kg, wet mass 1 kg, carbon content, fossil 0.747344
- waste plastic, mixture: -0.0004991 kg; name wpm_i; lognormal variance with pedigree 0.004425, pedigree (2,3,3,2,2)
  Measured value: represents the amount of waste plastic mixture incinerated. Modeled with a direct link to the GLO municipal solid waste incineration
  Uncertainty: Default value taken fromTable 10.3. DQG
  production volume 17468.5 kg; = refP * (wpm_i / Ref)
    Calculated from production volume of reference product using the relative outputs.
  property price 0 EUR2005; name wpm_i_price_EUR2005
  properties: heating value, net 30.79 MJ, wet mass 1 kg, dry mass 0.847 kg, carbon content, fossil 0.747344, water content 0.180638
- electricity, medium voltage: 0.71123 kWh; = 0.187+0.52423; lognormal variance with pedigree 0.004425, pedigree (2,3,3,2,2)
  Measured value: represents the electricity consumption of the entire processing step. Includes the electricity consumption required for internal recycling (0.187 kWh)
  EcoSpold01Location=UCTE
  Uncertainty: Default value taken fromTable 10.3. DQG
- tap water: 2.756e-5 kg; name tw; lognormal variance with pedigree 0.004425, pedigree (2,3,3,2,2)
  Measured value: represent the amount of water for cooling bought from the network.
  Uncertainty: Default value taken fromTable 10.3. DQG
  properties: water content 2941.18, wet mass 1 kg, carbon content, fossil 0.0017899, dry mass 0.00034 kg
- metal working, average for steel product manufacturing: 7.8115e-7 kg; = steel; lognormal variance with pedigree 0.004425, pedigree (2,3,3,2,2)
  Measured value: represent the working of the steel-based auxiliaries
  Uncertainty: Default value from Table 10.3. DQG
- tissue paper: 1.2203e-5 kg; name tp; lognormal variance with pedigree 0.004425, pedigree (2,3,3,2,2)
  Measured value: represent the amount of tissue paper based auxiliaries required during processing.
  Uncertainty: Default value from Table 10.3. DQG
  properties: heating value, net 10.22 MJ, dry mass 0.945 kg, wet mass 1 kg, carbon content, non-fossil 0.36169, water content 0.0582011, carbon content, fossil 2.22e-5
- waste graphical paper: -1.2203e-5 kg; name BP_amount_2; = (tp)*-1; lognormal variance with pedigree 0.004425, pedigree (2,3,3,2,2)
  Measured value: represents the treatment of the amount of tissue paper based auxilliaries.
  production volume 427.105 kg; = refP * (BP_amount_2 / Ref)
    Calculated from production volume of reference product using the relative outputs.
  property price 0 EUR2005; name BP_amount_2_price_EUR2005
  properties: water content 0.126126, heating value, net 14.12 MJ, dry mass 0.888 kg, carbon content, non-fossil 0.454955, wet mass 1 kg
- iron scrap, unsorted: -7.8115e-7 kg; lognormal variance with pedigree 0.004425, pedigree (2,3,3,2,2)
  (same comment as for iron scrap, unsorted)
  production volume 27.3403 kg
  properties: price 0.149 EUR2005, dry mass 1 kg, wet mass 1 kg
- aluminium scrap, post-consumer: -0.0014713 kg; lognormal variance with pedigree 0.004425, pedigree (2,3,3,2,2)
  (same comment as for aluminium scrap, post-consumer)
  production volume 51495.5 kg
  properties: price 0.685 EUR2005, wet mass 1 kg, dry mass 1 kg

## Emissions to nature
- NMVOC, non-methane volatile organic compounds, unspecified origin [air, unspecified]: 0.00010654 kg; lognormal variance with pedigree 0.043825, pedigree (2,3,3,2,2)
  Measured value: emission generated during resin heating
  Uncertainty: Default value from Table 10.3. DQG
- Water [air, unspecified]: 4.134e-9 m3; name water_to_air_unspecified; = (tw/1000*fraction_PW_to_air); lognormal variance with pedigree 0.0427, pedigree (2,2,3,1,1)
  Calculated value based on literature values and expert opinion. See comments in the parametres' comment field.
  property fraction, origin: salt water 0; name fraction_origin_salt_water
  property fraction, origin: unspecified 1; name fraction_origin_unspecified
  property fraction, origin: fresh water 0; name fraction_origin_fresh_water

## Sampling procedure
Survey. Around 60 000 tons of thermoformed products are sold in France per year (excluding FFS process that is not considered here). The survey represents the production volume weighted average of four companies in France covering roughly 60% of the overall market volume of this technology.

## Extrapolations
This dataset has been extrapolated from year 2014 to the year of the calculation (2021). The uncertainty has been adjusted accordingly.

## Review by David Cornell 2014-08-14
I am satisfied the requested issues have been addressed and the data file is now satisfactory.
