# transport, freight, lorry 16-32 metric ton, EURO4

Dataset: EcoSpold 2, unit process
Geography: RoW
Time period: 2009-01-01 to 2021-12-31
Technology level: current
Classification: ISIC rev.4 ecoinvent: 4923:Freight transport by road
Scenario: Business-as-Usual
System model: Allocation, cut-off by classification
Share of production covered: 100 %
Generated by: Andrew Simons
Published in: Keller, M. 2010
Database: ecoinvent
isCopyrightProtected: true
accessRestrictedTo: 1

## General comment
This dataset represents the service of 1tkm freight transport in a lorry of the size class 16-32 metric tons gross vehicle weight (GVW) and Euro IV emissions class. The transport datasets refer to the entire transport life cycle i.e. to the construction, operation, maintenance and end of life of vehicle and road infrastructures. Fuel consumption and emissions are for average European journeys and load factors and not representative of a specific transport scenario. The average load factors are taken from the Tremove model v2.7b (2009) and EcoTransIT (2011) report. These are as follows:
Lorry size class Average load factor GVW
3.5-7.5t 0.98t 4.98t
7.5-16t 3.29t 9.29t
16-32t 5.79t 15.79t
>32t 15.96t 29.96t
The lorry size and load factor determines the GVW and therefore also the fuel consumption and amount of both exhaust and non-exhaust emissions. Non-exhaust emissions are those resulting from tyre, brake and road wear.
Fuel consumption and exhaust emissions are taken from v3.1 of the HBEFA model, using the data for Germany and without applying model weighting. There are a higher number of size categories used in HBEFA than in ecoinvent and so the data are grouped in order to fit the lorry size classes used in ecoinvent. The selective catalytic reduction (SCR) technology is around 3 times more common than that of exhaust gas recovery (EGR) as an emissions reduction measure and so the emission factors given in the dataset are weighted to reflect this. The data for the HBEFA categories SCR* and VI* were disregarded. The exhaust emissions caused by the burning of fuel are either fuel dependent (fuel type and quantity) or Euro class dependent. The latter reflect the emission regulations to which the vehicle complies. Regulated emissions are CO, NOx, particulate matter (PM) and total hydrocarbons (HC). Data from the Emissions Inventory Guidebook (EMEP/EEA, 2013) were used for specific exhaust emissions not covered by the HBEFA model.
Non-exhaust emissions are accounted for as weight dependent by-products and exist as seperate datasets.
For road infrastructure the expenditures and environmental interventions due to construction of roads have been allocated based on the gross tonne kilometer performance. Expenditures due to operation of the road infrastructure, as well as land use have been allocated based on the yearly vehicle kilometer performance. The same assumption on vehicle lifetime performance has been transferred from the ecoinvent v2 datasets of 540 000 km/vehicle. The production, maintenance and disposal of the vehicle are as reported in the ecoinvent (2007) report on transport services.
Main data sources:
De Ceuster, G., et al. (2009) TREMOVE: Final Report. Model code v2.7b, 2009. European Commission, Brussels.
Keller, M. et al. (2010) Handbook emission factors for road transport v3.1, HBEFA. INFRAS, Berne, CH.
Knörr, W. et al. (2011) Ecological Transport Information Tool for Worldwide Transports (EcoTransIT): Methodology and data update. Berlin, Hannover, Heidelberg, DE.
Ntziachristos, L., et al. (2013) EMEP/EEA air pollutant emissions inventory guidebook 2009: Exhaust emissions from road transport. European Environment Agency, Copenhagen, DK.
Spielmann, M., et al. (2007) Transport Services. ecoinvent report No. 14., Swiss Centre for Life Cycle Inventories, Dübendorf, CH.

## Included activities start
From combustion of fuel in the engine. The dataset takes as input the infrastructure of the lorry and road network, the materials and efforts needed for maintenance of these and the fuel consumed in the vehicle for the journey.

## Included activities end
The activity ends with the transport service of 1tkm and the emissions of exhaust and non-exhaust emissions into air, water and soil.

## Geography
References:
Spielmann M. and Scholz R. W. (2005) Life Cycle Inventories for Transport Services - Background Data for Freight Transport. In: Int J LCA, 10(1), pp.

## Reference product
- transport, freight, lorry 16-32 metric ton, EURO4: 1 metric ton*km; CPC 6511: Road transport services of freight; By-product classification allocatable product
  production volume 1.2978e12 metric ton*km; name transport_RP_PV; = 168000000000*(1/0.115941759141399)
    The production volume of GLO transport is calculated based on the production volume of the corresponding regional dataset(s). The GLO transport has either only a RER or an RER and BR correspondent. The scaling is based on the data on total tkm reported by OECD in OECD data for freight transport (accessible at https://data.oecd.org/transport/freight-transport.htm). OECD reports total tkm for 50 locations. The year of the data taken is 2019, data from previous years has been used when data for 2019 was not available. Since BR was not included in the list of countries, the total production volume for the relevant transport in BR has been added to calculate a proxy for GLO. Based on this it was calculated that RER and BR represent 11% and 9% of GLO transport respectively.
    It is estimated, that 10% of this transport is used for transport of goods in need of atmosphere control. And thus this production volume is included in the "transport, freight, lorry ... with refrigeration machine" datasets.
  property price 0.0292744 EUR2005
    Calculated based on inputs: The price of the product has been calculated as a sum of the values of the material and energy inputs for this product. This value is therefore a rough estimation. It may underestimate the real price since there are additional expenses when producing any product. These expences can include for example labour costs, treatment of waste materials and profit for the producer. Please consider carefully whether this level of data quality is acceptable for your application.

## Inputs from technosphere
- tyre wear emissions, lorry: -0.000219614 kg; name tyre_emissions; = ((8.055e-8*15786)/5.79)*-1; source Ntziachristos, L. 2013; lognormal variance with pedigree 0.0419, pedigree (2,2,5,4,1)
  Road freight specific non-exhaust emissions.
  This dataset and the emission factors within it relate to 1kg of tyre wear. In order to use the treatment of non-exhaust emissions in a transport dataset the quantity of emissions per km must be calculated. Non-exhaust emissions are considered to be linearly scalable to gross vehicle weight (GVW). For tyre wear emissions from lorries the specific quantity is 8.055E-8 kg/kg GVW*km.
  The GVW of the 16-32t lorries using an average load factor is 15 786kg.
  The value calculated must then be devided by the average load to give the non-exhaust emissions per tkm.
  Uncertainty: N
  production volume 2.85015e8 kg; = tyre_emissions*transport_RP_PV
    Calculated from production volume of reference product using the relative outputs.
  properties: carbon content, fossil 0.675
  note on carbon content, fossil: This amount equates to the amout for organic carbon reported in the Emissions Inventory Guidebook (Ntziachristos et al., 2013).
- road: 0.00105 m*year; source Spielmann M. 2007; lognormal variance with pedigree 0.312, pedigree (3,1,4,5,1)
  Calculated value based demand factors and underlying assumptions for European road transport services. Values are based on total tkm of all road transport services (RER) and the relative shares of each specific form (i.e. 3.5-7.5t lorry). The value per tkm is then based on the net vehicle weight plus averge load factor (see Activity Description). Transport performance data is derived from TREMOVE (2009).
  Uncertainty: o
- brake wear emissions, lorry: -2.21658e-5 kg; name brake_emissions; = ((8.13e-9*15786)/5.79)*-1; source Ntziachristos, L. 2013; lognormal variance with pedigree 0.0419, pedigree (2,2,5,4,1)
  Road freight specific non-exhaust emissions.
  This dataset and the emission factors within it relate to 1kg of tyre wear. In order to use the treatment of non-exhaust emissions in a transport dataset the quantity of emissions per km must be calculated. Non-exhaust emissions are considered to be linearly scalable to gross vehicle weight (GVW). For brake wear emissions from lorries the specific quantity is 8.13E-9 kg/kg GVW*km.
  The GVW of the 16-32t lorries using an average load factor is 15 786kg.
  The value calculated must then be devided by the average load to give the non-exhaust emissions per tkm.
  Uncertainty: N
  production volume 2.87669e7 kg; = brake_emissions*transport_RP_PV
    Calculated from production volume of reference product using the relative outputs.
  properties: carbon content, fossil 0.149
- diesel, low-sulfur: 0 kg; source Keller, M. 2010; pedigree (1,1,1,1,1)
  Literature value. Derived from HBEFA database (Keller, 2010).
  Uncertainty: F
  properties: heating value, net 42.8 MJ, carbon content, fossil 0.865, wet mass 1 kg, dry mass 1 kg
  note on carbon content, fossil: C-content of diesel low-sulfur is 86.5% (ecoinvent v2.2 report 6_IV, Tab 3.14)
- road wear emissions, lorry: -1.9085e-5 kg; name road_emissions; = ((7.0e-9*15786)/5.79)*-1; source Ntziachristos, L. 2013; lognormal variance with pedigree 0.0419, pedigree (2,2,5,4,1)
  Road freight specific non-exhaust emissions.
  This dataset and the emission factors within it relate to 1kg of tyre wear. In order to use the treatment of non-exhaust emissions in a transport dataset the quantity of emissions per km must be calculated. Non-exhaust emissions are considered to be linearly scalable to gross vehicle weight (GVW). For road wear emissions due to lorries the specific quantity is 7.0E-9 kg/kg GVW*km.
  The GVW of the 16-32t lorries using an average load factor is 15 786kg.
  The value calculated must then be devided by the average load to give the non-exhaust emissions per tkm.
  Uncertainty: N
  production volume 2.47685e7 kg; = road_emissions*transport_RP_PV
    Calculated from production volume of reference product using the relative outputs.
  properties: carbon content, fossil 0.75
  note on carbon content, fossil: The amount of carbon released due to road wear is not given in theEmissions Inventory Guidebook (Ntziachristos et al., 2013). For road wear there are no individual substances reported. Here we assume that 75% of the particle emissions are carbon, fossil in their nature due to the bitumen road surfacing.
- road maintenance: 0.000223185 m*year; lognormal variance with pedigree 0.312, pedigree (3,1,4,5,1)
  Calculated value based demand factors and underlying assumptions for European road transport services. Values are based on total vkm of all road transport services (RER) and the relative shares of each specific form (e.g. 3.5-7.5t lorry). The value per tkm is then based on the average load factor (see Activity Description). Transport performance data is derived from TREMOVE (2009).
  Uncertainty: o
- maintenance, lorry 16 metric ton: 3.2e-7 unit; source Spielmann M. 2007; lognormal variance with pedigree 0.312, pedigree (3,1,4,5,1)
  Calculated value based on lifetime vkm (540 000 for all lorry sizes) and average load factors (see Activity Description).
  Uncertainty: o
- lorry, 16 metric ton: 3.2e-7 unit; source Spielmann M. 2007; lognormal variance with pedigree 0.312, pedigree (3,1,4,5,1)
  (same comment as for maintenance, lorry 16 metric ton)
- diesel, low-sulfur: 0.001307, 0.00131944, 0.00263801, 8.75094e-5, 0.00059193, 0.0314993 kg (6 entries); source Keller, M. 2010; lognormal variance with pedigree 0.0419, pedigree (2,2,5,4,1)
  Literature value. Derived from HBEFA database (Keller, 2010).
  Uncertainty: F

## Emissions to nature
- Formaldehyde [air, unspecified]: 3.48181e-7 kg; source Ntziachristos, L. 2013; lognormal variance with pedigree 0.0419, pedigree (2,2,5,4,1)
  Literature value. The NMVOC split is provided by the EMEP/EEA (2013) guidebook. All elementary NMVOC exchanges available in the ecoinvent database and quantified in the EMEP/EEA guidebook are provided. Total NMVOC's derived from HBEFA database (Keller, 2010)..
  Uncertainty: N
- Carbon monoxide, fossil [air, unspecified]: 0.000185908 kg; source Keller, M. 2010; lognormal variance with pedigree 0.0419, pedigree (2,2,5,4,1)
  Literature value. Derived from HBEFA database (Keller, 2010).
  Uncertainty: E
- Pentane [air, unspecified]: 2.48701e-9 kg; source Ntziachristos, L. 2013; lognormal variance with pedigree 0.0419, pedigree (2,2,5,4,1)
  (same comment as for Formaldehyde)
- Methane, fossil [air, unspecified]: 1.01926e-7 kg; source Keller, M. 2010; lognormal variance with pedigree 0.0419, pedigree (2,2,5,4,1)
  Literature value. Derived from HBEFA database (Keller, 2010).
  Uncertainty: E
- Mercury [air, unspecified]: 1.98449e-10 kg; source Ntziachristos, L. 2013; lognormal variance with pedigree 0.7413, pedigree (2,2,5,4,1)
  Literature value. Fuel dependant emissions - heavy metal in fuel. Literature value. EMEP/EEA (2013) Tab. 3-100.
  Uncertainty: T
- Toluene [air, unspecified]: 4.14501e-10 kg; source Ntziachristos, L. 2013; lognormal variance with pedigree 0.0419, pedigree (2,2,5,4,1)
  (same comment as for Formaldehyde)
- Butane [air, unspecified]: 6.21752e-9 kg; source Ntziachristos, L. 2013; lognormal variance with pedigree 0.0419, pedigree (2,2,5,4,1)
  (same comment as for Formaldehyde)
- Chromium VI [air, unspecified]: 2.24659e-12 kg; source Ntziachristos, L. 2013; lognormal variance with pedigree 0.7413, pedigree (2,2,5,4,1)
  Estimated value. Fuel dependant emissions - heavy metal in fuel. Estimated using the underlying assumption that 0.2% of the emitted Cr is emitted as Cr(IV). Fuel dependant emissions - heavy metal in fuel. Literature value for Cr. EMEP/EEA (2013) Tab. 3-100.
  Uncertainty: T
- Ammonia [air, unspecified]: 5.18457e-7 kg; source Keller, M. 2010; lognormal variance with pedigree 0.0419, pedigree (2,2,5,4,1)
  Literature value. Derived from HBEFA database (Keller, 2010).
  Uncertainty: E
- Selenium [air, unspecified]: 3.74432e-12 kg; source Ntziachristos, L. 2013; lognormal variance with pedigree 0.7413, pedigree (2,2,5,4,1)
  (same comment as for Mercury)
- Benzaldehyde [air, unspecified]: 5.67866e-8 kg; source Ntziachristos, L. 2013; lognormal variance with pedigree 0.0419, pedigree (2,2,5,4,1)
  (same comment as for Formaldehyde)
- Ethane [air, unspecified]: 1.2435e-9 kg; source Ntziachristos, L. 2013; lognormal variance with pedigree 0.0419, pedigree (2,2,5,4,1)
  (same comment as for Formaldehyde)
- Particulates, < 2.5 um [air, unspecified]: 3.57368e-6 kg; source Keller, M. 2010; lognormal variance with pedigree 0.0419, pedigree (2,2,5,4,1)
  Literature value. Derived from HBEFA database (Keller, 2010).
  Uncertainty: E
- Heptane [air, unspecified]: 1.2435e-8 kg; source Ntziachristos, L. 2013; lognormal variance with pedigree 0.0419, pedigree (2,2,5,4,1)
  (same comment as for Formaldehyde)
- Carbon dioxide, fossil [air, unspecified]: 0.117295 kg; source Keller, M. 2010; lognormal variance with pedigree 0.0419, pedigree (2,2,5,4,1)
  Literature value. Derived from HBEFA database (Keller, 2010).
  Uncertainty: E
- Nitrogen oxides [air, unspecified]: 0.000547844 kg; source Keller, M. 2010; lognormal variance with pedigree 0.0419, pedigree (2,2,5,4,1)
  Literature value. Derived from HBEFA database (Keller, 2010).
  Uncertainty: E
- Styrene [air, unspecified]: 2.32121e-8 kg; source Ntziachristos, L. 2013; lognormal variance with pedigree 0.0419, pedigree (2,2,5,4,1)
  (same comment as for Formaldehyde)
- Acrolein [air, unspecified]: 7.33667e-8 kg; source Ntziachristos, L. 2013; lognormal variance with pedigree 0.0419, pedigree (2,2,5,4,1)
  (same comment as for Formaldehyde)
- Lead [air, unspecified]: 1.95079e-9 kg; source Ntziachristos, L. 2013; lognormal variance with pedigree 0.7413, pedigree (2,2,5,4,1)
  (same comment as for Mercury)
- Chromium [air, unspecified]: 1.1233e-9 kg; source Ntziachristos, L. 2013; lognormal variance with pedigree 0.7413, pedigree (2,2,5,4,1)
  (same comment as for Mercury)
- Arsenic [air, unspecified]: 3.74432e-12 kg; source Ntziachristos, L. 2013; lognormal variance with pedigree 0.0419, pedigree (2,2,5,4,1)
  Literature value. Fuel dependant emissions - heavy metal in fuel. Literature value. EMEP/EEA (2013) Tab. 3-100.
  Uncertainty: N
- Benzene [air, unspecified]: 2.90151e-9 kg; source Ntziachristos, L. 2013; lognormal variance with pedigree 0.0419, pedigree (2,2,5,4,1)
  (same comment as for Formaldehyde)
- Zinc [air, unspecified]: 6.50763e-8 kg; source Ntziachristos, L. 2013; lognormal variance with pedigree 0.7413, pedigree (2,2,5,4,1)
  (same comment as for Mercury)
- o-Xylene [air, unspecified]: 1.658e-8 kg; source Ntziachristos, L. 2013; lognormal variance with pedigree 0.0419, pedigree (2,2,5,4,1)
  (same comment as for Formaldehyde)
- Cadmium [air, unspecified]: 3.25756e-10 kg; source Ntziachristos, L. 2013; lognormal variance with pedigree 0.7413, pedigree (2,2,5,4,1)
  (same comment as for Mercury)
- m-Xylene [air, unspecified]: 4.06211e-8 kg; source Ntziachristos, L. 2013; lognormal variance with pedigree 0.0419, pedigree (2,2,5,4,1)
  (same comment as for Formaldehyde)
- NMVOC, non-methane volatile organic compounds, unspecified origin [air, unspecified]: 3.36699e-6 kg; source Keller, M. 2010; lognormal variance with pedigree 0.0419, pedigree (2,2,5,4,1)
  Literature value. Derived from HBEFA database (Keller, 2010) and emissions inventory guidebook (EMEP/EEA, 2013). Unspecified NMVOC's represent NMVOC's for which no elementary exchange exists in the ecoinvent database. Total NMVOC's are given by the HBEFA database with the split being provided by the EMEP/EEA (2013) guidebook.
  Uncertainty: N
- Nickel [air, unspecified]: 3.295e-10 kg; source Ntziachristos, L. 2013; lognormal variance with pedigree 0.7413, pedigree (2,2,5,4,1)
  (same comment as for Mercury)
- Copper [air, unspecified]: 7.93796e-10 kg; source Ntziachristos, L. 2013; lognormal variance with pedigree 0.7413, pedigree (2,2,5,4,1)
  (same comment as for Mercury)
- Acetaldehyde [air, unspecified]: 1.89427e-7 kg; source Ntziachristos, L. 2013; lognormal variance with pedigree 0.0419, pedigree (2,2,5,4,1)
  (same comment as for Formaldehyde)
- PAH, polycyclic aromatic hydrocarbons [air, unspecified]: 2.92806e-9 kg; source Ntziachristos, L. 2013; lognormal variance with pedigree 0.7413, pedigree (2,2,5,4,1)
  Literature value. PAH's per kg fuel use provided by the EMEP/EEA (2013) guidebook.
  Uncertainty: D
- Sulfur dioxide [air, unspecified]: 5.75811e-7 kg; source Keller, M. 2010; lognormal variance with pedigree 0.0419, pedigree (2,2,5,4,1)
  Literature value. Derived from HBEFA database (Keller, 2010).
  Uncertainty: E
- Dinitrogen monoxide [air, unspecified]: 2.30453e-6 kg; source Keller, M. 2010; lognormal variance with pedigree 0.0419, pedigree (2,2,5,4,1)
  Literature value. Derived from HBEFA database (Keller, 2010).
  Uncertainty: E
- Propane [air, unspecified]: 4.14501e-9 kg; source Ntziachristos, L. 2013; lognormal variance with pedigree 0.0419, pedigree (2,2,5,4,1)
  (same comment as for Formaldehyde)

## Sampling procedure
Literature data.

## Extrapolations
This dataset has been copied from an original dataset covering the geography RER. The uncertainty has been adjusted accordingly.
