# heat production, wood chips from post-consumer wood, at furnace 300kW

Dataset: EcoSpold 2, unit process
Geography: RER
Time period: 2000-01-01 to 2021-12-31
Technology level: current
Classification: EcoSpold01Categories: wood energy/heating systems
Classification: ISIC rev.4 ecoinvent: 3530:Steam and air conditioning supply
Scenario: Business-as-Usual
System model: Allocation, cut-off by classification
Share of production covered: 100 %
Generated by: Emilia Moreno Ruiz
Published in: Bauer, C. 2007
Database: ecoinvent
isCopyrightProtected: true
accessRestrictedTo: 1

## General comment
This inventory is based on a proxy due to lack of specific process data. This proxy is obtained from the dataset "heat production, wood chips from industry, at furnace 300kW". The heat of combustion of chips from post-consumer wood is based on the low heating value of mixed wood chips and furnace efficiency. The density is 188.6 kg dry mass/m3.
In reality this type of wood will produce additional emissions as opposed to natural wood, due to substances applied to wood during its lifetime. Therefore, the present inventory shall be considered as a rough estimation and should be revised when more reliable data is available. The uncertainty has been adjusted accordingly.
Air emission factors as well as the boiler efficiency represent average annual operation including start and stop (warm-up and shut-down). Therefore, emission data will be higher and efficiency will be lower than rated values provided by manufacturers. The inventory shall be considered as being representative also for boilers with nominal capacities in the approximate range of 70 kW to 500 kW.

## Included activities start
The activity starts with the arrival of wood chips from post-consumer wood in the furnace

## Included activities end
Included are the infrastructure, the wood requirements (wood chips, from post-consumer wood), the emissions to air, the electricity needed for operation, and the disposal of the ashes.

## Geography
Represents average Swiss conditions and could be used for Europe as well.

## Technology
Boiler of average technology available on the Swiss market.

## Time period
Key emission factors PM, CO, NMVOC, CH4, NOx as well as the average annual efficiency have been updated using the latest available information. Other emission data are from the second half of the 1990´s.

## Parameters
- scaling factor: 1.33333 dimensionless; name scaling_factor; = 1/0.75; lognormal variance with pedigree 0.0016, pedigree (2,1,1,1,1)
  The scaling factor corresponds to the inverse of the average annual efficiency of the heating system, including start/stop (warm up and cool down). Therefore, this efficiency will be lower than figures provided by manufacturers. The estimated value was provided by T.Nussbaumer, Verenum, and represents the average installed boiler in this size category in Switzerland.

## Reference product
- heat, district or industrial, other than natural gas: 1 MJ; = 0.75 * scaling_factor; source Thomas Nussbaumer 2014; By-product classification allocatable product; CPC 17300: Steam and hot water
  The numbers used in the mathematical relation refer to the input of one MJ of fuel with the heat output depending on the efficiency of the furnace. Using the "scling factor" (inverse of the efficiency) allows for scaling of the amount of the reference product to 1.
  EcoSpold01Location=CH
  production volume 1 MJ; name heat_apv
    Set to 1 in order to obtain the correct share of heat from wood on the market for heat, district or industrial, other than natural gas in Europe
  property price 0.0106 EUR2005
    Average European district heat price from Ecoheatcool and Euroheat 2005-2006, Ecoheat Work package 1: The European heat market. Final report. 10.6 EUR/GJ i s the price of district heat. http://www.solarthermalworld.org/files/Ecoheatcool%20WP1%20Web.pdf?download
  properties: Corresponding fuel use 1.22 MJ, heating value, net 1 MJ

## Inputs from technosphere
- wood ash mixture, pure: 0 kg; name wood_ash; source Bauer, C. 2007; pedigree (1,1,1,1,1)
  EcoSpold01Location=CH
  literature. Original value [per MJ fuel input] was scaled to 1 MJ reference product output
  production volume 0 kg
    Calculated from the production volume of reference product in proportion to the respective output amounts.
  property price 0 EUR2005; name wood_ash_price_EUR2005
  properties: dry mass 1 kg, wet mass 1 kg, carbon content, non-fossil 0.012
- wood chips, from post-consumer wood, measured as dry mass: 0.0705467 kg; = 1/18.9 * scaling_factor; lognormal variance with pedigree 0.002, pedigree (1,1,3,1,1)
  uncertainty on energy and water content, and bulk density
  Amount was scaled to the amount of reference product.
  properties: water content 0.4, dry mass 1 kg, wet mass 1.4 kg, carbon content, non-fossil 0.494, heating value, net 9.99 MJ
- furnace, wood chips, with silo, 300kW: 2.31481e-8 unit; = 1/(300*20*2000*3.6)
  estimation based on 20a lifetime, 2000h/a, 300kW capacity
- electricity, low voltage: 0.00556 kWh; = 0.00417 * scaling_factor; source Bauer, C. 2007; lognormal variance with pedigree 0.2406, pedigree (2,1,5,1,1)
  (same comment as for wood ash mixture, pure)
- wood ash mixture, pure: -0.000653238, -1.34283e-5 kg (2 entries); source Bauer, C. 2007; lognormal variance with pedigree 0.002, pedigree (1,1,3,1,1)
  (same comment as for wood ash mixture, pure)
  production volume 0.000666667 kg

## Emissions to nature
- Cadmium [air, urban air close to ground]: 9.33333e-10 kg; = 7E-10 * scaling_factor; source Bauer, C. 2007; lognormal variance with pedigree 0.432, pedigree (1,1,3,1,1)
  literature. Original value [per MJ fuel input] was scaled to 1 MJ reference product output
- Zinc [air, urban air close to ground]: 4e-7 kg; = 3E-07 * scaling_factor; source Bauer, C. 2007; lognormal variance with pedigree 0.432, pedigree (1,1,3,1,1)
  literature. Original value [per MJ fuel input] was scaled to 1 MJ reference product output
- Benzene, hexachloro- [air, urban air close to ground]: 9.6e-15 kg; = 7.2E-15 * scaling_factor; source Bauer, C. 2007; lognormal variance with pedigree 0.432, pedigree (1,1,3,1,1)
  literature. Original value [per MJ fuel input] was scaled to 1 MJ reference product output
- Ammonia [air, urban air close to ground]: 2.30667e-6 kg; = 1.73E-06 * scaling_factor; source Bauer, C. 2007; lognormal variance with pedigree 0.432, pedigree (1,1,3,1,1)
  literature. Original value [per MJ fuel input] was scaled to 1 MJ reference product output
- Benzene [air, urban air close to ground]: 1.21333e-6 kg; = 9.1E-07 * scaling_factor; source Bauer, C. 2007; lognormal variance with pedigree 0.432, pedigree (1,1,3,1,1)
  literature. Original value [per MJ fuel input] was scaled to 1 MJ reference product output
- Nitrogen oxides [air, urban air close to ground]: 0.00024 kg; = 1.8e-4 * scaling_factor; source Thomas Nussbaumer 2014; lognormal variance with pedigree 0.032, pedigree (1,1,3,1,1)
  expert estimation (see source)
- Sulfur dioxide [air, urban air close to ground]: 3.33333e-6 kg; = 2.5E-06 * scaling_factor; source Bauer, C. 2007; lognormal variance with pedigree 0.432, pedigree (1,1,3,1,1)
  literature. Original value [per MJ fuel input] was scaled to 1 MJ reference product output
- Lead [air, urban air close to ground]: 3.33333e-8 kg; = 2.5E-08 * scaling_factor; source Bauer, C. 2007; lognormal variance with pedigree 0.432, pedigree (1,1,3,1,1)
  literature. Original value [per MJ fuel input] was scaled to 1 MJ reference product output
- Fluorine [air, urban air close to ground]: 6.66667e-8 kg; = 5E-08 * scaling_factor; source Bauer, C. 2007; lognormal variance with pedigree 0.432, pedigree (1,1,3,1,1)
  literature. Original value [per MJ fuel input] was scaled to 1 MJ reference product output
- Hydrocarbons, aliphatic, unsaturated [air, urban air close to ground]: 4.13333e-6 kg; = 3.1E-06 * scaling_factor; source Bauer, C. 2007; lognormal variance with pedigree 0.432, pedigree (1,1,3,1,1)
  literature. Original value [per MJ fuel input] was scaled to 1 MJ reference product output
- Chlorine [air, urban air close to ground]: 2.4e-7 kg; = 1.8E-07 * scaling_factor; source Bauer, C. 2007; lognormal variance with pedigree 0.432, pedigree (1,1,3,1,1)
  literature. Original value [per MJ fuel input] was scaled to 1 MJ reference product output
- Potassium [air, urban air close to ground]: 3.12e-5 kg; = 2.34E-05 * scaling_factor; source Bauer, C. 2007; lognormal variance with pedigree 0.432, pedigree (1,1,3,1,1)
  literature. Original value [per MJ fuel input] was scaled to 1 MJ reference product output
- Benzene, ethyl- [air, urban air close to ground]: 4e-8 kg; = 3E-08 * scaling_factor; source Bauer, C. 2007; lognormal variance with pedigree 0.432, pedigree (1,1,3,1,1)
  literature. Original value [per MJ fuel input] was scaled to 1 MJ reference product output
- Mercury [air, urban air close to ground]: 4e-10 kg; = 3E-10 * scaling_factor; source Bauer, C. 2007; lognormal variance with pedigree 0.432, pedigree (1,1,3,1,1)
  literature. Original value [per MJ fuel input] was scaled to 1 MJ reference product output
- m-Xylene [air, urban air close to ground]: 1.6e-7 kg; = 1.2E-07 * scaling_factor; source Bauer, C. 2007; lognormal variance with pedigree 0.432, pedigree (1,1,3,1,1)
  literature. Original value [per MJ fuel input] was scaled to 1 MJ reference product output
- Dinitrogen monoxide [air, urban air close to ground]: 3.33333e-6 kg; = 2.5E-06 * scaling_factor; source Bauer, C. 2007; lognormal variance with pedigree 0.432, pedigree (1,1,3,1,1)
  literature. Original value [per MJ fuel input] was scaled to 1 MJ reference product output
- Carbon monoxide, non-fossil [air, urban air close to ground]: 0.000666667 kg; = 5E-04 * scaling_factor; source Thomas Nussbaumer 2014; lognormal variance with pedigree 0.342, pedigree (1,1,3,1,1)
  expert estimation (see source)
- Calcium [air, urban air close to ground]: 7.8e-6 kg; = 5.85E-06 * scaling_factor; source Bauer, C. 2007; lognormal variance with pedigree 0.432, pedigree (1,1,3,1,1)
  literature. Original value [per MJ fuel input] was scaled to 1 MJ reference product output
- Particulates, > 2.5 um, and < 10um [air, urban air close to ground]: 6.66667e-6 kg; = 5E-06 * scaling_factor; source Thomas Nussbaumer 2014; lognormal variance with pedigree 0.0226, pedigree (2,1,3,1,1)
  expert estimation (see source)
- Magnesium [air, urban air close to ground]: 4.8e-7 kg; = 3.6E-07 * scaling_factor; source Bauer, C. 2007; lognormal variance with pedigree 0.432, pedigree (1,1,3,1,1)
  literature. Original value [per MJ fuel input] was scaled to 1 MJ reference product output
- Acetaldehyde [air, urban air close to ground]: 8.13333e-8 kg; = 6.1E-08 * scaling_factor; source Bauer, C. 2007; lognormal variance with pedigree 0.432, pedigree (1,1,3,1,1)
  literature. Original value [per MJ fuel input] was scaled to 1 MJ reference product output
- Toluene [air, urban air close to ground]: 4e-7 kg; = 3E-07 * scaling_factor; source Bauer, C. 2007; lognormal variance with pedigree 0.432, pedigree (1,1,3,1,1)
  literature. Original value [per MJ fuel input] was scaled to 1 MJ reference product output
- Hydrocarbons, aliphatic, alkanes, unspecified [air, urban air close to ground]: 1.21333e-6 kg; = 9.1E-07 * scaling_factor; source Bauer, C. 2007; lognormal variance with pedigree 0.432, pedigree (1,1,3,1,1)
  literature. Original value [per MJ fuel input] was scaled to 1 MJ reference product output
- Chromium VI [air, urban air close to ground]: 5.33333e-11 kg; = 4E-11 * scaling_factor; source Bauer, C. 2007; lognormal variance with pedigree 0.482, pedigree (1,1,3,1,1)
  literature. Original value [per MJ fuel input] was scaled to 1 MJ reference product output
- Water [air, urban air close to ground]: 6e-5 m3; lognormal variance with pedigree 0.0083, pedigree (2,2,3,1,2)
  water emissions to air introduced in order to guarantee a correct water balance; emissions represent direct emissions from combustion plus previous emissions during natural drying of stored wood chips
- Methane, non-fossil [air, urban air close to ground]: 6e-6 kg; = 4.5E-06 * scaling_factor; source Bauer, C. 2007; lognormal variance with pedigree 0.432, pedigree (1,1,3,1,1)
  literature. Original value [per MJ fuel input] was scaled to 1 MJ reference product output
- PAH, polycyclic aromatic hydrocarbons [air, urban air close to ground]: 1.48e-8 kg; = 1.11E-08 * scaling_factor; source Bauer, C. 2007; lognormal variance with pedigree 0.432, pedigree (1,1,3,1,1)
  literature. Original value [per MJ fuel input] was scaled to 1 MJ reference product output
- Formaldehyde [air, urban air close to ground]: 1.73333e-7 kg; = 1.3E-07 * scaling_factor; source Bauer, C. 2007; lognormal variance with pedigree 0.432, pedigree (1,1,3,1,1)
  literature. Original value [per MJ fuel input] was scaled to 1 MJ reference product output
- Arsenic [air, urban air close to ground]: 1.33333e-9 kg; = 1E-09 * scaling_factor; source Bauer, C. 2007; lognormal variance with pedigree 0.432, pedigree (1,1,3,1,1)
  literature. Original value [per MJ fuel input] was scaled to 1 MJ reference product output
- Nickel [air, urban air close to ground]: 8e-9 kg; = 6E-09 * scaling_factor; source Bauer, C. 2007; lognormal variance with pedigree 0.432, pedigree (1,1,3,1,1)
  literature. Original value [per MJ fuel input] was scaled to 1 MJ reference product output
- Benzo(a)pyrene [air, urban air close to ground]: 6.66667e-10 kg; = 5E-10 * scaling_factor; source Bauer, C. 2007; lognormal variance with pedigree 0.432, pedigree (1,1,3,1,1)
  literature. Original value [per MJ fuel input] was scaled to 1 MJ reference product output
- Carbon dioxide, non-fossil [air, urban air close to ground]: 0.142667 kg; = 0.107 * scaling_factor; source Bauer, C. 2007; lognormal variance with pedigree 0.002, pedigree (1,1,3,1,1)
  literature. Original value [per MJ fuel input] was scaled to 1 MJ reference product output
- Manganese [air, urban air close to ground]: 2.26667e-7 kg; = 1.7E-07 * scaling_factor; source Bauer, C. 2007; lognormal variance with pedigree 0.432, pedigree (1,1,3,1,1)
  literature. Original value [per MJ fuel input] was scaled to 1 MJ reference product output
- Sodium [air, urban air close to ground]: 1.73333e-6 kg; = 1.3E-06 * scaling_factor; source Bauer, C. 2007; lognormal variance with pedigree 0.432, pedigree (1,1,3,1,1)
  literature. Original value [per MJ fuel input] was scaled to 1 MJ reference product output
- Copper [air, urban air close to ground]: 2.93333e-8 kg; = 2.2E-08 * scaling_factor; source Bauer, C. 2007; lognormal variance with pedigree 0.432, pedigree (1,1,3,1,1)
  literature. Original value [per MJ fuel input] was scaled to 1 MJ reference product output
- Bromine [air, urban air close to ground]: 8e-8 kg; = 6E-08 * scaling_factor; source Bauer, C. 2007; lognormal variance with pedigree 0.432, pedigree (1,1,3,1,1)
  literature. Original value [per MJ fuel input] was scaled to 1 MJ reference product output
- Particulates, < 2.5 um [air, urban air close to ground]: 0.00012 kg; = 9E-05 * scaling_factor; source Thomas Nussbaumer 2014; lognormal variance with pedigree 0.122, pedigree (1,1,3,1,1)
  expert estimation (see source)
- Phenol, pentachloro- [air, urban air close to ground]: 1.08e-11 kg; = 8.1E-12 * scaling_factor; source Bauer, C. 2007; lognormal variance with pedigree 0.432, pedigree (1,1,3,1,1)
  literature. Original value [per MJ fuel input] was scaled to 1 MJ reference product output
- Dioxins, measured as 2,3,7,8-tetrachlorodibenzo-p-dioxin [air, urban air close to ground]: 4.13333e-14 kg; = 3.1E-14 * scaling_factor; source Bauer, C. 2007; lognormal variance with pedigree 0.432, pedigree (1,1,3,1,1)
  literature. Original value [per MJ fuel input] was scaled to 1 MJ reference product output
- Phosphorus [air, urban air close to ground]: 4e-7 kg; = 3E-07 * scaling_factor; source Bauer, C. 2007; lognormal variance with pedigree 0.432, pedigree (1,1,3,1,1)
  literature. Original value [per MJ fuel input] was scaled to 1 MJ reference product output
- Chromium [air, urban air close to ground]: 5.28e-9 kg; = 3.96E-09 * scaling_factor; source Bauer, C. 2007; lognormal variance with pedigree 0.432, pedigree (1,1,3,1,1)
  literature. Original value [per MJ fuel input] was scaled to 1 MJ reference product output
- NMVOC, non-methane volatile organic compounds, unspecified origin [air, urban air close to ground]: 1.4e-5 kg; = 10.5E-06 * scaling_factor; source Thomas Nussbaumer 2014; lognormal variance with pedigree 0.162, pedigree (1,1,3,1,1)
  expert estimation (see source)

## Sampling procedure
literature

## Extrapolations
This dataset has been extrapolated from year 2014 to the year of the calculation (2021). The uncertainty has been adjusted accordingly.
