# mine construction, open cast, steatite

Dataset: EcoSpold 2, unit process
Geography: CA-QC
Time period: 1988-01-01 to 2021-12-31
Technology level: current
Classification: ISIC rev.4 ecoinvent: 4290:Construction of other civil engineering projects
Classification: EcoSpold01Categories: metals/extraction
Synonyms: steatite pit
Scenario: Business-as-Usual
System model: Allocation, cut-off by classification
Generated by: Geneviève Martineau
Database: ecoinvent
isCopyrightProtected: true
accessRestrictedTo: 1

## General comment
This dataset represent the construction of a steatite open cast mine. Lifetime estimated to 50 years, output: 320t per year.

## Included activities start
Starts from beginning of site exploitation.

## Included activities end
This activity ends with the end of site exploitation.
The dataset includes the land transformation, land occupation, as well as building and machinery infrastructures.
The dataset doesn't include recultivation of the site.

## Geography
Representative of Quebec steatite open cast mine

## Parameters
- building surface: 1400 m2; name surface_building; lognormal variance with pedigree 0.3, pedigree (1,1,1,1,1)
  Measured value, based on aerial photograph
- number of lorries: 2 unit; name number_lorries; lognormal variance with pedigree 0.31, pedigree (1,1,1,5,3)
  Measured value (from company)
- number of building machines: 1 unit; name number_machines; lognormal variance with pedigree 0.342, pedigree (1,1,1,5,4)
  Measured value (from company). Reported as "loader".
- total surface: 122500 m2; name total_surface; lognormal variance with pedigree 0.12, pedigree (1,1,1,1,1)
  Measured value, based on aerial photograph.
- production volume country 01: 1 dimensionless; name total_sites; lognormal variance with pedigree 0, pedigree (1,1,1,1,1)
  Measured data. There is only one steatite mine in Quebec
- number of diggers: 1 unit; name number_diggers; lognormal variance with pedigree 0.31, pedigree (1,1,1,5,3)
  Measured value (from company)

## Reference product
- mine infrastructure, steatite: 1 unit; CPC 53261: Mining constructions; By-product classification allocatable product
  production volume 0.02 unit; name APV_ref_prod; = total_sites/lifetime_mine
    Calculated value. There is only one steatite mine in Quebec, having an estimated liftime of 50 years (source: questionnaire).
  property annual production 320000 kg; name total_annual_extraction
    Net total quantity of mineral extracted annualy. Source: questionnaire
  property price 503216 EUR2005
    Calculated based on inputs: The price of the product has been calculated as a sum of the values of the material and energy inputs for this product. This value is therefore a rough estimation. It may underestimate the real price since there are additional expenses when producing any product. These expences can include for example labour costs, treatment of waste materials and profit for the producer. Please consider carefully whether this level of data quality is acceptable for your application.
  property lifetime 50 year; name lifetime_mine
    Own estimation
  property lifetime capacity [kg] 1.6e7 kg; = lifetime_mine*total_annual_extraction

## Inputs from technosphere
- building machine: 2.5 unit; = number_machines*lifetime_mine/lifetime_machine; lognormal variance with pedigree 0.348, pedigree (1,1,4,1,4)
  See parameters and properties
  property lifetime 20 year; name lifetime_machine
- building, hall, steel construction: 1400 m2; = surface_building*lifetime_mine/lifetime_building; lognormal variance with pedigree 0.008, pedigree (1,1,4,1,1)
  See parameters and properties
  Uncertainty: Calculated variable. Uncertainty will be determined from propagation of uncertainty factors of underlying variables.
  property lifetime 50 year; name lifetime_building
- lorry, 40 metric ton: 5 unit; = number_lorries*lifetime_mine/lifetime_lorry; lognormal variance with pedigree 0.316, pedigree (1,1,4,1,3)
  See parameters and properties
  property lifetime 20 year; name lifetime_lorry
- hydraulic digger: 2.5 unit; = number_diggers*lifetime_mine/lifetime_digger; lognormal variance with pedigree 0.316, pedigree (1,1,4,1,3)
  See parameters and properties
  property lifetime 20 year; name lifetime_digger

## Inputs from nature
- Transformation, from unspecified [natural resource, land]: 122500 m2; = total_surface; lognormal variance with pedigree 0.008, pedigree (1,1,4,1,1)
  See parameters.
  Uncertainty: Calculated variable. Uncertainty will be determined from propagation of uncertainty factors of underlying variables.
- Transformation, to mineral extraction site [natural resource, land]: 122500 m2; = total_surface; lognormal variance with pedigree 0.008, pedigree (1,1,4,1,1)
  (same comment as for Transformation, from unspecified)
- Occupation, mineral extraction site [natural resource, land]: 6.125e6 m2*year; = total_surface*lifetime_mine; lognormal variance with pedigree 0.008, pedigree (1,1,4,1,1)
  See parameters and properties
  Uncertainty: Calculated variable. Uncertainty will be determined from propagation of uncertainty factors of underlying variables. Uncertainty of actual relation between variables not accounted at this time, although this could be included in a future update.

## Sampling procedure
Literature

## Extrapolations
This dataset has been extrapolated from year 2012 to the year of the calculation (2021). The uncertainty has been adjusted accordingly.

## Review by Christian Bauer 2013-10-17
passed
