# iron (III) chloride production, product in 40% solution state

Dataset: EcoSpold 2, unit process
Geography: CH
Time period: 1995-01-01 to 2021-12-31
Technology level: current
Classification: EcoSpold01Categories: chemicals/inorganics
Classification: ISIC rev.4 ecoinvent: 2011:Manufacture of basic chemicals
Synonyms: iron chloride; iron trichloride
Tags: ConvertedDataset
Scenario: Business-as-Usual
System model: Allocation, cut-off by classification
Share of production covered: 80 %
Generated by: Alex Primas
Published in: Althaus H.-J. 2007
Database: ecoinvent
isCopyrightProtected: true
accessRestrictedTo: 1

## General comment
This dataset represents the production of 1 kg of iron(III) chloride (active substance). The inventory refers to a commercial aqueous solution with a concentration of 40 wt % iron(III) chloride by weight. This equals an iron concentration of 14% by weight in the solution. Raw materials, auxilliaries, energy consumption and emissions are estimated from personal communication with two iron(III) chloride producers and literature data. Infrastructure is included with a default value.
[This dataset is meant to replace the following datasets:]

## Included activities start
From the reception of scrap iron at the factory gate. The iron(III) chloride solution is produced from scrap iron, spent pickling acids, hydrogen chloride and chlorine.

## Included activities end
This activity ends with the production of aqueous iron(III) chloride. Process electricity demand included. No fuel for process heat included due to exothermal process. No credits given for possible heat export. Land use and infrastructure of plant only roughly included.

## Geography
Data valid for production processes used in Switzerland.

## Technology
Commercial production of iron(III) chloride solutions in Switzerland is mainly based on dissolving iron in hydrochloric acid and oxidizing the resulting iron(II) chloride with chlorine. In this process also spent pickling acid solutions containing iron(II) chloride are used as chlorine and iron source.
In 1994, the production output (as 100% FeCl3) in Europe was estimated to 150'000 t FeCl3 per year. For Switzerland the consumption of 40% iron(III) chloride solution will account for about 20-25'000 t per year which equals 8-10'000 t FeCl3 (100%) per year.
Commercial forms of iron(III) chloride include sublimed anhydrous iron(III) chloride (99% FeCl3), iron(III) chloride hexahydrate (ca. 60% FeCl3), and iron(III) chloride solution (ca. 40% FeCl3). The major commercial form is a solution with 40 wt % FeCl3. For this inventory only the 40% iron(III) chloride solution was investigated. It was assumed that the main supply for Switzerland is produced within Switzerland and therefore imports were neglected.
Iron(III) chloride solutions are prepared by dissolving iron in hydrochloric acid and oxidizing the resulting iron(II) chloride with chlorine. In a continuous, closed-cycle process, iron(III) chloride solution is reduced with iron and the resulting iron(II) chloride solution is reoxidized with chlorine. In about 80% of the iron(III) chloride production in Switzerland, spent pickling acids are used as additional iron source. In average 92% of the iron used for iron(III) chloride production in Switzerland origins from iron scrap and only about 8% has pickling acid as iron source. Only few process data were available for the production of iron(III) chloride operating without pickling acid use. Therefore the same emissions and wastes were applied as for the process using pickling acids. The data presented in this inventory represent an average production process for iron(III) chloride in Switzerland. A simplified process scheme of iron(III) chloride production is shown below.
Reference:
Ullmann (2001) Iron Compounds, Iron Choride, Iron(III) Chloride, Chapter 2.1. In: Ullmann's Encyclopedia of Industrial Chemistry, Sixth Edition, June-2001 Electronic Release (ed. Wildermuth E., Stark H., Silver J. and Rituper R.). 6 th Electronic Release Edition. Wiley InterScience, New York, Online-Version under: http://www.mrw.interscience.wiley.com/ueic/ull_search_fs.html

## Parameters
- fraction, cooling water, once-through system, to air: 0.004 dimensionless; name fraction_CW_OT_to_air; lognormal variance with pedigree 0.0413, pedigree (2,3,1,3,1)
  Calculated based on literature value (Scown, C.D., 2011, Water Footprint of U.S. Transportation Fuels and supplying information of the article) (Vionnet, S., Quantis Water Database - Technical Report, 2012).
- fraction, tap water, to air: 0.205 dimensionless; name fraction_TW_to_air; = fraction_PW_to_air; lognormal variance with pedigree 0.092025, pedigree (4,4,3,2,4)
  Calculated value. See comment in the other parametres present in this dataset. Tap water is considered to be always used as process water, thus process water fractions to air are applied to all tap water input flows to calculate the amount of water consumed in the processes.
- fraction, cooling water, recirculating system, to air: 0.771 dimensionless; name fraction_CW_R_to_air; lognormal variance with pedigree 0.0413, pedigree (2,3,1,3,1)
  (same comment as for fraction, cooling water, once-through system, to air)
- fraction, process water, to air: 0.205 dimensionless; name fraction_PW_to_air; lognormal variance with pedigree 0.092025, pedigree (4,4,3,2,4)
  Literature value (Statistics Canada, 2007 & Shaffer, K.H., 2008, Consumptive water use in the Great Lakes Basin, USGS) (Vionnet, S., Quantis Water Database - Technical Report, 2012).
- fraction, cooling water, to air: 0.3875 dimensionless; name fraction_CW_to_air; = (0.5*fraction_CW_OT_to_air)+(0.5*fraction_CW_R_to_air); lognormal variance with pedigree 0.092025, pedigree (4,4,3,2,4)
  Calculated value based on literature value (see comments of the other parametres present in this dataset) and expert opinion. In the case when no industry/literature data are available about the type of cooling or directly fraction, cooling water, to air specific for the process a default assumption is applied. It is assumed that the once-through cooling system is used in 50% of all cases and recirculating system is used in another 50% of all cases.
- fraction, cooling water, cooling pond system, to air: 0.032 dimensionless; name fraction_CW_CP_to_air; lognormal variance with pedigree 0.0413, pedigree (2,3,1,3,1)
  (same comment as for fraction, cooling water, once-through system, to air)

## Reference product
- iron (III) chloride, without water, in 40% solution state: 1 kg; source Ullmann 2010; CPC 34240: Phosphates of triammonium; salts and peroxysalts of inorganic acids and metals n.e.c.; By-product classification allocatable product; CAS 7705-08-0
  Iron(III) chloride is an almost black crystalline solid. Iron(III) chloride is very soluble in water. The solution is red to yellowish-brown, aqueous and odourless. Iron(III) chloride irritates the skin and especially eyes. The aqueous solution is strongly acidic.
  The largest use of iron(III) chloride (around 90%) is in the form of dilute solutions that are employed as flocculating and precipitating agents in water treatment. According to data from the U.S. municipal wastewater treatment accounts for 59%, municipal potable water treatment for 22% and industrial water treatment for 8% of the consumption. Further uses of iron(III) chloride (11%) include electronic and photographic etchants, metal surface treatment, catalysts and uses as a chlorinating and oxidising agent.
  Source:
  ChemExpo (2000) Chemical Profiles: Ferric Chloride, November 2000. Retrieved 21.11.2001 from <http://www.chemexpo.com/news/PROFILE001127.cfm>.
  EcoSpold01Location=CH
  production volume 0.0336675 kg
    This is a placeholder value that does not reflect real-world production volumes. This dataset does not currently require a real-world production volume to work in the database framework, and no actual data were collected yet. This has no negative effect on the results of the ecoinvent database. The placeholder value of this activity was scaled according to the nominal GDP of 2005 (source: United Nations, http://data.un.org/Glossary.aspx?q=GDP+%28current+US%24%29, accessed 20130726) to reflect an appropriate share of the global production volume, which is also a placeholder value.
  property price 0.33 EUR2005
    Calculated value based on data from United Nations Commodity Trade Statistics Database (comtrade.un.org). UN comtrade category: 282733 Iron chlorides. Year 2005. Using exchange rate of 1EURO = 1.209 USD. Average of price of import into 5 main markets (EU, US, JP, IN and CN).
  property carbon content 0
    carbon content on a dry matter basis (reserved; not for manual entry)
  properties: dry mass 1 kg, carbon content, fossil 0, wet mass 1 kg, carbon content, non-fossil 0, water content 0, water in wet mass 0 kg, carbon allocation 0 kg

## Inputs from technosphere
- chlorine, gaseous: 0.598 kg; lognormal variance with pedigree 0.0522, pedigree (3,2,5,3,1)
  Estimation. Calculated average from data from the producers. It was assumed that the chlorine used for the process is separated before the liquefaction step and is therefore supplied in the gaseous form. The chlorine is assumed to be produced using membrane cell technology, which is the predominant technology used for producing chlorine (IHS Markit, 2018).
  Reference:
  IHS Markit (2018) Chlorine/Sodium Hydroxide (Chlor-Alkali) (https://ihsmarkit.com/products/chlorine-sodium-chemical-economics-handbook.html, accessed on the 2018-06-27).
  Uncertainty: Calculated from data of producer. Location RER
  properties: dry mass 1 kg, wet mass 1 kg
- tap water: 1.23 kg; name tap_water_input; lognormal variance with pedigree 0.0702, pedigree (3,2,5,3,3)
  Estimation. Calculated from available data.
  EcoSpold01Location=RER
  Uncertainty: Calculated from data of producer, assumptions
  properties: carbon content, fossil 0.00178991, water content 2962.17, wet mass 1 kg, dry mass 0.000337476 kg
  note on carbon content, fossil: Bicarbonate content is 2.93 mol/m3. CO2 content is 0.1 mol/m3 (ecoinvent v2.2 report 8, Tab 93.1).
- sludge from FeCl3 production: -0.006 kg; source Bengtsson, M. 1997; lognormal variance with pedigree 0.0701, pedigree (3,2,5,1,3)
  Estimation. The production process produces sludge due to impurities in the scrap iron and the pickling acids. This sludge has a high content of water, carbon and metals. Most of this sludge is disposed of in an underground deposit in Germany.
  Estimated from one large producer.
  EcoSpold01Location=DE
  Uncertainty: Data from from 1 major producer
  production volume 0.006 kg
    Calculated from the production volume of iron (III) chloride, without water, in 40% solution state in proportion to the respective output amounts.
  properties: wet mass 1 kg, dry mass 0.7 kg, water content 0.428571
- hydrochloric acid, without water, in 30% solution state: 0.022 kg; lognormal variance with pedigree 0.1382, pedigree (4,2,5,3,4)
  EcoSpold01Location=RER
  Stoichiometric calculation.
  Uncertainty: Value calculated from stochiometry. Location RER
  properties: wet mass 1 kg, heating value, net 3.32 MJ, dry mass 1 kg
- chemical factory, organics: 1e-9 unit; lognormal variance with pedigree 0.5081, pedigree (5,5,5,3,4)
  EcoSpold01Location=RER
  Estimation. Data was estimated based on the dataset "chemical plant, organics". This module assumes a built area of about 4.2 ha, an average output of 50'000 t/a, and plant life of fifty years.
  Uncertainty: Estimated value. Proxy process used
- iron scrap, sorted, pressed: 0.328 kg; lognormal variance with pedigree 0.0521, pedigree (3,2,5,1,1)
  EcoSpold01Location=RER
  Estimation. Calculated average from available data.
  Uncertainty: Calculated average from data of producer
  properties: dry mass 1 kg, wet mass 1 kg
- electricity, medium voltage: 0.0186 kWh; source Bengtsson, M. 1997; lognormal variance with pedigree 0.0541, pedigree (3,4,5,3,1)
  EcoSpold01Location=CH
  Estimation. Calculated average from available data.
  Uncertainty: Calculated average from mixed data

## Inputs from nature
- Water, cooling, unspecified natural origin [natural resource, in water]: 0.00577 m3; name water_cooling_UNO_input; lognormal variance with pedigree 0.0701, pedigree (3,2,5,1,3)
  Estimation. Calculated average from data from the producers.
  Uncertainty: Calculated average from data of producer

## Emissions to nature
- Water [water, unspecified]: 0.00451197 m3; name water_to_water_unspecified; = (tap_water_input/1000)*(1-fraction_TW_to_air)+water_cooling_UNO_input*(1-fraction_CW_to_air); lognormal variance with pedigree 0.0807, pedigree (2,2,5,1,1)
  Calculated value based on literature values and expert opinion. See comments in the parametres' comment field.
  property fraction, origin: salt water 0; name fraction_origin_salt_water_Ww
  property fraction, origin: fresh water 0.216723; name fraction_origin_fresh_water_Ww
  property wet mass 1000 kg; name WM
  property water in wet mass 1000 kg; name WWM
  property carbon content, fossil 0; name C_content_fossil
  property carbon content, non-fossil 0; name C_content_non_fossil
  property fraction, origin: unspecified 0.783277; name fraction_origin_unspecified_Ww
  property dry mass 0 kg; name DM
- Water [air, unspecified]: 0.00248803 m3; name water_to_air_unspecified; = (tap_water_input/1000*fraction_TW_to_air)+(water_cooling_UNO_input*fraction_CW_to_air); lognormal variance with pedigree 0.0807, pedigree (2,2,5,1,1)
  (same comment as for Water)
  property fraction, origin: fresh water 0.101345; name fraction_origin_fresh_water
  property fraction, origin: salt water 0; name fraction_origin_salt_water
  property fraction, origin: unspecified 0.898655; name fraction_origin_unspecified
- Chloride [water, surface water]: 0.0002 kg; lognormal variance with pedigree 0.1101, pedigree (3,2,5,1,3)
  Estimation. Estimated from data received from one major producer.
  It was assumed that the emissions were released into a river.
  Uncertainty: Data of 1 mayor producer, unknown sample size
- Iron, ion [water, surface water]: 0.0001 kg; lognormal variance with pedigree 0.1101, pedigree (3,2,5,1,3)
  Estimation. Estimated from data received from one major producer.
  It was assumed the emissions were released into a river.
  Uncertainty: Data of 1 mayor producer, unknown sample size

## Sampling procedure
Data for resources, energy, water use, wastes and water emissions based on producer in Switzerland. Further data from literature used for energy demand. Infrastructure only rougly estimated with a proxy-process.

## Extrapolations
This dataset has been extrapolated from year 2001 to the year of the calculation (2021). The uncertainty has been adjusted accordingly.

## Review by Emilia Moreno Ruiz 2012-05-24
dataset documented by trainee Helen Hamilton

## Review by Roland Hischier 2003-08-26
Passed.
