# treatment of garden biowaste, home composting in heaps

Dataset: EcoSpold 2, unit process
Geography: RoW
Time period: 2014-03-01 to 2021-02-28
Technology level: current
Classification: ISIC rev.4 ecoinvent: 3821:Treatment and disposal of non-hazardous waste
Scenario: Business-as-Usual
System model: Allocation, cut-off by classification
Generated by: Kuch
Published in: ADEME 2015
Database: ecoinvent
isCopyrightProtected: true
accessRestrictedTo: 1

## General comment
This home composting inventory refers to 1 kg of garden biowaste as input. The composter is in heaps.
The inventory is based on experiments, where 272 kg of garden waste were used.
The experience lasted 1 year.
178 kg of compost were produced.
The composition of garden waste and compost are in the report in french "Impact sanitaire et environnementaux du compostage domestique - rapport, ADEME, 2015" (page 91). The description of the experience is on page 76 : https://www.ademe.fr/sites/default/files/assets/documents/impact-sanitaire-environnemental-compostage-domestique-201512-rapport-final-partiea.pdf.

The composter was stirred quarterly (at the time of sampling campaigns).

## Included activities start
Activity starts with the inclusion of waste in the composter

## Included activities end
Activity ends with the compost produced in home composter

## Geography
Production of home compost refers to the situation in south west France at Pau

## Technology
The dataset represents the practice of home composting in heaps with only garden waste. The experiment was performed in the south of France starting March 2014, during 1 year.
The composter is stirred quartely. For the composting in heaps, there is no water addition to adjust moisture
. The online report (in French only) provides details on the experiment (composting practice, measurements and calculation of inventory data)

## Time period
Time period corresponds to the duration of the experiment

## Reference product
- biowaste, garden waste: 0 kg; By-product classification Waste; CPC 399: Other wastes and scraps
  Experimental data: 272kg of garden waste produce 178kg of compost.
  production volume 1.48674e11 kg
    According to ADEME study : "Enquête nationale sur la gestion domestique des déchets organiques - 2008", page 81, people practicing home composting produce 3,5 million tons of garden waste by year in France; GDP is 2,3% in 2016 so the value for GLO is 152,173913 milion tons.
  property price 0 EUR2005
    Waste products are assigned a price of zero as they are assumed to require further treatment.
  property sodium content 0.0012
    % dm (dry mass). The value is calculated using the weighted average of the five measurement campaigns
  property potassium content 0.0118
    (same comment as for biowaste, garden waste)
  property carbon content, non-fossil 0.42
    (same comment as for biowaste, garden waste)
  property magnesium content 0.0068
    (same comment as for biowaste, garden waste)
  property nitrogen content 0.014
    (same comment as for biowaste, garden waste)
  property calcium content 0.0487
    (same comment as for biowaste, garden waste)
  property sulfur content 0.0067
    (same comment as for biowaste, garden waste)
  property phosphorus content 0.0074
    (same comment as for biowaste, garden waste)
  property carbon content 0.42
    carbon content on a dry matter basis (reserved; not for manual entry)
  properties: water in wet mass 0.566 kg, heating value, net 4.29 MJ, carbon content, fossil 0, wet mass 1 kg, water content 1.30415, dry mass 0.434 kg, carbon allocation 0.18228 kg
- compost: 1 kg; CPC 391: Wastes from food and tobacco industry; By-product classification allocatable product
  compost mass recovered at the end of the experiment
  production volume 9.72315e10 kg
  properties: price 0.03 EUR2005, mercury content 8.84e-8, wet mass 1 kg, nitrogen content 0.02, water content 1.26244, benzofluoranthene content 2.2e-8, fluoranthene content 2.2e-8, calcium content 0.05, nickel content 7.78e-6, phosphorus content 0.01, sodium content 0.0004, dry mass 0.442 kg, potassium content 0.0049, cadmium content 4.42e-7, water in wet mass 0.558 kg, selenium content 1.33e-7, zinc content 0.000117, carbon content, non-fossil 0.24, benzopyrene content 2.2e-8, magnesium content 0.0083, copper content 3.54e-5, lead content 2.59e-5, arsenic content 2.48e-6, chromium content 1.07e-5, sulfur content 0.0053, carbon content 0.24, carbon allocation 0.10608 kg

## By-products
- compost: 0 kg; CPC 391: Wastes from food and tobacco industry; By-product classification allocatable product
  compost mass recovered at the end of the experiment
  production volume 0 kg
    No data. We calculate the value with 1,52*10^11*0,654
  property price 0.03 EUR2005
    Temporary price data. Calculated as 90% of purchasers price based on: Estimation done using the following sources: <http://www.wmaa.asn.au/uploads/documents/MarkWinser_1May2007.pdf>; <http://www.swlf.ait.ac.th/UpdData/International/Composting%20and%20anaerobic%20digestion_%20comparions%20for%20Europe%20and%20Asia.pdf>; <http://www.epa.gov/osw/conserve/rrr/composting/basic.htm>, accessed 2011.06.16
  property carbon content 0.24
    carbon content on a dry matter basis (reserved; not for manual entry)
  properties: mercury content 8.84e-8, wet mass 1 kg, nitrogen content 0.02, water content 1.26244, benzofluoranthene content 2.2e-8, fluoranthene content 2.2e-8, calcium content 0.05, nickel content 7.78e-6, phosphorus content 0.01, sodium content 0.0004, dry mass 0.442 kg, potassium content 0.0049, cadmium content 4.42e-7, water in wet mass 0.558 kg, selenium content 1.33e-7, zinc content 0.000117, carbon content, non-fossil 0.24, benzopyrene content 2.2e-8, magnesium content 0.0083, copper content 3.54e-5, lead content 2.59e-5, arsenic content 2.48e-6, chromium content 1.07e-5, sulfur content 0.0053, carbon allocation 0.10608 kg

## Inputs from nature
- Oxygen [natural resource, in air]: 0 kg; pedigree (1,1,1,1,1)
  Calculated from total mass balance
- Occupation, urban, green area [natural resource, land]: 0 m2*year; pedigree (1,1,1,1,1)
  This was derived as follows:
  -Size of the composter=1,25m*1,3m=1,625m2
  -The composter “digests” 271,97kg of biowaste in 1 year
  -Land_occupation=1,625m2/271,97kg*1year=5,97e-3m2*year/kg biowaste
  Uncertainty: Land use, occupation; agricultural emissions from Table 10.3 Data Quality Guidelines

## Emissions to nature
All rows: pedigree (1,1,1,1,1)
- Water [air, urban air close to ground]: 0 m3
  Calculated from total mass balance
- Carbon dioxide, non-fossil [air, urban air close to ground]: 0 kg
  Calculated from mass balance of carbone
- NMVOC, non-methane volatile organic compounds, unspecified origin [air, urban air close to ground]: 0 kg
  Experimental data. Five data from campaigns and one modeled data for one year
- Methane, non-fossil [air, urban air close to ground]: 0 kg
  Experimental data. Five data from campaigns and one modeled data for one year
- Dinitrogen monoxide [air, urban air close to ground]: 0 kg
  Conservative assumption
- Ammonia [air, urban air close to ground]: 0 kg
  Conservative assumption

## Sampling procedure
Data comes from on home composting in heaps with garden waste in France (Pau) during one year
