# acetone production, liquid

Dataset: EcoSpold 2, unit process
Geography: RER
Time period: 1992-01-01 to 2021-12-31
Technology level: current
Classification: EcoSpold01Categories: chemicals/organics
Classification: ISIC rev.4 ecoinvent: 2011:Manufacture of basic chemicals
Tags: ConvertedDataset
Scenario: Business-as-Usual
System model: Allocation, cut-off by classification
Generated by: Roland Hischier
Published in: Althaus H.-J. 2007
Database: ecoinvent
isCopyrightProtected: true
accessRestrictedTo: 1

## General comment
Data are derived from the Eco-profiles of the European plastics industry (PlasticsEurope). Not included are the values reported for: recyclable wastes, amount of air / N2 / O2 consumed, unspecified metal emission to air and to water, mercaptan emission to air, unspecified CFC/HCFC emission to air, dioxin to water. The amount of "sulphur (bonded)" is assumed to be included into the amount of raw oil.
[This dataset was already contained in the ecoinvent database version 2. It was not individually updated during the transfer to ecoinvent version 3. Life Cycle Impact Assessment results may still have changed, as they are affected by changes in the supply chain, i.e. in other datasets. This dataset was generated following the ecoinvent quality guidelines for version 2. It may have been subject to central changes described in the ecoinvent version 3 change report (http://www.ecoinvent.org/database/ecoinvent-version-3/reports-of-changes/), and the results of the central updates were reviewed extensively. The changes added e.g. consistent water flows and other information throughout the database. The documentation of this dataset can be found in the ecoinvent reports of version 2, which are still available via the ecoinvent website. The change report linked above covers all central changes that were made during the conversion process.]

## Included activities end
Aggregated data for all processes from raw material extraction until delivery at plant

## Geography
3 European plants (NL, D)

## Technology
production by oxidation of cumene

## Time period
time to which data refer

## Parameters
- fraction, process water, to air: 0.205 dimensionless; name fraction_PW_to_air; lognormal variance with pedigree 0.092025, pedigree (4,4,3,2,4)
  Literature value (Statistics Canada, 2007 & Shaffer, K.H., 2008, Consumptive water use in the Great Lakes Basin, USGS) (Vionnet, S., Quantis Water Database - Technical Report, 2012).
- fraction, cooling water, cooling pond system, to air: 0.032 dimensionless; name fraction_CW_CP_to_air; lognormal variance with pedigree 0.0413, pedigree (2,3,1,3,1)
  Calculated based on literature value (Scown, C.D., 2011, Water Footprint of U.S. Transportation Fuels and supplying information of the article) (Vionnet, S., Quantis Water Database - Technical Report, 2012).
- fraction, cooling water, to air: 0.3875 dimensionless; name fraction_CW_to_air; = (0.5*fraction_CW_OT_to_air)+(0.5*fraction_CW_R_to_air); lognormal variance with pedigree 0.092025, pedigree (4,4,3,2,4)
  Calculated value based on literature value (see comments of the other parametres present in this dataset) and expert opinion. In the case when no industry/literature data are available about the type of cooling or directly fraction, cooling water, to air specific for the process a default assumption is applied. It is assumed that the once-through cooling system is used in 50% of all cases and recirculating system is used in another 50% of all cases.
- fraction, cooling water, recirculating system, to air: 0.771 dimensionless; name fraction_CW_R_to_air; lognormal variance with pedigree 0.0413, pedigree (2,3,1,3,1)
  (same comment as for fraction, cooling water, cooling pond system, to air)
- fraction, cooling water, once-through system, to air: 0.004 dimensionless; name fraction_CW_OT_to_air; lognormal variance with pedigree 0.0413, pedigree (2,3,1,3,1)
  (same comment as for fraction, cooling water, cooling pond system, to air)

## Reference product
- acetone, liquid: 1 kg; name acetone_RP; By-product classification allocatable product; CPC 34170: Ethers, alcohol peroxides, ether peroxides, epoxides, acetals and hemiacetals, and their halogenated, sulphona[…]; CAS 67-64-1
  EcoSpold01Location=RER
  production volume 1.55047e10 kg; name acetone_RP_PV; = 4.69E+10*0.33059
    Estimated. The european production volume is extrapolated from the global production volume using the nominal GDP of 2005 (source: United Nations, http://data.un.org/Glossary.aspx?q=GDP+%28current+US%24%29, accessed 20130726 and 20130312).
    Gross domestic product (GDP) at current prices is GDP at prices of the current reporting period. Also known as nominal GDP.
  property heating value, net 31.32 MJ
    LHV is calculated based on the elemental composition of the substance. Based on the CAS number of the substance (000067-64-1), the chemical formula of the substance is found to be: C3H6O, (PubChem 2020).
    Reference: Kim, S., Chen, J., Cheng, T., Gindulyte, A., He, J., He, S., Li, Q., Shoemaker, B. A., Thiessen, P. A., Yu, B., Zaslavsky, L., Zhang, J., & Bolton, E. E. (2019). PubChem 2019 update: improved access to chemical data. Nucleic acids research, 47(D1), D1102–D1109. https://doi.org/10.1093/nar/gky1033
  property price 0.58 EUR2005
    Temporary price data. Calculated as 90% of purchasers price based on: 2004 import and export prices (total trades (USD) divided by total weight (kg) in EU27, USA, China, Japan and India) from UN Commodity Trade Statistics Database (http://data.un.org/Explorer.aspxDatabase [Accessed 2 July 2010]). Commodity: Acetone
  property carbon content 0.62069
    carbon content on a dry matter basis (reserved; not for manual entry)
  properties: carbon content, fossil 0.62069, water in wet mass 0 kg, dry mass 1 kg, water content 0, wet mass 1 kg, carbon content, non-fossil 0, carbon allocation 0.62069 kg

## Inputs from technosphere
- average incineration residue: -0.0073205 kg; name inc_residue_byP
  EcoSpold01Location=CH
  Uncertainty for LCI results cannot be determined
  production volume 1.13502e8 kg; = inc_residue_byP/ acetone_RP* acetone_RP_PV
    Calculated from the production volume of acetone, liquid in proportion to the respective output amounts.
  property price 0 EUR2005; name inc_residue_byP_price_EUR2005
  properties: carbon content, non-fossil 0.0511208, carbon content, fossil 0.0325466, wet mass 1 kg, dry mass 1 kg
  note on carbon content, non-fossil: Tab A.1, ecoinvent v2.2 report 13_I. It is considered that 61.1% of the C has a biogenic origin
- coal slurry: -4.4724e-5 kg; name waste_coalslurry_byP
  Uncertainty for LCI results cannot be determined
  EcoSpold01Location=GLO
  production volume 693431 kg; = waste_coalslurry_byP/ acetone_RP* acetone_RP_PV
    (same comment as for average incineration residue)
  property price 0 EUR2005; name waste_coalslurry_byP_price_EUR2005
  properties: wet mass 1 kg, dry mass 1 kg, carbon content, fossil 0.124
  note on carbon content, fossil: Coal tailings composition in Tab 3.4, (Doka G. (2009) Life Cycle Inventory of the disposal of lignite spoil, coal spoil and coal tailings. Doka Life Cycle Assessments, Zurich. Commissioned by the Swiss Centre for Life Cycle Inventories ecoinvent Centre)
- waste plastic, mixture: -8.2186e-5 kg; name waste_plastic_byP
  EcoSpold01Location=CH
  Uncertainty for LCI results cannot be determined
  production volume 1.27427e6 kg; = waste_plastic_byP/ acetone_RP* acetone_RP_PV
    (same comment as for average incineration residue)
  property price 0 EUR2005; name waste_plastic_byP_price_EUR2005
  properties: water content 0.180638, dry mass 0.847 kg, wet mass 1 kg, carbon content, fossil 0.747344, heating value, net 30.79 MJ
  note on carbon content, fossil: C content in 1 kg DM was calculated using data in Tab A.2, ecoinvent v2.2 report 13_I
  note on heating value, net: Value taken from the general comment of the treatment dataset.
- spoil from hard coal mining: -0.019473 kg; name waste_spoil_byP
  Uncertainty for LCI results cannot be determined
  EcoSpold01Location=GLO
  production volume 3.01922e8 kg; = waste_spoil_byP/ acetone_RP* acetone_RP_PV
    (same comment as for average incineration residue)
  property price 0 EUR2005; name waste_spoil_byP_price_EUR2005
  properties: dry mass 1 kg, wet mass 1 kg, carbon content, fossil 0.007879
  note on carbon content, fossil: Composition of coal spoil is adopted by proxy from lignite spoil (pg 19, Doka G. (2009) Life Cycle Inventory of the disposal of lignite spoil, coal spoil and coal tailings. Doka Life Cycle Assessments, Zurich. Commissioned by the Swiss Centre for Life Cycle Inventories ecoinvent Centre)
- hazardous waste, for incineration: 0 kg; name haz_waste_byP
  Uncertainty for LCI results cannot be determined
  EcoSpold01Location=CH
  production volume 0 kg
    (same comment as for average incineration residue)
  property price 0 EUR2005; name haz_waste_byP_price_EUR2005
  properties: heating value, net 17 MJ, dry mass 0.75 kg, wet mass 1 kg, carbon content, fossil 0.554667, water content 0.333333
  note on carbon content, fossil: Tab A.6, ecoinvent v2.2 report 13_I. C content has been calculated after data in the tables, and then referred to 1 kg DM
- waste wood, untreated: -9.1841e-6 kg; name waste_wood_byP
  EcoSpold01Location=CH
  Uncertainty for LCI results cannot be determined
  production volume 142396 kg; = waste_wood_byP/ acetone_RP* acetone_RP_PV
    (same comment as for average incineration residue)
  property price 0 EUR2005; name waste_wood_byP_price_EUR2005
  properties: dry mass 0.8 kg, water content 0.25, wet mass 1 kg, carbon content, non-fossil 0.48632, heating value, net 13.99 MJ
  note on carbon content, non-fossil: Tab A.4, ecoinvent v2.2 report 13_I. C content has been referred to 1 kg DM,
- decommissioned chemical production facilities: -1.4234e-5 kg; name waste_chem_byP
  EcoSpold01Location=RER
  Uncertainty for LCI results cannot be determined
  production volume 220693 kg; = waste_chem_byP/ acetone_RP* acetone_RP_PV
    (same comment as for average incineration residue)
  property price 0 EUR2005; name waste_chem_byP_price_EUR2005
  properties: carbon content, non-fossil 5.78006e-6, carbon content, fossil 0.0169382, wet mass 1 kg, dry mass 1 kg
  note on carbon content, non-fossil: Calculated from C content in input materials in the infrastructure
- municipal solid waste: -0.0025855 kg; name msw_byP
  EcoSpold01Location=CH
  Uncertainty for LCI results cannot be determined
  production volume 4.00873e7 kg; = msw_byP/ acetone_RP* acetone_RP_PV
    (same comment as for average incineration residue)
  properties: dry mass 0.771 kg, wet mass 1 kg, water content 0.297017, carbon content, fossil 0.171549, carbon content, non-fossil 0.261655, heating value, net 11.74 MJ
  note on carbon content, fossil: MSW composition in tab 4.1, ecoinvent v2.2 report 13_I. C content referred to 1 kg DM
- hazardous waste, for incineration: -0.00412634, -0.00010786 kg (2 entries)
  Uncertainty for LCI results cannot be determined
  EcoSpold01Location=CH
  production volume 6.56499e7 kg

## Inputs from nature
- Sand, unspecified, in ground [natural resource, in ground]: 0.00049629 kg
  Uncertainty for LCI results cannot be determined
- Talc, in ground [natural resource, in ground]: 0 kg
  Uncertainty for LCI results cannot be determined
- Barium, in ground [natural resource, in ground]: 2.3122e-6 kg
  15% BaSO4 in ore; Uncertainty for LCI results cannot be determined
- Water, river [natural resource, in water]: 0.00010411 m3; name water_river_input; lognormal variance with pedigree 1.21, pedigree (5,5,5,5,5)
  Uncertainty for LCI results cannot be determined
- Magnesite, in ground [natural resource, in ground]: 0 kg
  60% Magnesite in ore; Uncertainty for LCI results cannot be determined
- Shale, in ground [natural resource, in ground]: 3.9085e-5 kg
  Uncertainty for LCI results cannot be determined
- Sylvite, in ground [natural resource, in ground]: 1.7355e-7 kg
  25% Sylvite in sylvinite; Uncertainty for LCI results cannot be determined
- Peat, in ground [natural resource, biotic]: 0.00019448 kg
  Uncertainty for LCI results cannot be determined
- Water, unspecified natural origin [natural resource, in water]: 0.0031005 m3; name water_UNO_input; lognormal variance with pedigree 1.21, pedigree (5,5,5,5,5)
  Uncertainty for LCI results cannot be determined
- Water, well, in ground [natural resource, in water]: 1.9591e-10 m3; name water_well_in_ground_input; lognormal variance with pedigree 1.21, pedigree (5,5,5,5,5)
  Uncertainty for LCI results cannot be determined
- Aluminium, in ground [natural resource, in ground]: 1.9221e-6 kg
  24% Al in bauxite; 11% Al in ore; Uncertainty for LCI results cannot be determined
- Anhydrite, in ground [natural resource, in ground]: 1.3806e-5 kg
  Uncertainty for LCI results cannot be determined
- Dolomite, in ground [natural resource, in ground]: 6.0835e-6 kg
  Uncertainty for LCI results cannot be determined
- Wood, unspecified, standing [natural resource, biotic]: 6.9846e-7 m3
  Uncertainty for LCI results cannot be determined
- Lead, in ground [natural resource, in ground]: 3.9741e-7 kg
  5.0% Pb in sulfide; 3.0% Pb in ore; Uncertainty for LCI results cannot be determined
- Copper, in ground [natural resource, in ground]: 1.0405e-6 kg
  0.99% Cu in sulfide; 0.36% Cu and 82 ppm Mo in ore; Uncertainty for LCI results cannot be determined
- Manganese, in ground [natural resource, in ground]: 6.4138e-7 kg
  35.7% Mn in sedimentary deposit; 14.2% Mn in ore; Uncertainty for LCI results cannot be determined
- Sodium chloride, in ground [natural resource, in ground]: 0.075468 kg
  Uncertainty for LCI results cannot be determined
- Olivine, in ground [natural resource, in ground]: 4.6653e-6 kg
  Uncertainty for LCI results cannot be determined
- Uranium, in ground [natural resource, in ground]: 4.0257e-6 kg
  Uncertainty for LCI results cannot be determined
- Iron, in ground [natural resource, in ground]: 0.00049728 kg
  46% Fe in siderite; 25% Fe in ore; Uncertainty for LCI results cannot be determined
- Granite, in ground [natural resource, in ground]: 6.2564e-15 kg
  Uncertainty for LCI results cannot be determined
- Mercury, in ground [natural resource, in ground]: 1.4069e-7 kg
  Uncertainty for LCI results cannot be determined
- Water, cooling, unspecified natural origin [natural resource, in water]: 0.078671 m3; name water_cooling_UNO_input; lognormal variance with pedigree 1.21, pedigree (5,5,5,5,5)
  Uncertainty for LCI results cannot be determined
- Energy, potential (in hydropower reservoir), converted [natural resource, in water]: 0.13754 MJ
- Gravel, in ground [natural resource, in ground]: 1.8347e-6 kg
  Uncertainty for LCI results cannot be determined
- Chromium, in ground [natural resource, in ground]: 1.2954e-10 kg
  25.5% Cr in chromite; 11.6% in ore; Uncertainty for LCI results cannot be determined
- Water, salt, ocean [natural resource, in water]: 0.0003306 m3; name water_salt_ocean_input; lognormal variance with pedigree 1.21, pedigree (5,5,5,5,5)
  Uncertainty for LCI results cannot be determined
- Sodium nitrate, in ground [natural resource, in ground]: 0 kg
  Uncertainty for LCI results cannot be determined
- Coal, brown, in ground [natural resource, in ground]: 3.2719e-6 kg
  Uncertainty for LCI results cannot be determined
- Calcite, in ground [natural resource, in ground]: 0.003589 kg
  Uncertainty for LCI results cannot be determined
- Coal, hard, unspecified, in ground [natural resource, in ground]: 0.092531 kg
  Uncertainty for LCI results cannot be determined
- Titanium, in ground [natural resource, in ground]: 0 kg
  95% TiO2 in rutile; 0.4% TiO2 in ore; Uncertainty for LCI results cannot be determined
- Clay, unspecified, in ground [natural resource, in ground]: 1.3808e-9 kg
  Uncertainty for LCI results cannot be determined
- Nickel, in ground [natural resource, in ground]: 2.1442e-11 kg
  1.98% Ni in silicates; 1.04% Ni in ore; Uncertainty for LCI results cannot be determined
- Feldspar, in ground [natural resource, in ground]: 0 kg
  Uncertainty for LCI results cannot be determined
- Gas, natural, in ground [natural resource, in ground]: 0.94273 m3
  Uncertainty for LCI results cannot be determined
- Clay, bentonite, in ground [natural resource, in ground]: 0.00013842 kg
  Uncertainty for LCI results cannot be determined
- Energy, gross calorific value, in biomass [natural resource, biotic]: 0.11308 MJ
- Phosphorus, in ground [natural resource, in ground]: 0.00013389 kg
  18% P in apatite; 12% in ore; Uncertainty for LCI results cannot be determined
- Oil, crude, in ground [natural resource, in ground]: 0.58773 kg
  Uncertainty for LCI results cannot be determined
- Zinc, in ground [natural resource, in ground]: 1.5712e-8 kg
  9.0% Zn in sulfide; 5.3% Zn in ore; Uncertainty for LCI results cannot be determined
- Fluorspar, in ground [natural resource, in ground]: 2.911e-7 kg
  92% CaF2 in ore; Uncertainty for LCI results cannot be determined
- Sulfur, in ground [natural resource, in ground]: 0.0023921 kg
  Uncertainty for LCI results cannot be determined

## Emissions to nature
- Lead [air, urban air close to ground]: 1.8616e-9 kg
  Uncertainty for LCI results cannot be determined
- Aluminium [water, surface water]: 4.1204e-7 kg
  Uncertainty for LCI results cannot be determined
- Sulfide [water, surface water]: 1.0057e-9 kg
  Uncertainty for LCI results cannot be determined
- Silver [air, urban air close to ground]: 5.6319e-12 kg
  Uncertainty for LCI results cannot be determined
- Manganese [water, surface water]: 1.8815e-12 kg
  Uncertainty for LCI results cannot be determined
- Phenol [water, surface water]: 5.6649e-7 kg
  Uncertainty for LCI results cannot be determined
- Suspended solids, unspecified [water, surface water]: 0.00062329 kg
  Uncertainty for LCI results cannot be determined
- Chlorinated solvents, unspecified [water, surface water]: 1.2426e-6 kg
  Uncertainty for LCI results cannot be determined
- Zinc, ion [water, surface water]: 1.5189e-8 kg
  Uncertainty for LCI results cannot be determined
- Hydrocarbons, unspecified [water, surface water]: 0.00076719 kg
  Uncertainty for LCI results cannot be determined
- TOC, Total Organic Carbon [water, surface water]: 4.3405e-5 kg
  Uncertainty for LCI results cannot be determined
- Carbon dioxide, non-fossil [air, urban air close to ground]: 0.0027514 kg
  Uncertainty for LCI results cannot be determined
- Dissolved solids [water, surface water]: 0.0011849 kg
  Uncertainty for LCI results cannot be determined
- Mercury [water, surface water]: 3.7144e-9 kg
  Uncertainty for LCI results cannot be determined
- COD, Chemical Oxygen Demand [water, surface water]: 0.00043476 kg
  Uncertainty for LCI results cannot be determined
- Mercury [air, urban air close to ground]: 1.3463e-8 kg
  Uncertainty for LCI results cannot be determined
- Fluoride [water, surface water]: 4.8805e-9 kg
  Uncertainty for LCI results cannot be determined
- Carbon dioxide, fossil [air, urban air close to ground]: 1.7861 kg
  Uncertainty for LCI results cannot be determined
- Dinitrogen monoxide [air, urban air close to ground]: 7.1381e-9 kg
  Uncertainty for LCI results cannot be determined
- Hydrocarbons, aliphatic, alkanes, cyclic [air, urban air close to ground]: 1.6175e-6 kg
  Uncertainty for LCI results cannot be determined
- Iron, ion [water, surface water]: 3.8798e-8 kg
  Uncertainty for LCI results cannot be determined
- Sulfate [air, urban air close to ground]: 1.4915e-12 kg
  Uncertainty for LCI results cannot be determined
- Particulates, < 2.5 um [air, urban air close to ground]: 0.0001466 kg
  Uncertainty for LCI results cannot be determined
- Benzene [water, surface water]: 0 kg
  Uncertainty for LCI results cannot be determined
- Styrene [air, urban air close to ground]: 5.4042e-8 kg
  Uncertainty for LCI results cannot be determined
- Cadmium [air, urban air close to ground]: 2.0437e-11 kg
  Uncertainty for LCI results cannot be determined
- Ethene [air, urban air close to ground]: 2.2561e-6 kg
  Uncertainty for LCI results cannot be determined
- Chromium, ion [water, surface water]: 9.9081e-13 kg
  Uncertainty for LCI results cannot be determined
- Hydrocarbons, aromatic [air, urban air close to ground]: 2.6598e-5 kg
  Uncertainty for LCI results cannot be determined
- Methane, fossil [air, urban air close to ground]: 0.017078 kg
  Uncertainty for LCI results cannot be determined
- Cyanide [air, urban air close to ground]: 0 kg
  Uncertainty for LCI results cannot be determined
- Nickel, ion [water, surface water]: 8.298e-8 kg
  Uncertainty for LCI results cannot be determined
- Carbon monoxide, non-fossil [air, urban air close to ground]: 2.8804e-6 kg
  Uncertainty for LCI results cannot be determined
- Ethene, chloro- [water, surface water]: 7.609e-12 kg
  Uncertainty for LCI results cannot be determined
- Chlorine [air, urban air close to ground]: 2.0033e-8 kg
  Uncertainty for LCI results cannot be determined
- Particulates, > 2.5 um, and < 10um [air, urban air close to ground]: 0.00025214 kg
  Uncertainty for LCI results cannot be determined
- Hydrogen sulfide [air, urban air close to ground]: 1.6656e-8 kg
  Uncertainty for LCI results cannot be determined
- Aldehydes, unspecified [air, urban air close to ground]: 8.35e-5 kg
  Uncertainty for LCI results cannot be determined
- Ethene, chloro- [air, urban air close to ground]: 4.0011e-10 kg
  Uncertainty for LCI results cannot be determined
- Oils, unspecified [water, surface water]: 1.118e-5 kg
  Uncertainty for LCI results cannot be determined
- Water [water, unspecified]: 0.0509965 m3; name water_to_water_unspecified; = water_cooling_UNO_input*(1-fraction_CW_to_air)+water_river_input*(1-fraction_PW_to_air)+water_salt_ocean_input*(1-fraction_PW_to_air)+water_UNO_input*(1-fraction_PW_to_air)+water_well_in_ground_input*(1-fraction_PW_to_air); lognormal variance with pedigree 0.0807, pedigree (2,2,5,1,1)
  Calculated value based on literature values and expert opinion. See comments in the parametres' comment field.
  property wet mass 1000 kg; name WM
  property fraction, origin: fresh water 0.00162301; name fraction_origin_fresh_water_Ww
  property carbon content, fossil 0; name C_content_fossil
  property water in wet mass 1000 kg; name WWM
  property dry mass 0 kg; name DM
  property fraction, origin: salt water 0.00515383; name fraction_origin_salt_water_Ww
  property fraction, origin: unspecified 0.993223; name fraction_origin_unspecified_Ww
  property carbon content, non-fossil 0; name C_content_non_fossil
- Bromate [water, surface water]: 4.8394e-10 kg
  Uncertainty for LCI results cannot be determined
- Water [air, unspecified]: 0.0312097 m3; name water_to_air_unspecified; = (water_cooling_UNO_input*fraction_CW_to_air)+(water_river_input*fraction_PW_to_air)+(water_salt_ocean_input*fraction_PW_to_air)+(water_UNO_input*fraction_PW_to_air)+(water_well_in_ground_input*fraction_PW_to_air); lognormal variance with pedigree 0.0807, pedigree (2,2,5,1,1)
  (same comment as for Water)
  property fraction, origin: unspecified 0.997145; name fraction_origin_unspecified
  property fraction, origin: fresh water 0.000683844; name fraction_origin_fresh_water
  property fraction, origin: salt water 0.00217153; name fraction_origin_salt_water
- Nickel [air, urban air close to ground]: 1.6175e-6 kg
  Uncertainty for LCI results cannot be determined
- Benzene, ethyl- [air, urban air close to ground]: 3.0482e-7 kg
  Uncertainty for LCI results cannot be determined
- Carbon monoxide, fossil [air, urban air close to ground]: 0.0018699 kg
  Uncertainty for LCI results cannot be determined
- NMVOC, non-methane volatile organic compounds, unspecified origin [air, urban air close to ground]: 0.0035232 kg
  Uncertainty for LCI results cannot be determined
- Cadmium, ion [water, surface water]: 1.5562e-13 kg
  Uncertainty for LCI results cannot be determined
- Arsenic, ion [water, surface water]: 2.2093e-10 kg
  Uncertainty for LCI results cannot be determined
- Nitrogen [water, surface water]: 4.1376e-6 kg
  Uncertainty for LCI results cannot be determined
- Propene [air, urban air close to ground]: 1.6712e-6 kg
  Uncertainty for LCI results cannot be determined
- Strontium [water, surface water]: 2.2795e-9 kg
  Uncertainty for LCI results cannot be determined
- Calcium, ion [water, surface water]: 7.5106e-6 kg
  Uncertainty for LCI results cannot be determined
- Sulfate [water, surface water]: 0.0072397 kg
  Uncertainty for LCI results cannot be determined
- Methane, dichloro-, HCC-30 [air, urban air close to ground]: 5.64e-11 kg
  Uncertainty for LCI results cannot be determined
- Chloride [water, surface water]: 0.0025511 kg
  Uncertainty for LCI results cannot be determined
- Zinc [air, urban air close to ground]: 2.5646e-10 kg
  Uncertainty for LCI results cannot be determined
- Dioxins, measured as 2,3,7,8-tetrachlorodibenzo-p-dioxin [air, urban air close to ground]: 0 kg
  Uncertainty for LCI results cannot be determined
- Chlorate [water, surface water]: 2.0198e-5 kg
  Uncertainty for LCI results cannot be determined
- Nitrogen oxides [air, urban air close to ground]: 0.0045942 kg
  Uncertainty for LCI results cannot be determined
- Antimony [air, urban air close to ground]: 3.8786e-14 kg
  Uncertainty for LCI results cannot be determined
- Ammonia [air, urban air close to ground]: 9.7134e-9 kg
  Uncertainty for LCI results cannot be determined
- Hydrogen chloride [air, urban air close to ground]: 4.9712e-5 kg
  Uncertainty for LCI results cannot be determined
- DOC, Dissolved Organic Carbon [water, surface water]: 4.3405e-5 kg
  Calculated as equal to TOC.
- Methane, non-fossil [air, urban air close to ground]: 2.6306e-5 kg
  Uncertainty for LCI results cannot be determined
- Tin, ion [water, surface water]: 6.7377e-15 kg
  Uncertainty for LCI results cannot be determined
- Copper, ion [water, surface water]: 1.1434e-7 kg
  Uncertainty for LCI results cannot be determined
- Hydrogen fluoride [air, urban air close to ground]: 1.8662e-6 kg
  Uncertainty for LCI results cannot be determined
- Hydrogen [air, urban air close to ground]: 6.3829e-5 kg
  Uncertainty for LCI results cannot be determined
- Chlorine [water, surface water]: 1.188e-9 kg
  Uncertainty for LCI results cannot be determined
- AOX, Adsorbable Organic Halogen as Cl [water, surface water]: 2.9044e-12 kg
  Uncertainty for LCI results cannot be determined
- Selenium [air, urban air close to ground]: 1.9505e-13 kg
  Uncertainty for LCI results cannot be determined
- Toluene [air, urban air close to ground]: 9.1459e-7 kg
  Uncertainty for LCI results cannot be determined
- Chromium [air, urban air close to ground]: 8.8976e-7 kg
  Uncertainty for LCI results cannot be determined
- Benzene [air, urban air close to ground]: 5.3966e-6 kg
  Uncertainty for LCI results cannot be determined
- Particulates, > 10 um [air, urban air close to ground]: 0.00018764 kg
  Uncertainty for LCI results cannot be determined
- Acidity, unspecified [water, surface water]: 1.0499e-6 kg
  Uncertainty for LCI results cannot be determined
- Carbonate [water, surface water]: 0.00014484 kg
  Uncertainty for LCI results cannot be determined
- Sodium, ion [water, surface water]: 0.0071182 kg
  Uncertainty for LCI results cannot be determined
- Sulfur dioxide [air, urban air close to ground]: 0.0068741 kg
  Uncertainty for LCI results cannot be determined
- Cyanide [water, surface water]: 4.7127e-11 kg
  Uncertainty for LCI results cannot be determined
- Magnesium [water, surface water]: 4.1034e-9 kg
  Uncertainty for LCI results cannot be determined
- Phosphorus [water, surface water]: 0.00013376 kg
  Uncertainty for LCI results cannot be determined
- Nitrate [water, surface water]: 2.6692e-6 kg
  Uncertainty for LCI results cannot be determined
- Fluorine [air, urban air close to ground]: 1.3604e-10 kg
  Uncertainty for LCI results cannot be determined
- BOD5, Biological Oxygen Demand [water, surface water]: 2.0364e-5 kg
  Uncertainty for LCI results cannot be determined
- Ethane, 1,2-dichloro- [air, urban air close to ground]: 1.0906e-10 kg
  Uncertainty for LCI results cannot be determined
- Carbon disulfide [air, urban air close to ground]: 4.6535e-11 kg
  Uncertainty for LCI results cannot be determined
- Xylene [air, urban air close to ground]: 3.7774e-7 kg
  Uncertainty for LCI results cannot be determined
- Potassium, ion [water, surface water]: 5.2402e-9 kg
  Uncertainty for LCI results cannot be determined
- Lead [water, surface water]: 3.6397e-10 kg
  Uncertainty for LCI results cannot be determined
- Silicon [water, surface water]: 0 kg
  Uncertainty for LCI results cannot be determined
- Ethane, 1,2-dichloro- [water, surface water]: 1.8088e-12 kg
  Uncertainty for LCI results cannot be determined
- Arsenic [air, urban air close to ground]: 8.1427e-11 kg
  Uncertainty for LCI results cannot be determined
- Ammonium, ion [water, surface water]: 1.9348e-6 kg
  Uncertainty for LCI results cannot be determined
- Hydrocarbons, chlorinated [air, urban air close to ground]: 4.2855e-9 kg
  Uncertainty for LCI results cannot be determined
- Copper [air, urban air close to ground]: 1.708e-9 kg
  Uncertainty for LCI results cannot be determined

## Sampling procedure
literature values based on company survey

## Extrapolations
This dataset has been extrapolated from year 2001 to the year of the calculation (2021). The uncertainty has been adjusted accordingly.

## Review by Jürgen Sutter 2010-04-06
passed.
