# integrated battery interface system production, for Li-ion battery

Dataset: EcoSpold 2, unit process
Geography: GLO
Time period: 2014-01-01 to 2021-12-31
Technology level: current
Classification: ISIC rev.4 ecoinvent: 2720:Manufacture of batteries and accumulators
Synonyms: IBIS
Scenario: Business-as-Usual
System model: Allocation, cut-off by classification
Generated by: Eleonora Crenna
Published in: Ellingsen, L.A.W. 2014
Database: ecoinvent
isCopyrightProtected: true
accessRestrictedTo: 1

## General comment
This dataset represents the production of 1 kg integrated battery interface system (IBIS), which is part of the Battery Management System (BMS) of a Li-ion battery. The IBIS is modelled according to the publication of Ellingsen et al. (2014). The IBIS functions include overseeing the battery charge and discharge strategies, providing vehicle-level high voltage
precharge, contactor control, system isolation monitoring and charge/discharge current measurements. Proxies were used to approximate the production processes. It is assumed that the IBIS is manufactured at an electronic component production plant.
Reference:
Ellingsen, L. A. W., Majeau‐Bettez, G., Singh, B., Srivastava, A. K., Valøen, L. O., & Strømman, A. H. (2014). Life cycle assessment of a lithium‐ion battery vehicle pack. Journal of Industrial Ecology, 18(1), 113-124.

## Included activities start
The activity starts with the raw material entering the factory.

## Included activities end
The activity ends with the production of the integrated battery interface system at the factory gate.

## Geography
Original data were provided by the battery producer Miljøbil Grenland, located in Norway, for a Li-ion battery for use in electric vehicles. (Ellingsen et al. 2014, Life cycle assessment of a lithium‐ion battery vehicle pack. Journal of Industrial Ecology, 18(1), 113-124). Geography uncertainty has been adjusted accordingly.

## Technology
The integrated battery interface system (IBIS) is an electronic component of the battery management system (BMS), containing printed circuit boards and integrated circuits, clamps and connectors, spacers. It has an important role as master controller for the BMS.

## Time period
The time period is from 2014 (year of the publication of data) and 2020 (year of the dataset)

## Reference product
- integrated battery interface system, for Li-ion battery: 1 kg; By-product classification allocatable product; CPC 46430: Parts of primary cells, primary batteries and electric accumulators (including separators)
  production volume 2.30307e6 kg; = 191922359*0.012
    The PV is expressed in kg. According to UN Comtrade (https://comtrade.un.org/data/, HS code: 850760) 191922359 kg Li-ion batteries were exported from China in 2019. The IBIS within the battery management system represents on average 1.2% weight of a Li-ion battery.
  property price 46.3619 EUR2005
    Calculated based on inputs: The price of the product has been calculated as a sum of the values of the material and energy inputs for this product. This value is therefore a rough estimation. It may underestimate the real price since there are additional expenses when producing any product. These expences can include for example labour costs, treatment of waste materials and profit for the producer. Please consider carefully whether this level of data quality is acceptable for your application.
  property carbon content 0.0285893
    carbon content on a dry matter basis (reserved; not for manual entry)
  properties: water content 0, wet mass 1 kg, water in wet mass 0 kg, dry mass 1 kg, carbon content, fossil 0.0285893, carbon content, non-fossil 0, carbon allocation 0.0285893 kg

## Inputs from technosphere
All rows: source Ellingsen, L.A.W. 2014
- casting, brass: 0.0057 kg; lognormal variance with pedigree 0.0192, pedigree (2,5,4,5,1)
  Literature.
- metal working, average for steel product manufacturing: 0.85 kg; lognormal variance with pedigree 0.0192, pedigree (2,5,4,5,1)
  Literature. Proxy for the production of steel products
- polyethylene terephthalate, granulate, amorphous: 0.0068 kg; lognormal variance with pedigree 0.0192, pedigree (2,5,4,5,1)
  Literature.
  properties: heating value, net 22.95 MJ, dry mass 1 kg, wet mass 1 kg, carbon content, fossil 0.625
- brass: 0 kg; pedigree (1,1,1,1,1)
  Literature.
  properties: dry mass 1 kg, wet mass 1 kg
- electric connector, wire clamp: 0.021 kg; lognormal variance with pedigree 0.0192, pedigree (2,5,4,5,1)
  Literature.
  properties: wet mass 1 kg, carbon content, fossil 0.19653, dry mass 1 kg
- acrylonitrile-butadiene-styrene copolymer: 0.0002 kg; lognormal variance with pedigree 0.0192, pedigree (2,5,4,5,1)
  Literature.
  properties: heating value, net 35.58 MJ, carbon content, fossil 0.853081, dry mass 1 kg, wet mass 1 kg
- injection moulding: 0.0089 kg; lognormal variance with pedigree 0.0192, pedigree (2,5,4,5,1)
  Literature. Proxy for the production of plastic products
- nylon 6: 0 kg; pedigree (1,1,1,1,1)
  Literature.
  properties: carbon content, fossil 0.637168, dry mass 1 kg, wet mass 1 kg, heating value, net 30.9 MJ
  note on carbon content, fossil: It is a chain of caprolactam molecules, originating from aminocarboxylic acids - here caproic acid or caprolactam. The structure of nylon 6 is -(NH-(CH2)5-CO)n-, C6H11NO (ecoinvent v2.2 report 11_II). MW=113 g/mol
  note on heating value, net: Assumed equal to Nylon-66. Reference: Walters, R. N., Hackett, S. M. and Lyon, R. E. (2000) ‘Heats of combustion of high temperature polymers’, Fire and Materials, 24(5), pp. 245–252. doi: 10.1002/1099-1018(200009/10)24:5<245::AID-FAM744>3.0.CO;2-7.
- electronic component factory: 2e-8 unit; lognormal variance with pedigree 0.51, pedigree (5,5,5,5,5)
  Literature.
- integrated circuit, logic type: 1.7e-5 kg; lognormal variance with pedigree 0.0192, pedigree (2,5,4,5,1)
  Literature.
  properties: dry mass 1 kg, carbon content, fossil 0.221701, wet mass 1 kg
- steel, low-alloyed: 0.85 kg; lognormal variance with pedigree 0.0192, pedigree (2,5,4,5,1)
  Literature.
  properties: dry mass 1 kg, wet mass 1 kg, carbon content, fossil 0.005
- printed wiring board, surface mounted, unspecified, Pb free: 0.11 kg; lognormal variance with pedigree 0.0192, pedigree (2,5,4,5,1)
  Literature.
  properties: dry mass 1 kg, wet mass 1 kg, carbon content, fossil 0.132522
- brass: 2.85e-5, 0.0056715 kg (2 entries); lognormal variance with pedigree 0.0192, pedigree (2,5,4,5,1)
  Literature.
- nylon 6: 0.000628125, 0.00127187 kg (2 entries); lognormal variance with pedigree 0.0192, pedigree (2,5,4,5,1)
  Literature.

## Sampling procedure
From Literature.

## Extrapolations
This dataset has been extrapolated from year 2020 to the year of the calculation (2021). The uncertainty has been adjusted accordingly.
