# building construction, luxury hotel

Dataset: EcoSpold 2, unit process
Geography: PE
Time period: 2017-01-01 to 2021-12-31
Technology level: current
Classification: ISIC rev.4 ecoinvent: 4100:Construction of buildings
Synonyms: 5 star hotel building
Tags: single enterprise data
Scenario: Business-as-Usual
System model: Allocation, cut-off by classification
Generated by: Viachaslau Filimonau
Published in: Filimonau, V. 2018
Database: ecoinvent
isCopyrightProtected: true
accessRestrictedTo: 1

## General comment
This dataset represents a tourist accommodation facility located in Lima, Peru. The case study hotel is classed as a luxury hotel (comfort category 5*). It was opened in 2012 as a brand new, stand-alone tourist accommodation facility. The hotel has capacity of 207 rooms (423 beds in total) and offers rooms of the following types (total number of rooms is given in brackets): double/twin (190), junior suite (7), executive suite (9), presidential suite (1). The hotel has 17 floors (13 above the ground and 4 under the ground) which host a lobby, a restaurant, a bar, a spa and event/conference rooms. Laundry is available on site. Parking lot is available on site. The load bearing structure of hotel building is made of concrete and the facade is made of concrete and brickwork. The hotel occupies a plot of 2570 m2 while the gross floor area (GFA) of the hotel is 20260 m2. The average annual occupancy of the hotel is 70% which is equal to 108077 guest nights per year . The case study hotel"s occupancy is in line with the country"s average of 66%
(Source: Hotel News Now 2015. The state of Peru"s tourism, hotels. Available from: http://www.hotelnewsnow.biz/Articles/27650/The-state-of-Perus-tourism-hotels Accessed 16 March 2018).

## Included activities start
This dataset is modelled to include the inputs for the construction of a hotel building. This includes:energy and water used in construction, land transformation, building structure and outer building shell, inner walls, roofs, ceiling and windows, doors, floors, finishing and painting, bathroom equipment. Activities include hotel building construction with lifeframe of the hotel building of 75 years. Maintenance is included only through the consideration of the lifetime of the different exchanges. For example, windows are assumed to have a lifetime of 35 years, therefore the exchange amount is multiplied by 75 years / 35 years=2.14. Hotel building foundation is included in the form of estimates based on the hotel area and construction practices in Peru.

## Included activities end
Activities end with 1 unit of hotel building, including maintenance. Due to data availability, the following building construction processes have been excluded: cables, gutter, drains.

## Geography
The hotel is based in Lima, Peru.

## Technology
Technology in use is considered current.

## Time period
The survey was done in the year 2017 with the data provided covering the operational year 2016-2017.

## Parameters
- gross floor area: 20260 m2; name GFA
  This represents gross floor area for buildings.
- occupancy rate/year: 0.7 dimensionless; name occupancy_y
  The case study hotel reports average occupancy of 70%.
- volume: 1.03326e6 m3; = GFA*17*3
  Building volume. Calculated by multiplying gross floor area (GFA) by the height of the floor. Height of the floor is assumed to be equal to 3 meters.

## Reference product
- building, luxury hotel: 1 unit; name building_luxury_hotel; source Hotel News Now 2015; By-product classification allocatable product; CPC 5312: Non-residential buildings
  production volume 3 unit; name RP_PV
    In 2014 there were 40 hotels in Peru classed under the 5 star comfort category. Source: Hotel News Now 2015. The state of Peru’s tourism, hotels. Available from: http://www.hotelnewsnow.biz/Articles/27650/The-state-of-Perus-tourism-hotels Accessed 22 March 2018. Same source states that, between 2009 and 2014, the Peru’s hotel supply had an average growth of 8% per year. Assuming this growth distributes equally across various categories of hotels in Peru, it can be estimated that the number of 5 star hotel properties annually constructed in Peru is equal to: 40 hotels * 0.08 = 3 hotels.
  property lifetime capacity 108076 guest night; name lifetime_guests; = 423*365*0.7
    The total capacity of the hotel is 423 guests. The lifetime capacity is calculated accordingly.
  property lifetime 75 year; name lifetime
    The lifetime of a hotel building is assumed to be equal to 75 years which is an average of the 50-100 years" estimates available in the literature. Source: Filimonau et al. 2011. Reviewing the carbon footprint analysis of hotels: Life Cycle Energy Analysis (LCEA) as a holistic method for carbon impact appraisal of tourist accommodation. Journal of Cleaner Production, 19, 1917-1930.
  property price 1.86447e8 EUR2005; name building_luxury_hotel_price_EUR2005
    Calculated based on inputs: The price of the product has been calculated as a sum of the values of the material and energy inputs for this product. This value is therefore a rough estimation. It may underestimate the real price since there are additional expenses when producing any product. These expences can include for example labour costs, treatment of waste materials and profit for the producer. Please consider carefully whether this level of data quality is acceptable for your application.

## By-products
- aluminium scrap, post-consumer: 0 kg; CPC 39363: Waste and scrap of aluminium; By-product classification Recyclable; pedigree (1,1,1,1,1)
  Calculated value. The amount is set equal to the amount of input material, window frame, aluminium. Assuming an average aluminium frame measures 1.44 m2 (large commercial window) and has a weight of 35 kg. Source: Warmcore 2018. Technical specification - aluminium windows. Available from: https://www.bmbifoldingdoors.co.uk/wp-content/uploads/warmcorebifoldwindow-technicalguide.pdf Accessed 23 March 2018. The amount also contains waste aluminium, cast alloy.
  production volume 0 kg; = RP_PV * (BP_amount_8 / building_luxury_hotel)
    Calculated from production volume of reference product using the relative outputs.
  property price 0.685 EUR2005; name BP_amount_8_price_EUR2005
    Temporary price data. Calculated as 90% of purchasers price based on: estimated at 85% of new scrap
  property carbon content 0
    carbon content on a dry matter basis (reserved; not for manual entry)
  properties: water content 0, carbon content, fossil 0, wet mass 1 kg, water in wet mass 0 kg, carbon content, non-fossil 0, dry mass 1 kg, carbon allocation 0 kg
- iron scrap, unsorted: 0 kg; CPC 39310: Slag, dross, scalings and other waste from the manufacture of iron or steel; By-product classification Recyclable; pedigree (1,1,1,1,1)
  Calculated value. Amount of output material is set equal to the amount of respective input material, steel.
  production volume 0 kg; = RP_PV * (BP_amount_7 / building_luxury_hotel)
    Calculated from production volume of reference product using the relative outputs.
  property price 0.149 EUR2005; name BP_amount_7_price_EUR2005
    Temporary price data. Calculated as 90% of purchasers price based on: estimated at 85% of sorted scrap
  property carbon content 0
    carbon content on a dry matter basis (reserved; not for manual entry)
  properties: wet mass 1 kg, dry mass 1 kg, water content 0, water in wet mass 0 kg, carbon content, non-fossil 0, carbon content, fossil 0, carbon allocation 0 kg

## Inputs from technosphere
- used door, inner, wood: -1657.54 m2; name BP_amount_4; = (door_w)*-1; lognormal variance with pedigree 0.123425, pedigree (2,4,2,2,5)
  Calculated value. Amount of output material is set equal to the amount of respective input material, door, inner, wood.
  production volume 4972.61 m2; = RP_PV * (BP_amount_4 / building_luxury_hotel)
    Calculated from production volume of reference product using the relative outputs.
  property price 0 EUR2005; name BP_amount_4_price_EUR2005
  properties: wet mass 27.6 kg, water content 0.0526316, carbon content, fossil 0.074995, dry mass 26.22 kg, carbon content, non-fossil 0.715131
- electricity, low voltage: 309978 kWh; = 0.3* volume; lognormal variance with pedigree 0.422225, pedigree (1,4,2,2,5)
  Calculated value. Assuming that 0.30 kWh/m3 of electricity is necessary to construct a building. Source: Zabalza et al. 2013. Use of LCA as a Tool for Building Ecodesign. A Case Study of a Low Energy Building in Spain. Energies, 6(8), 3901-3921.
- used door, outer, wood-aluminium: -112.903 m2; name BP_amount_2; = (door_a)*-1; lognormal variance with pedigree 0.123425, pedigree (2,4,2,2,5)
  Calculated value. Amount of output material is set equal to the amount of respective input material, door, outer, wood-aluminium.
  production volume 338.709 m2; = RP_PV * (BP_amount_2 / building_luxury_hotel)
    Calculated from production volume of reference product using the relative outputs.
  property price 0 EUR2005; name BP_amount_2_price_EUR2005
  properties: wet mass 38.8 kg, carbon content, non-fossil 0.275711, water content 0.0526316, carbon content, fossil 0.025815, dry mass 36.86 kg
- tap water: 1.013e7 kg; name tap_water; = (0.5*1000*GFA); lognormal variance with pedigree 0.422225, pedigree (1,4,2,2,5)
  Calculated value. Assuming that 0.5 kl per 1 m2 of floor area (GFA) is required in building construction. Source: Crawford et al. 2005. In terms of outputs assumed to have gone to wastewater. Value double checked in McCormack, et al. 2007.
  Reference:
  Crawford, Robert and Treloar, Graham 2005, An assessment of the energy and water embodied in commercial building construction, in Australian Life Cycle Assessment Conference (4th : 2005 : Novotel, Sydney, N.S.W.), Australian Life Cycle Assessment Society, Sydney, N.S.W., pp. 1-10.
  McCormack, et al. 2007. Modelling direct and indirect water requirements of construction. Building research & information. 35(2), 156-162.
  properties: dry mass 0.000337476 kg, water content 2962.17, wet mass 1 kg, carbon content, fossil 0.00178991
  note on carbon content, fossil: Bicarbonate content is 2.93 mol/m3. CO2 content is 0.1 mol/m3 (ecoinvent v2.2 report 8, Tab 93.1).
- gypsum plasterboard: 338433 kg; name plasterboard; = (8510.18*12.5/1000*640)+(15673.85*12.5/1000*640)+(18120.13*12.5/1000*640); lognormal variance with pedigree 0.123425, pedigree (2,4,2,2,5)
  Calculated value. Combined of all instances of use across the building. Assumed thickness of plasterboard 12.5 mm. Source: Practical DYI 2018. Types of plasterboard. Available from: https://www.practicaldiy.com/general-building/plasterboard/plasterboard.php Accessed 23 March 2018. Assumed density of plasterboard 640 kg/m3. Source: British Gypsum 2018. What is the density of Gyproc plasterboards? Available from: http://www.british-gypsum.com/technical-advice/faqs/114-what-is-the-density-of-gyproc-plasterboards Accessed 23 March 2018. In terms of outputs assumed to have gone to waste gypsum plasterboard.
  properties: carbon content, non-fossil 0.0188747, wet mass 1 kg, carbon content, fossil 0.00113571, dry mass 1 kg
- blower and heat exchange unit, decentralized, 180-250 m3/h: 5 unit; = 1*( lifetime/15); lognormal variance with pedigree 0.422225, pedigree (1,4,2,2,5)
  Calculated value. Represents here an air-conditioning unit. The amount of exchange is calculated as: amount of input product * (lifetime of the hotel / lifetime of the product). Assumed service life of the air-conditioning unit is 15 years. Source: ASHRAE 2018. ASHRAE Equipment Life Expectancy chart. Available from: http://www.culluminc.com/wp-content/uploads/2013/02/ASHRAE_Chart_HVAC_Life_Expectancy%201.pdf Accessed 23 March 2018.
  properties: dry mass 43.1 kg, carbon content, fossil 0.225044, wet mass 43.1 kg, carbon content, non-fossil 6.48865e-7
- waste wood, untreated: -207895 kg; name BP_amount_10; = (sawnwood* beam_WM+ plywood_i* ply_i_WM)*-1; lognormal variance with pedigree 0.123425, pedigree (2,4,2,2,5)
  Calculated value. The amount is set equal to the amount of input materials, sawnwood, with conversion made from volume to weight. The amount also includes waste plywood, for indoor use, with convertion from m3 to kg. Density for both material is taken from the properties section, see their respective wet mass.
  production volume 623684 kg; = RP_PV * (BP_amount_10 / building_luxury_hotel)
    Calculated from production volume of reference product using the relative outputs.
  property wet mass 1 kg; name ply_i_WM
  property price 0 EUR2005; name BP_amount_10_price_EUR2005
  properties: water content 0.25, heating value, net 13.99 MJ, dry mass 0.8 kg, carbon content, non-fossil 0.48632
  note on heating value, net: Value taken from the general comment of the treatment dataset.
- wastewater, average: -10130 m3; name BP_amount_11; = (tap_water/1000)*-1; lognormal variance with pedigree 0.123425, pedigree (2,4,2,2,5)
  Calculated value. The amount is set equal to the amount of input material, tap water with conversion from kg to m3. 1 m3 of water is assumed to be equal to 1000 kg of water.
  production volume 30390 m3; = RP_PV * (BP_amount_11 / building_luxury_hotel)
    Calculated from production volume of reference product using the relative outputs.
  property price 0 EUR2005; name BP_amount_11_price_EUR2005
  properties: dry mass 0.346837 kg, carbon content, non-fossil 0.194039, wet mass 1000 kg, water content 2882.2
  note on carbon content, non-fossil: 0.0673 kg TOC/m3 (Tab A.17, ecoinvent v2.2 report 13_I). TOC was considered as Total Carbon.
- used window frame, wood-metal: -201.964 m2; name BP_amount_9; = (window_metal)*-1; lognormal variance with pedigree 0.123425, pedigree (2,4,2,2,5)
  Calculated value. Amount of output material is set equal to the amount of respective input material, window frame, wood-metal.
  production volume 605.893 m2; = RP_PV * (BP_amount_9 / building_luxury_hotel)
    Calculated from production volume of reference product using the relative outputs.
  property price 0 EUR2005; name BP_amount_9_price_EUR2005
  properties: wet mass 83.4 kg, water content 0.0526316, carbon content, non-fossil 0.546509, dry mass 79.23 kg, carbon content, fossil 0.0530468
- waste polyvinylchloride: -38135.7 kg; name BP_amount_1; = (PVC)*-1; lognormal variance with pedigree 0.123425, pedigree (2,4,2,2,5)
  Calculated value. Amount of output material is set equal to the amount of respective input material, PVC.
  production volume 114407 kg; = RP_PV * (BP_amount_1 / building_luxury_hotel)
    Calculated from production volume of reference product using the relative outputs.
  property price 0 EUR2005; name BP_amount_1_price_EUR2005
  properties: carbon content, fossil 0.440882, heating value, net 21.51 MJ, wet mass 1 kg, water content 0.00200401, dry mass 0.998 kg
- polyvinylchloride, bulk polymerised: 38135.7 kg; name PVC; = (8843.06*2.3)*(lifetime/40); lognormal variance with pedigree 0.123425, pedigree (2,4,2,2,5)
  Calculated value. Represents here the floor material. The amount of exchange is calculated as: amount of input product * (lifetime of the hotel / lifetime of the product). No data on the type of flooring was provided by the case study hotel so PVC was used as proxy. This is because PVC flooring is most cost-effective for hotels. Source: Mikulski 2015. TOP HOSPITALITY FLOORING OPTIONS FOR HOTELS. Available from: http://www.businessflooring.net/blog/top-hospitality-flooring-options-for-hotels Accessed 16 March 2018. Combined of all instances of use across the building structure and walls.Assumed density of PVC 2.3 kg/m2. Source: The colour flooring company 2018. VINYL FLOORING TECHNICAL SPECIFICATIONS. Available from: https://www.colourflooring.co.uk/pages/vinyl-flooring-technical-specifications Accessed 16 March 2018. Assumed service life of PVC floors is 40 years. Source: Bowyer et al. 2009. LIFE CYCLE ASSESSMENT OF FLOORING MATERIALS A GUIDE TO INTELLIGENT SELECTION. Doviteil Partners. Available from: http://www.dovetailinc.org/report_pdfs/2009/dovetailfloors0809.pdf Accessed 16 March 2018. In terms of outputs, assumed to have gone to waste PVC.
  properties: dry mass 1 kg, wet mass 1 kg, heating value, net 21.5 MJ, carbon content, fossil 0.387097
  note on carbon content, fossil: Monomer is vynyl chloride, C2H3Cl (ecoinvent v2.2 report 11_II). MW=62 g/mol
- door, inner, glass-wood: 244.012 m2; name door_g; = 130.14*( lifetime/40); lognormal variance with pedigree 0.123425, pedigree (2,4,2,2,5)
  Calculated value. The amount of exchange is calculated as: amount of input product * (lifetime of the hotel / lifetime of the product). Assumed service life of 40 years. Source: Cobut et al. 2015. The environmental footprint of interior wood doors in non-residential buildings - part 1: life cycle assessment. Journal of Cleaner Production, 109, 232-246. In terms of outputs, assumed to have gone to used door, inner, glass-wood.
  properties: wet mass 27.6 kg, carbon content, non-fossil 0.563279, water content 0.0526316, carbon content, fossil 0.0665144, dry mass 26.22 kg
- sanitary ceramics: 76720 kg; name san_c; = ((241*15)*(lifetime/15)+(238*35)*(lifetime/15)+(103*33)*(lifetime/15)); lognormal variance with pedigree 0.422225, pedigree (1,4,2,2,5)
  Calculated value. The amount of exchange is calculated as: amount of input product * (lifetime of the hotel / lifetime of the product). This flow represents ceramic bathroom equipment (washing basin, toilet seat and bath tube). The hotel has 241 washing basins, 238 toilet seats and 103 bath tubes. Washing basins are assumed to weigh 15kg (information taken from IKEA (2018) for the product "TÖRNVIKEN Countertop wash-basin", source retrieved from: http://www.ikea.com/gb/en/products/washstands-taps/wash-basins/t%C3%B6rnviken-countertop-wash-basin-white-art-90291518/, accessed 12 Feb 2018). The assumed lifetime is 15 years. Toilet seats are assumed to weigh 35kg (information taken from B&Q (2018) for the product "COOKE & LEWIS FABIENNE CLOSE-COUPLED TOILET WITH SOFT CLOSE SEAT", source retrieved from: https://www.diy.com/departments/cooke-lewis-fabienne-close-coupled-toilet-with-soft-close-seat/1142804_BQ.prd?B/R_Toilets_C_CT, accessed 12 Feb 2018). The assumed lifetime is 15 years. Bath tubes are assumed to weigh 33kg (information taken from B&Q (2018) for the product COOKE & LEWIS CONWAY STEEL RECTANGULAR STRAIGHT BATH (L)1700MM (W)700MM, source retrieved from: https://www.diy.com/departments/cooke-lewis-conway-steel-rectangular-straight-bath-l-1700mm-w-700mm/194437_BQ.prd, accessed 23 March 2018). The assumed lifetime is 15 years. In terms of outputs, assumed to have gone to inert waste.
  properties: wet mass 1 kg, dry mass 1 kg
- steel, low-alloyed, hot rolled: 517.904 kg; name steel; = (94.25*0.7/1000*7850); lognormal variance with pedigree 0.123425, pedigree (2,4,2,2,5)
  Calculated value. Assumed thickness of steel 0.7 mm. Source: MCRMA 2004. PROFILED METAL ROOFING DESIGN GUIDE. MCRMA Technical Paper No. 6. Available from: http://www.mcrma.co.uk/pdf/mcrma_t06.pdf Accessed 16 March 2018. Assumed density of steel 7850 kg/m3. Source: The Calculator site 2018. Metal converter. Available from: https://www.thecalculatorsite.com/conversions/substances/metal.php Accessed 23 March 2018. Assumed service life of 75 years which is equal to the service life of the hotel building with minor refurbishments throughout. In terms of outputs, assumed to have gone to iron scrap.
  properties: carbon content, fossil 0.005, wet mass 1 kg, dry mass 1 kg
  note on carbon content, fossil: Low alloyed steel composition given in Tab. 3.2 ecoinvent v2.2 report 10_partII. Steel assumed to have a C content of 0.5%
- waste glass: -64213.5 kg; name BP_amount_6; = (glass+ wool_mat)*-1; lognormal variance with pedigree 0.123425, pedigree (2,4,2,2,5)
  Calculated value. Amount of output material is set equal to the amount of respective input material, flat glass, coated. The amount also contains waste glass wool mat.
  production volume 192641 kg; = RP_PV * (BP_amount_6 / building_luxury_hotel)
    Calculated from production volume of reference product using the relative outputs.
  property price 0 EUR2005; name BP_amount_6_price_EUR2005
  properties: dry mass 1 kg, wet mass 1 kg, heating value, net 0.05 MJ
  note on heating value, net: Value extracted from "treatment of waste glass, open dump, very wet infiltration class (1000mm)"
- concrete, normal: 45290.2 m3; name concrete; = 14235.09+(955.86*225/1000)+(2570*3*4); lognormal variance with pedigree 0.123425, pedigree (2,4,2,2,5)
  Calculated value.
  Combined of all instances of use across the building structure, walls and floor (14450m3). Assumed thickness of concrete of 225 mm, Insulation 2011. Thermafloor TF70. INSULATION FOR SOLID CONCRETE AND SUSPENDED GROUND FLOORS. Available from http://kingspaninsulation.co.uk/getattachment/5fdd04b2-e58e-4622-97bb-5861799ab02a/Thermafloor-TF70-pdf.pdf Accessed 23 March 2018. Assumed service life of 75 years which is equal to the service life of the hotel building with minor refurbishments throughout.
  Additionally the concrete for foundations is accounted for (30840m3). Estimated value based on the hotel area and construction practices in Peru. The case study hotel has 4 floors of underground parking that occupy 2570 m2 of area and have 3 m of height each. Hotel foundation is then calculated as 2570 m2 x 3 m x 4 = 30840 m3. In terms of outputs assumed to have gone to waste concrete.
  property wet mass 2380 kg; name concrete_WM
  properties: dry mass 2190 kg, water content 0.086758
- plywood: 19.1396 m3; name plywood_i; = 1007.35*19/1000; lognormal variance with pedigree 0.123425, pedigree (2,4,2,2,5)
  Calculated value. Represents here wood used as ceiling material and for decoration. Assumed average thickness of plywood is 19mm. Source: Plymaster 2018. Interior Plywood. Available from: (http://plymaster.com.au/plywood-products-interior.htm#/1) Accessed 25 March 2018. Assumed service life of 75 years with minor refurbishments throughout. In terms of outputs assumed to have gone to waste wood, untreated.
  properties: dry mass 768.6 kg, wet mass 823 kg, heating value, net 11688.9 MJ, water content 0.070778, carbon content, non-fossil 0.409818, carbon content, fossil 0.09783, price 400 EUR2005
- diesel, burned in building machine: 5.17043e6 MJ; = 1.39* volume*3.6; lognormal variance with pedigree 0.422225, pedigree (1,4,2,2,5)
  Calculated value. Assuming that 1.39 kWh/m3 of diesel is necessary to construct a building. Source: Zabalza et al. 2013. Use of LCA as a Tool for Building Ecodesign. A Case Study of a Low Energy Building in Spain. Energies, 6(8), 3901-3921. Assuming 1 kWh = 3.6 MJ.
  properties: heating value, net 1 MJ
- window frame, aluminium, U=1.6 W/m2K: 6960.79 m2; name window_f; = 3248.37*(lifetime/35); lognormal variance with pedigree 0.123425, pedigree (2,4,2,2,5)
  Calculated value. The amount of exchange is calculated as: amount of input product * (lifetime of the hotel / lifetime of the product). Assumed service life of 35 years. Source: Asif et al. 2002. LIFE CYCLE OF WINDOW MATERIALS - A COMPARATIVE ASSESSMENT. Available from: http://ohp.parks.ca.gov/pages/1054/files/uk%20window%20frame%20lca.pdf Accessed 16 March 2018. In terms of outputs assumed to have gone to aluminium scrap.
  properties: heating value, net 219.49 MJ, dry mass 50.7 kg, wet mass 50.7 kg, carbon content, fossil 0.142876
- door, outer, wood-aluminium: 112.903 m2; name door_a; = 60.215*( lifetime/40); lognormal variance with pedigree 0.123425, pedigree (2,4,2,2,5)
  Calculated value. The amount of exchange is calculated as: amount of input product * (lifetime of the hotel / lifetime of the product). Assumed service life of 40 years. Source: Cobut et al. 2015. The environmental footprint of interior wood doors in non-residential buildings - part 1: life cycle assessment. Journal of Cleaner Production, 109, 232-246. In terms of outputs, assumed to have gone to used door, outer, wood-alunimium.
  properties: carbon content, fossil 0.025815, dry mass 36.86 kg, water content 0.0526316, wet mass 38.8 kg, carbon content, non-fossil 0.275711
- inert waste: -77330.6 kg; name BP_amount_12; = (san_c+ natural_stone)*-1; lognormal variance with pedigree 0.123425, pedigree (2,4,2,2,5)
  Calculated value. Amount of output material is set equal to the amount of respective input material, sanitary ceramics.
  production volume 231992 kg; = RP_PV * (BP_amount_12 / building_luxury_hotel)
    Calculated from production volume of reference product using the relative outputs.
  property price 0 EUR2005; name BP_amount_12_price_EUR2005
  properties: wet mass 1 kg, dry mass 1 kg
- elevator, hydraulic: 18.75 unit; = 5*( lifetime/20); lognormal variance with pedigree 0.422225, pedigree (1,4,2,2,5)
  Calculated value. The amount of exchange is calculated as: amount of input product * (lifetime of the hotel / lifetime of the product). Assumed service life of elevatorunit is 20 years. Source: Miljögiraff 2015. LCA of elevator lifting service in property. Miljögiraff Report 56. Available from: https://www.researchgate.net/profile/Marcus_Wendin/publication/301295772_Elevators_towards_a_circular_economy/links/5717790f08ae2679a8c772db/Elevators-towards-a-circular-economy.pdf Accessed 23 March 2018.
  properties: lifetime 80 year, carbon content, fossil 42.2962, wet mass 2490 kg, dry mass 2490 kg
- used door, inner, glass-wood: -244.012 m2; name BP_amount_5; = (door_g)*-1; lognormal variance with pedigree 0.123425, pedigree (2,4,2,2,5)
  Calculated value. Amount of output material is set equal to the amount of respective input material, door, inner, glass-wood.
  production volume 732.038 m2; = RP_PV * (BP_amount_5 / building_luxury_hotel)
    Calculated from production volume of reference product using the relative outputs.
  property price 0 EUR2005; name BP_amount_5_price_EUR2005
  properties: carbon content, non-fossil 0.563279, water content 0.0526316, dry mass 26.22 kg, carbon content, fossil 0.0665144, wet mass 27.6 kg
- waste gypsum plasterboard: -338433 kg; name BP_amount_3; = (plasterboard)*-1; lognormal variance with pedigree 0.123425, pedigree (2,4,2,2,5)
  Calculated value. Amount of output material is set equal to the amount of respective input material, gypsum plasterboard.
  production volume 1.0153e6 kg; = RP_PV * (BP_amount_3 / building_luxury_hotel)
    Calculated from production volume of reference product using the relative outputs.
  property price 0 EUR2005; name BP_amount_3_price_EUR2005
  properties: water content 0.239157, wet mass 1 kg, dry mass 0.807 kg
- window frame, wood-metal, U=1.6 W/m2K: 201.964 m2; name window_metal; = 94.25*(lifetime/35); lognormal variance with pedigree 0.123425, pedigree (2,4,2,2,5)
  Calculated value. The amount of exchange is calculated as: amount of input product * (lifetime of the hotel / lifetime of the product). Assumed service life of 35 years. Source: Asif et al. 2002. LIFE CYCLE OF WINDOW MATERIALS - A COMPARATIVE ASSESSMENT. Available from: http://ohp.parks.ca.gov/pages/1054/files/uk%20window%20frame%20lca.pdf Accessed 16 March 2018. In terms of outputs assumed to have gone to used window frame, wood-metal.
  properties: heating value, net 1429.1 MJ, water content 0.0526316, dry mass 79.23 kg, carbon content, non-fossil 0.546509, wet mass 83.4 kg, carbon content, fossil 0.0530468
- sawnwood, beam, softwood, dried (u=10%), planed: 488.062 m3; name sawnwood; = 685*(9.5/1000)* lifetime; lognormal variance with pedigree 0.123425, pedigree (2,4,2,2,5)
  Calculated value. Represents here all wood used in flooring and for wall decoration. Combined of all instances of use across the building. Assumed thickness of wood to be 9.5 mm. Source: APA 2016. Wall construction. An excerpt of the engineering wood construction guide. Available from: https://www.buildgp.com/DocumentViewer.aspx?elementid=10198 Accessed 25 March 2018. Assumed service life of 75 years with minor refurbishments throughout. In terms of outputs assumed to have gone to waste wood, untreated.
  property wet mass 425.92 kg; name beam_WM
  properties: carbon content, non-fossil 0.494, heating value, net 5700.67 MJ, water content 0.1, dry mass 387.2 kg
- aluminium, cast alloy: 26477.3 kg; name alum_cast_alloy; = 817.2*(12/1000)*2700; lognormal variance with pedigree 0.123425, pedigree (2,4,2,2,5)
  Calculated value. Represents here all aluminium parts used in construction of the building structure and walls. Combined of all instance of use across the buidling. Assumed thickness of aluminium is 12 mm. Source: Singh and Verma, 2008. Investigations for deducing wall
  thickness of aluminium shell casting
  using three dimensional printing. Journal of Achievements in Materials and Manufacturing Engineering, 31(2), 565-569. Available from: http://jamme.acmsse.h2.pl/papers_vol31_2/31259.pdf Accessed 25 March 2018. Assumed density of aluminium is 2700 kg/m3. Source: AmBrSoft Quality Softwares 2018. Materials density table. Available from: http://www.ambrsoft.com/CalcPhysics/Density/Table_2.htm Accessed 25 March 2018. Assumed service life of 75 years which is equal to the service life of the hotel building with minor refurbishments throughout. In terms of outputs assumed to have gone to scrap aluminium.
  properties: dry mass 1 kg, wet mass 1 kg
- door, inner, wood: 1657.54 m2; name door_w; = 884.02*( lifetime/40); lognormal variance with pedigree 0.123425, pedigree (2,4,2,2,5)
  Calculated value. The amount of exchange is calculated as: amount of input product * (lifetime of the hotel / lifetime of the product). Assumed service life of 40 years. Source: Cobut et al. 2015. The environmental footprint of interior wood doors in non-residential buildings - part 1: life cycle assessment. Journal of Cleaner Production, 109, 232-246. In terms of outputs, assumed to have gone to used door, inner, wood.
  properties: dry mass 26.22 kg, wet mass 27.6 kg, carbon content, fossil 0.074995, carbon content, non-fossil 0.715131, water content 0.0526316
- natural stone plate, cut: 610.553 kg; name natural_stone; = (2667.35*22/1000*2.7)+ (7611.32*22/1000*2.7); lognormal variance with pedigree 0.123425, pedigree (2,4,2,2,5)
  Calculated value. Used here in place of marble. Combined of all instances of use across the building. Assumed thickness of marble is 22 mm. Source: Erdly and Schwartz 2004. Building facade maintenance, repair, and inspection. ASTM International, West Conshohocken, USA. Assumed density of marble is 2.7 kg/m3. Source: The Engineering Toolbox 2018. Densities of common solids. Available from: https://www.engineeringtoolbox.com/density-solids-d_1265.html Accessed 25 March 2018. Assumed service life of 75 years which is equal to the service life of the hotel building with minor refurbishments throughout. In terms of outputs assumed to have gone to inert waste.
  properties: dry mass 1 kg, wet mass 1 kg
- flat glass, coated: 62674.1 kg; name glass; = (3342.62*5)*(lifetime/20); lognormal variance with pedigree 0.123425, pedigree (2,4,2,2,5)
  Calculated value. The amount of exchange is calculated as: amount of input product * (lifetime of the hotel / lifetime of the product). Assuming 5 kg of window glass is required to cover 1m2 of area. Source: Glass Weight Calculator 2018. Glass weight calculator. Available from: https://www.glass-ts.com/glass-weight-calculator Accessed 16 March 2018. Assumed average service life of 20 years. Source: Howard et al. 2007. Comparative service life assessment of window systems. Available from: http://www.fwpa.com.au/images/marketaccess/PR07.1047%20Final%20Report%20WEB.pdf Accessed 16 March 2018. In terms of outputs assumed to have gone to waste glass.
  properties: wet mass 1 kg, dry mass 1 kg
- waste concrete: -1.07791e8 kg; name waste_concrete; = ((concrete*concrete_WM))*-1; lognormal variance with pedigree 0.123425, pedigree (2,4,2,2,5)
  Calculated value. Amount of output material is set equal to the amount of respective input material, concrete, normal. It also contains waste concrete from hotel foundation. Conversion is made from m3 of concrete to kg of concrete based on the wet mass property of concrete (see properties section).
  production volume 3.23372e8 kg; = waste_concrete*RP_PV
    Calculated from production volume of reference product using the relative outputs.
  property price 0 EUR2005; name waste_concrete_price_EUR2005
  properties: wet mass 1 kg, dry mass 0.5 kg, water content 1
- glass wool mat: 1539.4 kg; name wool_mat; = (384.85*100/1000*40)*(lifetime/75); lognormal variance with pedigree 0.123425, pedigree (2,4,2,2,5)
  Calculated value. Used here in place of aqustic tile as a more conventional product. The amount of exchange is calculated as: amount of input product * (lifetime of the hotel / lifetime of the product). Combined of all instances of use across the building structure, walls and ceiling. Assumed service life of 75 years which is equal to the service life of the hotel building with minor refurbishments throughout. Assumed thickiness of glass wool 100 mm. Source: Knauf Insulation 2018. Knauf Insulation. Available from: http://www.knaufinsulation.co.uk/products/glass-mineral-wool-rolls/loft-insulation-rolls/earthwool-loft-roll-44 Accessed 16 March 2018. The density of glass wool is assumed to be 40 kg/m3 based on the specifications in ecoinvent dataset "glass wool mat production, CH 2000" accessed 22 Janaury 2018. In terms of outputs, assumed to have gone to waste glass.
  properties: wet mass 1 kg, dry mass 1 kg, carbon content, fossil 0.0107327
  note on carbon content, fossil: A share of 16 w-% for the binders is taken into account. The binder used in this study is a mixture of phenol, formaldehyde and urea resins (ecoinvent v2.2 report 16_part XIV), and the C content was calculated as a weigthed average of phenol, formaldehyde and urea C content.
- aluminium scrap, post-consumer: -105431 kg; lognormal variance with pedigree 0.123425, pedigree (2,4,2,2,5)
  (same comment as for aluminium scrap, post-consumer)
  production volume 316292 kg
  properties: wet mass 1 kg, dry mass 1 kg
- iron scrap, unsorted: -517.904 kg; lognormal variance with pedigree 0.123425, pedigree (2,4,2,2,5)
  (same comment as for iron scrap, unsorted)
  production volume 1553.71 kg
  properties: wet mass 1 kg, dry mass 1 kg

## Inputs from nature
- Transformation, to urban, continuously built [natural resource, land]: 20260 m2; = GFA; lognormal variance with pedigree 0.242225, pedigree (1,4,2,2,5)
  Calculated value. Based on survey data that have specified he gross floor area of the hotel which is 20260 m2 .
- Occupation, urban, continuously built [natural resource, land]: 1.5195e6 m2*year; = GFA*lifetime; lognormal variance with pedigree 0.162225, pedigree (1,4,2,2,5)
  Calculated value. Based on survey data, the gross floor area is 20260 m2, multiplied by the lifetime of the building.
- Transformation, from urban, continuously built [natural resource, land]: 20260 m2; = GFA; lognormal variance with pedigree 0.242225, pedigree (1,4,2,2,5)
  (same comment as for Transformation, to urban, continuously built)

## Sampling procedure
Primary data from the hotel supplemented with literature-based calculations and estimates, where appropriate.

## Extrapolations
This dataset has been extrapolated from year 2018 to the year of the calculation (2021). The uncertainty has been adjusted accordingly.
