# ammonium paratungstate production, ion exchange

Dataset: EcoSpold 2, unit process
Geography: CN
Time period: 2014-01-01 to 2021-12-31
Technology level: current
Classification: ISIC rev.4 ecoinvent: 2420:Manufacture of basic precious and other non-ferrous metals
Synonyms: APT
Scenario: Business-as-Usual
System model: Allocation, cut-off by classification
Generated by: Nora Minas
Database: ecoinvent
isCopyrightProtected: true
accessRestrictedTo: 1

## General comment
This dataset represents the production of 1 Kg ammonium paratungstate (APT) by the hydrometallur-gical method of caustic autoclave-ion exchange (solid ion exchange SIX). More than 90 % of APT pro-duced in China is produced in this manner (Ma et al. 2017). ATP has the chemical formula (NH4)10(H2W12O42) 4H2O and is the most important intermediate product for all tungsten products (Lassner et al. 2000).Due to lack of data, this dataset does not include any recycling processes. Tung-sten recycling rate in China is significantly lower compared to the global rate (10-24 %) (Furberg et al. 2019).
Furberg, A., Arvidsson, R., Molander, S., 2019. Environmental life cycle assessment of cemented carbide (WC-Co) production. J. Clean. Prod. 209, 1126–1138. https://doi.org/10.1016/j.jclepro.2018.10.272
Lassner, E., Schubert, W.-D., Lüderitz, E., Wolf, H.U., 2000. Tungsten, Tungsten Alloys, and Tungsten Compounds. In 'Ullmann’s Encyclopedia of Industrial Chemistry'. Wiley-VCH Verlag GmbH & Co. KGaA, Weinheim, Germany, pp. 1–53. https://doi.org/10.1002/14356007.a27_22
Ma, X., Qi, C., Ye, L., Yang, D., Hong, J., 2017. Life cycle assessment of tungsten carbide powder production: A case study in China. J. Clean. Prod. 149, 936–944. https://doi.org/10.1016/j.jclepro.2017.02.184

## Included activities start
The activity starts when the raw material enters the process

## Included activities end
This activity ends with the production of 1 Kg APT.

## Geography
This dataset represents Chinese APT production using caustic autoclave-ion exchange (solid ion ex-change SIX). Chinese APT production makes up 67 % of global production.

The dataset is based on a published inventory by Ma et al. (2017) which represents tungsten mining and tungsten carbide sites located in Jiangsu (CN) and Jiangxi Province (CN), respectively. It is unclear how many productions sites were taken into account for this study.

## Technology
This dataset represents the production of APT using caustic autoclave-ion exchange (solid ion ex-change SIX). Digestion is performed with NaOH solution. A rough sodium tungstate (Na2WO4) solu-tion is obtained via filtration. After dilution of the Na2WO4 solution with water, ion exchange tech-nology is used to convert Na2WO4 to ammonium tungstate ((NH4)2WO4) and to remove impurities such as sodium, arsenic, silicon, vanadium and phosphorus. Tungsten is first adsorbed to the ion exchange resin and afterwards desorption takes place by washing the resin with ammonium chloride solution, ammonium hydroxide and deionized water. Subsequently, ammonium sulfide and a copper compound are used to remove molybdenum and other impurities. (Shen et al. 2019). APT production via the solid ion exchange technology causes the production of large amount of waste water with high salinity (Shen et al. 2019).
Shen, L., Li, X., Lindberg, D., Taskinen, P., 2019. Tungsten extractive metallurgy: A review of processes and their challenges for sustainability. Miner. Eng. 142. https://doi.org/10.1016/j.mineng.2019.105934

## Reference product
- ammonium paratungstate: 1 kg; name Amount_APT; source Ma X. 2017; By-product classification allocatable product; CPC 41601: Tungsten, molybdenum, tantalum, magnesium, cobalt, cadmium, titanium, zirconium, beryllium, gallium, hafnium, […]; CAS 11120-25-5
  production volume 6.2e7 kg; name PV_APT; = 62000*1000
    Liedtke and Schmidt (2014) report a Chinese APT production of 62.000 t in 2010. Chinese production makes up 67 % of global APT production.
  property tungsten content 0.718327; = (0.885*0.793)/0.977
    tungsten content on a dry matter basi. According to Ma et al. (2017) APT has a WO3 content of 0.885. The conversion factor from WO3 to W is 0.793
  property price 25.6 EUR2005; name Amount_APT_price_EUR2005
    Average price taken from www.alibaba.com, 2020-06-05
  properties: water in wet mass 0.023 kg, dry mass 0.977 kg, wet mass 1 kg, water content 0.0235415

## Inputs from technosphere
- sulfuric acid: 0.053 kg; source Ma X. 2017; lognormal variance with pedigree 0.0052, pedigree (2,4,3,1,1)
  Assumed to be used for the digestion of tungsten concentrate
  properties: wet mass 1 kg, dry mass 1 kg
- calcium carbonate, precipitated: 0.001 kg; source Ma X. 2017; lognormal variance with pedigree 0.0052, pedigree (2,4,3,1,1)
  properties: wet mass 1 kg, carbon content, fossil 0.120003, dry mass 1 kg
- ammonium chloride: 0.353 kg; source Ma X. 2017; lognormal variance with pedigree 0.0052, pedigree (2,4,3,1,1)
  Used for desorption of tungsten from the ion exchange resin
  properties: wet mass 1 kg, dry mass 1 kg
- wastewater from ammonium paratungstate production: -0.102863 m3; name Amount_WW; lognormal variance with pedigree 0.0066, pedigree (3,4,3,1,1)
  Amount adjusted in order to maintain mass balance.
  production volume 6.3775e6 m3; = PV_APT * ( Amount_WW/ Amount_APT)
    Calculated from production volume of reference product using the relative outputs.
  property price 0 EUR2005; name Amount_WW_price_EUR2005
  property tungsten content 1.12599; name Amount_WW_W_content; = 0.38/0.33748
  property carbon content, fossil 0.688834; name Amount_WW_C_content_fossil; = (0.537/2.31)/0.33748
  property carbon content, non-fossil 0; name Amount_WW_C_content_non_fossil
  properties: wet mass 1000 kg, dry mass 0.33748 kg, water content 2962.14
  note on tungsten content: tungsten content on a dry matter basis. Tungsten content in the wastewater is 0.38 kg/m3 (Cao et al., 2019).
  note on carbon content, fossil: fossil carbon content on a dry matter basis. Carbon content fossil was approximated with the TOC value. The TOC value was estimated based on the COD value (0.537 Kg/m3) with a conversion factor of 2.31 as documented in Tab 4.10 of the ecoinvent v2.2 report 13_IV. TOC was considered as Total Carbon.
- water, ultrapure: 2.10345 kg; source Ma X. 2017; lognormal variance with pedigree 0.0052, pedigree (2,4,3,1,1)
  properties: wet mass 1 kg
- sodium hydrosulfide: 0.00884 kg; = 0.17*0.052; source Ma X. 2017; lognormal variance with pedigree 0.0052, pedigree (2,4,3,1,1)
  Proxy used for (NH4)2S (17 %). Used to remove molybdenum and other impurities
  properties: dry mass 1 kg, wet mass 1 kg
- hazardous waste, for underground deposit: -0.698 kg; name Amount_hazardous_waste; source Ma X. 2017; lognormal variance with pedigree 0.0052, pedigree (2,4,3,1,1)
  production volume 4.3276e7 kg; = PV_APT * ( Amount_hazardous_waste / Amount_APT)
    Calculated from production volume of reference product using the relative outputs.
  property price 0 EUR2005; name Amount_hazardous_waste_price_EUR2005
  properties: wet mass 1 kg, dry mass 1 kg
- tap water: 100.767 kg; source Ma X. 2017; lognormal variance with pedigree 0.0052, pedigree (2,4,3,1,1)
  Used for dilution of the Na2WO4 solution
  properties: carbon content, fossil 0.00178991, wet mass 1 kg, dry mass 0.000337476 kg, water content 2962.17
  note on carbon content, fossil: Bicarbonate content is 2.93 mol/m3. CO2 content is 0.1 mol/m3 (ecoinvent v2.2 report 8, Tab 93.1).
- ammonia, anhydrous, liquid: 0.063 kg; source Ma X. 2017; lognormal variance with pedigree 0.0052, pedigree (2,4,3,1,1)
  properties: wet mass 1 kg, dry mass 1 kg
- tungsten concentrate: 1.621 kg; source Ma X. 2017; lognormal variance with pedigree 0.0052, pedigree (2,4,3,1,1)
  properties: wet mass 1 kg, dry mass 1 kg, carbon content, fossil 0.0146398, tungsten content 0.515
- hydrogen peroxide, without water, in 50% solution state: 0.001 kg; source Ma X. 2017; lognormal variance with pedigree 0.0052, pedigree (2,4,3,1,1)
  properties: wet mass 1 kg, heating value, net 7.13 MJ, dry mass 1 kg
- sodium hydroxide, without water, in 50% solution state: 0.526 kg; source Ma X. 2017; lognormal variance with pedigree 0.0052, pedigree (2,4,3,1,1)
  Used for NaOH digestion
  properties: heating value, net 3.03 MJ, dry mass 1 kg, wet mass 1 kg
- electricity, medium voltage: 0.641 kWh; source Ma X. 2017; lognormal variance with pedigree 0.0052, pedigree (2,4,3,1,1)
- heat, district or industrial, other than natural gas: 31.1542 MJ; = 1.078*28.9; source Ma X. 2017; lognormal variance with pedigree 0.0066, pedigree (3,4,3,1,1)
  Assumed to be used for internal Energy production. Represents the input of coal for heat production. Input of coal = 1.078 Kg, net calorific value of hard coal = 28.9 MJ/Kg.
  Weidema B P, Bauer C, Hischier R, Mutel C, Nemecek T, Reinhard J, Vadenbo C O,
  Wernet G. (2013). Overview and methodology. Data quality guideline for the ecoinvent
  database version 3. Ecoinvent Report 1(v3). St. Gallen: The ecoinvent Centre
  properties: corresponding fuel use, propane, furnace >100kW 1.05263 MJ, heating value, net 1 MJ
  note on corresponding fuel use, propane, furnace >100kW: Lower heating value of the fuel input related to the heat/electricity output, taken directly from ecoinvent v3.0 dataset "heat production, natural gas, at industrial furnace >100kW, GLO 2000".
- inert waste: -0.849239 kg; name Amount_inert_waste; lognormal variance with pedigree 0.0066, pedigree (3,4,3,1,1)
  Proxy for industrial solid waste.
  Amount adjusted in order to maintain mass balance.
  production volume 5.26528e7 kg; = PV_APT * ( Amount_inert_waste / Amount_APT)
    Calculated from production volume of reference product using the relative outputs.
  property price 0 EUR2005; name Amount_inert_waste_price_EUR2005
  properties: dry mass 1 kg, wet mass 1 kg, tungsten content 0.129379
  note on tungsten content: tungsten content on a dry matter basis. Amount adjusted to meet tungsten balance.
- non-ferrous metal smelter: 7.54717e-12 unit; = 1/((2650000*1000)*50); source Classen M. 2009; lognormal variance with pedigree 0.398, pedigree (4,5,5,5,4)
  Proxy: "non-ferrous metal smelter" is used as a proxy for unspecified infrastructure for APT production.Assumptions: Output=2650000 t/a, lifetime=50 a
- hydrochloric acid, without water, in 30% solution state: 0.00481 kg; = 0.013*0.37; source Ma X. 2017; lognormal variance with pedigree 0.0052, pedigree (2,4,3,1,1)
  Assumed to be used for the digestion of tungsten concentrate. 0.013 Kg of 37 % HCL
  properties: heating value, net 3.32 MJ, wet mass 1 kg, dry mass 1 kg
- copper sulfate: 0.02 kg; source Ma X. 2017; lognormal variance with pedigree 0.0052, pedigree (2,4,3,1,1)
  Used to remove molybdenum and other impurities
  properties: dry mass 1 kg, wet mass 1 kg
- municipal solid waste: -0.024 kg; name Amount_MSW; source Ma X. 2017; lognormal variance with pedigree 0.0052, pedigree (2,4,3,1,1)
  production volume 1.488e6 kg; = PV_APT * ( Amount_MSW / Amount_APT)
    Calculated from production volume of reference product using the relative outputs.
  property price 0 EUR2005; name Amount_MSW_price_EUR2005
  properties: wet mass 1 kg, heating value, net 11.74 MJ, water content 0.297017, dry mass 0.771 kg
  note on heating value, net: Value taken from the general comment of the treatment dataset.

## Emissions to nature
- Ammonia [air, non-urban air or from high stacks]: 0.1082 kg; source Furberg A.  2019; lognormal variance with pedigree 0.0986, pedigree (2,5,5,5,3)
  Emissions resulting from the crystallization of ammonium tungstate solution.

## Sampling procedure
Based on literature data:

Ma, X., Qi, C., Ye, L., Yang, D., Hong, J., 2017. Life cycle assessment of tungsten carbide powder production: A case study in China. J. Clean. Prod. 149, 936-944. https://doi.org/10.1016/j.jclepro.2017.02.184

## Extrapolations
This dataset has been extrapolated from year 2020 to the year of the calculation (2021). The uncertainty has been adjusted accordingly.
