# treatment of wastewater from hard fibreboard production, capacity 5E9l/year

Dataset: EcoSpold 2, unit process
Geography: RER
Time period: 2012-01-01 to 2021-12-31
Technology level: current
Classification: ISIC rev.4 ecoinvent: 3700:Sewerage
Classification: EcoSpold01Categories: waste management/wastewater treatment
Tags: Treatment
Scenario: Business-as-Usual
System model: Allocation, cut-off by classification
Generated by: Frank Werner
Database: ecoinvent
isCopyrightProtected: true
accessRestrictedTo: 1

## General comment
Wastewater purified in a medium size municipal wastewater treatment plant (capacity class 3), with an average capacity size of 24900 per-captia-equivalents PCE.
The treated waste water has the following composition (see sampling procedure for source):
Wastewater contains (in kg/m3): COD: 1.25 (GSD=122.5%); Ntot.: 0.00631 (GSD=122.5%); Ptot.: 0.00159 (GSD=122.5%);
[This dataset is meant to replace the following datasets:]

## Included activities end
Infrastructure materials for municipal wastewater treatment plant, transports, dismantling. Land use burdens.

## Geography
Specific to the technology mix encountered in Switzerland in 2000. Well applicable to modern treatment practices in Europe, North America or Japan.

## Technology
Three stage wastewater treatment (mechanical, biological, chemical) including sludge digestion (fermentation) according to the average technology in Switzerland

## Parameters
- fraction, process water, to air: 0.1 dimensionless; lognormal variance with pedigree 0.092025, pedigree (4,4,3,2,4)

## Reference product
- wastewater from hard fibreboard production: -1 m3; CPC 39920: Sewage sludge; By-product classification Waste
  production volume 8.67e6 m3; name p_board
    calculated from RER production volume times waste water/m3
  property price 0 EUR2005
    Waste products are assigned a price of zero as they are assumed to require further treatment.

## Inputs from technosphere
- electricity, low voltage: 0.0277 kWh; lognormal variance with pedigree 0.128, pedigree (1,1,4,1,1)
  EcoSpold01Location=CH
  direct wastewater treatment plant burden. Uncertainty calculated from wastewater composition and treatment model
- chromium oxide, flakes: 1.54e-8 kg; lognormal variance with pedigree 0.033, pedigree (1,1,4,1,1)
  properties: wet mass 1 kg, dry mass 1 kg
- chemical, inorganic: 1.487e-7 kg; lognormal variance with pedigree 0.118, pedigree (1,1,4,1,1)
  burden from sludge incineration. Uncertainty calculated from wastewater composition and treatment model
  EcoSpold01Location=GLO
  properties: dry mass 1 kg, wet mass 1 kg, carbon content, fossil 0.003
  note on carbon content, fossil: This dataset is an unweighted average of 20 inorganic substances (listed in Tab 88.1, ecoinvent v2.2 report 8, part II), being part of the top100 chemicals included in this database. The C-content has also been calculated as an unweighted average of the C content of the substances composing this dataset.
- titanium dioxide: 7.56e-7 kg; lognormal variance with pedigree 0.033, pedigree (1,1,4,1,1)
  properties: dry mass 1 kg, wet mass 1 kg
- residual material landfill: 0 unit; pedigree (1,1,1,1,1)
  EcoSpold01Location=CH
  burden from sludge incineration. Uncertainty calculated from wastewater composition and treatment model
- ammonia, anhydrous, liquid: 2.64e-5 kg; lognormal variance with pedigree 0.033, pedigree (1,1,4,1,1)
  properties: wet mass 1 kg, dry mass 1 kg
- process-specific burdens, residual material landfill: 0 kg; pedigree (1,1,1,1,1)
  (same comment as for residual material landfill)
- iron (III) chloride, without water, in 40% solution state: 0.0099 kg; lognormal variance with pedigree 0.033, pedigree (1,1,4,1,1)
  properties: wet mass 1 kg, dry mass 1 kg
- waste graphical paper: -0.0155 kg; name w_paper; lognormal variance with pedigree 0.008, pedigree (1,1,4,1,1)
  direct wastewater treatment plant burden. Uncertainty calculated from wastewater composition and treatment model
  EcoSpold01Location=CH
  production volume 134385 kg; = p_board*w_paper
    Calculated from the production volume of wastewater from particle board production in proportion to the respective output amounts.
  property price 0 EUR2005; name w_paper_price_EUR2005
  properties: water content 0.126126, carbon content, non-fossil 0.454955, wet mass 1 kg, dry mass 0.888 kg, heating value, net 14.12 MJ
  note on heating value, net: Value taken from the general comment of the treatment dataset.
- quicklime, milled, packed: 7.07e-7 kg; lognormal variance with pedigree 0.033, pedigree (1,1,4,1,1)
  properties: water content 0.010101, dry mass 0.99 kg, wet mass 1 kg
- cement, unspecified: 0 kg; pedigree (1,1,1,1,1)
  (same comment as for residual material landfill)
  properties: wet mass 1 kg, dry mass 1 kg
- sodium hydroxide, without water, in 50% solution state: 3.9e-6 kg; lognormal variance with pedigree 0.033, pedigree (1,1,4,1,1)
  properties: wet mass 1 kg, dry mass 1 kg, heating value, net 3.03 MJ
- waste plastic, mixture: -0.0155 kg; name w_plastic; lognormal variance with pedigree 0.008, pedigree (1,1,4,1,1)
  (same comment as for waste graphical paper)
  production volume 134385 kg; = p_board*w_plastic
    (same comment as for waste graphical paper)
  property price 0 EUR2005; name w_plastic_price_EUR2005
  properties: heating value, net 30.79 MJ, wet mass 1 kg, carbon content, fossil 0.747344, dry mass 0.847 kg, water content 0.180638
  note on carbon content, fossil: C content in 1 kg DM was calculated using data in Tab A.2, ecoinvent v2.2 report 13_I
- electricity, for reuse in municipal waste incineration only: 0 kWh; pedigree (1,1,1,1,1)
- heat, district or industrial, natural gas: 0.00257 MJ; lognormal variance with pedigree 0.0411, pedigree (4,2,4,1,1)
  properties: heating value, net 1 MJ
- heat, for reuse in municipal waste incineration only: 0 MJ; pedigree (1,1,1,1,1)
- sewer grid, 5E9l/year, 110 km: 2.178e-7 km; lognormal variance with pedigree 0.008, pedigree (1,1,4,1,1)
  EcoSpold01Location=CH
  uncertainty heeded in exchanges of the module
- wastewater treatment facility, capacity 5E9l/year: 5.6882e-9 unit; lognormal variance with pedigree 0.008, pedigree (1,1,4,1,1)
  EcoSpold01Location=CH
  uncertainty heeded in exchanges of the module
- slag landfill: 2.01e-11 unit; lognormal variance with pedigree 0.038, pedigree (1,1,4,1,1)
  burden from sludge incineration. Uncertainty calculated from wastewater composition and treatment model
  EcoSpold01Location=CH
- hydrochloric acid, without water, in 30% solution state: 8.92e-8 kg; lognormal variance with pedigree 0.118, pedigree (1,1,4,1,1)
  EcoSpold01Location=RER
  burden from sludge incineration. Uncertainty calculated from wastewater composition and treatment model
  properties: dry mass 1 kg, heating value, net 3.32 MJ, wet mass 1 kg
- process-specific burdens, municipal waste incineration: 0 kg; pedigree (1,1,1,1,1)
  (same comment as for residual material landfill)
- municipal waste incineration facility: 1.696e-10 unit; lognormal variance with pedigree 0.018, pedigree (1,1,4,1,1)
  (same comment as for slag landfill)
- waste cement, hydrated: 0 kg; name w_cement; pedigree (1,1,1,1,1)
  (same comment as for residual material landfill)
  production volume 0 kg
    (same comment as for waste graphical paper)
  property price 0 EUR2005; name w_cement_price_EUR2005
  properties: wet mass 1 kg, dry mass 1 kg
- aluminium sulfate, powder: 0.0019 kg; lognormal variance with pedigree 0.033, pedigree (1,1,4,1,1)
  properties: wet mass 1 kg, dry mass 1 kg
- process-specific burdens, slag landfill: 0 kg; pedigree (1,1,1,1,1)
  (same comment as for slag landfill)
- iron sulfate: 0.0072 kg; lognormal variance with pedigree 0.033, pedigree (1,1,4,1,1)
  properties: wet mass 1 kg, dry mass 1 kg
- process-specific burdens, residual material landfill: 0.00166989, 5.01091e-5 kg (2 entries); lognormal variance with pedigree 0.038, pedigree (1,1,4,1,1)
  (same comment as for residual material landfill)
- cement, unspecified: 6.77121e-8, 1.16789e-9 kg (2 entries); lognormal variance with pedigree 0.048, pedigree (1,1,4,1,1)
  (same comment as for residual material landfill)
- electricity, for reuse in municipal waste incineration only: 0.000107162, 0.000734822, 0.00199933, 0.0259178, 4.28646e-5, 0.00630722, 0.00444261, 0.000358226, 0.0103457, 0.000584796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 kWh (20 entries); lognormal variance with pedigree 0.033, pedigree (1,1,4,1,1)
- heat, for reuse in municipal waste incineration only: 0.000321267, 0.00220297, 0.00599393, 0.0777007, 0.271003, 0.0189089, 0.0133188, 0.00107395, 0.031016, 0.0017532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 MJ (20 entries); lognormal variance with pedigree 0.033, pedigree (1,1,4,1,1)
- process-specific burdens, municipal waste incineration: 0.658248, 0.0197523 kg (2 entries); lognormal variance with pedigree 0.018, pedigree (1,1,4,1,1)
  (same comment as for residual material landfill)
- waste cement, hydrated: -0.00166989, -5.01091e-5 kg (2 entries); lognormal variance with pedigree 0.05, pedigree (1,1,4,5,1)
  (same comment as for residual material landfill)
  production volume 14912.4 kg
- process-specific burdens, slag landfill: 0.0109999, 0.000330079 kg (2 entries); lognormal variance with pedigree 0.038, pedigree (1,1,4,1,1)
  (same comment as for slag landfill)

## Emissions to nature
- Iron, ion [water, ground-, long-term]: 0.0028 kg; lognormal variance with pedigree 0.158, pedigree (1,1,4,1,1)
- Ammonium, ion [water, surface water]: 0.00248 kg; lognormal variance with pedigree 0.158, pedigree (1,1,4,1,1)
- Phosphate [water, ground-, long-term]: 0.000121 kg; lognormal variance with pedigree 0.158, pedigree (1,1,4,1,1)
- DOC, Dissolved Organic Carbon [water, surface water]: 0.0606 kg; lognormal variance with pedigree 0.008, pedigree (1,1,4,1,1)
  sewer overload discharge plus direct wastewater treatment plant emission plus emission from sludge incineration. Uncertainty calculated from wastewater composition and treatment model
- Nitrate [water, ground-, long-term]: 1.88e-5 kg; lognormal variance with pedigree 0.158, pedigree (1,1,4,1,1)
- BOD5, Biological Oxygen Demand [water, ground-, long-term]: 0.00114 kg; lognormal variance with pedigree 0.158, pedigree (1,1,4,1,1)
  emission from sludge incineration. Uncertainty calculated from wastewater composition and treatment model
- Aluminium [water, surface water]: 2.56e-8 kg; lognormal variance with pedigree 0.158, pedigree (1,1,4,1,1)
- Carbon dioxide, non-fossil [air, urban air close to ground]: 1.678 kg; lognormal variance with pedigree 0.068, pedigree (1,1,4,1,1)
  direct wastewater treatment plant emission plus direct digester gas emission plus emission from sludge incineration. Uncertainty calculated from wastewater composition and treatment model
- Iron, ion [water, surface water]: 2.07e-6 kg; lognormal variance with pedigree 0.158, pedigree (1,1,4,1,1)
- NMVOC, non-methane volatile organic compounds, unspecified origin [air, urban air close to ground]: 1.87e-5 kg; lognormal variance with pedigree 0.298, pedigree (1,1,4,1,1)
  direct digester gas emission. Uncertainty calculated from wastewater composition and treatment model
- Chloride [water, surface water]: 0.00646 kg; lognormal variance with pedigree 0.158, pedigree (1,1,4,1,1)
- BOD5, Biological Oxygen Demand [water, surface water]: 0.07955 kg; lognormal variance with pedigree 0.098, pedigree (1,1,4,1,1)
  (same comment as for DOC, Dissolved Organic Carbon)
- Phosphate [water, surface water]: 0.00164 kg; lognormal variance with pedigree 0.19, pedigree (1,1,5,1,1)
- Carbon monoxide, non-fossil [air, urban air close to ground]: 0.00135 kg; lognormal variance with pedigree 0.198, pedigree (1,1,4,1,1)
  direct digester gas emission plus emission from sludge incineration. Uncertainty calculated from wastewater composition and treatment model
- Nitrite [water, surface water]: 0.0001448 kg; lognormal variance with pedigree 0.158, pedigree (1,1,4,1,1)
- TOC, Total Organic Carbon [water, surface water]: 0.0649 kg; lognormal variance with pedigree 0.088, pedigree (1,1,4,1,1)
  (same comment as for DOC, Dissolved Organic Carbon)
- Sulfate [water, surface water]: 0.0062 kg; lognormal variance with pedigree 0.158, pedigree (1,1,4,1,1)
- COD, Chemical Oxygen Demand [water, ground-, long-term]: 0.0035 kg; lognormal variance with pedigree 0.158, pedigree (1,1,4,1,1)
  (same comment as for BOD5, Biological Oxygen Demand)
- Aluminium [air, urban air close to ground]: 4.81e-7 kg; lognormal variance with pedigree 0.158, pedigree (1,1,4,1,1)
- DOC, Dissolved Organic Carbon [water, ground-, long-term]: 0.00138 kg; lognormal variance with pedigree 0.158, pedigree (1,1,4,1,1)
  (same comment as for BOD5, Biological Oxygen Demand)
- Iron [air, urban air close to ground]: 2.01e-7 kg; lognormal variance with pedigree 0.158, pedigree (1,1,4,1,1)
- COD, Chemical Oxygen Demand [water, surface water]: 0.2422 kg; lognormal variance with pedigree 0.158, pedigree (1,1,4,1,1)
  (same comment as for DOC, Dissolved Organic Carbon)
- Phosphorus [air, urban air close to ground]: 1.03e-6 kg; lognormal variance with pedigree 0.158, pedigree (1,1,4,1,1)
- Methane, non-fossil [air, urban air close to ground]: 0.00412 kg; lognormal variance with pedigree 0.178, pedigree (1,1,4,1,1)
  (same comment as for Carbon monoxide, non-fossil)
- Cyanide [air, urban air close to ground]: 4.71e-7 kg; lognormal variance with pedigree 0.158, pedigree (1,1,4,1,1)
- TOC, Total Organic Carbon [water, ground-, long-term]: 0.00138 kg; lognormal variance with pedigree 0.158, pedigree (1,1,4,1,1)
  (same comment as for BOD5, Biological Oxygen Demand)
- Dinitrogen monoxide [air, urban air close to ground]: 3.128e-5 kg; lognormal variance with pedigree 0.158, pedigree (1,1,4,1,1)
- Water [water, unspecified]: 0.9 m3; lognormal variance with pedigree 0.0487, pedigree (2,2,4,1,1)
  Calculated value based on water balance.
  property dry mass 0 kg; name DM
  property water in wet mass 1000 kg; name WWM
  property carbon content, fossil 0; name C_content_fossil
  property carbon content, non-fossil 0; name C_content_non_fossil
  property wet mass 1000 kg; name WM
- Ammonia [air, urban air close to ground]: 1.67e-5 kg; lognormal variance with pedigree 0.158, pedigree (1,1,4,1,1)
- Water [air, unspecified]: 0.1 m3; lognormal variance with pedigree 0.0487, pedigree (2,2,4,1,1)
  Calculated value based on water balance.
- Nitrogen oxides [air, urban air close to ground]: 0.000163 kg; lognormal variance with pedigree 0.158, pedigree (1,1,4,1,1)
- Nitrogen [water, surface water]: 0.00011 kg; lognormal variance with pedigree 0.158, pedigree (1,1,4,1,1)
- Aluminium [water, ground-, long-term]: 0.0002277 kg; lognormal variance with pedigree 0.158, pedigree (1,1,4,1,1)
- Nitrate [water, surface water]: 0.0108 kg; lognormal variance with pedigree 0.158, pedigree (1,1,4,1,1)

## Sampling procedure
Survey among member companies of the European Panel Federation; generation of dataset with ecoinvent 2.0 tool for treatment of wastewater

## Extrapolations
This dataset has been extrapolated from year 2012 to the year of the calculation (2021). The uncertainty has been adjusted accordingly.
