# barley production, organic

Dataset: EcoSpold 2, unit process
Geography: CH
Time period: 1996-01-01 to 2021-12-31
Technology level: current
Classification: ISIC rev.4 ecoinvent: 0111:Growing of cereals (except rice), leguminous crops and oil seeds
Synonyms: Hordeum vulgare L.
Tags: ConvertedDataset
Scenario: Business-as-Usual
System model: Allocation, cut-off by classification
Share of production covered: 71 %
Generated by: Thomas Nemecek
Published in: Nemecek, T. 2007
Database: ecoinvent
isCopyrightProtected: true
accessRestrictedTo: 1

## General comment
This dataset represents the cultivation of barley on an area of 1 ha producing the co-products barley grain and straw. The yield of barley grain is 4153 kg/ha at a moisture content at storage of 15%, the yield of straw is 4499 kg/ha at a moisture content of 15%.
[This dataset was already contained in the ecoinvent database version 2. It was not individually updated during the transfer to ecoinvent version 3. Life Cycle Impact Assessment results may still have changed, as they are affected by changes in the supply chain, i.e. in other datasets. This dataset was generated following the ecoinvent quality guidelines for version 2. It may have been subject to central changes described in the ecoinvent version 3 change report (http://www.ecoinvent.org/database/ecoinvent-version-3/reports-of-changes/), and the results of the central updates were reviewed extensively. The changes added e.g. consistent water flows and other information throughout the database. The documentation of this dataset can be found in the ecoinvent reports of version 2, which are still available via the ecoinvent website. The change report linked above covers all central changes that were made during the conversion process.]

## Included activities start
This activity starts after the harvest of the previous crop. The input of seeds is considered. Farm manure as an organic fertiliser is only accounted for in terms of direct field emissions; all pre-processes are included in the animal production systems.

## Included activities end
The dataset includes all machine operations and corresponding machine infrastructure and sheds. Machine operations are: soil cultivation, sowing, fertilisation, weed control, combine-harvest, transport from field to regional processing centre (10 km) and drying of grains. Further, direct field emissions are included. This activity ends after drying of grains at the regional processing centre.

## Geography
Refers to an average production in the Swiss lowlands.

## Technology
Organic production

## Time period
The yield data have been collected for the years 1996-2003.

## Parameters
- fraction, irrigation water, to air: 0.3353 dimensionless; name fraction_IW_to_air; lognormal variance with pedigree 0.0409, pedigree (2,2,2,1,1)
  Literature value (Siebert, 2010) (Vionnet, S., Quantis Water Database - Technical Report, 2012).
- fraction, irrigation water, to ground water: 0.8 dimensionless; name fraction_IW_to_ground_water; lognormal variance with pedigree 0.0886, pedigree (4,3,1,1,4)
  Literature value (Döll, 2011) cross referenced with expert opinion.
- fraction, irrigation water to surface water: 0.2 dimensionless; name fraction_IW_to_surface_water; lognormal variance with pedigree 0.0886, pedigree (4,3,1,1,4)
  Literature value (Döll, 2011) cross referenced with expert opinion.

## Reference product
- barley grain, organic: 1 kg; name REF_PRODUCT; CPC 01152: Barley, other; By-product classification allocatable product
  production volume 3.28502e6 kg
    CH prod of barley: 257400t in 2004. % repr ref to fract of tot area in lowlands
    791 ha (Willer H, Yussefi M (Eds.) (2010). The World of Organic Agriculture. Statistics and Emerging Trends 2007. FiBL, IFOAM.) ; 4153 kg/ha
  property water content 0.176471; name REF_PRODUCT_water_content; = (1-REF_PRODUCT_DM)/REF_PRODUCT_DM
  property carbon content, non-fossil 0.46538; name REF_PRODUCT_C_content_non_fossil
    biogene carbon content on a dry matter basis
    Composition data obtained from Barley hulled, in (http://www.nal.usda.gov/fnic/foodcomp/search/). First, composition data were refered to 1 kg dry mass. Then, C-contents were calculated considering a C-content/dry mass of 46% in carbohydrates (including fibres), 53% in proteins and 75% in fats. All data from 'Evolutionary and Biochemical Aspects', A.D. Kay and T. Vrede (in Global Ecology, 2010, Elsevier B.V., S.E. Jørgensen Ed.).
  property water in wet mass 0.15 kg; name REF_PRODUCT_WWM; = 1-REF_PRODUCT_DM
  property dry mass 0.85 kg; name REF_PRODUCT_DM
  property carbon content, fossil 0; name REF_PRODUCT_C_content_fossil
    fossil carbon content on a dry matter basis
  property price 0.152 EUR2005; name REF_PRODUCT_price_EUR2005
    Temporary price data. Calculated as 90% of purchasers price based on: Assumed 30% premium price for organic produce on 2004 prices for World import/export data (tonnes and US$) from FaoStat statistics (http://faostat.fao.org/site/535/default.aspx#ancor, TRADE)- [Accessed 24 May 2010].
  property wet mass 1 kg; name REF_PRODUCT_WM
  property energy content 15.402 MJ
    See chapter 'Product Properties' in '01_crop production - yields & inputs CH & Europe_v1.0.pdf', section 'AGRICULTURAL PRODUCTION IN SWITZERLAND' - pdf-document on the dedicated talk page of ecoinvent (www.ecoinvent.org/documentation)
  property carbon content 0.46538
    carbon content on a dry matter basis (reserved; not for manual entry)
  property true value 631.21; name REF_PRODUCT_true_value
    allocation property applied in "true value" allocation // value calculated from revenue
  properties: carbon allocation 0.395573 kg

## By-products
- straw, organic: 0 kg; name BY_PRODUCT; CPC 01913: Cereal straw, husks, unprepared, ground, pressed, or in the form of pellets; By-product classification allocatable product
  production volume 2.31288e6 kg
    CH prod of barley: 257400t in 2004. % repr ref to fract of tot area in lowlands
    791 ha (Willer H, Yussefi M (Eds.) (2010). The World of Organic Agriculture. Statistics and Emerging Trends 2007. FiBL, IFOAM.) ; 2924 kg/ha
  property dry mass 0.85 kg; name BY_PRODUCT_DM
  property heating value, net 14.25 MJ
    Literature value, Source: Phyllis2, database for (treated) biomass, algae, feedstocks for biogas production and biochar, https://phyllis.nl/Biomass/View/1271, ECN.TNO
  property water in wet mass 0.15 kg; name BY_PRODUCT_WWM; = 1-BY_PRODUCT_DM
  property carbon content, fossil 0; name BY_PRODUCT_C_content_fossil
    fossil carbon content on a dry matter basis
  property carbon content, non-fossil 0.437377; name BY_PRODUCT_C_content_non_fossil
    biogene carbon content on a dry matter basis
    Composition data obtained as the average of those of Rye straw (http://beefmagazine.com/images/2009%20feed%20table.pdf), and Barley straw and Wheat straw (http://www.uwex.edu/ces/crops/uwforage/StrawFOF.pdf). First, composition data were refered to 1 kg dry mass. Then, C-contents were calculated considering a C-content/dry mass of 46% in carbohydrates (including fibres), 53% in proteins and 75% in fats. All data from 'Evolutionary and Biochemical Aspects', A.D. Kay and T. Vrede (in Global Ecology, 2010, Elsevier B.V., S.E. Jørgensen Ed.).
  property water content 0.176471; name BY_PRODUCT_water_content; = (1-BY_PRODUCT_DM)/BY_PRODUCT_DM
  property wet mass 1 kg; name BY_PRODUCT_WM
  property energy content 17.459 MJ
    (same comment as for barley grain, organic)
  property price 0.015 EUR2005; name BY_PRODUCT_price_EUR2005
    Temporary price data. Calculated as 90% of purchasers price based on: Based on price allocation ratio from EcoInvent v2 report number 17, page 118.
  property carbon content 0.437377
    carbon content on a dry matter basis (reserved; not for manual entry)
  property true value 43.863; name BY_PRODUCT_true_value
    allocation property applied in "true value" allocation // value calculated from revenue
  properties: carbon allocation 0.37177 kg

## Inputs from technosphere
- combine harvesting: 0.000225161 ha; lognormal variance with pedigree 0.0406, pedigree (2,1,5,1,1)
  See chapter 'Yields and Inputs of Arable Crop Production' in '01_crop production - yields & inputs CH & Europe_v1.0.pdf', section 'AGRICULTURAL PRODUCTION IN SWITZERLAND' - pdf-document on the dedicated talk page of ecoinvent (www.ecoinvent.org/documentation)
  This exchange has an activity link directly to the producing activity because the product is primarily consumed in the same geographical area where it is produced.
- barley seed, organic, for sowing: 0.0315225 kg; name SEED; lognormal variance with pedigree 0.0406, pedigree (2,1,5,1,1)
  See chapter 'Yields and Inputs of Arable Crop Production' in '01_crop production - yields & inputs CH & Europe_v1.0.pdf', section 'AGRICULTURAL PRODUCTION IN SWITZERLAND' - pdf-document on the dedicated talk page of ecoinvent (www.ecoinvent.org/documentation)
  See chapter 'Yields and Inputs of Arable Crop Production' in '01_crop production - yields & inputs CH & Europe_v1.0.pdf', section 'AGRICULTURAL PRODUCTION IN SWITZERLAND' - pdf-document on the dedicated talk page of ecoinvent (www.ecoinvent.org/documentation)
  property carbon content, non-fossil 0.46538; name SEED_C_content_non_fossil
  property energy content 15.402 MJ; name SEED_energy_content
  property dry mass 0.85 kg; name SEED_DM
  properties: water content 0.176471, wet mass 1 kg
  note on carbon content, non-fossil: biogene carbon content on a dry matter basis Composition data obtained from Barley hulled, in (http://www.nal.usda.gov/fnic/foodcomp/search/). First, composition data were refered to 1 kg dry mass. Then, C-contents were calculated considering a C-content/dry mass of 46% in carbohydrates (including fibres), 53% in proteins and 75% in fats. All data from 'Evolutionary and Biochemical Aspects', A.D. Kay and T. Vrede (in Global Ecology, 2010, Elsevier B.V., S.E. Jørgensen Ed.).
  note on energy content: See chapter 'Product Properties' in '01_crop production - yields & inputs CH & Europe_v1.0.pdf', section 'AGRICULTURAL PRODUCTION IN SWITZERLAND' - pdf-document on the dedicated talk page of ecoinvent (www.ecoinvent.org/documentation)
- baling: 0.000946486 unit; lognormal variance with pedigree 0.0406, pedigree (2,1,5,1,1)
  (same comment as for combine harvesting)
- tillage, cultivating, chiselling: 0.000225161 ha; lognormal variance with pedigree 0.0406, pedigree (2,1,5,1,1)
  (same comment as for combine harvesting)
- transport, tractor and trailer, agricultural: 0.0094617 metric ton*km; lognormal variance with pedigree 0.0406, pedigree (2,1,5,1,1)
  (same comment as for barley seed, organic, for sowing)
- liquid manure spreading, by vacuum tanker: 0.00884229 m3; lognormal variance with pedigree 0.0406, pedigree (2,1,5,1,1)
  (same comment as for combine harvesting)
- irrigation: 0.113169 m3; name water_irrigation_input; source Siebert, S. 2010; lognormal variance with pedigree 0.0427, pedigree (2,2,5,1,1)
  Calculated based on literature values (Döll, 2010) and partially modelled at ETH (Pfister, S.).
  property carbon content, fossil 0; name C_content_fossil
  property carbon content, non-fossil 0; name C_content_non_fossil
  property dry mass 0.11 kg; name DM
  property water content 9089.91; name water_content
  property wet mass 1000 kg; name WM
  property water in wet mass 999.89 kg; name WWM
- sowing: 0.000225161 ha; lognormal variance with pedigree 0.0406, pedigree (2,1,5,1,1)
  (same comment as for combine harvesting)
- drying of feed grain: 0.0111313 l; lognormal variance with pedigree 0.0406, pedigree (2,1,5,1,1)
  (same comment as for combine harvesting)
- solid manure loading and spreading, by hydraulic loader and spreader: 1.09048 kg; lognormal variance with pedigree 0.0406, pedigree (2,1,5,1,1)
  (same comment as for combine harvesting)
- tillage, currying, by weeder: 0.000675482 ha; lognormal variance with pedigree 0.0406, pedigree (2,1,5,1,1)
  (same comment as for combine harvesting)
- tillage, harrowing, by spring tine harrow: 0.000450321 ha; lognormal variance with pedigree 0.0406, pedigree (2,1,5,1,1)
  (same comment as for combine harvesting)
- tillage, ploughing: 0.000225161 ha; lognormal variance with pedigree 0.0406, pedigree (2,1,5,1,1)
  (same comment as for combine harvesting)
- bale loading: 0.00411504 unit; lognormal variance with pedigree 0.0406, pedigree (2,1,5,1,1)
  (same comment as for combine harvesting)

## Inputs from nature
- Transformation, to annual crop, non-irrigated, extensive [natural resource, land]: 2.25161 m2; lognormal variance with pedigree 0.0506, pedigree (2,1,5,1,1)
  Modelled, see chapter 'Land use' in '01_crop production_direct field emissions and natural resources_v1.0.pdf' - pdf-document on the dedicated talk page of ecoinvent (www.ecoinvent.org/documentation)
- Occupation, annual crop, non-irrigated, extensive [natural resource, land]: 1.84506 m2*year; lognormal variance with pedigree 0.0406, pedigree (2,1,5,1,1)
  (same comment as for Transformation, to annual crop, non-irrigated, extensive)
- Carbon dioxide, in air [natural resource, in air]: 2.208 kg; = 44/12 * (REF_PRODUCT_C_content_non_fossil * REF_PRODUCT * REF_PRODUCT_DM + BY_PRODUCT_C_content_non_fossil * BY_PRODUCT * BY_PRODUCT_DM - SEED_C_content_non_fossil * SEED * SEED_DM); lognormal variance with pedigree 0.0406, pedigree (2,1,5,1,1)
  Modelled,see chapter 'CO2 binding' in '01_crop production_direct field emissions and natural resources_v1.0.pdf' - pdf-document on the dedicated talk page of ecoinvent (www.ecoinvent.org/documentation)
- Transformation, from pasture, man made, intensive [natural resource, land]: 0.652966 m2; lognormal variance with pedigree 0.0506, pedigree (2,1,5,1,1)
  (same comment as for Transformation, to annual crop, non-irrigated, extensive)
- Energy, gross calorific value, in biomass [natural resource, biotic]: 25.4116 MJ; lognormal variance with pedigree 0.0411891, pedigree (2,1,5,1,1)
- Transformation, from annual crop, non-irrigated, extensive [natural resource, land]: 1.59864 m2; lognormal variance with pedigree 0.0506, pedigree (2,1,5,1,1)
  (same comment as for Transformation, to annual crop, non-irrigated, extensive)

## Emissions to nature
- Copper [soil, agricultural]: 2.11849e-5 kg; lognormal variance with pedigree 0.0807, pedigree (2,2,5,1,1)
  Modelled, see chapter 'Emissions of heavy metals to agricultural soil, surface water and ground water' in '01_crop production_direct field emissions and natural resources_v1.0.pdf' - pdf-document on the dedicated talk page of ecoinvent (www.ecoinvent.org/documentation)
- Nitrogen oxides [air, non-urban air or from high stacks]: 0.000133813 kg; = 0.21 * N2O; lognormal variance with pedigree 0.0707, pedigree (2,2,5,1,1)
  Modelled, see chapter 'Emissions of NOx to the air' in '01_crop production_direct field emissions and natural resources_v1.0.pdf' - pdf-document on the dedicated talk page of ecoinvent (www.ecoinvent.org/documentation)
- Phosphate [water, ground-]: 4.97853e-5 kg; lognormal variance with pedigree 0.0807, pedigree (2,2,5,1,1)
  Modelled, see chapter 'Emissions of phosphorous to the water' in '01_crop production_direct field emissions and natural resources_v1.0.pdf' - pdf-document on the dedicated talk page of ecoinvent (www.ecoinvent.org/documentation)
- Lead [water, ground-]: 4.11301e-8 kg; lognormal variance with pedigree 0.1307, pedigree (2,2,5,1,1)
  (same comment as for Copper)
- Zinc, ion [water, surface water]: 1.2627e-6 kg; lognormal variance with pedigree 0.1307, pedigree (2,2,5,1,1)
  (same comment as for Copper)
- Lead [water, surface water]: 1.71496e-7 kg; lognormal variance with pedigree 0.1307, pedigree (2,2,5,1,1)
  (same comment as for Copper)
- Nickel [soil, agricultural]: 2.11045e-6 kg; lognormal variance with pedigree 0.0807, pedigree (2,2,5,1,1)
  (same comment as for Copper)
- Nitrate [water, ground-]: 0.073551 kg; lognormal variance with pedigree 0.0807, pedigree (2,2,5,1,1)
  Modelled with the 'SALCA-NO3 model' described in '01_crop production_direct field emissions and natural resources_v1.0.pdf' - pdf-document on the dedicated talk page of ecoinvent (www.ecoinvent.org/documentation)
- Copper, ion [water, ground-]: 7.95065e-7 kg; lognormal variance with pedigree 0.1307, pedigree (2,2,5,1,1)
  (same comment as for Copper)
- Chromium, ion [water, ground-]: 3.58298e-6 kg; lognormal variance with pedigree 0.1307, pedigree (2,2,5,1,1)
  (same comment as for Copper)
- Chromium [soil, agricultural]: -1.90236e-6 kg
  (same comment as for Copper)
- Copper, ion [water, surface water]: 5.69521e-7 kg; lognormal variance with pedigree 0.1307, pedigree (2,2,5,1,1)
  (same comment as for Copper)
- Mercury [soil, agricultural]: 2.60691e-7 kg; lognormal variance with pedigree 0.0807, pedigree (2,2,5,1,1)
  (same comment as for Copper)
- Phosphate [water, surface water]: 0.000232433 kg; lognormal variance with pedigree 0.0807, pedigree (2,2,5,1,1)
  (same comment as for Phosphate)
- Mercury [water, ground-]: 2.44074e-9 kg; lognormal variance with pedigree 0.1307, pedigree (2,2,5,1,1)
  (same comment as for Copper)
- Cadmium, ion [water, ground-]: 4.41157e-9 kg; lognormal variance with pedigree 0.1307, pedigree (2,2,5,1,1)
  (same comment as for Copper)
- Chromium, ion [water, surface water]: 5.22553e-7 kg; lognormal variance with pedigree 0.1307, pedigree (2,2,5,1,1)
  (same comment as for Copper)
- Ammonia [air, non-urban air or from high stacks]: 0.00540381 kg; lognormal variance with pedigree 0.0507, pedigree (2,2,5,1,1)
  Modelled with the 'AGRAMMON model' described in '01_crop production_direct field emissions and natural resources_v1.0.pdf' - pdf-document on the dedicated talk page of ecoinvent (www.ecoinvent.org/documentation)
- Phosphorus [water, surface water]: 2.74426e-5 kg; lognormal variance with pedigree 0.0807, pedigree (2,2,5,1,1)
  (same comment as for Phosphate)
- Cadmium [soil, agricultural]: 6.30427e-8 kg; lognormal variance with pedigree 0.0807, pedigree (2,2,5,1,1)
  (same comment as for Copper)
- Cadmium, ion [water, surface water]: 2.71656e-9 kg; lognormal variance with pedigree 0.1307, pedigree (2,2,5,1,1)
  (same comment as for Copper)
- Dinitrogen monoxide [air, non-urban air or from high stacks]: 0.000637205 kg; name N2O; lognormal variance with pedigree 0.0707, pedigree (2,2,5,1,1)
  Modelled, see chapter 'Emissions of N2O to the air' in '01_crop production_direct field emissions and natural resources_v1.0.pdf' - pdf-document on the dedicated talk page of ecoinvent (www.ecoinvent.org/documentation)
- Water [water, ground-]: 0.0601789 m3; name water_to_water_ground; = water_irrigation_input*(1-fraction_IW_to_air)*fraction_IW_to_ground_water; lognormal variance with pedigree 0.1286, pedigree (4,3,5,1,4)
  Calculated value. See the parameters and their comments to understand the calculation.
  property fraction, origin: salt water 0; name fraction_origin_salt_water_Wgw
  property fraction, origin: fresh water 1; name fraction_origin_fresh_water_Wgw
  property fraction, origin: unspecified 0; name fraction_origin_unspecified_Wgw
- Lead [soil, agricultural]: 1.51326e-6 kg; lognormal variance with pedigree 0.0807, pedigree (2,2,5,1,1)
  (same comment as for Copper)
- Water [water, surface water]: 0.0150447 m3; name water_to_water_surface; = water_irrigation_input*(1-fraction_IW_to_air)*fraction_IW_to_surface_water; lognormal variance with pedigree 0.1286, pedigree (4,3,5,1,4)
  Calculated value. See the parameters and their comments to understand the calculation.
  property fraction, origin: salt water 0; name fraction_origin_salt_water_Wsw
  property fraction, origin: fresh water 1; name fraction_origin_fresh_water_Wsw
- Mercury [water, surface water]: 2.02284e-9 kg; lognormal variance with pedigree 0.1307, pedigree (2,2,5,1,1)
  (same comment as for Copper)
- Water [air, unspecified]: 0.0379456 m3; name water_to_air_unspecified; = (water_irrigation_input*fraction_IW_to_air); lognormal variance with pedigree 0.0807, pedigree (2,2,5,1,1)
  Calculated value based on literature values and expert opinion. See comments in the parametres' comment field.
  property fraction, origin: salt water 0; name fraction_origin_salt_water
  property fraction, origin: fresh water 1; name fraction_origin_fresh_water
  property fraction, origin: unspecified 0; name fraction_origin_unspecified
- Zinc, ion [water, ground-]: 6.54812e-6 kg; lognormal variance with pedigree 0.1307, pedigree (2,2,5,1,1)
  (same comment as for Copper)
- Nickel, ion [water, surface water]: 4.66623e-7 kg; lognormal variance with pedigree 0.1307, pedigree (2,2,5,1,1)
  (same comment as for Copper)
- Zinc [soil, agricultural]: 0.000118031 kg; lognormal variance with pedigree 0.0807, pedigree (2,2,5,1,1)
  (same comment as for Copper)

## Sampling procedure
Data were compiled from statistics, pilot network, fertilising recommendations, documents from extension services, information provided by retailers and expert knowledge. The production data were verified and adjusted by a group of experts.

## Review by Hans-Jörg Althaus 2009-01-22
passed
none
