# lightweight concrete block production, polystyrene

Dataset: EcoSpold 2, unit process
Geography: RoW
Time period: 1995-01-01 to 2021-12-31
Technology level: current
Classification: ISIC rev.4 ecoinvent: 2399:Manufacture of other non-metallic mineral products n.e.c.
Classification: EcoSpold01Categories: construction materials/concrete
Tags: ConvertedDataset
Scenario: Business-as-Usual
System model: Allocation, cut-off by classification
Generated by: Daniel Kellenberger (obsolete)
Published in: Kellenberger D. 2004
Database: ecoinvent
isCopyrightProtected: true
accessRestrictedTo: 1

## General comment
Hardening is assumed to be by air-drying. It is assumed that there is wastewater and solid waste, but as no exact description on the composition of the wastewater and solid waste is available a proxy for each ("treatment, concrete production effluent, to wastewater treatment, class 3" and "disposal, municipal solid waste, 22.9% water, to municipal incineration") is used. The lifespan of the plant is assumed to be 50 years.
[This dataset was already contained in the ecoinvent database version 2. It was not individually updated during the transfer to ecoinvent version 3. Life Cycle Impact Assessment results may still have changed, as they are affected by changes in the supply chain, i.e. in other datasets. This dataset was generated following the ecoinvent quality guidelines for version 2. It may have been subject to central changes described in the ecoinvent version 3 change report (http://www.ecoinvent.org/database/ecoinvent-version-3/reports-of-changes/), and the results of the central updates were reviewed extensively. The changes added e.g. consistent water flows and other information throughout the database. The documentation of this dataset can be found in the ecoinvent reports of version 2, which are still available via the ecoinvent website. The change report linked above covers all central changes that were made during the conversion process.]

## Included activities end
includes the raw materials, their transport to the finishing plant, the air-drying, the packing, the infrastructure and the disposal of wastewater and some solid household (e.g. packing material) waste

## Geography
For some exchanges CH, RER and GLO modules have been used as proxy.

## Technology
The raw material mixture (aggregates, cement and water) of lightweight concrete blocks are poured into a mould then squeezed and finaly hardened by air (assumption for this study)

## Parameters
- fraction, tap water, to air: 0.15 dimensionless; name fraction_TW_to_air; lognormal variance with pedigree 0.092025, pedigree (4,4,3,2,4)
- fraction, process water, to air: 0.15 dimensionless; name fraction_PW_to_air; lognormal variance with pedigree 0.092025, pedigree (4,4,3,2,4)

## Reference product
- lightweight concrete block, polystyrene: 1 kg; CPC 379: Other non-metallic mineral products n.e.c.; By-product classification allocatable product
  EcoSpold01Location=CH
  production volume 3.96633 kg
    This is a placeholder value that does not reflect real-world production volumes. This dataset does not currently require a real-world production volume to work in the database framework, and no actual data were collected yet. This has no negative effect on the results of the ecoinvent database.
  property price 0.0775 EUR2005
    Data are not easily available. Therefore, an average price of products supplied by the activities in the same ISIC 3 code has been applied.This price is obtained as '_49 Concrete, asphalt and other mineral products, EU27 virgin, EU27' in the 'EU & DK Input Output Database' (available in SimaPro). The price is assumed to be valid for both RER2003, RER 2004, world 2003 and world 2004.
  property carbon content, fossil 0.0775385
    Tab & Fig 6.12, ecoinvent v2.2 report 7, part XXI. Polystyrene foam slab (0.084 kg/kg block). Chemical formula of polystyrene is (C8H8)n
  property carbon content, non-fossil 0
    (same comment as for lightweight concrete block, polystyrene)
  property heating value, net 38.67 MJ
    LHV is calculated based on the Carbon content of the product. More details can be found on the respective documentation.
  property carbon content 0.0775385
    carbon content on a dry matter basis (reserved; not for manual entry)
  properties: water content 0, wet mass 1 kg, dry mass 1 kg, water in wet mass 0 kg, carbon allocation 0.0775385 kg

## Inputs from technosphere
- diesel, burned in building machine: 0.0151 MJ; lognormal variance with pedigree 0.102, pedigree (3,5,5,5,1)
  EcoSpold01Location=GLO
  properties: heating value, net 1 MJ
- clay pit infrastructure: 1.67e-10 unit; lognormal variance with pedigree 0.692, pedigree (1,1,5,5,1)
  EcoSpold01Location=CH
  estimated
- packing, clay product: 1 kg; lognormal variance with pedigree 0.692, pedigree (1,1,5,5,1)
  EcoSpold01Location=CH
  estimated
- polystyrene foam slab: 0.084 kg; lognormal variance with pedigree 0.522, pedigree (1,1,5,5,1)
  estimation
  EcoSpold01Location=RER
  properties: carbon content, fossil 0.859091, dry mass 1 kg, wet mass 1 kg, heating value, net 38.67 MJ
  note on carbon content, fossil: XPS consists in 91% of polystyrene, 7% of blowing agent and the re-maining 2% are flame retardants (bromine compounds) and other additives (ecoinvent v2.2 report 7, part XIV, pg69). The chemical formula of polystyrene is (C8H8)n. Here, the blowing agent is CO2.
- municipal solid waste: 0 kg; pedigree (1,1,1,1,1)
  estimated
  EcoSpold01Location=CH
  production volume 0 kg
    Calculated from the production volume of lightweight concrete block, polystyrene in proportion to the respective output amounts.
  properties: heating value, net 11.74 MJ, water content 0.297017, carbon content, fossil 0.171549, dry mass 0.771 kg, wet mass 1 kg, carbon content, non-fossil 0.261655
  note on heating value, net: Value taken from the general comment of the treatment dataset.
  note on carbon content, fossil: MSW composition in tab 4.1, ecoinvent v2.2 report 13_I. C content referred to 1 kg DM
- electricity, medium voltage: 0 kWh; pedigree (1,1,1,1,1)
  EcoSpold01Location=UCTE
- tap water: 0 kg; name tap_water_input; source Dansk Teknologisk Institut 1995; pedigree (1,1,1,1,1)
  EcoSpold01Location=RER
  Calculated based on literature, (Vionnet, S., Quantis Water Database - Technical Report, 2012).
  properties: wet mass 1 kg, dry mass 0.000337476 kg, carbon content, fossil 0.00178991, water content 2962.17
  note on carbon content, fossil: Bicarbonate content is 2.93 mol/m3. CO2 content is 0.1 mol/m3 (ecoinvent v2.2 report 8, Tab 93.1).
- wastewater from concrete production: -8.33e-5 m3; lognormal variance with pedigree 0.692, pedigree (1,1,5,5,1)
  EcoSpold01Location=CH
  estimated
  production volume 0.0002499 m3
    (same comment as for municipal solid waste)
  properties: carbon content, fossil 0.027074, water content 2225.48, dry mass 0.449139 kg, wet mass 1000 kg
  note on carbon content, fossil: TOC =0.01216 kg/m3 (Tab A.20, ecoinvent v2.2 report 13_I). TOC was considered as Total Carbon.
- cement, Portland: 0 kg; pedigree (1,1,1,1,1)
  estimation
  EcoSpold01Location=CH
  properties: wet mass 1 kg, dry mass 1 kg
- municipal solid waste: -1.63082e-7, -4.10925e-8, -5.87236e-8, -9.39937e-6, -0.000115338 kg (5 entries); lognormal variance with pedigree 0.692, pedigree (1,1,5,5,1)
  estimated
  EcoSpold01Location=CH
  production volume 0.000375 kg
- electricity, medium voltage: 6.61153e-5, 1.26781e-5, 0.000291108, 0.000963808, 0.000212838, 0.00309554, 0.000436318, 0.00142159 kWh (8 entries); lognormal variance with pedigree 0.102, pedigree (3,5,5,5,1)
  EcoSpold01Location=UCTE
- tap water: 0.0104094, 0.00125301, 0.00207081, 0.445275, 0.0522175, 0.00135843, 0.00386402, 0.597552 kg (8 entries); source Dansk Teknologisk Institut 1995; lognormal variance with pedigree 0.0546, pedigree (3,3,5,5,1)
  (same comment as for tap water)
- cement, Portland: 0.00299982, 0.00438114, 0.0898842, 0.0930303, 0.00519902, 0.104085, 0.00426472, 0.612156 kg (8 entries); lognormal variance with pedigree 0.522, pedigree (1,1,5,5,1)
  estimation
  EcoSpold01Location=CH

## Emissions to nature
- Water [air, unspecified]: 0.0001671 m3; name water_to_air_unspecified; lognormal variance with pedigree 0.0827, pedigree (2,2,5,5,1)
  Calculated value based on literature values and expert opinion. See comments in the parametres' comment field.
  property fraction, origin: unspecified 0; name fraction_origin_unspecified
  property fraction, origin: salt water 0; name fraction_origin_salt_water
  property fraction, origin: fresh water 1; name fraction_origin_fresh_water
- Water [water, unspecified]: 0.0008636 m3; name water_to_water_unspecified; lognormal variance with pedigree 0.0827, pedigree (2,2,5,5,1)
  (same comment as for Water)
  property fraction, origin: fresh water 1; name fraction_origin_fresh_water_Ww
  property fraction, origin: unspecified 0; name fraction_origin_unspecified_Ww
  property water in wet mass 1000 kg; name WWM
  property carbon content, non-fossil 0; name C_content_non_fossil
  property wet mass 1000 kg; name WM
  property carbon content, fossil 0; name C_content_fossil
  property dry mass 0 kg; name DM
  property fraction, origin: salt water 0; name fraction_origin_salt_water_Ww

## Sampling procedure
Literature

## Extrapolations
See geography This dataset has been copied from an original dataset covering the geography CH. The uncertainty has been adjusted accordingly.

## Review by Roberto Dones 2005-07-19
passed
