# rare earth element mine operation and beneficiation, bastnaesite and monazite ore

Dataset: EcoSpold 2, unit process
Geography: CN-NM
Time period: 2017-01-01 to 2021-12-31
Technology level: current
Classification: ISIC rev.4 ecoinvent: 0729:Mining of other non-ferrous metal ores
Synonyms: REO; REE
Scenario: Business-as-Usual
System model: Allocation, cut-off by classification
Generated by: Efstathios Kakkos
Database: ecoinvent
isCopyrightProtected: true
accessRestrictedTo: 1

## General comment
This dataset refers to the mining (open pit mining) and beneficiation (two step beneficiation process including ball milling and magnetic separation) activities, in order to produce 1 kg of rare earth oxide (REO) concentrate, 50% beneficiated, from the extracted monazite and bastnaesite minerals in the Bayan obo mines. China is the top producer of Rare Earth metals in the world, being responsible for approximately 81.4% of the global production (Source: https://prd-wret.s3.us-west-2.amazonaws.com/assets/palladium/production/atoms/files/myb1-2017-raree.pdf).
This dataset is based on the Critical Materials Life Cycle Assessment Tool (CMLCAT), an excel based software that complements the publication of Arshi et al (2018) (reference 1), which contains the LCI data for each subprocess mentioned in the publication. The amounts of the byproducts iron concentrate and rare earth tailings were taken from the Wang et al (2020) publication (reference 2).
The produced rare earth concentrate will then undergo acid roasting, water leaching & chlorine conversion, solvent extraction and calcination in order to produce high purity individual lanthanum oxide, cerium oxide, neodymium oxide and a mixed samarium-europium gadolinium concentrate (outside of this system boundaries).

Reference 1: Arshi, P. S., Vahidi, E., & Zhao, F. (2018). Behind the Scenes of Clean Energy: The Environmental Footprint of Rare Earth Products. ACS Sustainable Chemistry & Engineering, 6(3), 3311-3320. doi:10.1021/acssuschemeng.7b03484.

Reference 2: Wang, L., Jiao, G., Lu, H., & Wang, Q. (2019). Life cycle assessment of integrated exploitation technology for tailings in Bayan Obo Mine, China. Applied Ecology and Environmental Research, 17, 4343-4359. doi:10.15666/aeer/1702_43434359

## Included activities start
The activity starts with the mining of the mixed monazite and bastnasite ores.

## Included activities end
The activity ends with the production of rare earth concentrate, 50% beneficiated.

## Allocation
No allocation is applied.

## Geography
The Bayon Obo mine is located in the Inner Mongolia Autonomous Region, on the northern edge of the North China Kraton, approximately 150km northwest of Baotou and serves as the world's largest REE mine (both in terms of reserves and production). The Bayan Obo reserves were discovered in 1927 while the REEs were discovered in 1935 and contains more than 100 million tonnes of proven REE reserves (accounting for more than 80% of the REE reserves in China). The Bayan Obo ore consists of more than 100 minerals with the principal rare earth mineral ores being monazite and bastnaesite with the ratio of bastnasite to monazite in the ore being 7:3 by mass.

## Technology
Firstly, open pit, mining (drilling and blasting) is performed in order to obtain the iron ore and a minor quantity of rare earth ores (5−6 % rare earth oxide equivalent). Then, a two-step beneficiation process is applied to produce the REO concentrate. In the first step, ball milling and magnetic separation is used for the isolation of the iron ore. In the second step, the resulting REO tailing (containing monazite and bastnasite), is processed to get a 50% REO equivalent concentrate via flotation.

## Time period
Data are considered representative of current production practices.

## Reference product
- rare earth oxide concentrate, 50% REO: 0 kg; By-product classification allocatable product; CPC 34290: Compounds of rare earth metals, of yttrium or of scandium
  production volume 2.5e8 kg; name PVRP
    The annual production volume is expressed in kg. Its calculation is based on the following publication: Wang, L., Jiao, G., Lu, H., & Wang, Q. (2019). Life cycle assessment of integrated exploitation technology for tailings in Bayan Obo Mine, China. Applied Ecology and Environmental Research, 17, 4343-4359. doi:10.15666/aeer/1702_43434359.
  property cerium content 0.25
    The calculation of the rare earth element (REE) content of the hydroxide concentrate is based on the facts the concentrate contains 50% REE and that the per kg production of refined RE oxides from the monazite and bastnäsite mineral contains 0.5 kg cerium oxide, 0.27 kg lanthanum oxide, 0.16 kg neodymium oxide, 0.05 kg of praseodymium oxide and 0.02 kg of mixed samarium-europium-gadolinium concentrate.
  property lanthanum content 0.135
    (same comment as for rare earth oxide concentrate, 50% REO)
  property samarium content 0.00588
    (same comment as for rare earth oxide concentrate, 50% REO)
  property europium content 0.00295
    (same comment as for rare earth oxide concentrate, 50% REO)
  property praseodymium content 0.025
    (same comment as for rare earth oxide concentrate, 50% REO)
  property gadolinium content 0.00117
    (same comment as for rare earth oxide concentrate, 50% REO)
  property price 2.57 EUR2005
    Price in 2016; value taken from USGS 2016 Minerals Yearbook, https://www.usgs.gov/centers/nmic/rare-earths-statistics-and-information
  property neodymium content 0.08
    (same comment as for rare earth oxide concentrate, 50% REO)
  property carbon content 0
    carbon content on a dry matter basis (reserved; not for manual entry)
  property true value 2.57
    allocation property applied in "true value" allocation // value calculated from revenue
  properties: carbon content, non-fossil 0, wet mass 1 kg, water content 0, water in wet mass 0 kg, carbon content, fossil 0, dry mass 1 kg, carbon allocation 0 kg
- iron ore concentrate: 1 kg; name bp1; By-product classification allocatable product; CPC 14100: Iron ores and concentrates, other than roasted iron pyrites; pedigree (1,1,1,1,1)
  Value taken from the following publication: Wang, L., Wang, P., Chen, W.-Q., Wang, Q.-Q., & Lu, H.-S. (2020). Environmental Impacts of Scandium Oxide Production from Rare Earths Tailings of Bayan Obo Mine. Journal of Cleaner Production, 122464. doi:https://doi.org/10.1016/j.jclepro.2020.122464. Value was not originally contained in the critical materials life cycle assessment tool (CMLCAT) of Arshi et al. (2018), provided by F. Zhao from Purdue university (more information on the sampling procedure), from which the majority of the exchanges were taken and has been assumed for completeness and mass balance purposes.
  production volume 1.88e9 kg; = PVRP * bp1
    (same comment as for rare earth oxide concentrate, 50% REO)
  property price 0.0467 EUR2005; name bp1_price_EUR2005
    Calculated based on literature value (UN Commodity Trade Statistics Database) using data on trade value and net weight (kg) for 5 reference countries/regions (EU-27, USA, JP, CN and IN) which weighted (by net weight) average is assumed to be a good approximation of the global price. The UN classification; 2601 Iron ores and concentrates, roasted iron pyrites (accessed 20140508). Data for the year 2005.
  property iron content 0.65
    The iron content of the concentrate produced as a byproduct during the mining and beneficiation activities in the Bayan Obo ore is 65% and is based on the following publication: Arshi, P. S., Vahidi, E., & Zhao, F. (2018). Behind the Scenes of Clean Energy: The Environmental Footprint of Rare Earth Products. ACS Sustainable Chemistry & Engineering, 6(3), 3311-3320. doi:10.1021/acssuschemeng.7b03484.
  property carbon content 0
    carbon content on a dry matter basis (reserved; not for manual entry)
  property true value 0.351184; name bp1_true_value
    allocation property applied in "true value" allocation // value calculated from revenue
  properties: dry mass 1 kg, water in wet mass 0 kg, wet mass 1 kg, water content 0, carbon content, non-fossil 0, carbon content, fossil 0, carbon allocation 0 kg

## By-products
- rare earth tailings, from bastnaesite and monazite ore: 0 kg; CPC 39: Wastes or scraps; By-product classification Recyclable; pedigree (1,1,1,1,1)
  The original value (production of 2.5E+08 kg of concentrate results in the production of 3.8618E+09 kg of rare earth tailings) - after adjustment to represent the production of tailings per 1 kg of produced concentrate is 15.4472 kg. The values in parentheses were taken from the following publication: Wang, L., Wang, P., Chen, W.-Q., Wang, Q.-Q., & Lu, H.-S. (2020). Environmental Impacts of Scandium Oxide Production from Rare Earths Tailings of Bayan Obo Mine. Journal of Cleaner Production, 122464. doi:https://doi.org/10.1016/j.jclepro.2020.122464. Value was not originally contained in the critical materials life cycle assessment tool (CMLCAT) of Arshi et al. (2018), provided by F. Zhao from Purdue university (more information on the sampling procedure), from which the majority of the exchanges were taken. The amount has been slightly reduced for mass balance purposes, which leads to minor underestimation of the annual production volume.
  production volume 0 kg; = PVRP * bp2
    The annual production volume is expressed in kg. The amount is calculated from production volume of the reference product using the relative outputs.This leads to a minor underestimation of the annual production volume that is reported on the following publication (3.8618E+09 kg): Wang, L., Jiao, G., Lu, H., & Wang, Q. (2019). Life cycle assessment of integrated exploitation technology for tailings in Bayan Obo Mine, China. Applied Ecology and Environmental Research, 17, 4343-4359. doi:10.15666/aeer/1702_43434359. The source of this underestimation is the fact that the amount of produced tailings per kg of produced concentrate was slightly adjusted for mass balance purposes (see rare earth tailings exchange comment).
  property price 0.273593 EUR2005; name bp2_price_EUR2005
    Price roughly estimated based on amount of contained iron, fluorspar, niobium and scandium. As the tailings are classified as a recyclable product, the economic value plays no role in the allocation of environmental burdens.
  property magnesium content 0.0309993
    The composition of the rare earth tailings is taken from Table 2 of the following publication: Zhang, B., Xue, X., Huang, X., Yang, H., & Chen, G. (2019). Study on recycling and leaching valuable elements from Bayan Obo tailings. Metall. Res. Technol., 116(1), 114. doi:10.1051/metal/2018040. The calculation of the individual contents of each compound in the tailings is based on the subtotal masses of the elements in each compound. The subtotal masses are calculated using the molecular weight calculator. (Source: https://www.lenntech.com/calculators/molecular/molecular-weight-calculator.htm). The content of MgO in the tailings is: 5.14%. The subtotal masses of MgO are: Mg:60.31%, O:39.7%.In the abovementioned publication, neither data on the water content of the tailings are available, nor specific water loss during roasting is reported. For that reason, the reported elemental contents of the rare earth tailings (i.e properties) refer to the dry mass of the tailings.
  property fluorine content 0.0314
    The composition of the rare earth tailings is taken from Table 2 of the following publication: Zhang, B., Xue, X., Huang, X., Yang, H., & Chen, G. (2019). Study on recycling and leaching valuable elements from Bayan Obo tailings. Metall. Res. Technol., 116(1), 114. doi:10.1051/metal/2018040. The calculation of the individual contents of each compound in the tailings is based on the subtotal masses of the elements in each compound. The subtotal masses are calculated using the molecular weight calculator. (Source: https://www.lenntech.com/calculators/molecular/molecular-weight-calculator.htm). The content of F in the tailings is: 3.14%. In the abovementioned publication, neither data on the water content of the tailings are available, nor specific water loss during roasting is reported. For that reason, the reported elemental contents of the rare earth tailings (i.e properties) refer to the dry mass of the tailings.
  property iron content 0.1574
    The composition of the rare earth tailings is taken from Table 2 of the following publication: Zhang, B., Xue, X., Huang, X., Yang, H., & Chen, G. (2019). Study on recycling and leaching valuable elements from Bayan Obo tailings. Metall. Res. Technol., 116(1), 114. doi:10.1051/metal/2018040. The calculation of the individual contents of each compound in the tailings is based on the subtotal masses of the elements in each compound. The subtotal masses are calculated using the molecular weight calculator. (Source: https://www.lenntech.com/calculators/molecular/molecular-weight-calculator.htm). The total content of Fe in the tailings is: 15.74%. Only the total Fe in the tailings is considered here, meaning that the content of FeO in the tailings that is reported in the abovementioned publication (as one part of the total iron content) has been omitted to avoid double counting. However the oxygen content of the FeO has been considered in the calculation of oxygen content. FeO content in the tailings is 2.38%. Subtotal masses of FeO are: Fe:77.74%, O:22.27% (see property comment of oxygen). In the abovementioned publication, neither data on the water content of the tailings are available, nor specific water loss during roasting is reported. For that reason, the reported elemental contents of the rare earth tailings (i.e properties) refer to the dry mass of the tailings.
  property potassium content 0.00771993
    The composition of the rare earth tailings is taken from Table 2 of the following publication: Zhang, B., Xue, X., Huang, X., Yang, H., & Chen, G. (2019). Study on recycling and leaching valuable elements from Bayan Obo tailings. Metall. Res. Technol., 116(1), 114. doi:10.1051/metal/2018040. The calculation of the individual contents of each compound in the tailings is based on the subtotal masses of the elements in each compound. The subtotal masses are calculated using the molecular weight calculator. (Source: https://www.lenntech.com/calculators/molecular/molecular-weight-calculator.htm). The content of K2O in the tailings is: 0.93%. The subtotal masses of K2O are: K:83.01%, O:16.98%. In the abovementioned publication, neither data on the water content of the tailings are available, nor specific water loss during roasting is reported. For that reason, the reported elemental contents of the rare earth tailings (i.e properties) refer to the dry mass of the tailings.
  property scandium content 0.0001956
    The composition of the rare earth tailings is taken from Table 2 of the following publication: Zhang, B., Xue, X., Huang, X., Yang, H., & Chen, G. (2019). Study on recycling and leaching valuable elements from Bayan Obo tailings. Metall. Res. Technol., 116(1), 114. doi:10.1051/metal/2018040. The calculation of the individual contents of each compound in the tailings is based on the subtotal masses of the elements in each compound. The subtotal masses are calculated using the molecular weight calculator. (Source: https://www.lenntech.com/calculators/molecular/molecular-weight-calculator.htm). The content of Sc2O3 in the tailings is: 0.03%. The subtotal masses of Sc2O3 are: Sc:65.2%, O:34.8%. In the abovementioned publication, neither data on the water content of the tailings are available, nor specific water loss during roasting is reported. For that reason, the reported elemental contents of the rare earth tailings (i.e properties) refer to the dry mass of the tailings.
  property niobium content 0.0025164
    The composition of the rare earth tailings is taken from Table 2 of the following publication: Zhang, B., Xue, X., Huang, X., Yang, H., & Chen, G. (2019). Study on recycling and leaching valuable elements from Bayan Obo tailings. Metall. Res. Technol., 116(1), 114. doi:10.1051/metal/2018040. The calculation of the individual contents of each compound in the tailings is based on the subtotal masses of the elements in each compound. The subtotal masses are calculated using the molecular weight calculator. (Source: https://www.lenntech.com/calculators/molecular/molecular-weight-calculator.htm). The content of Nb2O5 in the tailings is: 0.36%. The subtotal masses of Nb2O5 are: Nb:69.9%, O:30.1%. In the abovementioned publication, neither data on the water content of the tailings are available, nor specific water loss during roasting is reported. For that reason, the reported elemental contents of the rare earth tailings (i.e properties) refer to the dry mass of the tailings.
  property sodium content 0.0166905
    The composition of the rare earth tailings is taken from Table 2 of the following publication: Zhang, B., Xue, X., Huang, X., Yang, H., & Chen, G. (2019). Study on recycling and leaching valuable elements from Bayan Obo tailings. Metall. Res. Technol., 116(1), 114. doi:10.1051/metal/2018040. The calculation of the individual contents of each compound in the tailings is based on the subtotal masses of the elements in each compound. The subtotal masses are calculated using the molecular weight calculator. (Source: https://www.lenntech.com/calculators/molecular/molecular-weight-calculator.htm). The content of Na2O in the tailings is: 2.25%. The subtotal masses of Na2O are: Na:74.18%, O:25.81%. In the abovementioned publication, neither data on the water content of the tailings are available, nor specific water loss during roasting is reported. For that reason, the reported elemental contents of the rare earth tailings (i.e properties) refer to the dry mass of the tailings.
  property manganese content 0.011616
    The composition of the rare earth tailings is taken from Table 2 of the following publication: Zhang, B., Xue, X., Huang, X., Yang, H., & Chen, G. (2019). Study on recycling and leaching valuable elements from Bayan Obo tailings. Metall. Res. Technol., 116(1), 114. doi:10.1051/metal/2018040. The calculation of the individual contents of each compound in the tailings is based on the subtotal masses of the elements in each compound. The subtotal masses are calculated using the molecular weight calculator. (Source: https://www.lenntech.com/calculators/molecular/molecular-weight-calculator.htm). The content of MnO in the tailings is: 1.5%. The subtotal masses of MnO are: Mn:77.44%, O:22.55%. In the abovementioned publication, neither data on the water content of the tailings are available, nor specific water loss during roasting is reported. For that reason, the reported elemental contents of the rare earth tailings (i.e properties) refer to the dry mass of the tailings.
  property oxygen content 0.265915
    Oxygen content in the tailings is calculated as the sum of oxygen contents of each individual compound present in the rare earth tailings. The oxygen content in each compound is calculated by multiplying the amount of chemical compound content in the tailings with the subtotal mass of oxygen in the compound using the molecular weight calculator. (Source: <https://www.lenntech.com/calculators/molecular/molecular-weight-calculator.htm>). The oxygen content of each compound is provided on the properties comment field of the respective compound. For reasons explained in the comment section of the iron content, even though the iron content of FeO compound is not taken into account, the oxygen content is nevertheless considered. Feo content in the tailings is 2.38% and the subtotal mass of oxygen in that compound is 22.27%. In the abovementioned publication, neither data on the water content of the tailings are available, nor specific water loss during roasting is reported. For that reason, the reported elemental contents of the rare earth tailings (i.e properties) refer to the dry mass of the tailings.
  property aluminium content 0.0118563
    The composition of the rare earth tailings is taken from Table 2 of the following publication: Zhang, B., Xue, X., Huang, X., Yang, H., & Chen, G. (2019). Study on recycling and leaching valuable elements from Bayan Obo tailings. Metall. Res. Technol., 116(1), 114. doi:10.1051/metal/2018040. The calculation of the individual contents of each compound in the tailings is based on the subtotal masses of the elements in each compound. The subtotal masses are calculated using the molecular weight calculator. (Source: https://www.lenntech.com/calculators/molecular/molecular-weight-calculator.htm). The content of Al2O3 in the tailings is: 2.24%. The subtotal masses of Al2O3 are: Al:52.93%, O:47.08%. In the abovementioned publication, neither data on the water content of the tailings are available, nor specific water loss during roasting is reported. For that reason, the reported elemental contents of the rare earth tailings (i.e properties) refer to the dry mass of the tailings.
  property calcium content 0.083477
    The composition of the rare earth tailings is taken from Table 2 of the following publication: Zhang, B., Xue, X., Huang, X., Yang, H., & Chen, G. (2019). Study on recycling and leaching valuable elements from Bayan Obo tailings. Metall. Res. Technol., 116(1), 114. doi:10.1051/metal/2018040. The calculation of the individual contents of each compound in the tailings is based on the subtotal masses of the elements in each compound. The subtotal masses are calculated using the molecular weight calculator. (Source: https://www.lenntech.com/calculators/molecular/molecular-weight-calculator.htm). The content of CaO in the tailings is: 11.68%. The subtotal masses of CaO are: Ca:71.47%, O:28.53%. In the abovementioned publication, neither data on the water content of the tailings are available, nor specific water loss during roasting is reported. For that reason, the reported elemental contents of the rare earth tailings (i.e properties) refer to the dry mass of the tailings.
  property sulfur content 0.0215
    The composition of the rare earth tailings is taken from Table 2 of the following publication: Zhang, B., Xue, X., Huang, X., Yang, H., & Chen, G. (2019). Study on recycling and leaching valuable elements from Bayan Obo tailings. Metall. Res. Technol., 116(1), 114. doi:10.1051/metal/2018040. The calculation of the individual contents of each compound in the tailings is based on the subtotal masses of the elements in each compound. The subtotal masses are calculated using the molecular weight calculator. (Source: https://www.lenntech.com/calculators/molecular/molecular-weight-calculator.htm). The content of S in the tailings is: 2.15%. In the abovementioned publication, neither data on the water content of the tailings are available, nor specific water loss during roasting is reported. For that reason, the reported elemental contents of the rare earth tailings (i.e properties) refer to the dry mass of the tailings. In the abovementioned publication, neither data on the water content of the tailings are available, nor specific water loss during roasting is reported. For that reason, the reported elemental contents of the rare earth tailings (i.e properties) refer to the dry mass of the tailings.
  property thorium content 0.000184548
    The composition of the rare earth tailings is taken from Table 2 of the following publication: Zhang, B., Xue, X., Huang, X., Yang, H., & Chen, G. (2019). Study on recycling and leaching valuable elements from Bayan Obo tailings. Metall. Res. Technol., 116(1), 114. doi:10.1051/metal/2018040. The calculation of the individual contents of each compound in the tailings is based on the subtotal masses of the elements in each compound. The subtotal masses are calculated using the molecular weight calculator. (Source: https://www.lenntech.com/calculators/molecular/molecular-weight-calculator.htm). The content of ThO2 in the tailings is: 0.021%. The subtotal masses of ThO2 are: Th:87.88%, O:12.12%. In the abovementioned publication, neither data on the water content of the tailings are available, nor specific water loss during roasting is reported. For that reason, the reported elemental contents of the rare earth tailings (i.e properties) refer to the dry mass of the tailings.
  property silicon content 0.155491
    The composition of the rare earth tailings is taken from Table 2 of the following publication: Zhang, B., Xue, X., Huang, X., Yang, H., & Chen, G. (2019). Study on recycling and leaching valuable elements from Bayan Obo tailings. Metall. Res. Technol., 116(1), 114. doi:10.1051/metal/2018040. The calculation of the individual contents of each compound in the tailings is based on the subtotal masses of the elements in each compound. The subtotal masses are calculated using the molecular weight calculator. (Source: https://www.lenntech.com/calculators/molecular/molecular-weight-calculator.htm). The content of SiO2 in the tailings is: 33.26%. The subtotal masses of SiO2 are: Si:46.75%, O:53.26%. In the abovementioned publication, neither data on the water content of the tailings are available, nor specific water loss during roasting is reported. For that reason, the reported elemental contents of the rare earth tailings (i.e properties) refer to the dry mass of the tailings.
  property titanium content 0.00647244
    The composition of the rare earth tailings is taken from Table 2 of the following publication: Zhang, B., Xue, X., Huang, X., Yang, H., & Chen, G. (2019). Study on recycling and leaching valuable elements from Bayan Obo tailings. Metall. Res. Technol., 116(1), 114. doi:10.1051/metal/2018040. The calculation of the individual contents of each compound in the tailings is based on the subtotal masses of the elements in each compound. The subtotal masses are calculated using the molecular weight calculator. (Source: https://www.lenntech.com/calculators/molecular/molecular-weight-calculator.htm). The content of TiO2 in the tailings is: 1.08%. The subtotal masses of TiO2 are: Ti:59.93%, O:40.06%. In the abovementioned publication, neither data on the water content of the tailings are available, nor specific water loss during roasting is reported. For that reason, the reported elemental contents of the rare earth tailings (i.e properties) refer to the dry mass of the tailings.
  property barium content 0.0282114
    The composition of the rare earth tailings is taken from Table 2 of the following publication: Zhang, B., Xue, X., Huang, X., Yang, H., & Chen, G. (2019). Study on recycling and leaching valuable elements from Bayan Obo tailings. Metall. Res. Technol., 116(1), 114. doi:10.1051/metal/2018040. The calculation of the individual contents of each compound in the tailings is based on the subtotal masses of the elements in each compound. The subtotal masses are calculated using the molecular weight calculator. (Source: https://www.lenntech.com/calculators/molecular/molecular-weight-calculator.htm). The content of BaO in the tailings is: 3.15%. The subtotal masses of BaO are: Ba:89.56%, O:10.43%. In the abovementioned publication, neither data on the water content of the tailings are available, nor specific water loss during roasting is reported. For that reason, the reported elemental contents of the rare earth tailings (i.e properties) refer to the dry mass of the tailings.
  property phosphorus content 0.00379668
    The composition of the rare earth tailings is taken from Table 2 of the following publication: Zhang, B., Xue, X., Huang, X., Yang, H., & Chen, G. (2019). Study on recycling and leaching valuable elements from Bayan Obo tailings. Metall. Res. Technol., 116(1), 114. doi:10.1051/metal/2018040. The calculation of the individual contents of each compound in the tailings is based on the subtotal masses of the elements in each compound. The subtotal masses are calculated using the molecular weight calculator. (Source: https://www.lenntech.com/calculators/molecular/molecular-weight-calculator.htm). The content of P2O5 in the tailings is: 0.87%. The subtotal masses of P2O5 are: P:43.64%, O:56.36%. In the abovementioned publication, neither data on the water content of the tailings are available, nor specific water loss during roasting is reported. For that reason, the reported elemental contents of the rare earth tailings (i.e properties) refer to the dry mass of the tailings.
  property carbon content 0
    carbon content on a dry matter basis (reserved; not for manual entry)
  properties: wet mass 1 kg, water content 0, carbon content, non-fossil 0, dry mass 1 kg, water in wet mass 0 kg, carbon content, fossil 0, carbon allocation 0 kg

## Inputs from technosphere
All rows: lognormal variance with pedigree 0.001425, pedigree (2,1,2,2,1)
- sodium hydroxide, without water, in 50% solution state: 2.8776e-5 kg
  Value taken from the critical materials life cycle assessment tool (CMLCAT) of Arshi et al. (2018), provided by F. Zhao from Purdue university (more information on the sampling procedure) and adjusted from the original dataset to correspond to the production of 1 kg of REO concentrate.
  properties: dry mass 1 kg, wet mass 1 kg, heating value, net 3.03 MJ
- blasting: 0.0002398 kg
  (same comment as for sodium hydroxide, without water, in 50% solution state)
- diesel, burned in diesel-electric generating set, 10MW: 0.5995 MJ
  (same comment as for sodium hydroxide, without water, in 50% solution state)
  properties: heating value, net 1 MJ
- electricity, medium voltage: 0.0122298 kWh
  (same comment as for sodium hydroxide, without water, in 50% solution state)
- fatty acid: 0.00019184 kg
  (same comment as for sodium hydroxide, without water, in 50% solution state)
  properties: wet mass 1 kg, dry mass 1 kg, carbon content, non-fossil 0.75, heating value, net 22.73 MJ
- sodium silicate, spray powder, 80%: 0.0004796 kg
  (same comment as for sodium hydroxide, without water, in 50% solution state)
  properties: dry mass 1 kg, wet mass 1 kg
- hard coal: 0.002398 kg
  (same comment as for sodium hydroxide, without water, in 50% solution state)
  properties: heating value, net 27.91 MJ, water content 0.0638298, carbon content, fossil 0.845, dry mass 0.94 kg, wet mass 1 kg
  note on heating value, net: Based on the Characterization factor of Hard coal in the CED method
  note on carbon content, fossil: C content 75-94% (specified in Tab 1.1, report 6, part VI). A mean content of 0.845 kg C/ kg dry hard coal was considered
- recultivation, iron mine: 8.1532e-7 m2
  (same comment as for sodium hydroxide, without water, in 50% solution state)
- fatty alcohol: 3.19733e-5 kg
  (same comment as for sodium hydroxide, without water, in 50% solution state)
  properties: carbon content, fossil 0.0408973, carbon content, non-fossil 0.743434, dry mass 1 kg, wet mass 1 kg, heating value, net 41.01 MJ
- steel, chromium steel 18/8, hot rolled: 6.85828e-5 kg
  Approximation of chromium steel balls required as input from technosphere. Value taken from the critical materials life cycle assessment tool (CMLCAT) of Arshi et al. (2018), provided by F. Zhao from Purdue university (more information on the sampling procedure) and adjusted from the original dataset to correspond to the production of 1 kg of REO concentrate.
  properties: wet mass 1 kg, carbon content, fossil 0.0008, dry mass 1 kg
  note on carbon content, fossil: Stainless steel model is the grade 304 steel (18/8 stainless, 18% chromium 8% nickel; max. 0.08% C)
- wastewater, average: -0.00204272 m3; name bp3
  Value calculated from simplified mass balance and assumed here for completness purposes. The value was not contained originally in the critical materials life cycle assessment tool (CMLCAT) of Arshi et al. (2018), provided by F. Zhao from Purdue university.
  production volume 3.19442e7 m3; = PVRP * bp3
    The production volume is expressed in m3. Its calculation is based on the fact that for the production of 1 kg of rare earth concentrate, 0.12778 m3 of wastewater, average, are produced as a byproduct. The annual production of rare earth concentrate is 2.5E+08 kg (see rare earth concentrate PV comment).
  property price 0 EUR2005; name bp3_price_EUR2005
  properties: water content 2882.2, dry mass 0.346837 kg, carbon content, non-fossil 0.194039, wet mass 1000 kg
  note on carbon content, non-fossil: 0.0673 kg TOC/m3 (Tab A.17, ecoinvent v2.2 report 13_I). TOC was considered as Total Carbon.
- mine infrastructure, iron: 3.99507e-13 unit
  (same comment as for sodium hydroxide, without water, in 50% solution state)
- rare earth tailings, from bastnaesite and monazite ore: -0.246434 kg
  (same comment as for rare earth tailings, from bastnaesite and monazite ore)
  production volume 3.85374e9 kg
  properties: magnesium content 0.0309993, fluorine content 0.0314, iron content 0.1574, wet mass 1 kg, sodium content 0.0166905, dry mass 1 kg, oxygen content 0.265915, aluminium content 0.0118563, calcium content 0.083477, sulfur content 0.0215, silicon content 0.155491, barium content 0.0282114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
  note on magnesium content: The composition of the rare earth tailings is taken from Table 2 of the following publication: Zhang, B., Xue, X., Huang, X., Yang, H., & Chen, G. (2019). Study on recycling and leaching valuable elements from Bayan Obo tailings. Metall. Res. Technol., 116(1), 114. doi:10.1051/metal/2018040. The calculation of the individual contents of each compound in the tailings is based on the subtotal masses of the elements in each compound. The subtotal masses are calculated using the molecular weight calculator. (Source: https://www.lenntech.com/calculators/molecular/molecular-weight-calculator.htm). The content of MgO in the tailings is: 5.14%. The subtotal masses of MgO are: Mg:60.31%, O:39.7%.In the abovementioned publication, neither data on the water content of the tailings are available, nor specific water loss during roasting is reported. For that reason, the reported elemental contents of the rare earth tailings (i.e properties) refer to the dry mass of the tailings.
  note on fluorine content: The composition of the rare earth tailings is taken from Table 2 of the following publication: Zhang, B., Xue, X., Huang, X., Yang, H., & Chen, G. (2019). Study on recycling and leaching valuable elements from Bayan Obo tailings. Metall. Res. Technol., 116(1), 114. doi:10.1051/metal/2018040. The calculation of the individual contents of each compound in the tailings is based on the subtotal masses of the elements in each compound. The subtotal masses are calculated using the molecular weight calculator. (Source: https://www.lenntech.com/calculators/molecular/molecular-weight-calculator.htm). The content of F in the tailings is: 3.14%. In the abovementioned publication, neither data on the water content of the tailings are available, nor specific water loss during roasting is reported. For that reason, the reported elemental contents of the rare earth tailings (i.e properties) refer to the dry mass of the tailings.
  note on iron content: The composition of the rare earth tailings is taken from Table 2 of the following publication: Zhang, B., Xue, X., Huang, X., Yang, H., & Chen, G. (2019). Study on recycling and leaching valuable elements from Bayan Obo tailings. Metall. Res. Technol., 116(1), 114. doi:10.1051/metal/2018040. The calculation of the individual contents of each compound in the tailings is based on the subtotal masses of the elements in each compound. The subtotal masses are calculated using the molecular weight calculator. (Source: https://www.lenntech.com/calculators/molecular/molecular-weight-calculator.htm). The total content of Fe in the tailings is: 15.74%. Only the total Fe in the tailings is considered here, meaning that the content of FeO in the tailings that is reported in the abovementioned publication (as one part of the total iron content) has been omitted to avoid double counting. However the oxygen content of the FeO has been considered in the calculation of oxygen content. FeO content in the tailings is 2.38%. Subtotal masses of FeO are: Fe:77.74%, O:22.27% (see property comment of oxygen). In the abovementioned publication, neither data on the water content of the tailings are available, nor specific water loss during roasting is reported. For that reason, the reported elemental contents of the rare earth tailings (i.e properties) refer to the dry mass of the tailings.
  note on sodium content: The composition of the rare earth tailings is taken from Table 2 of the following publication: Zhang, B., Xue, X., Huang, X., Yang, H., & Chen, G. (2019). Study on recycling and leaching valuable elements from Bayan Obo tailings. Metall. Res. Technol., 116(1), 114. doi:10.1051/metal/2018040. The calculation of the individual contents of each compound in the tailings is based on the subtotal masses of the elements in each compound. The subtotal masses are calculated using the molecular weight calculator. (Source: https://www.lenntech.com/calculators/molecular/molecular-weight-calculator.htm). The content of Na2O in the tailings is: 2.25%. The subtotal masses of Na2O are: Na:74.18%, O:25.81%. In the abovementioned publication, neither data on the water content of the tailings are available, nor specific water loss during roasting is reported. For that reason, the reported elemental contents of the rare earth tailings (i.e properties) refer to the dry mass of the tailings.
  note on oxygen content: Oxygen content in the tailings is calculated as the sum of oxygen contents of each individual compound present in the rare earth tailings. The oxygen content in each compound is calculated by multiplying the amount of chemical compound content in the tailings with the subtotal mass of oxygen in the compound using the molecular weight calculator. (Source: <https://www.lenntech.com/calculators/molecular/molecular-weight-calculator.htm>). The oxygen content of each compound is provided on the properties comment field of the respective compound. For reasons explained in the comment section of the iron content, even though the iron content of FeO compound is not taken into account, the oxygen content is nevertheless considered. Feo content in the tailings is 2.38% and the subtotal mass of oxygen in that compound is 22.27%. In the abovementioned publication, neither data on the water content of the tailings are available, nor specific water loss during roasting is reported. For that reason, the reported elemental contents of the rare earth tailings (i.e properties) refer to the dry mass of the tailings.
  note on aluminium content: The composition of the rare earth tailings is taken from Table 2 of the following publication: Zhang, B., Xue, X., Huang, X., Yang, H., & Chen, G. (2019). Study on recycling and leaching valuable elements from Bayan Obo tailings. Metall. Res. Technol., 116(1), 114. doi:10.1051/metal/2018040. The calculation of the individual contents of each compound in the tailings is based on the subtotal masses of the elements in each compound. The subtotal masses are calculated using the molecular weight calculator. (Source: https://www.lenntech.com/calculators/molecular/molecular-weight-calculator.htm). The content of Al2O3 in the tailings is: 2.24%. The subtotal masses of Al2O3 are: Al:52.93%, O:47.08%. In the abovementioned publication, neither data on the water content of the tailings are available, nor specific water loss during roasting is reported. For that reason, the reported elemental contents of the rare earth tailings (i.e properties) refer to the dry mass of the tailings.
  note on calcium content: The composition of the rare earth tailings is taken from Table 2 of the following publication: Zhang, B., Xue, X., Huang, X., Yang, H., & Chen, G. (2019). Study on recycling and leaching valuable elements from Bayan Obo tailings. Metall. Res. Technol., 116(1), 114. doi:10.1051/metal/2018040. The calculation of the individual contents of each compound in the tailings is based on the subtotal masses of the elements in each compound. The subtotal masses are calculated using the molecular weight calculator. (Source: https://www.lenntech.com/calculators/molecular/molecular-weight-calculator.htm). The content of CaO in the tailings is: 11.68%. The subtotal masses of CaO are: Ca:71.47%, O:28.53%. In the abovementioned publication, neither data on the water content of the tailings are available, nor specific water loss during roasting is reported. For that reason, the reported elemental contents of the rare earth tailings (i.e properties) refer to the dry mass of the tailings.
  note on sulfur content: The composition of the rare earth tailings is taken from Table 2 of the following publication: Zhang, B., Xue, X., Huang, X., Yang, H., & Chen, G. (2019). Study on recycling and leaching valuable elements from Bayan Obo tailings. Metall. Res. Technol., 116(1), 114. doi:10.1051/metal/2018040. The calculation of the individual contents of each compound in the tailings is based on the subtotal masses of the elements in each compound. The subtotal masses are calculated using the molecular weight calculator. (Source: https://www.lenntech.com/calculators/molecular/molecular-weight-calculator.htm). The content of S in the tailings is: 2.15%. In the abovementioned publication, neither data on the water content of the tailings are available, nor specific water loss during roasting is reported. For that reason, the reported elemental contents of the rare earth tailings (i.e properties) refer to the dry mass of the tailings. In the abovementioned publication, neither data on the water content of the tailings are available, nor specific water loss during roasting is reported. For that reason, the reported elemental contents of the rare earth tailings (i.e properties) refer to the dry mass of the tailings.
  note on silicon content: The composition of the rare earth tailings is taken from Table 2 of the following publication: Zhang, B., Xue, X., Huang, X., Yang, H., & Chen, G. (2019). Study on recycling and leaching valuable elements from Bayan Obo tailings. Metall. Res. Technol., 116(1), 114. doi:10.1051/metal/2018040. The calculation of the individual contents of each compound in the tailings is based on the subtotal masses of the elements in each compound. The subtotal masses are calculated using the molecular weight calculator. (Source: https://www.lenntech.com/calculators/molecular/molecular-weight-calculator.htm). The content of SiO2 in the tailings is: 33.26%. The subtotal masses of SiO2 are: Si:46.75%, O:53.26%. In the abovementioned publication, neither data on the water content of the tailings are available, nor specific water loss during roasting is reported. For that reason, the reported elemental contents of the rare earth tailings (i.e properties) refer to the dry mass of the tailings.
  note on barium content: The composition of the rare earth tailings is taken from Table 2 of the following publication: Zhang, B., Xue, X., Huang, X., Yang, H., & Chen, G. (2019). Study on recycling and leaching valuable elements from Bayan Obo tailings. Metall. Res. Technol., 116(1), 114. doi:10.1051/metal/2018040. The calculation of the individual contents of each compound in the tailings is based on the subtotal masses of the elements in each compound. The subtotal masses are calculated using the molecular weight calculator. (Source: https://www.lenntech.com/calculators/molecular/molecular-weight-calculator.htm). The content of BaO in the tailings is: 3.15%. The subtotal masses of BaO are: Ba:89.56%, O:10.43%. In the abovementioned publication, neither data on the water content of the tailings are available, nor specific water loss during roasting is reported. For that reason, the reported elemental contents of the rare earth tailings (i.e properties) refer to the dry mass of the tailings.

## Inputs from nature
All rows: lognormal variance with pedigree 0.001425, pedigree (2,1,2,2,1)
- Neodymium, in ground [natural resource, in ground]: 0.00425885 kg
  Value has been recalculated, due to the presence of more recent and accurate data. The calculation is based on the following facts: i) Rare earth oxide (REO) content in the Bayan Obo ore is 6% (Source: Koltun, P., & Tharumarajah, A. (2014). Life Cycle Impact of Rare Earth Elements. ISRN Metallurgy, 2014, 907536. doi:10.1155/2014/907536), ii) 18.5% of the REOs consists of Neodymium oxide and (Source: https://prd-wret.s3.us-west-2.amazonaws.com/assets/palladium/production/atoms/files/myb1-2017-raree.pdf Table 2, page 10) and iii) after adjustment of the reported values to represent the production of 1 kg of rare earth concentrate, 50% REO content, nearly 24 kg of Bayan Obo ore is required to produce 1 kg of rare earth concentrate, 50% REO content. (Source: Wang, L., Wang, P., Chen, W.-Q., Wang, Q.-Q., & Lu, H.-S. (2020). Environmental Impacts of Scandium Oxide Production from Rare Earths Tailings of Bayan Obo Mine. Journal of Cleaner Production, 122464. doi:https://doi.org/10.1016/j.jclepro.2020.122464). The value reported on the original dataset provided in the critical materials life cycle assessment tool (CMLCAT) of Arshi et al. (2018) has not been considered.
- Lanthanum, in ground [natural resource, in ground]: 0.00529478 kg
  Value has been recalculated, due to the presence of more recent and accurate data. The calculation is based on the following facts: i) Rare earth oxide (REO) content in the Bayan Obo ore is 6% (Source: Koltun, P., & Tharumarajah, A. (2014). Life Cycle Impact of Rare Earth Elements. ISRN Metallurgy, 2014, 907536. doi:10.1155/2014/907536), ii) 23% of the REOs consists of Lanthanum oxide and (Source: https://prd-wret.s3.us-west-2.amazonaws.com/assets/palladium/production/atoms/files/myb1-2017-raree.pdf Table 2, page 10) and iii) after adjustment of the reported values to represent the production of 1 kg of rare earth concentrate, 50% REO content, nearly 24 kg of Bayan Obo ore is required to produce 1 kg of rare earth concentrate, 50% REO content. (Source: Wang, L., Wang, P., Chen, W.-Q., Wang, Q.-Q., & Lu, H.-S. (2020). Environmental Impacts of Scandium Oxide Production from Rare Earths Tailings of Bayan Obo Mine. Journal of Cleaner Production, 122464. doi:https://doi.org/10.1016/j.jclepro.2020.122464). The value reported on the original dataset provided in the critical materials life cycle assessment tool (CMLCAT) of Arshi et al. (2018) has not been considered.
- Praseodymium, in ground [natural resource, in ground]: 0.00142729 kg
  Value has been recalculated, due to the presence of more recent and accurate data. The calculation is based on the following facts: i) Rare earth oxide (REO) content in the Bayan Obo ore is 6% (Source: Koltun, P., & Tharumarajah, A. (2014). Life Cycle Impact of Rare Earth Elements. ISRN Metallurgy, 2014, 907536. doi:10.1155/2014/907536), ii) 6.20% of the REOs consists of Praseodymium oxide and (Source: https://prd-wret.s3.us-west-2.amazonaws.com/assets/palladium/production/atoms/files/myb1-2017-raree.pdf Table 2, page 10) and iii) after adjustment of the reported values to represent the production of 1 kg of rare earth concentrate, 50% REO content, nearly 24 kg of Bayan Obo ore is required to produce 1 kg of rare earth concentrate, 50% REO content. (Source: Wang, L., Wang, P., Chen, W.-Q., Wang, Q.-Q., & Lu, H.-S. (2020). Environmental Impacts of Scandium Oxide Production from Rare Earths Tailings of Bayan Obo Mine. Journal of Cleaner Production, 122464. doi:https://doi.org/10.1016/j.jclepro.2020.122464). The value reported on the original dataset provided in the critical materials life cycle assessment tool (CMLCAT) of Arshi et al. (2018) has not been considered.
- Cerium, in ground [natural resource, in ground]: 0.0115104 kg
  Value has been recalculated, due to the presence of more recent and accurate data. The calculation is based on the following facts: i) Rare earth oxide (REO) content in the Bayan Obo ore is 6% (Source: Koltun, P., & Tharumarajah, A. (2014). Life Cycle Impact of Rare Earth Elements. ISRN Metallurgy, 2014, 907536. doi:10.1155/2014/907536), ii) 50% of the REOs consists of Cerium oxide and (Source: https://prd-wret.s3.us-west-2.amazonaws.com/assets/palladium/production/atoms/files/myb1-2017-raree.pdf Table 2, page 10) and iii) after adjustment of the reported values to represent the production of 1 kg of rare earth concentrate, 50% REO content, nearly 24 kg of Bayan Obo ore is required to produce 1 kg of rare earth concentrate, 50% REO content. (Source: Wang, L., Wang, P., Chen, W.-Q., Wang, Q.-Q., & Lu, H.-S. (2020). Environmental Impacts of Scandium Oxide Production from Rare Earths Tailings of Bayan Obo Mine. Journal of Cleaner Production, 122464. doi:https://doi.org/10.1016/j.jclepro.2020.122464). The value reported on the original dataset provided in the critical materials life cycle assessment tool (CMLCAT) of Arshi et al. (2018) has not been considered.
- Europium, in ground [natural resource, in ground]: 4.60416e-5 kg
  Value has been recalculated, due to the presence of more recent and accurate data. The calculation is based on the following facts: i) Rare earth oxide (REO) content in the Bayan Obo ore is 6% (Source: Koltun, P., & Tharumarajah, A. (2014). Life Cycle Impact of Rare Earth Elements. ISRN Metallurgy, 2014, 907536. doi:10.1155/2014/907536), ii) 0.20% of the REOs consists of Europium oxide and (Source: https://prd-wret.s3.us-west-2.amazonaws.com/assets/palladium/production/atoms/files/myb1-2017-raree.pdf Table 2, page 10) and iii) after adjustment of the reported values to represent the production of 1 kg of rare earth concentrate, 50% REO content, nearly 24 kg of Bayan Obo ore is required to produce 1 kg of rare earth concentrate, 50% REO content. (Source: Wang, L., Wang, P., Chen, W.-Q., Wang, Q.-Q., & Lu, H.-S. (2020). Environmental Impacts of Scandium Oxide Production from Rare Earths Tailings of Bayan Obo Mine. Journal of Cleaner Production, 122464. doi:https://doi.org/10.1016/j.jclepro.2020.122464). The value reported on the original dataset provided in the critical materials life cycle assessment tool (CMLCAT) of Arshi et al. (2018) has not been considered.
- Niobium, in ground [natural resource, in ground]: 0.000260147 kg
  Value has been recalculated, due to the presence of more recent and accurate data. The calculation is based on the following facts: i) Nb2O5 content in the Bayan Obo ore is 0.097% (Source: Wang, L., Wang, P., Chen, W.-Q., Wang, Q.-Q., & Lu, H.-S. (2020). Environmental Impacts of Scandium Oxide Production from Rare Earths Tailings of Bayan Obo Mine. Journal of Cleaner Production, 122464. doi:https://doi.org/10.1016/j.jclepro.2020.122464), ii) after adjustment of the reported values to represent the production of 1 kg of rare earth concentrate, 50% REO content, nearly 24 kg of Bayan Obo ore is required to produce 1 kg of rare earth concentrate, 50% REO content. (same source as above) iii) the subtotal masses of Nb2O5 are: Nb:69.90%, O:30.10% (Source: https://www.lenntech.com/calculators/molecular/molecular-weight-calculator.htm). The value reported on the original dataset provided in the critical materials life cycle assessment tool (CMLCAT) of Arshi et al. (2018) has not been considered.
- Gangue, in ground [natural resource, in ground]: 0.233902 kg
  Value has been calculated by subtracting the sum of the amount of the individual metals that were extracted from the ground (i.e, Iron, Cerium, Lanthanum, Neodymium, Praseodymium, Samarium, Gadolinium, Europium, Scandium, Niobium) from the amount of ore that is required for the production of 1 kg of Rare Earth concentrate (nearly 24 kg). Value was not originally contained in the critical materials life cycle assessment tool (CMLCAT) of Arshi et al. (2018), provided by F. Zhao from Purdue university (more information on the sampling procedure), from which the majority of the exchanges were taken and has been assumed for completeness purposes.Value has been incresed by 0.040174 kg for mass balance purposes.
- Water, unspecified natural origin [natural resource, in water]: 0.0020421 m3
  1.02E-01 m3 of water consumption stems from the mining process, 2.22E-02 m3 from the the iron separation process and the rest (3.55E-03 m3) from the rare earth oxide concentration process. Value adjusted from the original dataset to correspond to the production of 1 kg of REO concentrate.
- Occupation, mineral extraction site [natural resource, land]: 9.20832e-6 m2*year
  (same comment as for sodium hydroxide, without water, in 50% solution state)
- Gadolinium, in ground [natural resource, in ground]: 0.000161146 kg
  Value has been recalculated, due to the presence of more recent and accurate data. The calculation is based on the following facts: i) Rare earth oxide (REO) content in the Bayan Obo ore is 6% (Source: Koltun, P., & Tharumarajah, A. (2014). Life Cycle Impact of Rare Earth Elements. ISRN Metallurgy, 2014, 907536. doi:10.1155/2014/907536), ii) 0.70% of the REOs consists of Gadolinium oxide and (Source: https://prd-wret.s3.us-west-2.amazonaws.com/assets/palladium/production/atoms/files/myb1-2017-raree.pdf Table 2, page 10) and iii) after adjustment of the reported values to represent the production of 1 kg of rare earth concentrate, 50% REO content, nearly 24 kg of Bayan Obo ore is required to produce 1 kg of rare earth concentrate, 50% REO content. (Source: Wang, L., Wang, P., Chen, W.-Q., Wang, Q.-Q., & Lu, H.-S. (2020). Environmental Impacts of Scandium Oxide Production from Rare Earths Tailings of Bayan Obo Mine. Journal of Cleaner Production, 122464. doi:https://doi.org/10.1016/j.jclepro.2020.122464). The value reported on the original dataset provided in the critical materials life cycle assessment tool (CMLCAT) of Arshi et al. (2018) has not been considered.
- Transformation, from unspecified [natural resource, land]: 1.63448e-7 m2
  (same comment as for sodium hydroxide, without water, in 50% solution state)
- Scandium, in ground [natural resource, in ground]: 2.12636e-5 kg
  Value has been recalculated, due to the presence of more recent and accurate data. The calculation is based on the following facts: i) 0.0085% of the Bayan Obo ore consists of Sc2O3 (Source: Wang, L., Wang, P., Chen, W.-Q., Wang, Q.-Q., & Lu, H.-S. (2020). Environmental Impacts of Scandium Oxide Production from Rare Earths Tailings of Bayan Obo Mine. Journal of Cleaner Production, 122464. doi:https://doi.org/10.1016/j.jclepro.2020.122464) and ii) after adjustment of the reported values to represent the production of 1 kg of rare earth concentrate, 50% REO content, nearly 24 kg of Bayan Obo ore is required to produce 1 kg of rare earth concentrate, 50% REO content. (same source as above). iii) the subtotal masses of Sc2O3 are: Nb:65.20%, O:34.80% (Source: https://www.lenntech.com/calculators/molecular/molecular-weight-calculator.htm). The value reported on the original dataset provided in the critical materials life cycle assessment tool (CMLCAT) of Arshi et al. (2018) has not been considered.
- Transformation, to mineral extraction site [natural resource, land]: 1.63448e-7 m2
  (same comment as for sodium hydroxide, without water, in 50% solution state)
- Samarium, in ground [natural resource, in ground]: 0.000184166 kg
  Value has been recalculated, due to the presence of more recent and accurate data. The calculation is based on the following facts: i) Rare earth oxide (REO) content in the Bayan Obo ore is 6% (Source: Koltun, P., & Tharumarajah, A. (2014). Life Cycle Impact of Rare Earth Elements. ISRN Metallurgy, 2014, 907536. doi:10.1155/2014/907536), ii) 0.80% of the REOs consists of Samarium oxide and (Source: https://prd-wret.s3.us-west-2.amazonaws.com/assets/palladium/production/atoms/files/myb1-2017-raree.pdf Table 2, page 10) and iii) after adjustment of the reported values to represent the production of 1 kg of rare earth concentrate, 50% REO content, nearly 24 kg of Bayan Obo ore is required to produce 1 kg of rare earth concentrate, 50% REO content. (Source: Wang, L., Wang, P., Chen, W.-Q., Wang, Q.-Q., & Lu, H.-S. (2020). Environmental Impacts of Scandium Oxide Production from Rare Earths Tailings of Bayan Obo Mine. Journal of Cleaner Production, 122464. doi:https://doi.org/10.1016/j.jclepro.2020.122464). The value reported on the original dataset provided in the critical materials life cycle assessment tool (CMLCAT) of Arshi et al. (2018) has not been considered.
- Iron, in ground [natural resource, in ground]: 0.126614 kg
  Value has been recalculated, due to the presence of more recent and accurate data. The calculation is based on the following facts: i) Iron content in the Bayan Obo ore is 33% (Source: Koltun, P., & Tharumarajah, A. (2014). Life Cycle Impact of Rare Earth Elements. ISRN Metallurgy, 2014, 907536. doi:10.1155/2014/907536) and ii) after adjustment of the reported values to represent the production of 1 kg of rare earth concentrate, 50% REO content, nearly 24 kg of Bayan Obo ore is required to produce 1 kg of rare earth concentrate, 50% REO content. (Source: Wang, L., Wang, P., Chen, W.-Q., Wang, Q.-Q., & Lu, H.-S. (2020). Environmental Impacts of Scandium Oxide Production from Rare Earths Tailings of Bayan Obo Mine. Journal of Cleaner Production, 122464. doi:https://doi.org/10.1016/j.jclepro.2020.122464). The value reported on the original dataset provided in the critical materials life cycle assessment tool (CMLCAT) of Arshi et al. (2018) has not been considered.

## Emissions to nature
- Particulates, < 2.5 um [air, low population density, long-term]: 6.91304e-5 kg; lognormal variance with pedigree 0.300825, pedigree (2,1,2,2,1)
  4.32E-03 kg stems from the mining process and the rest (4.25E-06 kg) from the rare earth oxide concentration process. All values taken from the critical materials life cycle assessment tool (CMLCAT) of Arshi et al. (2018), provided by F. Zhao from Purdue university (more information on the sampling procedure) and adjusted from the original dataset to correspond to the production of 1 kg of REO concentrate.
- Radium-226 [water, unspecified]: 0.000184646 kBq; lognormal variance with pedigree 0.650825, pedigree (2,1,2,2,1)
  (same comment as for sodium hydroxide, without water, in 50% solution state)
- Thorium-232 [water, unspecified]: 0.00093522 kBq; lognormal variance with pedigree 0.650825, pedigree (2,1,2,2,1)
  (same comment as for sodium hydroxide, without water, in 50% solution state)
- Heat, waste [air, low population density, long-term]: 0.00246035 MJ; lognormal variance with pedigree 0.001425, pedigree (2,1,2,2,1)
  (same comment as for sodium hydroxide, without water, in 50% solution state)
- Nitrogen oxides [air, low population density, long-term]: 1.05912e-6 kg; lognormal variance with pedigree 0.040825, pedigree (2,1,2,2,1)
  (same comment as for sodium hydroxide, without water, in 50% solution state)
- Radium-226 [air, low population density, long-term]: 0.004796 kBq; lognormal variance with pedigree 0.300825, pedigree (2,1,2,2,1)
  (same comment as for sodium hydroxide, without water, in 50% solution state)
- Particulates, > 10 um [air, low population density, long-term]: 0.000676236 kg; lognormal variance with pedigree 0.040825, pedigree (2,1,2,2,1)
  4.32E-02 kg stems from the mining process and the rest (3.48E-04 kg) from the iron separation process. All values taken from the critical materials life cycle assessment tool (CMLCAT) of Arshi et al. (2018), provided by F. Zhao from Purdue university (more information on the sampling procedure) and adjusted from the original dataset to correspond to the production of 1 kg of REO concentrate.
- Sulfur dioxide [air, low population density, long-term]: 1.57469e-6 kg; lognormal variance with pedigree 0.001425, pedigree (2,1,2,2,1)
  (same comment as for sodium hydroxide, without water, in 50% solution state)
- Thorium-232 [air, low population density, long-term]: 0.0242678 kBq; lognormal variance with pedigree 0.300825, pedigree (2,1,2,2,1)
  (same comment as for sodium hydroxide, without water, in 50% solution state)
- Particulates, > 2.5 um, and < 10um [air, low population density, long-term]: 0.000676236 kg; lognormal variance with pedigree 0.120825, pedigree (2,1,2,2,1)
  3.90E-02 kg stems from the mining process and the rest (3.29E-03 kg) from the iron separation process. All values taken from the critical materials life cycle assessment tool (CMLCAT) of Arshi et al. (2018), provided by F. Zhao from Purdue university (more information on the sampling procedure) and adjusted from the original dataset to correspond to the production of 1 kg of REO concentrate.
- Uranium-238 [water, unspecified]: 2.47474e-6 kBq; lognormal variance with pedigree 0.650825, pedigree (2,1,2,2,1)
  (same comment as for sodium hydroxide, without water, in 50% solution state)
- Uranium-238 [air, low population density, long-term]: 6.42664e-5 kBq; lognormal variance with pedigree 0.300825, pedigree (2,1,2,2,1)
  (same comment as for sodium hydroxide, without water, in 50% solution state)

## Sampling procedure
This dataset is based on the following publication: Arshi, P. S., Vahidi, E., & Zhao, F. (2018). Behind the Scenes of Clean Energy: The Environmental Footprint of Rare Earth Products. ACS Sustainable Chemistry & Engineering, 6(3), 3311-3320. doi:10.1021/acssuschemeng.7b03484. All exchanges from/ to the environment and from/to the technosphere were calculated using the critical materials life cycle assessment tool (CMLCAT) of Arshi et al. (2018), provided by F. Zhao from Purdue university. This excel-based software acts as a supporting tool to the abovementioned publication. Exception to this case is the calculation of the amount of the individual metals and gangue materials that were mined from the ground as well as the amounts of the produced byproducts. The abovementioned exchanges have been calculated based on various sources and their calculation is reported analytically on the general comments of the respective exchanges. Individual exchanges such as rare earth tailings, wastewater and gangue which were not contained in the original datasets have been added for completeness purposes and their calculation is based on mass balance.

## Extrapolations
The original mining inventory was obtained from - Sprecher, B., Xiao, Y., Walton, A., Speight, J., Harris, R., Kleijn, R., . . . Kramer, G. J. (2014). Life cycle inventory of the production of rare earths and the subsequent production of NdFeB rare earth permanent magnets. Environ Sci Technol, 48(7), 3951-3958. doi:10.1021/es404596q - which was based on the Ecoinvent dataset for iron mining. Environmental flows of rare earths were added according to the authors of the publication.
