# steel production, electric, low-alloyed

Dataset: EcoSpold 2, unit process
Geography: IN
Time period: 2010-01-01 to 2021-12-31
Technology level: modern
Classification: EcoSpold01Categories: metals/extraction
Classification: ISIC rev.4 ecoinvent: 2410:Manufacture of basic iron and steel
Scenario: Business-as-Usual
System model: Allocation, cut-off by classification
Share of production covered: 5 %
Generated by: Harshita Soni
Published in: Soni H. 2017
Database: ecoinvent
isCopyrightProtected: true
accessRestrictedTo: 1

## General comment
This dataset represents steel making through electric arc furnace route.

The electric arc furnace operates as a batch melting process producing batches of molten steel known "heats". The electric arc furnace operating cycle is called the tap-to-tap cycle and is made up of the following operations:

Furnace charging
Melting
Refining
De-slagging
Tapping
Furnace turn-around

## Included activities start
Activity starts with the arrival of iron scrap, pig iron, sponge iron at the electric furnace

## Included activities end
This activity ends at the exit of the electric arc furnace

## Geography
Data collected from integrated steel plants in India

## Technology
Scrap metal is delivered to a scrap bay, located next to the melt shop. Scrap generally comes in two main grades: shred (whitegoods, cars and other objects made of similar light-gauge steel) and heavy melt (large slabs and beams), along with some direct reduced iron (DRI) or pig iron for chemical balance. Some furnaces melt almost 100% DRI.

The scrap is loaded into large buckets called baskets, with "clamshell" doors for a base. Care is taken to layer the scrap in the basket to ensure good furnace operation; heavy melt is placed on top of a light layer of protective shred, on top of which is placed more shred. These layers should be present in the furnace after charging. After loading, the basket may pass to a scrap pre-heater, which uses hot furnace off-gases to heat the scrap and recover energy, increasing plant efficiency.

The scrap basket is then taken to the melt shop, the roof is swung off the furnace, and the furnace is charged with scrap from the basket. Charging is one of the more dangerous operations for the EAF operators. A lot of potential energy is released by the tonnes of falling metal; any liquid metal in the furnace is often displaced upwards and outwards by the solid scrap, and the grease and dust on the scrap is ignited if the furnace is hot, resulting in a fireball erupting. In some twin-shell furnaces, the scrap is charged into the second shell while the first is being melted down, and pre-heated with off-gas from the active shell. Other operations are continuous charging—pre-heating scrap on a conveyor belt, which then discharges the scrap into the furnace proper, or charging the scrap from a shaft set above the furnace, with off-gases directed through the shaft. Other furnaces can be charged with hot (molten) metal from other operations.

After charging, the roof is swung back over the furnace and meltdown commences. The electrodes are lowered onto the scrap, an arc is struck and the electrodes are then set to bore into the layer of shred at the top of the furnace. Lower voltages are selected for this first part of the operation to protect the roof and walls from excessive heat and damage from the arcs. Once the electrodes have reached the heavy melt at the base of the furnace and the arcs are shielded by the scrap, the voltage can be increased and the electrodes raised slightly, lengthening the arcs and increasing power to the melt. This enables a molten pool to form more rapidly, reducing tap-to-tap times. Oxygen is blown into the scrap, combusting or cutting the steel, and extra chemical heat is provided by wall-mounted oxygen-fuel burners. Both processes accelerate scrap meltdown. Supersonic nozzles enable oxygen jets to penetrate foaming slag and reach the liquid bath.

An important part of steelmaking is the formation of slag, which floats on the surface of the molten steel. Slag usually consists of metal oxides, and acts as a destination for oxidised impurities, as a thermal blanket (stopping excessive heat loss) and helping to reduce erosion of the refractory lining. For a furnace with basic refractories, which includes most carbon steel-producing furnaces, the usual slag formers are calcium oxide (CaO, in the form of burnt lime) and magnesium oxide (MgO, in the form of dolomite and magnesite). These slag formers are either charged with the scrap, or blown into the furnace during meltdown. Another major component of EAF slag is iron oxide from steel combusting with the injected oxygen. Later in the heat, carbon (in the form of coke or coal) is injected into this slag layer, reacting with the iron oxide to form metallic iron and carbon monoxide gas, which then causes the slag to foam, allowing greater thermal efficiency, and better arc stability and electrical efficiency. The slag blanket also covers the arcs, preventing damage to the furnace roof and sidewalls from radiant heat.

Once the scrap has completely melted down and a flat bath is reached, another bucket of scrap can be charged into the furnace and melted down, although EAF development is moving towards single-charge designs. After the second charge is completely melted, refining operations take place to check and correct the steel chemistry and superheat the melt above its freezing temperature in preparation for tapping. More slag formers are introduced and more oxygen is blown into the bath, burning out impurities such as silicon, sulfur, phosphorus, aluminium, manganese, and calcium, and removing their oxides to the slag. Removal of carbon takes place after these elements have burnt out first, as they have a greater affinity for oxygen. Metals that have a poorer affinity for oxygen than iron, such as nickel and copper, cannot be removed through oxidation and must be controlled through scrap chemistry alone, such as introducing the direct reduced iron and pig iron mentioned earlier. A foaming slag is maintained throughout, and often overflows the furnace to pour out of the slag door into the slag pit. Temperature sampling and chemical sampling take place via automatic lances. Oxygen and carbon can be automatically measured via special probes that dip into the steel, but for all other elements, a "chill" sample—a small, solidified sample of the steel—is analysed on an arc-emission spectrometer.

Once the temperature and chemistry are correct, the steel is tapped out into a preheated ladle through tilting the furnace. For plain-carbon steel furnaces, as soon as slag is detected during tapping the furnace is rapidly tilted back towards the deslagging side, minimising slag carryover into the ladle. For some special steel grades, including stainless steel, the slag is poured into the ladle as well, to be treated at the ladle furnace to recover valuable alloying elements. During tapping some alloy additions are introduced into the metal stream, and more lime is added on top of the ladle to begin building a new slag layer. Often, a few tonnes of liquid steel and slag is left in the furnace in order to form a "hot heel", which helps preheat the next charge of scrap and accelerate its meltdown. During and after tapping, the furnace is "turned around": the slag door is cleaned of solidified slag, the visible refractories are inspected and water-cooled components checked for leaks, and electrodes are inspected for damage or lengthened through the addition of new segments; the taphole is filled with sand at the completion of tapping. For a 90-tonne, medium-power furnace, the whole process will usually take about 60–70 minutes from the tapping of one heat to the tapping of the next (the tap-to-tap time).

The furnace is completely emptied of steel and slag on a regular basis so that an inspection of the refractories can be made and larger repairs made if necessary. As the refractories are often made from calcined carbonates, they are extremely susceptible to hydration from water, so any suspected leaks from water-cooled components are treated extremely seriously, beyond the immediate concern of potential steam explosions. Excessive refractory wear can lead to breakouts, where the liquid metal and slag penetrate the refractory and furnace shell and escape into the surrounding areas.

## Time period
Data for this dataset was provided for the year April 2014- March 2015.

## Parameters
- electricity, ladler furnace: 0.113121 kWh; name kWh_ladler; lognormal variance with pedigree 0.0033, pedigree (2,4,1,3,1)
  Measured value. Electricity consumption for ladler furnace for alloying based on reported value from one facility in Qc region.
- electricity, electric arc furnace: 0.42361 kWh; name kWh_EAF; lognormal variance with pedigree 0.0034, pedigree (2,3,2,5,1)
- fraction, process water, to air: 0.2 dimensionless; name fraction_PW_to_air; lognormal variance with pedigree 0.092025, pedigree (4,4,3,2,4)

## Reference product
- steel, low-alloyed: 1 kg; name RP_amount; By-product classification allocatable product; CPC 41122: Alloy steel in ingots or other primary forms and semi-finished products of alloy steel
  Steel manufactured by Electric Arc Furnace
  production volume 4.96331e9 kg; name RP_PV
    Calculated based on the amount of crude steel produced in India through the EAF route in 2019 (worldsteel, 2020), excluding the amount of stainless steel produced in India (ISSF 2021).
    Globally, 89% of the steel produced is unalloyed and 11% is alloyed (Gerbens-Leenes et al. 2018). Based on the amount of stainless (chromium) steel produced globally (ISSF 2021), 8.2% of the steel produced is low-alloyed and 2.8% is stainless. Therefore, out of the steel that is not stainless steel, 91.6% is unalloyed and 8.4% is low-alloyed. These shares are assumed valid for India as well.
    References:
    P.W. Gerbens-Leenes, A.Y. Hoekstra, R. Bosman (2018). The blue and grey water footprint of construction materials: Steel, cement and glass. Water Resources and Industry, Volume 19. https://doi.org/10.1016/j.wri.2017.11.002.
    worldsteel (2020). Steel Statistical Yearbook 2020 [online]. Available from: https://www.worldsteel.org/en/dam/jcr:5001dac8-0083-46f3-aadd-35aa357acbcc/Steel%2520Statistical%2520Yearbook%25202020%2520%2528concise%2520version%2529.pdf (accessed 20.07.2021).
    International Stainless Steel Forum (ISSF) (2021). Stainless Steel in Figures 2021 [online]. Available from: https://www.worldstainless.org/files/issf/non-image-files/PDF/ISSF_Stainless_Steel_in_Figures_2021_English_public_version.pdf (accessed 21.07.2021).
  property heating value, net 0 MJ
    Non combustible products are assumed to have an LHV equal to zero (0).
  property carbon content 0.005
    carbon content on a dry matter basis (reserved; not for manual entry)
  properties: carbon content, fossil 0.005, dry mass 1 kg, wet mass 1 kg, price 0.468 EUR2005, water in wet mass 0 kg, water content 0, carbon content, non-fossil 0, carbon allocation 0.005 kg

## By-products
- iron scrap, unsorted: 0 kg; CPC 39310: Slag, dross, scalings and other waste from the manufacture of iron or steel; By-product classification Recyclable; pedigree (1,1,1,1,1)
  Based on data received from integrated steel plants in India
  production volume 0 kg; = RP_PV*scrap/RP_amount
    Calculated from production volume of reference product using the relative outputs.
  property price 0.149 EUR2005; name scrap_price_EUR2005
    Temporary price data. Calculated as 90% of purchasers price based on: estimated at 85% of sorted scrap
  property carbon content 0
    carbon content on a dry matter basis (reserved; not for manual entry)
  properties: dry mass 1 kg, carbon content, non-fossil 0, wet mass 1 kg, carbon content, fossil 0, water content 0, water in wet mass 0 kg, carbon allocation 0 kg

## Inputs from technosphere
- coke: 0.0123 MJ; lognormal variance with pedigree 0.0058, pedigree (3,3,3,1,2)
  Based on data received from integrated steel plants in India
  properties: carbon content, fossil 0.869149, dry mass 0.0328671 kg, water content 0.0638298, wet mass 0.034965 kg, heating value, net 28.6 MJ
- electric arc furnace converter: 4e-11 unit; lognormal variance with pedigree 0.2952, pedigree (3,3,3,1,2)
  EcoSpold01Location=RER
  Based on ecoinvent dataset "steel production, electric, low-alloyed, GLO" accessed through ecoeditor on 20170815
- lubricating oil: 0.078 kg; lognormal variance with pedigree 0.0058, pedigree (3,3,3,1,2)
  Based on data received from integrated steel plants in India
  properties: heating value, net 40.2 MJ, carbon content, fossil 0.75, dry mass 1 kg, wet mass 1 kg
  note on heating value, net: Literature value, Source: IPCC 2006, 2006 IPCC Guidelines for National Greenhouse Gas Inventories, Prepared by the National Greenhouse Gas Inventories Programme, Eggleston H.S., Buendia L., Miwa K., Ngara T. and Tanabe K. (eds). Published: IGES, Japan
  note on carbon content, fossil: Lubricating oil is produced from diesel. C-content/dry mass of fats and oils considered 75%, from: ecoinvent v2.2 report, n 15a, pg 40
- electric arc furnace slag: -0.0003326 kg; name slag; lognormal variance with pedigree 0.0052, pedigree (2,3,3,5,1)
  Based on data received from integrated steel plants in India
  EcoSpold01Location=CH
  production volume 1.6508e6 kg; = RP_PV*slag/RP_amount
    Calculated from the production volume of steel, low-alloyed in proportion to the respective output amounts.
  property price 0 EUR2005; name slag_price_EUR2005
  properties: carbon content, fossil 0.00338635, dry mass 1 kg, wet mass 1 kg
- electric arc furnace dust: -0.0096 kg; name dust; lognormal variance with pedigree 0.0052, pedigree (3,3,3,1,2)
  Based on ecoinvent dataset "steel production, electric, low-alloyed, GLO" accessed through ecoeditor on 20170815
  EcoSpold01Location=CH
  production volume 4.76478e7 kg; = RP_PV*dust/RP_amount
    (same comment as for electric arc furnace slag)
  property price 0 EUR2005; name dust_price_EUR2005
  properties: dry mass 0.846 kg, water content 0.182033, wet mass 1 kg, carbon content, fossil 0.01339
- liquefied petroleum gas: 0.000793608 kg; lognormal variance with pedigree 0.0058, pedigree (3,3,3,1,2)
  Based on data received from integrated steel plants in India
  properties: carbon content, fossil 0.821863, dry mass 1 kg, heating value, net 45.5 MJ, wet mass 1 kg
  note on heating value, net: Indicative value. Reference: Fuels - Higher and Lower Calorific Values, available at: https://www.engineeringtoolbox.com/fuels-higher-calorific-values-d_169.html
- lime: 0.0484 kg; lognormal variance with pedigree 0.0058, pedigree (3,3,3,1,2)
  Based on data received from integrated steel plants in India
  properties: wet mass 1 kg, dry mass 1 kg, carbon content, fossil 0.120005
- inert waste, for final disposal: -0.005 kg; name inert; lognormal variance with pedigree 0.0058, pedigree (3,3,3,1,2)
  (same comment as for electric arc furnace dust)
  production volume 2.48166e7 kg; = RP_PV*inert/RP_amount
    (same comment as for electric arc furnace slag)
  property price 0 EUR2005; name inert_price_EUR2005
  properties: water content 0.00502513, wet mass 1 kg, dry mass 0.995 kg
- oxygen, liquid: 0.0617 kg; lognormal variance with pedigree 0.0058, pedigree (3,3,3,1,2)
  EcoSpold01Location=RER
  Based on data received from integrated steel plants in India
  properties: wet mass 1 kg, dry mass 1 kg
- electrode, negative, Ni: 0.00134266 kg; lognormal variance with pedigree 0.0058, pedigree (3,3,3,1,2)
  Based on data received from integrated steel plants in India
  properties: dry mass 1 kg, carbon content, fossil 0.00301397, wet mass 1 kg
- dolomite: 0.044 kg; lognormal variance with pedigree 0.0058, pedigree (3,3,3,1,2)
  Based on data received from integrated steel plants in India
  properties: dry mass 1 kg, heating value, net 3.95 MJ, wet mass 1 kg, carbon content, fossil 0.130435
- ferromanganese, high-coal, 74.5% Mn: 0.000283 kg; lognormal variance with pedigree 0.0058, pedigree (3,3,3,1,2)
  Based on data received from integrated steel plants in India
  properties: carbon content, fossil 0.075, heating value, net 2.27 MJ, wet mass 1 kg, dry mass 1 kg
- sponge iron: 0.639957 kg; lognormal variance with pedigree 0.0058, pedigree (3,3,3,1,2)
  Based on data received from integrated steel plants in India
  properties: wet mass 1 kg, sulfur content 0.03, iron content 0.82, phosphorus content 0.05, heating value, net 3.03 MJ, dry mass 1 kg, carbon content, fossil 0.1
- electricity, medium voltage: 0.3931 kWh; lognormal variance with pedigree 0.0058, pedigree (3,3,3,1,2)
  Based on data received from integrated steel plants in India
  EcoSpold01Location=UCTE
  Uncertainty: Calculated variable. Uncertainty will be determined from propagation of uncertainty factors of underlying variables. Uncertainty of actual relation between variables not accounted for at this time, although this could be included in a future update.
- refractory, basic, packed: 0.0135 kg; lognormal variance with pedigree 0.0052, pedigree (3,3,3,1,2)
  Based on data received from integrated steel plants in India
  EcoSpold01Location=DE
  properties: dry mass 1 kg, wet mass 1 kg
- aluminium, wrought alloy: 0.000358908 kg; lognormal variance with pedigree 0.0058, pedigree (3,3,3,1,2)
  Based on data received from integrated steel plants in India
  properties: dry mass 1 kg, wet mass 1 kg
- ferrochromium, high-carbon, 68% Cr: 0.00208 kg; lognormal variance with pedigree 0.0058, pedigree (3,3,3,1,2)
  Based on data received from integrated steel plants in India
  properties: dry mass 1 kg, carbon content, fossil 0.07, heating value, net 2.12 MJ, wet mass 1 kg
- heavy fuel oil: 0.000465041 kg; lognormal variance with pedigree 0.0058, pedigree (3,3,3,1,2)
  Based on data received from integrated steel plants in India
  properties: carbon content, fossil 0.849, heating value, net 41.2 MJ, wet mass 1 kg, dry mass 1 kg
- pig iron: 0.52371 kg; lognormal variance with pedigree 0.0058, pedigree (3,3,3,1,2)
  Based on data received from integrated steel plants in India
  properties: carbon content, fossil 0.045, dry mass 1 kg, wet mass 1 kg
- wastewater, average: -0.103217 m3; name wastewater_amount; = (water_UNO_input*(1 - fraction_PW_to_air))*-1; lognormal variance with pedigree 0.0452, pedigree (3,3,3,1,2)
  It is assumed that 80% of water consumed as input to the process is sent out as wastewater for treatment. The wastewater after treatment is recycled and reused again in the process.
  production volume 5.12296e8 m3; = wastewater_amount * RP_PV / RP_amount
    Calculated from production volume of reference product using the relative outputs.
  property price 0 EUR2005; name wastewater_amount_price_EUR2005
  properties: carbon content, non-fossil 0.194039, dry mass 0.346837 kg, wet mass 1000 kg, water content 2882.2
  note on carbon content, non-fossil: 0.0673 kg TOC/m3 (Tab A.17, ecoinvent v2.2 report 13_I). TOC was considered as Total Carbon.
- nitrogen, liquid: 0.0358 kg; lognormal variance with pedigree 0.0058, pedigree (3,3,3,1,2)
  Based on data received from integrated steel plants in India
  properties: dry mass 1 kg, wet mass 1 kg
- ferrosilicon: 0.0135 kg; name FeSi; lognormal variance with pedigree 0.0058, pedigree (3,3,3,1,2)
  Based on data received from integrated steel plants in India
  properties: dry mass 1 kg, heating value, net 3.03 MJ, carbon content, fossil 0.1, wet mass 1 kg
- iron scrap, sorted, pressed: 0.0956 kg; lognormal variance with pedigree 0.0058, pedigree (3,3,3,1,2)
  Based on data received from integrated steel plants in India
  properties: dry mass 1 kg, wet mass 1 kg
- iron scrap, unsorted: -3.12e-5 kg; lognormal variance with pedigree 0.0058, pedigree (3,3,3,1,2)
  Based on data received from integrated steel plants in India
  production volume 154855 kg
  properties: dry mass 1 kg, wet mass 1 kg

## Inputs from nature
- Water, unspecified natural origin [natural resource, in ground]: 0.129021 m3; name water_UNO_input; lognormal variance with pedigree 0.0058, pedigree (3,3,3,1,2)
  Based on data received from integrated steel plants in India

## Emissions to nature
- Lead [air, unspecified]: 1.808e-6 kg; lognormal variance with pedigree 0.6552, pedigree (3,3,3,1,2)
  Based on ecoinvent dataset "steel production, electric, low-alloyed, GLO" accessed through ecoeditor on 20170815
- Nickel [air, unspecified]: 7.005e-7 kg; lognormal variance with pedigree 0.6552, pedigree (3,3,3,1,2)
  (same comment as for Lead)
- PAH, polycyclic aromatic hydrocarbons [air, unspecified]: 3.725e-8 kg; lognormal variance with pedigree 0.3052, pedigree (3,3,3,1,2)
  (same comment as for Lead)
- Sulfur dioxide [air, unspecified]: 7.7e-5 kg; lognormal variance with pedigree 0.0452, pedigree (3,3,3,1,2)
  (same comment as for Lead)
- Polychlorinated biphenyls [air, unspecified]: 2.325e-8 kg; lognormal variance with pedigree 0.3052, pedigree (3,3,3,1,2)
  (same comment as for Lead)
- Dioxins, measured as 2,3,7,8-tetrachlorodibenzo-p-dioxin [air, unspecified]: 4.535e-12 kg; lognormal variance with pedigree 0.3052, pedigree (3,3,3,1,2)
  (same comment as for Lead)
- Water [air, unspecified]: 0.0258042 m3; name water_to_air_unspecified; = (water_UNO_input*fraction_PW_to_air); lognormal variance with pedigree 0.0447, pedigree (2,2,3,5,1)
  Based on the assumption that 20% of water consumed is sent to air and 80% is wastewater
  property fraction, origin: fresh water 0; name fraction_origin_fresh_water
  property fraction, origin: unspecified 1; name fraction_origin_unspecified
  property fraction, origin: salt water 0; name fraction_origin_salt_water
- Hydrogen fluoride [air, unspecified]: 2.35e-6 kg; lognormal variance with pedigree 0.0452, pedigree (3,3,3,1,2)
  (same comment as for Lead)
- Benzene [air, unspecified]: 2.285e-6 kg; lognormal variance with pedigree 0.1238, pedigree (2,3,3,1,2)
  (same comment as for Lead)
- Copper [air, unspecified]: 2.305e-7 kg; lognormal variance with pedigree 0.6552, pedigree (3,3,3,1,2)
  (same comment as for Lead)
- Chromium VI [water, unspecified]: 2.71581e-7 kg; lognormal variance with pedigree 0.0452, pedigree (3,3,3,1,2)
  Based on ecoinvent dataset "steel production, electric, low-alloyed, CA-QC" accessed through ecoeditor on 20170922
- Nitrogen oxides [air, unspecified]: 0.00018 kg; lognormal variance with pedigree 0.0452, pedigree (3,3,3,1,2)
  (same comment as for Lead)
- Mercury [air, unspecified]: 2.238e-6 kg; lognormal variance with pedigree 0.6552, pedigree (3,3,3,1,2)
  (same comment as for Lead)
- Chromium [air, unspecified]: 1.254e-6 kg; lognormal variance with pedigree 0.6552, pedigree (3,3,3,1,2)
  (same comment as for Lead)
- Hydrogen chloride [air, unspecified]: 5.2e-6 kg; lognormal variance with pedigree 0.0452, pedigree (3,3,3,1,2)
  (same comment as for Lead)
- Carbon dioxide, fossil [air, unspecified]: 0.08 kg; lognormal variance with pedigree 0.0452, pedigree (3,3,3,1,2)
  Source: IPCC Guidelines for National Greenhouse Gas Inventories (2006), Chapter 4 Metal Industry Emissions
- Chloride [water, unspecified]: 0.000258002 kg; lognormal variance with pedigree 0.0452, pedigree (3,3,3,1,2)
  (same comment as for Chromium VI)
- Particulates, < 2.5 um [air, unspecified]: 0.00016596 kg; lognormal variance with pedigree 0.3052, pedigree (3,3,3,1,2)
  (same comment as for Lead)
- Zinc [air, unspecified]: 2.294e-5 kg; lognormal variance with pedigree 0.6552, pedigree (3,3,3,1,2)
  (same comment as for Lead)
- Particulates, > 10 um [air, unspecified]: 5.8575e-5 kg; lognormal variance with pedigree 0.0452, pedigree (3,3,3,1,2)
  (same comment as for Lead)
- Particulates, > 2.5 um, and < 10um [air, unspecified]: 0.00016596 kg; lognormal variance with pedigree 0.1252, pedigree (3,3,3,1,2)
  (same comment as for Lead)
- Benzene, hexachloro- [air, unspecified]: 2e-8 kg; lognormal variance with pedigree 0.1252, pedigree (3,3,3,1,2)
  (same comment as for Lead)
- Cadmium [air, unspecified]: 3.65e-8 kg; lognormal variance with pedigree 0.6552, pedigree (3,3,3,1,2)
  (same comment as for Lead)
- Carbon monoxide, fossil [air, unspecified]: 0.00232 kg; lognormal variance with pedigree 0.6552, pedigree (3,3,3,1,2)
  (same comment as for Lead)
- Hydrocarbons, aromatic [air, unspecified]: 7.7008e-5 kg; lognormal variance with pedigree 0.0452, pedigree (3,3,3,1,2)
  (same comment as for Lead)

## Sampling procedure
Based on data received from two manufacturing plants in India.

Steel manufactured from two units: 12, 34,299 tonnes

Total steel manufactured in India via electric arc furnace route: 2,39,61,600 tonnes

Therefore, 5% of production is represented in this dataset

## Extrapolations
This dataset has been extrapolated from year 2017 to the year of the calculation (2021). The uncertainty has been adjusted accordingly.
