# cocoa bean production, sun-dried

Dataset: EcoSpold 2, unit process
Geography: RoW
Time period: 2009-01-01 to 2021-12-31
Technology level: current
Classification: ISIC rev.4 ecoinvent: 0127:Growing of beverage crops
Tags: WFLDB
Scenario: Business-as-Usual
System model: Allocation, cut-off by classification
Generated by: [System]
Database: ecoinvent
isCopyrightProtected: true
accessRestrictedTo: 1

## General comment
This dataset is a weighted average of the regional datasets, with weights based on production volume of the reference product. Detailed comments and sources about the exchanges can be found in the regional datasets.
The geographicalCorrelation score of every pedigree matrix of was changed to '5'.
Sum of regional production volumes: 2.888e+9 kg
CI: PV = 1.380e+9 kg; weight = 0.478
ID: PV = 7.767e+8 kg; weight = 0.269
GH: PV = 7.305e+8 kg; weight = 0.253
Yield of the global dataset = 541.235770335 kg/ha, calculated as a weighted average of the regional yields.
The comments below were part of the CI regional dataset.
This dataset represents the production of 1 kg of cocoa beans. The reference flow is the average yield per ha and year, from 2009 - 2012: yield (613 kg/ha) obtained under irrigated conditions (total amount of water 985 m3/ha). The data are representative for cocoa beans production in Ivory Coast used for the export market. Mineral NPK fertiliser input is 30-6-27 kg/ha. No organic fertilisers are applied. Total active ingredients (a.i.) applied as pesticides amount to 9.6 kg a.i./ha.
The dataset was modelled within the project 'World Food LCA database (WFLDB)'. The aim of this project was to provide inventories of a broad variety of agricultural products and processes and to cover for each product at least 50% of the global export market. The export share of cocoa beans produced in the Ivory Coast amounts to 29.2 % of the global export (tonnage exported in 2010). The production system regarded in this dataset aimed at representing cocoa beans produced in Ivory Coast for the export market.
Statistical data from FAO used to assess land use change is incomplete for Côte d’Ivoire. The original land use of 50.7 % of perennial cropland transformed in the last 20 years is unknown. To avoid a potentially significant underestimation of land use change impacts, the conservative assumption was made that the unknown land transformation share shall be attributed to transformation from forest land (primary and secondary).
PEF-Quality: data quality rating (DQR) = 1.7 (i.e. very good quality). This dataset refers to an average situation; for specific situations exchanges might differ substantially due to site specific parameters

## Included activities start
This activity starts with the nursery producing fruit tree seedlings, i.e.grafted young trees to be planted.

## Included activities end
This activity ends with the waste treatment after the clearing of the orchard (rooting up the trees). The dataset includes all activities during a year in the productive phase of the orchard including the establishment phase per year of lifetime (50 years), the clearing of the orchard including waste treatment.
The establishment phase of the orchard includes tree nursery, soil cultivation, planting trees, sowing grass and irrigation. Fertiliser and pesticide use in a year of the establishment phase is assumed to be half of the amount of a year in the productive phase.
The productive phase of the orchard includes fertiliser and pesticide application, harvesting and irrigation. Machine use and infrastructure are excluded as most of the work is assumed to be manual work. Further, direct field emissions and land use change are included. At the end of the productive phase the orchard is cleared by rooting up the trees. On-site fermentation and sun-drying of the cocoa beans are included.
Waste treatment after the clearing of the orchard includes the incineration of tree wood. The inputs of seedlings, fertilisers and pesticides as well as packaging of fertilisers and pesticides are considered. Heavy metal uptake by the crop is considered.

## Reference product
- cocoa bean: 1 kg; CPC 01640: Cocoa beans; By-product classification allocatable product
  production volume 1.56894e9 kg
    Source: FAOSTAT. Average, 2009-2012
  property price 1.4 EUR2005
    Calculated value based on data from United Nations Commodity Trade Statistics Database (comtrade.un.org). UN comtrade category: 1801 Cocoa beans, whole or broken, raw or roasted. Year: 2005. Using exchange rate of 1EURO = 1.209 USD. Average of price of import into 5 main markets (EU, US, JP, IN and CN).
  property carbon content, non-fossil 0.535987
    calculation: C-content of components according to ecoinvent report No. 15a. Source of composition: http://www.fao.org/ag/aga/agap/frg/afris/Data/521.HTM.
  property carbon content 0.535987
    carbon content on a dry matter basis (reserved; not for manual entry)
  properties: water in wet mass 0.0530303 kg, dry mass 0.94697 kg, water content 0.056, carbon content, fossil 0, wet mass 1 kg, carbon allocation 0.507563 kg

## Inputs from technosphere
- establishing orchard: 0.0131547 unit; lognormal variance with pedigree 0.126177, pedigree (2,1,4,5,1)
  Literature value or expert estimation (FAO 2004). This is the number of trees per ha divided by the lifetime years of the orchard.
- inorganic nitrogen fertiliser, as N: 0 kg; pedigree (1,1,1,1,1)
  Calculated based on literature values: The nutrient content of the crop multiplied by the country-share of the fertiliser type (IFA 2014). See supporting documentation 'WFLDB-Documentation.pdf' chapter 'Fertiliser application' for L1 data and appendix for the source of nutrient content (https://ecoquery.ecoinvent.org/File/Reports).
  Corresponds to 12.3 kg N/ha
  properties: dry mass 1 kg, wet mass 1 kg
- transport, tractor and trailer, agricultural: 0.00200002 metric ton*km; lognormal variance with pedigree 0.164439, pedigree (4,1,4,5,1)
  On-farm transport: Yield (in tonnes) multiplied by the average distance from field to farm. The distance was assumed to be 2 km (proxy).
- cyclic N-compound: 0.000366744 kg; lognormal variance with pedigree 0.0158498, pedigree (2,2,4,5,1)
  Literature value or expert estimation (Ntiamoah et al. 2008, Ministère de l'Agriculture 2014).
  properties: dry mass 1 kg, carbon content, fossil 0.641962, wet mass 1 kg
- waste wood, untreated: 0 kg; pedigree (1,1,1,1,1)
  Wood from trees after 1-2 years of sorrage at the field (20% water) per lifetime year (estimated 50 years in this dataset) of the orchard
  production volume 0 kg
    Calculated from reference product production volume, reference product amount and byproduct amount.
  properties: water content 0.25, heating value, net 13.99 MJ, dry mass 0.8 kg, wet mass 1 kg, carbon content, non-fossil 0.48632
  note on heating value, net: Value taken from the general comment of the treatment dataset.
- inorganic potassium fertiliser, as K2O: 0 kg; pedigree (1,1,1,1,1)
  Calculated based on literature values: The nutrient content of the crop multiplied by the country-share of the fertiliser type (IFA 2014). See supporting documentation 'WFLDB-Documentation.pdf' chapter 'Fertiliser application' for L1 data and appendix for the source of nutrient content (https://ecoquery.ecoinvent.org/File/Reports).
  Corresponds to 8.03 kg/ha
  properties: dry mass 1 kg, wet mass 1 kg
- acetamide-anillide-compound, unspecified: 0.00759397 kg; lognormal variance with pedigree 0.0158498, pedigree (2,2,4,5,1)
  (same comment as for cyclic N-compound)
  properties: wet mass 1 kg, carbon content, fossil 0.659175, dry mass 1 kg
- packaging, for pesticides: 0.0312799 kg; lognormal variance with pedigree 0.0592, pedigree (4,3,4,5,4)
  Total amount of active substance/s of pesticides needed for the production of cocoa bean is calculated to be circa 1.56E-02 kg. Pesticide/s used in this dataset is/are: 'acetamide-anillide-compound, unspecified', 'copper oxide', 'cyclic N-compound', 'organophosphorus-compound, unspecified'. The total amount of active substance/s is doubled in order to account for the packaging of the dilluted product of pesticide/s that is/are applied. Therefore, 3.13E-02 kg of packaging for pesticides is justified with this exchange.
  properties: dry mass 1 kg, carbon content, fossil 0.85714, heating value, net 25.97 MJ, wet mass 1 kg, price 0.0642 EUR2005
- inorganic phosphorus fertiliser, as P2O5: 0 kg; pedigree (1,1,1,1,1)
  Calculated based on literature values: The nutrient content of the crop multiplied by the country-share of the fertiliser type (IFA 2014). See supporting documentation 'WFLDB-Documentation.pdf' chapter 'Fertiliser application' for L1 data and appendix for the source of nutrient content (https://ecoquery.ecoinvent.org/File/Reports).
  Corresponds to 5.9 kg P2O5/ha
  properties: wet mass 1 kg, dry mass 1 kg
- packaging, for fertilisers: 0.413019 kg; lognormal variance with pedigree 0.0592, pedigree (4,3,4,5,4)
  Total amount of active substance/s of fertilisers needed for the production of 'cocoa bean' is calculated to be circa 2.07E-01 kg. Fertiliser/s used in this dataset is/are: 'ammonia, liquid', 'ammonium nitrate, as N', 'ammonium sulfate, as N', 'nitrogen fertiliser, as N', 'phosphate fertiliser, as P2O5', 'phosphate rock, as P2O5, beneficiated, dry', 'potassium chloride, as K2O', 'potassium fertiliser, as K2O', 'potassium sulfate, as K2O', 'urea, as N'. The total amount of active substance/s is doubled in order to account for the packaging of the dilluted product of fertiliser/s that is/are applied. Therefore, 4.13E-01 kg of packaging for fertilisers is justified with this exchange.
  properties: dry mass 1 kg, wet mass 1 kg, carbon content, fossil 0.825301, heating value, net 25.01 MJ, price 0.0642 EUR2005
  note on carbon content, fossil: Considering a chemical formula (C2H4)n for polyethylene, carbon content-fossil is calculated to be 0.856286 kg of Carbon per kg of dry mass.
- phosphate rock, beneficiated: 0 kg; pedigree (1,1,1,1,1)
  The exchange has been updated from 'phosphate rock, as P2O5, beneficiated, dry' into 'phosphate rock, beneficiated' and therefore its amount has been scaled (multiplied) from 0.0063 kg by 3.125 kg of 'phosphate rock, beneficiated' per kg of 'phosphate rock, as P2O5, beneficiated, dry'. Original comment of the exchange is: Calculated based on literature values or expert estimation: The total amount of nutrient (FAO 2015) multiplied by the country-share of fertiliser type (IFA 2014). See supporting documentation 'WFLDB-Documentation.pdf' chapter 'Fertiliser application' for L3 and L4 data (https://ecoquery.ecoinvent.org/File/Reports).
  Corresponds to 11.0 kg P2O5/ha
  properties: dry mass 1 kg, wet mass 1 kg
- ammonia, anhydrous, liquid: 0 kg; pedigree (1,1,1,1,1)
  Calculated based on literature values: The nutrient content of the crop multiplied by the country-share of the fertiliser type (IFA 2014). See supporting documentation 'WFLDB-Documentation.pdf' chapter 'Fertiliser application' for L1 data and appendix for the source of nutrient content (https://ecoquery.ecoinvent.org/File/Reports).
  Corresponds to 8.98 kg/ha
  properties: dry mass 1 kg, wet mass 1 kg
- ammonium nitrate: 0 kg; pedigree (1,1,1,1,1)
  The exchange has been updated from 'ammonium nitrate, as N' into 'ammonium nitrate' and therefore its amount has been scaled (multiplied) from 0.0032 kg by 2.8573 kg of 'ammonium nitrate' per kg of 'ammonium nitrate, as N'. Original comment of the exchange is: Calculated based on literature values: The nutrient content of the crop multiplied by the country-share of the fertiliser type (IFA 2014). See supporting documentation 'WFLDB-Documentation.pdf' chapter 'Fertiliser application' for L1 data and appendix for the source of nutrient content (https://ecoquery.ecoinvent.org/File/Reports).
  Corresponds to 4.11 kg/ha
  properties: dry mass 1 kg, wet mass 1 kg
- irrigation: 0 m3; pedigree (1,1,1,1,1)
  Calculated value: The total amount of water used for irrigation (calculated from evapotranspiration, Pfister et al. 2011) multiplied by the country-share of irrigation technique (WFLDB-Guidelines.pdf, Appendix 6.1). See supporting documentation 'WFLDB-Documentation.pdf' chapter 'Water use for irrigation' for L2 data (https://ecoquery.ecoinvent.org/File/Reports).
  properties: dry mass 0.11 kg, wet mass 1000 kg, water content 9089.91
- planting tree: 0.0131547 unit; lognormal variance with pedigree 0.126177, pedigree (2,1,4,5,1)
  Literature value or expert estimation (FAO 2004). This is the number of trees per ha (i.e. 350 trees per ha) divided by the lifetime years of the orchard (i.e. 50 years)
- ammonium sulfate: 0.00524253 kg; lognormal variance with pedigree 0.126177, pedigree (2,1,4,5,1)
  Calculated based on literature values: The nutrient content of the crop multiplied by the country-share of the fertiliser type (IFA 2014). See supporting documentation 'WFLDB-Documentation.pdf' chapter 'Fertiliser application' for L1 data and appendix for the source of nutrient content (https://ecoquery.ecoinvent.org/File/Reports).
  properties: dry mass 1 kg, wet mass 1 kg
- fruit tree seedling, for planting: 0.0131547 unit; lognormal variance with pedigree 0.126177, pedigree (2,1,4,5,1)
  (same comment as for establishing orchard)
  properties: dry mass 0.578035 kg, water content 0.73, wet mass 1 kg, carbon content, non-fossil 0.439481
  note on carbon content, non-fossil: calculation: C-content of components according to ecoinvent report No. 15a. Source of composition: https://ndb.nal.usda.gov/ndb/search/. Unspecific seedling used as proxy.
- potassium sulfate: 0.0101431 kg; lognormal variance with pedigree 0.126177, pedigree (2,1,4,5,1)
  The exchange has been updated from 'potassium sulfate, as K2O' into 'potassium sulfate' and therefore its amount has been scaled (multiplied) from 0.0055 kg by 1.85 kg of 'potassium sulfate' per kg of 'potassium sulfate, as K2O'. Original comment of the exchange is: Calculated based on literature values: The nutrient content of the crop multiplied by the country-share of the fertiliser type (IFA 2014). See supporting documentation 'WFLDB-Documentation.pdf' chapter 'Fertiliser application' for L1 data and appendix for the source of nutrient content (https://ecoquery.ecoinvent.org/File/Reports).
  Corresponds to 6.29 kg/ha
  properties: dry mass 1 kg, wet mass 1 kg
- potassium chloride: 0.0705571 kg; lognormal variance with pedigree 0.126177, pedigree (2,1,4,5,1)
  The exchange has been updated from 'potassium chloride, as K2O' into 'potassium chloride' and therefore its amount has been scaled (multiplied) from 0.0446 kg by 1.5829 kg of 'potassium chloride' per kg of 'potassium chloride, as K2O'. Original comment of the exchange is: Calculated based on literature values: The nutrient content of the crop multiplied by the country-share of the fertiliser type (IFA 2014). See supporting documentation 'WFLDB-Documentation.pdf' chapter 'Fertiliser application' for L1 data and appendix for the source of nutrient content (https://ecoquery.ecoinvent.org/File/Reports).
  Corresponds to 12.6 kg/ha
  properties: wet mass 1 kg, dry mass 1 kg
- copper oxide: 0.00759397 kg; lognormal variance with pedigree 0.0158498, pedigree (2,2,4,5,1)
  (same comment as for cyclic N-compound)
  properties: wet mass 1 kg, dry mass 1 kg
- organophosphorus-compound, unspecified: 8.52582e-5 kg; lognormal variance with pedigree 0.0158498, pedigree (2,2,4,5,1)
  Literature value or expert estimation (Ntiamoah et al. 2008, Afrane et al. 2011).
  properties: dry mass 1 kg, wet mass 1 kg, carbon content, fossil 0.260898
- urea: 0 kg; pedigree (1,1,1,1,1)
  The exchange has been updated from 'urea, as N' into 'urea' and therefore its amount has been scaled (multiplied) from 0.0164 kg by 2.1438 kg of 'urea' per kg of 'urea, as N'. Original comment of the exchange is: Calculated based on literature values: The nutrient content of the crop multiplied by the country-share of the fertiliser type (IFA 2014). See supporting documentation 'WFLDB-Documentation.pdf' chapter 'Fertiliser application' for L1 data and appendix for the source of nutrient content (https://ecoquery.ecoinvent.org/File/Reports).
  Corresponds to 2.46 kg/ha
  properties: carbon content, fossil 0.2, dry mass 1 kg, wet mass 1 kg
- inorganic nitrogen fertiliser, as N: 0.000137497, 0.000197633, 0.000176638, 0.0006205, 0.000370571, 2.75022e-5, 0.00348468, 6.51263e-5, 9.7817e-6, 9.49818e-7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 kg (28 entries); lognormal variance with pedigree 0.126177, pedigree (2,1,4,5,1)
  (same comment as for inorganic nitrogen fertiliser, as N)
- waste wood, untreated: -0.2351, -0.0291912, -0.00213421, -0.0819893, -0.0123866, -0.0195822, -0.371029 kg (7 entries); lognormal variance with pedigree 0.126177, pedigree (2,1,4,5,1)
  (same comment as for waste wood, untreated)
  production volume 1.17892e9 kg
- inorganic potassium fertiliser, as K2O: 9.11962e-6, 4.51915e-5, 9.16609e-5, 0.00113327, 8.11278e-5, 1.95365e-5, 0.0018982, 6.60253e-5, 1.62643e-5, 7.35765e-7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 kg (28 entries); lognormal variance with pedigree 0.126177, pedigree (2,1,4,5,1)
  (same comment as for inorganic potassium fertiliser, as K2O)
- inorganic phosphorus fertiliser, as P2O5: 0.00118472, 0.00153707, 0.00123079, 0.00963702, 0.00203063, 0.000220549, 0.0227509, 0.000410074, 4.4749e-5, 9.7771e-6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 kg (27 entries); lognormal variance with pedigree 0.126177, pedigree (2,1,4,5,1)
  (same comment as for inorganic phosphorus fertiliser, as P2O5)
- phosphate rock, beneficiated: 0.00839016, 0.00286188, 0.00839016 kg (3 entries); lognormal variance with pedigree 0.126177, pedigree (2,1,4,5,1)
  (same comment as for phosphate rock, beneficiated)
- ammonia, anhydrous, liquid: 0.00136256, 0.000782846, 0.000182222, 0.000361046, 0.000353729, 3.70746e-5, 0.00392086 kg (7 entries); lognormal variance with pedigree 0.126177, pedigree (2,1,4,5,1)
  (same comment as for ammonia, anhydrous, liquid)
- ammonium nitrate: 0.00219088, 0.00411003, 0.00285046 kg (3 entries); lognormal variance with pedigree 0.126177, pedigree (2,1,4,5,1)
  (same comment as for ammonium nitrate)
- irrigation: 0.0441557, 0.00187428, 7.4971e-5, 0.394722, 0.00646845, 0.000323449, 0.0183663, 0.00298945, 0.75853, 0.0145808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 m3 (16 entries); lognormal variance with pedigree 0.126177, pedigree (2,1,4,5,1)
  (same comment as for irrigation)
- urea: 0.0263726, 0.00484206, 0.00390593 kg (3 entries); lognormal variance with pedigree 0.126177, pedigree (2,1,4,5,1)
  (same comment as for urea)

## Inputs from nature
- Energy, gross calorific value, in biomass [natural resource, biotic]: 23.6139 MJ; lognormal variance with pedigree 0.0158498, pedigree (2,2,4,5,1)
- Transformation, to permanent crop, irrigated [natural resource, land]: 0.3758 m2
  Calculated value: 10000 m2 divided by the yield and the life time of the perennial crop (50 years).
- Carbon dioxide, in air [natural resource, in air]: 1.843 kg; lognormal variance with pedigree 0.0158498, pedigree (2,2,4,5,1)
  CO2 uptake by biomass
- Transformation, from permanent crop, irrigated [natural resource, land]: 0.3758 m2
  (same comment as for Transformation, to permanent crop, irrigated)
- Occupation, permanent crop, irrigated [natural resource, land]: 18.8431 m2*year; lognormal variance with pedigree 0.0220616, pedigree (2,1,4,5,1)
  Related to the duration from harvest date of previous crop to harvest date of main crop.

## Emissions to nature
- Nickel, ion [water, surface water]: 2.43701e-6 kg; lognormal variance with pedigree 0.358938, pedigree (2,2,4,5,1)
  Calculated value - Freiermuth (2006). See 'WFLDB-Guidelines.pdf', available at https://ecoquery.ecoinvent.org/File/Reports.
- Chromium, ion [water, ground-]: 3.23287e-5 kg; lognormal variance with pedigree 0.358938, pedigree (2,2,4,5,1)
  (same comment as for Nickel, ion)
- Nickel, ion [water, ground-]: 1.67253e-10 kg; lognormal variance with pedigree 0.358938, pedigree (2,2,4,5,1)
  (same comment as for Nickel, ion)
- Chromium [soil, agricultural]: 1.30676e-5 kg
  Comment on mathematicalRelation:
  -1.32044234941e-05 from Calculated value - Freiermuth (2006). See 'WFLDB-Guidelines.pdf', available at https://ecoquery.ecoinvent.org/File/Reports.
  -5.1447381298e-07 from Crop, default, heavy metals uptake model
  Heavy metal uptake can be excluded by setting the parameter heavyMetalUptakeSwitch to zero.
- Carbon dioxide, fossil [air, non-urban air or from high stacks]: 0.03858 kg; lognormal variance with pedigree 0.0158498, pedigree (2,2,4,5,1)
  Calculated value - CO2 emissions from urea and lime. See 'WFLDB-Guidelines.pdf', available at https://ecoquery.ecoinvent.org/File/Reports.
- Zinc, ion [water, surface water]: 4.86319e-6 kg; lognormal variance with pedigree 0.358938, pedigree (2,2,4,5,1)
  (same comment as for Nickel, ion)
- Carbon dioxide, from soil or biomass stock [air, non-urban air or from high stacks]: 8.95044 kg; normal variance with pedigree 0.5452, pedigree (3,3,5,5,2)
  Global average LUC emissions according 2nd edition of the Quantis-modified tool developed by Blonk Consultants 'WFLDB-adapted-Blonk 2014 direct-land-use-change-assessment-tool_2015-05-18a.xlsx', tab. 'Country & land use unknown'. The emission are based on the relative change in production areas in all countries for a given crop. The weighted average is used which takes into acount relative difference in crop expansion into primary forest, secondary forest, grassland, perennial and annual land.
  Uncertainty: Uncertainty estimated based on IPCC guidlines 2006.
- Zinc, ion [water, ground-]: 1.76977e-5 kg; lognormal variance with pedigree 0.358938, pedigree (2,2,4,5,1)
  (same comment as for Nickel, ion)
- Metalaxyl-M [soil, agricultural]: 0.00775829 kg; lognormal variance with pedigree 0.0467216, pedigree (2,2,4,5,1)
  Calculated value - 100% emission in soilAmount of pesticide: Ntiamoah and Afrane 2008, Pesticide type: Ministère Ivoirien de l'Agriculture (2014). See 'WFLDB-Guidelines.pdf', available at https://ecoquery.ecoinvent.org/File/Reports.
- Zinc [soil, agricultural]: 2.51965e-5 kg
  Comment on mathematicalRelation:
  1.37260434846e-05 from Calculated value - Freiermuth (2006). See 'WFLDB-Guidelines.pdf', available at https://ecoquery.ecoinvent.org/File/Reports.
  Heavy metal uptake can be excluded by setting the parameter heavyMetalUptakeSwitch to zero.
- Cadmium, ion [water, ground-]: 6.38879e-8 kg; lognormal variance with pedigree 0.358938, pedigree (2,2,4,5,1)
  (same comment as for Nickel, ion)
- Nickel [soil, agricultural]: 6.0495e-6 kg
  Comment on mathematicalRelation:
  1.98502666819e-06 from Calculated value - Freiermuth (2006). See 'WFLDB-Guidelines.pdf', available at https://ecoquery.ecoinvent.org/File/Reports.
  -9.86090541356e-07 from Crop, default, heavy metals uptake model
  Heavy metal uptake can be excluded by setting the parameter heavyMetalUptakeSwitch to zero.
- Mercury [water, surface water]: 6.79766e-9 kg; lognormal variance with pedigree 0.358938, pedigree (2,2,4,5,1)
  (same comment as for Nickel, ion)
- Cadmium [soil, agricultural]: 5.25118e-6 kg
  Comment on mathematicalRelation:
  8.01660441371e-07 from Calculated value - Freiermuth (2006). See 'WFLDB-Guidelines.pdf', available at https://ecoquery.ecoinvent.org/File/Reports.
  -9.58526072844e-08 from Crop, default, heavy metals uptake model
  Heavy metal uptake can be excluded by setting the parameter heavyMetalUptakeSwitch to zero.
- Ammonia [air, non-urban air or from high stacks]: 0.00692075 kg; lognormal variance with pedigree 0.0467216, pedigree (2,2,4,5,1)
  Calculated value - EMEP/EEA (2013). See 'WFLDB-Guidelines.pdf', available at https://ecoquery.ecoinvent.org/File/Reports.
- Mercury [water, ground-]: 1.63145e-9 kg; lognormal variance with pedigree 0.358938, pedigree (2,2,4,5,1)
  (same comment as for Nickel, ion)
- Water [water, surface water]: 0.625228 m3; lognormal variance with pedigree 0.126177, pedigree (2,1,4,5,1)
  Calculated value - Emission calculated from water balance. See 'WFLDB-Guidelines.pdf', available at https://ecoquery.ecoinvent.org/File/Reports.
- Mercury [soil, agricultural]: 1.95781e-8 kg
  Comment on mathematicalRelation:
  2.42639742941e-08 from Calculated value - Freiermuth (2006). See 'WFLDB-Guidelines.pdf', available at https://ecoquery.ecoinvent.org/File/Reports.
  Heavy metal uptake can be excluded by setting the parameter heavyMetalUptakeSwitch to zero.
- Lead [water, surface water]: 1.12866e-6 kg; lognormal variance with pedigree 0.358938, pedigree (2,2,4,5,1)
  (same comment as for Nickel, ion)
- Water [water, ground-]: 0.156311 m3; lognormal variance with pedigree 0.126177, pedigree (2,1,4,5,1)
  (same comment as for Water)
- Copper, ion [water, ground-]: 6.77963e-6 kg; lognormal variance with pedigree 0.358938, pedigree (2,2,4,5,1)
  (same comment as for Nickel, ion)
- Water [air, non-urban air or from high stacks]: 0.741187 m3; lognormal variance with pedigree 0.126177, pedigree (2,1,4,5,1)
  (same comment as for Water)
- Cadmium, ion [water, surface water]: 4.55836e-8 kg; lognormal variance with pedigree 0.358938, pedigree (2,2,4,5,1)
  (same comment as for Nickel, ion)
- Thiamethoxam [soil, agricultural]: 8.68966e-5 kg; lognormal variance with pedigree 0.0467216, pedigree (2,2,4,5,1)
  Calculated value - 100% emission in soil. Amount of pesticides: Ntiamoah and Afrane (2008), type of pesticides: Afrane and Ntiamoah (2011). See 'WFLDB-Guidelines.pdf', available at https://ecoquery.ecoinvent.org/File/Reports.
- Lead [water, ground-]: 2.27795e-7 kg; lognormal variance with pedigree 0.358938, pedigree (2,2,4,5,1)
  (same comment as for Nickel, ion)
- Pirimiphos methyl [soil, agricultural]: 8.68966e-5 kg; lognormal variance with pedigree 0.0467216, pedigree (2,2,4,5,1)
  (same comment as for Thiamethoxam)
- Imidacloprid [soil, agricultural]: 0.000187396 kg; lognormal variance with pedigree 0.0467216, pedigree (2,2,4,5,1)
  (same comment as for Metalaxyl-M)
- Phosphorus [water, surface water]: 0.000131003 kg; lognormal variance with pedigree 0.177866, pedigree (2,2,4,5,1)
  Calculated value - Prasuhn (2006) and SQCB-Erosion. See 'WFLDB-Guidelines.pdf', available at https://ecoquery.ecoinvent.org/File/Reports.
- Lead [soil, agricultural]: 8.21427e-6 kg
  Comment on mathematicalRelation:
  1.25454664079e-06 from Calculated value - Freiermuth (2006). See 'WFLDB-Guidelines.pdf', available at https://ecoquery.ecoinvent.org/File/Reports.
  -5.10480741001e-07 from Crop, default, heavy metals uptake model
  Heavy metal uptake can be excluded by setting the parameter heavyMetalUptakeSwitch to zero.
- Phosphate [water, surface water]: 0.00160257 kg; lognormal variance with pedigree 0.177866, pedigree (2,2,4,5,1)
  Calculated value - Prasuhn (2006). See 'WFLDB-Guidelines.pdf', available at https://ecoquery.ecoinvent.org/File/Reports.
- Dinitrogen monoxide [air, non-urban air or from high stacks]: 0.00232236 kg; lognormal variance with pedigree 0.126664, pedigree (2,2,4,5,1)
  Calculated value - IPCC (2006). See 'WFLDB-Guidelines.pdf', available at https://ecoquery.ecoinvent.org/File/Reports.
- Phosphate [water, ground-]: 0.000346475 kg; lognormal variance with pedigree 0.177866, pedigree (2,2,4,5,1)
  (same comment as for Phosphate)
- Copper, ion [water, surface water]: 7.68478e-6 kg; lognormal variance with pedigree 0.358938, pedigree (2,2,4,5,1)
  (same comment as for Nickel, ion)
- Nitrate [water, ground-]: 0.342417 kg; lognormal variance with pedigree 0.177866, pedigree (2,2,4,5,1)
- Acetamiprid [soil, agricultural]: 0.0001005 kg; lognormal variance with pedigree 0.0467216, pedigree (2,2,4,5,1)
  (same comment as for Metalaxyl-M)
- Nitrogen oxides [air, non-urban air or from high stacks]: 0.0023169 kg; lognormal variance with pedigree 0.126664, pedigree (2,2,4,5,1)
  Calculated value - EEA/EMEP (2013). See 'WFLDB-Guidelines.pdf', available at https://ecoquery.ecoinvent.org/File/Reports.
- Copper [soil, agricultural]: 0.0078021 kg
  Comment on mathematicalRelation:
  0.00780505309172 from Calculated value - Freiermuth (2006). See 'WFLDB-Guidelines.pdf', available at https://ecoquery.ecoinvent.org/File/Reports.
  -6.25571836924e-06 from Crop, default, heavy metals uptake model
  Heavy metal uptake can be excluded by setting the parameter heavyMetalUptakeSwitch to zero.
- Chromium, ion [water, surface water]: 4.5282e-6 kg; lognormal variance with pedigree 0.358938, pedigree (2,2,4,5,1)
  (same comment as for Nickel, ion)

## Sampling procedure
WFLDB Methodological Guidelines for the Life Cycle Inventory of Agricultural Products in the latest version, available at: https://ecoquery.ecoinvent.org/File/Reports. Data sources: Data were categorised from level 0 (L0) to level (L4) as follows: L0 = estimate, proxy; L1 = statistical data (e.g. FAOSTAT); L2 = L1 adapted to crop and country; L3 = literature data or L1 resp. L2 data approved by experts; medium detailing (i.e. kg of total N-fertiliser); L4 = L3 data of high detailing (i.e. portion N-fertiliser types).In this dataset data were obtained for yield: L3; Fertilisers: L4; Pesticides: L1; Machinery: L0; Irrigation: L2. For information regarding the calculation of individual exchanges see supporting documentation WFLDB-Documentation.pdf

## Extrapolations
The amount of the exchanges are weighted average of regional datasets.

## Review by Assumpció ANTON 2016-05-30
Be aware that the use of statistics in input calculations could provide some specific inputs not common for specific crops, this should be corrected if better information is available and better reflexed in DQR . Currently, I would dissent for some of good marks provided, being a revision of criteria applied advisable.

Pesticides will need to be amended periodically checking for update of pesticides' ban.
