# carton board box production service, with gravure printing

Dataset: EcoSpold 2, unit process
Geography: RoW
Time period: 1993-01-01 to 2021-12-31
Technology level: current
Classification: ISIC rev.4 ecoinvent: 1702:Manufacture of corrugated paper and paperboard and of containers of paper a
Classification: EcoSpold01Categories: paper & cardboard/cardboard & corrugated board
Tags: ConvertedDataset
Scenario: Business-as-Usual
System model: Allocation, cut-off by classification
Generated by: Roland Hischier
Published in: Hischier R. 2007
Database: ecoinvent
isCopyrightProtected: true
accessRestrictedTo: 1

## General comment
The input of cartonboard is not included into this module allowing the user to establish its own cartonboard boxes. Per kg of used cartonboard, 0.80 kg of this module are needed.
[This dataset was already contained in the ecoinvent database version 2. It was not individually updated during the transfer to ecoinvent version 3. Life Cycle Impact Assessment results may still have changed, as they are affected by changes in the supply chain, i.e. in other datasets. This dataset was generated following the ecoinvent quality guidelines for version 2. It may have been subject to central changes described in the ecoinvent version 3 change report (http://www.ecoinvent.org/database/ecoinvent-version-3/reports-of-changes/), and the results of the central updates were reviewed extensively. The changes added e.g. consistent water flows and other information throughout the database. The documentation of this dataset can be found in the ecoinvent reports of version 2, which are still available via the ecoinvent website. The change report linked above covers all central changes that were made during the conversion process.]

## Included activities end
This module includes the production of boxes out of cartonboard. It contains the steps of cutting, folding and printing with a gravure machine and therefore inks and glues are considered as well as the electricity consumption.

## Geography
Data from one modern Swiss plant

## Technology
Data of the used technology within the examined Swiss production plant

## Parameters
- fraction, process water, to air: 0.15 dimensionless; lognormal variance with pedigree 0.092025, pedigree (4,4,3,2,4)

## Reference product
- carton board box production, with gravure printing: 1 kg; CPC 32153: Cartons, boxes, cases, record sleeves and other packing containers (except bags) of paper, paperboard, cellulo[…]; By-product classification allocatable product
  EcoSpold01Location=CH
  production volume 3.94856 kg
    This is a placeholder value that does not reflect real-world production volumes. This dataset does not currently require a real-world production volume to work in the database framework, and no actual data were collected yet. This has no negative effect on the results of the ecoinvent database.
  properties: price 0.85 EUR2005

## Inputs from technosphere
- heat, district or industrial, natural gas: 0 MJ; pedigree (1,1,1,1,1)
  Average from 1 Swiss producer
  EcoSpold01Location=RER
  Uncertainty: average from 1 Swiss producer
  properties: heating value, net 1 MJ
- heat, district or industrial, other than natural gas: 0 MJ; pedigree (1,1,1,1,1)
  EcoSpold01Location=RER
  Average from 1 Swiss producer
  Uncertainty: average from 1 Swiss producer
  properties: heating value, net 1 MJ
- printing ink, offset, without solvent, in 47.5% solution state: 0.0349 kg; lognormal variance with pedigree 0.0526, pedigree (1,3,5,5,1)
  (same comment as for heat, district or industrial, natural gas)
  properties: carbon content, fossil 0.455266, carbon content, non-fossil 0.221773, dry mass 1 kg, wet mass 1 kg, heating value, net 20.51 MJ
  note on carbon content, fossil: C content was calculated as an addition of C content in the raw materials.
- hazardous waste, for underground deposit: -1.2e-5 kg; lognormal variance with pedigree 0.0526, pedigree (1,3,5,5,1)
  Average from 1 Swiss producer
  EcoSpold01Location=DE
  Uncertainty: average from 1 Swiss producer
  production volume 3.57867e-5 kg
    Calculated from the production volume of carton board box production, with gravure printing in proportion to the respective output amounts.
  properties: dry mass 1 kg, wet mass 1 kg, carbon content, fossil 0.554667
  note on carbon content, fossil: Tab A.6, ecoinvent v2.2 report 13_I, average hazardous waste composition was used, and referred to 0% water mass. No waste-specific emission are currently inventoried for underground deposits. Accordingly, no waste composition must be specified. For generic, average waste to underground deposit deposition in a 200 liter steel drum without cement solidification is assumed (ecoinvent v2.2 report 13_I).
- municipal solid waste: 0 kg; pedigree (1,1,1,1,1)
  EcoSpold01Location=CH
  Average from 1 Swiss producer
  Uncertainty: average from 1 Swiss producer
  production volume 0 kg
    (same comment as for hazardous waste, for underground deposit)
  properties: carbon content, fossil 0.171549, water content 0.297017, dry mass 0.771 kg, carbon content, non-fossil 0.194173, wet mass 1 kg, heating value, net 11.74 MJ
  note on carbon content, fossil: MSW composition in tab 4.1, ecoinvent v2.2 report 13_I. C content referred to 1 kg DM
  note on heating value, net: Value taken from the general comment of the treatment dataset.
- electricity, medium voltage: 0 kWh; pedigree (1,1,1,1,1)
  (same comment as for municipal solid waste)
- solvent, organic: 0.0311 kg; lognormal variance with pedigree 0.0526, pedigree (1,3,5,5,1)
  EcoSpold01Location=GLO
  Average from 1 Swiss producer
  Uncertainty: average from 1 Swiss producer
  properties: heating value, net 19.11 MJ, wet mass 1 kg, dry mass 1 kg, carbon content, fossil 0.63072
  note on carbon content, fossil: Mixture of 15 of the most often used solvents (list in ecoinvent v2.2 report 11-III, pg 293). C content was calculated as an unweighted average of C content of the different solvents
- packaging box factory: 1.43e-9 unit; lognormal variance with pedigree 0.448, pedigree (4,5,5,5,5)
  EcoSpold01Location=RER
  Own assumption
  Uncertainty: own assumption
- heat, district or industrial, natural gas: 0.000371514, 0.00100599 MJ (2 entries); lognormal variance with pedigree 0.0526, pedigree (1,3,5,5,1)
  (same comment as for heat, district or industrial, natural gas)
- heat, district or industrial, other than natural gas: 0.0111261, 0.454374 MJ (2 entries); lognormal variance with pedigree 0.0526, pedigree (1,3,5,5,1)
  (same comment as for heat, district or industrial, other than natural gas)
- municipal solid waste: -1.7018e-5, -2.43198e-5, -0.00389266, -0.047766 kg (4 entries); lognormal variance with pedigree 0.0526, pedigree (1,3,5,5,1)
  (same comment as for municipal solid waste)
  production volume 0.154181 kg
- electricity, medium voltage: 0.00656834, 0.00125953, 0.0289207, 0.0102673, 0.0957513, 0.0211448, 0.307532, 0.0433468, 0.125209 kWh (9 entries); lognormal variance with pedigree 0.0526, pedigree (1,3,5,5,1)
  (same comment as for municipal solid waste)

## Inputs from nature
- Water, unspecified natural origin [natural resource, in water]: 0.00011 m3; lognormal variance with pedigree 0.0526, pedigree (1,3,5,5,1)
  Average from 1 Swiss producer
  Uncertainty: average from 1 Swiss producer

## Emissions to nature
- Chromium, ion [water, surface water]: 1.85e-5 kg; lognormal variance with pedigree 0.0926, pedigree (1,3,5,5,1)
  Average from 1 Swiss producer
  Uncertainty: average from 1 Swiss producer
- DOC, Dissolved Organic Carbon [water, surface water]: 5e-5 kg; lognormal variance with pedigree 0.0926, pedigree (1,3,5,5,1)
  Calculated as equal to TOC.
  Uncertainty: average from 1 Swiss producer
- COD, Chemical Oxygen Demand [water, surface water]: 0.000135 kg; lognormal variance with pedigree 0.0926, pedigree (1,3,5,5,1)
  Calculated as COD (g O2) = 2.7*TOC (gC).
  Uncertainty: average from 1 Swiss producer
- Water [air, unspecified]: 1.65e-5 m3; lognormal variance with pedigree 0.0827, pedigree (2,2,5,5,1)
  Calculated value based on literature values and expert opinion. See comments in the parametres' comment field.
- Water [water, unspecified]: 9.35e-5 m3; lognormal variance with pedigree 0.0827, pedigree (2,2,5,5,1)
  (same comment as for Water)
  property water in wet mass 1000 kg; name WWM
  property carbon content, non-fossil 0; name C_content_non_fossil
  property dry mass 0 kg; name DM
  property carbon content, fossil 0; name C_content_fossil
  property wet mass 1000 kg; name WM
- Nickel, ion [water, surface water]: 1.85e-5 kg; lognormal variance with pedigree 0.0926, pedigree (1,3,5,5,1)
  Average from 1 Swiss producer
  Uncertainty: average from 1 Swiss producer
- TOC, Total Organic Carbon [water, surface water]: 5e-5 kg; lognormal variance with pedigree 0.0926, pedigree (1,3,5,5,1)
  Average from 1 Swiss producer
  Uncertainty: average from 1 Swiss producer
- Lead [water, surface water]: 1.2e-5 kg; lognormal variance with pedigree 0.0926, pedigree (1,3,5,5,1)
  Average from 1 Swiss producer
  Uncertainty: average from 1 Swiss producer
- BOD5, Biological Oxygen Demand [water, surface water]: 0.00027 kg; lognormal variance with pedigree 0.0926, pedigree (1,3,5,5,1)
  Calculated as 0.5*COD.
  Uncertainty: average from 1 Swiss producer
- Ammonia [air, urban air close to ground]: 4e-7 kg; lognormal variance with pedigree 0.0926, pedigree (1,3,5,5,1)
  Average from 1 Swiss producer
  Uncertainty: average from 1 Swiss producer

## Extrapolations
This dataset has been copied from an original dataset covering the geography CH. The uncertainty has been adjusted accordingly.

## Review by Hans-Jörg Althaus 2003-08-26
Passed
