# alkylbenzene sulfonate production, linear, petrochemical

Dataset: EcoSpold 2, unit process
Geography: RoW
Time period: 1992-01-01 to 2021-12-31
Technology level: current
Classification: ISIC rev.4 ecoinvent: 2023:Manufacture of soap and detergents, cleaning and polishing preparations, pe
Synonyms: Benzenesulfonic acid 4-sec-dodecyl- sodium salt; Benzenesulfonic acid 4-sec-dodecyl- sodium salt (1:1); Linear alkyl benzenesulfonate; Alkylbenzene sulfonate; Linear alkylbenzene sulphonate; Alkylbenzenesulfonate
Scenario: Business-as-Usual
System model: Allocation, cut-off by classification
Share of production covered: 40 %
Generated by: Rainer Zah
Published in: Zah R. 2007
Database: ecoinvent
isCopyrightProtected: true
accessRestrictedTo: 1

## General comment
This dataset represents the production of 1 kg of linear alkylbenzene sulfonate (LAS) from benzene and paraffins. LAS is the predominant anionic surfactant in commercial detergents and is used in powders and liquids for laundry machines, dishwashers and industrial cleaners. The data is based on the ECOSOL study of the European surfactant industry. Allocations in multioutput processes were made using the relative mass outputs of products.
References:
Zah R. and Hischier R. (2007) Life Cycle Inventories of Detergents. Final report ecoinvent data v2.0, No. 12. Swiss Centre for Life Cycle Inventories, Dübendorf, CH.

## Included activities start
This activity starts with the delivery of materials and energy inputs on site.

## Included activities end
This activity ends with the production of 1 kg of linear alkylbenzene sulfonate out of benzene and paraffins. The dataset includes energy use, and the production of waste and emissions. Infrastructure has been estimated. Water consumption is not included.

## Geography
Data based on the European linear alkylbenzene sulfonate production. It is assumed to be representative of the global production.

## Technology
LAS is produced by sulphonation of linear alkylbenzene (LAB) followed by neutralization of the corresponding sulphonic acid with caustic soda. Here the average technology, representing a mix of 50% aluminium chloride (AlCl3) process and 50% hydrofluoric acid (HF) process is applied - this is typical for European production conditions in the mid 1990s. In the AlCl3 process, the benzene is alkalyted with chloro-paraffins and/or n-olefins with the help of an AlCl3 catalyst. In this process, part of the n-paraffins is chlorinated, the remainder is used to produce n-olefins. In the HF process, benzene is alkalyted directly with n-olefins, using HF as a catalyst. The n-olefins themselves are produced by catalytic dehydrogenation of n-paraffins. In both processes the n-paraffins are responsible for the line-arity of the alkyl chain. Sulphonation of LAB is then usually carried out by adding an SO3 group to the aromatic ring of the LAB molecule. The reaction is exothermic and requires careful control of the temperature. Finally, sodium hydroxide is used to neutralize the acid that has been produced (Berna et al. (1995)).
Reference:
Berna J. L., Cavalli L. and Renta C. (1995) A Life-Cycle Inventory for the Pro-duction of Linear Alkylbenzene Sulphonates in Europe. In: Tenside, Surfactants, Detergents, 32(2), pp. 122-127.

## Time period
Date of published literature.

## Reference product
- alkylbenzene sulfonate, linear, petrochemical: 1 kg; name RP; By-product classification allocatable product; CPC 341: Basic organic chemicals; CAS 42615-29-2
  Linear alkylbenzene sulfonate (LAS) from benzene and paraffins. LAS is the predominant anionic surfactant in commercial detergents and is used in powders and liquids for laundry machines, dishwashers and industrial cleaners.
  References:
  Zah R. and Hischier R. (2007) Life Cycle Inventories of Detergents. Final report ecoinvent data v2.0, No. 12. Swiss Centre for Life Cycle Inventories, Dübendorf, CH.
  Franke M., Berna J. L., Cavalli L., Renta C., Stalmans M. and Thomas H. (1995) A Life-Cycle Inventory for the Production of Petrochemical Intermediates in Europe. In: Tenside Surf. Det., 32(5), pp. 384 - 396.
  production volume 2e9 kg; name RP_PV
    According to RÖMPP online, the global production volume of alkylbenzene sulfonate was 2.6 billion kg in 2000 (Behler, 2007)
    Reference(s):
    Behler A.. 2007. Alkylbenzolsulfonate in RÖMPP Online Encyclopedia, accessed at https://roempp.thieme.de/roempp4.0/do/data/RD-01-01519?update=true, 4 July 2017.
  property carbon content, fossil 0.407018
    European LAS is a mixture of differ-ent homologues (C10-C13 alkyl chains) including all positional isomers with the exception of 1-alkyl substituted ones. The typical homologue distribution is 15%, 30%, 30% and 25% for C10, C11, C12 and C13 with an average alkyl chain of C11.6 and an average molecular weight of 342 as the sodium salt (ecoinvent v2.2 report 12)
  property price 0.804484 EUR2005
    Calculated based on inputs: The price of the product has been calculated as a sum of the values of the material and energy inputs for this product. This value is therefore a rough estimation. It may underestimate the real price since there are additional expenses when producing any product. These expences can include for example labour costs, treatment of waste materials and profit for the producer. Please consider carefully whether this level of data quality is acceptable for your application.
  property carbon content, non-fossil 0
    (same comment as for alkylbenzene sulfonate, linear, petrochemical)
  property heating value, net 28.88 MJ
    LHV is calculated based on the elemental composition of the substance. Based on the CAS number of the substance (042615-29-2), the chemical formula of the substance is found to be: C18H29NaO3S, (PubChem 2020).
    Reference: Kim, S., Chen, J., Cheng, T., Gindulyte, A., He, J., He, S., Li, Q., Shoemaker, B. A., Thiessen, P. A., Yu, B., Zaslavsky, L., Zhang, J., & Bolton, E. E. (2019). PubChem 2019 update: improved access to chemical data. Nucleic acids research, 47(D1), D1102–D1109. https://doi.org/10.1093/nar/gky1033
  property carbon content 0.407018
    carbon content on a dry matter basis (reserved; not for manual entry)
  properties: wet mass 1 kg, water in wet mass 0 kg, dry mass 1 kg, water content 0, carbon allocation 0.407018 kg

## Inputs from technosphere
- sodium hydroxide, without water, in 50% solution state: 0.127 kg; lognormal variance with pedigree 0.0632, pedigree (2,3,5,5,1)
  Literature value. Input data are based on an EMPA-study on tensides (Dall'Acqua et al. 1999).
  Reference(s): Dall'Acqua S., Fawer M., Fritschi R. and Allenspach C. (1999) Life Cycle In-ventories for the Production of Detergent Ingredients. EMPA report No.244. EMPA, St. Gallen (Switzerland)
  properties: dry mass 1 kg, heating value, net 3.03 MJ, wet mass 1 kg
- benzene: 0.251 kg; lognormal variance with pedigree 0.0632, pedigree (2,3,5,5,1)
  (same comment as for sodium hydroxide, without water, in 50% solution state)
  properties: dry mass 1 kg, wet mass 1 kg, carbon content, fossil 0.923077, heating value, net 42.5 MJ
- heat, district or industrial, natural gas: 0 MJ; pedigree (1,1,1,1,1)
  (same comment as for sodium hydroxide, without water, in 50% solution state)
  properties: heating value, net 1 MJ
- paraffin: 0.516 kg; lognormal variance with pedigree 0.0632, pedigree (2,3,5,5,1)
  (same comment as for sodium hydroxide, without water, in 50% solution state)
  properties: heating value, net 41.5 MJ, dry mass 1 kg, wet mass 1 kg, carbon content, fossil 0.847059
  note on heating value, net: Indicative value. Reference: Fuels - Higher and Lower Calorific Values, available at: https://www.engineeringtoolbox.com/fuels-higher-calorific-values-d_169.html
  note on carbon content, fossil: An average composition of C12H26 (molecular weight of 170 g/mol) was assumed for n-parafins, after ecoinvent v2.2 report 8, part II, pg 398
- aluminium, wrought alloy: 0.0068 kg; lognormal variance with pedigree 0.0632, pedigree (2,3,5,5,1)
  (same comment as for sodium hydroxide, without water, in 50% solution state)
  properties: wet mass 1 kg, dry mass 1 kg
- electricity, medium voltage: 0 kWh; pedigree (1,1,1,1,1)
  (same comment as for sodium hydroxide, without water, in 50% solution state)
- hydrogen fluoride: 0.01 kg; lognormal variance with pedigree 0.0632, pedigree (2,3,5,5,1)
  (same comment as for sodium hydroxide, without water, in 50% solution state)
  properties: wet mass 1 kg, dry mass 1 kg, heating value, net 6.06 MJ
- aluminium, cast alloy: 0.0032 kg; lognormal variance with pedigree 0.0632, pedigree (2,3,5,5,1)
  (same comment as for sodium hydroxide, without water, in 50% solution state)
  properties: dry mass 1 kg, wet mass 1 kg
- sulfur: 0.1 kg; lognormal variance with pedigree 0.0632, pedigree (2,3,5,5,1)
  (same comment as for sodium hydroxide, without water, in 50% solution state)
  properties: dry mass 1 kg, wet mass 1 kg
- chemical factory, organics: 4e-10 unit; lognormal variance with pedigree 0.3498, pedigree (2,3,5,4,3)
  Calculated based on literature data published by the industry. For this activity, no information was readily available concerning infrastructure and land-use. Therefore, the infrastructure is estimated based on data from two chemical factories, the BASF site of Ludwigshafen and the chemical factory in Gendorf (which are both located in Germany), which produce a wide range of chemical substances. Based on this data, the following assumptions are made: the built area amounts to about 4.2 ha, the plant has an average output of 50'000 t/a and a lifespan of fifty years. The estimated infrastructure amount is therefore 4.00 E-10 units per kg of produced chemical.
  References:
  Althaus H.-J., Chudacoff M., Hischier R., Jungbluth N., Osses M. and Primas A. (2007) Life Cycle Inventories of Chemicals. ecoinvent report No. 8, v2.0. EMPA Dübendorf, Swiss Centre for Life Cycle Inventories, Dübendorf, CH.
  Gendorf (2000) Umwelterklärung 2000, Werk Gendorf. Werk Gendorf, Burgkirchen.
- heat, district or industrial, other than natural gas: 0 MJ; pedigree (1,1,1,1,1)
  (same comment as for sodium hydroxide, without water, in 50% solution state)
  properties: heating value, net 1 MJ
- heat, district or industrial, natural gas: 0.0436039, 2.8292 MJ (2 entries); lognormal variance with pedigree 0.0632, pedigree (2,3,5,5,1)
  (same comment as for sodium hydroxide, without water, in 50% solution state)
- electricity, medium voltage: 0.000384993, 7.3825e-5, 0.00123937, 0.0180255, 0.0025407, 0.008278 kWh (6 entries); lognormal variance with pedigree 0.0632, pedigree (2,3,5,5,1)
  (same comment as for sodium hydroxide, without water, in 50% solution state)
- heat, district or industrial, other than natural gas: 0.000649961, 1.60283 MJ (2 entries); lognormal variance with pedigree 0.0632, pedigree (2,3,5,5,1)
  (same comment as for sodium hydroxide, without water, in 50% solution state)

## Emissions to nature
- Sulfur dioxide [air, urban air close to ground]: 0.000293 kg; lognormal variance with pedigree 0.0632, pedigree (2,3,5,5,1)
  Literature Value. Process-related emissions have been assessed by comparing the aggregated emissions of LAS out of Berna et al. (1995) with the aggregated emissions of its most important pre-cursory substances, namely benzene and n-paraffins out of Franke et al. (1995).
  Reference(s):
  Berna J. L., Cavalli L. and Renta C. (1995) A Life-Cycle Inventory for the Pro-duction of Linear Alkylbenzene Sulphonates in Europe. In: Tenside, Surfactants, Detergents, 32(2), pp. 122-127.
  Franke M., Berna J. L., Cavalli L., Renta C., Stalmans M. and Thomas H. (1995) A Life-Cycle Inventory for the Production of Petrochemical Intermediates in Europe. In: Tenside Surf. Det., 32(5), pp. 384 - 396.
- Chloride [water, surface water]: 0.00132 kg; lognormal variance with pedigree 0.0932, pedigree (2,3,5,5,1)
  (same comment as for Sulfur dioxide)
- Sulfide [water, surface water]: 0.00011 kg; lognormal variance with pedigree 0.0932, pedigree (2,3,5,5,1)
  (same comment as for Sulfur dioxide)
- Carbon monoxide, fossil [air, urban air close to ground]: 4.31e-6 kg; lognormal variance with pedigree 0.0932, pedigree (2,3,5,5,1)
  (same comment as for Sulfur dioxide)
- Sulfate [water, surface water]: 6.68e-5 kg; lognormal variance with pedigree 0.0932, pedigree (2,3,5,5,1)
  (same comment as for Sulfur dioxide)
- Carbon dioxide, fossil [air, urban air close to ground]: 0.00907 kg; lognormal variance with pedigree 0.0632, pedigree (2,3,5,5,1)
  (same comment as for Sulfur dioxide)
- Phosphate [water, surface water]: 9.81e-7 kg; lognormal variance with pedigree 0.0932, pedigree (2,3,5,5,1)
  (same comment as for Sulfur dioxide)
- Ammonium, ion [water, surface water]: 1.59e-5 kg; lognormal variance with pedigree 0.0932, pedigree (2,3,5,5,1)
  (same comment as for Sulfur dioxide)
- Phenol [water, surface water]: 5.22e-7 kg; lognormal variance with pedigree 0.3632, pedigree (2,3,5,5,1)
  (same comment as for Sulfur dioxide)
- Aluminium [water, surface water]: 1.06e-6 kg; lognormal variance with pedigree 0.6932, pedigree (2,3,5,5,1)
  (same comment as for Sulfur dioxide)
- Particulates, > 10 um [air, urban air close to ground]: 1.64e-5 kg; lognormal variance with pedigree 0.0932, pedigree (2,3,5,5,1)
  (same comment as for Sulfur dioxide)
- Nitrogen oxides [air, urban air close to ground]: 0.0001 kg; lognormal variance with pedigree 0.0932, pedigree (2,3,5,5,1)
  (same comment as for Sulfur dioxide)
- Nickel, ion [water, surface water]: 2.08e-6 kg; lognormal variance with pedigree 0.6932, pedigree (2,3,5,5,1)
  (same comment as for Sulfur dioxide)
- Mercury [water, surface water]: 3e-8 kg; lognormal variance with pedigree 0.6932, pedigree (2,3,5,5,1)
  (same comment as for Sulfur dioxide)
- Mercury [air, urban air close to ground]: 3.2e-7 kg; lognormal variance with pedigree 0.0932, pedigree (2,3,5,5,1)
  (same comment as for Sulfur dioxide)
- Lead [water, surface water]: 1.3e-8 kg; lognormal variance with pedigree 0.6932, pedigree (2,3,5,5,1)
  (same comment as for Sulfur dioxide)
- Iron, ion [water, surface water]: 2.4e-6 kg; lognormal variance with pedigree 0.6932, pedigree (2,3,5,5,1)
  (same comment as for Sulfur dioxide)
- BOD5, Biological Oxygen Demand [water, unspecified]: 1.7255e-6 kg; lognormal variance with pedigree 0.218, pedigree (4,5,5,5,5)
  Calculated value. The BOD, COD, TOC and BOD5 are calculated based on the amount and type of emissions released to water in the same activity.
- Hydrocarbons, unspecified [water, surface water]: 1.49e-7 kg; lognormal variance with pedigree 0.3632, pedigree (2,3,5,5,1)
  (same comment as for Sulfur dioxide)
- COD, Chemical Oxygen Demand [water, unspecified]: 1.7255e-6 kg; lognormal variance with pedigree 0.218, pedigree (4,5,5,5,5)
  (same comment as for BOD5, Biological Oxygen Demand)
- Hydrocarbons, aliphatic, alkanes, unspecified [air, urban air close to ground]: 0.000231 kg; lognormal variance with pedigree 0.0932, pedigree (2,3,5,5,1)
  (same comment as for Sulfur dioxide)
- DOC, Dissolved Organic Carbon [water, unspecified]: 5.18273e-7 kg; lognormal variance with pedigree 0.218, pedigree (4,5,5,5,5)
  (same comment as for BOD5, Biological Oxygen Demand)
- Fluoride [water, surface water]: 7.58e-6 kg; lognormal variance with pedigree 0.0932, pedigree (2,3,5,5,1)
  (same comment as for Sulfur dioxide)
- TOC, Total Organic Carbon [water, unspecified]: 5.18273e-7 kg; lognormal variance with pedigree 0.218, pedigree (4,5,5,5,5)
  (same comment as for BOD5, Biological Oxygen Demand)
- Dissolved solids [water, surface water]: 0.00278 kg; lognormal variance with pedigree 0.0932, pedigree (2,3,5,5,1)
  (same comment as for Sulfur dioxide)
- Zinc, ion [water, surface water]: 7.7e-7 kg; lognormal variance with pedigree 0.6932, pedigree (2,3,5,5,1)
  (same comment as for Sulfur dioxide)
- Chromium, ion [water, surface water]: 4.28e-6 kg; lognormal variance with pedigree 0.6932, pedigree (2,3,5,5,1)
  (same comment as for Sulfur dioxide)
- Suspended solids, unspecified [water, surface water]: 0.00024 kg; lognormal variance with pedigree 0.0932, pedigree (2,3,5,5,1)
  (same comment as for Sulfur dioxide)
- Chlorine [air, urban air close to ground]: 7.8e-8 kg; lognormal variance with pedigree 0.0932, pedigree (2,3,5,5,1)
  (same comment as for Sulfur dioxide)

## Sampling procedure
Data from the ECOSOL study of European Surfactant Industry.

## Extrapolations
This dataset has been copied from an original dataset covering the geography RER. The uncertainty has been adjusted accordingly.

## Review by Gregor Wernet 2017-08-04
This dataset was additionally reviewed in a separate review process by Eric Johnson of Atlantic Consulting as well as Emilia Moreno Ruiz and Gregor Wernet of ecoinvent.
