# electricity, high voltage, production mix

Dataset: EcoSpold 2, unit process, production mix
Geography: CN-GD
Time period: 2021-01-01 to 2021-12-31
Scenario: Business-as-Usual
System model: Allocation, cut-off by classification
Generated by: [System]
Database: ecoinvent
isCopyrightProtected: false
accessRestrictedTo: 1

## Reference product
- electricity, high voltage: 1 kWh; By-product classification allocatable product; CPC 17100: Electrical energy
  production volume 3.42817e11 kWh

## Inputs from technosphere
- electricity, high voltage: 0 kWh
  properties: price 0.0977 EUR2005
- electricity, high voltage: 0.75666 kWh
  production volume 2.59395e11 kWh
- electricity, high voltage: 0.00691927 kWh
  production volume 2.37204e9 kWh
- electricity, high voltage: 0.0791072 kWh
  production volume 2.71193e10 kWh
- electricity, high voltage: 0.0157764 kWh
  production volume 5.4084e9 kWh
- electricity, high voltage: 0.00148097 kWh
  production volume 5.077e8 kWh
- electricity, high voltage: 0.12997 kWh
  production volume 4.4556e10 kWh
- electricity, high voltage: 0.00136692 kWh
  production volume 4.68601e8 kWh
- electricity, high voltage: 0.00106042 kWh
  production volume 3.63528e8 kWh
- electricity, high voltage: 0.00258402 kWh
  production volume 8.85846e8 kWh
- electricity, high voltage: 0.000221946 kWh
  production volume 7.60868e7 kWh
- electricity, high voltage: 0.00306759 kWh
  production volume 1.05162e9 kWh
- electricity, high voltage: 2.91701e-12 kWh
  production volume 1 kWh
  properties: price 0.0977 EUR2005, exergy 3.6 MJ
  note on exergy: allocation factor for electricity (=1) vs. heat, where heat is calculated as the termodynamic mean temperature Tm = (Tfeed-Treturn)/ln(Tfeed/Treturn), relative to the application temperature (Tu, typically = 293 K), i.e. (Tm-Tu)/Tm
- electricity, high voltage: 0.00178521 kWh
  production volume 6.12e8 kWh
  note on exergy: This exergy property is based on the exergy content of the product.
