# wood preservative production, organic, indoor use, dry

Dataset: EcoSpold 2, unit process
Geography: GLO
Time period: 2012-01-01 to 2021-12-31
Technology level: current
Classification: ISIC rev.4 ecoinvent: 2021:Manufacture of pesticides and other agrochemical products
Tags: Swiss brush-up completed
Scenario: Business-as-Usual
System model: Allocation, cut-off by classification
Generated by: Frank Werner
Database: ecoinvent
isCopyrightProtected: true
accessRestrictedTo: 1

## General comment
According to EN 335-1:2005, five use classes are distinguished for chemical wood protection based on the general exposure of wood in its application, wetting regime in service and the biological agents to be expected. This exposure scenario determines the potentially vulnerable zone of wood and the required treatment for the application of the wood preservative (see table)

## Included activities start
From reception of chemicals at the factory gate

## Included activities end
The datasets covers the components and preparation of a typical water-based/organic solvent based [as applicable] wood preservative for the use class according to EN 335-1:2006 as indicated in the name of the dataset, ready to be packed. In addition in contains an estimate for electricity consumption and for infrastructure. Packaging is not included

## Geography
Data referring to (Central) European conditions

## Reference product
- wood preservative, organic, indoor use, dry: 1 kg; source Empa St. Gallen 2012; CPC 345: Miscellaneous basic chemical products; By-product classification allocatable product
  production volume 4.86667e7 kg; name p_preservative; = 3.65E9*0.5*0.08/3
    Using the GLO value of 3.65E09 kg preservative derived from Vlosky (2009), the distribution on solvent-based (8%), the 50% non-pressure methods, and the assumption of equal distribution over the 3 use classes
  property price 0.849304 EUR2005
    Calculated based on inputs: The price of the product has been calculated as a sum of the values of the material and energy inputs for this product. This value is therefore a rough estimation. It may underestimate the real price since there are additional expenses when producing any product. These expences can include for example labour costs, treatment of waste materials and profit for the producer. Please consider carefully whether this level of data quality is acceptable for your application.
  property carbon content 0.8523
    carbon content on a dry matter basis (reserved; not for manual entry)
  properties: carbon content, non-fossil 0, carbon content, fossil 0.8523, dry mass 1 kg, water in wet mass 0 kg, water content 0, wet mass 1 kg, carbon allocation 0.8523 kg

## Inputs from technosphere
- lubricating oil: 0 kg; source Empa St. Gallen 2012; pedigree (1,1,1,1,1)
  proxy for mineral oil
  properties: heating value, net 40.2 MJ, UVEK_link_1 2866, UVEK_relative_amount_1 1, dry mass 1 kg, wet mass 1 kg, carbon content, fossil 0.75
  note on heating value, net: Literature value, Source: IPCC 2006, 2006 IPCC Guidelines for National Greenhouse Gas Inventories, Prepared by the National Greenhouse Gas Inventories Programme, Eggleston H.S., Buendia L., Miwa K., Ngara T. and Tanabe K. (eds). Published: IGES, Japan
  note on UVEK_link_1: to be used only in special submissions in coordination with ecoinvent and the Swiss FOEN
- paraffin: 0.9207 kg; name M_paraffin; source Empa St. Gallen 2012; lognormal variance with pedigree 0.235, pedigree (5,5,5,5,5)
  additive
  properties: heating value, net 41.5 MJ, wet mass 1 kg, carbon content, fossil 0.847059, UVEK_relative_amount_1 1, UVEK_link_1 3381, dry mass 1 kg
  note on heating value, net: Indicative value. Reference: Fuels - Higher and Lower Calorific Values, available at: https://www.engineeringtoolbox.com/fuels-higher-calorific-values-d_169.html
- naphtha: 0 kg; name M_naphta; source Empa St. Gallen 2012; pedigree (1,1,1,1,1)
  solvent
  property wet mass 1 kg; name WM
  property carbon content, non-fossil 0; name C_content_non_fossil
  property carbon content, fossil 0.919743; name C_content_fossil
  property water content 0; name water_content
  property dry mass 1 kg; name DM
  property water in wet mass 0 kg; name WWM
  properties: UVEK_link_1 3072, UVEK_relative_amount_1 1, heating value, net 45 MJ
- electricity, medium voltage: 0.0428 kWh; source Althaus H.-J. 2007; lognormal variance with pedigree 0.235, pedigree (5,5,5,5,5)
  assumed to equal as for solvent based paint
  properties: UVEK_link_9 4433, UVEK_relative_amount_9 14.0187, UVEK_relative_amount_1 1, UVEK_link_8 4417, UVEK_relative_amount_8 2.33645, UVEK_link_1 1785
  note on UVEK_link_9: This link has been introduced to model transport specifically for the SAM model; to be used only in special submissions in coordination with ecoinvent and the Swiss FOEN.
  note on UVEK_relative_amount_9: Scaling factor = amount of transport in corresponding KBOB dataset/amount of this input from technosphere. Source for transport distance: Life Cycle Inventories of Wood as Fuel and Construction Material/2007/Werner F. To be used only in special submissions in coordination with ecoinvent and the Swiss FOEN
- chemical factory, organics: 4e-10 unit; source Althaus H.-J. 2007; lognormal variance with pedigree 0.76, pedigree (5,5,5,5,5)
  assumed to be equal as for paint production
  properties: UVEK_relative_amount_1 1, UVEK_link_1 430
- pyrethroid-compound: 0.0015 kg; name m_permetrine; lognormal variance with pedigree 0.235, pedigree (5,5,5,5,5)
  Permethrine as active agent
  properties: carbon content, fossil 0.623, wet mass 1 kg, dry mass 1 kg, UVEK_link_1 3716, UVEK_relative_amount_1 1
- cyclohexane: 0.0693 kg; name M_cyclohexane; source Empa St. Gallen 2012; lognormal variance with pedigree 0.235, pedigree (5,5,5,5,5)
  solvent
  properties: UVEK_link_1 690, UVEK_relative_amount_1 1, wet mass 1 kg, carbon content, fossil 0.857143, heating value, net 43.22 MJ, dry mass 1 kg
- hazardous waste, for incineration: 0 kg; name m_hazardous_waste; source Nemecek, T. 2007; pedigree (1,1,1,1,1)
  estimated as 200 kg/t active ingredient
  production volume 0 kg
    Calculated from production volume of reference product using the relative outputs.
  properties: UVEK_link_1 965, water content 0.333333, dry mass 0.75 kg, carbon content, fossil 0.554667, heating value, net 17 MJ, wet mass 1 kg, UVEK_relative_amount_1 -1
  note on heating value, net: Value taken from the general comment of the treatment dataset.
- lubricating oil: 0.000261, 0.001239 kg (2 entries); source Empa St. Gallen 2012; lognormal variance with pedigree 0.235, pedigree (5,5,5,5,5)
  proxy for mineral oil
- naphtha: 0.00107086, 3.35276e-5, 0.000777978, 8.1241e-6, 0.000101751, 0.000211016, 0.00479674 kg (7 entries); source Empa St. Gallen 2012; lognormal variance with pedigree 0.235, pedigree (5,5,5,5,5)
  solvent
  properties: wet mass 1 kg, UVEK_link_1 3072, carbon content, fossil 0.919743, UVEK_relative_amount_1 1, heating value, net 45 MJ, dry mass 1 kg
- hazardous waste, for incineration: -9.66e-5, -2.52507e-6, -0.000200875 kg (3 entries); source Nemecek, T. 2007; lognormal variance with pedigree 0.203, pedigree (4,5,5,5,5)
  estimated as 200 kg/t active ingredient
  production volume 14600 kg

## Sampling procedure
Ideal-type formulation of wood preservative for a water-/solvent-based [as applicable] wood preservative for the respective use class

## Extrapolations
This dataset has been extrapolated from year 2012 to the year of the calculation (2021). The uncertainty has been adjusted accordingly.
