# treatment of waste bitumen sheet, municipal incineration

Dataset: EcoSpold 2, unit process
Geography: CH
Time period: 1994-01-01 to 2021-12-31
Technology level: outdated
Classification: EcoSpold01Categories: waste management/municipal incineration
Classification: ISIC rev.4 ecoinvent: 3821:Treatment and disposal of non-hazardous waste
Tags: Treatment; ConvertedDataset
Scenario: Business-as-Usual
System model: Allocation, cut-off by classification
Generated by: Gabor Doka (obsolete)
Published in: Doka G. 2007
Database: ecoinvent
isCopyrightProtected: true
accessRestrictedTo: 1

## General comment
Inventoried waste contains 6% PE; 7% PS; 24% inert material; 63% bitumen; .
waste composition (wet, in ppm): upper heating value 31.37 MJ/kg; lower heating value 30.06 MJ/kg; H2O 8922.8; O 139330; H 75813; C 633560; S 25273; N 3363.8; P 2.52; B n.a.; Cl 166.94; Br 62.324; F 1.8605; I n.a.; Ag n.a.; As 0.67925; Ba 27.039; Cd 3.6703; Co 2.5151; Cr 3.7414; Cu 13.161; Hg 0.073095; Mn 7.2257; Mo 0.3528; Ni 64.455; Pb 3.0312; Sb 3.5197; Se 0.38932; Sn 58.077; V 309.39; Zn 78.943; Be 0.062696; Sc n.a.; Sr 11.097; Ti 125.39; Tl 0.050157; W n.a.; Si 112000; Fe 392.12; Ca 159.13; Al 29.489; K n.a.; Mg 5.7538; Na 205.81;
Share of carbon in waste that is biogenic 0%.
Share of iron in waste that is metallic/recyclable 0%.
Net energy produced in MSWI: 3.39MJ/kg waste electric energy and 6.85MJ/kg waste thermal energy
Allocation of energy production: no substitution or expansion. Total burden allocated to waste disposal function of MSWI.
One kg of this waste produces 0.2814 kg of slag and 0.02623 kg of residues, which are landfilled. Additional solidification with 0.01049 kg of cement.
[This dataset was already contained in the ecoinvent database version 2. It was not individually updated during the transfer to ecoinvent version 3. Life Cycle Impact Assessment results may still have changed, as they are affected by changes in the supply chain, i.e. in other datasets. This dataset was generated following the ecoinvent quality guidelines for version 2. It may have been subject to central changes described in the ecoinvent version 3 change report (http://www.ecoinvent.org/database/ecoinvent-version-3/reports-of-changes/), and the results of the central updates were reviewed extensively. The changes added e.g. consistent water flows and other information throughout the database. The documentation of this dataset can be found in the ecoinvent reports of version 2, which are still available via the ecoinvent website. The change report linked above covers all central changes that were made during the conversion process.]

## Included activities end
waste-specific air and water emisions from incineration, auxiliary material consumption for flue gas cleaning. Short-term emissions to river water and long-term emisisons to ground water from slag compartment (from bottom slag) and residual material landfill (from solidified fly ashes and scrubber slugde). Process energy demands for MSWI.

## Geography
Specific to the technology mix encountered in Switzerland in 2000. Well applicable to modern incineration practices in Europe, North America or Japan.

## Technology
replaced by newer incineration technology with fly ash extraction. Average Swiss MSWI plants in 2000 with electrostatic precipitator for fly ash (ESP), wet flue gas scrubber and 29.4% SNCR , 32.2% SCR-high dust , 24.6% SCR-low dust -DeNOx facilities and 13.8% without Denox (by burnt waste, according to Swiss average). Share of waste incinerated in plants with magnetic scrap separation from slag : 50%. Gross electric efficiency technology mix 12.997% and Gross thermal efficiency technology mix 25.57%

## Time period
Waste composition as given in literature reference, theoretical data or other source. Transfer coefficients for modern Swiss MSWI. Emission speciation based on early 90ies data.

## Reference product
- waste bitumen sheet: -1 kg; By-product classification Waste; CPC 39: Wastes or scraps
  EcoSpold01Location=CH
  production volume 0 kg; name RP_PV_1
    outdated. Replaced by newer incineration technology with fly ash extraction.
  property price 0 EUR2005
    Waste products are assigned a price of zero as they are assumed to require further treatment.
  property carbon content, fossil 0.643207
    The bitumen sheet is made of 63% bitumen, 24% surface spread and filler (assumed to be pure SiO2), 6% carrier fleece (assumed to be PE) and 7% elastomer (assumed to be PS) (ecoinvent v2.2 report 13_I, pg 40). C content of bitumen, PE and PS from Tab A.6 and A.1 (ecoinvent v2.2 report 13_I, pg 40), respectively. C content of waste also given in the dataset
  property heating value, net 40.2 MJ
    Literature value, Source: IPCC 2006, 2006 IPCC Guidelines for National Greenhouse Gas Inventories, Prepared by the National Greenhouse Gas Inventories Programme, Eggleston H.S., Buendia L., Miwa K., Ngara T. and Tanabe K. (eds). Published: IGES, Japan
  property carbon content 0.643207
    carbon content on a dry matter basis (reserved; not for manual entry)
  properties: wet mass 1 kg, dry mass 0.985 kg, water in wet mass 0.015 kg, carbon content, non-fossil 0, water content 0.0152284, carbon allocation 0.633559 kg

## Inputs from technosphere
- chromium oxide, flakes: 9.91e-8 kg; lognormal variance with pedigree 2.17, pedigree (1,1,5,1,1)
  Proxy for vanadium pentoxide V2O5 in SCR catalyst, uncertainty calculated from uncertainty in average DeNOx input, uncertainty in the share of thermal NOx, uncertainty of nitrogen content in average municipal waste and the unertainty in nitrogen content in *this* waste.
  EcoSpold01Location=RER
  properties: wet mass 1 kg, dry mass 1 kg
- residual material landfill: 5.46e-11 unit; lognormal variance with pedigree 0.09, pedigree (1,1,5,1,1)
  uncertainty is calculated from uncertainties in waste composition and transfer coefficients in incinerator
  EcoSpold01Location=CH
- chemical, inorganic: 1.24e-5 kg; lognormal variance with pedigree 0.18, pedigree (1,1,5,1,1)
  EcoSpold01Location=GLO
  Proxy for Polyelectrolyte. uncertainty calculated from uncertainty in average auxiliary material input, and the unertainty of the waste composition of this waste
  properties: carbon content, fossil 0.003, dry mass 1 kg, wet mass 1 kg
  note on carbon content, fossil: This dataset is an unweighted average of 20 inorganic substances (listed in Tab 88.1, ecoinvent v2.2 report 8, part II), being part of the top100 chemicals included in this database. The C-content has also been calculated as an unweighted average of the C content of the substances composing this dataset.
- waste cement, hydrated: -0.0262 kg; name BP_amount_1; lognormal variance with pedigree 0.1, pedigree (1,1,5,1,1)
  Hydrated cement for solidification of landfilled residual material. Uncertainty calculated from unertainty of the waste composition of this waste and transfer coefficients in the incinerator and of the solidification recipe.
  EcoSpold01Location=CH
  production volume 0 kg; = RP_PV_1* BP_amount_1
    Calculated from the production volume of waste bitumen sheet, 1.5% water in proportion to the respective output amounts.
  property price 0 EUR2005; name BP_amount_1_price_EUR2005
  properties: wet mass 1 kg, dry mass 1 kg
- process-specific burdens, slag landfill: 0.281 kg; lognormal variance with pedigree 0.09, pedigree (1,1,5,1,1)
  EcoSpold01Location=CH
  uncertainty is calculated from uncertainties in waste composition and transfer coefficients in incinerator;activityLink introduced to establish a direct link to the corresponding regional supply of this product
- process-specific burdens, municipal waste incineration: 1 kg; lognormal variance with pedigree 0.04, pedigree (1,1,5,1,1)
  EcoSpold01Location=CH
  demands per kilogram waste. uncertainty is heeded in the module;activityLink introduced to establish a direct link to the corresponding regional supply of this product
- municipal waste incineration facility: 2.5e-10 unit; lognormal variance with pedigree 0.04, pedigree (1,1,5,1,1)
  demands per kilogram waste. uncertainty is heeded in the module
  EcoSpold01Location=CH
- cement, unspecified: 0.0105 kg; lognormal variance with pedigree 0.1, pedigree (1,1,5,1,1)
  EcoSpold01Location=CH
  Cement for solidification of landfilled residual material. Uncertainty calculated from unertainty of the waste composition of this waste, of transfer coefficients in the incinerator and of the solidification recipe.
  properties: dry mass 1 kg, wet mass 1 kg
- heat, district or industrial, natural gas: 0.01485 MJ; lognormal variance with pedigree 1.46, pedigree (1,1,5,1,1)
  EcoSpold01Location=RER
  uncertainty calculated from uncertainty in average DeNOx input, uncertainty in the share of thermal NOx, uncertainty of nitrogen content in average municipal waste and the unertainty in nitrogen content in *this* waste.
  properties: heating value, net 1 MJ
- iron (III) chloride, without water, in 40% solution state: 1.33e-5 kg; lognormal variance with pedigree 0.58, pedigree (1,1,5,1,1)
  EcoSpold01Location=CH
  uncertainty calculated from uncertainty in average auxiliary material input, and the unertainty of the waste composition of this waste
  properties: wet mass 1 kg, dry mass 1 kg
- quicklime, milled, packed: 3.04e-5 kg; lognormal variance with pedigree 0.88, pedigree (1,1,5,1,1)
  (same comment as for iron (III) chloride, without water, in 40% solution state)
  properties: wet mass 1 kg, dry mass 0.99 kg, water content 0.010101
- process-specific burdens, residual material landfill: 0.0262 kg; lognormal variance with pedigree 0.09, pedigree (1,1,5,1,1)
  (same comment as for process-specific burdens, slag landfill)
- titanium dioxide: 4.86e-6 kg; lognormal variance with pedigree 2.17, pedigree (1,1,5,1,1)
  (same comment as for heat, district or industrial, natural gas)
  properties: wet mass 1 kg, dry mass 1 kg
- chemical, organic: 1.48e-5 kg; lognormal variance with pedigree 1.43, pedigree (1,1,5,1,1)
  Proxy for TMT15. uncertainty calculated from uncertainty in average auxiliary material input, and the unertainty of the waste composition of this waste
  EcoSpold01Location=GLO
  properties: heating value, net 19.03 MJ, dry mass 1 kg, wet mass 1 kg, carbon content, fossil 0.628
  note on carbon content, fossil: This dataset is an unweighted average of 20 organic substances (listed in Tab 88.1, ecoinvent v2.2 report 8, part II), being part of the top100 chemicals included in this database. The C-content has also been calculated as an unweighted average of the C content of the substances composing this dataset.
- ammonia, anhydrous, liquid: 0.00017 kg; lognormal variance with pedigree 1.46, pedigree (1,1,5,1,1)
  uncertainty calculated from uncertainty in average DeNOx input, uncertainty in the share of thermal NOx, uncertainty of nitrogen content in average municipal waste and the unertainty in nitrogen content in *this* waste.
  EcoSpold01Location=CH
  properties: dry mass 1 kg, wet mass 1 kg
- slag landfill: 5e-10 unit; lognormal variance with pedigree 0.09, pedigree (1,1,5,1,1)
  EcoSpold01Location=CH
  uncertainty is calculated from uncertainties in waste composition and transfer coefficients in incinerator
- hydrochloric acid, without water, in 30% solution state: 7.42e-6 kg; lognormal variance with pedigree 0.18, pedigree (1,1,5,1,1)
  uncertainty calculated from uncertainty in average auxiliary material input, and the unertainty of the waste composition of this waste
  EcoSpold01Location=RER
  properties: heating value, net 3.32 MJ, dry mass 1 kg, wet mass 1 kg
- sodium hydroxide, without water, in 50% solution state: 0.00941 kg; lognormal variance with pedigree 0.18, pedigree (1,1,5,1,1)
  (same comment as for hydrochloric acid, without water, in 30% solution state)
  properties: heating value, net 3.03 MJ, wet mass 1 kg, dry mass 1 kg

## Emissions to nature
- Iron, ion [water, surface water]: 1.34e-7 kg; lognormal variance with pedigree 0.8, pedigree (1,1,5,1,1)
  uncertainty is calculated from uncertainties in waste composition and transfer coefficients in incinerator and landfills
- Arsenic, ion [water, surface water]: 3.06e-7 kg; lognormal variance with pedigree 1.41, pedigree (1,1,5,1,1)
  (same comment as for Iron, ion)
- Selenium [air, urban air close to ground]: 1.96e-15 kg; lognormal variance with pedigree 1.86, pedigree (1,1,5,1,1)
  uncertainty is calculated from uncertainties in waste composition and transfer coefficients in incinerator
- DOC, Dissolved Organic Carbon [water, surface water]: 1.74e-5 kg; lognormal variance with pedigree 0.27, pedigree (1,1,5,1,1)
  (same comment as for Iron, ion)
- Chromium VI [water, surface water]: 1.22e-7 kg; lognormal variance with pedigree 1.34, pedigree (1,1,5,1,1)
  (same comment as for Iron, ion)
- Nitrate [water, ground-, long-term]: 0.000121 kg; lognormal variance with pedigree 0.55, pedigree (1,1,5,1,1)
  Long-term emissions from landfilling of incineration residues. uncertainty is calculated from uncertainties in waste composition and transfer coefficients in incinerator and landfills.
- Silicon [water, surface water]: 4.13e-6 kg; lognormal variance with pedigree 1.24, pedigree (1,1,5,1,1)
  (same comment as for Iron, ion)
- Tin, ion [water, ground-, long-term]: 2.92e-5 kg; lognormal variance with pedigree 1.44, pedigree (1,1,5,1,1)
  (same comment as for Nitrate)
- Zinc, ion [water, ground-, long-term]: 1.22e-6 kg; lognormal variance with pedigree 5.63, pedigree (1,1,5,1,1)
  (same comment as for Nitrate)
- Cobalt [water, surface water]: 4.3e-10 kg; lognormal variance with pedigree 1.92, pedigree (1,1,5,1,1)
  (same comment as for Iron, ion)
- Dinitrogen monoxide [air, urban air close to ground]: 1.42e-5 kg; lognormal variance with pedigree 1.57, pedigree (1,1,5,1,1)
  uncertainty calculated from uncertainty in average N-emissions, uncertainty in the share of thermal NOx, uncertainty of nitrogen content in average municipal waste and the unertainty in nitrogen content in *this* waste.
- Nitrate [water, surface water]: 4.3e-5 kg; lognormal variance with pedigree 0.39, pedigree (1,1,5,1,1)
  (same comment as for Iron, ion)
- COD, Chemical Oxygen Demand [water, surface water]: 4.23e-5 kg; lognormal variance with pedigree 0.29, pedigree (1,1,5,1,1)
  (same comment as for Iron, ion)
- Copper, ion [water, ground-, long-term]: 1.06e-5 kg; lognormal variance with pedigree 1.24, pedigree (1,1,5,1,1)
  (same comment as for Nitrate)
- Cobalt [water, ground-, long-term]: 2.2e-6 kg; lognormal variance with pedigree 1.43, pedigree (1,1,5,1,1)
  (same comment as for Nitrate)
- BOD5, Biological Oxygen Demand [water, ground-, long-term]: 0.00511 kg; lognormal variance with pedigree 0.05, pedigree (1,1,5,1,1)
  (same comment as for Nitrate)
- Titanium [air, urban air close to ground]: 1.25e-7 kg; lognormal variance with pedigree 0.99, pedigree (1,1,5,1,1)
  (same comment as for Selenium)
- Fluoride [water, surface water]: 1.43e-7 kg; lognormal variance with pedigree 1.14, pedigree (1,1,5,1,1)
  (same comment as for Iron, ion)
- Vanadium, ion [water, ground-, long-term]: 5.31e-5 kg; lognormal variance with pedigree 1.59, pedigree (1,1,5,1,1)
  (same comment as for Nitrate)
- Beryllium [water, surface water]: 3.9e-11 kg; lognormal variance with pedigree 2.18, pedigree (1,1,5,1,1)
  (same comment as for Iron, ion)
- Strontium [water, surface water]: 6.99e-9 kg; lognormal variance with pedigree 2, pedigree (1,1,5,1,1)
  (same comment as for Iron, ion)
- Aluminium [water, ground-, long-term]: 2.18e-5 kg; lognormal variance with pedigree 1.09, pedigree (1,1,5,1,1)
  (same comment as for Nitrate)
- Cobalt [air, urban air close to ground]: 7.99e-14 kg; lognormal variance with pedigree 1.59, pedigree (1,1,5,1,1)
  (same comment as for Selenium)
- Barium [water, surface water]: 3.72e-9 kg; lognormal variance with pedigree 2.06, pedigree (1,1,5,1,1)
  (same comment as for Iron, ion)
- Magnesium [water, surface water]: 2.01e-8 kg; lognormal variance with pedigree 1.86, pedigree (1,1,5,1,1)
  (same comment as for Iron, ion)
- Chromium VI [water, ground-, long-term]: 3.96e-7 kg; lognormal variance with pedigree 1.64, pedigree (1,1,5,1,1)
  (same comment as for Nitrate)
- Sulfate [water, surface water]: 0.0123 kg; lognormal variance with pedigree 0.16, pedigree (1,1,5,1,1)
  (same comment as for Iron, ion)
- Calcium [air, urban air close to ground]: 2.65e-7 kg; lognormal variance with pedigree 0.96, pedigree (1,1,5,1,1)
  (same comment as for Selenium)
- Sulfate [water, ground-, long-term]: 0.0634 kg; lognormal variance with pedigree 0.17, pedigree (1,1,5,1,1)
  (same comment as for Nitrate)
- Bromine [water, ground-, long-term]: 1.09e-5 kg; lognormal variance with pedigree 1.07, pedigree (1,1,5,1,1)
  (same comment as for Nitrate)
- Molybdenum [air, urban air close to ground]: 7.06e-10 kg; lognormal variance with pedigree 1.76, pedigree (1,1,5,1,1)
  (same comment as for Selenium)
- Tin [air, urban air close to ground]: 7.7e-8 kg; lognormal variance with pedigree 1.09, pedigree (1,1,5,1,1)
  (same comment as for Selenium)
- Arsenic [air, urban air close to ground]: 6.93e-15 kg; lognormal variance with pedigree 1.77, pedigree (1,1,5,1,1)
  (same comment as for Selenium)
- Lead [air, urban air close to ground]: 1.13e-10 kg; lognormal variance with pedigree 1.51, pedigree (1,1,5,1,1)
  (same comment as for Selenium)
- Carbon monoxide, fossil [air, urban air close to ground]: 0.000223 kg; lognormal variance with pedigree 0.690625, pedigree (1,3,5,2,1)
  Literature data from switzerland and germany adapted to plant age distribution in switzerland
  Uncertainty: & basic uncertainty of 5; literature data from switzerland and germany adapted to plant age distribution in switzerland
- Manganese [water, surface water]: 4.04e-10 kg; lognormal variance with pedigree 2.1, pedigree (1,1,5,1,1)
  (same comment as for Iron, ion)
- Chloride [water, ground-, long-term]: 3.94e-6 kg; lognormal variance with pedigree 0.48, pedigree (1,1,5,1,1)
  (same comment as for Nitrate)
- Bromine [water, surface water]: 5.14e-5 kg; lognormal variance with pedigree 0.89, pedigree (1,1,5,1,1)
  (same comment as for Iron, ion)
- Aluminium [air, urban air close to ground]: 4.61e-8 kg; lognormal variance with pedigree 1.18, pedigree (1,1,5,1,1)
  (same comment as for Selenium)
- Cadmium [air, urban air close to ground]: 2.02e-10 kg; lognormal variance with pedigree 1.48, pedigree (1,1,5,1,1)
  (same comment as for Selenium)
- Vanadium [air, urban air close to ground]: 3.09e-8 kg; lognormal variance with pedigree 0.89, pedigree (1,1,5,1,1)
  (same comment as for Selenium)
- Cadmium, ion [water, surface water]: 1.66e-9 kg; lognormal variance with pedigree 1.4, pedigree (1,1,5,1,1)
  (same comment as for Iron, ion)
- Iron [air, urban air close to ground]: 1.31e-8 kg; lognormal variance with pedigree 0.86, pedigree (1,1,5,1,1)
  (same comment as for Selenium)
- Arsenic, ion [water, ground-, long-term]: 3.73e-7 kg; lognormal variance with pedigree 1.65, pedigree (1,1,5,1,1)
  (same comment as for Nitrate)
- Lead [water, surface water]: 8.44e-11 kg; lognormal variance with pedigree 1.42, pedigree (1,1,5,1,1)
  (same comment as for Iron, ion)
- Mercury [water, surface water]: 7.82e-10 kg; lognormal variance with pedigree 1.93, pedigree (1,1,5,1,1)
  (same comment as for Iron, ion)
- Nickel, ion [water, surface water]: 4.04e-8 kg; lognormal variance with pedigree 1.63, pedigree (1,1,5,1,1)
  (same comment as for Iron, ion)
- DOC, Dissolved Organic Carbon [water, ground-, long-term]: 0.00619 kg; lognormal variance with pedigree 0.05, pedigree (1,1,5,1,1)
  (same comment as for Nitrate)
- Nickel, ion [water, ground-, long-term]: 6.03e-5 kg; lognormal variance with pedigree 1.01, pedigree (1,1,5,1,1)
  (same comment as for Nitrate)
- Carbon dioxide, fossil [air, urban air close to ground]: 2.3 kg; lognormal variance with pedigree 0.05, pedigree (1,1,5,1,1)
  (same comment as for Selenium)
- Molybdenum [water, ground-, long-term]: 2.92e-7 kg; lognormal variance with pedigree 1.74, pedigree (1,1,5,1,1)
  (same comment as for Nitrate)
- Cadmium, ion [water, ground-, long-term]: 3.68e-8 kg; lognormal variance with pedigree 7.19, pedigree (1,1,5,1,1)
  (same comment as for Nitrate)
- Antimony [water, surface water]: 1.22e-6 kg; lognormal variance with pedigree 1.24, pedigree (1,1,5,1,1)
  (same comment as for Iron, ion)
- Nickel [air, urban air close to ground]: 2.78e-12 kg; lognormal variance with pedigree 1.16, pedigree (1,1,5,1,1)
  (same comment as for Selenium)
- Sodium, ion [water, ground-, long-term]: 0.000159 kg; lognormal variance with pedigree 0.62, pedigree (1,1,5,1,1)
  (same comment as for Nitrate)
- Magnesium [air, urban air close to ground]: 7.92e-9 kg; lognormal variance with pedigree 1.4, pedigree (1,1,5,1,1)
  (same comment as for Selenium)
- Phosphate [water, ground-, long-term]: 2.95e-7 kg; lognormal variance with pedigree 5.73, pedigree (1,1,5,1,1)
  (same comment as for Nitrate)
- Mercury [air, urban air close to ground]: 2.52e-15 kg; lognormal variance with pedigree 2.06, pedigree (1,1,5,1,1)
  (same comment as for Selenium)
- COD, Chemical Oxygen Demand [water, ground-, long-term]: 0.0156 kg; lognormal variance with pedigree 0.05, pedigree (1,1,5,1,1)
  (same comment as for Nitrate)
- Molybdenum [water, surface water]: 6.03e-8 kg; lognormal variance with pedigree 1.19, pedigree (1,1,5,1,1)
  (same comment as for Iron, ion)
- Beryllium [air, urban air close to ground]: 6.27e-11 kg; lognormal variance with pedigree 1.98, pedigree (1,1,5,1,1)
  (same comment as for Selenium)
- Magnesium [water, ground-, long-term]: 5.31e-6 kg; lognormal variance with pedigree 1.36, pedigree (1,1,5,1,1)
  (same comment as for Nitrate)
- Zinc [air, urban air close to ground]: 1.29e-9 kg; lognormal variance with pedigree 1.08, pedigree (1,1,5,1,1)
  (same comment as for Selenium)
- Phosphorus [air, urban air close to ground]: 2.52e-9 kg; lognormal variance with pedigree 1.51, pedigree (1,1,5,1,1)
  (same comment as for Selenium)
- Thallium [air, urban air close to ground]: 5.02e-11 kg; lognormal variance with pedigree 1.98, pedigree (1,1,5,1,1)
  (same comment as for Selenium)
- Manganese [water, ground-, long-term]: 6.22e-6 kg; lognormal variance with pedigree 1.43, pedigree (1,1,5,1,1)
  (same comment as for Nitrate)
- TOC, Total Organic Carbon [water, ground-, long-term]: 0.00619 kg; lognormal variance with pedigree 0.05, pedigree (1,1,5,1,1)
  (same comment as for Nitrate)
- Hydrogen chloride [air, urban air close to ground]: 1.85e-9 kg; lognormal variance with pedigree 0.98, pedigree (1,1,5,1,1)
  (same comment as for Selenium)
- BOD5, Biological Oxygen Demand [water, surface water]: 2.37e-5 kg; lognormal variance with pedigree 0.16, pedigree (1,1,5,1,1)
  (same comment as for Iron, ion)
- Phosphate [water, surface water]: 4.93e-10 kg; lognormal variance with pedigree 1.66, pedigree (1,1,5,1,1)
  (same comment as for Iron, ion)
- Titanium, ion [water, ground-, long-term]: 3.76e-5 kg; lognormal variance with pedigree 1.33, pedigree (1,1,5,1,1)
  (same comment as for Nitrate)
- Hydrogen fluoride [air, urban air close to ground]: 9.79e-10 kg; lognormal variance with pedigree 1.55, pedigree (1,1,5,1,1)
  (same comment as for Selenium)
- Methane, fossil [air, urban air close to ground]: 6.38e-6 kg; lognormal variance with pedigree 0.091225, pedigree (2,3,5,2,1)
  Confidential data from 5 plants in Switzerland and Germany
  Uncertainty: & basic uncertainty of 1.5; confidential data from 5 plants in Switzerland and Germany
- Mercury [water, ground-, long-term]: 3.8e-9 kg; lognormal variance with pedigree 3.69, pedigree (1,1,5,1,1)
  (same comment as for Nitrate)
- Ammonia [air, urban air close to ground]: 2.67e-6 kg; lognormal variance with pedigree 1.57, pedigree (1,1,5,1,1)
  (same comment as for Dinitrogen monoxide)
- Sulfur dioxide [air, urban air close to ground]: 0.000108 kg; lognormal variance with pedigree 0.32, pedigree (1,1,5,1,1)
  (same comment as for Selenium)
- Tin, ion [water, surface water]: 2.15e-9 kg; lognormal variance with pedigree 1.21, pedigree (1,1,5,1,1)
  (same comment as for Iron, ion)
- Chromium [air, urban air close to ground]: 2.77e-13 kg; lognormal variance with pedigree 1.53, pedigree (1,1,5,1,1)
  (same comment as for Selenium)
- Selenium [water, surface water]: 1.27e-7 kg; lognormal variance with pedigree 1.4, pedigree (1,1,5,1,1)
  (same comment as for Iron, ion)
- Sodium [air, urban air close to ground]: 1.94e-6 kg; lognormal variance with pedigree 0.92, pedigree (1,1,5,1,1)
  (same comment as for Selenium)
- Calcium, ion [water, surface water]: 6.02e-7 kg; lognormal variance with pedigree 1.4, pedigree (1,1,5,1,1)
  (same comment as for Iron, ion)
- Sodium, ion [water, surface water]: 4.45e-5 kg; lognormal variance with pedigree 0.5, pedigree (1,1,5,1,1)
  (same comment as for Iron, ion)
- Thallium [water, ground-, long-term]: 2.93e-8 kg; lognormal variance with pedigree 1.51, pedigree (1,1,5,1,1)
  (same comment as for Nitrate)
- Titanium, ion [water, surface water]: 6.04e-10 kg; lognormal variance with pedigree 2.33, pedigree (1,1,5,1,1)
  (same comment as for Iron, ion)
- Chromium, ion [water, surface water]: 1.19e-8 kg; lognormal variance with pedigree 1.46, pedigree (1,1,5,1,1)
  (same comment as for Iron, ion)
- TOC, Total Organic Carbon [water, surface water]: 1.74e-5 kg; lognormal variance with pedigree 0.27, pedigree (1,1,5,1,1)
  (same comment as for Iron, ion)
- Calcium, ion [water, ground-, long-term]: 0.000138 kg; lognormal variance with pedigree 0.91, pedigree (1,1,5,1,1)
  (same comment as for Nitrate)
- Fluoride [water, ground-, long-term]: 1.66e-6 kg; lognormal variance with pedigree 1.09, pedigree (1,1,5,1,1)
  (same comment as for Nitrate)
- Cyanide [air, urban air close to ground]: 3.03e-6 kg; lognormal variance with pedigree 1.57, pedigree (1,1,5,1,1)
  (same comment as for Dinitrogen monoxide)
- Chloride [water, surface water]: 0.000163 kg; lognormal variance with pedigree 0.86, pedigree (1,1,5,1,1)
  (same comment as for Iron, ion)
- Antimony [water, ground-, long-term]: 2.25e-6 kg; lognormal variance with pedigree 1.2, pedigree (1,1,5,1,1)
  (same comment as for Nitrate)
- Bromine [air, urban air close to ground]: 1.87e-7 kg; lognormal variance with pedigree 1.08, pedigree (1,1,5,1,1)
  (same comment as for Selenium)
- Zinc, ion [water, surface water]: 1.45e-8 kg; lognormal variance with pedigree 0.92, pedigree (1,1,5,1,1)
  (same comment as for Iron, ion)
- Strontium [air, urban air close to ground]: 1.11e-9 kg; lognormal variance with pedigree 1.33, pedigree (1,1,5,1,1)
  (same comment as for Selenium)
- Selenium [water, ground-, long-term]: 2.62e-7 kg; lognormal variance with pedigree 1.21, pedigree (1,1,5,1,1)
  (same comment as for Nitrate)
- Barium [water, ground-, long-term]: 2.4e-5 kg; lognormal variance with pedigree 1.22, pedigree (1,1,5,1,1)
  (same comment as for Nitrate)
- Iron, ion [water, ground-, long-term]: 0.000184 kg; lognormal variance with pedigree 1.57, pedigree (1,1,5,1,1)
  (same comment as for Nitrate)
- Lead [water, ground-, long-term]: 2.16e-7 kg; lognormal variance with pedigree 7.49, pedigree (1,1,5,1,1)
  (same comment as for Nitrate)
- Beryllium [water, ground-, long-term]: 5.05e-8 kg; lognormal variance with pedigree 1.72, pedigree (1,1,5,1,1)
  (same comment as for Nitrate)
- Vanadium, ion [water, surface water]: 2.09e-7 kg; lognormal variance with pedigree 1.07, pedigree (1,1,5,1,1)
  (same comment as for Iron, ion)
- Strontium [water, ground-, long-term]: 1.11e-5 kg; lognormal variance with pedigree 1.29, pedigree (1,1,5,1,1)
  (same comment as for Nitrate)
- Antimony [air, urban air close to ground]: 1.37e-14 kg; lognormal variance with pedigree 1.57, pedigree (1,1,5,1,1)
  (same comment as for Selenium)
- Silicon [water, ground-, long-term]: 0.000959 kg; lognormal variance with pedigree 5.81, pedigree (1,1,5,1,1)
  (same comment as for Nitrate)
- Aluminium [water, surface water]: 2.45e-9 kg; lognormal variance with pedigree 1.4, pedigree (1,1,5,1,1)
  (same comment as for Iron, ion)
- Silicon [air, urban air close to ground]: 8.8e-9 kg; lognormal variance with pedigree 0.24, pedigree (1,1,5,1,1)
  (same comment as for Selenium)
- Copper, ion [water, surface water]: 5.34e-10 kg; lognormal variance with pedigree 1.87, pedigree (1,1,5,1,1)
  (same comment as for Iron, ion)
- Barium [air, urban air close to ground]: 2.7e-8 kg; lognormal variance with pedigree 1.2, pedigree (1,1,5,1,1)
  (same comment as for Selenium)
- Manganese [air, urban air close to ground]: 3.93e-14 kg; lognormal variance with pedigree 1.48, pedigree (1,1,5,1,1)
  (same comment as for Selenium)
- Thallium [water, surface water]: 3.07e-11 kg; lognormal variance with pedigree 2.12, pedigree (1,1,5,1,1)
  (same comment as for Iron, ion)
- Nitrogen oxides [air, urban air close to ground]: 0.000107 kg; lognormal variance with pedigree 1.57, pedigree (1,1,5,1,1)
  (same comment as for Dinitrogen monoxide)
- Copper [air, urban air close to ground]: 9.72e-11 kg; lognormal variance with pedigree 1.33, pedigree (1,1,5,1,1)
  (same comment as for Selenium)

## Sampling procedure
waste-specific calculation based on literature data

## Extrapolations
This dataset has been extrapolated from year 2000 to the year of the calculation (2021). The uncertainty has been adjusted accordingly.

## Review by Niels Jungbluth 2003-07-15
Passed. Calculation for standard deviation 95 of, i.e., infrastructure,
land occupation, transport services or other services can differ from
standard Pedigree approach used in this project and figures obtained by
this procedure.
