# transport, helicopter, LTO cycle

Dataset: EcoSpold 2, unit process
Geography: GLO
Time period: 1990-01-01 to 2021-12-31
Technology level: current
Classification: EcoSpold01Categories: transport systems/airplane
Classification: ISIC rev.4 ecoinvent: 5110:Passenger air transport
Synonyms: landing and take over; Transport Hubschrauber; LTO-Zyklus
Tags: ConvertedDataset
Scenario: Business-as-Usual
System model: Allocation, cut-off by classification
Share of production covered: 100 %
Generated by: Mireille Faist Emmenegger (obsolete)
Published in: Faist Emmenegger, M. 2007
Database: ecoinvent
isCopyrightProtected: true
accessRestrictedTo: 1

## General comment
One take-over and landing of an helikopter.
[This dataset was already contained in the ecoinvent database version 2. It was not individually updated during the transfer to ecoinvent version 3. Life Cycle Impact Assessment results may still have changed, as they are affected by changes in the supply chain, i.e. in other datasets. This dataset was generated following the ecoinvent quality guidelines for version 2. It may have been subject to central changes described in the ecoinvent version 3 change report (http://www.ecoinvent.org/database/ecoinvent-version-3/reports-of-changes/), and the results of the central updates were reviewed extensively. The changes added e.g. consistent water flows and other information throughout the database. The documentation of this dataset can be found in the ecoinvent reports of version 2, which are still available via the ecoinvent website. The change report linked above covers all central changes that were made during the conversion process.]

## Included activities end
This dataset describes the energy requirements and emissions of a Landing-and-Take-Over (LTO) Cycle of a helicopter.

## Geography
Data for Swiss civil helicopters

## Technology
Data is for an average Swiss helicopter using kerosene.

## Reference product
- transport, helicopter, LTO cycle: 1 unit; CPC 6424: Air transport services of passengers; By-product classification allocatable product
  EcoSpold01Location=GLO
  production volume 1 unit
    Unknown
    Dummy value to be replaced by measured, estimated or calculated value
  property price 13.4244 EUR2005
    Calculated based on inputs: The price of the product has been calculated as a sum of the values of the material and energy inputs for this product. This value is therefore a rough estimation. It may underestimate the real price since there are additional expenses when producing any product. These expences can include for example labour costs, treatment of waste materials and profit for the producer. Please consider carefully whether this level of data quality is acceptable for your application.

## Inputs from technosphere
- kerosene: 0 kg; pedigree (1,1,1,1,1)
  EcoSpold01Location=RER
  Swiss extrapolated statistical data 2000
  Uncertainty: swiss extrapolated statistical data 2000
  properties: carbon content, fossil 0.85, dry mass 1 kg, wet mass 1 kg, heating value, net 43 MJ
- kerosene: 6.65463, 0.244084, 3.65436, 0.473042, 1.15187, 0.192234, 0.313094, 32.5167 kg (8 entries); lognormal variance with pedigree 0.0407, pedigree (2,1,5,3,1)
  (same comment as for kerosene)

## Emissions to nature
- Methane, fossil [air, non-urban air or from high stacks]: 7.9e-5 kg; lognormal variance with pedigree 0.0807, pedigree (2,1,5,3,1)
  Swiss extrapolated statistical data 2000
  Uncertainty: swiss extrapolated statistical data 2000
- Carbon monoxide, fossil [air, non-urban air or from high stacks]: 0.00036 kg; lognormal variance with pedigree 0.6907, pedigree (2,1,5,3,1)
  (same comment as for Methane, fossil)
- Carbon dioxide, fossil [air, non-urban air or from high stacks]: 142 kg; lognormal variance with pedigree 0.0407, pedigree (2,1,5,3,1)
  (same comment as for Methane, fossil)
- NMVOC, non-methane volatile organic compounds, unspecified origin [air, non-urban air or from high stacks]: 7.01e-5 kg; lognormal variance with pedigree 0.0807, pedigree (2,1,5,3,1)
  (same comment as for Methane, fossil)
- Nitrogen oxides [air, non-urban air or from high stacks]: 0.000655 kg; lognormal variance with pedigree 0.0807, pedigree (2,1,5,3,1)
  (same comment as for Methane, fossil)
- Sulfur dioxide [air, non-urban air or from high stacks]: 0.362 kg; lognormal variance with pedigree 0.0407, pedigree (2,1,5,3,1)
  (same comment as for Methane, fossil)

## Sampling procedure
Data is based on average emission factors for Swiss motors.

## Extrapolations
This dataset has been extrapolated from year 1990 to the year of the calculation (2021). The uncertainty has been adjusted accordingly.

## Review by Michael Spielmann (obsolete) 2003-07-09
Passed.
