# cooling energy, from natural gas, at cogen unit with absorption chiller 100kW

Dataset: EcoSpold 2, unit process
Geography: RoW
Time period: 2000-01-01 to 2021-12-31
Technology level: current
Classification: ISIC rev.4 ecoinvent: 3530:Steam and air conditioning supply
Classification: EcoSpold01Categories: cooling/cogeneration
Scenario: Business-as-Usual
System model: Allocation, cut-off by classification
Generated by: Lucia Valsasina
Published in: Primas A. 2007
Database: ecoinvent
isCopyrightProtected: true
accessRestrictedTo: 1

## General comment
The module reflects an absorption chiller operated with heat from a natural gas operated cogeneration unit (allocation exergy). Life time for the total system assumed with 20 years or 20'000 full operating hours.
[This dataset was already contained in the ecoinvent database version 2. It was not individually updated during the transfer to ecoinvent version 3. Life Cycle Impact Assessment results may still have changed, as they are affected by changes in the supply chain, i.e. in other datasets. This dataset was generated following the ecoinvent quality guidelines for version 2. It may have been subject to central changes described in the ecoinvent version 3 change report (http://www.ecoinvent.org/database/ecoinvent-version-3/reports-of-changes/), and the results of the central updates were reviewed extensively. The changes added e.g. consistent water flows and other information throughout the database. The documentation of this dataset can be found in the ecoinvent reports of version 2, which are still available via the ecoinvent website. The change report linked above covers all central changes that were made during the conversion process.]

## Included activities end
The module includes heat input from a 160kWel cogeneration unit, electricity and water needed for operation and infrastructure (absorption chiller, air cooler, piping).

## Geography
Natural gas input for cogeneration unit and electricity demand modelled for Switzerland. Process applicable in central European conditions.

## Technology
Single stage absorption chiller with 100 kW cooling capacity connected to a 250 kW hybrid air cooler. Seasonal performance factor (SPF) of 0.6. Supply temperature of the chilled water 6°C. Operated with heat of a temperature of 85- 100°C.

## Parameters
- fraction, cooling water, recirculating system, to air: 0.771 dimensionless; name fraction_CW_R_to_air; lognormal variance with pedigree 0.0413, pedigree (2,3,1,3,1)
  Calculated based on literature value (Scown, C.D., 2011, Water Footprint of U.S. Transportation Fuels and supplying information of the article) (Vionnet, S., Quantis Water Database - Technical Report, 2012).
- fraction, water, decarbonised, to air: 0.3875 dimensionless; name fraction_WDC_to_air; = fraction_CW_to_air; lognormal variance with pedigree 0.092025, pedigree (4,4,3,2,4)
  Calculated value. See comments in the other parametres present in this dataset. Decarbonised water is considered to be always used as cooling water, thus cooling water fractions to air are applied to all carbonised water input flows to calculate the amount of water consumed in the processes.
- fraction, cooling water, cooling pond system, to air: 0.032 dimensionless; name fraction_CW_CP_to_air; lognormal variance with pedigree 0.0413, pedigree (2,3,1,3,1)
  (same comment as for fraction, cooling water, recirculating system, to air)
- fraction, cooling water, once-through system, to air: 0.004 dimensionless; name fraction_CW_OT_to_air; lognormal variance with pedigree 0.0413, pedigree (2,3,1,3,1)
  (same comment as for fraction, cooling water, recirculating system, to air)
- fraction, cooling water, to air: 0.3875 dimensionless; name fraction_CW_to_air; = (0.5*fraction_CW_OT_to_air)+(0.5*fraction_CW_R_to_air); lognormal variance with pedigree 0.092025, pedigree (4,4,3,2,4)
  Calculated value based on literature value (see comments of the other parametres present in this dataset) and expert opinion. In the case when no industry/literature data are available about the type of cooling or directly fraction, cooling water, to air specific for the process a default assumption is applied. It is assumed that the once-through cooling system is used in 50% of all cases and recirculating system is used in another 50% of all cases.

## Reference product
- cooling energy: 1 MJ; By-product classification allocatable product; CPC 69220: Distribution of steam, hot water and air-conditioning supply through mains (on own account)
  EcoSpold01Location=CH
  production volume 4.24112e7 MJ; = 360000/0.008416886
    Estimated. The global production volume is extrapolated from the swiss production volume using the nominal GDP of 2005 (source: United Nations, http://data.un.org/Glossary.aspx?q=GDP+%28current+US%24%29, accessed 20130726 and 20130312). Where:
    360000 (swiss PV)
    0.008417 (swiss GDP)
    Gross domestic product (GDP) at current prices is GDP at prices of the current reporting period. Also known as nominal GDP.
  property price 0.020684 EUR2005
    Calculated based on inputs: The price of the product has been calculated as a sum of the values of the material and energy inputs for this product. This value is therefore a rough estimation. It may underestimate the real price since there are additional expenses when producing any product. These expences can include for example labour costs, treatment of waste materials and profit for the producer. Please consider carefully whether this level of data quality is acceptable for your application.

## Inputs from technosphere
- absorption chiller, 100kW: 1.39e-7 unit; lognormal variance with pedigree 0.372, pedigree (4,4,5,5,1)
  EcoSpold01Location=CH
  Uncertainty of life time
  Uncertainty: uncertainty of life time
- electricity, low voltage: 0 kWh; pedigree (1,1,1,1,1)
  Data based on average process efficiency
  EcoSpold01Location=CH
  Uncertainty: data based on average process efficiency
- heat, central or small-scale, natural gas: 1.67 MJ; lognormal variance with pedigree 0.056, pedigree (3,4,5,5,1)
  Uncertainty of operation temperatures of source and supply
  EcoSpold01Location=CH
  Uncertainty: uncertainty of operation temperatures of source and supply
  properties: heating value, net 1 MJ
- water, decarbonised: 0 kg; name water_decarbonised_input; pedigree (1,1,1,1,1)
  Data based on average process efficiency
  EcoSpold01Location=RER
  Uncertainty: data based on average process efficiency
  properties: wet mass 1 kg
- electricity, low voltage: 0.000208794, 3.80174e-5, 0.000858197, 0.00299835, 0.000612128, 0.00939812, 0.00152045, 0.00436595 kWh (8 entries); lognormal variance with pedigree 0.074, pedigree (3,4,5,5,3)
  (same comment as for electricity, low voltage)
- water, decarbonised: 0.0251476, 0.065434, 0.263911, 0.0644456, 0.0129919, 0.0427199, 0.00235839, 0.0336066, 0.0782836, 0.491052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 kg (12 entries); lognormal variance with pedigree 0.074, pedigree (3,4,5,5,3)
  (same comment as for water, decarbonised)

## Inputs from nature
- Heat, waste [air, urban air close to ground]: 0.072 MJ; lognormal variance with pedigree 0.074, pedigree (3,4,5,5,3)
  Uncertainty electricity demand
  Uncertainty: uncertainty electricity demand

## Emissions to nature
- Water [water, unspecified]: 0.00091875 m3; name water_to_water_unspecified; = (water_decarbonised_input/1000)*(1-fraction_WDC_to_air); lognormal variance with pedigree 0.0827, pedigree (2,2,5,5,1)
  Calculated value based on literature values and expert opinion. See comments in the parametres' comment field.
  property water in wet mass 1000 kg; name WWM
  property carbon content, fossil 0; name C_content_fossil
  property carbon content, non-fossil 0; name C_content_non_fossil
  property fraction, origin: salt water 0; name fraction_origin_salt_water_Ww
  property fraction, origin: unspecified 0; name fraction_origin_unspecified_Ww
  property fraction, origin: fresh water 1; name fraction_origin_fresh_water_Ww
  property dry mass 0 kg; name DM
  property wet mass 1000 kg; name WM
- Water [air, unspecified]: 0.00058125 m3; name water_to_air_unspecified; = (water_decarbonised_input/1000*fraction_WDC_to_air); lognormal variance with pedigree 0.0827, pedigree (2,2,5,5,1)
  (same comment as for Water)
  property fraction, origin: salt water 0; name fraction_origin_salt_water
  property fraction, origin: unspecified 0; name fraction_origin_unspecified
  property fraction, origin: fresh water 1; name fraction_origin_fresh_water

## Sampling procedure
Literature data and manufacturer information

## Extrapolations
extrapolated from swiss dataset

## Review by Emilia Moreno Ruiz 2015-10-16
PV adjusted/GLO created
