# treatment of hard coal ash, residual material landfill

Dataset: EcoSpold 2, unit process
Geography: PL
Time period: 1994-01-01 to 2021-12-31
Technology level: current
Classification: ISIC rev.4 ecoinvent: 3822:Treatment and disposal of hazardous waste
Classification: EcoSpold01Categories: waste management/residual material landfill
Tags: Treatment; ConvertedDataset
Scenario: Business-as-Usual
System model: Allocation, cut-off by classification
Generated by: Gabor Doka (obsolete)
Published in: Doka G. 2009
Database: ecoinvent
isCopyrightProtected: true
accessRestrictedTo: 1

## General comment
Inventoried waste contains 100% PL hard coal ash; .
waste composition (wet, in ppm): H2O n.a.; O 729240; H n.a.; C n.a.; S 2120.4; N n.a.; P 380.84; B 54.048; Cl 38.018; Br 45.687; F 32.345; I 3.805; Ag n.a.; As 44.824; Ba 763.76; Cd 1.5037; Co 24.748; Cr 76.189; Cu 94.863; Hg 0.045921; Mn 497.07; Mo 11.413; Ni 75.866; Pb 68.138; Sb 5.6761; Se 6.342; Sn 190.03; V 140.86; Zn 187.7; Be 6.8724; Sc 20.555; Sr 762.69; Ti 3825.8; Tl 3.7959; W 5.7249; Si 95420; Fe 38100; Ca 11429; Al 83861; K 4217.8; Mg 22901; Na 5335.6;
Share of carbon in waste that is biogenic 60.4%.
[This dataset was already contained in the ecoinvent database version 2. It was not individually updated during the transfer to ecoinvent version 3. Life Cycle Impact Assessment results may still have changed, as they are affected by changes in the supply chain, i.e. in other datasets. This dataset was generated following the ecoinvent quality guidelines for version 2. It may have been subject to central changes described in the ecoinvent version 3 change report (http://www.ecoinvent.org/database/ecoinvent-version-3/reports-of-changes/), and the results of the central updates were reviewed extensively. The changes added e.g. consistent water flows and other information throughout the database. The documentation of this dataset can be found in the ecoinvent reports of version 2, which are still available via the ecoinvent website. The change report linked above covers all central changes that were made during the conversion process.]

## Included activities end
Waste-specific short-term emissions to water from leachate. Long-term emissions from landfill to ground water.

## Geography
Technology encountered in Switzerland in 2000. Landfill includes base seal and leachate collection system.

## Technology
Swiss residual material landfill for polluted, inorganic waste. With base seal and leachate collection system. Recultivation after closure.

## Time period
Waste composition as given in literature reference, theoretical data or other source. Transfer coefficients from prospective model.

## Reference product
- hard coal ash: -1 kg; By-product classification Waste; CPC 39: Wastes or scraps
  EcoSpold01Location=PL
  production volume 6.18961e9 kg
    Estimated. Energy prodcution in mainly responsible for hard coal ashes. The production volume is calculated as the sum of hard coal ashes resulting from electricity and heat and power co-generation production from hard coal in the respective country.
  property price 0 EUR2005
    Waste products are assigned a price of zero as they are assumed to require further treatment.
  property carbon content 0
    carbon content on a dry matter basis (reserved; not for manual entry)
  properties: wet mass 1 kg, dry mass 1 kg, carbon content, non-fossil 0, water content 0, water in wet mass 0 kg, carbon content, fossil 0, carbon allocation 0 kg

## Inputs from technosphere
- residual material landfill: 2.0833e-9 unit; lognormal variance with pedigree 0.04, pedigree (1,1,5,1,1)
  EcoSpold01Location=CH
  demands per kilogram waste. uncertainty is heeded in the module
- process-specific burdens, residual material landfill: 1 kg; lognormal variance with pedigree 0.04, pedigree (1,1,5,1,1)
  EcoSpold01Location=CH
  demands per kilogram waste. uncertainty is heeded in the module;activityLink introduced to establish a direct link to the corresponding regional supply of this product

## Emissions to nature
- Lead [water, surface water]: 5.9004e-10 kg; lognormal variance with pedigree 2.33, pedigree (1,1,5,1,1)
  uncertainty is calculated from uncertainties in waste composition and transfer coefficients in residual landfill
- Antimony [water, surface water]: 2.0017e-6 kg; lognormal variance with pedigree 1.41, pedigree (1,1,5,1,1)
  (same comment as for Lead)
- Scandium [water, surface water]: 2.9009e-6 kg; lognormal variance with pedigree 1.3, pedigree (1,1,5,1,1)
  (same comment as for Lead)
- Selenium [water, ground-, long-term]: 4.1054e-6 kg; lognormal variance with pedigree 1.37, pedigree (1,1,5,1,1)
  uncertainty is calculated from uncertainties in waste composition and transfer coefficients in incinerator and landfills.
- Nickel, ion [water, ground-, long-term]: 2.7466e-5 kg; lognormal variance with pedigree 1.3, pedigree (1,1,5,1,1)
  (same comment as for Selenium)
- Fluoride [water, surface water]: 1.7528e-6 kg; lognormal variance with pedigree 1.33, pedigree (1,1,5,1,1)
  (same comment as for Lead)
- Mercury [water, surface water]: 3.6186e-12 kg; lognormal variance with pedigree 2.95, pedigree (1,1,5,1,1)
  (same comment as for Lead)
- Phosphate [water, surface water]: 4.3552e-7 kg; lognormal variance with pedigree 1.61, pedigree (1,1,5,1,1)
  (same comment as for Lead)
- Mercury [water, ground-, long-term]: 2.1675e-9 kg; lognormal variance with pedigree 4.29, pedigree (1,1,5,1,1)
  (same comment as for Selenium)
- Zinc, ion [water, surface water]: 3.8405e-9 kg; lognormal variance with pedigree 2.08, pedigree (1,1,5,1,1)
  (same comment as for Lead)
- Bromine [water, surface water]: 3.67e-5 kg; lognormal variance with pedigree 1.11, pedigree (1,1,5,1,1)
  (same comment as for Lead)
- Tin, ion [water, ground-, long-term]: 3.601e-6 kg; lognormal variance with pedigree 4.85, pedigree (1,1,5,1,1)
  (same comment as for Selenium)
- Cobalt [water, surface water]: 7.0634e-9 kg; lognormal variance with pedigree 2, pedigree (1,1,5,1,1)
  (same comment as for Lead)
- Barium [water, ground-, long-term]: 6.3089e-6 kg; lognormal variance with pedigree 6.48, pedigree (1,1,5,1,1)
  (same comment as for Selenium)
- Lead [water, ground-, long-term]: 3.5344e-7 kg; lognormal variance with pedigree 7.97, pedigree (1,1,5,1,1)
  (same comment as for Selenium)
- Chromium VI [water, ground-, long-term]: 1.4467e-5 kg; lognormal variance with pedigree 1.05, pedigree (1,1,5,1,1)
  (same comment as for Selenium)
- Iodide [water, surface water]: 3.805e-6 kg; lognormal variance with pedigree 1.44, pedigree (1,1,5,1,1)
  (same comment as for Lead)
- Zinc, ion [water, ground-, long-term]: 2.3004e-6 kg; lognormal variance with pedigree 5.76, pedigree (1,1,5,1,1)
  (same comment as for Selenium)
- Chloride [water, surface water]: 1.0873e-5 kg; lognormal variance with pedigree 1.17, pedigree (1,1,5,1,1)
  (same comment as for Lead)
- Cadmium, ion [water, surface water]: 1.7042e-11 kg; lognormal variance with pedigree 2.8, pedigree (1,1,5,1,1)
  (same comment as for Lead)
- Sodium, ion [water, ground-, long-term]: 0.0033333 kg; lognormal variance with pedigree 0.49, pedigree (1,1,5,1,1)
  (same comment as for Selenium)
- Tungsten [water, surface water]: 2.0189e-6 kg; lognormal variance with pedigree 1.41, pedigree (1,1,5,1,1)
  (same comment as for Lead)
- Chloride [water, ground-, long-term]: 2.7144e-5 kg; lognormal variance with pedigree 1.14, pedigree (1,1,5,1,1)
  (same comment as for Selenium)
- Fluoride [water, ground-, long-term]: 3.0592e-5 kg; lognormal variance with pedigree 1.15, pedigree (1,1,5,1,1)
  (same comment as for Selenium)
- Cobalt [water, ground-, long-term]: 4.231e-6 kg; lognormal variance with pedigree 1.97, pedigree (1,1,5,1,1)
  (same comment as for Selenium)
- Sodium, ion [water, surface water]: 0.0020023 kg; lognormal variance with pedigree 0.51, pedigree (1,1,5,1,1)
  (same comment as for Lead)
- Antimony [water, ground-, long-term]: 3.6743e-6 kg; lognormal variance with pedigree 1.39, pedigree (1,1,5,1,1)
  (same comment as for Selenium)
- Potassium, ion [water, surface water]: 0.0011889 kg; lognormal variance with pedigree 0.55, pedigree (1,1,5,1,1)
  (same comment as for Lead)
- Scandium [water, ground-, long-term]: 1.7654e-5 kg; lognormal variance with pedigree 1.21, pedigree (1,1,5,1,1)
  (same comment as for Selenium)
- Chromium VI [water, surface water]: 4.5799e-6 kg; lognormal variance with pedigree 1.21, pedigree (1,1,5,1,1)
  (same comment as for Lead)
- Vanadium, ion [water, surface water]: 3.4569e-7 kg; lognormal variance with pedigree 1.49, pedigree (1,1,5,1,1)
  (same comment as for Lead)
- Sulfate [water, ground-, long-term]: 0.0056788 kg; lognormal variance with pedigree 0.6, pedigree (1,1,5,1,1)
  (same comment as for Selenium)
- Boron [water, surface water]: 4.2347e-7 kg; lognormal variance with pedigree 1.48, pedigree (1,1,5,1,1)
  (same comment as for Lead)
- Iron, ion [water, ground-, long-term]: 0.00019096 kg; lognormal variance with pedigree 7.27, pedigree (1,1,5,1,1)
  (same comment as for Selenium)
- Tin, ion [water, surface water]: 6.0117e-9 kg; lognormal variance with pedigree 2.02, pedigree (1,1,5,1,1)
  (same comment as for Lead)
- Arsenic, ion [water, surface water]: 4.4824e-5 kg; lognormal variance with pedigree 1.11, pedigree (1,1,5,1,1)
  (same comment as for Lead)
- Manganese [water, surface water]: 6.8547e-9 kg; lognormal variance with pedigree 2.01, pedigree (1,1,5,1,1)
  (same comment as for Lead)
- Silicon [water, surface water]: 0.00021459 kg; lognormal variance with pedigree 0.71, pedigree (1,1,5,1,1)
  (same comment as for Lead)
- Copper, ion [water, ground-, long-term]: 3.6517e-6 kg; lognormal variance with pedigree 3.66, pedigree (1,1,5,1,1)
  (same comment as for Selenium)
- Phosphate [water, ground-, long-term]: 0.00026088 kg; lognormal variance with pedigree 1.39, pedigree (1,1,5,1,1)
  (same comment as for Selenium)
- Molybdenum [water, surface water]: 1.1361e-5 kg; lognormal variance with pedigree 1.29, pedigree (1,1,5,1,1)
  (same comment as for Lead)
- Iodide [water, ground-, long-term]: 3.805e-13 kg; lognormal variance with pedigree 1.46, pedigree (1,1,5,1,1)
  (same comment as for Selenium)
- Calcium, ion [water, ground-, long-term]: 0.0010327 kg; lognormal variance with pedigree 1.84, pedigree (1,1,5,1,1)
  (same comment as for Selenium)
- Magnesium [water, ground-, long-term]: 0.0026021 kg; lognormal variance with pedigree 1.49, pedigree (1,1,5,1,1)
  (same comment as for Selenium)
- Tungsten [water, ground-, long-term]: 3.706e-6 kg; lognormal variance with pedigree 1.39, pedigree (1,1,5,1,1)
  (same comment as for Selenium)
- Potassium, ion [water, ground-, long-term]: 0.0030289 kg; lognormal variance with pedigree 0.52, pedigree (1,1,5,1,1)
  (same comment as for Selenium)
- Boron [water, ground-, long-term]: 5.3143e-5 kg; lognormal variance with pedigree 1.08, pedigree (1,1,5,1,1)
  (same comment as for Selenium)
- Nickel, ion [water, surface water]: 4.5854e-8 kg; lognormal variance with pedigree 1.76, pedigree (1,1,5,1,1)
  (same comment as for Lead)
- Magnesium [water, surface water]: 4.3441e-6 kg; lognormal variance with pedigree 1.18, pedigree (1,1,5,1,1)
  (same comment as for Lead)
- Titanium, ion [water, ground-, long-term]: 0.0011357 kg; lognormal variance with pedigree 0.89, pedigree (1,1,5,1,1)
  (same comment as for Selenium)
- Bromine [water, ground-, long-term]: 8.9865e-6 kg; lognormal variance with pedigree 1.12, pedigree (1,1,5,1,1)
  (same comment as for Selenium)
- Strontium [water, ground-, long-term]: 0.00027612 kg; lognormal variance with pedigree 0.99, pedigree (1,1,5,1,1)
  (same comment as for Selenium)
- Silicon [water, ground-, long-term]: 0.095205 kg; lognormal variance with pedigree 0.17, pedigree (1,1,5,1,1)
  (same comment as for Selenium)
- Selenium [water, surface water]: 2.2366e-6 kg; lognormal variance with pedigree 1.4, pedigree (1,1,5,1,1)
  (same comment as for Lead)
- Copper, ion [water, surface water]: 6.0963e-9 kg; lognormal variance with pedigree 2.02, pedigree (1,1,5,1,1)
  (same comment as for Lead)
- Sulfate [water, surface water]: 0.0006825 kg; lognormal variance with pedigree 0.71, pedigree (1,1,5,1,1)
  (same comment as for Lead)
- Titanium, ion [water, surface water]: 1.896e-6 kg; lognormal variance with pedigree 1.27, pedigree (1,1,5,1,1)
  (same comment as for Lead)
- Molybdenum [water, ground-, long-term]: 5.2399e-8 kg; lognormal variance with pedigree 1.31, pedigree (1,1,5,1,1)
  (same comment as for Selenium)
- Vanadium, ion [water, ground-, long-term]: 0.00010827 kg; lognormal variance with pedigree 0.97, pedigree (1,1,5,1,1)
  (same comment as for Selenium)
- Thallium [water, ground-, long-term]: 1.3743e-6 kg; lognormal variance with pedigree 1.69, pedigree (1,1,5,1,1)
  (same comment as for Selenium)
- Cadmium, ion [water, ground-, long-term]: 1.0208e-8 kg; lognormal variance with pedigree 7.79, pedigree (1,1,5,1,1)
  (same comment as for Selenium)
- Strontium [water, surface water]: 4.6097e-7 kg; lognormal variance with pedigree 1.45, pedigree (1,1,5,1,1)
  (same comment as for Lead)
- Arsenic, ion [water, ground-, long-term]: 4.4824e-14 kg; lognormal variance with pedigree 1.13, pedigree (1,1,5,1,1)
  (same comment as for Selenium)
- Aluminium [water, ground-, long-term]: 0.024894 kg; lognormal variance with pedigree 0.55, pedigree (1,1,5,1,1)
  (same comment as for Selenium)
- Manganese [water, ground-, long-term]: 4.106e-6 kg; lognormal variance with pedigree 6.54, pedigree (1,1,5,1,1)
  (same comment as for Selenium)
- Barium [water, surface water]: 1.0532e-8 kg; lognormal variance with pedigree 1.95, pedigree (1,1,5,1,1)
  (same comment as for Lead)
- Calcium, ion [water, surface water]: 1.724e-6 kg; lognormal variance with pedigree 1.29, pedigree (1,1,5,1,1)
  (same comment as for Lead)
- Aluminium [water, surface water]: 4.156e-5 kg; lognormal variance with pedigree 0.92, pedigree (1,1,5,1,1)
  (same comment as for Lead)
- Beryllium [water, surface water]: 4.1537e-9 kg; lognormal variance with pedigree 2.08, pedigree (1,1,5,1,1)
  (same comment as for Lead)
- Beryllium [water, ground-, long-term]: 2.4881e-6 kg; lognormal variance with pedigree 1.62, pedigree (1,1,5,1,1)
  (same comment as for Selenium)
- Thallium [water, surface water]: 2.2943e-9 kg; lognormal variance with pedigree 2.15, pedigree (1,1,5,1,1)
  (same comment as for Lead)
- Iron, ion [water, surface water]: 3.1879e-7 kg; lognormal variance with pedigree 1.54, pedigree (1,1,5,1,1)
  (same comment as for Lead)

## Sampling procedure
Landfill model based on observed leachate concentrations in literature. Extrapolated to 60'000 years heeding chemical characteristics. Initial waste composition from various literature sources.

## Extrapolations
This dataset has been extrapolated from year 2000 to the year of the calculation (2021). The uncertainty has been adjusted accordingly.

## Review by Niels Jungbluth 2009-02-15
passed.
