# cement production, blast furnace slag 40-70%

Dataset: EcoSpold 2, unit process
Geography: RoW
Time period: 2014-04-01 to 2021-12-31
Technology level: current
Classification: ISIC rev.4 ecoinvent: 2394:Manufacture of cement, lime and plaster
Synonyms: PSC; Portland Slag Cement
Scenario: Business-as-Usual
System model: Allocation, cut-off by classification
Generated by: P V Kiran Ananth
Published in: Kiran Ananth P. V. 2017
Database: ecoinvent
isCopyrightProtected: true
accessRestrictedTo: 1

## General comment
The total installed capacity of cement in india during the year 2014-15 is 390 million tonnes. Total cement production during same year was 270.93 million tonnes. As per the goverment statistics cement industry grew at 5.6% in 2014-15. Cement industry is likely to grow in coming years due to various initiative of goverment of India like National highway project, 100 smart city, housing for all etc. Indian cement plant are most energy efficienct in the word.There thermal and electrical energy consumption is lower than the word. In India, various types of cements are manufactured like ordinary portland cement, pozzolana portland cement, portland slag cement, white cement etc. Portland slag cement manufactured by mixing and grinding of clinker, slag and gypsum in certain proportion. This dataset has been extrapolated from the IN geography. Uncertainty has been changed accordingly. The strength of cement is 43 MPa and 53 MPa on 28 days.

## Included activities start
Activity starts from clinker storage in Silo. It includes Clinker and additives blending and grinding in cement mill, slag drying, internal transportation etc.

## Included activities end
This activity ends with the cement produced in the cement mill. The dataset does not include packaging and administration.

## Geography
Data represents for all geographical locations where cement has been manufactured in India.

## Technology
For this activity latest available technologies were considered like Vertical roller mill, energy efficient fans etc. In India portland slag cement manufactured in two ways. Either clinker, slag and additives mix and grind together or clinker, slag grinde separately and then mixed with additives.

## Time period
For this activity time period of 2014 to 2017 has been considered . As during this period many cement plants are adding slag more than 50%. Also during this period Indian cement industry has done significant works in improving energy efficiency by installing energy efficient equipment, process optimization, equipment retrofit etc.

## Reference product
- cement, blast furnace slag 40-70%: 1 kg; name cement; By-product classification allocatable product; CPC 3744: Portland cement, aluminous cement, slag cement and similar hydraulic cements, except in the form of clinkers
  Primary data collected from 20 cement manufacturing units. The value has been calculated as a weighted average with respect to production volume.
  production volume 1.23553e10 kg
    The global production volume was calculated as follows:
    1) The total production volume of each country was calculated
    2) The production volume was scaled based construction output (*)
    3) The average of the results was assumed to be the GLO PV
    4) The share of each different technology per country was calculated
    5) The weighted average of the shares for each country was used to split the GLO PV into different technologies
    (*)
    Construction output assumed per country
    Country Share
    CO 1%
    PE 0%
    BR 2%
    ZA 1%
    IN 10%
    US 8%
    CA-QC 0%
    CH 0%
    Europe without Switzerland 20%
    Source:
    OECD. 2018. Input-Output Tables. http://www.oecd.org/trade/input-outputtables.htm.
    United Nations Statistics Division. 2019. UN data. A world of information. http://data.un.org/.
    Timmer, M.P., E. Dietzenbacher, B. Los, R. Stehrer, and G.J. de Vries. 2015. An Illustrated User Guide to the World Input-Output Database: the Case of Global Automotive Production. Review of International Economics 23(3): 575-605. http://doi.wiley.com/10.1111/roie.12178.
    The data was adjusted based on PPP, data from:
    The World Bank. 2019. World Bank Open Data. https://data.worldbank.org/
  property price 0.0615 EUR2005; name cement_price_EUR2005
    2005 import and export prices (total trades (USD) divided by total weight (kg) in China, India, USA, Japan, Russia and Europe, major producers and consumers (http://www.cementchina.net/freport/showfre.asp?id=749) from UN Commodity Trade Statistics Database (http://data.un.org/Explorer.aspxDatabase [Accessed 2 July 2010]). Commodity: Cement (portland, aluminious, slag or hydraulic)
  property carbon content, non-fossil 0; name cement_C_content_non_fossil
    biogene carbon content on a dry matter basis
  property dry mass 1 kg; name cement_DM
  property water in wet mass 0 kg; name cement_WWM
  property carbon content, fossil 0; name cement_C_content_fossil
    fossil carbon content on a dry matter basis
  property water content 0; name cement_water_content
  property wet mass 1 kg; name cement_WM
  property carbon content 0
    carbon content on a dry matter basis (reserved; not for manual entry)
  properties: carbon allocation 0 kg

## Inputs from technosphere
- cement factory: 5.36e-11 unit; = 5.36e-11* cement; source Kellenberger D. 2007; lognormal variance with pedigree 0.3106, pedigree (2,1,4,5,1)
  Extrapolated value, based on "cement production, portland, blast furnace slag GLO" dataset. India specific data not available.
  Uncertainty: Variance of log-transformed data was taken from ecoinvent report no 1, table 10.3. Value represents demand of infrastructure for input/output group c.
- steel, low-alloyed: 0.00011 kg; name steel; = 0.00011* cement; source Kellenberger D. 2007; lognormal variance with pedigree 0.0606, pedigree (3,5,4,5,4)
  Extrapolated value, based on "cement production, portland, blast furnace slag GLO" dataset. India specific data not available.
  Uncertainty: Variance of log-transformed data was taken from ecoinvent report no 1, table 10.3. Value represents demand of products, electricity etc. for input/output group c.
  properties: carbon content, fossil 0.005, wet mass 1 kg, dry mass 1 kg
- ethylene glycol: 0.00021 kg; = 2.1e-4* cement; source Kellenberger D. 2007; lognormal variance with pedigree 0.0606, pedigree (3,5,4,5,4)
  (same comment as for steel, low-alloyed)
  properties: heating value, net 23.44 MJ, wet mass 1 kg, dry mass 1 kg, carbon content, fossil 0.387097
- gypsum, mineral: 0 kg; pedigree (1,1,1,1,1)
  Primary data collected from 20 cement manufacturing units. The value has been calculated as a weighted average with respect to production volume.
  Uncertainty: Variance of log-transformed data was taken from ecoinvent report no 1, table 10.3. Value represents demand of products, electricity etc. for input/output group c.
  properties: wet mass 1 kg, dry mass 1 kg
- heat, district or industrial, other than natural gas: 0 MJ; pedigree (1,1,1,1,1)
  Moisture content in slag 15%. Generally in Indian for integrated plant to remove moisture from slag waste heat from clinkerisation process is used.
  properties: heating value, net 1 MJ
- clinker: 0 kg; pedigree (1,1,1,1,1)
  (same comment as for gypsum, mineral)
  properties: wet mass 1 kg, dry mass 1 kg
- electricity, medium voltage: 0 kWh; pedigree (1,1,1,1,1)
  (same comment as for gypsum, mineral)
- ground granulated blast furnace slag: 0 kg; name GGBFS; pedigree (1,1,1,1,1)
  (same comment as for gypsum, mineral)
  property carbon content, fossil 0; name GGBFS_C_content_fossil
  property carbon content, non-fossil 0; name GGBFS_C_content_non_fossil
  property water in wet mass 0 kg; name GGBFS_WWM
  property water content 0; name GGBFS_water_content
  properties: dry mass 1 kg, wet mass 1 kg
- gypsum, mineral: 7.52552e-5, 0.000167669, 0.0357571 kg (3 entries); lognormal variance with pedigree 0.0132, pedigree (3,3,4,5,1)
  (same comment as for gypsum, mineral)
- heat, district or industrial, other than natural gas: 0.00257351, 0.156069 MJ (2 entries); lognormal variance with pedigree 0.1307, pedigree (2,2,3,5,5)
  (same comment as for heat, district or industrial, other than natural gas)
- clinker: 0.113413, 0.023889, 0.00172937, 0.00554114, 0.00425145, 0.00710353, 0.340072 kg (7 entries); lognormal variance with pedigree 0.0053, pedigree (2,2,3,5,1)
  (same comment as for gypsum, mineral)
- electricity, medium voltage: 0.000695179, 0.000133305, 0.0030609, 0.00223792, 0.0103174, 0.00458774, 0.0149475 kWh (7 entries); lognormal variance with pedigree 0.0453, pedigree (2,2,3,5,4)
  (same comment as for gypsum, mineral)
- ground granulated blast furnace slag: 0.0411556, 0.00867927, 0.418165 kg (3 entries); lognormal variance with pedigree 0.0132, pedigree (3,3,4,5,1)
  (same comment as for gypsum, mineral)

## Sampling procedure
For this activity sample questionnaire has been prepared and circulated to all cement manufacturing units in India. Here we have selected clusterwise approch for collecting the data. Due to clusterwise approch variation in quality of raw material , different technologies etc. has taken care. After receiving the data from plants same has been analysed for any discripancies. Extreme minimum and maximum values reported by plants were removed. Final numbers were checked with cement industry expert.

## Extrapolations
This dataset has been extrapolated from the IN geography. No other exchange has been changed but geographical uncertainty.

## Review by Bruno Peuportier 2017-08-03
This dataset is consistent and there is no validation problem
