# mango seedling production, for planting

Dataset: EcoSpold 2, unit process
Geography: RoW
Time period: 2016-01-01 to 2021-01-01
Technology level: current
Classification: ISIC rev.4 ecoinvent: 0130:Plant propagation
Synonyms: mango tree seedlings; mango seedling production
Scenario: Business-as-Usual
System model: Allocation, cut-off by classification
Share of production covered: 100 %
Generated by: Jade Müller Carneiro
Published in: Folegatti-Matsuura M. 2018
Database: ecoinvent
isCopyrightProtected: true
accessRestrictedTo: 1

## General comment
This dataset represents the production of 1 unit of mango seedling for planting. The annual production is 53333 seedlings per hectare and the production cycle lasts about 8 months. The plants are reproduced by grafting. The seedlings are irrigated by micro-aspersion, consuming on average 33.6 liters of water per plant annually. Nutrition is provided by using mineral fertilizers such as urea and others, with the following amounts per year: 591kg/ha of N, 11kg/ha of P2O5, and 1.41kg/ha of K2O, plus micronutrients such as Ca, Mg and S; are also used plant protection products, mostly fungicides and insecticides, with a total per annum of 11.34kg of pesticides. It is considered that 20% of the seeds do not germinate or are lost due to other causes. Bibliography listed below.
CARVALHO, C. R. L., ROSSETTO, C. J., MANTOVANI, D. M. B., MORGANO, M. A., CASTRO., J. D., BORTOLETTO, N. Avaliação de cultivares de mangueira selecionadas pelo Instituto Agronômico de Campinas comparadas a outras de importância comercial. Rev. Bras. Frutic., 26 (2): 264-271, 2004.
Corrêa, F. L. O., Ramos, J. D. R., Gama-Rodrigues, A. C., Müller, M. W. Produção de serapilheira em sistema agroflorestal multiestratificado no estado de Rondônia, Brasil. Tese de Doutorado, apresentada à Universidade Federal de Lavras/UFLA, 2005.
Cunha, T. J. F., Silva, F. H. B. B., Silva, M. S. L., Giongo, V., Sá, I. B., Oliveira Neto, M. B., Cavalcanti, A. C. Solos do Submédio do Vale do São Francisco: Potencialidades e Limitações para uso agrÌcola. Série Documentos, 2011. ISSN 1808-9992, 2008.
Emmenegger, M., Reinhard, J., Zah, R. Sustainability quick check for biofuels - intermediate background report. Dubendorf, 2009.
Giongo, V., Salviano, A. M., Santana, M., OlszevKy, N., Silva, D.J., Gava, C.A.T., Cunha, T.J.F. PLANT COCKTAIL AS GREEN MANURE IN SEMI-ARID REGIONS TO IMPROVE SOIL CARBON AND NITROGEN STOCKS. Submitted in 2017.
IPCC. Guidelines for National Greenhouse Gas Inventories. 2006
Mouco, M.A.C., Silva, D.J. , Giongo, V., Mendes, A.M.S. Green Manures in ‘Kent’ Mango Orchard. Acta Hort. 1075, ISHS, 2015.
NEMECEK, T.; SCHNETZER, J. Methods of assessment of direct field emissions for LCIs of agricultural production systems. Zurich, Data v3.0, 2011.
Oliveira, A. R., et al. Cultivo da Mangueira. Sistemas de Produção, 2 - 2ª edição. ISSN 1807-0027. 2010.
Silva, D.J., Pereira, J.R., Mouco, M.A.C., Albuquerque, J.A.S., Raij, B., Silva , C.A. Nutrição Mineral e Adubação da Mangueira em Condições Irrigadas. Circular Técnica. Embrapa, 2004.
Novais, R.F., Smyth, T.J. Fósforo em solo e planta em condições tropicais. Universidade Federal de Vicosa, Vicosa, MG (Brasil). Dept. de Solos, 1999.
Nemecek T., Bengoa X., Lansche J., Mouron, P., Riedener E., Rossi V. & Humbert S. (2015) Methodological Guidelines for the Life Cycle Inventory of Agricultural Products. Version 3.0, July 2015. World Food LCA Database (WFLDB). Quantis and Agroscope, Lausanne and Zurich, Switzerland.

## Included activities start
This activity starts at sowing of the mango seeds.

## Included activities end
The dataset includes the inputs of seeds, mineral fertilisers, pesticides, water from irrigation and also plastic materials like the plastic bags where seedlings are involved as well as used for insulation protection and for protection of the grafts. It is assumed that no organic fertilisers are applied. Further, direct field emissions are included, with important regionalizations added. The activity ends when seedlings are extracted from the soil to be transported to the mango farms for planting.

## Geography
The inventory is modelled for the municipalities of Petrolina, state of Pernambuco, and Juazeiro, state of Bahia, located in the San Francisco valley region, northeast of Brazil.

## Technology
Cultivation of mango tree seedlings

## Time period
Time period of the most of the data collected for this dataset.

## Parameters
- clay content into soil: 13.6667 % (obsolete); name Clay_content
  Fraction of clay content into soil; Soil types in the São Francisco Valley where mangos are cultivated are: Neossolos Quartzarênicos (6%), Argissolos (20%) , Latossolos (15%) e Vertissolos (74%), acoording to Cunha et al (2008) and Oliveira et al (2010). Bust according to producers and reserachers of Embrapa Semiarid, most of the mango orchards are cultivated in Quartzarênicos (6%), Argissolos (20%) , Latossolos (15%). Thus, the clay avarage content (%) obtained considering these three soil types is applied ((6+20+15)/3=~14).
- fraction loss soil to river: 0.2 dimensionless; name fraction_soil_Ferw
  Fraction of soil that is lost to river due erosion, according to Nemecek & Schnetzer (2011).
- nitrogen crop residues: 0 kg N/ha; name nitrogen_Ncr
  The amount of crop residues from seedlings is considered null.
- fraction, irrigation water, to ground water: 0.8 dimensionless; name fraction_irrig_ground
  Literature value (Siebert, 2010) (Vionnet, S., Quantis Water Database - Technical Report, 2012).
- erosivity factor: 205.032 MJ*mm/(ha*h*yr); name erosivity_factor_R
  Erositivy factor used in the SQCB model for soil erosion calculations (Emmenegger et al.,2009) for precipitation inferior to 850mm/year: R = 0.0483*P^1.61. This value is for regions where there is uniform annual precipitation, which is not the case in the San francisco valley region, (since there is a month with more than 15% of average annual precipitation) so in this case the erosivity factor is multiplied by 10%. R' = 0,1*R.
- fraction, irrigation water to surface water: 0.2 dimensionless; name fraction_irrig_surface
  (same comment as for fraction, irrigation water, to ground water)
- precipitation: 179.2 mm
  "Precipitation" considered in the SQCB tool (Emmenegger et al, 2009) for soil erosion calculations is the annual precipitation of the region (mm/year) plus 10% of the anual irrigation: P+0,1*irrigation. However the seedlings are are protected from the rain, thus it is only considered the irrigation.
- plants per hectare: 533333 unit/ha; name yield_ha
  Amount of seedlings per hectare in the system used, according to producers in the region.
- practice factor for anti-erosion practice: 0.25 dimensionless; name practice_factor_erosion
  Practice factor for the anti-erosion practice 'stir cropping, contour', according to table 7.5 Emmenegger et al. (2009).
- nitrogen uptake by plant: 648 kg N/ha; name Nuptake_plant
  Data from laboratory analysis
- emission factor urea_ammonia: 0.15 dimensionless; name EF_urea_ammonia
  Emission factor for ammonia emissions (NH3) from urea application, according to Nemecek & Schnetzer (2011), p.18
- nitrogen availability for plants: 591 kg; name N_from_fertilizers
  Total nitrogen input from fertilizers.
- amount of N from urea: 588.8 kg N/ha; name urea_as_N
  Input of urea (46%N) as nitrogen in kgN/ha
- crop factor: 0.1 dimensionless; name crop_factor_c1
  According to Ontario Ministry of Agriculture (http://www.omafra.gov.on.ca/english/engineer/facts/12-051.htm):
  - Fruit trees = 0.1
- Phosphorus content: 0.00095 kg/kg; name Phosphorus_Pcr
  P content in the top soil
- slope factor: 0.834187 dimensionless; name slope_factor_LS
  Calculated for slope lenght = 100m and slope of 5%, according to Emmenegger et al.(2009)
- precipitation, annual: 1792 mm/year; name precipitation_irrigation
  Average precipitation in the region is 550 mm/year (Oliveira et al., 2010); According to The SQCB-NO3 model - Emmeneger et al. (2009) -, in order to calculate NO3- emissions, the "precipitation" used is the sum of annual precipitation and irrigation (mm/ha.year), however the seedlings are protected from the rain by polyethylene covers, thus is only considered irrigation (mm/ha.year).
- fraction, irrigation water, to air: 0.65 dimensionless; name fraction_irrig_ET
  (same comment as for fraction, irrigation water, to ground water)
- organic nitrogen into soil: 4378.79 kg N/ha; name Norg_soil
  Calculated according to Emmenegger et al, 2009 and Nemecek & Schnetzer, 2011, using Cempa = 34 (tropical dry weather)
- Factor for tillage practice: 0.25 dimensionless; name Ft
  According to Table 7-4, Emmenergger et al. (2009).
- erodibility factor: 0.0345 t*h/(MJ*mm); name erodibility_factor_k
  Erodibility factor: mean value for soils in the region: Entisols: k = 0.026; Ulltisol: k=0,026; Vertisol: k=0,046 and Oxisols: k=0.040. (Table 7.2 Emmenegger et al.,2009)
- enrichment factor P: 1.86 dimensionless; name factor_Fr
  enrichment factor for phosphorus
- emission factor Nfertilizer_ammonia: 0.04 dimensionless; name EF_N_ammonia
  Emission factor for ammonia emissions (NH3) from the application of generic nitrogen fertilisers, according to Nemecek & Schnetzer (2011), p.18
- rooting depth: 0.2567 m; name L
  Plant rooting depth, value from mango tree is taken from Oliveira et al.(2010)
- soil loss due to erosion: 0.0368794 metric ton/(ha*year); name soil_loss
- generic nitrogen: 2.69 kg N/ha; name N_generic
  Amount of nitrogen from different sources of fertilisers

## Reference product
- mango seedling, for planting: 1 unit; name REF_PRODUCT; By-product classification allocatable product; CPC 8611: Support and operation services to crop production; pedigree (1,1,1,1,1)
  Mango tree at seedling stage for planting, used as an input for mango fruit production systems.
  production volume 2.09509e9 unit; name RP_PV_1; = 5642359*376
    Data on seedling production unavailable in the literature. Estimative was made by multipling the harvested area the world (5642359 ha according to FAOSTAT, 2014) by the density of seedlings per hectare considered in the system under study in Brazil (376 seedling/ha)
  property carbon content, fossil 0; name REF_PRODUCT_C_content_fossil
    fossil carbon content on a dry matter basis
  property wet mass 1 kg; name REF_PRODUCT_WM
  property water in wet mass 0.421965 kg; name REF_PRODUCT_WWM
  property carbon content, non-fossil 0.439481; name REF_PRODUCT_C_content_non_fossil
    biogene carbon content on a dry matter basis
  property price 0.0773512 EUR2005; name REF_PRODUCT_price_EUR2005
    Estimated value. The price is taken from indiamart.com (source retrieved from: https://www.indiamart.com/proddetail/mango-seeds-15295838812.html, accessed 15Feb2018). The price reported in 6000Rs/tonne of seeds.
  property water content 0.73; name REF_PRODUCT_water_content
  property dry mass 0.578035 kg; name REF_PRODUCT_DM
  property carbon content 0.439481
    carbon content on a dry matter basis (reserved; not for manual entry)
  properties: carbon allocation 0.254036 kg

## Inputs from technosphere
- inorganic phosphorus fertiliser, as P2O5: 0 kg; name P2O5; pedigree (1,1,1,1,1)
  Amount of phosphate fertiliser, as P2O5, used for each seedling per cultivation cycle.
  properties: dry mass 1 kg, wet mass 1 kg
- polyethylene, high density, granulate: 0.000238 kg; lognormal variance with pedigree 0.0072, pedigree (2,4,3,5,1)
  HDPE used for seedling bags and covers for insulation protection.
  properties: carbon content, fossil 0.857143, dry mass 1 kg, wet mass 1 kg, heating value, net 42.47 MJ
  note on carbon content, fossil: Polyethylene is formed out of a huge amount of ethylene monomers (C2H4) (ecoinvent v2.2 report 11_II). MW=28 g/mol
- waste polyethylene: 0 kg; name BP_amount_1; pedigree (1,1,1,1,1)
  Discart of HDPE and LDPE used for seedling bags and covers for insulation protection. 0.00025 for LDPE and 0.000238 for HDPE.
  production volume 0 kg
    Calculated from production volume of reference product using the relative outputs.
  property price 0 EUR2005; name BP_amount_1_price_EUR2005
  properties: heating value, net 42.47 MJ, carbon content, fossil 0.825301, wet mass 1 kg, dry mass 0.996 kg, water content 0.00401606
  note on heating value, net: Value taken from the general comment of the treatment dataset.
  note on carbon content, fossil: C content in 1 kg DM was calculated using data in Tab A.1, ecoinvent v2.2 report 13_I
- pesticide, unspecified: 2.13e-5 kg; lognormal variance with pedigree 0.0066, pedigree (1,4,3,5,1)
  Sum of all amounts of active principles from several fungicides, insecticides and acaricides applied a seedling during each cultivation cycle.
  properties: carbon content, fossil 0.486978, wet mass 1 kg, dry mass 1 kg
- irrigation: 0 m3; pedigree (1,1,1,1,1)
  Irrigation water used on average for each mango seedling during each cycle.
  properties: wet mass 1000 kg, water content 9089.91, dry mass 0.11 kg
- cobalt: 8e-9 kg; lognormal variance with pedigree 0.0066, pedigree (1,4,3,5,1)
  Cobalt(Co) input from fertilisers, for each seedling cycle.
  properties: wet mass 1 kg, dry mass 1 kg
- zinc oxide: 3.98e-7 kg; lognormal variance with pedigree 0.0066, pedigree (1,4,3,5,1)
  Zinc(Zn) input from fertilisers, for each seedling cycle.
  properties: dry mass 1 kg, wet mass 1 kg
- manganese concentrate: 1.6e-7 kg; lognormal variance with pedigree 0.0066, pedigree (1,4,3,5,1)
  Manganese(Mn) input from fertilisers, for each seedling cycle.
  properties: wet mass 1 kg, dry mass 1 kg
- molybdenum trioxide: 3.6e-8 kg; name MoO3; lognormal variance with pedigree 0.0066, pedigree (1,4,3,5,1)
  Molibdenium(Mo) input from fertilisers, for each seedling cycle.
  property bismuth content 8e-5; name MoO3_Bi_content
  property oxygen content 0.29; name MoO3_O_content
  property molybdenum content 0.62; name MoO3_Mo_content
  property copper content 0.0006; name MoO3_Cu_content
  property iron content 0.0044; name MoO3_Fe_content
  property molecular weight 143.9 g/mol; name MoO3_mol_weight
  property sulfur content 0.0003; name MoO3_S_content
  property lead content 0.00015; name MoO3_Pb_content
- inorganic nitrogen fertiliser, as N: 0 kg; name N; pedigree (1,1,1,1,1)
  Amount as nitrogen fertiliser used per seedling for each cycle.
  properties: dry mass 1 kg, wet mass 1 kg
- phenol: 3.2e-6 kg; lognormal variance with pedigree 0.0066, pedigree (1,4,3,5,1)
  Additive "Agral" as Nonyl phenoxy poly (ethyleneoxy) ethanol, agricultural chemical, non-pesticidal, from the chemical group alkylphenols.(http://www.adapar.pr.gov.br/arquivos/File/defis/DFI/Bulas/Outros/AGRAL)
  properties: dry mass 1 kg, carbon content, fossil 0.765957, wet mass 1 kg, heating value, net 30.93 MJ
- inorganic potassium fertiliser, as K2O: 0 kg; name K2O; pedigree (1,1,1,1,1)
  Amount of potassium fertiliser, as K2O, used for each seedling per cultivation cycle.
  properties: dry mass 1 kg, wet mass 1 kg
- polyethylene, low density, granulate: 0.00025 kg; lognormal variance with pedigree 0.0086, pedigree (3,4,3,5,1)
  LDPE used in plastic bags used for protection of grafts and plastic tape.
  properties: wet mass 1 kg, dry mass 1 kg, carbon content, fossil 0.857143, heating value, net 42.47 MJ
- magnesium oxide: 0.0018 kg; lognormal variance with pedigree 0.0066, pedigree (1,4,3,5,1)
  Magnesium(Mg) input from fertilisers, for each seedling cycle..
  properties: dry mass 1 kg, wet mass 1 kg
- inorganic phosphorus fertiliser, as P2O5: 1.55659e-7, 2.01954e-7, 1.61711e-7, 2.66801e-7, 1.09932e-8, 2.89776e-8, 2.98921e-6, 5.3879e-8, 5.87951e-9, 1.2846e-9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 kg (29 entries); lognormal variance with pedigree 0.0066, pedigree (1,4,3,5,1)
  Amount of phosphate fertiliser, as P2O5, used for each seedling per cultivation cycle.
- waste polyethylene: -4.07372e-6, -3.08089e-7, -1.68259e-6, -6.79748e-7, -1.59778e-6, -5.28408e-5, -0.000426817 kg (7 entries); lognormal variance with pedigree 0.0086, pedigree (3,4,3,5,1)
  (same comment as for waste polyethylene)
  production volume 1.0224e6 kg
- irrigation: 2.16973e-5, 8.67891e-7, 0.00456944, 7.48811e-5, 3.74436e-6, 0.000212615, 3.46069e-5, 0.00878101, 0.000168792, 5.76892e-5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 m3 (16 entries); lognormal variance with pedigree 0.0066, pedigree (1,4,3,5,1)
  Irrigation water used on average for each mango seedling during each cycle.
- inorganic nitrogen fertiliser, as N: 5.4418e-6, 7.82186e-6, 6.99091e-6, 1.46663e-5, 1.81786e-7, 1.08847e-6, 0.000137916, 2.57755e-6, 3.87137e-7, 3.75916e-8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 kg (29 entries); lognormal variance with pedigree 0.0066, pedigree (1,4,3,5,1)
  Amount as nitrogen fertiliser used per seedling for each cycle.
- inorganic potassium fertiliser, as K2O: 1.85294e-9, 9.1821e-9, 1.86239e-8, 1.64837e-8, 2.38404e-9, 3.96947e-9, 3.8568e-7, 1.34152e-8, 3.30461e-9, 1.49494e-10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 kg (29 entries); lognormal variance with pedigree 0.0066, pedigree (1,4,3,5,1)
  Amount of potassium fertiliser, as K2O, used for each seedling per cultivation cycle.

## Inputs from nature
- Occupation, permanent crop, irrigated [natural resource, land]: 0.01875 m2*year; lognormal variance with pedigree 0.01, pedigree (3,4,3,5,1)
  Area occupation for the functional unit (1seedling).
- Energy, gross calorific value, in biomass [natural resource, biotic]: 1.45 MJ; lognormal variance with pedigree 0.0466, pedigree (5,4,3,5,1)
  According to ecoinvent, dataset "fruit tree seedling production, for planting, GLO, 2000-2012"
- Carbon dioxide, in air [natural resource, in air]: 0.929975 kg; lognormal variance with pedigree 0.0086, pedigree (3,4,3,5,1)
  Carbon absorved from the air by mango tree. Values of carbon content in mango and mango seedling are from laboratory data.

## Emissions to nature
- Ammonia [air, unspecified]: 0.000201331 kg; name emission_ammonia; lognormal variance with pedigree 0.016, pedigree (3,4,3,5,1)
  Ammonia release to air, according to the AGRAMMON model: 'Plant production' (Nemecek & Schnetzer, 2011).
- Cadmium, ion [water, ground-]: 4.46e-11 kg; lognormal variance with pedigree 0.098, pedigree (3,4,3,5,1)
  Cadmium (Cd) emission to groundwater through soil leaching due to the use of fertilisers and atmospheric deposition, estimated according to Nemecek & Schnetzer (2011).
- Thiophanate-methyl [soil, agricultural]: 7.84e-6 kg; lognormal variance with pedigree 0.079, pedigree (5,4,3,5,1)
  Amount of thiophanat-methyl, active substance from commercial fungicide Cercobin 700, more info available on http://www.adapar.pr.gov.br/arquivos/File/defis/DFI/Bulas/Fungicidas/cercobin700wp.pdf It is assumed that all pesticides active substances used are emitted to soil.
- Lead [water, surface water]: 4.8e-12 kg; lognormal variance with pedigree 0.136, pedigree (5,4,3,5,1)
  Lead (Pb) emission to river through soil erosion mechanism due to usage of fertilisers and atmospheric deposition, estimated according to Nemecek & Schnetzer (2011).
- Nitrate [water, ground-]: 0.000619005 kg; name emission_nitrate; lognormal variance with pedigree 0.048, pedigree (3,4,3,5,1)
  Nitrate Leaching to Ground Water according to the SQCB-NO3 model (Emmeneger et al, 2009) in kg NO3-/kg mango.
- Nitrogen oxides [air, unspecified]: 4.37657e-5 kg; lognormal variance with pedigree 0.038, pedigree (3,4,3,5,1)
  Nitrogen oxides (NOx) releases to air according to Nemecek et al. (2015) in kg NO2.
- Nickel, ion [water, surface water]: 2.4e-11 kg; lognormal variance with pedigree 0.136, pedigree (5,4,3,5,1)
  Nickel (Ni) emission to river through soil erosion mechanism due to usage of fertilisers and atmospheric deposition, estimated according to Nemecek & Schnetzer (2011).
- Lead [soil, agricultural]: 3.45e-10 kg; lognormal variance with pedigree 0.048, pedigree (3,4,3,5,1)
  Lead(Pb) emission to agricultural soil due to the use of fertilisers and atmospheric deposition, estimated according to Nemecek & Schnetzer (2011).
- Cadmium, ion [water, surface water]: 2.94e-13 kg; lognormal variance with pedigree 0.136, pedigree (5,4,3,5,1)
  Cadmium (Cd) emission to river through soil erosion mechanism due to usage of fertilisers and atmospheric deposition, estimated according to Nemecek & Schnetzer (2011).
- Chromium [soil, agricultural]: -8e-9 kg; normal variance with pedigree 0.048, pedigree (3,4,3,5,1)
  Chromium(Cr) emission to agricultural soil due to the use of fertilisers and atmospheric deposition, estimated according to Nemecek & Schnetzer (2011).
- Zinc, ion [water, surface water]: 5.34e-11 kg; lognormal variance with pedigree 0.136, pedigree (5,4,3,5,1)
  Zinc (Zn) emission to river through soil erosion mechanism due to usage of fertilisers and atmospheric deposition, estimated according to Nemecek & Schnetzer (2011).
- Abamectin [soil, agricultural]: 1.44e-7 kg; lognormal variance with pedigree 0.079, pedigree (5,4,3,5,1)
  Amount of abamectin, active substance from commercial insecticide Abamex, more info available on http://www.adapar.pr.gov.br/arquivos/File/defis/DFI/Bulas/Inseticidas/ABAMEX_BR_18.pdf It is assumed that all pesticides active substances used are emitted to soil.
- Water [water, surface water]: 0.002352 m3; lognormal variance with pedigree 0.0466, pedigree (5,4,3,5,1)
  Water release to surface water
- Zinc [soil, agricultural]: 4.02e-8 kg; lognormal variance with pedigree 0.058, pedigree (3,4,3,5,1)
  Zinc (Zn) emission to agricultural soil due to the use of fertilisers and atmospheric deposition, estimated according to Nemecek & Schnetzer (2011).
- Copper, ion [water, surface water]: 4.09e-11 kg; lognormal variance with pedigree 0.136, pedigree (5,4,3,5,1)
  Copper (Cu) emission to river through soil erosion mechanism due to usage of fertilisers and atmospheric deposition, estimated according to Nemecek & Schnetzer (2011).
- Chromium, ion [water, ground-]: 2.85e-8 kg; lognormal variance with pedigree 0.098, pedigree (3,4,3,5,1)
  Chromium(Cr) emission to groundwater through soil leaching due to the use of fertilisers and atmospheric deposition, estimated according to Nemecek & Schnetzer (2011).
- Cadmium [soil, agricultural]: 5.45e-10 kg; lognormal variance with pedigree 0.048, pedigree (3,4,3,5,1)
  Cadmium(Cd) emission to agricultural soil due to the use of fertilisers and atmospheric deposition, estimated according to Nemecek & Schnetzer (2011).
- Azoxystrobin [soil, agricultural]: 4e-7 kg; lognormal variance with pedigree 0.079, pedigree (5,4,3,5,1)
  Amount of azoxystrobin, active substance from commercial fungicide Amistar 250 SC, more info available on https://www.syngenta.com.au/product/crop-protection/fungicide/amistar-250-sc It is assumed that all pesticides active substances used are emitted to soil.
- Chlorpyrifos [soil, agricultural]: 7.68e-6 kg; lognormal variance with pedigree 0.041, pedigree (3,4,3,5,1)
  Amount of Chlorpyrifos, active substance from commercial insecticide Klorpan, more info available on http://www.adapar.pr.gov.br/arquivos/File/defis/DFI/Bulas/Inseticidas/KLORPAN480EC.pdf It is assumed that all pesticides active substances used are emitted to soil.
- Nickel [soil, agricultural]: 2.84e-9 kg; lognormal variance with pedigree 0.048, pedigree (3,4,3,5,1)
  Nickel(Zn) emission to agricultural soil due to the use of fertilisers and atmospheric deposition, estimated according to Nemecek & Schnetzer (2011).
- Lambda-cyhalothrin [soil, agricultural]: 4e-6 kg; lognormal variance with pedigree 0.041, pedigree (3,4,3,5,1)
  Amount of Lambda-cyhalothrin, active substance from commercial insecticide Karate, more info available on http://www.syngenta-us.com/labels/karate It is assumed that all pesticides active substances used are emitted to soil.
- Nickel [water, ground-]: 0 kg; pedigree (1,1,1,1,1)
  Nickel (Ni) emission to groundwater through soil leaching due to the use of fertilisers and atmospheric deposition, estimated according to Nemecek & Schnetzer (2011).
- Thiamethoxam [soil, agricultural]: 4e-7 kg; lognormal variance with pedigree 0.041, pedigree (3,4,3,5,1)
  Amount of Thiamethoxam, active substance from commercial fungicide Actara, more info available on http://www.syngenta-us.com/insecticides/actara It is assumed that all pesticides active substances used are emitted to soil.
- Water [air, unspecified]: 0.02184 m3; name evapotranspiration; lognormal variance with pedigree 0.0466, pedigree (5,4,3,5,1)
  Water release through evapotranspiration.
- Zinc, ion [water, ground-]: 2.59e-8 kg; lognormal variance with pedigree 0.098, pedigree (3,4,3,5,1)
  Zinc(Zn) emission to groundwater through soil leaching due to the use of fertilisers and atmospheric deposition, estimated according to Nemecek & Schnetzer (2011).
- Bifenthrin [soil, agricultural]: 8e-7 kg; lognormal variance with pedigree 0.041, pedigree (3,4,3,5,1)
  Amount of Bifenthrin, active substance from commercial insecticide Talstar 100 EC, more info available on https://www.fmcagricola.com.br/bula_geraPDF.aspx?cod=15 It is assumed that all pesticides active substances used are emitted to soil.
- Water [water, ground-]: 0.009408 m3; lognormal variance with pedigree 0.0466, pedigree (5,4,3,5,1)
  Water percolation due to irrigation and precipitation (550mm/yr)
- Copper, ion [water, ground-]: 5.34e-9 kg; lognormal variance with pedigree 0.098, pedigree (3,4,3,5,1)
  Copper(Cu) emission to groundwater through soil leaching due to the use of fertilisers and atmospheric deposition, estimated according to Nemecek & Schnetzer (2011).
- Chromium, ion [water, surface water]: 4.44e-11 kg; lognormal variance with pedigree 0.136, pedigree (5,4,3,5,1)
  Chromium (Cr) emission to river through soil erosion mechanism due to usage of fertilisers and atmospheric deposition, estimated according to Nemecek & Schnetzer (2011).
- Dinitrogen monoxide [air, unspecified]: 2.16957e-5 kg; lognormal variance with pedigree 0.038, pedigree (3,4,3,5,1)
  According to Nemecek & Schnetzer (2011) and IPCC (2006).
- Copper [soil, agricultural]: 9.21e-9 kg; lognormal variance with pedigree 0.25, pedigree (5,5,5,5,5)
  Copper (Cu) emission to agricultural soil due to the use of fertilisers and atmospheric deposition, estimated according to Nemecek & Schnetzer (2011).
- Phosphorus [water, surface water]: 2.44372e-8 kg; lognormal variance with pedigree 0.048, pedigree (3,4,3,5,1)
  phosphorus releases to river through soil erosion, according to Nemecek & Schnetzer (2011) and Emmenegger et al. (2009)
- Lead [water, ground-]: 1.08e-10 kg; lognormal variance with pedigree 0.098, pedigree (3,4,3,5,1)
  Lead(Pb) emission to groundwater through soil leaching due to the use of fertilisers and atmospheric deposition, estimated according to Nemecek & Schnetzer (2011).
- Carbon dioxide, fossil [air, unspecified]: 0.00173328 kg; lognormal variance with pedigree 0.0086, pedigree (3,4,3,5,1)
  Carbon dioxide releases from urea application, according to IPCC (2006) and lime application, according to Nemecek & Schnetzer (2011).

## Sampling procedure
Most of data for agricultural inputs was provided by local producers; Relevant experts were also consulted. Some data regarding soil in the region and composition of the seedlings (water, carbon etc) was provided by Embrapa Semiarido (CNPTSA). Emissions from the agricultural process are estimated according to Nemecek and Schnetzer (2011) and Emmeneger et al. (2009)

## Extrapolations
Dry mass, carbon content and gross calorific value are based on ecoinvent database.

## Review by Jens Lansche 2017-11-12
All review comments considered.
