# bentonite quarry construction

Dataset: EcoSpold 2, unit process
Geography: DE
Time period: 1997-01-01 to 2021-12-31
Technology level: current
Classification: EcoSpold01Categories: construction materials/additives
Classification: ISIC rev.4 ecoinvent: 4290:Construction of other civil engineering projects
Tags: ConvertedDataset
Scenario: Business-as-Usual
System model: Allocation, cut-off by classification
Generated by: Daniel Kellenberger (obsolete)
Published in: Kellenberger D. 2007
Database: ecoinvent
isCopyrightProtected: true
accessRestrictedTo: 1

## General comment
The total land occupation is 16.4 ha and consists of 6 ha buildings (3 ha multi-storey and 3 ha hall), 7.8 ha paved roads, 1.5 ha vegetation and 1.1 ha vessels and containers. The yearly production of the factory used as basis for the module “mine, bentonite” is for data concerning 1999, 345'743 tons (for data concerning 1997, 316'000 t). The lifetime taken into account is generally 50 years for stationary (e.g. buildings, concrete foundations, etc.) and 25 years for mobile equipment. The amount of equipment has been extrapolated from the equipment used at the module 'aluminium hydroxide, at plant'
[This dataset was already contained in the ecoinvent database version 2. It was not individually updated during the transfer to ecoinvent version 3. Life Cycle Impact Assessment results may still have changed, as they are affected by changes in the supply chain, i.e. in other datasets. This dataset was generated following the ecoinvent quality guidelines for version 2. It may have been subject to central changes described in the ecoinvent version 3 change report (http://www.ecoinvent.org/database/ecoinvent-version-3/reports-of-changes/), and the results of the central updates were reviewed extensively. The changes added e.g. consistent water flows and other information throughout the database. The documentation of this dataset can be found in the ecoinvent reports of version 2, which are still available via the ecoinvent website. The change report linked above covers all central changes that were made during the conversion process.]

## Included activities end
includes the area of the 'built' infrastructure (buildings, roads, etc.) as well as the buildings, machines, and conveyor belts used for bentonite production. It does not include the area disturbed during mining operation.

## Geography
For the exchanges, RER and CH modules have been used as proxy

## Technology
The data of the infrastructure corresponds to a high level of technology

## Reference product
- bentonite quarry infrastructure: 1 unit; CPC 53269: Other constructions for manufacturing; By-product classification allocatable product
  production volume 0.242058 unit
    This is a placeholder value that does not reflect real-world production volumes. This dataset does not currently require a real-world production volume to work in the database framework, and no actual data were collected yet. This has no negative effect on the results of the ecoinvent database. The placeholder value of this activity was scaled according to the nominal GDP of 2005 (source: United Nations, http://data.un.org/Glossary.aspx?q=GDP+%28current+US%24%29, accessed 20130726) to reflect an appropriate share of the global production volume, which is also a placeholder value.
  property price 3.75855e7 EUR2005
    Calculated based on inputs: The price of the product has been calculated as a sum of the values of the material and energy inputs for this product. This value is therefore a rough estimation. It may underestimate the real price since there are additional expenses when producing any product. These expences can include for example labour costs, treatment of waste materials and profit for the producer. Please consider carefully whether this level of data quality is acceptable for your application.

## Inputs from technosphere
- steel, chromium steel 18/8, hot rolled: 622000 kg; lognormal variance with pedigree 0.1106, pedigree (5,3,5,1,1)
  properties: dry mass 1 kg, carbon content, fossil 0.0008, wet mass 1 kg
  note on carbon content, fossil: Stainless steel model is the grade 304 steel (18/8 stainless, 18% chromium 8% nickel; max. 0.08% C)
- building, multi-storey: 300000 m3; lognormal variance with pedigree 0.4106, pedigree (5,3,5,1,1)
  activityLink introduced to establish a direct link to the corresponding regional supply of this product
- building, hall, steel construction: 30000 m2; lognormal variance with pedigree 0.4106, pedigree (5,3,5,1,1)
- steel, low-alloyed, hot rolled: 8210 kg; lognormal variance with pedigree 0.1106, pedigree (5,3,5,1,1)
  properties: wet mass 1 kg, dry mass 1 kg, carbon content, fossil 0.005
  note on carbon content, fossil: Low alloyed steel composition given in Tab. 3.2 ecoinvent v2.2 report 10_partII. Steel assumed to have a C content of 0.5%
- concrete, normal: 1043.3 m3; lognormal variance with pedigree 0.1106, pedigree (5,3,5,1,1)
  properties: dry mass 2190 kg, water content 0.086758, wet mass 2380 kg
- industrial machine, heavy, unspecified: 73300 kg; lognormal variance with pedigree 0.4106, pedigree (5,3,5,1,1)
  (same comment as for building, multi-storey)
- reinforcing steel: 697000 kg; lognormal variance with pedigree 0.1106, pedigree (5,3,5,1,1)
  properties: dry mass 1 kg, wet mass 1 kg, carbon content, fossil 0.004
- conveyor belt: 213 m; lognormal variance with pedigree 0.4106, pedigree (5,3,5,1,1)
  (same comment as for building, multi-storey)

## Inputs from nature
- Transformation, to traffic area, road network [natural resource, land]: 78000 m2; lognormal variance with pedigree 0.1606, pedigree (1,3,5,1,1)
- Transformation, from unspecified [natural resource, land]: 164000 m2; lognormal variance with pedigree 0.1606, pedigree (1,3,5,1,1)
- Occupation, industrial area [natural resource, land]: 4.3e6 m2*year; lognormal variance with pedigree 0.0806, pedigree (1,3,5,1,1)
- Transformation, to industrial area [natural resource, land]: 86000 m2; lognormal variance with pedigree 0.1606, pedigree (1,3,5,1,1)
- Occupation, traffic area, road network [natural resource, land]: 3.9e6 m2*year; lognormal variance with pedigree 0.0806, pedigree (1,3,5,1,1)

## Sampling procedure
The estimation of land use and infrastructure relates to one company in Germany (Süd-Chemie AG)

## Extrapolations
This dataset has been extrapolated from year 2000 to the year of the calculation (2021). The uncertainty has been adjusted accordingly.

## Review by Roberto Dones 2003-07-04
Passed
