# sulfamic acid production

Dataset: EcoSpold 2, unit process
Geography: GLO
Time period: 2015-01-01 to 2021-12-31
Technology level: current
Classification: ISIC rev.4 ecoinvent: 2011:Manufacture of basic chemicals
Synonyms: Amidosulfuric acid; Amidosulfonic acid; Aminosulfonic acid; Imidosulfonic acid
Scenario: Business-as-Usual
System model: Allocation, cut-off by classification
Generated by: Lucia Valsasina
Database: ecoinvent
isCopyrightProtected: true
accessRestrictedTo: 1

## General comment
This activity represents the production of 1 kg of sulfamic acid. Sulfamic acid is used in the production of sweeteners and cleaning agents. Sulfamic acid is particularly used for cleaning of carbonate and phosphate, and it is therefore used for cleaning machinery, heat and cooling system etc. This product is also used in the food industry for the production of sugar and dairy products, in the paper and pulp producing industry and in breweries.
Reference(s):
Gendorf (2016) Umwelterklärung 2015, Werk Gendorf Industriepark, www.gendorf.de
Metzger, M. 2000. Sulfamic Acid. In Ullmann's Encyclopedia of Industrial Chemistry, Electronic Release, Vol.34, pp.656 Wiley-VCH, Weinheim.
For more information on the model please refer to the dedicate ecoinvent report, access it in the Report section of ecoQuery (http://www.ecoinvent.org/login-databases.html)

## Included activities start
The activity starts when the raw materials enter the process.

## Included activities end
Materials entering the process are included as well as energy uses, infrastructure and emissions.

## Geography
The inputs to the process are calculated based on stoichiometry and literature data, they are therefore considered to be valid for the chosen geography. The inputs of heat, electricity, water, factory and nitrogen are mostly taken as average of industry data. Industry data values are a 5-year average of data (2011 - 2015) published by the Gendorf factory (Gendorf, 2016, Umwelterklärung, www.gendorf.de), (Gendorf, 2015, Umwelterklärung, www.gendorf.de), (Gendorf, 2014, Umwelterklärung, www.gendorf.de). The Gendorf factory is based in Germany, it produces a wide range of chemical substances. The factory produced 1657400 tonnes of chemical substances in the year 2015 (Gendorf, 2016, Umwelterklärung, www.gendorf.de) and 740000 tonnes of intermediate products. Given the range of chemicals produced by the german site, the values are used for the GLO geography, with uncertainty adjusted accordingly.

## Technology
Sulfamic acid is produced by the reaction of urea, sulfur trioxide and sulfuric acid. No other production routes are currently used. The process can be described in two steps. First urea is mixed with sulfuric acid and sulfur trioxide. This step requires a temperature below 40 degrees Celsius, to avoid carbon dioxide formation. Secondly the product of the first step reacts with the remaining sulfur trioxide. This step requires temperatures of 50 to 80 degrees and entails the formation of carbon dioxide together with sulfamic acid (Metzger 2000).
Chemical reaction:
NH2CONH2 + SO3 + H2SO4 -> 2NH2SO3H + CO2
This inventory representing production of a particular chemical compound is at least partially based on a generic model on the production of chemicals. The data generated by this model have been improved by compound-specific data when available.
The model on production of chemicals is using specific industry or literature data wherever possible and more generic data on chemical production processes to fill compound-specific data gaps when necessary. The basic principles of the model have been published in literature (Hischier 2005, Establishing Life Cycle Inventories of Chemicals Based on Differing Data Availability). The model has been updated and extended with newly available data from the chemical industry.
In the model, unreacted fractions are treated in a waste treatment process, and emissions reported are after a waste treatment process that is included in the scope of this dataset. For volatile reactants, a small level of evaporation is assumed. Solvents and catalysts are mostly recycled in closed-loop systems within the scope of the dataset and reported flows are for losses from this system.
The main source of information for the values for heat, electricity, water (process and cooling), nitrogen, chemical factory is industry data from Gendorf. The values are a 5-year average of data (2011 - 2015) published by the Gendorf factory (Gendorf, 2016, Umwelterklärung, www.gendorf.de), (Gendorf, 2015, Umwelterklärung, www.gendorf.de), (Gendorf, 2014, Umwelterklärung, www.gendorf.de). The Gendorf factory is based in Germany, it produces a wide range of chemical substances. The factory produced 1657400 tonnes of chemical substances in the year 2015 (Gendorf, 2016, Umwelterklärung, www.gendorf.de) and 740000 tonnes of intermediate products.
Reference(s):
Hischier, R. (2005) Establishing Life Cycle Inventories of Chemicals Based on Differing Data Availability (9 pp). The International Journal of Life Cycle Assessment, Volume 10, Issue 1, pp 59–67. 10.1065/lca2004.10.181.7
Gendorf (2016) Umwelterklärung 2015, Werk Gendorf Industriepark, www.gendorf.de
Metzger, M. 2000. Sulfamic Acid. In Ullmann's Encyclopedia of Industrial Chemistry, Electronic Release, Vol.34, pp.656 Wiley-VCH, Weinheim.
For more information on the model please refer to the dedicate ecoinvent report, access it in the Report section of ecoQuery (http://www.ecoinvent.org/login-databases.html)

## Time period
The activity is based on stoichiometry and literature data, it is therefore considered not to change significantly over time in terms of inputs. The inputs of heat, electricity, water, factory and nitrogen are mostly taken as average of industry data. Industry data values are a 5-year average of data (2011 - 2015) published by the Gendorf factory (Gendorf, 2016, Umwelterklärung, www.gendorf.de), (Gendorf, 2015, Umwelterklärung, www.gendorf.de), (Gendorf, 2014, Umwelterklärung, www.gendorf.de). The Gendorf factory is based in Germany, it produces a wide range of chemical substances. The factory produced 1657400 tonnes of chemical substances in the year 2015 (Gendorf, 2016, Umwelterklärung, www.gendorf.de) and 740000 tonnes of intermediate products. The time period is therefore set based on the years from Gendorf reference.

## Reference product
- sulfamic acid: 1 kg; name RP; CPC 34231: Chemical elements n.e.c.; inorganic acids except phosphoric, nitric and sulphonitric; inorganic oxygen compoun[…]; By-product classification allocatable product; CAS 5329-14-6
  Sulfamic acid is used in the production of sweeteners and cleaning agents. Sulfamic acid is particularly used for cleaning of carbonate and phosphate, and it is therefore used for cleaning machinery, heat and cooling system etc. This product is also used in the food industry for the production of sugar and dairy products, in the paper and pulp producing industry and in breweries.
  Reference(s):
  Gendorf (2016) Umwelterklärung 2015, Werk Gendorf Industriepark, www.gendorf.de
  Metzger, M. 2000. Sulfamic Acid. In Ullmann's Encyclopedia of Industrial Chemistry, Electronic Release, Vol.34, pp.656 Wiley-VCH, Weinheim.
  production volume 9.6e7 kg; name RP_PV
    Litarature value. In 1995 the worldwide annual production capacity was at 96000 metric tonnes (Metzger, A. 2000. Sulfamic Acid. Ullmann's Encyclopedia of Industrial Chemistry. Wiley-VCH, 2011, Weinheim.)
  property heating value, net 3.74 MJ
    LHV is calculated based on the elemental composition of the substance. Based on the CAS number of the substance (005329-14-6), the chemical formula of the substance is found to be: H3NSO3, (PubChem 2020).
    Reference: Kim, S., Chen, J., Cheng, T., Gindulyte, A., He, J., He, S., Li, Q., Shoemaker, B. A., Thiessen, P. A., Yu, B., Zaslavsky, L., Zhang, J., & Bolton, E. E. (2019). PubChem 2019 update: improved access to chemical data. Nucleic acids research, 47(D1), D1102–D1109. https://doi.org/10.1093/nar/gky1033
  property price 0.608795 EUR2005; name RP_price_EUR2005
    Calculated based on inputs: The price of the product has been calculated as a sum of the values of the material and energy inputs for this product. This value is therefore a rough estimation. It may underestimate the real price since there are additional expenses when producing any product. These expences can include for example labour costs, treatment of waste materials and profit for the producer. Please consider carefully whether this level of data quality is acceptable for your application.
  property carbon content 0
    carbon content on a dry matter basis (reserved; not for manual entry)
  properties: wet mass 1 kg, dry mass 1 kg, water content 0, carbon content, non-fossil 0, carbon content, fossil 0, water in wet mass 0 kg, carbon allocation 0 kg

## Inputs from technosphere
- electricity, medium voltage: 0.416 kWh; lognormal variance with pedigree 0.0106, pedigree (2,3,2,4,3)
  Calculated based on literature data published by the industry. This value is a 5-year average of data (2011 - 2015) published by the Gendorf factory (Gendorf, 2016, Umwelterklärung, www.gendorf.de), (Gendorf, 2015, Umwelterklärung, www.gendorf.de), (Gendorf, 2014, Umwelterklärung, www.gendorf.de). The amount of electricity per kg of chemical substance produced is calculated using literature data published by the Gendorf factory based in Germany, which produces a wide range of chemical substances. The factory produced 1657400 tonnes of chemical substances in the year 2015 (Gendorf, 2016, Umwelterklärung, www.gendorf.de) and 740000 tonnes of intermediate products. The amount of electricity consumed in the year 2015 was 3498800 GJ (Gendorf, 2016, Umwelterklärung, www.gendorf.de). The resulting amount of electricity is 0.406 kWh/kg (year 2015) of chemical substance produced. The 5-year average (2011 - 2015, weighted by production volume) is 0.416 kWh/kg (1.5 MJ/kg). Cross-reference: the amount of chemicals produced (excluding intermediate products) in the EU-28 in the year 2011 was 327 million tonnes (Eurostat, http://ec.europa.eu/eurostat/statistics-explained/index.php/Chemicals_production_statistics, accessed 20170126). The chemical and petrochemical industry sector consumed 2.33 EJ of energy in 2011 (European Commission - Joint Research Centre, 2014, BAT on Common Waste water and Waste Gas Treatment/Management Systems in the Chemical Sector). The resulting energy (both heat and electricity) consumed per kg of chemicals produced in 2011 is thus 7.13 MJ/kg. This is higher than the value calculated using data published by Gendorf – 3.85 MJ/kg, but that is to be expected as the intermediate products are not accounted for.
- wastewater, average: 0 m3; name BP_wastewater_average; pedigree (1,1,1,1,1)
  Calculated based on literature data published by the industry. This value is a 5-year average of data (2011 - 2015) published by the Gendorf factory (Gendorf, 2016, Umwelterklärung, www.gendorf.de), (Gendorf, 2015, Umwelterklärung, www.gendorf.de), (Gendorf, 2014, Umwelterklärung, www.gendorf.de). The amount of wastewater (which is later on treated in the municipal WWTP) per kg of chemical substance produced is calculated using literature data published by the Gendorf factory based in Germany, which produces a wide range of chemical substances. The factory produced 1657400 tonnes of chemical substances in the year 2015 (Gendorf, 2016, Umwelterklärung, www.gendorf.de) and 740000 tonnes of intermediate products. The amount of wastewater which is later on treated in the municipal WWTP in the year 2015 was 1200 tonnes (Gendorf, 2016, Umwelterklärung, www.gendorf.de). The resulting amount of wastewater is 2.7E-06 m3/kg of chemical product produced.
  production volume 0 m3
    Calculated from the production volume of the reference product in proportion to the respective output amounts.
  property price 0 EUR2005; name BP_wastewater_average_price_EUR2005
  properties: water content 2882.2, carbon content, non-fossil 0.194039, wet mass 1000 kg, dry mass 0.346837 kg
  note on carbon content, non-fossil: 0.0673 kg TOC/m3 (Tab A.17, ecoinvent v2.2 report 13_I). TOC was considered as Total Carbon.
- urea: 0 kg; pedigree (1,1,1,1,1)
  Calculated value based on stoichiometric calculations and literature data.
  60.05564g/mol is the molar mass of urea, as N (CH4N2O).
  97.09476g/mol is the molar mass of sulfamic acid (H3NSO3).
  Sulfamic acid is produced by the reaction of urea, sulfur trioxide and sulfuric acid. No other production routes are currently used. The process can be described in two steps. First urea is mixed with sulfuric acid and sulfur trioxide. This step requires a temperature below 40 degrees Celsius, to avoid carbon dioxide formation. Secondly the product of the first step reacts with the remaining sulfur trioxide. This step requires temperatures of 50 to 80 degrees and entails the formation of carbon dioxide together with sulfamic acid (Metzger 2000).
  Chemical reaction:
  NH2CONH2 + SO3 + H2SO4 -> 2NH2SO3H + CO2
  properties: carbon content, fossil 0.2, wet mass 1 kg, dry mass 1 kg
- heat, from steam, in chemical industry: 0 MJ; pedigree (1,1,1,1,1)
  Calculated based on literature data published by the industry. This value is a 5-year average of data (2011 - 2015) published by the Gendorf factory (Gendorf, 2016, Umwelterklärung, www.gendorf.de), (Gendorf, 2015, Umwelterklärung, www.gendorf.de), (Gendorf, 2014, Umwelterklärung, www.gendorf.de). The amount of heat used per kg of chemical substance produced is calculated using literature data published by the Gendorf factory based in Germany, which produces a wide range of chemical substances. The factory produced 1657400 tonnes of chemical substances in the year 2015 (Gendorf, 2016, Umwelterklärung, www.gendorf.de) and 740000 tonnes of intermediate products. The amount of heat in the year 2015 was 523500 GJ (Gendorf, 2016, Umwelterklärung, www.gendorf.de) of which 90% was obtained from natural gas and 10% from steam. The resulting amount of heat from steam is 0.22 MJ/kg of chemical product produced. The 5-year average (2011 - 2015, weighted by production volume) is 0.20 MJ/kg. Cross-reference: the amount of chemicals produced (excluding intermediate products) in the EU-28 in the year 2011 was 327 million tonnes (Eurostat, http://ec.europa.eu/eurostat/statistics-explained/index.php/Chemicals_production_statistics, accessed 20170126). The chemical and petrochemical industry sector consumed 2.33 EJ of energy in 2011 (European Commission - Joint Research Centre, 2014, BAT on Common Waste water and Waste Gas Treatment/Management Systems in the Chemical Sector). The resulting energy (both heat and electricity) consumed per kg of chemicals produced in 2011 is thus 7.13 MJ/kg. This is higher than the value calculated using data published by Gendorf – 3.85 MJ/kg, but that is to be expected as the intermediate products are not accounted for.
  properties: heating value, net 1 MJ
- tap water: 0.026 kg; lognormal variance with pedigree 0.0106, pedigree (2,3,2,4,3)
  Calculated based on literature data published by the industry. This value is a 5-year average of data (2011 - 2015) published by the Gendorf factory (Gendorf, 2016, Umwelterklärung, www.gendorf.de), (Gendorf, 2015, Umwelterklärung, www.gendorf.de), (Gendorf, 2014, Umwelterklärung, www.gendorf.de). The amount of tap water per kg of chemical substance produced is calculated using literature data published by the Gendorf factory based in Germany, which produces a wide range of chemical substances. The factory produced 1657400 tonnes of chemical substances in the year 2015 (Gendorf, 2016, Umwelterklärung, www.gendorf.de) and 740000 tonnes of intermediate products. The amount of tap water consumed in the year 2015 was 55100 tonnes (Gendorf, 2016, Umwelterklärung, www.gendorf.de). The resulting amount of tap water is 0.023 kg/kg of chemical product produced. The 5-year average (2011 - 2015, weighted by production volume) is 0.026 kg/kg.
  properties: water content 2962.17, carbon content, fossil 0.00178991, wet mass 1 kg, dry mass 0.000337476 kg
  note on carbon content, fossil: Bicarbonate content is 2.93 mol/m3. CO2 content is 0.1 mol/m3 (ecoinvent v2.2 report 8, Tab 93.1).
- nitrogen, liquid: 0 kg; pedigree (1,1,1,1,1)
  Calculated based on literature data published by the industry. This value is a 5-year average of data (2011 - 2015) published by the Gendorf factory (Gendorf, 2016, Umwelterklärung, www.gendorf.de), (Gendorf, 2015, Umwelterklärung, www.gendorf.de), (Gendorf, 2014, Umwelterklärung, www.gendorf.de). The amount of nitrogen used per kg of chemical substance produced is calculated using literature data published by the Gendorf factory based in Germany, which produces a wide range of chemical substances. The factory produced 1657400 tonnes of chemical substances in the year 2015 (Gendorf, 2016, Umwelterklärung, www.gendorf.de) and 740000 tonnes of intermediate products. The reported amount of nitrogen used in 2015 was 33512400 Nm3 (Gendorf, 2016, Umwelterklärung, www.gendorf.de). One Nm3 of nitrogen is equal to 1.2506 kg. The resulting amount of nitrogen - the 5-year average (2011 - 2015, weighted by production volume) is 0.019 kg/kg. Nitrogen is mainly used during the production of chemicals for 'blanketing', which is the process of applying gas to the vapour space of a container or vessel in order to control its composition.
  properties: wet mass 1 kg, dry mass 1 kg
- chemical factory, organics: 4e-10 unit; lognormal variance with pedigree 0.31, pedigree (2,3,2,4,3)
  Calculated based on literature data published by the industry. For this activity, no information was readily available concerning infrastructure and land-use. Therefore, the infrastructure is estimated based on data from two chemical factories, the BASF site of Ludwigshafen and the chemical factory in Gendorf (which are both located in Germany), which produce a wide range of chemical substances. Based on this data, the following assumptions are made: the built area amounts to about 4.2 ha, the plant has an average output of 50'000 t/a and a lifespan of fifty years. The estimated infrastructure amount is therefore 4.00 E-10 units per kg of produced chemical.
  References:
  Althaus H.-J., Chudacoff M., Hischier R., Jungbluth N., Osses M. and Primas A. (2007) Life Cycle Inventories of Chemicals. ecoinvent report No. 8, v2.0. EMPA Dübendorf, Swiss Centre for Life Cycle Inventories, Dübendorf, CH.
  Gendorf (2000) Umwelterklärung 2000, Werk Gendorf. Werk Gendorf, Burgkirchen.
- heat, district or industrial, natural gas: 2.15 MJ; lognormal variance with pedigree 0.0106, pedigree (2,3,2,4,3)
  Calculated based on literature data published by the industry. This value is a 5-year average of data (2011 - 2015) published by the Gendorf factory (Gendorf, 2016, Umwelterklärung, www.gendorf.de), (Gendorf, 2015, Umwelterklärung, www.gendorf.de), (Gendorf, 2014, Umwelterklärung, www.gendorf.de). The amount of heat used per kg of chemical substance produced is calculated using literature data published by the Gendorf factory based in Germany, which produces a wide range of chemical substances. The factory produced 1657400 tonnes of chemical substances in the year 2015 (Gendorf, 2016, Umwelterklärung, www.gendorf.de) and 740000 tonnes of intermediate products. The amount of heat in the year 2015 was 523500 GJ (Gendorf, 2016, Umwelterklärung, www.gendorf.de) of which 90% was obtained from natural gas and 10% from steam. The resulting amount of heat from natural gas is 2.02 MJ/kg of chemical product produced. The 5-year average (2011 - 2015, weighted by production volume) is 2.15 MJ/kg. Cross-reference: the amount of chemicals produced (excluding intermediate products) in the EU-28 in the year 2011 was 327 million tonnes (Eurostat, http://ec.europa.eu/eurostat/statistics-explained/index.php/Chemicals_production_statistics, accessed 20170126). The chemical and petrochemical industry sector consumed 2.33 EJ of energy in 2011 (European Commission - Joint Research Centre, 2014, BAT on Common Waste water and Waste Gas Treatment/Management Systems in the Chemical Sector). The resulting energy (both heat and electricity) consumed per kg of chemicals produced in 2011 is thus 7.13 MJ/kg. This is higher than the value calculated using data published by Gendorf – 3.85 MJ/kg, but that is to be expected as the intermediate products are not accounted for.
  properties: heating value, net 1 MJ
- sulfur trioxide: 0 kg; pedigree (1,1,1,1,1)
  Calculated value based on stoichiometric calculations and literature data.
  80.0642g/mol is the molar mass of sulfur trioxide (O3S).
  97.09476g/mol is the molar mass of sulfamic acid (H3NSO3).
  Sulfamic acid is produced by the reaction of urea, sulfur trioxide and sulfuric acid. No other production routes are currently used. The process can be described in two steps. First urea is mixed with sulfuric acid and sulfur trioxide. This step requires a temperature below 40 degrees Celsius, to avoid carbon dioxide formation. Secondly the product of the first step reacts with the remaining sulfur trioxide. This step requires temperatures of 50 to 80 degrees and entails the formation of carbon dioxide together with sulfamic acid (Metzger 2000).
  Chemical reaction:
  NH2CONH2 + SO3 + H2SO4 -> 2NH2SO3H + CO2
  properties: wet mass 1 kg, dry mass 1 kg
- sulfuric acid: 0 kg; pedigree (1,1,1,1,1)
  Calculated value based on stoichiometric calculations and literature data.
  98.07948g/mol is the molar mass of sulfuric acid (H2O4S).
  97.09476g/mol is the molar mass of sulfamic acid (H3NSO3).
  Sulfamic acid is produced by the reaction of urea, sulfur trioxide and sulfuric acid. No other production routes are currently used. The process can be described in two steps. First urea is mixed with sulfuric acid and sulfur trioxide. This step requires a temperature below 40 degrees Celsius, to avoid carbon dioxide formation. Secondly the product of the first step reacts with the remaining sulfur trioxide. This step requires temperatures of 50 to 80 degrees and entails the formation of carbon dioxide together with sulfamic acid (Metzger 2000).
  Chemical reaction:
  NH2CONH2 + SO3 + H2SO4 -> 2NH2SO3H + CO2
  properties: wet mass 1 kg, dry mass 1 kg
- wastewater, average: -8.43646e-7, -9.12666e-8, -1.76509e-6 m3 (3 entries); lognormal variance with pedigree 0.0106, pedigree (2,3,2,4,3)
  (same comment as for wastewater, average)
  production volume 259.2 m3
- urea: 0.0238815, 0.0192644, 0.130072, 0.152322 kg (4 entries); lognormal variance with pedigree 0.010025, pedigree (2,3,2,2,3)
  (same comment as for urea)
- heat, from steam, in chemical industry: 0.0299772, 0.170023 MJ (2 entries); lognormal variance with pedigree 0.0106, pedigree (2,3,2,4,3)
  (same comment as for heat, from steam, in chemical industry)
- nitrogen, liquid: 0.00409211, 0.0149079 kg (2 entries); lognormal variance with pedigree 0.0106, pedigree (2,3,2,4,3)
  (same comment as for nitrogen, liquid)
- sulfur trioxide: 0.143477, 0.290522 kg (2 entries); lognormal variance with pedigree 0.010025, pedigree (2,3,2,2,3)
  (same comment as for sulfur trioxide)
- sulfuric acid: 0.0615053, 0.470148 kg (2 entries); lognormal variance with pedigree 0.010025, pedigree (2,3,2,2,3)
  (same comment as for sulfuric acid)

## Inputs from nature
- Water, well, in ground [natural resource, in water]: 0.00083 m3; lognormal variance with pedigree 0.0106, pedigree (2,3,2,4,3)
  Calculated based on literature data published by the industry. This value is a 5-year average of data (2011 - 2015) published by the Gendorf factory (Gendorf, 2016, Umwelterklärung, www.gendorf.de), (Gendorf, 2015, Umwelterklärung, www.gendorf.de), (Gendorf, 2014, Umwelterklärung, www.gendorf.de). The amount of groundwater and surface water (river) extracted per kg of chemical substance produced is calculated using literature data published by the Gendorf factory based in Germany, which produces a wide range of chemical substances. The factory produced 1657400 tonnes of chemical substances in the year 2015 (Gendorf, 2016, Umwelterklärung, www.gendorf.de) and 740000 tonnes of intermediate products. The amount of groundwater and surface water (river) extracted in the year 2015 was 19950000 tonnes and 21488100 tonnes respectively (Gendorf, 2016, Umwelterklärung, www.gendorf.de).
- Water, cooling, unspecified natural origin [natural resource, in water]: 0.0164 m3; lognormal variance with pedigree 0.0106, pedigree (2,3,2,4,3)
  Calculated based on literature data published by the industry. This value is a 5-year average of data (2011 - 2015) published by the Gendorf factory (Gendorf, 2016, Umwelterklärung, www.gendorf.de), (Gendorf, 2015, Umwelterklärung, www.gendorf.de), (Gendorf, 2014, Umwelterklärung, www.gendorf.de). The amount of water for cooling extracted per kg of chemical substance produced is calculated using literature data published by the Gendorf factory based in Germany, which produces a wide range of chemical substances. The factory produced 1657400 tonnes of chemical substances in the year 2015 (Gendorf, 2016, Umwelterklärung, www.gendorf.de) and 740000 tonnes of intermediate products. The reported amounts of water extracted as groundwater and surface water (river) are assumed to be used entirely for cooling purposes.
- Water, river [natural resource, in water]: 0.00086 m3; lognormal variance with pedigree 0.0106, pedigree (2,3,2,4,3)
  (same comment as for Water, well, in ground)

## Emissions to nature
- Urea [water, unspecified]: 0.00081385 kg; lognormal variance with pedigree 0.0106, pedigree (2,3,2,4,3)
  Calculated value. The values is based on a generic model. The basic principles of the model have been published in literature (Hischier 2005, Establishing Life Cycle Inventories of Chemicals Based on Differing Data Availability). The model has been updated and extended with newly available data from the chemical industry. Find more information in the dedicated report on the ecoinvent website.
  Reference(s):
  Hischier, R. (2005) Establishing Life Cycle Inventories of Chemicals Based on Differing Data Availability (9 pp). The International Journal of Life Cycle Assessment, Volume 10, Issue 1, pp 59–67. 10.1065/lca2004.10.181.7
- BOD5, Biological Oxygen Demand [water, unspecified]: 0.000624458 kg; lognormal variance with pedigree 0.218, pedigree (4,5,5,5,5)
  Calculated value. The BOD, COD, TOC and BOD5 are calculated based on the amount and type of emissions released to water in the same activity.
- TOC, Total Organic Carbon [water, unspecified]: 0.000162619 kg; lognormal variance with pedigree 0.218, pedigree (4,5,5,5,5)
  (same comment as for BOD5, Biological Oxygen Demand)
- Sulfur [water, unspecified]: 0.0156704 kg; lognormal variance with pedigree 0.0106, pedigree (2,3,2,4,3)
  (same comment as for Urea)
- Sulfite [water, unspecified]: 0.000852499 kg; lognormal variance with pedigree 0.0106, pedigree (2,3,2,4,3)
  (same comment as for Urea)
- Sulfur trioxide [air, unspecified]: 0.00464999 kg; lognormal variance with pedigree 0.0106, pedigree (2,3,2,4,3)
  (same comment as for Urea)
- Carbon dioxide, fossil [air, unspecified]: 0.237965 kg; lognormal variance with pedigree 0.0106, pedigree (2,3,2,4,3)
  (same comment as for Urea)
- DOC, Dissolved Organic Carbon [water, unspecified]: 0.000162619 kg; lognormal variance with pedigree 0.218, pedigree (4,5,5,5,5)
  (same comment as for BOD5, Biological Oxygen Demand)
- Nitrogen [air, unspecified]: 0.019 kg; lognormal variance with pedigree 0.0106, pedigree (2,3,2,4,3)
  Calculated value. The amount of nitrogen released to air is equal to the amount of nitrogen entering the activity.
- COD, Chemical Oxygen Demand [water, unspecified]: 0.000624458 kg; lognormal variance with pedigree 0.218, pedigree (4,5,5,5,5)
  (same comment as for BOD5, Biological Oxygen Demand)
- Sulfate, ion [water, unspecified]: 0.00130177 kg; lognormal variance with pedigree 0.0106, pedigree (2,3,2,4,3)
  (same comment as for Urea)
- Nitrate [water, unspecified]: 0.0319301 kg; lognormal variance with pedigree 0.0106, pedigree (2,3,2,4,3)
  (same comment as for Urea)
- Water [water, unspecified]: 0.0167 m3; lognormal variance with pedigree 0.0106, pedigree (2,3,2,4,3)
  Calculated based on literature data published by the industry (Gendorf, 2016, Umwelterklärung, www.gendorf.de). The amount of water released back to the environment consists of the amount of process water treated in the internal WWTP and then released back to the environment and the amount of cooling water released back to the environment.
- Water [air, unspecified]: 0.0014 m3; lognormal variance with pedigree 0.0106, pedigree (2,3,2,4,3)
  Calculated to ensure the water balance. In general, in the case of recirculating cooling systems, 77% of the water input evaporates to air. In case of once-through cooling systems, 4% of the water input evaporates to air. The process water has in the chemical industry an average evaporation rate of 20.5%. In the specific case of the Gendorf factory, the calculated evaporation rate based on the data published is 6.3%. This matches the qualitative information, that the majority of the cooling systems in Gendorf are once-through and that the amount of cooling water used is significantly higher than the amount of process water used (Gendorf, 2016, Umwelterklärung, www.gendorf.de).

## Sampling procedure
Literature data and stochiometric calculation.

## Extrapolations
This dataset has been extrapolated from year 2020 to the year of the calculation (2021). The uncertainty has been adjusted accordingly.

## Review by Emilia Moreno Ruiz 2017-08-10
This dataset was additionally reviewed in a separate review process by Eric Johnson of Atlantic Consulting as well as Emilia Moreno Ruiz and Gregor Wernet of ecoinvent.
