# gluing mill construction

Dataset: EcoSpold 2, unit process
Geography: RoW
Time period: 2018-01-01 to 2021-12-31
Technology level: current
Classification: ISIC rev.4 ecoinvent: 4290:Construction of other civil engineering projects
Tags: Swiss brush-up completed
Scenario: Business-as-Usual
System model: Allocation, cut-off by classification
Generated by: Frank Werner
Database: ecoinvent
isCopyrightProtected: true
accessRestrictedTo: 1

## General comment
This dataset is a copy of the dataset gluing mill construction in RER. It represents the construction of a medium sized gluing plant for the production of glued timber products, such as glue laminated timber, cross laminated timber, glued solid timber and similar products.
The modelled plant is located adjacent to the sawmill in which the timber is sawn before gluing.

## Included activities start
From the reception at the factory gate of all materials and fuels used.

## Included activities end
The land area and the material and their transports needed for building and disposal of a gluing plant with a yearly output of 12'000 m3 glued lamianted timber per year is included. The storage are of finished products is included.

## Geography
Data for Switzerland used for the global context.

## Technology
Medium sized gluing mill, located with sawmill

## Reference product
- gluing mill: 1 unit; name mill; CPC 34663: Herbicides, anti-sprouting products and plant-growth regulators; By-product classification allocatable product
  production volume 9000 unit; name gluing_plant_pv
    arbitrary value based on expert guess
  property price 1.09476e6 EUR2005
    Calculated based on inputs: The price of the product has been calculated as a sum of the values of the material and energy inputs for this product. This value is therefore a rough estimation. It may underestimate the real price since there are additional expenses when producing any product. These expences can include for example labour costs, treatment of waste materials and profit for the producer. Please consider carefully whether this level of data quality is acceptable for your application.
  property lifetime capacity in m3 2.5e6 m3; name m_gluingplant_Lft_capacity_m3; = 50000* m_gluingplant_lifetime
    Gluing plant with a yearly output of 50'000 m3 of glued timber.
  property lifetime 50 year; name m_gluingplant_lifetime
    Default assumption to estimate production capacity

## By-products
- iron scrap, unsorted: 0 kg; CPC 39310: Slag, dross, scalings and other waste from the manufacture of iron or steel; By-product classification Recyclable; pedigree (1,1,1,1,1)
  calculated from the input of steel estimated for machinery (steel, low alloyed, hot rolled)
  production volume 0 kg; = gluing_plant_pv * w_steel_lowalloyed/abs(mill)
    Calculated from production volume of reference product using the relative outputs.
  property price 0.149 EUR2005; name w_steel_lowalloyed_price_EUR2005
    Temporary price data. Calculated as 90% of purchasers price based on: estimated at 85% of sorted scrap
  property carbon content 0
    carbon content on a dry matter basis (reserved; not for manual entry)
  properties: water in wet mass 0 kg, carbon content, fossil 0, carbon content, non-fossil 0, water content 0, wet mass 1 kg, dry mass 1 kg, carbon allocation 0 kg

## Inputs from technosphere
- reinforcing steel: 45040 kg; name m_reinforcing_steel; = v_concrete*80; lognormal variance with pedigree 0.0114, pedigree (4,3,2,5,1)
  With 80 kg of reinforcing steel per m3 of reinforced
  concrete
  properties: carbon content, fossil 0.004, dry mass 1 kg, UVEK_link_1 3785, wet mass 1 kg, UVEK_relative_amount_1 1
  note on UVEK_link_1: to be used only in special submissions in coordination with ecoinvent and the Swiss FOEN
- concrete, normal: 0 m3; name v_concrete; pedigree (1,1,1,1,1)
  average size of Swiss gluelam plant
  properties: water content 0.086758, wet mass 2380 kg, dry mass 2190 kg
- waste reinforced concrete: -1.28646e6 kg; name w_reinforced_concrete; = (v_concrete*2205+m_reinforcing_steel)*-1; lognormal variance with pedigree 0.004, pedigree (2,3,2,5,1)
  calculated from the input of concrete and reinforcement steel; 2205 kg concrete/m3
  production volume 1.15781e10 kg; = w_reinforced_concrete*gluing_plant_pv/abs(mill)
    Calculated from production volume of reference product using the relative outputs.
  property price 0 EUR2005; name w_reinforced_concrete_price_EUR2005
  properties: UVEK_relative_amount_1 -1, dry mass 0.99418 kg, UVEK_link_1 883, water content 0.00585407, wet mass 1 kg
- steel, low-alloyed, hot rolled: 384035 kg; name m_steel_lowalloyed; lognormal variance with pedigree 0.0208, pedigree (3,5,2,5,3)
  estimate for machinery; extrapolated from planing mill via building size.
  properties: UVEK_relative_amount_2 1, UVEK_link_2 2662, UVEK_link_1 4222, carbon content, fossil 0.005, UVEK_relative_amount_1 1, dry mass 1 kg, wet mass 1 kg
  note on carbon content, fossil: Low alloyed steel composition given in Tab. 3.2 ecoinvent v2.2 report 10_partII. Steel assumed to have a C content of 0.5%
- building, hall: 5775 m2; lognormal variance with pedigree 0.3202, pedigree (3,5,2,5,3)
  average size of Swiss gluelam plant
  properties: UVEK_relative_amount_1 1, UVEK_link_9 4433, UVEK_link_1 342, UVEK_link_8 4417, UVEK_relative_amount_9 8.50171, UVEK_relative_amount_8 6.53333
  note on UVEK_link_9: This link has been introduced to model transport specifically for the SAM model; to be used only in special submissions in coordination with ecoinvent and the Swiss FOEN.
  note on UVEK_relative_amount_9: Scaling factor = amount of transport in corresponding KBOB dataset/amount of this input from technosphere. Source for transport distance: Life Cycle Inventories of Wood as Fuel and Construction Material/2007/Werner F. To be used only in special submissions in coordination with ecoinvent and the Swiss FOEN
- iron scrap, unsorted: -384035 kg; lognormal variance with pedigree 0.004, pedigree (2,3,2,5,1)
  (same comment as for iron scrap, unsorted)
  production volume 3.45632e9 kg
  properties: wet mass 1 kg, dry mass 1 kg
- concrete, normal: 12.7334, 1.32681, 10.7414, 6.04205, 25.5864, 0.863014, 505.707 m3 (7 entries); lognormal variance with pedigree 0.3202, pedigree (3,5,2,5,3)
  average size of Swiss gluelam plant

## Inputs from nature
- Transformation, from unspecified [natural resource, land]: 5775 m2; lognormal variance with pedigree 0.3202, pedigree (3,5,2,5,3)
  average size of Swiss gluelam plant
- Transformation, to industrial area [natural resource, land]: 5775 m2; lognormal variance with pedigree 0.3202, pedigree (3,5,2,5,3)
  average size of Swiss gluelam plant
- Occupation, industrial area [natural resource, land]: 288750 m2*year; lognormal variance with pedigree 0.3202, pedigree (3,5,2,5,3)
  occupation assumed to last 50 years

## Sampling procedure
Sampling of three GLULAM producers in Switzerland.

## Extrapolations
See Geography and Technology. GLO dataset is a copy of the RER datasets.
