# millet production

Dataset: EcoSpold 2, unit process
Geography: RoW
Time period: 2015-01-01 to 2021-12-31
Technology level: current
Classification: ISIC rev.4 ecoinvent: 0111:Growing of cereals (except rice), leguminous crops and oil seeds
Scenario: Business-as-Usual
System model: Allocation, cut-off by classification
Generated by: Sanjeevan Bajaj
Database: ecoinvent
isCopyrightProtected: true
accessRestrictedTo: 1

## General comment
This dataset represents the production of 1 kg of Pearl Millet during May-October, 2016 at a farm located in village Khokhar Kalan, District Mansa of Punjab State. The farm has a yield of 2625 kg fresh matter per ha for this crop cycle. Sowing date for the crop is 22-July, 2016 and harvesting date is 18-October, 2016. Mineral NP fertilizer input is 40-40 kg/ha. Machinery is used only for soil cultivation with fuel consumption of 19.03 kg/ha using plough for soil tillage and others.

## Included activities start
This activity starts about three weeks after the harvest of the previous crop. The soil is prepared for cultivation in first week of May and sowing of seeds started about eleven weeks after soil preparation. Thereafter the crop is mature for harvesting in about 2.5 months.

## Included activities end
The activity ends with the harvesting of the mature Pearl millet plant

## Technology
Cultivation of Pearl Millet follows conventional production standards

## Time period
Soil cultivating date for the main crop: 04-May, 2016; Harvesting date main crop: 18-October, 2016. The soil cultivation, sowing and harvesting dates are taken as the middle date of the week or fortnight told to the data collector by the farmer. Total time from date of sowing to date of harvesting comes to 90 days. The data is collected for one crop cycle. The cycle of one year is considered for entry in ecoeditor.

## Parameters
- LUC_crop_specific: 1 dimensionless
  This parameter allows to switch between a "crop specific" and a "country specific" approach when calculating the LUC of a crop. By default, the chosen approach is "crop specific", so the value of the parameter is 1. If you want to apply a "country specific" approach, turn the parameter to 0.

## Reference product
- millet: 1 kg; By-product classification allocatable product; CPC 0118: Millet
  production volume 2.02775e10 kg; = 28357451*1000
    http://www.fao.org/faostat/en/#data/QC 2016 data given in tonnes
  property price 0.221264 EUR2005
    Literature value. Price from FAOSTAT data Producer Prices - Annual (retrieved from: http://www.fao.org/faostat/en/#data/PP, accessed 15Feb2018). Data from 2005.
  property carbon content, non-fossil 0.475
    biogenic carbon content on a dry matter basis from faostat.
    Reference: http://www.fao.org/forestry/17111/en
  property carbon content 0.475
    carbon content on a dry matter basis (reserved; not for manual entry)
  properties: water in wet mass 0.0867 kg, water content 0.0949305, carbon content, fossil 0, wet mass 1 kg, dry mass 0.9133 kg, carbon allocation 0.433818 kg

## Inputs from technosphere
- inorganic nitrogen fertiliser, as N: 0 kg; pedigree (1,1,1,1,1)
  The data was collected for a hectare area through interview
  properties: dry mass 1 kg, wet mass 1 kg
- wheat seed, for sowing: 0.00119238 kg; lognormal variance with pedigree 0.006, pedigree (3,3,2,5,2)
  The data was collected for a hectare area through interview
  property carbon content, non-fossil 0.464601; name C_content_non_fossil
  property dry mass 0.85 kg; name DM; = WM- WWM
  property water in wet mass 0.15 kg; name WWM
  property water content 0.176471; name water_content; = WWM/ DM
  property wet mass 1 kg; name WM
  note on carbon content, non-fossil: Composition data obtained from Wheat, soft red winter, in (http://www.nal.usda.gov/fnic/foodcomp/search/). First, composition data were refered to 1 kg dry mass. Then, C-contents were calculated considering a C-content/dry mass of 46% in carbohydrates (including fibres), 53% in proteins and 75% in fats. All data from "Evolutionary and Biochemical Aspects", A.D. Kay and T. Vrede (in Global Ecology, 2010, Elsevier B.V., S.E. Jørgensen Ed.).
- diesel, burned in agricultural machinery: 0.0880905 MJ; lognormal variance with pedigree 0.006, pedigree (3,3,2,5,2)
  The data was collected for a hectare area through interview
- urea: 0 kg; pedigree (1,1,1,1,1)
  The exchange has been updated from 'urea, as N' into 'urea' and therefore its amount has been scaled (multiplied) from 0.011 kg by 2.1438 kg of 'urea' per kg of 'urea, as N'. Original comment of the exchange is: The data was collected for a hectare area through interview
  properties: dry mass 1 kg, wet mass 1 kg, carbon content, fossil 0.2
- packaging, for fertilisers: 0.0609524 kg; lognormal variance with pedigree 0.0514, pedigree (4,3,2,5,4)
  Total amount of active substance/s of fertilisers needed for the production of 'millet' is calculated to be circa 3.05E-02 kg. Fertiliser/s used in this dataset is/are: 'nitrogen fertiliser, as N', 'phosphate fertiliser, as P2O5', 'urea, as N'. The total amount of active substance/s is doubled in order to account for the packaging of the dilluted product of fertiliser/s that is/are applied. Therefore, 6.10E-02 kg of packaging for fertilisers is justified with this exchange.
  properties: price 0.0642 EUR2005, carbon content, fossil 0.825301, dry mass 1 kg, wet mass 1 kg, heating value, net 25.01 MJ
  note on carbon content, fossil: Considering a chemical formula (C2H4)n for polyethylene, carbon content-fossil is calculated to be 0.856286 kg of Carbon per kg of dry mass.
- inorganic phosphorus fertiliser, as P2O5: 0 kg; pedigree (1,1,1,1,1)
  This exchange is an aggregation of amounts:
  0.004266666666666667. Comment:
  0.010971428571428571. Comment:
  properties: wet mass 1 kg, dry mass 1 kg
- tillage, ploughing: 0.000202764 ha; lognormal variance with pedigree 0.006, pedigree (3,3,2,5,2)
  The data was collected for a hectare area through interview
- inorganic nitrogen fertiliser, as N: 2.2338e-5, 3.21079e-5, 2.8697e-5, 0.000100808, 6.02037e-5, 7.46213e-7, 4.46807e-6, 0.000566129, 1.05806e-5, 1.58916e-6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 kg (29 entries); lognormal variance with pedigree 0.006, pedigree (3,3,2,5,2)
  The data was collected for a hectare area through interview
- urea: 0.0176619, 0.00324277, 0.00261584 kg (3 entries); lognormal variance with pedigree 0.006, pedigree (3,3,2,5,2)
  (same comment as for urea)
- inorganic phosphorus fertiliser, as P2O5: 0.000116426, 0.000151053, 0.000120953, 0.000947062, 0.000199556, 8.22247e-6, 2.16741e-5, 0.00223581, 4.02993e-5, 4.39763e-6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 kg (29 entries); lognormal variance with pedigree 0.006, pedigree (3,3,2,5,2)
  (same comment as for inorganic phosphorus fertiliser, as P2O5)

## Inputs from nature
- Transformation, to annual crop, non-irrigated [natural resource, land]: 3.80952 m2; lognormal variance with pedigree 0.0134, pedigree (3,3,2,5,2)
  Calculated Value. This value has been calculated by using the ecoinvent LCI calculation tool for crop production.
- Carbon dioxide, in air [natural resource, in air]: 1.21065 kg; lognormal variance with pedigree 0.006, pedigree (3,3,2,5,2)
  (same comment as for Transformation, to annual crop, non-irrigated)
- Transformation, from annual crop, non-irrigated [natural resource, land]: 3.80952 m2; lognormal variance with pedigree 0.0134, pedigree (3,3,2,5,2)
  (same comment as for Transformation, to annual crop, non-irrigated)
- Occupation, annual crop, non-irrigated [natural resource, land]: 1.5873 m2*year
  (same comment as for Transformation, to annual crop, non-irrigated)
- Energy, gross calorific value, in biomass [natural resource, biotic]: 13.928 MJ; lognormal variance with pedigree 0.006, pedigree (3,3,2,5,2)
  The data was collected for a hectare area through interview

## Emissions to nature
- Carbon dioxide, fossil [air, non-urban air or from high stacks]: 0.0172362 kg; lognormal variance with pedigree 0.0194, pedigree (4,5,2,5,2)
  (same comment as for Transformation, to annual crop, non-irrigated)
- Nitrogen oxides [air, non-urban air or from high stacks]: 0.000934524 kg; lognormal variance with pedigree 0.0588, pedigree (4,5,2,5,2)
  (same comment as for Transformation, to annual crop, non-irrigated)
- Dinitrogen monoxide [air, non-urban air or from high stacks]: 0.000482177 kg; lognormal variance with pedigree 0.0488, pedigree (4,5,2,5,2)
  (same comment as for Transformation, to annual crop, non-irrigated)
- Copper [soil, agricultural]: -3.70495e-6 kg
  (same comment as for Transformation, to annual crop, non-irrigated)
- Chromium [soil, agricultural]: 4.34846e-6 kg; lognormal variance with pedigree 0.0588, pedigree (4,5,2,5,2)
  (same comment as for Transformation, to annual crop, non-irrigated)
- Lead [soil, agricultural]: 1.27401e-6 kg; lognormal variance with pedigree 0.0582, pedigree (4,5,2,5,1)
  (same comment as for Transformation, to annual crop, non-irrigated)
- Nickel [soil, agricultural]: 5.71589e-7 kg; lognormal variance with pedigree 0.0588, pedigree (4,5,2,5,2)
  (same comment as for Transformation, to annual crop, non-irrigated)
- Nitrate [water, ground-]: 0.0364751 kg; lognormal variance with pedigree 0.0588, pedigree (4,5,2,5,2)
  (same comment as for Transformation, to annual crop, non-irrigated)
- Mercury [soil, agricultural]: -2.27168e-8 kg
  (same comment as for Transformation, to annual crop, non-irrigated)
- Phosphate [water, surface water]: 9.36891e-5 kg; lognormal variance with pedigree 0.0588, pedigree (4,5,2,5,2)
  (same comment as for Transformation, to annual crop, non-irrigated)
- Phosphorus [water, surface water]: -4.15405e-5 kg
  (same comment as for Transformation, to annual crop, non-irrigated)
- Cadmium, ion [water, surface water]: -4.25383e-9 kg
  (same comment as for Transformation, to annual crop, non-irrigated)
- Chromium, ion [water, ground-]: 3.13806e-6 kg; lognormal variance with pedigree 0.1088, pedigree (4,5,2,5,2)
  (same comment as for Transformation, to annual crop, non-irrigated)
- Copper, ion [water, surface water]: -3.42885e-7 kg
  (same comment as for Transformation, to annual crop, non-irrigated)
- Cadmium, ion [water, ground-]: 6.95768e-9 kg; lognormal variance with pedigree 0.1088, pedigree (4,5,2,5,2)
  (same comment as for Transformation, to annual crop, non-irrigated)
- Chromium, ion [water, surface water]: -4.54378e-7 kg
  (same comment as for Transformation, to annual crop, non-irrigated)
- Copper, ion [water, ground-]: 4.82147e-7 kg; lognormal variance with pedigree 0.1088, pedigree (4,5,2,5,2)
  (same comment as for Transformation, to annual crop, non-irrigated)
- Zinc [soil, agricultural]: -2.11428e-5 kg
  (same comment as for Transformation, to annual crop, non-irrigated)
- Lead [water, surface water]: -2.00188e-7 kg
  (same comment as for Transformation, to annual crop, non-irrigated)
- Lead [water, ground-]: 4.83593e-8 kg; lognormal variance with pedigree 0.1088, pedigree (4,5,2,5,2)
  (same comment as for Transformation, to annual crop, non-irrigated)
- Nickel, ion [water, surface water]: -3.06049e-7 kg
  (same comment as for Transformation, to annual crop, non-irrigated)
- Zinc, ion [water, surface water]: -4.85673e-7 kg
  (same comment as for Transformation, to annual crop, non-irrigated)
- Mercury [water, ground-]: 1.31628e-10 kg; lognormal variance with pedigree 0.1088, pedigree (4,5,2,5,2)
  (same comment as for Transformation, to annual crop, non-irrigated)
- Mercury [water, surface water]: -9.41458e-10 kg
  (same comment as for Transformation, to annual crop, non-irrigated)
- Phosphate [water, ground-]: 3.40688e-5 kg; lognormal variance with pedigree 0.0588, pedigree (4,5,2,5,2)
  (same comment as for Transformation, to annual crop, non-irrigated)
- Zinc, ion [water, ground-]: 2.53689e-6 kg; lognormal variance with pedigree 0.1088, pedigree (4,5,2,5,2)
  (same comment as for Transformation, to annual crop, non-irrigated)
- Cadmium [soil, agricultural]: 6.08455e-7 kg; lognormal variance with pedigree 0.0588, pedigree (4,5,2,5,2)
  (same comment as for Transformation, to annual crop, non-irrigated)
- Carbon dioxide, from soil or biomass stock [air, non-urban air or from high stacks]: 0.419048 kg; = 1100/2625
  Global average LUC emissions according 2nd edition of the Quantis-modified tool developed by Blonk Consultants 'WFLDB-adapted-Blonk 2014 direct-land-use-change-assessment-tool_2015-05-18a.xlsx', tab. 'Country & land use unknown'. The emission are based on the relative change in production areas in all countries for a given crop. The weighted average is used which takes into acount relative difference in crop expansion into primary forest, secondary forest, grassland, perennial and annual land. The amount of 1100 kg of CO2 per ha*year (taken from the tool) is divided with the yield of seed-cotton, 2625 kg per ha.
- Ammonia [air, non-urban air or from high stacks]: 0.00259018 kg; lognormal variance with pedigree 0.0268, pedigree (4,5,2,5,2)
  (same comment as for Transformation, to annual crop, non-irrigated)

## Sampling procedure
The farmer was identified and contacted by agriculture science faculty familiar with the local farmers in the region. Data was collected directly from the farmer through semi-structured interview using a questionnaire based on the input requirements of the ecoinvent LCI calculation tool for crop production. The farmer does not maintain any written records and has provided the data from recent memory. In this region, typically farmers are unable to provide exact name of active ingredient in the pesticide they use and the same was noted from details given on the pesticide packet. Individual farmer is not able to calculate fuel consumption for his own farm alone and this information has been collected from farming community of the area.

## Extrapolations
Ecoinvent LCI calculation tool for crop production was used to calculate field emissions from the cultivation process. Number of wet days and rainfall data is normal average for the district (Mansa) where the farm is located
