# sugarcane production

Dataset: EcoSpold 2, unit process
Geography: RoW
Time period: 1996-01-01 to 2021-12-31
Technology level: current
Classification: ISIC rev.4 ecoinvent: 0114:Growing of sugar cane
Scenario: Business-as-Usual
System model: Allocation, cut-off by classification
Share of production covered: 100 %
Generated by: Jürgen Sutter
Published in: Jungbluth N. 2007
Database: ecoinvent
isCopyrightProtected: true
accessRestrictedTo: 1

## General comment
This dataset represents the production of 1 kg of sugar cane (fresh matter). The yield is 66300 kg/ha at a moisture content at storage of 71.4%.
[This dataset was already contained in the ecoinvent database version 2. It was not individually updated during the transfer to ecoinvent version 3. Life Cycle Impact Assessment results may still have changed, as they are affected by changes in the supply chain, i.e. in other datasets. This dataset was generated following the ecoinvent quality guidelines for version 2. It may have been subject to central changes described in the ecoinvent version 3 change report (http://www.ecoinvent.org/database/ecoinvent-version-3/reports-of-changes/), and the results of the central updates were reviewed extensively. The changes added e.g. consistent water flows and other information throughout the database. The documentation of this dataset can be found in the ecoinvent reports of version 2, which are still available via the ecoinvent website. The change report linked above covers all central changes that were made during the conversion process.]
This activity was adapted to include the global average land use change (LUC) emissions according 2nd edition of the Quantis-modified tool developed by Blonk Consultants 'WFLDB-adapted-Blonk 2014 direct-land-use-change-assessment-tool_2015-05-18a.xlsx', tab. 'Country & land use unknown'. The size of the emission depends on (i) the relative crop expansion in all countries of the crop during the last 20 years and (ii) the corresponding, country specific land transformations. The current results are based on the average FAOSTAT data (harvested area) of 2009-2011 and 1989-1991. The weighted average is used which takes into account relative difference in crop expansion into primary forest, secondary forest, grassland, perennial and annual land.

## Included activities start
This activity assumes sugar cane production on a plantation with a lifetime of 5 years and represents the average operation expenditures of the production of 1 kg of sugar cane averaged across the whole lifetime including establishment, operation and clearing of the plantation. The inputs of seeds, mineral fertilisers, stillage as a fertiliser and pesticides are considered.

## Included activities end
The dataset includes all machine operations and corresponding machine infrastructure and sheds. Some operations are done either by hand or mechanically; values in the inventory represent national averages. Machine operations are: soil cultivation, sowing, fertilisation, weed control, pest and pathogen control, combine-harvest transport from field to farm (1 km). Further, direct field emissions are included. This activity ends after harvest at the farm gate.

## Geography
The inventory is modelled for Brazil

## Technology
Cultivation of sugar cane with 20 % mechanical harvest and 80 % manuall harvest

## Time period
Time of publications

## Parameters
- annual yield, agriculture: 66.3 metric ton/(ha*year); name yield_agriculture
  Literature value: FAOSTAT
- fraction, irrigation water to surface water: 0.2 dimensionless; name fraction_IW_to_surface_water; lognormal variance with pedigree 0.0886, pedigree (4,3,1,1,4)
  Literature value (Döll, 2011) cross referenced with expert opinion.
- fraction, irrigation water, to ground water: 0.8 dimensionless; name fraction_IW_to_ground_water; lognormal variance with pedigree 0.0886, pedigree (4,3,1,1,4)
  Literature value (Döll, 2011) cross referenced with expert opinion.
- land transformation to: 0.15083 m2/kg; name T_t; = UnitConversion(1, 'ha', 'm2')/(yield_agriculture*UnitConversion(1, 'metric ton', 'kg')); lognormal variance with pedigree 0, pedigree (1,1,1,1,1)
  Calculated value
  Uncertainty: The variance for this uncertainty was set to zero to correct an error in data entry.
- fraction, irrigation water, to air: 0.586986 dimensionless; name fraction_IW_to_air; lognormal variance with pedigree 0.0409, pedigree (2,2,2,1,1)
  Literature value (Siebert, 2010) (Vionnet, S., Quantis Water Database - Technical Report, 2012).

## Reference product
- sugarcane: 1 kg; name REF_PRODUCT; source Macedo I.d.C. 2004; CPC 01802: Sugar cane; By-product classification allocatable product
  EcoSpold01Location=BR
  Average annual sugarcane yield: 68.7 t/ha (Macedo et al. 2004). In order to account for the input of 12 t of sugarcane cuttings (Granelli 2005; in practice usually provided by a professional breeding farm (Luiz 1996)) for setting up the plantation, the annual average yield is reduced by the mass of cuttings distributed to the 5 years of plantation lifetime to a corrected yield of: 66.3 t/ha --- Sources: Jose Granelli, personal communication, 2005, Industria de Alcool e Aguardente, Jose Granelli & Filhos Ltds, Sitio Sao Benedito Paraisolandia, Charqueada SP, Brazil. --- Luiz J., personal communication, 1996, Usina Sao Martinho S/A Açucar e alcool, Pradopolis.
  production volume 4.39417e11 kg
    Production volumes for 2005 were obtained from FAOSTAT
  property dry mass 0.286 kg; name REF_PRODUCT_DM
  property carbon content, non-fossil 0.41958; name REF_PRODUCT_C_content_non_fossil
    biogene carbon content on a dry matter basis
  property water in wet mass 0.714 kg; name REF_PRODUCT_WWM; = 1-REF_PRODUCT_DM
  property energy content 4.95 MJ; name REF_PRODUCT_energy_content
    Source: www.copersucar.com.br; accessed 31 March 2006.
  property water content 2.4965; name REF_PRODUCT_water_content; = (1-REF_PRODUCT_DM)/REF_PRODUCT_DM
  property price 0.0281 EUR2005; name REF_PRODUCT_price_EUR2005
    Average 2005 prices for main producers of sugarcane, namely Brasil, India, China, Thailand, Pakistan and Mexico. from Import/Export data (US$ and tonnes) in FAO Producer prices Statistics Database; Comodity: sugar cane (Producer Prices)
  property carbon content, fossil 0; name REF_PRODUCT_C_content_fossil
    fossil carbon content on a dry matter basis
  property wet mass 1 kg; name REF_PRODUCT_WM
  property carbon content 0.41958
    carbon content on a dry matter basis (reserved; not for manual entry)
  properties: carbon allocation 0.12 kg

## Inputs from technosphere
- phenoxy-compound: 2.3127e-6 kg; source CETESB 1988; lognormal variance with pedigree 0.042, pedigree (1,1,5,5,1)
  Amount of active ingredient are averages calculated for Brazil from CETESB (1988). Substnaces that are not availabe in the ecoinvent database are approximated by inventories of superordinate chemical classes. The inventories were assigned according to Sutter (2010, Tab. 2.25). If no inventory for the active ingredient or the corresponding chemical class was available, the pesticide was approximated with the product "pesticide, unspecified". --- Sources: Sutter J. (2010) Life Cycle Inventories of Pesticides. Swiss Centre for Life Cycle Inventories, St. Gallen, Switzerland.
  EcoSpold01Location=RER
  Uncertainty: Literature 1998
  properties: carbon content, fossil 0.532559, wet mass 1 kg, dry mass 1 kg
  note on carbon content, fossil: An unweighted average of the C content in mCPA, mCPB, mecoprop, fluazifop-P-butyl, and 2,4-D. Those substances are classified as phenoxy-compounds in Tab 2.25, Sutter 2010
- organic nitrogen fertiliser, as N: 0.000395491 kg; = 1.5083*0.00026221
  Calculated value. The amount of vinasse is 100 m3/ha (Macedo 1996) resulting in 1.5083kg of vinasse/kg of sugarcane. N input in addition to mineral fertilisers: 0.27 kg/m3 (according to Bichara & Filho1990). --- Sources: Bichara J.M. & Filho J.P. (1990) Aspectos gerais do gerenciamento ambiental na agroindustria canavieira. Paper presented at I Simposio Nacional de Gerenciamento Ambiental na Industria, Brazil. 1kg of vinasse, from fermentation of sugarcane contain 0.00026221 kg of nitrogen fertiliser, as N, 0.0009812 kg of potassium fertiliser, as K2O and 0.00012306 kg of phosphate fertiliser, as P2O5.
  properties: wet mass 1 kg, dry mass 1 kg, nitrogen content 1
  note on nitrogen content: Nitrogen content (on a dry matter basis) of organic nitrogen fertiliser, as N is calculated from the molecular formula of the substance (Nitrogen).
- harvesting, by complete harvester, beets: 3.7099e-7 ha; source Macedo I.d.C. 1996; lognormal variance with pedigree 0.052, pedigree (1,1,5,5,1)
  EcoSpold01Location=CH
  Approximation of a sugarcane completeharvester for mechanical harvest (applied for 20% of sugarcane in Brazil, Macedo 1998). Calculated based on diesel consumption of machine operations in sugarcane production in Brazil (Macedo 1996) and on diesel consumption of the respective machine operation per hectare according to Nemecek et al. (2004). --- Sources: Macedo I.d.C. (1998) Greenhouse gas emissions and energy balances in bioethanol production and utilization in Brazil (1996). Biomass and Bioenergy 14, 77-81. --- Nemecek T., Heil A., Huguenin O., Meier S., Erzinger S., Blaser S., Dux D. & Zimmerman A. (2004) Life Cycle Inventories of Agricultural Production Systems. Ecoinvent report no. 15. Swiss Centre for Life Cycle Inventories, Duebendorf (Switzerland).
  Uncertainty: Macedo 1996
- potassium sulfate: 0 kg; source FAO 2004; pedigree (1,1,1,1,1)
  EcoSpold01Location=RER
  The exchange has been updated from 'potassium sulfate, as K2O' into 'potassium sulfate' and therefore its amount has been scaled (multiplied) from 0 kg by 1.85 kg of 'potassium sulfate' per kg of 'potassium sulfate, as K2O'. Original comment of the exchange is: Amount of nutrient and portion of fertiliser product from FAO (2004)
  Uncertainty: FAO 2004
  properties: dry mass 1 kg, wet mass 1 kg
- packaging, for fertilisers: 0.02119 kg; lognormal variance with pedigree 0.0912, pedigree (4,3,5,5,4)
  Total amount of active substance/s of fertilisers needed for the production of 'sugarcane' is calculated to be circa 1.06E-02 kg. Fertiliser/s used in this dataset is/are: 'ammonium sulfate, as N', 'lime', 'nitrogen fertiliser, as N', 'nitrogen fertiliser, as N', 'phosphate fertiliser, as P2O5', 'phosphate fertiliser, as P2O5', 'phosphate fertiliser, as P2O5', 'phosphate rock, as P2O5, beneficiated, dry', 'potassium chloride, as K2O', 'potassium fertiliser, as K2O', 'potassium fertiliser, as K2O', 'potassium fertiliser, as K2O', 'potassium sulfate, as K2O', 'urea, as N'. The total amount of active substance/s is doubled in order to account for the packaging of the dilluted product of fertiliser/s that is/are applied. Therefore, 2.12E-02 kg of packaging for fertilisers is justified with this exchange.
  properties: heating value, net 25.01 MJ, dry mass 1 kg, carbon content, fossil 0.825301, wet mass 1 kg, price 0.0642 EUR2005
  note on carbon content, fossil: Considering a chemical formula (C2H4)n for polyethylene, carbon content-fossil is calculated to be 0.856286 kg of Carbon per kg of dry mass.
- ammonium sulfate: 0.00013273 kg; source FAO 2004; lognormal variance with pedigree 0.042, pedigree (1,1,5,5,1)
  Amount of nutrient and portion of fertiliser product from FAO (2004)
  EcoSpold01Location=RER
  Uncertainty: FAO 2004
  properties: wet mass 1 kg, dry mass 1 kg
- packaging, for pesticides: 0.000143388 kg; lognormal variance with pedigree 0.0912, pedigree (4,3,5,5,4)
  Total amount of active substance/s of pesticides needed for the production of sugarcane is calculated to be circa 7.17E-05 kg. Pesticide/s used in this dataset is/are: '[sulfonyl]urea-compound', 'glyphosate', 'pesticide, unspecified', 'phenoxy-compound', 'triazine-compound, unspecified'. The total amount of active substance/s is doubled in order to account for the packaging of the dilluted product of pesticide/s that is/are applied. Therefore, 1.43E-04 kg of packaging for pesticides is justified with this exchange.
  properties: dry mass 1 kg, wet mass 1 kg, price 0.0642 EUR2005, carbon content, fossil 0.85714, heating value, net 25.97 MJ
- fertilising, by broadcaster: 1.1975e-6 ha; source Macedo I.d.C. 1996; lognormal variance with pedigree 0.052, pedigree (1,1,5,5,1)
  Includes limstone application. Calculated based on diesel consumption of machine operations in sugarcane production in Brazil (Macedo 1996) and on diesel consumption of the respective machine operation per hectare according to Nemecek et al. (2004). --- Sources: Nemecek T., Heil A., Huguenin O., Meier S., Erzinger S., Blaser S., Dux D. & Zimmerman A. (2004) Life Cycle Inventories of Agricultural Production Systems. Ecoinvent report no. 15. Swiss Centre for Life Cycle Inventories, Duebendorf (Switzerland).
  EcoSpold01Location=CH
  Uncertainty: Macedo 1996
- inorganic nitrogen fertiliser, as N: 0 kg; source FAO 2004; pedigree (1,1,1,1,1)
  (same comment as for ammonium sulfate)
  properties: wet mass 1 kg, dry mass 1 kg
- organic phosphorus fertiliser, as P2O5: 0.000185611 kg; = 1.5083*0.00012306
  (same comment as for organic nitrogen fertiliser, as N)
  properties: phosphorus content 0.436421, oxygen content 0.563579, dry mass 1 kg, wet mass 1 kg
  note on phosphorus content: Phosphorus content (on a dry matter basis) of organic phosphorus fertiliser, as P2O5 is calculated from the molecular formula of the substance (Phosphorus).
  note on oxygen content: Oxygen content (on a dry matter basis) of organic phosphorus fertiliser, as P2O5 is calculated from the molecular formula of the substance (Phosphorus).
- phosphate rock, beneficiated: 0 kg; source FAO 2004; pedigree (1,1,1,1,1)
  EcoSpold01Location=MA
  The exchange has been updated from 'phosphate rock, as P2O5, beneficiated, dry' into 'phosphate rock, beneficiated' and therefore its amount has been scaled (multiplied) from 0 kg by 3.125 kg of 'phosphate rock, beneficiated' per kg of 'phosphate rock, as P2O5, beneficiated, dry'. Original comment of the exchange is: Amount of nutrient and portion of fertiliser product from FAO (2004)
  Uncertainty: FAO 2004
  properties: dry mass 1 kg, wet mass 1 kg
- triazine-compound, unspecified: 9.3514e-6 kg; source CETESB 1988; lognormal variance with pedigree 0.042, pedigree (1,1,5,5,1)
  EcoSpold01Location=RER
  Amount of active ingredient are averages calculated for Brazil from CETESB (1988). Substnaces that are not availabe in the ecoinvent database are approximated by inventories of superordinate chemical classes. The inventories were assigned according to Sutter (2010, Tab. 2.25). If no inventory for the active ingredient or the corresponding chemical class was available, the pesticide was approximated with the product "pesticide, unspecified". --- Sources: Sutter J. (2010) Life Cycle Inventories of Pesticides. Swiss Centre for Life Cycle Inventories, St. Gallen, Switzerland.
  Uncertainty: Literature 1998
  properties: dry mass 1 kg, wet mass 1 kg, carbon content, fossil 0.475616
  note on carbon content, fossil: An unweighted average of the C content in Atrazine, Cyanazine, metamitron, simazine, and terbuthylazine. Those substances are classified as triazine-compounds in Tab 2.25, Sutter 2010
- application of plant protection product, by field sprayer: 2.6347e-6 ha; source Macedo I.d.C. 1996; lognormal variance with pedigree 0.052, pedigree (1,1,5,5,1)
  EcoSpold01Location=CH
  Calculated based on diesel consumption of machine operations in sugarcane production in Brazil (Macedo 1996) and on diesel consumption of the respective machine operation per hectare according to Nemecek et al. (2004). --- Sources: Nemecek T., Heil A., Huguenin O., Meier S., Erzinger S., Blaser S., Dux D. & Zimmerman A. (2004) Life Cycle Inventories of Agricultural Production Systems. Ecoinvent report no. 15. Swiss Centre for Life Cycle Inventories, Duebendorf (Switzerland).
  Uncertainty: Macedo 1996
- planting: 1.267e-7 ha; source Macedo I.d.C. 1996; lognormal variance with pedigree 0.052, pedigree (1,1,5,5,1)
  Calculated based on diesel consumption of machine operations in sugarcane production in Brazil (Macedo 1996) and on diesel consumption of the respective machine operation per hectare according to Nemecek et al. (2004). --- Sources: Nemecek T., Heil A., Huguenin O., Meier S., Erzinger S., Blaser S., Dux D. & Zimmerman A. (2004) Life Cycle Inventories of Agricultural Production Systems. Ecoinvent report no. 15. Swiss Centre for Life Cycle Inventories, Duebendorf (Switzerland).
  EcoSpold01Location=CH
  Uncertainty: Macedo 1996
- urea: 0 kg; source FAO 2004; pedigree (1,1,1,1,1)
  EcoSpold01Location=RER
  The exchange has been updated from 'urea, as N' into 'urea' and therefore its amount has been scaled (multiplied) from 0.0004 kg by 2.1438 kg of 'urea' per kg of 'urea, as N'. Original comment of the exchange is: Amount of nutrient and portion of fertiliser product from FAO (2004)
  Uncertainty: FAO 2004
  properties: wet mass 1 kg, dry mass 1 kg, carbon content, fossil 0.2
- transport, tractor and trailer, agricultural: 0.0051735 metric ton*km; source Macedo I.d.C. 1996; lognormal variance with pedigree 0.172, pedigree (1,1,5,5,1)
  Approximation of spreading of vinasse with a tractor. Calculated based on diesel consumption of machine operations in sugarcane production in Brazil (Macedo 1996) and on diesel consumption of the respective machine operation per hectare according to Nemecek et al. (2004). --- Sources: Nemecek T., Heil A., Huguenin O., Meier S., Erzinger S., Blaser S., Dux D. & Zimmerman A. (2004) Life Cycle Inventories of Agricultural Production Systems. Ecoinvent report no. 15. Swiss Centre for Life Cycle Inventories, Duebendorf (Switzerland).
  EcoSpold01Location=CH
  Uncertainty: Macedo 1996
- fodder loading, by self-loading trailer: 2.467e-6 m3; source Macedo I.d.C. 1996; lognormal variance with pedigree 0.052, pedigree (1,1,5,5,1)
  EcoSpold01Location=CH
  Approximation of a cane loader used in manual harvest (applied for 80% of sugarcane in Brazil, Macedo 1998). Calculated based on diesel consumption of machine operations in sugarcane production in Brazil (Macedo 1996) and on diesel consumption of the respective machine operation per hectare according to Nemecek et al. (2004). --- Sources: Macedo I.d.C. (1998) Greenhouse gas emissions and energy balances in bioethanol production and utilization in Brazil (1996). Biomass and Bioenergy 14, 77-81. --- Nemecek T., Heil A., Huguenin O., Meier S., Erzinger S., Blaser S., Dux D. & Zimmerman A. (2004) Life Cycle Inventories of Agricultural Production Systems. Ecoinvent report no. 15. Swiss Centre for Life Cycle Inventories, Duebendorf (Switzerland).
  Uncertainty: Macedo 1996
- tillage, ploughing: 3.0485e-7 ha; source Macedo I.d.C. 1996; lognormal variance with pedigree 0.052, pedigree (1,1,5,5,1)
  (same comment as for planting)
- tillage, harrowing, by spring tine harrow: 9.605e-6 ha; source Macedo I.d.C. 1996; lognormal variance with pedigree 0.052, pedigree (1,1,5,5,1)
  Represents harrowing and also approximates the field operations 'stubble elimination', 'chemical cultivation', 'mechanical cultivation', 'soil cultivation' and 'waste accumulation'. Calculated based on diesel consumption of machine operations in sugarcane production in Brazil (Macedo 1996) and on diesel consumption of the respective machine operation per hectare according to Nemecek et al. (2004). --- Sources: Nemecek T., Heil A., Huguenin O., Meier S., Erzinger S., Blaser S., Dux D. & Zimmerman A. (2004) Life Cycle Inventories of Agricultural Production Systems. Ecoinvent report no. 15. Swiss Centre for Life Cycle Inventories, Duebendorf (Switzerland).
  EcoSpold01Location=CH
  Uncertainty: Macedo 1996
- pesticide, unspecified: 4.8919e-5 kg; source CETESB 1988; lognormal variance with pedigree 0.042, pedigree (1,1,5,5,1)
  EcoSpold01Location=RER
  Amount of active ingredient are averages calculated for Brazil from CETESB (1988). Substnaces that are not availabe in the ecoinvent database are approximated by inventories of superordinate chemical classes. The inventories were assigned according to Sutter (2010, Tab. 2.25). If no inventory for the active ingredient or the corresponding chemical class was available, the pesticide was approximated with the product "pesticide, unspecified". --- Sources: Sutter J. (2010) Life Cycle Inventories of Pesticides. Swiss Centre for Life Cycle Inventories, St. Gallen, Switzerland.
  Uncertainty: CETESB 1988
  properties: wet mass 1 kg, carbon content, fossil 0.486978, dry mass 1 kg
  note on carbon content, fossil: Mean of C content in all pesticides whose formula has been documented in Sutter 2010
- inorganic potassium fertiliser, as K2O: 0 kg; source FAO 2004; pedigree (1,1,1,1,1)
  Amount of nutrient and portion of fertiliser product from FAO (2004). It refers to potassium nitrate.
  Uncertainty: FAO 2004
- lime: 0.0052036 kg; source Macedo I.d.C. 1996; lognormal variance with pedigree 0.042, pedigree (1,1,5,5,1)
  Application of limestone every 5 years. Annual average calculated from amounts given in CRC Sugar (2002) and Macedo (1996). --- Sources: CRC Sugar (2002) Improving the health of difficult soils: Managing soil acidification. Retrieved 10 November 2005 from http://www.sugar.jcu.edu.au/images/publications/info_sheets/16.%20Improving%20the%20Health%20of%20Difficult%20Soils.pdf. --- Macedo I.d.C. (1996) Greenhouse gas emissions and avoided emissions in the production and utilization of sugar cane, sugar and ethanol in Brazil: 1990-1994. From http://www.mct.gov.br/clima/ingles/comunic_old/coperal.thm.
  EcoSpold01Location=CH
  Uncertainty: CRC Sugar 2002
  properties: dry mass 1 kg, carbon content, fossil 0.120005, wet mass 1 kg
- liquid manure spreading, by vacuum tanker: 0.00033183 m3; source Macedo I.d.C. 1996; lognormal variance with pedigree 0.052, pedigree (1,1,5,5,1)
  EcoSpold01Location=CH
  Approximation for the spreading of vinasse (Macedo 1996); the transports of vinasse to the farm are included in the market dataset of vinasse.
  Uncertainty: Macedo 1996
- glyphosate: 3.3182e-6 kg; source CETESB 1988; lognormal variance with pedigree 0.042, pedigree (1,1,5,5,1)
  (same comment as for pesticide, unspecified)
  properties: wet mass 1 kg, carbon content, fossil 0.214286, dry mass 1 kg
- potassium chloride: 0.00257363 kg; source FAO 2004; lognormal variance with pedigree 0.042, pedigree (1,1,5,5,1)
  The exchange has been updated from 'potassium chloride, as K2O' into 'potassium chloride' and therefore its amount has been scaled (multiplied) from 0.0016 kg by 1.5829 kg of 'potassium chloride' per kg of 'potassium chloride, as K2O'. Original comment of the exchange is: Amount of nutrient and portion of fertiliser product from FAO (2004)
  EcoSpold01Location=RER
  Uncertainty: FAO 2004
  properties: dry mass 1 kg, wet mass 1 kg
- [sulfonyl]urea-compound: 7.7929e-6 kg; source CETESB 1988; lognormal variance with pedigree 0.042, pedigree (1,1,5,5,1)
  Amount of active ingredient are averages calculated for Brazil from CETESB (1988). Substnaces that are not availabe in the ecoinvent database are approximated by inventories of superordinate chemical classes. The inventories were assigned according to Sutter (2010, Tab. 2.25). If no inventory for the active ingredient or the corresponding chemical class was available, the pesticide was approximated with the product "pesticide, unspecified". --- Sources: Sutter J. (2010) Life Cycle Inventories of Pesticides. Swiss Centre for Life Cycle Inventories, St. Gallen, Switzerland.
  EcoSpold01Location=RER
  Uncertainty: CETESB 1988
  properties: dry mass 1 kg, carbon content, fossil 0.540853, wet mass 1 kg
  note on carbon content, fossil: Approximated as an unweighted average of the C-content of the [sulfonyl]urea-compounds (Tab 2.25 Sutter, 2010) chlorotoluron, Diuron, Linuron and Isoproturon.
- inorganic phosphorus fertiliser, as P2O5: 0 kg; source FAO 2004; pedigree (1,1,1,1,1)
  (same comment as for ammonium sulfate)
  properties: dry mass 1 kg, wet mass 1 kg
- irrigation: 0 m3; name water_irrigation_input; pedigree (1,1,1,1,1)
  property dry mass 0.11 kg; name irrigation_DM
  property water content 9090.91; name irrigation_WC; = irrigation_WM/irrigation_DM
  property wet mass 1000 kg; name irrigation_WM
  property water in wet mass 999.89 kg; name irrigation_WWM; = irrigation_WM-irrigation_DM
- inorganic potassium fertiliser, as K2O: 1.6591e-5 kg; source FAO 2004; lognormal variance with pedigree 0.042, pedigree (1,1,5,5,1)
  (same comment as for inorganic potassium fertiliser, as K2O)
- potassium sulfate: 5.34054e-6, 2.53522e-5 kg (2 entries); source FAO 2004; lognormal variance with pedigree 0.042, pedigree (1,1,5,5,1)
  (same comment as for potassium sulfate)
- inorganic nitrogen fertiliser, as N: 1.38248e-6, 1.98712e-6, 1.77602e-6, 3.72594e-6, 4.61823e-8, 2.76524e-7, 3.50371e-5, 9.83512e-8, 9.55004e-9, 2.65833e-7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 kg (27 entries); source FAO 2004; lognormal variance with pedigree 0.042, pedigree (1,1,5,5,1)
  (same comment as for ammonium sulfate)
- phosphate rock, beneficiated: 1.54757e-6, 5.27877e-7, 1.54757e-6, 0.000116571 kg (4 entries); source FAO 2004; lognormal variance with pedigree 0.042, pedigree (1,1,5,5,1)
  (same comment as for phosphate rock, beneficiated)
- urea: 0.000641011, 0.000117691, 9.49375e-5 kg (3 entries); source FAO 2004; lognormal variance with pedigree 0.042, pedigree (1,1,5,5,1)
  (same comment as for urea)
- inorganic phosphorus fertiliser, as P2O5: 5.65607e-6, 7.33826e-6, 5.876e-6, 9.69458e-6, 3.99453e-7, 1.05294e-6, 0.000108617, 2.1364e-7, 4.66776e-8, 3.88681e-7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 kg (27 entries); source FAO 2004; lognormal variance with pedigree 0.042, pedigree (1,1,5,5,1)
  (same comment as for ammonium sulfate)
- irrigation: 3.73773e-5, 1.49509e-6, 0.00787166, 6.45031e-6, 0.000366265, 5.96164e-5, 0.000290773, 9.93796e-5, 0.000266456, 0.00147455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 m3 (14 entries); lognormal variance with pedigree 1.21, pedigree (5,5,5,5,5)
  properties: dry mass 0.11 kg, water content 9090.91, wet mass 1000 kg

## Inputs from nature
- Transformation, from annual crop, non-irrigated [natural resource, land]: 0.15083 m2; lognormal variance with pedigree 0.0526, pedigree (1,3,5,5,1)
  Modelled, see chapter 'Land use' in "01_crop production_direct field emissions and natural resources_v1.0.pdf" - pdf-document on the dedicated talk page of ecoinvent (www.ecoinvent.org/documentation)
  Uncertainty: Macedo 1996
- Transformation, to annual crop, non-irrigated, intensive [natural resource, land]: 0.15083 m2; lognormal variance with pedigree 0.0526, pedigree (1,3,5,5,1)
  (same comment as for Transformation, from annual crop, non-irrigated)
- Carbon dioxide, in air [natural resource, in air]: 0.44 kg; = 44/12 * (REF_PRODUCT_C_content_non_fossil * REF_PRODUCT * REF_PRODUCT_DM ); lognormal variance with pedigree 0.0606, pedigree (4,3,5,5,1)
  Modelled,see chapter 'CO2 binding' in "01_crop production_direct field emissions and natural resources_v1.0.pdf" - pdf-document on the dedicated talk page of ecoinvent (www.ecoinvent.org/documentation)
  Uncertainty: calculated from the carbon balance
- Energy, gross calorific value, in biomass [natural resource, biotic]: 4.9478 MJ; lognormal variance with pedigree 0.0517684, pedigree (4,3,5,1,1)
- Occupation, annual crop, non-irrigated, intensive [natural resource, land]: 0.13575 m2*year; lognormal variance with pedigree 0.0526, pedigree (1,3,5,5,1)
  (same comment as for Transformation, from annual crop, non-irrigated)

## Emissions to nature
- 2,4-D [soil, agricultural]: 2.3127e-6 kg; lognormal variance with pedigree 0.0706, pedigree (4,3,5,5,1)
  Modelled, see chapter 'Emissions of pesticides to agricultural soil' in "01_crop production_direct field emissions and natural resources_v1.0.pdf" - pdf-document on the dedicated talk page of ecoinvent (www.ecoinvent.org/documentation)
  Uncertainty: Calculated with standard method
- Lead [soil, agricultural]: 2.1527e-7 kg; source Nemecek, T. 2004; lognormal variance with pedigree 0.1006, pedigree (4,3,5,5,1)
  Calculated as the difference between heavy metal input through fertilisers and output through the harvested product. Heavy metal contents of sugarcane were extrapolated from those of miscanthus (cf. Jungbluth et al. 2007); heavy metal contents of mineral fertilisers according to Nemecek et al. (2004). Negative values represent a net export of heavy metals. --- Sources: Jungbluth N., Chudacoff M., Dauriat A., Dinkel F., Doka G., Faist Emmenegger M., Gnansounou E., Kljun N., Schleiss K., Spielmann M., Stettler C. & Sutter J. (2007) Life cycle inventories of bioenergy. ecoinvent report no. 17, Swiss Centre for Life Cycle Inventories, Dübendorf, Switzerland.
  Uncertainty: Calculated from the fertilizer input
- Linuron [soil, agricultural]: 7.7929e-6 kg; lognormal variance with pedigree 0.0706, pedigree (4,3,5,5,1)
  (same comment as for 2,4-D)
- Glyphosate [soil, agricultural]: 3.3182e-6 kg; lognormal variance with pedigree 0.0706, pedigree (4,3,5,5,1)
  (same comment as for 2,4-D)
- Water [water, surface water]: 0.00352103 m3; name water_to_water_surface; = water_irrigation_input*(1-fraction_IW_to_air)*fraction_IW_to_surface_water; lognormal variance with pedigree 1.21, pedigree (5,5,5,5,5)
  Calculated value. See the parameters and their comments to understand the calculation.
  property fraction, origin: salt water 0; name fraction_origin_salt_water_Wsw
  property fraction, origin: fresh water 1; name fraction_origin_fresh_water_Wsw
- Ammonia [air, non-urban air or from high stacks]: 0.000248605 kg; lognormal variance with pedigree 0.0706, pedigree (4,3,5,5,1)
  Modelled with the 'AGRAMMON model' described in "01_crop production_direct field emissions and natural resources_v1.0.pdf" - pdf-document on the dedicated talk page of ecoinvent (www.ecoinvent.org/documentation)
  Uncertainty: Calculated with standard method
- Particulates, > 10 um [air, urban air close to ground]: 0.003 kg; source Goldemberg J. 2002; lognormal variance with pedigree 0.1006, pedigree (4,3,5,5,1)
  Emission from burning of sugarcane fields as a preparation of harvest.
  Uncertainty: Calculated with standard method
- Carbon dioxide, from soil or biomass stock [air, non-urban air or from high stacks]: 0.0715384 kg; normal variance with pedigree 0.5452, pedigree (3,3,5,5,2)
  Global average LUC emissions according 2nd edition of the Quantis-modified tool developed by Blonk Consultants 'WFLDB-adapted-Blonk 2014 direct-land-use-change-assessment-tool_2015-05-18a.xlsx', tab. 'Country & land use unknown'. The emission are based on the relative change in production areas in all countries for a given crop. The weighted average is used which takes into acount relative difference in crop expansion into primary forest, secondary forest, grassland, perennial and annual land.
  Uncertainty: Uncertainty estimated based on IPCC 2006
- Atrazine [soil, agricultural]: 9.3514e-6 kg; lognormal variance with pedigree 0.0706, pedigree (4,3,5,5,1)
  (same comment as for 2,4-D)
- Zinc [soil, agricultural]: 2.1605e-6 kg
- Nitrate [water, ground-]: 0.00175213 kg; lognormal variance with pedigree 0.1006, pedigree (4,3,5,5,1)
  Modelled with the 'SQCB-NO3 model' described in "01_crop production_direct field emissions and natural resources_v1.0.pdf" - pdf-document on the dedicated talk page of ecoinvent (www.ecoinvent.org/documentation)
  Uncertainty: Calculated with standard method
- Nickel [soil, agricultural]: 1.049e-7 kg; source Nemecek, T. 2004; lognormal variance with pedigree 0.1006, pedigree (4,3,5,5,1)
  (same comment as for Lead)
- Arsenic [soil, agricultural]: 2.5373e-6 kg; lognormal variance with pedigree 0.1006, pedigree (4,3,5,5,1)
  This emissions represents the application of the pesticide 'Daconate' which contatins Arsenic. Modelled, based on chapter 'Emissions of pesticides to agricultural soil' in "01_crop production_direct field emissions and natural resources_v1.0.pdf" - pfd-document on the dedicated talk page of econinvent (www.ecoinvent.og/documentation).
  Uncertainty: Calculated with standard method
- Nitrogen oxides [air, non-urban air or from high stacks]: 4.42226e-6 kg; = 0.21 * N2O; lognormal variance with pedigree 0.08, pedigree (1,1,5,1,1)
  Modelled, see chapter 'Emissions of NOx to the air' in "01_crop production_direct field emissions and natural resources_v1.0.pdf" - pdf-document on the dedicated talk page of ecoinvent (www.ecoinvent.org/documentation)
- Phosphorus [water, surface water]: 3.0072e-6 kg; lognormal variance with pedigree 0.1006, pedigree (4,3,5,5,1)
  Modelled, see chapter 'Emissions of phosphorous to the water' in "01_crop production_direct field emissions and natural resources_v1.0.pdf" - pdf-document on the dedicated talk page of ecoinvent (www.ecoinvent.org/documentation)
  Uncertainty: Calculated with standard method
- Carbon monoxide, non-fossil [air, urban air close to ground]: 0.03 kg; source Goldemberg J. 2002; lognormal variance with pedigree 0.7106, pedigree (4,3,5,5,1)
  (same comment as for Particulates, > 10 um)
- Phosphorus [water, ground-]: 1.0558e-6 kg; lognormal variance with pedigree 0.1006, pedigree (4,3,5,5,1)
  (same comment as for Phosphorus)
- Methane, non-fossil [air, urban air close to ground]: 0.000286 kg; source Macedo I.d.C. 1998; lognormal variance with pedigree 0.1006, pedigree (4,3,5,5,1)
  (same comment as for Particulates, > 10 um)
- Copper [soil, agricultural]: 1.3009e-7 kg; source Nemecek, T. 2004; lognormal variance with pedigree 0.1006, pedigree (4,3,5,5,1)
  (same comment as for Lead)
- Aldrin [soil, agricultural]: 3.5646e-5 kg; lognormal variance with pedigree 0.0706, pedigree (4,3,5,5,1)
  (same comment as for 2,4-D)
- Chromium [soil, agricultural]: 2.1009e-7 kg; source Nemecek, T. 2004; lognormal variance with pedigree 0.1006, pedigree (4,3,5,5,1)
  (same comment as for Lead)
- Water [water, ground-]: 0.0140841 m3; name water_to_water_ground; = water_irrigation_input*(1-fraction_IW_to_air)*fraction_IW_to_ground_water; lognormal variance with pedigree 1.21, pedigree (5,5,5,5,5)
  Calculated value. See the parameters and their comments to understand the calculation.
  property fraction, origin: salt water 0; name fraction_origin_salt_water_Wgw
  property fraction, origin: fresh water 1; name fraction_origin_fresh_water_Wgw
  property fraction, origin: unspecified 0; name fraction_origin_unspecified_Wgw
- Water [air, unspecified]: 0.0250209 m3; name water_to_air_unspecified; = (water_irrigation_input*fraction_IW_to_air); lognormal variance with pedigree 1.21, pedigree (5,5,5,5,5)
  Calculated value based on literature values and expert opinion. See comments in the parametres' comment field.
  property fraction, origin: salt water 0; name fraction_origin_salt_water
  property fraction, origin: fresh water 1; name fraction_origin_fresh_water
  property fraction, origin: unspecified 0; name fraction_origin_unspecified
- Dinitrogen monoxide [air, non-urban air or from high stacks]: 2.10584e-5 kg; name N2O; lognormal variance with pedigree 0.08, pedigree (1,1,5,1,1)
  Modelled, see chapter 'Emissions of N2O to the air' in "01_crop production_direct field emissions and natural resources_v1.0.pdf" - pdf-document on the dedicated talk page of ecoinvent (www.ecoinvent.org/documentation)
- Cadmium [soil, agricultural]: 2.8088e-8 kg; source Nemecek, T. 2004; lognormal variance with pedigree 0.1006, pedigree (4,3,5,5,1)
  (same comment as for Lead)

## Sampling procedure
Literature data

## Extrapolations
Transports are modelled with standard distances. This dataset has been copied from an original dataset covering the geography BR.

## Review by Niels Jungbluth 2010-02-08
passed.
none
