# electrolysis of magnesium chloride, from titanium sponge production

Dataset: EcoSpold 2, unit process
Geography: RoW
Time period: 2020-01-01 to 2024-12-31
Technology level: current
Classification: ISIC rev.4 ecoinvent: 2420:Manufacture of basic precious and other non-ferrous metals
Scenario: Business-as-Usual
System model: Allocation, cut-off by classification
Generated by: David FitzGerald
Published in: Gao Feng 2018
Database: ecoinvent
isCopyrightProtected: true
accessRestrictedTo: 1

## General comment
This dataset models the electrolysis of 1 kg of magnesium chloride produced during the production of titanium sponge using the Kroll process, which is modelled by the following reaction: TiCl4+ 2Mg -> Ti + 2MgCl2. The electrolysis of magnesium chloride separates the magnesium from the chlorine through the following reaction: MgCl2 -> Mg + Cl2. The recovered Mg is fed back to the reduction and distillation process (which produces titanium sponge) and the chlorine is fed back to the chlorination and refining process (which produces titanium tetrachloride).
This dataset is a copy of the dataset covering the geography of China (CN), which is based on Gao et al. (2018). The data is assumed to be representative also of the global situation, since the Kroll process is the most commonly used method for the production of titanium sponge.
Reference:
Gao, F., Nie, Z., Yang, D., Sun, B., Liu, Y., Gong, X., & Wang, Z. (2018). Environmental impacts analysis of titanium sponge production using Kroll process in China. Journal of Cleaner Production, 174, 771-779. doi:https://doi.org/10.1016/j.jclepro.2017.09.240.

## Included activities start
The activity starts with the reception of magnesium chloride, obtained from the production of titanium sponge using the Kroll process.

## Included activities end
The activity ends with the recovery of magnesium and chlorine.

Infrastructure use is not included as this process is assumed to take place in the same facility as titanium spong production.

## Geography
The dataset has been approximated from the respective dataset for CN. The data is assumed to be representative also of the global situation.

## Technology
The reduction and distillation step of the Kroll process produces titanium sponge and magnesium chloride as a byproduct based on the following stoichiometric equation: TiCl4 + 2Mg -> Ti + 2MgCl2. The magnesium chloride is then separated via electrolysis in order to recover the magnesium and chlorine through the following reaction: MgCl2 -> Mg + Cl2.
After refining, the magnesium is recycled and serves again as input to the reduction and distillation process, while chlorine (after it is filtrated and purified) is recycled and sent back to the chlorination process as an input.
According to Gao et al. (2018), the chlorination step (2TiO2 + 4Cl2 + 3C -> 2TiCl4 + 2CO + CO2) requires 1620 kg of chlorine per metric ton of titanium sponge to compensate for the chlorine that is not recovered by the electrolysis of magnesium chloride. Based on stoichiometry, roughly 2962 kg of Cl2 are required to produce 1 metric ton of titanium sponge. This means the overall recovery rate of Cl is roughly 45%.
Because 0.093 kg of MgCl2 is lost in the reduction and distillation step, this means that 3.885 kg of MgCl2 per kg Ti are sent to electrolysis, out of which 1.342 kg of Cl are recovered. The amount of Cl recovered per kg of MgCl2 entering the electrolysis step is therefore 0.3455 kg and corresponds to a recovery rate of 46.4% in this step.
Based on the stoichiometric reaction of the reduction and distillation step, roughly 1.016 kg of Mg are required as input. Gao et al. (2018) report an input of 41 kg per metric ton of titanium sponge. The overall recovery rate of Mg is therefore approximately 96%.
0.97 kg of Mg is recovered out of the 3.885 kg of MgCl2 that goes to electrolysis. The amount of Mg recovered per kg of MgCl2 entering the electrolysis step is therefore 0.2509 kg and corresponds to a recovery rate of 98.3% in this step.

## Time period
Data are considered representative of current production practices. The data are assumed to be valid on average for 5 years after the publication of that article.

## Reference product
- magnesium chloride, from titanium sponge production: 0 kg; CPC 342: Basic inorganic chemicals n.e.c.; By-product classification Recyclable; CAS 7786-30-3
  production volume 0 kg; name RP_PV; = 200000000*3.885
    Equal to the amount of magnesium chloride produced in titanium sponge production (GLO).
  property price 0.0935471 EUR2005; name RP_amount_price_EUR2005
    Price calculated based on prices from wholesalers on alibaba.com (accessed on 2021-09-03). The average price based on 5 sellers is 139 $/Ton (assumed to be metric ton). This price was converted to EUR based on the annual exchange rates published by the European Central Bank (https://sdw.ecb.europa.eu/quickview.do?SERIES_KEY=120.EXR.A.USD.EUR.SP00.A), and then adjusted for inflation relative to 2005 by using the Harmonised Index of Consumer Prices (HICP) of the euro area, published by eurostat (https://ec.europa.eu/eurostat/databrowser/view/PRC_HICP_AIND/default/table).
  property carbon content 0
    carbon content on a dry matter basis (reserved; not for manual entry)
  properties: carbon content, non-fossil 0, water in wet mass 0 kg, chlorine content 0.7447, carbon content, fossil 0, water content 0, magnesium content 0.255299, dry mass 1 kg, wet mass 1 kg, carbon allocation 0 kg
- chlorine, for reuse in titanium tetrachloride production: 1 kg; name chlorine_amount; = (2962 - 1620)/1000/3.885; By-product classification allocatable product; CPC 34231: Chemical elements n.e.c.; inorganic acids except phosphoric, nitric and sulphonitric; inorganic oxygen compoun[…]; CAS 7782-50-5; pedigree (1,1,1,1,1)
  Value calculated based on value given Table 2 (column "Electrolysis of MgCl2") in Gao et al. (2018). According to that table, the chlorination step (2TiO2 + 4Cl2 + 3C -> 2TiCl4 + 2CO + CO2) requires 1620 kg of chlorine per metric ton of titanium sponge to compensate for the chlorine that is not recovered by the electrolysis of magnesium chloride. Based on stoichiometry, roughly 2962 kg of Cl2 are required to produce 1 metric ton of titanium sponge. This means the overall recovery rate of Cl is roughly 45%.
  Because 0.093 kg of MgCl2 is lost in the reduction and distillation step, this means that 3.885 kg of MgCl2 per kg Ti are sent to electrolysis, out of which 1.342 kg of Cl are recovered. The amount of Cl recovered per kg of MgCl2 entering the electrolysis step is therefore roughly 0.345 kg and corresponds to a recovery rate of 46% in this step.
  Reference:
  Gao, F., Nie, Z., Yang, D., Sun, B., Liu, Y., Gong, X., & Wang, Z. (2018). Environmental impacts analysis of titanium sponge production using Kroll process in China. Journal of Cleaner Production, 174, 771-779. doi:https://doi.org/10.1016/j.jclepro.2017.09.240.
  production volume 8.8572e7 kg; = RP_PV*ABS(chlorine_amount/RP_amount)
  property price 0.148 EUR2005; name chlorine_amount_price_EUR2005
  property true value 0.0511238; name chlorine_amount_true_value
  properties: water in wet mass 0 kg, carbon content, non-fossil 0, carbon content, fossil 0, wet mass 1 kg, water content 0, dry mass 1 kg, carbon content 0, carbon allocation 0 kg

## By-products
- magnesium, for reuse in titanium sponge production: 0 kg; name magnesium_amount; By-product classification allocatable product; CPC 41601: Tungsten, molybdenum, tantalum, magnesium, cobalt, cadmium, titanium, zirconium, beryllium, gallium, hafnium, […]; CAS 7439-95-4; pedigree (1,1,1,1,1)
  Value calculated based on value given Table 2 (column "Electrolysis of MgCl2") in Gao et al. (2018). Based on the stoichiometric reaction of the reduction and distillation step used for titanium sponge production (TiCl4 + 2Mg -> Ti + 2MgCl2), roughly 1.016 kg of Mg are required as input. Gao et al. (2018) report an input of 41 kg per metric ton of titanium sponge to compensate for the amount of Mg that is not recycled. The overall recovery rate of Mg is therefore approximately 96%.
  Because 0.093 kg of MgCl2 is lost in the reduction and distillation step, this means that 3.885 kg of MgCl2 per kg Ti are sent to electrolysis. Out of that amount, 0.97 kg of Mg is recovered. The amount of Mg recovered per kg of MgCl2 entering the electrolysis step is therefore roughly 0.251 kg and corresponds to a recovery rate of 98.3% in this step.
  Reference:
  Gao, F., Nie, Z., Yang, D., Sun, B., Liu, Y., Gong, X., & Wang, Z. (2018). Environmental impacts analysis of titanium sponge production using Kroll process in China. Journal of Cleaner Production, 174, 771-779. doi:https://doi.org/10.1016/j.jclepro.2017.09.240.
  production volume 6.435e7 kg; = RP_PV*ABS(magnesium_amount/RP_amount)
    Calculated from production volume of reference product using the relative outputs.
  property price 11 EUR2005; name magnesium_amount_price_EUR2005
    The price is set equal to that of the product "magnesium".
  property carbon content 0
    carbon content on a dry matter basis (reserved; not for manual entry)
  property true value 2.76062; name magnesium_amount_true_value
    allocation property applied in "true value" allocation // value calculated from revenue
  properties: dry mass 1 kg, carbon content, non-fossil 0, magnesium content 1, water content 0, carbon content, fossil 0, water in wet mass 0 kg, wet mass 1 kg, carbon allocation 0 kg
- chlorine, for reuse in titanium tetrachloride production: 0 kg; By-product classification allocatable product; CPC 34231: Chemical elements n.e.c.; inorganic acids except phosphoric, nitric and sulphonitric; inorganic oxygen compoun[…]; CAS 7782-50-5; pedigree (1,1,1,1,1)
  (same comment as for chlorine, for reuse in titanium tetrachloride production)
  production volume 0 kg; = RP_PV*ABS(chlorine_amount/RP_amount)
    Calculated from production volume of reference product using the relative outputs.
  property carbon content 0
    carbon content on a dry matter basis (reserved; not for manual entry)
  properties: water in wet mass 0 kg, carbon content, non-fossil 0, carbon content, fossil 0, wet mass 1 kg, water content 0, dry mass 1 kg, carbon allocation 0 kg

## Inputs from technosphere
- electricity, medium voltage: 0 kWh; pedigree (1,1,1,1,1)
  Value from Table 2 (column "Electrolysis of MgCl2") in Gao et al. (2018). The amount of electricity consumed in the electrolysis process is 1.45E+04 kWh per metric ton of titanium sponge. This value was adjusted considering that for 1 kg of titanium sponge produced, 3.885 kg of MgCl2 is sent to the electrolysis step.
  Reference:
  Gao, F., Nie, Z., Yang, D., Sun, B., Liu, Y., Gong, X., & Wang, Z. (2018). Environmental impacts analysis of titanium sponge production using Kroll process in China. Journal of Cleaner Production, 174, 771-779. doi:https://doi.org/10.1016/j.jclepro.2017.09.240.
- inert waste: 0 kg; name inert_waste_amount; pedigree (1,1,1,1,1)
  Based on mass balance calculation. According to Table 2 (column "Electrolysis of MgCl2") in Gao et al. (2018), 1.62E-01 kg of "other residue" is produced in the electrolysis step per metric ton of titanium sponge. However, neither this amount nor the amount reported in the reduction and distillation step are large enough to account for the amounts of Mg and Cl that are not recovered by the electrolysis of MgCl2. Therefore, the amount of inert waste is calculated such that the mass of the inputs is equal to the mass of the outputs.
  Reference:
  Gao, F., Nie, Z., Yang, D., Sun, B., Liu, Y., Gong, X., & Wang, Z. (2018). Environmental impacts analysis of titanium sponge production using Kroll process in China. Journal of Cleaner Production, 174, 771-779. doi:https://doi.org/10.1016/j.jclepro.2017.09.240.
  production volume 0 kg
    Calculated from production volume of reference product using the relative outputs.
  property price 0 EUR2005; name inert_waste_amount_price_EUR2005
  properties: wet mass 1 kg, dry mass 1 kg
- sulfuric acid: 0.000945694 kg; name sulfuric_acid_amount; = 6.98E+01/1000/3.885; lognormal variance with pedigree 0.0052, pedigree (3,3,1,5,1)
  Value from Table 2 (column "Electrolysis of MgCl2") in Gao et al. (2018). The amount of sulfuric acid required in the electrolysis process is 6.98E+01 kg per metric ton of titanium sponge. This value was adjusted considering that for 1 kg of titanium sponge produced, 3.885 kg of MgCl2 is sent to the electrolysis step.
  Reference:
  Gao, F., Nie, Z., Yang, D., Sun, B., Liu, Y., Gong, X., & Wang, Z. (2018). Environmental impacts analysis of titanium sponge production using Kroll process in China. Journal of Cleaner Production, 174, 771-779. doi:https://doi.org/10.1016/j.jclepro.2017.09.240.
  properties: wet mass 1 kg, dry mass 1 kg
- magnesium chloride, from titanium sponge production: 0.0526364 kg
  production volume 2.5641e8 kg
  properties: chlorine content 0.7447, magnesium content 0.255299, dry mass 1 kg, wet mass 1 kg
- electricity, medium voltage: 7.34525e-5, 0.00271053, 0.000250171, 0.000762055, 0.00021579, 4.37847e-5, 5.70419e-5, 0.000142043, 0.000585007, 0.0020962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 kWh (45 entries); lognormal variance with pedigree 0.0052, pedigree (3,3,1,5,1)
  (same comment as for electricity, medium voltage)
- inert waste: -0.000188956, -0.0219393 kg (2 entries); lognormal variance with pedigree 0.0432, pedigree (5,3,1,5,1)
  (same comment as for inert waste)
  production volume 1.07794e8 kg

## Emissions to nature
- Hydrogen fluoride [air, low population density, long-term]: 8.61693e-6 kg; name HF_amount; = 6.36E-01/1000/3.885; lognormal variance with pedigree 0.0446, pedigree (3,3,1,5,1)
  Value from Table 2 (column "Electrolysis of MgCl2") in Gao et al. (2018). An emission of HF is reported to occur in the electrolysis process. It is assumed to be an emission to air. The reported amount is 6.36E-01 kg per metric ton of titanium sponge. This value was adjusted considering that for 1 kg of titanium sponge produced, 3.885 kg of MgCl2 is sent to the electrolysis step.
  Reference:
  Gao, F., Nie, Z., Yang, D., Sun, B., Liu, Y., Gong, X., & Wang, Z. (2018). Environmental impacts analysis of titanium sponge production using Kroll process in China. Journal of Cleaner Production, 174, 771-779. doi:https://doi.org/10.1016/j.jclepro.2017.09.240.
- Hydrogen chloride [air, low population density, long-term]: 5.31106e-5 kg; name HCl_amount; = 3.92/1000/3.885; lognormal variance with pedigree 0.0446, pedigree (3,3,1,5,1)
  Value from Table 2 (column "Electrolysis of MgCl2") in Gao et al. (2018). An emission of HCl is reported to occur in the electrolysis process. It is assumed to be an emission to air. The reported amount is 3.92 kg per metric ton of titanium sponge. This value was adjusted considering that for 1 kg of titanium sponge produced, 3.885 kg of MgCl2 is sent to the electrolysis step.
  Reference:
  Gao, F., Nie, Z., Yang, D., Sun, B., Liu, Y., Gong, X., & Wang, Z. (2018). Environmental impacts analysis of titanium sponge production using Kroll process in China. Journal of Cleaner Production, 174, 771-779. doi:https://doi.org/10.1016/j.jclepro.2017.09.240.

## Sampling procedure
The individual exchanges have been taken from Table 2 (column "Electrolysis of MgCl2") of Gao et al. (2018). The amounts are based on those reported in that table while considering the stoichiometric reactions. The amounts have been scaled for 1 kg of MgCl2 that is fed to the electrolysis process (instead of 1 metric ton of titanium sponge as reported in Table 2 in Gao et al. (2018)). Additionally, the amounts take into account the fact that 0.093 kg of MgCl2 is assumed to be lost in the titanium sponge production step. This means that for one kg of titanium sponge produced, 3.885 kg of MgCl2 is sent to the electrolysis process.

The individual emissions reported in Gao et al. (2018) (apart from HCl and HF) are all assumed to be related to energy production. Therefore they are not considered here because they are modelled in the ecoinvent dataset for electricity production.

Reference:
Gao, F., Nie, Z., Yang, D., Sun, B., Liu, Y., Gong, X., & Wang, Z. (2018). Environmental impacts analysis of titanium sponge production using Kroll process in China. Journal of Cleaner Production, 174, 771-779. doi:https://doi.org/10.1016/j.jclepro.2017.09.240.

## Extrapolations
This dataset has been extrapolated from the respective dataset from CN. The uncertainty has been adjusted accordingly. According to the authors of the publication used as a source for this dataset, data were collected from titanium sponge manufacturing companies in the province of Sichuan and Shaanxi through surveys, but considering at the same time average national production statistics. Therefore, the data are assumed to represent the average production of titanium metal in China through the Kroll process. The data is assumed to be representative also of the global situation, since the Kroll process is the most common method for the production of titanium sponge.
