# ammonium sulfate production

Dataset: EcoSpold 2, unit process
Geography: RER
Time period: 1998-01-01 to 2021-12-31
Technology level: current
Classification: ISIC rev.4 ecoinvent: 2012:Manufacture of fertilizers and nitrogen compounds
Synonyms: Ammonsulfat
Scenario: Business-as-Usual
System model: Allocation, cut-off by classification
Share of production covered: 70 %
Generated by: Avraam Symeonidis
Database: ecoinvent
isCopyrightProtected: true
accessRestrictedTo: 1

## General comment
This activity represents the production of ammonium sulfate from ammonia and sulfuric acid.
Ammonia and sulfuric acid react given the formula: 2 NH3 + H2SO4 → (NH4)2SO4.
The reaction yield is assumed to be 98.1%.
The vast majority of ammonium sulfate produced worldwide is further used in agriculture as a fertiliser.
Ammonium sulfate is mostly produced as by-product but this dataset describes a primary production of it.
The reaction is highly exothermic and it is assumed that it does not require an external input of heat.
References:
Gendorf (2016) Umwelterklärung 2015, Werk Gendorf Industriepark, www.gendorf.de
For more information on the model please refer to the dedicate ecoinvent report, access it in the Report section of ecoQuery (http://www.ecoinvent.org/login-databases.html)
Zapp, K.-H., Wostbrock, K.-H., Schäfer, M., Sato, K., Seiter, H., Zwick, W., … Leiter, H. (2012). Amino acids. In Ullmann’s Encyclopedia of Industrial Chemistry. In Ullmann’s Encyclopedia of Industrial Chemistry (Vol. 3, pp. 1–58). https://doi.org/10.1002/14356007.a02

## Included activities start
The activity starts when the raw materials enter the process.

## Included activities end
Materials entering the process are included as well as energy uses, infrastructure and emissions. The dataset considers no heat input.

## Geography
The inputs to the process are calculated based on stoichiometry and literature data, they are therefore considered to be valid for the chosen geography.

## Reference product
- ammonium sulfate: 1 kg; CPC 34612: Ammonium sulphate; By-product classification allocatable product; CAS 7783-20-2
  production volume 1.48e9 kg
    1266961 tons N in 1999 in 15 European countries
    Source: IFA production and trade statistics http://www.fertilizer.org/ifa/Home-Page/STATISTICS/Production-and-trade
  property sulfur content 0.242661
    Sulfur content (on a dry matter basis) of ammonium sulfate is calculated from the molecular formula of the substance (H8N2O4S).
  property hydrogen content 0.0610205
    Hydrogen content (on a dry matter basis) of ammonium sulfate is calculated from the molecular formula of the substance (H8N2O4S).
  property nitrogen content 0.211999
    Nitrogen content (on a dry matter basis) of ammonium sulfate is calculated from the molecular formula of the substance (H8N2O4S).
  property oxygen content 0.48432
    Oxygen content (on a dry matter basis) of ammonium sulfate is calculated from the molecular formula of the substance (H8N2O4S).
  property price 0.38 EUR2005
    Prices are calculated on basis of Import/Export data (tonnes and US$) from UN Trade Statistics Database (http://data.un.org/Browse.aspx?d=ComTrade, accessed 7/7-2010). N, P2O5, or K2O content (http://www.fertilizer.org/ifa/Home-Page/STATISTICS/Conversions-factors)
  property carbon content, fossil 0
    Carbon content, fossil is calculated based on the chemical formula of the substance.
  property carbon content 0
    carbon content on a dry matter basis (reserved; not for manual entry)
  properties: water content 0, dry mass 1 kg, water in wet mass 0 kg, wet mass 1 kg, carbon content, non-fossil 0, carbon allocation 0 kg

## Inputs from technosphere
- sulfuric acid: 0.760394 kg
  Stoichiometric calculation of reactants necessary considering the yield of the reaction.
  properties: wet mass 1 kg, dry mass 1 kg
- electricity, medium voltage: 0.197099 kWh; = 0.33*2.15*0.2778; lognormal variance with pedigree 0.128625, pedigree (2,5,5,2,4)
  Assumed electricity input.
- chemical factory, organics: 1.9e-9 unit; lognormal variance with pedigree 0.438625, pedigree (2,5,5,2,4)
  activityLink introduced to establish a direct link to the corresponding regional supply of this product
- ammonia, anhydrous, liquid: 0.265397 kg
  Stoichiometric calculation of reactants necessary considering the yield of the reaction.
  properties: dry mass 1 kg, wet mass 1 kg

## Emissions to nature
- Sulfuric acid [water, surface water]: 0.0137251 kg
  Estimated from the unreacted reactants.
- Ammonium, ion [water, unspecified]: 0.00504857 kg
  Estimated from the unreacted reactants.
- NMVOC, non-methane volatile organic compounds, unspecified origin [air, urban air close to ground]: 0.00052 kg; lognormal variance with pedigree 0.1093, pedigree (2,3,5,3,3)
  Emmissions estimated
- Ammonia [air, unspecified]: 0.00132699 kg
  Estimated from the unreacted reactants.

## Sampling procedure
Data have been compiled using literature and flows have been calculated using stoichiometry. Data are considered valid for the geography of Europe.

## Extrapolations
This dataset has been extrapolated from year 2000 to the year of the calculation (2021). The uncertainty has been adjusted accordingly.
