# sodium tripolyphosphate production

Dataset: EcoSpold 2, unit process
Geography: RoW
Time period: 1986-01-01 to 2021-12-31
Technology level: current
Classification: ISIC rev.4 ecoinvent: 2023:Manufacture of soap and detergents, cleaning and polishing preparations, pe
Synonyms: Pentasodium triphosphate; Tripoly; Thermphos; Polygon; 7758-29-4; Sodium tripolyphosphate; Sodium triphosphate; STPP; Armofos
Scenario: Business-as-Usual
System model: Allocation, cut-off by classification
Generated by: Rainer Zah
Published in: Zah R. 2007
Database: ecoinvent
isCopyrightProtected: true
accessRestrictedTo: 1

## General comment
This dataset represents the production of 1 kg of spray-dried powder of sodiumtripolyphosphate (STPP). STPP is a solid, inorganic compound present in the form of slightly hygroscopic granules. It is used in a large variety of household cleaning products, mainly as builder – but also in human foodstuff, animal feed, industrial cleaning processes and ceramics manufacture. Within the cleaning products STPP can be one of the ingredients of regular and compact laundry detergents, of automatic dishwashing detergents, of toilet cleaners or of surface cleaners. As builder in these detergents, STPP provides various functions – among them e.g. the sequestration of the water hardness, enabling surfactants to function effectively. Further functions of STPP are pH buffering, dirt emulsification or hydrolysis of grease. STPP used within the detergent industry is produced from sodium phosphate ortho-liquor. In this dataset, the material and energy inputs, as well as production of waste, are based on literature resources. The infrastructure is estimated based on a large chemical plant.
References:
Zah R., Hischier R. (2007) Life Cycle Inventories of Detergents. ecoinvent report No. 12. Swiss Centre for Life Cycle Inventories, Dübendorf, 2007.

## Included activities start
From reception of raw materials at the factory gate.

## Included activities end
This activity ends with the production of 1 kg of sodium tripolyphosphate. The dataset includes material and energy inputs, production of waste, emissions and infrastructure. The dataset doesn't include process emissions.

## Geography
Data for UK conditions - here used as average values at the global level.

## Technology
In a first step, the phosphate rock is calcinated at temperatures of approx. 750 °C. It is subsequently reacted exothermically with sulphuric acid in the dihydrate process. The phosphoric acid produced is filtered and washed. It has a concentration of 29% and is concentrated to 55% by vaporisation. In the subsequent purification step, the phosphoric acid is dissolved in an organic solvent. The residues that occur are treated with a mixture of solvents and sulphuric acid. The produced waste is treated with calcium carbonate producing a stable material (raffinate solidification process) that can be deposited. The phosphoric acid solution itself is purified in a countercurrent with small quantities of the final product and separated again from the solvent which is reused. The purified phosphoric acid is neutralised with sodium carbonate, and the so called ortholiquor of dissolved sodium phosphate is produced. The dissolved sodium phosphate is then dried to obtain sodium tripolyphosphate.
References:
Zah R., Hischier R. (2007) Life Cycle Inventories of Detergents. ecoinvent report No. 12. Swiss Centre for Life Cycle Inventories, Dübendorf, 2007.

## Parameters
- fraction, process water, to air: 0.4 dimensionless; name fraction_PW_to_air; lognormal variance with pedigree 0.092025, pedigree (4,4,3,2,4)
  Literature value (Statistics Canada, 2007 & Shaffer, K.H., 2008, Consumptive water use in the Great Lakes Basin, USGS) (Vionnet, S., Quantis Water Database - Technical Report, 2012).
- fraction, cooling water, recirculating system, to air: 0.771 dimensionless; name fraction_CW_R_to_air; lognormal variance with pedigree 0.0413, pedigree (2,3,1,3,1)
  Calculated based on literature value (Scown, C.D., 2011, Water Footprint of U.S. Transportation Fuels and supplying information of the article) (Vionnet, S., Quantis Water Database - Technical Report, 2012).
- fraction, cooling water, cooling pond system, to air: 0.032 dimensionless; name fraction_CW_CP_to_air; lognormal variance with pedigree 0.0413, pedigree (2,3,1,3,1)
  (same comment as for fraction, cooling water, recirculating system, to air)
- fraction, cooling water, once-through system, to air: 0.004 dimensionless; name fraction_CW_OT_to_air; lognormal variance with pedigree 0.0413, pedigree (2,3,1,3,1)
  (same comment as for fraction, cooling water, recirculating system, to air)
- fraction, cooling water, to air: 0.3875 dimensionless; name fraction_CW_to_air; = (0.5*fraction_CW_OT_to_air)+(0.5*fraction_CW_R_to_air); lognormal variance with pedigree 0.092025, pedigree (4,4,3,2,4)
  Calculated value based on literature value (see comments of the other parametres present in this dataset) and expert opinion. In the case when no industry/literature data are available about the type of cooling or directly fraction, cooling water, to air specific for the process a default assumption is applied. It is assumed that the once-through cooling system is used in 50% of all cases and recirculating system is used in another 50% of all cases.

## Reference product
- sodium tripolyphosphate: 1 kg; name RP; source HERA 2003; CPC 353: Soap, cleaning preparations, perfumes and toilet preparations; By-product classification allocatable product; CAS 7758-29-4
  Sodium tripolyphosphate (Na5P3O10), also refered as STPP, is a solid inorganic compound present in the form of slightly hygroscopic granules. Its stable form is a hexahydrated salt. The anhydrous salt exists in two crystalline forms.STPP is used in a large variety of household cleaning products, mainly as builder - but also in human foodstuff, animal feed, industrial cleaning processes and ceramics manufacture. Within the cleaning products STPP can be one of the ingredients of regular and compact laundry detergents, of automatic dishwashing detergents, of toilet cleaners or of surface cleaners. As builder in these detergents, STPP provides various functions - among them e.g. the sequestration of the water hardness, enabling surfactants to function effectively. Further functions of STPP are pH buffering, dirt emulsification or hydrolysis of grease.
  production volume 2.87201e9 kg; name RP_PV
    Estimated value. The global production volume is extrapolated from the European production volume based on reports from Cefic (European Chemical Industry Council), and the American Chemistry Council.
    According to Cefic (2016a) the global sales of chemicals in the year 2015 was 3 534 billion euros. The reported share of sales per region are: EU28 14.7%; Other Europe (Switzerland, Norway, Turkey, Russia and Ukraine) 2.7%; NAFTA (US, Canada and Mexico) 16.5%; Latin America 3.8%; China 39.9%; Japan 3.9%; Republic of Korea 3.2%; India 2.2%; Rest of Asia 11.9%; Rest of the World 1.3%. Cefic also reports the US total sales, which amount to 518.7 billion euros out of the global 3 534 billion euros (14.7%). The same share is reported by the American Chemistry Council (2016), according to which the USA sales account for 15% of global sales for the year 2016.
    European production volume:
    Estimated value. According to the European Chemical Agency, the consumption of Pentasodium triphosphate for the year of 2016 is estimated to be 550000000 kg. The aforementioned value is the average of the range given in the literature. According to the European Chemical Industry Council (Cefic, 2016a), the total sales of chemicals of the European Union in 2016 amounted to 519 billion euros. Chemical imports were valued at 91 billion euros for the first 11 months of 2016. Based on this, the value for the total imports for the year 2016 was extrapolated, yielding a value of 99.3 billion euros. Furthermore, Cefic (2016b) reports a trade surplus (exports-imports) of 46.4 billion euros (once again extrapolated for the whole year using the value of 42 billion euros for the first 11 months of 2016). Considering all the aforementioned information, the total chemical consumption in the EU is calculated to be 472.6 billion euros (total sales-exports+imports). It is therefore calculated that production is 110% of consumption. This value is used to scale the information on chemical consumption to production. The European production volume is therefore 605000000 kg. Since no data were found for the global production this value was scaled accordingly.
    References:
    American Chemistry Council 2016. Outlook: U.S. Chemical Industry Continues to Outpace Industrial Output; Accounts for More Than One-Half of Construction Spending by Manufacturing Sector. Accessible at: https://www.americanchemistry.com/Media/PressReleasesTranscripts/ACC-news-releases/US-Chemical-Industry-Continues-to-Outpace-Industrial-Output.html
    European Chemical Agency, Brief profile of Pentasodium triphosphate, Accessible at: https://echa.europa.eu/brief-profile/-/briefprofile/100.028.944
    Cefic 2016a. Facts and figures 2016 of the European chemical industry. Accessible at: http://www.cefic.org/Facts-and-Figures/Chemicals-Industry-Profile/
    Cefic 2016b. 2016: EU chemicals output posts positive growth for third year running. Accessible at: http://www.cefic.org/Documents/RESOURCES/Chemical%20Trends%20Report/March-2017-Cefic-Chemicals-Trends-Report.pdf
  property price 0.59 EUR2005
    Calculated value based on data from United Nations Commodity Trade Statistics Database (comtrade.un.org). UN comtrade category: 282531 Sodium triphosphate. Year 2005. Using exchange rate of 1EURO = 1.209 USD. Average of price of import into 5 main markets (EU, US, JP, IN and CN).
  property carbon content 0
    carbon content on a dry matter basis (reserved; not for manual entry)
  properties: water in wet mass 0 kg, wet mass 1 kg, carbon content, non-fossil 0, dry mass 1 kg, water content 0, carbon content, fossil 0, carbon allocation 0 kg

## Inputs from technosphere
- heat, district or industrial, other than natural gas: 0 MJ; source Landbank 1994; pedigree (1,1,1,1,1)
  Literature value.
  properties: heating value, net 1 MJ
- heat, district or industrial, natural gas: 0 MJ; source Landbank 1994; pedigree (1,1,1,1,1)
  Literature value.
  properties: heating value, net 1 MJ
- chemical factory, organics: 4e-10 unit; lognormal variance with pedigree 0.3498, pedigree (2,3,5,4,3)
  Calculated based on literature data published by the industry. For this activity, no information was readily available concerning infrastructure and land-use. Therefore, the infrastructure is estimated based on data from two chemical factories, the BASF site of Ludwigshafen and the chemical factory in Gendorf (which are both located in Germany), which produce a wide range of chemical substances. Based on this data, the following assumptions are made: the built area amounts to about 4.2 ha, the plant has an average output of 50'000 t/a and a lifespan of fifty years. The estimated infrastructure amount is therefore 4.00 E-10 units per kg of produced chemical.
  References:
  Althaus H.-J., Chudacoff M., Hischier R., Jungbluth N., Osses M. and Primas A. (2007) Life Cycle Inventories of Chemicals. ecoinvent report No. 8, v2.0. EMPA Dübendorf, Swiss Centre for Life Cycle Inventories, Dübendorf, CH.
  Gendorf (2000) Umwelterklärung 2000, Werk Gendorf. Werk Gendorf, Burgkirchen.
- sodium phosphate: 1.84 kg; source Landbank 1994; lognormal variance with pedigree 0.0532, pedigree (2,3,5,5,1)
  Calculated value: calculation based on literature source. According to literature, the purified phosphoric acid has a concentration of 56%. For the dataset, all chemicals use a functional unit referring to 100% of the active substance, thus the literature value has been multiplied with a factor of 1.79.
  properties: wet mass 1 kg, dry mass 1 kg
- electricity, medium voltage: 0 kWh; source Landbank 1994; pedigree (1,1,1,1,1)
  Literature value.
- heat, district or industrial, other than natural gas: 0.000839103, 2.06926 MJ (2 entries); source Landbank 1994; lognormal variance with pedigree 0.0532, pedigree (2,3,5,5,1)
  Literature value.
- heat, district or industrial, natural gas: 0.0562928, 3.65251 MJ (2 entries); source Landbank 1994; lognormal variance with pedigree 0.0532, pedigree (2,3,5,5,1)
  Literature value.
- electricity, medium voltage: 0.0018836, 0.000361193, 0.00606368, 0.0881908, 0.0124305, 0.0405006 kWh (6 entries); source Landbank 1994; lognormal variance with pedigree 0.0532, pedigree (2,3,5,5,1)
  Literature value.

## Inputs from nature
- Water, cooling, unspecified natural origin [natural resource, in water]: 0.000324242 m3; name water_cooling_UNO_input; source IPPC - Integrated Pollution Prevention a 2007; lognormal variance with pedigree 0.0527, pedigree (2,2,5,5,1)
  Calculated based on literature (IPPC, 2007, Large Volume Inorganic Chemicals; Wilson, B., 14, Phosphate-free builders for detergents), (Vionnet, S., Quantis Water Database - Technical Report, 2012).
  property wet mass 1000 kg; name WM
  property water content 9081.65; name water_content
  property water in wet mass 999.89 kg; name WWM
  property carbon content, fossil 0.0104329; name C_content_fossil
  property dry mass 0.1101 kg; name DM
  property carbon content, non-fossil 0; name C_content_non_fossil
- Water, unspecified natural origin [natural resource, in water]: 0.005 m3; name water_UNO_input; source IPPC - Integrated Pollution Prevention a 2007; lognormal variance with pedigree 0.0546, pedigree (3,3,5,5,1)
  (same comment as for Water, cooling, unspecified natural origin)

## Emissions to nature
- Water [air, unspecified]: 0.00212564 m3; = (water_cooling_UNO_input*fraction_CW_to_air)+(water_UNO_input*fraction_PW_to_air); lognormal variance with pedigree 0.0827, pedigree (2,2,5,5,1)
  Calculated as a fraction of the input of water. For more details, refer to the mathematical relation and the parameters.
  property fraction, origin: unspecified 1; name fraction_origin_unspecified
  property fraction, origin: salt water 0; name fraction_origin_salt_water
  property fraction, origin: fresh water 0; name fraction_origin_fresh_water
- Water [water, unspecified]: 0.0031986 m3; = water_cooling_UNO_input*(1-fraction_CW_to_air)+water_UNO_input*(1-fraction_PW_to_air); lognormal variance with pedigree 0.0827, pedigree (2,2,5,5,1)
  (same comment as for Water)
  property fraction, origin: unspecified 1; name fraction_origin_unspecified_Ww
  property fraction, origin: fresh water 0; name fraction_origin_fresh_water_Ww
  property fraction, origin: salt water 0; name fraction_origin_salt_water_Ww
- Particulates, > 10 um [air, unspecified]: 4e-5 kg; source Landbank 1994; lognormal variance with pedigree 0.0532, pedigree (2,3,5,5,1)
  (same comment as for sodium phosphate)

## Sampling procedure
Literature data.

## Extrapolations
This dataset has been copied from an original dataset covering the geography RER. The uncertainty has been adjusted accordingly.

## Review by Emilia Moreno Ruiz 2017-08-08
This dataset was additionally reviewed in a separate review process by Eric Johnson of Atlantic Consulting as well as Emilia Moreno Ruiz and Gregor Wernet of ecoinvent.
