# wood preservation, hot/cold dipping, creosote, outdoor use, ground contact

Dataset: EcoSpold 2, unit process
Geography: RER
Time period: 2008-01-01 to 2021-12-31
Technology level: current
Classification: ISIC rev.4 ecoinvent: 1610:Sawmilling and planing of wood
Tags: Swiss brush-up completed
Scenario: Business-as-Usual
System model: Allocation, cut-off by classification
Generated by: Frank Werner
Published in: Künniger T. 2000
Database: ecoinvent
isCopyrightProtected: true
accessRestrictedTo: 1

## General comment
This dataset covers the treatment of wood with creosote in a hot/cold dipping processs as a type of open tank impregnation. The hot/cold dipping process or hot-cold bath as a batch process involves placing wood in a tank of hot preservative oil followed by immersion in cold preservatives. The hot bath increases the viscosity of the wood preservative and therfore improves penetration into the wood; in addition it heats and expands the air within the dry to semi-dry wood, forcing some of the air out and generating a slightly sub-atmospheric pressure. Because of this sub-atmospheric pressure, more impregnating liquid can be absored by the wood. The wood is then immersed in the cold bath and the heated air contracts pulling preservative in with it. Alternatively, an equipment with one single heatable tank can be used, where the creosote is first heated and then left to cool down.The treated wood is held over the dipping vat, usually for 30 minutes to an hour, in order the excess of the preservative solution to drain. Drips are usually collected and recycled into the process. Then the treated wood is removed to storage. Dipping facilities may be open or encapsulated, equipped with vapour trapping and air emission control.
This hot/cold dipping process has turned out to yield better results than dipping only in heated creosote or cold creosote.
Hot/cold dipping is is frequently used in treating the butt-ends of fruit tree and vine posts or utility poles with creosote that will have ground contact. For this butt-end treatment, wooden posts are placed vertically in vessles containng creosote, where the oil is 20-30 cm above the envisaged depths of immersion in the soil. The vessels are then heated to >100 °C. Impregnation occurs during the cooling-down phase. The but-ends of utility poles are often bored to improve the penetration of the wood preservative. The dipping process for butt-end treatment lasts roughly 15 hours followed by about 4 weeks of under roof storage to ensure sufficient fixation of the wood preservative.

Wood is not included in the dataset.
According to Künniger et al. (2000) 115 kg of creosote are applied per m3 wood.

In most countries such dipping facilities need to be authorised by government authorities according to environmental law or regulation. Recent regulations usually prescribe that dipping baths should be roofed and situated upon sealed flooring with no connection to the facility sewer system. Storm rainwater should be collected and be united with the tank impregnation solution.

Air-borne emissions and emissions into surface water are caculated based on emission factors (EF) as determined in OECD (2000, part 1, p. 46ff.), depending on the physical properties of the main componentes of creosote. The determination of emission factors for the PAH considered relevant by the U.S. Environmental Protection Agency (EPA) is documented in the following table:

## Included activities start
Service starting with the reception of the creosote at the factory gate

## Included activities end
The data set contains the treatment service of wood with creosote in a hot-cold dipping bath: it covers the necessary inputs of creosote, electricity, and heat as well as some infrastructure. The dataset does not include wood. Also eventual waste streams (e.g. saw dust in recovered creosote) or VOC emissions into air during storage are not included; VOC emissions during storage should be accounted for consistently with emissions during the use phase. The dataset does also not include 1.7 l/115 kg creosote wastewater discharged into the sewage system (Künniger et al. 2000) due to the lack of characterization of the discharged waste water.

## Geography
Data from German plants

## Technology
Average technology used in Germany for the treatment of bases of utility poles.

## Parameters
- efficiency of air filter: 0.75 dimensionless; name efficiency_air_filter
- share of collected rainwater: 0.5 dimensionless; name share_collected_rainwater

## Reference product
- wood preservation, hot/cold dipping, creosote, outdoor use, ground contact: 1 kg; CPC 54730: Painting services; By-product classification allocatable product
  production volume 1.35064e7 kg; name p_preservation; = 5.84E07/71707*16584
    estimated from GLO data via GDP
  property price 0.502071 EUR2005
    Calculated based on inputs: The price of the product has been calculated as a sum of the values of the material and energy inputs for this product. This value is therefore a rough estimation. It may underestimate the real price since there are additional expenses when producing any product. These expences can include for example labour costs, treatment of waste materials and profit for the producer. Please consider carefully whether this level of data quality is acceptable for your application.

## Inputs from technosphere
- lubricating oil: 0.000112721 kg; name m_lubricating_oil; = 35*75/3/103500/75; source Hubel M. 2012; lognormal variance with pedigree 0.075, pedigree (4,4,5,1,1)
  hydraulic oil; assuming a replacement of 35 l every 3 years for an assumed yearly use of 103500 kg of creosote over 75 years
  property dry mass 1 kg; name m_lubricating_oil_DM
  properties: UVEK_link_1 2866, carbon content, fossil 0.75, wet mass 1 kg, heating value, net 40.2 MJ, UVEK_relative_amount_1 1
  note on UVEK_link_1: to be used only in special submissions in coordination with ecoinvent and the Swiss FOEN
  note on heating value, net: Literature value, Source: IPCC 2006, 2006 IPCC Guidelines for National Greenhouse Gas Inventories, Prepared by the National Greenhouse Gas Inventories Programme, Eggleston H.S., Buendia L., Miwa K., Ngara T. and Tanabe K. (eds). Published: IGES, Japan
- wood preservation facility, hot/cold dipping tank: 1.28824e-7 unit; = 1/103500/75; source Hubel M. 2012; lognormal variance with pedigree 0.638, pedigree (5,5,5,1,1)
  assuming a yearly use of 103500 kg of creosote over 75 years
- electricity, medium voltage: 0.0104348 kWh; = 4.32/3.6/115; source Künniger T. 2000; lognormal variance with pedigree 0.069, pedigree (1,4,5,5,1)
  conversion from MJ to kWh and normalization to 1 kg creosote
  properties: UVEK_link_1 1779, UVEK_relative_amount_1 1
- waste mineral oil: 0 kg; name w_mineral_oil; source Hubel M. 2012; pedigree (1,1,1,1,1)
  calculated from input of lubricating oil
  production volume 0 kg
    Calculated from production volume of reference product using the relative outputs.
  properties: dry mass 0.9 kg, UVEK_relative_amount_1 -1, wet mass 1 kg, water content 0.111111, heating value, net 34.7 MJ, carbon content, fossil 0.864444, UVEK_link_1 1113
  note on heating value, net: Value taken from the general comment of the treatment dataset.
- wood preservative, creosote: 1 kg; source Künniger T. 2000
  property carbon content, non-fossil 0; name C_content_non_fossil
  property wet mass 1 kg; name WM
  property water in wet mass 0 kg; name WWM
  property dry mass 1 kg; name DM
  property water content 0; name water_content
  property carbon content, fossil 0.940828; name C_content_fossil
  properties: UVEK_link_8 4417, UVEK_link_9 4433, heating value, net 28.51 MJ, UVEK_relative_amount_8 0.1
  note on UVEK_link_8: This link has been introduced to model transport specifically for the SAM model; to be used only in special submissions in coordination with ecoinvent and the Swiss FOEN.
  note on UVEK_relative_amount_8: No scaling needed as transport is modelled in market dataset that has been part of the brush-up
- heat, district or industrial, other than natural gas: 4.69565 MJ; = 540/115; source Künniger T. 2000; lognormal variance with pedigree 0.069, pedigree (1,4,5,5,1)
  usually wood is used as a fuel; normalization to 1 kg of creosote
  property corresponding fuel use, propane, furnace >100kW 0 MJ; name fuel_use
  properties: heating value, net 1 MJ, UVEK_relative_amount_1 1, UVEK_link_1 2563
  note on corresponding fuel use, propane, furnace >100kW: Lower heating value of the fuel input related to the heat/electricity output, taken directly from ecoinvent v3.0 dataset "heat production, natural gas, at industrial furnace >100kW, GLO 2000".
- waste mineral oil: -0.000109998, -2.72312e-6 kg (2 entries); source Hubel M. 2012; lognormal variance with pedigree 0.0662, pedigree (2,3,5,1,1)
  calculated from input of lubricating oil
  production volume 1522.46 kg

## Inputs from nature
- Water, cooling, unspecified natural origin [natural resource, in water]: 1.47826e-5 m3; name m_cooling_water; = 0.0017/115; source Künniger T. 2000; lognormal variance with pedigree 0.069, pedigree (1,4,5,5,1)
  cooling water; normalized to 1 kg creosote

## Emissions to nature
- Water [air, unspecified]: 1.47826e-5 m3; = m_cooling_water; lognormal variance with pedigree 0.24, pedigree (1,1,5,1,1)
  Calculated from input
- Phenanthrene [water, surface water]: 0.0013065 kg; = (1-share_collected_rainwater)*8.71E-02*0.03; source OECD 2000; lognormal variance with pedigree 0.6007, pedigree (3,3,5,3,3)
  leaching emissions during on-site storage, assuming a distribution of emissions as 50% run-off water and 50% as input to the sewage treatment (default as per OECD 2000). Calculated based the averaged composition of 3 different creosotes with grade WEI Type C as reported by Kohler (2002: Gehalte und Emissionen von polyzyklischen aromatischen Kohlenwasserstoffen in und aus teerölbehandelten Holzschwellen des schweizerischen Eisenbahnnetzes. Untersuchungsbericht Nr. 200"055, Empa Duebendorf) and emissions factors for pressure treatment depending on the solubility in water, as defined in OECD (2000, part 1, p. 46ff). It should be noted that in modern wood treatment plants, rainwater of storage places is recolleced completely and lead to a sewage treatment. The inventoried value thus is conservative and might need to be adjusted for the specific LCA.
- NMVOC, non-methane volatile organic compounds, unspecified origin [air, unspecified]: 0.040375 kg; name nmvoc; = (1-efficiency_air_filter)*6.46E-01*0.25; source OECD 2000; lognormal variance with pedigree 0.2507, pedigree (3,3,5,3,3)
  air emissions from the vacuum system (conditioning cycle and final cycle, the treated wood charge during its removal from treating cylinder and immediately thereafter, and the displaced air from working tank blow backs. Calculated based the averaged composition of 3 different creosotes with grade WEI Type C as reported by Kohler (2002: Gehalte und Emissionen von polyzyklischen aromatischen Kohlenwasserstoffen in und aus teerölbehandelten Holzschwellen des schweizerischen Eisenbahnnetzes. Untersuchungsbericht Nr. 200"055, Empa Duebendorf) and emissions factors for pressure treatment depending on vapor pressure as defined in OECD (2000, part 1, p.46ff). For NMVOC, the highest emission factor has been assumed as a conservative approach.
  property carbon content, non-fossil 0; name C_content_non_fossil_NMVOC
  property carbon content, fossil 0.854049; name C_content_fossil_NMVOC
- Acenaphthene [water, surface water]: 0.0003735 kg; = (1-share_collected_rainwater)*2.49E-02*0.03; source OECD 2000; lognormal variance with pedigree 0.6007, pedigree (3,3,5,3,3)
  (same comment as for Phenanthrene)
- Dibenz(a,h)anthracene [water, surface water]: 3.5025e-9 kg; = (1-share_collected_rainwater)*4.67E-06*0.0015; source OECD 2000; lognormal variance with pedigree 0.6007, pedigree (3,3,5,3,3)
  (same comment as for Phenanthrene)
- Benzo(a)pyrene [air, unspecified]: 6.075e-9 kg; = (1-efficiency_air_filter)*2.43E-05*0.001; source OECD 2000; lognormal variance with pedigree 0.6007, pedigree (3,3,5,3,3)
  air emissions from the vacuum system (conditioning cycle and final cycle, the treated wood charge during its removal from treating cylinder and immediately thereafter, and the displaced air from working tank blow backs. Calculated based the averaged composition of 3 different creosotes with grade WEI Type C as reported by Kohler (2002: Gehalte und Emissionen von polyzyklischen aromatischen Kohlenwasserstoffen in und aus teerölbehandelten Holzschwellen des schweizerischen Eisenbahnnetzes. Untersuchungsbericht Nr. 200"055, Empa Duebendorf) and emissions factors for pressure treatment depending on vapor pressure as defined in OECD (2000, part 1, p. 46ff). For NMVOC, the highest emission factor has been assumed as a conservative approach.
- Benzo(ghi)perylene [water, surface water]: 5.0025e-9 kg; = (1-share_collected_rainwater)*6.67E-06*0.0015; source OECD 2000; lognormal variance with pedigree 0.6007, pedigree (3,3,5,3,3)
  (same comment as for Phenanthrene)
- Fluorene [water, surface water]: 0.0005805 kg; = (1-share_collected_rainwater)*3.87E-02*0.03; source OECD 2000; lognormal variance with pedigree 0.2507, pedigree (3,3,5,3,3)
  (same comment as for Phenanthrene)
- Chrysene [water, surface water]: 1.935e-7 kg; = (1-share_collected_rainwater)*1.29E-04*0.003; source OECD 2000; lognormal variance with pedigree 0.6007, pedigree (3,3,5,3,3)
  (same comment as for Phenanthrene)
- Fluoranthene [water, surface water]: 0.001575 kg; = (1-share_collected_rainwater)*1.05E-01*0.03; source OECD 2000; lognormal variance with pedigree 0.6007, pedigree (3,3,5,3,3)
  (same comment as for Phenanthrene)
- Acenaphthene [air, unspecified]: 0.000466875 kg; = (1-efficiency_air_filter)*2.49E-02*0.075; source OECD 2000; lognormal variance with pedigree 0.4007, pedigree (3,3,5,3,3)
  (same comment as for Benzo(a)pyrene)
- Anthracene [water, surface water]: 7.95e-5 kg; = (1-share_collected_rainwater)*1.06E-02*0.015; source OECD 2000; lognormal variance with pedigree 0.6007, pedigree (3,3,5,3,3)
  (same comment as for Phenanthrene)
- Indeno(1,2,3-cd)pyrene [water, surface water]: 5.4975e-8 kg; = (1-share_collected_rainwater)*7.33E-06*0.015; source OECD 2000; lognormal variance with pedigree 0.6007, pedigree (3,3,5,3,3)
  (same comment as for Phenanthrene)
- Acenaphthylene [water, surface water]: 1.0305e-6 kg; = (1-share_collected_rainwater)*6.87E-05*0.03; source OECD 2000; lognormal variance with pedigree 0.6007, pedigree (3,3,5,3,3)
  (same comment as for Phenanthrene)
- Benzo(k)fluoranthene [water, surface water]: 1.6725e-8 kg; = (1-share_collected_rainwater)*2.23E-05*0.0015; source OECD 2000; lognormal variance with pedigree 0.6007, pedigree (3,3,5,3,3)
  (same comment as for Phenanthrene)
- VOC, volatile organic compounds, unspecified origin [water, unspecified]: 0.00969 kg; = (1-share_collected_rainwater)*6.46E-01*0.03; source OECD 2000; lognormal variance with pedigree 0.2507, pedigree (3,3,5,3,3)
  leaching emissions during on-site storage, assuming a distribution of emissions as 50% run-off water and 50% as input to the sewage treatment (default as per OECD 2000). Calculated based the averaged composition of 3 different creosotes with grade WEI Type C as reported by Kohler (2002: Gehalte und Emissionen von polyzyklischen aromatischen Kohlenwasserstoffen in und aus teerölbehandelten Holzschwellen des schweizerischen Eisenbahnnetzes. Untersuchungsbericht Nr. 200"055, Empa Duebendorf) and emissions factors for pressure treatment depending on the solubility in water, as defined in OECD (2000, part 1, p. 46ff). It should be noted that in modern wood treatment plants, rainwater of storage places is recolleced completely and lead to a sewage treatment. The inventoried value thus is conservative and might need to be adjusted for the specific LCA. For unspecified VOC, the most conservative emission factor according to OECD (2000, part) is used.
- Carbon dioxide, fossil [air, non-urban air or from high stacks]: 0.396881 kg; = ((6.46E-01*0.25* C_content_fossil_NMVOC)+(2.43E-05*0.001+1.06*0.001+2.00E-04*0.001+2.37E-05*0.001+1.05E-01*0.001+8.71E-02*0.02+2.49E-02*0.075+6.87E-05*0.02+6.67E-06*0.001+2.23E-05*0.001+1.29E-04*0.001+4.67E-06*0.001+3.87E-02*0.02+7.33E-06*0.001+7.76E-03*0.15+7.91E-02*0.001)*0.94083)*efficiency_air_filter/12*44; lognormal variance with pedigree 0.105, pedigree (5,1,5,1,1)
  all filtered C is assumed to finally be converted into CO2, irrespective of the filter technology being applied; for all PAK, an average value is used for the carbon content; once the values for each individual PAK are accessible, the equation can then be completed
- Naphtalene [water, surface water]: 0.0001164 kg; = (1-share_collected_rainwater)*7.76E-03*0.03; source OECD 2000; lognormal variance with pedigree 0.6007, pedigree (3,3,5,3,3)
  (same comment as for Phenanthrene)
- Pyrene [water, surface water]: 0.0011865 kg; = (1-share_collected_rainwater)*7.91E-02*0.03; source OECD 2000; lognormal variance with pedigree 0.6007, pedigree (3,3,5,3,3)
  (same comment as for Phenanthrene)
- Naphtalene [air, unspecified]: 0.000291 kg; = (1-efficiency_air_filter)*7.76E-03*0.15; source OECD 2000; lognormal variance with pedigree 0.4007, pedigree (3,3,5,3,3)
  (same comment as for Benzo(a)pyrene)
- Benzo(b)fluoranthene [water, surface water]: 3.555e-8 kg; = (1-share_collected_rainwater)*2.37E-05*0.003; source OECD 2000; lognormal variance with pedigree 0.6007, pedigree (3,3,5,3,3)
  (same comment as for Phenanthrene)
- Benz(a)anthracene [water, surface water]: 3e-7 kg; = (1-share_collected_rainwater)*2.00E-04*0.003; source OECD 2000; lognormal variance with pedigree 0.6007, pedigree (3,3,5,3,3)
  (same comment as for Phenanthrene)
- Benzo(a)pyrene [water, surface water]: 3.645e-8 kg; = (1-share_collected_rainwater)*2.43E-05*0.003; source OECD 2000; lognormal variance with pedigree 0.6007, pedigree (3,3,5,3,3)
  (same comment as for Phenanthrene)

## Sampling procedure
Plant measurements for input of energy, water, etc. Estimates based on literature for air-borne emissions and emissions into water.

## Extrapolations
This dataset has been extrapolated from year 2008 to the year of the calculation (2021). The uncertainty has been adjusted accordingly.
