# brazing solder production, cadmium free

Dataset: EcoSpold 2, unit process
Geography: RER
Time period: 2000-01-01 to 2021-12-31
Technology level: current
Classification: EcoSpold01Categories: metals/extraction
Classification: ISIC rev.4 ecoinvent: 2029:Manufacture of other chemical products n.e.c.
Tags: ConvertedDataset
Scenario: Business-as-Usual
System model: Allocation, cut-off by classification
Generated by: Hans-Jörg Althaus
Published in: Althaus H.-J. 2000
Database: ecoinvent
isCopyrightProtected: true
accessRestrictedTo: 1

## General comment
This dataset describes the production of 1 kg of brazing solder, which stands for solder with 60% Cu and 40% Zn. CuZn40 is an important material that is chosen as "typical" brazing solder.
[This dataset was already contained in the ecoinvent database version 2. It was not individually updated during the transfer to ecoinvent version 3. Life Cycle Impact Assessment results may still have changed, as they are affected by changes in the supply chain, i.e. in other datasets. This dataset was generated following the ecoinvent quality guidelines for version 2. It may have been subject to central changes described in the ecoinvent version 3 change report (http://www.ecoinvent.org/database/ecoinvent-version-3/reports-of-changes/), and the results of the central updates were reviewed extensively. The changes added e.g. consistent water flows and other information throughout the database. The documentation of this dataset can be found in the ecoinvent reports of version 2, which are still available via the ecoinvent website. The change report linked above covers all central changes that were made during the conversion process.]
All data are calculated based on assumptions and theoretical models. The overall quality of the dataset is poor, making it of insufficient quality for LCA where these metals play an important role.

## Included activities start
From reception of copper at the factory gate.

## Included activities end
This activity ends with the casting of solder.

The dataset includes the melting of the metal constituents of solder, and the consumption of infrastructure for the process.

## Technology
Assumed energy mix for melting. Abatement of air emissions assumed

## Reference product
- brazing solder, cadmium free: 1 kg; name RP_amount_1; By-product classification allocatable product; CPC 42950: Wire, rods, tubes, plates, electrodes and similar products, of base metal or of metal carbides, coated or core[…]
  Estimation from dataset author
  EcoSpold01Location=RER
  production volume 1.32237 kg; name RP_PV_1
    This is a placeholder value that does not reflect real-world production volumes. This dataset does not currently require a real-world production volume to work in the database framework, and no actual data were collected yet. This has no negative effect on the results of the ecoinvent database. The placeholder value of this activity was scaled according to the nominal GDP of 2005 (source: United Nations, http://data.un.org/Glossary.aspx?q=GDP+%28current+US%24%29, accessed 20130726) to reflect an appropriate share of the global production volume, which is also a placeholder value.
  property carbon content, fossil 0
    The main elements used in solders are copper, tin, zinc, silver, lead, cadmium and sometimes nickel, manganese or cobalt (ecoinvent v2.2 report 10-part III)
  property carbon content, non-fossil 0
    (same comment as for brazing solder, cadmium free)
  property price 33.79 EUR2005
    Calculated value based on data from United Nations Commodity Trade Statistics Database (comtrade.un.org). UN comtrade category: 851519 Electric brazing, soldering machines and apparatus ne. Year 2005. Using exchange rate of 1EURO = 1.209 USD. Average of price of import into 5 main markets (EU, US, JP, IN and CN).
  property carbon content 0
    carbon content on a dry matter basis (reserved; not for manual entry)
  properties: water in wet mass 0 kg, wet mass 1 kg, dry mass 1 kg, water content 0, carbon allocation 0 kg

## Inputs from technosphere
- aluminium casting facility: 4.9e-11 unit; lognormal variance with pedigree 0.458, pedigree (4,5,5,5,4)
  Proxy: "aluminium casting facility" is used as a proxy for brazing solder production facility.
  Estimation from dataset author: The amount of infrastructure corresponds to the volume of material throughput and thus is recalculated according to the different densities of aluminium and copper alloys. Then, Correction by density: From 2700 kg/m3 for infrastructure for aluminum casting, to 8470 kg/m3 for infrastructure for brass casting.
  EcoSpold01Location=RER
- copper, cathode: 0.606 kg; lognormal variance with pedigree 0.148, pedigree (4,5,5,5,4)
  Estimation from dataset author
  EcoSpold01Location=RER
  properties: wet mass 1 kg, dry mass 1 kg
- heat, district or industrial, other than natural gas: 0.279 MJ; lognormal variance with pedigree 0.148, pedigree (4,5,5,5,4)
  Modelled, based on "ISIC 2420" - pdf-document on the dedicated talk page of ecoinvent (www.ecoinvent.org/documentation). See section: "Copper alloys in ecoinvent".
  EcoSpold01Location=RER
  properties: heating value, net 1 MJ
- filter dust from Al electrolysis: -0.0097 kg; name BP_amount_1
  Proxy: "filter dust from electrolysis, 0% water" is used as a proxy for dust from filters (to recycling).
  Estimation from dataset author.
  production volume 0.012827 kg; = RP_PV_1 * (BP_amount_1 / RP_amount_1)
    Calculated from production volume of reference product using the relative outputs.
  property price 0 EUR2005; name BP_amount_1_price_EUR2005
  properties: carbon content, fossil 0.11586, dry mass 1 kg, wet mass 1 kg
- zinc: 0.404 kg; lognormal variance with pedigree 0.148, pedigree (4,5,5,5,4)
  Estimation from dataset author
  EcoSpold01Location=RER
  properties: wet mass 1 kg, dry mass 1 kg
- heat, district or industrial, natural gas: 0.349 MJ; lognormal variance with pedigree 0.148, pedigree (4,5,5,5,4)
  EcoSpold01Location=RER
  Modelled, based on "ISIC 2420" - pdf-document on the dedicated talk page of ecoinvent (www.ecoinvent.org/documentation). See section: "Copper alloys in ecoinvent".
  properties: heating value, net 1 MJ
- electricity, medium voltage: 0.0194 kWh; lognormal variance with pedigree 0.148, pedigree (4,5,5,5,4)
  Modelled, based on "ISIC 2420" - pdf-document on the dedicated talk page of ecoinvent (www.ecoinvent.org/documentation). See section: "Copper alloys in ecoinvent".
  EcoSpold01Location=UCTE

## Emissions to nature
- Zinc [air, unspecified]: 0.000404 kg; lognormal variance with pedigree 0.198, pedigree (4,5,5,5,4)
  Estimation from dataset author: Due to the high vapour pressure of zinc, parts of these inputs end up as air emissions (0.1% of Zn input to air).

## Sampling procedure
based on literature and internet

## Extrapolations
This dataset has been extrapolated from year 2000 to the year of the calculation (2021). The uncertainty has been adjusted accordingly.

## Review by Roland Hischier 2003-06-12
Passed.

## Review by Roland Hischier 2011-12-09
Transfer of documentation done.
