# operation, dried roughage store, cold-air dried, conventional

Dataset: EcoSpold 2, unit process
Geography: CH
Time period: 1994-01-01 to 2021-12-31
Technology level: current
Classification: EcoSpold01Categories: agricultural means of production/buildings
Classification: ISIC rev.4 ecoinvent: 0163:Post-harvest crop activities
Tags: ConvertedDataset; Operation
Scenario: Business-as-Usual
System model: Allocation, cut-off by classification
Generated by: Dunja Dux
Published in: Nemecek, T. 2007
Database: ecoinvent
isCopyrightProtected: true
accessRestrictedTo: 1

## General comment
This dataset represents the operation of a dried roughage store. The module includes the use of energy and auxiliary materials for the operation of lighting, impeller blower and ventilator. The functional unit is kg DM hay (DM: dry matter).
[This dataset was already contained in the ecoinvent database version 2. It was not individually updated during the transfer to ecoinvent version 3. Life Cycle Impact Assessment results may still have changed, as they are affected by changes in the supply chain, i.e. in other datasets. This dataset was generated following the ecoinvent quality guidelines for version 2. It may have been subject to central changes described in the ecoinvent version 3 change report (http://www.ecoinvent.org/database/ecoinvent-version-3/reports-of-changes/), and the results of the central updates were reviewed extensively. The changes added e.g. consistent water flows and other information throughout the database. The documentation of this dataset can be found in the ecoinvent reports of version 2, which are still available via the ecoinvent website. The change report linked above covers all central changes that were made during the conversion process.]

## Included activities start
Operation of the housing system, starting from the various energy carriers and auxiliary materials used.

## Included activities end
This activity ends with the service of operation of an agricultural building. The dataset includes the energy and auxiliary materials like water, lubricating oil and cleaning agents. It also takes into account the use of the infrastructure. The dataset doesn't include direct emissions of animal husbandry, fodder production and produced waste water.

## Geography
The inventory applies for Swiss agricultural buildings only, because of the solid method of construction.

## Technology
Based on selected examples of this type of housing and buildings commonly found in Switzerland in the year 2000; but not conform to an “average Swiss building style”.

## Time period
Period indicated in the reference.

## Reference product
- operation, dried roughage store, cold-air dried, conventional: 1 kg; CPC 86111: Post-harvest crop services; By-product classification allocatable product
  EcoSpold01Location=CH
  production volume 0.0336675 kg
    This is a placeholder value that does not reflect real-world production volumes. This dataset does not currently require a real-world production volume to work in the database framework, and no actual data were collected yet. This has no negative effect on the results of the ecoinvent database. The placeholder value of this activity was scaled according to the nominal GDP of 2005 (source: United Nations, http://data.un.org/Glossary.aspx?q=GDP+%28current+US%24%29, accessed 20130726) to reflect an appropriate share of the global production volume, which is also a placeholder value.
  property price 0.0267361 EUR2005
    Calculated based on inputs: The price of the product has been calculated as a sum of the values of the material and energy inputs for this product. This value is therefore a rough estimation. It may underestimate the real price since there are additional expenses when producing any product. These expences can include for example labour costs, treatment of waste materials and profit for the producer. Please consider carefully whether this level of data quality is acceptable for your application.

## Inputs from technosphere
- dried roughage store, cold-air dried, conventional: 0.000253 m3; lognormal variance with pedigree 0.3407, pedigree (2,2,5,1,1)
  Modelled, based on "Agricultural Buildings" - pdf-document on the dedicated talk page of ecoinvent (www.ecoinvent.org/talk-pages)
  EcoSpold01Location=CH
- electricity, low voltage: 0.131 kWh; lognormal variance with pedigree 0.0407, pedigree (2,2,5,1,1)
  (same comment as for dried roughage store, cold-air dried, conventional)

## Sampling procedure
In the use of energy and auxiliary materials are big differences between the farms. The inventory is based on mean values from CH and WEU.

## Extrapolations
This dataset has been extrapolated from year 2002 to the year of the calculation (2021). The uncertainty has been adjusted accordingly.

## Review by Roland Hischier 2003-08-06
Passed.

## Review by Roland Hischier 2011-12-01
Transfer of documentation done.
