# pyridine-compound production

Dataset: EcoSpold 2, unit process
Geography: RoW
Time period: 2000-01-01 to 2021-12-31
Technology level: current
Classification: EcoSpold01Categories: agricultural means of production/pesticides
Classification: ISIC rev.4 ecoinvent: 2021:Manufacture of pesticides and other agrochemical products
Tags: ConvertedDataset
Scenario: Business-as-Usual
System model: Allocation, cut-off by classification
Share of production covered: 100 %
Generated by: Jürgen Sutter
Published in: Nemecek, T. 2007
Database: ecoinvent
isCopyrightProtected: true
accessRestrictedTo: 1

## General comment
Production of pyridine-compunds including materials, energy uses, infrastructure and emissions.
[This dataset was already contained in the ecoinvent database version 2. It was not individually updated during the transfer to ecoinvent version 3. Life Cycle Impact Assessment results may still have changed, as they are affected by changes in the supply chain, i.e. in other datasets. This dataset was generated following the ecoinvent quality guidelines for version 2. It may have been subject to central changes described in the ecoinvent version 3 change report (http://www.ecoinvent.org/database/ecoinvent-version-3/reports-of-changes/), and the results of the central updates were reviewed extensively. The changes added e.g. consistent water flows and other information throughout the database. The documentation of this dataset can be found in the ecoinvent reports of version 2, which are still available via the ecoinvent website. The change report linked above covers all central changes that were made during the conversion process.]

## Geography
The inventory is modelled for Europe.

## Technology
pesticides

## Time period
Time of publications

## Parameters
- fraction, cooling water, cooling pond system, to air: 0.032 dimensionless; name fraction_CW_CP_to_air; lognormal variance with pedigree 0.0413, pedigree (2,3,1,3,1)
  Calculated based on literature value (Scown, C.D., 2011, Water Footprint of U.S. Transportation Fuels and supplying information of the article) (Vionnet, S., Quantis Water Database - Technical Report, 2012).
- fraction, water, decarbonised, to air: 0.3875 dimensionless; name fraction_WDC_to_air; lognormal variance with pedigree 0.092025, pedigree (4,4,3,2,4)
- fraction, cooling water, recirculating system, to air: 0.771 dimensionless; name fraction_CW_R_to_air; lognormal variance with pedigree 0.0413, pedigree (2,3,1,3,1)
  (same comment as for fraction, cooling water, cooling pond system, to air)
- fraction, cooling water, once-through system, to air: 0.004 dimensionless; name fraction_CW_OT_to_air; lognormal variance with pedigree 0.0413, pedigree (2,3,1,3,1)
  (same comment as for fraction, cooling water, cooling pond system, to air)
- fraction, cooling water, to air: 0.3875 dimensionless; name fraction_CW_to_air; = (0.5*fraction_CW_OT_to_air)+(0.5*fraction_CW_R_to_air); lognormal variance with pedigree 0.092025, pedigree (4,4,3,2,4)
  Calculated value based on literature value (see comments of the other parametres present in this dataset) and expert opinion. In the case when no industry/literature data are available about the type of cooling or directly fraction, cooling water, to air specific for the process a default assumption is applied. It is assumed that the once-through cooling system is used in 50% of all cases and recirculating system is used in another 50% of all cases.

## Reference product
- pyridine-compound: 1 kg; CPC 34663: Herbicides, anti-sprouting products and plant-growth regulators; By-product classification allocatable product; CAS 110-86-1
  EcoSpold01Location=RER
  production volume 2.3757e7 kg
    The addition of the consumption volumes in the US in 2002 (from USGS, 2002 Pesticide use Maps) of the pyridine-compounds clopyralid, fluroxypyr, fluazinam, paraquat, picloram, pyriproxyfen, triclopyr has been used to estimate the production volumes of this type of pesticide in the world. For that, it has been extrapolated to a Global production mix using the ha of Arable land and Permanent crops of US versus the ha of Arable land and Permanent crops in the world in 2002 (1514/179 million ha; FAOSTAT).
  property price 3.14898 EUR2005
    Calculated based on inputs: The price of the product has been calculated as a sum of the values of the material and energy inputs for this product. This value is therefore a rough estimation. It may underestimate the real price since there are additional expenses when producing any product. These expences can include for example labour costs, treatment of waste materials and profit for the producer. Please consider carefully whether this level of data quality is acceptable for your application.
  property carbon content, fossil 0.344279
    C content of pyrethroid-compounds was calculated as an unweigthed average of C content of the substances: clopyralid, fluroxypyr, triclopyr. Those substances are classified as pyridine-compounds in Tab 2.25, Sutter 2010
  property carbon content 0.344279
    carbon content on a dry matter basis (reserved; not for manual entry)
  properties: carbon content, non-fossil 0, water content 0, water in wet mass 0 kg, wet mass 1 kg, dry mass 1 kg, carbon allocation 0.344279 kg

## Inputs from technosphere
- chemical factory, organics: 2.399e-9 unit; lognormal variance with pedigree 0.448, pedigree (4,5,5,5,5)
  Estimation
  EcoSpold01Location=RER
  Uncertainty: Estimation
- sodium hypochlorite, without water, in 15% solution state: 0.13159 kg; lognormal variance with pedigree 0.046, pedigree (4,5,4,5,1)
  EcoSpold01Location=RER
  Stoechiometric calculation
  Uncertainty: Stoechiometric calculation
  properties: wet mass 1 kg, dry mass 1 kg
- hydrogen fluoride: 0.032224 kg; lognormal variance with pedigree 0.046, pedigree (4,5,4,5,1)
  EcoSpold01Location=GLO
  Stoechiometric calculation
  Uncertainty: Stoechiometric calculation
  properties: heating value, net 6.06 MJ, dry mass 1 kg, wet mass 1 kg
- oxygen, liquid: 0.023175 kg; lognormal variance with pedigree 0.046, pedigree (4,5,4,5,1)
  EcoSpold01Location=RER
  Stoechiometric calculation
  Uncertainty: Stoechiometric calculation
  properties: dry mass 1 kg, wet mass 1 kg
- water, decarbonised: 0 kg; name water_decarbonised_input; source Unger T A 1996; pedigree (1,1,1,1,1)
  EcoSpold01Location=RER
  Stoichiometric calculation, assuming an efficiency of 100%.
  Further references:
  Shimizu et al. 2000. Shinkichi Shimizu, Nanao Watanabe, Toshiaki Kataoka, Takayuki Shoji, Nobuyuki Abe, Sinji Morishita, Hisao Ichimura: Pyridine and Pyridine Derivatives. In: Ullmann's Encyclopedia of Industrial Chemistry, Seventh Edition, 2009 Electronic Release (ed. Fiedler E., Grossmann G., Kersebohm D., Weiss G. and Witte C.). 7 th Electronic Release Edition. Wiley InterScience, New York, Article Online Posting Date: June 15, 2000. Online-Version under: DOI: 10.1002/14356007.a22_399
  Stoichiometric calculation, assuming an efficiency of 100%.
  Further references:
  Shimizu et al. 2000. Shinkichi Shimizu, Nanao Watanabe, Toshiaki Kataoka, Takayuki Shoji, Nobuyuki Abe, Sinji Morishita, Hisao Ichimura: Pyridine and Pyridine Derivatives. In: Ullmann's Encyclopedia of Industrial Chemistry, Seventh Edition, 2009 Electronic Release (ed. Fiedler E., Grossmann G., Kersebohm D., Weiss G. and Witte C.). 7 th Electronic Release Edition. Wiley InterScience, New York, Article Online Posting Date: June 15, 2000. Online-Version under: DOI: 10.1002/14356007.a22_399
  Uncertainty: Stoechiometric calculation
  properties: wet mass 1 kg
- acetaldehyde: 0.68648 kg; lognormal variance with pedigree 0.046, pedigree (4,5,4,5,1)
  Stoechiometric calculation
  EcoSpold01Location=RER
  Uncertainty: Stoechiometric calculation
  properties: carbon content, fossil 0.545296, dry mass 1 kg, wet mass 1 kg, heating value, net 27.53 MJ
- acetic anhydride: 0.10359 kg; lognormal variance with pedigree 0.046, pedigree (4,5,4,5,1)
  Stoechiometric calculation
  EcoSpold01Location=RER
  Uncertainty: Stoechiometric calculation
  properties: heating value, net 21.38 MJ, carbon content, fossil 0.470588, dry mass 1 kg, wet mass 1 kg
- chlorine, liquid: 1.5203 kg; lognormal variance with pedigree 0.046, pedigree (4,5,4,5,1)
  Stoechiometric calculation
  EcoSpold01Location=RER
  Uncertainty: Stoechiometric calculation
  properties: dry mass 1 kg, wet mass 1 kg
- electricity, medium voltage: 0 kWh; pedigree (1,1,1,1,1)
  Estimation
  EcoSpold01Location=UCTE
  Uncertainty: Estimation
- hydrochloric acid, without water, in 30% solution state: 0.12811 kg; lognormal variance with pedigree 0.046, pedigree (4,5,4,5,1)
  EcoSpold01Location=RER
  Stoechiometric calculation
  Uncertainty: Stoechiometric calculation
  properties: heating value, net 3.32 MJ, dry mass 1 kg, wet mass 1 kg
- heat, district or industrial, natural gas: 0 MJ; pedigree (1,1,1,1,1)
  Uncertainty: Estimation
  properties: heating value, net 1 MJ
- sodium hydroxide, without water, in 50% solution state: 1.4808 kg; lognormal variance with pedigree 0.046, pedigree (4,5,4,5,1)
  EcoSpold01Location=RER
  Stoechiometric calculation
  Uncertainty: Stoechiometric calculation
  properties: heating value, net 3.03 MJ, dry mass 1 kg, wet mass 1 kg
- heat, district or industrial, other than natural gas: 0 MJ; pedigree (1,1,1,1,1)
  Uncertainty: Estimation
  properties: heating value, net 1 MJ
- formaldehyde: 0.15546 kg; lognormal variance with pedigree 0.046, pedigree (4,5,4,5,1)
  Stoechiometric calculation
  EcoSpold01Location=RER
  Uncertainty: Stoechiometric calculation
  properties: carbon content, fossil 0.4, wet mass 1 kg, dry mass 1 kg, heating value, net 20.19 MJ
- ammonia, anhydrous, liquid: 0 kg; pedigree (1,1,1,1,1)
  Stoechiometric calculation
  EcoSpold01Location=RER
  Uncertainty: Stoechiometric calculation
  properties: wet mass 1 kg, dry mass 1 kg
- sodium chloride, powder: 0.044559 kg; lognormal variance with pedigree 0.046, pedigree (4,5,4,5,1)
  EcoSpold01Location=RER
  Stoechiometric calculation
  Uncertainty: Stoechiometric calculation
  properties: wet mass 1 kg, dry mass 1 kg
- sodium cyanide: 0.070972 kg; lognormal variance with pedigree 0.046, pedigree (4,5,4,5,1)
  EcoSpold01Location=RER
  Stoechiometric calculation
  Uncertainty: Stoechiometric calculation
  properties: wet mass 1 kg, carbon content, fossil 0.244898, dry mass 1 kg, heating value, net 7.43 MJ
- 2-butanol: 0.11327 kg; lognormal variance with pedigree 0.046, pedigree (4,5,4,5,1)
  Stoechiometric calculation
  EcoSpold01Location=RER
  Uncertainty: Stoechiometric calculation
  properties: dry mass 1 kg, wet mass 1 kg, carbon content, fossil 0.648649, heating value, net 35.99 MJ
- water, decarbonised: 0.0032472, 0.00844921, 0.0340776, 0.00433947, 0.0634073, 0.000414803, 0.0538243 kg (7 entries); source Unger T A 1996; lognormal variance with pedigree 0.046, pedigree (4,5,4,5,1)
  (same comment as for water, decarbonised)
- electricity, medium voltage: 0.0284095, 0.00544771, 0.0914558, 1.33014, 0.187484, 0.610852 kWh (6 entries); lognormal variance with pedigree 0.046, pedigree (4,5,4,5,1)
  Estimation
  EcoSpold01Location=UCTE
  Uncertainty: Estimation
- heat, district or industrial, natural gas: 0.143039, 9.28096 MJ (2 entries); lognormal variance with pedigree 0.046, pedigree (4,5,4,5,1)
  Uncertainty: Estimation
- heat, district or industrial, other than natural gas: 0.00213215, 5.25795 MJ (2 entries); lognormal variance with pedigree 0.046, pedigree (4,5,4,5,1)
  Uncertainty: Estimation
- ammonia, anhydrous, liquid: 0.0394198, 0.00338861, 0.0052718, 0.0104453, 0.0102336, 0.0010726, 0.0047949, 0.113433 kg (8 entries); lognormal variance with pedigree 0.046, pedigree (4,5,4,5,1)
  Stoechiometric calculation
  EcoSpold01Location=RER
  Uncertainty: Stoechiometric calculation

## Inputs from nature
- Water, cooling, unspecified natural origin [natural resource, in water]: 0.14394 m3; name water_cooling_UNO_input; source Gendorf 2000; lognormal variance with pedigree 0.046, pedigree (4,5,4,5,1)
  Estimation (24 kg cooling water per kg produced chemical per step).
  Uncertainty: Estimation

## Emissions to nature
- Chloramine [water, surface water]: 0.0015377 kg; lognormal variance with pedigree 0.448, pedigree (4,5,5,5,5)
  Estimation
  Uncertainty: Estimation
- Chloroacetic acid [water, surface water]: 0.00069063 kg; lognormal variance with pedigree 0.448, pedigree (4,5,5,5,5)
  Estimation
  Uncertainty: Estimation
- Chlorine [air, urban air close to ground]: 0.0035876 kg; lognormal variance with pedigree 0.188, pedigree (4,5,5,5,5)
  Estimation
  Uncertainty: Estimation
- Ammonium, ion [water, surface water]: 0.0030145 kg; lognormal variance with pedigree 0.188, pedigree (4,5,5,5,5)
  Estimation
  Uncertainty: Estimation
- Fluoride [water, surface water]: 0.0052637 kg; lognormal variance with pedigree 0.188, pedigree (4,5,5,5,5)
  Estimation
  Uncertainty: Estimation
- Acetic acid [air, urban air close to ground]: 2.3511e-5 kg; lognormal variance with pedigree 0.188, pedigree (4,5,5,5,5)
  Estimation
  Uncertainty: Estimation
- Chloride [water, surface water]: 1.5199 kg; lognormal variance with pedigree 0.448, pedigree (4,5,5,5,5)
  Estimation
  Uncertainty: Estimation
- Water [water, unspecified]: 0.088266 m3; name water_to_water_unspecified; lognormal variance with pedigree 0.0507, pedigree (2,2,4,5,1)
  Calculated value based on literature values and expert opinion. See comments in the parametres' comment field.
  property fraction, origin: unspecified 0.998836; name fraction_origin_unspecified_Ww
  property fraction, origin: fresh water 0.00116413; name fraction_origin_fresh_water_Ww
  property fraction, origin: salt water 0; name fraction_origin_salt_water_Ww
  property carbon content, non-fossil 0; name C_content_non_fossil
  property water in wet mass 1000 kg; name WWM
  property dry mass 0 kg; name DM
  property wet mass 1000 kg; name WM
  property carbon content, fossil 0; name C_content_fossil
- Chloroacetic acid [air, urban air close to ground]: 0.00028776 kg; lognormal variance with pedigree 0.188, pedigree (4,5,5,5,5)
  Estimation
  Uncertainty: Estimation
- Propane [air, urban air close to ground]: 0.00022654 kg; lognormal variance with pedigree 0.188, pedigree (4,5,5,5,5)
  Estimation
  Uncertainty: Estimation
- Water [air, unspecified]: 0.0558418 m3; name water_to_air_unspecified; lognormal variance with pedigree 0.0507, pedigree (2,2,4,5,1)
  (same comment as for Water)
  property fraction, origin: fresh water 0.00116413; name fraction_origin_fresh_water
  property fraction, origin: salt water 0; name fraction_origin_salt_water
  property fraction, origin: unspecified 0.998836; name fraction_origin_unspecified
- Chloramine [air, urban air close to ground]: 0.00017231 kg; lognormal variance with pedigree 0.188, pedigree (4,5,5,5,5)
  Estimation
  Uncertainty: Estimation
- Formaldehyde [air, urban air close to ground]: 0.00031093 kg; lognormal variance with pedigree 0.188, pedigree (4,5,5,5,5)
  Estimation
  Uncertainty: Estimation
- Butanol [water, surface water]: 0.00054369 kg; lognormal variance with pedigree 0.448, pedigree (4,5,5,5,5)
  Estimation
  Uncertainty: Estimation
- Acetic acid [water, surface water]: 0.0011732 kg; lognormal variance with pedigree 0.448, pedigree (4,5,5,5,5)
  Estimation
  Uncertainty: Estimation
- Ammonia [air, urban air close to ground]: 0.00037612 kg; lognormal variance with pedigree 0.218, pedigree (4,5,5,5,5)
  Estimation
  Uncertainty: Estimation
- Butanol [air, urban air close to ground]: 0.00022654 kg; lognormal variance with pedigree 0.188, pedigree (4,5,5,5,5)
  Estimation
  Uncertainty: Estimation
- Acetaldehyde [water, surface water]: 0.011065 kg; lognormal variance with pedigree 0.448, pedigree (4,5,5,5,5)
  Estimation
  Uncertainty: Estimation
- Formaldehyde [water, surface water]: 0.00074623 kg; lognormal variance with pedigree 0.448, pedigree (4,5,5,5,5)
  Estimation
  Uncertainty: Estimation
- Acetaldehyde [air, urban air close to ground]: 0.001373 kg; lognormal variance with pedigree 0.188, pedigree (4,5,5,5,5)
  Estimation
  Uncertainty: Estimation
- Sodium, ion [water, surface water]: 0.86191 kg; lognormal variance with pedigree 0.798, pedigree (4,5,5,5,5)
  Estimation
  Uncertainty: Estimation
- Carbon dioxide, fossil [air, urban air close to ground]: 0.55446 kg; lognormal variance with pedigree 0.1786, pedigree (4,5,5,5,5)
  Estimation
  Uncertainty: Estimation

## Sampling procedure
Literature data

## Extrapolations
Transports and emissions are modelled with standard methods. This dataset has been copied from an original dataset covering the geography RER. The uncertainty has been adjusted accordingly.

## Review by Thomas Nemecek 2010-03-11
Passed.
none
