# treatment of waste polyurethane, unsanitary landfill, hyperarid infiltration class (-250mm)

Dataset: EcoSpold 2, unit process
Geography: GLO
Time period: 2006-01-01 to 2021-12-31
Technology level: current
Classification: ISIC rev.4 ecoinvent: 3821:Treatment and disposal of non-hazardous waste
Synonyms: municipal waste landfill
Scenario: Business-as-Usual
System model: Allocation, cut-off by classification
Share of production covered: 1 %
Generated by: Avraam Symeonidis
Database: ecoinvent
isCopyrightProtected: true
accessRestrictedTo: 1

## General comment
This dataset represents the activity of waste disposal of waste polyurethane in a unsanitary landfill. Recommended use of this dataset: For PU, which goes to disposal as part of managed communal waste mixture. // Waste composition (wet, in ppm): upper heating value 30.9 MJ/kg; lower heating value 30.67 MJ/kg; H2O 2000; O 178700; H 84276; C 640700; S 203.07; N 60922; P n.a.; B n.a.; Cl 24369; Br 70.934; F 14.896; I n.a.; Ag n.a.; As 1.9253; Ba 188.99; Cd 82.301; Co 32.011; Cr 41.41; Cu 321.89; Hg 0.86045; Mn 80.984; Mo n.a.; Ni 20.874; Pb 473.27; Sb 43.54; Se 2.128; Sn 26.555; V 291.99; Zn 566.54; Be 0.50667; Sc n.a.; Sr 89.68; Ti 1013.3; Tl 0.40534; W n.a.; Si n.a.; Fe 3775.4; Ca n.a.; Al 202.67; K n.a.; Mg n.a.; Na 1485; . // Share of carbon in waste that is biogenic 0%. Share of metals in waste not oxidised and bulk-recyclable (exclude very small or thin parts) Iron: 0%; Alu: 0%; Copper: 0%. Overall degradability of waste during 100 years: 1%.

## Included activities start
from final waste deposition (without transports to the site)

## Included activities end
Waste-specific short-term emissions to air via landfill gas and landfill leachate. Waste-specific long-term emissions from landfill.

## Geography
Given name of landfill location is 'infiltration class 1 hyperarid (2018)'. Landfill site with mean annual temperature (MAT) of 8 degC, mean annual precipitation (MAP) of 350 mm/year, and net infiltration of -250 mm/year. Negative infiltration means that leachate flow is reversed and flows upward to the surface, where water is evaporated and dissolved solids become solid evaporites.
Climate adjustments result in an alpha t (temperature) for permafrost areas of 0.999. Total climate adjustments with alpha pt of 0.999.

## Technology
This is an inventory for an unsanitary, sub-controlled landfill for municipal solid waste. Ultimate average landfill height is 15 meters. Operation phase duration is 25 years.Percentage of landfill gas directly emitted is 100w%.
Leachate of the landfill is not treated. Leachate flow is upward to the surface due to net negative infiltration. No leachate treatment can be performed. Based on average waste composition and climate data the end of carbonate phase is estimated to be reached 6681 years after waste deposition. Arid conditions at this location prompt formation of evaporites from landfill contents which are partially eroded by wind. It is assumed that 10% of these evaporites are eroded by wind and airborne. Initial decay in the first 100 years of this waste results in a wind erosion rate corresponding to 108.7 g/m2.year and long-term decay corresponds to wind erosion of 29.81 g/m2.year.

## Reference product
- waste polyurethane: -1 kg; By-product classification Waste; CPC 39270: Waste, parings and scrap of plastics; CAS 9009-54-5; pedigree (1,1,1,1,1)
  main reference product of this activity (supply of disposal service).
  Uncertainty: Uncertainty is not adjusted, as this is the refence product
  production volume 1 kg
    The amount of the annual production volume is a placeholder value. The contribution of this technology to the different local markets can be found in the markets themselves.
  property price 0 EUR2005
    Waste products are assigned a price of zero as they are assumed to require further treatment.
  property heating value, net 30.67 MJ
    Value taken from the general comment of the treatment dataset.
  property carbon content 0.64198
    carbon content on a dry matter basis (reserved; not for manual entry)
  properties: barium content 0.00018937, manganese content 8.1146e-5, lead content 0.00047422, fluorine content 1.4926e-5, tin content 2.6608e-5, selenium content 2.1323e-6, chlorine content 0.024418, bromine content 7.1076e-5, chromium content 4.1493e-5, cadmium content 8.2466e-5, iron content 0.0037829, aluminium content 0.00020307, beryllium content 5.0768e-7, water in wet mass 0.002 kg, sodium content 0.001488, carbon content, fossil 0.64198, thallium content 4.0615e-7, vanadium content 0.00029258, zinc content 0.00056767, strontium content 8.986e-5, dry mass 0.998 kg, wet mass 1 kg, titanium content 0.0010154, water content 0.002004, cobalt content 3.2075e-5, oxygen content 0.17906, antimony content 4.3627e-5, mercury content 8.6217e-7, nitrogen content 0.061044, hydrogen content 0.084444, nickel content 2.0916e-5, sulfur content 0.00020348, heating value, gross 30.896 MJ, copper content 0.00032253, arsenic content 1.9292e-6, carbon allocation 0.640696 kg

## Inputs from technosphere
- diesel, burned in building machine: 0.046738 MJ; lognormal variance with pedigree 0.088256, pedigree (1,1,4,1,1)
  for waste distribution and compaction.
  Uncertainty: Uncertainty calculated from uncertainty in base parameters.
  properties: heating value, net 1 MJ
- excavation, skid-steer loader: 0.00031708 m3; lognormal variance with pedigree 0.088256, pedigree (1,1,4,1,1)
  application of daily cover.
  Uncertainty: Uncertainty calculated from uncertainty in base parameters.

## Inputs from nature
- Occupation, dump site [natural resource, land]: 0.0023333 m2*year; lognormal variance with pedigree 0.088256, pedigree (1,1,4,1,1)
  for landfill operation phase and spontaneous renaturation.
  Uncertainty: Uncertainty calculated from uncertainty in base parameters.

## Emissions to nature
- Cadmium [soil, industrial]: 7.407e-5 kg; lognormal variance with pedigree 0.25425, pedigree (1,1,4,1,1)
  burden from leachate evaporite in arid climates deposited on landflill surface.
  Uncertainty: Uncertainty calculated from unertainty of the waste composition of this waste, uncertainty in waste decomposition and short-term leaching in landfill
- Lead [air, low population density, long-term]: 4.7325e-5 kg; lognormal variance with pedigree 0.19694, pedigree (1,1,4,1,1)
  burden from windblown long-term leachate evaporite in arid climates.
  Uncertainty: Uncertainty calculated from unertainty of the waste composition of this waste, uncertainty in waste decomposition and short-term leaching in landfill
- Particulates, > 10 um [air, non-urban air or from high stacks]: 0.00036217 kg; lognormal variance with pedigree 0.14784, pedigree (1,1,4,1,1)
  burden from direct release or incineration of landfill biogas; or windblown leachate evaporite in arid climates.
  Uncertainty: Uncertainty calculated from unertainty of the waste composition of this waste, uncertainty in waste decomposition and short-term leaching in landfill
- Bromine [soil, industrial]: 6.3818e-5 kg; lognormal variance with pedigree 0.25106, pedigree (1,1,4,1,1)
  (same comment as for Cadmium)
- Manganese [air, low population density, long-term]: 8.0057e-6 kg; lognormal variance with pedigree 0.25553, pedigree (1,1,4,1,1)
  (same comment as for Lead)
- Methane, fossil [air, non-urban air or from high stacks]: 0.0046348 kg; lognormal variance with pedigree 0.11256, pedigree (1,1,4,1,1)
  burden from direct release or incineration of landfill biogas.
  Uncertainty: Uncertainty calculated from unertainty of the waste composition of this waste, uncertainty in waste decomposition and short-term leaching in landfill
- Chloride [soil, industrial]: 0.021924 kg; lognormal variance with pedigree 0.070915, pedigree (1,1,4,1,1)
  (same comment as for Cadmium)
- Copper [air, low population density, long-term]: 3.2187e-5 kg; lognormal variance with pedigree 0.20968, pedigree (1,1,4,1,1)
  (same comment as for Lead)
- Carbon dioxide, fossil [air, non-urban air or from high stacks]: 0.010034 kg; lognormal variance with pedigree 0.102429, pedigree (1,1,4,1,1)
  (same comment as for Methane, fossil)
- Fluoride [soil, industrial]: 1.3356e-5 kg; lognormal variance with pedigree 0.31143, pedigree (1,1,4,1,1)
  (same comment as for Cadmium)
- Mercury [air, low population density, long-term]: 8.5963e-8 kg; lognormal variance with pedigree 0.40522, pedigree (1,1,4,1,1)
  (same comment as for Lead)
- Carbon [soil, industrial]: 0.57104 kg; lognormal variance with pedigree 0.0095027, pedigree (1,1,4,1,1)
  (same comment as for Cadmium)
- Nickel [air, low population density, long-term]: 2.0862e-6 kg; lognormal variance with pedigree 0.30061, pedigree (1,1,4,1,1)
  (same comment as for Lead)
- Nitrogen [soil, industrial]: 0.054742 kg; lognormal variance with pedigree 0.048021, pedigree (1,1,4,1,1)
  (same comment as for Cadmium)
- Chromium [air, low population density, long-term]: 2.6577e-8 kg; lognormal variance with pedigree 1.8709, pedigree (1,1,4,1,1)
  (same comment as for Lead)
- Sulfur [soil, industrial]: 0.00018265 kg; lognormal variance with pedigree 0.22359, pedigree (1,1,4,1,1)
  (same comment as for Cadmium)
- Cobalt [air, low population density, long-term]: 3.1909e-6 kg; lognormal variance with pedigree 0.28641, pedigree (1,1,4,1,1)
  (same comment as for Lead)
- Heat, waste [water, ground-, long-term]: 30.587 MJ; lognormal variance with pedigree 0.020651, pedigree (1,1,4,1,1)
  burden from long-term decomposition of waste (>100a).
  Uncertainty: Uncertainty calculated from unertainty of the waste composition of this waste, uncertainty in waste decomposition and short-term leaching in landfill
- Barium [air, low population density, long-term]: 1.8683e-5 kg; lognormal variance with pedigree 0.22734, pedigree (1,1,4,1,1)
  (same comment as for Lead)
- Aluminium [air, non-urban air or from high stacks]: 1.0144e-8 kg; lognormal variance with pedigree 0.40918, pedigree (1,1,4,1,1)
  (same comment as for Particulates, > 10 um)
- Arsenic [air, low population density, long-term]: 1.9218e-7 kg; lognormal variance with pedigree 0.37907, pedigree (1,1,4,1,1)
  (same comment as for Lead)
- Heat, waste [soil, industrial]: 0.20485 MJ; lognormal variance with pedigree 0.080244, pedigree (1,1,4,1,1)
  burden from short-term decomposition of waste (0-100a).
  Uncertainty: Uncertainty calculated from unertainty of the waste composition of this waste, uncertainty in waste decomposition and short-term leaching in landfill
- Cadmium [air, low population density, long-term]: 8.2155e-6 kg; lognormal variance with pedigree 0.25499, pedigree (1,1,4,1,1)
  (same comment as for Lead)
- Sodium [air, non-urban air or from high stacks]: 6.1534e-6 kg; lognormal variance with pedigree 0.20977, pedigree (1,1,4,1,1)
  (same comment as for Particulates, > 10 um)
- Hydrogen fluoride [air, low population density, long-term]: 1.4829e-6 kg; lognormal variance with pedigree 0.31179, pedigree (1,1,4,1,1)
  (same comment as for Lead)
- Iron [air, non-urban air or from high stacks]: 5.1922e-8 kg; lognormal variance with pedigree 0.35661, pedigree (1,1,4,1,1)
  (same comment as for Particulates, > 10 um)
- Bromine [air, low population density, long-term]: 6.9125e-6 kg; lognormal variance with pedigree 0.25995, pedigree (1,1,4,1,1)
  (same comment as for Lead)
- Titanium [air, non-urban air or from high stacks]: 5.0719e-8 kg; lognormal variance with pedigree 0.35623, pedigree (1,1,4,1,1)
  (same comment as for Particulates, > 10 um)
- Hydrogen chloride [air, low population density, long-term]: 0.0023747 kg; lognormal variance with pedigree 0.074095, pedigree (1,1,4,1,1)
  (same comment as for Lead)
- Thallium [air, non-urban air or from high stacks]: 2.3595e-11 kg; lognormal variance with pedigree 0.60844, pedigree (1,1,4,1,1)
  (same comment as for Particulates, > 10 um)
- Nitrate [air, low population density, long-term]: 0.026307 kg; lognormal variance with pedigree 0.049978, pedigree (1,1,4,1,1)
  (same comment as for Lead)
- Zinc [air, non-urban air or from high stacks]: 2.6865e-8 kg; lognormal variance with pedigree 0.37717, pedigree (1,1,4,1,1)
  (same comment as for Particulates, > 10 um)
- Sulfate [air, low population density, long-term]: 6.0656e-5 kg; lognormal variance with pedigree 0.22495, pedigree (1,1,4,1,1)
  (same comment as for Lead)
- Beryllium [air, non-urban air or from high stacks]: 2.9494e-11 kg; lognormal variance with pedigree 0.60128, pedigree (1,1,4,1,1)
  (same comment as for Particulates, > 10 um)
- Particulates, < 2.5 um [air, low population density, long-term]: 0.023811 kg; lognormal variance with pedigree 0.13121, pedigree (1,1,4,1,1)
  (same comment as for Lead)
- Strontium [air, non-urban air or from high stacks]: 5.2204e-9 kg; lognormal variance with pedigree 0.43131, pedigree (1,1,4,1,1)
  (same comment as for Particulates, > 10 um)
- Particulates, > 2.5 um, and < 10um [air, low population density, long-term]: 0.035717 kg; lognormal variance with pedigree 0.085804, pedigree (1,1,4,1,1)
  (same comment as for Lead)
- Vanadium [air, non-urban air or from high stacks]: 3.0831e-8 kg; lognormal variance with pedigree 0.3728, pedigree (1,1,4,1,1)
  (same comment as for Particulates, > 10 um)
- Particulates, > 10 um [air, low population density, long-term]: 0.059529 kg; lognormal variance with pedigree 0.066051, pedigree (1,1,4,1,1)
  (same comment as for Lead)
- Tin [air, non-urban air or from high stacks]: 1.5668e-10 kg; lognormal variance with pedigree 0.54719, pedigree (1,1,4,1,1)
  (same comment as for Particulates, > 10 um)
- Aluminium [soil, industrial]: 0.0001824 kg; lognormal variance with pedigree 0.22481, pedigree (1,1,4,1,1)
  (same comment as for Cadmium)
- Antimony [air, non-urban air or from high stacks]: 4.5973e-9 kg; lognormal variance with pedigree 0.43596, pedigree (1,1,4,1,1)
  (same comment as for Particulates, > 10 um)
- Sodium [soil, industrial]: 0.0013365 kg; lognormal variance with pedigree 0.14963, pedigree (1,1,4,1,1)
  (same comment as for Cadmium)
- Selenium [air, non-urban air or from high stacks]: 2.2469e-10 kg; lognormal variance with pedigree 0.53546, pedigree (1,1,4,1,1)
  (same comment as for Particulates, > 10 um)
- Iron [soil, industrial]: 0.0033978 kg; lognormal variance with pedigree 0.12974, pedigree (1,1,4,1,1)
  (same comment as for Cadmium)
- Manganese [air, non-urban air or from high stacks]: 9.2868e-8 kg; lognormal variance with pedigree 0.34111, pedigree (1,1,4,1,1)
  (same comment as for Particulates, > 10 um)
- Thallium [soil, industrial]: 3.648e-7 kg; lognormal variance with pedigree 0.42912, pedigree (1,1,4,1,1)
  (same comment as for Cadmium)
- Nickel [air, non-urban air or from high stacks]: 1.2151e-9 kg; lognormal variance with pedigree 0.47971, pedigree (1,1,4,1,1)
  (same comment as for Particulates, > 10 um)
- Titanium [soil, industrial]: 0.000912 kg; lognormal variance with pedigree 0.1718, pedigree (1,1,4,1,1)
  (same comment as for Cadmium)
- Lead [air, non-urban air or from high stacks]: 2.7945e-9 kg; lognormal variance with pedigree 0.45109, pedigree (1,1,4,1,1)
  (same comment as for Particulates, > 10 um)
- Strontium [soil, industrial]: 8.0712e-5 kg; lognormal variance with pedigree 0.25187, pedigree (1,1,4,1,1)
  (same comment as for Cadmium)
- Copper [air, non-urban air or from high stacks]: 1.5788e-9 kg; lognormal variance with pedigree 0.47023, pedigree (1,1,4,1,1)
  (same comment as for Particulates, > 10 um)
- Zinc [soil, industrial]: 0.00050988 kg; lognormal variance with pedigree 0.19084, pedigree (1,1,4,1,1)
  (same comment as for Cadmium)
- Mercury [air, non-urban air or from high stacks]: 2.9435e-10 kg; lognormal variance with pedigree 0.52699, pedigree (1,1,4,1,1)
  (same comment as for Particulates, > 10 um)
- Vanadium [soil, industrial]: 0.00010169 kg; lognormal variance with pedigree 0.26846, pedigree (1,1,4,1,1)
  (same comment as for Cadmium)
- Chromium [air, non-urban air or from high stacks]: 4.7261e-10 kg; lognormal variance with pedigree 0.51061, pedigree (1,1,4,1,1)
  (same comment as for Particulates, > 10 um)
- Beryllium [soil, industrial]: 4.56e-7 kg; lognormal variance with pedigree 0.42196, pedigree (1,1,4,1,1)
  (same comment as for Cadmium)
- Cobalt [air, non-urban air or from high stacks]: 1.0302e-8 kg; lognormal variance with pedigree 0.41063, pedigree (1,1,4,1,1)
  (same comment as for Particulates, > 10 um)
- Tin [soil, industrial]: 2.39e-5 kg; lognormal variance with pedigree 0.29258, pedigree (1,1,4,1,1)
  (same comment as for Cadmium)
- Sodium [air, low population density, long-term]: 0.00014237 kg; lognormal variance with pedigree 0.1596, pedigree (1,1,4,1,1)
  (same comment as for Lead)
- Cadmium [air, non-urban air or from high stacks]: 1.5428e-8 kg; lognormal variance with pedigree 0.36916, pedigree (1,1,4,1,1)
  (same comment as for Particulates, > 10 um)
- Selenium [soil, industrial]: 7.1922e-7 kg; lognormal variance with pedigree 0.43467, pedigree (1,1,4,1,1)
  (same comment as for Cadmium)
- Aluminium [air, low population density, long-term]: 2.0257e-5 kg; lognormal variance with pedigree 0.22502, pedigree (1,1,4,1,1)
  (same comment as for Lead)
- Hydrogen fluoride [air, non-urban air or from high stacks]: 6.0398e-8 kg; lognormal variance with pedigree 0.42445, pedigree (1,1,4,1,1)
  (same comment as for Particulates, > 10 um)
- Antimony [soil, industrial]: 5.4908e-6 kg; lognormal variance with pedigree 0.51659, pedigree (1,1,4,1,1)
  (same comment as for Cadmium)
- Iron [air, low population density, long-term]: 0.00037748 kg; lognormal variance with pedigree 0.12978, pedigree (1,1,4,1,1)
  (same comment as for Lead)
- Barium [air, non-urban air or from high stacks]: 2.1672e-7 kg; lognormal variance with pedigree 0.31299, pedigree (1,1,4,1,1)
  (same comment as for Particulates, > 10 um)
- Lead [soil, industrial]: 0.00042595 kg; lognormal variance with pedigree 0.19692, pedigree (1,1,4,1,1)
  (same comment as for Cadmium)
- Thallium [air, low population density, long-term]: 4.051e-8 kg; lognormal variance with pedigree 0.42946, pedigree (1,1,4,1,1)
  (same comment as for Lead)
- Arsenic [air, non-urban air or from high stacks]: 3.9381e-10 kg; lognormal variance with pedigree 0.46388, pedigree (1,1,4,1,1)
  (same comment as for Particulates, > 10 um)
- Manganese [soil, industrial]: 7.2885e-5 kg; lognormal variance with pedigree 0.2513, pedigree (1,1,4,1,1)
  (same comment as for Cadmium)
- Strontium [air, low population density, long-term]: 8.9628e-6 kg; lognormal variance with pedigree 0.25213, pedigree (1,1,4,1,1)
  (same comment as for Lead)
- Hydrogen chloride [air, non-urban air or from high stacks]: 7.0126e-5 kg; lognormal variance with pedigree 0.1149, pedigree (1,1,4,1,1)
  (same comment as for Particulates, > 10 um)
- Mercury [soil, industrial]: 7.7419e-7 kg; lognormal variance with pedigree 0.40483, pedigree (1,1,4,1,1)
  (same comment as for Cadmium)
- Titanium [air, low population density, long-term]: 0.00010128 kg; lognormal variance with pedigree 0.17197, pedigree (1,1,4,1,1)
  (same comment as for Lead)
- Bromine [air, non-urban air or from high stacks]: 2.0342e-7 kg; lognormal variance with pedigree 0.27773, pedigree (1,1,4,1,1)
  (same comment as for Particulates, > 10 um)
- Nickel [soil, industrial]: 1.8786e-5 kg; lognormal variance with pedigree 0.30032, pedigree (1,1,4,1,1)
  (same comment as for Cadmium)
- Beryllium [air, low population density, long-term]: 5.0637e-8 kg; lognormal variance with pedigree 0.42229, pedigree (1,1,4,1,1)
  (same comment as for Lead)
- Nitrate [air, non-urban air or from high stacks]: 0.0006297 kg; lognormal variance with pedigree 0.11669, pedigree (1,1,4,1,1)
  burden from windblown leachate evaporite in arid climates.
  Uncertainty: Uncertainty calculated from unertainty of the waste composition of this waste, uncertainty in waste decomposition and short-term leaching in landfill
- Copper [soil, industrial]: 0.0002897 kg; lognormal variance with pedigree 0.20966, pedigree (1,1,4,1,1)
  (same comment as for Cadmium)
- Zinc [air, low population density, long-term]: 5.6627e-5 kg; lognormal variance with pedigree 0.19102, pedigree (1,1,4,1,1)
  (same comment as for Lead)
- Sulfate [air, non-urban air or from high stacks]: 2.2659e-7 kg; lognormal variance with pedigree 0.34627, pedigree (1,1,4,1,1)
  (same comment as for Nitrate)
- Cobalt [soil, industrial]: 2.881e-5 kg; lognormal variance with pedigree 0.28503, pedigree (1,1,4,1,1)
  (same comment as for Cadmium)
- Vanadium [air, low population density, long-term]: 1.1268e-5 kg; lognormal variance with pedigree 0.26954, pedigree (1,1,4,1,1)
  (same comment as for Lead)
- Nitrogen oxides [air, non-urban air or from high stacks]: 8.3453e-7 kg; lognormal variance with pedigree 0.20891, pedigree (1,1,4,1,1)
  (same comment as for Methane, fossil)
- Chromium [soil, industrial]: 2.4344e-7 kg; lognormal variance with pedigree 1.8703, pedigree (1,1,4,1,1)
  (same comment as for Cadmium)
- Selenium [air, low population density, long-term]: 7.9689e-8 kg; lognormal variance with pedigree 0.43608, pedigree (1,1,4,1,1)
  (same comment as for Lead)
- Particulates, < 2.5 um [air, non-urban air or from high stacks]: 0.00014487 kg; lognormal variance with pedigree 0.213, pedigree (1,1,4,1,1)
  (same comment as for Particulates, > 10 um)
- Arsenic [soil, industrial]: 1.7328e-6 kg; lognormal variance with pedigree 0.37814, pedigree (1,1,4,1,1)
  (same comment as for Cadmium)
- Tin [air, low population density, long-term]: 2.6553e-6 kg; lognormal variance with pedigree 0.29261, pedigree (1,1,4,1,1)
  (same comment as for Lead)
- Particulates, > 2.5 um, and < 10um [air, non-urban air or from high stacks]: 0.0002173 kg; lognormal variance with pedigree 0.1676, pedigree (1,1,4,1,1)
  (same comment as for Particulates, > 10 um)
- Barium [soil, industrial]: 0.00017009 kg; lognormal variance with pedigree 0.22342, pedigree (1,1,4,1,1)
  (same comment as for Cadmium)
- Antimony [air, low population density, long-term]: 6.055e-7 kg; lognormal variance with pedigree 0.51937, pedigree (1,1,4,1,1)
  (same comment as for Lead)
- Sulfur dioxide [air, non-urban air or from high stacks]: 2.6469e-7 kg; lognormal variance with pedigree 0.4021, pedigree (1,1,4,1,1)
  (same comment as for Methane, fossil)

## Extrapolations
This dataset has been extrapolated from year 2012 to the year of the calculation (2021). The uncertainty has been adjusted accordingly.
