# orange production, processing grade

Dataset: EcoSpold 2, unit process
Geography: BR
Time period: 2000-01-01 to 2021-12-31
Technology level: current
Classification: ISIC rev.4 ecoinvent: 0123:Growing of citrus fruits
Tags: WFLDB
Scenario: Business-as-Usual
System model: Allocation, cut-off by classification
Generated by: Xavier Bengoa
Published in: Nemecek T. 2015
Database: ecoinvent
isCopyrightProtected: true
accessRestrictedTo: 1

## General comment
This dataset represents the production of 1 kg of orange, processing grade (Pera, Valencia and Natal). Processing grade oranges are used for orange juice concentrate production. The reference flow is the average yield per ha and year, from 2000 - 2004: yield (30.6 t/ha) obtained under irrigated conditions (total amount of water 883 m3/ha). The data are representative for orange production, processing grade (Pera, Valencia and Natal), in Brazil (Sao Paulo state) used for the export market. Mineral NPK fertiliser input is 194-35-129 kg/ha. No organic fertilisers are applied. Total active ingredients (a.i.) applied as pesticides amount to 6.9 kg a.i./ha and 34.2 kg/ha of horticultural oil.
The dataset was modelled within the project 'World Food LCA database (WFLDB)'. The aim of this project was to provide inventories of a broad variety of agricultural products and processes and to cover for each product at least 50% of the global export market. The export share of processing grade oranges produced in Brazil amounts to 51% of the global export (tonnage exported in 2010). The production system regarded in this dataset aimed at representing processing grade oranges produced in Brazil or the export market.
PEF-Quality: data quality rating (DQR) = 1.7 (i.e. very good quality). This dataset refers to an average situation; for specific situations exchanges might differ substantially due to site specific parameters

## Included activities start
This activity starts with the nursery producing fruit tree seedlings, i.e.grafted young trees to be planted.

## Included activities end
This activity ends with the waste treatment after the clearing of the orchard (rooting up the trees). The dataset includes all activities during a year in the productive phase of the orchard including the establishment phase per year of lifetime (20 years), the clearing of the orchard including waste treatment.
The establishment phase of the orchard includes tree nursery, soil cultivation, planting trees, sowing grass, installation of trellis system (posts and wires) and irrigation. Fertiliser and pesticide use in a year of the establishment phase is assumed to be half of the amount of a year in the productive phase.
The productive phase of the orchard includes machine operations, corresponding infrastructure, fuel use and sheds. Machine operations in the productive phase are: soil cultivation (mulching, mowing), fertiliser and pesticide application, harvesting and irrigation. Further, direct field emissions and land use change are included. At the end of the productive phase the orchard is cleared by rooting up the trees.
The inputs of seedlings, fertilisers and pesticides as well as packaging of fertilisers and pesticides are considered. The dataset doesn't include emissions from manure storage because these are within the system boundary of animal production. Heavy metal uptake by the crop is considered.

## Technology
Conventional production

## Time period
Time period referring to the data source: 2000-2004. Based on expert opinion data is considered to be valid at least up to 2012.

## Parameters
- heavyMetalUptakeSwitch: 1 dimensionless
- LUC_crop_specific: 1 dimensionless
  This parameter allows to switch between a 'crop specific' and a 'country specific' approach when calculating the LUC of a crop. By default, the chosen approach is 'crop specific', so the value of the parameter is 1. If you want to apply a 'country specific' approach, turn the parameter to 0.

## Reference product
- orange, processing grade: 1 kg; CPC 01323: Oranges; By-product classification allocatable product
  Orange, precessing grade, Brazilian production
  Yield = 30576.0 kg/haOutput of orange, processing grade, used for orange juice concentrate production
  production volume 1.84863e10 kg
    Source: FAOSTAT. Average, 2009-2012
  property price 0.16 EUR2005
    Personal communication with the Technical Head of Citrus at Core Fruit, South Africa on 26.04.2018
  property carbon content, non-fossil 0.350629
    calculation: C-content of components according to ecoinvent report No. 15a. Source of composition: Souci, S.W., Fachmann, W., Kraut, H. (Hg.: Bundesminsiterium fur Ernahrung, Landwirtschaft und Forsten, Bonn) 'Die Zusammensetzung der Lebensmittel - Nahrwerttabellen', medpharm Scientific Publishers Stuttgart, CRC Press; 2000.
  property carbon content 0.350629
    carbon content on a dry matter basis (reserved; not for manual entry)
  properties: dry mass 0.542888 kg, water content 0.842, wet mass 1 kg, carbon content, fossil 0, water in wet mass 0.457112 kg, carbon allocation 0.190353 kg

## Inputs from technosphere
- lime: 1.87552e-6 kg; source Coltro, L. 2009; lognormal variance with pedigree 0.124177, pedigree (2,1,4,1,1)
  Calculated based on literature values or expert estimation: The total amount of nutrient (Coltro et al. 2009) multiplied by the share of fertiliser type (Coltro et al. 2009). See supporting documentation 'WFLDB-Documentation.pdf' chapter 'Fertiliser application' for L3 and L4 data (https://ecoquery.ecoinvent.org/File/Reports).
  Corresponds to 0.0573 kg/ha
  properties: wet mass 1 kg, dry mass 1 kg, carbon content, fossil 0.120005
- mowing, by motor mower: 7.19126e-5 ha; lognormal variance with pedigree 0.124177, pedigree (2,1,4,1,1)
  Proxy: Extrapolated using a modified MEXALCA-approach (Roches et al. 2010; Nemecek et al. 2012). See supporting documentation 'WFLDB-Documentation.pdf' chapter 'Machinery processes' for L1 data (https://ecoquery.ecoinvent.org/File/Reports).
- fertilising, by broadcaster: 8.62932e-5 ha; lognormal variance with pedigree 0.124177, pedigree (2,1,4,1,1)
  Proxy: Extrapolated using a modified MEXALCA-approach (Roches et al. 2010; Nemecek et al. 2012). See supporting documentation 'WFLDB-Documentation.pdf' chapter 'Machinery processes' for L1 data (https://ecoquery.ecoinvent.org/File/Reports).;activityLink introduced to establish a direct link to the corresponding regional supply of this product
- mulching: 2.21474e-5 ha; lognormal variance with pedigree 0.124177, pedigree (2,1,4,1,1)
  (same comment as for mowing, by motor mower)
- application of plant protection product, by field sprayer: 0.000129441 ha; lognormal variance with pedigree 0.124664, pedigree (2,2,4,1,1)
  Proxy: Extrapolated using a modified MEXALCA-approach (Roches et al. 2010; Nemecek et al. 2012). See supporting documentation 'WFLDB-Documentation.pdf' chapter 'Machinery processes' for L1 data (https://ecoquery.ecoinvent.org/File/Reports). Field sprayer used as a proxy for pesticide application in orchards.;activityLink introduced to establish a direct link to the corresponding regional supply of this product
- transport, tractor and trailer, agricultural: 0.000261408 metric ton*km; lognormal variance with pedigree 0.162439, pedigree (4,1,4,1,1)
  On-farm transport: Yield (in tonnes) multiplied by the average distance from field to farm. The distance was obtained by extrapolation (modified MEXALCA approach). See supporting documentation 'WFLDB-Documentation.pdf' chapter 'Machinery processes' (https://ecoquery.ecoinvent.org/File/Reports).
- naphtha: 0.00112 kg; source Coltro, L. 2009; lognormal variance with pedigree 0.0138498, pedigree (2,2,4,1,1)
  Literature value or expert estimation (Coltro et al. 2009). Proxy for horticultoral oil.
  properties: wet mass 1 kg, heating value, net 45 MJ, dry mass 1 kg, carbon content, fossil 0.919743
- packaging, for fertilisers: 0.0234598 kg; lognormal variance with pedigree 0.0592, pedigree (4,3,4,5,4)
  Total amount of active substance/s of fertilisers needed for the production of 'orange, processing grade' is calculated to be circa 1.17E-02 kg. Fertiliser/s used in this dataset is/are: 'ammonium nitrate, as N', 'ammonium sulfate, as N', 'lime', 'nitrogen fertiliser, as N', 'phosphate fertiliser, as P2O5', 'phosphate rock, as P2O5, beneficiated, dry', 'potassium chloride, as K2O', 'potassium fertiliser, as K2O', 'potassium sulfate, as K2O', 'urea, as N'. The total amount of active substance/s is doubled in order to account for the packaging of the dilluted product of fertiliser/s that is/are applied. Therefore, 2.35E-02 kg of packaging for fertilisers is justified with this exchange.
  properties: carbon content, fossil 0.825301, price 0.0642 EUR2005, wet mass 1 kg, heating value, net 25.01 MJ, dry mass 1 kg
  note on carbon content, fossil: Considering a chemical formula (C2H4)n for polyethylene, carbon content-fossil is calculated to be 0.856286 kg of Carbon per kg of dry mass.
- establishing orchard: 0.000354297 unit; source Coltro, L. 2009; lognormal variance with pedigree 0.124177, pedigree (2,1,4,1,1)
  Literature value or expert estimation (Coltro et al. 2009). This is the number of trees per ha divided by the lifetime years of the orchard.
- irrigation: 0.0288628 m3; lognormal variance with pedigree 0.124177, pedigree (2,1,4,1,1)
  Calculated value: The total amount of water used for irrigation (calculated from evapotranspiration, Pfister et al. 2011) multiplied by the share of irrigation technique (Expert judgement based on literature data). See supporting documentation 'WFLDB-Documentation.pdf' chapter 'Water use for irrigation' for L1 data (https://ecoquery.ecoinvent.org/File/Reports).
  properties: dry mass 0.11 kg, water content 9089.91, wet mass 1000 kg
- inorganic nitrogen fertiliser, as N: 0.00291111 kg; source Coltro, L. 2009; lognormal variance with pedigree 0.124177, pedigree (2,1,4,1,1)
  Calculated based on literature values or expert estimation: The total amount of nutrient (Coltro et al. 2009 AND FAO 2004) multiplied by the country-share of fertiliser type (IFA 2014). See supporting documentation 'WFLDB-Documentation.pdf' chapter 'Fertiliser application' for L3 and L4 data (https://ecoquery.ecoinvent.org/File/Reports).
  properties: dry mass 1 kg, wet mass 1 kg
- planting tree: 0.000354297 unit; source Coltro, L. 2009; lognormal variance with pedigree 0.124177, pedigree (2,1,4,1,1)
  (same comment as for establishing orchard)
- inorganic phosphorus fertiliser, as P2O5: 0.00112911 kg; source Coltro, L. 2009; lognormal variance with pedigree 0.124177, pedigree (2,1,4,1,1)
  Calculated based on literature values or expert estimation: The total amount of nutrient (Coltro et al. 2009 AND FAO 2004) multiplied by the country-share of fertiliser type (IFA 2014). See supporting documentation 'WFLDB-Documentation.pdf' chapter 'Fertiliser application' for L3 and L4 data (https://ecoquery.ecoinvent.org/File/Reports).
  Corresponds to 0.846 kg/ha
  properties: wet mass 1 kg, dry mass 1 kg
- fruit tree seedling, for planting: 0.000354297 unit; source Coltro, L. 2009; lognormal variance with pedigree 0.124177, pedigree (2,1,4,1,1)
  (same comment as for establishing orchard)
  properties: carbon content, non-fossil 0.439481, water content 0.73, wet mass 1 kg, dry mass 0.578035 kg
  note on carbon content, non-fossil: calculation: C-content of components according to ecoinvent report No. 15a. Source of composition: https://ndb.nal.usda.gov/ndb/search/. Unspecific seedling used as proxy.
- glyphosate: 0.000149 kg
  Literature value or expert estimation (Coltro et al. 2009). Proxy for herbicide unspecified.
  properties: dry mass 1 kg, carbon content, fossil 0.214286, wet mass 1 kg
- organophosphorus-compound, unspecified: 2.63e-5 kg
  Literature value or expert estimation (Coltro et al. 2009). Proxy for insecticide unspecified (e.g. Chlorpyrifos).
  properties: wet mass 1 kg, carbon content, fossil 0.260898, dry mass 1 kg
- benzimidazole-compound: 4.8999e-5 kg
  Literature value or expert estimation (Coltro et al. 2009). Proxy for fungicide unspecified (e.g. Carbendazim).
  properties: wet mass 1 kg, dry mass 1 kg, carbon content, fossil 0.529668
- ammonium nitrate: 0.0027663 kg; source Coltro, L. 2009; lognormal variance with pedigree 0.124177, pedigree (2,1,4,1,1)
  The exchange has been updated from 'ammonium nitrate, as N' into 'ammonium nitrate' and therefore its amount has been scaled (multiplied) from 0.001 kg by 2.8573 kg of 'ammonium nitrate' per kg of 'ammonium nitrate, as N'. Original comment of the exchange is: Calculated based on literature values or expert estimation: The total amount of nutrient (Coltro et al. 2009 AND FAO 2004) multiplied by the country-share of fertiliser type (IFA 2014). See supporting documentation 'WFLDB-Documentation.pdf' chapter 'Fertiliser application' for L3 and L4 data (https://ecoquery.ecoinvent.org/File/Reports).
  Corresponds to 29.6 kg/ha
  properties: wet mass 1 kg, dry mass 1 kg
- waste wood, untreated: -0.0435963 kg; lognormal variance with pedigree 0.124177, pedigree (2,1,4,1,1)
  Wood from trees after 1-2 years of sorrage at the field (20% water) per lifetime year (20 years) of the orchard
  production volume 8.05934e8 kg
    Calculated from the reference product amount and production volume
  properties: water content 0.25, dry mass 0.8 kg, wet mass 1 kg, carbon content, non-fossil 0.48632, heating value, net 13.99 MJ
  note on heating value, net: Value taken from the general comment of the treatment dataset.
- ammonium sulfate: 0.000823097 kg; source Coltro, L. 2009; lognormal variance with pedigree 0.124177, pedigree (2,1,4,1,1)
  Calculated based on literature values or expert estimation: The total amount of nutrient (Coltro et al. 2009 AND FAO 2004) multiplied by the country-share of fertiliser type (IFA 2014). See supporting documentation 'WFLDB-Documentation.pdf' chapter 'Fertiliser application' for L3 and L4 data (https://ecoquery.ecoinvent.org/File/Reports).
  Corresponds to 25.2 kg/ha
  properties: dry mass 1 kg, wet mass 1 kg
- packaging, for pesticides: 0.000448598 kg; lognormal variance with pedigree 0.0592, pedigree (4,3,4,5,4)
  Total amount of active substance/s of pesticides needed for the production of orange, processing grade is calculated to be circa 2.24E-04 kg. Pesticide/s used in this dataset is/are: 'benzimidazole-compound', 'glyphosate', 'organophosphorus-compound, unspecified'. The total amount of active substance/s is doubled in order to account for the packaging of the dilluted product of pesticide/s that is/are applied. Therefore, 4.49E-04 kg of packaging for pesticides is justified with this exchange.
  properties: wet mass 1 kg, heating value, net 25.97 MJ, carbon content, fossil 0.85714, dry mass 1 kg, price 0.0642 EUR2005
- urea: 0.00352118 kg; source Coltro, L. 2009; lognormal variance with pedigree 0.124177, pedigree (2,1,4,1,1)
  The exchange has been updated from 'urea, as N' into 'urea' and therefore its amount has been scaled (multiplied) from 0.0016 kg by 2.1438 kg of 'urea' per kg of 'urea, as N'. Original comment of the exchange is: Calculated based on literature values or expert estimation: The total amount of nutrient (Coltro et al. 2009 AND FAO 2004) multiplied by the country-share of fertiliser type (IFA 2014). See supporting documentation 'WFLDB-Documentation.pdf' chapter 'Fertiliser application' for L3 and L4 data (https://ecoquery.ecoinvent.org/File/Reports).
  Corresponds to 50.2 kg/ha
  properties: dry mass 1 kg, wet mass 1 kg, carbon content, fossil 0.2
- phosphate rock, beneficiated: 7.93494e-5 kg; source Coltro, L. 2009; lognormal variance with pedigree 0.124177, pedigree (2,1,4,1,1)
  The exchange has been updated from 'phosphate rock, as P2O5, beneficiated, dry' into 'phosphate rock, beneficiated' and therefore its amount has been scaled (multiplied) from 0 kg by 3.125 kg of 'phosphate rock, beneficiated' per kg of 'phosphate rock, as P2O5, beneficiated, dry'. Original comment of the exchange is: Calculated based on literature values or expert estimation: The total amount of nutrient (Coltro et al. 2009 AND FAO 2004) multiplied by the country-share of fertiliser type (IFA 2014). See supporting documentation 'WFLDB-Documentation.pdf' chapter 'Fertiliser application' for L3 and L4 data (https://ecoquery.ecoinvent.org/File/Reports).
  Corresponds to 0.776 kg/ha
  properties: wet mass 1 kg, dry mass 1 kg
- potassium chloride: 0.00652759 kg; source Coltro, L. 2009; lognormal variance with pedigree 0.124177, pedigree (2,1,4,1,1)
  The exchange has been updated from 'potassium chloride, as K2O' into 'potassium chloride' and therefore its amount has been scaled (multiplied) from 0.0041 kg by 1.5829 kg of 'potassium chloride' per kg of 'potassium chloride, as K2O'. Original comment of the exchange is: Calculated based on literature values or expert estimation: The total amount of nutrient (Coltro et al. 2009 AND FAO 2004) multiplied by the country-share of fertiliser type (IFA 2014). See supporting documentation 'WFLDB-Documentation.pdf' chapter 'Fertiliser application' for L3 and L4 data (https://ecoquery.ecoinvent.org/File/Reports).
  Corresponds to 126.0 kg/ha
  properties: wet mass 1 kg, dry mass 1 kg
- inorganic potassium fertiliser, as K2O: 9.44466e-5 kg; source Coltro, L. 2009; lognormal variance with pedigree 0.124177, pedigree (2,1,4,1,1)
  Calculated based on literature values or expert estimation: The total amount of nutrient (Coltro et al. 2009 AND FAO 2004) multiplied by the country-share of fertiliser type (IFA 2014). See supporting documentation 'WFLDB-Documentation.pdf' chapter 'Fertiliser application' for L3 and L4 data (https://ecoquery.ecoinvent.org/File/Reports).
  Corresponds to 2.89 kg/ha
  properties: dry mass 1 kg, wet mass 1 kg
- potassium sulfate: 1.92656e-5 kg; source Coltro, L. 2009; lognormal variance with pedigree 0.124177, pedigree (2,1,4,1,1)
  The exchange has been updated from 'potassium sulfate, as K2O' into 'potassium sulfate' and therefore its amount has been scaled (multiplied) from 0 kg by 1.85 kg of 'potassium sulfate' per kg of 'potassium sulfate, as K2O'. Original comment of the exchange is: Calculated based on literature values or expert estimation: The total amount of nutrient (Coltro et al. 2009 AND FAO 2004) multiplied by the country-share of fertiliser type (IFA 2014). See supporting documentation 'WFLDB-Documentation.pdf' chapter 'Fertiliser application' for L3 and L4 data (https://ecoquery.ecoinvent.org/File/Reports).
  Corresponds to 0.318 kg/ha
  properties: wet mass 1 kg, dry mass 1 kg

## Inputs from nature
- Transformation, from permanent crop, irrigated [natural resource, land]: 0.0163527 m2; lognormal variance with pedigree 0.0442144, pedigree (2,1,4,1,1)
  10000 m2 divided by the life time of the perennial crop (20 years).
- Energy, gross calorific value, in biomass [natural resource, biotic]: 2.55056 MJ; lognormal variance with pedigree 0.0138498, pedigree (2,2,4,1,1)
  Calculated value: dry matter content = 16%
- Occupation, permanent crop, irrigated [natural resource, land]: 0.327937 m2*year; lognormal variance with pedigree 0.0200616, pedigree (2,1,4,1,1)
  Related to the duration from harvest date of previous crop to harvest date of main crop.
- Transformation, to permanent crop, irrigated [natural resource, land]: 0.0163527 m2; lognormal variance with pedigree 0.0442144, pedigree (2,1,4,1,1)
  10000 m2 divided by the life time of the perennial crop (20 years).
- Carbon dioxide, in air [natural resource, in air]: 0.222495 kg; lognormal variance with pedigree 0.0138498, pedigree (2,2,4,1,1)
  Calculated value: CO2 uptake by biomass. Dry matter content = 16%

## Emissions to nature
- Cadmium, ion [water, ground-]: 1.38537e-9 kg; source Freiermuth R.  2006; lognormal variance with pedigree 0.356938, pedigree (2,2,4,1,1)
  Calculated value - Freiermuth (2006). See 'WFLDB-Guidelines.pdf', available at https://ecoquery.ecoinvent.org/File/Reports.
- Chromium, ion [water, ground-]: 6.32718e-7 kg; source Freiermuth R.  2006; lognormal variance with pedigree 0.356938, pedigree (2,2,4,1,1)
  (same comment as for Cadmium, ion)
- Carbon dioxide, fossil [air, non-urban air or from high stacks]: 0.00386905 kg; lognormal variance with pedigree 0.0138498, pedigree (2,2,4,1,1)
  Calculated value - CO2 emissions from urea and lime. See 'WFLDB-Guidelines.pdf', available at https://ecoquery.ecoinvent.org/File/Reports.
- Copper, ion [water, ground-]: 9.74588e-8 kg; source Freiermuth R.  2006; lognormal variance with pedigree 0.356938, pedigree (2,2,4,1,1)
  (same comment as for Cadmium, ion)
- Ammonia [air, non-urban air or from high stacks]: 0.000776818 kg; source EEA 2013; lognormal variance with pedigree 0.0447216, pedigree (2,2,4,1,1)
  Calculated value - EMEP/EEA (2013). See 'WFLDB-Guidelines.pdf', available at https://ecoquery.ecoinvent.org/File/Reports.
- Lead [water, ground-]: 6.72325e-9 kg; source Freiermuth R.  2006; lognormal variance with pedigree 0.356938, pedigree (2,2,4,1,1)
  (same comment as for Cadmium, ion)
- Nitrogen oxides [air, non-urban air or from high stacks]: 0.000250167 kg; source EEA 2013; lognormal variance with pedigree 0.124664, pedigree (2,2,4,1,1)
  Calculated value - EEA/EMEP (2013). See 'WFLDB-Guidelines.pdf', available at https://ecoquery.ecoinvent.org/File/Reports.
- Mercury [water, ground-]: 5.4013e-11 kg; source Freiermuth R.  2006; lognormal variance with pedigree 0.356938, pedigree (2,2,4,1,1)
  (same comment as for Cadmium, ion)
- Dinitrogen monoxide [air, non-urban air or from high stacks]: 0.000136553 kg; source IPCC 2006; lognormal variance with pedigree 0.124664, pedigree (2,2,4,1,1)
  Calculated value - IPCC (2006). See 'WFLDB-Guidelines.pdf', available at https://ecoquery.ecoinvent.org/File/Reports.
- Nickel, ion [water, ground-]: 6.85668e-12 kg; source Freiermuth R.  2006; lognormal variance with pedigree 0.356938, pedigree (2,2,4,1,1)
  (same comment as for Cadmium, ion)
- Water [air, non-urban air or from high stacks]: 0.0207817 m3; lognormal variance with pedigree 0.124177, pedigree (2,1,4,1,1)
  Calculated value - Emission calculated from water balance. See 'WFLDB-Guidelines.pdf', available at https://ecoquery.ecoinvent.org/File/Reports.
- Zinc, ion [water, ground-]: 5.00818e-7 kg; source Freiermuth R.  2006; lognormal variance with pedigree 0.356938, pedigree (2,2,4,1,1)
  (same comment as for Cadmium, ion)
- Copper, ion [water, surface water]: 1.95981e-7 kg; source Freiermuth R.  2006; lognormal variance with pedigree 0.356938, pedigree (2,2,4,1,1)
  (same comment as for Cadmium, ion)
- Water [water, surface water]: 0.00646553 m3; lognormal variance with pedigree 0.124177, pedigree (2,1,4,1,1)
  (same comment as for Water)
- Phosphorus [water, surface water]: 4.05318e-6 kg; source Prasuhn V.  2006; lognormal variance with pedigree 0.175866, pedigree (2,2,4,1,1)
  Calculated value - Prasuhn (2006) and SQCB-Erosion. See 'WFLDB-Guidelines.pdf', available at https://ecoquery.ecoinvent.org/File/Reports.
- Water [water, ground-]: 0.00161633 m3; lognormal variance with pedigree 0.124177, pedigree (2,1,4,1,1)
  (same comment as for Water)
- Nitrate [water, ground-]: 0.00602714 kg; source Faist Emmenegger M. 2009; lognormal variance with pedigree 0.175866, pedigree (2,2,4,1,1)
- Chromium [soil, agricultural]: 3.40467e-7 kg; = 4.26576399791e-07 + ( - 8.61098574045e-08)*heavyMetalUptakeSwitch; source Freiermuth R.  2006
  Comment on mathematicalRelation:
  4.26576399791e-07 from Calculated value - Freiermuth (2006). See 'WFLDB-Guidelines.pdf', available at https://ecoquery.ecoinvent.org/File/Reports.
  -8.61098574045e-08 from Crop, default, heavy metals uptake model
  Heavy metal uptake can be excluded by setting the parameter heavyMetalUptakeSwitch to zero.
- Cadmium [soil, agricultural]: 1.05663e-7 kg; = 1.21706567242e-07 + ( - 1.60432934328e-08)*heavyMetalUptakeSwitch; source Freiermuth R.  2006
  Comment on mathematicalRelation:
  1.21706567242e-07 from Calculated value - Freiermuth (2006). See 'WFLDB-Guidelines.pdf', available at https://ecoquery.ecoinvent.org/File/Reports.
  -1.60432934328e-08 from Crop, default, heavy metals uptake model
  Heavy metal uptake can be excluded by setting the parameter heavyMetalUptakeSwitch to zero.
- Copper [soil, agricultural]: -9.72209e-7 kg; = 7.48397435897e-08 + ( - 1.04704846612e-06)*heavyMetalUptakeSwitch; source Freiermuth R.  2006
  Comment on mathematicalRelation:
  7.48397435897e-08 from Calculated value - Freiermuth (2006). See 'WFLDB-Guidelines.pdf', available at https://ecoquery.ecoinvent.org/File/Reports.
  -1.04704846612e-06 from Crop, default, heavy metals uptake model
  Heavy metal uptake can be excluded by setting the parameter heavyMetalUptakeSwitch to zero.
- Lead [soil, agricultural]: 1.73667e-7 kg; = 2.59108451073e-07 + ( - 8.54415185113e-08)*heavyMetalUptakeSwitch; source Freiermuth R.  2006
  Comment on mathematicalRelation:
  2.59108451073e-07 from Calculated value - Freiermuth (2006). See 'WFLDB-Guidelines.pdf', available at https://ecoquery.ecoinvent.org/File/Reports.
  -8.54415185113e-08 from Crop, default, heavy metals uptake model
  Heavy metal uptake can be excluded by setting the parameter heavyMetalUptakeSwitch to zero.
- Chromium, ion [water, surface water]: 1.49159e-7 kg; source Freiermuth R.  2006; lognormal variance with pedigree 0.356938, pedigree (2,2,4,1,1)
  (same comment as for Cadmium, ion)
- Mercury [soil, agricultural]: -3.52845e-9 kg; = 2.87938252224e-09 + ( - 6.4078373888e-09)*heavyMetalUptakeSwitch; source Freiermuth R.  2006
  Comment on mathematicalRelation:
  2.87938252224e-09 from Calculated value - Freiermuth (2006). See 'WFLDB-Guidelines.pdf', available at https://ecoquery.ecoinvent.org/File/Reports.
  -6.4078373888e-09 from Crop, default, heavy metals uptake model
  Heavy metal uptake can be excluded by setting the parameter heavyMetalUptakeSwitch to zero.
- Cadmium, ion [water, surface water]: 1.57421e-9 kg; source Freiermuth R.  2006; lognormal variance with pedigree 0.356938, pedigree (2,2,4,1,1)
  (same comment as for Cadmium, ion)
- Nickel [soil, agricultural]: 3.7583e-8 kg; = 2.02629513344e-07 + ( - 1.65046526688e-07)*heavyMetalUptakeSwitch; source Freiermuth R.  2006
  Comment on mathematicalRelation:
  2.02629513344e-07 from Calculated value - Freiermuth (2006). See 'WFLDB-Guidelines.pdf', available at https://ecoquery.ecoinvent.org/File/Reports.
  -1.65046526688e-07 from Crop, default, heavy metals uptake model
  Heavy metal uptake can be excluded by setting the parameter heavyMetalUptakeSwitch to zero.
- Zinc [soil, agricultural]: -3.20834e-6 kg; = 1.85128859236e-06 + ( - 5.0596256214e-06)*heavyMetalUptakeSwitch; source Freiermuth R.  2006
  Comment on mathematicalRelation:
  1.85128859236e-06 from Calculated value - Freiermuth (2006). See 'WFLDB-Guidelines.pdf', available at https://ecoquery.ecoinvent.org/File/Reports.
  -5.0596256214e-06 from Crop, default, heavy metals uptake model
  Heavy metal uptake can be excluded by setting the parameter heavyMetalUptakeSwitch to zero.
- Mineral oil [soil, agricultural]: 0.00112 kg; lognormal variance with pedigree 0.0447216, pedigree (2,2,4,1,1)
  Calculated value - 100% emission in soil. See 'WFLDB-Guidelines.pdf', available at https://ecoquery.ecoinvent.org/File/Reports.
- Glyphosate [soil, agricultural]: 0.000149 kg
  (same comment as for Mineral oil)
- Chlorpyrifos methyl [soil, agricultural]: 2.63e-5 kg
  (same comment as for Mineral oil)
- Carbendazim [soil, agricultural]: 4.8999e-5 kg
  (same comment as for Mineral oil)
- Lead [water, surface water]: 5.16353e-8 kg; source Freiermuth R.  2006; lognormal variance with pedigree 0.356938, pedigree (2,2,4,1,1)
  (same comment as for Cadmium, ion)
- Mercury [water, surface water]: 3.09557e-10 kg; source Freiermuth R.  2006; lognormal variance with pedigree 0.356938, pedigree (2,2,4,1,1)
  (same comment as for Cadmium, ion)
- Phosphate [water, surface water]: 2.73424e-5 kg; source Prasuhn V.  2006; lognormal variance with pedigree 0.175866, pedigree (2,2,4,1,1)
  Calculated value - Prasuhn (2006). See 'WFLDB-Guidelines.pdf', available at https://ecoquery.ecoinvent.org/File/Reports.
- Nickel, ion [water, surface water]: 9.38187e-8 kg; source Freiermuth R.  2006; lognormal variance with pedigree 0.356938, pedigree (2,2,4,1,1)
  (same comment as for Cadmium, ion)
- Phosphate [water, ground-]: 6.02989e-6 kg; source Prasuhn V.  2006; lognormal variance with pedigree 0.175866, pedigree (2,2,4,1,1)
  (same comment as for Phosphate)
- Zinc, ion [water, surface water]: 1.97299e-7 kg; source Freiermuth R.  2006; lognormal variance with pedigree 0.356938, pedigree (2,2,4,1,1)
  (same comment as for Cadmium, ion)

## Sampling procedure
WFLDB Methodological Guidelines for the Life Cycle Inventory of Agricultural Products in the latest version, available at: https://ecoquery.ecoinvent.org/File/Reports. Data sources: Data were categorised from level 0 (L0) to level (L4) as follows: L0 = estimate, proxy; L1 = statistical data (e.g. FAOSTAT); L2 = L1 adapted to crop and country; L3 = literature data or L1 resp. L2 data approved by experts; medium detailing (i.e. kg of total N-fertiliser); L4 = L3 data of high detailing (i.e. portion N-fertiliser types).In this dataset data were obtained for yield: L3; Fertilisers: L4; Pesticides: L1; Machinery: L0; Irrigation: L2. For information regarding the calculation of individual exchanges see supporting documentation WFLDB-Documentation.pdf

## Extrapolations
This dataset has been extrapolated from year 2012 to the year of the calculation (2021). The uncertainty has been adjusted accordingly.

## Review by Assumpció ANTON 2016-05-30
Be aware that the use of statistics in input calculations could provide some specific inputs not common for specific crops, this should be corrected if better information is available and better reflexed in DQR . Currently, I would dissent for some of good marks provided, being a revision of criteria applied advisable.

Pesticides will need to be amended periodically checking for update of pesticides' ban.
