# treatment of hard coal ash, municipal incineration

Dataset: EcoSpold 2, unit process
Geography: RoW
Time period: 2006-01-01 to 2021-12-31
Technology level: current
Classification: ISIC rev.4 ecoinvent: 3821:Treatment and disposal of non-hazardous waste
Synonyms: municipal waste incineration; Kehrichtverbrennung; Siedlungsabfallverbrennung
Scenario: Business-as-Usual
System model: Allocation, cut-off by classification
Share of production covered: 1.8 %
Generated by: Gabor Doka
Published in: Doka G. 2013
Database: ecoinvent
isCopyrightProtected: true
accessRestrictedTo: 1

## General comment
This dataset represents the activity of waste disposal of hard coal ash in a municipal solid waste incinerator (MSWI) // Recommended use of this dataset: For small amounts of hard coal ash from small scale furnaces, which go to disposal as part of communal waste mixture. Larger amounts will be landfilled or could be used in building material production. // // Waste composition (wet, in ppm): upper heating value 0.4712 MJ/kg; H2O n.a.; O 298030; H n.a.; C 100000; S n.a.; N n.a.; P 980; B 350; Cl n.a.; Br 97; F n.a.; I 16.4; Ag n.a.; As 92; Ba 1960; Cd 4.5; Co 49; Cr 192; Cu 146.25; Hg 0.1; Mn 693; Mo 28.5; Ni 194; Pb 376; Sb 9.5; Se 7; Sn 19.8; V 388; Zn 475; Be 19.6; Sc 39.6; Sr 1940; Ti 5880; Tl 9.5; W n.a.; Si 245000; Fe 68600; Ca 19600; Al 166600; K 19600; Mg 58800; Na 9800; // Share of carbon in waste that is biogenic 0%. // Share of metals in waste not oxidised and bulk-recyclable (exclude very small or thin parts) Iron: 0%; Alu: 0%; Copper: 0%. // One kg of this waste produces 1.708 kg of slag and 0 kg of residues, which are landfilled. // Net energy production: 0MJ/kg electric energy and 0MJ/kg thermal energy. // Recovery of metal scrap to recycling: 0g iron scrap, 0g aluminium scrap, 0g copper scrap.

## Included activities start
waste incineration from waste reception gate and delivery into waste bunker at incinerator plant site (without transports to the incinerator)

## Included activities end
Waste-specific short-term emissions to water from leachate. Long-term emissions from landfill to ground water.

## Geography
Specific to the technology mix encountered in Switzerland in 2010. Well applicable to modern incineration practices in Europe, North America or Japan.

## Technology
average Swiss MSWI plants in 2010 (grate incinerators) with electrostatic precipitator for fly ash (ESP), wet flue gas scrubber and 25% SNCR , 42.77% SCR-high dust , 32.68% SCR-low dust -DeNOx facilities and 0% without Denox (weighted according to mass of burnt waste, representing Swiss average). Efficiency of iron scrap separation from slag : 58%. Efficiency of non-ferrous scrap separation from slag : 31%. Gross electric efficiency technology mix 15.84% and Gross thermal efficiency technology mix 28.51%

## Time period
Waste composition as given in literature reference, theoretical data or other source. Transfer coefficients for modern MSWI.

## Reference product
- hard coal ash: -1 kg; By-product classification Waste; CPC 39: Wastes or scraps
  Main reference product of this activity (supply of disposal service).
  production volume 2.6649e9 kg
    based on coal usage in residences and small commerce (Exxon 2012), generic split into hard coal and lignite based on demand 2010 (WCA 2012), generic hard coal ash content, and a generic global rate of 21.7w% of MSW going to incineration (Pike + UNSD 2012)
  property price 0 EUR2005
    Waste products are assigned a price of zero as they are assumed to require further treatment.
  property carbon content 0
    carbon content on a dry matter basis (reserved; not for manual entry)
  properties: carbon content, non-fossil 0, wet mass 1 kg, water content 0, carbon content, fossil 0, water in wet mass 0 kg, dry mass 1 kg, carbon allocation 0 kg

## Inputs from technosphere
- heat, for reuse in municipal waste incineration only: 0 MJ; name E_th_prod_MSWI; pedigree (1,1,1,1,1)
  Net heat required to incinerate this waste (subsidiesed from high-calorific waste fractions).
  Uncertainty: uncertainty is calculated from uncertainties in waste composition and uncertainties in energy efficiency and the uncertainty in internal energy demand
- titanium dioxide: 8.5557e-6 kg; lognormal variance with pedigree 0.45542, pedigree (1,1,4,1,1)
  Input to DeNOx stage (TiO2 catalyst carrier)
  Uncertainty: uncertainty calculated from uncertainty in average DeNOx input, uncertainty in the share of thermal NOx, uncertainty of nitrogen content in average municipal waste and the uncertainty in nitrogen content in *this* waste.
  properties: dry mass 1 kg, wet mass 1 kg
- heat, district or industrial, natural gas: 0 MJ; pedigree (1,1,1,1,1)
  Input to DeNOx stage, to heat up flue gas in low-dust SCR.
  Uncertainty: uncertainty calculated from uncertainty in average DeNOx input, uncertainty in the share of thermal NOx, uncertainty of nitrogen content in average municipal waste and the uncertainty in nitrogen content in *this* waste.
  properties: heating value, net 1 MJ
- transport, freight, lorry, unspecified: 0 metric ton*km; pedigree (1,1,1,1,1)
  Transport services to transport incineration residues to landfills.
  Uncertainty: uncertainty calculated from uncertainty of the waste composition of this waste, uncertainty of transfer coefficients and the uncertainty in generic transportation distances
- municipal waste incineration facility: 2.5e-10 unit
  Demands per kilogram waste.
- ammonia, anhydrous, liquid: 0 kg; pedigree (1,1,1,1,1)
  Input to DeNOx stage (100% NH3).
  Uncertainty: uncertainty calculated from uncertainty in average DeNOx input, uncertainty in the share of thermal NOx, uncertainty of nitrogen content in average municipal waste and the uncertainty in nitrogen content in *this* waste.
  properties: wet mass 1 kg, dry mass 1 kg
- slag landfill: 2.9474e-9 unit; lognormal variance with pedigree 0.021587, pedigree (1,1,4,1,1)
  Landfill infrastructure required for landfilling of bottom ash.
  Uncertainty: uncertainty is calculated from uncertainties in waste composition and transfer coefficients in incinerator
- process-specific burdens, slag landfill: 0 kg; pedigree (1,1,1,1,1)
  Mass-specific expenditures required for landfilling of bottom ash.
  Uncertainty: uncertainty is calculated from uncertainties in waste composition and transfer coefficients in incinerator
- electricity, for reuse in municipal waste incineration only: 0 kWh; name E_el_prod_MSWI; pedigree (1,1,1,1,1)
  Net electricity required to incinerate this waste (subsidiesed from high-calorific waste fractions).
  Uncertainty: uncertainty is calculated from uncertainties in waste composition and uncertainties in energy efficiency and the uncertainty in internal energy demand
- chromium oxide, flakes: 1.7461e-7 kg; lognormal variance with pedigree 0.45542, pedigree (1,1,4,1,1)
  Input to DeNOx stage.
  Uncertainty: uncertainty calculated from uncertainty in average DeNOx input, uncertainty in the share of thermal NOx, uncertainty of nitrogen content in average municipal waste and the uncertainty in nitrogen content in *this* waste.
  properties: dry mass 1 kg, wet mass 1 kg
- heat, for reuse in municipal waste incineration only: 0.00038678, 0.000765268, 0.0174875, 1.12539e-5, 0.00501393, 0.00104188, 0.000859446, 0.000262987, 0.00200142, 0.00156667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 MJ (25 entries); lognormal variance with pedigree 0.00859512, pedigree (1,1,4,1,1)
  (same comment as for heat, for reuse in municipal waste incineration only)
- heat, district or industrial, natural gas: 0.00038759, 0.0251484 MJ (2 entries); lognormal variance with pedigree 0.12926, pedigree (1,1,4,1,1)
  (same comment as for heat, district or industrial, natural gas)
- transport, freight, lorry, unspecified: 0.00758926, 0.0011882, 0.0575385 metric ton*km (3 entries); lognormal variance with pedigree 0.021587, pedigree (1,1,4,1,1)
  (same comment as for transport, freight, lorry, unspecified)
- ammonia, anhydrous, liquid: 2.86248e-5, 2.46064e-6, 3.82812e-6, 7.58487e-6, 7.43117e-6, 7.78867e-7, 3.48182e-6, 8.23698e-5 kg (8 entries); lognormal variance with pedigree 0.12926, pedigree (1,1,4,1,1)
  (same comment as for ammonia, anhydrous, liquid)
- process-specific burdens, slag landfill: 0.468978, 1.18892 kg (2 entries); lognormal variance with pedigree 0.021587, pedigree (1,1,4,1,1)
  (same comment as for process-specific burdens, slag landfill)
- electricity, for reuse in municipal waste incineration only: 0.000138945, 0.000274912, 2.97892e-6, 4.04282e-6, 0.00180118, 0.00037428, 0.000308744, 9.44744e-5, 0.000718984, 0.000562804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 kWh (25 entries); lognormal variance with pedigree 0.00859512, pedigree (1,1,4,1,1)
  (same comment as for electricity, for reuse in municipal waste incineration only)

## Inputs from nature
- Oxygen [natural resource, in air]: 0.71828 kg; lognormal variance with pedigree 0.047235, pedigree (1,1,4,1,1)
  Oxygen from ambient air needed to combust and oxidise this waste. Net demand, i.e. without O2 leaving the plant in flue gas uncombusted.
  Uncertainty: uncertainty is calculated from uncertainties in waste composition and transfer coefficients to flue gas and soild residues in incinerator

## Emissions to nature
- Nickel, ion [water, ground-, long-term]: 0.00019388 kg; lognormal variance with pedigree 0.88188, pedigree (1,1,4,1,1)
  Long-term emissions from landfilling of incineration residues.
  Uncertainty: uncertainty is calculated from uncertainties in waste composition and transfer coefficients in incinerator and landfills.
- Silicon [water, surface water]: 9.0399e-6 kg; lognormal variance with pedigree 1.147, pedigree (1,1,4,1,1)
  Emissions to water from waste composition and transfer coefficients in incinerator and landfills.
  Uncertainty: uncertainty is calculated from uncertainties in waste composition and transfer coefficients in incinerator and landfills
- Water [air, urban air close to ground]: 0.0007244 m3; lognormal variance with pedigree 0.12113, pedigree (1,1,4,1,1)
  Water vapour from waste humidity, hydrogen oxidation and part of the process water.
  Uncertainty: Uncertainty calculated from uncertainty in waste composition, process water input and the uncertainty of fraction to air.
- Scandium [water, surface water]: 2.3933e-6 kg; lognormal variance with pedigree 1.2605, pedigree (1,1,4,1,1)
  (same comment as for Silicon)
- Molybdenum [water, ground-, long-term]: 2.7172e-5 kg; lognormal variance with pedigree 1.1373, pedigree (1,1,4,1,1)
  (same comment as for Nickel, ion)
- Bromine [water, ground-, long-term]: 8.73e-12 kg; lognormal variance with pedigree 1.00238, pedigree (1,1,4,1,1)
  (same comment as for Nickel, ion)
- Tin, ion [water, ground-, long-term]: 1.969e-5 kg; lognormal variance with pedigree 1.1854, pedigree (1,1,4,1,1)
  (same comment as for Nickel, ion)
- Strontium [water, surface water]: 1.2217e-6 kg; lognormal variance with pedigree 1.2928, pedigree (1,1,4,1,1)
  (same comment as for Silicon)
- Mercury [water, surface water]: 2.6198e-9 kg; lognormal variance with pedigree 2.126, pedigree (1,1,4,1,1)
  (same comment as for Silicon)
- Bromine [water, surface water]: 9.7e-5 kg; lognormal variance with pedigree 0.97408, pedigree (1,1,4,1,1)
  (same comment as for Silicon)
- Thallium [water, ground-, long-term]: 9.494e-6 kg; lognormal variance with pedigree 1.2827, pedigree (1,1,4,1,1)
  (same comment as for Nickel, ion)
- Vanadium, ion [water, ground-, long-term]: 3.7922e-5 kg; lognormal variance with pedigree 2.1419, pedigree (1,1,4,1,1)
  (same comment as for Nickel, ion)
- Phenol, pentachloro- [air, urban air close to ground]: 1.9568e-11 kg; lognormal variance with pedigree 0.0491, pedigree (1,1,4,1,1)
  Incomplete combustion product emitted to air.
  Uncertainty: uncertainty calculated from uncertainty in average operation emissions, and the uncertainty of the flue gas volume from this waste.
- Tin, ion [water, surface water]: 3.167e-10 kg; lognormal variance with pedigree 2.3834, pedigree (1,1,4,1,1)
  (same comment as for Silicon)
- Phosphate [water, surface water]: 6.6184e-8 kg; lognormal variance with pedigree 1.8239, pedigree (1,1,4,1,1)
  (same comment as for Silicon)
- DOC, Dissolved Organic Carbon [water, ground-, long-term]: 0.04982 kg; lognormal variance with pedigree 0.12932, pedigree (1,1,4,1,1)
  (same comment as for Nickel, ion)
- Zinc, ion [water, ground-, long-term]: 0.00047499 kg; lognormal variance with pedigree 0.7633, pedigree (1,1,4,1,1)
  (same comment as for Nickel, ion)
- DOC, Dissolved Organic Carbon [water, surface water]: 0.00017983 kg; lognormal variance with pedigree 0.61879, pedigree (1,1,4,1,1)
  (same comment as for Silicon)
- Nickel, ion [water, surface water]: 1.2217e-7 kg; lognormal variance with pedigree 1.5949, pedigree (1,1,4,1,1)
  (same comment as for Silicon)
- Antimony [water, ground-, long-term]: 1.3747e-6 kg; lognormal variance with pedigree 2.2167, pedigree (1,1,4,1,1)
  (same comment as for Nickel, ion)
- Selenium [water, surface water]: 1.1132e-7 kg; lognormal variance with pedigree 1.6332, pedigree (1,1,4,1,1)
  (same comment as for Silicon)
- Boron [water, ground-, long-term]: 0.00029122 kg; lognormal variance with pedigree 0.81189, pedigree (1,1,4,1,1)
  (same comment as for Nickel, ion)
- Aluminium [water, surface water]: 2.189e-6 kg; lognormal variance with pedigree 1.3108, pedigree (1,1,4,1,1)
  (same comment as for Silicon)
- Zinc, ion [water, surface water]: 1.414e-8 kg; lognormal variance with pedigree 1.8793, pedigree (1,1,4,1,1)
  (same comment as for Silicon)
- Cobalt [water, surface water]: 6.8171e-9 kg; lognormal variance with pedigree 1.9768, pedigree (1,1,4,1,1)
  (same comment as for Silicon)
- Magnesium [water, surface water]: 0.00022339 kg; lognormal variance with pedigree 0.66197, pedigree (1,1,4,1,1)
  (same comment as for Silicon)
- Iodide [water, ground-, long-term]: 1.476e-12 kg; lognormal variance with pedigree 1.2387, pedigree (1,1,4,1,1)
  (same comment as for Nickel, ion)
- Aluminium [water, ground-, long-term]: 0.13609 kg; lognormal variance with pedigree 0.097126, pedigree (1,1,4,1,1)
  (same comment as for Nickel, ion)
- Iodide [water, surface water]: 1.64e-5 kg; lognormal variance with pedigree 1.2104, pedigree (1,1,4,1,1)
  (same comment as for Silicon)
- Benzene, pentachloro- [air, urban air close to ground]: 2.374e-10 kg; lognormal variance with pedigree 0.0491, pedigree (1,1,4,1,1)
  (same comment as for Phenol, pentachloro-)
- Thallium [water, surface water]: 5.9823e-9 kg; lognormal variance with pedigree 1.9957, pedigree (1,1,4,1,1)
  (same comment as for Silicon)
- Sodium, ion [water, ground-, long-term]: 0.0086041 kg; lognormal variance with pedigree 0.37884, pedigree (1,1,4,1,1)
  (same comment as for Nickel, ion)
- Ammonia [air, urban air close to ground]: 1.6056e-7 kg; lognormal variance with pedigree 0.17159, pedigree (1,1,4,1,1)
  Nitrogen species emitted to air after DeNOx stage.
  Uncertainty: uncertainty calculated from uncertainty in average N-emissions and uncertainty in the share of thermal NOx and the uncertainty in nitrogen content in *this* waste.
- Chromium VI [water, surface water]: 5.4904e-9 kg; lognormal variance with pedigree 2.0045, pedigree (1,1,4,1,1)
  (same comment as for Silicon)
- Dioxins, measured as 2,3,7,8-tetrachlorodibenzo-p-dioxin [air, urban air close to ground]: 8.9863e-14 kg; lognormal variance with pedigree 0.30974, pedigree (1,1,4,1,1)
  (same comment as for Phenol, pentachloro-)
- Calcium, ion [water, surface water]: 8.5522e-5 kg; lognormal variance with pedigree 0.76219, pedigree (1,1,4,1,1)
  (same comment as for Silicon)
- Calcium, ion [water, ground-, long-term]: 0.019514 kg; lognormal variance with pedigree 0.29681, pedigree (1,1,4,1,1)
  (same comment as for Nickel, ion)
- Lead [water, surface water]: 6.8634e-9 kg; lognormal variance with pedigree 1.9747, pedigree (1,1,4,1,1)
  (same comment as for Silicon)
- Cadmium, ion [water, ground-, long-term]: 4.4977e-6 kg; lognormal variance with pedigree 1.3811, pedigree (1,1,4,1,1)
  (same comment as for Nickel, ion)
- Benzene, hexachloro- [air, urban air close to ground]: 9.3955e-11 kg; lognormal variance with pedigree 0.0491, pedigree (1,1,4,1,1)
  (same comment as for Phenol, pentachloro-)
- Arsenic, ion [water, ground-, long-term]: 9.1862e-5 kg; lognormal variance with pedigree 0.98113, pedigree (1,1,4,1,1)
  (same comment as for Nickel, ion)
- Molybdenum [water, surface water]: 1.3279e-6 kg; lognormal variance with pedigree 1.3302, pedigree (1,1,4,1,1)
  (same comment as for Silicon)
- NMVOC, non-methane volatile organic compounds, unspecified origin [air, urban air close to ground]: 2.045e-6 kg; lognormal variance with pedigree 0.0491, pedigree (1,1,4,1,1)
  (same comment as for Phenol, pentachloro-)
- Benzene [air, urban air close to ground]: 4.4934e-8 kg; lognormal variance with pedigree 0.0491, pedigree (1,1,4,1,1)
  (same comment as for Phenol, pentachloro-)
- Water [water, surface water]: 0.00037795 m3; lognormal variance with pedigree 0.10997, pedigree (1,1,4,1,1)
  Process water released to surface water.
  Uncertainty: uncertainty calculated from uncertainty in process water input and the uncertainty of fraction to surface water.
- TOC, Total Organic Carbon [water, surface water]: 0.00017983 kg; lognormal variance with pedigree 0.61879, pedigree (1,1,4,1,1)
  (same comment as for Silicon)
- Boron [water, surface water]: 2.7423e-6 kg; lognormal variance with pedigree 1.1973, pedigree (1,1,4,1,1)
  (same comment as for Silicon)
- Potassium, ion [water, surface water]: 0.0023687 kg; lognormal variance with pedigree 0.40072, pedigree (1,1,4,1,1)
  (same comment as for Silicon)
- BOD5, Biological Oxygen Demand [water, ground-, long-term]: 0.041183 kg; lognormal variance with pedigree 0.12932, pedigree (1,1,4,1,1)
  (same comment as for Nickel, ion)
- Sodium, ion [water, surface water]: 0.0011959 kg; lognormal variance with pedigree 0.48091, pedigree (1,1,4,1,1)
  (same comment as for Silicon)
- Manganese [water, ground-, long-term]: 0.00069296 kg; lognormal variance with pedigree 0.7136, pedigree (1,1,4,1,1)
  (same comment as for Nickel, ion)
- Chromium VI [water, ground-, long-term]: 1.2564e-6 kg; lognormal variance with pedigree 4.2011, pedigree (1,1,4,1,1)
  (same comment as for Nickel, ion)
- Cobalt [water, ground-, long-term]: 4.8993e-5 kg; lognormal variance with pedigree 1.065, pedigree (1,1,4,1,1)
  (same comment as for Nickel, ion)
- Titanium, ion [water, ground-, long-term]: 0.0017636 kg; lognormal variance with pedigree 0.80246, pedigree (1,1,4,1,1)
  (same comment as for Nickel, ion)
- Vanadium, ion [water, surface water]: 1.7213e-7 kg; lognormal variance with pedigree 1.5489, pedigree (1,1,4,1,1)
  (same comment as for Silicon)
- Iron, ion [water, surface water]: 5.7399e-7 kg; lognormal variance with pedigree 1.4476, pedigree (1,1,4,1,1)
  (same comment as for Silicon)
- Copper, ion [water, ground-, long-term]: 0.00014624 kg; lognormal variance with pedigree 0.91944, pedigree (1,1,4,1,1)
  (same comment as for Nickel, ion)
- Toluene [air, urban air close to ground]: 8.9869e-8 kg; lognormal variance with pedigree 0.0491, pedigree (1,1,4,1,1)
  (same comment as for Phenol, pentachloro-)
- Beryllium [water, ground-, long-term]: 1.9588e-5 kg; lognormal variance with pedigree 1.1868, pedigree (1,1,4,1,1)
  (same comment as for Nickel, ion)
- Nitrogen oxides [air, urban air close to ground]: 5.0843e-5 kg; lognormal variance with pedigree 0.17159, pedigree (1,1,4,1,1)
  Sum of fuel-Nox and thermal-NOx emitted to air after DeNOx stage.
  Uncertainty: uncertainty calculated from uncertainty in average N-emissions and uncertainty in the share of thermal NOx and the uncertainty in nitrogen content in *this* waste.
- TOC, Total Organic Carbon [water, ground-, long-term]: 0.04982 kg; lognormal variance with pedigree 0.12932, pedigree (1,1,4,1,1)
  (same comment as for Nickel, ion)
- Heat, waste [air, urban air close to ground]: 0.5286 MJ; lognormal variance with pedigree 0.87807, pedigree (1,1,4,1,1)
  Waste heat generated from heating value of this waste plus any electricity required to process it.
  Uncertainty: uncertainty is calculated from uncertainties in waste composition and uncertainties in energy efficiency and the uncertainty in internal energy demand
- Methane, fossil [air, urban air close to ground]: 6.7402e-7 kg; lognormal variance with pedigree 0.0491, pedigree (1,1,4,1,1)
  (same comment as for Phenol, pentachloro-)
- Potassium, ion [water, ground-, long-term]: 0.017231 kg; lognormal variance with pedigree 0.29781, pedigree (1,1,4,1,1)
  (same comment as for Nickel, ion)
- Titanium, ion [water, surface water]: 2.8367e-8 kg; lognormal variance with pedigree 1.7954, pedigree (1,1,4,1,1)
  (same comment as for Silicon)
- Selenium [water, ground-, long-term]: 6.7213e-6 kg; lognormal variance with pedigree 1.3233, pedigree (1,1,4,1,1)
  (same comment as for Nickel, ion)
- Barium [water, ground-, long-term]: 0.0019597 kg; lognormal variance with pedigree 0.57846, pedigree (1,1,4,1,1)
  (same comment as for Nickel, ion)
- Silicon [water, ground-, long-term]: 0.0020963 kg; lognormal variance with pedigree 5.7264, pedigree (1,1,4,1,1)
  (same comment as for Nickel, ion)
- Particulates, > 2.5 um, and < 10um [air, urban air close to ground]: 2.6959e-8 kg; lognormal variance with pedigree 0.12811, pedigree (1,1,4,1,1)
  (same comment as for Phenol, pentachloro-)
- Phosphate [water, ground-, long-term]: 3.9644e-5 kg; lognormal variance with pedigree 5.3501, pedigree (1,1,4,1,1)
  (same comment as for Nickel, ion)
- Manganese [water, surface water]: 3.5469e-8 kg; lognormal variance with pedigree 1.7578, pedigree (1,1,4,1,1)
  (same comment as for Silicon)
- Iron, ion [water, ground-, long-term]: 0.035685 kg; lognormal variance with pedigree 0.27106, pedigree (1,1,4,1,1)
  (same comment as for Nickel, ion)
- Cadmium, ion [water, surface water]: 2.3152e-9 kg; lognormal variance with pedigree 2.1206, pedigree (1,1,4,1,1)
  (same comment as for Silicon)
- Heat, waste [water, surface water]: 0.12086 MJ; lognormal variance with pedigree 0.87807, pedigree (1,1,4,1,1)
  (same comment as for Heat, waste)
- Scandium [water, ground-, long-term]: 3.7207e-5 kg; lognormal variance with pedigree 1.0936, pedigree (1,1,4,1,1)
  (same comment as for Nickel, ion)
- Arsenic, ion [water, surface water]: 1.3839e-7 kg; lognormal variance with pedigree 1.5813, pedigree (1,1,4,1,1)
  (same comment as for Silicon)
- Benzo(a)pyrene [air, urban air close to ground]: 9.9993e-13 kg; lognormal variance with pedigree 0.30974, pedigree (1,1,4,1,1)
  (same comment as for Phenol, pentachloro-)
- Carbon monoxide, fossil [air, urban air close to ground]: 7.6383e-5 kg; lognormal variance with pedigree 0.65557, pedigree (1,1,4,1,1)
  (same comment as for Phenol, pentachloro-)
- Magnesium [water, ground-, long-term]: 0.058577 kg; lognormal variance with pedigree 0.17934, pedigree (1,1,4,1,1)
  (same comment as for Nickel, ion)
- Antimony [water, surface water]: 6.4062e-9 kg; lognormal variance with pedigree 1.9868, pedigree (1,1,4,1,1)
  (same comment as for Silicon)
- Strontium [water, ground-, long-term]: 0.0019388 kg; lognormal variance with pedigree 0.57978, pedigree (1,1,4,1,1)
  (same comment as for Nickel, ion)
- COD, Chemical Oxygen Demand [water, surface water]: 0.00045445 kg; lognormal variance with pedigree 0.61879, pedigree (1,1,4,1,1)
  (same comment as for Silicon)
- Barium [water, surface water]: 3.0043e-7 kg; lognormal variance with pedigree 1.4775, pedigree (1,1,4,1,1)
  (same comment as for Silicon)
- Particulates, < 2.5 um [air, urban air close to ground]: 5.3648e-6 kg; lognormal variance with pedigree 0.30974, pedigree (1,1,4,1,1)
  (same comment as for Phenol, pentachloro-)
- BOD5, Biological Oxygen Demand [water, surface water]: 0.00014865 kg; lognormal variance with pedigree 0.61879, pedigree (1,1,4,1,1)
  (same comment as for Silicon)
- Mercury [water, ground-, long-term]: 9.738e-8 kg; lognormal variance with pedigree 1.872, pedigree (1,1,4,1,1)
  (same comment as for Nickel, ion)
- Copper, ion [water, surface water]: 5.0776e-9 kg; lognormal variance with pedigree 2.0151, pedigree (1,1,4,1,1)
  (same comment as for Silicon)
- Lead [water, ground-, long-term]: 0.00037599 kg; lognormal variance with pedigree 0.79416, pedigree (1,1,4,1,1)
  (same comment as for Nickel, ion)
- Beryllium [water, surface water]: 1.2342e-8 kg; lognormal variance with pedigree 1.8998, pedigree (1,1,4,1,1)
  (same comment as for Silicon)
- COD, Chemical Oxygen Demand [water, ground-, long-term]: 0.1259 kg; lognormal variance with pedigree 0.12932, pedigree (1,1,4,1,1)
  (same comment as for Nickel, ion)
