# treatment of lignite ash, opencast refill

Dataset: EcoSpold 2, unit process
Geography: DE
Time period: 1996-01-01 to 2021-12-31
Technology level: current
Classification: ISIC rev.4 ecoinvent: 3822:Treatment and disposal of hazardous waste
Classification: EcoSpold01Categories: waste management/others
Synonyms: ashes form lignite incineration disposed as backfill in opencast lignite mines
Tags: ConvertedDataset; Treatment
Scenario: Business-as-Usual
System model: Allocation, cut-off by classification
Generated by: Gabor Doka (obsolete)
Published in: Doka G. 2008
Database: ecoinvent
isCopyrightProtected: true
accessRestrictedTo: 1

## General comment
backfilled waste composition is (in ppm): H2O n.a.; O n.a.; H n.a.; C n.a.; S 46554; N n.a.; P 306.05; B 1609.2; Cl 38.285; Br 12.251; F 38.285; I 1.5314; Ag n.a.; As 15.185; Ba 765.7; Cd 0.3811; Co 15.314; Cr 38.285; Cu 15.299; Hg 0.076628; Mn 382.85; Mo 7.6511; Ni 22.931; Pb 15.256; Sb 1.1459; Se 3.2349; Sn 12.251; V 38.256; Zn 38.11; Be 3.0628; Sc 3.8285; Sr 535.78; Ti 765.7; Tl 0.15291; W 7.657; Si 367530; Fe 41348; Ca 153140; Al 35988; K 4594.2; Mg 22971; Na 6891.3;
[This dataset was already contained in the ecoinvent database version 2. It was not individually updated during the transfer to ecoinvent version 3. Life Cycle Impact Assessment results may still have changed, as they are affected by changes in the supply chain, i.e. in other datasets. This dataset was generated following the ecoinvent quality guidelines for version 2. It may have been subject to central changes described in the ecoinvent version 3 change report (http://www.ecoinvent.org/database/ecoinvent-version-3/reports-of-changes/), and the results of the central updates were reviewed extensively. The changes added e.g. consistent water flows and other information throughout the database. The documentation of this dataset can be found in the ecoinvent reports of version 2, which are still available via the ecoinvent website. The change report linked above covers all central changes that were made during the conversion process.]

## Included activities end
This module contains only direct emissions from lignite ash used as backfill in opencast lignite mines: short-term emissions (0-100a) and long-term emissions (>100a) both to ground water. E.g. land-use and energy consumption is *not* included.

## Geography
Ash composition calculated from country-specific coal composition (DE) and technology-specific transfer coefficients in power plant.

## Technology
Lignite ash as backfill in lignite opencast mine (together with tailings)

## Reference product
- lignite ash: -1 kg; CPC 39: Wastes or scraps; By-product classification Waste
  EcoSpold01Location=DE
  production volume 1.11981e10 kg
    Estimated. Electricity and synthetic natural gas production are responsible for more than 90% of lignite use (https://www.lignite.com/about-lignite/lignite-uses/, accessed 20151008) . The production volume is calculated as the sum of lignite ashes resulting from electricity and heat and power co-generation production from lignite, in the respective country.
  property price 0 EUR2005
    Waste products are assigned a price of zero as they are assumed to require further treatment.
  property carbon content 0
    carbon content on a dry matter basis (reserved; not for manual entry)
  properties: carbon content, fossil 0, wet mass 1 kg, water in wet mass 0 kg, water content 0, carbon content, non-fossil 0, dry mass 1 kg, heating value, net 0 MJ, carbon allocation 0 kg

## Emissions to nature
- Chloride [water, ground-]: 2.1843e-5 kg; lognormal variance with pedigree 1.14, pedigree (1,1,5,1,1)
  Short-term emission from lignite ash backfill. Uncertainty derived from uncertainty in ash composition and uncertainty in transfer coefficients.
- Mercury [water, ground-, long-term]: 7.6613e-8 kg; lognormal variance with pedigree 1.94, pedigree (1,1,5,1,1)
  Long-term emission from lignite ash backfill. Uncertainty derived from uncertainty in ash composition and uncertainty in transfer coefficients.
- Barium [water, ground-, long-term]: 0.00076567 kg; lognormal variance with pedigree 0.73, pedigree (1,1,5,1,1)
  (same comment as for Mercury)
- Cobalt [water, ground-, long-term]: 1.5303e-5 kg; lognormal variance with pedigree 1.25, pedigree (1,1,5,1,1)
  (same comment as for Mercury)
- Vanadium, ion [water, ground-, long-term]: 2.0576e-5 kg; lognormal variance with pedigree 1.23, pedigree (1,1,5,1,1)
  (same comment as for Mercury)
- Lead [water, ground-]: 3.3146e-10 kg; lognormal variance with pedigree 2.41, pedigree (1,1,5,1,1)
  (same comment as for Chloride)
- Antimony [water, ground-]: 4.4193e-7 kg; lognormal variance with pedigree 1.62, pedigree (1,1,5,1,1)
  (same comment as for Chloride)
- Molybdenum [water, ground-]: 7.6511e-6 kg; lognormal variance with pedigree 1.34, pedigree (1,1,5,1,1)
  (same comment as for Chloride)
- Cadmium, ion [water, ground-]: 1.0837e-11 kg; lognormal variance with pedigree 2.86, pedigree (1,1,5,1,1)
  (same comment as for Chloride)
- Tin, ion [water, ground-, long-term]: 1.225e-5 kg; lognormal variance with pedigree 1.28, pedigree (1,1,5,1,1)
  (same comment as for Mercury)
- Manganese [water, ground-, long-term]: 0.00038284 kg; lognormal variance with pedigree 0.82, pedigree (1,1,5,1,1)
  (same comment as for Mercury)
- Beryllium [water, ground-]: 4.6445e-9 kg; lognormal variance with pedigree 2.06, pedigree (1,1,5,1,1)
  (same comment as for Chloride)
- Cadmium, ion [water, ground-, long-term]: 3.8109e-7 kg; lognormal variance with pedigree 1.73, pedigree (1,1,5,1,1)
  (same comment as for Mercury)
- Sulfate [water, ground-]: 0.037595 kg; lognormal variance with pedigree 0.28, pedigree (1,1,5,1,1)
  (same comment as for Chloride)
- Vanadium, ion [water, ground-]: 2.3512e-7 kg; lognormal variance with pedigree 1.55, pedigree (1,1,5,1,1)
  (same comment as for Chloride)
- Scandium [water, ground-, long-term]: 2.7465e-6 kg; lognormal variance with pedigree 1.44, pedigree (1,1,5,1,1)
  (same comment as for Mercury)
- Titanium, ion [water, ground-, long-term]: 0.00076474 kg; lognormal variance with pedigree 0.73, pedigree (1,1,5,1,1)
  (same comment as for Mercury)
- Boron [water, ground-, long-term]: 0.0010057 kg; lognormal variance with pedigree 0.69, pedigree (1,1,5,1,1)
  (same comment as for Mercury)
- Sodium, ion [water, ground-, long-term]: 0.0021168 kg; lognormal variance with pedigree 0.47, pedigree (1,1,5,1,1)
  (same comment as for Mercury)
- Copper, ion [water, ground-]: 2.4668e-9 kg; lognormal variance with pedigree 2.14, pedigree (1,1,5,1,1)
  (same comment as for Chloride)
- Arsenic, ion [water, ground-, long-term]: 1.5185e-14 kg; lognormal variance with pedigree 1.28, pedigree (1,1,5,1,1)
  (same comment as for Mercury)
- Titanium, ion [water, ground-]: 9.5207e-7 kg; lognormal variance with pedigree 1.36, pedigree (1,1,5,1,1)
  (same comment as for Chloride)
- Thallium [water, ground-, long-term]: 1.5267e-7 kg; lognormal variance with pedigree 1.85, pedigree (1,1,5,1,1)
  (same comment as for Mercury)
- Manganese [water, ground-]: 1.3246e-8 kg; lognormal variance with pedigree 1.92, pedigree (1,1,5,1,1)
  (same comment as for Chloride)
- Potassium, ion [water, ground-, long-term]: 0.0020017 kg; lognormal variance with pedigree 0.51, pedigree (1,1,5,1,1)
  (same comment as for Mercury)
- Thallium [water, ground-]: 2.3187e-10 kg; lognormal variance with pedigree 2.45, pedigree (1,1,5,1,1)
  (same comment as for Chloride)
- Iodide [water, ground-]: 1.5314e-6 kg; lognormal variance with pedigree 1.55, pedigree (1,1,5,1,1)
  (same comment as for Chloride)
- Nickel, ion [water, ground-]: 3.4773e-8 kg; lognormal variance with pedigree 1.8, pedigree (1,1,5,1,1)
  (same comment as for Chloride)
- Iron, ion [water, ground-]: 3.4597e-7 kg; lognormal variance with pedigree 1.53, pedigree (1,1,5,1,1)
  (same comment as for Chloride)
- Chloride [water, ground-, long-term]: 1.6442e-5 kg; lognormal variance with pedigree 1.14, pedigree (1,1,5,1,1)
  (same comment as for Mercury)
- Calcium, ion [water, ground-]: 5.7959e-5 kg; lognormal variance with pedigree 0.91, pedigree (1,1,5,1,1)
  (same comment as for Chloride)
- Strontium [water, ground-, long-term]: 0.00053497 kg; lognormal variance with pedigree 0.78, pedigree (1,1,5,1,1)
  (same comment as for Mercury)
- Aluminium [water, ground-]: 4.4747e-5 kg; lognormal variance with pedigree 0.89, pedigree (1,1,5,1,1)
  (same comment as for Chloride)
- Chromium VI [water, ground-]: 5.7742e-6 kg; lognormal variance with pedigree 1.22, pedigree (1,1,5,1,1)
  (same comment as for Chloride)
- Molybdenum [water, ground-, long-term]: 1.0412e-11 kg; lognormal variance with pedigree 1.37, pedigree (1,1,5,1,1)
  (same comment as for Mercury)
- Iron, ion [water, ground-, long-term]: 0.027631 kg; lognormal variance with pedigree 0.29, pedigree (1,1,5,1,1)
  (same comment as for Mercury)
- Antimony [water, ground-, long-term]: 7.0399e-7 kg; lognormal variance with pedigree 1.6, pedigree (1,1,5,1,1)
  (same comment as for Mercury)
- Mercury [water, ground-]: 1.515e-11 kg; lognormal variance with pedigree 2.8, pedigree (1,1,5,1,1)
  (same comment as for Chloride)
- Selenium [water, ground-, long-term]: 1.9873e-6 kg; lognormal variance with pedigree 1.46, pedigree (1,1,5,1,1)
  (same comment as for Mercury)
- Phosphate [water, ground-, long-term]: 0.000526 kg; lognormal variance with pedigree 0.94, pedigree (1,1,5,1,1)
  (same comment as for Mercury)
- Strontium [water, ground-]: 8.1248e-7 kg; lognormal variance with pedigree 1.38, pedigree (1,1,5,1,1)
  (same comment as for Chloride)
- Aluminium [water, ground-, long-term]: 0.035943 kg; lognormal variance with pedigree 0.26, pedigree (1,1,5,1,1)
  (same comment as for Mercury)
- Fluoride [water, ground-, long-term]: 3.329e-5 kg; lognormal variance with pedigree 1.13, pedigree (1,1,5,1,1)
  (same comment as for Mercury)
- Magnesium [water, ground-, long-term]: 0.02296 kg; lognormal variance with pedigree 0.31, pedigree (1,1,5,1,1)
  (same comment as for Mercury)
- Boron [water, ground-]: 1.2608e-5 kg; lognormal variance with pedigree 1.03, pedigree (1,1,5,1,1)
  (same comment as for Chloride)
- Barium [water, ground-]: 2.6492e-8 kg; lognormal variance with pedigree 1.83, pedigree (1,1,5,1,1)
  (same comment as for Chloride)
- Zinc, ion [water, ground-]: 1.9564e-9 kg; lognormal variance with pedigree 2.17, pedigree (1,1,5,1,1)
  (same comment as for Chloride)
- Scandium [water, ground-]: 1.082e-6 kg; lognormal variance with pedigree 1.48, pedigree (1,1,5,1,1)
  (same comment as for Chloride)
- Potassium, ion [water, ground-]: 0.0025925 kg; lognormal variance with pedigree 0.51, pedigree (1,1,5,1,1)
  (same comment as for Chloride)
- Beryllium [water, ground-, long-term]: 3.0581e-6 kg; lognormal variance with pedigree 1.46, pedigree (1,1,5,1,1)
  (same comment as for Mercury)
- Bromine [water, ground-]: 1.2044e-5 kg; lognormal variance with pedigree 1.28, pedigree (1,1,5,1,1)
  (same comment as for Chloride)
- Magnesium [water, ground-]: 1.0932e-5 kg; lognormal variance with pedigree 1.06, pedigree (1,1,5,1,1)
  (same comment as for Chloride)
- Lead [water, ground-, long-term]: 1.5255e-5 kg; lognormal variance with pedigree 1.25, pedigree (1,1,5,1,1)
  (same comment as for Mercury)
- Tin, ion [water, ground-]: 9.7239e-10 kg; lognormal variance with pedigree 2.27, pedigree (1,1,5,1,1)
  (same comment as for Chloride)
- Silicon [water, ground-]: 0.0020738 kg; lognormal variance with pedigree 0.5, pedigree (1,1,5,1,1)
  (same comment as for Chloride)
- Cobalt [water, ground-]: 1.0966e-8 kg; lognormal variance with pedigree 1.95, pedigree (1,1,5,1,1)
  (same comment as for Chloride)
- Bromine [water, ground-, long-term]: 2.0718e-7 kg; lognormal variance with pedigree 1.3, pedigree (1,1,5,1,1)
  (same comment as for Mercury)
- Tungsten [water, ground-, long-term]: 4.704e-6 kg; lognormal variance with pedigree 1.35, pedigree (1,1,5,1,1)
  (same comment as for Mercury)
- Chromium VI [water, ground-, long-term]: 3.797e-6 kg; lognormal variance with pedigree 1.2, pedigree (1,1,5,1,1)
  (same comment as for Mercury)
- Nickel, ion [water, ground-, long-term]: 2.2896e-5 kg; lognormal variance with pedigree 1.2, pedigree (1,1,5,1,1)
  (same comment as for Mercury)
- Silicon [water, ground-, long-term]: 0.26208 kg; lognormal variance with pedigree 0.1, pedigree (1,1,5,1,1)
  (same comment as for Mercury)
- Sodium, ion [water, ground-]: 0.0047745 kg; lognormal variance with pedigree 0.46, pedigree (1,1,5,1,1)
  (same comment as for Chloride)
- Iodide [water, ground-, long-term]: 1.5314e-13 kg; lognormal variance with pedigree 1.58, pedigree (1,1,5,1,1)
  (same comment as for Mercury)
- Fluoride [water, ground-]: 4.9946e-6 kg; lognormal variance with pedigree 1.23, pedigree (1,1,5,1,1)
  (same comment as for Chloride)
- Tungsten [water, ground-]: 2.953e-6 kg; lognormal variance with pedigree 1.37, pedigree (1,1,5,1,1)
  (same comment as for Chloride)
- Copper, ion [water, ground-, long-term]: 1.5296e-5 kg; lognormal variance with pedigree 1.25, pedigree (1,1,5,1,1)
  (same comment as for Mercury)
- Arsenic, ion [water, ground-]: 1.5185e-5 kg; lognormal variance with pedigree 1.25, pedigree (1,1,5,1,1)
  (same comment as for Chloride)
- Sulfate [water, ground-, long-term]: 0.10207 kg; lognormal variance with pedigree 0.24, pedigree (1,1,5,1,1)
  (same comment as for Mercury)
- Calcium, ion [water, ground-, long-term]: 0.15308 kg; lognormal variance with pedigree 0.12, pedigree (1,1,5,1,1)
  (same comment as for Mercury)
- Phosphate [water, ground-]: 8.7813e-7 kg; lognormal variance with pedigree 1.52, pedigree (1,1,5,1,1)
  (same comment as for Chloride)
- Selenium [water, ground-]: 1.2475e-6 kg; lognormal variance with pedigree 1.48, pedigree (1,1,5,1,1)
  (same comment as for Chloride)
- Zinc, ion [water, ground-, long-term]: 3.8108e-5 kg; lognormal variance with pedigree 1.13, pedigree (1,1,5,1,1)
  (same comment as for Mercury)

## Sampling procedure
country-specific calculation based on literature data

## Extrapolations
This dataset has been extrapolated from year 2000 to the year of the calculation (2021). The uncertainty has been adjusted accordingly.

## Review by Niels Jungbluth 2009-01-22
passed.
