# wood pellet production

Dataset: EcoSpold 2, unit process
Geography: RoW
Time period: 2011-01-01 to 2021-12-31
Technology level: modern
Classification: ISIC rev.4 ecoinvent: 1610:Sawmilling and planing of wood
Classification: EcoSpold01Categories: wood energy/fuels
Synonyms: wood pellets production
Tags: single enterprise data
Scenario: Business-as-Usual
System model: Allocation, cut-off by classification
Generated by: Christian Bauer
Database: ecoinvent
isCopyrightProtected: true
accessRestrictedTo: 1

## General comment
This dataset represent the inputs and outputs of materials and energy for wood pellets production. Pellets are produced in a wood pellets factory which uses wood residue from sawmills and woodchips as raw materials. The raw materials are firstly pre-treated and dryed, then comminuted and mixed. In the end they are pellettized, cooled and bagged. Pellets that are packed in 15 kg-bags amount to the 20% of the production. The remaining 80% are sold unpacked. The pellets produced match the caracteristics of the German standard of quality DIN-plus (certification).
There is no waste modelled of the packaging film and maize starch, since these inputs will be part of the final product.

## Included activities start
From the receipt of the raw material at the pellet factory

## Included activities end
This activity ends with the final product (wood pellets) ready to be delivered at the production factory.It doesnt include the transport of the pellets to the final customers.

## Technology
Production in a modern wood pellets factory in Switzerland (years 2011- 2012)

## Parameters
- fraction, process water, to air: 0.15 dimensionless; name fraction_PW_to_air; lognormal variance with pedigree 0.092025, pedigree (4,4,3,2,4)
  Literature value. In case when no industry/process specific data are available, default evaporation fraction value is used. This value is 15% and is based on literature (Statistics Canada, 2007 & Shaffer, K.H., 2008, Consumptive water use in the Great Lakes Basin, USGS & Shiklomanov, 2003, World Water Resources at the Beginning of the 21st Century) and has been approved by an expert.

## Reference product
- wood pellet, measured as dry mass: 1 kg; name wood_pellet; CPC 39281: Wood pellets; By-product classification allocatable product
  production volume 6.3e9 kg; name apv_wood_pellet
    Literature value. Global production of about 15–16,000,000 t in 2010. Thereof 9,200,000 t are produced in EU 27 and about 6,000,000 t in North America.
  property heating value, net 13.38 MJ
    LHV is calculated based on the Carbon content of the product. More details can be found on the respective documentation.
  property price 0.0901 EUR2005
    Calculated value. The price of wood chips which are used for wood pellet production is 48.76 Euro/m3 (FAOSTAT database; http://faostat.fao.org/site/626/DesktopDefault.aspx?PageID=626#ancor). The density of the wood pellet is 650 kg/m3. It is estimated that processing the wood chips into a pellets will add 20% to the value of the pellets.
  property carbon content 0.494
    carbon content on a dry matter basis (reserved; not for manual entry)
  properties: dry mass 1 kg, wet mass 1.1 kg, water in wet mass 0.1 kg, water content 0.1, carbon content, fossil 0, carbon content, non-fossil 0.494, carbon allocation 0.494 kg

## Inputs from technosphere
- wood chips, wet, measured as dry mass: 0 kg; source AEK Pellets AG 2011; pedigree (1,1,1,1,1)
  calculated value.
  According to company questionnaires, 0.13 kg of wood chips, wet are used per kg of wood pellet produced.
  The share of softwood (169kg/m3) amounts to 95%, the share of hardwood (239kg/m3) to 5%.
  properties: wet mass 2.1 kg, water content 1.1, carbon content, non-fossil 0.494, heating value, net 10.84 MJ, dry mass 1 kg
  note on heating value, net: Value based on the dataset 'softwood forestry, mixed species, sustainable forest management'
- pointing device, optical mouse, with cable: 8e-9 unit; = (2/50000000)/5; source AEK Pellets AG 2011; lognormal variance with pedigree 0.0158, pedigree (2,3,4,4,1)
  Calculated value - numbers of device in the wood pellet factory for production/real annual production (50000000kg, from company questionnaire)/lifetime of the device (own assumption 5 years)
  properties: dry mass 0.12 kg, wet mass 0.12 kg, carbon content, fossil 0.482336
  note on carbon content, fossil: Calculated as the addition of C contents in the product composition, then referred to 1 kg DM
- electricity, medium voltage: 0 kWh; source AEK Pellets AG 2011; pedigree (1,1,1,1,1)
  Calculated value - annual electricity consumption of the pellet factory (4800000 kWh/year, from company questionnaire)/real annual production (50000000kg, from company questionnaire)
- shavings, softwood, measured as dry mass: 0 kg; pedigree (1,1,1,1,1)
  Calculated value.
  According to company questionnaires, 0.30 kg of dry sawmilling residues are used per kg of wood pellet produced.
  This amount has been divided evenly between "shaving, softwood, measured as dry mass" and "shaving, hardwood, measured as dry mass"
  properties: heating value, net 13.38 MJ, water content 0.1, carbon content, non-fossil 0.494, dry mass 1 kg, wet mass 1.1 kg
- waste mineral oil: -8.4e-5 kg; name waste_min_oil; = (lubricating_oil)*-1
  calculated value
  production volume 529200 kg; = waste_min_oil*apv_wood_pellet
    Calculated from production volume of reference product using the relative outputs.
  property price 0 EUR2005; name waste_min_oil_price_EUR2005
  properties: water content 0.111111, dry mass 0.9 kg, carbon content, fossil 0.864444, wet mass 1 kg, heating value, net 34.7 MJ
  note on carbon content, fossil: Tab A.6, ecoinvent v2.2 report 13_I. C content has been calculated after data in the tables, and then referred to 1 kg DM
  note on heating value, net: Value taken from the general comment of the treatment dataset.
- dust collector, multicyclone: 1e-9 unit; = (1/50000000)/20; source AEK Pellets AG 2011; lognormal variance with pedigree 0.0158, pedigree (2,3,4,4,1)
  Calculated value - numbers of device in the wood pellet factory for production/real annual production (50000000kg, from company questionnaire)/lifetime of the device (20 years)
- keyboard: 8e-9 unit; = (2/50000000)/5; source AEK Pellets AG 2011; lognormal variance with pedigree 0.0158, pedigree (2,3,4,4,1)
  (same comment as for pointing device, optical mouse, with cable)
  properties: wet mass 1.18 kg, carbon content, fossil 0.57577, dry mass 1.18 kg
- shavings, hardwood, measured as dry mass: 0 kg; pedigree (1,1,1,1,1)
  (same comment as for shavings, softwood, measured as dry mass)
  properties: wet mass 1.1 kg, carbon content, non-fossil 0.494, dry mass 1 kg, water content 0.1, heating value, net 13.38 MJ
- packaging film, low density polyethylene: 0.00228 kg; = (114000/50000000); source AEK Pellets AG 2011; lognormal variance with pedigree 0.0198, pedigree (2,3,4,4,1)
  calculated value - annual consumption of packaging film for bagging wood pellets into15 kg-bags and for packaging pallets (114000 kg/year, from company questionnaire)/real annual production (50000000kg, from company questionnaire). Pellets which are sold packed amount to the 20% of the total production. Remaining 80% are sold unpacked.
  properties: dry mass 1 kg, carbon content, fossil 0.857143, wet mass 1 kg, heating value, net 42.47 MJ
  note on carbon content, fossil: Polyethylene is formed out of a huge amount of ethylene monomers (C2H4) (ecoinvent v2.2 report 11_II). MW=28 g/mol
- heat, central or small-scale, other than natural gas: 0.11232 MJ; = 0.06912+0.0432; source AEK Pellets AG 2011; lognormal variance with pedigree 0.0198, pedigree (2,3,4,4,1)
  value provided by pellet production company; represents heat used for drying the raw material (0.06912 MJ/kg) plus for heating of the buildings (0.0432 MJ/kg)
  properties: heating value, net 1 MJ
- computer, desktop, without screen: 8e-9 unit; = (2/50000000)/5; source AEK Pellets AG 2011; lognormal variance with pedigree 0.0158, pedigree (2,3,4,4,1)
  (same comment as for pointing device, optical mouse, with cable)
  properties: carbon content, non-fossil 0.000485011, dry mass 11.3 kg, wet mass 11.3 kg, carbon content, fossil 0.0877555
- dust collector, electrostatic precipitator, for industrial use: 1e-9 unit; = (1/50000000)/20; source AEK Pellets AG 2011; lognormal variance with pedigree 0.0158, pedigree (2,3,4,4,1)
  (same comment as for dust collector, multicyclone)
- maize starch: 0.005 kg; = (250000/50000000); source AEK Pellets AG 2011; lognormal variance with pedigree 0.0158, pedigree (2,3,4,4,1)
  Calculated value - annual consumption of maize starch added as a natural binder to the raw material during the pellettizing process (250000 kg/year, from company questionnaire)/real annual production (50000000kg, from company questionnaire)
  properties: dry mass 0.86 kg, wet mass 1 kg, carbon content, non-fossil 0.46, water content 0.162791, heating value, net 11.64 MJ
  note on carbon content, non-fossil: C-content of starch is considered 46% on dry mass basis (from "Evolutionary and Biochemical Aspects", A.D. Kay and T. Vrede (in Global Ecology, 2010, Elsevier B.V., S.E. Jørgensen Ed.)).
- wood pellet factory: 4e-10 unit; = (1/50000000)/50; source AEK Pellets AG 2011; lognormal variance with pedigree 0.0158, pedigree (2,3,4,4,1)
  Calculated value - unit of the wood pellet factory for production/real annual production (50000000kg, from company questionnaire)/lifetime of the wood pellet factory (50 years)
- display, liquid crystal, 17 inches: 1.6e-8 unit; = (4/50000000)/5; source AEK Pellets AG 2011; lognormal variance with pedigree 0.0158, pedigree (2,3,4,4,1)
  (same comment as for pointing device, optical mouse, with cable)
  properties: carbon content, non-fossil 7.50159e-5, carbon content, fossil 0.309893, wet mass 5.1 kg, dry mass 5.1 kg
- lubricating oil: 8.4e-5 kg; name lubricating_oil; = (4200/50000000); source AEK Pellets AG 2011; lognormal variance with pedigree 0.0198, pedigree (2,3,4,4,1)
  Calculated value - annual consumption of lubricating oil for machineries mainteinance (4200 kg/year, from company questionnaire)/real annual production (50000000kg, from company questionnaire)
  properties: heating value, net 40.2 MJ, wet mass 1 kg, dry mass 1 kg, carbon content, fossil 0.75
  note on heating value, net: Literature value, Source: IPCC 2006, 2006 IPCC Guidelines for National Greenhouse Gas Inventories, Prepared by the National Greenhouse Gas Inventories Programme, Eggleston H.S., Buendia L., Miwa K., Ngara T. and Tanabe K. (eds). Published: IGES, Japan
  note on carbon content, fossil: Lubricating oil is produced from diesel. C-content/dry mass of fats and oils considered 75%, from: ecoinvent v2.2 report, n 15a, pg 40
- sawdust, wet, measured as dry mass: 0 kg; pedigree (1,1,1,1,1)
  Calculated value.
  According to company questionnaires, 0.57 kg of "saw dust, wet" are used per kg of wood pellet produced
  properties: carbon content, non-fossil 0.494, water content 0.7, wet mass 1.7 kg, dry mass 1 kg, heating value, net 7.79 MJ
- wood chips, wet, measured as dry mass: 0.000293884, 0.129706 kg (2 entries); source AEK Pellets AG 2011; lognormal variance with pedigree 0.0158, pedigree (2,3,4,4,1)
  (same comment as for wood chips, wet, measured as dry mass)
- electricity, medium voltage: 0.0012101, 0.000232045, 0.00389555, 0.0566573, 0.00798587, 0.0260192 kWh (6 entries); source AEK Pellets AG 2011; lognormal variance with pedigree 0.0198, pedigree (2,3,4,4,1)
  (same comment as for electricity, medium voltage)
- shavings, softwood, measured as dry mass: 0.00789484, 0.142105 kg (2 entries); lognormal variance with pedigree 0.0158, pedigree (2,3,4,4,1)
  (same comment as for shavings, softwood, measured as dry mass)
- shavings, hardwood, measured as dry mass: 0.00114416, 0.148856 kg (2 entries); lognormal variance with pedigree 0.0158, pedigree (2,3,4,4,1)
  (same comment as for shavings, softwood, measured as dry mass)
- sawdust, wet, measured as dry mass: 0.0113828, 0.558617 kg (2 entries); lognormal variance with pedigree 0.0158, pedigree (2,3,4,4,1)
  (same comment as for sawdust, wet, measured as dry mass)

## Inputs from nature
- Water, unspecified natural origin [natural resource, in water]: 3e-5 m3; name water_UNO_input; = (1500000/50000000)/1000; source AEK Pellets AG 2011; lognormal variance with pedigree 0.0198, pedigree (2,3,4,4,1)
  Calculated value - water consumed annually for conditioning process (1500000 kg/year, from company questionnaire)/ real annual production [then converted in m3 /1000]

## Emissions to nature
- Water [air, unspecified]: 4.5e-6 m3; name water_to_air_unspecified; = water_UNO_input*fraction_PW_to_air; lognormal variance with pedigree 0.130025, pedigree (4,4,5,2,4)
  Calculated value based on literature values and expert opinion. See comments in the parametres' comment field.
  property fraction, origin: salt water 0; name fraction_origin_salt_water
  property fraction, origin: unspecified 1; name fraction_origin_unspecified
  property fraction, origin: fresh water 0; name fraction_origin_fresh_water
- Water [water, unspecified]: 2.55e-5 m3; name water_to_water_unspecified; = water_UNO_input*(1-fraction_PW_to_air); lognormal variance with pedigree 0.130025, pedigree (4,4,5,2,4)
  (same comment as for Water)
  property fraction, origin: unspecified 1; name fraction_origin_unspecified_Ww
  property fraction, origin: fresh water 0; name fraction_origin_fresh_water_Ww
  property fraction, origin: salt water 0; name fraction_origin_salt_water_Ww

## Sampling procedure
visit at the pellet production factory, answers to a technical questionnaire, personal communications with the wood pellets production company

## Extrapolations
extrapolated from Swiss data, pellet properties taken from German standard of quality

## Review by Emilia Moreno Ruiz 2014-06-05
AL set for heat input
