# chloroacetic acid production

Dataset: EcoSpold 2, unit process
Geography: RER
Time period: 1997-01-01 to 2021-12-31
Technology level: current
Classification: EcoSpold01Categories: chemicals/organics
Classification: ISIC rev.4 ecoinvent: 2011:Manufacture of basic chemicals
Synonyms: MCA; Monochloroacetic acid; chloroethanoic acid
Tags: ConvertedDataset
Scenario: Business-as-Usual
System model: Allocation, cut-off by classification
Generated by: Mike Chudacoff
Published in: Althaus H.-J. 2007
Database: ecoinvent
isCopyrightProtected: true
accessRestrictedTo: 1

## General comment
This data represents the production of 1 kg of chloroacetic acid via the reaction of acetic acid with chlorine. Raw materials, emissions and energy consumption are estimated. Infrastructure is included with a default value.
[This dataset was already contained in the ecoinvent database version 2. It was not individually updated during the transfer to ecoinvent version 3. Life Cycle Impact Assessment results may still have changed, as they are affected by changes in the supply chain, i.e. in other datasets. This dataset was generated following the ecoinvent quality guidelines for version 2. It may have been subject to central changes described in the ecoinvent version 3 change report (http://www.ecoinvent.org/database/ecoinvent-version-3/reports-of-changes/), and the results of the central updates were reviewed extensively. The changes added e.g. consistent water flows and other information throughout the database. The documentation of this dataset can be found in the ecoinvent reports of version 2, which are still available via the ecoinvent website. The change report linked above covers all central changes that were made during the conversion process.]

## Included activities start
From the reception of acetic acid at the factory gate.

## Included activities end
This activity ends with 1 kg of chloroacetic acid at the factory gate. The dataset includes the input materials, energy uses, infrastructure and emissions.

## Geography
RER

## Technology
In 2000, some 43’000 tonnes of MCA were produced in the US. One major German pant alone produces some 60’000 tonnes annually.
Commercial production of MCA is by direct chlorination of acetic acid or by conversion of di-chloroacetic acid to MCA by hydrogen reduction. Most MCA is produced for captive use.
Direct chlorination of acetic acid (industry sources):
Acetic acid, mixed with 5% acetic anhydride, is fed into a reactor. Chlorine is fed into the bottom and is converted to gaseous hydrochloric acid (HCl). The HCl gas is absorbed by water to form aqueous hydrochloric acid. The product solution is distilled. The resulting crude chloroacetic acid is mixed with water, and cooled in a crystallizer to recover solid MCA. The remaining dichloroacetic acid (DCA) is removed and hydrogenated to MCA.
Cl2 + CH3COOH  ClCH2COOH + HCl (production of MCA)
2 Cl2 + CH3COOH  Cl2CHCOOH + 2 HCl (production of DCA)
2 H2 + 2 Cl2CHCOOH  2 ClCH2COOH + 2 HCl (hydrogenation of DCA to MCA)
References:
Chemical Profiles Chemical profiles are published weekly in the Chemical Market Reporter, a pub-lication of the Schnell Publishing Company, a member of the Reed Elsevier group.
Clartext 4/2002 Hanisch, C.: “Kein Hauch von Essigduft: Monochloressigsäure aus Knapsack”

## Reference product
- chloroacetic acid: 1 kg; By-product classification allocatable product; CPC 34120: Industrial monocarboxylic fatty acids; acid oils from refining; CAS 79-11-8
  MCA has a molecular weight of 94.5 g/mol. MCA melts at about 57 °C and boils at 169°C. MCA is a corrosive and toxic product. Its crystal form decomposes on heating producing toxic and corrosive gases (hydrogen chloride, phosgene). The solution in water is a strong acid, and reacts violently with bases and is corrosive. MCA can be sold as a white pow-der or as a 20% aqueous solution.
  Major direct and indirect uses include:
  thickening agents for the food, oil, mining, personal care, and detergent industries;
  agrochemicals (e.g. the herbicide 2,4-D (2,4-dichlorophenoxyacetic acid) accounted for nearly 25% of all US uses in the year 2000)
  thermo stabilizers for PVC (via thioglycolates);
  adhesives (e.g. via. CMC/CMS/cyanoacetic ester);
  surfactants (e.g. via betaines/imidazolines/ethercarboxylic acids);
  pharmaceuticals (e.g. via CAC/ phenoxyacetic acid/glycine)
  Source: www.mca.akzonobel.com <http://www.mca.akzonobel.com>
  EcoSpold01Location=RER
  production volume 1.32237 kg
    This is a placeholder value that does not reflect real-world production volumes. This dataset does not currently require a real-world production volume to work in the database framework, and no actual data were collected yet. This has no negative effect on the results of the ecoinvent database. The placeholder value of this activity was scaled according to the nominal GDP of 2005 (source: United Nations, http://data.un.org/Glossary.aspx?q=GDP+%28current+US%24%29, accessed 20130726) to reflect an appropriate share of the global production volume, which is also a placeholder value.
  property price 0.83 EUR2005
    Calculated value based on data from United Nations Commodity Trade Statistics Database (comtrade.un.org). UN comtrade category: 291540 Mono-, di-, tri- chloroacetic acids, salts & esters. Year 2005. Using exchange rate of 1EURO = 1.209 USD. Average of price of import into 5 main markets (EU, US, JP, IN and CN).
  property heating value, net 11.55 MJ
    LHV is calculated based on the elemental composition of the substance. Based on the CAS number of the substance (000079-11-8), the chemical formula of the substance is found to be: C2H3ClO2, (PubChem 2020).
    Reference: Kim, S., Chen, J., Cheng, T., Gindulyte, A., He, J., He, S., Li, Q., Shoemaker, B. A., Thiessen, P. A., Yu, B., Zaslavsky, L., Zhang, J., & Bolton, E. E. (2019). PubChem 2019 update: improved access to chemical data. Nucleic acids research, 47(D1), D1102–D1109. https://doi.org/10.1093/nar/gky1033
  property carbon content 0.255319
    carbon content on a dry matter basis (reserved; not for manual entry)
  properties: water content 0, wet mass 1 kg, carbon content, fossil 0.255319, water in wet mass 0 kg, dry mass 1 kg, carbon content, non-fossil 0, carbon allocation 0.255319 kg

## Inputs from technosphere
- heat, district or industrial, other than natural gas: 0.76356 MJ; lognormal variance with pedigree 0.0586, pedigree (4,3,5,1,1)
  Estimation.
  Source:
  Clartext 4/2002 Hanisch, C.: "Kein Hauch von Essigduft: Monochloressigsäure aus Knapsack"
  Uncertainty: steam production
  properties: heating value, net 1 MJ
- electricity, medium voltage: 0.089544 kWh; lognormal variance with pedigree 0.0486, pedigree (4,3,5,1,1)
  Estimation.
  Source:
  Clartext 4/2002 Hanisch, C.: "Kein Hauch von Essigduft: Monochloressigsäure aus Knapsack"
  EcoSpold01Location=UCTE
  Uncertainty: power
- chlorine, liquid: 0.76 kg; lognormal variance with pedigree 0.0406, pedigree (1,3,5,1,1)
  EcoSpold01Location=RER
  Estimation.
  Uncertainty: precursor
  properties: wet mass 1 kg, dry mass 1 kg
- acetic acid, without water, in 98% solution state: 0.66 kg; lognormal variance with pedigree 0.0406, pedigree (1,3,5,1,1)
  Estimation.
  EcoSpold01Location=RER
  Uncertainty: precursor
  properties: heating value, net 14.6 MJ, dry mass 1 kg, carbon content, fossil 0.400016, wet mass 1 kg
  note on heating value, net: Based on literature, page 10, Althaus H.-J., Chudacoff M., Hischier R., Jungbluth N., Osses M. and Primas A. (2007) Life Cycle Inventories of Chemicals. Final report ecoinvent data v2.0 No. 8. EMPA, Swiss Centre for Life Cycle Inventories, Dübendorf, CH, Online-Version under: www.ecoinvent.org.
- chemical factory, organics: 4e-10 unit; lognormal variance with pedigree 0.066, pedigree (4,5,5,1,1)
  Estimation. Data was estimated based on the dataset "chemical plant, organics". This module assumes a built area of about 4.2 ha, an average output of 50'000 t/a, and plant life of fifty years.
  EcoSpold01Location=RER
  Uncertainty: infrastructure
- heat, district or industrial, natural gas: 1.368 MJ; lognormal variance with pedigree 0.0586, pedigree (4,3,5,1,1)
  (same comment as for heat, district or industrial, other than natural gas)
  properties: heating value, net 1 MJ

## Emissions to nature
- Acetic acid [air, urban air close to ground]: 0.00132 kg; lognormal variance with pedigree 0.0586, pedigree (4,3,5,1,1)
  Estimation. Air emissions occurring in the different stages of the production were estimated to 0.2% of the raw material input
  Uncertainty: air emission
- Chlorine [air, urban air close to ground]: 0.00152 kg; lognormal variance with pedigree 0.0586, pedigree (4,3,5,1,1)
  (same comment as for Acetic acid)

## Sampling procedure
see technology

## Extrapolations
This dataset has been extrapolated from year 2000 to the year of the calculation (2021). The uncertainty has been adjusted accordingly.

## Review by Heiko Kunst 2003-07-06
Passed.

## Review by Emilia Moreno Ruiz 2012-05-31
dataset documented by trainee Helen Hamilton
