# uranium mine operation, underground

Dataset: EcoSpold 2, unit process
Geography: RoW
Time period: 1980-01-01 to 2021-12-31
Technology level: current
Classification: ISIC rev.4 ecoinvent: 0721:Mining of uranium and thorium ores
Classification: EcoSpold01Categories: nuclear power/production
Tags: ConvertedDataset
Scenario: Business-as-Usual
System model: Allocation, cut-off by classification
Generated by: Roberto Dones
Published in: Dones, R. 2007
Database: ecoinvent
isCopyrightProtected: true
accessRestrictedTo: 1

## General comment
The data on radioactive emission to air and water are from old references; the range of values spans some order of magnitudes for uranium, Ra-226, and Th-230 releases to water, and it is about one order of magnitude for Ra-222 to air. Emission of uranium to air is given separately from total particles; these are assumed as dust >10 micrometer; emissions from combustion are implicitly accounted for through the energy requirement modules. It is assumed that the overburden and the ore piles that are not transfered to the mill plant, are dumped back in the mine. Reclamation of the waste remaining on surface is not included in the module because of lack of information. However, by far the largest masses of waste originating in mining are found in the mill tailings.
[This dataset was already contained in the ecoinvent database version 2. It was not individually updated during the transfer to ecoinvent version 3. Life Cycle Impact Assessment results may still have changed, as they are affected by changes in the supply chain, i.e. in other datasets. This dataset was generated following the ecoinvent quality guidelines for version 2. It may have been subject to central changes described in the ecoinvent version 3 change report (http://www.ecoinvent.org/database/ecoinvent-version-3/reports-of-changes/), and the results of the central updates were reviewed extensively. The changes added e.g. consistent water flows and other information throughout the database. The documentation of this dataset can be found in the ecoinvent reports of version 2, which are still available via the ecoinvent website. The change report linked above covers all central changes that were made during the conversion process.]

## Included activities end
The module includes: diesel used in generators for all mining uses; transport of the diesel fuel; radioactive and non-radioactive emissions to air and water; water use (mining water).

## Geography
North American data.

## Technology
Average conditions in early 1980s.

## Parameters
- fraction, process water, to air: 0.15 dimensionless; name fraction_PW_to_air; lognormal variance with pedigree 0.092025, pedigree (4,4,3,2,4)

## Reference product
- uranium ore, as U: 1 kg; CPC 13000: Uranium and thorium ores and concentrates; By-product classification allocatable product
  EcoSpold01Location=RNA
  production volume 8.71117e6 kg
    43% of global mine production is from underground mines, not including 36% in-situ leaching, and 7% from the Olympic Dam co-producing mine. (Source: http://www.world-nuclear.org/info/inf23.html)
  property price 20.96 EUR2005
    Calculated value based on data from United Nations Commodity Trade Statistics Database (comtrade.un.org). UN comtrade category: 261210 Uranium ores and concentrates. Year 2005. Using exchange rate of 1EURO = 1.209 USD. Average of price of import into 2 main markets (EU and US).
  property carbon content 0
    carbon content on a dry matter basis (reserved; not for manual entry)
  properties: water in wet mass 0 kg, carbon content, fossil 0, wet mass 1 kg, carbon content, non-fossil 0, dry mass 1 kg, water content 0, carbon allocation 0 kg

## Inputs from technosphere
- mine infrastructure, underground, uranium: 2.78e-7 unit; lognormal variance with pedigree 0.162, pedigree (1,1,5,5,1)
  own estimatoin
  EcoSpold01Location=RNA
- blasting: 0.26 kg; lognormal variance with pedigree 0.342, pedigree (1,1,5,5,1)
  EcoSpold01Location=RER
  old reference for model mine
- diesel, burned in diesel-electric generating set, 10MW: 300 MJ; lognormal variance with pedigree 0.692, pedigree (1,1,5,5,1)
  EcoSpold01Location=GLO
  range of data
  properties: heating value, net 1 MJ

## Inputs from nature
- Transformation, from unspecified [natural resource, land]: 0.005 m2; lognormal variance with pedigree 0.162, pedigree (1,1,5,5,1)
  own estimation, based on range of data
- Uranium, in ground [natural resource, in ground]: 1.05 kg; lognormal variance with pedigree 0.042, pedigree (1,1,5,5,1)
  own estimation
- Occupation, mineral extraction site [natural resource, land]: 0.1 m2*year; lognormal variance with pedigree 0.252, pedigree (1,1,5,5,1)
  own estimation, based on range of data
- Transformation, to unspecified [natural resource, land]: 0.005 m2; lognormal variance with pedigree 0.162, pedigree (1,1,5,5,1)
  own estimation, based on range of data
- Water, unspecified natural origin [natural resource, in water]: 0.1 m3; name water_UNO_input; lognormal variance with pedigree 0.342, pedigree (1,1,5,5,1)
  range of data
- Transformation, from industrial area [natural resource, land]: 0.005 m2; lognormal variance with pedigree 0.162, pedigree (1,1,5,5,1)
  own estimation, based on range of data
- Transformation, to mineral extraction site [natural resource, land]: 0.005 m2; lognormal variance with pedigree 0.162, pedigree (1,1,5,5,1)
  own estimation, based on range of data

## Emissions to nature
- Uranium alpha [water, surface water]: 310 kBq; lognormal variance with pedigree 1.372, pedigree (1,1,5,5,1)
  range of data, old references
- Radium-226 [water, surface water]: 1600 kBq; lognormal variance with pedigree 1.372, pedigree (1,1,5,5,1)
  range of data, old references
- Particulates, > 10 um [air, non-urban air or from high stacks]: 0.033 kg; lognormal variance with pedigree 0.692, pedigree (1,1,5,5,1)
  old reference for one mine
- Beryllium [air, non-urban air or from high stacks]: 9.8e-7 kg; lognormal variance with pedigree 0.692, pedigree (1,1,5,5,1)
  old reference for one mine
- Nitrate [water, surface water]: 0.041 kg; lognormal variance with pedigree 0.342, pedigree (1,1,5,5,1)
  old reference for model mine
- Selenium [water, surface water]: 0.00041 kg; lognormal variance with pedigree 0.342, pedigree (1,1,5,5,1)
  old reference for model mine
- Sulfate [water, surface water]: 3.4 kg; lognormal variance with pedigree 0.342, pedigree (1,1,5,5,1)
  old reference for model mine
- Thorium-230 [water, surface water]: 300 kBq; lognormal variance with pedigree 1.372, pedigree (1,1,5,5,1)
  range of data, old references
- Radon-222 [air, non-urban air or from high stacks]: 1e6 kBq; lognormal variance with pedigree 1.372, pedigree (1,1,5,5,1)
  old reference for one mine
- Benzo(a)pyrene [air, non-urban air or from high stacks]: 6.7e-8 kg; lognormal variance with pedigree 0.692, pedigree (1,1,5,5,1)
  old reference for one mine
- Suspended solids, unspecified [water, surface water]: 0.15 kg; lognormal variance with pedigree 0.342, pedigree (1,1,5,5,1)
  old reference for model mine
- Magnesium [water, surface water]: 0.082 kg; lognormal variance with pedigree 0.342, pedigree (1,1,5,5,1)
  old reference for model mine
- Sodium, ion [water, surface water]: 4.7 kg; lognormal variance with pedigree 0.342, pedigree (1,1,5,5,1)
  old reference for model mine
- Molybdenum [water, surface water]: 0.018 kg; lognormal variance with pedigree 0.342, pedigree (1,1,5,5,1)
  old reference for model mine
- Chloride [water, surface water]: 0.6 kg; lognormal variance with pedigree 1.372, pedigree (1,1,5,5,1)
  old reference for model mine, range of data
- Vanadium, ion [water, surface water]: 0.0048 kg; lognormal variance with pedigree 0.342, pedigree (1,1,5,5,1)
  old reference for model mine
- Arsenic, ion [water, surface water]: 6.8e-5 kg; lognormal variance with pedigree 0.342, pedigree (1,1,5,5,1)
  old reference for model mine
- Ammonium, ion [water, surface water]: 0.065 kg; lognormal variance with pedigree 0.342, pedigree (1,1,5,5,1)
  old reference for model mine
- Iron, ion [water, surface water]: 0.11 kg; lognormal variance with pedigree 1.372, pedigree (1,1,5,5,1)
  old reference for model mine, range of data
- Cadmium [air, non-urban air or from high stacks]: 2e-6 kg; lognormal variance with pedigree 0.692, pedigree (1,1,5,5,1)
  old reference for one mine
- Uranium alpha [air, non-urban air or from high stacks]: 23 kBq; lognormal variance with pedigree 1.372, pedigree (1,1,5,5,1)
  old reference for one mine
- Water [water, unspecified]: 0.085 m3; name water_to_water_unspecified; lognormal variance with pedigree 0.0827, pedigree (2,2,5,5,1)
  Calculated value based on literature values and expert opinion. See comments in the parametres' comment field.
  property fraction, origin: salt water 0; name fraction_origin_salt_water_Ww
  property fraction, origin: fresh water 0; name fraction_origin_fresh_water_Ww
  property fraction, origin: unspecified 1; name fraction_origin_unspecified_Ww
  property water in wet mass 1000 kg; name WWM
  property carbon content, fossil 0; name C_content_fossil
  property dry mass 0 kg; name DM
  property carbon content, non-fossil 0; name C_content_non_fossil
  property wet mass 1000 kg; name WM
- Barium [water, surface water]: 0.0014 kg; lognormal variance with pedigree 0.342, pedigree (1,1,5,5,1)
  old reference for model mine
- Radium-226 [air, non-urban air or from high stacks]: 13 kBq; lognormal variance with pedigree 0.692, pedigree (1,1,5,5,1)
  old references, range of data
- Water [air, unspecified]: 0.015 m3; name water_to_air_unspecified; lognormal variance with pedigree 0.0827, pedigree (2,2,5,5,1)
  (same comment as for Water)
  property fraction, origin: fresh water 0; name fraction_origin_fresh_water
  property fraction, origin: salt water 0; name fraction_origin_salt_water
  property fraction, origin: unspecified 1; name fraction_origin_unspecified
- Lead [air, non-urban air or from high stacks]: 2e-5 kg; lognormal variance with pedigree 0.692, pedigree (1,1,5,5,1)
  old reference for one mine
- Zinc [air, non-urban air or from high stacks]: 2e-5 kg; lognormal variance with pedigree 0.692, pedigree (1,1,5,5,1)
  old reference for one mine
- Cadmium, ion [water, surface water]: 6.8e-5 kg; lognormal variance with pedigree 0.342, pedigree (1,1,5,5,1)
  old reference for model mine
- Lead [water, surface water]: 0.013 kg; lognormal variance with pedigree 0.342, pedigree (1,1,5,5,1)
  old reference for model mine
- Aluminium [water, surface water]: 0.0023 kg; lognormal variance with pedigree 0.342, pedigree (1,1,5,5,1)
  old reference for model mine
- Zinc, ion [water, surface water]: 0.00089 kg; lognormal variance with pedigree 0.342, pedigree (1,1,5,5,1)
  old reference for model mine
- Manganese [water, surface water]: 0.00075 kg; lognormal variance with pedigree 0.342, pedigree (1,1,5,5,1)
  old reference for model mine

## Sampling procedure
Literature

## Extrapolations
none This dataset has been copied from an original dataset covering the geography RNA. The uncertainty has been adjusted accordingly.

## Review by Roberto Dones 2003-08-19
passed
for final calculation August 2003
