# trimethylamine production

Dataset: EcoSpold 2, unit process
Geography: RER
Time period: 1991-01-01 to 2021-12-31
Technology level: current
Classification: ISIC rev.4 ecoinvent: 2011:Manufacture of basic chemicals
Classification: EcoSpold01Categories: chemicals/organics
Synonyms: N,N-dimethylmethanamine; TMA; N,N-dimethylmethamine
Tags: ConvertedDataset
Scenario: Business-as-Usual
System model: Allocation, cut-off by classification
Generated by: Alex Primas
Published in: Althaus H.-J. 2007
Database: ecoinvent
isCopyrightProtected: true
accessRestrictedTo: 1

## General comment
The functional unit represent 1 kg of anhydrous trimethylamine. Trimethylamine is produced commercially together with di-methylamine and mono-methylamine. Due to the stoechiometric calculation of the data in this inventory only trimethylamine was considerd as product. Large uncertainty on the process emissions due to missing data.
[This dataset was already contained in the ecoinvent database version 2. It was not individually updated during the transfer to ecoinvent version 3. Life Cycle Impact Assessment results may still have changed, as they are affected by changes in the supply chain, i.e. in other datasets. This dataset was generated following the ecoinvent quality guidelines for version 2. It may have been subject to central changes described in the ecoinvent version 3 change report (http://www.ecoinvent.org/database/ecoinvent-version-3/reports-of-changes/), and the results of the central updates were reviewed extensively. The changes added e.g. consistent water flows and other information throughout the database. The documentation of this dataset can be found in the ecoinvent reports of version 2, which are still available via the ecoinvent website. The change report linked above covers all central changes that were made during the conversion process.]

## Included activities end
Raw materials and chemicals used for production, transport of materials to manufacturing plant, estimated emissions to air and water from production (incomplete), estimation of enegry demand and infrastructure of the plant (approximation). Solid wastes (as e.g. catalysts) omitted.

## Geography
Data used has no specific geographical origin (stoechiometry). Average europenan processes for raw materials, transport requirements and electricity mix used. For methanol process with regional transport requirement for Switzerland used (Location CH).

## Technology
Production from vaporised methanol and ammonia with a process yield of 95%. After the process reaction excess ammonia and amine is recycled amine and trimethylamine is recovered in a distilling column. The inventory bases on stoechiometric calculations. The emissions to air (0.2 wt.% of raw material input) and water were estimated using mass balance. Treatment of the waste water in a internal waste water treatment plant assumed (elimination efficiency of 90% for C, 70% for NH4-N and 50% for N-tot). The used reaction catalysts in the process (aluminium silicate or phosphate) were neglected.

## Time period
Time of literature publication. Main process information source from 1979.

## Parameters
- fraction, cooling water, to air: 0.3875 dimensionless; name fraction_CW_to_air; = (0.5*fraction_CW_OT_to_air)+(0.5*fraction_CW_R_to_air); lognormal variance with pedigree 0.092025, pedigree (4,4,3,2,4)
  Calculated value based on literature value (see comments of the other parametres present in this dataset) and expert opinion. In the case when no industry/literature data are available about the type of cooling or directly fraction, cooling water, to air specific for the process a default assumption is applied. It is assumed that the once-through cooling system is used in 50% of all cases and recirculating system is used in another 50% of all cases.
- fraction, cooling water, recirculating system, to air: 0.771 dimensionless; name fraction_CW_R_to_air; lognormal variance with pedigree 0.0413, pedigree (2,3,1,3,1)
  Calculated based on literature value (Scown, C.D., 2011, Water Footprint of U.S. Transportation Fuels and supplying information of the article) (Vionnet, S., Quantis Water Database - Technical Report, 2012).
- fraction, cooling water, once-through system, to air: 0.004 dimensionless; name fraction_CW_OT_to_air; lognormal variance with pedigree 0.0413, pedigree (2,3,1,3,1)
  (same comment as for fraction, cooling water, recirculating system, to air)
- fraction, cooling water, cooling pond system, to air: 0.032 dimensionless; name fraction_CW_CP_to_air; lognormal variance with pedigree 0.0413, pedigree (2,3,1,3,1)
  (same comment as for fraction, cooling water, recirculating system, to air)

## Reference product
- trimethylamine: 1 kg; By-product classification allocatable product; CPC 34150: Amine-function compounds; oxygen-function amino-compounds, except lysine and its esters and salts thereof and […]; CAS 75-50-3
  Uncertainty not applicable for output
  EcoSpold01Location=RER
  production volume 1.32237 kg
    This is a placeholder value that does not reflect real-world production volumes. This dataset does not currently require a real-world production volume to work in the database framework, and no actual data were collected yet. This has no negative effect on the results of the ecoinvent database. The placeholder value of this activity was scaled according to the nominal GDP of 2005 (source: United Nations, http://data.un.org/Glossary.aspx?q=GDP+%28current+US%24%29, accessed 20130726) to reflect an appropriate share of the global production volume, which is also a placeholder value.
  property heating value, net 36.92 MJ
    LHV is calculated based on the elemental composition of the substance. Based on the CAS number of the substance (000075-50-3), the chemical formula of the substance is found to be: C3H9N, (PubChem 2020).
    Reference: Kim, S., Chen, J., Cheng, T., Gindulyte, A., He, J., He, S., Li, Q., Shoemaker, B. A., Thiessen, P. A., Yu, B., Zaslavsky, L., Zhang, J., & Bolton, E. E. (2019). PubChem 2019 update: improved access to chemical data. Nucleic acids research, 47(D1), D1102–D1109. https://doi.org/10.1093/nar/gky1033
  property price 0.98 EUR2005
    Calculated value based on data from United Nations Commodity Trade Statistics Database (comtrade.un.org). UN comtrade category: 292111 Methylamine, di- or trimethylamine, salts. Year 2005. Using exchange rate of 1EURO = 1.209 USD. Average of price of import into 5 main markets (EU, US, JP, IN and CN).
  property carbon content 0.610169
    carbon content on a dry matter basis (reserved; not for manual entry)
  properties: wet mass 1 kg, dry mass 1 kg, carbon content, fossil 0.610169, water content 0, carbon content, non-fossil 0, water in wet mass 0 kg, carbon allocation 0.610169 kg

## Inputs from technosphere
- chemical factory, organics: 4e-10 unit; lognormal variance with pedigree 0.508, pedigree (5,5,5,1,4)
  EcoSpold01Location=RER
  Approximation with average chem. plant
  Uncertainty: Approximation with average chem. plant
- electricity, medium voltage: 0.333 kWh; lognormal variance with pedigree 0.208, pedigree (5,5,5,1,4)
  Approximation with data of a large chem. plant
  EcoSpold01Location=UCTE
  Uncertainty: Approximation with data of a large chem. plant
- heat, district or industrial, natural gas: 1.9 MJ; lognormal variance with pedigree 0.208, pedigree (5,5,5,1,4)
  Approximation with data of a large chem. plant
  EcoSpold01Location=RER
  Uncertainty: Approximation with data of a large chem. plant
  properties: heating value, net 1 MJ
- methanol: 1.71 kg; lognormal variance with pedigree 0.1786, pedigree (4,5,5,5,5)
  EcoSpold01Location=CH
  Stoeciometric calculation (95% yield)
  Uncertainty: Stoeciometric calculation (95% yield)
  properties: carbon content, fossil 0.375, dry mass 1 kg, wet mass 1 kg, heating value, net 26.49 MJ
- ammonia, anhydrous, liquid: 0.303 kg; lognormal variance with pedigree 0.2106, pedigree (5,5,5,5,5)
  EcoSpold01Location=RER
  4,nA,nA,nA,nA,nA; Stoeciometric calculation (95% yield)
  properties: dry mass 1 kg, wet mass 1 kg

## Inputs from nature
- Water, cooling, unspecified natural origin [natural resource, in water]: 0.024 m3; name water_cooling_UNO_input; lognormal variance with pedigree 0.208, pedigree (5,5,5,1,4)
  Approximation with data of a large chem. Plant
  Uncertainty: Approximation with data of a large chem. Plant

## Emissions to nature
- DOC, Dissolved Organic Carbon [water, surface water]: 0.00308 kg; lognormal variance with pedigree 0.24, pedigree (5,5,5,5,4)
  Estimated from mass balance and WWTP effic.
  Uncertainty: Estimated from mass balance and WWTP effic.
- Methanol [water, surface water]: 0.00822 kg; lognormal variance with pedigree 0.5, pedigree (5,5,5,5,4)
  (same comment as for DOC, Dissolved Organic Carbon)
- Water [water, unspecified]: 0.0147 m3; name water_to_water_unspecified; = water_cooling_UNO_input*(1-fraction_CW_to_air); lognormal variance with pedigree 0.0807, pedigree (2,2,5,1,1)
  Calculated value based on literature values and expert opinion. See comments in the parametres' comment field.
  property carbon content, non-fossil 0; name C_content_non_fossil
  property carbon content, fossil 0; name C_content_fossil
  property fraction, origin: fresh water 0; name fraction_origin_fresh_water_Ww
  property fraction, origin: salt water 0; name fraction_origin_salt_water_Ww
  property fraction, origin: unspecified 1; name fraction_origin_unspecified_Ww
  property water in wet mass 1000 kg; name WWM
  property wet mass 1000 kg; name WM
  property dry mass 0 kg; name DM
- Nitrate [water, surface water]: 0.0106 kg; lognormal variance with pedigree 0.24, pedigree (5,5,5,5,4)
  (same comment as for DOC, Dissolved Organic Carbon)
- Water [air, unspecified]: 0.0093 m3; name water_to_air_unspecified; = (water_cooling_UNO_input*fraction_CW_to_air); lognormal variance with pedigree 0.0807, pedigree (2,2,5,1,1)
  (same comment as for Water)
  property fraction, origin: unspecified 1; name fraction_origin_unspecified
  property fraction, origin: salt water 0; name fraction_origin_salt_water
  property fraction, origin: fresh water 0; name fraction_origin_fresh_water
- Ammonium, ion [water, surface water]: 0.00463 kg; lognormal variance with pedigree 0.24, pedigree (5,5,5,5,4)
  (same comment as for DOC, Dissolved Organic Carbon)
- BOD5, Biological Oxygen Demand [water, surface water]: 0.00973 kg; lognormal variance with pedigree 0.24, pedigree (5,5,5,5,4)
  (same comment as for DOC, Dissolved Organic Carbon)
- Carbon dioxide, fossil [air, urban air close to ground]: 0.102 kg; lognormal variance with pedigree 0.2, pedigree (5,5,5,5,4)
  (same comment as for DOC, Dissolved Organic Carbon)
- Ammonia [air, urban air close to ground]: 0.000607 kg; lognormal variance with pedigree 0.33, pedigree (5,5,5,5,5)
  Estimated
  Uncertainty: Estimated
- COD, Chemical Oxygen Demand [water, surface water]: 0.00973 kg; lognormal variance with pedigree 0.24, pedigree (5,5,5,5,4)
  (same comment as for DOC, Dissolved Organic Carbon)
- TOC, Total Organic Carbon [water, surface water]: 0.00308 kg; lognormal variance with pedigree 0.24, pedigree (5,5,5,5,4)
  (same comment as for DOC, Dissolved Organic Carbon)
- Methanol [air, urban air close to ground]: 0.00342 kg; lognormal variance with pedigree 0.33, pedigree (5,5,5,5,5)
  Estimated
  Uncertainty: Estimated

## Sampling procedure
Process data based on stoechiometric calculations of few literature sources. Energy demand based on approximation from large chemical plant. Process emissions based on estimations only.

## Extrapolations
This dataset has been extrapolated from year 2002 to the year of the calculation (2021). The uncertainty has been adjusted accordingly.

## Review by Roland Hischier 2003-08-26
Passed.
