# converter production, for electric passenger car

Dataset: EcoSpold 2, unit process
Geography: GLO
Time period: 2005-01-01 to 2021-12-31
Technology level: modern
Classification: ISIC rev.4 ecoinvent: 2930:Manufacture of parts and accessories for motor vehicles
Scenario: Business-as-Usual
System model: Allocation, cut-off by classification
Generated by: F. Habermacher
Published in: F. Habermacher 2011
Database: ecoinvent
isCopyrightProtected: true
accessRestrictedTo: 1

## General comment
This dataset describes a converter used in the power electronics of the drivetrain for an electric passenger car. The data from this dataset is based on direct information from the Swiss manufacturer Brusa.The entries are given as a function of kg device. The specific converter which was used for this dataset weights 4.5 kg and is suitable for a 100kW electric drivetrain.

## Included activities start
The dataset starts with reception of the electronic components used in the converter, the efforts needed for the production of the components as well as the assembly of the converter.

## Included activities end
The activity returns the fully assmebled converter.

## Technology
This dataset is based on current, high-level standard.

## Reference product
- converter, for electric passenger car: 1 kg; name RP_amount_1; source F. Habermacher 2011; By-product classification allocatable product; CPC 482: Instruments and appliances for measuring, checking, testing, navigating and other purposes, except optical instr[…]
  This dataset is based on direct information from the Swiss manufacturer Brusa.
  production volume 40500 kg; name RP_PV_1
    Based on a rough estimate of a total production of about 9000 electric passenger cars.
  property price 187 EUR2005
    Calculated based on assumptions and data from the producer. The producer states, that the price of a power train is around 21000 euro (Bursa, http://www.brusa.biz/fileadmin/Diverses/Download/Flyer/Flyer_Drivetrain_Sets_inkl_Preis.pdf, accessed 20130725). It is estimated, that the market price=basic price + basic price*0.4. The total value (basic price) of the powertrain (21000/(1+0.4)=) 16150 euro is divided between the separate parts of the power train by their weight. The resulting price per kilogram is thus assumed to be the same for all the different parts of the power train (inverter, charger, motor, converter, etc.).

## By-products
- iron scrap, unsorted: 0 kg; source F. Habermacher 2011; CPC 39310: Slag, dross, scalings and other waste from the manufacture of iron or steel; By-product classification Recyclable; pedigree (1,1,1,1,1)
  Steel scrap from production process.
  production volume 0 kg; = RP_PV_1 * (BP_amount_1 / RP_amount_1)
    Calculated from production volume of reference product using the relative outputs.
  property price 0.149 EUR2005
    Temporary price data. Calculated as 90% of purchasers price based on: estimated at 85% of sorted scrap
  property carbon content 0
    carbon content on a dry matter basis (reserved; not for manual entry)
  properties: water in wet mass 0 kg, wet mass 1 kg, water content 0, carbon content, fossil 0, dry mass 1 kg, carbon content, non-fossil 0, carbon allocation 0 kg
- aluminium scrap, new: 0 kg; source F. Habermacher 2011; By-product classification Recyclable; CPC 39363: Waste and scrap of aluminium; pedigree (1,1,1,1,1)
  Aluminium scrap from production process.
  production volume 0 kg; = RP_PV_1 * (BP_amount_2 / RP_amount_1)
    Calculated from production volume of reference product using the relative outputs.
  property price 0.806 EUR2005
    Temporary price data. Calculated as 90% of purchasers price based on: 2005 import and export prices (total trades (USD) divided by total weight (kg) in biggest economies of the world: EU27, USA, Brasil, China, India, Japan and Russia) from UN Commodity Trade Statistics Database (http://data.un.org/Explorer.aspxDatabase [Accessed 2011.06.17]). Commodity: Waste or scrap, aluminium
  property carbon content 0
    carbon content on a dry matter basis (reserved; not for manual entry)
  properties: wet mass 1 kg, carbon content, fossil 0, carbon content, non-fossil 0, water in wet mass 0 kg, dry mass 1 kg, water content 0, carbon allocation 0 kg

## Inputs from technosphere
- steel, low-alloyed, hot rolled: 0.05 kg; source F. Habermacher 2011; lognormal variance with pedigree 0.0438, pedigree (1,4,5,4,2)
  This dataset is based on direct information from the Swiss manufacturer Brusa.
  properties: dry mass 1 kg, carbon content, fossil 0.005, wet mass 1 kg
- printed wiring board, for through-hole mounting, Pb free surface: 0.0111444 m2; = 0.1003*0.5; lognormal variance with pedigree 0.0438, pedigree (1,4,5,4,2)
  This dataset is based on direct information from the Swiss manufacturer Brusa.
  properties: wet mass 3.08 kg, dry mass 3.08 kg, carbon content, fossil 0.210221
- waste plastic, industrial electronics: 0 kg; name BP_amount_3; source F. Habermacher 2011; pedigree (1,1,1,1,1)
  Plastic scrap from production process.
  production volume 0 kg
    Calculated from production volume of reference product using the relative outputs.
  property price 0 EUR2005; name BP_amount_3_price_EUR2005
  properties: dry mass 0.847 kg, wet mass 1 kg, water content 0.180638, carbon content, fossil 0.81386, heating value, net 34.78 MJ
- printed wiring board, surface mounted, unspecified, Pb free: 0.0593111 kg; source F. Habermacher 2011; lognormal variance with pedigree 0.0438, pedigree (1,4,5,4,2)
  This dataset is based on direct information from the Swiss manufacturer Brusa.
  properties: wet mass 1 kg, carbon content, fossil 0.132522, dry mass 1 kg
- ferrite: 0.1144 kg; source F. Habermacher 2011; lognormal variance with pedigree 0.0438, pedigree (1,4,5,4,2)
  This dataset is based on direct information from the Swiss manufacturer Brusa.
  properties: wet mass 1 kg, dry mass 1 kg
- copper, cathode: 0.12 kg; source F. Habermacher 2011; lognormal variance with pedigree 0.0438, pedigree (1,4,5,4,2)
  This dataset is based on direct information from the Swiss manufacturer Brusa.
  properties: wet mass 1 kg, dry mass 1 kg
- capacitor, film type, for through-hole mounting: 0.0302222 kg; source F. Habermacher 2011; lognormal variance with pedigree 0.0438, pedigree (1,4,5,4,2)
  This dataset is based on direct information from the Swiss manufacturer Brusa.
  properties: carbon content, fossil 0.278876, dry mass 1 kg, wet mass 1 kg
- polystyrene, high impact: 0.0055 kg; source F. Habermacher 2011; lognormal variance with pedigree 0.0438, pedigree (1,4,5,4,2)
  This dataset is based on direct information from the Swiss manufacturer Brusa.
  properties: heating value, net 38.67 MJ, dry mass 1 kg, wet mass 1 kg, carbon content, fossil 0.923077
- sheet rolling, steel: 0.0764444 kg; source F. Habermacher 2011; lognormal variance with pedigree 0.0438, pedigree (1,4,5,4,2)
  This dataset is based on direct information from the Swiss manufacturer Brusa.
- silicone product: 0 kg; source F. Habermacher 2011; pedigree (1,1,1,1,1)
  This dataset is based on direct information from the Swiss manufacturer Brusa.
  properties: heating value, net 9.83 MJ, dry mass 1 kg, wet mass 1 kg, carbon content, fossil 0.324324
- printed wiring board, for through-hole mounting, Pb containing surface: 0.0111444 m2; = 0.1003*0.5; lognormal variance with pedigree 0.0438, pedigree (1,4,5,4,2)
  This dataset is based on direct information from the Swiss manufacturer Brusa.
  properties: dry mass 3.08 kg, wet mass 3.08 kg, carbon content, fossil 0.203154
- polyester resin, unsaturated: 0 kg; source F. Habermacher 2011; pedigree (1,1,1,1,1)
  This dataset is based on direct information from the Swiss manufacturer Brusa.
  properties: wet mass 1 kg, dry mass 1 kg, carbon content, fossil 0.58584, heating value, net 17.75 MJ
- aluminium, wrought alloy: 0.597778 kg; source F. Habermacher 2011; lognormal variance with pedigree 0.0438, pedigree (1,4,5,4,2)
  This dataset is based on direct information from the Swiss manufacturer Brusa.
  properties: wet mass 1 kg, dry mass 1 kg
- resistor, auxilliaries and energy use: 0.00555556 kg; source F. Habermacher 2011; lognormal variance with pedigree 0.0438, pedigree (1,4,5,4,2)
  This dataset is based on direct information from the Swiss manufacturer Brusa.
- wire drawing, copper: 0.12 kg; source F. Habermacher 2011; lognormal variance with pedigree 0.0438, pedigree (1,4,5,4,2)
  This dataset is based on direct information from the Swiss manufacturer Brusa.
- aluminium oxide, non-metallurgical: 0 kg; source F. Habermacher 2011; pedigree (1,1,1,1,1)
  This dataset is based on direct information from the Swiss manufacturer Brusa.
  property water content 0; name water_content
  property wet mass 1 kg; name WM
  property water in wet mass 0 kg; name WWM
  property carbon content, non-fossil 0; name C_content_non_fossil
  property dry mass 1 kg; name DM
  property carbon content, fossil 0; name C_content_fossil
- electricity, low voltage: 0.0219533 kWh; source F. Habermacher 2011; lognormal variance with pedigree 0.0438, pedigree (1,4,5,4,2)
  This dataset is based on direct information from the Swiss manufacturer Brusa.
- heat, central or small-scale, other than natural gas: 59.2667 MJ; source F. Habermacher 2011; lognormal variance with pedigree 0.0438, pedigree (1,4,5,4,2)
  This dataset is based on direct information from the Swiss manufacturer Brusa.
  properties: heating value, net 1 MJ
- steel, chromium steel 18/8, hot rolled: 0.0264444 kg; source F. Habermacher 2011; lognormal variance with pedigree 0.0438, pedigree (1,4,5,4,2)
  This dataset is based on direct information from the Swiss manufacturer Brusa.
  properties: dry mass 1 kg, wet mass 1 kg, carbon content, fossil 0.0008
- sheet rolling, aluminium: 0.597778 kg; source F. Habermacher 2011; lognormal variance with pedigree 0.0438, pedigree (1,4,5,4,2)
  This dataset is based on direct information from the Swiss manufacturer Brusa.
- brass: 0 kg; source F. Habermacher 2011; pedigree (1,1,1,1,1)
  This dataset is based on direct information from the Swiss manufacturer Brusa.
  properties: dry mass 1 kg, wet mass 1 kg
- iron scrap, unsorted: -0.0152889 kg; source F. Habermacher 2011; lognormal variance with pedigree 0.0444, pedigree (2,4,5,4,2)
  Steel scrap from production process.
  production volume 619.2 kg
  properties: price 0.149 EUR2005, wet mass 1 kg, dry mass 1 kg
- aluminium scrap, new: -0.0543333 kg; source F. Habermacher 2011; lognormal variance with pedigree 0.0444, pedigree (2,4,5,4,2)
  Aluminium scrap from production process.
  production volume 2200.5 kg
  properties: price 0.806 EUR2005, wet mass 1 kg, dry mass 1 kg
- waste plastic, industrial electronics: -3.30725e-5, -0.00218915 kg (2 entries); source F. Habermacher 2011; lognormal variance with pedigree 0.0444, pedigree (2,4,5,4,2)
  Plastic scrap from production process.
  production volume 90 kg
- silicone product: 0.000184134, 0.000374755 kg (2 entries); source F. Habermacher 2011; lognormal variance with pedigree 0.0438, pedigree (1,4,5,4,2)
  This dataset is based on direct information from the Swiss manufacturer Brusa.
- polyester resin, unsaturated: 0.00311504, 0.0213294 kg (2 entries); source F. Habermacher 2011; lognormal variance with pedigree 0.0438, pedigree (1,4,5,4,2)
  This dataset is based on direct information from the Swiss manufacturer Brusa.
- aluminium oxide, non-metallurgical: 0.00479869, 0.000812416 kg (2 entries); source F. Habermacher 2011; lognormal variance with pedigree 0.0438, pedigree (1,4,5,4,2)
  This dataset is based on direct information from the Swiss manufacturer Brusa.
  properties: wet mass 1 kg, dry mass 1 kg
- brass: 6.73333e-5, 0.0133993 kg (2 entries); source F. Habermacher 2011; lognormal variance with pedigree 0.0438, pedigree (1,4,5,4,2)
  This dataset is based on direct information from the Swiss manufacturer Brusa.

## Sampling procedure
Data on materials and technology has been provided directly by the Swiss manufacturer Brusa.

## Extrapolations
This dataset has been extrapolated from year 2015 to the year of the calculation (2021). The uncertainty has been adjusted accordingly.
