# assembly of liquid crystal display, auxilliaries and energy use

Dataset: EcoSpold 2, unit process
Geography: GLO
Time period: 2001-01-01 to 2021-12-31
Technology level: current
Classification: ISIC rev.4 ecoinvent: 2620:Manufacture of computers and peripheral equipment
Classification: EcoSpold01Categories: electronics/module
Tags: ConvertedDataset
Scenario: Business-as-Usual
System model: Allocation, cut-off by classification
Generated by: Roland Hischier
Published in: Hischier R. 2007
Database: ecoinvent
isCopyrightProtected: true
accessRestrictedTo: 1

## General comment
This dataset represents the average production efforts of 1 kg of LCD computer flat screen. Data are based on information in a US-EPA LCA study about LCD and CRT production. The data represent the respective efforts for a 15-inch LCD computer screen, as it is produced in Japan in the late 1990s. Infrastructure are based on assumptions and simplifications and have thus, accordingly higher uncertainties.
[This dataset was already contained in the ecoinvent database version 2. It was not individually updated during the transfer to ecoinvent version 3. Life Cycle Impact Assessment results may still have changed, as they are affected by changes in the supply chain, i.e. in other datasets. This dataset was generated following the ecoinvent quality guidelines for version 2. It may have been subject to central changes described in the ecoinvent version 3 change report (http://www.ecoinvent.org/database/ecoinvent-version-3/reports-of-changes/), and the results of the central updates were reviewed extensively. The changes added e.g. consistent water flows and other information throughout the database. The documentation of this dataset can be found in the ecoinvent reports of version 2, which are still available via the ecoinvent website. The change report linked above covers all central changes that were made during the conversion process.]

## Included activities start
From reception of raw materials and auxiliares at the factory gate.

## Included activities end
This dataset includes the auxiliaries and energy efforts as well as the related emissions (air/water) and waste amounts for the assembly of a complete LCD screen. Estimations for infrastructure are included as well. Packaging materials are not included.

## Geography
Data from literature (based on information from Japanese producers) used as data for the global production average

## Technology
Current technology in Japan

## Parameters
- fraction, process water, to air: 0.15 dimensionless; name fraction_PW_to_air; lognormal variance with pedigree 0.092025, pedigree (4,4,3,2,4)
  Literature value. In case when no industry/process specific data are available, default evaporation fraction value is used. This value is 15% and is based on literature (Statistics Canada, 2007 & Shaffer, K.H., 2008, Consumptive water use in the Great Lakes Basin, USGS & Shiklomanov, 2003, World Water Resources at the Beginning of the 21st Century) and has been approved by an expert.

## Reference product
- assembly of liquid crystal display, auxilliaries and energy use: 1 kg; By-product classification allocatable product; CPC 47315: Monitors and projectors, principally used in an automatic data processing system
  The LCD technology is just one out of several in the last decades developed flat display technologies. Other types of flat display technologies are e.g. the Plasma Display Panel (PDP) or OLED (organic light emitting diodes) displays. It can be distinguished between the so-called (self-)emissive and non-emissive displays. While the first ones have their proper light source for the production of the picture, the second type of display - to which the LCD display belongs - requests an additional light source in order to produce the image. Non-emissive displays have a low power consumption and they are (most of time) readable even in bright sunlight. The general principle used is the fact that the so-called liquid crystal (LC) - a mixture of up to 15 different organic components - changes their properties of light passing through the crystals in function of an external electrical charge. Within the LCD technology it is distinguished between passive-matrix and active-matrix LCD displays. There each row or column of the display has a single electrical circuit. The pixels are addressed one at a time by row and column addresses. This type of display is called a passive matrix because the pixel must retain its state between refreshes without the benefit of a steady electrical charge. As the number of pixels (and, correspondingly, columns and rows) increases, this type of display becomes increasingly less feasible. Very slow response times and poor contrast are typical of passive-matrix LCDs.
  For high-resolution colour displays such as modern LCD computer monitors and televisions, an active matrix structure is used. A matrix of thin-film transistors (TFTs) is added to the polarizing and colour filters. Each pixel has its own dedicated transistor, which allows each column line to access one pixel. When a row line is activated, all of the column lines are connected to a row of pixels and the correct voltage is driven onto all of the column lines. The row line is then deactivated and the next row line is activated. All of the row lines are activated in sequence during a refresh operation. Active-matrix displays are much brighter and sharper than passive-matrix displays of the same size, and generally have quicker response times.
  As shown there, the front glass plate is used as substrate for the colour filters, while the back glass plate is the substrate for the TFT-array. The two glass plates are themselves assembled with a sealant, while spacers keep the gap between the two plates - a gap that is filled up with LC material.
  On the front plate, the colour filter contains the black matrix as well as the three colour filters (red, blue, green) and a transparent ITO layer as common electrode. These colour filters can be made thereby with either dyes or with pigments, using a variety of different colouring methods. The TFT-array consists of the actual TFT, storage capacitors, pixel electrodes and the interconnect wiring. Thereby, each pixel has its proper TFT, storage capacitor and pixel electrode in order that each pixel can be addressed individually.
  Apart the LCD panel, a TFT LCD module compromises also a driving circuit unit as well as the backlight system, plus an overall chassis for keeping the complete LCD module together. The driving circuit unit contains a set of IC chips and printed wiring boards, allowing actually addressing in the end each single pixel on the LCD panel.
  EcoSpold01Location=GLO
  production volume 1 kg
    Dummy value to be replaced by measured, estimated or calculated value
  property price 11.0321 EUR2005
    Calculated based on inputs: The price of the product has been calculated as a sum of the values of the material and energy inputs for this product. This value is therefore a rough estimation. It may underestimate the real price since there are additional expenses when producing any product. These expences can include for example labour costs, treatment of waste materials and profit for the producer. Please consider carefully whether this level of data quality is acceptable for your application.

## Inputs from technosphere
- hydrogen peroxide, without water, in 50% solution state: 0 kg; source Socolof M. L. 2001; pedigree (1,1,1,1,1)
  EcoSpold01Location=RER
  Estimation, based on literature. A 50:50 split between panel assembly and module assembly is used.
  Uncertainty: data from an US-EPA LCA study
  properties: heating value, net 7.13 MJ, wet mass 1 kg, dry mass 1 kg
- waste plastic, consumer electronics: 0 kg; source Socolof M. L. 2001; pedigree (1,1,1,1,1)
  Estimation, based on literature. A 50:50 split between panel assembly and module assembly is used.
  EcoSpold01Location=CH
  Uncertainty: data from an US-EPA LCA study - approximated with existing waste process
  production volume 0 kg
    Calculated from the production volume of assembly of liquid crystal display, auxilliaries and energy use in proportion to the respective output amounts.
  properties: heating value, net 34.78 MJ, wet mass 1 kg, dry mass 0.847 kg, carbon content, fossil 0.830215, water content 0.180638
  note on heating value, net: Assumed equal to "waste plastic, consumer electronics, sorted".
  note on carbon content, fossil: C content in 1 kg DM was calculated using data in Tab A.2, ecoinvent v2.2 report 13_I
- carbon dioxide, liquid: 0 kg; source Socolof M. L. 2001; pedigree (1,1,1,1,1)
  Estimation, based on literature. A 50:50 split between panel assembly and module assembly is used.
  EcoSpold01Location=RER
  Uncertainty: data from an US-EPA LCA study
  properties: heating value, net 8.27 MJ, carbon content, fossil 0.272727, dry mass 1 kg, wet mass 1 kg
- heat, district or industrial, natural gas: 12.312 MJ; source Socolof M. L. 2001; lognormal variance with pedigree 0.0407, pedigree (1,3,5,3,1)
  EcoSpold01Location=RER
  Literature Value.
  Uncertainty: data from an US-EPA LCA study
  properties: heating value, net 1 MJ
- sodium hydroxide, without water, in 50% solution state: 0.023933 kg; source Socolof M. L. 2001; lognormal variance with pedigree 0.0407, pedigree (1,3,5,3,1)
  (same comment as for hydrogen peroxide, without water, in 50% solution state)
  properties: heating value, net 3.03 MJ, dry mass 1 kg, wet mass 1 kg
- chlorine, liquid: 0 kg; source Socolof M. L. 2001; pedigree (1,1,1,1,1)
  (same comment as for carbon dioxide, liquid)
  properties: wet mass 1 kg, dry mass 1 kg
- hydrogen, liquid: 0 kg; source Socolof M. L. 2001; pedigree (1,1,1,1,1)
  (same comment as for hydrogen peroxide, without water, in 50% solution state)
  properties: dry mass 1 kg, heating value, net 120.21 MJ, wet mass 1 kg
- sulfuric acid: 0 kg; source Socolof M. L. 2001; pedigree (1,1,1,1,1)
  (same comment as for hydrogen peroxide, without water, in 50% solution state)
  properties: wet mass 1 kg, dry mass 1 kg
- oxygen, liquid: 0 kg; source Socolof M. L. 2001; pedigree (1,1,1,1,1)
  (same comment as for carbon dioxide, liquid)
  properties: dry mass 1 kg, wet mass 1 kg
- cyclohexanol: 0 kg; source Socolof M. L. 2001; pedigree (1,1,1,1,1)
  (same comment as for hydrogen peroxide, without water, in 50% solution state)
  properties: dry mass 1 kg, heating value, net 36.32 MJ, wet mass 1 kg, carbon content, fossil 0.72
- used printed wiring boards: -0.001 kg; source Socolof M. L. 2001; lognormal variance with pedigree 0.1107, pedigree (1,3,5,3,4)
  Estimation, based on literature. A 50:50 split between panel assembly and module assembly is used.
  EcoSpold01Location=GLO
  Uncertainty: data from an US-EPA LCA study - approximated with existing waste process
  production volume 0.001 kg
    (same comment as for waste plastic, consumer electronics)
  properties: carbon content, non-fossil 0.000960142, carbon content, fossil 0.193742, wet mass 1 kg, dry mass 1 kg
  note on carbon content, non-fossil: Composition of printed wiring boards used to calculate C content
- ethanol, without water, in 99.7% solution state, from ethylene: 0 kg; source Socolof M. L. 2001; pedigree (1,1,1,1,1)
  (same comment as for carbon dioxide, liquid)
  properties: carbon content, fossil 0.521739, dry mass 1 kg, wet mass 1 kg, heating value, net 31.58 MJ
- chemical, organic: 0.040133 kg; source Socolof M. L. 2001; lognormal variance with pedigree 0.0407, pedigree (1,3,5,3,1)
  EcoSpold01Location=GLO
  Proxy with estimation, based on literature. For those cases where no respective datasets for auxiliaries were available chemical organic is used. A 50:50 split between panel assembly and module assembly is used.
  Uncertainty: data from an US-EPA LCA study
  properties: dry mass 1 kg, carbon content, fossil 0.628, wet mass 1 kg, heating value, net 19.03 MJ
  note on carbon content, fossil: This dataset is an unweighted average of 20 organic substances (listed in Tab 88.1, ecoinvent v2.2 report 8, part II), being part of the top100 chemicals included in this database. The C-content has also been calculated as an unweighted average of the C content of the substances composing this dataset.
- methyl ethyl ketone: 0 kg; source Socolof M. L. 2001; pedigree (1,1,1,1,1)
  (same comment as for hydrogen peroxide, without water, in 50% solution state)
  properties: carbon content, fossil 0.666667, dry mass 1 kg, wet mass 1 kg, heating value, net 33.63 MJ
- phosphoric acid, industrial grade, without water, in 85% solution state: 0.0026333 kg; source Socolof M. L. 2001; lognormal variance with pedigree 0.0407, pedigree (1,3,5,3,1)
  (same comment as for carbon dioxide, liquid)
  properties: wet mass 1 kg, dry mass 1 kg
- electricity, medium voltage: 4.7963 kWh; source Socolof M. L. 2001; lognormal variance with pedigree 0.0407, pedigree (1,3,5,3,1)
  Estimation, based on literature.
  EcoSpold01Location=CN
  Uncertainty: data from an US-EPA LCA study
- krypton, gaseous: 1.72e-6 kg; source Socolof M. L. 2001; lognormal variance with pedigree 0.0407, pedigree (1,3,5,3,1)
  Literature Value.
  EcoSpold01Location=CH
  Uncertainty: data from an US-EPA LCA study
  properties: wet mass 1 kg, dry mass 1 kg
- isopropanol: 0 kg; source Socolof M. L. 2001; pedigree (1,1,1,1,1)
  (same comment as for carbon dioxide, liquid)
  properties: wet mass 1 kg, carbon content, fossil 0.6, dry mass 1 kg, heating value, net 34.3 MJ
- propylene glycol, liquid: 0 kg; source Socolof M. L. 2001; pedigree (1,1,1,1,1)
  (same comment as for hydrogen peroxide, without water, in 50% solution state)
  properties: carbon content, fossil 0.473684, dry mass 1 kg, wet mass 1 kg, heating value, net 27.09 MJ
- refinery sludge: 0 kg; source Socolof M. L. 2001; pedigree (1,1,1,1,1)
  (same comment as for waste plastic, consumer electronics)
  production volume 0 kg
    (same comment as for waste plastic, consumer electronics)
  properties: water content 8.52381, carbon content, fossil 0.767857, wet mass 1 kg, dry mass 0.105 kg, heating value, net 2.45 MJ
  note on carbon content, fossil: Tab A.6, ecoinvent v2.2 report 13_I. C content has been calculated after data in the tables, and then referred to 1 kg DM
  note on heating value, net: Value taken from the general comment of the treatment dataset.
- argon, crude, liquid: 0.00052467 kg; source Socolof M. L. 2001; lognormal variance with pedigree 0.0407, pedigree (1,3,5,3,1)
  (same comment as for carbon dioxide, liquid)
  properties: dry mass 1 kg, wet mass 1 kg
- sludge, NaCl electrolysis: -0.00382 kg; source Socolof M. L. 2001; lognormal variance with pedigree 0.1107, pedigree (1,3,5,3,4)
  (same comment as for waste plastic, consumer electronics)
  production volume 0.00382 kg
    (same comment as for waste plastic, consumer electronics)
  properties: dry mass 1 kg, wet mass 1 kg
- waste mineral oil: 0 kg; source Socolof M. L. 2001; pedigree (1,1,1,1,1)
  (same comment as for waste plastic, consumer electronics)
  production volume 0 kg
    (same comment as for waste plastic, consumer electronics)
  properties: carbon content, fossil 0.864444, heating value, net 34.7 MJ, water content 0.111111, wet mass 1 kg, dry mass 0.9 kg
- wastewater from liquid crystal display production: -0.095667 m3; name wastewater_output; source Socolof M. L. 2001; lognormal variance with pedigree 0.0407, pedigree (1,3,5,3,1)
  EcoSpold01Location=CH
  Estimation, based on literature. A 50:50 split between panel assembly and module assembly is used.
  Uncertainty: data from an US-EPA LCA study
  production volume 0.095667 m3
    (same comment as for waste plastic, consumer electronics)
  property price 0 EUR2005; name wastewater_output_price_EUR2005
  properties: water content 334.868, dry mass 2.97736 kg, carbon content, fossil 0.734985, wet mass 1000 kg
  note on carbon content, fossil: BOD is 3.37e-3 kg/kg (Tab 12.12, ecoinvent v2.2 report 18_III). BOD was converted to TOC, using conversion factors in Tab 4.10 (ecoinvent v2.2 report 13_IV). TOC was considered as Total Carbon.
- nitric acid, without water, in 50% solution state: 0 kg; source Socolof M. L. 2001; pedigree (1,1,1,1,1)
  (same comment as for hydrogen peroxide, without water, in 50% solution state)
  properties: dry mass 1 kg, wet mass 1 kg
- spent solvent mixture: 0 kg; source Socolof M. L. 2001; pedigree (1,1,1,1,1)
  EcoSpold01Location=CH
  Estimation, based on literature. A 50:50 split between panel assembly and module assembly is used.
  Uncertainty: data from an US-EPA LCA study - approximated with existing waste process
  production volume 0 kg
    (same comment as for waste plastic, consumer electronics)
  properties: carbon content, fossil 0.571257, water content 0.197605, dry mass 0.835 kg, wet mass 1 kg, heating value, net 21.7 MJ
  note on carbon content, fossil: Tab A.7, ecoinvent v2.2 report 13_I. C content has been calculated after data in the tables, and then referred to 1 kg DM
- nitrogen, liquid: 0 kg; source Socolof M. L. 2001; pedigree (1,1,1,1,1)
  (same comment as for hydrogen peroxide, without water, in 50% solution state)
  properties: wet mass 1 kg, dry mass 1 kg
- acetone, liquid: 0 kg; source Socolof M. L. 2001; pedigree (1,1,1,1,1)
  (same comment as for carbon dioxide, liquid)
  properties: carbon content, fossil 0.62069, wet mass 1 kg, dry mass 1 kg, heating value, net 31.32 MJ
- heat, district or industrial, other than natural gas: 3.1013 MJ; source Socolof M. L. 2001; lognormal variance with pedigree 0.0407, pedigree (1,3,5,3,1)
  Estimation, based on literature. A 50:50 split between panel assembly and module assembly is used. Fuel oil #4, liquid petroleum gas (LPG) and kerosene are summed up and translated into light fuel oil.
  EcoSpold01Location=RER
  Uncertainty: data from an US-EPA LCA study
  properties: heating value, net 1 MJ
- ammonia, anhydrous, liquid: 0 kg; source Socolof M. L. 2001; pedigree (1,1,1,1,1)
  (same comment as for carbon dioxide, liquid)
  properties: dry mass 1 kg, wet mass 1 kg
- lime, hydrated, packed: 0 kg; source Socolof M. L. 2001; pedigree (1,1,1,1,1)
  Literature Value.
  EcoSpold01Location=CH
  Uncertainty: data from an US-EPA LCA study
  properties: wet mass 1 kg, dry mass 0.997 kg, water content 0.00300903
- xylene: 0 kg; source Socolof M. L. 2001; pedigree (1,1,1,1,1)
  (same comment as for carbon dioxide, liquid)
  properties: carbon content, fossil 0.905061, dry mass 1 kg, wet mass 1 kg, heating value, net 38.84 MJ
- aluminium sulfate, powder: 0 kg; source Socolof M. L. 2001; pedigree (1,1,1,1,1)
  EcoSpold01Location=RER
  Literature Value.
  Uncertainty: data from an US-EPA LCA study
  properties: wet mass 1 kg, dry mass 1 kg
- hydrogen fluoride: 0 kg; source Socolof M. L. 2001; pedigree (1,1,1,1,1)
  Estimation, based on literature. A 50:50 split between panel assembly and module assembly is used.
  EcoSpold01Location=GLO
  Uncertainty: data from an US-EPA LCA study
  properties: wet mass 1 kg, dry mass 1 kg, heating value, net 6.06 MJ
- printed wiring board mounting facility: 2.08e-7 unit; lognormal variance with pedigree 0.3861, pedigree (4,5,5,3,1)
  Proxy, due to a lack of specific information, the infrastructure module for the mounting of printed wiring board is used.
  EcoSpold01Location=GLO
  Uncertainty: Estimation, based on PWB mounting plant
- dimethyl sulfoxide: 0.00442 kg; source Socolof M. L. 2001; lognormal variance with pedigree 0.0407, pedigree (1,3,5,3,1)
  (same comment as for hydrogen peroxide, without water, in 50% solution state)
  properties: carbon content, fossil 0.307692, dry mass 1 kg, wet mass 1 kg, heating value, net 18.62 MJ
- hydrochloric acid, without water, in 30% solution state: 0 kg; source Socolof M. L. 2001; pedigree (1,1,1,1,1)
  (same comment as for hydrogen peroxide, without water, in 50% solution state)
  properties: dry mass 1 kg, wet mass 1 kg, heating value, net 3.32 MJ
- acetic acid, without water, in 98% solution state: 0.00042667 kg; source Socolof M. L. 2001; lognormal variance with pedigree 0.0407, pedigree (1,3,5,3,1)
  (same comment as for carbon dioxide, liquid)
  properties: dry mass 1 kg, carbon content, fossil 0.400016, wet mass 1 kg, heating value, net 14.6 MJ
  note on heating value, net: Based on literature, page 10, Althaus H.-J., Chudacoff M., Hischier R., Jungbluth N., Osses M. and Primas A. (2007) Life Cycle Inventories of Chemicals. Final report ecoinvent data v2.0 No. 8. EMPA, Swiss Centre for Life Cycle Inventories, Dübendorf, CH, Online-Version under: www.ecoinvent.org.
- hydrogen peroxide, without water, in 50% solution state: 1.7052e-6, 8.0948e-6 kg (2 entries); source Socolof M. L. 2001; lognormal variance with pedigree 0.0407, pedigree (1,3,5,3,1)
  (same comment as for hydrogen peroxide, without water, in 50% solution state)
- waste plastic, consumer electronics: -8.03661e-5, -0.00531963 kg (2 entries); source Socolof M. L. 2001; lognormal variance with pedigree 0.1107, pedigree (1,3,5,3,4)
  (same comment as for waste plastic, consumer electronics)
  production volume 0.0054 kg
- carbon dioxide, liquid: 4.33578e-7, 2.05972e-6 kg (2 entries); source Socolof M. L. 2001; lognormal variance with pedigree 0.0407, pedigree (1,3,5,3,1)
  (same comment as for carbon dioxide, liquid)
- chlorine, liquid: 0.000172244, 0.000861056 kg (2 entries); source Socolof M. L. 2001; lognormal variance with pedigree 0.0407, pedigree (1,3,5,3,1)
  (same comment as for carbon dioxide, liquid)
- hydrogen, liquid: 0.00530911, 0.0242909 kg (2 entries); source Socolof M. L. 2001; lognormal variance with pedigree 0.0407, pedigree (1,3,5,3,1)
  (same comment as for hydrogen peroxide, without water, in 50% solution state)
- sulfuric acid: 0.00176619, 0.0135008 kg (2 entries); source Socolof M. L. 2001; lognormal variance with pedigree 0.0407, pedigree (1,3,5,3,1)
  (same comment as for hydrogen peroxide, without water, in 50% solution state)
- oxygen, liquid: 0.000111244, 0.000405426 kg (2 entries); source Socolof M. L. 2001; lognormal variance with pedigree 0.0407, pedigree (1,3,5,3,1)
  (same comment as for carbon dioxide, liquid)
- cyclohexanol: 4.47391e-7, 9.05909e-7 kg (2 entries); source Socolof M. L. 2001; lognormal variance with pedigree 0.0407, pedigree (1,3,5,3,1)
  (same comment as for hydrogen peroxide, without water, in 50% solution state)
- ethanol, without water, in 99.7% solution state, from ethylene: 0.000278924, 0.000621076 kg (2 entries); source Socolof M. L. 2001; lognormal variance with pedigree 0.0407, pedigree (1,3,5,3,1)
  (same comment as for carbon dioxide, liquid)
- methyl ethyl ketone: 1.34245e-7, 3.55755e-7 kg (2 entries); source Socolof M. L. 2001; lognormal variance with pedigree 0.0407, pedigree (1,3,5,3,1)
  (same comment as for hydrogen peroxide, without water, in 50% solution state)
- isopropanol: 0.00404846, 0.0192185 kg (2 entries); source Socolof M. L. 2001; lognormal variance with pedigree 0.0407, pedigree (1,3,5,3,1)
  (same comment as for carbon dioxide, liquid)
- propylene glycol, liquid: 0.000442101, 0.000895199 kg (2 entries); source Socolof M. L. 2001; lognormal variance with pedigree 0.0407, pedigree (1,3,5,3,1)
  (same comment as for hydrogen peroxide, without water, in 50% solution state)
- refinery sludge: -0.000192771, -8.82055e-6, -0.00185841 kg (3 entries); source Socolof M. L. 2001; lognormal variance with pedigree 0.1107, pedigree (1,3,5,3,4)
  (same comment as for waste plastic, consumer electronics)
  production volume 0.00206 kg
- waste mineral oil: -0.000294611, -7.29341e-6, -0.000771395 kg (3 entries); source Socolof M. L. 2001; lognormal variance with pedigree 0.1107, pedigree (1,3,5,3,4)
  (same comment as for waste plastic, consumer electronics)
  production volume 0.0010733 kg
- nitric acid, without water, in 50% solution state: 2.65739e-5, 6.60843e-5, 3.16641e-5, 0.000201766, 2.64755e-5, 0.000108904, 2.87107e-5, 1.78847e-5, 8.59406e-5, 0.000232666 kg (10 entries); source Socolof M. L. 2001; lognormal variance with pedigree 0.0407, pedigree (1,3,5,3,1)
  (same comment as for hydrogen peroxide, without water, in 50% solution state)
- spent solvent mixture: -0.0623746, -0.00146134, -0.159634 kg (3 entries); source Socolof M. L. 2001; lognormal variance with pedigree 0.1107, pedigree (1,3,5,3,4)
  (same comment as for spent solvent mixture)
  production volume 0.22347 kg
- nitrogen, liquid: 0.0847132, 0.308617 kg (2 entries); source Socolof M. L. 2001; lognormal variance with pedigree 0.0407, pedigree (1,3,5,3,1)
  (same comment as for hydrogen peroxide, without water, in 50% solution state)
- acetone, liquid: 0.00018243, 0.00050424 kg (2 entries); source Socolof M. L. 2001; lognormal variance with pedigree 0.0407, pedigree (1,3,5,3,1)
  (same comment as for carbon dioxide, liquid)
- ammonia, anhydrous, liquid: 3.13759e-5, 0.000209706, 4.88129e-5, 9.47558e-5, 9.67157e-5, 4.43971e-5, 0.000364998, 9.93143e-6, 0.00105031 kg (9 entries); source Socolof M. L. 2001; lognormal variance with pedigree 0.0407, pedigree (1,3,5,3,1)
  (same comment as for carbon dioxide, liquid)
- lime, hydrated, packed: 7.79968e-5, 0.0091887 kg (2 entries); source Socolof M. L. 2001; lognormal variance with pedigree 0.0407, pedigree (1,3,5,3,1)
  Literature Value.
  EcoSpold01Location=CH
  Uncertainty: data from an US-EPA LCA study
- xylene: 1.6007e-5, 8.8663e-5 kg (2 entries); source Socolof M. L. 2001; lognormal variance with pedigree 0.0407, pedigree (1,3,5,3,1)
  (same comment as for carbon dioxide, liquid)
- aluminium sulfate, powder: 0.001218, 0.005782 kg (2 entries); source Socolof M. L. 2001; lognormal variance with pedigree 0.0407, pedigree (1,3,5,3,1)
  EcoSpold01Location=RER
  Literature Value.
  Uncertainty: data from an US-EPA LCA study
- hydrogen fluoride: 7.13492e-5, 0.000209321 kg (2 entries); source Socolof M. L. 2001; lognormal variance with pedigree 0.0407, pedigree (1,3,5,3,1)
  (same comment as for hydrogen fluoride)
- hydrochloric acid, without water, in 30% solution state: 0.000525015, 0.00234829 kg (2 entries); source Socolof M. L. 2001; lognormal variance with pedigree 0.0407, pedigree (1,3,5,3,1)
  (same comment as for hydrogen peroxide, without water, in 50% solution state)

## Inputs from nature
- Water, unspecified natural origin [natural resource, in water]: 0.095667 m3; name water_UNO_input; source Socolof M. L. 2001; lognormal variance with pedigree 0.0407, pedigree (1,3,5,3,1)
  Estimation, based on literature. A 50:50 split between panel assembly and module assembly is used.
  Calculated value. The amount of water in this flow (input) to the process as provided by the data provider for eiv2 was 0.072m3. This amount is adjusted, so the water balance is achieved.
  Uncertainty: data from an US-EPA LCA study

## Emissions to nature
- Iron, ion [water, surface water]: 1.7533e-7 kg; source Socolof M. L. 2001; lognormal variance with pedigree 0.6907, pedigree (1,3,5,3,1)
  Estimation, based on literature. A 50:50 split between panel assembly and module assembly is used.
  Uncertainty: data from an US-EPA LCA study
- Phenol [water, surface water]: 1.5267e-8 kg; source Socolof M. L. 2001; lognormal variance with pedigree 0.3407, pedigree (1,3,5,3,1)
  (same comment as for Iron, ion)
- Antimony [water, surface water]: 7.6e-9 kg; source Socolof M. L. 2001; lognormal variance with pedigree 0.0807, pedigree (1,3,5,3,1)
  (same comment as for Iron, ion)
- Solids, inorganic [water, surface water]: 0.00050333 kg; source Socolof M. L. 2001; lognormal variance with pedigree 0.0807, pedigree (1,3,5,3,1)
  (same comment as for Iron, ion)
- Lead [water, surface water]: 4.1133e-7 kg; source Socolof M. L. 2001; lognormal variance with pedigree 0.6907, pedigree (1,3,5,3,1)
  (same comment as for Iron, ion)
- Phosphoric acid [air, urban air close to ground]: 3.2333e-6 kg; source Socolof M. L. 2001; lognormal variance with pedigree 0.0807, pedigree (1,3,5,3,1)
  (same comment as for Iron, ion)
- Boric acid [air, urban air close to ground]: 9.1333e-8 kg; source Socolof M. L. 2001; lognormal variance with pedigree 0.1607, pedigree (1,3,5,3,1)
  (same comment as for Iron, ion)
- Acetic acid [air, urban air close to ground]: 9.0667e-5 kg; source Socolof M. L. 2001; lognormal variance with pedigree 0.1607, pedigree (1,3,5,3,1)
  (same comment as for Iron, ion)
- Nickel, ion [water, surface water]: 1.5267e-8 kg; source Socolof M. L. 2001; lognormal variance with pedigree 0.6907, pedigree (1,3,5,3,1)
  (same comment as for Iron, ion)
- Sodium tetrahydridoborate [air, urban air close to ground]: 0.0011867 kg; source Socolof M. L. 2001; lognormal variance with pedigree 0.1607, pedigree (1,3,5,3,1)
  (same comment as for Iron, ion)
- Hydrogen chloride [air, urban air close to ground]: 0.00404 kg; source Socolof M. L. 2001; lognormal variance with pedigree 0.0807, pedigree (1,3,5,3,1)
  (same comment as for Iron, ion)
- Ethane, 1,1,1-trichloro-, HCFC-140 [water, surface water]: 1.5267e-9 kg; source Socolof M. L. 2001; lognormal variance with pedigree 0.3407, pedigree (1,3,5,3,1)
  (same comment as for Iron, ion)
- Nitrogen fluoride [air, urban air close to ground]: 1.7874e-6 kg; source Socolof M. L. 2001; lognormal variance with pedigree 0.1626, pedigree (3,3,5,1,4)
  Estimation, based on literature. A 50:50 split between panel assembly and module assembly is used.
  Uncertainty: tier 2b default emission factor according to IPCC guidelines
- Chromium VI [water, surface water]: 1.5267e-8 kg; source Socolof M. L. 2001; lognormal variance with pedigree 0.6907, pedigree (1,3,5,3,1)
  (same comment as for Iron, ion)
- Boron trifluoride [air, urban air close to ground]: 0.000612 kg; source Socolof M. L. 2001; lognormal variance with pedigree 0.1607, pedigree (1,3,5,3,1)
  (same comment as for Iron, ion)
- Sulfur hexafluoride [air, urban air close to ground]: 7.1485e-6 kg; source Socolof M. L. 2001; lognormal variance with pedigree 0.2426, pedigree (3,3,5,1,4)
  (same comment as for Nitrogen fluoride)
- Hydrogen fluoride [air, urban air close to ground]: 0.0034733 kg; source Socolof M. L. 2001; lognormal variance with pedigree 0.0807, pedigree (1,3,5,3,1)
  (same comment as for Iron, ion)
- Nitrogen oxides [air, urban air close to ground]: 1.7933e-5 kg; source Socolof M. L. 2001; lognormal variance with pedigree 0.0807, pedigree (1,3,5,3,1)
  (same comment as for Iron, ion)
- Diethylene glycol [air, urban air close to ground]: 6.46e-6 kg; source Socolof M. L. 2001; lognormal variance with pedigree 0.1607, pedigree (1,3,5,3,1)
  (same comment as for Iron, ion)
- Fluoride [water, surface water]: 0.00085333 kg; source Socolof M. L. 2001; lognormal variance with pedigree 0.0807, pedigree (1,3,5,3,1)
  (same comment as for Iron, ion)
- Phosphate [water, surface water]: 1.5267e-8 kg; source Socolof M. L. 2001; lognormal variance with pedigree 0.0807, pedigree (1,3,5,3,1)
  (same comment as for Iron, ion)
- Hydrocarbons, aromatic [water, surface water]: 3.92e-5 kg; source Socolof M. L. 2001; lognormal variance with pedigree 0.3407, pedigree (1,3,5,3,1)
  (same comment as for Iron, ion)
- Cadmium, ion [water, surface water]: 7.6e-9 kg; source Socolof M. L. 2001; lognormal variance with pedigree 0.6907, pedigree (1,3,5,3,1)
  (same comment as for Iron, ion)
- Arsenic, ion [water, surface water]: 7.6e-9 kg; source Socolof M. L. 2001; lognormal variance with pedigree 0.6907, pedigree (1,3,5,3,1)
  (same comment as for Iron, ion)
- Nitrogen [water, surface water]: 0.0052867 kg; source Socolof M. L. 2001; lognormal variance with pedigree 0.0807, pedigree (1,3,5,3,1)
  (same comment as for Iron, ion)
- Oils, unspecified [water, surface water]: 1.3467e-5 kg; source Socolof M. L. 2001; lognormal variance with pedigree 0.3407, pedigree (1,3,5,3,1)
  (same comment as for Iron, ion)
- Ammonia [air, urban air close to ground]: 0.0041533 kg; source Socolof M. L. 2001; lognormal variance with pedigree 0.0807, pedigree (1,3,5,3,1)
  (same comment as for Iron, ion)
- Phosphorus [water, surface water]: 0.00028733 kg; source Socolof M. L. 2001; lognormal variance with pedigree 0.0807, pedigree (1,3,5,3,1)
  (same comment as for Iron, ion)
- Manganese [water, surface water]: 1.5267e-8 kg; source Socolof M. L. 2001; lognormal variance with pedigree 0.6907, pedigree (1,3,5,3,1)
  (same comment as for Iron, ion)
- TOC, Total Organic Carbon [water, surface water]: 6.61741e-5 kg; lognormal variance with pedigree 0.0807, pedigree (1,3,5,3,1)
  Calculated Value by default as TOC (gC) = COD/2.7 (COD measured in g O2). Should more correctly be calculated from the carbon content of the specified emissions to water.
  Uncertainty: data from an US-EPA LCA study
- Chromium, ion [water, surface water]: 5.8933e-7 kg; source Socolof M. L. 2001; lognormal variance with pedigree 0.6907, pedigree (1,3,5,3,1)
  (same comment as for Iron, ion)
- Acetone [air, urban air close to ground]: 1.24e-5 kg; source Socolof M. L. 2001; lognormal variance with pedigree 0.1607, pedigree (1,3,5,3,1)
  (same comment as for Iron, ion)
- Hydrogen [air, urban air close to ground]: 8.8667e-6 kg; source Socolof M. L. 2001; lognormal variance with pedigree 0.0807, pedigree (1,3,5,3,1)
  (same comment as for Iron, ion)
- DOC, Dissolved Organic Carbon [water, surface water]: 6.61741e-5 kg; lognormal variance with pedigree 0.0807, pedigree (1,3,5,3,1)
  Calculated as equal to TOC.
  Uncertainty: data from an US-EPA LCA study
- Cyclohexane [air, urban air close to ground]: 3.2333e-6 kg; source Socolof M. L. 2001; lognormal variance with pedigree 0.1607, pedigree (1,3,5,3,1)
  (same comment as for Iron, ion)
- Copper, ion [water, surface water]: 6.12e-8 kg; source Socolof M. L. 2001; lognormal variance with pedigree 0.6907, pedigree (1,3,5,3,1)
  (same comment as for Iron, ion)
- NMVOC, non-methane volatile organic compounds, unspecified origin [air, urban air close to ground]: 0.00712 kg; source Socolof M. L. 2001; lognormal variance with pedigree 0.1607, pedigree (1,3,5,3,1)
  (same comment as for Iron, ion)
- COD, Chemical Oxygen Demand [water, surface water]: 0.00017867 kg; source Socolof M. L. 2001; lognormal variance with pedigree 0.0807, pedigree (1,3,5,3,1)
  (same comment as for Iron, ion)
- Mercury [water, surface water]: 6.46e-9 kg; source Socolof M. L. 2001; lognormal variance with pedigree 0.6907, pedigree (1,3,5,3,1)
  (same comment as for Iron, ion)
- Cyanide [water, surface water]: 2.44e-7 kg; source Socolof M. L. 2001; lognormal variance with pedigree 0.0807, pedigree (1,3,5,3,1)
  (same comment as for Iron, ion)
- Boron [water, surface water]: 3.0533e-7 kg; source Socolof M. L. 2001; lognormal variance with pedigree 0.0807, pedigree (1,3,5,3,1)
  (same comment as for Iron, ion)
- BOD5, Biological Oxygen Demand [water, surface water]: 0.00116 kg; source Socolof M. L. 2001; lognormal variance with pedigree 0.0807, pedigree (1,3,5,3,1)
  (same comment as for Iron, ion)
- Tetramethyl ammonium hydroxide [air, urban air close to ground]: 0.042867 kg; source Socolof M. L. 2001; lognormal variance with pedigree 0.1607, pedigree (1,3,5,3,1)
  (same comment as for Iron, ion)
- Phosphine [air, urban air close to ground]: 0.0041733 kg; source Socolof M. L. 2001; lognormal variance with pedigree 0.0807, pedigree (1,3,5,3,1)
  (same comment as for Iron, ion)

## Sampling procedure
literature & own estimations

## Extrapolations
This dataset has been extrapolated from year 2001 to the year of the calculation (2021). The uncertainty has been adjusted accordingly.

## Review by Jürgen Sutter 2010-03-16
passed.

## Review by Roland Hischier 2011-09-22
Transfer of documentation done.
