# hardwood forestry, eucalyptus ssp., planted forest management

Dataset: EcoSpold 2, unit process
Geography: BR-MG
Time period: 2012-01-01 to 2021-12-31
Technology level: current
Classification: ISIC rev.4 ecoinvent: 0210:Silviculture and other forestry activities
Synonyms: wood fuel; energy wood
Scenario: Business-as-Usual
System model: Allocation, cut-off by classification
Share of production covered: 100 %
Generated by: Marília I. S. Folegatti Matsuura
Published in: Folegatti-Matsuura M. 2018
Database: ecoinvent
isCopyrightProtected: true
accessRestrictedTo: 1

## General comment
This dataset represents the production of 1 kg of eucalyptus wood fuel (fresh matter) from planted forest management as the prevailing management practices in a region that concentrates wood for energy purposes production in Brazil. Assumed wood basic density of 513 kg.m³-1.
The actitivity lasts 14 years with 2 harvesting events. MAI is 36 m³/ha.year-1 in the first harvest and 30 m³/ha.year-1 in the second, resulting in a total of 462 m³.ha-1. Final moisture content of storage is 30%.
The total amount of mineral fertilizers (N-P-K) and pesticides (glyphosate, sufluramide and flumioxazine) applied are 63 kg N.ha-1; 29 kg P2O5.ha-1; 234 kg K2O.ha-1 and 6.38 kg pesticides.ha-1, respectively.
Species mainly cultivated are E. urophylla and E. urograndis, in a rate of 1333 seedlings.hectare-1.
References:
Canals, 2003: Contributions to LCA Methodology for Agricultural Systems. Site-dependency and soil degradation impact assessment: http://www.tdx.cat/handle/10803/3155
Nemecek & Schnetzer: Methods of assessment of direct field emissions for LCIs of agricultural production systems, Data v3.0 (2011): http://www.ecoinvent.org/fileadmin/talkpages/pages/01-01-crop-production/01_crop_production_-_direct_field_emissions___natural_resources_v1.1.pdf
MATSUURA, M. I. S. F; PICOLI, J. F.; NOVAES, R. M. L.; DIAS, F. R. T.; HIRAKURI, M. H.; CASTRO, C.; ZORTEA, R. B. Workbook for life cycle inventories of agricultural products. Jaguariúna. Empresa Brasileira de Pesquisa Agropecuária, 2017.
Novais & Smyth (1999) Fósforo em solo e planta em condições tropicais. Viçosa: Universidade Federal de Viçosa, p. 399.
QUIRINO, Waldir F.; VALE, Ailton Teixeira do; ANDRADE, Ana Paula Abreu de; ABREU, Vera Lúcia Silva; AZEVEDO, Ana Cristina dos Santos. Poder calorífico da madeira e de materiais lignocelulósicos. Revista da Madeira, n. 89, p. 100-106, 2005.
WFLD (2015) Methodological guidelines for the Life Cycle Inventory of agricultural products. World Food LCA Database, 2015.
Novaes, Renan M. L. et al. (2016) Estimating 20-year land use change and derived CO2 emissions associated with crops, parture and forestry in Brazil and each of its 27 states. Global Change Biology, 2017, 1-13.
Nemecek T., Bengoa X., Lansche J., Mouron P., Riedener E., Rossi V. & Humbert S. (2015) Methodological Guidelines for the Life Cycle Inventory of Agricultural Products. Version 3.0, July 2015. World Food LCA Database (WFLDB). Quantis and Agroscope, Lausanne and Zurich, Switzerland.

## Included activities start
Activity starts with weed control and crush cutter followed by the establishment of the eucalyptus plantation in the first year. After, covers the maintenance during six years and the first harvesting in the seventh. Eucalyptus sprouts are conducted to regrowth and the same process is repited. Operations cover all activities of forest management, planting, fertilising, weed and ant control and harvesting operations.

## Included activities end
The processing of wood includes the grappel saw. Due to lack of data this dataset does not cover the maintenance and construction of forest roads and firebreaks.
This activity ends with the logs at the forest road and includes time for drying in air before transportation. The dataset does not include the seedling production.

## Geography
The inventory is modelled for the state of Minas Gerais, in Brazil.

## Technology
Cultivation of wood to generate energy like charcoal inside steel industries. Big scale of plantations with high level of mechanization. Machines used in the harvesting step are: feller bunch to fell trees, skidder to extract the wood from the field to the forest boarder, grapple saw to process logs and loader grapple to load the transportation vehicle.

## Time period
Time period of the most of the data collected for this dataset.

## Parameters
- LUC_crop_specific: 1 dimensionless
  This parameter allows to switch between a "crop specific" and a "country specific" approach when calculating the LUC of a crop. By default, the chosen approach is "crop specific", so the value of the parameter is 1. If you want to apply a "country specific" approach, turn the parameter to 0.
- total nitrogen: 162 kg/ha; name N_total; lognormal variance with pedigree 0.002, pedigree (1,1,1,1,1)
  This value represents the total nitrogen in mineral fertilisers (kg N/ha). From Folegatti et al. (2016).
- soil eroded: 5404 kg/ha.yr; name soil_eroded; lognormal variance with pedigree 0.0447, pedigree (3,4,1,3,4)
  This value represents the quantity of soil eroded (kg/(ha*yr)).
  Used for the calculation of P emissions through water erosion to surface water. From Pires et al. (2006).
- rooting depth: 2.5 m; name root_depth; lognormal variance with pedigree 0.0509, pedigree (4,4,2,3,4)
  This value represents the rooting depth of the crop (m).
  Used in the SQCB-NO3 model for the calculation of leaching of NO3.
  From Foelkel (2016).
- land transformation to: 0.042193 m2/kg; name T_t; = 10000/(yield*density); lognormal variance with pedigree 0.008, pedigree (1,1,1,1,1)
  This value will be used to transform exchanges per ha to exchanges per kg of cleft timber. From Folegatti et al. (2016).
  Uncertainty: Variance of log-transformed data as recommended by Ecoinvent for "Land use, transformation" for agriculture.
- organic nitrogen into soil: 5543 kg N/ha; name Norg_soil; lognormal variance with pedigree 0.0487, pedigree (4,2,1,1,4)
  Norg is the mass of organic nitrogen contained in the upper 50 cm of soil per ha. Naturally only a fraction of this mass is mineralised and, hence, available for uptake by plants and leaching to the ground water.
  This fraction is determined by the mineralisation rate, which is 1.6% here and implicitly included in the regression coefficient of the term Norg. Used in the SQCB-NO3 model for the calculation of leaching of NO3. From Gatto (2010).
- clay content into soil: 40 % (obsolete); name Clay_content; lognormal variance with pedigree 0.0487, pedigree (4,2,1,1,4)
  This value represents the fraction of clay content into soil (%).
  Used in the SQCB-NO3 model for the calculation of leaching of NO3.
  From Folegatti et al. (2016).
- precipitation, annual: 1430 mm/year; name precipitation; lognormal variance with pedigree 0.0013, pedigree (2,2,1,1,1)
  This value represents the average annual precipitation in Goiás, Brazil.
  Used in the SQCB-NO3 model for the calculation of leaching of NO3.
- total liming: 4000 kg/ha; name L_total; lognormal variance with pedigree 0.002, pedigree (1,1,1,1,1)
  This value represents the total limestone applied (kg N/ha). From Folegatti et al. (2016).
- nitrogen in crop residues: 6562.6 kg N/ha; name Ncrop_residues; lognormal variance with pedigree 0.0467, pedigree (3,4,3,3,4)
  This value represents the nitrogen contained in the crop residues (kg N/ha). Used for the calculation of emissions of N2O to the air.
  From Barreto et al. (2008).
- nitrogen uptake by plant: 150 kg N/ha; name Nuptake_plant; lognormal variance with pedigree 0.0606, pedigree (4,5,3,5,4)
  This value represents the N taken by plant during its growth (kg N/ha). Used in the SQCB-NO3 model for the calculation of leaching of NO3.
  From Nemececk & Schnetzer (2011),
- yield, hardwood, m3: 462 m³/ha; name yield

## Reference product
- cleft timber, measured as dry mass: 1 kg; name REF_PRODUCT; CPC 031: Wood in the rough; By-product classification allocatable product
  1 kg of dry mass, including bark. The total yield is 462 m³.ha-1 with a final moisture content at storage of 30%.
  production volume 2.98062e9 kg; = 5810174*density
    The production of cleft timber from eucalyptus in Minas Gerais (BR), in 2016, is 5810174 m³ (IBGE - PEVS, 2016).
  property price 0.073 EUR2005; name REF_PRODUCT_price_EUR2005
    Calculated based on data from FAOSTAT (accessed 20140429). The price is calculated by using data on total world import quantity (m3) and import value (1000 USD), year 2005. 3411751 m3 of Wood Fuel Trd was imported in the world in 2005. The import value was 161229000 USD. The calculated price is thus (161229000/3411751=47.3*0.8=) 38.1 Euro/m3. The density of cleft timber, measured as dry mass is 541.2 kg/m3. The recalculated price is (1/541.2*38.1=) 0.07 Euro/kg. Using the same approach the calculated price for 2010 was 0.112 Euro/kg.
  property basic density 513 kg/m3; name density
    Assumed the average wood density found in the literature.
  property water content 0.428571; = cleft_timber_WWM/cleft_timber_DM
  property carbon content, fossil 0; name cleft_timber_C_content_fossil
    fossil carbon content on a dry matter basis
  property heating value, gross 20.4556 MJ; name gross_energy; = UnitConversion(4889, 'kilocalorie thermochemical', 'MJ')
    gross (upper) heating (calorific) value
  property carbon content, non-fossil 0.494; name cleft_timber_C_content_non_fossil
    biogene carbon content on a dry matter basis
  property dry mass 0.7 kg; name cleft_timber_DM; = cleft_timber_WM - cleft_timber_WWM
  property water in wet mass 0.3 kg; name cleft_timber_WWM
  property wet mass 1 kg; name cleft_timber_WM
  property carbon content 0.494
    carbon content on a dry matter basis (reserved; not for manual entry)
  properties: heating value, net 14.46 MJ, carbon allocation 0.3458 kg

## Inputs from technosphere
- inorganic phosphorus fertiliser, as P2O5: 0.000567074 kg; = 134.4 / yield / density; lognormal variance with pedigree 0.0033, pedigree (2,2,3,1,1)
  Triple superphosphate as source of P2O5. P2O5 is applied through NPK-fertilizer and was converted using the NPK formulation. Amount for typical system from Folegatti et al. (2016).
  Original values per ha were attributed to total volume of wood produced per hectare (changing the reference product from ha to m3) and to density (changing the reference product from m3 to kg).
  Uncertainty: Variance of log-transformed data as recommended by Ecoinvent for "Primary energy carriers, metals, salts" for agriculture.
  properties: dry mass 1 kg, wet mass 1 kg
- skidding, skidder: 4.03e-5 hour; lognormal variance with pedigree 0.0033, pedigree (2,2,3,1,1)
  Related to the extraction of wood from the harvesting place to the forest border. Amount for typical system from Folegatti et al. (2016).
  Uncertainty: Variance of log-transformed data as recommended by Ecoinvent for "Primary energy carriers, metals, salts" for agriculture.
- pesticide, unspecified: 7.8479e-7 kg; = 1.86E-01 / yield / density; lognormal variance with pedigree 0.0033, pedigree (2,2,3,1,1)
  Amount for typical system from Folegatti et al. (2016). This exchange represents the input of sulfluramide (46.4%) and flumioxazine (53.6%).
  Original values per ha were attributed to total volume of wood produced per hectare (changing the reference product from ha to m3) and to density (changing the reference product from m3 to kg).
  Uncertainty: Variance of log-transformed data as recommended by Ecoinvent for "Primary energy carriers, metals, salts" for agriculture.
  properties: dry mass 1 kg, carbon content, fossil 0.486978, wet mass 1 kg
- eucalyptus seedling, for planting: 0.00590702 unit; name SEEDLING; = 1.40E+03 / yield / density; lognormal variance with pedigree 0.0033, pedigree (2,2,3,1,1)
  Amount for typical system from Folegatti et al. (2016).
  Original values per ha were attributed to total volume of wood produced per hectare (changing the reference product from ha to m3) and to density (changing the reference product from m3 to kg).
  properties: wet mass 1 kg, dry mass 0.6 kg, water content 0.666667, carbon content, non-fossil 0.494
- ammonium sulfate: 0.000342185 kg; name N_as; = 81.1 / yield / density; lognormal variance with pedigree 0.0033, pedigree (2,2,3,1,1)
  Ammonium sulfate as source of N. N is applied through NPK-fertilizer and was converted using the NPK formulation. Amount for typical system from Folegatti et al. (2016).
  Original values per ha were attributed to total volume of wood produced per hectare (changing the reference product from ha to m3) and to density (changing the reference product from m3 to kg).
  properties: dry mass 1 kg, wet mass 1 kg
- planting: 1.09e-6 ha; lognormal variance with pedigree 0.0033, pedigree (2,2,3,1,1)
  Related to Planting of eucalyptus seedlings. Amount for typical system from Folegatti et al. (2016).
  Uncertainty: Variance of log-transformed data as recommended by Ecoinvent for "Primary energy carriers, metals, salts" for agriculture.
- gypsum, mineral: 0.00253158 kg; = 600 / yield / density; lognormal variance with pedigree 0.0033, pedigree (2,2,3,1,1)
  Amount for typical system from Folegatti et al. (2016).
  Original values per ha were attributed to total volume of wood produced per hectare (changing the reference product from ha to m3) and to density (changing the reference product from m3 to kg).
  Uncertainty: Variance of log-transformed data as recommended by Ecoinvent for "Primary energy carriers, metals, salts" for agriculture.
  properties: dry mass 1 kg, wet mass 1 kg
- glyphosate: 2.61175e-5 kg; = 6.19 / yield / density; lognormal variance with pedigree 0.0033, pedigree (2,2,3,1,1)
  (same comment as for eucalyptus seedling, for planting)
  properties: dry mass 1 kg, carbon content, fossil 0.214286, wet mass 1 kg
- boric acid, anhydrous, powder: 4.81844e-5 kg; = 11.42 / yield / density; lognormal variance with pedigree 0.0033, pedigree (2,2,3,1,1)
  Boric acid as Boron fertiliser. Amount for typical system from Folegatti et al. (2016).
  Original values per ha were attributed to total volume of wood produced per hectare (changing the reference product from ha to m3) and to density (changing the reference product from m3 to kg).
  Uncertainty: Variance of log-transformed data as recommended by Ecoinvent for "Primary energy carriers, metals, salts" for agriculture.
  properties: wet mass 1 kg, dry mass 1 kg
- tap water: 0.0778799 kg; name water; = 18458 / yield / density; lognormal variance with pedigree 0.0532, pedigree (4,3,3,5,4)
  Water used for planting trees and dilution of pesticides. Amount for typical system from Folegatti et al. (2016).
  Original values per ha were attributed to total volume of wood produced per hectare (changing the reference product from ha to m3) and to density (changing the reference product from m3 to kg).
  properties: wet mass 1 kg, water content 2962.17, carbon content, fossil 0.00178991, dry mass 0.000337476 kg
  note on carbon content, fossil: Bicarbonate content is 2.93 mol/m3. CO2 content is 0.1 mol/m3 (ecoinvent v2.2 report 8, Tab 93.1).
- lime: 0.0168772 kg; name limestone; = L_total / yield / density; lognormal variance with pedigree 0.0033, pedigree (2,2,3,1,1)
  (same comment as for gypsum, mineral)
  properties: wet mass 1 kg, dry mass 1 kg, carbon content, fossil 0.120005
- fertilising, by broadcaster: 2.63e-5 ha; = 1.10E-05 + 1.53E-05; lognormal variance with pedigree 0.005225, pedigree (3,3,3,2,1)
  Related to Liming and gypsum application and to Fertilising operations, respectively. Amount for typical system from May et al. (2016).
- mulching: 3.67e-5 ha; lognormal variance with pedigree 0.0033, pedigree (2,2,3,1,1)
  Related to Crush cutter. Amount for typical system from Folegatti et al. (2016).
  Uncertainty: Variance of log-transformed data as recommended by Ecoinvent for "Primary energy carriers, metals, salts" for agriculture.
- transport, tractor and trailer, agricultural: 0.000210543 metric ton*km; = 49.9 / yield / density; lognormal variance with pedigree 0.124625, pedigree (3,3,3,2,1)
  Related to the operation of Water application with tractor and trailer. Amount for typical system from Folegatti et al. (2016).
- diesel, burned in agricultural machinery: 3.589e-5 MJ; = 1.80E-05 + 1.23E-05 + 5.59E-06; lognormal variance with pedigree 0.0033, pedigree (2,2,3,1,1)
  Related to Harvest with Feller bunch, Grapple saw and Loading of wood onto trucks, respectively. Amount for typical system from Folegatti et al. (2016).
  Uncertainty: Variance of log-transformed data as recommended by Ecoinvent for "Primary energy carriers, metals, salts" for agriculture.
- tillage, ploughing: 1.78e-6 ha; lognormal variance with pedigree 0.0033, pedigree (2,2,3,1,1)
  Related to Subsoiling with fertilizer application. Amount for typical system from Folegatti et al. (2016).
  Uncertainty: Variance of log-transformed data as recommended by Ecoinvent for "Primary energy carriers, metals, salts" for agriculture.
- urea: 0.000733577 kg; = (81.1 / yield / density )*2.14379903903132; lognormal variance with pedigree 0.0033, pedigree (2,2,3,1,1)
  The exchange has been updated from 'urea, as N' into 'urea' and therefore its amount has been scaled (multiplied) from 0.0003 kg by 2.1438 kg of 'urea' per kg of 'urea, as N'. Original comment of the exchange is: Urea as source of N. N is applied through NPK-fertilizer and was converted using the NPK formulation. Amount for typical system from Folegatti et al. (2016).
  Original values per ha were attributed to total volume of wood produced per hectare (changing the reference product from ha to m3) and to density (changing the reference product from m3 to kg).
  Uncertainty: Variance of log-transformed data as recommended by Ecoinvent for "Primary energy carriers, metals, salts" for agriculture.
  properties: carbon content, fossil 0.2, dry mass 1 kg, wet mass 1 kg
- machine operation, diesel, >= 18.64 kW and < 74.57 kW, high load factor: 1.64e-5 hour; lognormal variance with pedigree 0.0033, pedigree (2,2,3,1,1)
  Related to Weed control operations. Amount for typical system from Folegatti et al. (2016).
  Uncertainty: Variance of log-transformed data as recommended by Ecoinvent for "Primary energy carriers, metals, salts" for agriculture.
- land use change, forest, intensive: 0 ha; = 0*LUC_crop_specific+(2.09420835496921E-06*(1-LUC_crop_specific))
  Calculated value. Land use change (LUC) from Novaes et al. (2017).
- potassium chloride: 0.00269153 kg; = (403 / yield / density )*1.58289736294535; lognormal variance with pedigree 0.0033, pedigree (2,2,3,1,1)
  The exchange has been updated from 'potassium chloride, as K2O' into 'potassium chloride' and therefore its amount has been scaled (multiplied) from 0.0017 kg by 1.5829 kg of 'potassium chloride' per kg of 'potassium chloride, as K2O'. Original comment of the exchange is: Potassium chloride as source of K2O. K2O is applied through NPK-fertilizer and was converted using the NPK formulation. Amount for typical system from Folegatti et al. (2016).
  Original values per ha were attributed to total volume of wood produced per hectare (changing the reference product from ha to m3) and to density (changing the reference product from m3 to kg).
  Uncertainty: Variance of log-transformed data as recommended by Ecoinvent for "Primary energy carriers, metals, salts" for agriculture.
  properties: wet mass 1 kg, dry mass 1 kg
- zinc oxide: 8.77615e-6 kg; = 2.08 / yield / density; lognormal variance with pedigree 0.0033, pedigree (2,2,3,1,1)
  Zinc oxide as Zinc fertiliser. Amount for typical system from Folegatti et al. (2016).
  Uncertainty: Variance of log-transformed data as recommended by Ecoinvent for "Primary energy carriers, metals, salts" for agriculture.
  properties: dry mass 1 kg, wet mass 1 kg
- copper sulfate: 1.38393e-5 kg; = 3.28 / yield / density; lognormal variance with pedigree 0.0033, pedigree (2,2,3,1,1)
  Copper sulfate as copper fertiliser. Amount for typical system from Folegatti et al. (2016).
  Original values per ha were attributed to total volume of wood produced per hectare (changing the reference product from ha to m3) and to density (changing the reference product from m3 to kg).
  Uncertainty: Variance of log-transformed data as recommended by Ecoinvent for "Primary energy carriers, metals, salts" for agriculture.
  properties: wet mass 1 kg, dry mass 1 kg

## Inputs from nature
- Energy, gross calorific value, in biomass [natural resource, biotic]: 20.4556 MJ; = gross_energy; lognormal variance with pedigree 0.0033, pedigree (2,2,3,1,1)
  Calorific value of Eucalyptus wood.
  Uncertainty: Variance of log-transformed data as recommended by Ecoinvent for "Primary energy carriers, metals, salts" for agriculture.
- Occupation, forest, intensive [natural resource, land]: 0.590702 m2*year; = T_t*14; lognormal variance with pedigree 0.005325, pedigree (2,2,3,2,2)
  Area occupied for the production of wood over two rotation periods; 1 ha produces 462 m³/ha during 14 years.
  Uncertainty: Variance of log-transformed data as recommended by Ecoinvent for "Land use, occupation" for agriculture.
- Transformation, from forest, intensive [natural resource, land]: 0.00210965 m2; = T_t/20; lognormal variance with pedigree 0.011325, pedigree (2,2,3,2,2)
  Transformation related to the area occupied for the production of wood over two rotation periods.
- Carbon dioxide, in air [natural resource, in air]: 1.26793 kg; = 44/12 * (cleft_timber_C_content_non_fossil * REF_PRODUCT * cleft_timber_DM); source Nemecek, T. 2011; lognormal variance with pedigree 0.0033, pedigree (2,2,3,1,1)
  Resource input, referring to total biomass harvested, i.e. wood including bark. CO2 absorbed during photosyntesis. See "3.1 CO2 from the Atmosphere" in Nemececk & Schnetzer (2011).
  Uncertainty: Variance of log-transformed data as recommended by Ecoinvent for "Primary energy carriers, metals, salts" for agriculture.
- Transformation, to forest, intensive [natural resource, land]: 0.00210965 m2; = T_t/20; lognormal variance with pedigree 0.011325, pedigree (2,2,3,2,2)
  (same comment as for Transformation, from forest, intensive)

## Emissions to nature
- Ammonia [air, non-urban air or from high stacks]: 8.72573e-5 kg; name NH3; = 17/14*(N_as*0.01 + urea*0.466461632733939*0.2); source Nemecek T. 2015; lognormal variance with pedigree 0.0187, pedigree (4,3,3,3,1)
  NH3 emissions from applied mineral fertilisers are calculated according to Agrammon model available in EEA/EMEP (2013), page 35. Constant emission factor for ammonium sulphate is 1.1% and for urea is 20% to soils with pH<=7 (brazilian conditions).
  Uncertainty: Variance of log-transformed data as recommended by Ecoinvent for "CH4, NH3" for agriculture.
- Flumioxazin [soil, agricultural]: 4.2193e-7 kg; = 1.00E-01 / yield / density; source Nemecek, T. 2011; lognormal variance with pedigree 0.0507, pedigree (4,3,3,3,1)
  "All pesticides applied for crop production were assumed to end up as emissions to the soil. The amounts of pesticides used as inputs were thus simultaneously calculated as outputs (emissions to agricultural soil)", as recomended by Nemecek & Schnetzer (2011), "2.9 EMISSIONS OF PESTICIDES TO AGRICULTURAL SOIL" (page 21).
- Chromium [soil, forestry]: 3.70455e-7 kg; = 8.78E-02 / yield / density; source Milà i Canals, L. 2003; lognormal variance with pedigree 0.0507, pedigree (4,3,3,3,1)
  Emissions of heavy metals to soil and surface water estimated from mineral fertilisers and liming as recommended by Canals (2003). Due to lack of data about metal content in wood, it was considered zero absorption.
  Original values per ha were attributed to total volume of wood produced per hectare (changing the reference product from ha to m3) and to density (changing the reference product from m3 to kg).
- Pesticides, unspecified [soil, agricultural]: 3.6497e-7 kg; = 8.65E-02 / yield / density; source Nemecek, T. 2011; lognormal variance with pedigree 0.0437, pedigree (4,3,3,3,1)
  "All pesticides applied for crop production were assumed to end up as emissions to the soil. The amounts of pesticides used as inputs were thus simultaneously calculated as outputs (emissions to agricultural soil)", as recomended by Nemecek & Schnetzer (2011), "2.9 EMISSIONS OF PESTICIDES TO AGRICULTURAL SOIL" (page 21).
  This exchange represents the input of sulfluramide.
  Original values per ha were attributed to total volume of wood produced per hectare (changing the reference product from ha to m3) and to density (changing the reference product from m3 to kg).
- Copper, ion [water, surface water]: -9.7044e-10 kg; = -2.30E-04 / yield / density; source Michaud, A.R. 2008
  Emissions of heavy metals to soil and surface water estimated from mineral fertilisers and liming as recommended by Canals (2003), metal content in wood from Andrade et al. (2011). According to the authors, there is 10 mg Cu/kg wood in a similar product.
  Original values per ha were attributed to total volume of wood produced per hectare (changing the reference product from ha to m3) and to density (changing the reference product from m3 to kg).
- Copper [soil, forestry]: -9.7044e-6 kg; = -2.3 / yield / density; source Milà i Canals, L. 2003
  (same comment as for Copper, ion)
- Zinc [soil, forestry]: -4.47246e-5 kg; = -10.6 / yield / density; source Milà i Canals, L. 2003
  Emissions of heavy metals to soil and surface water estimated from mineral fertilisers and liming as recommended by Canals (2003), metal content in wood from Andrade et al. (2011). According to the authors, there is 46 mg Zn/kg wood in a similar product.
  Original values per ha were attributed to total volume of wood produced per hectare (changing the reference product from ha to m3) and to density (changing the reference product from m3 to kg).
- Zinc, ion [water, surface water]: -4.47246e-9 kg; = -1.06E-03 / yield / density; source Milà i Canals, L. 2003
  Emissions of heavy metals to soil and surface water estimated from mineral fertilisers and liming as recommended by Canals (2003), metal content in wood from Andrade et al. (2011). According to the authors, there is 46 mg Zn/kg wood in a similar product.
- Dinitrogen monoxide [air, non-urban air or from high stacks]: 0.000445863 kg; name N2O; = 44/28*((0.01*(N_total+ Ncrop_residues)+ (0.01*14/17*NH3) + 0.0075*14/62*NO3) / yield / density); source Nemecek, T. 2011; lognormal variance with pedigree 0.1987, pedigree (4,3,5,3,5)
  Emissions of N2O to the air are calculated through the showed mathematical relation that is in accordance with "2.4 EMISSIONS OF N2O TO THE AIR" in Nemecek & Schnetzer (2011).
  Original values per ha were attributed to total volume of wood produced per hectare (changing the reference product from ha to m3) and to density (changing the reference product from m3 to kg).
  Uncertainty: Variance of log-transformed data as recommended by Ecoinvent for "NOX, N2O" for agriculture.
- Lead [soil, forestry]: 5.10536e-7 kg; = 0.121 / yield / density; source Milà i Canals, L. 2003; lognormal variance with pedigree 0.0507, pedigree (4,3,3,3,1)
  (same comment as for Chromium)
- Nitrate [water, ground-]: 0.000503393 kg; name NO3; = 62/14*((21.37 + precipitation/(Clay_content*root_depth) * (0.0037*N_total + 0.0000601*Norg_soil - 0.00362*Nuptake_plant)) / yield / density); source Nemecek, T. 2011; lognormal variance with pedigree 0.0507, pedigree (4,3,3,3,1)
  Emissions of nitrate to the groundwater are calculated through the showed mathematical relation that is in accordance with "2.2.2 The SQCB-NO3 model" in Nemececk & Schnetzer (2011), as "SALCA-NO3 model" has "Geographic scope of application: Europe"
  Original values per ha were attributed to total volume of wood produced per hectare (changing the reference product from ha to m3) and to density (changing the reference product from m3 to kg).
  Uncertainty: Variance of log-transformed data as recommended by Ecoinvent for "NO3, PO4" for agriculture.
- Phosphorus [water, surface water]: 8.05791e-6 kg; = (soil_eroded * 0.00095 * 1.86 * 0.2) / yield / density; source Nemecek, T. 2011; lognormal variance with pedigree 0.0507, pedigree (4,3,3,3,1)
  Due to phosphorus low mobility in Brazilian soils, its emissions through leaching and run-off were disregarded (Novais & Smyth, 1999). Only P emission by water erosion through surface water was considered. They are calculated through the showed mathematical relation that is in accordance with "2.3.3 Phorsphorous Emissions Through Water Erosion to Surface Water" Nemecek and Schnetzer (2011).
  Uncertainty: Variance of log-transformed data as recommended by Ecoinvent for "NO3, PO4" for agriculture.
- Glyphosate [soil, agricultural]: 2.61175e-5 kg; = 6.19E+00 / yield / density; source Nemecek, T. 2011; lognormal variance with pedigree 0.0437, pedigree (4,3,3,3,1)
  "All pesticides applied for crop production were assumed to end up as emissions to the soil. The amounts of pesticides used as inputs were thus simultaneously calculated as outputs (emissions to agricultural soil)", as recomended by Nemecek & Schnetzer (2011), "2.9 EMISSIONS OF PESTICIDES TO AGRICULTURAL SOIL" (page 21).
  Original values per ha were attributed to total volume of wood produced per hectare (changing the reference product from ha to m3) and to density (changing the reference product from m3 to kg).
- Nitrogen oxides [air, non-urban air or from high stacks]: 9.36313e-5 kg; = N2O*0.21; source Nemecek, T. 2011; lognormal variance with pedigree 0.0407, pedigree (4,3,3,3,1)
  Emissions of NOx to the air are calculated through the showed mathematical relation that is in accordance with "2.5 EMISSIONS OF NOX TO THE AIR" in Nemecek & Schnetzer (2011).
  Uncertainty: Variance of log-transformed data as recommended by Ecoinvent for "NOX, N2O" for agriculture.
- Carbon dioxide, fossil [air, non-urban air or from high stacks]: 0.00827262 kg; = limestone * 0.125 * 44/12 + urea*0.466461632733939 * 1.57; source Nemecek, T. 2011; lognormal variance with pedigree 0.0113, pedigree (4,3,3,3,1)
  Emissions of CO2 to air from limestone and urea application.
  Uncertainty: Variance of log-transformed data as recommended by Ecoinvent for "CO2" for combustion emissions.
- Cadmium, ion [water, surface water]: 2.09699e-12 kg; = 4.97E-07 / yield / density; source Milà i Canals, L. 2003; lognormal variance with pedigree 0.1007, pedigree (4,3,3,3,1)
  Emissions of heavy metals to soil and surface water estimated from mineral fertilisers and liming as recommended by Canals (2003). Due to lack of data about metal content in wood, it was considered zero absorption.
  Original values per ha were attributed to total volume of wood produced per hectare (changing the reference product from ha to m3) and to density (changing the reference product from m3 to kg).
  Uncertainty: Variance of log-transformed data as recommended by Ecoinvent for "Heavy metals" for agriculture.
- Lead [water, surface water]: 5.10536e-11 kg; = 1.21E-05 / yield / density; source Milà i Canals, L. 2003; lognormal variance with pedigree 0.1007, pedigree (4,3,3,3,1)
  (same comment as for Cadmium, ion)
- Cadmium [soil, forestry]: 2.09699e-8 kg; = 4.97E-03 / yield / density; source Milà i Canals, L. 2003; lognormal variance with pedigree 0.0507, pedigree (4,3,3,3,1)
  (same comment as for Chromium)
- Nickel, ion [water, surface water]: 7.17281e-12 kg; = 1.70E-06 / yield / density; source Milà i Canals, L. 2003; lognormal variance with pedigree 0.1007, pedigree (4,3,3,3,1)
  Emissions of heavy metals to soil and surface water estimated from mineral fertilisers and liming as recommended by Canals (2003), metal content in wood from Freddo et al. (1999). According to the authors, there is 0,195 mg Zn/kg wood in a similar product.
  Original values per ha were attributed to total volume of wood produced per hectare (changing the reference product from ha to m3) and to density (changing the reference product from m3 to kg).
  Uncertainty: Variance of log-transformed data as recommended by Ecoinvent for "Heavy metals" for agriculture.
- Chromium, ion [water, surface water]: 3.70455e-11 kg; = 8.78E-06 / yield / density; source Milà i Canals, L. 2003; lognormal variance with pedigree 0.1007, pedigree (4,3,3,3,1)
  (same comment as for Cadmium, ion)
- Water [air, non-urban air or from high stacks]: 7.78799e-5 m3; name water_air; = water/1000; lognormal variance with pedigree 0.0666, pedigree (4,5,4,5,4)
  It is assumed that the total water applied evaporates.
- Nickel [soil, forestry]: 7.17281e-8 kg; = 1.70E-02 / yield / density; source Milà i Canals, L. 2003; lognormal variance with pedigree 0.0507, pedigree (4,3,3,3,1)
  Emissions of heavy metals to soil and surface water estimated from mineral fertilisers and liming as recommended by Canals (2003), metal content in wood from Freddo et al. (1999). According to the authors, there is 0,195 mg Zn/kg wood in a similar product.
  Original values per ha were attributed to total volume of wood produced per hectare (changing the reference product from ha to m3) and to density (changing the reference product from m3 to kg).

## Sampling procedure
The main source of data for forestry inputs and operations is a big steel company which has eucalyptus plantations to produce cleft timber to charcoal in different regions within the state.
Emissions from the agricultural process are estimated according to Nemecek and Schnetzer (2011) and Canals (2003).

## Extrapolations
This dataset has been extrapolated from year 2016 to the year of the calculation (2021). The uncertainty has been adjusted accordingly.
