# clinker production

Dataset: EcoSpold 2, unit process
Geography: Europe without Switzerland
Time period: 1998-01-01 to 2021-12-31
Technology level: current
Classification: EcoSpold01Categories: construction materials/binder
Classification: ISIC rev.4 ecoinvent: 2394:Manufacture of cement, lime and plaster
Synonyms: Klinker; clinker; Zement; Drehrohrofen; rotary kiln; cement
Tags: combined production
Scenario: Business-as-Usual
System model: Allocation, cut-off by classification
Generated by: Gregor Wernet
Published in: Kellenberger D. 2007
Database: ecoinvent
isCopyrightProtected: true
accessRestrictedTo: 1

## General comment
The dataset describes the production of portland cement clinker; in the production different types of alterantive fuels and raw materials are used. As the use of a alternative fuel/material can vary considerably between different years, this dataset covers the period from 2005 to 2009.
[Dataset to be replaced by 'clinker production, Europe without Switzerland and Austria, 1998 - 2003']

## Included activities start
From the reception of traditional and alternative fuels and raw materials at the factory gate.

## Included activities end
This activity ends with the cooling of the produced clinker. It includes the whole manufacturing process to produce clinker (raw material provision, grinding and mixing; rotary kiln process), internal processes (transport, etc.) and for the infrastructure only the rotary kiln (material consumption) is taken into account. No administration is included. Waste (as secondary fuel and raw material) enter the system without environmental burdens from upstream processes.

## Geography
For some exchanges European and Swiss data have been used as proxy.

## Parameters
- fraction, tap water, to air: 0.15 dimensionless; name fraction_TW_to_air; = fraction_PW_to_air; lognormal variance with pedigree 0.092025, pedigree (4,4,3,2,4)
  Calculated value. See comment in the other parametres present in this dataset. Tap water is considered to be always used as process water, thus process water fractions to air are applied to all tap water input flows to calculate the amount of water consumed in the processes.
- fraction, process water, to air: 0.15 dimensionless; name fraction_PW_to_air; lognormal variance with pedigree 0.092025, pedigree (4,4,3,2,4)
  Literature value. In case when no industry/process specific data are available, default evaporation fraction value is used. This value is 15% and is based on literature (Statistics Canada, 2007 & Shaffer, K.H., 2008, Consumptive water use in the Great Lakes Basin, USGS & Shiklomanov, 2003, World Water Resources at the Beginning of the 21st Century) and has been approved by an expert.

## Reference product
- pyrite ash: 0 kg; name pyrite_ash; By-product classification Waste; CPC 374: Plaster, lime and cement
  Estimated to be the same as in Switzerland.
  production volume 0 kg
    Calculated using ratio towards the reference product.
  property price 0 EUR2005; name pyrite_ash_price_EUR2005
    Waste products are assigned a price of zero as they are assumed to require further treatment.
  property dry mass 1 kg; name pyrite_ash_DM
  property water in wet mass 0 kg; name pyrite_ash_WWM
  property carbon content, non-fossil 0; name pyrite_ash_C_content_non_fossil
    Based on composition of pyrite ash from http://www.srcosmos.gr/srcosmos/showpub.aspx?aa=3629
  property water content 0; name pyrite_ash_water_content
  property carbon content, fossil 0.0594904; name pyrite_ash_C_content_fossil; = .045+0.0526*(12/44)/0.99
    (same comment as for pyrite ash)
  property wet mass 1 kg; name pyrite_ash_WM
  property carbon content 0.0594904
    carbon content on a dry matter basis (reserved; not for manual entry)
  properties: carbon allocation 0.0594904 kg
- waste plastic, mixture: 0 kg; name wasteplastic; By-product classification Waste; CPC 39270: Waste, parings and scrap of plastics
  Estimated to be the same as in Switzerland.
  production volume 0 kg
    Calculated using ratio towards the reference product.
  property heating value, net 30.79 MJ
    Value taken from the general comment of the treatment dataset.
  property price 0 EUR2005; name wasteplastic_price_EUR2005
    (same comment as for pyrite ash)
  property carbon content 0.747344
    carbon content on a dry matter basis (reserved; not for manual entry)
  properties: carbon content, non-fossil 0, dry mass 0.847 kg, water in wet mass 0.153 kg, carbon content, fossil 0.747344, water content 0.180638, wet mass 1 kg, carbon allocation 0.633 kg
- waste paint: 0 kg; name CCS_organics; CPC 39: Wastes or scraps; By-product classification Waste
  Estimated to be the same as in Switzerland.
  production volume 0 kg
    Calculated using ratio towards the reference product.
  property heating value, net 19.7 MJ
    LHV is calculated based on the Carbon content of the product. More details can be found on the respective documentation.
  property price 0 EUR2005; name CCS_organics_price_EUR2005
    (same comment as for pyrite ash)
  property carbon content 0.65
    carbon content on a dry matter basis (reserved; not for manual entry)
  properties: wet mass 1 kg, water in wet mass 0 kg, carbon content, non-fossil 0, carbon content, fossil 0.65, dry mass 1 kg, water content 0, carbon allocation 0.65 kg
- waste wood, untreated: 0 kg; name wastewood; CPC 3928: Sawdust and wood waste and scrap; By-product classification Waste
  Estimated to be the same as in Switzerland.
  production volume 0 kg
    Calculated using ratio towards the reference product.
  property heating value, net 13.99 MJ
    Value taken from the general comment of the treatment dataset.
  property price 0 EUR2005; name wastewood_price_EUR2005
    (same comment as for pyrite ash)
  property carbon content 0.48632
    carbon content on a dry matter basis (reserved; not for manual entry)
  properties: carbon content, fossil 0, water content 0.25, water in wet mass 0.2 kg, wet mass 1 kg, dry mass 0.8 kg, carbon content, non-fossil 0.48632, carbon allocation 0.389056 kg
- inert waste: 0 kg; name inert_waste; CPC 39: Wastes or scraps; By-product classification Waste
  Estimated to be the same as in Switzerland.
  production volume 0 kg
    Calculated using ratio towards the reference product.
  property price 0 EUR2005; name inert_waste_price_EUR2005
    (same comment as for pyrite ash)
  property carbon content 0
    carbon content on a dry matter basis (reserved; not for manual entry)
  properties: carbon content, fossil 0, wet mass 1 kg, water in wet mass 0 kg, dry mass 1 kg, water content 0, carbon content, non-fossil 0, carbon allocation 0 kg
- clinker: 1 kg; CPC 37430: Cement clinkers; By-product classification allocatable product
  EcoSpold01Location=CH
  production volume 2.033e11 kg; name clinker_PV
    Calculated from EU-27 cement production in 2006 (267.5 Mio t) and a assumed average clinker/cement ratio of 0.76.
  property price 0.047 EUR2005
    Calculated value based on data from United Nations Commodity Trade Statistics Database (comtrade.un.org). UN comtrade category: 252310 Cement Clinkers. Using exchange rate of 1EURO = 1.209 USD. Average of price of import into 5 main markets (EU, US, JP, IN and CN).
  property carbon content 0
    carbon content on a dry matter basis (reserved; not for manual entry)
  properties: water in wet mass 0 kg, carbon content, fossil 0, wet mass 1 kg, carbon content, non-fossil 0, dry mass 1 kg, water content 0, carbon allocation 0 kg
- used vegetable cooking oil: 0 kg; name other_biogenic_fuels; By-product classification Recyclable; CPC 39120: Bran and other residues from the working of cereals or legumes; vegetable materials and vegetable waste, veget[…]
  Estimated to be the same as in Switzerland.
  production volume 0 kg
    Calculated using ratio towards the reference product.
  property carbon content, non-fossil 0.75
    C content in fat is estimated to be 75% in dry mass (ecoinvent v2.2 report, n 15a, pg 40)
  property heating value, net 38.4 MJ
    Values is approximated from HHV from "vegetable oil, crude". Source: Radovanovic,M.; Zivanovic,T.; Stojiljkovic,D.; Jovanovic,V.; Jerinic,N.; Knezevic,S. et.al. Utilization of sunflower husk as a fuel for industrial boilers - 20 years experience. Proc. 5th Eur. Conf. on Industrial Furnaces&Boilers 2000,vol.2,p.221-233.
    Available at: https://phyllis.nl/Biomass/View/2152
  property price 0 EUR2005; name other_biogenic_fuels_price_EUR2005
    Assumed without economic value
  property carbon content 0.75
    carbon content on a dry matter basis (reserved; not for manual entry)
  properties: water content 0, wet mass 1 kg, dry mass 1 kg, carbon content, fossil 0, water in wet mass 0 kg, carbon allocation 0.75 kg
- waste mineral oil: 0 kg; name wasteoil; CPC 39990: Other wastes n.e.c.; By-product classification Waste
  Estimated to be the same as in Switzerland.
  production volume 0 kg
    Calculated using ratio towards the reference product.
  property price 0 EUR2005; name wasteoil_price_EUR2005
    (same comment as for pyrite ash)
  property carbon content, fossil 0.864444
    Tab A.6, ecoinvent v2.2 report 13_I. C content has been calculated after data in the tables, and then referred to 1 kg DM
  property heating value, net 34.7 MJ
    Value taken from the general comment of the treatment dataset.
  property carbon content 0.864444
    carbon content on a dry matter basis (reserved; not for manual entry)
  properties: water in wet mass 0.1 kg, wet mass 1 kg, dry mass 0.9 kg, carbon content, non-fossil 0, water content 0.111111, carbon allocation 0.778 kg
- used tyre: 0 kg; name usedtyre; CPC 39260: Used pneumatic tyres of rubber; By-product classification Waste
  Estimated to be the same as in Switzerland.
  production volume 0 kg
    Calculated using ratio towards the reference product.
  property price 0 EUR2005; name usedtyre_price_EUR2005
    (same comment as for pyrite ash)
  property water content 0; name usedtyre_water_content
  property dry mass 1 kg; name usedtyre_DM
  property carbon content, non-fossil 0; name usedtyre_C_content_non_fossil
  property water in wet mass 0 kg; name usedtyre_WWM
  property wet mass 1 kg; name usedtyre_WM
  property carbon content, fossil 0.82; name usedtyre_C_content_fossil
  property heating value, net 24.85 MJ
    (same comment as for waste paint)
  property carbon content 0.82
    carbon content on a dry matter basis (reserved; not for manual entry)
  properties: carbon allocation 0.82 kg
- blast furnace sludge: 0 kg; name ironsludge; By-product classification Waste; CPC 39310: Slag, dross, scalings and other waste from the manufacture of iron or steel
  Estimated to be the same as in Switzerland.
  production volume 0 kg
    Calculated using ratio towards the reference product.
  property price 0 EUR2005; name ironsludge_price_EUR2005
    (same comment as for pyrite ash)
  property carbon content 0.339168
    carbon content on a dry matter basis (reserved; not for manual entry)
  properties: heating value, net 0 MJ, carbon content, non-fossil 0, water content 0.0940919, carbon content, fossil 0.339168, water in wet mass 0.086 kg, wet mass 1 kg, dry mass 0.914 kg, carbon allocation 0.31 kg
- spent solvent mixture: 0 kg; name wastesolvent; CPC 39950: Wastes from chemical or allied industries; By-product classification Waste
  Estimated to be the same as in Switzerland.
  production volume 0 kg
    Calculated using ratio towards the reference product.
  property carbon content, fossil 0.571257
    Tab A.7, ecoinvent v2.2 report 13_I. C content has been calculated after data in the tables, and then referred to 1 kg DM
  property heating value, net 21.7 MJ
    Value taken from the general comment of the treatment dataset.
  property price 0 EUR2005; name wastesolvent_price_EUR2005
    (same comment as for pyrite ash)
  property carbon content 0.571257
    carbon content on a dry matter basis (reserved; not for manual entry)
  properties: wet mass 1 kg, carbon content, non-fossil 0, water content 0.197605, dry mass 0.835 kg, water in wet mass 0.165 kg, carbon allocation 0.477 kg
- sewage sludge, dried: 0 kg; name sewage_sludge; By-product classification Waste; CPC 39920: Sewage sludge
  Estimated to be the same as in Switzerland.
  production volume 0 kg
    Calculated using ratio towards the reference product.
  property price 0 EUR2005; name sewage_sludge_price_EUR2005
    (same comment as for pyrite ash)
  property carbon content 0.4096
    carbon content on a dry matter basis (reserved; not for manual entry)
  properties: dry mass 0.99 kg, water in wet mass 0.01 kg, carbon content, non-fossil 0.4096, carbon content, fossil 0, water content 0.010101, wet mass 1 kg, carbon allocation 0.405504 kg

## Inputs from technosphere
- diesel, burned in building machine: 0.0134 MJ; = 0.0134*clinker; lognormal variance with pedigree 0.0526, pedigree (2,1,5,5,1)
  EcoSpold01Location=GLO
  2007, Kellenberger D., Althaus H.-J., Jungbluth N., Künniger T., Life Cycle Inventories of Building Products, Final report ecoinvent data v2.0, 7, Dübendorf, CH, Swiss Centre for LCI, Empa - TSL, 3 - SeparatePublication, CD-ROM
  properties: heating value, net 1 MJ
- refractory, basic, packed: 0.00019 kg; = 0.00019*clinker; lognormal variance with pedigree 0.0526, pedigree (2,1,5,5,1)
  EcoSpold01Location=DE
  2007, Kellenberger D., Althaus H.-J., Jungbluth N., Künniger T., Life Cycle Inventories of Building Products, Final report ecoinvent data v2.0, 7, Dübendorf, CH, Swiss Centre for LCI, Empa - TSL, 3 - SeparatePublication, CD-ROM
  properties: dry mass 1 kg, wet mass 1 kg
- lubricating oil: 4.71e-5 kg; = 0.0000471*clinker; lognormal variance with pedigree 0.0526, pedigree (2,1,5,5,1)
  EcoSpold01Location=RER
  2007, Kellenberger D., Althaus H.-J., Jungbluth N., Künniger T., Life Cycle Inventories of Building Products, Final report ecoinvent data v2.0, 7, Dübendorf, CH, Swiss Centre for LCI, Empa - TSL, 3 - SeparatePublication, CD-ROM
  properties: heating value, net 40.2 MJ, carbon content, fossil 0.75, dry mass 1 kg, wet mass 1 kg
  note on heating value, net: Literature value, Source: IPCC 2006, 2006 IPCC Guidelines for National Greenhouse Gas Inventories, Prepared by the National Greenhouse Gas Inventories Programme, Eggleston H.S., Buendia L., Miwa K., Ngara T. and Tanabe K. (eds). Published: IGES, Japan
  note on carbon content, fossil: Lubricating oil is produced from diesel. C-content/dry mass of fats and oils considered 75%, from: ecoinvent v2.2 report, n 15a, pg 40
- meat and bone meal: 0.00961 kg; name meat_and_bone_meal; = 0.00961*clinker; lognormal variance with pedigree 0.062, pedigree (4,4,5,5,1)
  Estimated to be the same as in Switzerland.
  properties: dry mass 0.96 kg, heating value, net 21.45 MJ, wet mass 1 kg, water content 0.0416667, carbon content, non-fossil 0.521
  note on carbon content, non-fossil: Boesch & Hellweg 2010, 2010, Boesch, M.E., Hellweg, S., Identifying Improvement Potentials in Cement Production with Life Cycle Assessment, Environmental Science & Technology, 44, 23, 9143-9149, 1 - Article, Supporting information is available via http://pubs.acs.org
- light fuel oil: 0.000374 kg; = 0.000374*clinker; lognormal variance with pedigree 0.0526, pedigree (2,1,5,5,1)
  EcoSpold01Location=CH
  2007, Kellenberger D., Althaus H.-J., Jungbluth N., Künniger T., Life Cycle Inventories of Building Products, Final report ecoinvent data v2.0, 7, Dübendorf, CH, Swiss Centre for LCI, Empa - TSL, 3 - SeparatePublication, CD-ROM
  properties: dry mass 1 kg, wet mass 1 kg, carbon content, fossil 0.862, heating value, net 42.6 MJ
- refractory, high aluminium oxide, packed: 0.000137 kg; = 0.000137*clinker; lognormal variance with pedigree 0.0526, pedigree (2,1,5,5,1)
  (same comment as for refractory, basic, packed)
  properties: wet mass 1 kg, dry mass 1 kg
- lime: 0.841 kg; = 0.841*clinker; lognormal variance with pedigree 0.0526, pedigree (2,1,5,5,1)
  (same comment as for light fuel oil)
  properties: dry mass 1 kg, wet mass 1 kg, carbon content, fossil 0.120005
- ammonia, anhydrous, liquid: 0.000908 kg; = 0.000908*clinker; lognormal variance with pedigree 0.0526, pedigree (2,1,5,5,1)
  (same comment as for light fuel oil)
  properties: dry mass 1 kg, wet mass 1 kg
- heavy fuel oil: 0.0255 kg; = 0.0255*clinker; lognormal variance with pedigree 0.0526, pedigree (2,1,5,5,1)
  (same comment as for light fuel oil)
  properties: heating value, net 41.2 MJ, dry mass 1 kg, carbon content, fossil 0.849, wet mass 1 kg
- industrial machine, heavy, unspecified: 3.76e-5 kg; = 0.0000376*clinker; lognormal variance with pedigree 0.372, pedigree (4,4,5,5,1)
  2007, Kellenberger D., Althaus H.-J., Jungbluth N., Künniger T., Life Cycle Inventories of Building Products, Final report ecoinvent data v2.0, 7, Dübendorf, CH, Swiss Centre for LCI, Empa - TSL, 3 - SeparatePublication, CD-ROM
  EcoSpold01Location=RER
- petroleum coke: 0.00391 kg; = 0.00391*clinker; lognormal variance with pedigree 0.0526, pedigree (2,1,5,5,1)
  (same comment as for lubricating oil)
  properties: dry mass 1 kg, heating value, net 35 MJ, wet mass 1 kg, carbon content, fossil 0.885
- bauxite: 0.00012 kg; = 0.00012*clinker; lognormal variance with pedigree 0.0526, pedigree (2,1,5,5,1)
  2007, Kellenberger D., Althaus H.-J., Jungbluth N., Künniger T., Life Cycle Inventories of Building Products, Final report ecoinvent data v2.0, 7, Dübendorf, CH, Swiss Centre for LCI, Empa - TSL, 3 - SeparatePublication, CD-ROM
  EcoSpold01Location=GLO
  properties: dry mass 1 kg, wet mass 1 kg
- sand: 0.00926 kg; = 0.00926*clinker; lognormal variance with pedigree 0.0526, pedigree (2,1,5,5,1)
  2007, Kellenberger D., Althaus H.-J., Jungbluth N., Künniger T., Life Cycle Inventories of Building Products, Final report ecoinvent data v2.0, 7, Dübendorf, CH, Swiss Centre for LCI, Empa - TSL, 3 - SeparatePublication, CD-ROM
  EcoSpold01Location=CH
  properties: dry mass 1 kg, wet mass 1 kg
- refractory, fireclay, packed: 8.21e-5 kg; = 0.0000821*clinker; lognormal variance with pedigree 0.0526, pedigree (2,1,5,5,1)
  2007, Kellenberger D., Althaus H.-J., Jungbluth N., Künniger T., Life Cycle Inventories of Building Products, Final report ecoinvent data v2.0, 7, Dübendorf, CH, Swiss Centre for LCI, Empa - TSL, 3 - SeparatePublication, CD-ROM
  EcoSpold01Location=DE
  properties: dry mass 1 kg, wet mass 1 kg
- inert waste, for final disposal: -8e-5 kg; name inert_waste_disposal; = (0.00008*clinker)*-1; lognormal variance with pedigree 0.0526, pedigree (2,1,5,5,1)
  (same comment as for sand)
  production volume 1.6264e7 kg; = clinker_pv*8E-05
    Calculated from the production volume of clinker in proportion to the respective output amounts.
  property price 0 EUR2005; name inert_waste_disposal_price_EUR2005
  properties: water content 0.00502513, wet mass 1 kg, dry mass 0.995 kg
- cement factory: 6.27e-12 unit; = 0.00000000000627*clinker; lognormal variance with pedigree 0.3526, pedigree (2,1,5,5,1)
  (same comment as for light fuel oil)
- clay: 0.331 kg; = 0.331*clinker; lognormal variance with pedigree 0.0526, pedigree (2,1,5,5,1)
  (same comment as for sand)
  properties: wet mass 1 kg, water content 0.0362694, dry mass 0.965 kg
- calcareous marl: 0.466 kg; = 0.466*clinker; lognormal variance with pedigree 0.0526, pedigree (2,1,5,5,1)
  (same comment as for light fuel oil)
  properties: dry mass 1 kg, wet mass 1 kg, carbon content, fossil 0.087767
  note on carbon content, fossil: composed from 3/4 pure limestone and 1/4 clay, ecoinvent v2.2 report 7 part II pg 14. C content of limestone is 0.117 kg/kg WM
- lime, hydrated, loose weight: 0.00392 kg; = 0.00392*clinker; lognormal variance with pedigree 0.0526, pedigree (2,1,5,5,1)
  (same comment as for sand)
  properties: wet mass 1 kg, water content 0.00300903, dry mass 0.997 kg
- electricity, medium voltage: 0.058 kWh; = 0.058*clinker; lognormal variance with pedigree 0.0526, pedigree (2,1,5,5,1)
  (same comment as for sand)
- hard coal: 0.0354 kg; = 0.0354*clinker+wasteplastic*0+ usedtyre*0+ wastewood*0+ wasteoil*0+ ironsludge*0+ CCS_organics*0+ pyrite_ash*0+ wastesolvent*0+ other_biogenic_fuels*0+inert_waste*0; lognormal variance with pedigree 0.0526, pedigree (2,1,5,5,1)
  EcoSpold01Location=WEU
  2007, Kellenberger D., Althaus H.-J., Jungbluth N., Künniger T., Life Cycle Inventories of Building Products, Final report ecoinvent data v2.0, 7, Dübendorf, CH, Swiss Centre for LCI, Empa - TSL, 3 - SeparatePublication, CD-ROM
  properties: heating value, net 27.91 MJ, carbon content, fossil 0.845, wet mass 1 kg, water content 0.0638298, dry mass 0.94 kg
  note on heating value, net: Based on the Characterization factor of Hard coal in the CED method
  note on carbon content, fossil: C content 75-94% (specified in Tab 1.1, report 6, part VI). A mean content of 0.845 kg C/ kg dry hard coal was considered
- tap water: 0.34 kg; name tap_water_input; = 0.34*clinker; lognormal variance with pedigree 0.0526, pedigree (2,1,5,5,1)
  (same comment as for lubricating oil)
- steel, chromium steel 18/8, hot rolled: 5.86e-5 kg; = 0.0000586*clinker; lognormal variance with pedigree 0.0526, pedigree (2,1,5,5,1)
  (same comment as for lubricating oil)
  properties: carbon content, fossil 0.0008, dry mass 1 kg, wet mass 1 kg
  note on carbon content, fossil: Stainless steel model is the grade 304 steel (18/8 stainless, 18% chromium 8% nickel; max. 0.08% C)
- municipal solid waste: -4.5e-5 kg; name MSW; = (0.000045*clinker)*-1; lognormal variance with pedigree 0.0526, pedigree (2,1,5,5,1)
  (same comment as for light fuel oil)
  production volume 9.1485e6 kg; = clinker_pv*4.5E-05
    (same comment as for inert waste, for final disposal)
  properties: heating value, net 11.74 MJ, carbon content, non-fossil 0.261655, water content 0.297017, dry mass 0.771 kg, carbon content, fossil 0.171549, wet mass 1 kg
  note on heating value, net: Value taken from the general comment of the treatment dataset.
  note on carbon content, non-fossil: MSW composition in tab 4.1, ecoinvent v2.2 report 13_I. C content referred to 1 kg DM
- natural gas, high pressure: 0.00017462 m3; = 0.00017462*clinker; lognormal variance with pedigree 0.0526, pedigree (2,1,5,5,1)
  (same comment as for sand)
  properties: heating value, net 39 MJ, heating value, gross 39 MJ
  note on heating value, net: Literature value, Source: United Nations Statistics Division (2018) International Recommendations for Energy Statistics (IRES). Available at: http://unstats.un.org/unsd/statcom/doc11/BG-IRES.pdf.

## Inputs from nature
- Water, unspecified natural origin [natural resource, in water]: 0.00162 m3; name water_UNO_input; = 0.00162*clinker; lognormal variance with pedigree 0.0526, pedigree (2,1,5,5,1)
  2007, Kellenberger D., Althaus H.-J., Jungbluth N., Künniger T., Life Cycle Inventories of Building Products, Final report ecoinvent data v2.0, 7, Dübendorf, CH, Swiss Centre for LCI, Empa - TSL, 3 - SeparatePublication, CD-ROM

## Emissions to nature
- Vanadium [air, unspecified]: 5e-9 kg; = 0.000000005*clinker; lognormal variance with pedigree 0.0926, pedigree (2,1,5,5,1)
  (same comment as for Water, unspecified natural origin)
- Hydrogen chloride [air, unspecified]: 6.31e-6 kg; = 0.00000631*clinker; lognormal variance with pedigree 0.0926, pedigree (2,1,5,5,1)
  (same comment as for Water, unspecified natural origin)
- Mercury [air, unspecified]: 3.3e-8 kg; = 0.000000033*clinker; lognormal variance with pedigree 0.0926, pedigree (2,1,5,5,1)
  (same comment as for Water, unspecified natural origin)
- Cadmium [air, unspecified]: 7e-9 kg; = 0.000000007*clinker; lognormal variance with pedigree 0.0926, pedigree (2,1,5,5,1)
  (same comment as for Water, unspecified natural origin)
- Dioxins, measured as 2,3,7,8-tetrachlorodibenzo-p-dioxin [air, unspecified]: 9.6e-13 kg; = 0.00000000000096*clinker; lognormal variance with pedigree 0.1726, pedigree (2,1,5,5,1)
  (same comment as for Water, unspecified natural origin)
- Water [air, unspecified]: 0.000294 m3; name water_to_air_unspecified; = 0.000294*clinker; lognormal variance with pedigree 0.0807, pedigree (2,2,5,1,1)
  Calculated value.
  Calculated using following formula;
  ((water_UNO_input+(tap_water_input/1000))* fraction_PW_to_air)
  property fraction, origin: unspecified 0.826531; name fraction_origin_unspecified
  property fraction, origin: fresh water 0.173469; name fraction_origin_fresh_water
  property fraction, origin: salt water 0; name fraction_origin_salt_water
- Copper [air, unspecified]: 1.4e-8 kg; = 0.000000014*clinker; lognormal variance with pedigree 0.0926, pedigree (2,1,5,5,1)
  (same comment as for Water, unspecified natural origin)
- Nickel [air, unspecified]: 5e-9 kg; = 0.000000005*clinker; lognormal variance with pedigree 0.0926, pedigree (2,1,5,5,1)
  (same comment as for Water, unspecified natural origin)
- Methane, fossil [air, unspecified]: 8.88e-6 kg; = 0.00000888*clinker; lognormal variance with pedigree 0.1726, pedigree (2,1,5,5,1)
  (same comment as for Water, unspecified natural origin)
- Particulates, > 2.5 um, and < 10um [air, non-urban air or from high stacks]: 7.92e-6 kg; = 0.00000792*clinker; lognormal variance with pedigree 0.1726, pedigree (2,1,5,5,1)
  (same comment as for Water, unspecified natural origin)
- Chromium VI [air, unspecified]: 5.5e-10 kg; = 0.00000000055*clinker; lognormal variance with pedigree 0.0926, pedigree (2,1,5,5,1)
  (same comment as for Water, unspecified natural origin)
- Carbon dioxide, non-fossil [air, unspecified]: 0.0151 kg; = 0.0151*clinker; lognormal variance with pedigree 0.0526, pedigree (2,1,5,5,1)
  (same comment as for Water, unspecified natural origin)
- Lead [air, unspecified]: 8.5e-8 kg; = 0.000000085*clinker; lognormal variance with pedigree 0.7026, pedigree (2,1,5,5,1)
  (same comment as for Water, unspecified natural origin)
- Beryllium [air, unspecified]: 3e-9 kg; = 0.000000003*clinker; lognormal variance with pedigree 0.0926, pedigree (2,1,5,5,1)
  (same comment as for Water, unspecified natural origin)
- Antimony [air, unspecified]: 2e-9 kg; = 0.000000002*clinker; lognormal variance with pedigree 0.7026, pedigree (2,1,5,5,1)
  (same comment as for Water, unspecified natural origin)
- Tin [air, unspecified]: 9e-9 kg; = 0.000000009*clinker; lognormal variance with pedigree 0.7026, pedigree (2,1,5,5,1)
  (same comment as for Water, unspecified natural origin)
- Carbon dioxide, fossil [air, unspecified]: 0.839 kg; = 0.839*clinker; lognormal variance with pedigree 0.0526, pedigree (2,1,5,5,1)
  (same comment as for Water, unspecified natural origin)
- Particulates, > 10 um [air, non-urban air or from high stacks]: 5.66e-6 kg; = 0.00000566*clinker; lognormal variance with pedigree 0.0926, pedigree (2,1,5,5,1)
  (same comment as for Water, unspecified natural origin)
- Water [water, unspecified]: 0.001666 m3; name water_to_water_unspecified; = 0.001666*clinker; lognormal variance with pedigree 0.0807, pedigree (2,2,5,1,1)
  Calculated value.
  Calculated using following formula;
  ((water_UNO_input+(tap_water_input/1000))*(1-fraction_PW_to_air))
  property fraction, origin: unspecified 0.826531; name fraction_origin_unspecified_Ww
  property fraction, origin: salt water 0; name fraction_origin_salt_water_Ww
  property fraction, origin: fresh water 0.173469; name fraction_origin_fresh_water_Ww
- Ammonia [air, unspecified]: 2.28e-5 kg; = 0.0000228*clinker; lognormal variance with pedigree 0.0926, pedigree (2,1,5,5,1)
  (same comment as for Water, unspecified natural origin)
- Zinc [air, unspecified]: 6e-8 kg; = 0.00000006*clinker; lognormal variance with pedigree 0.0926, pedigree (2,1,5,5,1)
  (same comment as for Water, unspecified natural origin)
- NMVOC, non-methane volatile organic compounds, unspecified origin [air, unspecified]: 5.64e-5 kg; = 0.0000564*clinker; lognormal variance with pedigree 0.1726, pedigree (2,1,5,5,1)
  (same comment as for Water, unspecified natural origin)
- Chromium [air, unspecified]: 1.45e-9 kg; = 0.00000000145*clinker; lognormal variance with pedigree 0.0926, pedigree (2,1,5,5,1)
  (same comment as for Water, unspecified natural origin)
- Thallium [air, unspecified]: 1.3e-8 kg; = 0.000000013*clinker; lognormal variance with pedigree 0.0926, pedigree (2,1,5,5,1)
  (same comment as for Water, unspecified natural origin)
- Cobalt [air, unspecified]: 4e-9 kg; = 0.000000004*clinker; lognormal variance with pedigree 0.0926, pedigree (2,1,5,5,1)
  (same comment as for Water, unspecified natural origin)
- Selenium [air, unspecified]: 2e-9 kg; = 0.000000002*clinker; lognormal variance with pedigree 0.7026, pedigree (2,1,5,5,1)
  (same comment as for Water, unspecified natural origin)
- Carbon monoxide, fossil [air, unspecified]: 0.000472 kg; = 0.000472*clinker; lognormal variance with pedigree 0.1726, pedigree (2,1,5,5,1)
  (same comment as for Water, unspecified natural origin)
- Arsenic [air, unspecified]: 1.2e-8 kg; = 0.000000012*clinker; lognormal variance with pedigree 0.0926, pedigree (2,1,5,5,1)
  (same comment as for Water, unspecified natural origin)
- Nitrogen oxides [air, unspecified]: 0.00108 kg; = 0.00108*clinker; lognormal variance with pedigree 0.0926, pedigree (2,1,5,5,1)
  (same comment as for Water, unspecified natural origin)
- Particulates, < 2.5 um [air, non-urban air or from high stacks]: 2.41e-5 kg; = 0.0000241*clinker; lognormal variance with pedigree 0.3526, pedigree (2,1,5,5,1)
  (same comment as for Water, unspecified natural origin)
- Sulfur dioxide [air, unspecified]: 0.000355 kg; = 0.000355*clinker; lognormal variance with pedigree 0.0926, pedigree (2,1,5,5,1)
  (same comment as for Water, unspecified natural origin)

## Extrapolations
See geography.
