# water works construction, capacity 1.1E10l/year, conventional treatment

Dataset: EcoSpold 2, unit process
Geography: Europe without Switzerland
Time period: 2009-01-01 to 2021-12-31
Technology level: current
Classification: EcoSpold01Categories: water supply/production
Classification: ISIC rev.4 ecoinvent: 4220:Construction of utility projects
Scenario: Business-as-Usual
System model: Allocation, cut-off by classification
Generated by: Tereza Levova
Database: ecoinvent
isCopyrightProtected: false
accessRestrictedTo: 1

## General comment
This dataset is created as a child of global dataset with edited production volume for this geography.

This dataset represents the construction of a medium-sized potable water conventional treatment plant 30 000m3/d with a lifetime of 60 years. Conventional treatment includes coagulation and decantation, filtration and disinfection. This dataset both conventional treatment systems and conventional with biological treatment. Dataset is extrapolated from a small conventional treatment plant in Saint-François-Rivière-du-sud, Quebec (CA): average flow of 1500 m3/d and is assumed to have a 60 years lifetime. Inventory is extrapolated to a medium-size plant based on cost curve. Lifetime is assumed to be 13 years for mechanical equipment (e.g. pumps), 30 years for chemical tanks and 60 years for structural components. Note that a major source of uncertainty in this dataset is the use of cost scaling factors outside their reported range of validity: the cost scaling factors are reported to be valid for capacities of 3785 m3/d to 378540 m3/d, and the actual plant that served as basis for this dataset is has an average flow of 1500 m3/d. This uncertainty is accounted for through the “Further technological correlation” data quality indicator.
[This dataset is meant to replace the following datasets:]

## Included activities start
From reception of raw materials and construction equipment. This dataset includes material inputs for equipment of the different water treatment stages: intake pumping, coagulation, flocculation, clarification, filtration, ozonation and chlorination. A potable water reserve build underground (roof of the reserve is the floor of the water plant) is included in the inventory. Metal forming activities and associated losses were excluded. Energy and equipment needed for construction are excluded due to lack of data.

## Included activities end
This datasets ends with the dismantlement of the plant at the end of its useful life, expected to be 60 years. Input material end-of-life is included, but equipment and energy used for dismantling is excluded due to lack of data.

## Geography
Extrapolated from data from a single plant in Quebec (Canada).

## Technology
Municipal water treatment by conventional treatment with biological filtration.

## Time period
Time of publication.

## Parameters
- factor A_steel: 2530 kg/(m3/d)^2; name A_steel; lognormal variance with pedigree 0.0468, pedigree (3,4,2,5,4)
  Calculated value for constant A in scaling equation Y=A*Q^-B, where Y and Q are respectively the mass of material per unit flow and flow rate and B is a scaling factor to account for economies of scale Calculations based on contruction inventory extrapolated from ecoinvent 2.2 Tap water process, St-François-Rivère-du-sud treatment plant average flow rate and cost scaling factor B (Kawamura, 2008). Note that the calculation of the constant is uncertain as the B value is used outside its reported range of validity (see general comment).
- factor A_landuse: 6.386 m2/(m3/d)^2; name A_landuse; lognormal variance with pedigree 0.0132, pedigree (4,4,1,5,2)
  Calculated value for constant A in scaling equation Y=A*Q^-B. Based on regression of measurements of surface area Y occupied by 4 Quebec water treatment plants of different technologies in Quebec, each associated with its own daily flow rate Q. R^2 of regression based on this sample was 0.6248.
- scaling factor B_landuse: 0.289 dimensionless; name B_landuse; lognormal variance with pedigree 0.0452, pedigree (5,4,1,5,2)
  Calculated value for constant B in scaling equation Y=A*Q^-B. Estimated scaling factor based on regression of measurements of surface area Y occupied by 4 Quebec water treatment plants, each associated with its own daily flow rate Q. R^2 of regression based on this sample was 0.625.
- factor A_sand: 892 kg/(m3/d)^2; name A_sand; lognormal variance with pedigree 0.0468, pedigree (3,4,2,5,4)
  (same comment as for factor A_steel)
- factor A_pe: 8.72 kg/(m3/d)^2; name A_pe; lognormal variance with pedigree 0.0468, pedigree (3,4,2,5,4)
  (same comment as for factor A_steel)
- factor A_polyurethane: 36.3 kg/(m3/d)^2; name A_polyurethane; lognormal variance with pedigree 0.0468, pedigree (3,4,2,5,4)
  (same comment as for factor A_steel)
- factor A_concrete: 63 m3/(m3/d)^2; name A_concrete; lognormal variance with pedigree 0.0468, pedigree (3,4,2,5,4)
  (same comment as for factor A_steel)
- factor A_copper: 44.7 kg/(m3/d)^2; name A_Cu; lognormal variance with pedigree 0.0468, pedigree (3,4,2,5,4)
  Calculated value. Factor A is calculated based on contruction inventory from St-Fraçois-Rivère-du-sud treatment plant, average flow rate and economical based scaling factor B (Kawamura, 2008). Scaling équation is Y=A*Q^-B, where Y is mass of material per average flow rate and Q is average flow rate.
- factor A_reinforcing steel: 5330 kg/(m3/d)^2; name A_reinfSteel; lognormal variance with pedigree 0.0468, pedigree (3,4,2,5,4)
  (same comment as for factor A_steel)
- factor A_pvc: 246 kg/(m3/d)^2; name A_pvc; lognormal variance with pedigree 0.0468, pedigree (3,4,2,5,4)
  (same comment as for factor A_steel)
- plant average daily flow rate: 30000 m3/d; name Q_av; lognormal variance with pedigree 0, pedigree (1,1,1,1,1)
  Assumed average size plant to be 30000 m3/d. Can be adapted to extrapolate construction inventory for different plant sizes ranging from 3785 m3/d to 378540 m3/d (representativity of used cost curves). To adapt the entire dataset to a different plant size change this parameter to the average flow rate of the waterworks you wish to model. Than change the amount called for this flow in the "tap water" dataset based on new plant lifetime production.
  Uncertainty: F
- scaling factor B_conventional: 0.586 dimensionless; name B_conventional; lognormal variance with pedigree 0.0468, pedigree (3,4,2,5,4)
  Literature value. Cost-based scaling factor, usually used to account for economies of scale, as reported in Kawamura (2008). Value used is the calculated average of factor B for conventional treatment (B=0.5957) and conventional treatment with granular activated carbon filtration (B=0.5763). Note that the factor is reported to be valid for a capacity range of 3785 m3/d to 378540 m3/d.
  Kawamura, S., McGivney, W. T. 2008. Cost Estimating Manual for Water Treatment Facilities, Willey, 224p.
- factor A_aluminium: 14.5 kg/(m3/d)^2; name A_Al; lognormal variance with pedigree 0.0468, pedigree (3,4,2,5,4)
  (same comment as for factor A_steel)
- factor A_anthracite: 6.64 kg/(m3/d)^2; name anthracite; lognormal variance with pedigree 0.0468, pedigree (3,4,2,5,4)
  (same comment as for factor A_steel)
- factor A_fibre glass: 410 kg/(m3/d)^2; name A_fglass; lognormal variance with pedigree 0.0468, pedigree (3,4,2,5,4)
  (same comment as for factor A_steel)

## Reference product
- water works, capacity 1.1E10l/year: 1 unit; name waterworks; By-product classification allocatable product; CPC 53253: Sewage and water treatment plants
  production volume 302.888 unit; name PV_waterworks; = (47.8244E10*0.38)/1E7/lifetime
    Calculated based on estimates and literature values.
    4.78E11 m3/year is the amount of tap water produced in Europe (without Switzerland) yearly (Gleick, P., 2012, The World"s Water, Volume 7).
    18.4% is the share of tap water produced without any treatment or minimal treatment from ground water
    38% is the share of conventional treatment
    38.5% is the share of direct filtration treatment
    2.4% is the share of microstainer treatment
    2.6% is the share of ultrafiltration
    Estimated based on literature values (European Environment Agency, 2009, Water resources across Europe - confronting water scarcity and drought).
    1E7 m3/year is the capacity of the water works
  property lifetime 60 year; name lifetime
    Literature value. Assumed lifetime of 60 years for St-François-Rivière-du-Sud treatment plant based on Bonton, A. (2012).
    Bonton, A., Bouchard, C., Barbeau, B., & Jedrzejak, S. (2012). Comparative life cycle assessment of water treatment plants. Desalination, 284, 42-54.
  property price 1.21373e6 EUR2005; name waterworks_price_EUR2005
    Calculated based on inputs: The price of the product has been calculated as a sum of the values of the material and energy inputs for this product. This value is therefore a rough estimation. It may underestimate the real price since there are additional expenses when producing any product. These expences can include for example labour costs, treatment of waste materials and profit for the producer. Please consider carefully whether this level of data quality is acceptable for your application.

## By-products
- copper scrap, sorted, pressed: 0 kg; CPC 39361: Waste and scrap of copper; By-product classification Recyclable; pedigree (1,1,1,1,1)
  Estimation. Based on material input.
  Uncertainty: C
  production volume 0 kg; name PV_w_cu; = PV_waterworks*W_cu/waterworks
    Calculated from production volume of reference product using the relative outputs.
  property price 2.84 EUR2005; name W_cu_price_EUR2005
    Temporary price data. Calculated as 90% of purchasers price based on: Source: USGS Mineral Yearbook 2007, Table 1 in <http://minerals.usgs.gov/minerals/pubs/commodity/recycle/myb1-2007-recyc.pdf>
  property carbon content 0
    carbon content on a dry matter basis (reserved; not for manual entry)
  properties: dry mass 1 kg, carbon content, non-fossil 0, wet mass 1 kg, water in wet mass 0 kg, water content 0, carbon content, fossil 0, carbon allocation 0 kg
- aluminium scrap, post-consumer: 0 kg; CPC 39363: Waste and scrap of aluminium; By-product classification Recyclable; pedigree (1,1,1,1,1)
  Estimation. Based on material input.
  Uncertainty: C
  production volume 0 kg; name PV_w_al; = PV_waterworks*W_al/waterworks
    Calculated from production volume of reference product using the relative outputs.
  property price 0.685 EUR2005; name W_al_price_EUR2005
    Temporary price data. Calculated as 90% of purchasers price based on: estimated at 85% of new scrap
  property carbon content 0
    carbon content on a dry matter basis (reserved; not for manual entry)
  properties: water content 0, wet mass 1 kg, carbon content, fossil 0, carbon content, non-fossil 0, dry mass 1 kg, water in wet mass 0 kg, carbon allocation 0 kg

## Inputs from technosphere
All rows: lognormal variance with pedigree 0.008, pedigree (1,1,4,1,1)
- polyvinylchloride, bulk polymerised: 17557.5 kg; name PVC; = ( A_pvc* Q_av^- B_conventional)* Q_av
  Calculated Value.
  Uncertainty: C
  properties: dry mass 1 kg, wet mass 1 kg, heating value, net 21.5 MJ, carbon content, fossil 0.387097
  note on carbon content, fossil: Monomer is vynyl chloride, C2H3Cl (ecoinvent v2.2 report 11_II). MW=62 g/mol
- waste reinforced concrete: -4496.44 kg; name W_reinfconc; = (concrete)*-1
  Estimation. Based on material input.
  Uncertainty: C
  production volume 1.36192e6 kg; name PV_w_reinfconc; = PV_waterworks*W_reinfconc/waterworks
    Calculated from the production volume of water works in proportion to the respective output amounts.
  property price 0 EUR2005; name W_reinfconc_price_EUR2005
  properties: dry mass 0.99418 kg, wet mass 1 kg, water content 0.00585407
- waste wood, untreated: -473.91 kg; name W_wood; = (charcoal)*-1
  Estimation. Based on material input.
  Uncertainty: C
  production volume 143542 kg; name PV_w_wood; = PV_waterworks*W_wood/waterworks
    Calculated from production volume of reference product using the relative outputs.
  property price 0 EUR2005; name W_wood_price_EUR2005
  properties: dry mass 0.8 kg, water content 0.25, carbon content, non-fossil 0.48632, wet mass 1 kg, heating value, net 13.99 MJ
  note on heating value, net: Value taken from the general comment of the treatment dataset.
- scrap steel: -180571 kg; name W_steel; = (steel)*-1
  Estimation. Based on material input.
  Uncertainty: C
  production volume 5.46929e7 kg; name PV_w_steel; = PV_waterworks*W_steel/waterworks
    Calculated from production volume of reference product using the relative outputs.
  property price 0 EUR2005; name W_steel_price_EUR2005
  properties: dry mass 1 kg, wet mass 1 kg
- glass fibre reinforced plastic, polyester resin, hand lay-up: 29262.5 kg; name fiberglass; = (A_fglass*Q_av^- B_conventional)* Q_av
  Calculated Value.
  Uncertainty: C
  properties: dry mass 1 kg, wet mass 1 kg, carbon content, fossil 0.246639
- polyethylene, linear low density, granulate: 622.364 kg; name lldpe; = ( A_pe* Q_av^- B_conventional)*Q_av
  Calculated Value.
  Uncertainty: C
  properties: wet mass 1 kg, dry mass 1 kg, heating value, net 42.47 MJ, carbon content, fossil 0.857143
- steel, low-alloyed, hot rolled: 180571 kg; name steel; = (A_steel* Q_av^- B_conventional)*Q_av
  Calculated Value.
  Uncertainty: C
  properties: carbon content, fossil 0.005, wet mass 1 kg, dry mass 1 kg
  note on carbon content, fossil: Low alloyed steel composition given in Tab. 3.2 ecoinvent v2.2 report 10_partII. Steel assumed to have a C content of 0.5%
- waste glass pane in burnable frame: -29262.5 kg; name W_fglass; = (fiberglass)*-1
  Estimation. Based on material input.
  Uncertainty: C
  production volume 8.86327e6 kg; name PV_w_fglass; = PV_waterworks*W_fglass/waterworks
    (same comment as for waste reinforced concrete)
  property price 0 EUR2005; name W_fglass_price_EUR2005
  properties: wet mass 1 kg, dry mass 1 kg
- silica sand: 63663.9 kg; name sand; = (A_sand* Q_av^- B_conventional)* Q_av
  Calculated Value.
  Uncertainty: C
  properties: water content 0.010101, dry mass 0.99 kg, wet mass 1 kg
- municipal solid waste: -63663.9 kg; name W_msw; = (sand)*-1
  Estimation. Based on material input.
  Uncertainty: C
  production volume 1.9283e7 kg; name PV_w_msw; = PV_waterworks*W_msw/waterworks
    Calculated from production volume of reference product using the relative outputs.
  property price 0 EUR2005; name W_msw_price_EUR2005
  properties: carbon content, fossil 0.171549, carbon content, non-fossil 0.261655, heating value, net 11.74 MJ, wet mass 1 kg, water content 0.297017, dry mass 0.771 kg
  note on carbon content, fossil: MSW composition in tab 4.1, ecoinvent v2.2 report 13_I. C content referred to 1 kg DM
- polyurethane, rigid foam: 2590.81 kg; name Purethane; = ( A_polyurethane* Q_av^- B_conventional)* Q_av
  Calculated Value.
  Uncertainty: C
  properties: heating value, net 30.67 MJ, dry mass 1 kg, carbon content, fossil 0.69089, wet mass 1 kg
- concrete, normal: 4496.44 m3; name concrete; = (A_concrete* Q_av^- B_conventional)* Q_av
  Calculated Value.
  Uncertainty: C
  properties: water content 0.086758, dry mass 2190 kg, wet mass 2380 kg
- copper, cathode: 3190.33 kg; name Cu; = (A_Cu* Q_av^- B_conventional)* Q_av
  Calculated Value.
  Uncertainty: C
  properties: dry mass 1 kg, wet mass 1 kg
- aluminium, wrought alloy: 1034.89 kg; name Al; = (A_al* Q_av^- B_conventional)* Q_av
  Calculated Value.
  Uncertainty: C
  properties: wet mass 1 kg, dry mass 1 kg
- waste plastic, mixture: -3213.17 kg; name W_plastics; = (purethane+lldpe)*-1
  Estimation. Based on material input.
  Uncertainty: C
  production volume 973230 kg; name PV_w_plastics; = PV_waterworks*W_plastics/waterworks
    Calculated from production volume of reference product using the relative outputs.
  property price 0 EUR2005; name W_plastics_price_EUR2005
  properties: water content 0.180638, dry mass 0.847 kg, carbon content, fossil 0.747344, wet mass 1 kg, heating value, net 30.79 MJ
- waste reinforcement steel: -380413 kg; name W_reinfSteel; = (reinfsteel)*-1
  Estimation. Based on material input.
  Uncertainty: C
  production volume 1.15222e8 kg; name PV_w_reinfSteel; = PV_waterworks*(W_reinfSteel/waterworks)
    (same comment as for waste reinforced concrete)
  property price 0 EUR2005; name W_reinfSteel_price_EUR2005
  properties: wet mass 1 kg, dry mass 1 kg
- charcoal: 473.91 kg; = ( anthracite* Q_av^- B_conventional)* Q_av
  Calculated Value.
  Uncertainty: C
  properties: wet mass 1 kg, carbon content, non-fossil 0.8, dry mass 1 kg, heating value, net 28.4 MJ
  note on heating value, net: Indicative value. Reference: Fuels - Higher and Lower Calorific Values, available at: https://www.engineeringtoolbox.com/fuels-higher-calorific-values-d_169.html
- waste polyvinylchloride: -17557.5 kg; name W_pvc; = (pvc)*-1
  Estimation. Based on material input.
  Uncertainty: C
  production volume 5.31796e6 kg; name PV_w_pvc; = PV_waterworks*W_pvc/waterworks
    (same comment as for waste reinforced concrete)
  property price 0 EUR2005; name W_pvc_price_EUR2005
  properties: heating value, net 21.51 MJ, wet mass 1 kg, water content 0.00200401, dry mass 0.998 kg, carbon content, fossil 0.440882
  note on carbon content, fossil: C content in 1 kg DM was calculated using data in Tab A.1, ecoinvent v2.2 report 13_I
- reinforcing steel: 380413 kg; name reinfsteel; = (A_reinfsteel* Q_av^- B_conventional)*Q_av
  Calculated Value.
  Uncertainty: C
  properties: dry mass 1 kg, carbon content, fossil 0.004, wet mass 1 kg
- copper scrap, sorted, pressed: -3190.33 kg
  Estimation. Based on material input.
  Uncertainty: C
  production volume 966313 kg
  properties: dry mass 1 kg, wet mass 1 kg
- aluminium scrap, post-consumer: -1034.89 kg
  Estimation. Based on material input.
  Uncertainty: C
  production volume 313457 kg
  properties: wet mass 1 kg, dry mass 1 kg

## Inputs from nature
- Occupation, industrial area [natural resource, land]: 584270 m2*year; = land*lifetime; lognormal variance with pedigree 0.008, pedigree (1,1,4,1,1)
  Calculated Value.
  Uncertainty: C
- Transformation, from unspecified [natural resource, land]: 9737.83 m2; = (A_landuse* Q_av^-B_landuse)* Q_av; lognormal variance with pedigree 0.008, pedigree (1,1,4,1,1)
  Calculated Value.
  Uncertainty: C
- Transformation, to industrial area [natural resource, land]: 9737.83 m2; name land; = (A_landuse* Q_av^-B_landuse)* Q_av; lognormal variance with pedigree 0.008, pedigree (1,1,4,1,1)
  Calculated Value.
  Uncertainty: C

## Sampling procedure
Based on data collection at plant in 2009 and personal communication with the design engineer in 2013. Most data of these data have been published in Bonton, A., Bouchard, C., Barbeau, B., & Jedrzejak, S. (2012). Comparative life cycle assessment of water treatment plants. Desalination, 284, 42-54. Scaling to average size plant was based on economic scaling curve (Kawamura, S., McGivney, W. T. 2008. Cost Estimating Manual for Water Treatment Facilities, Willey, 224p.).

## Extrapolations
This dataset has been extrapolated from year 2009 to the year of the calculation (2021). The uncertainty has been adjusted accordingly.
