# treatment of waste mineral wool, sorting plant

Dataset: EcoSpold 2, unit process
Geography: Europe without Switzerland
Time period: 1994-01-01 to 2021-12-31
Technology level: current
Classification: EcoSpold01Categories: waste management/building demolition
Classification: ISIC rev.4 ecoinvent: 3830:Materials recovery
Tags: Treatment
Scenario: Business-as-Usual
System model: Allocation, cut-off by classification
Generated by: [System]
Database: ecoinvent
isCopyrightProtected: true
accessRestrictedTo: 1

## General comment
The waste contains 1kg inert material (GSD=100%) Waste density is 50 kg/m3.

## Included activities end
particulate matter emissions from dismantling and handling, machines for handling in sorting plant, electricity demand for sorting plant, transport to dismantling facilities, final disposal of waste material,

## Technology
Building demolition with skid-steer loaders. Dry sorting plant for building wastes with pre-sorting of mixed waste, crushing and manual sorting.

## Reference product
- waste mineral wool: -1 kg; name RP; CPC 39990: Other wastes n.e.c.; By-product classification Waste
  Estimated values. Global production volume for mineral fibers is 9 billion kg/year (Buchel at el. 2000, p. 373).
  production volume 8.325e7 kg; name RP_PV; = 9.00E+09/3*0.15*0.37*0.5
    Estimated value. According European Commission (2012) global production volume for mineral fibers is 9 billion kg/year. EU produces approximately a third of global production (Buchel at el. 2000, p. 373) and a waste generation of 15% is assumed (taken from the estimated value for gypsum, source: WRAP "International practice in plasterboard recycling: Canada", n.d).
    Eurostat reports treatment methods for municipal waste for EU 27 in 2010 to be: 23% incineration; 37% landfilling; 25% recycling; 14% compost / digestion.
    PV for collection for final disposal is assumed to be equal to half the PV of treatment in inert waste landfill as it is the only activity treating waste mineral wool, for final disposal. PV for sorting, as no recycling is assumed, the PV is set equal to half of the PV to landfill, therefore it is assumed that half of the waste that is landfilled undergoes sorting first and the rest goes directly to landfill.
    References:
    Buchel, K.H. et al. (2000) Industrial Inorganic Chemistry. Wiley-VCH.
    European Commision (2012) Recommendation from the Scientific Committee on Occupational Exposure Limits for man made-mineral fibres (MMMF) with no indication for carcinogenicity and not specified elsewhere.
    Eurostat. Municipal waste generation & treatment, by treatment method. Retrieved from: <http://ec.europa.eu/eurostat/web/waste/municipal-waste-generation-and-treatment-by-treatment-method>, accessed 7th July 2016
    WRAP (n.d.) International practice in plasterboard recycling: Canada. Retrieved from: http://www.wrap.org.uk/sites/files/wrap/Case%20study%20-%20Plasterboard%20recycling%20in%20Canada.pdf, accessed 3 May 2016
  property price 0 EUR2005; name RP_price_EUR2005
    Waste products are assigned a price of zero as they are assumed to require further treatment.
  property heating value, net 0 MJ
    Non combustible products are assumed to have an LHV equal to zero (0).
  property carbon content 0
    carbon content on a dry matter basis (reserved; not for manual entry)
  properties: water in wet mass 0 kg, water content 0, carbon content, fossil 0, carbon content, non-fossil 0, wet mass 1 kg, dry mass 1 kg, carbon allocation 0 kg

## Inputs from technosphere
- electricity, low voltage: 0.0022 kWh; lognormal variance with pedigree 0.052, pedigree (1,1,5,5,1)
  demand in sorting plant. Uncertainty from range in literature
- excavation, hydraulic digger: 0.0222 m3; lognormal variance with pedigree 0.052, pedigree (1,1,5,5,1)
  handling in sorting plant. Uncertainty from range in literature
- waste mineral wool, for final disposal: -1 kg; name waste_mwool; lognormal variance with pedigree 0.042, pedigree (1,1,5,5,1)
  disposed masses. Uncertainty calculated from uncertainty in transfer coefficients and uncertainty of waste fractions
  production volume 8.325e7 kg; = waste_mwool* RP_PV/ABS( RP)
    Calculated from the production volume of waste mineral wool in proportion to the respective output amounts.
  property price 0 EUR2005; name waste_mwool_price_EUR2005
  properties: wet mass 1 kg, dry mass 1 kg
- sorting facility, for construction waste: 1e-10 unit; lognormal variance with pedigree 0.042, pedigree (1,1,5,5,1)
  Uncertainty heeded in exchanges, 1kg = 1kg

## Emissions to nature
- Particulates, > 2.5 um, and < 10um [air, urban air close to ground]: 6.34e-5 kg; lognormal variance with pedigree 0.1832, pedigree (2,3,5,5,1)
  Emission from dismantling and handling. from one extrapolated PM10 emission factor and generic PM fractions from measurements
- Particulates, < 2.5 um [air, urban air close to ground]: 1.66e-5 kg; lognormal variance with pedigree 0.3632, pedigree (2,3,5,5,1)
  (same comment as for Particulates, > 2.5 um, and < 10um)
- Particulates, > 10 um [air, urban air close to ground]: 8.35e-5 kg; lognormal variance with pedigree 0.0932, pedigree (2,3,5,5,1)
  (same comment as for Particulates, > 2.5 um, and < 10um)

## Sampling procedure
waste-specific calculation based on literature data

## Extrapolations
This dataset has been extrapolated from year 2002 to the year of the calculation (2021). The uncertainty has been adjusted accordingly.
