# petroleum production, onshore

Dataset: EcoSpold 2, unit process
Geography: RME
Time period: 2000-01-01 to 2021-12-31
Technology level: current
Classification: ISIC rev.4 ecoinvent: 0610:Extraction of crude petroleum
Classification: EcoSpold01Categories: oil/production
Tags: ConvertedDataset
Scenario: Business-as-Usual
System model: Allocation, cut-off by classification
Share of production covered: 100 %
Generated by: Niels Jungbluth
Published in: Jungbluth, N. 2007
Database: ecoinvent
isCopyrightProtected: true
accessRestrictedTo: 1

## General comment
Crude oil production in Middle East.
[This dataset was already contained in the ecoinvent database version 2. It was not individually updated during the transfer to ecoinvent version 3. Life Cycle Impact Assessment results may still have changed, as they are affected by changes in the supply chain, i.e. in other datasets. This dataset was generated following the ecoinvent quality guidelines for version 2. It may have been subject to central changes described in the ecoinvent version 3 change report (http://www.ecoinvent.org/database/ecoinvent-version-3/reports-of-changes/), and the results of the central updates were reviewed extensively. The changes added e.g. consistent water flows and other information throughout the database. The documentation of this dataset can be found in the ecoinvent reports of version 2, which are still available via the ecoinvent website. The change report linked above covers all central changes that were made during the conversion process.]

## Included activities end
Production of oil including energy use, infrastructure and emissions.

## Geography
Data for SA, IR, IQ, AE and KW.

## Technology
Onshore crude oil production.

## Time period
Time of statistics.

## Parameters
- fraction, process water, to air: 0.15 dimensionless; name fraction_PW_to_air; lognormal variance with pedigree 0.092025, pedigree (4,4,3,2,4)
  Literature value. In case when no industry/process specific data are available, default evaporation fraction value is used. This value is 15% and is based on literature (Statistics Canada, 2007 & Shaffer, K.H., 2008, Consumptive water use in the Great Lakes Basin, USGS & Shiklomanov, 2003, World Water Resources at the Beginning of the 21st Century) and has been approved by an expert.

## Reference product
- petroleum: 1 kg; name petroleum_RP; CPC 12010: Petroleum oils and oils obtained from bituminous minerals, crude; By-product classification allocatable product; CAS 8002-05-9
  EcoSpold01Location=RME
  production volume 1.18e12 kg; name petroleum_RP_pv
    This represents all the petroleum extracted in RME in 2011 (2011, BP, BP Statistical Review of World Energy June 2011, 3 - SeparatePublication, http://www.bp.com/statisticalreview).
  property carbon content, fossil 0.85
    C-content of crude oil is 83-87% (ecoinven report 6_IV, Tab 3.2). An average C-content of 0.85 kg C/kg crude oil was considered
  property price 0.192 EUR2005
    Temporary price data. Calculated as 90% of purchasers price based on: Crude oil prices from U.S. energy information administration_Independent statistics and analysis: Weekly All Countries Spot Price FOB Weighted by Estimated Export Volume (Dollars per Barrel) (http://tonto.eia.doe.gov/dnav/pet/pet_pri_wco_k_w.htm; accessed 06072010). Conversion factors - 0.159 m3/barrel with crude oil density of 853 kg/m3
  property carbon content 0.85
    carbon content on a dry matter basis (reserved; not for manual entry)
  properties: heating value, net 43.2 MJ, carbon content, non-fossil 0, dry mass 1 kg, water in wet mass 0 kg, wet mass 1 kg, water content 0, carbon allocation 0.85 kg

## Inputs from technosphere
- waste natural gas, sweet: -0.5017 MJ; name waste_NG_sweet; lognormal variance with pedigree 0.0407, pedigree (2,2,5,1,1)
  EcoSpold01Location=GLO
  Literature, average share flaring
  Uncertainty: Literature, average share flaring
  production volume 5.92006e11 MJ; = waste_NG_sweet*petroleum_RP_PV/petroleum_RP
    Calculated from the production volume of petroleum in proportion to the respective output amounts.
  property price 0 EUR2005; name waste_NG_sweet_price_EUR2005
  properties: dry mass 0.0247059 kg, carbon content, fossil 0.589286, wet mass 0.0247059 kg
- pipeline, petroleum: 7.696e-9 km; lognormal variance with pedigree 0.3541, pedigree (3,4,5,3,1)
  Data for RU
  EcoSpold01Location=RER
  Uncertainty: Data for RU
- low level radioactive waste: -2e-7 m3; name LLRW; lognormal variance with pedigree 0.374, pedigree (3,4,5,5,3)
  EcoSpold01Location=CH
  Generic value, basic uncertainty estimated = 3
  Uncertainty: Generic value, basic uncertainty estimated = 3
  production volume 236000 m3; = LLRW*petroleum_RP_PV/petroleum_RP
    (same comment as for waste natural gas, sweet)
  property price 0 EUR2005; name LLRW_price_EUR2005
  properties: dry mass 2500 kg, wet mass 2500 kg
- chemical, organic: 9e-5 kg; lognormal variance with pedigree 0.34, pedigree (1,1,5,1,1)
  EcoSpold01Location=GLO
  Generic value
  properties: dry mass 1 kg, wet mass 1 kg, carbon content, fossil 0.628, heating value, net 19.03 MJ
  note on carbon content, fossil: This dataset is an unweighted average of 20 organic substances (listed in Tab 88.1, ecoinvent v2.2 report 8, part II), being part of the top100 chemicals included in this database. The C-content has also been calculated as an unweighted average of the C content of the substances composing this dataset.
- onshore petroleum field infrastructure: 1.3794e-10 unit; lognormal variance with pedigree 0.3541, pedigree (3,4,5,3,1)
  EcoSpold01Location=GLO
  Data for RU
  Uncertainty: Data for RU
- onshore well, oil/gas: 1.6298e-6 m; lognormal variance with pedigree 0.3427, pedigree (3,3,5,3,1)
  Data for IR
  EcoSpold01Location=GLO
  Uncertainty: Data for IR
- heat, district or industrial, other than natural gas: 0.228 MJ; lognormal variance with pedigree 0.194, pedigree (3,4,5,5,3)
  Generic value, basic uncertainty estimated = 2
  EcoSpold01Location=RER
  Uncertainty: Generic value, basic uncertainty estimated = 2
  properties: heating value, net 1 MJ
- natural gas, vented: 0.0012685 m3; lognormal variance with pedigree 0.16, pedigree (1,1,5,1,1)
  Literature, average share venting
  EcoSpold01Location=GLO
  properties: carbon content, fossil 0.602381, wet mass 0.84 kg, dry mass 0.84 kg, heating value, net 39 MJ
  note on carbon content, fossil: An average C content of 0.506 kg C/ m3 has been assumed (this average has been calculated using data in Tab 3.5, ecoinvent v2.2 report 6_V
  note on heating value, net: Literature value, Source: United Nations Statistics Division (2018) International Recommendations for Energy Statistics (IRES). Available at: http://unstats.un.org/unsd/statcom/doc11/BG-IRES.pdf.
- municipal solid waste: -0.0001 kg; name MSW; lognormal variance with pedigree 0.374, pedigree (3,4,5,5,3)
  (same comment as for low level radioactive waste)
  production volume 1.18e8 kg; = MSW*petroleum_RP_PV/petroleum_RP
    (same comment as for waste natural gas, sweet)
  properties: heating value, net 11.74 MJ, carbon content, fossil 0.171549, wet mass 1 kg, carbon content, non-fossil 0.261655, water content 0.297017, dry mass 0.771 kg
  note on heating value, net: Value taken from the general comment of the treatment dataset.
  note on carbon content, fossil: MSW composition in tab 4.1, ecoinvent v2.2 report 13_I. C content referred to 1 kg DM
- diesel, burned in diesel-electric generating set, 10MW: 0.347 MJ; lognormal variance with pedigree 0.34, pedigree (1,1,5,1,1)
  EcoSpold01Location=GLO
  Generic value
  properties: heating value, net 1 MJ
- chemical, inorganic: 0.00012 kg; lognormal variance with pedigree 0.34, pedigree (1,1,5,1,1)
  EcoSpold01Location=GLO
  Generic value
  properties: carbon content, fossil 0.003, wet mass 1 kg, dry mass 1 kg
  note on carbon content, fossil: This dataset is an unweighted average of 20 inorganic substances (listed in Tab 88.1, ecoinvent v2.2 report 8, part II), being part of the top100 chemicals included in this database. The C-content has also been calculated as an unweighted average of the C content of the substances composing this dataset.
- water discharge from petroleum/natural gas extraction, onshore: -0.42493 kg; name water_discharge_onshore; lognormal variance with pedigree 0.194, pedigree (3,4,5,5,3)
  Generic value, basic uncertainty estimated = 2
  EcoSpold01Location=GLO
  Uncertainty: Generic value, basic uncertainty estimated = 2
  production volume 5.01417e11 kg; = water_discharge_onshore*petroleum_RP_PV/petroleum_RP
    (same comment as for waste natural gas, sweet)
  property price 0 EUR2005; name water_discharge_onshore_price_EUR2005
  properties: wet mass 1 kg, dry mass 0.0848608 kg, carbon content, non-fossil 0.00101223, carbon content, fossil 0.00168491, water content 10.784

## Inputs from nature
- Water, unspecified natural origin [natural resource, in water]: 0.0040902 m3; name water_UNO_input; lognormal variance with pedigree 0.0441, pedigree (3,4,5,3,1)
  Assumption from RAF
  Uncertainty: Assumption from RAF
- Oil, crude, in ground [natural resource, in ground]: 1 kg; lognormal variance with pedigree 0.04, pedigree (1,1,5,1,1)
  Calculation
  Uncertainty: Calculation

## Emissions to nature
- Nitrogen [water, surface water]: 8.2066e-9 kg; lognormal variance with pedigree 0.0901, pedigree (3,5,5,3,1)
  Extrapolation for sum parameter
  Uncertainty: Extrapolation for sum parameter
- NMVOC, non-methane volatile organic compounds, unspecified origin [air, non-urban air or from high stacks]: 7.5e-5 kg; lognormal variance with pedigree 0.5, pedigree (5,5,5,5,5)
  Generic value, basic uncertainty estimated = 3
  Uncertainty: Generic value, basic uncertainty estimated = 3
- AOX, Adsorbable Organic Halogen as Cl [water, surface water]: 1.0942e-10 kg; lognormal variance with pedigree 0.0901, pedigree (3,5,5,3,1)
  Extrapolation for sum parameter
  Uncertainty: Extrapolation for sum parameter
- DOC, Dissolved Organic Carbon [water, surface water]: 9.1914e-6 kg; lognormal variance with pedigree 0.0901, pedigree (3,5,5,3,1)
  Extrapolation for sum parameter
  Uncertainty: Extrapolation for sum parameter
- Methane, fossil [air, non-urban air or from high stacks]: 2.5e-5 kg; lognormal variance with pedigree 0.5, pedigree (5,5,5,5,5)
  (same comment as for NMVOC, non-methane volatile organic compounds, unspecified origin)
- Water [air, unspecified]: 0.00061353 m3; name water_to_air_unspecified; = (water_UNO_input*fraction_PW_to_air); lognormal variance with pedigree 0.0807, pedigree (2,2,5,1,1)
  Calculated value based on literature values and expert opinion. See comments in the parametres' comment field.
  property fraction, origin: unspecified 1; name fraction_origin_unspecified
  property fraction, origin: fresh water 0; name fraction_origin_fresh_water
  property fraction, origin: salt water 0; name fraction_origin_salt_water
- Methane, bromotrifluoro-, Halon 1301 [air, non-urban air or from high stacks]: 5.82e-8 kg; lognormal variance with pedigree 0.374, pedigree (3,4,5,5,3)
  (same comment as for NMVOC, non-methane volatile organic compounds, unspecified origin)
- Water [water, unspecified]: 0.00347667 m3; name water_to_water_unspecified; = water_UNO_input*(1-fraction_PW_to_air); lognormal variance with pedigree 0.0807, pedigree (2,2,5,1,1)
  (same comment as for Water)
  property dry mass 0 kg; name DM
  property fraction, origin: salt water 0; name fraction_origin_salt_water_Ww
  property fraction, origin: unspecified 1; name fraction_origin_unspecified_Ww
  property wet mass 1000 kg; name WM
  property carbon content, non-fossil 0; name C_content_non_fossil
  property fraction, origin: fresh water 0; name fraction_origin_fresh_water_Ww
  property carbon content, fossil 0; name C_content_fossil
  property water in wet mass 1000 kg; name WWM
- TOC, Total Organic Carbon [water, surface water]: 9.1914e-6 kg; lognormal variance with pedigree 0.0901, pedigree (3,5,5,3,1)
  Extrapolation for sum parameter
  Uncertainty: Extrapolation for sum parameter
- COD, Chemical Oxygen Demand [water, surface water]: 3.3486e-5 kg; lognormal variance with pedigree 0.0901, pedigree (3,5,5,3,1)
  Extrapolation for sum parameter
  Uncertainty: Extrapolation for sum parameter
- Sulfur [water, surface water]: 2.8449e-8 kg; lognormal variance with pedigree 0.0901, pedigree (3,5,5,3,1)
  Extrapolation for sum parameter
  Uncertainty: Extrapolation for sum parameter
- BOD5, Biological Oxygen Demand [water, surface water]: 3.3486e-5 kg; lognormal variance with pedigree 0.0901, pedigree (3,5,5,3,1)
  Extrapolation for sum parameter
  Uncertainty: Extrapolation for sum parameter
- Oils, unspecified [water, surface water]: 1.0623e-5 kg; lognormal variance with pedigree 0.0941, pedigree (3,4,5,3,1)
  Data for NG
  Uncertainty: Data for NG

## Sampling procedure
Statistics and generic assumptions from literature.

## Extrapolations
This dataset has been extrapolated from year 2000 to the year of the calculation (2021). The uncertainty has been adjusted accordingly.

## Review by Emilia Moreno Ruiz 2014-06-21
PV adjusted

## Review by Emilia Moreno Ruiz 2017-09-06
PV adjsuted

## Review by Michael Spielmann (obsolete) 2005-07-19
passed
