# treatment of waste plastic, mixture, unsanitary landfill, moist infiltration class (300mm)

Dataset: EcoSpold 2, unit process
Geography: GLO
Time period: 2006-01-01 to 2021-12-31
Technology level: current
Classification: ISIC rev.4 ecoinvent: 3821:Treatment and disposal of non-hazardous waste
Synonyms: municipal waste landfill
Scenario: Business-as-Usual
System model: Allocation, cut-off by classification
Share of production covered: 1 %
Generated by: Avraam Symeonidis
Database: ecoinvent
isCopyrightProtected: true
accessRestrictedTo: 1

## General comment
This dataset represents the activity of waste disposal of waste plastic, mixture in a unsanitary landfill. Recommended use of this dataset: For plastic mixture, which goes to disposal as part of managed communal waste mixture. // Waste composition (wet, in ppm): upper heating value 34.05 MJ/kg; lower heating value 30.79 MJ/kg; H2O 153000; O 73717; H 105910; C 633590; S 1406.7; N 6112; P n.a.; B n.a.; Cl 18131; Br 65.319; F 13.717; I n.a.; Ag n.a.; As 1.7729; Ba 174.03; Cd 75.786; Co 29.478; Cr 38.132; Cu 296.41; Hg 0.79234; Mn 74.574; Mo n.a.; Ni 19.222; Pb 435.81; Sb 40.093; Se 1.9596; Sn 24.453; V 268.88; Zn 521.69; Be 0.46656; Sc n.a.; Sr 82.582; Ti 933.13; Tl 0.37325; W n.a.; Si n.a.; Fe 3476.5; Ca n.a.; Al 186.63; K n.a.; Mg n.a.; Na 1367.5; . // Share of carbon in waste that is biogenic 0%. Share of metals in waste not oxidised and bulk-recyclable (exclude very small or thin parts) Iron: 0%; Alu: 0%; Copper: 0%. Overall degradability of waste during 100 years: 1%.

## Included activities start
from final waste deposition (without transports to the site)

## Included activities end
Waste-specific short-term emissions to air via landfill gas and landfill leachate. Waste-specific long-term emissions from landfill.

## Geography
Given name of landfill location is 'infiltration class 3 moist (2018)'. Landfill site with mean annual temperature (MAT) of 8 degC, mean annual precipitation (MAP) of 900 mm/year, and net infiltration of 300 mm/year.
Climate adjustments result in an alpha t (temperature) for permafrost areas of 0.999. Total climate adjustments with alpha pt of 0.999.

## Technology
This is an inventory for an unsanitary, sub-controlled landfill for municipal solid waste. Ultimate average landfill height is 15 meters. Operation phase duration is 25 years.Percentage of landfill gas directly emitted is 100w%.
Leachate of the landfill is not treated. Based on average waste composition and climate data the end of carbonate phase is estimated to be reached 5581 years after waste deposition.

## Reference product
- waste plastic, mixture: -1 kg; By-product classification Waste; CPC 39270: Waste, parings and scrap of plastics; pedigree (1,1,1,1,1)
  main reference product of this activity (supply of disposal service).
  Uncertainty: Uncertainty is not adjusted, as this is the refence product
  production volume 1 kg
    The amount of the annual production volume is a placeholder value. The contribution of this technology to the different local markets can be found in the markets themselves.
  property price 0 EUR2005
    Waste products are assigned a price of zero as they are assumed to require further treatment.
  property heating value, net 30.79 MJ
    Value taken from the general comment of the treatment dataset.
  property carbon content 0.74805
    carbon content on a dry matter basis (reserved; not for manual entry)
  properties: wet mass 1 kg, dry mass 0.847 kg, water in wet mass 0.153 kg, nickel content 2.2694e-5, vanadium content 0.00031745, hydrogen content 0.12504, bromine content 7.7118e-5, nitrogen content 0.007216, chromium content 4.502e-5, sodium content 0.0016145, aluminium content 0.00022034, mercury content 9.3547e-7, beryllium content 5.5084e-7, carbon content, fossil 0.74805, barium content 0.00020546, cobalt content 3.4802e-5, water content 0.18064, cadmium content 8.9476e-5, selenium content 2.3135e-6, strontium content 9.7499e-5, antimony content 4.7336e-5, zinc content 0.00061593, chlorine content 0.021406, titanium content 0.0011017, sulfur content 0.0016609, thallium content 4.4067e-7, manganese content 8.8045e-5, tin content 2.887e-5, lead content 0.00051454, fluorine content 1.6195e-5, copper content 0.00034995, arsenic content 2.0932e-6, iron content 0.0041045, oxygen content 0.087033, heating value, gross 34.054 MJ, carbon allocation 0.633598 kg

## Inputs from technosphere
- excavation, skid-steer loader: 0.00031708 m3; lognormal variance with pedigree 0.088256, pedigree (1,1,4,1,1)
  application of daily cover.
  Uncertainty: Uncertainty calculated from uncertainty in base parameters.
- diesel, burned in building machine: 0.046738 MJ; lognormal variance with pedigree 0.088256, pedigree (1,1,4,1,1)
  for waste distribution and compaction.
  Uncertainty: Uncertainty calculated from uncertainty in base parameters.
  properties: heating value, net 1 MJ

## Inputs from nature
- Occupation, dump site [natural resource, land]: 0.0023333 m2*year; lognormal variance with pedigree 0.088256, pedigree (1,1,4,1,1)
  for landfill operation phase and spontaneous renaturation.
  Uncertainty: Uncertainty calculated from uncertainty in base parameters.

## Emissions to nature
- Beryllium [water, ground-, long-term]: 4.6629e-7 kg; lognormal variance with pedigree 0.42494, pedigree (1,1,4,1,1)
  Emissions from long-term leachate (>100a) directly from MSW landfill and indirectly via incineration of treatement sludge from leachate treatement.
  Uncertainty: Uncertainty calculated depending on waste input and uncertainty of long-term transfer coefficents in landfill.
- Heat, waste [soil, industrial]: 0.23755 MJ; lognormal variance with pedigree 0.075859, pedigree (1,1,4,1,1)
  burden from short-term decomposition of waste (0-100a).
  Uncertainty: Uncertainty calculated from unertainty of the waste composition of this waste, uncertainty in waste decomposition and short-term leaching in landfill
- Vanadium, ion [water, ground-, long-term]: 9.0792e-5 kg; lognormal variance with pedigree 0.28928, pedigree (1,1,4,1,1)
  (same comment as for Beryllium)
- Heat, waste [water, ground-, long-term]: 33.714 MJ; lognormal variance with pedigree 0.020651, pedigree (1,1,4,1,1)
  burden from long-term decomposition of waste (>100a).
  Uncertainty: Uncertainty calculated from unertainty of the waste composition of this waste, uncertainty in waste decomposition and short-term leaching in landfill
- Zinc, ion [water, ground-, long-term]: 0.00052145 kg; lognormal variance with pedigree 0.19373, pedigree (1,1,4,1,1)
  (same comment as for Beryllium)
- BOD5, Biological Oxygen Demand [water, ground-]: 4.7727e-5 kg; lognormal variance with pedigree 0.21318, pedigree (1,1,4,1,1)
  burden from short-term leachate to groundwater in uncontrolled landfill in moist cimate.
  Uncertainty: Uncertainty calculated from unertainty of the waste composition of this waste, uncertainty in waste decomposition and short-term leaching in landfill
- Selenium [water, ground-, long-term]: 6.4129e-7 kg; lognormal variance with pedigree 0.45644, pedigree (1,1,4,1,1)
  (same comment as for Beryllium)
- Sodium [air, non-urban air or from high stacks]: 1.4131e-8 kg; lognormal variance with pedigree 0.47611, pedigree (1,1,4,1,1)
  burden from direct release or incineration of landfill biogas; or windblown leachate evaporite in arid climates.
  Uncertainty: Uncertainty calculated from unertainty of the waste composition of this waste, uncertainty in waste decomposition and short-term leaching in landfill
- Antimony [water, ground-, long-term]: 4.7645e-6 kg; lognormal variance with pedigree 0.56243, pedigree (1,1,4,1,1)
  (same comment as for Beryllium)
- Aluminium [air, non-urban air or from high stacks]: 2.3295e-11 kg; lognormal variance with pedigree 0.68407, pedigree (1,1,4,1,1)
  (same comment as for Sodium)
- Tin, ion [water, ground-, long-term]: 2.4452e-5 kg; lognormal variance with pedigree 0.29535, pedigree (1,1,4,1,1)
  (same comment as for Beryllium)
- Thallium [air, non-urban air or from high stacks]: 5.4185e-14 kg; lognormal variance with pedigree 0.88365, pedigree (1,1,4,1,1)
  (same comment as for Sodium)
- Sodium, ion [water, ground-]: 5.6524e-5 kg; lognormal variance with pedigree 0.2136, pedigree (1,1,4,1,1)
  (same comment as for BOD5, Biological Oxygen Demand)
- Lead [water, ground-, long-term]: 0.00043579 kg; lognormal variance with pedigree 0.19966, pedigree (1,1,4,1,1)
  (same comment as for Beryllium)
- Iron [air, non-urban air or from high stacks]: 1.1924e-10 kg; lognormal variance with pedigree 0.62904, pedigree (1,1,4,1,1)
  (same comment as for Sodium)
- Aluminium [water, ground-]: 9.3179e-8 kg; lognormal variance with pedigree 0.41362, pedigree (1,1,4,1,1)
  (same comment as for BOD5, Biological Oxygen Demand)
- Nickel, ion [water, ground-, long-term]: 1.921e-5 kg; lognormal variance with pedigree 0.30334, pedigree (1,1,4,1,1)
  (same comment as for Beryllium)
- Strontium [air, non-urban air or from high stacks]: 1.1988e-11 kg; lognormal variance with pedigree 0.70643, pedigree (1,1,4,1,1)
  (same comment as for Sodium)
- Thallium [water, ground-]: 2.1674e-10 kg; lognormal variance with pedigree 0.61301, pedigree (1,1,4,1,1)
  (same comment as for BOD5, Biological Oxygen Demand)
- Manganese [water, ground-, long-term]: 7.372e-5 kg; lognormal variance with pedigree 0.25828, pedigree (1,1,4,1,1)
  (same comment as for Beryllium)
- Beryllium [air, non-urban air or from high stacks]: 6.7732e-14 kg; lognormal variance with pedigree 0.87649, pedigree (1,1,4,1,1)
  (same comment as for Sodium)
- Titanium, ion [water, ground-]: 4.6589e-7 kg; lognormal variance with pedigree 0.36052, pedigree (1,1,4,1,1)
  (same comment as for BOD5, Biological Oxygen Demand)
- Mercury [water, ground-, long-term]: 7.9158e-7 kg; lognormal variance with pedigree 0.40788, pedigree (1,1,4,1,1)
  (same comment as for Beryllium)
- Titanium [air, non-urban air or from high stacks]: 1.1647e-10 kg; lognormal variance with pedigree 0.63097, pedigree (1,1,4,1,1)
  (same comment as for Sodium)
- Iron, ion [water, ground-]: 4.7695e-7 kg; lognormal variance with pedigree 0.3608, pedigree (1,1,4,1,1)
  (same comment as for BOD5, Biological Oxygen Demand)
- Chromium VI [water, ground-, long-term]: 2.0687e-7 kg; lognormal variance with pedigree 1.9815, pedigree (1,1,4,1,1)
  (same comment as for Beryllium)
- Tin [air, non-urban air or from high stacks]: 3.598e-13 kg; lognormal variance with pedigree 0.8181, pedigree (1,1,4,1,1)
  (same comment as for Sodium)
- Strontium [water, ground-]: 4.7954e-8 kg; lognormal variance with pedigree 0.43579, pedigree (1,1,4,1,1)
  (same comment as for BOD5, Biological Oxygen Demand)
- Cobalt [water, ground-, long-term]: 2.9383e-5 kg; lognormal variance with pedigree 0.28915, pedigree (1,1,4,1,1)
  (same comment as for Beryllium)
- Vanadium [air, non-urban air or from high stacks]: 7.0802e-11 kg; lognormal variance with pedigree 0.64834, pedigree (1,1,4,1,1)
  (same comment as for Sodium)
- Beryllium [water, ground-]: 2.7093e-10 kg; lognormal variance with pedigree 0.60586, pedigree (1,1,4,1,1)
  (same comment as for BOD5, Biological Oxygen Demand)
- Copper, ion [water, ground-, long-term]: 0.0002964 kg; lognormal variance with pedigree 0.21241, pedigree (1,1,4,1,1)
  (same comment as for Beryllium)
- Zinc [air, non-urban air or from high stacks]: 5.4855e-11 kg; lognormal variance with pedigree 0.65544, pedigree (1,1,4,1,1)
  (same comment as for Sodium)
- Vanadium, ion [water, ground-]: 2.8321e-7 kg; lognormal variance with pedigree 0.37717, pedigree (1,1,4,1,1)
  (same comment as for BOD5, Biological Oxygen Demand)
- Cadmium, ion [water, ground-, long-term]: 7.5652e-5 kg; lognormal variance with pedigree 0.25773, pedigree (1,1,4,1,1)
  (same comment as for Beryllium)
- Selenium [air, non-urban air or from high stacks]: 5.16e-13 kg; lognormal variance with pedigree 0.81119, pedigree (1,1,4,1,1)
  (same comment as for Sodium)
- Zinc, ion [water, ground-]: 2.4685e-7 kg; lognormal variance with pedigree 0.38135, pedigree (1,1,4,1,1)
  (same comment as for BOD5, Biological Oxygen Demand)
- Barium [water, ground-, long-term]: 0.00017204 kg; lognormal variance with pedigree 0.23008, pedigree (1,1,4,1,1)
  (same comment as for Beryllium)
- Lead [air, non-urban air or from high stacks]: 8.5494e-12 kg; lognormal variance with pedigree 0.71358, pedigree (1,1,4,1,1)
  (same comment as for Sodium)
- Selenium [water, ground-]: 2.064e-9 kg; lognormal variance with pedigree 0.54002, pedigree (1,1,4,1,1)
  (same comment as for BOD5, Biological Oxygen Demand)
- Arsenic, ion [water, ground-, long-term]: 1.7697e-6 kg; lognormal variance with pedigree 0.38175, pedigree (1,1,4,1,1)
  (same comment as for Beryllium)
- Antimony [air, non-urban air or from high stacks]: 1.0558e-11 kg; lognormal variance with pedigree 0.71162, pedigree (1,1,4,1,1)
  (same comment as for Sodium)
- Tin, ion [water, ground-]: 1.4392e-9 kg; lognormal variance with pedigree 0.55179, pedigree (1,1,4,1,1)
  (same comment as for BOD5, Biological Oxygen Demand)
- Bromine [water, ground-, long-term]: 6.3653e-5 kg; lognormal variance with pedigree 0.2627, pedigree (1,1,4,1,1)
  (same comment as for Beryllium)
- Nickel [air, non-urban air or from high stacks]: 2.7904e-12 kg; lognormal variance with pedigree 0.75489, pedigree (1,1,4,1,1)
  (same comment as for Sodium)
- Antimony [water, ground-]: 4.223e-8 kg; lognormal variance with pedigree 0.44045, pedigree (1,1,4,1,1)
  (same comment as for BOD5, Biological Oxygen Demand)
- Fluoride [water, ground-, long-term]: 1.3655e-5 kg; lognormal variance with pedigree 0.31452, pedigree (1,1,4,1,1)
  (same comment as for Beryllium)
- Mercury [air, non-urban air or from high stacks]: 2.1685e-10 kg; lognormal variance with pedigree 0.6135, pedigree (1,1,4,1,1)
  (same comment as for Sodium)
- Lead [water, ground-]: 2.5648e-8 kg; lognormal variance with pedigree 0.4561, pedigree (1,1,4,1,1)
  (same comment as for BOD5, Biological Oxygen Demand)
- Chloride [water, ground-, long-term]: 0.017668 kg; lognormal variance with pedigree 0.08244, pedigree (1,1,4,1,1)
  (same comment as for Beryllium)
- Manganese [air, non-urban air or from high stacks]: 2.1327e-10 kg; lognormal variance with pedigree 0.61421, pedigree (1,1,4,1,1)
  (same comment as for Sodium)
- Nickel, ion [water, ground-]: 1.1162e-8 kg; lognormal variance with pedigree 0.48425, pedigree (1,1,4,1,1)
  (same comment as for BOD5, Biological Oxygen Demand)
- Nitrogen, organic bound [water, ground-, long-term]: 0.0039716 kg; lognormal variance with pedigree 0.11481, pedigree (1,1,4,1,1)
  (same comment as for Beryllium)
- Chromium [air, non-urban air or from high stacks]: 1.0853e-12 kg; lognormal variance with pedigree 0.78303, pedigree (1,1,4,1,1)
  (same comment as for Sodium)
- Mercury [water, ground-]: 5.4212e-10 kg; lognormal variance with pedigree 0.58344, pedigree (1,1,4,1,1)
  (same comment as for BOD5, Biological Oxygen Demand)
- Nitrite [water, ground-, long-term]: 0.00013226 kg; lognormal variance with pedigree 0.11481, pedigree (1,1,4,1,1)
  (same comment as for Beryllium)
- Copper [air, non-urban air or from high stacks]: 4.1422e-12 kg; lognormal variance with pedigree 0.73674, pedigree (1,1,4,1,1)
  (same comment as for Sodium)
- Manganese [water, ground-]: 8.5308e-7 kg; lognormal variance with pedigree 0.34542, pedigree (1,1,4,1,1)
  (same comment as for BOD5, Biological Oxygen Demand)
- Nitrate [water, ground-, long-term]: 0.00025555 kg; lognormal variance with pedigree 0.11481, pedigree (1,1,4,1,1)
  (same comment as for Beryllium)
- Cobalt [air, non-urban air or from high stacks]: 2.3659e-11 kg; lognormal variance with pedigree 0.68622, pedigree (1,1,4,1,1)
  (same comment as for Sodium)
- Chromium VI [water, ground-]: 4.3414e-9 kg; lognormal variance with pedigree 0.51518, pedigree (1,1,4,1,1)
  (same comment as for BOD5, Biological Oxygen Demand)
- Hydrogen sulfide [water, ground-, long-term]: 0.00010202 kg; lognormal variance with pedigree 0.16131, pedigree (1,1,4,1,1)
  (same comment as for Beryllium)
- Cadmium [air, non-urban air or from high stacks]: 8.8797e-10 kg; lognormal variance with pedigree 0.56749, pedigree (1,1,4,1,1)
  (same comment as for Sodium)
- Copper, ion [water, ground-]: 1.4498e-8 kg; lognormal variance with pedigree 0.47497, pedigree (1,1,4,1,1)
  (same comment as for BOD5, Biological Oxygen Demand)
- Ammonium, ion [water, ground-, long-term]: 0.00243 kg; lognormal variance with pedigree 0.11481, pedigree (1,1,4,1,1)
  (same comment as for Beryllium)
- Arsenic [air, non-urban air or from high stacks]: 4.4589e-11 kg; lognormal variance with pedigree 0.66632, pedigree (1,1,4,1,1)
  (same comment as for Sodium)
- Cobalt [water, ground-]: 9.4634e-8 kg; lognormal variance with pedigree 0.41508, pedigree (1,1,4,1,1)
  (same comment as for BOD5, Biological Oxygen Demand)
- Sulfate [water, ground-, long-term]: 0.0039137 kg; lognormal variance with pedigree 0.16131, pedigree (1,1,4,1,1)
  (same comment as for Beryllium)
- Hydrogen fluoride [air, non-urban air or from high stacks]: 5.4613e-8 kg; lognormal variance with pedigree 0.43532, pedigree (1,1,4,1,1)
  (same comment as for Sodium)
- Barium [water, ground-]: 1.9908e-6 kg; lognormal variance with pedigree 0.31723, pedigree (1,1,4,1,1)
  (same comment as for BOD5, Biological Oxygen Demand)
- TOC, Total Organic Carbon [water, ground-, long-term]: 0.62727 kg; lognormal variance with pedigree 0.0095771, pedigree (1,1,4,1,1)
  (same comment as for Beryllium)
- Barium [air, non-urban air or from high stacks]: 4.9769e-10 kg; lognormal variance with pedigree 0.58602, pedigree (1,1,4,1,1)
  (same comment as for Sodium)
- Cadmium, ion [water, ground-]: 1.332e-7 kg; lognormal variance with pedigree 0.40278, pedigree (1,1,4,1,1)
  (same comment as for BOD5, Biological Oxygen Demand)
- DOC, Dissolved Organic Carbon [water, ground-, long-term]: 0.62727 kg; lognormal variance with pedigree 0.0095771, pedigree (1,1,4,1,1)
  (same comment as for Beryllium)
- Bromine [air, non-urban air or from high stacks]: 2.3032e-8 kg; lognormal variance with pedigree 0.45996, pedigree (1,1,4,1,1)
  (same comment as for Sodium)
- Fluoride [water, ground-]: 1.0065e-8 kg; lognormal variance with pedigree 0.4878, pedigree (1,1,4,1,1)
  (same comment as for BOD5, Biological Oxygen Demand)
- COD, Chemical Oxygen Demand [water, ground-, long-term]: 0.68607 kg; lognormal variance with pedigree 0.0095771, pedigree (1,1,4,1,1)
  (same comment as for Beryllium)
- Hydrogen chloride [air, non-urban air or from high stacks]: 6.5732e-6 kg; lognormal variance with pedigree 0.2797, pedigree (1,1,4,1,1)
  (same comment as for Sodium)
- Chloride [water, ground-]: 0.00045603 kg; lognormal variance with pedigree 0.14708, pedigree (1,1,4,1,1)
  (same comment as for BOD5, Biological Oxygen Demand)
- BOD5, Biological Oxygen Demand [water, ground-, long-term]: 0.16242 kg; lognormal variance with pedigree 0.0095771, pedigree (1,1,4,1,1)
  (same comment as for Beryllium)
- Methane, fossil [air, non-urban air or from high stacks]: 0.0045836 kg; lognormal variance with pedigree 0.11263, pedigree (1,1,4,1,1)
  burden from direct release or incineration of landfill biogas.
  Uncertainty: Uncertainty calculated from unertainty of the waste composition of this waste, uncertainty in waste decomposition and short-term leaching in landfill
- Arsenic, ion [water, ground-]: 3.1807e-9 kg; lognormal variance with pedigree 0.52614, pedigree (1,1,4,1,1)
  (same comment as for BOD5, Biological Oxygen Demand)
- Nitrogen oxides [air, non-urban air or from high stacks]: 8.3727e-8 kg; lognormal variance with pedigree 0.27374, pedigree (1,1,4,1,1)
  (same comment as for Methane, fossil)
- Bromine [water, ground-]: 1.6429e-6 kg; lognormal variance with pedigree 0.32734, pedigree (1,1,4,1,1)
  (same comment as for BOD5, Biological Oxygen Demand)
- Sulfur dioxide [air, non-urban air or from high stacks]: 1.8336e-6 kg; lognormal variance with pedigree 0.33845, pedigree (1,1,4,1,1)
  (same comment as for Methane, fossil)
- Nitrate [water, ground-]: 6.1173e-6 kg; lognormal variance with pedigree 0.18152, pedigree (1,1,4,1,1)
  (same comment as for BOD5, Biological Oxygen Demand)
- Sodium, ion [water, ground-, long-term]: 0.001311 kg; lognormal variance with pedigree 0.16227, pedigree (1,1,4,1,1)
  (same comment as for Beryllium)
- Nitrite [water, ground-]: 3.1659e-6 kg; lognormal variance with pedigree 0.18152, pedigree (1,1,4,1,1)
  (same comment as for BOD5, Biological Oxygen Demand)
- Aluminium [water, ground-, long-term]: 0.00018653 kg; lognormal variance with pedigree 0.22776, pedigree (1,1,4,1,1)
  (same comment as for Beryllium)
- Nitrogen, organic bound [water, ground-]: 9.5071e-5 kg; lognormal variance with pedigree 0.18152, pedigree (1,1,4,1,1)
  (same comment as for BOD5, Biological Oxygen Demand)
- Carbon dioxide, fossil [air, non-urban air or from high stacks]: 0.0099236 kg; lognormal variance with pedigree 0.102501, pedigree (1,1,4,1,1)
  (same comment as for Methane, fossil)
- Hydrogen sulfide [water, ground-]: 3.8114e-7 kg; lognormal variance with pedigree 0.28263, pedigree (1,1,4,1,1)
  (same comment as for BOD5, Biological Oxygen Demand)
- Sulfate [water, ground-]: 1.4621e-5 kg; lognormal variance with pedigree 0.28263, pedigree (1,1,4,1,1)
  (same comment as for BOD5, Biological Oxygen Demand)
- Iron, ion [water, ground-, long-term]: 0.003476 kg; lognormal variance with pedigree 0.13237, pedigree (1,1,4,1,1)
  (same comment as for Beryllium)
- Ammonium, ion [water, ground-]: 5.8168e-5 kg; lognormal variance with pedigree 0.18152, pedigree (1,1,4,1,1)
  (same comment as for BOD5, Biological Oxygen Demand)
- Strontium [water, ground-, long-term]: 8.2534e-5 kg; lognormal variance with pedigree 0.25488, pedigree (1,1,4,1,1)
  (same comment as for Beryllium)
- TOC, Total Organic Carbon [water, ground-]: 0.00018432 kg; lognormal variance with pedigree 0.21318, pedigree (1,1,4,1,1)
  (same comment as for BOD5, Biological Oxygen Demand)
- Titanium, ion [water, ground-, long-term]: 0.00093266 kg; lognormal variance with pedigree 0.17466, pedigree (1,1,4,1,1)
  (same comment as for Beryllium)
- DOC, Dissolved Organic Carbon [water, ground-]: 0.00018432 kg; lognormal variance with pedigree 0.21318, pedigree (1,1,4,1,1)
  (same comment as for BOD5, Biological Oxygen Demand)
- Thallium [water, ground-, long-term]: 3.7303e-7 kg; lognormal variance with pedigree 0.4321, pedigree (1,1,4,1,1)
  (same comment as for Beryllium)
- COD, Chemical Oxygen Demand [water, ground-]: 0.0002016 kg; lognormal variance with pedigree 0.21318, pedigree (1,1,4,1,1)
  (same comment as for BOD5, Biological Oxygen Demand)

## Extrapolations
This dataset has been extrapolated from year 2012 to the year of the calculation (2021). The uncertainty has been adjusted accordingly.
