# hard coal preparation

Dataset: EcoSpold 2, unit process
Geography: IN
Time period: 2006-01-01 to 2021-01-01
Technology level: current
Classification: ISIC rev.4 ecoinvent: 0510:Mining of hard coal
Synonyms: Coal Washery
Scenario: Business-as-Usual
System model: Allocation, cut-off by classification
Share of production covered: 1 %
Generated by: P V Kiran Ananth
Published in: P V Kiran Ananth 2017
Database: ecoinvent
isCopyrightProtected: true
accessRestrictedTo: 1

## General comment
Coal is the most important and abundant fossil fuel in India. It accounts for 55% of the country's
energy need.
Coal Preparation: The high ash content in coal can be reduced to a desired level by simple washing processes. The use of
washed coal having lower ash content and higher heat value in power generation results in more
efficient combustion; reduced CO2 emissions and other economic benefits for the generating
company
A coal preparation plant (CPP) is a facility which washes coal of soil and rock, crushes it into graded sized chunks (sorting), stockpiles grades preparing. A CPP may also be called a coal handling and preparation plant (CHPP), The more of this waste material that can be removed from coal, and lower its total ash content. The greater its
market value and lower its transportation costs.
The total installed capacity of washeries in india 131.24 million tonnes per year.
Coal India Limited operates 15 washeies in India with installed capacity of 36.8 Million tonnes per annum
ACB (India) Limited, along with its subsidiaries and associates, is largest and most efficient coal washery company in the private sector with an aggregate designed beneficiation capacity, on a proportional basis, of 65.61 million tons per annum
The total production of washed coal or prepared coal is only 23.301 million tonnes which is very less when compared to overall production of coal from coal mines (639.234 million tonnes). This shows that very less quantity of coal is being used in preparation plants and most of the coal is directly used from coal mines
The values for emissions to air and water (waste water quantityt is included in the dataset) have not been covered in this dataset. The emission values for coal mining in india have been taken from the global datsets which cover both the mining as well as preparation , hence to avoid any kind of double accounting the same have not been used in this dataset.

## Included activities start
Activity begins with 1 kg hard coal (run of mine) at the coal preparation plant. Only inputs have been included in the datasets. The emissions (other than that of waste water) have been included in the hard coal mine operation datasets because these could not be separated out from the global estimated which were used for the datasets becuase of unavailability of India specific emissions.

## Included activities end
Activity ends with production of 1 kg of washed coal at coal washery

## Geography
The major washeries in india are located in the states of Jharkhund , Chattisgarh

## Technology
The data presented here represents the current technology levels for coal preparation in the country.

## Time period
Data is collected over the years 2006-2016. The data has been collected from various environmental statements of various coal washeries in India. Some of the other publically available documents like provisional coal statistics 2015 - 16 have been used for collection of data required for the dataset

## Reference product
- hard coal: 1 kg; name hard_coal; CPC 11010: Hard coal; By-product classification allocatable product
  The hard coal from mine includes the total hard coal produced from washing process as well as the middlings produced during the process. The middlings have been merged with the main product by averaging the properties for the same, Further the other remaining exchanges scaled down accordingly.
  production volume 2.8826e10 kg; name productionvolume
    Literature Data: The data has been taken from Provisional Coal Statistics 2015 -16 , which is published jointly by Goverment of India, Ministry of coal, Coal Controller's Organisation Kolkata. The value is totol addition of washed coal (coking), washed coal (non coking) and middlings.
  property heating value, net 27.91 MJ
    Based on the Characterization factor of Hard coal in the CED method
  property price 0.036 EUR2005; name hard_coal_price_EUR2005
    Steam coal import costs in EU in IEA key world energy statistics 2003-2004.
  property carbon content, fossil 0.782708
    C content 75-94% (specified in Tab 1.1, report 6, part VI). A mean content of 0.845 kg C/ kg dry hard coal was considered
  property carbon content 0.782708
    carbon content on a dry matter basis (reserved; not for manual entry)
  properties: water in wet mass 0.0772501 kg, carbon content, non-fossil 0, water content 0.0837172, wet mass 1 kg, dry mass 0.92275 kg, carbon allocation 0.722244 kg

## Inputs from technosphere
- hard coal preparation plant: 6.15e-10 unit; lognormal variance with pedigree 0.1206, pedigree (4,4,5,4,4)
  Estimated value. The amount is calculated based on the lifetime and average capacity of hard coal preparation plant in India, see the relevant GLO dataset.
- chemical, organic: 6.87e-5 kg; lognormal variance with pedigree 0.0014, pedigree (1,3,2,1,1)
  Literature Data: The data is collected from environment statements of coal washeries West Bokaro (washery -2). The chemical organic here is used as frother in the process. The common chemical used here is methyl isobutyl carbinol. It is also called as MIBC. MIBC is used as a frother in the flotation process in the mining of coal.
  properties: wet mass 1 kg, carbon content, fossil 0.628, dry mass 1 kg, heating value, net 19.03 MJ
  note on carbon content, fossil: This dataset is an unweighted average of 20 organic substances (listed in Tab 88.1, ecoinvent v2.2 report 8, part II), being part of the top100 chemicals included in this database. The C-content has also been calculated as an unweighted average of the C content of the substances composing this dataset.
- coal slurry: -0.172983 kg; name coalslurry; lognormal variance with pedigree 0.0028, pedigree (1,4,2,1,1)
  Literature Data : The data for the coal slurry generated per ton of hard coal prepared is taken from environmental statement of kedla coal washery
  production volume 4.98641e9 kg; = coalslurry*productionvolume
    Calculated from production volume of reference product using the relative outputs.
  property price 0 EUR2005; name coalslurry_price_EUR2005
  property carbon content, non-fossil 0; name coalslurry_C_content_non_fossil
  property carbon content, fossil 0.51; name coalslurry_C_content_fossil
  properties: ash content 0.29 kg, wet mass 1 kg, dry mass 0.6 kg
- magnetite: 0.000628 kg; lognormal variance with pedigree 0.0014, pedigree (1,3,2,1,1)
  Literature Data: The data is collected from environment statements of 3 coal washeries namely - Bheltand Coal Washery , Jamadoba Coal Washery , West Bokaro (washery -2). Magnetite per ton of hard coal prepared was given in the respective environment statements
  properties: dry mass 1 kg, wet mass 1 kg
- hard coal, run-of-mine: 2.10732 kg; name hard_coal_runofmine; lognormal variance with pedigree 0.0014, pedigree (1,3,2,1,1)
  (same comment as for coal slurry)
  properties: carbon content, fossil 0.4372, water content 0.0636035, heating value, net 27.91 MJ, wet mass 1 kg, dry mass 0.9402 kg
  note on heating value, net: Based on the Characterization factor of Hard coal in the CED method
- spoil from hard coal mining: -0.328991 kg; name spoil; lognormal variance with pedigree 0.0028, pedigree (1,4,2,1,1)
  Literature Data : The data for the spoil generated per ton of hard coal prepared is taken from environmental statement of kedla coal washery. The document has used the word tailings as the discard , to keep a similar nomenclature this has been changed to spoil for using in the dataset.
  production volume 9.48349e9 kg; = productionvolume * (spoil / hard_coal)
    Calculated from production volume of reference product using the relative outputs.
  property price 0 EUR2005; name spoil_price_EUR2005
  properties: water content 0.25, wet mass 1 kg, carbon content, fossil 0.264, dry mass 0.8 kg, ash content 0.536 kg
- electricity, high voltage: 0.0105366 kWh; name electricity; = 0.005*hard_coal_runofmine; lognormal variance with pedigree 0.0108, pedigree (4,4,2,1,1)
  Litreature data: The electricity consumption required for coal preparation has been taken from a pre-feasibility report of 2.5MTPA coal washery (company name - Hind Energy and Coal Benefication (India) Ltd.). The mentioned document states the specific power consumption as 5 units per ton of raw coal throughput. The report can be downloaded from the following link: http://environmentclearance.nic.in/writereaddata/Online/TOR/09_May_2017_103150000E0QK6WFBPrefeasibilityReportHindEnergyJharsuguda.pdf
- anionic resin: 1.7e-5 kg; lognormal variance with pedigree 0.0028, pedigree (1,4,2,1,1)
  Literature Data: The data is collected from environment statements of coal washeries West Bokaro (washery -2). Flocculant used was given in terms ofquantity used per ton of coal prepared.Anionic Polychloride resin is used as flocclants in coal preparation
  properties: carbon content, fossil 0.680721, water content 1, wet mass 1 kg, dry mass 0.5 kg, heating value, net 9.09 MJ
  note on carbon content, fossil: Cross-linked polystyrene beads are treated with chloromethyl methyl ether under anhydrous conditions, with either aluminum chloride or tin(IV) chloride as catalyst. Chloromethylated polystyrene is obtained. In a second stage, the chlorine in the chloromethylated group can be replaced by an amine (Anion exchange resins, in Ullmann). In this case, Trimethylamine, C3H9N, is used (ecoinvent v2.2 report 8-part 93). That is, the resine can be formulated as C12H18NCl (after Ullmann, Anion exchange resins). The resine is hydrated (ecoinvent v2.2 report 8, part II, Tab 93.7)

## Inputs from nature
- Water, unspecified natural origin [natural resource, in ground]: 0.002161 m3; lognormal variance with pedigree 0.0014, pedigree (1,3,2,1,1)
  Literature Data: The data is collected from environment statements of 4 coal washeries namely - Bheltand Coal Washery , Jamadoba Coal Washery , West Bokaro (washery -2), Kedla Washery (CCL). Water required per ton of hard coal prepared was given in the respective environment statements

## Emissions to nature
- Water [water, unspecified]: 0.001689 m3; lognormal variance with pedigree 0.0502, pedigree (4,4,2,1,1)
  Own Assumption (15 % of water after water balance is considered to be evaporated to air) and rermaining is taken as discharge as water
- Water [air, unspecified]: 0.000298 m3; lognormal variance with pedigree 0.0502, pedigree (4,4,2,1,1)
  Own Assumption (15 % of water after water balance is considered to be evaporated to air)

## Sampling procedure
The data was collected from environmental statements of 4 coal washeries in India. The name of the four washeries which have been used for data collection are Kedla washery, West Bokaro washery, Bheltand washery and Jamadoba washery. Some of the exchanges like Middling, Coal Slurry, Tailings, Annionic resin, Chemical organic have been taken from only one washery. Exchange of water and magnetite has representation from all four washeries. The same have been mentioned in the comments and pedigree has been adjusted accordingly.

## Extrapolations
This dataset has been extrapolated from year 2020 to the year of the calculation (2021). The uncertainty has been adjusted accordingly.
