# planing, board, softwood, u=20%

Dataset: EcoSpold 2, unit process
Geography: Europe without Switzerland
Time period: 2011-01-01 to 2021-12-31
Technology level: current
Classification: ISIC rev.4 ecoinvent: 1610:Sawmilling and planing of wood
Tags: Swiss brush-up completed
Scenario: Business-as-Usual
System model: Allocation, cut-off by classification
Generated by: Frank Werner
Published in: BFS 2013
Database: ecoinvent
isCopyrightProtected: true
accessRestrictedTo: 1

## General comment
This dataset represents the planing of one m3 softwood board that has been air dried or kiln dried to 20% moisture content. The ratio of kiln dried to air dried raw board input corresponds to the extimated market mix. The planing mill is assumed to be located on the sawmill site. The suction of the shavings is modeled in a separate activity.
The data was provided by and approved by the Swiss forest industry (Holzindustrie Schweiz HIS).
Within ecoinvent, three products - boards, beams and laths - are distinguished:

## Included activities start
Planing process starting from air dried respectively kiln dried softwood board, at sawmill site.

## Included activities end
This activity ends with planed softwood board, at plant. The dataset includes the planing process at the sawmill site and input of wood. The dataset does not include dust emissions.

## Geography
Represents average Swiss conditions assumed to be represenative for Europe

## Parameters
- wood density, basic: 404.8 kg/m3; name basic_wood_d; = dry_wood_d*(1-moisture_board*shrinkage_ratio)
  kg oven-dry matter/wet volume
- shrinkage ratio (u=30% - 0%): 0.004 dimensionless; name shrinkage_ratio
  shrinkage of volume in % per change (%) in moisture content, relevant between u=30% to 0%
- wood density, dry: 440 kg/m3; name dry_wood_d
  kg oven-dry matter/oven-dry volume
- share of kiln dried wood: 0.8 dimensionless; name share_kiln_dried
  share of kiln dried sawnwood input (as part of input is air dried)
- moisture content board: 20 dimensionless; name moisture_board
  moisture content of board
- share of shaving: 10 dimensionless; name share_shaving
  share of shaving production from volume of sawnwood input
- wood density, apparent: 485.76 kg/m3; name wood_d_apparent; = (1+moisture_board/100)* basic_wood_d
  kg wet matter/wet volume
- share of board: 90 dimensionless; name share_board
  share of board production from volume of sawnwood input

## Reference product
- shavings, softwood, loose, measured as dry mass: 1 kg; name m_shavings; = (board_raw_u20_kd+board_raw_u20_ad)* share_shaving/100* basic_wood_d; source BFS 2013; CPC 39283: Non-agglomerated wood waste and scrap; By-product classification allocatable product; pedigree (1,1,1,1,1)
  calculated as dry mass
  production volume 2.26562e8 kg; = 2910017.24444445/1250*(98570-1250)
    Scaled from the PV estimates of the Swiss sawmilling chain based UNECE data for 2013 for the production volumes of Switzerland (1'250'000 m3) and the production volume of Europe without Switzerland ( 97'570'000 m3 - 1'250'000 m3).
  property price 0.113 EUR2005
    Calculated based on data from FAOSTAT (accessed 20140429). The price is calculated by using data on total world import quantity (m3) and import value (1000 USD), year 2005. 40461924 m3 of Chips and Particles was imported in the world in 2005. The import value was 3022227000 USD. The calculated price is thus (3022227000/40461924=74.7*0.8=) 62.2 Euro/m3. It is estimated, that the chips and particles are half hardwood (of density 650 kg/m3) and half softwood (of density 450 kg/m3), thus the remaining mixture has a density of 550 kg/m3. The recalculated price is (1/550*62.2=) 0.11 Euro/kg. Using the same approach the calculated price for 2010 was 0.123 Euro/kg.
  property heating value, net 12.61 MJ
    LHV is calculated based on the Carbon content of the product. More details can be found on the respective documentation.
  property carbon content 0.494
    carbon content on a dry matter basis (reserved; not for manual entry)
  property true value 5.08249; name m_shavings_true_value
    allocation property applied in "true value" allocation // value calculated from revenue
  properties: water in wet mass 0.15 kg, carbon content, fossil 0, carbon content, non-fossil 0.494, dry mass 1 kg, wet mass 1.15 kg, water content 0.15, carbon allocation 0.494 kg
- sawnwood, board, softwood, dried (u=20%), planed: 0 m3; source BFS 2013; CPC 31101: Wood, sawn or chipped lengthwise, sliced or peeled, of a thickness exceeding 6 mm, of coniferous wood; By-product classification allocatable product
  production volume 5.03721e6 m3; name p_sawnwood_planed; = 64699/1250*(98570-1250)
    (same comment as for shavings, softwood, loose, measured as dry mass)
  property water content 0.2; name water_content
  property price 160 EUR2005
    Expert judgement (Urs Luginbühl, Swiss Sawmilling industry, personal communication in June 2014). Cross-reference; FAOSTAT (accessed 20140428). The price is calculated by using data on total world import quantity (m3) and import value (1000 USD), year 2005. 109432798 m3 of Sawnwood (C) - coniferous was imported in the world in 2005. The import value was 22249842000 USD. The calculated price is thus (22249842000/109432798=203*0.8=) 164 Euro.
  property dry mass 404.8 kg; = basic_wood_d
  property heating value, net 5605.65 MJ
    LHV is calculated based on the Carbon content of the product. More details can be found on the respective documentation.The property is based on a value of 12.06MJ/kg
  property wet mass 485.76 kg; = basic_wood_d*(1+ water_content)
  property water in wet mass 80.96 kg; = basic_wood_d* water_content
  property carbon content 0.494
    carbon content on a dry matter basis (reserved; not for manual entry)
  property true value 160
    allocation property applied in "true value" allocation // value calculated from revenue
  properties: carbon content, fossil 0, carbon content, non-fossil 0.494, carbon allocation 199.971 kg

## Inputs from technosphere
- sawnwood, board, softwood, raw, dried (u=20%): 0.000152113 m3; name board_raw_u20_ad; = 1/(1-share_shaving/100)*(1-share_kiln_dried); source BFS 2013; lognormal variance with pedigree 0.0336, pedigree (1,1,4,4,1)
  input of raw sawn wood to be planed; usually processes within the sawmill that produces the raw sawn wood
  properties: water content 0.2, carbon content, non-fossil 0.494, wet mass 485.76 kg, dry mass 404.8 kg, heating value, net 5860.46 MJ
- planing mill: 5.06535e-10 unit; name planemill; source BFS 2013; lognormal variance with pedigree 0.5587, pedigree (2,1,4,3,1)
  data taken from ecoinvent 2.2 dataset
  properties: UVEK_link_1 3514, UVEK_relative_amount_1 1
  note on UVEK_link_1: to be used only in special submissions in coordination with ecoinvent and the Swiss FOEN
- sawnwood, board, softwood, raw, dried (u=20%): 0.00060845 m3; name board_raw_u20_kd; = 1/(1-share_shaving/100)*share_kiln_dried; source BFS 2013; lognormal variance with pedigree 0.0336, pedigree (1,1,4,4,1)
  (same comment as for sawnwood, board, softwood, raw, dried (u=20%))
  properties: carbon content, non-fossil 0.494, heating value, net 5860.46 MJ, water content 0.2, wet mass 485.76 kg, dry mass 404.8 kg
- electricity, medium voltage: 0.0131562 kWh; name elec_medvol; source BFS 2013; lognormal variance with pedigree 0.0337, pedigree (2,1,4,3,1)
  electricity consumed for the planing; the suction of the shavings in covered in a separate dataset; data from Swiss industry
  properties: UVEK_link_1 1779, UVEK_relative_amount_1 1

## Inputs from nature
- Carbon dioxide, non-fossil, resource correction [natural resource, in air]: 1.25367 kg; pedigree (1,1,1,1,1)
  This exchange has been added after economic allocation in order to re-balance the non-fossil carbon dioxide resource extraction.

## Sampling procedure
complementary literature and sampling from sawmills; CH data used to approximate European processes
