# grass production, permanent grassland, organic, intensive

Dataset: EcoSpold 2, unit process
Geography: RoW
Time period: 1995-01-01 to 2021-12-31
Technology level: current
Classification: ISIC rev.4 ecoinvent: 0119:Growing of other non-perennial crops
Classification: EcoSpold01Categories: agricultural production/plant production
Scenario: Business-as-Usual
System model: Allocation, cut-off by classification
Generated by: Fredy Dinkel
Published in: Jungbluth N. 2007
Database: ecoinvent
isCopyrightProtected: true
accessRestrictedTo: 1

## General comment
This dataset represents the production of 1 kg of grass (dry matter). The dry matter yield is 11500 kg/ha. Moisture content at harvest is 85%.
[This dataset was already contained in the ecoinvent database version 2. It was not individually updated during the transfer to ecoinvent version 3. Life Cycle Impact Assessment results may still have changed, as they are affected by changes in the supply chain, i.e. in other datasets. This dataset was generated following the ecoinvent quality guidelines for version 2. It may have been subject to central changes described in the ecoinvent version 3 change report (http://www.ecoinvent.org/database/ecoinvent-version-3/reports-of-changes/), and the results of the central updates were reviewed extensively. The changes added e.g. consistent water flows and other information throughout the database. The documentation of this dataset can be found in the ecoinvent reports of version 2, which are still available via the ecoinvent website. The change report linked above covers all central changes that were made during the conversion process.]

## Included activities start
This activity assumes grass production on a permanent natural meadow with a lifetime of 20 years and represents one year of cultivation on an established meadow. Farm manure as an organic fertiliser is only accounted for in terms of direct field emissions; all pre-processes are included in the animal production systems.

## Included activities end
The dataset includes all machine operations and corresponding machine infrastructure and sheds. Machine operations are: fertilisation, mowing and loading for transport. This activity ends after loading of the grass at the farm gate.

## Geography
Refers to a production in the Swiss plateau (lowlands <700m).

## Technology
Intensive organic production.

## Parameters
- fraction, irrigation water to surface water: 0.2 dimensionless; name fraction_IW_to_surface_water; lognormal variance with pedigree 0.0886, pedigree (4,3,1,1,4)
- fraction, irrigation water, to air: 0.586986 dimensionless; name fraction_IW_to_air; lognormal variance with pedigree 0.0409, pedigree (2,2,2,1,1)
- fraction, irrigation water, to ground water: 0.8 dimensionless; name fraction_IW_to_ground_water; lognormal variance with pedigree 0.0886, pedigree (4,3,1,1,4)

## Reference product
- grass, organic: 1 kg; name REF_PRODUCT; By-product classification allocatable product; CPC 01919: Forage products, n.e.c.
  EcoSpold01Location=CH
  production volume 1.39166e10 kg
    Area of permanent grass 20 million ha (Willer H, Yussefi M (Eds.) (2010). The World of Organic Agriculture. Statistics and Emerging Trends 2007. FiBL, IFOAM.). Of this area, 43% is assumed to be intensive. 50% is assumed to be grazed and 50% cut. Of the cut grass, 1/3 is assumed to be used fresh, 1/3 for silage, and 1/3 dried for hay. This dataset concerns grass for fresh usage only. Yields per area as provided in the dataset: 11500 kg DM/ha.
  property carbon content, non-fossil 0.443857; name REF_PRODUCT_C_content_non_fossil
    biogene carbon content on a dry matter basis
    Composition data obtained from the average composition of Fescue Fresh, Orchardgrass Fresh, and Timothy Fresh in (http://beefmagazine.com/images/2009%20feed%20table.pdf). First, composition data were refered to 1 kg dry mass. Then, C-contents were calculated considering a C-content/dry mass of 46% in carbohydrates (including fibres), 53% in proteins and 75% in fats. All data from "Evolutionary and Biochemical Aspects", A.D. Kay and T. Vrede (in Global Ecology, 2010, Elsevier B.V., S.E. Jørgensen Ed.).
  property dry mass 1 kg; name REF_PRODUCT_DM
  property energy content 17.9 MJ; name REF_PRODUCT_energy_content
    Approximation by values for hay. See chapter 'Product Properties' in "01_crop production - yields & inputs CH & Europe_v1.0.pdf", section "AGRICULTURAL PRODUCTION IN SWITZERLAND" - pdf-document on the dedicated talk page of ecoinvent (www.ecoinvent.org/documentation).
  property price 0.645 EUR2005; name REF_PRODUCT_price_EUR2005
    Temporary price data. Calculated as 90% of purchasers price based on: Source: Ecoinvent report nr. 17, table 12.46
  property carbon content 0.443857
    carbon content on a dry matter basis (reserved; not for manual entry)
  properties: wet mass 6.66667 kg, carbon content, fossil 0, water content 5.66667, water in wet mass 5.66667 kg, carbon allocation 0.443857 kg

## Inputs from technosphere
- mowing, by rotary mower: 0.00043478 ha; source LBL 2004; lognormal variance with pedigree 0.0607, pedigree (2,2,5,5,3)
  4-6 harvest per year (LBL 2004)
  EcoSpold01Location=CH
  Uncertainty: 4-6 harvest per year (Walter et al. 2004)
- fodder loading, by self-loading trailer: 0.056 m3; lognormal variance with pedigree 0.0526, pedigree (2,1,5,5,1)
  Calculation with 120 kg/m3 and moisture of about 10-15% (=0.056 m3 / kg DM)
  EcoSpold01Location=CH
  Uncertainty: Calculation with 120 kg/m3 and moisture of about 10-15% (=0.056 m3 / kg DM)
- irrigation: 0 m3; name water_irrigation_input; source Siebert, S. 2010; pedigree (1,1,1,1,1)
  Calculated based on literature values (Döll, 2010) and partially modelled at ETH (Pfister, S.).
  property carbon content, non-fossil 0; name C_content_non_fossil
  property water content 9089.91; name water_content
  property wet mass 1000 kg; name WM
  property carbon content, fossil 0; name C_content_fossil
  property water in wet mass 999.89 kg; name WWM
  property dry mass 0.11 kg; name DM
- solid manure loading and spreading, by hydraulic loader and spreader: 0.86957 kg; source LBL 2004; lognormal variance with pedigree 0.0607, pedigree (2,2,5,5,3)
  EcoSpold01Location=CH
  Portion of slurry and solid manure as for hey in ecoinvent report 15 (Nemecek et al. 2004). Total amount of N corresponds to the recommendations in LBL (2004)
  Uncertainty: Portion of slurry and solid manure as for hey in ecoinvent report 15 (Nemecek et al. 2004). Total amount of N corresponds to the recommendations in Walter et al. (2004)
- liquid manure spreading, by vacuum tanker: 0.0052174 m3; source LBL 2004; lognormal variance with pedigree 0.0607, pedigree (2,2,5,5,3)
  EcoSpold01Location=CH
  Portion of slurry and mineral fertzilizer as for hey in ecoinvent report 15 (Nemecek et al. 2004). Total amount of N corresponds to the recommendations in LBL (2004)
  Uncertainty: Portion of slurry and solid manure as for hey in ecoinvent report 15 (Nemecek et al. 2004). Total amount of N corresponds to the recommendations in Walter et al. (2004)
- irrigation: 2.02232e-6, 8.58411e-8, 1.80781e-5, 2.96253e-7, 1.48139e-8, 8.41169e-7, 1.36916e-7, 3.47404e-5, 6.67794e-7, 2.28236e-7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 m3 (16 entries); source Siebert, S. 2010; lognormal variance with pedigree 0.0447, pedigree (2,2,5,5,1)
  (same comment as for irrigation)
  properties: water content 9089.91, wet mass 1000 kg, dry mass 0.11 kg

## Inputs from nature
- Carbon dioxide, in air [natural resource, in air]: 1.62747 kg; = 44/12 * (REF_PRODUCT_C_content_non_fossil * REF_PRODUCT * REF_PRODUCT_DM ); lognormal variance with pedigree 0.0426, pedigree (2,1,5,5,1)
  Modelled,see chapter 'CO2 binding' in "01_crop production_direct field emissions and natural resources_v1.0.pdf" - pdf-document on the dedicated talk page of ecoinvent (www.ecoinvent.org/documentation)
  Uncertainty: Calculation with uptake of 0.453 kg carbon per kg DM grass (Maier et al. 1998), which equals a total amount of 1.661 kg CO2 / kg DM grass.
- Transformation, from pasture, man made, intensive [natural resource, land]: 0.043478 m2; lognormal variance with pedigree 0.1801, pedigree (4,2,5,5,1)
  Modelled, see chapter 'Land use' in "01_crop production_direct field emissions and natural resources_v1.0.pdf" - pdf-document on the dedicated talk page of ecoinvent (www.ecoinvent.org/documentation)
  Uncertainty: Calculation for one ha with a cultivation time of 20 years and a netto yield of 11'500 kg DM/year
- Occupation, pasture, man made, intensive [natural resource, land]: 0.86957 m2*year; lognormal variance with pedigree 0.0827, pedigree (2,2,5,5,1)
  Modelled, see chapter 'Land use' in "01_crop production_direct field emissions and natural resources_v1.0.pdf" - pdf-document on the dedicated talk page of ecoinvent (www.ecoinvent.org/documentation)
  Uncertainty: Cultivation of a hectare over one year with a yield of 11500 kg DM per year.
- Transformation, to pasture, man made, intensive [natural resource, land]: 0.043478 m2; lognormal variance with pedigree 0.1801, pedigree (4,2,5,5,1)
  (same comment as for Transformation, from pasture, man made, intensive)
- Energy, gross calorific value, in biomass [natural resource, biotic]: 17.9 MJ; lognormal variance with pedigree 0.0418844, pedigree (2,1,5,3,1)
  Calculation with 17.9 MJ/kg DM (Nemecek et al. 2004, Tab. 4.7))

## Emissions to nature
- Water [air, unspecified]: 4.52491e-5 m3; name water_to_air_unspecified; lognormal variance with pedigree 0.0827, pedigree (2,2,5,5,1)
  Calculated value based on literature values and expert opinion. See comments in the parametres' comment field.
  property fraction, origin: salt water 0; name fraction_origin_salt_water
  property fraction, origin: fresh water 1; name fraction_origin_fresh_water
  property fraction, origin: unspecified 0; name fraction_origin_unspecified
- Nickel [soil, agricultural]: -2.9652e-7 kg; source Nemecek, T. 2004
  Calculation input - output balance using data about metal content of grass, seed and fertilizers summarized in Nemecek et al. (2004)
- Nitrate [water, ground-]: 0 kg
  Modelled with the 'SALCA-NO3 model' described in "01_crop production_direct field emissions and natural resources_v1.0.pdf" - pdf-document on the dedicated talk page of ecoinvent (www.ecoinvent.org/documentation)
- Chromium [soil, agricultural]: 1.6478e-7 kg; source Nemecek, T. 2004; lognormal variance with pedigree 0.1106, pedigree (2,1,5,5,3)
  Calculation input - output balance using data about metal content of grass, seed and fertilizers summarized in Nemecek et al. (2004)
  Uncertainty: Calculation input - output bilance using data about metal content of grass as in Nemecek et al. (2004)
- Cadmium [soil, agricultural]: -6.9826e-8 kg; source Nemecek, T. 2004
  (same comment as for Nickel)
- Nitrogen oxides [air, non-urban air or from high stacks]: 5.019e-5 kg; = 0.21 * N2O; lognormal variance with pedigree 0.1626, pedigree (2,1,5,5,4)
  Modelled, see chapter 'Emissions of NOx to the air' in "01_crop production_direct field emissions and natural resources_v1.0.pdf" - pdf-document on the dedicated talk page of ecoinvent (www.ecoinvent.org/documentation)
  Uncertainty: Formula as in ecoinvent report No. 15, Chapter 4.4 (Nemecek et al. 2004)
- Water [water, ground-]: 7.17615e-5 m3; name water_to_water_ground; lognormal variance with pedigree 0.1306, pedigree (4,3,5,5,4)
  Calculated value. See the parameters and their comments to understand the calculation.
  property fraction, origin: fresh water 1; name fraction_origin_fresh_water_Wgw
  property fraction, origin: salt water 0; name fraction_origin_salt_water_Wgw
  property fraction, origin: unspecified 0; name fraction_origin_unspecified_Wgw
- Mercury [soil, agricultural]: -2.1304e-8 kg; source Nemecek, T. 2004
  (same comment as for Nickel)
- Water [water, surface water]: 1.79404e-5 m3; name water_to_water_surface; lognormal variance with pedigree 0.1306, pedigree (4,3,5,5,4)
  Calculated value. See the parameters and their comments to understand the calculation.
  property fraction, origin: salt water 0; name fraction_origin_salt_water_Wsw
  property fraction, origin: fresh water 1; name fraction_origin_fresh_water_Wsw
- Ammonia [air, non-urban air or from high stacks]: 0.0038634 kg; lognormal variance with pedigree 0.1226, pedigree (2,1,5,5,4)
  Modelled with the 'AGRAMMON model' described in "01_crop production_direct field emissions and natural resources_v1.0.pdf" - pdf-document on the dedicated talk page of ecoinvent (www.ecoinvent.org/documentation)
  Uncertainty: Formula as in ecoinvent report No. 15, Chapter 4.4 (Nemecek et al. 2004)
- Copper [soil, agricultural]: 1.1565e-6 kg; source Nemecek, T. 2004; lognormal variance with pedigree 0.1106, pedigree (2,1,5,5,3)
  (same comment as for Chromium)
- Phosphorus [water, surface water]: 4.0077e-7 kg; source Nemecek, T. 2004; lognormal variance with pedigree 0.1627, pedigree (2,2,5,5,4)
  Formula as in ecoinvent report No. 15, chapter 4.4 (Nemecek et al. 2004)
  Uncertainty: Formula as in ecoinvent report No. 15, Chapter 4.4 (Nemecek et al. 2004)
- Phosphate [water, ground-]: 1.3025e-5 kg; source Nemecek, T. 2004; lognormal variance with pedigree 0.1627, pedigree (2,2,5,5,4)
  (same comment as for Phosphorus)
- Lead [soil, agricultural]: -2.0878e-6 kg; source Nemecek, T. 2004
  (same comment as for Nickel)
- Zinc [soil, agricultural]: 4.8696e-6 kg; source Nemecek, T. 2004; lognormal variance with pedigree 0.1106, pedigree (2,1,5,5,3)
  (same comment as for Chromium)
- Phosphate [water, surface water]: 7.344e-5 kg; source Nemecek, T. 2004; lognormal variance with pedigree 0.1627, pedigree (2,2,5,5,4)
  (same comment as for Phosphorus)
- Dinitrogen monoxide [air, non-urban air or from high stacks]: 0.000239 kg; name N2O; lognormal variance with pedigree 0.1626, pedigree (2,1,5,5,4)
  Modelled, see chapter 'Emissions of N2O to the air' in "01_crop production_direct field emissions and natural resources_v1.0.pdf" - pdf-document on the dedicated talk page of ecoinvent (www.ecoinvent.org/documentation)
  Uncertainty: Formula as in ecoinvent report No. 15, Chapter 4.4 (Nemecek et al. 2004)

## Sampling procedure
Data were compiled from statistics, fertilising recommendations, documents from extension services and expert knowledge.

## Extrapolations
This dataset has been copied from an original dataset covering the geography CH.

## Review by Niels Jungbluth 2005-12-02
Passed.
