# maize silage production, organic

Dataset: EcoSpold 2, unit process
Geography: RoW
Time period: 1996-01-01 to 2021-12-31
Technology level: current
Classification: ISIC rev.4 ecoinvent: 0119:Growing of other non-perennial crops
Synonyms: Zea mays L.; corn silage
Scenario: Business-as-Usual
System model: Allocation, cut-off by classification
Generated by: Thomas Nemecek
Published in: Nemecek, T. 2007
Database: ecoinvent
isCopyrightProtected: true
accessRestrictedTo: 1

## General comment
This dataset represents the production of 1 kg of maize silage (fresh matter). The yield is 49166 kg/ha at a moisture content at storage of 72%.
[This dataset was already contained in the ecoinvent database version 2. It was not individually updated during the transfer to ecoinvent version 3. Life Cycle Impact Assessment results may still have changed, as they are affected by changes in the supply chain, i.e. in other datasets. This dataset was generated following the ecoinvent quality guidelines for version 2. It may have been subject to central changes described in the ecoinvent version 3 change report (http://www.ecoinvent.org/database/ecoinvent-version-3/reports-of-changes/), and the results of the central updates were reviewed extensively. The changes added e.g. consistent water flows and other information throughout the database. The documentation of this dataset can be found in the ecoinvent reports of version 2, which are still available via the ecoinvent website. The change report linked above covers all central changes that were made during the conversion process.]

## Included activities start
This activity starts after the harvest of the previous crop. The input of seeds is considered. Farm manure as an organic fertiliser is only accounted for in terms of direct field emissions; all pre-processes are included in the animal production systems.

## Included activities end
The dataset includes all machine operations and corresponding machine infrastructure and sheds. Machine operations are: soil cultivation, sowing, fertilisation, weed control, harvest ('chopping') and transport from field to farm (1 km; 'fodder loading'). Further, direct field emissions are included. The cultivation of green manure during winter before sowing maize is also included. This activity ends after harvest at the farm gate.

## Geography
Refers to an average production in the Swiss lowlands.

## Technology
Organic production

## Time period
The yield data have been collected for the years 1996-2003.

## Parameters
- fraction, irrigation water, to air: 0.586986 dimensionless; name fraction_IW_to_air; lognormal variance with pedigree 0.0409, pedigree (2,2,2,1,1)
- fraction, irrigation water to surface water: 0.2 dimensionless; name fraction_IW_to_surface_water; lognormal variance with pedigree 0.0886, pedigree (4,3,1,1,4)
- fraction, irrigation water, to ground water: 0.8 dimensionless; name fraction_IW_to_ground_water; lognormal variance with pedigree 0.0886, pedigree (4,3,1,1,4)

## Reference product
- maize silage, organic: 1 kg; name REF_PRODUCT; CPC 01911: Maize for forage and silage; By-product classification allocatable product
  production volume 1.35895e8 kg
    4000 ha (Willer H, Yussefi M (Eds.) (2010). The World of Organic Agriculture. Statistics and Emerging Trends 2007. FiBL, IFOAM.) ; assuming yields equivalent to Swiss: 49166 kg/ha at 72% water on a wet mass basis
  property energy content 5.32 MJ; name REF_PRODUCT_energy_content
    See chapter 'Product Properties' in '01_crop production - yields & inputs CH & Europe_v1.0.pdf', section 'AGRICULTURAL PRODUCTION IN SWITZERLAND' - pdf-document on the dedicated talk page of ecoinvent (www.ecoinvent.org/documentation)
  property carbon content, non-fossil 0.44612; name REF_PRODUCT_C_content_non_fossil
    biogene carbon content on a dry matter basis
    Composition data obtained from Corn Silage Milk Stage, in (http://beefmagazine.com/images/2009%20feed%20table.pdf). First, composition data were refered to 1 kg dry mass. Then, C-contents were calculated considering a C-content/dry mass of 46% in carbohydrates (including fibres), 53% in proteins and 75% in fats. All data from 'Evolutionary and Biochemical Aspects', A.D. Kay and T. Vrede (in Global Ecology, 2010, Elsevier B.V., S.E. Jørgensen Ed.).
  property price 0.017 EUR2005; name REF_PRODUCT_price_EUR2005
    Based on Roland P. Freund, retired Farm Management Agent, text [http://extension.psu.edu/business/farm/management/financial-management/calculators/corn-silage/guide]
  property dry mass 0.28 kg; name REF_PRODUCT_DM
  property carbon content 0.44612
    carbon content on a dry matter basis (reserved; not for manual entry)
  properties: water in wet mass 0.72 kg, carbon content, fossil 0, water content 2.57143, wet mass 1 kg, carbon allocation 0.124914 kg

## Inputs from technosphere
- solid manure loading and spreading, by hydraulic loader and spreader: 0.314 kg; lognormal variance with pedigree 0.0426, pedigree (2,1,5,5,1)
  See chapter 'Yields and Inputs of Arable Crop Production' in '01_crop production - yields & inputs CH & Europe_v1.0.pdf', section 'AGRICULTURAL PRODUCTION IN SWITZERLAND' - pdf-document on the dedicated talk page of ecoinvent (www.ecoinvent.org/documentation)
- fodder loading, by self-loading trailer: 0.004 m3; lognormal variance with pedigree 0.0426, pedigree (2,1,5,5,1)
  (same comment as for solid manure loading and spreading, by hydraulic loader and spreader)
- irrigation: 0 m3; name water_irrigation_input; source Siebert, S. 2010; pedigree (1,1,1,1,1)
  Calculated based on literature values (Doll, 2010) and partially modelled at ETH (Pfister, S.).
  property water in wet mass 999.89 kg; name WWM
  property water content 9089.91; name water_content
  property dry mass 0.11 kg; name DM
  property carbon content, fossil 0; name C_content_fossil
  property wet mass 1000 kg; name WM
  property carbon content, non-fossil 0; name C_content_non_fossil
- tillage, harrowing, by spring tine harrow: 4.0679e-5 ha; lognormal variance with pedigree 0.0426, pedigree (2,1,5,5,1)
  (same comment as for solid manure loading and spreading, by hydraulic loader and spreader)
- tillage, ploughing: 2.0339e-5 ha; lognormal variance with pedigree 0.0426, pedigree (2,1,5,5,1)
  (same comment as for solid manure loading and spreading, by hydraulic loader and spreader)
- maize seed, organic, for sowing: 0.00054916 kg; name SEED; lognormal variance with pedigree 0.0426, pedigree (2,1,5,5,1)
  (same comment as for solid manure loading and spreading, by hydraulic loader and spreader)
  property energy content 15.9272 MJ; name SEED_energy_content
  property carbon content, non-fossil 0.46957; name SEED_C_content_non_fossil
  property dry mass 0.88 kg; name SEED_DM
  properties: wet mass 1 kg, water content 0.136364
  note on energy content: See chapter 'Product Properties' in '01_crop production - yields & inputs CH & Europe_v1.0.pdf', section 'AGRICULTURAL PRODUCTION IN SWITZERLAND' - pdf-document on the dedicated talk page of ecoinvent (www.ecoinvent.org/documentation)
  note on carbon content, non-fossil: biogene carbon content on a dry matter basis Composition data obtained from Corn Grain Whole, in (http://beefmagazine.com/images/2009%20feed%20table.pdf). First, composition data were refered to 1 kg dry mass. Then, C-contents were calculated considering a C-content/dry mass of 46% in carbohydrates (including fibres), 53% in proteins and 75% in fats. All data from 'Evolutionary and Biochemical Aspects', A.D. Kay and T. Vrede (in Global Ecology, 2010, Elsevier B.V., S.E. Jørgensen Ed.).
- green manure, organic, until April: 2.0339e-5 ha; lognormal variance with pedigree 0.0426, pedigree (2,1,5,5,1)
  (same comment as for solid manure loading and spreading, by hydraulic loader and spreader)
- hoeing: 4.0679e-5 ha; lognormal variance with pedigree 0.0426, pedigree (2,1,5,5,1)
  (same comment as for solid manure loading and spreading, by hydraulic loader and spreader)
- chopping, maize: 2.0339e-5 ha; lognormal variance with pedigree 0.0426, pedigree (2,1,5,5,1)
  (same comment as for solid manure loading and spreading, by hydraulic loader and spreader)
- tillage, currying, by weeder: 2.0339e-5 ha; lognormal variance with pedigree 0.0426, pedigree (2,1,5,5,1)
  (same comment as for solid manure loading and spreading, by hydraulic loader and spreader)
- sowing: 2.0339e-5 ha; lognormal variance with pedigree 0.0426, pedigree (2,1,5,5,1)
  (same comment as for solid manure loading and spreading, by hydraulic loader and spreader)
- liquid manure spreading, by vacuum tanker: 0.00079224 m3; lognormal variance with pedigree 0.0426, pedigree (2,1,5,5,1)
  (same comment as for solid manure loading and spreading, by hydraulic loader and spreader)
- irrigation: 0.000134812, 5.72235e-6, 0.00120513, 1.97489e-5, 9.87523e-7, 5.60741e-5, 9.12709e-6, 0.00231587, 4.45165e-5, 1.52147e-5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 m3 (16 entries); source Siebert, S. 2010; lognormal variance with pedigree 0.0447, pedigree (2,2,5,5,1)
  (same comment as for irrigation)
  properties: water content 9089.91, dry mass 0.11 kg, wet mass 1000 kg

## Inputs from nature
- Occupation, annual crop, non-irrigated, extensive [natural resource, land]: 0.073447 m2*year; lognormal variance with pedigree 0.0426, pedigree (2,1,5,5,1)
  Modelled, see chapter 'Land use' in '01_crop production_direct field emissions and natural resources_v1.0.pdf' - pdf-document on the dedicated talk page of ecoinvent (www.ecoinvent.org/documentation)
- Carbon dioxide, in air [natural resource, in air]: 0.457184 kg; = 44/12 * (REF_PRODUCT_C_content_non_fossil * REF_PRODUCT * REF_PRODUCT_DM - SEED_C_content_non_fossil * SEED * SEED_DM); lognormal variance with pedigree 0.0426, pedigree (2,1,5,5,1)
  Modelled,see chapter 'CO2 binding' in '01_crop production_direct field emissions and natural resources_v1.0.pdf' - pdf-document on the dedicated talk page of ecoinvent (www.ecoinvent.org/documentation)
- Transformation, from annual crop, non-irrigated, extensive [natural resource, land]: 0.20339 m2; lognormal variance with pedigree 0.0526, pedigree (2,1,5,5,1)
  (same comment as for Occupation, annual crop, non-irrigated, extensive)
- Transformation, to annual crop, non-irrigated, extensive [natural resource, land]: 0.20339 m2; lognormal variance with pedigree 0.0526, pedigree (2,1,5,5,1)
  (same comment as for Occupation, annual crop, non-irrigated, extensive)
- Energy, gross calorific value, in biomass [natural resource, biotic]: 5.311 MJ; lognormal variance with pedigree 0.0411891, pedigree (2,1,5,1,1)

## Emissions to nature
- Lead [water, surface water]: 2.803e-8 kg; lognormal variance with pedigree 0.1327, pedigree (2,2,5,5,1)
  Modelled, see chapter 'Emissions of heavy metals to agricultural soil, surface water and ground water' in '01_crop production_direct field emissions and natural resources_v1.0.pdf' - pdf-document on the dedicated talk page of ecoinvent (www.ecoinvent.org/documentation)
- Cadmium, ion [water, surface water]: 3.8538e-10 kg; lognormal variance with pedigree 0.1327, pedigree (2,2,5,5,1)
  (same comment as for Lead)
- Water [water, surface water]: 0.00119594 m3; name water_to_water_surface; lognormal variance with pedigree 0.1306, pedigree (4,3,5,5,4)
  Calculated value. See the parameters and their comments to understand the calculation.
  property fraction, origin: fresh water 1; name fraction_origin_fresh_water_Wsw
  property fraction, origin: salt water 0; name fraction_origin_salt_water_Wsw
- Nitrogen oxides [air, non-urban air or from high stacks]: 1.3146e-5 kg; = 0.21 * N2O; lognormal variance with pedigree 0.0727, pedigree (2,2,5,5,1)
  Modelled, see chapter 'Emissions of NOx to the air' in '01_crop production_direct field emissions and natural resources_v1.0.pdf' - pdf-document on the dedicated talk page of ecoinvent (www.ecoinvent.org/documentation)
- Water [air, unspecified]: 0.0030164 m3; name water_to_air_unspecified; lognormal variance with pedigree 0.0827, pedigree (2,2,5,5,1)
  Calculated value based on literature values and expert opinion. See comments in the parametres' comment field.
  property fraction, origin: salt water 0; name fraction_origin_salt_water
  property fraction, origin: unspecified 0; name fraction_origin_unspecified
  property fraction, origin: fresh water 1; name fraction_origin_fresh_water
- Chromium, ion [water, ground-]: 3.5619e-7 kg; lognormal variance with pedigree 0.1327, pedigree (2,2,5,5,1)
  (same comment as for Lead)
- Mercury [soil, agricultural]: 2.519e-8 kg; lognormal variance with pedigree 0.0827, pedigree (2,2,5,5,1)
  (same comment as for Lead)
- Zinc, ion [water, surface water]: 1.321e-7 kg; lognormal variance with pedigree 0.1327, pedigree (2,2,5,5,1)
  (same comment as for Lead)
- Zinc, ion [water, ground-]: 5.8176e-7 kg; lognormal variance with pedigree 0.1327, pedigree (2,2,5,5,1)
  (same comment as for Lead)
- Zinc [soil, agricultural]: -1.8657e-5 kg
  (same comment as for Lead)
- Copper [soil, agricultural]: -2.517e-6 kg
  (same comment as for Lead)
- Lead [water, ground-]: 5.7089e-9 kg; lognormal variance with pedigree 0.1327, pedigree (2,2,5,5,1)
  (same comment as for Lead)
- Dinitrogen monoxide [air, non-urban air or from high stacks]: 6.26e-5 kg; name N2O; lognormal variance with pedigree 0.0727, pedigree (2,2,5,5,1)
  Modelled, see chapter 'Emissions of N2O to the air' in '01_crop production_direct field emissions and natural resources_v1.0.pdf' - pdf-document on the dedicated talk page of ecoinvent (www.ecoinvent.org/documentation)
- Water [water, ground-]: 0.00478378 m3; name water_to_water_ground; lognormal variance with pedigree 0.1306, pedigree (4,3,5,5,4)
  Calculated value. See the parameters and their comments to understand the calculation.
  property fraction, origin: unspecified 0; name fraction_origin_unspecified_Wgw
  property fraction, origin: fresh water 1; name fraction_origin_fresh_water_Wgw
  property fraction, origin: salt water 0; name fraction_origin_salt_water_Wgw
- Copper, ion [water, ground-]: 7.183e-8 kg; lognormal variance with pedigree 0.1327, pedigree (2,2,5,5,1)
  (same comment as for Lead)
- Mercury [water, surface water]: 2.1804e-10 kg; lognormal variance with pedigree 0.1327, pedigree (2,2,5,5,1)
  (same comment as for Lead)
- Ammonia [air, non-urban air or from high stacks]: 0.000659256 kg; lognormal variance with pedigree 0.0527, pedigree (2,2,5,5,1)
  Modelled with the 'AGRAMMON model' described in '01_crop production_direct field emissions and natural resources_v1.0.pdf' - pdf-document on the dedicated talk page of ecoinvent (www.ecoinvent.org/documentation)
- Cadmium [soil, agricultural]: -3.759e-8 kg
  (same comment as for Lead)
- Cadmium, ion [water, ground-]: 5.3144e-10 kg; lognormal variance with pedigree 0.1327, pedigree (2,2,5,5,1)
  (same comment as for Lead)
- Chromium [soil, agricultural]: -6.4305e-7 kg
  (same comment as for Lead)
- Phosphate [water, ground-]: 1.8703e-6 kg; lognormal variance with pedigree 0.0827, pedigree (2,2,5,5,1)
  Modelled, see chapter 'Emissions of phosphorous to the water' in '01_crop production_direct field emissions and natural resources_v1.0.pdf' - pdf-document on the dedicated talk page of ecoinvent (www.ecoinvent.org/documentation)
- Nitrate [water, ground-]: 0.00292058 kg; lognormal variance with pedigree 0.0827, pedigree (2,2,5,5,1)
  Modelled with the 'SALCA-NO3 model' described in '01_crop production_direct field emissions and natural resources_v1.0.pdf' - pdf-document on the dedicated talk page of ecoinvent (www.ecoinvent.org/documentation)
- Lead [soil, agricultural]: -4.5258e-7 kg
  (same comment as for Lead)
- Nickel, ion [water, surface water]: 5.5773e-8 kg; lognormal variance with pedigree 0.1327, pedigree (2,2,5,5,1)
  (same comment as for Lead)
- Phosphate [water, surface water]: 6.2093e-6 kg; lognormal variance with pedigree 0.0827, pedigree (2,2,5,5,1)
  (same comment as for Phosphate)
- Phosphorus [water, surface water]: 2.9191e-6 kg; lognormal variance with pedigree 0.0827, pedigree (2,2,5,5,1)
  (same comment as for Phosphate)
- Nickel [soil, agricultural]: -1.7743e-8 kg
  (same comment as for Lead)
- Chromium, ion [water, surface water]: 6.1172e-8 kg; lognormal variance with pedigree 0.1327, pedigree (2,2,5,5,1)
  (same comment as for Lead)
- Copper, ion [water, surface water]: 6.0589e-8 kg; lognormal variance with pedigree 0.1327, pedigree (2,2,5,5,1)
  (same comment as for Lead)
- Mercury [water, ground-]: 2.2341e-10 kg; lognormal variance with pedigree 0.1327, pedigree (2,2,5,5,1)
  (same comment as for Lead)

## Sampling procedure
Data were compiled from statistics, pilot network, fertilising recommendations, documents from extension services, information provided by retailers and expert knowledge. The production data were verified and adjusted by a group of experts.

## Extrapolations
This dataset has been copied from an original dataset covering the geography CH.

## Review by Hans-Jörg Althaus 2009-01-22
passed
none
