# harvesting, sugarcane

Dataset: EcoSpold 2, unit process
Geography: RoW
Time period: 2012-01-01 to 2021-12-31
Technology level: current
Classification: EcoSpold01Categories: agricultural means of production/work processes
Classification: ISIC rev.4 ecoinvent: 0161:Support activities for crop production
Scenario: Business-as-Usual
System model: Allocation, cut-off by classification
Generated by: Otávio Cavalett
Published in: Cavalett O. 2016
Database: ecoinvent
isCopyrightProtected: true
accessRestrictedTo: 1

## General comment
This dataset represents the mechanized sugarcane harvesting operation in one hectare (ha). It considers green sugarcane i.e. sugarcane that has not been previously burned, with average yield - about 80 tons (wet basis) of sugarcane stalks per ha per year. Functional unit (FU) is one hectare of sugarcane harvested. The operation time is about 2.8 hours per ha (56.0% of this time is actually worked, discounting time for maintenance, waiting in the field and re-allocations between the plots).
Dataset authors:
Mateus Ferreira Chagas, CTBE, mateus.chagas@bioetanol.org.br; Otávio Cavalett, CTBE, otavio.cavalett@bioetanol.org.br; Terezinha de Fátima Cardoso, CTBE, terezinha.cardoso@bioetanol.org.br; Antonio Bonomi, CTBE, antonio.bonomi@bioetanol.org.br
References:
1. Cavalett, O., Chagas, M.F., Magalhães, P.S.G., Carvalho, J.L.N. Cardoso, T.F., Franco, HC.J., Braunbeck, O.A., Bonomi, A., 2016a. The Agricultural Produciton Model. In: Bonomi, A., Cavalett, O., Pereira da Cunha, M., Lima, M.A.P. (Eds.). Virtual Biorefinery: An Optimization Strategy for Renewable Carbon Valorization. 13-52.
2. Nemecek T, Kagi T (2007) Life Cycle Inventories of Agricultural Production Systems – Data v2.0, Zurich and Dubendorf: 2007

## Included activities start
From agricultural field foreseen to be processed.

## Included activities end
This activity ends with sugarcane loaded in the infield wagon by the sugarcane harvester. The dataset includes the diesel fuel consumption (49.4 L of diesel per hour of effective operation) and the amount of agricultural machinery and shed. Also taken into consideration is the amount of emissions to the air from diesel combustion. The emission to the soil from tyre abrasion during the work process is not included, since machines used in this operation are track harvester.

## Geography
The global dataset is modeled based on information from sugarcane production system in Brazilian South-Cental region.

## Technology
This activity is performed with a modern sugarcane harvester (track harvester, power 360 hp; weight 19000 kg), 1-row per pass. Life spam of sugarcane harvester is considered as 12000 operating hours. Machinery used, fuel consumption and operation efficiencies were based on data from sugarcane mills in Brazil, expert's informations and unpublished data.

## Time period
Most of the data used to modelling this activity were collected in the last few years (2012-2014).

## Reference product
- harvesting, sugarcane: 1 ha; CPC 86119: Other support services to crop production; By-product classification allocatable product
  production volume 1.47332e7 ha; = 27045769*0.888
    Estimated based global sugarcane production area, year 2014, according to the FAOSTAT data.This operation is assumed to occur in the 88.8% of mecanized harvesting area, taken into account the technology from sugarcane production area in the South-Central Brazilian region.
  property price 53.6596 EUR2005
    Calculated based on inputs: The price of the product has been calculated as a sum of the values of the material and energy inputs for this product. This value is therefore a rough estimation. It may underestimate the real price since there are additional expenses when producing any product. These expences can include for example labour costs, treatment of waste materials and profit for the producer. Please consider carefully whether this level of data quality is acceptable for your application.

## Inputs from technosphere
- harvester: 4.43305 kg; source Otávio Cavalett 2016; lognormal variance with pedigree 0.0052, pedigree (2,3,3,5,1)
  Proxy, based on data from sugarcane mills in Brazil, expert's informations and unpublished data. The main source of data for agricultural inputs and operations modelling prodedures is detailed in Cavalett et al., 2016.
- diesel: 0 kg; source Otávio Cavalett 2016; pedigree (1,1,1,1,1)
  (same comment as for harvester)
  properties: heating value, net 42.8 MJ, carbon content, fossil 0.865, dry mass 1 kg, wet mass 1 kg
  note on carbon content, fossil: C-content of diesel is 86.5% (ecoinvent v2.2 report 6_IV, Tab 3.14)
- shed: 0.002 m2; lognormal variance with pedigree 0.0146, pedigree (3,3,3,5,3)
  Proxy, based on ecoinvent database.
- diesel: 0.119534, 5.01821, 0.351505, 0.508059, 10.486, 49.5523 kg (6 entries); source Otávio Cavalett 2016; lognormal variance with pedigree 0.0052, pedigree (2,3,3,5,1)
  (same comment as for harvester)

## Emissions to nature
All rows: source Nemecek, T. 2007
- NMVOC, non-methane volatile organic compounds, unspecified origin [air, non-urban air or from high stacks]: 0.19811 kg; lognormal variance with pedigree 0.0641, pedigree (3,2,3,5,3)
  Proxy, based on 'Agricultural Field Work Processes'from Nemecek and Kagi, 2007. Emissions of CO, NOx and NMVOC were estimated based on avarege of the agricultural process used in sugarcane production.
- Dinitrogen monoxide [air, non-urban air or from high stacks]: 0.00792 kg; lognormal variance with pedigree 0.0641, pedigree (3,2,3,5,3)
  Proxy, based on 'Agricultural Field Work Processes'from Nemecek and Kagi, 2007.
- Selenium [air, non-urban air or from high stacks]: 6.6e-7 kg; lognormal variance with pedigree 0.0641, pedigree (3,2,3,5,3)
  Proxy, based on 'Agricultural Field Work Processes'from Nemecek and Kagi, 2007.
- Ammonia [air, non-urban air or from high stacks]: 0.00132 kg; lognormal variance with pedigree 0.0641, pedigree (3,2,3,5,3)
  Proxy, based on 'Agricultural Field Work Processes'from Nemecek and Kagi, 2007.
- Carbon monoxide, fossil [air, non-urban air or from high stacks]: 0.35659 kg; lognormal variance with pedigree 0.6641, pedigree (3,2,3,5,3)
  (same comment as for NMVOC, non-methane volatile organic compounds, unspecified origin)
- Nitrogen oxides [air, non-urban air or from high stacks]: 2.80651 kg; lognormal variance with pedigree 0.0541, pedigree (3,2,3,5,3)
  (same comment as for NMVOC, non-methane volatile organic compounds, unspecified origin)
- Nickel [air, non-urban air or from high stacks]: 4.62e-6 kg; lognormal variance with pedigree 0.6641, pedigree (3,2,3,5,3)
  Proxy, based on 'Agricultural Field Work Processes'from Nemecek and Kagi, 2007.
- PAH, polycyclic aromatic hydrocarbons [air, non-urban air or from high stacks]: 0.000217 kg; lognormal variance with pedigree 0.3241, pedigree (3,2,3,5,3)
  Proxy, based on 'Agricultural Field Work Processes'from Nemecek and Kagi, 2007.
- Carbon dioxide, fossil [air, non-urban air or from high stacks]: 206 kg; lognormal variance with pedigree 0.0241, pedigree (3,2,3,5,3)
  Proxy, based on 'Agricultural Field Work Processes'from Nemecek and Kagi, 2007.
- Benzo(a)pyrene [air, non-urban air or from high stacks]: 1.98e-6 kg; lognormal variance with pedigree 0.6641, pedigree (3,2,3,5,3)
  Proxy, based on 'Agricultural Field Work Processes'from Nemecek and Kagi, 2007.
- Cadmium [air, non-urban air or from high stacks]: 6.6e-7 kg; lognormal variance with pedigree 0.6641, pedigree (3,2,3,5,3)
  Proxy, based on 'Agricultural Field Work Processes'from Nemecek and Kagi, 2007.
- Chromium [air, non-urban air or from high stacks]: 3.3e-6 kg; lognormal variance with pedigree 0.6641, pedigree (3,2,3,5,3)
  Proxy, based on 'Agricultural Field Work Processes'from Nemecek and Kagi, 2007.
- Benzene [air, non-urban air or from high stacks]: 0.000482 kg; lognormal variance with pedigree 0.0641, pedigree (3,2,3,5,3)
  Proxy, based on 'Agricultural Field Work Processes'from Nemecek and Kagi, 2007.
- Sulfur dioxide [air, non-urban air or from high stacks]: 0.0667 kg; lognormal variance with pedigree 0.0241, pedigree (3,2,3,5,3)
  Proxy, based on 'Agricultural Field Work Processes'from Nemecek and Kagi, 2007.
- Particulates, < 2.5 um [air, non-urban air or from high stacks]: 0.43877 kg; lognormal variance with pedigree 0.0641, pedigree (3,2,3,5,3)
  Proxy, based on 'Agricultural Field Work Processes'from Nemecek and Kagi, 2007.
- Zinc [air, non-urban air or from high stacks]: 6.6e-5 kg; lognormal variance with pedigree 0.6641, pedigree (3,2,3,5,3)
  Proxy, based on 'Agricultural Field Work Processes'from Nemecek and Kagi, 2007.
- Copper [air, non-urban air or from high stacks]: 0.000112 kg; lognormal variance with pedigree 0.6641, pedigree (3,2,3,5,3)
  Proxy, based on 'Agricultural Field Work Processes'from Nemecek and Kagi, 2007.
- Methane, fossil [air, non-urban air or from high stacks]: 0.00852 kg; lognormal variance with pedigree 0.0641, pedigree (3,2,3,5,3)
  Proxy, based on 'Agricultural Field Work Processes'from Nemecek and Kagi, 2007.

## Sampling procedure
The main source of data for agricultural inputs and operations modelling procedures is detailed in Cavalett et al., 2016. Emissions from the agricultural process are estimated according to Nemecek and Kagi, 2007.

## Extrapolations
Extrapolated from Brazilian data, uncertainty adjusted accordingly.

## Review by Jens Lansche 2018-02-23
All review comments considered
