# door production, outer, wood-glass

Dataset: EcoSpold 2, unit process
Geography: RoW
Time period: 1997-01-01 to 2021-12-31
Technology level: current
Classification: EcoSpold01Categories: building components/doors
Classification: ISIC rev.4 ecoinvent: 1622:Manufacture of builders' carpentry and joinery
Tags: ConvertedDataset
Scenario: Business-as-Usual
System model: Allocation, cut-off by classification
Generated by: Martin Lehmann
Published in: Kellenberger D. 2007
Database: ecoinvent
isCopyrightProtected: true
accessRestrictedTo: 1

## General comment
The dataset can be applied to describe an average entrance door of a one-family house. The door frame is made of steel (paint coated), the door leaf is made of wood, planked with powder coated aluminium on both sides, with a glass insert (62 % wood, 38% glass). The lock, door handles and frame joints are fabricated from steel. Data are based on a door of 0.8x2.0 m and scaled to 1m2. 1 m2 of the aluminium planked massive wood-glass outer door weighs 36.5 kg. The functional life time for the door frame is 60 years, for the door leaf it is 30 years.
[This dataset was already contained in the ecoinvent database version 2. It was not individually updated during the transfer to ecoinvent version 3. Life Cycle Impact Assessment results may still have changed, as they are affected by changes in the supply chain, i.e. in other datasets. This dataset was generated following the ecoinvent quality guidelines for version 2. It may have been subject to central changes described in the ecoinvent version 3 change report (http://www.ecoinvent.org/database/ecoinvent-version-3/reports-of-changes/), and the results of the central updates were reviewed extensively. The changes added e.g. consistent water flows and other information throughout the database. The documentation of this dataset can be found in the ecoinvent reports of version 2, which are still available via the ecoinvent website. The change report linked above covers all central changes that were made during the conversion process.]

## Included activities end
This dataset describes the production of 1m2 (visible area) outer door, (entrance door), including the processes for the installation. Not included are transports from plant to construction site.

## Geography
Data from producers in Switzerland.

## Technology
The technology represents average European production.

## Parameters
- fraction, tap water, to air: 0.24 dimensionless; name fraction_TW_to_air; lognormal variance with pedigree 0.092025, pedigree (4,4,3,2,4)
- fraction, process water, to air: 0.24 dimensionless; name fraction_PW_to_air; lognormal variance with pedigree 0.092025, pedigree (4,4,3,2,4)

## Reference product
- door, outer, wood-glass: 1 m2; CPC 31600: Builders' joinery and carpentry of wood (including cellular wood panels, assembled parquet panels, shingles an[…]; By-product classification allocatable product
  EcoSpold01Location=RER
  production volume 2.67763 m2
    This is a placeholder value that does not reflect real-world production volumes. This dataset does not currently require a real-world production volume to work in the database framework, and no actual data were collected yet. This has no negative effect on the results of the ecoinvent database.
  property carbon content, fossil 0.032074
    Calculated as an addition of C content in the product, then referred to 1 kg DM.
  property price 67.8 EUR2005
    Calculated based on literature values. The price of 1 kg of wooden doors is calculated to be 1.86 euro/kg. This price is calculated as a weighted average of prices calculated based on import (net trade) of this material from the world into 5 big economies; EU, Japan, China, India, USA. The net weight and the trade value is obtained from the UN Comtrade database (commodity no. 441820 Doors, frames amd thresholds, of wood), year 2005. The weight of the door, outer, wood-glass is 36.5kg/m2 based on the description of the dataset.
  property carbon content 0.232566
    carbon content on a dry matter basis (reserved; not for manual entry)
  properties: carbon content, non-fossil 0.200492, dry mass 34.675 kg, water in wet mass 1.825 kg, water content 0.0526316, wet mass 36.5 kg, carbon allocation 8.06424 kg

## Inputs from technosphere
- waste polyethylene: 0 kg; pedigree (1,1,1,1,1)
  composite
  EcoSpold01Location=CH
  production volume 0 kg
    Calculated from the production volume of door, outer, wood-glass in proportion to the respective output amounts.
  properties: dry mass 0.996 kg, water content 0.00401606, carbon content, fossil 0.825301, heating value, net 42.47 MJ, wet mass 1 kg
  note on carbon content, fossil: C content in 1 kg DM was calculated using data in Tab A.1, ecoinvent v2.2 report 13_I
  note on heating value, net: Value taken from the general comment of the treatment dataset.
- electricity, medium voltage: 0 kWh; pedigree (1,1,1,1,1)
  EcoSpold01Location=UCTE
  composite
- glazing, double, U<1.1 W/m2K, laminated safety glass: 0.38 m2; lognormal variance with pedigree 0.0526, pedigree (1,3,5,5,1)
  EcoSpold01Location=RER
  properties: carbon content, fossil 0.0175264, wet mass 27.56 kg, dry mass 27.56 kg
  note on carbon content, fossil: Calculated as an addition of C content in the product, then referred to 1 kg DM.
- zinc coat, pieces, adjustment per micro-m: 50.6 m2; lognormal variance with pedigree 0.0526, pedigree (1,3,5,5,1)
  EcoSpold01Location=RER
- melamine formaldehyde resin: 0.0697 kg; lognormal variance with pedigree 0.0526, pedigree (1,3,5,5,1)
  EcoSpold01Location=RER
  properties: carbon content, fossil 0.311708, wet mass 1 kg, dry mass 1 kg, heating value, net 9.44 MJ
  note on carbon content, fossil: Chemical formula of the melamine formaldehide monomer was assumed to be C4H6N6O
- tap water: 0 kg; name tap_water_input; pedigree (1,1,1,1,1)
  EcoSpold01Location=RER
  properties: carbon content, fossil 0.00178991, water content 2962.17, wet mass 1 kg, dry mass 0.000337476 kg
  note on carbon content, fossil: Bicarbonate content is 2.93 mol/m3. CO2 content is 0.1 mol/m3 (ecoinvent v2.2 report 8, Tab 93.1).
- waste graphical paper: 0 kg; pedigree (1,1,1,1,1)
  EcoSpold01Location=CH
  production volume 0 kg
    (same comment as for waste polyethylene)
  properties: water content 0.126126, dry mass 0.888 kg, heating value, net 14.12 MJ, wet mass 1 kg, carbon content, non-fossil 0.454955
- aluminium, wrought alloy: 1.82 kg; lognormal variance with pedigree 0.052, pedigree (1,1,5,5,1)
  EcoSpold01Location=RER
  composite
  properties: dry mass 1 kg, wet mass 1 kg
- xylene: 0.000112 kg; lognormal variance with pedigree 0.0526, pedigree (1,3,5,5,1)
  EcoSpold01Location=RER
  properties: dry mass 1 kg, wet mass 1 kg, heating value, net 38.84 MJ, carbon content, fossil 0.905061
- steel, low-alloyed, hot rolled: 0.0106 kg; lognormal variance with pedigree 0.0526, pedigree (1,3,5,5,1)
  EcoSpold01Location=RER
  properties: dry mass 1 kg, wet mass 1 kg, carbon content, fossil 0.005
  note on carbon content, fossil: Low alloyed steel composition given in Tab. 3.2 ecoinvent v2.2 report 10_partII. Steel assumed to have a C content of 0.5%
- metal working factory: 1.35e-8 unit; lognormal variance with pedigree 0.3546, pedigree (2,4,5,5,1)
  EcoSpold01Location=RER
- municipal solid waste: 0 kg; pedigree (1,1,1,1,1)
  EcoSpold01Location=CH
  composite
  production volume 0 kg
    (same comment as for waste polyethylene)
  properties: water content 0.297017, wet mass 1 kg, heating value, net 11.74 MJ, carbon content, fossil 0.171549, carbon content, non-fossil 0.261655, dry mass 0.771 kg
  note on carbon content, fossil: MSW composition in tab 4.1, ecoinvent v2.2 report 13_I. C content referred to 1 kg DM
- lubricating oil: 0.00831 kg; lognormal variance with pedigree 0.0526, pedigree (1,3,5,5,1)
  EcoSpold01Location=RER
  properties: wet mass 1 kg, carbon content, fossil 0.75, dry mass 1 kg, heating value, net 40.2 MJ
  note on carbon content, fossil: Lubricating oil is produced from diesel. C-content/dry mass of fats and oils considered 75%, from: ecoinvent v2.2 report, n 15a, pg 40
  note on heating value, net: Literature value, Source: IPCC 2006, 2006 IPCC Guidelines for National Greenhouse Gas Inventories, Prepared by the National Greenhouse Gas Inventories Programme, Eggleston H.S., Buendia L., Miwa K., Ngara T. and Tanabe K. (eds). Published: IGES, Japan
- synthetic rubber: 0.312 kg; lognormal variance with pedigree 0.0526, pedigree (1,3,5,5,1)
  EcoSpold01Location=RER
  properties: wet mass 1 kg, heating value, net 26.42 MJ, dry mass 1 kg, carbon content, fossil 0.871949
  note on carbon content, fossil: EPDM (Ethylene-propene-diene terpolymer) rubber is a terpolymer of ethylene, propene, and a diene with the residual unsaturated portion of the diene in the side chain (ecoinvent v2.2 report 7-part XX & Ullmann). Chemical formula (deduced from Evidences of Solvent-Induced Miscibility in Polychloroprene-co-Ethylene-Propene Diene Terpolymer Blends, Dubey et al., Journal of Applied Polymer Science, 2009, 111:1884–1891): C20H35
- sawnwood, softwood, dried (u=10%), planed: 0.031 m3; lognormal variance with pedigree 0.052, pedigree (1,1,5,5,1)
  EcoSpold01Location=RER
  composite
  properties: heating value, net 6625.26 MJ, water content 0.1, wet mass 495 kg, carbon content, non-fossil 0.494, dry mass 450 kg
  note on carbon content, non-fossil: C content of dry mass is 0.494 kgC/kg dry wood (ecoinvent v2.2 report 9)
- chemical, organic: 0.00144 kg; lognormal variance with pedigree 0.052, pedigree (1,1,5,5,1)
  composite
  EcoSpold01Location=GLO
  properties: heating value, net 19.03 MJ, wet mass 1 kg, dry mass 1 kg, carbon content, fossil 0.628
  note on carbon content, fossil: This dataset is an unweighted average of 20 organic substances (listed in Tab 88.1, ecoinvent v2.2 report 8, part II), being part of the top100 chemicals included in this database. The C-content has also been calculated as an unweighted average of the C content of the substances composing this dataset.
- alkyd resin, long oil, without solvent, in 70% white spirit solution state: 0.00025 kg; lognormal variance with pedigree 0.0526, pedigree (1,3,5,5,1)
  EcoSpold01Location=RER
  properties: carbon content, fossil 0.268755, heating value, net 20.65 MJ, dry mass 1 kg, carbon content, non-fossil 0.412906, wet mass 1 kg
  note on carbon content, fossil: C content was calculated as an addition of C content in the raw materials.
- nylon 6-6: 0.002 kg; lognormal variance with pedigree 0.0526, pedigree (1,3,5,5,1)
  EcoSpold01Location=RER
  properties: carbon content, fossil 0.637168, wet mass 1 kg, dry mass 1 kg, heating value, net 30.9 MJ
  note on carbon content, fossil: Nylon 66 is derived from hexamethylene diamine and adipic acid and has the following structure: -(HN-(CH2)6-NH-CO-(CH2)4-CO)n- (ecoinvent v2.2 report 11_II), C12H22N2O2. MW=226 g/mol.
  note on heating value, net: Assumed equal to Nylon-66. Reference: Walters, R. N., Hackett, S. M. and Lyon, R. E. (2000) ‘Heats of combustion of high temperature polymers’, Fire and Materials, 24(5), pp. 245–252. doi: 10.1002/1099-1018(200009/10)24:5<245::AID-FAM744>3.0.CO;2-7.
- corrugated board box: 0 kg; pedigree (1,1,1,1,1)
  EcoSpold01Location=RER
  properties: carbon content, fossil 0.00365437, dry mass 0.945 kg, carbon content, non-fossil 0.450248, wet mass 1 kg, water content 0.0582011, heating value, net 12.86 MJ
- polyethylene, low density, granulate: 0.628 kg; lognormal variance with pedigree 0.052, pedigree (1,1,5,5,1)
  EcoSpold01Location=RER
  composite
  properties: carbon content, fossil 0.857143, heating value, net 42.47 MJ, wet mass 1 kg, dry mass 1 kg
  note on carbon content, fossil: Polyethylene is formed out of a huge amount of ethylene monomers (C2H4) (ecoinvent v2.2 report 11_II). MW=28 g/mol
- extrusion, plastic film: 0.00312 kg; lognormal variance with pedigree 0.0526, pedigree (1,3,5,5,1)
  EcoSpold01Location=RER
- zinc coat, coils: 0.938 m2; lognormal variance with pedigree 0.0526, pedigree (1,3,5,5,1)
  EcoSpold01Location=RER
- heat, district or industrial, natural gas: 0 MJ; pedigree (1,1,1,1,1)
  EcoSpold01Location=RER
  properties: heating value, net 1 MJ
- diesel, burned in building machine: 2.47 MJ; lognormal variance with pedigree 0.1726, pedigree (1,3,5,5,1)
  EcoSpold01Location=GLO
  properties: heating value, net 1 MJ
- sheet rolling, steel: 10.5 kg; lognormal variance with pedigree 0.0526, pedigree (1,3,5,5,1)
  EcoSpold01Location=RER
- zinc coat, pieces: 0.0394 m2; lognormal variance with pedigree 0.0526, pedigree (1,3,5,5,1)
  EcoSpold01Location=RER
- cement mortar: 0 kg; pedigree (1,1,1,1,1)
  EcoSpold01Location=CH
  properties: wet mass 1 kg, dry mass 1 kg
- inert waste: -0.00606 kg; lognormal variance with pedigree 0.0526, pedigree (1,3,5,5,1)
  EcoSpold01Location=CH
  production volume 0.01818 kg
    (same comment as for waste polyethylene)
  properties: wet mass 1 kg, dry mass 1 kg
- sheet rolling, aluminium: 1.67 kg; lognormal variance with pedigree 0.0526, pedigree (1,3,5,5,1)
  EcoSpold01Location=RER
- heptane: 7.5e-6 kg; lognormal variance with pedigree 0.0526, pedigree (1,3,5,5,1)
  EcoSpold01Location=RER
  properties: dry mass 1 kg, carbon content, fossil 0.84, wet mass 1 kg, heating value, net 44.77 MJ
- reinforcing steel: 10.9 kg; lognormal variance with pedigree 0.052, pedigree (1,1,5,5,1)
  EcoSpold01Location=RER
  composite
  properties: wet mass 1 kg, dry mass 1 kg, carbon content, fossil 0.004
- alkyd paint, white, without water, in 60% solution state: 0.262 kg; lognormal variance with pedigree 0.0526, pedigree (1,3,5,5,1)
  EcoSpold01Location=RER
  properties: carbon content, fossil 0.414587, dry mass 1 kg, wet mass 1 kg, carbon content, non-fossil 0.161654, heating value, net 17.46 MJ
- powder coat, aluminium sheet: 1.24 m2; lognormal variance with pedigree 0.054, pedigree (1,4,5,5,1)
  EcoSpold01Location=RER
- anodising, aluminium sheet: 0.0137 m2; lognormal variance with pedigree 0.0526, pedigree (1,3,5,5,1)
  EcoSpold01Location=RER
- waste wood, untreated: 0 kg; pedigree (1,1,1,1,1)
  EcoSpold01Location=CH
  production volume 0 kg
    (same comment as for waste polyethylene)
  properties: heating value, net 13.99 MJ, carbon content, non-fossil 0.48632, wet mass 1 kg, water content 0.25, dry mass 0.8 kg
  note on carbon content, non-fossil: Tab A.4, ecoinvent v2.2 report 13_I. C content has been referred to 1 kg DM,
- kraft paper: 0.108 kg; lognormal variance with pedigree 0.052, pedigree (1,1,5,5,1)
  EcoSpold01Location=RER
  composite
  properties: carbon content, fossil 0.0020219, wet mass 1 kg, heating value, net 14.11 MJ, carbon content, non-fossil 0.41662, dry mass 0.945 kg, water content 0.0582011
  note on carbon content, fossil: Fossil C content was calculated after fossil C contents of chemicals used in the production of the paper (in Tab 9.4 ecoinvent v2.2 report 11_III, part 9).
  note on carbon content, non-fossil: Biogenic C content was calculated after biogenic C contents of chemicals used in the production of the paper (in Tab 9.4 ecoinvent v2.2 report 11_III, part 9). The cellulose content in 1 kg of paper (on a wet mas basis) was estimated as (1-chemical content), C content of cellulose was considered 0.44 kgC/kg dry mass (ecoinvent v2.2 report, n 15a, pg 40)
- waste polyethylene: -0.0771748, -0.00515652, -0.000389979, -0.00212983, -0.000860426, -0.00202247, -0.540266 kg (7 entries); lognormal variance with pedigree 0.052, pedigree (1,1,5,5,1)
  composite
  EcoSpold01Location=CH
  production volume 1.884 kg
- electricity, medium voltage: 0.0695806, 0.0133426, 0.223994, 3.25779, 0.459188, 1.4961 kWh (6 entries); lognormal variance with pedigree 0.052, pedigree (1,1,5,5,1)
  EcoSpold01Location=UCTE
  composite
- tap water: 0.0778301, 0.00936865, 0.0154832, 0.390426, 0.0101568, 0.0288909, 4.46784 kg (7 entries); lognormal variance with pedigree 0.0526, pedigree (1,3,5,5,1)
  EcoSpold01Location=RER
- waste graphical paper: -0.000137423, -2.09851e-5, -1.83495e-6, -7.58279e-5, -7.39385e-6, -1.36868e-5, -0.00255285 kg (7 entries); lognormal variance with pedigree 0.0526, pedigree (1,3,5,5,1)
  EcoSpold01Location=CH
  production volume 0.00843 kg
- municipal solid waste: -0.000228539, -5.7586e-5, -8.22938e-5, -0.161632 kg (4 entries); lognormal variance with pedigree 0.052, pedigree (1,1,5,5,1)
  EcoSpold01Location=CH
  composite
  production volume 0.486 kg
- corrugated board box: 0.00145427, 0.123546 kg (2 entries); lognormal variance with pedigree 0.0526, pedigree (1,3,5,5,1)
  EcoSpold01Location=RER
- heat, district or industrial, natural gas: 0.0386682, 2.50895 MJ (2 entries); lognormal variance with pedigree 0.0526, pedigree (1,3,5,5,1)
  EcoSpold01Location=RER
- cement mortar: 0.250312, 49.7497 kg (2 entries); lognormal variance with pedigree 0.0526, pedigree (1,3,5,5,1)
  EcoSpold01Location=CH
- waste wood, untreated: -0.0075244, -0.000934267, -6.83055e-5, -0.00262407, -0.000396435, -0.00062673, -0.0998258 kg (7 entries); lognormal variance with pedigree 0.054, pedigree (1,4,5,5,1)
  EcoSpold01Location=CH
  production volume 0.336 kg

## Emissions to nature
- Water [water, unspecified]: 0.0038 m3; name water_to_water_unspecified; lognormal variance with pedigree 0.0827, pedigree (2,2,5,5,1)
  Calculated value based on literature values and expert opinion. See comments in the parametres' comment field.
  property carbon content, fossil 0; name C_content_fossil
  property water in wet mass 1000 kg; name WWM
  property fraction, origin: salt water 0; name fraction_origin_salt_water_Ww
  property fraction, origin: fresh water 1; name fraction_origin_fresh_water_Ww
  property fraction, origin: unspecified 0; name fraction_origin_unspecified_Ww
  property carbon content, non-fossil 0; name C_content_non_fossil
  property dry mass 0 kg; name DM
  property wet mass 1000 kg; name WM
- Water [air, unspecified]: 0.0012 m3; name water_to_air_unspecified; lognormal variance with pedigree 0.0827, pedigree (2,2,5,5,1)
  (same comment as for Water)
  property fraction, origin: salt water 0; name fraction_origin_salt_water
  property fraction, origin: unspecified 0; name fraction_origin_unspecified
  property fraction, origin: fresh water 1; name fraction_origin_fresh_water

## Sampling procedure
Published study, Internet search

## Extrapolations
see Geography This dataset has been copied from an original dataset covering the geography RER. The uncertainty has been adjusted accordingly.

## Review by Rolf Frischknecht 2007-11-13
passed
