# treatment of spoil from lignite mining, in surface landfill

Dataset: EcoSpold 2, unit process
Geography: GLO
Time period: 1985-01-01 to 2021-12-31
Technology level: current
Classification: EcoSpold01Categories: waste management/others
Classification: ISIC rev.4 ecoinvent: 3822:Treatment and disposal of hazardous waste
Synonyms: lignite mine waste rock; lignite mine overburden
Tags: ConvertedDataset; Treatment
Scenario: Business-as-Usual
System model: Allocation, cut-off by classification
Share of production covered: 1 %
Generated by: Gabor Doka (obsolete)
Published in: Dones R. 2007
Database: ecoinvent
isCopyrightProtected: true
accessRestrictedTo: 1

## General comment
[This dataset was already contained in the ecoinvent database version 2. It was not individually updated during the transfer to ecoinvent version 3. Life Cycle Impact Assessment results may still have changed, as they are affected by changes in the supply chain, i.e. in other datasets. This dataset was generated following the ecoinvent quality guidelines for version 2. It may have been subject to central changes described in the ecoinvent version 3 change report (http://www.ecoinvent.org/database/ecoinvent-version-3/reports-of-changes/), and the results of the central updates were reviewed extensively. The changes added e.g. consistent water flows and other information throughout the database. The documentation of this dataset can be found in the ecoinvent reports of version 2, which are still available via the ecoinvent website. The change report linked above covers all central changes that were made during the conversion process.]

## Included activities end
Waste-specific emissions from lignite spoil leachate. Short- and long-term emissions to groundwater from rainwater infiltration leaching. Leaching by lateral groundwater flow not included.

## Geography
Data represents a worldwide average. Generic water infiltration rate according to weighted mean of major sites of lignite spoil production in the world.

## Technology
Mechanically stable and revegetated lignite spoil backfill or heap.

## Time period
Average lignite spoil composition from literature references. Transfer coefficients from prospective model, specific to lignite spoil.

## Reference product
- spoil from lignite mining: -1 kg; By-product classification Waste; CPC 39990: Other wastes n.e.c.
  EcoSpold01Location=GLO
  production volume 1 kg
    Approx. 8580 Mio t/a lignite spoil generation
    Dummy value to be replaced by value to be calculated from the demand for this treatment activity
  property carbon content, fossil 0.007879
    Lignite spoil composition from Tab 3.1, (Doka G. (2009) Life Cycle Inventory of the disposal of lignite spoil, coal spoil and coal tailings. Doka Life Cycle Assessments, Zurich. Commissioned by the Swiss Centre for Life Cycle Inventories ecoinvent Centre)
  property price 0 EUR2005
    Waste products are assigned a price of zero as they are assumed to require further treatment.
  property carbon content 0.007879
    carbon content on a dry matter basis (reserved; not for manual entry)
  properties: water content 0, carbon content, non-fossil 0, dry mass 1 kg, water in wet mass 0 kg, wet mass 1 kg, carbon allocation 0.007879 kg

## Emissions to nature
- Thallium [water, ground-]: 2.1083e-11 kg; lognormal variance with pedigree 1.028, pedigree (1,1,4,1,1)
  Uncertainty is calculated from uncertainties in waste composition and transfer coefficients
- Mercury [water, ground-]: 9.9924e-11 kg; lognormal variance with pedigree 1.108, pedigree (1,1,4,1,1)
  (same comment as for Thallium)
- Magnesium [water, ground-]: 1.872e-5 kg; lognormal variance with pedigree 1.478, pedigree (1,1,4,1,1)
  (same comment as for Thallium)
- Magnesium [water, ground-, long-term]: 0.0017607 kg; lognormal variance with pedigree 1.118, pedigree (1,1,4,1,1)
  (same comment as for Thallium)
- Barium [water, ground-]: 5.0269e-9 kg; lognormal variance with pedigree 1.658, pedigree (1,1,4,1,1)
  (same comment as for Thallium)
- Scandium [water, ground-]: 4.886e-10 kg; lognormal variance with pedigree 1.318, pedigree (1,1,4,1,1)
  (same comment as for Thallium)
- Silicon [water, ground-]: 2.3552e-6 kg; lognormal variance with pedigree 1.348, pedigree (1,1,4,1,1)
  (same comment as for Thallium)
- Potassium, ion [water, ground-]: 1.8572e-6 kg; lognormal variance with pedigree 1.238, pedigree (1,1,4,1,1)
  (same comment as for Thallium)
- Selenium [water, ground-, long-term]: 5.0752e-7 kg; lognormal variance with pedigree 1.448, pedigree (1,1,4,1,1)
  (same comment as for Thallium)
- Cadmium, ion [water, ground-, long-term]: 8.8814e-8 kg; lognormal variance with pedigree 0.618, pedigree (1,1,4,1,1)
  (same comment as for Thallium)
- Cobalt [water, ground-]: 5.8685e-9 kg; lognormal variance with pedigree 1.608, pedigree (1,1,4,1,1)
  (same comment as for Thallium)
- Vanadium, ion [water, ground-]: 9.8203e-10 kg; lognormal variance with pedigree 1.998, pedigree (1,1,4,1,1)
  (same comment as for Thallium)
- Silver, ion [water, ground-, long-term]: 3.1241e-9 kg; lognormal variance with pedigree 0.008, pedigree (1,1,4,1,1)
  (same comment as for Thallium)
- Silicon [water, ground-, long-term]: 0.0014108 kg; lognormal variance with pedigree 7.858, pedigree (1,1,4,1,1)
  (same comment as for Thallium)
- Cadmium, ion [water, ground-]: 1.4827e-10 kg; lognormal variance with pedigree 1.198, pedigree (1,1,4,1,1)
  (same comment as for Thallium)
- Barium [water, ground-, long-term]: 3.0111e-6 kg; lognormal variance with pedigree 5.098, pedigree (1,1,4,1,1)
  (same comment as for Thallium)
- Tungsten [water, ground-, long-term]: 1.8649e-8 kg; lognormal variance with pedigree 0.108, pedigree (1,1,4,1,1)
  (same comment as for Thallium)
- Iron, ion [water, ground-, long-term]: 0.00023559 kg; lognormal variance with pedigree 3.558, pedigree (1,1,4,1,1)
  (same comment as for Thallium)
- Manganese [water, ground-, long-term]: 0.00014113 kg; lognormal variance with pedigree 1.378, pedigree (1,1,4,1,1)
  (same comment as for Thallium)
- Calcium, ion [water, ground-, long-term]: 0.0031802 kg; lognormal variance with pedigree 1.838, pedigree (1,1,4,1,1)
  (same comment as for Thallium)
- Nitrate [water, ground-, long-term]: 0.0001865 kg; lognormal variance with pedigree 0.008, pedigree (1,1,4,1,1)
  (same comment as for Thallium)
- Scandium [water, ground-, long-term]: 2.8324e-7 kg; lognormal variance with pedigree 2.268, pedigree (1,1,4,1,1)
  (same comment as for Thallium)
- Silver, ion [water, ground-]: 4.1588e-10 kg; lognormal variance with pedigree 0.118, pedigree (1,1,4,1,1)
  (same comment as for Thallium)
- Beryllium [water, ground-]: 3.646e-10 kg; lognormal variance with pedigree 0.898, pedigree (1,1,4,1,1)
  (same comment as for Thallium)
- Selenium [water, ground-]: 1.4229e-9 kg; lognormal variance with pedigree 1.988, pedigree (1,1,4,1,1)
  (same comment as for Thallium)
- Sulfate [water, ground-]: 0.00024329 kg; lognormal variance with pedigree 1.998, pedigree (1,1,4,1,1)
  (same comment as for Thallium)
- Titanium, ion [water, ground-]: 2.2097e-9 kg; lognormal variance with pedigree 1.808, pedigree (1,1,4,1,1)
  (same comment as for Thallium)
- Copper, ion [water, ground-, long-term]: 1.7993e-6 kg; lognormal variance with pedigree 0.768, pedigree (1,1,4,1,1)
  (same comment as for Thallium)
- Chloride [water, ground-, long-term]: 0.00043275 kg; lognormal variance with pedigree 0.028, pedigree (1,1,4,1,1)
  (same comment as for Thallium)
- Antimony [water, ground-]: 9.3786e-11 kg; lognormal variance with pedigree 1.198, pedigree (1,1,4,1,1)
  (same comment as for Thallium)
- Iron, ion [water, ground-]: 3.933e-7 kg; lognormal variance with pedigree 1.688, pedigree (1,1,4,1,1)
  (same comment as for Thallium)
- Aluminium [water, ground-, long-term]: 7.0848e-5 kg; lognormal variance with pedigree 8.458, pedigree (1,1,4,1,1)
  (same comment as for Thallium)
- Molybdenum [water, ground-]: 1.3182e-9 kg; lognormal variance with pedigree 1.208, pedigree (1,1,4,1,1)
  (same comment as for Thallium)
- Sodium, ion [water, ground-, long-term]: 0.0017701 kg; lognormal variance with pedigree 0.218, pedigree (1,1,4,1,1)
  (same comment as for Thallium)
- Tin, ion [water, ground-]: 2.8535e-11 kg; lognormal variance with pedigree 1.238, pedigree (1,1,4,1,1)
  (same comment as for Thallium)
- Antimony [water, ground-, long-term]: 5.3508e-8 kg; lognormal variance with pedigree 1.718, pedigree (1,1,4,1,1)
  (same comment as for Thallium)
- Nickel, ion [water, ground-]: 3.3029e-8 kg; lognormal variance with pedigree 0.998, pedigree (1,1,4,1,1)
  (same comment as for Thallium)
- Manganese [water, ground-]: 8.9128e-7 kg; lognormal variance with pedigree 1.798, pedigree (1,1,4,1,1)
  (same comment as for Thallium)
- Zinc, ion [water, ground-]: 2.6404e-8 kg; lognormal variance with pedigree 1.828, pedigree (1,1,4,1,1)
  (same comment as for Thallium)
- Copper, ion [water, ground-]: 3.0842e-9 kg; lognormal variance with pedigree 1.348, pedigree (1,1,4,1,1)
  (same comment as for Thallium)
- Zinc, ion [water, ground-, long-term]: 1.5816e-5 kg; lognormal variance with pedigree 1.228, pedigree (1,1,4,1,1)
  (same comment as for Thallium)
- Titanium, ion [water, ground-, long-term]: 1.3236e-6 kg; lognormal variance with pedigree 14.088, pedigree (1,1,4,1,1)
  (same comment as for Thallium)
- Nitrate [water, ground-]: 2.3076e-6 kg; lognormal variance with pedigree 0.348, pedigree (1,1,4,1,1)
  (same comment as for Thallium)
- Tungsten [water, ground-]: 4.4526e-11 kg; lognormal variance with pedigree 0.628, pedigree (1,1,4,1,1)
  (same comment as for Thallium)
- Phosphate [water, ground-]: 6.5699e-5 kg; lognormal variance with pedigree 0.658, pedigree (1,1,4,1,1)
  (same comment as for Thallium)
- Tin, ion [water, ground-, long-term]: 1.7093e-8 kg; lognormal variance with pedigree 5.968, pedigree (1,1,4,1,1)
  (same comment as for Thallium)
- Strontium [water, ground-, long-term]: 6.1426e-5 kg; lognormal variance with pedigree 0.278, pedigree (1,1,4,1,1)
  (same comment as for Thallium)
- Aluminium [water, ground-]: 1.1828e-7 kg; lognormal variance with pedigree 1.538, pedigree (1,1,4,1,1)
  (same comment as for Thallium)
- Lead [water, ground-, long-term]: 5.223e-8 kg; lognormal variance with pedigree 5.878, pedigree (1,1,4,1,1)
  (same comment as for Thallium)
- Sodium, ion [water, ground-]: 5.2813e-6 kg; lognormal variance with pedigree 0.748, pedigree (1,1,4,1,1)
  (same comment as for Thallium)
- Phosphate [water, ground-, long-term]: 0.00056438 kg; lognormal variance with pedigree 0.548, pedigree (1,1,4,1,1)
  (same comment as for Thallium)
- Arsenic, ion [water, ground-]: 8.9564e-10 kg; lognormal variance with pedigree 1.178, pedigree (1,1,4,1,1)
  (same comment as for Thallium)
- Chromium VI [water, ground-, long-term]: 1.1223e-6 kg; lognormal variance with pedigree 3.838, pedigree (1,1,4,1,1)
  (same comment as for Thallium)
- Potassium, ion [water, ground-, long-term]: 0.001015 kg; lognormal variance with pedigree 1.218, pedigree (1,1,4,1,1)
  (same comment as for Thallium)
- Arsenic, ion [water, ground-, long-term]: 5.2241e-7 kg; lognormal variance with pedigree 2.388, pedigree (1,1,4,1,1)
  (same comment as for Thallium)
- Beryllium [water, ground-, long-term]: 2.1839e-7 kg; lognormal variance with pedigree 0.748, pedigree (1,1,4,1,1)
  (same comment as for Thallium)
- Fluoride [water, ground-, long-term]: 1.7351e-6 kg; lognormal variance with pedigree 0.008, pedigree (1,1,4,1,1)
  (same comment as for Thallium)
- Mercury [water, ground-, long-term]: 4.8499e-8 kg; lognormal variance with pedigree 0.548, pedigree (1,1,4,1,1)
  (same comment as for Thallium)
- Strontium [water, ground-]: 4.9465e-7 kg; lognormal variance with pedigree 0.668, pedigree (1,1,4,1,1)
  (same comment as for Thallium)
- Sulfate [water, ground-, long-term]: 0.014252 kg; lognormal variance with pedigree 1.688, pedigree (1,1,4,1,1)
  (same comment as for Thallium)
- Calcium, ion [water, ground-]: 4.6947e-5 kg; lognormal variance with pedigree 2.158, pedigree (1,1,4,1,1)
  (same comment as for Thallium)
- Cobalt [water, ground-, long-term]: 3.47e-6 kg; lognormal variance with pedigree 1.018, pedigree (1,1,4,1,1)
  (same comment as for Thallium)
- Lead [water, ground-]: 8.7195e-11 kg; lognormal variance with pedigree 2.158, pedigree (1,1,4,1,1)
  (same comment as for Thallium)
- Nickel, ion [water, ground-, long-term]: 1.6046e-5 kg; lognormal variance with pedigree 0.438, pedigree (1,1,4,1,1)
  (same comment as for Thallium)
- Thallium [water, ground-, long-term]: 1.2629e-8 kg; lognormal variance with pedigree 2.678, pedigree (1,1,4,1,1)
  (same comment as for Thallium)
- Molybdenum [water, ground-, long-term]: 7.0348e-7 kg; lognormal variance with pedigree 1.038, pedigree (1,1,4,1,1)
  (same comment as for Thallium)
- Chloride [water, ground-]: 1.2256e-5 kg; lognormal variance with pedigree 0.278, pedigree (1,1,4,1,1)
  (same comment as for Thallium)
- Chromium VI [water, ground-]: 1.8966e-9 kg; lognormal variance with pedigree 1.448, pedigree (1,1,4,1,1)
  (same comment as for Thallium)
- Fluoride [water, ground-]: 1.2485e-7 kg; lognormal variance with pedigree 0.168, pedigree (1,1,4,1,1)
  (same comment as for Thallium)
- Vanadium, ion [water, ground-, long-term]: 5.834e-7 kg; lognormal variance with pedigree 5.098, pedigree (1,1,4,1,1)
  (same comment as for Thallium)

## Sampling procedure
Disposal model based on observed leachate concentrations in literature. Extrapolated to 60'000 years heeding chemical characteristics. Initial spoil composition from various literature sources.

## Extrapolations
This dataset has been extrapolated from year 2009 to the year of the calculation (2021). The uncertainty has been adjusted accordingly.

## Review by Christian Bauer 2010-02-09
passed.
none
