# 2,4-dichlorotoluene production

Dataset: EcoSpold 2, unit process
Geography: RER
Time period: 2010-01-01 to 2021-12-31
Technology level: current
Classification: ISIC rev.4 ecoinvent: 2011:Manufacture of basic chemicals
Synonyms: C7H6Cl2
Scenario: Business-as-Usual
System model: Allocation, cut-off by classification
Share of production covered: 100 %
Generated by: Jürgen Sutter
Database: ecoinvent
isCopyrightProtected: true
accessRestrictedTo: 1

## General comment
The process "2,4-dichlorotoluene, at plant, RER" is modelled for the production of 2,4-dichlorotoluene from toluene in Europe. Raw materials are modelled with a stoechiometric calculation. Emissions are estimated. Energy consumptions, infrastructure and transports are calculated with standard values.
2,4-Dichlorotoluene (C7H6Cl2; CAS 95-73-8) is a colourless and flammable liquid. It is a good solvent, miscible with most organic solvents, and insoluble in water. 2,4-Dichlorotoluene is produced by chlorination of toluene.
C7H8 + 2 Cl2 → C7H6Cl2 + 2 HCl
.
2,4-Dichlorotoluene is used via its side-chain-chlorinated intermediates to produce fungicides, dyes, pharmaceuticals, preservatives, and peroxides (curing agents for silicones and polyesters).
Frischknecht R., Jungbluth N., Althaus H.-J., Doka G., Dones R., Heck T., Hellweg S., Hischier R., Nemecek T., Rebitzer G. and Spielmann M. (2007) Overview and Methodology. Final report ecoinvent v2.0 No. 1. Swiss Centre for Life Cycle Inventories, Dübendorf, CH, retrieved from: www.ecoinvent.org.

Gendorf (2000) Umwelterklärung 2000, Werk Gendorf. Werk Gendorf, Burgkirchen as pdf-File under: http://www.gendorf.de/pdf/umwelterklaerung2000.pdf

Manfred Rossberg, Wilhelm Lendle, Gerhard Pfleiderer, Adolf Tögel, Eberhard-Ludwig Dreher, Ernst Langer, Heinz Rassaerts, Peter Kleinschmidt, Heinz Strack, Richard Cook, Uwe Beck, Karl-August Lipper, Theodore R. Torkelson, Eckhard Löser, Klaus K. Beutel, Trevor Mann: Chlorinated Hydrocarbons. Published online: 2006. In: Ullmann's Encyclopedia of Industrial Chemistry, Seventh Edition, 2004 Electronic Release (ed. Fiedler E., Grossmann G., Kersebohm D., Weiss G. and Witte C.). 7 th Elec-tronic Release Edition. Wiley InterScience, New York, DOI: 10.1002/14356007.a06_233.pub2
Frischknecht R., Jungbluth N., Althaus H.-J., Doka G., Dones R., Heck T., Hellweg S., Hischier R., Nemecek T., Rebitzer G. and Spielmann M. (2007) Overview and Methodology. Final report ecoinvent v2.0 No. 1. Swiss Centre for Life Cycle Inventories, Dübendorf, CH, retrieved from: www.ecoinvent.org.

Gendorf (2000) Umwelterklärung 2000, Werk Gendorf. Werk Gendorf, Burgkirchen as pdf-File under: http://www.gendorf.de/pdf/umwelterklaerung2000.pdf

Manfred Rossberg, Wilhelm Lendle, Gerhard Pfleiderer, Adolf Tögel, Eberhard-Ludwig Dreher, Ernst Langer, Heinz Rassaerts, Peter Kleinschmidt, Heinz Strack, Richard Cook, Uwe Beck, Karl-August Lipper, Theodore R. Torkelson, Eckhard Löser, Klaus K. Beutel, Trevor Mann: Chlorinated Hydrocarbons. Published online: 2006. In: Ullmann's Encyclopedia of Industrial Chemistry, Seventh Edition, 2004 Electronic Release (ed. Fiedler E., Grossmann G., Kersebohm D., Weiss G. and Witte C.). 7 th Elec-tronic Release Edition. Wiley InterScience, New York, DOI: 10.1002/14356007.a06_233.pub2

## Included activities end
Production of 2,4-dichlorotoluene including materials, energy uses, infrastructure and emissions.

## Geography
The inventory is modelled for Europe.

## Technology
Chlorination of toluene

## Time period
Time of publications

## Parameters
- fraction, cooling water, once-through system, to air: 0.004 dimensionless; name fraction_CW_OT_to_air; lognormal variance with pedigree 0.0413, pedigree (2,3,1,3,1)
  Calculated based on literature value (Scown, C.D., 2011, Water Footprint of U.S. Transportation Fuels and supplying information of the article) (Vionnet, S., Quantis Water Database - Technical Report, 2012).
- fraction, cooling water, cooling pond system, to air: 0.032 dimensionless; name fraction_CW_CP_to_air; lognormal variance with pedigree 0.0413, pedigree (2,3,1,3,1)
  (same comment as for fraction, cooling water, once-through system, to air)
- fraction, cooling water, recirculating system, to air: 0.771 dimensionless; name fraction_CW_R_to_air; lognormal variance with pedigree 0.0413, pedigree (2,3,1,3,1)
  (same comment as for fraction, cooling water, once-through system, to air)
- fraction, cooling water, to air: 0.3875 dimensionless; name fraction_CW_to_air; = (0.5*fraction_CW_OT_to_air)+(0.5*fraction_CW_R_to_air); lognormal variance with pedigree 0.092025, pedigree (4,4,3,2,4)
  Calculated value based on literature value (see comments of the other parametres present in this dataset) and expert opinion. In the case when no industry/literature data are available about the type of cooling or directly fraction, cooling water, to air specific for the process a default assumption is applied. It is assumed that the once-through cooling system is used in 50% of all cases and recirculating system is used in another 50% of all cases.

## Reference product
- 2,4-dichlorotoluene: 1 kg; By-product classification allocatable product; CPC 341: Basic organic chemicals; CAS 95-73-8
  EcoSpold01Location=RER
  production volume 7e6 kg
    1984 (http://www.chem.unep.ch/irptc/sids/oecdsids/95738.pdf)
  property carbon content, fossil 0.52212
    Calculated based on molecular structure. See tab "chemicals".
  property heating value, net 20.34 MJ
    LHV is calculated based on the elemental composition of the substance. Based on the CAS number of the substance (000095-73-8), which is found manually, the chemical formula of the substance is found to be: C7H6Cl2, (PubChem 2020).
    Reference: Kim, S., Chen, J., Cheng, T., Gindulyte, A., He, J., He, S., Li, Q., Shoemaker, B. A., Thiessen, P. A., Yu, B., Zaslavsky, L., Zhang, J., & Bolton, E. E. (2019). PubChem 2019 update: improved access to chemical data. Nucleic acids research, 47(D1), D1102–D1109. https://doi.org/10.1093/nar/gky1033
  property price 0.795279 EUR2005
    Calculated based on inputs: The price of the product has been calculated as a sum of the values of the material and energy inputs for this product. This value is therefore a rough estimation. It may underestimate the real price since there are additional expenses when producing any product. These expences can include for example labour costs, treatment of waste materials and profit for the producer. Please consider carefully whether this level of data quality is acceptable for your application.
  property carbon content 0.52212
    carbon content on a dry matter basis (reserved; not for manual entry)
  properties: water in wet mass 0 kg, dry mass 1 kg, wet mass 1 kg, water content 0, carbon content, non-fossil 0, carbon allocation 0.52212 kg

## Inputs from technosphere
- electricity, medium voltage: 0.333 kWh; lognormal variance with pedigree 0.1786, pedigree (4,5,5,5,5)
  EcoSpold01Location=UCTE
  There was no information available on the amount of energy used for the production process. In order not to neglect the process energy demand those values were approximated with data from an large chemical plant site in Germany producing 2.05 Mt a-1 (intermediates included) of different chemicals (Gendorf (2000)). The values for the energy consumption per kg of product of this plant (3.2 MJ kg-1) were used as approximation for the energy consumption of the 2,4-dichlorotoluene production. This total energy demand contains a split of 50% natural gas, 38% electricity and 12% steam from external energy sources. For this inventory all energy used for heat or steam was assumed to be natural gas. For this inventory an amount of 2 MJ natural gas and 0.333 kW electricity per kg product was used.
  Uncertainty: Estimation
- chlorine, liquid: 0.88384 kg; lognormal variance with pedigree 0.0335, pedigree (4,5,4,1,1)
  EcoSpold01Location=RER
  As there was no data available for the production of 2,4-dichlorotoluene, the values for the consumption of the raw materials are calculated with an assumed yield of 95 % (Frischknecht et al. 2007).
  Uncertainty: Stoechiometric calculation
- chemical factory, organics: 4e-10 unit; lognormal variance with pedigree 0.3184, pedigree (4,5,5,5,5)
  EcoSpold01Location=RER
  No information was readily available about infrastructure and land-use of 2,4-dichlorotoluene production plants. Therefore, in this study, the infrastructure is estimated based on the module "chemical plant, organics". This module assumes a built area of about 4.2 ha, an average output of 50'000 t/a, and plant life of fifty years. For this study, the estimated value is 4.00 E-10 units per kg of produced chemical.
  Uncertainty: Estimation
- sodium hydroxide, without water, in 50% solution state: 0.5 kg; lognormal variance with pedigree 0.0335, pedigree (4,5,4,1,1)
  The produced hydrogen chloride is considered to be neutralized with sodium hydroxide.
  EcoSpold01Location=RER
  Uncertainty: Stoechiometric calculation
  properties: dry mass 1 kg, wet mass 1 kg, heating value, net 3.03 MJ
- toluene, liquid: 0.58081 kg; lognormal variance with pedigree 0.0335, pedigree (4,5,4,1,1)
  As there was no data available for the production of 2,4-dichlorotoluene, the values for the consumption of the raw materials are calculated with an assumed yield of 95 % (Frischknecht et al. 2007).
  EcoSpold01Location=RER
  Uncertainty: Stoechiometric calculation
  properties: carbon content, fossil 0.913043, wet mass 1 kg, dry mass 1 kg, heating value, net 38.17 MJ
- heat, from steam, in chemical industry: 2 MJ; lognormal variance with pedigree 0.1786, pedigree (4,5,5,5,5)
  There was no information available on the amount of energy used for the production process. In order not to neglect the process energy demand those values were approximated with data from an large chemical plant site in Germany producing 2.05 Mt a-1 (intermediates included) of different chemicals (Gendorf (2000)). The values for the energy consumption per kg of product of this plant (3.2 MJ kg-1) were used as approximation for the energy consumption of the 2,4-dichlorotoluene production. This total energy demand contains a split of 50% natural gas, 38% electricity and 12% steam from external energy sources. For this inventory all energy used for heat or steam was assumed to be natural gas. For this inventory an amount of 2 MJ natural gas and 0.333 kW electricity per kg product was used.
  EcoSpold01Location=RER
  Uncertainty: Estimation
  properties: heating value, net 1 MJ

## Inputs from nature
- Water, cooling, unspecified natural origin [natural resource, in water]: 0.024 m3; name water_cooling_UNO_input; lognormal variance with pedigree 0.0335, pedigree (4,5,4,1,1)
  There was no information available on the amount of cooling water used within the plant. In order not to neglect the process cooling water demand this value was approximated with data from an large chemical plant site in Germany producing 2.05 Mt a-1 (intermediates included) of different chemicals (Gendorf 2000). In this plant in total an average 24 kg water per kg of product were used for. This value was used in this inventory as approximation for the cooling water consumption of the 2,4-dichlorotoluene production.
  There was no information available on the amount of cooling water used within the plant. In order not to neglect the process cooling water demand this value was approximated with data from an large chemical plant site in Germany producing 2.05 Mt a-1 (intermediates included) of different chemicals (Gendorf 2000). In this plant in total an average 24 kg water per kg of product were used for. This value was used in this inventory as approximation for the cooling water consumption of the 2,4-dichlorotoluene production.
  Uncertainty: Estimation

## Emissions to nature
- Sodium, ion [water, surface water]: 0.2875 kg; lognormal variance with pedigree 0.6642, pedigree (4,5,5,5,5)
  Estimation
  Uncertainty: Estimation
- Carbon dioxide, fossil [air, urban air close to ground]: 0.014 kg; lognormal variance with pedigree 0.1786, pedigree (4,5,5,5,5)
  The carbon contained in the removed toluene is accounted as CO2 emissions to air.
  Uncertainty: Estimation
- Water [water, unspecified]: 0.0147 m3; name water_to_water_unspecified; = water_cooling_UNO_input*(1-fraction_CW_to_air); lognormal variance with pedigree 0.130025, pedigree (4,4,5,2,4)
  Calculated value based on literature values and expert opinion. See comments in the parametres' comment field.
  property fraction, origin: unspecified 1; name fraction_origin_unspecified_Ww
  property fraction, origin: fresh water 0; name fraction_origin_fresh_water_Ww
  property fraction, origin: salt water 0; name fraction_origin_salt_water_Ww
- Water [air, unspecified]: 0.0093 m3; name water_to_air_unspecified; = water_cooling_UNO_input*fraction_CW_to_air; lognormal variance with pedigree 0.130025, pedigree (4,4,5,2,4)
  (same comment as for Water)
  property fraction, origin: fresh water 0; name fraction_origin_fresh_water
  property fraction, origin: salt water 0; name fraction_origin_salt_water
  property fraction, origin: unspecified 1; name fraction_origin_unspecified
- BOD5, Biological Oxygen Demand [water, surface water]: 0.00139 kg; lognormal variance with pedigree 0.218, pedigree (4,5,5,5,5)
  The values for COD, BOD, TOC, and DOC used in this inventory are calculated from the amount of toluene in the treated waste water assuming a carbon conversion of 96% for COD. For the calculation of the values for BOD and DOC the worst case scenario BOD = COD and TOC = DOC is used.
  Uncertainty: Estimation
- Chloride [water, surface water]: 0.44457 kg; lognormal variance with pedigree 0.3184, pedigree (4,5,5,5,5)
  The remaining chlorine is calculated as chloride emission.
  Uncertainty: Estimation
- Toluene [water, surface water]: 0.00046465 kg; lognormal variance with pedigree 0.3184, pedigree (4,5,5,5,5)
  The remaining amount of unreacted tolene is assumed to leave the production process with the waste water. Further it was assumed that this wastewater is treated in a internal wastewater plant. The removal efficiency for toluene is assumed with 90%.
  Uncertainty: Estimation
- TOC, Total Organic Carbon [water, surface water]: 0.000424 kg; lognormal variance with pedigree 0.218, pedigree (4,5,5,5,5)
  (same comment as for BOD5, Biological Oxygen Demand)
- Toluene [air, urban air close to ground]: 0.0011616 kg; lognormal variance with pedigree 0.1786, pedigree (4,5,5,5,5)
  There was no data available on process emissions to air for the 2,4-dichlorotoluene production. As approximation the air emissions occurring from the purge vent, the distillation vent and fugitive emission sources were estimated to 0.2% of the toluene and the chlorine input.
  Uncertainty: Estimation
- DOC, Dissolved Organic Carbon [water, surface water]: 0.000424 kg; lognormal variance with pedigree 0.218, pedigree (4,5,5,5,5)
  (same comment as for BOD5, Biological Oxygen Demand)
- COD, Chemical Oxygen Demand [water, surface water]: 0.00139 kg; lognormal variance with pedigree 0.218, pedigree (4,5,5,5,5)
  (same comment as for BOD5, Biological Oxygen Demand)
- Chlorine [air, urban air close to ground]: 0.0017677 kg; lognormal variance with pedigree 0.1786, pedigree (4,5,5,5,5)
  (same comment as for Toluene)

## Sampling procedure
Literature data

## Extrapolations
This dataset has been extrapolated from year 2010 to the year of the calculation (2021). The uncertainty has been adjusted accordingly.

## Review by Roland Hischier 2011-04-12
automatic validation in Excel
none
