# basic oxygen furnace slag to market for basic oxygen furnace slag, for recovery

Dataset: EcoSpold 2, unit process
Geography: RER
Time period: 2020-01-01 to 2025-12-31
Technology level: current
Classification: ISIC rev.4 ecoinvent: 3821:Treatment and disposal of non-hazardous waste
Scenario: Business-as-Usual
System model: Allocation, cut-off by classification
Generated by: Avraam Symeonidis
Database: ecoinvent
isCopyrightProtected: true
accessRestrictedTo: 1

## General comment
This is a renaming activity. Its purpose is to link 'basic oxygen furnace slag' to the 'market for basic oxygen furnace slag, for recovery'. This represents the share of basic oxygen furnace slag that is recovered for use via internal (in iron and steelmaking) or external routes (e.g. cement making).Through this renaming, the by-product classification of the basic oxygen furnace slag is changed from 'waste' to 'recyclable material'.

## Included activities start
Activity starts with the reception of 'basic oxygen furnace slag'.

## Included activities end
Activity ends with the 'basic oxygen furnace slag, for recovery' being ready for transportation.

## Reference product
- basic oxygen furnace slag: -1 kg; name RP; By-product classification Waste; CPC 39310: Slag, dross, scalings and other waste from the manufacture of iron or steel
  production volume 1.27675e10 kg; name PVRP
    Assuming that 69.9% of basic oxygen furnace secondary metallurgy slag produced through iron and steelmaking is recovered for recycling either in other iron and steemaking operations or or externally, e.g. cement making (worldsteel, 2010).
    References:
    Worldsteel (2010). Steel industry by-products. World Steel Association: Brussels, Belgium.
  property heating value, net 0 MJ
    Non combustible products are assumed to have an LHV equal to zero (0).
  property price 0 EUR2005; name RP_price_EUR2005
    Waste products are assigned a price of zero as they are assumed to require further treatment.
  property oxygen content 0.325896
    The value of 'oxygen content' is documented in Turner & Symeonidis, 2020. Reference: Turner David & Symeonidis Avraam, 2020, Life cycle inventories of the treatment of iron and steelmaking by-products, ecoinvent association, Zürich, Switzerland
  property chlorine content 0.000100503
    The value of 'chlorine content' is documented in Turner & Symeonidis, 2020. Reference: Turner David & Symeonidis Avraam, 2020, Life cycle inventories of the treatment of iron and steelmaking by-products, ecoinvent association, Zürich, Switzerland
  property chromium content 0.00190955
    The value of 'chromium content' is documented in Turner & Symeonidis, 2020. Reference: Turner David & Symeonidis Avraam, 2020, Life cycle inventories of the treatment of iron and steelmaking by-products, ecoinvent association, Zürich, Switzerland
  property antimony content 3.31658e-6
    The value of 'antimony content' is documented in Turner & Symeonidis, 2020. Reference: Turner David & Symeonidis Avraam, 2020, Life cycle inventories of the treatment of iron and steelmaking by-products, ecoinvent association, Zürich, Switzerland
  property thallium content 7.23618e-6
    The value of 'thallium content' is documented in Turner & Symeonidis, 2020. Reference: Turner David & Symeonidis Avraam, 2020, Life cycle inventories of the treatment of iron and steelmaking by-products, ecoinvent association, Zürich, Switzerland
  property silicon content 0.0620101
    The value of 'silicon content' is documented in Turner & Symeonidis, 2020. Reference: Turner David & Symeonidis Avraam, 2020, Life cycle inventories of the treatment of iron and steelmaking by-products, ecoinvent association, Zürich, Switzerland
  property copper content 1.90955e-5
    The value of 'copper content' is documented in Turner & Symeonidis, 2020. Reference: Turner David & Symeonidis Avraam, 2020, Life cycle inventories of the treatment of iron and steelmaking by-products, ecoinvent association, Zürich, Switzerland
  property cobalt content 3.8191e-6
    The value of 'cobalt content' is documented in Turner & Symeonidis, 2020. Reference: Turner David & Symeonidis Avraam, 2020, Life cycle inventories of the treatment of iron and steelmaking by-products, ecoinvent association, Zürich, Switzerland
  property nickel content 1.11558e-5
    The value of 'nickel content' is documented in Turner & Symeonidis, 2020. Reference: Turner David & Symeonidis Avraam, 2020, Life cycle inventories of the treatment of iron and steelmaking by-products, ecoinvent association, Zürich, Switzerland
  property carbon content, fossil 0.00356784
    The value of 'carbon content, fossil' is documented in Turner & Symeonidis, 2020. Reference: Turner David & Symeonidis Avraam, 2020, Life cycle inventories of the treatment of iron and steelmaking by-products, ecoinvent association, Zürich, Switzerland
  property titanium content 0.00482412
    The value of 'titanium content' is documented in Turner & Symeonidis, 2020. Reference: Turner David & Symeonidis Avraam, 2020, Life cycle inventories of the treatment of iron and steelmaking by-products, ecoinvent association, Zürich, Switzerland
  property phosphorus content 0.00687437
    The value of 'phosphorus content' is documented in Turner & Symeonidis, 2020. Reference: Turner David & Symeonidis Avraam, 2020, Life cycle inventories of the treatment of iron and steelmaking by-products, ecoinvent association, Zürich, Switzerland
  property sodium content 0.000524623
    The value of 'sodium content' is documented in Turner & Symeonidis, 2020. Reference: Turner David & Symeonidis Avraam, 2020, Life cycle inventories of the treatment of iron and steelmaking by-products, ecoinvent association, Zürich, Switzerland
  property mercury content 1.00503e-7
    The value of 'mercury content' is documented in Turner & Symeonidis, 2020. Reference: Turner David & Symeonidis Avraam, 2020, Life cycle inventories of the treatment of iron and steelmaking by-products, ecoinvent association, Zürich, Switzerland
  property molybdenum content 2.51256e-5
    The value of 'molybdenum content' is documented in Turner & Symeonidis, 2020. Reference: Turner David & Symeonidis Avraam, 2020, Life cycle inventories of the treatment of iron and steelmaking by-products, ecoinvent association, Zürich, Switzerland
  property iron content 0.19196
    The value of 'iron content' is documented in Turner & Symeonidis, 2020. Reference: Turner David & Symeonidis Avraam, 2020, Life cycle inventories of the treatment of iron and steelmaking by-products, ecoinvent association, Zürich, Switzerland
  property tin content 6.53266e-6
    The value of 'tin content' is documented in Turner & Symeonidis, 2020. Reference: Turner David & Symeonidis Avraam, 2020, Life cycle inventories of the treatment of iron and steelmaking by-products, ecoinvent association, Zürich, Switzerland
  property arsenic content 1.90955e-6
    The value of 'arsenic content' is documented in Turner & Symeonidis, 2020. Reference: Turner David & Symeonidis Avraam, 2020, Life cycle inventories of the treatment of iron and steelmaking by-products, ecoinvent association, Zürich, Switzerland
  property aluminium content 0.0113568
    The value of 'aluminium content' is documented in Turner & Symeonidis, 2020. Reference: Turner David & Symeonidis Avraam, 2020, Life cycle inventories of the treatment of iron and steelmaking by-products, ecoinvent association, Zürich, Switzerland
  property cadmium content 2.51256e-6
    The value of 'cadmium content' is documented in Turner & Symeonidis, 2020. Reference: Turner David & Symeonidis Avraam, 2020, Life cycle inventories of the treatment of iron and steelmaking by-products, ecoinvent association, Zürich, Switzerland
  property sulfur content 0.00149749
    The value of 'sulfur content' is documented in Turner & Symeonidis, 2020. Reference: Turner David & Symeonidis Avraam, 2020, Life cycle inventories of the treatment of iron and steelmaking by-products, ecoinvent association, Zürich, Switzerland
  property barium content 7.53769e-5
    The value of 'barium content' is documented in Turner & Symeonidis, 2020. Reference: Turner David & Symeonidis Avraam, 2020, Life cycle inventories of the treatment of iron and steelmaking by-products, ecoinvent association, Zürich, Switzerland
  property selenium content 1.50754e-5
    The value of 'selenium content' is documented in Turner & Symeonidis, 2020. Reference: Turner David & Symeonidis Avraam, 2020, Life cycle inventories of the treatment of iron and steelmaking by-products, ecoinvent association, Zürich, Switzerland
  property zinc content 4.17085e-5
    The value of 'zinc content' is documented in Turner & Symeonidis, 2020. Reference: Turner David & Symeonidis Avraam, 2020, Life cycle inventories of the treatment of iron and steelmaking by-products, ecoinvent association, Zürich, Switzerland
  property potassium content 0.00227136
    The value of 'potassium content' is documented in Turner & Symeonidis, 2020. Reference: Turner David & Symeonidis Avraam, 2020, Life cycle inventories of the treatment of iron and steelmaking by-products, ecoinvent association, Zürich, Switzerland
  property lead content 5.02513e-5
    The value of 'lead content' is documented in Turner & Symeonidis, 2020. Reference: Turner David & Symeonidis Avraam, 2020, Life cycle inventories of the treatment of iron and steelmaking by-products, ecoinvent association, Zürich, Switzerland
  property manganese content 0.0284422
    The value of 'manganese content' is documented in Turner & Symeonidis, 2020. Reference: Turner David & Symeonidis Avraam, 2020, Life cycle inventories of the treatment of iron and steelmaking by-products, ecoinvent association, Zürich, Switzerland
  property calcium content 0.328643
    The value of 'calcium content' is documented in Turner & Symeonidis, 2020. Reference: Turner David & Symeonidis Avraam, 2020, Life cycle inventories of the treatment of iron and steelmaking by-products, ecoinvent association, Zürich, Switzerland
  property silver content 9.14573e-6
    The value of 'silver content' is documented in Turner & Symeonidis, 2020. Reference: Turner David & Symeonidis Avraam, 2020, Life cycle inventories of the treatment of iron and steelmaking by-products, ecoinvent association, Zürich, Switzerland
  property magnesium content 0.0274372
    The value of 'magnesium content' is documented in Turner & Symeonidis, 2020. Reference: Turner David & Symeonidis Avraam, 2020, Life cycle inventories of the treatment of iron and steelmaking by-products, ecoinvent association, Zürich, Switzerland
  property vanadium content 0.00241206
    The value of 'vanadium content' is documented in Turner & Symeonidis, 2020. Reference: Turner David & Symeonidis Avraam, 2020, Life cycle inventories of the treatment of iron and steelmaking by-products, ecoinvent association, Zürich, Switzerland
  property carbon content, non-fossil 0
    The value of 'carbon content, non-fossil' is documented in Turner & Symeonidis, 2020. Reference: Turner David & Symeonidis Avraam, 2020, Life cycle inventories of the treatment of iron and steelmaking by-products, ecoinvent association, Zürich, Switzerland
  property beryllium content 5.02513e-7
    The value of 'beryllium content' is documented in Turner & Symeonidis, 2020. Reference: Turner David & Symeonidis Avraam, 2020, Life cycle inventories of the treatment of iron and steelmaking by-products, ecoinvent association, Zürich, Switzerland
  property carbon content 0.00356784
    carbon content on a dry matter basis (reserved; not for manual entry)
  properties: water in wet mass 0.005 kg, wet mass 1 kg, dry mass 0.995 kg, water content 0.00502513, carbon allocation 0.00355 kg

## By-products
- basic oxygen furnace slag, for recovery: 0 kg; By-product classification Recyclable; CPC 39310: Slag, dross, scalings and other waste from the manufacture of iron or steel
  production volume 0 kg; name PVBP; = PVRP*BP/ABS(RP)
    Calculated based on the production volume of the reference product.
  property price 0.00711 EUR2005; name BP_price_EUR2005
    Value is calculated based on the iron content of this material in combination with the price for iron ore concentrate on a per kg iron basis.
  property thallium content 7.23618e-6
    (same comment as for basic oxygen furnace slag)
  property titanium content 0.00482412
    (same comment as for basic oxygen furnace slag)
  property lead content 5.02513e-5
    (same comment as for basic oxygen furnace slag)
  property carbon content, fossil 0.00356784
    (same comment as for basic oxygen furnace slag)
  property beryllium content 5.02513e-7
    (same comment as for basic oxygen furnace slag)
  property molybdenum content 2.51256e-5
    (same comment as for basic oxygen furnace slag)
  property zinc content 4.17085e-5
    (same comment as for basic oxygen furnace slag)
  property cadmium content 2.51256e-6
    (same comment as for basic oxygen furnace slag)
  property oxygen content 0.325896
    (same comment as for basic oxygen furnace slag)
  property calcium content 0.328643
    (same comment as for basic oxygen furnace slag)
  property arsenic content 1.90955e-6
    (same comment as for basic oxygen furnace slag)
  property copper content 1.90955e-5
    (same comment as for basic oxygen furnace slag)
  property antimony content 3.31658e-6
    (same comment as for basic oxygen furnace slag)
  property silver content 9.14573e-6
    (same comment as for basic oxygen furnace slag)
  property magnesium content 0.0274372
    (same comment as for basic oxygen furnace slag)
  property sodium content 0.000524623
    (same comment as for basic oxygen furnace slag)
  property manganese content 0.0284422
    (same comment as for basic oxygen furnace slag)
  property cobalt content 3.8191e-6
    (same comment as for basic oxygen furnace slag)
  property iron content 0.19196
    (same comment as for basic oxygen furnace slag)
  property sulfur content 0.00149749
    (same comment as for basic oxygen furnace slag)
  property mercury content 1.00503e-7
    (same comment as for basic oxygen furnace slag)
  property barium content 7.53769e-5
    (same comment as for basic oxygen furnace slag)
  property nickel content 1.11558e-5
    (same comment as for basic oxygen furnace slag)
  property silicon content 0.0620101
    (same comment as for basic oxygen furnace slag)
  property selenium content 1.50754e-5
    (same comment as for basic oxygen furnace slag)
  property vanadium content 0.00241206
    (same comment as for basic oxygen furnace slag)
  property chromium content 0.00190955
    (same comment as for basic oxygen furnace slag)
  property potassium content 0.00227136
    (same comment as for basic oxygen furnace slag)
  property chlorine content 0.000100503
    (same comment as for basic oxygen furnace slag)
  property tin content 6.53266e-6
    (same comment as for basic oxygen furnace slag)
  property aluminium content 0.0113568
    (same comment as for basic oxygen furnace slag)
  property carbon content, non-fossil 0
    (same comment as for basic oxygen furnace slag)
  property phosphorus content 0.00687437
    (same comment as for basic oxygen furnace slag)
  property heating value, net 0 MJ
    Non combustible products are assumed to have an LHV equal to zero (0).
  property carbon content 0.00356784
    carbon content on a dry matter basis (reserved; not for manual entry)
  properties: water in wet mass 0.005 kg, dry mass 0.995 kg, water content 0.00502513, wet mass 1 kg, carbon allocation 0.00355 kg

## Inputs from technosphere
- basic oxygen furnace slag, for recovery: -1 kg
  production volume 1.27675e10 kg
  properties: titanium content 0.00482412, oxygen content 0.325896, calcium content 0.328643, magnesium content 0.0274372, manganese content 0.0284422, dry mass 0.995 kg, iron content 0.19196, silicon content 0.0620101, water content 0.00502513, aluminium content 0.0113568, wet mass 1 kg, phosphorus content 0.00687437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
  note on titanium content: The value of 'titanium content' is documented in Turner & Symeonidis, 2020. Reference: Turner David & Symeonidis Avraam, 2020, Life cycle inventories of the treatment of iron and steelmaking by-products, ecoinvent association, Zürich, Switzerland
  note on oxygen content: The value of 'oxygen content' is documented in Turner & Symeonidis, 2020. Reference: Turner David & Symeonidis Avraam, 2020, Life cycle inventories of the treatment of iron and steelmaking by-products, ecoinvent association, Zürich, Switzerland
  note on calcium content: The value of 'calcium content' is documented in Turner & Symeonidis, 2020. Reference: Turner David & Symeonidis Avraam, 2020, Life cycle inventories of the treatment of iron and steelmaking by-products, ecoinvent association, Zürich, Switzerland
  note on magnesium content: The value of 'magnesium content' is documented in Turner & Symeonidis, 2020. Reference: Turner David & Symeonidis Avraam, 2020, Life cycle inventories of the treatment of iron and steelmaking by-products, ecoinvent association, Zürich, Switzerland
  note on manganese content: The value of 'manganese content' is documented in Turner & Symeonidis, 2020. Reference: Turner David & Symeonidis Avraam, 2020, Life cycle inventories of the treatment of iron and steelmaking by-products, ecoinvent association, Zürich, Switzerland
  note on iron content: The value of 'iron content' is documented in Turner & Symeonidis, 2020. Reference: Turner David & Symeonidis Avraam, 2020, Life cycle inventories of the treatment of iron and steelmaking by-products, ecoinvent association, Zürich, Switzerland
  note on silicon content: The value of 'silicon content' is documented in Turner & Symeonidis, 2020. Reference: Turner David & Symeonidis Avraam, 2020, Life cycle inventories of the treatment of iron and steelmaking by-products, ecoinvent association, Zürich, Switzerland
  note on aluminium content: The value of 'aluminium content' is documented in Turner & Symeonidis, 2020. Reference: Turner David & Symeonidis Avraam, 2020, Life cycle inventories of the treatment of iron and steelmaking by-products, ecoinvent association, Zürich, Switzerland
  note on phosphorus content: The value of 'phosphorus content' is documented in Turner & Symeonidis, 2020. Reference: Turner David & Symeonidis Avraam, 2020, Life cycle inventories of the treatment of iron and steelmaking by-products, ecoinvent association, Zürich, Switzerland
