# coffee green bean production, robusta

Dataset: EcoSpold 2, unit process
Geography: IN
Time period: 2012-01-01 to 2021-12-31
Technology level: current
Classification: ISIC rev.4 ecoinvent: 0127:Growing of beverage crops
Tags: WFLDB
Scenario: Business-as-Usual
System model: Allocation, cut-off by classification
Generated by: Laura Peano
Published in: Nemecek T. 2015
Database: ecoinvent
isCopyrightProtected: true
accessRestrictedTo: 1

## General comment
This dataset represents the production of 1 kg of green coffee beans (Robusta). Robusta is a variety of coffee that has a stronger, harsher taste, with a grain-like overtone and peanutty aftertaste. It contains twice as much caffeine as Arabica beans, and is generally considered to be of inferior quality compared to Arabica. Robusta is mostly grown in Africa, South-East Asia, India and Brazil. The reference flow is the average yield per ha and year, from 2012 - 2014: yield (1550 kg/ha) obtained under irrigated conditions (total amount of water 235 m3/ha). The data are representative for Robusta green coffee beans production in India (Karnataka state) used for the export market. Mineral NPK fertiliser input is 343-223-221 kg/ha. No organic fertilisers are applied. Total active ingredients (a.i.) applied as pesticides amount to 2.0 kg a.i./ha.
The dataset was modelled within the project 'World Food LCA database (WFLDB)'. The aim of this project was to provide inventories of a broad variety of agricultural products and processes and to cover for each product at least 50% of the global export market. The export share of coffee produced in India amounts to 3.4% of the global export (tonnage exported in 2010). The production system regarded in this dataset aimed at representing Robusta green coffee beans produced in India for the export market.
PEF-Quality: data quality rating (DQR) = 2.2 (i.e. good quality)
This dataset refers to an average situation; for specific situations exchanges might differ substantially due to site specific parameters

## Included activities start
This activity starts with the nursery producing fruit tree seedlings, i.e.grafted young trees to be planted.

## Included activities end
This activity ends with the waste treatment after the clearing of the orchard (rooting up the trees). The dataset includes all activities during a year in the productive phase of the orchard including the establishment phase per year of lifetime (20 years), the clearing of the orchard including waste treatment.
The establishment phase of the orchard includes tree nursery, soil cultivation, planting trees, installation of trellis system (posts and wires) and irrigation. Fertiliser and pesticide use in a year of the establishment phase is assumed to be half of the amount of a year in the productive phase.
The productive phase of the orchard includes machine operations, corresponding infrastructure, fuel use and sheds. Machine operations in the productive phase are: soil cultivation (mulching, mowing), fertiliser and pesticide application, harvesting and irrigation. Further, direct field emissions and land use change are included. At the end of the productive phase the orchard is cleared by rooting up the trees.
The inputs of seedlings, fertilisers and pesticides as well as packaging of fertilisers and pesticides are considered. Green coffee beans are sun-dried. Heavy metal uptake by the crop is considered.

## Technology
Conventional production

## Parameters
- LUC_crop_specific: 1 dimensionless
  This parameter allows to switch between a 'crop specific' and a 'country specific' approach when calculating the LUC of a crop. By default, the chosen approach is 'crop specific', so the value of the parameter is 1. If you want to apply a 'country specific' approach, turn the parameter to 0.
- heavyMetalUptakeSwitch: 1 dimensionless

## Reference product
- coffee, green bean: 1 kg; CPC 01610: Coffee, green; By-product classification allocatable product
  Yield = 1550.0 kg/ha
  production volume 2.00003e8 kg
    Source: FAOSTAT. Average, 2009-2012. 68.5% Robusta (http://www.indiacoffee.org/Database/DATABASEJan13_I.pdf)
  property price 1.6 EUR2005
    Calculated value based on data from United Nations Commodity Trade Statistics Database (comtrade.un.org). UN comtrade category: 90111 Coffee, not roasted, not decaffeinated. Year: 2005. Using exchange rate of 1EURO = 1.209 USD. Average of price of import into 5 main markets (EU, US, JP, IN and CN).
  property carbon content, non-fossil 0.490083
    calculation: C-content of components according to ecoinvent report No. 15a. Source of composition: Souci, S.W., Fachmann, W., Kraut, H. (Hg.: Bundesminsiterium fur Ernahrung, Landwirtschaft und Forsten, Bonn) 'Die Zusammensetzung der Lebensmittel - Nahrwerttabellen', medpharm Scientific Publishers Stuttgart, CRC Press; 2000.
  property carbon content 0.490083
    carbon content on a dry matter basis (reserved; not for manual entry)
  properties: water content 0.102, dry mass 0.907441 kg, water in wet mass 0.092559 kg, wet mass 1 kg, carbon content, fossil 0, carbon allocation 0.444722 kg

## Inputs from technosphere
- transport, tractor and trailer, agricultural: 0.002 metric ton*km; lognormal variance with pedigree 0.156439, pedigree (4,1,3,1,1)
  On-farm transport: Yield (in tonnes) multiplied by the average distance from field to farm. The distance was assumed to be 2 km (proxy).
- packaging, for fertilisers: 3.77677 kg; lognormal variance with pedigree 0.0532, pedigree (4,3,3,5,4)
  Total amount of active substance/s of fertilisers needed for the production of 'coffee, green bean' is calculated to be circa 1.89E+00 kg. Fertiliser/s used in this dataset is/are: 'lime', 'nitrogen fertiliser, as N', 'urea, as N'. The total amount of active substance/s is doubled in order to account for the packaging of the dilluted product of fertiliser/s that is/are applied. Therefore, 3.78E+00 kg of packaging for fertilisers is justified with this exchange.
  properties: dry mass 1 kg, wet mass 1 kg, heating value, net 25.01 MJ, price 0.0642 EUR2005, carbon content, fossil 0.825301
  note on carbon content, fossil: Considering a chemical formula (C2H4)n for polyethylene, carbon content-fossil is calculated to be 0.856286 kg of Carbon per kg of dry mass.
- diesel, burned in agricultural machinery: 0.102194 MJ; source Coltro L. 2006; lognormal variance with pedigree 0.118177, pedigree (2,1,3,1,1)
  Literature value or expert estimation (Coltro et al. 2006).
- fruit tree seedling, for planting: 0.0354839 unit
  Literature value or expert estimation (). This is the number of trees per ha divided by the lifetime years of the orchard.
  properties: carbon content, non-fossil 0.439481, water content 0.73, dry mass 0.578035 kg, wet mass 1 kg
  note on carbon content, non-fossil: calculation: C-content of components according to ecoinvent report No. 15a. Source of composition: https://ndb.nal.usda.gov/ndb/search/. Unspecific seedling used as proxy.
- planting tree: 0.0354839 unit
  Literature value expert estimation. This is the number of trees per ha (i.e. 936 trees/ha) divided by the lifetime years of the orchard (i.e. 20 years).
- irrigation: 0.163226 m3; source Nedcoffee 2014; lognormal variance with pedigree 0.118177, pedigree (2,1,3,1,1)
  Calculated value: The total amount of water used for irrigation (Personal written communication, Herma Mulder, Nedcoffee., 2014) multiplied by the country-share of irrigation technique (Personal written communication, Herma Mulder, Nedcoffee., 2014). See supporting documentation 'WFLDB-Documentation.pdf' chapter 'Water use for irrigation' (https://ecoquery.ecoinvent.org/File/Reports).
  properties: wet mass 1000 kg, dry mass 0.11 kg, water content 9089.91
- establishing orchard: 0.0354839 unit
  (same comment as for fruit tree seedling, for planting)
- urea: 0.415759 kg; source Nedcoffee 2014; lognormal variance with pedigree 0.118177, pedigree (2,1,3,1,1)
  The exchange has been updated from 'urea, as N' into 'urea' and therefore its amount has been scaled (multiplied) from 0.1939 kg by 2.1438 kg of 'urea' per kg of 'urea, as N'. Original comment of the exchange is: Calculated based on literature values or expert estimation: The total amount of nutrient (Personal written communication, Herma Mulder, Nedcoffee., 2014) multiplied by the share of fertiliser type (Personal written communication, Herma Mulder, Nedcoffee., 2014). See supporting documentation 'WFLDB-Documentation.pdf' chapter 'Fertiliser application' for L3 and L4 data (https://ecoquery.ecoinvent.org/File/Reports).
  Corresponds to 301.0 kg/ha
  properties: dry mass 1 kg, wet mass 1 kg, carbon content, fossil 0.2
- inorganic nitrogen fertiliser, as N: 0.38671 kg; source Nedcoffee 2014; lognormal variance with pedigree 0.118177, pedigree (2,1,3,1,1)
  Calculated based on literature values or expert estimation: The total amount of nutrient (Personal written communication, Herma Mulder, Nedcoffee., 2014) multiplied by the share of fertiliser type (Personal written communication, Herma Mulder, Nedcoffee., 2014). See supporting documentation 'WFLDB-Documentation.pdf' chapter 'Fertiliser application' for L3 and L4 data (https://ecoquery.ecoinvent.org/File/Reports).
  Corresponds to 300.0 kg/ha
  properties: dry mass 1 kg, wet mass 1 kg
- land use change, perennial crop: 0.000242581 ha; = 0.000242580645161*LUC_crop_specific+4.96774193548e-05*(1-LUC_crop_specific)
  Calculated value. Land use change (LUC) combines land transformation areas calculated with the adapted 'Direct Land Use Change Assessment Tool' version 2014 developed by Blonk Consultants and the carbon losses from soil organic carbon (SOC) and vegetation (VEG) as calculated in ecoinvent v3. See 'WFLDB-Guidelines.pdf', available at https://ecoquery.ecoinvent.org/File/Reports.
- waste wood, untreated: -0.645 kg; lognormal variance with pedigree 0.118177, pedigree (2,1,3,1,1)
  Wood from trees after 1-2 years of sorrage at the field (20% water) per lifetime year (20 years) of the orchard
  production volume 1.29002e8 kg
    Calculated from the reference product amount and production volume
  properties: heating value, net 13.99 MJ, water content 0.25, carbon content, non-fossil 0.48632, wet mass 1 kg, dry mass 0.8 kg
  note on heating value, net: Value taken from the general comment of the treatment dataset.
- trellis system, wooden poles, soft wood, tar impregnated: 0.000645161 ha; lognormal variance with pedigree 0.127577, pedigree (3,1,3,1,3)
  Used to attach trees in orchards with a tree density of more than 500 trees per ha. Trellis system are included as a conservative approach.
- biowaste: -3.35 kg; lognormal variance with pedigree 0.325577, pedigree (5,5,5,5,5)
  production volume 6.7001e8 kg
    Calculated from the reference product amount and production volume
  properties: water content 1.5, dry mass 0.4 kg, carbon content, non-fossil 0.1624, heating value, net 4.29 MJ, wet mass 1 kg
- lime: 1.30774 kg; source Nedcoffee 2014; lognormal variance with pedigree 0.118177, pedigree (2,1,3,1,1)
  Calculated based on literature values or expert estimation: The total amount of nutrient (Personal written communication, Herma Mulder, Nedcoffee., 2014) multiplied by the share of fertiliser type (Personal written communication, Herma Mulder, Nedcoffee., 2014). See supporting documentation 'WFLDB-Documentation.pdf' chapter 'Fertiliser application' for L3 and L4 data (https://ecoquery.ecoinvent.org/File/Reports).
  Corresponds to 2030.0 kg/ha
  properties: wet mass 1 kg, dry mass 1 kg, carbon content, fossil 0.120005

## Inputs from nature
- Water, unspecified natural origin [natural resource, in ground]: 0.0114387 m3; lognormal variance with pedigree 0.118177, pedigree (2,1,3,1,1)
  Literature data or expert estimate: water for depulping
- Transformation, from permanent crop, irrigated [natural resource, land]: 0.322581 m2; = 10000/1550/20
  Calculated value: 10000 m2 divided by the yield and the life time of the perennial crop (20 years).
- Transformation, to permanent crop, irrigated [natural resource, land]: 0.322581 m2; = 10000/1550/20
  (same comment as for Transformation, from permanent crop, irrigated)
- Occupation, permanent crop, irrigated [natural resource, land]: 6.46903 m2*year; lognormal variance with pedigree 0.0140616, pedigree (2,1,3,1,1)
  Related to the duration from harvest date of previous crop to harvest date of main crop.
- Carbon dioxide, in air [natural resource, in air]: 1.536 kg; lognormal variance with pedigree 0.00784984, pedigree (2,2,3,1,1)
  CO2 uptake by biomass
- Energy, gross calorific value, in biomass [natural resource, biotic]: 16.2716 MJ; lognormal variance with pedigree 0.00784984, pedigree (2,2,3,1,1)

## Emissions to nature
- Chromium, ion [water, ground-]: 1.36332e-5 kg; source Freiermuth R.  2006; lognormal variance with pedigree 0.350938, pedigree (2,2,3,1,1)
  Calculated value - Freiermuth (2006). See 'WFLDB-Guidelines.pdf', available at https://ecoquery.ecoinvent.org/File/Reports.
- Carbon dioxide, fossil [air, non-urban air or from high stacks]: 0.879871 kg; lognormal variance with pedigree 0.00784984, pedigree (2,2,3,1,1)
  Calculated value - CO2 emissions from urea and lime. See 'WFLDB-Guidelines.pdf', available at https://ecoquery.ecoinvent.org/File/Reports.
- Copper, ion [water, ground-]: 2.26813e-6 kg; source Freiermuth R.  2006; lognormal variance with pedigree 0.350938, pedigree (2,2,3,1,1)
  (same comment as for Chromium, ion)
- Ammonia [air, non-urban air or from high stacks]: 0.125626 kg; source EEA 2013; lognormal variance with pedigree 0.0387216, pedigree (2,2,3,1,1)
  Calculated value - EMEP/EEA (2013). See 'WFLDB-Guidelines.pdf', available at https://ecoquery.ecoinvent.org/File/Reports.
- Lead [water, ground-]: 2.48454e-7 kg; source Freiermuth R.  2006; lognormal variance with pedigree 0.350938, pedigree (2,2,3,1,1)
  (same comment as for Chromium, ion)
- Nitrogen oxides [air, non-urban air or from high stacks]: 0.0228942 kg; source EEA 2013; lognormal variance with pedigree 0.118664, pedigree (2,2,3,1,1)
  Calculated value - EEA/EMEP (2013). See 'WFLDB-Guidelines.pdf', available at https://ecoquery.ecoinvent.org/File/Reports.
- Mercury [water, ground-]: 1.89538e-9 kg; source Freiermuth R.  2006; lognormal variance with pedigree 0.350938, pedigree (2,2,3,1,1)
  (same comment as for Chromium, ion)
- Phosphate [water, ground-]: 0.000118951 kg; source Prasuhn V.  2006; lognormal variance with pedigree 0.169866, pedigree (2,2,3,1,1)
  Calculated value - Prasuhn (2006). See 'WFLDB-Guidelines.pdf', available at https://ecoquery.ecoinvent.org/File/Reports.
- Dinitrogen monoxide [air, non-urban air or from high stacks]: 0.0116509 kg; source IPCC 2006; lognormal variance with pedigree 0.118664, pedigree (2,2,3,1,1)
  Calculated value - IPCC (2006). See 'WFLDB-Guidelines.pdf', available at https://ecoquery.ecoinvent.org/File/Reports.
- Nickel, ion [water, ground-]: 8.50773e-10 kg; source Freiermuth R.  2006; lognormal variance with pedigree 0.350938, pedigree (2,2,3,1,1)
  (same comment as for Chromium, ion)
- Water [air, non-urban air or from high stacks]: 0.122581 m3; lognormal variance with pedigree 0.118177, pedigree (2,1,3,1,1)
  Calculated value - Emission calculated from water balance. See 'WFLDB-Guidelines.pdf', available at https://ecoquery.ecoinvent.org/File/Reports.
- Zinc, ion [water, ground-]: 1.80005e-5 kg; source Freiermuth R.  2006; lognormal variance with pedigree 0.350938, pedigree (2,2,3,1,1)
  (same comment as for Chromium, ion)
- Phosphate [water, surface water]: 0.000495631 kg; source Prasuhn V.  2006; lognormal variance with pedigree 0.169866, pedigree (2,2,3,1,1)
  (same comment as for Phosphate)
- Water [water, ground-]: 0.00816129 m3; lognormal variance with pedigree 0.118177, pedigree (2,1,3,1,1)
  (same comment as for Water)
- Phosphorus [water, surface water]: 0.000212975 kg; source Prasuhn V.  2006; lognormal variance with pedigree 0.169866, pedigree (2,2,3,1,1)
  Calculated value - Prasuhn (2006) and SQCB-Erosion. See 'WFLDB-Guidelines.pdf', available at https://ecoquery.ecoinvent.org/File/Reports.
- BOD5, Biological Oxygen Demand [water, ground-]: 0.5 kg; lognormal variance with pedigree 0.118177, pedigree (2,1,3,1,1)
  Calculated value - Expert estimate for organic matter in waste water (0.5 kg BOD5/kg green coffee). See 'WFLDB-Guidelines.pdf', available at https://ecoquery.ecoinvent.org/File/Reports.
- Nitrate [water, ground-]: 0.226459 kg; source Faist Emmenegger M. 2009; lognormal variance with pedigree 0.169866, pedigree (2,2,3,1,1)
- Cadmium [soil, agricultural]: 1.97103e-5 kg; = 1.98014742481e-05 + ( - 9.118292e-08)*heavyMetalUptakeSwitch; source Freiermuth R.  2006
  Comment on mathematicalRelation:
  1.98014742481e-05 from Calculated value - Freiermuth (2006). See 'WFLDB-Guidelines.pdf', available at https://ecoquery.ecoinvent.org/File/Reports.
  -9.118292e-08 from Crop, default, heavy metals uptake model
  Heavy metal uptake can be excluded by setting the parameter heavyMetalUptakeSwitch to zero.
- Chromium [soil, agricultural]: 0.000370371 kg; = 0.000370860714023 + ( - 4.8941e-07)*heavyMetalUptakeSwitch; source Freiermuth R.  2006
  Comment on mathematicalRelation:
  0.000370860714023 from Calculated value - Freiermuth (2006). See 'WFLDB-Guidelines.pdf', available at https://ecoquery.ecoinvent.org/File/Reports.
  -4.8941e-07 from Crop, default, heavy metals uptake model
  Heavy metal uptake can be excluded by setting the parameter heavyMetalUptakeSwitch to zero.
- Copper [soil, agricultural]: 3.00434e-5 kg; = 3.59943489684e-05 + ( - 5.9509562e-06)*heavyMetalUptakeSwitch; source Freiermuth R.  2006
  Comment on mathematicalRelation:
  -5.9509562e-06 from Crop, default, heavy metals uptake model
  Heavy metal uptake can be excluded by setting the parameter heavyMetalUptakeSwitch to zero.
- Lead [soil, agricultural]: 1.56454e-5 kg; = 1.61310336432e-05 + ( - 4.8561146e-07)*heavyMetalUptakeSwitch; source Freiermuth R.  2006
  Comment on mathematicalRelation:
  1.61310336432e-05 from Calculated value - Freiermuth (2006). See 'WFLDB-Guidelines.pdf', available at https://ecoquery.ecoinvent.org/File/Reports.
  -4.8561146e-07 from Crop, default, heavy metals uptake model
  Heavy metal uptake can be excluded by setting the parameter heavyMetalUptakeSwitch to zero.
- Nickel [soil, agricultural]: 3.77961e-5 kg; = 3.87341242548e-05 + ( - 9.380508e-07)*heavyMetalUptakeSwitch; source Freiermuth R.  2006
  Comment on mathematicalRelation:
  -9.380508e-07 from Crop, default, heavy metals uptake model
  Heavy metal uptake can be excluded by setting the parameter heavyMetalUptakeSwitch to zero.
- Cadmium, ion [water, surface water]: 9.57332e-8 kg; source Freiermuth R.  2006; lognormal variance with pedigree 0.350938, pedigree (2,2,3,1,1)
  (same comment as for Chromium, ion)
- Mercury [soil, agricultural]: 4.35611e-7 kg; = 4.72030053632e-07 + ( - 3.6419288e-08)*heavyMetalUptakeSwitch; source Freiermuth R.  2006
  Comment on mathematicalRelation:
  4.72030053632e-07 from Calculated value - Freiermuth (2006). See 'WFLDB-Guidelines.pdf', available at https://ecoquery.ecoinvent.org/File/Reports.
  Heavy metal uptake can be excluded by setting the parameter heavyMetalUptakeSwitch to zero.
- Copper, ion [water, surface water]: 1.21198e-5 kg; source Freiermuth R.  2006; lognormal variance with pedigree 0.350938, pedigree (2,2,3,1,1)
  (same comment as for Chromium, ion)
- Zinc [soil, agricultural]: 0.000247884 kg; = 0.000276640317526 + ( - 2.8756654e-05)*heavyMetalUptakeSwitch; source Freiermuth R.  2006
  Comment on mathematicalRelation:
  0.000276640317526 from Calculated value - Freiermuth (2006). See 'WFLDB-Guidelines.pdf', available at https://ecoquery.ecoinvent.org/File/Reports.
  -2.8756654e-05 from Crop, default, heavy metals uptake model
  Heavy metal uptake can be excluded by setting the parameter heavyMetalUptakeSwitch to zero.
- Water [water, surface water]: 0.0440839 m3; lognormal variance with pedigree 0.118177, pedigree (2,1,3,1,1)
  (same comment as for Water)
- DOC, Dissolved Organic Carbon [water, ground-]: 0.37037 kg
  Calculated value - Best estimates: DOC = TOC ; COD (g O2) = 2.7*TOC (g C) and BOD5 = 0.5*COD. See 'WFLDB-Guidelines.pdf', available at https://ecoquery.ecoinvent.org/File/Reports.
- TOC, Total Organic Carbon [water, ground-]: 0.37037 kg
  (same comment as for DOC, Dissolved Organic Carbon)
- COD, Chemical Oxygen Demand [water, ground-]: 1 kg
  (same comment as for DOC, Dissolved Organic Carbon)
- Lead [water, surface water]: 5.08254e-6 kg; source Freiermuth R.  2006; lognormal variance with pedigree 0.350938, pedigree (2,2,3,1,1)
  (same comment as for Chromium, ion)
- Mercury [water, surface water]: 2.30435e-8 kg; source Freiermuth R.  2006; lognormal variance with pedigree 0.350938, pedigree (2,2,3,1,1)
  (same comment as for Chromium, ion)
- Chromium, ion [water, surface water]: 8.55929e-6 kg; source Freiermuth R.  2006; lognormal variance with pedigree 0.350938, pedigree (2,2,3,1,1)
  (same comment as for Chromium, ion)
- Nickel, ion [water, surface water]: 7.34477e-6 kg; source Freiermuth R.  2006; lognormal variance with pedigree 0.350938, pedigree (2,2,3,1,1)
  (same comment as for Chromium, ion)
- Zinc, ion [water, surface water]: 1.88482e-5 kg; source Freiermuth R.  2006; lognormal variance with pedigree 0.350938, pedigree (2,2,3,1,1)
  (same comment as for Chromium, ion)
- Cadmium, ion [water, ground-]: 3.16318e-8 kg; source Freiermuth R.  2006; lognormal variance with pedigree 0.350938, pedigree (2,2,3,1,1)
  (same comment as for Chromium, ion)

## Sampling procedure
WFLDB Methodological Guidelines for the Life Cycle Inventory of Agricultural Products in the latest version, available at: https://ecoquery.ecoinvent.org/File/Reports. Data sources: Data were categorised from level 0 (L0) to level (L4) as follows: L0 = estimate, proxy; L1 = statistical data (e.g. FAOSTAT); L2 = L1 adapted to crop and country; L3 = literature data or L1 resp. L2 data approved by experts; medium detailing (i.e. kg of total N-fertiliser); L4 = L3 data of high detailing (i.e. portion N-fertiliser types).In this dataset data were obtained for yield: L3; Fertilisers: L4; Pesticides: L1; Machinery: L0; Irrigation: L2. For information regarding the calculation of individual exchanges see supporting documentation WFLDB-Documentation.pdf

## Extrapolations
This dataset has been extrapolated from year 2014 to the year of the calculation (2021). The uncertainty has been adjusted accordingly.

## Review by Assumpció ANTON 2016-05-30
Be aware that the use of statistics in input calculations could provide some specific inputs not common for specific crops, this should be corrected if better information is available and better reflexed in DQR . Currently, I would dissent for some of good marks provided, being a revision of criteria applied advisable.

Pesticides will need to be amended periodically checking for update of pesticides' ban.
