# anode production, prebake, for aluminium electrolysis

Dataset: EcoSpold 2, unit process
Geography: IAI Area, Gulf Cooperation Council
Time period: 2015-01-01 to 2021-12-31
Technology level: current
Classification: ISIC rev.4 ecoinvent: 2790:Manufacture of other electrical equipment
Classification: EcoSpold01Categories: metals/extraction
Scenario: Business-as-Usual
System model: Allocation, cut-off by classification
Share of production covered: 73 %
Generated by: Linlin Wu
Published in: International Aluminium Insitute 2015
Database: ecoinvent
isCopyrightProtected: false
accessRestrictedTo: 1

## General comment
Industry average of prebake anodes for use in the Hall-Héroult process using prebake technology.
[This dataset is meant to replace the following datasets:]

## Included activities start
The unit process begins with the unloading of process materials to the storage areas on site. The operations associated with this unit process include:
* anode mix preparation, anode block forming and baking;
* rodding of baked anodes;
* maintenance and repair of plant and equipment; and
* treatment of process air, liquids and solids.
The original data also accounts for recovery of spent anode materials (anode butts). However, these are recycled in closed loop and are not explicitly accounted for in the inventory, although inputs and outputs of other flows are influenced by this recycling.
Treatment of scrubber sludges are excluded, as there is no corresponding waste treatment in the ecoinvent database.

## Included activities end
The output of this process is rodded anodes to be transported to electrolysis plants employing prebake technology.

## Geography
Data mostly from global surveys by IAI.

## Reference product
- anode, prebake, for aluminium electrolysis: 1 kg; name anodePrebakeAmount; CPC 42950: Wire, rods, tubes, plates, electrodes and similar products, of base metal or of metal carbides, coated or core[…]; By-product classification allocatable product
  production volume 2.136e9 kg; name anodePrebakeProductionVolume
    Calculated value based on reported data, scaled up to correspond with Annual Production Volume of aluminium using Prebake technology.
  property price 0.15 EUR2005; name anodePrebakeAmount_price_EUR2005
    Literature value; U.S. Department of Energy (Inert Anode Roadmap, 1998, http://www1.eere.energy.gov/manufacturing/industries_technologies/aluminum/pdfs/inertroad.pdf).
  property carbon content 0.875012
    carbon content on a dry matter basis (reserved; not for manual entry)
  properties: water content 0, dry mass 1 kg, water in wet mass 0 kg, wet mass 1 kg, carbon content, non-fossil 0, carbon content, fossil 0.875012, carbon allocation 0.875012 kg

## Inputs from technosphere
- heat, district or industrial, other than natural gas: 0.0052716 MJ; = Net_Heat_Value_LFO*42.7 *kgFuel_Input_LFO_diesel /fuel_use_LFO; source International Aluminium Insitute 2015; lognormal variance with pedigree 0.002, pedigree (1,1,3,1,1)
  Diesel combustion.
  Uncertainty: No uncertainty added - uncertainty should be based on propagation of the uncertainty of the underlying parameters.
  property Corresponding fuel use 1.053 MJ; name fuel_use_LFO
  property heating value, net 1 MJ; name Net_Heat_Value_LFO
  property fuel input in physical units, kg 0.00013 kg; name kgFuel_Input_LFO_diesel
  note on Corresponding fuel use: Lower heating value of the fuel input related to the heat/electricity output
- refractory, fireclay, packed: 0.0067 kg; source International Aluminium Insitute 2015; lognormal variance with pedigree 0.0032, pedigree (1,3,3,1,1)
  Reported as "Refractory material" in IAI Survey
  properties: dry mass 1 kg, wet mass 1 kg
- waste asphalt: -0.0089 kg; name wasteCarbonAmount; source International Aluminium Insitute 2015; lognormal variance with pedigree 0.0027, pedigree (1,2,3,1,1)
  EcoSpold01Location=CH
  Proxy for treatment of waste carbon
  production volume 1.90104e7 kg; = wasteCarbonAmount*anodePrebakeProductionVolume
    Calculated from the production volume of anode and output of waste per reference flow.
  property price 0 EUR2005; name wasteCarbonAmount_price_EUR2005
  properties: carbon content, fossil 0.0440796, water content 0.001001, dry mass 0.999 kg, wet mass 1 kg
  note on carbon content, fossil: The waste contains 94.7% inert material (see Tab A.5 for details) 5.3% bitumen (see Tab A.6 for details), ecoinvent v2.2 report 13_I
- heat, district or industrial, natural gas: 1.8316 MJ; = Net_Heat_Value_ng*40.4 * m3fuel_use_ng/ fuel_use_ng; source International Aluminium Insitute 2015; lognormal variance with pedigree 0.002, pedigree (1,1,3,1,1)
  Natural gas combustion.
  Uncertainty: No uncertainty added - uncertainty should be based on propagation of the uncertainty of the underlying parameters.
  property fuel input in physical units, m3 0.04715 m3; name m3fuel_use_ng
  property heating value, net 1 MJ; name Net_Heat_Value_ng
  property Corresponding fuel use 1.04 MJ; name fuel_use_ng
  note on heating value, net: net (lower) heating (calorific) value. Based on European average as reported in Dones et al. 2007.
  note on Corresponding fuel use: Lower heating value of the fuel input related to the heat/electricity output, based on an efficiency of 96%
- pitch: 0.146 kg; source International Aluminium Insitute 2015; lognormal variance with pedigree 0.0032, pedigree (1,3,3,1,1)
  EcoSpold01Location=RER
  Reported as Pitch in IAI report
  properties: carbon content, fossil 0.83, dry mass 1 kg, wet mass 1 kg, heating value, net 28 MJ
- heat, district or industrial, other than natural gas: 0.632479 MJ; = Net_Heat_Value_HFO*40.0 * kgFuel_Input_HFO /fuel_use_HFO; source International Aluminium Insitute 2015; lognormal variance with pedigree 0.002, pedigree (1,1,3,1,1)
  Heavy oil combustion.
  property heating value, net 1 MJ; name Net_Heat_Value_HFO
  property fuel input in physical units, kg 0.01665 kg; name kgFuel_Input_HFO
  property Corresponding fuel use 1.053 MJ; name fuel_use_HFO
- scrap steel: -0.00156 kg; name wasteSteelAmount; source International Aluminium Insitute 2015; lognormal variance with pedigree 0.0027, pedigree (1,2,3,1,1)
  Reported as scrap steel.
  production volume 3.33216e6 kg; = wasteSteelAmount* anodePrebakeProductionVolume
    Calculated from the production volume of anode and output of waste per reference flow.
  property price 0 EUR2005; name wasteSteelAmount_price_EUR2005
  properties: wet mass 1 kg, dry mass 1 kg
- cast iron: 0.0048 kg; source International Aluminium Insitute 2015; lognormal variance with pedigree 0.0032, pedigree (1,3,3,1,1)
  Reported as Steel in IAI report
  EcoSpold01Location=RER
  properties: dry mass 1 kg, carbon content, fossil 0.04, wet mass 1 kg
  note on carbon content, fossil: Cast iron is made by remelting pig iron in small furnaces (e.g. cupola furnaces or electric arc furnaces) and poured into moulds to make castings. It usually contains 2% to 6% carbon (ecoinvent v2.2 report 10_partII). An average content of 4% was considered
- inert waste, for final disposal: -0.00845 kg; name wasteInertAmount; = (wasteI_nonspecifiedWasteToLandfillAmou_0 +wasteI_refractoryWasteToRecyclingAmoun_0 +wasteI_refractoryWasteToLandfillAmount_0 +wasteI_nonspecifiedByproductsToRecycli_0 )*-1; source International Aluminium Insitute 2015; lognormal variance with pedigree 0.0021, pedigree (1,2,3,1,1)
  Amount includes "Byproducts for external recycling", "Refractory material for external recycling", "Refractory (excluding SPL) sent to landfill" and "Other landfilled waste" in IAI report. If it becomes possible to specify byproducts and other landfilled waste, then these should be broken out of this total. Currently, no recycling process exists in ecoinvent for refractory material, and hence these are modelled as sent to landfill.
  EcoSpold01Location=CH
  Uncertainty: Uncertainty based entirely on uncertainty ofunderlying parameters.
  production volume 1.80492e7 kg; = wasteInertAmount* anodePrebakeProductionVolume
    Calculated from the production volume of anode and output of waste per reference flow.
  property amount of refractory material sent to landfill 0.005 kg; name wasteI_refractoryWasteToLandfillAmount_0
  property price 0 EUR2005; name wasteInertAmount_price_EUR2005
  property amount of refractory material sent to recycling 0.0009 kg; name wasteI_refractoryWasteToRecyclingAmoun_0
  property amount of non-specified waste to landfill 0.0009 kg; name wasteI_nonspecifiedWasteToLandfillAmou_0
  property amount of non-specified waste to recycling 0.00165 kg; name wasteI_nonspecifiedByproductsToRecycli_0
  properties: water content 0.00502513, wet mass 1 kg, dry mass 0.995 kg
- anode factory: 2.5e-10 unit; source Classen M. 2008; lognormal variance with pedigree 0.5, pedigree (5,5,5,5,5)
  EcoSpold01Location=RER
  Rough estimate
  Uncertainty: rough guess
- petroleum coke: 0.678 kg; source International Aluminium Insitute 2015; lognormal variance with pedigree 0.0032, pedigree (1,3,3,1,1)
  EcoSpold01Location=RER
  properties: carbon content, fossil 0.885, dry mass 1 kg, wet mass 1 kg, heating value, net 35 MJ

## Inputs from nature
- Water, salt, ocean [natural resource, in water]: 1.3e-5 m3; source International Aluminium Institute 2015; lognormal variance with pedigree 0.2106, pedigree (5,5,5,5,5)
- Water, cooling, unspecified natural origin [natural resource, in water]: 8.6e-7 m3; source International Aluminium Insitute 2015; lognormal variance with pedigree 0.2106, pedigree (5,5,5,5,5)

## Emissions to nature
- Water [water, surface water]: 0.0017 m3; lognormal variance with pedigree 0.0038, pedigree (2,3,3,1,1)
  Reported as Fresh Water
- Suspended solids, unspecified [water, unspecified]: 9e-5 kg; source International Aluminium Insitute 2015; lognormal variance with pedigree 0.0046, pedigree (1,4,3,1,1)
- Particulates, < 2.5 um [air, unspecified]: 7.2e-6 kg; = PM_total_1* PM2_5; source International Aluminium Insitute 2015; lognormal variance with pedigree 0.0033, pedigree (2,2,3,1,1)
  Total amount from IAI survey, distributed among three class sizes using CEPMEIP database emission factors for Production of primary aluminium. Abatement level: medium.
  property total particulates 2e-5 kg; name PM_Total_1
  property ratio of total particulates less than 2.5 microns 0.36; name PM2_5; = 1.44/4
- Water [water, ocean]: 0.0016 m3; source International Aluminium Insitute 2015; lognormal variance with pedigree 0.0032, pedigree (1,3,3,1,1)
- Particulates, > 2.5 um, and < 10um [air, unspecified]: 8.8e-6 kg; = PM_total_3 * PM_btw_2_5_and_10um; source International Aluminium Insitute 2015; lognormal variance with pedigree 0.0033, pedigree (2,2,3,1,1)
  (same comment as for Particulates, < 2.5 um)
  property total particulates 2e-5 kg; name PM_Total_3
  property ratio of particulates between 2.5 and 10 microns 0.44; name PM_btw_2_5_and_10um; = (3.2-1.44)/4
- Benzo(a)pyrene [air, unspecified]: 5e-8 kg; name BaPAmount; source International Aluminium Insitute 2015; lognormal variance with pedigree 0.304, pedigree (1,4,3,1,1)
- Water [air, unspecified]: 1.7e-5 m3; source International Aluminium Insitute 2015; lognormal variance with pedigree 0.2106, pedigree (5,5,5,5,5)
  IAI data reported as "Fresh Water Consumption" plus "Sea Water consumption"
- PAH, polycyclic aromatic hydrocarbons [air, unspecified]: 5e-5 kg; source International Aluminium Insitute 2015; lognormal variance with pedigree 0.0021, pedigree (1,2,3,1,1)
  Uncertainty: Uncertainty calculated from that of underlying variables.
  property total PAH emission to air 5.1e-5 kg; name totalPAH
- Particulates, > 10 um [air, unspecified]: 4e-6 kg; = PM_total_2 *PM_greater_10um; source International Aluminium Insitute 2015; lognormal variance with pedigree 0.0033, pedigree (2,2,3,1,1)
  (same comment as for Particulates, < 2.5 um)
  property total particulates 2e-5 kg; name PM_Total_2
  property ratio pf particulates greater than 10 microns 0.2; name PM_greater_10um; = (4-3.2)/4
- Oils, unspecified [water, unspecified]: 2e-5 kg; source International Aluminium Insitute 2015; lognormal variance with pedigree 0.0046, pedigree (1,4,3,1,1)
- Hydrogen fluoride [air, unspecified]: 9e-7 kg; source International Aluminium Insitute 2015; lognormal variance with pedigree 0.0421, pedigree (1,2,3,1,1)
  Reported as F in IAI data,sum of particulate F and gaseous F
- Sulfur dioxide [air, unspecified]: 0.000945 kg; source International Aluminium Insitute 2015; lognormal variance with pedigree 0.0027, pedigree (1,2,3,1,1)
- PAH, polycyclic aromatic hydrocarbons [water, unspecified]: 1e-8 kg; source International Aluminium Insitute 2015; lognormal variance with pedigree 0.0046, pedigree (1,4,3,1,1)
  Reported as PAH (6 Borneff components)
- Fluoride [water, unspecified]: 9e-6 kg; source International Aluminium Insitute 2015; lognormal variance with pedigree 0.0046, pedigree (1,4,3,1,1)
- Nitrogen oxides [air, unspecified]: 0.000604 kg; source International Aluminium Insitute 2015; lognormal variance with pedigree 0.0421, pedigree (1,2,3,1,1)

## Sampling procedure
2015 data is included where available from annual IAI surveys (electricity, fuel, petrol coke & pitch inputs). Other flows are based on a life cycle inventory survey carried out by IAI for its member and non member companies. The survey was conducted in 2016 for 2015 data. Total percent representativeness is based on 2015 LCI data, using 2015 production volumes of this region.

## Extrapolations
This dataset has been extrapolated from year 2015 to the year of the calculation (2021). The uncertainty has been adjusted accordingly.
