# compressed air production, 800 kPa gauge, >30kW, optimized generation

Dataset: EcoSpold 2, unit process
Geography: RER
Time period: 2003-01-01 to 2021-12-31
Technology level: modern
Classification: ISIC rev.4 ecoinvent: 2011:Manufacture of basic chemicals
Classification: EcoSpold01Categories: mechanical engineering/compressed air generation
Scenario: Business-as-Usual
System model: Allocation, cut-off by classification
Share of production covered: 0 %
Generated by: Tereza Levova
Published in: Steiner, R. 2007
Database: ecoinvent
isCopyrightProtected: true
accessRestrictedTo: 1

## General comment
As there is some variation from factory to factory with regard to the LCI, it is advised that in case this dataset becomes important in the results, it is recommended to investigated further if the assumptions made for this dataset are applicable or not.
[This dataset was already contained in the ecoinvent database version 2. It was not individually updated during the transfer to ecoinvent version 3. Life Cycle Impact Assessment results may still have changed, as they are affected by changes in the supply chain, i.e. in other datasets. This dataset was generated following the ecoinvent quality guidelines for version 2. It may have been subject to central changes described in the ecoinvent version 3 change report (http://www.ecoinvent.org/database/ecoinvent-version-3/reports-of-changes/), and the results of the central updates were reviewed extensively. The changes added e.g. consistent water flows and other information throughout the database. The documentation of this dataset can be found in the ecoinvent reports of version 2, which are still available via the ecoinvent website. The change report linked above covers all central changes that were made during the conversion process.]

## Included activities end
This dataset includes the compressor, operating materials (lubricating oil), the electricity consumption as well as the transports of the compressor and the lubricant to the installation site. The material for the supply and the energy needed to hold the pressure in the supply installation is included. The installation at the site is not included.

## Geography
Geographical coverage encompasses the industrialised countries.

## Technology
Average technology

## Time period
Estimated value based on literature (ISI Fraunhofer, 2000, Compressed Air Systems in the European Union).
The figure shows the development in old/upgraded/new CAS installations.

## Parameters
- losses during supply: 0.15 % (obsolete); name losses; lognormal variance with pedigree 0.0132, pedigree (4,3,3,5,1)
  Literature value (ecoinvent v2.2 no.23_MechanicalEngineering). The fraction of air lost between compressor and final consumer, i.e in case of this technology 15% of the air produced (and measured) at the compressor leaks during the supply and does not reach the consumer. This loss is accounted for in the market of this product.

## Reference product
- compressed air, 800 kPa gauge: 1 m3; name CA_800_RP; = 1-(1*losses); CPC 34250: Salts of oxometallic or peroxometallic acids; colloidal precious metals and compounds thereof; inorganic and o[…]; By-product classification allocatable product
  In v2 of the ecoinvent database supply network and losses during the distribution were modelled in a separate datasets. In v3 those two datasets are merged in this one dataset, the losses are included and the flows are adjusted accordingly.
  EcoSpold01Location=RER
  production volume 2.37532e10 m3
    Unknown
    Based on 4% of all electricity use (10% of industrial use), an average efficiency of 4.18 m3/kWh, and an even distribution of generation over 15 equipment classes of size and efficiency, based on information from http://isi.fraunhofer.de/isi/e/publikationen/compressed-air.php?pathAlias=/e/publikation/c-air/compressed-air.htm.
  property price 0.080606 EUR2005; name CA_800_RP_price_EUR2005
    Calculated based on inputs: The price of the product has been calculated as a sum of the values of the material and energy inputs for this product. This value is therefore a rough estimation. It may underestimate the real price since there are additional expenses when producing any product. These expences can include for example labour costs, treatment of waste materials and profit for the producer. Please consider carefully whether this level of data quality is acceptable for your application.

## Inputs from technosphere
- steel, low-alloyed, hot rolled: 9.79e-5 kg; = (CA_800_RP/1)*9.79E-05; lognormal variance with pedigree 0.0686, pedigree (4,3,5,1,1)
  average value of one distribution network
  Uncertainty: average value of one distribution network
  properties: dry mass 1 kg, carbon content, fossil 0.005, wet mass 1 kg
  note on carbon content, fossil: Low alloyed steel composition given in Tab. 3.2 ecoinvent v2.2 report 10_partII. Steel assumed to have a C content of 0.5%
- electricity, low voltage: 0.161176 kWh; lognormal variance with pedigree 0.0412, pedigree (1,3,5,1,1)
  average value
  EcoSpold01Location=UCTE
  Uncertainty: average value
- lubricating oil: 2.44706e-6 kg; lognormal variance with pedigree 0.014, pedigree (1,4,3,1,1)
  EcoSpold01Location=RER
  manufacturer value
  Uncertainty: manufacturer value
  properties: carbon content, fossil 0.75, wet mass 1 kg, dry mass 1 kg, heating value, net 40.2 MJ
  note on carbon content, fossil: Lubricating oil is produced from diesel. C-content/dry mass of fats and oils considered 75%, from: ecoinvent v2.2 report, n 15a, pg 40
  note on heating value, net: Literature value, Source: IPCC 2006, 2006 IPCC Guidelines for National Greenhouse Gas Inventories, Prepared by the National Greenhouse Gas Inventories Programme, Eggleston H.S., Buendia L., Miwa K., Ngara T. and Tanabe K. (eds). Published: IGES, Japan
- waste mineral oil: 0 kg; pedigree (1,1,1,1,1)
  manufacturer value
  EcoSpold01Location=CH
  Uncertainty: manufacturer value
  production volume 0 kg
    Calculated from the production volume of compressed air, 800 kPa gauge in proportion to the respective output amounts.
  properties: water content 0.111111, carbon content, fossil 0.864444, wet mass 1 kg, dry mass 0.9 kg, heating value, net 34.7 MJ
  note on carbon content, fossil: Tab A.6, ecoinvent v2.2 report 13_I. C content has been calculated after data in the tables, and then referred to 1 kg DM
  note on heating value, net: Value taken from the general comment of the treatment dataset.
- air compressor, screw-type compressor, 300kW: 9e-8 unit; lognormal variance with pedigree 0.314, pedigree (1,4,3,1,1)
  EcoSpold01Location=RER
  manufacturer value
  Uncertainty: manufacturer value
- section bar rolling, steel: 9.79e-5 kg; = (CA_800_RP/1)*9.79E-05; lognormal variance with pedigree 0.0686, pedigree (4,3,5,1,1)
  (same comment as for steel, low-alloyed, hot rolled)
- waste mineral oil: -2.38794e-6, -5.9116e-8 kg (2 entries); lognormal variance with pedigree 0.014, pedigree (1,4,3,1,1)
  manufacturer value
  EcoSpold01Location=CH
  Uncertainty: manufacturer value
  production volume 49406.6 kg

## Extrapolations
This dataset has been extrapolated from year 2015 to the year of the calculation (2021). The uncertainty has been adjusted accordingly.

## Review by Bo Weidema 2012-04-19
In v2 of the ecoinvent database supply network and losses during the distribution were modelled in a separate datasets. In v3 those two datasets are merged in this one dataset, the losses are included and the flows are adjusted accordingly.
