# biogas production from grass

Dataset: EcoSpold 2, unit process
Geography: CH
Time period: 2000-01-01 to 2021-12-31
Technology level: current
Classification: ISIC rev.4 ecoinvent: 3821:Treatment and disposal of non-hazardous waste
Classification: EcoSpold01Categories: biomass/fuels
Tags: ConvertedDataset
Scenario: Business-as-Usual
System model: Allocation, cut-off by classification
Share of production covered: 100 %
Generated by: Michael Spielmann (obsolete)
Published in: Jungbluth N. 2007
Database: ecoinvent
isCopyrightProtected: true
accessRestrictedTo: 1

## General comment
The dataset represents a multioutput process and describes a bio-refinery (grass-refinery) that delivers three co-products: biogas, proteins and fibres. Grass input is assumed to have a carbon content of 45%. The required process energy (heat for grass-pre-treatment and drying of fibres and proteins and electricity for fibre presses, fans, blowers reception bells etc.) is obtained from conventional energy carriers and not from the use of biogas. For infrastructure expenditures, the same infrastructure as for bio-ethanol production from grass is used as a first approximation.
[This dataset was already contained in the ecoinvent database version 2. It was not individually updated during the transfer to ecoinvent version 3. Life Cycle Impact Assessment results may still have changed, as they are affected by changes in the supply chain, i.e. in other datasets. This dataset was generated following the ecoinvent quality guidelines for version 2. It may have been subject to central changes described in the ecoinvent version 3 change report (http://www.ecoinvent.org/database/ecoinvent-version-3/reports-of-changes/), and the results of the central updates were reviewed extensively. The changes added e.g. consistent water flows and other information throughout the database. The documentation of this dataset can be found in the ecoinvent reports of version 2, which are still available via the ecoinvent website. The change report linked above covers all central changes that were made during the conversion process.]

## Included activities start
From reception of grass at the bio-refinery gate.

## Included activities end
The dataset includes the environmental exchanges due to grass processing in a grass-refinery, considering grass-digestion as well as production of fibres and proteins.
The dataset doesn't include the purification and the use of the gas for co-generation. The dataset also doesn't include emissions from the gasholder, because they are fed back to the biogas. It's assumed that in the digestion process and storage of biogas no emissions occur.

## Geography
Conditions of plants in Schaffhausen (CH)

## Technology
Grass-refinery Up-flow anaerobic sludge bed (UASB) reactor design for biogas production.
A bio-refinery is a technical concept for whole crop utilisation. It applies fractionation to separate different quantities from the raw material and thereby aiming to optimise the value added. In Switzerland, a grass-refinery plant was in operation between January 2001 and summer 2003 in Schaffhausen. A comprehensive grass-refinery process, as shown in the figure below, was designed to produce three products: biogas, fibres and proteins.
Potential products and their application are briefly described:
a. Grass fibres
Grass fibres can be recovered at a length of 2-30 mm. Variation is due to raw material variation and process conditions. Grass fibres are suitable and competitive for short fibre applications. The following products can be made from grass fibres:
• Insulation products.
o Insulation boards can be produced in a density range between 60 and 160 kg/m3. The heat conductivity is 0.04-0.045 W/mK, depending on the density of the board. Resistance against fire and fungi can be achieved using additives. Advantages compared with mineral wool include the high specific heat capacity, which results in a 10-12 hours delayed release of outside heat to the inside and improved summer heat protection.
Boards can be used for thermal insulation in ventilated facades and cavity masonry, steep-pitched roofs, over rafters and for sound insulation. Possible applications of grass-based insulation boards cover around 80% of all insulation applications.
o Blow-in insulation is successful at a blow-in density of 55-60 kg/m3. The heat conductivity
is 0.04 W/mK. Resistance against fire and fungi can be achieved by using additives. Quality control must include settling properties. Blow-in insulation is an industrial standard in many countries and makes about 1.4% of the total insulation volume in Germany.
• Natural fibre re-enforced plastic: specifications include filling grade and mechanical properties.
• Paper: specifications include colour and mechanical properties.
• Combustion pellets: specifications include mechanical stability, levels of ash, nitrogen, and sulphur content and ash melting point. To reduce the ash content, low or medium-quality grass
requires washing.

b. Grass protein
The value of grass as a ruminant feed is based on its raw protein content. Separation of the protein fraction from the cell wall components opens marketing opportunities for non-ruminants, e.g. pigs and hens. Juice pressed from silage grass has been fed successfully to pigs and piglets. A dried protein product from fresh grass contains around 40% raw protein, 10% raw fat and 15% raw ash, depending on raw material quality and processing conditions. The high methionine content of grass protein makes it particularly suited to laying hens. However, protein extraction and drying are significant cost factors.

c.Biogas
The water-soluble fraction of good-quality grass yields 200-250 m3 biogas per tonne of dry matter.
Utilisation of biogas includes combustion in a combined heat and power machine, as well as feeding into the natural gas distribution network or gas fuelling stations (after purification and compression).
The grass-refinery process is designed in such a way that it can be optimised according to specific aims (fractionation). This can be the fibre recovery at a specific length distribution profile, or the extraction of proteins, or the optimised recovery of soluble chemical oxygen demand (COD) for biogas production.
During operation the plant demonstrated the general feasibility of producing technical fibres and biogas (Grass 2004). The technical fibres were further processed on-site for production of a blow-in insulation product. Biogas was utilised in a combined heat and power plant. Heat was used internally for drying fibres. In order to make the entire refinery profitable, it was planned to certify and offer the generated power under the label 'Naturemade Star'.
Production of proteins was planned to be added as a further step. The plant, however, was shut down before the required processes for the generation of proteins were implemented. The reasons for shutting down were manifold32:
• Technical teething trouble: e.g. the capacity of grass scrubber was not sufficient to cope with
unexpected high shares (up to 20%) of polluting materials such as sand and stones. Consequently the scrubber had to be re-sized and replaced. Also, the actual capacity of the drier did not match its specification.
• Unexpected labour costs due to more staff required for packaging of products.
• Changing business environment: Exit of bank investor
• Decreasing engagement of project promoters
In order to account for the fact that the described process produces three products, a multi-output
process is set up.
The plant was designed for a raw material throughput capacity around 0.8 tonnes of dry matter per hour. Literature reports that a yearly input of 4400 tDM of grass (dry matter) was expected. Literature also says that the yield of technical fibres was 500-600 kg per tonne of dry matter and the biogas yield was 150-250 Nm3, depending on raw material quality. Additional production volumes are given in literature.
In the table bellow the yields of the three products as reported in different sources are summarised.
Biogas is digested in a digestion tank. In Schaffhausen, an up-flow anaerobic sludge bed (UASB) reactor design for biogas production from the water-soluble extracts of grass has been adapted. This reactor design is widely applied in breweries, the sugar industry and various other industries. High-rate anaerobic reactors, such as UASB reactors offer advantages for soluble substrates and larger-scale applications. They also offer scale-up advantages for bio-refinery systems applying solid/liquid separation.
References:
Baier & Delavy 2003. Baier U. and Delavy P. (2003) Bioenergie, Protein & Fasern aus Gras. Monitoring des Biogasprozesses. Bundesamt für Energie, Bern.

Carbotech 2000 Carbotech (2000) Beurteilung der Herstellung von Strom, Fasern und Protein
aus Gras. Studie zur ermittlung der Umweltauswirkungen. Datasheets, Basel.

Grass 2004. Grass S. (2004) Utilisation of Grass for Production of Fibres, Proteins and Energy.
In: Biomass and Agriculture: Sustainability, Markets and Policies (Ed. OECD). pp. 169-177. OECD Publication Service, Paris retrieved from: www.oecd.org/agr/env.

Janzing 2001. Janzing B. (2001) Gras liefert Energie für die Stadt Schaffhausen, retrieved
from: http://www.inaro.de/Deutsch/ROHSTOFF/ENERGIE/Biogas/Grasenergie.htm.

## Parameters
- fraction, process water, to air: 0.15 dimensionless; name fraction_PW_to_air; lognormal variance with pedigree 0.092025, pedigree (4,4,3,2,4)
  Literature value. In case when no industry/process specific data are available, default evaporation fraction value is used. This value is 15% and is based on literature (Statistics Canada, 2007 & Shaffer, K.H., 2008, Consumptive water use in the Great Lakes Basin, USGS & Shiklomanov, 2003, World Water Resources at the Beginning of the 21st Century) and has been approved by an expert.

## Reference product
- biogas, from grass: 1 m3; name RP; source Baier U. 2003; CPC 17200: Coal gas, water gas, producer gas and similar gases, other than petroleum gases and other gaseous hydrocarbons; By-product classification allocatable product; CAS 14493-06-2
  The dataset as presented in this study is based on the assumption that the biogas is upgraded and used as a fuel.
  Some properties of biogas generated from grass and grass-silage as applied in this project are summarised:
  Methane - 55% of the volume
  Carbon Dioxide - 45% of the volume
  Hydrogen Sulfide - 80 ppm
  Density - 1.28 kg/Nm3
  Lower Heating Value - 19.74 MJ/Nm3
  Upper heating Value - 21.85 MJ/Nm3
  The relatively high share of CO2 in the generated biogas is a consequence of feeding the biogas with emissions of the gasholder. These emissions are characterised by a high share of CO2.
  The dataset as presented in this study is based on the assumption that the biogas is upgraded and used as a fuel.
  Some properties of biogas generated from grass and grass-silage as applied in this project are summarised:
  Methane - 55% of the volume
  Carbon Dioxide - 45% of the volume
  Hydrogen Sulfide - 80 ppm
  Density - 1.28 kg/Nm3
  Lower Heating Value - 19.74 MJ/Nm3
  Upper heating Value - 21.85 MJ/Nm3
  The relatively high share of CO2 in the generated biogas is a consequence of feeding the biogas with emissions of the gasholder. These emissions are characterised by a high share of CO2.
  production volume 61320 m3; name RP_PV
    Max: 0.8t grass(DM)/d
    800 [kg/day] * 0.21 [m3/kg]
  property heating value, net 29.09 MJ
    Value taken from the general comment of "heat and power co-generation, biogas, gas engine" dataset.
  property price 0.109 EUR2005
    Temporary price data. Calculated as 90% of purchasers price based on: Same prices per energy output as natural gas, based on the proportional lower heating value (2/3 that of natural gas)
  property carbon content, non-fossil 0.418453
    considered pure protein (ecoinvent v2.2 report 17, pg 288). C-content in protein is estimated to be 53% ( from 'Evolutionary and Biochemical Aspects', A.D. Kay and T. Vrede (in Global Ecology, 2010, Elsevier B.V., S.E. Jørgensen Ed.).
    Total C content in kg/Nm3 (Tab 12.8, ecoinvent v2.2 report n17), referred to 1kg DM
  property carbon content 0.418453
    carbon content on a dry matter basis (reserved; not for manual entry)
  property true value 0.02289; name RP_true_value
    allocation property applied in "true value" allocation // value calculated from revenue
  properties: water content 0, carbon content, fossil 0, dry mass 1.28 kg, wet mass 1.28 kg, water in wet mass 0 kg, carbon allocation 0.53562 kg

## By-products
- grass fibre: 0 kg; name fibre; CPC 23319: Preparations used in animal feeding n.e.c.; By-product classification allocatable product
  Calculated value, based on literature studies.
  production volume 116800 kg; = fibre*RP_PV/ABS(RP)
    Max: 0.8t grass(DM)/d
    800 [kg/day] * 0.15 [kg/kg]
  property carbon content, non-fossil 0.46
    considered pure protein (ecoinvent v2.2 report 17, pg 288). C-content in protein is estimated to be 53% ( from 'Evolutionary and Biochemical Aspects', A.D. Kay and T. Vrede (in Global Ecology, 2010, Elsevier B.V., S.E. Jørgensen Ed.).
    considered pure fibre (Tab 12.43, ecoinvent v2.2 report 17). C-content in fibre is estimated to be 46% in dry mass (from 'Evolutionary and Biochemical Aspects', A.D. Kay and T. Vrede (in Global Ecology, 2010, Elsevier B.V., S.E. Jørgensen Ed.)).
  property price 0.645 EUR2005
    Temporary price data. Calculated as 90% of purchasers price based on: Source: Ecoinvent report nr. 17, table 12.46
  property carbon content 0.46
    carbon content on a dry matter basis (reserved; not for manual entry)
  property true value 0.258; name fibre_true_value
    allocation property applied in "true value" allocation // value calculated from revenue
  properties: wet mass 1 kg, dry mass 0.979 kg, carbon content, fossil 0, water content 0.0214505, water in wet mass 0.021 kg, carbon allocation 0.45034 kg
- protein feed, 100% crude: 0 kg; name protein; CPC 23319: Preparations used in animal feeding n.e.c.; By-product classification allocatable product; pedigree (1,1,1,1,1)
  Calculated value, based on literature studies.
  production volume 43800 kg; = protein*RP_PV/ABS(RP)
    Max: 0.8t grass(DM)/d
    800 [kg/day] * 0.4 [kg/kg]
  property carbon content, non-fossil 0.53
    considered pure protein (ecoinvent v2.2 report 17, pg 288). C-content in protein is estimated to be 53% ( from 'Evolutionary and Biochemical Aspects', A.D. Kay and T. Vrede (in Global Ecology, 2010, Elsevier B.V., S.E. Jørgensen Ed.).
  property price 0.424 EUR2005
    Based on protein content and energy feed, gross content in soybean meal and prices per kg of soybean meal. Assumed soybean meal is the most used feed. Soybean meal 2004 prices for World import/export data (tonnes and US$) from FaoStat statistics (http://faostat.fao.org/site/535/default.aspx#ancor, TRADE)- [Accessed 24 May 2010]. See calculations for protein /energy content
  property carbon content 0.53
    carbon content on a dry matter basis (reserved; not for manual entry)
  property true value 0.0636; name protein_true_value
    allocation property applied in "true value" allocation // value calculated from revenue
  properties: wet mass 1 kg, dry mass 0.943396 kg, water content 0.06, carbon content, fossil 0, water in wet mass 0.0566038 kg, carbon allocation 0.5 kg

## Inputs from technosphere
- grass, Swiss integrated production: 0.31641 kg; source Oettli B. 2004; lognormal variance with pedigree 0.0412, pedigree (2,3,5,1,1)
  Calculated value, based on literature.
  Three different types of grass representing the average grass mix of Switzerland are considered: 32,4% of grass from 'grass production, Swiss integrated production, intensive', 61,5% of grass from 'grass production, permanent grassland, Swiss integrated production, intensive', and 6,1% of grass from 'grass production, permanent grassland, organic, extensive'.
  properties: water content 5.66667, carbon content, non-fossil 0.443857, dry mass 1 kg, wet mass 6.66667 kg
  note on carbon content, non-fossil: considered pure protein (ecoinvent v2.2 report 17, pg 288). C-content in protein is estimated to be 53% ( from 'Evolutionary and Biochemical Aspects', A.D. Kay and T. Vrede (in Global Ecology, 2010, Elsevier B.V., S.E. Jørgensen Ed.). Composition data obtained from the average composition of Fescue Fresh, Orchardgrass Fresh, and Timothy Fresh in (http://beefmagazine.com/images/2009%20feed%20table.pdf). First, composition data were refered to 1 kg dry mass. Then, C-contents were calculated considering a C-content/dry mass of 46% in carbohydrates (including fibres), 53% in proteins and 75% in fats. All data from 'Evolutionary and Biochemical Aspects', A.D. Kay and T. Vrede (in Global Ecology, 2010, Elsevier B.V., S.E. Jørgensen Ed.).
- wastewater from grass refinery: -0.00126564 m3; name wastewater; lognormal variance with pedigree 0.0827, pedigree (3,3,5,3,1)
  Calculated value, based on literature studies.
  production volume 1168 m3; = wastewater*RP_PV/ABS(RP)
    Calculated from the production volume of biogas, from grass in proportion to the respective output amounts.
  property price 0 EUR2005; name wastewater_price_EUR2005
  properties: dry mass 25.4 kg, wet mass 1000 kg, water content 38.3701, carbon content, non-fossil 1
  note on carbon content, non-fossil: considered pure protein (ecoinvent v2.2 report 17, pg 288). C-content in protein is estimated to be 53% ( from 'Evolutionary and Biochemical Aspects', A.D. Kay and T. Vrede (in Global Ecology, 2010, Elsevier B.V., S.E. Jørgensen Ed.). TOC is 25.4 kg/m3 (ecoinvent v2.2 report 17, pg 221). TOC was considered as Total Carbon.
- ethanol fermentation plant: 1.56623e-11 unit; source Jungbluth N. 2007; lognormal variance with pedigree 0.3527, pedigree (3,3,5,3,1)
  Estimated value, using the dataset 'ethanol fermentation plant' as a first approximation.
  This exchange has an activity link directly to the producing activity because the product is primarily consumed in the same geographical area where it is produced.
- heat, district or industrial, natural gas: 1.06554 MJ; source Carbotech 2000; lognormal variance with pedigree 0.0513, pedigree (2,3,5,3,1)
  Calculated value, based on literature.
  Heating is required for the pre-treatment of the grass, and post treatment (drying) of fibres and proteins.
  It's assumed that the pre-treatment stage should be the same as for the ethanol production from grass.
  For ethanol, literature gives that the steam consumption for the pre-treatment stage is 5.1 MJ/litre of ethanol, and the electricity consumption 0.5 kWh/l (while the consumption of grass is 32.7 kg of fresh grass per litre of ethanol). Based on these figures, a specific heating value of 0.96 MJ/kgGrass_DM was calculated.
  Digestion takes place at the end of the refinery process, and hence the input substance (grass juice) has already achieved the required digestion temperature.
  For post treatment of proteins and fibres, specific heat consumptions for fibres drying and protein drying of 2.50 MJ/kg evarporated water and 4.01 MJ/kg evarporated water, respectively are assumed.
  Similar as for biowaste digestion, various concepts of energy supply for the digestion of sewage sludge are possible. In principle, if biogas is used as a fuel for co-generation, the heat expenditures can usually covered completely, and electricity demand can be covered partly by the produced heat and electricity from on-site co-generation. However, this would result in a lower process efficiency of the digestion process; i.e. ideally an adjustment with respect to the final yield of biogas is performed. On the other hand, if biogas is assumed to be used as a feedstock for transportation fuels, the process most likely would be optimised in a way that a maximum yield of biogas is achieved. The reason for this is that a higher biogas throughput in the biogas upgrading plant significantly reduces the cost for the biogas upgrading. In case that all biogas is fed in the upgrading plant, the required heat and electricity is obtained from conventional energy carriers.
  For heat supply various options are possible. In this study we assume that the heat demand is covered by natural gas combustion. Alternatively also wood chips may be used.
  Further references:
  Fromentin et al. 2000. Fromentin A., Biollay F., Dauriat H., Luca.Porta H., Marchand J.-D. and Sarlos G. (2000) Caractérisation de filières de production de bioéthanol dans le contexte helvétique. Sur mandat de l'Office fédéral de l'énergie, rapport final.
  properties: heating value, net 1 MJ
- electricity, low voltage: 0.064864 kWh; source Carbotech 2000; lognormal variance with pedigree 0.0513, pedigree (2,3,5,3,1)
  Calculated value, based on literature.
  Electricity is required for operation of various devices, such as grass reception belts, hexler, comminutor, fibre press, decanter, fans, blowers, juice recycle pumps, pelletiser. In literature, a total electricity consumption of 205 kWh/tgrassDM is reported. It should be noted that in contrast to other digestion processes as described in this chapter, no agitation of the input substance while staying in the biogas reactor is required.
  Similar as for bio waste digestion, various concepts of energy supply for the digestion of sewage sludge are possible. In principle, if biogas is used as a fuel for co-generation, the heat expenditures can usually covered completely, and electricity demand can be covered partly by the produced heat and electricity from on-site co-generation. However, this would result in a lower process efficiency of the digestion process; i.e. ideally an adjustment with respect to the final yield of biogas is performed. On the other hand, if biogas is assumed to be used as a feedstock for transportation fuels, the process most likely would be optimised in a way that a maximum yield of biogas is achieved. The reason for this is that a higher biogas throughput in the biogas upgrading plant significantly reduces the cost for the biogas upgrading. In case that all biogas is fed in the upgrading plant, the required heat and electricity is obtained from conventional energy carriers.
  For electricity the current Swiss supply mix is employed.

## Inputs from nature
- Water, river [natural resource, in water]: 0.00153712 m3; name water_river_input; source Carbotech 2000; lognormal variance with pedigree 0.3527, pedigree (3,3,5,3,1)
  Calculated value, based on literature.
  Calculations are based on the quantity of wastewater and the water losses due to drying fibres and proteins.
  Calculated value, based on literature.
  Calculations are based on the quantity of wastewater and the water losses due to drying fibres and proteins.

## Emissions to nature
- Water [air, unspecified]: 0.000230568 m3; name water_to_air_unspecified; = (water_river_input*fraction_PW_to_air); lognormal variance with pedigree 0.0807, pedigree (2,2,5,1,1)
  Calculated value based on literature values and expert opinion. See comments in the parametres' comment field.
  property fraction, origin: salt water 0; name fraction_origin_salt_water
  property fraction, origin: unspecified 0; name fraction_origin_unspecified
  property fraction, origin: fresh water 1; name fraction_origin_fresh_water

## Sampling procedure
Literature data

## Review by Emilia Moreno Ruiz 2012-05-23
dataset documented by trainee Marcela Valles Lange

## Review by Emilia Moreno Ruiz 2012-03-19
name change from 'proteins, from biogas production from grass' to 'protein feed, 100% crude'

## Review by Niels Jungbluth 2006-05-05
Passed.
none
