# wheat production

Dataset: EcoSpold 2, unit process
Geography: RoW
Time period: 2001-01-01 to 2021-12-31
Technology level: current
Classification: ISIC rev.4 ecoinvent: 0111:Growing of cereals (except rice), leguminous crops and oil seeds
Synonyms: Triticum aestivum L.
Scenario: Business-as-Usual
System model: Allocation, cut-off by classification
Generated by: Thomas Kägi
Published in: Nemecek, T. 2007
Database: ecoinvent
isCopyrightProtected: true
accessRestrictedTo: 1

## General comment
This dataset represents the production of 1 kg of wheat grain (fresh matter). The amounts of flows are weighted averages over all existing local crop production datasets available for this specific product. The weights are the annual production volumes of the local datasets relative to the sum of all local annual production volumes. The locations of considered datasets in the averaging prodecure for this global dataset are Germany, Spain, France and USA. For references refer to the respective local datasets.
[This dataset was already contained in the ecoinvent database version 2. It was not individually updated during the transfer to ecoinvent version 3. Life Cycle Impact Assessment results may still have changed, as they are affected by changes in the supply chain, i.e. in other datasets. This dataset was generated following the ecoinvent quality guidelines for version 2. It may have been subject to central changes described in the ecoinvent version 3 change report (http://www.ecoinvent.org/database/ecoinvent-version-3/reports-of-changes/), and the results of the central updates were reviewed extensively. The changes added e.g. consistent water flows and other information throughout the database. The documentation of this dataset can be found in the ecoinvent reports of version 2, which are still available via the ecoinvent website. The change report linked above covers all central changes that were made during the conversion process.]

## Included activities start
This activity starts after the harvest of the previous crop. The inputs of seeds, mineral fertilisers, pesticides and irrigation water are considered. It is assumed that no organic fertilisers are applied.

## Included activities end
The dataset includes all machine operations and corresponding machine infrastructure and sheds. Machine operations are: soil cultivation, sowing, fertilisation, irrigation, weed control, pest and pathogen control, combine-harvest and transport from field to farm. Further, direct field emissions are included. This activity ends after harvest and drying of grains at the farm gate.

## Geography
Refers to an average production in the USA, France, Germany and Spain

## Technology
Conventional production

## Time period
The yield data have been collected for the years 2001-2006.

## Parameters
- fraction, irrigation water, to ground water: 0.8 dimensionless; name fraction_IW_to_ground_water; lognormal variance with pedigree 0.0886, pedigree (4,3,1,1,4)
- fraction, irrigation water, to air: 0.586986 dimensionless; name fraction_IW_to_air; lognormal variance with pedigree 0.0409, pedigree (2,2,2,1,1)
  Literature value (Siebert, 2010) (Vionnet, S., Quantis Water Database - Technical Report, 2012).
- fraction, irrigation water to surface water: 0.2 dimensionless; name fraction_IW_to_surface_water; lognormal variance with pedigree 0.0886, pedigree (4,3,1,1,4)

## Reference product
- straw: 1 kg; name BP_amount_1; CPC 01913: Cereal straw, husks, unprepared, ground, pressed, or in the form of pellets; By-product classification allocatable product
  Averaged from new local data on Australia and Canada without Quebec
  production volume 7.62032e10 kg; = RP_PV_1 * (BP_amount_1 / REF_PRODUCT)
    Calculated from production volume of reference product using the relative outputs.
  property price 0.012 EUR2005
    Temporary price data. Calculated as 90% of purchasers price based on: Based on price allocation ratio from EcoInvent v2 report number 17, page 118.
  property heating value, net 14.25 MJ
    Literature value, Source: Phyllis2, database for (treated) biomass, algae, feedstocks for biogas production and biochar, https://phyllis.nl/Biomass/View/1271, ECN.TNO
  property carbon content 0.437377
    carbon content on a dry matter basis (reserved; not for manual entry)
  property true value 0.002061; name BP_amount_1_true_value
    allocation property applied in "true value" allocation // value calculated from revenue
  properties: carbon content, non-fossil 0.437377, dry mass 0.85 kg, water in wet mass 0.15 kg, water content 0.176471, carbon content, fossil 0, wet mass 1 kg, carbon allocation 0.37177 kg
- wheat grain: 0 kg; name REF_PRODUCT; CPC 01112: Wheat, other; By-product classification allocatable product
  production volume 3.65518e11 kg; name RP_PV_1
    FAOSTAT World 2005
  property water content 0.176471; name REF_PRODUCT_water_content; = (1-REF_PRODUCT_DM)/REF_PRODUCT_DM
  property water in wet mass 0.15 kg; name REF_PRODUCT_WWM; = 1-REF_PRODUCT_DM
  property dry mass 0.85 kg; name REF_PRODUCT_DM
  property carbon content, non-fossil 0.464601; name REF_PRODUCT_C_content_non_fossil
    biogene carbon content on a dry matter basis
    Composition data obtained from Wheat, soft red winter, in (http://www.nal.usda.gov/fnic/foodcomp/search/). First, composition data were refered to 1 kg dry mass. Then, C-contents were calculated considering a C-content/dry mass of 46% in carbohydrates (including fibres), 53% in proteins and 75% in fats. All data from 'Evolutionary and Biochemical Aspects', A.D. Kay and T. Vrede (in Global Ecology, 2010, Elsevier B.V., S.E. Jørgensen Ed.).
  property wet mass 1 kg; name REF_PRODUCT_WM
  property price 0.22 EUR2005; name REF_PRODUCT_price_EUR2005
    Literature value. Based on SAFEX price of R 3,727 per tonne, source: SAGIS, 2018. Retrieved from: http://www.sagis.org.za/safex_historic.html, accessed 28May2018
  property carbon content, fossil 0; name REF_PRODUCT_C_content_fossil
    fossil carbon content on a dry matter basis
  property energy content 15.3935 MJ; name REF_PRODUCT_energy_content
    See chapter 'Yields and Inputs of Arable Crop Production' in '01_crop production - yields & inputs CH & Europe_v1.0.pdf', section 'AGRICULTURAL PRODUCTION IN SWITZERLAND' - pdf-document on the dedicated talk page of ecoinvent (www.ecoinvent.org/documentation)
  property carbon content 0.464601
    carbon content on a dry matter basis (reserved; not for manual entry)
  property true value 0.22; name REF_PRODUCT_true_value
    allocation property applied in "true value" allocation // value calculated from revenue
  properties: carbon allocation 0.394911 kg

## Inputs from technosphere
- ammonium sulfate: 3.6644e-5 kg; lognormal variance with pedigree 0.0426, pedigree (2,1,5,5,1)
  Averaged from local datasets. See general comment.
  Averaged from local datasets. See general comment.
  properties: dry mass 1 kg, wet mass 1 kg
- tillage, cultivating, chiselling: 1.30863e-6 ha; lognormal variance with pedigree 0.0426, pedigree (2,1,5,5,1)
  (same comment as for ammonium sulfate)
- ammonia, anhydrous, liquid: 0 kg; pedigree (1,1,1,1,1)
  (same comment as for ammonium sulfate)
  properties: dry mass 1 kg, wet mass 1 kg
- wheat seed, for sowing: 0.00179468 kg; name SEED; lognormal variance with pedigree 0.0426, pedigree (2,1,5,5,1)
  Averaged from local datasets. See general comment.
  property dry mass 0.85 kg; name SEED_DM
  property energy content 15.3935 MJ; name SEED_energy_content
  property wet mass 1 kg; name wheat_seed_sowing_WM
  property water content 0.176471; name wheat_seed_sowing_water_content; = (1-SEED_DM)/SEED_DM
  property carbon content, non-fossil 0.447696; name SEED_C_content_non_fossil
  property water in wet mass 0.15 kg; name wheat_seed_sowing_WWM; = 1-SEED_DM
  note on energy content: See chapter 'Product Properties' in '01_crop production - yields & inputs CH & Europe_v1.0.pdf', section 'AGRICULTURAL PRODUCTION IN SWITZERLAND' - pdf-document on the dedicated talk page of ecoinvent (www.ecoinvent.org/documentation)
  note on carbon content, non-fossil: biogene carbon content on a dry matter basis; Composition data obtained from Wheat, soft red winter, in (http://www.nal.usda.gov/fnic/foodcomp/search/). First, composition data were refered to 1 kg dry mass. Then, C-contents were calculated considering a C-content/dry mass of 44% in carbohydrates (including fibres), 53% in proteins and 75% in fats. All data from ecoinvent report, n 15a, pg 40, except C-content in protein, that comes from Determination of protein concentration by total organic carbon analysis, Rouwenhorst et al., 1991, J Biochem and Biophys Methods, 22:119-128.
- combine harvesting: 1.37063e-5 ha; lognormal variance with pedigree 0.0426, pedigree (2,1,5,5,1)
  (same comment as for ammonium sulfate)
- packaging, for pesticides: 3.0762e-5 kg; lognormal variance with pedigree 0.0912, pedigree (4,3,5,5,4)
  Total amount of active substance/s of pesticides needed for the production of wheat grain is calculated to be circa 2.85E-04 kg. Pesticide/s used in this dataset is/are: '[sulfonyl]urea-compound', '[thio]carbamate-compound', 'acetamide-anillide-compound, unspecified', 'benzoic-compound', 'cyclic N-compound', 'diphenylether-compound', 'glyphosate', 'nitrile-compound', 'organophosphorus-compound, unspecified', 'pesticide, unspecified', 'phenoxy-compound', 'pyrethroid-compound', 'pyridazine-compound', 'triazine-compound, unspecified'. The total amount of active substance/s is doubled in order to account for the packaging of the dilluted product of pesticide/s that is/are applied. Therefore, 5.69E-04 kg of packaging for pesticides is justified with this exchange.
  properties: price 0.0642 EUR2005, carbon content, fossil 0.85714, dry mass 1 kg, wet mass 1 kg, heating value, net 25.97 MJ
- transport, tractor and trailer, agricultural: 8.32431e-5 metric ton*km; lognormal variance with pedigree 0.0426, pedigree (2,1,5,5,1)
  (same comment as for ammonium sulfate)
- triazine-compound, unspecified: 1.23629e-7 kg; lognormal variance with pedigree 0.0426, pedigree (2,1,5,5,1)
  (same comment as for ammonium sulfate)
  properties: dry mass 1 kg, wet mass 1 kg, carbon content, fossil 0.475616
  note on carbon content, fossil: An unweighted average of the C content in Atrazine, Cyanazine, metamitron, simazine, and terbuthylazine. Those substances are classified as triazine-compounds in Tab 2.25, Sutter 2010
- tillage, harrowing, by spring tine harrow: 2.67536e-5 ha; lognormal variance with pedigree 0.0426, pedigree (2,1,5,5,1)
  (same comment as for ammonium sulfate)
- inorganic nitrogen fertiliser, as N: 0 kg; pedigree (1,1,1,1,1)
  (same comment as for ammonium sulfate)
  properties: dry mass 1 kg, wet mass 1 kg
- ammonium nitrate: 0.00139556 kg; lognormal variance with pedigree 0.0426, pedigree (2,1,5,5,1)
  The exchange has been updated from 'ammonium nitrate, as N' into 'ammonium nitrate' and therefore its amount has been scaled (multiplied) from 0.009 kg by 2.8573 kg of 'ammonium nitrate' per kg of 'ammonium nitrate, as N'. Original comment of the exchange is: Averaged from local datasets. See general comment.
  Averaged from local datasets. See general comment.
  properties: wet mass 1 kg, dry mass 1 kg
- nitrile-compound: 1.34932e-6 kg; lognormal variance with pedigree 0.0427, pedigree (2,2,5,5,1)
  (same comment as for ammonium sulfate)
  properties: dry mass 1 kg, wet mass 1 kg, carbon content, fossil 0.344995
  note on carbon content, fossil: An unweighted average of the C content in chlorothalonil, dichlobenil, bromoxynil, ioxynil, substances classified as nitrile-compounds in Tab 2.25, Sutter 2010
- packaging, for fertilisers: 0.00680929 kg; lognormal variance with pedigree 0.0912, pedigree (4,3,5,5,4)
  Total amount of active substance/s of fertilisers needed for the production of 'wheat grain' is calculated to be circa 6.30E-02 kg. Fertiliser/s used in this dataset is/are: 'ammonia, liquid', 'ammonium nitrate, as N', 'ammonium sulfate, as N', 'lime', 'nitrogen fertiliser, as N', 'phosphate fertiliser, as P2O5', 'potassium chloride, as K2O', 'urea, as N'. The total amount of active substance/s is doubled in order to account for the packaging of the dilluted product of fertiliser/s that is/are applied. Therefore, 1.26E-01 kg of packaging for fertilisers is justified with this exchange.
  properties: heating value, net 25.01 MJ, price 0.0642 EUR2005, wet mass 1 kg, carbon content, fossil 0.825301, dry mass 1 kg
  note on carbon content, fossil: Considering a chemical formula (C2H4)n for polyethylene, carbon content-fossil is calculated to be 0.856286 kg of Carbon per kg of dry mass.
- drying of bread grain, seed and legumes: 0.000160432 l; lognormal variance with pedigree 0.0426, pedigree (2,1,5,5,1)
  (same comment as for ammonium sulfate)
- inorganic phosphorus fertiliser, as P2O5: 0 kg; pedigree (1,1,1,1,1)
  (same comment as for ammonium sulfate)
  properties: dry mass 1 kg, wet mass 1 kg
- irrigation: 0 m3; name water_irrigation_input; source Siebert, S. 2010; pedigree (1,1,1,1,1)
  Averaged from local datasets. See general comment.
  Averaged from local datasets. See general comment.
  Averaged from local datasets. See general comment.
  Averaged from local datasets. See general comment.
  properties: wet mass 1000 kg, dry mass 0.11 kg, water content 9089.91
- [thio]carbamate-compound: 2.71386e-8 kg; lognormal variance with pedigree 0.0426, pedigree (2,1,5,5,1)
  (same comment as for ammonium sulfate)
  properties: dry mass 1 kg, wet mass 1 kg, carbon content, fossil 0.626349
  note on carbon content, fossil: Approximated as an unweighted average of the C-content of the [thio]carbamate-compounds (Tab 2.25 Sutter, 2010) carbofuran,orbencarb, prosulfocarb
- sowing: 1.56628e-5 ha; lognormal variance with pedigree 0.0426, pedigree (2,1,5,5,1)
  (same comment as for ammonium sulfate)
- phenoxy-compound: 2.06893e-6 kg; lognormal variance with pedigree 0.0427, pedigree (2,2,5,5,1)
  (same comment as for ammonium sulfate)
  properties: wet mass 1 kg, dry mass 1 kg, carbon content, fossil 0.532559
  note on carbon content, fossil: An unweighted average of the C content in mCPA, mCPB, mecoprop, fluazifop-P-butyl, and 2,4-D. Those substances are classified as phenoxy-compounds in Tab 2.25, Sutter 2010
- pyrethroid-compound: 3.97762e-8 kg; lognormal variance with pedigree 0.0427, pedigree (2,2,5,5,1)
  (same comment as for ammonium sulfate)
  properties: wet mass 1 kg, carbon content, fossil 0.623, dry mass 1 kg
  note on carbon content, fossil: C content of pyrethroid-compounds was calculated as an unweigthed average of C content of the substances: cypermethrin, alpha-cypermethrin,beta-cyfluthrin, lambdacyhalothrin. Those substances are classified as pyrethroid-compounds in Tab 2.25, Sutter 2010
- tillage, harrowing, by rotary harrow: 5.26132e-6 ha; lognormal variance with pedigree 0.0426, pedigree (2,1,5,5,1)
  (same comment as for ammonium sulfate)
- urea: 0.000382604 kg; lognormal variance with pedigree 0.0426, pedigree (2,1,5,5,1)
  The exchange has been updated from 'urea, as N' into 'urea' and therefore its amount has been scaled (multiplied) from 0.0033 kg by 2.1438 kg of 'urea' per kg of 'urea, as N'. Original comment of the exchange is: Averaged from local datasets. See general comment.
  Averaged from local datasets. See general comment.
  properties: wet mass 1 kg, carbon content, fossil 0.2, dry mass 1 kg
- diphenylether-compound: 4.10252e-7 kg; lognormal variance with pedigree 0.0427, pedigree (2,2,5,5,1)
  (same comment as for ammonium sulfate)
  properties: carbon content, fossil 0.560061, wet mass 1 kg, dry mass 1 kg
  note on carbon content, fossil: C content of diphenylether-compounds was calculated after the C content of thepesticides aclonifen and diflufenican classified as diphenylether-compound in Tab 2.25 of Sutter 2010
- acetamide-anillide-compound, unspecified: 8.54344e-9 kg; lognormal variance with pedigree 0.0426, pedigree (2,1,5,5,1)
  (same comment as for ammonium sulfate)
  properties: dry mass 1 kg, carbon content, fossil 0.659175, wet mass 1 kg
  note on carbon content, fossil: Approximated as an unweighted average of the C-content of the acetamide-anillide-compound (Tab 2.25 Sutter, 2010) alachor, metolachlor, propachlor and teflubenzuron
- cyclic N-compound: 1.04883e-6 kg; lognormal variance with pedigree 0.0427, pedigree (2,2,5,5,1)
  (same comment as for ammonium sulfate)
  properties: carbon content, fossil 0.641962, dry mass 1 kg, wet mass 1 kg
  note on carbon content, fossil: Calculated as an unweigthed average of the C content of the cyclic N-compounds where information was avaliable in Sutter, 2010, following the classification in Tab 2.25 in Sutter 2010: Difenoconazole (C19H17Cl2N3O3), Fenpropidin (C19H31N), Fenpropimorph (C20H33NO), Flusilazole (C16H15F2N3Si), Metconazole (C17H22ClN3O), Penconazole (C13H15Cl2N3), Propiconazole (C15H17Cl2N3O2), Tebuconazole (C16H22ClN3O)
- [sulfonyl]urea-compound: 4.96522e-7 kg; lognormal variance with pedigree 0.0427, pedigree (2,2,5,5,1)
  (same comment as for ammonium sulfate)
  properties: dry mass 1 kg, carbon content, fossil 0.540853, wet mass 1 kg
  note on carbon content, fossil: Approximated as an unweighted average of the C-content of the [sulfonyl]urea-compounds (Tab 2.25 Sutter, 2010) chlorotoluron, Diuron, Linuron and Isoproturon.
- pesticide, unspecified: 7.14637e-6 kg; lognormal variance with pedigree 0.0427, pedigree (2,2,5,5,1)
  (same comment as for ammonium sulfate)
  properties: carbon content, fossil 0.486978, wet mass 1 kg, dry mass 1 kg
  note on carbon content, fossil: Mean of C content in all pesticides whose formula has been documented in Sutter 2010
- tillage, rolling: 1.18516e-5 ha; lognormal variance with pedigree 0.0426, pedigree (2,1,5,5,1)
  (same comment as for ammonium sulfate)
- potassium chloride: 0.00168577 kg; lognormal variance with pedigree 0.0426, pedigree (2,1,5,5,1)
  The exchange has been updated from 'potassium chloride, as K2O' into 'potassium chloride' and therefore its amount has been scaled (multiplied) from 0.0197 kg by 1.5829 kg of 'potassium chloride' per kg of 'potassium chloride, as K2O'. Original comment of the exchange is: Averaged from local datasets. See general comment.
  Averaged from local datasets. See general comment.
  properties: wet mass 1 kg, dry mass 1 kg
- organophosphorus-compound, unspecified: 1.77446e-7 kg; lognormal variance with pedigree 0.0427, pedigree (2,2,5,5,1)
  (same comment as for ammonium sulfate)
  properties: carbon content, fossil 0.260898, dry mass 1 kg, wet mass 1 kg
  note on carbon content, fossil: C content was calculated as an unweighted average of glyphosate, parathion, and fosetyl-Al. Those substances are classified as organo-phosphorous compounds in Tab 2.25, Sutter 2010
- benzoic-compound: 7.23678e-8 kg; lognormal variance with pedigree 0.0426, pedigree (2,1,5,5,1)
  (same comment as for ammonium sulfate)
  properties: dry mass 1 kg, carbon content, fossil 0.405853, wet mass 1 kg
  note on carbon content, fossil: C content estimated after the pesticides Dicamba (C8H6Cl2O3) and Clopyralid (C6H3Cl2NO2) (Tab 1.5, Sutter 2010), classified in ecoinvent v2.2 report 15a, Tab 10.3 as benzoic compounds
- application of plant protection product, by field sprayer: 3.53614e-5 ha; lognormal variance with pedigree 0.0426, pedigree (2,1,5,5,1)
  (same comment as for ammonium sulfate)
- glyphosate: 1.8913e-6 kg; lognormal variance with pedigree 0.0427, pedigree (2,2,5,5,1)
  (same comment as for ammonium sulfate)
  properties: wet mass 1 kg, dry mass 1 kg, carbon content, fossil 0.214286
- tillage, ploughing: 3.64775e-6 ha; lognormal variance with pedigree 0.0426, pedigree (2,1,5,5,1)
  (same comment as for ammonium sulfate)
- fertilising, by broadcaster: 4.87663e-5 ha; lognormal variance with pedigree 0.0426, pedigree (2,1,5,5,1)
  (same comment as for ammonium sulfate)
- lime: 3.05663e-5 kg; lognormal variance with pedigree 0.0426, pedigree (2,1,5,5,1)
  (same comment as for ammonium sulfate)
  properties: carbon content, fossil 0.120005, dry mass 1 kg, wet mass 1 kg
- pyridazine-compound: 5.20553e-7 kg; lognormal variance with pedigree 0.0427, pedigree (2,2,5,5,1)
  (same comment as for ammonium sulfate)
  properties: carbon content, fossil 0.541901, dry mass 1 kg, wet mass 1 kg
  note on carbon content, fossil: The herbicide Chloridazon was used as a significative example to calculate C content of pyridazine compounds. This substance is identified as a pyridazine in Tab 1.5, Sutter 2010
- ammonia, anhydrous, liquid: 9.93253e-5, 1.32832e-5, 1.20816e-5, 0.000285816 kg (4 entries); lognormal variance with pedigree 0.0427, pedigree (2,2,5,5,1)
  (same comment as for ammonium sulfate)
- inorganic nitrogen fertiliser, as N: 4.74746e-8, 2.52998e-6, 3.17193e-7, 9.20798e-8, 3.25018e-6, 4.26593e-7, 1.0327e-6, 1.14174e-5, 8.52977e-8, 8.45152e-8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 kg (56 entries); lognormal variance with pedigree 0.0426, pedigree (2,1,5,5,1)
  (same comment as for ammonium sulfate)
- inorganic phosphorus fertiliser, as P2O5: 7.88976e-8, 6.53694e-6, 4.19127e-7, 9.337e-8, 6.79111e-6, 1.8342e-7, 9.6586e-7, 5.31742e-5, 9.12951e-8, 4.61663e-7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 kg (56 entries); lognormal variance with pedigree 0.0426, pedigree (2,1,5,5,1)
  (same comment as for ammonium sulfate)
- irrigation: 0.00041598, 7.06284e-7, 0.00371858, 6.09377e-5, 0.000137362, 4.69471e-5, 0.000125874, 0.000696579, 2.7462e-5, 0.0134143 m3 (10 entries); source Siebert, S. 2010; lognormal variance with pedigree 0.0447, pedigree (2,2,5,5,1)
  (same comment as for irrigation)

## Inputs from nature
- Occupation, annual crop, non-irrigated, intensive [natural resource, land]: 0.0441499 m2*year; lognormal variance with pedigree 0.0426, pedigree (2,1,5,5,1)
  Averaged from local datasets. See general comment.
- Transformation, from annual crop [natural resource, land]: 0.112659 m2; lognormal variance with pedigree 0.0526, pedigree (2,1,5,5,1)
  Averaged from local datasets. See general comment.
- Transformation, to annual crop, non-irrigated, intensive [natural resource, land]: 0.043969 m2; lognormal variance with pedigree 0.0526, pedigree (2,1,5,5,1)
  Averaged from local datasets. See general comment.
- Transformation, to annual crop [natural resource, land]: 0.112659 m2; lognormal variance with pedigree 0.0526, pedigree (2,1,5,5,1)
  Averaged from local datasets. See general comment.
- Energy, gross calorific value, in biomass [natural resource, biotic]: 0.806597 MJ; lognormal variance with pedigree 0.161189, pedigree (2,1,5,1,5)
  Calculated as a weighted (by production volumes) average of the regional activities. The uncertainty is set up to be the same as in case of the regional activities, only the padigree matrix is adjusted from 2,1,1,1,1 to 2,1,1,1,5.
- Occupation, annual crop [natural resource, land]: 0.112659 m2*year; lognormal variance with pedigree 0.0426, pedigree (2,1,5,5,1)
  Averaged from local datasets. See general comment.
- Carbon dioxide, in air [natural resource, in air]: 0.075745 kg; = 44/12 * (REF_PRODUCT_C_content_non_fossil * REF_PRODUCT * REF_PRODUCT_DM - SEED_C_content_non_fossil * SEED * SEED_DM); lognormal variance with pedigree 0.0426, pedigree (2,1,5,5,1)
  Averaged from local datasets. See general comment.
- Transformation, from annual crop, non-irrigated, intensive [natural resource, land]: 0.043969 m2; lognormal variance with pedigree 0.0526, pedigree (2,1,5,5,1)
  Averaged from local datasets. See general comment.

## Emissions to nature
- Zinc [soil, agricultural]: 2.63701e-7 kg; lognormal variance with pedigree 0.0827, pedigree (2,2,5,5,1)
  Averaged from local datasets. See general comment.
- Lead [water, ground-]: 1.27846e-9 kg; lognormal variance with pedigree 0.1327, pedigree (2,2,5,5,1)
  Averaged from local datasets. See general comment.
- Mecoprop-P [soil, agricultural]: 1.13072e-7 kg; lognormal variance with pedigree 0.0527, pedigree (2,2,5,5,1)
  Averaged from local datasets. See general comment.
- Triasulfuron [soil, agricultural]: 8.04104e-9 kg; lognormal variance with pedigree 0.0526, pedigree (2,1,5,5,1)
  Averaged from local datasets. See general comment.
- Picloram [soil, agricultural]: 1.00512e-9 kg; lognormal variance with pedigree 0.0526, pedigree (2,1,5,5,1)
  Averaged from local datasets. See general comment.
- Glyphosate [soil, agricultural]: 1.8913e-6 kg; lognormal variance with pedigree 0.0527, pedigree (2,2,5,5,1)
  Averaged from local datasets. See general comment.
- Mercury [soil, agricultural]: -1.11921e-12 kg
  Averaged from local datasets. See general comment.
- Kresoxim-methyl [soil, agricultural]: 1.86097e-8 kg; lognormal variance with pedigree 0.0527, pedigree (2,2,5,5,1)
  Averaged from local datasets. See general comment.
- Imazamox [soil, agricultural]: 3.01545e-9 kg; lognormal variance with pedigree 0.0526, pedigree (2,1,5,5,1)
  Averaged from local datasets. See general comment.
- Mefenpyr [soil, agricultural]: 2.92825e-8 kg; lognormal variance with pedigree 0.0527, pedigree (2,2,5,5,1)
  Averaged from local datasets. See general comment.
- Phosphate [water, ground-]: 1.71333e-6 kg; lognormal variance with pedigree 0.0827, pedigree (2,2,5,5,1)
  Averaged from local datasets. See general comment.
- Bifenox [soil, agricultural]: 8.63022e-8 kg; lognormal variance with pedigree 0.0527, pedigree (2,2,5,5,1)
  Averaged from local datasets. See general comment.
- Mecoprop [soil, agricultural]: 4.59076e-7 kg; lognormal variance with pedigree 0.0527, pedigree (2,2,5,5,1)
  Averaged from local datasets. See general comment.
- Cypermethrin [soil, agricultural]: 2.11851e-8 kg; lognormal variance with pedigree 0.0527, pedigree (2,2,5,5,1)
  Averaged from local datasets. See general comment.
- Chlorpyrifos [soil, agricultural]: 1.08552e-7 kg; lognormal variance with pedigree 0.0526, pedigree (2,1,5,5,1)
  Averaged from local datasets. See general comment.
- Lambda-cyhalothrin [soil, agricultural]: 1.65132e-8 kg; lognormal variance with pedigree 0.0527, pedigree (2,2,5,5,1)
  Averaged from local datasets. See general comment.
- Metosulam [soil, agricultural]: 1.53831e-9 kg; lognormal variance with pedigree 0.0527, pedigree (2,2,5,5,1)
  Averaged from local datasets. See general comment.
- Mercury [water, ground-]: 3.45424e-12 kg; lognormal variance with pedigree 0.1327, pedigree (2,2,5,5,1)
  Averaged from local datasets. See general comment.
- Flurtamone [soil, agricultural]: 5.43376e-8 kg; lognormal variance with pedigree 0.0527, pedigree (2,2,5,5,1)
  Averaged from local datasets. See general comment.
- Flufenacet [soil, agricultural]: 5.21635e-8 kg; lognormal variance with pedigree 0.0527, pedigree (2,2,5,5,1)
  Averaged from local datasets. See general comment.
- Trinexapac-ethyl [soil, agricultural]: 5.35395e-8 kg; lognormal variance with pedigree 0.0527, pedigree (2,2,5,5,1)
  Averaged from local datasets. See general comment.
- Isoproturon [soil, agricultural]: 4.22498e-7 kg; lognormal variance with pedigree 0.0527, pedigree (2,2,5,5,1)
  Averaged from local datasets. See general comment.
- Phosphate [water, surface water]: 2.35516e-5 kg; lognormal variance with pedigree 0.0827, pedigree (2,2,5,5,1)
  Averaged from local datasets. See general comment.
- Diflufenican [soil, agricultural]: 1.88118e-7 kg; lognormal variance with pedigree 0.0527, pedigree (2,2,5,5,1)
  Averaged from local datasets. See general comment.
- Dicamba [soil, agricultural]: 7.23678e-8 kg; lognormal variance with pedigree 0.0526, pedigree (2,1,5,5,1)
  Averaged from local datasets. See general comment.
- 2,4-D [soil, agricultural]: 9.93058e-7 kg; lognormal variance with pedigree 0.0526, pedigree (2,1,5,5,1)
  Averaged from local datasets. See general comment.
- Trifloxystrobin [soil, agricultural]: 3.73795e-8 kg; lognormal variance with pedigree 0.0527, pedigree (2,2,5,5,1)
  Averaged from local datasets. See general comment.
- Cloquintocet-mexyl [soil, agricultural]: 2.8744e-8 kg; lognormal variance with pedigree 0.0527, pedigree (2,2,5,5,1)
  Averaged from local datasets. See general comment.
- Metconazole [soil, agricultural]: 8.24154e-9 kg; lognormal variance with pedigree 0.0527, pedigree (2,2,5,5,1)
  Averaged from local datasets. See general comment.
- Fludioxonil [soil, agricultural]: 1.22977e-8 kg; lognormal variance with pedigree 0.0527, pedigree (2,2,5,5,1)
  Averaged from local datasets. See general comment.
- Epoxiconazole [soil, agricultural]: 6.67159e-8 kg; lognormal variance with pedigree 0.0527, pedigree (2,2,5,5,1)
  Averaged from local datasets. See general comment.
- Zinc, ion [water, surface water]: 3.58161e-8 kg; lognormal variance with pedigree 0.1327, pedigree (2,2,5,5,1)
  Averaged from local datasets. See general comment.
- Atrazine [soil, agricultural]: 7.33731e-8 kg; lognormal variance with pedigree 0.0526, pedigree (2,1,5,5,1)
  Averaged from local datasets. See general comment.
- Flucarbazone sodium salt [soil, agricultural]: 5.02559e-10 kg; lognormal variance with pedigree 0.0526, pedigree (2,1,5,5,1)
  Averaged from local datasets. See general comment.
- Clopyralid [soil, agricultural]: 7.89127e-8 kg; lognormal variance with pedigree 0.0527, pedigree (2,2,5,5,1)
  Averaged from local datasets. See general comment.
- Tralkoxydim [soil, agricultural]: 3.51786e-9 kg; lognormal variance with pedigree 0.0526, pedigree (2,1,5,5,1)
  Averaged from local datasets. See general comment.
- Metribuzin [soil, agricultural]: 4.62346e-8 kg; lognormal variance with pedigree 0.0526, pedigree (2,1,5,5,1)
  Averaged from local datasets. See general comment.
- Spiroxamine [soil, agricultural]: 1.97396e-7 kg; lognormal variance with pedigree 0.0527, pedigree (2,2,5,5,1)
  Averaged from local datasets. See general comment.
- Fenpropimorph [soil, agricultural]: 7.06371e-8 kg; lognormal variance with pedigree 0.0527, pedigree (2,2,5,5,1)
  Averaged from local datasets. See general comment.
- Cyprodinil [soil, agricultural]: 6.98693e-7 kg; lognormal variance with pedigree 0.0527, pedigree (2,2,5,5,1)
  Averaged from local datasets. See general comment.
- Water [air, unspecified]: 0.0127074 m3; name water_to_air_unspecified; lognormal variance with pedigree 0.0827, pedigree (2,2,5,5,1)
  Calculated value based on literature values and expert opinion. See comments in the parametres' comment field.
  property fraction, origin: unspecified 0; name fraction_origin_unspecified
  property fraction, origin: salt water 0; name fraction_origin_salt_water
  property fraction, origin: fresh water 1; name fraction_origin_fresh_water
- Lead [water, surface water]: 4.80414e-9 kg; lognormal variance with pedigree 0.1327, pedigree (2,2,5,5,1)
  Averaged from local datasets. See general comment.
- Diclofop [soil, agricultural]: 1.75691e-7 kg; lognormal variance with pedigree 0.0527, pedigree (2,2,5,5,1)
  Averaged from local datasets. See general comment.
- Triallate [soil, agricultural]: 2.71386e-8 kg; lognormal variance with pedigree 0.0526, pedigree (2,1,5,5,1)
  Averaged from local datasets. See general comment.
- Thifensulfuron-methyl [soil, agricultural]: 8.14157e-9 kg; lognormal variance with pedigree 0.0526, pedigree (2,1,5,5,1)
  Averaged from local datasets. See general comment.
- Nickel, ion [water, surface water]: 2.38216e-8 kg; lognormal variance with pedigree 0.1327, pedigree (2,2,5,5,1)
  Averaged from local datasets. See general comment.
- Flupyrsulfuron-methyl [soil, agricultural]: 7.80214e-10 kg; lognormal variance with pedigree 0.0527, pedigree (2,2,5,5,1)
  Averaged from local datasets. See general comment.
- Cyproconazole [soil, agricultural]: 4.71473e-8 kg; lognormal variance with pedigree 0.0527, pedigree (2,2,5,5,1)
  Averaged from local datasets. See general comment.
- Carbon dioxide, fossil [air, non-urban air or from high stacks]: 0.000533927 kg; lognormal variance with pedigree 0.0427, pedigree (2,2,5,5,1)
  Averaged from local datasets. See general comment.
- Fluroxypyr [soil, agricultural]: 3.3965e-7 kg; lognormal variance with pedigree 0.0527, pedigree (2,2,5,5,1)
  Averaged from local datasets. See general comment.
- Azoxystrobin [soil, agricultural]: 1.74891e-7 kg; lognormal variance with pedigree 0.0527, pedigree (2,2,5,5,1)
  Averaged from local datasets. See general comment.
- Nickel [soil, agricultural]: 7.89459e-8 kg; lognormal variance with pedigree 0.0827, pedigree (2,2,5,5,1)
  Averaged from local datasets. See general comment.
- Chlormequat [soil, agricultural]: 2.68929e-6 kg; lognormal variance with pedigree 0.0527, pedigree (2,2,5,5,1)
  Averaged from local datasets. See general comment.
- Tebuconazole [soil, agricultural]: 1.9424e-7 kg; lognormal variance with pedigree 0.0527, pedigree (2,2,5,5,1)
  Averaged from local datasets. See general comment.
- Metsulfuron-methyl [soil, agricultural]: 9.35283e-9 kg; lognormal variance with pedigree 0.0527, pedigree (2,2,5,5,1)
  Averaged from local datasets. See general comment.
- Bromuconazole [soil, agricultural]: 5.83288e-9 kg; lognormal variance with pedigree 0.0527, pedigree (2,2,5,5,1)
  Averaged from local datasets. See general comment.
- Ethephon [soil, agricultural]: 5.57179e-9 kg; lognormal variance with pedigree 0.0527, pedigree (2,2,5,5,1)
  Averaged from local datasets. See general comment.
- Water [water, surface water]: 0.00118745 m3; name water_to_water_surface; lognormal variance with pedigree 0.1306, pedigree (4,3,5,5,4)
  Calculated value. See the parameters and their comments to understand the calculation.
  property fraction, origin: salt water 0; name fraction_origin_salt_water_Wsw
  property fraction, origin: fresh water 1; name fraction_origin_fresh_water_Wsw
- Anthraquinone [soil, agricultural]: 1.29393e-7 kg; lognormal variance with pedigree 0.0527, pedigree (2,2,5,5,1)
  Averaged from local datasets. See general comment.
- Zinc, ion [water, ground-]: 1.99442e-7 kg; lognormal variance with pedigree 0.1327, pedigree (2,2,5,5,1)
  Averaged from local datasets. See general comment.
- Ammonia [air, non-urban air or from high stacks]: 0.000105399 kg; lognormal variance with pedigree 0.0527, pedigree (2,2,5,5,1)
  Averaged from local datasets. See general comment.
- Parathion [soil, agricultural]: 6.33225e-8 kg; lognormal variance with pedigree 0.0526, pedigree (2,1,5,5,1)
  Averaged from local datasets. See general comment.
- Cadmium [soil, agricultural]: 6.19668e-8 kg; lognormal variance with pedigree 0.0827, pedigree (2,2,5,5,1)
  Averaged from local datasets. See general comment.
- Cadmium, ion [water, ground-]: 6.57603e-10 kg; lognormal variance with pedigree 0.1327, pedigree (2,2,5,5,1)
  Averaged from local datasets. See general comment.
- Pyraclostrobin (prop) [soil, agricultural]: 7.42658e-8 kg; lognormal variance with pedigree 0.0527, pedigree (2,2,5,5,1)
  Averaged from local datasets. See general comment.
- Tribenuron-methyl [soil, agricultural]: 9.29125e-9 kg; lognormal variance with pedigree 0.0527, pedigree (2,2,5,5,1)
  Averaged from local datasets. See general comment.
- Imidacloprid [soil, agricultural]: 8.98243e-9 kg; lognormal variance with pedigree 0.0527, pedigree (2,2,5,5,1)
  Averaged from local datasets. See general comment.
- Propoxycarbazone-sodium (prop) [soil, agricultural]: 3.35763e-9 kg; lognormal variance with pedigree 0.0527, pedigree (2,2,5,5,1)
  Averaged from local datasets. See general comment.
- Chloridazon [soil, agricultural]: 5.20553e-7 kg; lognormal variance with pedigree 0.0527, pedigree (2,2,5,5,1)
  Averaged from local datasets. See general comment.
- Deltamethrin [soil, agricultural]: 4.08805e-9 kg; lognormal variance with pedigree 0.0527, pedigree (2,2,5,5,1)
  Averaged from local datasets. See general comment.
- Sulfosulfuron [soil, agricultural]: 1.20613e-8 kg; lognormal variance with pedigree 0.0526, pedigree (2,1,5,5,1)
  Averaged from local datasets. See general comment.
- Nitrate [water, ground-]: 0.00114383 kg; lognormal variance with pedigree 0.0827, pedigree (2,2,5,5,1)
  Averaged from local datasets. See general comment.
- Florasulam [soil, agricultural]: 5.45074e-10 kg; lognormal variance with pedigree 0.0527, pedigree (2,2,5,5,1)
  Averaged from local datasets. See general comment.
- Fenoxaprop [soil, agricultural]: 2.01023e-9 kg; lognormal variance with pedigree 0.0526, pedigree (2,1,5,5,1)
  Averaged from local datasets. See general comment.
- Diclofop-methyl [soil, agricultural]: 1.98827e-7 kg; lognormal variance with pedigree 0.0527, pedigree (2,2,5,5,1)
  Averaged from local datasets. See general comment.
- Mercury [water, surface water]: 2.72547e-12 kg; lognormal variance with pedigree 0.1327, pedigree (2,2,5,5,1)
  Averaged from local datasets. See general comment.
- Dimethoate [soil, agricultural]: 7.78971e-9 kg; lognormal variance with pedigree 0.0526, pedigree (2,1,5,5,1)
  Averaged from local datasets. See general comment.
- Copper, ion [water, ground-]: 4.40814e-8 kg; lognormal variance with pedigree 0.1327, pedigree (2,2,5,5,1)
  Averaged from local datasets. See general comment.
- Propiconazole [soil, agricultural]: 2.42391e-7 kg; lognormal variance with pedigree 0.0527, pedigree (2,2,5,5,1)
  Averaged from local datasets. See general comment.
- Mesosulfuron-methyl (prop) [soil, agricultural]: 2.68563e-9 kg; lognormal variance with pedigree 0.0527, pedigree (2,2,5,5,1)
  Averaged from local datasets. See general comment.
- Copper [soil, agricultural]: -5.95674e-8 kg
  Averaged from local datasets. See general comment.
- Chromium [soil, agricultural]: 2.13671e-7 kg; lognormal variance with pedigree 0.0827, pedigree (2,2,5,5,1)
  Averaged from local datasets. See general comment.
- Tefluthrin [soil, agricultural]: 1.38192e-9 kg; lognormal variance with pedigree 0.0527, pedigree (2,2,5,5,1)
  Averaged from local datasets. See general comment.
- Quinoxyfen [soil, agricultural]: 2.93623e-8 kg; lognormal variance with pedigree 0.0527, pedigree (2,2,5,5,1)
  Averaged from local datasets. See general comment.
- Bitertanol [soil, agricultural]: 1.92477e-9 kg; lognormal variance with pedigree 0.0527, pedigree (2,2,5,5,1)
  Averaged from local datasets. See general comment.
- Water [water, ground-]: 0.0047498 m3; name water_to_water_ground; lognormal variance with pedigree 0.1306, pedigree (4,3,5,5,4)
  Calculated value. See the parameters and their comments to understand the calculation.
  property fraction, origin: unspecified 0; name fraction_origin_unspecified_Wgw
  property fraction, origin: salt water 0; name fraction_origin_salt_water_Wgw
  property wet mass 1000 kg; name WM
  property dry mass 0 kg; name DM
  property water in wet mass 1000 kg; name WWM
  property fraction, origin: fresh water 1; name fraction_origin_fresh_water_Wgw
  property carbon content, fossil 0; name C_content_fossil
  property carbon content, non-fossil 0; name C_content_non_fossil
- Prosulfuron [soil, agricultural]: 5.02559e-10 kg; lognormal variance with pedigree 0.0526, pedigree (2,1,5,5,1)
  Averaged from local datasets. See general comment.
- Ioxynil [soil, agricultural]: 3.32987e-7 kg; lognormal variance with pedigree 0.0527, pedigree (2,2,5,5,1)
  Averaged from local datasets. See general comment.
- Chlorsulfuron [soil, agricultural]: 8.04104e-9 kg; lognormal variance with pedigree 0.0526, pedigree (2,1,5,5,1)
  Averaged from local datasets. See general comment.
- Fenpropidin [soil, agricultural]: 3.7832e-7 kg; lognormal variance with pedigree 0.0527, pedigree (2,2,5,5,1)
  Averaged from local datasets. See general comment.
- Copper, ion [water, surface water]: 2.92271e-8 kg; lognormal variance with pedigree 0.1327, pedigree (2,2,5,5,1)
  Averaged from local datasets. See general comment.
- Metaldehyde [soil, agricultural]: 3.63377e-7 kg; lognormal variance with pedigree 0.0527, pedigree (2,2,5,5,1)
  Averaged from local datasets. See general comment.
- Triadimenol [soil, agricultural]: 6.8679e-9 kg; lognormal variance with pedigree 0.0527, pedigree (2,2,5,5,1)
  Averaged from local datasets. See general comment.
- Fenoxaprop ethyl ester [soil, agricultural]: 1.46409e-8 kg; lognormal variance with pedigree 0.0527, pedigree (2,2,5,5,1)
  Averaged from local datasets. See general comment.
- Chromium, ion [water, surface water]: 4.05899e-8 kg; lognormal variance with pedigree 0.1327, pedigree (2,2,5,5,1)
  Averaged from local datasets. See general comment.
- Lead [soil, agricultural]: 3.93665e-8 kg; lognormal variance with pedigree 0.0827, pedigree (2,2,5,5,1)
  Averaged from local datasets. See general comment.
- MCPA [soil, agricultural]: 8.46198e-7 kg; lognormal variance with pedigree 0.0527, pedigree (2,2,5,5,1)
  Averaged from local datasets. See general comment.
- Prochloraz [soil, agricultural]: 4.11304e-8 kg; lognormal variance with pedigree 0.0527, pedigree (2,2,5,5,1)
  Averaged from local datasets. See general comment.
- Mepiquat chloride [soil, agricultural]: 1.01747e-8 kg; lognormal variance with pedigree 0.0527, pedigree (2,2,5,5,1)
  Averaged from local datasets. See general comment.
- Choline chloride [soil, agricultural]: 1.10855e-6 kg; lognormal variance with pedigree 0.0527, pedigree (2,2,5,5,1)
  Averaged from local datasets. See general comment.
- Nitrogen oxides [air, non-urban air or from high stacks]: 1.02239e-5 kg; = 0.21 * N2O; lognormal variance with pedigree 0.0727, pedigree (2,2,5,5,1)
  Averaged from local datasets. See general comment.
- Iodosulfuron-methyl-sodium [soil, agricultural]: 4.86853e-10 kg; lognormal variance with pedigree 0.0527, pedigree (2,2,5,5,1)
  Averaged from local datasets. See general comment.
- Carfentrazone-ethyl [soil, agricultural]: 1.7713e-9 kg; lognormal variance with pedigree 0.0527, pedigree (2,2,5,5,1)
  Averaged from local datasets. See general comment.
- Prohexadione-calcium [soil, agricultural]: 6.05634e-10 kg; lognormal variance with pedigree 0.0527, pedigree (2,2,5,5,1)
  Averaged from local datasets. See general comment.
- Chromium, ion [water, ground-]: 3.0135e-7 kg; lognormal variance with pedigree 0.1327, pedigree (2,2,5,5,1)
  Averaged from local datasets. See general comment.
- Cadmium, ion [water, surface water]: 3.76064e-10 kg; lognormal variance with pedigree 0.1327, pedigree (2,2,5,5,1)
  Averaged from local datasets. See general comment.
- Bromoxynil [soil, agricultural]: 3.26184e-7 kg; lognormal variance with pedigree 0.0527, pedigree (2,2,5,5,1)
  Averaged from local datasets. See general comment.
- Silthiofam [soil, agricultural]: 4.5124e-8 kg; lognormal variance with pedigree 0.0527, pedigree (2,2,5,5,1)
  Averaged from local datasets. See general comment.
- Diuron [soil, agricultural]: 2.76412e-8 kg; lognormal variance with pedigree 0.0526, pedigree (2,1,5,5,1)
  Averaged from local datasets. See general comment.
- Dinitrogen monoxide [air, non-urban air or from high stacks]: 4.86851e-5 kg; name N2O; lognormal variance with pedigree 0.0727, pedigree (2,2,5,5,1)
  Averaged from local datasets. See general comment.
- Phosphorus [water, surface water]: 1.68809e-5 kg; lognormal variance with pedigree 0.0827, pedigree (2,2,5,5,1)
  Averaged from local datasets. See general comment.
- Picoxystrobin [soil, agricultural]: 1.89612e-8 kg; lognormal variance with pedigree 0.0527, pedigree (2,2,5,5,1)
  Averaged from local datasets. See general comment.
- Clodinafop-propargyl [soil, agricultural]: 1.18995e-7 kg; lognormal variance with pedigree 0.0527, pedigree (2,2,5,5,1)
  Averaged from local datasets. See general comment.

## Review by Roberto Dones 2009-01-22
automatic validation in Excel
none
