# nickel concentrate, 16% Ni to generic market for nickel-rich materials

Dataset: EcoSpold 2, unit process
Geography: GLO
Time period: 1994-01-01 to 2021-12-31
Technology level: current
Classification: ISIC rev.4 ecoinvent: 2420:Manufacture of basic precious and other non-ferrous metals
Scenario: Business-as-Usual
System model: Allocation, cut-off by classification
Generated by: Johannes Müller
Database: ecoinvent
isCopyrightProtected: true
accessRestrictedTo: 1

## General comment
This is a renaming activity. It's purpose is to link 'nickel concentrate, 16% Ni' to the generic 'market for nickel-rich materials'.

## Included activities start
Activity starts with the reception of 'nickel concentrate, 16% Ni'.

## Included activities end
Activity ends with the 'nickel concentrate, 16% Ni' being ready for transportation.

## Time period
Time period based on the years for which supplying and demanding activities are valid.

## Reference product
- nickel-rich materials: 1 kg; By-product classification allocatable product; CPC 41412: Unrefined copper; copper anodes for electrolytic refining
  production volume 1.86e8 kg
    Amount set equal to that of the conditional exchange, 'electrolyte, nickel-rich'
  property price 11.2412 EUR2005
    Based on the price of 'nickel, class 1' minus losses in the 'processing nickel-rich materials' activity (7.41% Ni)
  property carbon content 0
    carbon content on a dry matter basis (reserved; not for manual entry)
  properties: carbon content, non-fossil 0, water in wet mass 0 kg, carbon content, fossil 0, water content 0, dry mass 1 kg, nickel content 1, wet mass 1 kg, carbon allocation 0 kg

## Inputs from technosphere
- nickel concentrate, 16% Ni: 6.25 kg; = 1 / 0.16
  Calculated Value. Based on the nickel content in the exchange.
  properties: dry mass 1 kg, wet mass 1 kg
