# melamine impregnated paper production

Dataset: EcoSpold 2, unit process
Geography: RER
Time period: 2012-01-01 to 2021-12-31
Technology level: current
Classification: ISIC rev.4 ecoinvent: 1621:Manufacture of veneer sheets and wood-based panels
Tags: Swiss brush-up completed
Scenario: Business-as-Usual
System model: Allocation, cut-off by classification
Generated by: Frank Werner
Database: ecoinvent
isCopyrightProtected: true
accessRestrictedTo: 1

## General comment
Both particleboard and medium density fibreboard are frequently coated with melamine-impregnated paper. Such coated boards are particularly used for interior works such as for furniture or in kitchens. The dataset describes the production of melamine-impregnated paper for the coating of such boards.
The data stems from several plants in Europe that start from different states of pre-produced resins.
The area weight of the inventoried melamine impregnated paper is 302 gr/m2, corresponding to a paper weight of 104 gr/m2

## Included activities start
From the reception of the raw materials at the factory gate.

## Included activities end
The activity ends with the melamine coated paper at the factory. Eventual airborne emissions are not included due to the lack of specific data. As for the infrastructure it may be assumed that it is included in the dataset of the production of the wood based boards as the production of melamine faced paper is often produced at the same site.

## Geography
Data collected based on survey data from several plants producing coated wood based panels (plus melamine impregnated paper) and completed with additional information from e.g. environmental product declarations.

## Reference product
- paper, melamine impregnated: 1 kg; name r_impregnated_paper; CPC 32149: Other paper and paperboard, cellulose wadding and webs of cellulose fibres, coated, impregnated, gummed or adh[…]; By-product classification allocatable product
  production volume 8.98719e8 kg; name p_impregnated_paper; = ((12300000/0.0196666666666667)+(45036532/0.0265))*2*0.8*0.8*0.302
    estimated from annual production of particle board plus MDF, assuming 80% coating, of which 80% are coated with melamine impregnated paper. The PV for MDF was 1.23E+07 m3 in 2018 (European Panel Federation(2018)). An average thickness of 0.02 m was assumed (wood solution, 2017). The PV of particle board in 2018 was 4.50E+07 m3 (FAOSTAT,2020) and an average thickness of 0.03 m was assumed (Calculated from a range of 0.003-0.05 m) (Werner, 2007). Double sided application of melamine faced paper has been assumed (at 302 gr/m2, incl. resin). The PV has been calulated as follows: (PV_MDF/thickness_MDF + PV_ParticleBoard/thickness_particle_board)*2* Area_desity_melamine_coated_paper*fraction_coated
    References:
    European Panel Federation,2018: <https://europanels.org/the-wood-based-panel-industry/types-of-wood-based-panels-economic-impact/medium-density-fibreboard/>, accessed April 2020
    Wood Solutions, 2017. Environmental Product Declaration: <https://gryphon4.environdec.com/system/data/files/6/11257/epd563%20Medium%20Density%20Fibreboard%20v1.1.PDF>, accessed April 2020
    FAOSTAT,2020. http://www.fao.org/faostat/en/#data/FO, filtered for Forestry Production and Trade Statistics, filtered for Regions Europe, Elements “production”, Items “Particle Board”, years “2018), accessed April 2020
    Werner F., Althaus H.-J., Künniger T., Richter K. and Jungbluth N. (2007) Life Cycle Inventories of Wood as Fuel and Construction Material. Final report ecoinvent data v2.0 No. 9. Swiss Centre for Life Cycle Inventories, Dübendorf, CH.
  property heating value, net 15.35 MJ
    LHV is calculated based on the Carbon content of the product. More details can be found on the respective documentation.
  property price 0.729 EUR2005
    Estimated to be the same as the price for paper, woodfree, coated (export prices for the World+ according to: http://faostat.fao.org/site/626/DesktopDefault.aspx?PageID=626#ancor downloaded 28 April 2009; calculated as export value divided by export volume).
  property carbon content 0.5067
    carbon content on a dry matter basis (reserved; not for manual entry)
  properties: water content 0, dry mass 1 kg, water in wet mass 0 kg, carbon content, fossil 0.3635, wet mass 1 kg, carbon content, non-fossil 0.1432, carbon allocation 0.5067 kg

## By-products
- waste packaging paper: 0 kg; CPC 39240: Waste and scrap of paper or paperboard; By-product classification Recyclable; pedigree (1,1,1,1,1)
  paper waste
  production volume 0 kg; = w_packaging_paper*p_impregnated_paper/r_impregnated_paper
    Calculated from production volume of reference product using the relative outputs.
  property price 0.1 EUR2005
    For paper and board waste the price, in 2005, according to [http://ec.europa.eu/eurostat] is about 1 EUR/kg corresponding to a purchase price of 0.099 similar to the price of UN comodittie: Waste, scrap of paper, board, nes (including unsorted).
  properties: heating value, net 14.11 MJ

## Inputs from technosphere
- chemical, inorganic: 0.021 kg; lognormal variance with pedigree 0.0336, pedigree (1,3,4,1,1)
  pigments
  properties: UVEK_link_8 4417, dry mass 1 kg, UVEK_relative_amount_8 0.0105, UVEK_link_1 431, UVEK_relative_amount_1 1, carbon content, fossil 0.003, wet mass 1 kg
  note on UVEK_link_8: This link has been introduced to model transport specifically for the SAM model; to be used only in special submissions in coordination with ecoinvent and the Swiss FOEN.
  note on UVEK_relative_amount_8: Scaling factor = amount of transport in corresponding KBOB dataset/amount of this input from technosphere. Source for transport distance: Werner F. (2017): Background report for the life cycle inventories of wood and wood based products for updates of ecoinvent 2.2. Werner Environment & Development. To be used only in special submissions in coordination with ecoinvent and the Swiss FOEN
  note on UVEK_link_1: to be used only in special submissions in coordination with ecoinvent and the Swiss FOEN
  note on carbon content, fossil: This dataset is an unweighted average of 20 inorganic substances (listed in Tab 88.1, ecoinvent v2.2 report 8, part II), being part of the top100 chemicals included in this database. The C-content has also been calculated as an unweighted average of the C content of the substances composing this dataset.
- urea: 0.0372164 kg; = (0.0372/(12+4+2*14+16)*(2*14))*2.14379903903132; lognormal variance with pedigree 0.0336, pedigree (1,3,4,1,1)
  The exchange has been updated from 'urea, as N' into 'urea' and therefore its amount has been scaled (multiplied) from 0.0174 kg by 2.1438 kg of 'urea' per kg of 'urea, as N'. Original comment of the exchange is: input of urea converted to N via molar relations
  properties: carbon content, fossil 0.2, wet mass 1 kg, UVEK_link_1 4737, dry mass 1 kg, UVEK_relative_amount_1 1
- hazardous waste, for incineration: 0 kg; name w_hazardous; pedigree (1,1,1,1,1)
  resin waste
  production volume 0 kg
    Calculated from production volume of reference product using the relative outputs.
  properties: water content 0.333333, dry mass 0.75 kg, wet mass 1 kg, carbon content, fossil 0.554667, UVEK_link_1 965, UVEK_relative_amount_1 -1, heating value, net 17 MJ
  note on carbon content, fossil: Tab A.6, ecoinvent v2.2 report 13_I. C content has been calculated after data in the tables, and then referred to 1 kg DM
  note on heating value, net: Value taken from the general comment of the treatment dataset.
- formaldehyde: 0.3881 kg; lognormal variance with pedigree 0.0336, pedigree (1,3,4,1,1)
  properties: carbon content, fossil 0.4, wet mass 1 kg, UVEK_link_1 2184, dry mass 1 kg, heating value, net 20.19 MJ, UVEK_relative_amount_1 1
- municipal solid waste: -0.00107 kg; name w_municipal_waste; lognormal variance with pedigree 0.0342, pedigree (2,3,4,1,1)
  unspecified waste
  production volume 961630 kg; = w_municipal_waste*p_impregnated_paper/r_impregnated_paper
    Calculated from production volume of reference product using the relative outputs.
  properties: dry mass 0.771 kg, carbon content, non-fossil 0.261655, carbon content, fossil 0.171549, UVEK_link_1 1004, wet mass 1 kg, heating value, net 11.74 MJ, UVEK_relative_amount_1 -1, water content 0.297017
  note on carbon content, non-fossil: MSW composition in tab 4.1, ecoinvent v2.2 report 13_I. C content referred to 1 kg DM
- urea formaldehyde resin: 0.218 kg; lognormal variance with pedigree 0.0336, pedigree (1,3,4,1,1)
  properties: dry mass 1 kg, carbon content, fossil 0.408958, wet mass 1 kg, UVEK_relative_amount_1 1, UVEK_link_1 4736, heating value, net 12.39 MJ
- melamine formaldehyde resin: 0.377 kg; lognormal variance with pedigree 0.0336, pedigree (1,3,4,1,1)
  properties: UVEK_relative_amount_1 1, dry mass 1 kg, UVEK_link_1 2931, heating value, net 9.44 MJ, wet mass 1 kg, carbon content, fossil 0.311708
- heat, district or industrial, natural gas: 3.01 MJ; lognormal variance with pedigree 0.0336, pedigree (1,3,4,1,1)
  input of natural gas
  properties: UVEK_relative_amount_1 1, UVEK_link_1 2576, heating value, net 1 MJ
- kraft paper: 0.344 kg; lognormal variance with pedigree 0.0336, pedigree (1,3,4,1,1)
  properties: water content 0.0582011, dry mass 0.945 kg, carbon content, fossil 0.0020219, wet mass 1 kg, heating value, net 14.11 MJ, carbon content, non-fossil 0.41662
  note on carbon content, fossil: Fossil C content was calculated after fossil C contents of chemicals used in the production of the paper (in Tab 9.4 ecoinvent v2.2 report 11_III, part 9).
  note on carbon content, non-fossil: Biogenic C content was calculated after biogenic C contents of chemicals used in the production of the paper (in Tab 9.4 ecoinvent v2.2 report 11_III, part 9). The cellulose content in 1 kg of paper (on a wet mas basis) was estimated as (1-chemical content), C content of cellulose was considered 0.44 kgC/kg dry mass (ecoinvent v2.2 report, n 15a, pg 40)
- tap water: 0.338 kg; lognormal variance with pedigree 0.0336, pedigree (1,3,4,1,1)
  properties: wet mass 1 kg, UVEK_link_1 4285, carbon content, fossil 0.00178991, water content 2962.17, UVEK_relative_amount_1 1, dry mass 0.000337476 kg
  note on carbon content, fossil: Bicarbonate content is 2.93 mol/m3. CO2 content is 0.1 mol/m3 (ecoinvent v2.2 report 8, Tab 93.1).
- electricity, medium voltage: 0.210556 kWh; = 0.758/3.6; lognormal variance with pedigree 0.0336, pedigree (1,3,4,1,1)
  MJ converted to kWh
  properties: UVEK_relative_amount_1 1, UVEK_link_1 1779
- heat, district or industrial, other than natural gas: 2.89 MJ; lognormal variance with pedigree 0.0336, pedigree (1,3,4,1,1)
  heat from wood combustion
  properties: UVEK_link_1 2602, UVEK_relative_amount_1 1, heating value, net 1 MJ
- waste packaging paper: -0.00538 kg; lognormal variance with pedigree 0.0342, pedigree (2,3,4,1,1)
  paper waste
  production volume 4.83511e6 kg
  properties: price 0.1 EUR2005, heating value, net 14.11 MJ
- hazardous waste, for incineration: -0.0106223, -0.000277662 kg (2 entries); lognormal variance with pedigree 0.0342, pedigree (2,3,4,1,1)
  resin waste
  production volume 9.79604e6 kg

## Emissions to nature
- Water [air, unspecified]: 0.0007047 m3; = (0.3667+0.338)/1000; lognormal variance with pedigree 0.2086, pedigree (1,3,4,1,1)
  water from chemical reaction of adhesives plus tap water; kg converted to m3
  Amount was scaled to the amount of reference product.

## Sampling procedure
The life cycle inventory has been compiled based on survey data from several plants producing coated wood based panels (plus melamine impregnated paper) and completed with additional information from e.g. environmental product declarations. As such, the LCI does not represent a statistical average but a best guess based on the available information.

## Extrapolations
This dataset has been extrapolated from year 2012 to the year of the calculation (2021). The uncertainty has been adjusted accordingly.
