# petroleum combustion, in drilling tests

Dataset: EcoSpold 2, unit process
Geography: GLO
Time period: 1991-01-01 to 2021-12-31
Technology level: current
Classification: EcoSpold01Categories: oil/production
Classification: ISIC rev.4 ecoinvent: 0610:Extraction of crude petroleum
Tags: ConvertedDataset
Scenario: Business-as-Usual
System model: Allocation, cut-off by classification
Generated by: Niels Jungbluth
Published in: Jungbluth, N. 2007
Database: ecoinvent
isCopyrightProtected: true
accessRestrictedTo: 1

## General comment
Inventory of emissions from crude oil combustion.
[This dataset was already contained in the ecoinvent database version 2. It was not individually updated during the transfer to ecoinvent version 3. Life Cycle Impact Assessment results may still have changed, as they are affected by changes in the supply chain, i.e. in other datasets. This dataset was generated following the ecoinvent quality guidelines for version 2. It may have been subject to central changes described in the ecoinvent version 3 change report (http://www.ecoinvent.org/database/ecoinvent-version-3/reports-of-changes/), and the results of the central updates were reviewed extensively. The changes added e.g. consistent water flows and other information throughout the database. The documentation of this dataset can be found in the ecoinvent reports of version 2, which are still available via the ecoinvent website. The change report linked above covers all central changes that were made during the conversion process.]

## Included activities end
Crude oil use and air emissions from combustion of crude oil during drilling tests.

## Geography
Data investigated in NO.

## Technology
Drilling test in the North Sea.

## Time period
Time of publication in literature

## Reference product
- petroleum combustion, in drilling tests: 1 kg; By-product classification allocatable product; CPC 862: Support and operation services to mining
  EcoSpold01Location=GLO
  production volume 1 kg
    31.6 kg of crude oil are burned for one drilling metre
    Dummy value to be replaced by measured, estimated or calculated value
  property price 0.192 EUR2005
    Estimated to have the same price as the generic product "petroleum".
  property carbon content, fossil 0.85
    C-content of crude oil is 83-87% (ecoinven report 6_IV, Tab 3.2). An average C-content of 0.85 kg C/kg crude oil was considered
  property carbon content 0.85
    carbon content on a dry matter basis (reserved; not for manual entry)
  properties: heating value, net 41.9 MJ, water content 0, dry mass 1 kg, carbon content, non-fossil 0, water in wet mass 0 kg, wet mass 1 kg, carbon allocation 0.85 kg

## Inputs from nature
- Oil, crude, in ground [natural resource, in ground]: 1 kg; lognormal variance with pedigree 0.0427, pedigree (2,4,5,3,1)
  Environmental report
  Uncertainty: Environmental report

## Emissions to nature
- Carbon monoxide, fossil [air, non-urban air or from high stacks]: 0.054 kg; lognormal variance with pedigree 0.6927, pedigree (2,4,5,3,1)
  Literature
  Uncertainty: Literature
- Dioxins, measured as 2,3,7,8-tetrachlorodibenzo-p-dioxin [air, non-urban air or from high stacks]: 8.6e-12 kg; lognormal variance with pedigree 0.3527, pedigree (2,4,5,3,1)
  Literature
  Uncertainty: Literature
- NMVOC, non-methane volatile organic compounds, unspecified origin [air, non-urban air or from high stacks]: 0.0023 kg; lognormal variance with pedigree 0.0827, pedigree (2,4,5,3,1)
  Environmental report
  Uncertainty: Environmental report
- Nitrogen oxides [air, non-urban air or from high stacks]: 0.00903 kg; lognormal variance with pedigree 0.0827, pedigree (2,4,5,3,1)
  Environmental report
  Uncertainty: Environmental report
- Methane, fossil [air, non-urban air or from high stacks]: 0.000121 kg; lognormal variance with pedigree 0.0827, pedigree (2,4,5,3,1)
  Environmental report
  Uncertainty: Environmental report
- PAH, polycyclic aromatic hydrocarbons [air, non-urban air or from high stacks]: 1e-5 kg; lognormal variance with pedigree 0.3527, pedigree (2,4,5,3,1)
  Literature
  Uncertainty: Literature
- Sulfur dioxide [air, non-urban air or from high stacks]: 0.000606 kg; lognormal variance with pedigree 0.0427, pedigree (2,4,5,3,1)
  Environmental report
  Uncertainty: Environmental report
- Carbon dioxide, fossil [air, non-urban air or from high stacks]: 3.5 kg; lognormal variance with pedigree 0.0427, pedigree (2,4,5,3,1)
  Environmental report
  Uncertainty: Environmental report

## Sampling procedure
Single measurements published in literature.

## Extrapolations
This dataset has been extrapolated from year 1999 to the year of the calculation (2021). The uncertainty has been adjusted accordingly.

## Review by Michael Spielmann (obsolete) 2003-07-10
Passed.
