# hard coal mine operation, open cast, dragline

Dataset: EcoSpold 2, unit process
Geography: ZA
Time period: 2014-01-01 to 2021-12-31
Technology level: current
Classification: ISIC rev.4 ecoinvent: 0510:Mining of hard coal
Classification: EcoSpold01Categories: hard coal/production
Scenario: Business-as-Usual
System model: Allocation, cut-off by classification
Generated by: Philippa Notten
Published in: Notten P.J. 2017
Database: ecoinvent
isCopyrightProtected: true
accessRestrictedTo: 1

## General comment
This dataset represents the production of 1 kg run-of-mine (ROM) hard coal in South Africa extracted from surface strip mines. 213 million tonnes tones of ROM coal were produced from surface mines in South Africa in 2014, with strip mines (draglines) the predominant mining method, accounting for 41% of South Africa's total ROM coal production in 2014 (underground and opencast). The other surface mining method is box cut operations (truck and shovel). The dataset provides an average for coal extraction via dragline using a combination of industry data and government research reports for inputs to the mining process as well as methane emissions. Emissions to water should only be taken as indicative and are highly uncertain. Particulate emissions are rough estimates and not specific to South African surface mines. Land transformation assumes the mines are located in the grassland region of South Africa and that the pre-mining land use was livestock grazing. For land occupation, mine life is assumed to be 30 years (slightly below the average predicted lifetime of the mines in the industry data sample), with revegetation assumed to be completed within 10 years of mine closing. Land occupation is adjusted to account for revegetation, which occurs at a rate of around 5% of the total mine area per year (resulting in a 13% reduction in land occupation over the life of the mine). Infrastructure requirements are generic, and are as applied in other ecoinvent coal mining datasets (in which total production over the life time of the mine is assumed to be 3*10^10 kg, an average value that is not representative for single mines or specific conditions).
[This dataset is meant to replace the following datasets:
- hard coal mine operation and hard coal preparation, ZA, 1990 - 2002]

## Included activities start
Surface, dragline mining process starting from hard coal, in ground.

## Included activities end
This activity ends with 1 kg hard coal (run-of-mine output) at the mine mouth. It does not include coal beneficiation. This dataset includes land use during operation, emissions into water and air, water extraction and use, energy requirements for operation and explosives. Post-closure rehabilitation of the mine is not included due to a lack of data on the requirements of revegetation (rehabilitation undertaken while the mine is still operating is included).

## Geography
Mining efficiency, energy and land requirements are specific to collieries mining the Witbank and Highveld coalseams in South Africa, whilst methane emissions and water use are estimated for surface mining in South Africa as a whole. Infrastructure requirements are not South African specific. Particulate emissions, radon emissions and certain emissions to water (ammonium, nickel, strontium and zinc), for which South African specific data was not available, are also not specific to South Africa.

## Technology
This dataset is representative of surface strip mining in South Africa using draglines.

## Time period
2014 is chosen as a base year because this is the latest year for which coal production and yield data were available (i.e. the most recent government statistics on coal mining). The industry data on which the dataset is based is somewhat earlier than 2014 (mid 2000 to 2010), but expert opinion consulted is that mining operations have not changed much over this time, thus it made sense to use the most recent production data. The water balance data used in the dataset is older (2001), and expert opinion is used to adjust for efficiency improvements, so that water consumption and emissions are more represenative of 2014.

## Parameters
- fraction, water to river: 0.02 dimensionless; name fraction_water_river
- time until revegetation: 10 year; name revegetation_time
  Assumption, based on the fact that revegation is a requirment for mine closure. Unlike in the past, regulations governing mining require planning for closure from the start of operation, and especially in the later years. Furthermore, strip mines are able to rehabilitate over the life of the mine, with mines nearing closure showing around 40% of the disturbed areas already revegetated.
- fraction, water to air: 0.57 dimensionless; name fraction_water_air
- fraction, water to groundwater: 0.41 dimensionless; name fraction_water_seepage

## Reference product
- hard coal, run-of-mine: 1 kg; name RP_amount_1; By-product classification allocatable product; CPC 11010: Hard coal
  production volume 1.387e11 kg; name RP_PV_1
    338 million tonnes of run-of-mine coal was produced in South Africa in 2014, with 63% from opencast mines (DMR, 2015). Coal is mined in opencast mines either by dragline (strip mining) or truck and shovel (openpit mining). Strip mining is estimated to account for 65% of opencast coal mined in SA (derived from mine data sample compiled to support the South African Coal Roadmap (SACRM) 2010). Reference(s): Department of Minerals and Resources (2015) South Africa's Mineral Industry (SAMI) 2014/2015. Pretoria; The South African Coal Roadmap (SACRM) (2011). Overview of the South African Coal Value Chain. http://www.sanedi.org.za/archived/wp-content/uploads/2013/08/sacrm%20value%20chain%20overview.pdf
  property heating value, net 27.91 MJ
    Based on the Characterization factor of Hard coal in the CED method
  property price 70 EUR2005; name RP_amount_1_price_EUR2005
    The average hard coal price between 2009 and 2019 was approximately 88USD/tonne. The average exchange rate between 2009 and 2019 was 1.25 EUR/USD. Mind that prices differ depending on coal quality, on whether freight cost and insurance is included etc. This price is an approximate averag world market price for traded (i.e. shipped) coal.
    Reference(s):
    Trading Economics, 2019, Coal, accessed at https://tradingeconomics.com/commodity/coal, July 2019
    Fxtop, 2016, Historical Rates, accessed at https://fxtop.com/en/historical-exchange-rates.php?A=1&C1=EUR&C2=USD&YA=1&DD1=27&MM1=06&YYYY1=2009&B=1&P=&I=1&DD2=27&MM2=06&YYYY2=2019&btnOK=Go%21, July 2019
  property water in wet mass 0.002 kg; name coal_water_wet_mass
  property carbon content 0.47
    carbon content on a dry matter basis (reserved; not for manual entry)
  properties: water content 0.00200401, carbon content, fossil 0.47, wet mass 1 kg, dry mass 0.998 kg, carbon content, non-fossil 0, carbon allocation 0.46906 kg

## Inputs from technosphere
- tap water: 0.0056 kg; name tap_water_input; lognormal variance with pedigree 0.122, pedigree (1,1,3,1,1)
  Water purchased from water boards is assumed to be potable water. Total water use by surface mines is assumed to be 120 litres/tonne ROM, with 5% of this purchased water. The total water use value is derived from Pulles et al. (2001) and consultation with industry. The sources of water on the mines is obtained from Pullles et al. (2001), with the 5% purchased figure obtained from the average of 10 underground mines. Water figures are adjusted to exclude water for human consumption.References: Pulles, W., Boer, R. & Nel, S. 2001. A Generic Water Balance for the South African Coal Mining Industry. Water
  Research Commission Report No. 801/1/01.; Johan de Korte, Senior Researcher, Council for Scientific and Industrial Research (CSIR), telephonic interview, 7 June 2017.
  EcoSpold01Location=RER
  properties: dry mass 0.000337476 kg, water content 2962.17, carbon content, fossil 0.00178991, wet mass 1 kg
  note on carbon content, fossil: Bicarbonate content is 2.93 mol/m3. CO2 content is 0.1 mol/m3 (ecoinvent v2.2 report 8, Tab 93.1).
- blasting: 0.0016 kg; lognormal variance with pedigree 0.122, pedigree (1,1,3,1,1)
  Average explosive use in four opencast strip mines over two years of operation (industry data). Explosives used are 30% ammonium nitrate fuel-oil (ANFO), 62% emulsion and 8% P100 blasting agent.
  EcoSpold01Location=RER
- spoil from hard coal mining: -6.99 kg; name mining_spoil; lognormal variance with pedigree 0.1412, pedigree (2,3,5,1,1)
  EcoSpold01Location=GLO
  Average from four South African surface coal mines mining with draglines (industry data). Derived from data on total tonnes moved and ROM coal production. This is overburden only as discard produced in coal preparation is included in the coal preparation dataset.
  production volume 9.69513e11 kg; = RP_PV_1 * (mining_spoil / RP_amount_1)
    Calculated from production volume of reference product using the relative outputs.
  property price 0 EUR2005; name mining_spoil_price_EUR2005
  properties: carbon content, fossil 0.007879, dry mass 1 kg, wet mass 1 kg
  note on carbon content, fossil: Composition of coal spoil is adopted by proxy from lignite spoil (pg 19, Doka G. (2009) Life Cycle Inventory of the disposal of lignite spoil, coal spoil and coal tailings. Doka Life Cycle Assessments, Zurich. Commissioned by the Swiss Centre for Life Cycle Inventories ecoinvent Centre)
- conveyor belt: 2.49e-6 m
  Based on annual conveyor belt replacment lengths across nine mines (industry data). The value is not specific to surface mines.
- mine infrastructure, open cast, hard coal: 1.67e-11 unit
  Estimated value not geography specific (generic value used in other ecoinvent coal mining datasets). In this dataset infrastructure requirements are applied to total production over the life time. For this, the total production has to be estimated. A total production over life time of 3*10^10 kg is assumed (a nominal 30 years mine life at 1 mtpa is deemed a reasonable average for a South African coal mine).
- electricity, high voltage: 0.0141 kWh; lognormal variance with pedigree 0.122, pedigree (1,1,3,1,1)
  Average from four South African surface coal mines over two years of operation (industry data). Electricity provides the major source of energy on the mines, with only a very small amount of coal used for heating and energy on one of the mines and none on the others.
  EcoSpold01Location=UCTE
- diesel, burned in building machine: 0.053 MJ; lognormal variance with pedigree 0.122, pedigree (1,1,3,1,1)
  Average diesel use in four South African opencast strip mines over two years of operation (industry data). Diesel is converted from litres to energy (MJ) using a density of 0.84 kg/litre and a calorific value of 42.7 MJ/kg. All diesel is assumed to be used in mining machinery. The relatively small amount of petrol use (0.03 litres/tonne) is not included in the dataset.
  EcoSpold01Location=GLO
  properties: heating value, net 1 MJ

## Inputs from nature
- Water, river [natural resource, in water]: 6e-5 m3; name water_river
  Average share of water use in surface mines filled by river water taken from Pulles et al. (2001), in which a sample of 10 surface mines found that rivers accounted for 50% of water inputs.Total water use by surface mines is assumed to be 120 litres/tonne ROM, The total water use value is derived from Pulles et al. (2001) and consultation with industry. Water figures are adjusted to exclude water for human consumption.References: Pulles, W., Boer, R. & Nel, S. 2001. A Generic Water Balance for the South African Coal Mining Industry. Water
  Research Commission Report No. 801/1/01.; Johan de Korte, Senior Researcher, Council for Scientific and Industrial Research (CSIR), telephonic interview, 7 June 2017.
- Occupation, mineral extraction site [natural resource, land]: 0.0032712 m2*year; = land_transformed*(1-0.13)*(30+revegetation_time); lognormal variance with pedigree 0.652, pedigree (1,1,3,1,1)
  Calculated from total land transformed for mineral extraction activities at four opencast strip mines in South Africa, As the data from industry gives the land area altered at a snapshot in time, to estimate the total land area that will be transformed over the life of the mine, it is first necessary to calculated the land area altered per year (by dividing the land area by the number of years the mine has been in operation). This showed the mines to be advancing at a rate of between 90 and 130 hectares per year. The total land area transformed over the life of the mine is then estimated by applying this average annual mine advance over the number of years remaining until closure (with the latter estimated from the total reserves and annual production volumes, assuming constant coal production at current production levels). Strip mines rehabilitate over the life of the mine, with 20 to 60 hectares revegetated per year across the four mines (an average of 5% of the total area per year). Accounting for the co-current advance and revegetation results in a 13% decrease in the land area occupied over the life of the mine. Occupation over the life of the mine is calculated as total land transformed multiplied by the years of operation plus the time for revegetation. Data from two mines nearing their end of life show that 40% of the disturbed area has been rehabilitated, thus a relatively short time to full rehabilitation is assumed (10 years).The mines report total land altered for mineral extraction activities, so no differentiation is possible between operational areas and extraction areas. The value is however adjusted for disposal areas,The discard disposal area is included in the coal preparation datasets. However, coal preparation area was not able to be differentiated, and thus is included in this dataset and not in the coal preparation dataset.
- Transformation, to mineral extraction site [natural resource, land]: 9.4e-5 m2; name land_transformed; lognormal variance with pedigree 0.652, pedigree (1,1,3,1,1)
  Total land transformed for mineral extraction activities at four opencast strip mines in South Africa. As the data from industry gives the land area altered at a snapshot in time, to estimate the total land area that will be transformed over the life of the mine, it is first necessary to calculated the land area altered per year (by dividing the land area by the number of years the mine has been in operation). The total land area transformed over the life of the mine is then estimated by applying this average annual mine advance over the number of years remaining until closure (with the latter estimated from the total reserves and annual production volumes, assuming constant coal production at current production levels). The mines report "Land altered for mineral extraction activities", so no differentiation is possible between operational areas and extraction areas. The total land area is however adjusted for disposal areas, with the discard disposal area included in the coal preparation datasets. However, coal preparation area was not able to be differentiated, and is thus included in this dataset and not the coal preparation datasets.
- Water, well, in ground [natural resource, in water]: 3.8e-5 m3; name water_well_in_ground_input; lognormal variance with pedigree 0.2426, pedigree (3,3,5,1,1)
  Average share of water use in surface mines filled by groundwater taken from Pulles et al. (2001), in which a sample of 10 surface mines found that groundwater accounted for 30% of water consumption. It should be noted however that groundwater use is very variable across the mines, with goundwater use often depending more on whether the mine has a water ingress issue than whether the mine requires the water (i.e. water seeping into mine pit is a disposal issue rather than a water requirement). Total water use by surface mines is assumed to be 120 litres/tonne ROM, The total water use value is derived from Pulles et al. (2001) and consultation with industry. Water figures are adjusted to exclude water for human consumption.References: Pulles, W., Boer, R. & Nel, S. 2001. A Generic Water Balance for the South African Coal Mining Industry. Water
  Research Commission Report No. 801/1/01.; Johan de Korte, Senior Researcher, Council for Scientific and Industrial Research (CSIR), telephonic interview, 7 June 2017.
- Water, unspecified natural origin [natural resource, in water]: 1.8e-5 m3; name water_unspecified
  The share of water inputs from rain as well as that for which the source is not known is included in the dataset under "unspecified natural origin". The value are taken from Pulles et al. (2001), in which a sample of 10 surface mines found that the origin of 9% of water inputs were not known/specified and 6% of water input was from rain ingress.Total water use by surface mines is assumed to be 120 litres/tonne ROM, The total water use value is derived from Pulles et al. (2001) and consultation with industry experts. Water figures are adjusted to exclude water for human consumption.References: Pulles, W., Boer, R. & Nel, S. 2001. A Generic Water Balance for the South African Coal Mining Industry. Water Research Commission Report No. 801/1/01.; Johan de Korte, Senior Researcher, Council for Scientific and Industrial Research (CSIR), telephonic interview, 7 June 2017.
- Shale, in ground [natural resource, in ground]: 6.99 kg; = (mining_spoil*-1)
  Represents the interburden that gets mined with the coal resource. Amount equals that of spoil produced (so that mass balances)
- Transformation, from grassland, natural, for livestock grazing [natural resource, land]: 9.4e-5 m2; = land_transformed
  Total land transformed for mineral extraction activities at four opencast strip mines in South Africa. As the data from industry gives the land area altered at a snapshot in time, to estimate the total land area that will be transformed over the life of the mine, it is first necessary to calculated the land area altered per year (by dividing the land area by the number of years the mine has been in operation). The total land area transformed over the life of the mine is then estimated by applying this average annual mine advance over the number of years remaining until closure (with the latter estimated from the total reserves and annual production volumes, assuming constant coal production at current production levels). Coal mines fall predominantly in the grasslands regions of South Africa, thus this is chosen as the default. The mines report "Land altered for mineral extraction activities", so no differentiation is possible between operational areas and extraction areas. The total land area is however adjusted for disposal areas, The discard disposal area is included in the coal preparation datasets. However, coal preparation area was not able to be differentiated, and is thus included in this dataset and not the coal preparation datasets.
- Coal, hard, unspecified, in ground [natural resource, in ground]: 1 kg; lognormal variance with pedigree 0.012, pedigree (1,1,3,1,1)
  This dataset represents run-of-mine coal, which is assumed to equate to coal extracted, "coal, hard, unspecified, in ground"

## Emissions to nature
- Dissolved solids [water, ground-]: 0.00013 kg; lognormal variance with pedigree 0.244, pedigree (3,4,5,1,1)
  Approximate value, calculated from TDS value in representative sample of mining effluent (dirty storage dam) multiplied by estimate of water loss through seepage (industry data). Most likely an overestimate as unspecified water outputs are assumed to be seepage losses. Calculation also does not allow for attenuation in soils.
  Uncertainty: Basic variance taken from variability in underlying water flow.
- Sulfate [water, surface water]: 1.5e-6 kg; lognormal variance with pedigree 0.244, pedigree (3,4,5,1,1)
  Approximate value, calculated from concentration in representative sample of surface run-off (clean drains) multiplied by estimate of water discharged to rivers (industry data). Possibly an underestimate as assumes only relatively clean water is discharged (effluent quality varies considerably between mines).
  Uncertainty: Basic variance taken from variability in underlying water flow.
- Chloride [water, surface water]: 3.2e-8 kg; lognormal variance with pedigree 0.244, pedigree (3,4,5,1,1)
  (same comment as for Sulfate)
- Methane, fossil [air, non-urban air or from high stacks]: 1.1e-5 kg; source DEA (RSA) 2014; lognormal variance with pedigree 0.168, pedigree (4,1,5,1,1)
  This value represents an average of 5 surface mines over two years (industry data) (Department of Environmental Affairs, 2014). Data on methane emissions from coal mining and handling are generally high in uncertainty because these emissions are hard to measure or estimate. However, their importance in terms of environmental impact is potentially considerable in some regions. South African coal is generally very low in methane emissions. The stated industry data were verified with over sources: A 2005 study by Llyod and Cook estimates annual CH4 emissions from surface mining in South Africa to at less than 3Gg per year. Applying this over the annual production volume of hard coal from surface mines (as of ecoinvent datasets “hard coal mine operation, open cast, dragline, ZA, 2014” and “hard coal mine operation, open cast, truck and shovel, ZA, 2014”) results in specific CH4 emissions very similar to the reported industry data (1.4E-05 kg CH4/kg coal). The GHG Inventory for South Africa, 2000-2010 reports zero fugitive CH4 emissions from surface mines. Reference(s): Department of Environmental Affairs (2014) GHG NATIONAL INVENTORY REPORT SOUTH AFRICA 2000 -2010, November 2014. <http://unfccc.int/resource/docs/natc/zafnir1.pdf>
  Lloyd, P.J.D., Cook, A., 2005, Methane release from South African coalmines, The journal of The South African Institute of Mining and Metallurgy, volume 105, August 2005. <https://www.saimm.co.za/Journal/v105n07p483.pdf>, accessed July 2018
- Water [air, unspecified]: 6.8172e-5 m3; name water_to_air_unspecified; = (tap_water_input/1000+water_well_in_ground_input+water_river+water_unspecified-coal_water_wet_mass/1000)* fraction_water_air; lognormal variance with pedigree 0.1426, pedigree (3,3,5,1,1)
  Calculated value, assuming 57% of water output is as a result of evaporation. Share of water loss to evaporation is taken from Pulles et al. (2001) (average value from a sample of 8 mines without coal preparation plants).Total water use by surface mines is assumed to be 120 litres/tonne ROM, The total water use value is derived from Pulles et al. (2001) and consultation with industry experts. Water figures are adjusted to exclude water for human consumption.References: Pulles, W., Boer, R. & Nel, S. 2001. A Generic Water Balance for the South African Coal Mining Industry. Water Research Commission Report No. 801/1/01.; Johan de Korte, Senior Researcher, Council for Scientific and Industrial Research (CSIR), telephonic interview, 7 June 2017.
  property fraction, origin: salt water 0; name fraction_origin_salt_water
  property fraction, origin: unspecified 0; name fraction_origin_unspecified
  property fraction, origin: fresh water 1; name fraction_origin_fresh_water
- Fluoride [water, surface water]: 6.1e-10 kg; lognormal variance with pedigree 0.244, pedigree (3,4,5,1,1)
  (same comment as for Sulfate)
- Calcium, ion [water, ground-]: 7.2e-6 kg; lognormal variance with pedigree 0.244, pedigree (3,4,5,1,1)
  Approximate value, calculated from concentration in representative sample of mining effluent (dirty storage dam) multiplied by estimate of water loss through seepage (industry data). Most likely an overestimate as unspecified water outputs are assumed to be seepage losses. Calculation also does not allow for attenuation in soils.
  Uncertainty: Basic variance taken from variability in underlying water flow.
- Sodium, ion [water, surface water]: 1.4e-8 kg; lognormal variance with pedigree 0.244, pedigree (3,4,5,1,1)
  (same comment as for Sulfate)
- Calcium, ion [water, surface water]: 2.1e-7 kg; lognormal variance with pedigree 0.244, pedigree (3,4,5,1,1)
  (same comment as for Sulfate)
- Radon-222 [air, non-urban air or from high stacks]: 0.012 kBq; source United Nations Scientific Committee on t 1993; lognormal variance with pedigree 0.652, pedigree (1,1,3,1,1)
  Generic estimate for coal, not specific to surface mining or to South Africa.
  Comment from previous ecoinvent dataset: Regarding radon emissions extensive measurements were taken to develop a measurement methodology and to review operating conditions. (Müller et al. 1992)
  Radon concentrations in air flow when leaving the shaft installations are most important to estimate specific radon emissions. Immission measurements at different measuring points (also badly aerated sites) show figures between 80 and 500 Bq/m3 (i.e. mean value of 200 Bq/m3). It was not possible to allocate specific air flow amounts per t extracted coal. According to about 20 % of the radon concentration of coal plus twice the concentration are emitted via overburden, which corresponds to 12 Bq/kg coal. (UNSCEAR 1988) No differentiation between opencast and underground mines has been made due to the lack of data. This figure is used in this dataset.
  Further references:
  Müller W.-U., Streffer C., Schabronath J. (1992) Die Radonexposition im Steinkohlenbergbau des Ruhrgebietes. In: Reiners Ch., Streffer C., Messerschmidt O., Strahlenrisiko durch Radon. 32. Jahrestagung der Vereinigung Deutscher Strahlenschutzärzte e.V. in Essen 30. Mai - 1. Juni 1991, Stuttgart.
  Uncertainty: from previous coal dataset
- Iron, ion [water, surface water]: 9.1e-9 kg; lognormal variance with pedigree 0.694, pedigree (3,4,5,1,1)
  Approximate value, calculated from concentration in representative sample of surface run-off (clean drains) multiplied by estimate of water discharged to rivers (industry data). Possibly an underestimate as assumes only relatively clean water is discharged (effluent quality varies considerably between mines).
- Sodium, ion [water, ground-]: 2.2e-5 kg; lognormal variance with pedigree 0.244, pedigree (3,4,5,1,1)
  (same comment as for Calcium, ion)
- Aluminium [water, surface water]: 1.5e-8 kg; lognormal variance with pedigree 0.694, pedigree (3,4,5,1,1)
  (same comment as for Iron, ion)
- Magnesium [water, surface water]: 1.6e-7 kg; lognormal variance with pedigree 0.244, pedigree (3,4,5,1,1)
  (same comment as for Sulfate)
- Magnesium [water, ground-]: 2.2e-8 kg; lognormal variance with pedigree 0.244, pedigree (3,4,5,1,1)
  (same comment as for Calcium, ion)
- Manganese [water, surface water]: 2.5e-8 kg; lognormal variance with pedigree 0.694, pedigree (3,4,5,1,1)
  (same comment as for Iron, ion)
- Manganese [water, ground-]: 2.2e-8 kg; lognormal variance with pedigree 0.694, pedigree (3,4,5,1,1)
  Approximate value, calculated from concentration in representative sample of mining effluent (dirty storage dam) multiplied by estimate of water loss through seepage (industry data). Most likely an overestimate as unspecified water outputs are assumed to be seepage losses. Calculation also does not allow for attenuation in soils.
- Chloride [water, ground-]: 1.2e-6 kg; lognormal variance with pedigree 0.244, pedigree (3,4,5,1,1)
  (same comment as for Calcium, ion)
- Sulfate [water, ground-]: 8.8e-5 kg; lognormal variance with pedigree 0.2426, pedigree (3,3,5,1,1)
  (same comment as for Calcium, ion)
- Potassium, ion [water, surface water]: 9.9e-9 kg; lognormal variance with pedigree 0.244, pedigree (3,4,5,1,1)
  (same comment as for Sulfate)
- Particulates, > 10 um [air, non-urban air or from high stacks]: 0.0004 kg; source Umweltbundesamt Berlin 1989; lognormal variance with pedigree 0.302, pedigree (1,1,3,1,1)
  Generic estimate for surface mine, not specific to South Africa.
  Comment from previous ecoinvent dataset: Regarding particulates, only those are considered which are not emitted during the combustion process and which are not deposited within the mining area. In AP 42 information about situational particle emission calculations and characteristical particle size distribution are given. 90 % of dust particles show sizes between 15 and 30 um, 10 % of dust particles are smaller than 15 um, 6 % of dust particles are smaller than 10 um and between 0.2 % und 1 % are smaller than 2.54 um. Regarding underground mining marginal emissions due to ventilation and slightly more emissions due to coal handling and the actual treatment step are estimated. Regarding opencast mining sharply increased emissions due to huge mining machines, lorries and open pits are estimated. Furthermore, emissions depend on climatic conditions (wind, precipitation, temperature) and the characteristics of coal (water content). In the literature figures regarding particle emissions range from 22 to 75 g/t. In this dataset particle emissions of 36 g/t are considered.
  In various literature sources no information about other emissions emitted during underground mining are given respectively insignificant amounts are assumed, even though backfill processes show high specific emissions.
  In this dataset the following particle emissions factors are estimated:
  Particle emissions underground mining incl. treatment: 0.1 kg/t useable output
  Particle emissions opencast mining incl. treatment: 0.4 kg/t useable output.
  All emissions are assumed to be fly ash coarse particles (i.e. > 10 um).
  Further references:
  U.S. Departement of Energy (DOE) (1983) Energy Technonolgy Characterizations Handbook; Environmental Pollution and Control Factors. Washington, D.C.
  ORNL (1980) A Methodology and a Preliminary Data Base for Examining the Health Risks of Electricity Generation from Uranium and Coal Fuels. Oak Ridge, USA.
  Rentz O. (1991) Coal Use and Air Pollution Issues. In: Proceedings Coal in the Environment. London.
  Uncertainty: from previous coal dataset
- Water [water, ground-]: 4.9036e-5 m3; = (tap_water_input/1000+water_well_in_ground_input+water_river+water_unspecified-coal_water_wet_mass/1000)* fraction_water_seepage; lognormal variance with pedigree 0.2426, pedigree (3,3,5,1,1)
  Calculated value, assuming unaccounted for water loss on the mines can be attributed to seepage to groundwater. Share of water loss to seepage is taken from Pulles et al. (2001), where a sample of 8 mines without coal preparation plants .found that 41% of water is unaccounted for.Total water use by surface mines is assumed to be 120 litres/tonne ROM, The total water use value is derived from Pulles et al. (2001) and consultation with industry experts. Water figures are adjusted to exclude water for human consumption.References: Pulles, W., Boer, R. & Nel, S. 2001. A Generic Water Balance for the South African Coal Mining Industry. Water Research Commission Report No. 801/1/01.; Johan de Korte, Senior Researcher, Council for Scientific and Industrial Research (CSIR), telephonic interview, 7 June 2017.
  Uncertainty: Basic variance derived from range in data (maximum and mean value)
- Potassium [water, ground-]: 3.4e-7 kg; lognormal variance with pedigree 0.244, pedigree (3,4,5,1,1)
  (same comment as for Calcium, ion)
- Fluoride [water, ground-]: 9.7e-9 kg; lognormal variance with pedigree 0.244, pedigree (3,4,5,1,1)
  (same comment as for Calcium, ion)
- Dissolved solids [water, surface water]: 2.1e-6 kg; lognormal variance with pedigree 0.244, pedigree (3,4,5,1,1)
  Approximate value, calculated from TDS value in representative sample of surface run-off (clean drains) multiplied by estimate of water discharged to rivers (industry data). Possibly an underestimate as assumes only relatively clean water is discharged (effluent quality varies considerably between mines).
  Uncertainty: Basic variance taken from variability in underlying water flow.
- Water [water, surface water]: 2.392e-6 m3; = (tap_water_input/1000+water_well_in_ground_input+water_river+water_unspecified-coal_water_wet_mass/1000)* fraction_water_river; lognormal variance with pedigree 0.2426, pedigree (3,3,5,1,1)
  Calculated value, assuming 2% of water output is as a result of discharge to surface water bodies. Share of water loss to surface discharge is taken from Pulles et al. (2001) (average value from a sample of 8 mines without coal preparation plants).Total water use by surface mines is assumed to be 120 litres/tonne ROM, The total water use value is derived from Pulles et al. (2001) and consultation with industry experts. Water figures are adjusted to exclude water for human consumption.References: Pulles, W., Boer, R. & Nel, S. 2001. A Generic Water Balance for the South African Coal Mining Industry. Water Research Commission Report No. 801/1/01.; Johan de Korte, Senior Researcher, Council for Scientific and Industrial Research (CSIR), telephonic interview, 7 June 2017.
  Uncertainty: Basic variance derived from range in data (maximum and mean value)

## Sampling procedure
Production volume and the percentage of coal from surface mining is from annual government reporting (DMR, 2015). The proportion of strip mines to box cut mines is from the industry data sample supporting the South African coal road map (SACRM, 2011). Energy and other material inputs, as well as methane emissions, are representative of four collieries in South Africa mining with draglines (industry data). Water quantities and sources are highly variable between mines, with representative water use values and sources thus taken from a water balance project for South Africa (Pulles et al. 2001) rather than the industry data sample. Although relatively old (2001) this data source provided a more represenative sample of water use on South African mines with a sample of 41 mines (10 of which are surface mines). Industry experts were consulted so as to adjust the water balance figures to account for the improvement in water efficiency in the intervening years, especially in coal washing, It should be noted that finding a representative water use on opencast mines is difficult and these show extremely high variability in water use, from near negligible water use to high water use depending on whether there is water ingress into the workings. The water balance project highlighted poor water accounting on the mines, thus water emissions should only be taken as indicative and are highly uncertain. Land use for operational areas for infrastructure, extraction areas and dump areas are from industry data (four mines). Infrastructure requirements are generic, and are as applied in other ecoinvent coal mining datasets (in which total production over the life time of the mine is assumed to be 3*10^10 kg, an average value that is not representative for single mines or specific conditions). References: Department of Minerals and Resources (2015) South Africa's Mineral Industry (SAMI) 2014/2015. Pretoria; Pulles, W., Boer, R. & Nel, S. 2001. A Generic Water Balance for the South African Coal Mining Industry. Water
Research Commission Report No. 801/1/01.; SACRM (2011) Overview of South African Coal Value Chain. Available at: http://www.sanedi.org.za/archived/wp-content/uploads/2013/08/sacrm value chain overview.pdf (Accessed: July 2015).

## Extrapolations
This dataset has been extrapolated from year 2014 to the year of the calculation (2021). The uncertainty has been adjusted accordingly.

## Review by Christian Bauer 2017-11-23
passed
