# greenhouse construction, plastic walls and roof, metal tubes

Dataset: EcoSpold 2, unit process
Geography: FR
Time period: 2005-01-01 to 2021-12-31
Technology level: current
Classification: ISIC rev.4 ecoinvent: 4100:Construction of buildings
Tags: WFLDB
Scenario: Business-as-Usual
System model: Allocation, cut-off by classification
Generated by: Thierry Boulard
Published in: Koch, P 2015
Database: ecoinvent
isCopyrightProtected: true
accessRestrictedTo: 1

## General comment
This dataset represents the production and dismantling of 1 m2 of greenhouse with plastic walls and roof and metal tubes.
This double-layer air-inflated film greenhouse is made of a structure of galvanized steel, covered with a double EVA (ethylene vinyl acetate) copolymer sheet. The plastic cover must be replaced every 4 years. The greenhouse structure lifetime is minimally 25 years. It comprises of a heating system and fume condenser. Such greenhouses represent recent technology (after 2002) and typically cover large surfaces (7 ha in average). A network of polypropylene pipes is used to deliver heat (hot water at 50-80°C), on the ground (thermo-siphon) and at the height of the plants (growth pipes). A boiler is used to store hot water. CO2 from combustion is recovered and injected again into the greenhouse as to increase photosynthesis. The greenhouse also includes a fertigation system made of a network of polyethylene pipes. Other auxiliary facilities are also considered.

## Included activities start
This activity starts with the production of materials used to build the greenhouse and permanent technical infrastructure.

## Included activities end
This dataset includes the production of the greenhouse as well as the permanent technical infrastructure. For the greenhouse are included its bearing structure (steel and aluminum tubes) and covering materials (plastic covers). Technical infrastrctucture includes heating and cooling systems, fertigation system, CO2 injection system, storage facilities and permanent working equipments such as trolley systems.
The activity ends with the disposal and recycling of all the materials.

## Time period
Time period referring to the data source: 2005-2009. Based on expert opinion data is considered to be valid at least up to 2012.

## Parameters
- LUC_crop_specific: 1 dimensionless
  This parameter allows to switch between a 'crop specific' and a 'country specific' approach when calculating the LUC of a crop. By default, the chosen approach is 'crop specific', so the value of the parameter is 1. If you want to apply a 'country specific' approach, turn the parameter to 0.

## Reference product
- greenhouse, plastic walls and roof: 1 m2*year; name RP; CPC 38703: Prefabricated buildings, of plastics; By-product classification allocatable product
  Greenhouse used for agricultural production. This greenhouse has plastic walls and roof, structure is made of metal tubes. Reference flow is 1 m2 used over 1 year.
  production volume 0.186957 m2*year; name RP_PV
    This is a placeholder value that does not reflect real-world production volumes. This dataset does not currently require a real-world production volume to work in the database framework, and no actual data were collected yet. This has no negative effect on the results of the ecoinvent database. The placeholder value of this activity was scaled according to the nominal GDP of 2005 (source: United Nations, http://data.un.org/Glossary.aspx?q=GDP+%28current+US%24%29, accessed 20130726) to reflect an appropriate share of the global production volume, which is also a placeholder value.
  property price 0.934765 EUR2005
    Calculated based on inputs: The price of the product has been calculated as a sum of the values of the material and energy inputs for this product. This value is therefore a rough estimation. It may underestimate the real price since there are additional expenses when producing any product. These expences can include for example labour costs, treatment of waste materials and profit for the producer. Please consider carefully whether this level of data quality is acceptable for your application.
  properties: lifetime 25 year

## By-products
- aluminium scrap, post-consumer: 0 kg; CPC 39363: Waste and scrap of aluminium; By-product classification Recyclable
  Aluminum components sent to treatment
  production volume 0 kg; = ABS(ByP_01/ RP* RP_PV)
    Calculated from reference product production volume, reference product amount and byproduct amount.
  property price 0.685 EUR2005
    Temporary price data. Calculated as 90% of purchasers price based on: estimated at 85% of new scrap
  property carbon content 0
    carbon content on a dry matter basis (reserved; not for manual entry)
  properties: carbon content, fossil 0, carbon content, non-fossil 0, water content 0, wet mass 1 kg, dry mass 1 kg, water in wet mass 0 kg, carbon allocation 0 kg
- iron scrap, unsorted: 0 kg; CPC 39310: Slag, dross, scalings and other waste from the manufacture of iron or steel; By-product classification Recyclable
  Steel and chromium steel components sent to treatment
  production volume 0 kg; = ABS(ByP_04/ RP* RP_PV)
    (same comment as for aluminium scrap, post-consumer)
  property price 0.149 EUR2005
    Temporary price data. Calculated as 90% of purchasers price based on: estimated at 85% of sorted scrap
  property carbon content 0
    carbon content on a dry matter basis (reserved; not for manual entry)
  properties: carbon content, fossil 0, water in wet mass 0 kg, water content 0, dry mass 1 kg, wet mass 1 kg, carbon content, non-fossil 0, carbon allocation 0 kg

## Inputs from technosphere
- gas motor, 206kW: 6.2e-10 unit; lognormal variance with pedigree 0.374402, pedigree (5,5,5,5,5)
  Literature data and primary data from French manufacturers (Boulard et al, 2011). Generating set for the heating system.
- aluminium, cast alloy: 0.0064 kg; lognormal variance with pedigree 0.374402, pedigree (5,5,5,5,5)
  Literature data and primary data from French manufacturers (Boulard et al, 2011). Aluminum in the greenhouse structure.
  properties: wet mass 1 kg, dry mass 1 kg
- drawing of pipe, steel: 0.32 kg; lognormal variance with pedigree 0.374402, pedigree (5,5,5,5,5)
  Literature data and primary data from French manufacturers (Boulard et al, 2011). Tubes and siphons for the heating system.
- waste concrete: -0.951511 kg; name ByP_05
  Concrete components sent to treatment
  production volume 0.177892 kg; = ABS(ByP_05/ RP* RP_PV)
    Calculated from production volume of reference product using the relative outputs.
  property price 0 EUR2005; name ByP_05_price_EUR2005
  properties: dry mass 0.5 kg, water content 1, wet mass 1 kg
- extrusion, plastic film: 0.169822 kg; lognormal variance with pedigree 0.374402, pedigree (5,5,5,5,5)
  Literature data and primary data from French manufacturers (Boulard et al, 2011). Mulch film.
- waste plastic, mixture: -0.1331 kg; name ByP_03
  Plastic components sent to treatment
  production volume 0.024884 kg; = ABS(ByP_03/ RP* RP_PV)
    (same comment as for aluminium scrap, post-consumer)
  property price 0 EUR2005; name ByP_03_price_EUR2005
  properties: water content 0.180638, dry mass 0.847 kg, wet mass 1 kg, heating value, net 30.79 MJ, carbon content, fossil 0.747344
  note on heating value, net: Value taken from the general comment of the treatment dataset.
- section bar extrusion, aluminium: 0.0064 kg; lognormal variance with pedigree 0.374402, pedigree (5,5,5,5,5)
  Literature data and primary data from French manufacturers (Boulard et al, 2011). Roof structure.
- section bar rolling, steel: 0.225949 kg; lognormal variance with pedigree 0.374402, pedigree (5,5,5,5,5)
  Literature data and primary data from French manufacturers (Boulard et al, 2011). Poles and trellis for the greenhouse structure.
- waste polyvinylchloride: -0.122 kg; name ByP_02
  Etylene vinyl acetate copolymer (plastic covers) sent to treatment
  production volume 0.0228088 kg; = ABS(ByP_02/ RP* RP_PV)
    (same comment as for aluminium scrap, post-consumer)
  property price 0 EUR2005; name ByP_02_price_EUR2005
  properties: carbon content, fossil 0.440882, water content 0.00200401, wet mass 1 kg, dry mass 0.998 kg, heating value, net 21.51 MJ
- extrusion, plastic pipes: 0.0440556 kg; lognormal variance with pedigree 0.374402, pedigree (5,5,5,5,5)
  Literature data and primary data from French manufacturers (Boulard et al, 2011). Pipes for the fertigation system.
- polycarbonate: 0.01 kg; lognormal variance with pedigree 0.374402, pedigree (5,5,5,5,5)
  Literature data and primary data from French manufacturers (Boulard et al, 2011). Cladding materials.
  properties: heating value, net 29.57 MJ, dry mass 1 kg, wet mass 1 kg, carbon content, fossil 0.755906
- polyethylene, linear low density, granulate: 0.0476 kg; lognormal variance with pedigree 0.374402, pedigree (5,5,5,5,5)
  Literature data and primary data from French manufacturers (Boulard et al, 2011). Thermal screen for the cooling system.
  properties: dry mass 1 kg, carbon content, fossil 0.857143, wet mass 1 kg, heating value, net 42.47 MJ
- polypropylene, granulate: 0.00032 kg; lognormal variance with pedigree 0.374402, pedigree (5,5,5,5,5)
  Literature data and primary data from French manufacturers (Boulard et al, 2011). PP sleeves.
  properties: dry mass 1 kg, wet mass 1 kg, heating value, net 32.78 MJ, carbon content, fossil 0.857143
  note on heating value, net: Value extracted from "treatment of waste polypropylene, open burning"
- injection moulding: 0.0211311 kg; lognormal variance with pedigree 0.374402, pedigree (5,5,5,5,5)
  Literature data and primary data from French manufacturers (Boulard et al, 2011). Taps, gutters and stoppers for the fertigation system. Clips and joints for the greenhouse structure.
- electricity, low voltage: 0.05972 kWh; lognormal variance with pedigree 0.374402, pedigree (5,5,5,5,5)
  Literature data and primary data from French manufacturers (Boulard et al, 2011). Electricity for manufacturing of the greenhouse structure.
- blow moulding: 0.00316667 kg; lognormal variance with pedigree 0.374402, pedigree (5,5,5,5,5)
  Literature data and primary data from French manufacturers (Boulard et al, 2011). Tanks for the fertigation system.
- polyester resin, unsaturated: 0.00136364 kg; lognormal variance with pedigree 0.374402, pedigree (5,5,5,5,5)
  Literature data and primary data from French manufacturers (Boulard et al, 2011). Roofing membrane.
  properties: wet mass 1 kg, dry mass 1 kg, carbon content, fossil 0.58584, heating value, net 17.75 MJ
- polystyrene, expandable: 0.0049 kg; lognormal variance with pedigree 0.374402, pedigree (5,5,5,5,5)
  Literature data and primary data from French manufacturers (Boulard et al, 2011). Plastic bags part of for the support system.
  properties: dry mass 1 kg, carbon content, fossil 0.923077, wet mass 1 kg, heating value, net 38.67 MJ
- wire drawing, copper: 0.0018 kg; lognormal variance with pedigree 0.374402, pedigree (5,5,5,5,5)
  Literature data and primary data from French manufacturers (Boulard et al, 2011). Cables and wires for the greenhouse structure.
- polyvinylfluoride: 0.0213854 kg; lognormal variance with pedigree 0.374402, pedigree (5,5,5,5,5)
  Literature data and primary data from French manufacturers (Boulard et al, 2011). Cables, wires, joints and clips for the greenhouse structure.
  properties: heating value, net 23.7 MJ, carbon content, fossil 0.521739, wet mass 1 kg, dry mass 1 kg
- tractor, 4-wheel, agricultural: 0.0152 kg; lognormal variance with pedigree 0.374402, pedigree (5,5,5,5,5)
  Literature data and primary data from French manufacturers (Boulard et al, 2011). Tractor.
- diesel, burned in building machine: 0.373733 MJ; lognormal variance with pedigree 0.374402, pedigree (5,5,5,5,5)
  Literature data and primary data from French manufacturers (Boulard et al, 2011). Energy for building the greenhouse and retention pond.
  properties: heating value, net 1 MJ
- acrylic varnish, without water, in 87.5% solution state: 0.00111111 kg; lognormal variance with pedigree 0.374402, pedigree (5,5,5,5,5)
  Literature data and primary data from French manufacturers (Boulard et al, 2011). Paint protection.
  properties: carbon content, fossil 0.674725, heating value, net 20.44 MJ, dry mass 1 kg, wet mass 1 kg
- oil boiler, 100kW: 1.8612e-6 unit; lognormal variance with pedigree 0.374402, pedigree (5,5,5,5,5)
  Literature data and primary data from French manufacturers (Boulard et al, 2011). Boiler for the heating system.
- ethylene vinyl acetate copolymer: 0.122222 kg; lognormal variance with pedigree 0.374402, pedigree (5,5,5,5,5)
  Literature data and primary data from French manufacturers (Boulard et al, 2011). Plastic covers for the greenhouse structure.
  properties: heating value, net 35.99 MJ, wet mass 1 kg, carbon content, fossil 0.79734, dry mass 1 kg
- calendering, rigid sheets: 0.01 kg; lognormal variance with pedigree 0.374402, pedigree (5,5,5,5,5)
  (same comment as for polycarbonate)
- copper, cathode: 0.000648 kg; lognormal variance with pedigree 0.374402, pedigree (5,5,5,5,5)
  (same comment as for wire drawing, copper)
  properties: dry mass 1 kg, wet mass 1 kg
- concrete, normal: 0.000383003 m3; lognormal variance with pedigree 0.374402, pedigree (5,5,5,5,5)
  Literature data and primary data from French manufacturers (Boulard et al, 2011). Walls and mechanical room.
  properties: water content 0.086758, wet mass 2380 kg, dry mass 2190 kg
- agricultural machinery, unspecified: 0.0076 kg; lognormal variance with pedigree 0.374402, pedigree (5,5,5,5,5)
  Literature data and primary data from French manufacturers (Boulard et al, 2011). Ramp for the soil preparation system.
- electronics, for control units: 1.6e-5 kg; lognormal variance with pedigree 0.374402, pedigree (5,5,5,5,5)
  Literature data and primary data from French manufacturers (Boulard et al, 2011). Control unit for the greenhouse structure.
  properties: carbon content, non-fossil 0.00013442, dry mass 1 kg, carbon content, fossil 0.337146, wet mass 1 kg
- polymer foaming: 0.0049 kg; lognormal variance with pedigree 0.374402, pedigree (5,5,5,5,5)
  (same comment as for polystyrene, expandable)
- synthetic rubber: 0.0003 kg; lognormal variance with pedigree 0.374402, pedigree (5,5,5,5,5)
  Literature data and primary data from French manufacturers (Boulard et al, 2011). Tubes for the soil preparation system.
  properties: wet mass 1 kg, dry mass 1 kg, heating value, net 26.42 MJ, carbon content, fossil 0.871949
- silicone product: 0.00012 kg; lognormal variance with pedigree 0.374402, pedigree (5,5,5,5,5)
  Literature data and primary data from French manufacturers (Boulard et al, 2011). Silicone.
  properties: dry mass 1 kg, carbon content, fossil 0.324324, wet mass 1 kg, heating value, net 9.83 MJ
- waste electric and electronic equipment: -0.000664 kg; name ByP_07
  Electric and electronic components sent to treatment
  production volume 0.00012414 kg; = ABS(ByP_07/ RP* RP_PV)
    Calculated from production volume of reference product using the relative outputs.
  property price 0 EUR2005; name ByP_07_price_EUR2005
  properties: carbon content, non-fossil 0.000485011, carbon content, fossil 0.0877555, dry mass 1 kg, wet mass 1 kg
- polyethylene, high density, granulate: 0.0475 kg; lognormal variance with pedigree 0.374402, pedigree (5,5,5,5,5)
  (same comment as for extrusion, plastic pipes)
  properties: dry mass 1 kg, heating value, net 42.47 MJ, wet mass 1 kg, carbon content, fossil 0.857143
- bitumen seal: 0.0001 kg; lognormal variance with pedigree 0.374402, pedigree (5,5,5,5,5)
  Literature data and primary data from French manufacturers (Boulard et al, 2011). Cement sealing in the greenhouse structure.
  properties: dry mass 1 kg, wet mass 1 kg, carbon content, fossil 0.643968, heating value, net 19.51 MJ
- steel, chromium steel 18/8: 0.0344 kg; lognormal variance with pedigree 0.374402, pedigree (5,5,5,5,5)
  Literature data and primary data from French manufacturers (Boulard et al, 2011). Bolting for the greenhouse structure.
  properties: wet mass 1 kg, dry mass 1 kg, carbon content, fossil 0.0008
- heat and power co-generation unit, 200kW electrical, diesel SCR, components for electricity only: 6.2e-10 unit; lognormal variance with pedigree 0.374402, pedigree (5,5,5,5,5)
  (same comment as for gas motor, 206kW)
- waste rubber, unspecified: -0.0003 kg; name ByP_06
  Synthetic rubber sent to treatment
  production volume 5.60872e-5 kg; = ABS(ByP_06/ RP* RP_PV)
    Calculated from production volume of reference product using the relative outputs.
  property price 0 EUR2005; name ByP_06_price_EUR2005
  properties: dry mass 1 kg, wet mass 1 kg, carbon content, fossil 0.853, heating value, net 27.19 MJ
- zinc coat, coils: 0.0234405 m2; lognormal variance with pedigree 0.374402, pedigree (5,5,5,5,5)
  (same comment as for section bar rolling, steel)
- glass fibre reinforced plastic, polyamide, injection moulded: 8e-5 kg; lognormal variance with pedigree 0.374402, pedigree (5,5,5,5,5)
  Literature data and primary data from French manufacturers (Boulard et al, 2011). Electrical gear.
  properties: carbon content, fossil 0.446018, dry mass 1 kg, wet mass 1 kg
- steel, low-alloyed: 0.570559 kg; lognormal variance with pedigree 0.374402, pedigree (5,5,5,5,5)
  (same comment as for section bar rolling, steel)
  properties: wet mass 1 kg, carbon content, fossil 0.005, dry mass 1 kg
- concrete block: 0.10699 kg; lognormal variance with pedigree 0.374402, pedigree (5,5,5,5,5)
  Literature data and primary data from French manufacturers (Boulard et al, 2011). Mechanical room part of for the storage system.
  properties: dry mass 1 kg, wet mass 1 kg
- sheet rolling, steel: 0.03552 kg; lognormal variance with pedigree 0.374402, pedigree (5,5,5,5,5)
  Literature data and primary data from French manufacturers (Boulard et al, 2011). Roofing.
- aluminium scrap, post-consumer: -0.0064 kg
  Aluminum components sent to treatment
  production volume 0.00119653 kg
  properties: wet mass 1 kg, dry mass 1 kg, price 0.685 EUR2005
- iron scrap, unsorted: -0.605 kg
  Steel and chromium steel components sent to treatment
  production volume 0.113109 kg
  properties: price 0.149 EUR2005, dry mass 1 kg, wet mass 1 kg

## Sampling procedure
Dataset is adapted from AGRIBALYSE 1.2 database, with land occupation and transformation flows removed (these are accounted for in the crop datasets). Data was collected from French manufacturers and reported in Boulard et al. (2011).
Translated name: Serre double parrois gonflee, Nord.

## Extrapolations
This dataset has been extrapolated from year 2012 to the year of the calculation (2021). The uncertainty has been adjusted accordingly.
