# electricity, high voltage, production mix

Dataset: EcoSpold 2, unit process, production mix
Geography: AR
Time period: 2014-01-01 to 2021-12-31
Scenario: Business-as-Usual
System model: Allocation, cut-off by classification
Generated by: [System]
Database: ecoinvent
isCopyrightProtected: false
accessRestrictedTo: 1

## General comment
The shares of electricity technologies on this market are valid for the year 2018. They have been calculated by the data provider and don't correspond with the production volumes entered in the undefined datasets of the different electricity supplying technologies. The shares have been calculated based on statistics from 2018: IEA World Energy Statistics and Balances. OECD iLibrary, eISSN: 1683-4240, DOI: 10.1787/enestats-data-en. Grid losses are based on data from 2018 (also IEA World Energy Statistics and Balances).

## Technology
Average technology used to transmit and distribute electricity. Includes underground and overhead lines. Electricity production according to related technology datasets.
Definition of the voltage levels:
- High voltage level above 24 kV (large scale industry)
- Medium voltage level between 1 kV and 24 kV (medium to small scale industry, service sector
and public buildings)
- Low voltage level below 1 kV (Households)

## Reference product
- electricity, high voltage: 1 kWh; By-product classification allocatable product; CPC 17100: Electrical energy
  production volume 1.17441e11 kWh
  property price 0.0977 EUR2005
    Temporary price data. Calculated as 90% of purchasers price based on: 94% of the average price (to account for a 6% loss in transformation and transmission) for electricity for industrial consumersin 2005 (excluded taxes). From IEA.

## Inputs from technosphere
- electricity, high voltage: 0 kWh; pedigree (1,1,1,1,1)
  Calculated value/estimation adapted for Argentina
- electricity, high voltage: 0, 0, 0, 0, 0, 0, 0, 0, 0, 0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 kWh (16 entries)
  properties: price 0.0977 EUR2005
- electricity, high voltage: 0 kWh
  properties: exergy 3.6 MJ, price 0.0977 EUR2005
  note on exergy: allocation factor for electricity (=1) vs. heat, where heat is calculated as the termodynamic mean temperature Tm = (Tfeed-Treturn)/ln(Tfeed/Treturn), relative to the application temperature (Tu, typically = 293 K), i.e. (Tm-Tu)/Tm
- electricity, high voltage: 0.0117873 kWh
  production volume 1.29722e9 kWh
- electricity, high voltage: 0.00224724 kWh
  production volume 2.47315e8 kWh
- electricity, high voltage: 0.0668951 kWh
  production volume 7.36197e9 kWh
- electricity, high voltage: 0.0641955 kWh
  production volume 7.06487e9 kWh
- electricity, high voltage: 0.118861 kWh
  production volume 1.3081e10 kWh
- electricity, high voltage: 0.00653243 kWh
  production volume 7.1891e8 kWh
- electricity, high voltage: 0.491319 kWh
  production volume 5.40708e10 kWh
- electricity, high voltage: 0.131541 kWh
  production volume 1.44764e10 kWh
- electricity, high voltage: 0.0521361 kWh
  production volume 5.7377e9 kWh
- electricity, high voltage: 0.0432431 kWh
  production volume 4.75902e9 kWh
- electricity, high voltage: 0.0106983 kWh
  production volume 1.17737e9 kWh
- electricity, high voltage: 0.000543665 kWh
  production volume 5.98317e7 kWh

## Extrapolations
This dataset has been extrapolated from year 2017 to the year of the calculation (2021). The uncertainty has been adjusted accordingly.
