# treatment of fly ash and scrubber sludge, hazardous waste incineration

Dataset: EcoSpold 2, unit process
Geography: RoW
Time period: 1997-01-01 to 2021-12-31
Technology level: current
Classification: ISIC rev.4 ecoinvent: 3822:Treatment and disposal of hazardous waste
Tags: Treatment; ConvertedDataset
Scenario: Business-as-Usual
System model: Allocation, cut-off by classification
Share of production covered: 39 %
Generated by: Gabor Doka (obsolete)
Published in: Doka G. 2008
Database: ecoinvent
isCopyrightProtected: true
accessRestrictedTo: 1

## General comment
Inventoried waste contains 100% separator sludge; . waste composition (wet, in ppm): upper heating value 0.9 MJ/kg; H2O 900000; O 197; H 2659.5; C 16745; S 98.5; N 2.7196; P 149; B 2.1; Cl 400; Br n.a.; F 0.0077703; I n.a.; Ag n.a.; As 0.5; Ba 27; Cd 0.66; Co 10.4; Cr 71.3; Cu 548.1; Hg 0.22; Mn 40.5; Mo 0.5; Ni 37.6; Pb 27.6; Sb 0.49; Se n.a.; Sn 1.7; V 0.85; Zn 270.6; Be n.a.; Sc n.a.; Sr 30; Ti n.a.; Tl n.a.; W n.a.; Si n.a.; Fe 3400; Ca 18200; Al 133.5; K 148; Mg 1670; Na 71; Share of carbon in waste that is biogenic 0%. Net energy produced in HWI: 17.11MJ/kg thermal energy and 1.27MJ/kg electric energy. Allocation of energy production: no substitution or expansion. 100% of burden allocated to waste disposal function of HWI. One kg of this waste produces 0.03149 kg of residues, which are landfilled. Additional solidification with 0.01259 kg of cement.
[This dataset is meant to replace the following datasets:]

## Included activities end
waste-specific air and water emissions from incineration, auxiliary material consumption for flue gas cleaning. Short-term emissions to river water and long-term emissions to ground water from residual material landfill (from solidified fly ashes and scrubber slugde). Process energy demands for HWI.

## Geography
Specific to the technology encountered in Switzerland in 2000. Well applicable to modern incineration practices in Europe or North America or Japan.

## Technology
Swiss HWI plant in 2000 with wet flue gas scrubber and low-dust SCR DeNOx facility. Gross thermal efficiency 74.4% and gross electric efficiency 10%.

## Time period
Transfer coefficients for modern Swiss MSWI. Emission speciation based on early 90ies data.

## Parameters
- fraction, process water, to air: 1 dimensionless; name fraction_PW_to_air; lognormal variance with pedigree 0.092025, pedigree (4,4,3,2,4)

## Reference product
- fly ash and scrubber sludge: -1 kg; name RP; CPC 39: Wastes or scraps; By-product classification Waste
  production volume 2.84436 kg; name PV_RP
    This is a placeholder value that does not reflect real-world production volumes. This dataset does not currently require a real-world production volume to work in the database framework, and no actual data were collected yet. This has no negative effect on the results of the ecoinvent database.
  property carbon content, fossil 0.167
    Tab A.6, ecoinvent v2.2 report 13_I. C content has been calculated after data in the tables, and then referred to 1 kg DM
  property heating value, net 0 MJ
    Non combustible products are assumed to have an LHV equal to zero (0).
  property price 0 EUR2005; name RP_price_EUR2005
    Waste products are assigned a price of zero as they are assumed to require further treatment.
  property carbon content 0.167
    carbon content on a dry matter basis (reserved; not for manual entry)
  properties: water in wet mass 0.9 kg, dry mass 0.1 kg, wet mass 1 kg, water content 9, carbon content, non-fossil 0, carbon allocation 0.0167 kg

## Inputs from technosphere
- process-specific burdens, hazardous waste incineration plant: 1 kg; lognormal variance with pedigree 0.042, pedigree (1,1,5,5,1)
  demands per kilogram waste. uncertainty is heeded in the module
- hazardous waste incineration facility: 1.25e-9 unit; lognormal variance with pedigree 0.042, pedigree (1,1,5,5,1)
  demands per kilogram waste. uncertainty is heeded in the module
- calcium chloride: 0.00051667 kg; lognormal variance with pedigree 0.982, pedigree (1,1,5,5,1)
  uncertainty calculated from uncertainty in average auxiliary material input, and the unertainty of the waste composition of this waste
  properties: dry mass 1 kg, wet mass 1 kg
- iron (III) chloride, without water, in 40% solution state: 0.00061877 kg; lognormal variance with pedigree 0.382, pedigree (1,1,5,5,1)
  (same comment as for calcium chloride)
  properties: wet mass 1 kg, dry mass 1 kg
- ammonia, anhydrous, liquid: 0 kg; pedigree (1,1,1,1,1)
  uncertainty calculated from uncertainty in average DeNOx input, uncertainty in the share of thermal NOx, uncertainty of nitrogen content in average municipal waste and the unertainty in nitrogen content in *this* waste.
  properties: wet mass 1 kg, dry mass 1 kg
- chemical, organic: 4.9628e-6 kg; lognormal variance with pedigree 1.462, pedigree (1,1,5,5,1)
  Proxy for TMT15. uncertainty calculated from uncertainty in average auxiliary material input, and the unertainty of the waste composition of this waste
  properties: heating value, net 19.03 MJ, carbon content, fossil 0.628, dry mass 1 kg, wet mass 1 kg
  note on carbon content, fossil: This dataset is an unweighted average of 20 organic substances (listed in Tab 88.1, ecoinvent v2.2 report 8, part II), being part of the top100 chemicals included in this database. The C-content has also been calculated as an unweighted average of the C content of the substances composing this dataset.
- hydrochloric acid, without water, in 30% solution state: 4.8578e-5 kg; lognormal variance with pedigree 0.252, pedigree (1,1,5,5,1)
  (same comment as for calcium chloride)
  properties: dry mass 1 kg, wet mass 1 kg, heating value, net 3.32 MJ
- chemical, inorganic: 8.0963e-5 kg; lognormal variance with pedigree 0.252, pedigree (1,1,5,5,1)
  Proxy for Polyelectrolyte. uncertainty calculated from uncertainty in average auxiliary material input, and the unertainty of the waste composition of this waste
  properties: wet mass 1 kg, carbon content, fossil 0.003, dry mass 1 kg
  note on carbon content, fossil: This dataset is an unweighted average of 20 inorganic substances (listed in Tab 88.1, ecoinvent v2.2 report 8, part II), being part of the top100 chemicals included in this database. The C-content has also been calculated as an unweighted average of the C content of the substances composing this dataset.
- waste cement, hydrated: -0.031486 kg; name BP; lognormal variance with pedigree 0.282, pedigree (1,1,5,5,1)
  Hydrated cement for solidification of landfilled residual material. Uncertainty calculated from unertainty of the waste composition of this waste and transfer coefficients in the incinerator and of the solidification recipe.
  production volume 0.0895575 kg; = PV_RP*BP/ABS(RP)
    Calculated from the production volume of fly ash and scrubber sludge, 90% water in proportion to the respective output amounts.
  property price 0 EUR2005; name BP_price_EUR2005
  properties: wet mass 1 kg, dry mass 1 kg
- process-specific burdens, residual material landfill: 0.031486 kg; lognormal variance with pedigree 0.282, pedigree (1,1,5,5,1)
  uncertainty is calculated from uncertainties in waste composition and transfer coefficients in incinerator
- quicklime, milled, packed: 0.00010839 kg; lognormal variance with pedigree 0.472, pedigree (1,1,5,5,1)
  (same comment as for calcium chloride)
  properties: water content 0.010101, dry mass 0.99 kg, wet mass 1 kg
- hydrogen peroxide, without water, in 50% solution state: 4.4298e-7 kg; lognormal variance with pedigree 1.002, pedigree (1,1,5,5,1)
  (same comment as for calcium chloride)
  properties: dry mass 1 kg, wet mass 1 kg, heating value, net 7.13 MJ
- cement, unspecified: 0 kg; pedigree (1,1,1,1,1)
  Cement for solidification of landfilled residual material. Uncertainty calculated from unertainty of the waste composition of this waste, of transfer coefficients in the incinerator and of the solidification recipe.
  properties: wet mass 1 kg, dry mass 1 kg
- heat, district or industrial, natural gas: 0 MJ; pedigree (1,1,1,1,1)
  (same comment as for ammonia, anhydrous, liquid)
  properties: heating value, net 1 MJ
- sodium hydroxide, without water, in 50% solution state: 0.0010336 kg; lognormal variance with pedigree 0.452, pedigree (1,1,5,5,1)
  (same comment as for calcium chloride)
  properties: dry mass 1 kg, wet mass 1 kg, heating value, net 3.03 MJ
- titanium dioxide: 3.8946e-9 kg; lognormal variance with pedigree 2.342, pedigree (1,1,5,5,1)
  (same comment as for ammonia, anhydrous, liquid)
  properties: wet mass 1 kg, dry mass 1 kg
- heat, central or small-scale, other than natural gas: 21.62 MJ; lognormal variance with pedigree 0.092, pedigree (1,1,5,5,1)
  Uncertainty dependent on total energy required and heating value present, using experimental GSd for substraction from uc=A*GSDa^2-B
  properties: heating value, net 1 MJ
- chromium: 7.9482e-11 kg; lognormal variance with pedigree 2.342, pedigree (1,1,5,5,1)
  Proxy for vanadium pentoxide V2O5 in SCR catalyst. uncertainty calculated from uncertainty in average DeNOx input, uncertainty in the share of thermal NOx, uncertainty of nitrogen content in average municipal waste and the unertainty in nitrogen content in *this* waste.
  properties: wet mass 1 kg, dry mass 1 kg
- residual material landfill: 6.5596e-11 unit; lognormal variance with pedigree 0.282, pedigree (1,1,5,5,1)
  (same comment as for process-specific burdens, residual material landfill)
- ammonia, anhydrous, liquid: 2.07898e-8, 1.78714e-9, 2.78032e-9, 5.50881e-9, 5.39718e-9, 5.65682e-10, 2.52881e-9, 5.98242e-8 kg (8 entries); lognormal variance with pedigree 1.972, pedigree (1,1,5,5,1)
  (same comment as for ammonia, anhydrous, liquid)
- cement, unspecified: 0.000442272, 3.23934e-5, 9.23318e-5, 0.00208811, 6.14593e-5, 0.000675005, 8.16681e-5, 0.00912176 kg (8 entries); lognormal variance with pedigree 0.282, pedigree (1,1,5,5,1)
  (same comment as for cement, unspecified)
- heat, district or industrial, natural gas: 7.34845e-7, 4.76798e-5 MJ (2 entries); lognormal variance with pedigree 2.062, pedigree (1,1,5,5,1)
  (same comment as for ammonia, anhydrous, liquid)

## Emissions to nature
- Nickel [air, urban air close to ground]: 2.632e-8 kg; lognormal variance with pedigree 1.152, pedigree (1,1,5,5,1)
  (same comment as for process-specific burdens, residual material landfill)
- Dinitrogen monoxide [air, urban air close to ground]: 9.6829e-9 kg; lognormal variance with pedigree 2.1, pedigree (5,5,5,5,5)
  uncertainty calculated from uncertainty for proxy (from MSWI), uncertainty in average N-emissions, uncertainty in the share of thermal NOx, uncertainty of nitrogen content in average municipal waste and the unertainty in nitrogen content in *this* waste.
  Uncertainty: , uncertainty in average N-emissions, uncertainty in the share of thermal NOx, uncertainty of nitrogen content in average municipal waste and the unertainty in nitrogen content in *this* waste.
- Sodium, ion [water, surface water]: 2.6394e-5 kg; lognormal variance with pedigree 1.072, pedigree (1,1,5,5,1)
  uncertainty is calculated from uncertainties in waste composition and transfer coefficients in incinerator and landfills
- Boron [water, ground-, long-term]: 1.5059e-6 kg; lognormal variance with pedigree 1.512, pedigree (1,1,5,5,1)
  Long-term emissions from landfilling of incineration residues. uncertainty is calculated from uncertainties in waste composition and transfer coefficients in incinerator and landfills.
- Sodium, ion [water, ground-, long-term]: 4.3938e-5 kg; lognormal variance with pedigree 1.052, pedigree (1,1,5,5,1)
  (same comment as for Boron)
- Nickel, ion [water, surface water]: 7.7073e-6 kg; lognormal variance with pedigree 1.132, pedigree (1,1,5,5,1)
  (same comment as for Sodium, ion)
- Tin, ion [water, ground-, long-term]: 3.2171e-8 kg; lognormal variance with pedigree 5.472, pedigree (1,1,5,5,1)
  (same comment as for Boron)
- Arsenic, ion [water, surface water]: 5e-7 kg; lognormal variance with pedigree 1.702, pedigree (1,1,5,5,1)
  (same comment as for Sodium, ion)
- Cadmium [air, urban air close to ground]: 3.6345e-11 kg; lognormal variance with pedigree 1.702, pedigree (1,1,5,5,1)
  (same comment as for process-specific burdens, residual material landfill)
- Calcium, ion [water, surface water]: 2.7409e-6 kg; lognormal variance with pedigree 1.242, pedigree (1,1,5,5,1)
  (same comment as for Sodium, ion)
- Hydrogen fluoride [air, urban air close to ground]: 1.9551e-12 kg; lognormal variance with pedigree 1.992, pedigree (1,1,5,5,1)
  (same comment as for process-specific burdens, residual material landfill)
- Nitrate [water, surface water]: 3.4787e-8 kg; lognormal variance with pedigree 1.122, pedigree (1,1,5,5,1)
  (same comment as for Sodium, ion)
- BOD5, Biological Oxygen Demand [water, ground-, long-term]: 0.00027206 kg; lognormal variance with pedigree 0.402, pedigree (1,1,5,5,1)
  (same comment as for Boron)
- Arsenic [air, urban air close to ground]: 5.1e-15 kg; lognormal variance with pedigree 1.812, pedigree (1,1,5,5,1)
  (same comment as for process-specific burdens, residual material landfill)
- Strontium [water, surface water]: 1.813e-8 kg; lognormal variance with pedigree 1.882, pedigree (1,1,5,5,1)
  (same comment as for Sodium, ion)
- Potassium, ion [water, ground-, long-term]: 0.00010596 kg; lognormal variance with pedigree 0.952, pedigree (1,1,5,5,1)
  (same comment as for Boron)
- Mercury [air, urban air close to ground]: 7.5982e-15 kg; lognormal variance with pedigree 1.912, pedigree (1,1,5,5,1)
  (same comment as for process-specific burdens, residual material landfill)
- Chloride [water, surface water]: 0.00039939 kg; lognormal variance with pedigree 0.822, pedigree (1,1,5,5,1)
  (same comment as for Sodium, ion)
- Magnesium [air, urban air close to ground]: 2.2996e-6 kg; lognormal variance with pedigree 0.652, pedigree (1,1,5,5,1)
  (same comment as for process-specific burdens, residual material landfill)
- Barium [water, surface water]: 3.7196e-10 kg; lognormal variance with pedigree 2.392, pedigree (1,1,5,5,1)
  (same comment as for Sodium, ion)
- Zinc [air, urban air close to ground]: 1.8942e-7 kg; lognormal variance with pedigree 0.892, pedigree (1,1,5,5,1)
  (same comment as for process-specific burdens, residual material landfill)
- Antimony [air, urban air close to ground]: 1.906e-15 kg; lognormal variance with pedigree 1.832, pedigree (1,1,5,5,1)
  (same comment as for process-specific burdens, residual material landfill)
- Zinc, ion [water, surface water]: 3.6315e-6 kg; lognormal variance with pedigree 0.882, pedigree (1,1,5,5,1)
  (same comment as for Sodium, ion)
- Nitrate [water, ground-, long-term]: 9.7697e-8 kg; lognormal variance with pedigree 1.492, pedigree (1,1,5,5,1)
  (same comment as for Boron)
- Sodium [air, urban air close to ground]: 6.6802e-7 kg; lognormal variance with pedigree 1.062, pedigree (1,1,5,5,1)
  (same comment as for process-specific burdens, residual material landfill)
- Chromium VI [water, ground-, long-term]: 1.3496e-5 kg; lognormal variance with pedigree 1.052, pedigree (1,1,5,5,1)
  (same comment as for Boron)
- Tin, ion [water, surface water]: 7.6258e-11 kg; lognormal variance with pedigree 2.262, pedigree (1,1,5,5,1)
  (same comment as for Sodium, ion)
- Fluoride [water, ground-, long-term]: 1.2494e-11 kg; lognormal variance with pedigree 1.982, pedigree (1,1,5,5,1)
  (same comment as for Boron)
- Manganese [water, ground-, long-term]: 3.3454e-7 kg; lognormal variance with pedigree 6.872, pedigree (1,1,5,5,1)
  (same comment as for Boron)
- Iron, ion [water, surface water]: 0.0027312 kg; lognormal variance with pedigree 0.542, pedigree (1,1,5,5,1)
  (same comment as for Sodium, ion)
- Sulfate [water, ground-, long-term]: 1.129e-5 kg; lognormal variance with pedigree 1.012, pedigree (1,1,5,5,1)
  (same comment as for Boron)
- Manganese [air, urban air close to ground]: 2.2052e-13 kg; lognormal variance with pedigree 1.242, pedigree (1,1,5,5,1)
  (same comment as for process-specific burdens, residual material landfill)
- Copper, ion [water, ground-, long-term]: 2.0179e-5 kg; lognormal variance with pedigree 3.432, pedigree (1,1,5,5,1)
  (same comment as for Boron)
- Aluminium [air, urban air close to ground]: 2.0855e-7 kg; lognormal variance with pedigree 0.982, pedigree (1,1,5,5,1)
  (same comment as for process-specific burdens, residual material landfill)
- Aluminium [water, ground-, long-term]: 3.9568e-5 kg; lognormal variance with pedigree 1.332, pedigree (1,1,5,5,1)
  (same comment as for Boron)
- Molybdenum [water, surface water]: 4.9671e-7 kg; lognormal variance with pedigree 1.702, pedigree (1,1,5,5,1)
  (same comment as for Sodium, ion)
- Cobalt [water, surface water]: 1.0393e-5 kg; lognormal variance with pedigree 1.302, pedigree (1,1,5,5,1)
  (same comment as for Sodium, ion)
- Molybdenum [water, ground-, long-term]: 2.2909e-9 kg; lognormal variance with pedigree 1.722, pedigree (1,1,5,5,1)
  (same comment as for Boron)
- Potassium [air, urban air close to ground]: 4.462e-7 kg; lognormal variance with pedigree 0.962, pedigree (1,1,5,5,1)
  (same comment as for process-specific burdens, residual material landfill)
- Chromium [air, urban air close to ground]: 5.272e-12 kg; lognormal variance with pedigree 1.142, pedigree (1,1,5,5,1)
  (same comment as for process-specific burdens, residual material landfill)
- Cadmium, ion [water, surface water]: 2.9823e-10 kg; lognormal variance with pedigree 1.622, pedigree (1,1,5,5,1)
  (same comment as for Sodium, ion)
- Cobalt [air, urban air close to ground]: 7.28e-9 kg; lognormal variance with pedigree 1.322, pedigree (1,1,5,5,1)
  (same comment as for process-specific burdens, residual material landfill)
- Calcium [air, urban air close to ground]: 3.034e-5 kg; lognormal variance with pedigree 0.352, pedigree (1,1,5,5,1)
  (same comment as for process-specific burdens, residual material landfill)
- Chloride [water, ground-, long-term]: 4.8551e-7 kg; lognormal variance with pedigree 0.842, pedigree (1,1,5,5,1)
  (same comment as for Boron)
- Chromium VI [water, surface water]: 4.4996e-6 kg; lognormal variance with pedigree 1.152, pedigree (1,1,5,5,1)
  (same comment as for Sodium, ion)
- Lead [water, ground-, long-term]: 1.4316e-7 kg; lognormal variance with pedigree 8.092, pedigree (1,1,5,5,1)
  (same comment as for Boron)
- Molybdenum [air, urban air close to ground]: 1e-9 kg; lognormal variance with pedigree 1.722, pedigree (1,1,5,5,1)
  (same comment as for process-specific burdens, residual material landfill)
- Nitrogen oxides [air, urban air close to ground]: 6.9932e-8 kg; lognormal variance with pedigree 2.012, pedigree (1,1,5,5,1)
  uncertainty calculated from uncertainty in average N-emissions, uncertainty in the share of thermal NOx, uncertainty of nitrogen content in average municipal waste and the unertainty in nitrogen content in *this* waste.
- Carbon monoxide, fossil [air, urban air close to ground]: 1.2076e-5 kg; lognormal variance with pedigree 0.712, pedigree (1,4,5,5,3)
  1 plant for waste solvent incineration in Switzerland
  Uncertainty: & basic uncertainty of 5; 1 plant for waste solvent incineration in Switzerland
- TOC, Total Organic Carbon [water, surface water]: 3.6811e-7 kg; lognormal variance with pedigree 0.552, pedigree (1,1,5,5,1)
  (same comment as for Sodium, ion)
- Barium [air, urban air close to ground]: 2.7e-8 kg; lognormal variance with pedigree 1.202, pedigree (1,1,5,5,1)
  (same comment as for process-specific burdens, residual material landfill)
- Manganese [water, surface water]: 9.6349e-10 kg; lognormal variance with pedigree 1.782, pedigree (1,1,5,5,1)
  (same comment as for Sodium, ion)
- Cyanide [air, urban air close to ground]: 2.4207e-9 kg; lognormal variance with pedigree 2.1, pedigree (5,5,5,5,5)
  (same comment as for Dinitrogen monoxide)
- Lead [water, surface water]: 7.5123e-10 kg; lognormal variance with pedigree 1.382, pedigree (1,1,5,5,1)
  (same comment as for Sodium, ion)
- Mercury [water, ground-, long-term]: 1.0276e-8 kg; lognormal variance with pedigree 4.132, pedigree (1,1,5,5,1)
  (same comment as for Boron)
- Vanadium, ion [water, surface water]: 2.0943e-9 kg; lognormal variance with pedigree 2.162, pedigree (1,1,5,5,1)
  (same comment as for Sodium, ion)
- Lead [air, urban air close to ground]: 1.0245e-9 kg; lognormal variance with pedigree 1.212, pedigree (1,1,5,5,1)
  (same comment as for process-specific burdens, residual material landfill)
- Boron [air, urban air close to ground]: 2.52e-7 kg; lognormal variance with pedigree 1.522, pedigree (1,1,5,5,1)
  (same comment as for process-specific burdens, residual material landfill)
- Zinc, ion [water, ground-, long-term]: 3.2697e-6 kg; lognormal variance with pedigree 5.712, pedigree (1,1,5,5,1)
  (same comment as for Boron)
- Phosphate [water, ground-, long-term]: 0.00010043 kg; lognormal variance with pedigree 1.512, pedigree (1,1,5,5,1)
  (same comment as for Boron)
- Cadmium, ion [water, ground-, long-term]: 4.4784e-9 kg; lognormal variance with pedigree 7.892, pedigree (1,1,5,5,1)
  (same comment as for Boron)
- Boron [water, surface water]: 3.2844e-7 kg; lognormal variance with pedigree 1.452, pedigree (1,1,5,5,1)
  (same comment as for Sodium, ion)
- Barium [water, ground-, long-term]: 2.228e-7 kg; lognormal variance with pedigree 6.932, pedigree (1,1,5,5,1)
  (same comment as for Boron)
- Arsenic, ion [water, ground-, long-term]: 0 kg; pedigree (1,1,1,1,1)
  (same comment as for Boron)
- BOD5, Biological Oxygen Demand [water, surface water]: 8.4139e-7 kg; lognormal variance with pedigree 0.552, pedigree (1,1,5,5,1)
  (same comment as for Sodium, ion)
- Fluoride [water, surface water]: 7.756e-9 kg; lognormal variance with pedigree 1.962, pedigree (1,1,5,5,1)
  (same comment as for Sodium, ion)
- DOC, Dissolved Organic Carbon [water, surface water]: 3.6811e-7 kg; lognormal variance with pedigree 0.552, pedigree (1,1,5,5,1)
  (same comment as for Sodium, ion)
- Phosphate [water, surface water]: 7.1538e-6 kg; lognormal variance with pedigree 0.922, pedigree (1,1,5,5,1)
  (same comment as for Sodium, ion)
- Copper, ion [water, surface water]: 2.3547e-5 kg; lognormal variance with pedigree 0.782, pedigree (1,1,5,5,1)
  (same comment as for Sodium, ion)
- DOC, Dissolved Organic Carbon [water, ground-, long-term]: 0.00011902 kg; lognormal variance with pedigree 0.402, pedigree (1,1,5,5,1)
  (same comment as for Boron)
- Sulfur dioxide [air, urban air close to ground]: 1.182e-7 kg; lognormal variance with pedigree 1.032, pedigree (1,1,5,5,1)
  (same comment as for process-specific burdens, residual material landfill)
- COD, Chemical Oxygen Demand [water, surface water]: 8.4139e-7 kg; lognormal variance with pedigree 0.552, pedigree (1,1,5,5,1)
  (same comment as for Sodium, ion)
- Carbon dioxide, fossil [air, urban air close to ground]: 0.060691 kg; lognormal variance with pedigree 0.352, pedigree (1,1,5,5,1)
  calculated from uncertainty in carbon in waste and transfer coefficients
- Nickel, ion [water, ground-, long-term]: 1.0819e-5 kg; lognormal variance with pedigree 1.392, pedigree (1,1,5,5,1)
  (same comment as for Boron)
- Tin [air, urban air close to ground]: 2.2551e-9 kg; lognormal variance with pedigree 1.562, pedigree (1,1,5,5,1)
  (same comment as for process-specific burdens, residual material landfill)
- Phosphorus [air, urban air close to ground]: 1.043e-7 kg; lognormal variance with pedigree 0.972, pedigree (1,1,5,5,1)
  (same comment as for process-specific burdens, residual material landfill)
- Vanadium [air, urban air close to ground]: 8.5e-11 kg; lognormal variance with pedigree 1.662, pedigree (1,1,5,5,1)
  (same comment as for process-specific burdens, residual material landfill)
- COD, Chemical Oxygen Demand [water, ground-, long-term]: 0.00027206 kg; lognormal variance with pedigree 0.402, pedigree (1,1,5,5,1)
  (same comment as for Boron)
- Mercury [water, surface water]: 2.3196e-9 kg; lognormal variance with pedigree 1.792, pedigree (1,1,5,5,1)
  (same comment as for Sodium, ion)
- Vanadium, ion [water, ground-, long-term]: 6.5325e-7 kg; lognormal variance with pedigree 1.652, pedigree (1,1,5,5,1)
  (same comment as for Boron)
- Ammonia [air, urban air close to ground]: 2.6897e-9 kg; lognormal variance with pedigree 2.012, pedigree (1,1,5,5,1)
  (same comment as for Nitrogen oxides)
- Copper [air, urban air close to ground]: 3.8367e-7 kg; lognormal variance with pedigree 0.802, pedigree (1,1,5,5,1)
  (same comment as for process-specific burdens, residual material landfill)
- Water [air, unspecified]: 0.0009 m3; name water_to_air_unspecified; lognormal variance with pedigree 0.0827, pedigree (2,2,5,5,1)
  Calculated value based on water balance.
  property fraction, origin: salt water 0; name fraction_origin_salt_water
  property carbon content, non-fossil 0; name C_content_non_fossil
  property fraction, origin: fresh water 0; name fraction_origin_fresh_water
  property carbon content, fossil 0; name C_content_fossil
  property fraction, origin: unspecified 1; name fraction_origin_unspecified
  property dry mass 0 kg; name DM
  property wet mass 1000 kg; name WM
  property water in wet mass 1000 kg; name WWM
- Potassium, ion [water, surface water]: 4.1593e-5 kg; lognormal variance with pedigree 0.992, pedigree (1,1,5,5,1)
  (same comment as for Sodium, ion)
- Magnesium [water, ground-, long-term]: 0.00018949 kg; lognormal variance with pedigree 1.812, pedigree (1,1,5,5,1)
  (same comment as for Boron)
- Calcium, ion [water, ground-, long-term]: 0.0016418 kg; lognormal variance with pedigree 1.782, pedigree (1,1,5,5,1)
  (same comment as for Boron)
- Strontium [water, ground-, long-term]: 1.086e-5 kg; lognormal variance with pedigree 1.422, pedigree (1,1,5,5,1)
  (same comment as for Boron)
- TOC, Total Organic Carbon [water, ground-, long-term]: 0.00011902 kg; lognormal variance with pedigree 0.402, pedigree (1,1,5,5,1)
  (same comment as for Boron)
- Magnesium [water, surface water]: 3.1634e-7 kg; lognormal variance with pedigree 1.502, pedigree (1,1,5,5,1)
  (same comment as for Sodium, ion)
- Sulfate [water, surface water]: 0.00028403 kg; lognormal variance with pedigree 1.002, pedigree (1,1,5,5,1)
  (same comment as for Sodium, ion)
- Iron [air, urban air close to ground]: 2.38e-6 kg; lognormal variance with pedigree 0.562, pedigree (1,1,5,5,1)
  (same comment as for process-specific burdens, residual material landfill)
- Strontium [air, urban air close to ground]: 3e-9 kg; lognormal variance with pedigree 1.202, pedigree (1,1,5,5,1)
  (same comment as for process-specific burdens, residual material landfill)
- Iron, ion [water, ground-, long-term]: 3.34e-6 kg; lognormal variance with pedigree 7.552, pedigree (1,1,5,5,1)
  (same comment as for Boron)
- Hydrogen chloride [air, urban air close to ground]: 1.2338e-7 kg; lognormal variance with pedigree 0.852, pedigree (1,1,5,5,1)
  (same comment as for process-specific burdens, residual material landfill)
- Antimony [water, ground-, long-term]: 3.1714e-7 kg; lognormal variance with pedigree 1.712, pedigree (1,1,5,5,1)
  (same comment as for Boron)
- Antimony [water, surface water]: 1.7286e-7 kg; lognormal variance with pedigree 1.732, pedigree (1,1,5,5,1)
  (same comment as for Sodium, ion)
- Aluminium [water, surface water]: 6.6057e-8 kg; lognormal variance with pedigree 1.712, pedigree (1,1,5,5,1)
  (same comment as for Sodium, ion)

## Sampling procedure
The 2 Swiss HWI plants, used as the inventory reference technology mix, have a total annual capacity of 53'000 tons of hazardous waste. This corresponds to 39% of the Swiss total installed capacity in 2000. Swiss average plants size is 20'000 t/a.

## Extrapolations
Available waste composition data. Transfer coefficients from one modern HWI completed with data from MSWI. Waste-specific auxiliary material consumption adapted from MSWI. This dataset has been copied from an original dataset covering the geography CH. The uncertainty has been adjusted accordingly.
