# seed-cotton production, organic

Dataset: EcoSpold 2, unit process
Geography: RoW
Time period: 2015-01-01 to 2021-12-31
Technology level: current
Classification: ISIC rev.4 ecoinvent: 0116:Growing of fibre crops
Scenario: Business-as-Usual
System model: Allocation, cut-off by classification
Generated by: Archana Datta
Published in: Faist Emmenegger, M. 2018
Database: ecoinvent
isCopyrightProtected: true
accessRestrictedTo: 1

## General comment
This inventory dataset exclusively covers the field activity for the production of 1kg seed-cotton in India in 2016-17.
The farm has a yield of 1430 kg seeds per ha for this crop cycle. Organic fertilizer applied amounts to 5000 kg/ha of manure from cattle dung and 2500 kg/ha of compost. Harvesting is done manually.
The production of seed cotton involved inputs of land tillage (ridge tillage), irrigation, seeds, compost.
Cotton requires 6 to 8 months to mature. Its time of sowing and harvesting differs in different parts of the country depending upon the climatic conditions. In Punjab and Haryana it is sown in April-May and is harvested in December-January that is before the winter frost can damage the crop. In the peninsular part of India, it is sown upto October and harvested between January and May because there is no danger of winter frost in these areas.
The seed cotton activity culminates in the harvesting of seed cotton from the field. Since picking of cotton is not yet mechanized, and mostly done manually. Normally the picking season is spread over a period of about three months. Cotton plants demand water during the active growth phase and dry weather is need at the maturity as the cotton boll opens.The activity for this dataset ends here right after the harvesting operation. The harvested seed cotton then goes to the ginning process where cotton fibre (lint) and cotton seeds get separated. This dataset is from a farm that practices organic farming, certified by EPIDA

## Included activities start
The activity starts after the harvest of the previous crop and receipt of the inputs of seeds, compost, and irrigation water at the field. Machinery and fixed overhead are excluded. The crop is not irrigated.

## Included activities end
The activity ends at the harvesting of seed-cotton in the field.

## Geography
This dataset is a copy of Indian dataset

## Time period
The data were collected for 2015-2016 cropping season. The same cultivation practice has been practised over the last couple of decades with increased mechanization in tillage and irrigation. In the near future, the scope of changes in the current cultivation paradigm is low.

## Parameters
- LUC_crop_specific: 1 dimensionless
  This parameter allows to switch between a "crop specific" and a "country specific" approach when calculating the LUC of a crop. By default, the chosen approach is "crop specific", so the value of the parameter is 1. If you want to apply a "country specific" approach, turn the parameter to 0.

## Reference product
- seed-cotton, organic: 1 kg; CPC 01921: Cotton, whether or not ginned; By-product classification allocatable product
  production volume 1.22882e8 kg; = 112488*1000*3.3
    Data for year 2015 for organic cotton fibre. The amount was later scaled with a factor of 3.3 to represent seed-cotton. Source: http://aboutorganiccotton.org/stats/
  property price 0.411019 EUR2005
    Literature value. Price from FAOSTAT data Producer Prices - Annual (retrieved from: http://www.fao.org/faostat/en/#data/PP, accessed 15Feb2018). Data from 2005.
  property carbon content, fossil 0
    Carbon content fossil is considered zero in all agricultural products and by-products.
  property carbon content, non-fossil 0.475
    Biogenic carbon content of vegetation on a dry mass basis (47.5% DM) derived from FAOSTAT.
    Reference: http://www.fao.org/forestry/17111/en
  property carbon content 0.475
    carbon content on a dry matter basis (reserved; not for manual entry)
  properties: wet mass 1 kg, dry mass 0.923 kg, water in wet mass 0.077 kg, water content 0.0834236, carbon allocation 0.438425 kg

## Inputs from technosphere
- cottonseed: 0 kg; pedigree (1,1,1,1,1)
  The data was collected for a hectare area through interview
  properties: water content 0.0834236, wet mass 1 kg, dry mass 0.923 kg, carbon content, non-fossil 0.475
  note on carbon content, non-fossil: Biogenic carbon content of vegetation on a dry mass basis (47.5% DM) derived from FAOSTAT. Reference: http://www.fao.org/forestry/17111/en
- compost: 1.74825 kg; lognormal variance with pedigree 0.006, pedigree (3,3,2,5,2)
  The data was collected for a hectare area through interview
  property dry mass 0.5 kg; name DM
  property zinc content 0.000184; name Zn_content
  property lead content 4.9e-5; name Pb_content
  property cadmium content 3.6e-7; name Cd_content
  property mercury content 1.2e-7; name Hg_content
  property copper content 5.77e-5; name Cu_content
  property nickel content 1.63e-5; name Ni_content
  property chromium content 2.23e-5; name Cr_content
  property nitrogen content 0.014; name N_content
  property potassium content 0.01; name K_content
  property phosphorus content 0.0035; name P_content
  properties: water content 1, carbon content, non-fossil 0.183645, wet mass 1 kg
- manure, solid, cattle: 3.4965 kg; lognormal variance with pedigree 0.006, pedigree (3,3,2,5,2)
  The data was collected for a hectare area through interview
  properties: carbon content, non-fossil 0.441, dry mass 0.22 kg, water content 3.5454, wet mass 1 kg
- cottonseed: 2.0589e-6, 0.00132661 kg (2 entries); lognormal variance with pedigree 0.006, pedigree (3,3,2,5,2)
  The data was collected for a hectare area through interview

## Inputs from nature
- Transformation, from annual crop, non-irrigated [natural resource, land]: 6.99301 m2; lognormal variance with pedigree 0.0134, pedigree (3,3,2,5,2)
  Calculated Value. This value has been calculated by using the Ecoinvent LCI calculation tool for crop production.
- Energy, gross calorific value, in biomass [natural resource, biotic]: 17.3446 MJ; lognormal variance with pedigree 0.006, pedigree (3,3,2,5,2)
  (same comment as for Transformation, from annual crop, non-irrigated)
- Carbon dioxide, in air [natural resource, in air]: 1.50049 kg; lognormal variance with pedigree 0.006, pedigree (3,3,2,5,2)
  (same comment as for Transformation, from annual crop, non-irrigated)
- Transformation, to annual crop, non-irrigated [natural resource, land]: 6.99301 m2; lognormal variance with pedigree 0.0134, pedigree (3,3,2,5,2)
  (same comment as for Transformation, from annual crop, non-irrigated)
- Occupation, annual crop, non-irrigated [natural resource, land]: 6.99301 m2*year; lognormal variance with pedigree 0.0074, pedigree (3,3,2,5,2)
  (same comment as for Transformation, from annual crop, non-irrigated)

## Emissions to nature
- Chromium, ion [water, surface water]: 6.12219e-5 kg; lognormal variance with pedigree 0.1088, pedigree (4,5,2,5,2)
  (same comment as for Transformation, from annual crop, non-irrigated)
- Cadmium, ion [water, surface water]: 2.69924e-7 kg; lognormal variance with pedigree 0.1088, pedigree (4,5,2,5,2)
  (same comment as for Transformation, from annual crop, non-irrigated)
- Copper [soil, agricultural]: -1.55169e-5 kg
  (same comment as for Transformation, from annual crop, non-irrigated)
- Mercury [soil, agricultural]: -1.16024e-7 kg
  (same comment as for Transformation, from annual crop, non-irrigated)
- Lead [soil, agricultural]: -1.0916e-5 kg
  (same comment as for Transformation, from annual crop, non-irrigated)
- Zinc [soil, agricultural]: -3.27713e-5 kg
  (same comment as for Transformation, from annual crop, non-irrigated)
- Ammonia [air, non-urban air or from high stacks]: 0.00455673 kg; lognormal variance with pedigree 0.0268, pedigree (4,5,2,5,2)
  (same comment as for Transformation, from annual crop, non-irrigated)
- Cadmium, ion [water, ground-]: 1.36881e-8 kg; lognormal variance with pedigree 0.1088, pedigree (4,5,2,5,2)
  (same comment as for Transformation, from annual crop, non-irrigated)
- Copper, ion [water, ground-]: 2.43645e-6 kg; lognormal variance with pedigree 0.1088, pedigree (4,5,2,5,2)
  (same comment as for Transformation, from annual crop, non-irrigated)
- Phosphate [water, ground-]: 0.000150093 kg; lognormal variance with pedigree 0.0502, pedigree (4,4,2,1,1)
  (same comment as for Transformation, from annual crop, non-irrigated)
- Phosphorus [water, surface water]: 0.00590282 kg; lognormal variance with pedigree 0.0588, pedigree (4,5,2,5,2)
  (same comment as for Transformation, from annual crop, non-irrigated)
- Nitrate [water, ground-]: 0.176132 kg; lognormal variance with pedigree 0.0588, pedigree (4,5,2,5,2)
  (same comment as for Transformation, from annual crop, non-irrigated)
- Lead [water, ground-]: 3.21447e-7 kg; lognormal variance with pedigree 0.1088, pedigree (4,5,2,5,2)
  (same comment as for Transformation, from annual crop, non-irrigated)
- Chromium [soil, agricultural]: -5.75874e-5 kg
  (same comment as for Transformation, from annual crop, non-irrigated)
- Nitrogen oxides [air, non-urban air or from high stacks]: 0.00184413 kg; lognormal variance with pedigree 0.0588, pedigree (4,5,2,5,2)
  (same comment as for Transformation, from annual crop, non-irrigated)
- Mercury [water, ground-]: 6.82349e-10 kg; lognormal variance with pedigree 0.1088, pedigree (4,5,2,5,2)
  (same comment as for Transformation, from annual crop, non-irrigated)
- Dinitrogen monoxide [air, non-urban air or from high stacks]: 0.00100898 kg; lognormal variance with pedigree 0.0488, pedigree (4,5,2,5,2)
  (same comment as for Transformation, from annual crop, non-irrigated)
- Zinc, ion [water, ground-]: 1.65563e-5 kg; lognormal variance with pedigree 0.1088, pedigree (4,5,2,5,2)
  (same comment as for Transformation, from annual crop, non-irrigated)
- Chromium, ion [water, ground-]: 1.3109e-5 kg; lognormal variance with pedigree 0.1088, pedigree (4,5,2,5,2)
  (same comment as for Transformation, from annual crop, non-irrigated)
- Zinc, ion [water, surface water]: 0.000102233 kg; lognormal variance with pedigree 0.1088, pedigree (4,5,2,5,2)
  (same comment as for Transformation, from annual crop, non-irrigated)
- Lead [water, surface water]: 4.29191e-5 kg; lognormal variance with pedigree 0.1088, pedigree (4,5,2,5,2)
  (same comment as for Transformation, from annual crop, non-irrigated)
- Cadmium [soil, agricultural]: -2.5273e-7 kg
  (same comment as for Transformation, from annual crop, non-irrigated)
- Phosphate [water, surface water]: 0.000400561 kg; lognormal variance with pedigree 0.0502, pedigree (4,4,2,1,1)
  (same comment as for Transformation, from annual crop, non-irrigated)
- Mercury [water, surface water]: 1.57414e-7 kg; lognormal variance with pedigree 0.1088, pedigree (4,5,2,5,2)
  (same comment as for Transformation, from annual crop, non-irrigated)
- Nickel, ion [water, surface water]: 5.20851e-5 kg; lognormal variance with pedigree 0.1088, pedigree (4,5,2,5,2)
  (same comment as for Transformation, from annual crop, non-irrigated)
- Nickel [soil, agricultural]: -4.18011e-5 kg
  (same comment as for Transformation, from annual crop, non-irrigated)
- Copper, ion [water, surface water]: 5.58866e-5 kg; lognormal variance with pedigree 0.1088, pedigree (4,5,2,5,2)
  (same comment as for Transformation, from annual crop, non-irrigated)

## Sampling procedure
Primary data from farmers and supplemented with literature data. Standardized questionnaires were developed and adapted to cotton-specific cultivation and post-harvest situation. The secondary data from literature and the primary data from surveys were compared and matched to obtain the highest data quality

## Extrapolations
The data on inputs to the field activites are collected directly from the farmers and farming experts. However, the emission data were not readily available for India. Hence, Ecoinvent LCI calculation tool for crop production was used to calculate field emissions from the cultivation process.
