# sulfate pulp production, from softwood, unbleached

Dataset: EcoSpold 2, unit process
Geography: RoW
Time period: 2017-01-01 to 2021-12-31
Technology level: current
Classification: EcoSpold01Categories: paper & cardboard/pulps
Classification: ISIC rev.4 ecoinvent: 1701:Manufacture of pulp, paper and paperboard
Synonyms: Kraftzellstoff; kraft pulp
Scenario: Business-as-Usual
System model: Allocation, cut-off by classification
Share of production covered: 90 %
Generated by: AISBL
Database: ecoinvent
isCopyrightProtected: true
accessRestrictedTo: 1

## General comment
This dataset is a copy of the European dataset (sulfate pulp production, from softwood, unbleached, RER, 2020), it represents an aggregation of the production of unbleached kraft pulp, obtained from northern European softwood in 2017. Industry data was used which was provided by the European Pulp Industry Sector (EPIS).The used values are a weighted average of all corresponding pulp mills. The represented technology is considered state of the art for an European average.
PULP is a clean, wood-based, renewable and biodegradable raw material to make different paper, board and other products. The pulp, or fibers from the wood are separated in a kraft cooking process in a so-called fiber line. In a recovery line, the chemicals used in the cooking process are recovered to be used again and energy is produced. The third process is effluent treatment where gaseous and liquid discharges to the environment are continuously minimized and monitored.
MAIN END USES FOR MARKET PULP
• Tissue (toilet paper)
• Graphic papers
• Specialty products
• Packaging
• Fluff pulp
• Viscose
• CMC etc.
MAIN END USES FOR MARKET PULP
• Tissue (toilet paper)
• Graphic papers
• Specialty products
• Packaging
• Fluff pulp
• Viscose
• CMC etc.
PRODUCTS GENERATED IN THE PULPING PROCESS include crude tall oil, turpentine, biogas from sludge, electricity, heat etc.
"EXAMPLES OF NEW BIO-PRODUCTS FROM PULP MILLS - from pulp, lignin, bark and wood residues
• Bio-fuels
• Bio-chemicals
• Bio-composites
• Bio-plastics
• Bio-fibrils
• Bio-medical products
"
CAPACITIES
The world’s total market pulp capacity is ca 64 million tons. The Western European capacity for market pulp is ca. 13 million tons. The Latin American eucalyptus pulp capacity is ca. 22 million tons. (2018)
SPECIES
Softwood pulp is made from coniferous trees, most typically from different species of pine and spruce.
Hardwood pulp is made from non-coniferous trees, in Nordic countries primarily of birch. Eucalyptus hardwood pulp is made exclusively of eucalyptus species.
CHARACTERISTICS
Softwood fibers are long and slender and are used to give the paper and board products their strength properties.
Hardwood fibers are short and can be rounder and their number per gram of pulp is much larger; they give the end product its smoothness, softness and optical properties like opacity (that you cannot see through the paper).

## Included activities start
This acitivity starts with the reception of the pulp wood at the factory gate.

## Included activities end
The process includes wood handling at the pulp mill, chemical pulping and bleaching, drying process, energy production on-site, recovery cycles of chemicals and internal waste water treatment.
Only key emission factors were provided by the industry, the remaining emissions from on-site energy production from externally supplied fuels were calculated, using emission profiles from ecoinvent combustion processes. Moreover, the following "internal" biogenic fuels are represented by the calculated emissions but do not have the corresponding fuel input from technosphere, because they are supplied from within the system boundaries: Biogas: 0.00041026 m3, methanol: 0.01148718 m3. The following biofuels are not included in the emission approximation due to a likely mismatch of the emission of a black liquor boiler and wood chips combustion and for the lack of an appropriate proxy: black liquor, tall oil pitch and sludge. The activity ends when the kraft pulp is ready to be sold.

## Geography
Representing European countries. Data is coming from mills in Sweden and Finland

## Technology
Average European technology in 2017 of kraft pulp production of unbleached pulp

## Time period
Data gathered in 2016 and represents data of 2015 values. Recent technology valid for the upcoming years.

## Reference product
- sulfate pulp, unbleached: 0 kg; By-product classification allocatable product; CPC 32112: Chemical wood pulp, other than dissolving grades
  production volume 1.935e9 kg; name APV_RP
    The annual production volumes in 2017 for MARKET PULP for unbleached softwood kraft (UKP) market pulp globally: 2335 ktonnes. Estimation by EPIS
  property heating value, net 13.23 MJ
    LHV is calculated based on the Carbon content of the product. More details can be found on the respective documentation.
  property carbon content, non-fossil 0.494
    C content of dry mass of sulfate pulp is 0.494 kgC/kg dry wood (ecoinvent v2.2 report 6_IX & ecoinvent v2.2 report 9). No other C containing products in the formulation of the pulp.
  property carbon content 0.494
    carbon content on a dry matter basis (reserved; not for manual entry)
  property true value 0.355
    allocation property applied in "true value" allocation // value calculated from revenue
  properties: water content 0.111111, carbon content, fossil 0, price 0.355 EUR2005, dry mass 0.9 kg, water in wet mass 0.1 kg, wet mass 1 kg, carbon allocation 0.4446 kg
- heat, district or industrial, other than natural gas: 1 MJ; name a_heat; By-product classification allocatable product; CPC 17300: Steam and hot water; pedigree (1,1,1,1,1)
  Data provided by industry (EPIS) 2017. Represents steam and warm water output sold externally
  production volume 1.61923e10 MJ; = a_heat*APV_RP
    Calculated from the production volume of sulfate pulp in proportion to the respective output amounts.
  property true value relation 0.1842; name a_heat_true_value_relation
    property to calculate "true value" from
  property price 0.0106 EUR2005; name a_heat_price_EUR2005
    Average European district heat price from Ecoheatcool and Euroheat 2005-2006, Ecoheat Work package 1: The European heat market. Final report. 10.6 EUR/GJ i s the price of district heat. http://www.solarthermalworld.org/files/Ecoheatcool%20WP1%20Web.pdf?download
  property corresponding fuel use, propane, furnace >100kW 1.05263 MJ
    Lower heating value of the fuel input related to the heat/electricity output, taken directly from ecoinvent v3.0 dataset "heat production, natural gas, at industrial furnace >100kW, GLO 2000".
  property true value 0.0559777; name a_heat_true_value
    allocation property applied in "true value" allocation // value calculated from true value relation
  properties: heating value, net 1 MJ

## By-products
All rows: By-product classification allocatable product; pedigree (1,1,1,1,1)
- sawdust, wet, measured as dry mass: 0 kg; name a_sawd; CPC 3928: Sawdust and wood waste and scrap
  Data provided by industry (EPIS) 2017
  production volume 1.96596e7 kg; = a_sawd*APV_RP
    (same comment as for heat, district or industrial, other than natural gas)
  property price 0.101 EUR2005; name a_sawd_price_EUR2005
    Expert judgement (Urs Luginbühl, Swiss Sawmilling industry, personal communication in June 2014). Cross-reference; FAOSTAT (accessed 20140429). The price is calculated by using data on total world import quantity (m3) and import value (1000 USD), year 2005. 13564451 m3 of Wood Residues was imported in the world in 2005. The import value was 690978000 USD. The calculated price is thus (690978000/13564451=50.9*0.8=) 41.1 Euro/m3. The density of saw dust, wet, measured as dry mass is 550 kg/m3. The recalculated price is (1/550*41.1=) 0.075 Euro/kg.
  property heating value, net 7.79 MJ
    (same comment as for sulfate pulp, unbleached)
  property carbon content 0.494
    carbon content on a dry matter basis (reserved; not for manual entry)
  property true value 0.00102616; name a_sawd_true_value
    allocation property applied in "true value" allocation // value calculated from revenue
  properties: water in wet mass 0.7 kg, carbon content, fossil 0, water content 0.7, dry mass 1 kg, wet mass 1.7 kg, carbon content, non-fossil 0.494, carbon allocation 0.494 kg
- electricity, high voltage: 0 kWh; name a_el; CPC 17100: Electrical energy
  Data provided by industry (EPIS) 2017
  production volume 1.91663e9 kWh; = a_el*APV_RP
    (same comment as for heat, district or industrial, other than natural gas)
  property true value relation 3.6; name a_el_true_value_relation
    property to calculate "true value" from
  property price 0.0977 EUR2005; name a_el_price_EUR2005
    Temporary price data. Calculated as 90% of purchasers price based on: 94% of the average price (to account for a 6% loss in transformation and transmission) for electricity for industrial consumersin 2005 (excluded taxes). From IEA.
  property true value 0.129497; name a_el_true_value
    (same comment as for heat, district or industrial, other than natural gas)
- turpentine: 0 kg; name a_turp; CPC 34400: Activated natural mineral products; animal black; tall oil; terpenic oils produced by the treatment of conifer[…]; CAS 8006-64-2
  Data provided by industry (EPIS) 2017. By product of pulp production.
  production volume 1.00051e7 kg; = a_turp*APV_RP
    (same comment as for heat, district or industrial, other than natural gas)
  property heating value, net 26.74 MJ
    (same comment as for sulfate pulp, unbleached)
  property price 1.826 EUR2005; name a_turp_price_EUR2005
    Average price for imports in 2005 to USA, China, India, Japan and EU-28 according to UN comtrade. Accessible online at https://comtrade.un.org/data/, 11.6.2018
  property carbon content 0.882353
    carbon content on a dry matter basis (reserved; not for manual entry)
  property true value 0.00944152; name a_turp_true_value
    allocation property applied in "true value" allocation // value calculated from revenue
  properties: water in wet mass 0 kg, wet mass 1 kg, carbon content, non-fossil 0.882353, water content 0, dry mass 1 kg, carbon content, fossil 0, carbon allocation 0.882353 kg
- tall oil, crude: 0 kg; name a_cto; CPC 34400: Activated natural mineral products; animal black; tall oil; terpenic oils produced by the treatment of conifer[…]; CAS 8002-26-4
  Data provided by industry (EPIS) 2017. By product of pulp production.
  production volume 4.32848e8 kg; = a_cto*APV_RP
    (same comment as for heat, district or industrial, other than natural gas)
  property price 0.652995 EUR2005; name a_cto_price_EUR2005
    Estimated value. Set to be 90% of tall oil, refined, comment: Average price for imports in 2005 to USA, China, India, Japan and EU-28 according to UN comtrade. Accessible online at https://comtrade.un.org/data/, 11.6.2018
  property heating value, net 23.82 MJ
    (same comment as for sulfate pulp, unbleached)
  property carbon content 0.786
    carbon content on a dry matter basis (reserved; not for manual entry)
  property true value 0.146071; name a_cto_true_value
    allocation property applied in "true value" allocation // value calculated from revenue
  properties: carbon content, non-fossil 0.786, carbon content, fossil 0, water in wet mass 0 kg, dry mass 1 kg, water content 0, wet mass 1 kg, carbon allocation 0.786 kg
- bark chips, wet, measured as dry mass: 0 kg; name a_bark; CPC 31230: Wood in chips or particles
  Data provided by industry (EPIS) 2017
  production volume 1.11568e8 kg; = a_bark*APV_RP
    Calculated from production volume of reference product using the relative outputs.
  property heating value, net 4.81 MJ
    (same comment as for sulfate pulp, unbleached)
  property price 0.034 EUR2005; name a_bark_price_EUR2005
    Expert judgement (Urs Luginbühl, Swiss Sawmilling industry, personal communication in June 2014). Cross-reference; FAOSTAT database; http://faostat.fao.org/site/626/DesktopDefault.aspx?PageID=626#ancor; Average import/export prices of EU for 'chips and particles'. Price: 48.76 Euro/m3. The density of the wood chips is 650 kg/m3. The price is calculated to be 0.075 EUR/kg.
  property carbon content 0.494
    carbon content on a dry matter basis (reserved; not for manual entry)
  property true value 0.00196037; name a_bark_true_value
    allocation property applied in "true value" allocation // value calculated from revenue
  properties: carbon content, fossil 0, carbon content, non-fossil 0.494, water content 1.4, wet mass 2.4 kg, water in wet mass 1.4 kg, dry mass 1 kg, carbon allocation 0.494 kg

## Inputs from technosphere
- quicklime, milled, loose: 0.00019297 kg; lognormal variance with pedigree 0.0029, pedigree (1,2,2,5,1)
  Data provided by industry (EPIS) 2017. Calcium oxide (CaO)
  properties: dry mass 0.99 kg, wet mass 1 kg, water content 0.010101
- transport, freight train: 0 metric ton*km; pedigree (1,1,1,1,1)
  Data provided by industry (EPIS) 2017
- sulfuric acid: 0.000110617 kg; lognormal variance with pedigree 0.0029, pedigree (1,2,2,5,1)
  Data provided by industry (EPIS) 2017
  properties: wet mass 1 kg, dry mass 1 kg
- sludge from pulp and paper production: -1.29646e-5 kg; name a_sd; lognormal variance with pedigree 0.0029, pedigree (1,2,2,5,1)
  Data provided by industry (EPIS) 2017
  production volume 2.62128e6 kg; = a_sd*APV_RP
    (same comment as for heat, district or industrial, other than natural gas)
  property price 0 EUR2005; name a_sd_price_EUR2005
  properties: wet mass 1 kg, water content 0.333333, dry mass 0.75 kg, carbon content, non-fossil 0.21, heating value, net 2.65 MJ
  note on heating value, net: Value taken from the general comment of the treatment dataset.
- transport, freight, lorry >32 metric ton, EURO5: 0 metric ton*km; pedigree (1,1,1,1,1)
  Data provided by industry (EPIS) 2017
- municipal solid waste: 0 kg; name a_msw; pedigree (1,1,1,1,1)
  Data provided by industry (EPIS) 2017. Represents genaral trash
  production volume 0 kg
    (same comment as for heat, district or industrial, other than natural gas)
  properties: dry mass 0.771 kg, wet mass 1 kg, carbon content, non-fossil 0.261655, heating value, net 11.74 MJ, water content 0.297017, carbon content, fossil 0.171549
  note on carbon content, non-fossil: MSW composition in tab 4.1, ecoinvent v2.2 report 13_I. C content referred to 1 kg DM
- light fuel oil: 0 kg; pedigree (1,1,1,1,1)
  Data provided by industry (EPIS) 2017, indicated in energy content. Calculation into mass/volume was done by using the following conversion factor: Light fuel oil: MJ/kg 43.5. Source: http://www.fao.org/docrep/T0269e/t0269e0c.htm
  properties: carbon content, fossil 0.862, heating value, net 42.6 MJ, dry mass 1 kg, wet mass 1 kg
- tap water: 0 kg; pedigree (1,1,1,1,1)
  Data provided by industry (EPIS) 2017. Municipal water supply
  properties: dry mass 0.000337476 kg, carbon content, fossil 0.00178991, wet mass 1 kg, water content 2962.17
  note on carbon content, fossil: Bicarbonate content is 2.93 mol/m3. CO2 content is 0.1 mol/m3 (ecoinvent v2.2 report 8, Tab 93.1).
- inert waste: -1.30396e-6 kg; name a_iw; lognormal variance with pedigree 0.0029, pedigree (1,2,2,5,1)
  Data provided by industry (EPIS) 2017. Represents "sand from debarking"(sand from the forest) and construction and demolition waste
  production volume 263644 kg; = a_iw*APV_RP
    (same comment as for heat, district or industrial, other than natural gas)
  property price 0 EUR2005; name a_iw_price_EUR2005
  properties: wet mass 1 kg, dry mass 1 kg
- wastewater, from residence: -1.07118e-7 m3; name a_wwr; lognormal variance with pedigree 0.0029, pedigree (1,2,2,5,1)
  Data provided by industry (EPIS) 2017. Sanitary water
  production volume 21657.9 m3; = a_wwr*APV_RP
    (same comment as for heat, district or industrial, other than natural gas)
  property price 0 EUR2005; name a_wwr_price_EUR2005
  properties: water content 2962.17, wet mass 1000 kg, carbon content, non-fossil 0.199421, dry mass 0.337476 kg
  note on carbon content, non-fossil: 0.0673 kg TOC/m3 (Tab A.17, ecoinvent v2.2 report 13_I). TOC was considered as Total Carbon.
- pulp factory: 4.58132e-13 unit; lognormal variance with pedigree 0.3043, pedigree (3,2,2,5,1)
  Own estimation with yearly production volume and a lifetime of a factory of 50 years
- heavy fuel oil: 0 kg; pedigree (1,1,1,1,1)
  Data provided by industry (EPIS) 2017, indicated in energy content. Calculation into mass/volume was done by using the following conversion factor: Heavy fuel oil: MJ/kg 42.6. Source: http://www.fao.org/docrep/T0269e/t0269e0c.htm
  properties: carbon content, fossil 0.849, dry mass 1 kg, wet mass 1 kg, heating value, net 41.2 MJ
- waste wood, untreated: 0 kg; name a_ww; pedigree (1,1,1,1,1)
  Data provided by industry (EPIS) 2017. Represents bark and wood wastes
  production volume 0 kg
    (same comment as for heat, district or industrial, other than natural gas)
  property price 0 EUR2005; name a_ww_price_EUR2005
  properties: heating value, net 13.99 MJ, carbon content, non-fossil 0.48632, dry mass 0.8 kg, water content 0.25, wet mass 1 kg
- waste mineral oil: -2.16765e-7 kg; name a_wmo; lognormal variance with pedigree 0.0029, pedigree (1,2,2,5,1)
  Data provided by industry (EPIS) 2017. Represents lubricants residues, oil, fats and lubricants wastes: The running of the equipment and conveyors and their maintenance require lubrication. lubricants are oils and greases
  production volume 43827.2 kg; = a_wmo*APV_RP
    (same comment as for heat, district or industrial, other than natural gas)
  property price 0 EUR2005; name a_wmo_price_EUR2005
  properties: carbon content, fossil 0.864444, heating value, net 34.7 MJ, dry mass 0.9 kg, wet mass 1 kg, water content 0.111111
  note on carbon content, fossil: Tab A.6, ecoinvent v2.2 report 13_I. C content has been calculated after data in the tables, and then referred to 1 kg DM
- pulpwood, softwood, measured as solid wood under bark: 4.40317e-5 m3; lognormal variance with pedigree 0.0029, pedigree (1,2,2,5,1)
  Data provided by industry (EPIS) 2017; Represents wood sources explicitly: pine wood certified
  properties: heating value, net 4483.78 MJ, carbon content, non-fossil 0.494, wet mass 1056 kg, dry mass 440 kg, water content 1.4
  note on heating value, net: Value based on "softwood forestry, mixed species, sustainable forest management"The property is based on a value of 11.58MJ/kg
  note on carbon content, non-fossil: C content of dry mass is 0.494 kgC/kg dry wood (ecoinvent v2.2 report 9)
- wood chips, dry, measured as dry mass: 0.00263289 kg; lognormal variance with pedigree 0.0029, pedigree (1,2,2,5,1)
  Data provided by industry (EPIS) 2017
  properties: dry mass 1 kg, water content 0.4, carbon content, non-fossil 0.494, heating value, net 9.99 MJ, wet mass 1.4 kg
  note on carbon content, non-fossil: C content of dry mass is 0.494 kgC/kg dry wood (ecoinvent v2.2 report 9).
- electricity, high voltage: 0 kWh; pedigree (1,1,1,1,1)
  Data provided by industry (EPIS) 2017
- wood ash mixture, pure: -1.21543e-5 kg; name a_wam; lognormal variance with pedigree 0.0029, pedigree (1,2,2,5,1)
  Data provided by industry (EPIS) 2017; Represents 0.00127 kg "fiber reject".
  production volume 2.45745e6 kg; = a_wam*APV_RP
    (same comment as for heat, district or industrial, other than natural gas)
  property price 0 EUR2005; name a_wam_price_EUR2005
  properties: carbon content, non-fossil 0.012, dry mass 1 kg, wet mass 1 kg
- sodium hydroxide, without water, in 50% solution state: 0.000160855 kg; lognormal variance with pedigree 0.0029, pedigree (1,2,2,5,1)
  Data provided by industry (EPIS) 2017
  properties: heating value, net 3.03 MJ, dry mass 1 kg, wet mass 1 kg
- methanol, from biomass: 0.000112736 kg; lognormal variance with pedigree 0.0029, pedigree (1,2,2,5,1)
  Data provided by industry (EPIS) 2017. Represents biofuel from tall oil pitch. Calculated from energetic value with conversion factor 23 MJ/kg
  properties: dry mass 0.999 kg, wet mass 1 kg, heating value, net 26.48 MJ, water content 0.001001, carbon content, non-fossil 0.375375
- limestone residue: -0.000169655 kg; name a_lsr; lognormal variance with pedigree 0.0029, pedigree (1,2,2,5,1)
  Data provided by industry (EPIS) 2017; including lime kiln ash, lime mud and lime sludge
  production volume 3.4302e7 kg; = a_lsr*APV_RP
    (same comment as for heat, district or industrial, other than natural gas)
  property price 0 EUR2005; name a_lsr_price_EUR2005
  properties: wet mass 1 kg, carbon content, fossil 0.120005, water content 0.00502513, dry mass 0.995 kg
  note on carbon content, fossil: The waste is characterised as "calcium carbonate waste" (CaCO3)
- hazardous waste, for incineration: -1.57607e-7 kg; name a_hw; lognormal variance with pedigree 0.0029, pedigree (1,2,2,5,1)
  Data provided by industry (EPIS) 2017. e.g. laboratory chemicals, solvents that must be disposed of in a controlled manner in a spezialized external facility.
  production volume 31866.2 kg; = a_hw*APV_RP
    (same comment as for heat, district or industrial, other than natural gas)
  property price 0 EUR2005; name a_hw_price_EUR2005
  properties: water content 0.333333, carbon content, fossil 0.554667, dry mass 0.75 kg, heating value, net 17 MJ, wet mass 1 kg
- green liquor dregs: -4.79405e-5 kg; name a_gld; lognormal variance with pedigree 0.0029, pedigree (1,2,2,5,1)
  Data provided by industry (EPIS) 2017
  production volume 9.69296e6 kg; = a_gld*APV_RP
    (same comment as for heat, district or industrial, other than natural gas)
  property price 0 EUR2005; name a_gld_price_EUR2005
  properties: dry mass 0.75 kg, wet mass 1 kg, carbon content, non-fossil 0.390667, water content 0.333333
  note on carbon content, non-fossil: Tab 6.25, ecoinvent v2.2 report 11_III & Tab A.9, ecoinvent v2.2 report 13_I
- transport, freight train: 0.000419134, 0.000116123, 0.000457837, 2.94048e-5, 0.000578244 metric ton*km (5 entries); lognormal variance with pedigree 0.0029, pedigree (1,2,2,5,1)
  Data provided by industry (EPIS) 2017
- transport, freight, lorry >32 metric ton, EURO5: 0.000570925, 0.00311549 metric ton*km (2 entries); lognormal variance with pedigree 0.0029, pedigree (1,2,2,5,1)
  Data provided by industry (EPIS) 2017
- municipal solid waste: -1.41225e-9, -3.55852e-10, -5.08534e-10, -9.988e-7 kg (4 entries); lognormal variance with pedigree 0.0029, pedigree (1,2,2,5,1)
  Data provided by industry (EPIS) 2017. Represents genaral trash
  production volume 202405 kg
- light fuel oil: 6.25507e-9, 9.02081e-10, 1.26242e-8, 8.37727e-10, 1.21384e-9, 1.27186e-7 kg (6 entries); lognormal variance with pedigree 0.0029, pedigree (1,2,2,5,1)
  (same comment as for light fuel oil)
- tap water: 1.93948e-9, 2.33462e-10, 3.85834e-10, 9.7292e-9, 2.53103e-10, 7.19947e-10, 1.11336e-7 kg (7 entries); lognormal variance with pedigree 0.0029, pedigree (1,2,2,5,1)
  Data provided by industry (EPIS) 2017. Municipal water supply
- heavy fuel oil: 4.67105e-6, 1.21687e-6, 3.60239e-6, 7.086e-7, 9.0903e-7, 8.42112e-5 kg (6 entries); lognormal variance with pedigree 0.0029, pedigree (1,2,2,5,1)
  (same comment as for heavy fuel oil)
- waste wood, untreated: -4.78188e-8, -5.93743e-9, -4.34093e-10, -1.66764e-8, -2.51941e-9, -3.98298e-9, -6.3441e-7 kg (7 entries); lognormal variance with pedigree 0.0029, pedigree (1,2,2,5,1)
  Data provided by industry (EPIS) 2017. Represents bark and wood wastes
  production volume 143913 kg
- electricity, high voltage: 6.85861e-6, 1.31486e-6, 2.22935e-5, 0.000321017, 5.09104e-5, 0.00014676 kWh (6 entries); lognormal variance with pedigree 0.0029, pedigree (1,2,2,5,1)
  Data provided by industry (EPIS) 2017

## Inputs from nature
- Carbon dioxide, non-fossil, resource correction [natural resource, in air]: -0.0206297 kg; pedigree (1,1,1,1,1)
  This exchange has been added after economic allocation in order to re-balance the non-fossil carbon dioxide resource extraction.
- Water, unspecified natural origin [natural resource, in water]: 0.000611748 m3; lognormal variance with pedigree 0.0029, pedigree (1,2,2,5,1)
  Key emission provided by industry (EPIS) 2017

## Emissions to nature
- Phosphorus [water, surface water]: 1.1807e-7 kg; lognormal variance with pedigree 0.0423, pedigree (1,2,2,5,1)
  Data provided by industry (EPIS) 2017
- TOC, Total Organic Carbon [water, surface water]: 3.3879e-5 kg; lognormal variance with pedigree 0.0423, pedigree (1,2,2,5,1)
  Data provided by industry (EPIS) 2017
- COD, Chemical Oxygen Demand [water, surface water]: 8.59893e-5 kg; lognormal variance with pedigree 0.0423, pedigree (1,2,2,5,1)
  Data provided by industry (EPIS) 2017
- Zinc [air, urban air close to ground]: 2.17306e-10 kg; lognormal variance with pedigree 0.7426, pedigree (2,5,3,5,4)
  Estimation based on fuel input data and emission factors from corresponding ecoinvent fuel combustion datasets (see "Extrapolations" comment). Apart from external fuel inputs, internal fuels such as bark, black liquor, sludge, tall oil pitch, wood pellets are generated during the process and supply considerable amounts of process energy. Emissions from some internal biofuels (bark, wood pellets) are approximated with the combustion of wood chips. black liquor, sludge and tall oil pitch were not included in the emissions calculations because no specific emission profiles, e.g. for the black liquor recovery process, were available. Emissions from these internal energy generation processes are therefore only reflected in the key emission factors provided by the industry, other emissions constitute a data gap. Biogas and methanol are approximated with the combustion of natural gas, whereby CO2, CO and CH4 emissions stemming from biogas were modeled as non-fossil.
  Uncertainty: e
- Nitrogen oxides [air, urban air close to ground]: 1.64297e-5 kg; lognormal variance with pedigree 0.0423, pedigree (1,2,2,5,1)
  Key emission provided by industry (EPIS) 2017
- Toluene [air, urban air close to ground]: 1.00412e-9 kg; lognormal variance with pedigree 0.1426, pedigree (2,5,3,5,4)
  (same comment as for Zinc)
- Hydrocarbons, aliphatic, unsaturated [air, urban air close to ground]: 1.16102e-10 kg; lognormal variance with pedigree 0.1426, pedigree (2,5,3,5,4)
  (same comment as for Zinc)
- Sodium [air, urban air close to ground]: 2.90253e-9 kg; lognormal variance with pedigree 0.7426, pedigree (2,5,3,5,4)
  (same comment as for Zinc)
- Water [air, unspecified]: 0.00032922 m3; lognormal variance with pedigree 0.0423, pedigree (1,2,2,5,1)
  Data provided by industry (EPIS) 2017. Mainly cooling water and assumed to evaporate
  property fraction, origin: unspecified 1; name fraction_origin_unspecified
  property fraction, origin: salt water 0; name fraction_origin_salt_water
  property fraction, origin: fresh water 0; name fraction_origin_fresh_water
- Calcium [air, urban air close to ground]: 4.25704e-10 kg; lognormal variance with pedigree 0.4026, pedigree (2,5,3,5,4)
  (same comment as for Zinc)
- Methane, non-fossil [air, urban air close to ground]: 3.02125e-10 kg; lognormal variance with pedigree 0.1426, pedigree (2,5,3,5,4)
  (same comment as for Zinc)
- Particulates, > 2.5 um, and < 10um [air, unspecified]: 4.64405e-9 kg; lognormal variance with pedigree 0.148, pedigree (3,5,4,5,3)
  Estimation based on fuel input data and emission factors from corresponding ecoinvent fuel combustion datasets (see "Extrapolations" comment). Apart from external fuel inputs, internal fuels such as bark, black liquor, sludge, tall oil pitch, wood pellets are generated during the process and supply considerable amounts of process energy. Emissions from some internal biofuels (bark, wood pellets) are approximated with the combustion of wood chips. black liquor, sludge and tall oil pitch were not included in the emissions calculations because no specific emission profiles, e.g. for the black liquor recovery process, were available. Emissions from these internal energy generation processes are therefore only reflected in the key emission factors provided by the industry, other emissions constitute a data gap. Biogas and methanol are approximated with the combustion of natural gas, whereby CO2, CO and CH4 emissions stemming from biogas were modeled as non-fossil.
- Arsenic [air, urban air close to ground]: 5.03105e-11 kg; lognormal variance with pedigree 0.1426, pedigree (2,5,3,5,4)
  (same comment as for Zinc)
- DOC, Dissolved Organic Carbon [water, surface water]: 3.39095e-5 kg; lognormal variance with pedigree 0.0423, pedigree (1,2,2,5,1)
  Calculated as equal to TOC.
- Carbon monoxide, non-fossil [air, urban air close to ground]: 4.63486e-6 kg; lognormal variance with pedigree 0.6523, pedigree (1,2,2,5,1)
  Key emission provided by industry (EPIS) 2017
- Methanol [air, urban air close to ground]: 1.97372e-9 kg; lognormal variance with pedigree 0.1426, pedigree (2,5,3,5,4)
  (same comment as for Zinc)
- Formaldehyde [air, urban air close to ground]: 2.19116e-9 kg; lognormal variance with pedigree 0.1426, pedigree (2,5,3,5,4)
  (same comment as for Zinc)
- Dioxins, measured as 2,3,7,8-tetrachlorodibenzo-p-dioxin [air, urban air close to ground]: 0 kg; pedigree (1,1,1,1,1)
  (same comment as for Zinc)
- Methane, fossil [air, urban air close to ground]: 2.01927e-8 kg; lognormal variance with pedigree 0.1426, pedigree (2,5,3,5,4)
  (same comment as for Zinc)
- Vanadium [air, urban air close to ground]: 3.87005e-9 kg; lognormal variance with pedigree 0.7426, pedigree (2,5,3,5,4)
  (same comment as for Zinc)
- Hydrogen chloride [air, urban air close to ground]: 5.57346e-9 kg; lognormal variance with pedigree 0.1426, pedigree (2,5,3,5,4)
  (same comment as for Zinc)
- Copper [air, urban air close to ground]: 6.63747e-11 kg; lognormal variance with pedigree 0.7426, pedigree (2,5,3,5,4)
  (same comment as for Zinc)
- PAH, polycyclic aromatic hydrocarbons [air, urban air close to ground]: 4.66399e-11 kg; lognormal variance with pedigree 0.1426, pedigree (2,5,3,5,4)
  (same comment as for Zinc)
- Benzene [air, urban air close to ground]: 1.77576e-9 kg; lognormal variance with pedigree 0.1426, pedigree (2,5,3,5,4)
  (same comment as for Zinc)
- Chromium [air, urban air close to ground]: 1.91567e-11 kg; lognormal variance with pedigree 0.7426, pedigree (2,5,3,5,4)
  (same comment as for Zinc)
- Nickel [air, urban air close to ground]: 1.89633e-9 kg; lognormal variance with pedigree 0.7426, pedigree (2,5,3,5,4)
  (same comment as for Zinc)
- Butane [air, urban air close to ground]: 3.10941e-9 kg; lognormal variance with pedigree 0.4026, pedigree (2,5,3,5,4)
  (same comment as for Zinc)
- Carbon dioxide, non-fossil [air, urban air close to ground]: 0.021625 kg; lognormal variance with pedigree 0.0029, pedigree (1,2,2,5,1)
  Key emission provided by industry (EPIS) 2017
- Carbon dioxide, fossil [air, urban air close to ground]: 0.000616055 kg; lognormal variance with pedigree 0.0029, pedigree (1,2,2,5,1)
  Key emission provided by industry (EPIS) 2017
- Acetaldehyde [air, urban air close to ground]: 5.84945e-10 kg; lognormal variance with pedigree 0.1426, pedigree (2,5,3,5,4)
  (same comment as for Zinc)
- Sulfur dioxide [air, urban air close to ground]: 2.30653e-6 kg; lognormal variance with pedigree 0.0029, pedigree (1,2,2,5,1)
  Key emission provided by industry (EPIS) 2017
- Benzo(a)pyrene [air, urban air close to ground]: 1.52931e-13 kg; lognormal variance with pedigree 0.1426, pedigree (2,5,3,5,4)
  (same comment as for Zinc)
- Pentane [air, urban air close to ground]: 5.32833e-9 kg; lognormal variance with pedigree 0.1426, pedigree (2,5,3,5,4)
  (same comment as for Zinc)
- Nitrogen [water, surface water]: 1.14345e-6 kg; lognormal variance with pedigree 0.0423, pedigree (1,2,2,5,1)
  Data provided by industry (EPIS) 2017
- Dinitrogen monoxide [air, urban air close to ground]: 3.54376e-9 kg; lognormal variance with pedigree 0.1426, pedigree (2,5,3,5,4)
  (same comment as for Zinc)
- Acetone [air, urban air close to ground]: 5.80506e-10 kg; lognormal variance with pedigree 0.1426, pedigree (2,5,3,5,4)
  (same comment as for Zinc)
- Particulates, > 10 um [air, urban air close to ground]: 9.2881e-9 kg; lognormal variance with pedigree 0.0528, pedigree (1,3,2,5,1)
  Estimation based on fuel input data and emission factors from corresponding ecoinvent fuel combustion datasets (see "Extrapolations" comment). Apart from external fuel inputs, internal fuels such as bark, black liquor, sludge, tall oil pitch, wood pellets are generated during the process and supply considerable amounts of process energy. Emissions from some internal biofuels (bark, wood pellets) are approximated with the combustion of wood chips. black liquor, sludge and tall oil pitch were not included in the emissions calculations because no specific emission profiles, e.g. for the black liquor recovery process, were available. Emissions from these internal energy generation processes are therefore only reflected in the key emission factors provided by the industry, other emissions constitute a data gap. Biogas and methanol are approximated with the combustion of natural gas, whereby CO2, CO and CH4 emissions stemming from biogas were modeled as non-fossil.
  Uncertainty: a
- Water [water, unspecified]: 0.000283675 m3; lognormal variance with pedigree 0.0423, pedigree (1,2,2,5,1)
  Data provided by industry (EPIS) 2017
  property dry mass 0 kg; name DM
  property fraction, origin: salt water 0; name fraction_origin_salt_water_Ww
  property water in wet mass 1000 kg; name WWM
  property fraction, origin: fresh water 0; name fraction_origin_fresh_water_Ww
  property fraction, origin: unspecified 1; name fraction_origin_unspecified_Ww
  property carbon content, non-fossil 0; name C_content_non_fossil
  property carbon content, fossil 0; name C_content_fossil
  property wet mass 1000 kg; name WM
- Selenium [air, urban air close to ground]: 4.64405e-11 kg; lognormal variance with pedigree 0.7426, pedigree (2,5,3,5,4)
  (same comment as for Zinc)
- Propane [air, urban air close to ground]: 1.00406e-9 kg; lognormal variance with pedigree 0.1426, pedigree (2,5,3,5,4)
  (same comment as for Zinc)
- Ethanol [air, urban air close to ground]: 1.16102e-9 kg; lognormal variance with pedigree 0.1426, pedigree (2,5,3,5,4)
  (same comment as for Zinc)
- Propionic acid [air, urban air close to ground]: 8.87832e-11 kg; lognormal variance with pedigree 0.1426, pedigree (2,5,3,5,4)
  (same comment as for Zinc)
- Particulates, < 2.5 um [air, unspecified]: 3.15977e-6 kg; lognormal variance with pedigree 0.328, pedigree (3,5,4,5,3)
  Key emission provided by industry (EPIS) 2017: Represents dust (unspecified)
- Lead [air, urban air close to ground]: 5.61156e-10 kg; lognormal variance with pedigree 0.7426, pedigree (2,5,3,5,4)
  (same comment as for Zinc)
- Hydrocarbons, aromatic [air, urban air close to ground]: 5.80697e-10 kg; lognormal variance with pedigree 0.1426, pedigree (2,5,3,5,4)
  (same comment as for Zinc)
- Mercury [air, urban air close to ground]: 7.16863e-13 kg; lognormal variance with pedigree 0.7426, pedigree (2,5,3,5,4)
  (same comment as for Zinc)
- BOD5, Biological Oxygen Demand [water, surface water]: 1.38037e-6 kg; lognormal variance with pedigree 0.0423, pedigree (1,2,2,5,1)
  Data provided by industry (EPIS) 2017
- Suspended solids, unspecified [water, surface water]: 7.42267e-6 kg; lognormal variance with pedigree 0.0423, pedigree (1,2,2,5,1)
  Data provided by industry (EPIS) 2017
- Hydrogen fluoride [air, urban air close to ground]: 1.8582e-10 kg; lognormal variance with pedigree 0.1426, pedigree (2,5,3,5,4)
  (same comment as for Zinc)
- Ammonia [air, urban air close to ground]: 3.96548e-11 kg; lognormal variance with pedigree 0.1426, pedigree (2,5,3,5,4)
  (same comment as for Zinc)
- Hydrocarbons, aliphatic, alkanes, unspecified [air, urban air close to ground]: 2.32508e-9 kg; lognormal variance with pedigree 0.1426, pedigree (2,5,3,5,4)
  (same comment as for Zinc)
- Acetic acid [air, urban air close to ground]: 2.9879e-9 kg; lognormal variance with pedigree 0.1426, pedigree (2,5,3,5,4)
  (same comment as for Zinc)
- Cobalt [air, urban air close to ground]: 1.27711e-10 kg; lognormal variance with pedigree 0.7426, pedigree (2,5,3,5,4)
  (same comment as for Zinc)
- Molybdenum [air, urban air close to ground]: 3.09603e-11 kg; lognormal variance with pedigree 0.7426, pedigree (2,5,3,5,4)
  (same comment as for Zinc)
- Iron [air, urban air close to ground]: 3.17343e-9 kg; lognormal variance with pedigree 0.7426, pedigree (2,5,3,5,4)
  (same comment as for Zinc)
- Chromium VI [air, urban air close to ground]: 1.93502e-13 kg; lognormal variance with pedigree 0.7426, pedigree (2,5,3,5,4)
  (same comment as for Zinc)
- Hydrogen sulfide [air, urban air close to ground]: 8.11423e-7 kg; lognormal variance with pedigree 0.0423, pedigree (1,2,2,5,1)
  Key emission provided by industry (EPIS) 2017. Hydrogen sulfide is expressing the total of theTRS (Total Reduced Sulphur Compounds), namely H2S, CS2, COS, C2H6S, CH4S, C2H6S2,
- Carbon monoxide, fossil [air, urban air close to ground]: 3.61208e-8 kg; lognormal variance with pedigree 0.7426, pedigree (2,5,3,5,4)
  (same comment as for Zinc)

## Sampling procedure
Weighted average of several mills providing 90% of the European capacity of unbleached kraft pulp from softwood.

## Extrapolations
This dataset is a copy of the corresponding European (RER) activity.
Industry data provided key emission factors for CO2, CO, NOx, SO2, H2S and particulates. Additional air emissions resulting from on-site energy productioni, i.e. the combustion of fuels, were calculated based on industrial heating datasets from the ecoinvent database. The following combustion processes were used:
light fuel oil: heat production, light fuel oil, at industrial furnace 1MW, Europe without Switzerland.
heavy fuel oil: heat production, heavy fuel oil, at industrial furnace 1MW, Europe without Switzerland.
hard coal: heat production, at hard coal industrial furnace 1-10MW, Europe without Switzerland.
natural gas: heat production, natural gas, at industrial furnace >100kW, Europe without Switzerland.
lignite briquettes: heat production, lignite briquette, at stove 5-15kW, Europe without Switzerland.
wood chips: heat production, wood chips from industry, at furnace 1000kW, CH
