# maize seed production, for sowing

Dataset: EcoSpold 2, unit process
Geography: GLO
Time period: 1999-01-01 to 2021-12-31
Technology level: current
Classification: ISIC rev.4 ecoinvent: 0164:Seed processing for propagation
Classification: EcoSpold01Categories: agricultural means of production/seed
Synonyms: Zea mays L.; corn
Scenario: Business-as-Usual
System model: Allocation, cut-off by classification
Share of production covered: 70 %
Generated by: Thomas Nemecek
Published in: Nemecek, T. 2007
Database: ecoinvent
isCopyrightProtected: true
accessRestrictedTo: 1

## General comment
Refers to 1 kg of maize seed (fresh weight), with a maximum water content of 12%
[This dataset was already contained in the ecoinvent database version 2. It was not individually updated during the transfer to ecoinvent version 3. Life Cycle Impact Assessment results may still have changed, as they are affected by changes in the supply chain, i.e. in other datasets. This dataset was generated following the ecoinvent quality guidelines for version 2. It may have been subject to central changes described in the ecoinvent version 3 change report (http://www.ecoinvent.org/database/ecoinvent-version-3/reports-of-changes/), and the results of the central updates were reviewed extensively. The changes added e.g. consistent water flows and other information throughout the database. The documentation of this dataset can be found in the ecoinvent reports of version 2, which are still available via the ecoinvent website. The change report linked above covers all central changes that were made during the conversion process.]

## Included activities start
This activity start with the transport to the seed processing centre.

## Included activities end
At the processing centre, treated (pre-cleaning, cleaning, eventually drying, chemical dressing (for integrated production) and bag filling), stored and afterwards transported to the regional storage centre. No data on wastewater production were available.

## Technology
Refers to average seed processing

## Time period
Date of the major data sources.

## Reference product
- maize seed, for sowing: 1 kg; name maize_seed_sowing; By-product classification allocatable product; CPC 01121: Maize (corn), seed
  production volume 5.61088e9 kg
    FAOSTAT 2011: "maize", average of the years 1999-2002. http://faostat.fao.org/. The original value was split into conventional/integrated seed (98%) and organic seed (2%), where 2% organic production is an extrapolation from Europe to the world (http://www.fao.org/docrep/004/y3557e/y3557e09.htm).
  property water content 0.136364; name maize_seed_sowing_water_content; = WWM/ DM
  property water in wet mass 0.12 kg; name WWM
  property wet mass 1 kg; name WM
  property carbon content, non-fossil 0.45263; name maize_seed_sowing_C_content_non_fossil
    biogene carbon content on a dry matter basis; Composition data obtained from Corn Grain Whole, in (http://beefmagazine.com/images/2009%20feed%20table.pdf). First, composition data were refered to 1 kg dry mass. Then, C-contents were calculated considering a C-content/dry mass of 44% in carbohydrates (including fibres), 53% in proteins and 75% in fats. All data from ecoinvent report, n 15a, pg 40, except C-content in protein, that comes from Determination of protein concentration by total organic carbon analysis, Rouwenhorst et al., 1991, J Biochem and Biophys Methods, 22:119-128.
  property price 0.286243 EUR2005; name maize_seed_sowing_price_EUR2005
    Calculated based on inputs: The price of the product has been calculated as a sum of the values of the material and energy inputs for this product. This value is therefore a rough estimation. It may underestimate the real price since there are additional expenses when producing any product. These expences can include for example labour costs, treatment of waste materials and profit for the producer. Please consider carefully whether this level of data quality is acceptable for your application.
  property dry mass 0.88 kg; name DM; = WM- WWM
  property carbon content 0.45263
    carbon content on a dry matter basis (reserved; not for manual entry)
  properties: carbon content, fossil 0, carbon allocation 0.398314 kg

## Inputs from technosphere
- electricity, low voltage: 0.058 kWh; lognormal variance with pedigree 0.1226, pedigree (5,3,5,5,1)
  See "01_crop production - seed production & processing_v1.0.pdf" - pdf-document on the dedicated talk page of ecoinvent (www.ecoinvent.org/documentation)
  EcoSpold01Location=CH
- building, multi-storey: 2e-5 m3; lognormal variance with pedigree 0.4126, pedigree (5,3,5,5,1)
  See "01_crop production - seed production & processing_v1.0.pdf" - pdf-document on the dedicated talk page of ecoinvent (www.ecoinvent.org/documentation)
  EcoSpold01Location=RER
- maize seed, at farm: 1 kg; name maize_seed_farm; lognormal variance with pedigree 0.06, pedigree (1,1,5,5,3)
  See "01_crop production - seed production & processing_v1.0.pdf" - pdf-document on the dedicated talk page of ecoinvent (www.ecoinvent.org/documentation)
  property water in wet mass 0.12 kg; name maize_seed_farm_WWM
  property water content 0.136364; name maize_seed_farm_water_content; = maize_seed_farm_WWM/ maize_seed_farm_DM
  property wet mass 1 kg; name maize_seed_farm_WM
  property dry mass 0.88 kg; name maize_seed_farm_DM; = maize_seed_farm_WM- maize_seed_farm_WWM
  property carbon content, non-fossil 0.45263; name maize_seed_farm_C_content_non_fossil
  note on carbon content, non-fossil: biogene carbon content on a dry matter basis; Composition data obtained from Corn Grain Whole, in (http://beefmagazine.com/images/2009%20feed%20table.pdf). First, composition data were refered to 1 kg dry mass. Then, C-contents were calculated considering a C-content/dry mass of 44% in carbohydrates (including fibres), 53% in proteins and 75% in fats. All data from ecoinvent report, n 15a, pg 40, except C-content in protein, that comes from Determination of protein concentration by total organic carbon analysis, Rouwenhorst et al., 1991, J Biochem and Biophys Methods, 22:119-128.
- phthalimide-compound: 0.0024 kg; lognormal variance with pedigree 0.0527, pedigree (2,2,5,5,1)
  EcoSpold01Location=CH
  See "01_crop production - seed production & processing_v1.0.pdf" - pdf-document on the dedicated talk page of ecoinvent (www.ecoinvent.org/documentation)
  properties: carbon content, fossil 0.361204, dry mass 1 kg, wet mass 1 kg
  note on carbon content, fossil: C content of Captan (C9H8Cl3NO2S) was assumed to be C content of phtalamide-compounds. Tab 10.3, ecoinvent v2.2 report 15a for classification
- drying of bread grain, seed and legumes: 0.35385 l
- packaging, for pesticides: 0.0048 kg; lognormal variance with pedigree 0.0912, pedigree (4,3,5,5,4)
  Total amount of active substance/s of pesticides needed for the production of maize seed, for sowing is calculated to be circa 2.40E-03 kg. Pesticide/s used in this dataset is/are: 'phthalimide-compound'. The total amount of active substance/s is doubled in order to account for the packaging of the dilluted product of pesticide/s that is/are applied. Therefore, 4.80E-03 kg of packaging for pesticides is justified with this exchange.
  properties: carbon content, fossil 0.85714, price 0.0642 EUR2005, dry mass 1 kg, heating value, net 25.97 MJ, wet mass 1 kg

## Inputs from nature
- Occupation, construction site [natural resource, land]: 8e-6 m2*year; lognormal variance with pedigree 0.1626, pedigree (5,3,5,5,1)
  (same comment as for maize seed, at farm)
- Transformation, to industrial area [natural resource, land]: 4e-6 m2; lognormal variance with pedigree 0.2226, pedigree (5,3,5,5,1)
  (same comment as for maize seed, at farm)
- Transformation, from unspecified [natural resource, land]: 4e-6 m2; lognormal variance with pedigree 0.2226, pedigree (5,3,5,5,1)
  (same comment as for maize seed, at farm)
- Occupation, industrial area [natural resource, land]: 0.0002 m2*year; lognormal variance with pedigree 0.1626, pedigree (5,3,5,5,1)
  (same comment as for maize seed, at farm)

## Sampling procedure
Data based on a literature, expert information and enquiry of seed processing plants.

## Extrapolations
This dataset has been extrapolated from year 2002 to the year of the calculation (2021). The uncertainty has been adjusted accordingly.
