# heat production, hard coal coke, stove 5-15kW

Dataset: EcoSpold 2, unit process
Geography: Europe without Switzerland
Time period: 1988-01-01 to 2021-12-31
Technology level: current
Classification: EcoSpold01Categories: hard coal/heating systems
Classification: ISIC rev.4 ecoinvent: 3530:Steam and air conditioning supply
Tags: ConvertedDataset
Scenario: Business-as-Usual
System model: Allocation, cut-off by classification
Generated by: Christian Bauer
Published in: Röder, A. 2004
Database: ecoinvent
isCopyrightProtected: true
accessRestrictedTo: 1

## General comment
This dataset represents the production of heat from a 5-15 kW coal stove filled with 1 MJ of hard coal coke. The lifetime of the coal stove is 30 years, which corresponds to 1600 fully load hours per year. The heating value is 28.6 MJ/kg and the efficiency factor is 70%.
[This dataset was already contained in the ecoinvent database version 2. It was not individually updated during the transfer to ecoinvent version 3. Life Cycle Impact Assessment results may still have changed, as they are affected by changes in the supply chain, i.e. in other datasets. This dataset was generated following the ecoinvent quality guidelines for version 2. It may have been subject to central changes described in the ecoinvent version 3 change report (http://www.ecoinvent.org/database/ecoinvent-version-3/reports-of-changes/), and the results of the central updates were reviewed extensively. The changes added e.g. consistent water flows and other information throughout the database. The documentation of this dataset can be found in the ecoinvent reports of version 2, which are still available via the ecoinvent website. The change report linked above covers all central changes that were made during the conversion process.]

## Included activities start
From reception of hard coal coke.

## Included activities end
This activity ends with produced heat at the coal stove filled with 1 MJ of hard coal coke. The dataset includes transport and all emissions to air as well as the ash disposal. The dataset doesn’t include emissions to water as it is assumed that the coal is stored in a covered storage area.

## Geography
German conditions.

## Technology
Average technology installed in early 1990s. The efficiency factor of a coal stove is between 50% and 70%. Since the coal stove is installed in the room to be heated, losses occur especially through the large amounts of flue gas and through incomplete combustion. An efficiency factor of 70% is assumed. Since neither ventilators nor air supply pumps are required for hot water circulation, no auxiliary energy is needed.

## Parameters
- scaling factor: 1.43 dimensionless; name scaling_factor

## Reference product
- heat, central or small-scale, other than natural gas: 1 MJ; = 0.699300699300699 * scaling_factor; CPC 17300: Steam and hot water; By-product classification allocatable product
  EcoSpold01Location=RER
  Amount was scaled to 1.
  production volume 1.16751e10 MJ; name heat_apv
    Assumption. This production volume does not represent a realistic value, but reflects the share of heat from coal sources on the market for heat, central or small-scale, other than natural gas according to http://www.iea.org/statistics/statisticssearch/report/?country=EU28&product=electricityandheat&year=2012
    See talk pages for further discussion.
    //Original comment //:
    IEA coal and Peat statistics for 2007 (http://www.iea.org/stats/coaldata.asp?COUNTRY_CODE=23 and =25), residential, commercial and agriculture. All coke in kg converted to MJ heat out by multiplying with 0.67 (conversion efficiency on a gross heating value basis) and dividing by 0.035 (kg/MJ gross heating value)
  property price 0.0106 EUR2005
    Average European district heat price from Ecoheatcool and Euroheat 2005-2006, Ecoheat Work package 1: The European heat market. Final report. 10.6 EUR/GJ i s the price of district heat. http://www.solarthermalworld.org/files/Ecoheatcool%20WP1%20Web.pdf?download
  properties: Corresponding fuel use 1.43 MJ, heating value, net 1 MJ

## Inputs from technosphere
- coke: 1.43 MJ; = 1 * scaling_factor; source DGMK-Arbeitskreis 1992; lognormal variance with pedigree 0.0582, pedigree (4,2,5,3,1)
  Estimation. From a small selection of analysis an arithmetic value is derived to calculate the composition of hard coal briquettes. The caloric value is 28.6 MJ/kg, the bulk density is 480-580 kg/m3, the water content is 6% and the ash content is 10%. Further values are 81.7% of carbonates, 0.9% of nitrogen, 0.7% of sulfur, 0.04% of chlorine, 0.005% of flour.
  Further references:
  Fritsche U., Leuchtner J., Matthes F.C., Rausch L., Simon K.-H. (1992) Umweltanalyse von Energie-, Transport- und Stoffsystemen: Gesamt-Emissions-Modell Integrierter Systeme (GEMIS) Version 2.0. Darmstadt/Kassel.
  Fritsche U., Matthes F.C. (1992) Analyse von Datenbasen zu klimarelevanten Emissionen in der Bundesrepublik Deutschland. Berlin/Darmstadt/Deutschland.
  Hausen H. (Hsrg.) (1972) Thermodynamische Eigenschaften von Gemischen, Verbrennung, Wärmeübertragung. IV. Band Technik, 4. Teil, 6. Auflage, Berlin.
  Ratajczak E.-A. (1987) Emissionsmessungen an kohlegefeuerten Hausbrandfeuerstätten, insbesondere im Hinblick auf gesundheitsgefährdende Abgasbestandteile. Band 1-3, Im Auftrag des UBA Berlin, Essen.
  Amount was scaled to the amount of reference product.
  EcoSpold01Location=RER
  Uncertainty: fuel input
  properties: heating value, net 28.6 MJ, wet mass 0.034965 kg, water content 0.0638298, dry mass 0.0328671 kg, carbon content, fossil 0.869149
  note on carbon content, fossil: 81.7% C and 6% water in wet mass (ecoinvent v2.1 report 6_VI Table 7.1)
- coal stove, 5-15kW: 8.2797e-7 unit; = 5.79E-07 * scaling_factor; lognormal variance with pedigree 0.3513, pedigree (2,3,5,3,1)
  EcoSpold01Location=RER
  Amount was scaled to the amount of reference product.
  Uncertainty: infrastructure
- hard coal ash: -0.005863 kg; name hard_coal_ash; = (0.0041 * scaling_factor)*-1; source Ruhrkohle 1987; lognormal variance with pedigree 0.1101, pedigree (5,1,5,3,1)
  EcoSpold01Location=PL
  Estimation. It is assumed that 100% of the ash is disposed. The ash content is 10%. The density of dry ash is 400 to 650 kg/m3.
  Amount was scaled to the amount of reference product.
  Uncertainty: assumption: no reuse
  production volume 6.8451e7 kg; = heat_apv*hard_coal_ash
    Calculated from the production volume of hard coal coke, burned in stove 5-15kW in proportion to the respective output amounts.
  property price 0 EUR2005; name hard_coal_ash_price_EUR2005
  properties: dry mass 1 kg, wet mass 1 kg

## Emissions to nature
- Sulfur dioxide [air, urban air close to ground]: 0.0006292 kg; = 0.00044 * scaling_factor; lognormal variance with pedigree 0.0761, pedigree (4,5,5,3,1)
  Modeled, based on “heat production, coal, emissions to air” - pdf-document on the dedicated talk page of ecoinvent (www.ecoinvent.org/documentation). The emission data are taken from the literature reporting measurements performed at the end of the 1980s in Germany and are based on the composition of the coal.
  Amount was scaled to the amount of reference product.
  Uncertainty: from S-balance
- Silicon [air, urban air close to ground]: 2.2594e-5 kg; = 1.58E-05 * scaling_factor; lognormal variance with pedigree 0.7261, pedigree (4,5,5,3,1)
  Modeled, based on “heat production, coal, emissions to air” - pdf-document on the dedicated talk page of ecoinvent (www.ecoinvent.org/documentation). Emissions of trace elements were calculated using the ash content in the coal and average transfer coefficients for coal power plants with ash retention of 98 %.
  Amount was scaled to the amount of reference product.
  Uncertainty: from trace element balance; see report for details
- Hydrogen sulfide [air, urban air close to ground]: 1.43e-6 kg; = 1E-06 * scaling_factor; lognormal variance with pedigree 0.0913, pedigree (2,3,5,3,1)
  Modeled, based on “heat production, coal, emissions to air” - pdf-document on the dedicated talk page of ecoinvent (www.ecoinvent.org/documentation). The emission data are taken from the literature reporting measurements performed at the end of the 1980s in Germany and are based on the composition of the coal.
  Amount was scaled to the amount of reference product.
  Uncertainty: typical value
- Mercury [air, urban air close to ground]: 4.8048e-9 kg; = 3.36E-09 * scaling_factor; lognormal variance with pedigree 0.7261, pedigree (4,5,5,3,1)
  (same comment as for Silicon)
- Propene [air, urban air close to ground]: 3.575e-7 kg; = 2.5E-07 * scaling_factor; lognormal variance with pedigree 0.0913, pedigree (2,3,5,3,1)
  Modeled, based on “heat production, coal, emissions to air” - pdf-document on the dedicated talk page of ecoinvent (www.ecoinvent.org/documentation). The emission data are taken from the literature reporting measurements performed at the end of the 1980s in Germany and are based on the composition of the coal.
  Amount was scaled to the amount of reference product.
  Uncertainty: total NMVOC and profile estimate
- Uranium [air, urban air close to ground]: 2.574e-9 kg; = 1.8E-09 * scaling_factor; lognormal variance with pedigree 0.7261, pedigree (4,5,5,3,1)
  (same comment as for Silicon)
- Zinc [air, urban air close to ground]: 2.2594e-7 kg; = 1.58E-07 * scaling_factor; lognormal variance with pedigree 0.7261, pedigree (4,5,5,3,1)
  (same comment as for Silicon)
- Benzene [air, urban air close to ground]: 3.575e-7 kg; = 2.5E-07 * scaling_factor; lognormal variance with pedigree 0.0913, pedigree (2,3,5,3,1)
  (same comment as for Propene)
- Molybdenum [air, urban air close to ground]: 3.861e-9 kg; = 2.7E-09 * scaling_factor; lognormal variance with pedigree 0.7261, pedigree (4,5,5,3,1)
  (same comment as for Silicon)
- Lead [air, urban air close to ground]: 1.5444e-7 kg; = 1.08E-07 * scaling_factor; lognormal variance with pedigree 0.7261, pedigree (4,5,5,3,1)
  (same comment as for Silicon)
- Radon-222 [air, urban air close to ground]: 1.43e-6 kBq; = 1E-06 * scaling_factor; lognormal variance with pedigree 0.7261, pedigree (4,5,5,3,1)
  Modeled, based on “heat production, coal, emissions to air” - pdf-document on the dedicated talk page of ecoinvent (www.ecoinvent.org/documentation). From radioactivity of the elements.
  Amount was scaled to the amount of reference product.
  Uncertainty: from radioactivity of the elements; see report for details
- Xylene [air, urban air close to ground]: 7.15e-8 kg; = 5E-08 * scaling_factor; lognormal variance with pedigree 0.0913, pedigree (2,3,5,3,1)
  (same comment as for Propene)
- Lead-210 [air, urban air close to ground]: 6.6495e-5 kBq; = 4.65E-05 * scaling_factor; lognormal variance with pedigree 0.7261, pedigree (4,5,5,3,1)
  (same comment as for Radon-222)
- Ethyne [air, urban air close to ground]: 3.575e-7 kg; = 2.5E-07 * scaling_factor; lognormal variance with pedigree 0.0913, pedigree (2,3,5,3,1)
  (same comment as for Propene)
- Boron [air, urban air close to ground]: 8.008e-7 kg; = 5.6E-07 * scaling_factor; lognormal variance with pedigree 0.7261, pedigree (4,5,5,3,1)
  (same comment as for Silicon)
- Radium-228 [air, urban air close to ground]: 9.295e-5 kBq; = 6.5E-05 * scaling_factor; lognormal variance with pedigree 0.7261, pedigree (4,5,5,3,1)
  (same comment as for Radon-222)
- Uranium-238 [air, urban air close to ground]: 1.43e-5 kBq; = 1E-05 * scaling_factor; lognormal variance with pedigree 0.7261, pedigree (4,5,5,3,1)
  (same comment as for Radon-222)
- Vanadium [air, urban air close to ground]: 5.148e-8 kg; = 3.6E-08 * scaling_factor; lognormal variance with pedigree 0.7261, pedigree (4,5,5,3,1)
  (same comment as for Silicon)
- Scandium [air, urban air close to ground]: 1.8018e-9 kg; = 1.26E-09 * scaling_factor; lognormal variance with pedigree 0.7261, pedigree (4,5,5,3,1)
  (same comment as for Silicon)
- Potassium-40 [air, urban air close to ground]: 1.9305e-5 kBq; = 1.35E-05 * scaling_factor; lognormal variance with pedigree 0.7261, pedigree (4,5,5,3,1)
  (same comment as for Radon-222)
- Antimony [air, urban air close to ground]: 2.574e-9 kg; = 1.8E-09 * scaling_factor; lognormal variance with pedigree 0.7261, pedigree (4,5,5,3,1)
  (same comment as for Silicon)
- Titanium [air, urban air close to ground]: 5.4197e-7 kg; = 3.79E-07 * scaling_factor; lognormal variance with pedigree 0.7261, pedigree (4,5,5,3,1)
  (same comment as for Silicon)
- Tin [air, urban air close to ground]: 9.0376e-10 kg; = 6.32E-10 * scaling_factor; lognormal variance with pedigree 0.7261, pedigree (4,5,5,3,1)
  (same comment as for Silicon)
- Nitrogen oxides [air, urban air close to ground]: 8.58e-5 kg; = 6E-05 * scaling_factor; lognormal variance with pedigree 0.0913, pedigree (2,3,5,3,1)
  (same comment as for Hydrogen sulfide)
- Barium [air, urban air close to ground]: 1.287e-7 kg; = 9E-08 * scaling_factor; lognormal variance with pedigree 0.7261, pedigree (4,5,5,3,1)
  (same comment as for Silicon)
- Chromium VI [air, urban air close to ground]: 1.287e-10 kg; = 9E-11 * scaling_factor; lognormal variance with pedigree 0.52, pedigree (1,1,5,1,1)
  Modeled, based on “heat production, coal, emissions to air” - pdf-document on the dedicated talk page of ecoinvent (www.ecoinvent.org/documentation). The emission data are taken from the literature reporting measurements performed at the end of the 1980s in Germany and are based on the composition of the coal.
  Amount was scaled to the amount of reference product.
- Hydrocarbons, aliphatic, unsaturated [air, urban air close to ground]: 3.575e-7 kg; = 2.5E-07 * scaling_factor; lognormal variance with pedigree 0.0913, pedigree (2,3,5,3,1)
  (same comment as for Propene)
- Dinitrogen monoxide [air, urban air close to ground]: 2.145e-6 kg; = 1.5E-06 * scaling_factor; lognormal variance with pedigree 0.0913, pedigree (2,3,5,3,1)
  (same comment as for Hydrogen sulfide)
- Thorium-228 [air, urban air close to ground]: 7.865e-6 kBq; = 5.5E-06 * scaling_factor; lognormal variance with pedigree 0.7261, pedigree (4,5,5,3,1)
  (same comment as for Radon-222)
- Selenium [air, urban air close to ground]: 1.28414e-8 kg; = 8.98E-09 * scaling_factor; lognormal variance with pedigree 0.7261, pedigree (4,5,5,3,1)
  (same comment as for Silicon)
- Sodium [air, urban air close to ground]: 9.0376e-7 kg; = 6.32E-07 * scaling_factor; lognormal variance with pedigree 0.7261, pedigree (4,5,5,3,1)
  (same comment as for Silicon)
- Propane [air, urban air close to ground]: 7.15e-7 kg; = 5E-07 * scaling_factor; lognormal variance with pedigree 0.0913, pedigree (2,3,5,3,1)
  (same comment as for Propene)
- Benzo(a)pyrene [air, urban air close to ground]: 1.43e-10 kg; = 1E-10 * scaling_factor; lognormal variance with pedigree 0.0913, pedigree (2,3,5,3,1)
  (same comment as for Propene)
- Toluene [air, urban air close to ground]: 7.15e-8 kg; = 5E-08 * scaling_factor; lognormal variance with pedigree 0.0913, pedigree (2,3,5,3,1)
  (same comment as for Propene)
- Hydrocarbons, aliphatic, alkanes, unspecified [air, urban air close to ground]: 3.575e-7 kg; = 2.5E-07 * scaling_factor; lognormal variance with pedigree 0.0913, pedigree (2,3,5,3,1)
  (same comment as for Propene)
- Chromium [air, urban air close to ground]: 1.27413e-8 kg; = 8.91E-09 * scaling_factor; lognormal variance with pedigree 0.7261, pedigree (4,5,5,3,1)
  (same comment as for Silicon)
- Iodine [air, urban air close to ground]: 1.6302e-8 kg; = 1.14E-08 * scaling_factor; lognormal variance with pedigree 0.7261, pedigree (4,5,5,3,1)
  (same comment as for Silicon)
- Magnesium [air, urban air close to ground]: 5.4197e-6 kg; = 3.79E-06 * scaling_factor; lognormal variance with pedigree 0.7261, pedigree (4,5,5,3,1)
  (same comment as for Silicon)
- Manganese [air, urban air close to ground]: 4.5045e-8 kg; = 3.15E-08 * scaling_factor; lognormal variance with pedigree 0.7261, pedigree (4,5,5,3,1)
  (same comment as for Silicon)
- Radon-220 [air, urban air close to ground]: 1.43e-6 kBq; = 1E-06 * scaling_factor; lognormal variance with pedigree 0.7261, pedigree (4,5,5,3,1)
  (same comment as for Radon-222)
- Copper [air, urban air close to ground]: 2.2165e-8 kg; = 1.55E-08 * scaling_factor; lognormal variance with pedigree 0.7261, pedigree (4,5,5,3,1)
  (same comment as for Silicon)
- Cobalt [air, urban air close to ground]: 6.435e-9 kg; = 4.5E-09 * scaling_factor; lognormal variance with pedigree 0.7261, pedigree (4,5,5,3,1)
  (same comment as for Silicon)
- Phosphorus [air, urban air close to ground]: 9.0376e-8 kg; = 6.32E-08 * scaling_factor; lognormal variance with pedigree 0.7261, pedigree (4,5,5,3,1)
  (same comment as for Silicon)
- Hydrogen chloride [air, urban air close to ground]: 2.1736e-5 kg; = 1.52E-05 * scaling_factor; lognormal variance with pedigree 0.1161, pedigree (4,5,5,3,1)
  (same comment as for Silicon)
- Aluminium [air, urban air close to ground]: 1.5301e-5 kg; = 1.07E-05 * scaling_factor; lognormal variance with pedigree 0.7261, pedigree (4,5,5,3,1)
  (same comment as for Silicon)
- Bromine [air, urban air close to ground]: 1.35564e-8 kg; = 9.48E-09 * scaling_factor; lognormal variance with pedigree 0.7261, pedigree (4,5,5,3,1)
  (same comment as for Silicon)
- Thorium-232 [air, urban air close to ground]: 5.005e-6 kBq; = 3.5E-06 * scaling_factor; lognormal variance with pedigree 0.7261, pedigree (4,5,5,3,1)
  (same comment as for Radon-222)
- NMVOC, non-methane volatile organic compounds, unspecified origin [air, urban air close to ground]: 1.0725e-6 kg; = 7.5E-07 * scaling_factor; lognormal variance with pedigree 0.0913, pedigree (2,3,5,3,1)
  (same comment as for Propene)
- Carbon monoxide, fossil [air, urban air close to ground]: 0.00715 kg; = 0.005 * scaling_factor; lognormal variance with pedigree 0.6913, pedigree (2,3,5,3,1)
  (same comment as for Hydrogen sulfide)
- Ethene [air, urban air close to ground]: 2.145e-6 kg; = 1.5E-06 * scaling_factor; lognormal variance with pedigree 0.0913, pedigree (2,3,5,3,1)
  (same comment as for Propene)
- Thorium [air, urban air close to ground]: 2.0592e-9 kg; = 1.44E-09 * scaling_factor; lognormal variance with pedigree 0.7261, pedigree (4,5,5,3,1)
  (same comment as for Silicon)
- Ethane [air, urban air close to ground]: 1.0725e-6 kg; = 7.5E-07 * scaling_factor; lognormal variance with pedigree 0.0913, pedigree (2,3,5,3,1)
  (same comment as for Propene)
- Cadmium [air, urban air close to ground]: 2.2594e-9 kg; = 1.58E-09 * scaling_factor; lognormal variance with pedigree 0.7261, pedigree (4,5,5,3,1)
  (same comment as for Silicon)
- Dioxins, measured as 2,3,7,8-tetrachlorodibenzo-p-dioxin [air, urban air close to ground]: 7.15e-13 kg; = 5E-13 * scaling_factor; lognormal variance with pedigree 0.3513, pedigree (2,3,5,3,1)
  (same comment as for Chromium VI)
- Nickel [air, urban air close to ground]: 4.2471e-8 kg; = 2.97E-08 * scaling_factor; lognormal variance with pedigree 0.7261, pedigree (4,5,5,3,1)
  (same comment as for Silicon)
- Carbon dioxide, fossil [air, urban air close to ground]: 0.13585 kg; = 0.095 * scaling_factor; lognormal variance with pedigree 0.0408, pedigree (2,2,5,3,1)
  Modeled, based on “heat production, coal, emissions to air” - pdf-document on the dedicated talk page of ecoinvent (www.ecoinvent.org/documentation). The emission data are taken from the literature reporting measurements performed at the end of the 1980s in Germany and are based on the composition of the coal.
  Amount was scaled to the amount of reference product.
  Uncertainty: from carbon balance
- Hydrogen fluoride [air, urban air close to ground]: 2.5311e-6 kg; = 1.77E-06 * scaling_factor; lognormal variance with pedigree 0.1161, pedigree (4,5,5,3,1)
  (same comment as for Silicon)
- Strontium [air, urban air close to ground]: 1.9305e-7 kg; = 1.35E-07 * scaling_factor; lognormal variance with pedigree 0.7261, pedigree (4,5,5,3,1)
  (same comment as for Silicon)
- Formaldehyde [air, urban air close to ground]: 1.43e-7 kg; = 1E-07 * scaling_factor; lognormal variance with pedigree 0.0913, pedigree (2,3,5,3,1)
  (same comment as for Propene)
- Arsenic [air, urban air close to ground]: 3.8038e-8 kg; = 2.66E-08 * scaling_factor; lognormal variance with pedigree 0.7261, pedigree (4,5,5,3,1)
  (same comment as for Silicon)
- Particulates, > 10 um [air, urban air close to ground]: 5.005e-5 kg; = 3.5E-05 * scaling_factor; lognormal variance with pedigree 0.1161, pedigree (4,5,5,3,1)
  Modeled, based on “heat production, coal, emissions to air” - pdf-document on the dedicated talk page of ecoinvent (www.ecoinvent.org/documentation). Size distribution of particles has been estimated on the basis of recent information from U.S. Environmental Protection Agency (EPA).
  Amount was scaled to the amount of reference product.
  Uncertainty: total PM and profile estimates
- Particulates, < 2.5 um [air, urban air close to ground]: 7.15e-6 kg; = 5E-06 * scaling_factor; lognormal variance with pedigree 0.3761, pedigree (4,5,5,3,1)
  (same comment as for Particulates, > 10 um)
- Polonium-210 [air, urban air close to ground]: 0.00012155 kBq; = 8.5E-05 * scaling_factor; lognormal variance with pedigree 0.7261, pedigree (4,5,5,3,1)
  (same comment as for Radon-222)
- Methane, fossil [air, urban air close to ground]: 2.145e-5 kg; = 1.5E-05 * scaling_factor; lognormal variance with pedigree 0.0913, pedigree (2,3,5,3,1)
  (same comment as for Hydrogen sulfide)
- Calcium [air, urban air close to ground]: 1.8018e-6 kg; = 1.26E-06 * scaling_factor; lognormal variance with pedigree 0.7261, pedigree (4,5,5,3,1)
  (same comment as for Silicon)
- Radium-226 [air, urban air close to ground]: 1.716e-5 kBq; = 1.2E-05 * scaling_factor; lognormal variance with pedigree 0.7261, pedigree (4,5,5,3,1)
  (same comment as for Radon-222)
- Phenol [air, urban air close to ground]: 7.15e-8 kg; = 5E-08 * scaling_factor; lognormal variance with pedigree 0.0913, pedigree (2,3,5,3,1)
  (same comment as for Propene)
- Potassium [air, urban air close to ground]: 1.8018e-6 kg; = 1.26E-06 * scaling_factor; lognormal variance with pedigree 0.7261, pedigree (4,5,5,3,1)
  (same comment as for Silicon)
- Beryllium [air, urban air close to ground]: 1.8018e-9 kg; = 1.26E-09 * scaling_factor; lognormal variance with pedigree 0.7261, pedigree (4,5,5,3,1)
  (same comment as for Silicon)
- Thallium [air, urban air close to ground]: 2.2594e-9 kg; = 1.58E-09 * scaling_factor; lognormal variance with pedigree 0.7261, pedigree (4,5,5,3,1)
  (same comment as for Silicon)
- Particulates, > 2.5 um, and < 10um [air, urban air close to ground]: 1.43e-5 kg; = 1E-05 * scaling_factor; lognormal variance with pedigree 0.1961, pedigree (4,5,5,3,1)
  (same comment as for Particulates, > 10 um)
- Iron [air, urban air close to ground]: 6.3206e-6 kg; = 4.42E-06 * scaling_factor; lognormal variance with pedigree 0.7261, pedigree (4,5,5,3,1)
  (same comment as for Silicon)

## Sampling procedure
Based on literature data.

## Extrapolations
This dataset has been extrapolated from year 1992 to the year of the calculation (2021). The uncertainty has been adjusted accordingly.

## Review by Roland Hischier 2011-09-23
Tansfer of documentation done.

## Review by Hans-Jörg Althaus 2005-07-19
passed
