# cable yarder production, trailer-mounted

Dataset: EcoSpold 2, unit process
Geography: GLO
Time period: 2012-01-01 to 2021-12-31
Technology level: current
Classification: ISIC rev.4 ecoinvent: 2821:Manufacture of agricultural and forestry machinery
Synonyms: tower yarder
Tags: Swiss Brushup completed
Scenario: Business-as-Usual
System model: Allocation, cut-off by classification
Generated by: Frank Werner
Published in: Spielmann, M. 2007
Database: ecoinvent
isCopyrightProtected: true
accessRestrictedTo: 1

## Included activities start
The activity starts with the semi-finished products and raw materials at the factory gate.

## Included activities end
The inventory accounts for the input and disposal of all materials, their (pre-) processing and the energy required for the production and maintenance of the forest machinery represented by this dataset. In addition, material for and emissions from disassembly are included.
Infrastructure for the production and maintenance of the machinery is inventoried as a rough guess from lorry production.
The dataset does not contain fuel consumption or related emissions. These issues are inventoried in the respective dataset on the operation of the machinery.

## Geography
The inventories apply to the production in Northern/Central Europe

## Parameters
- weight of the vehicle: 13500 kg/unit; name vehicle_weight; lognormal variance with pedigree 0.25, pedigree (1,1,1,1,1)
- lifetime of machine, productive machine hours: 17000 hour; name total_PMH; lognormal variance with pedigree 0.1042, pedigree (3,4,2,1,1)
  Oral personal communication, P. Wiss, Präsident des Verbandes Forstunternehmer Schweiz
- maintenance factor: 0.55 dimensionless; name maintenance_factor; lognormal variance with pedigree 0.1048, pedigree (3,4,2,1,2)
  estimated from Spielmann et al. 2007
- maintenance factor, cable: 2 dimensionless; name MF_cable; lognormal variance with pedigree 0.252, pedigree (3,1,1,1,1)

## Reference product
- mobile cable yarder, trailer-mounted: 1 unit; CPC 441: Agricultural or forestry machinery and parts thereof; By-product classification allocatable product
  production volume 5000 unit; name p_machinery
    unqualified guess, no information available
  property lifetime capacity [h] 17000 hour; = total_PMH
    Total of operation hours expected; in case of forest machinery: total of productive machine hours.
  property price 20274.9 EUR2005
    Calculated based on inputs: The price of the product has been calculated as a sum of the values of the material and energy inputs for this product. This value is therefore a rough estimation. It may underestimate the real price since there are additional expenses when producing any product. These expences can include for example labour costs, treatment of waste materials and profit for the producer. Please consider carefully whether this level of data quality is acceptable for your application.
  property lifetime 9.65909 year; name lifetime; = total_PMH/8/220
    total productive machine hours divided by 8 hour/day divided by 220 working days/yera

## By-products
- scrap lead acid battery: 0 kg; source Spielmann, M. 2007; By-product classification Recyclable; CPC 39364: Waste and scrap of lead; pedigree (1,1,1,1,1)
  production volume 0 kg; = p_machinery*w_lead
    Calculated from production volume of reference product using the relative outputs.
  property price 0 EUR2005; name w_lead_price_EUR2005
    Assumed without economic value

## Inputs from technosphere
- lead: 81 kg; name m_lead; source Spielmann, M. 2007; lognormal variance with pedigree 0.235, pedigree (5,5,5,5,5)
  for battery; data from reference for harvester
  properties: UVEK_link_1 2778, UVEK_relative_amount_1 1, dry mass 1 kg, wet mass 1 kg
  note on UVEK_link_1: to be used only in special submissions in coordination with ecoinvent and the Swiss FOEN.
- waste bulk iron, excluding reinforcement: 0 kg; name w_bulk_iron; source Spielmann, M. 2007; pedigree (1,1,1,1,1)
  production volume 0 kg
    Calculated from production volume of reference product using the relative outputs.
  property dry mass 1 kg; name w_bulk_iron_DM
  properties: wet mass 1 kg
- oxygen, liquid: 0 kg; source Spielmann, M. 2007; pedigree (1,1,1,1,1)
  used during disassembly
  properties: wet mass 1 kg, UVEK_link_1 3319, UVEK_relative_amount_1 1, dry mass 1 kg
- steel, chromium steel 18/8, hot rolled: 13.95 kg; name m_chromium_steel; = (1+maintenance_factor)*9; source Spielmann, M. 2007; lognormal variance with pedigree 0.235, pedigree (5,5,5,5,5)
  total material input for production and maintenance (estimated via default factor); the amount of material used in production is calculated from reference as the value for the truck.
  properties: UVEK_relative_amount_2 1, dry mass 1 kg, UVEK_link_2 2662, UVEK_link_1 451, wet mass 1 kg, carbon content, fossil 0.0008, UVEK_relative_amount_1 1
  note on carbon content, fossil: Stainless steel model is the grade 304 steel (18/8 stainless, 18% chromium 8% nickel; max. 0.08% C)
- synthetic rubber: 279 kg; name m_rubber; = 61+218; source Spielmann, M. 2007; lognormal variance with pedigree 0.235, pedigree (5,5,5,5,5)
  rubber sealings and tubes (data for truck from reference) plus rubber tyres (production and mantenance; data for tyres from reference for harvester)
  property carbon content, fossil 0.871949; name C_content_fossil_rubber
  properties: UVEK_link_1 4277, dry mass 1 kg, UVEK_relative_amount_1 1, heating value, net 26.42 MJ, wet mass 1 kg
  note on carbon content, fossil: EPDM (Ethylene-propene-diene terpolymer) rubber is a terpolymer of ethylene, propene, and a diene with the residual unsaturated portion of the diene in the side chain (ecoinvent v2.2 report 7-part XX & Ullmann). Chemical formula (deduced from Evidences of Solvent-Induced Miscibility in Polychloroprene-co-Ethylene-Propene Diene Terpolymer Blends, Dubey et al., Journal of Applied Polymer Science, 2009, 111:1884-1891): C20H35
- tap water: 28191.4 kg; name m_tap_water; = (1+maintenance_factor)*18188; source Spielmann, M. 2007; lognormal variance with pedigree 0.235, pedigree (5,5,5,5,5)
  total water input for production and maintenance (estimated via default factor); the amount of water used in production is extrapolated from reference (value for the truck) via total weight of the machine
  property carbon content, non-fossil 0; name C_content_non_fossil
  property carbon content, fossil 0.00178991; name C_content_fossil
  properties: water content 2962.17, wet mass 1 kg, UVEK_link_1 4285, UVEK_relative_amount_1 1, dry mass 0.000337476 kg
- aluminium, cast alloy: 542.5 kg; name m_aluminium; = (1+maintenance_factor)*350; source Spielmann, M. 2007; lognormal variance with pedigree 0.235, pedigree (5,5,5,5,5)
  (same comment as for steel, chromium steel 18/8, hot rolled)
  properties: UVEK_link_1 162, dry mass 1 kg, UVEK_relative_amount_1 1, wet mass 1 kg
- road vehicle factory: 8.73e-7 unit; source Spielmann M. 2007; lognormal variance with pedigree 0.76, pedigree (5,5,5,5,5)
  no specific information available; proxy as for production of lorry 16 t/28 t
  properties: UVEK_relative_amount_1 1, UVEK_link_1 3829
- acetylene: 0 kg; name m_acethylene; source Spielmann, M. 2007; pedigree (1,1,1,1,1)
  used during disassembly
  property dry mass 1 kg; name m_acethylene_DM
  property carbon content, fossil 0.923077; name C_content_fossil_acetylene
  property wet mass 1 kg; name m_acethylene_WM
  properties: UVEK_relative_amount_1 1, UVEK_link_1 101, heating value, net 51.2 MJ
  note on heating value, net: Based on literature, page 25 (Value may refer to HHV), Althaus H.-J., Chudacoff M., Hischier R., Jungbluth N., Osses M. and Primas A. (2007) Life Cycle Inventories of Chemicals. Final report ecoinvent data v2.0 No. 8. EMPA, Swiss Centre for Life Cycle Inventories, Dübendorf, CH, Online-Version under: www.ecoinvent.org.
- steel, low-alloyed: 11368.7 kg; name m_steel_unalloyed; = (1+maintenance_factor)*3970+m_cables; source Spielmann, M. 2007; lognormal variance with pedigree 0.235, pedigree (5,5,5,5,5)
  (same comment as for steel, chromium steel 18/8, hot rolled)
  properties: UVEK_relative_amount_1 1, dry mass 1 kg, wet mass 1 kg, carbon content, fossil 0.005, UVEK_link_1 4222
  note on carbon content, fossil: Low alloyed steel composition given in Tab. 3.2 ecoinvent v2.2 report 10_partII. Steel assumed to have a C content of 0.5%
  note on UVEK_link_1: Supposted to link to a DS for unalloyed steel (not to low-alloyed steel)
- electronics, for control units: 49 kg; name m_electronics; source Spielmann, M. 2007; lognormal variance with pedigree 0.235, pedigree (5,5,5,5,5)
  (same comment as for steel, chromium steel 18/8, hot rolled)
  property water in wet mass 0 kg; name WWM
  property water content 0; name water_content
  property carbon content, fossil 0.337146; name C_content_fossil_electronics
  property dry mass 1 kg; name m_electronics_DM
  property carbon content, non-fossil 0.00013442; name C_content_non_fossil_electronics
  property wet mass 1 kg; name m_electronics_WM
  properties: UVEK_link_1 2021, UVEK_relative_amount_1 1
- wire drawing, steel: 5215.2 kg; name m_cables; = (1*600*2.02+1*600*0.602+1*1200*0.502+4*80*1.35)*MF_cable; lognormal variance with pedigree 0.235, pedigree (5,5,5,5,5)
  cables: skyline: 1 piece, lenght: 600 m, thickness: 22 mm, weight: 2.02 kg/m; mainline: 4 pieces, lenght: 80 m, thickness: 12 mm, weight: 0.602 kg/m; third line: 1 piece, lenght: 1200 m, thickness: 11 mm, weight: 0.502 kg/m; guy lines for anchoring: 4 piece,s lenght: 80 m, thickness: 18 mm, weight: 1.35 kg/m. The replacement of the cables is considered via a separate maintenance factor
  properties: UVEK_link_1 4896, UVEK_relative_amount_1 1
- copper, cathode: 49 kg; name m_copper; source Spielmann, M. 2007; lognormal variance with pedigree 0.235, pedigree (5,5,5,5,5)
  (same comment as for steel, chromium steel 18/8, hot rolled)
  properties: UVEK_link_1 595, UVEK_relative_amount_1 1, dry mass 1 kg, wet mass 1 kg
  note on UVEK_link_1: Should rather link to a consumption mix (or at least to a production mix, including copper from secondary sources)
- injection moulding: 542.5 kg; = m_PP; source Spielmann, M. 2007; lognormal variance with pedigree 0.23, pedigree (5,5,5,5,5)
  properties: UVEK_link_1 2701, UVEK_relative_amount_1 1
- cast iron: 4800 kg; name m_cast_iron; source Spielmann, M. 2007; lognormal variance with pedigree 0.235, pedigree (5,5,5,5,5)
  (same comment as for steel, chromium steel 18/8, hot rolled)
  property dry mass 1 kg; name m_cast_iron_DM
  property carbon content, fossil 0.04; name C_content_fossil_cast_iron
  property wet mass 1 kg; name m_cast_iron_WM
  properties: UVEK_link_1 401, UVEK_relative_amount_1 1
- polypropylene, granulate: 542.5 kg; name m_PP; = (1+maintenance_factor)*350; source Spielmann, M. 2007; lognormal variance with pedigree 0.235, pedigree (5,5,5,5,5)
  Total material input for production and maintenance (estimated via default factor); the amount of material used in production is calculated from reference as the value for the truck.
  property carbon content, fossil 0.857143; name C_content_fossil_PP
  properties: dry mass 1 kg, UVEK_link_1 3548, heating value, net 32.78 MJ, UVEK_relative_amount_1 1, wet mass 1 kg
  note on carbon content, fossil: Polypropylene is formed by the polymerisation of propylene, C3H6 (ecoinvent v2.2 report 11_II)
  note on heating value, net: Value extracted from "treatment of waste polypropylene, open burning"
- electricity, medium voltage: 29333.8 kWh; = (1+maintenance_factor)*18925; source Spielmann, M. 2007; lognormal variance with pedigree 0.235, pedigree (5,5,5,5,5)
  total electricity input for production and maintenance (estimated via default factor); the amount of electricity used in production is extrapolated from reference (value for the truck) via total weight of the machine
  properties: UVEK_relative_amount_1 1, UVEK_link_1 1785
- scrap steel: 0 kg; name w_scrap_steel; source Spielmann, M. 2007; pedigree (1,1,1,1,1)
  used for chromium steel, for which no specific dataset is available (15.09.2012)
  production volume 0 kg
    Calculated from production volume of reference product using the relative outputs.
  property dry mass 1 kg; name w_chromium_steel_DM
  properties: wet mass 1 kg
- heat, district or industrial, natural gas: 58447.4 MJ; = (1+maintenance_factor)*37708; source Spielmann, M. 2007; lognormal variance with pedigree 0.235, pedigree (5,5,5,5,5)
  total heat input for production and maintenance (estimated via default factor); the amount of heat used in production is extrapolated from reference (value for the truck) via total weight of the machine
  properties: heating value, net 1 MJ, UVEK_relative_amount_1 1, UVEK_link_1 2580
  note on UVEK_link_1: From a principal point of view, linking to a dataset representing a technology mix would be preferable.
- waste electric and electronic equipment: -49 kg; name w_electronics; = (m_electronics)*-1; source Spielmann, M. 2007; lognormal variance with pedigree 0.203, pedigree (4,5,5,5,5)
  production volume 245000 kg; = p_machinery*w_electronics
    Calculated from production volume of reference product using the relative outputs.
  property dry mass 1 kg; name w_electronics_DM
  property carbon content, fossil 0.337146; name w_electronics_C_content_fossil; = C_content_fossil_electronics
  property carbon content, non-fossil 0.00013442; name w_electronics_C_content_non_fossil; = C_content_non_fossil_electronics
  properties: UVEK_relative_amount_1 -1, UVEK_link_1 928, wet mass 1 kg
- steel, low-alloyed, hot rolled: 1390.35 kg; name m_steel_low_alloyed; = (1+maintenance_factor)*897; source Spielmann, M. 2007; lognormal variance with pedigree 0.235, pedigree (5,5,5,5,5)
  total material input for production and maintenance (estimated via default factor); the amount of material used in production is calculated as the difference from the weight of all material inputs and the total weight of the machinery (excluding cables)
  properties: UVEK_link_2 2662, carbon content, fossil 0.005, wet mass 1 kg, UVEK_link_9 4433, UVEK_link_8 4417, dry mass 1 kg, UVEK_link_1 4222, UVEK_relative_amount_2 1, UVEK_relative_amount_1 1, UVEK_relative_amount_8 0.970944, UVEK_relative_amount_9 4.27215
  note on UVEK_link_9: This link has been introduced to model transport specifically for the SAM model; to be used only in special submissions in coordination with ecoinvent and the Swiss FOEN.
  note on UVEK_relative_amount_8: scaling factor = amount of transport in corresponding KBOB dataset/amount of this input from technosphere. To be used only in special submissions in coordination with ecoinvent and the Swiss FOEN.
- wastewater, average: 0 m3; name w_sewage; source Spielmann, M. 2007; pedigree (1,1,1,1,1)
  amounts of water inputs converted to m3
  production volume 0 m3
    Calculated from production volume of reference product using the relative outputs.
  properties: UVEK_link_1 4590, water content 2882.2, dry mass 0.346837 kg, wet mass 1000 kg, carbon content, non-fossil 0.194039, UVEK_relative_amount_1 -1
- wire drawing, copper: 49 kg; = m_copper; source Spielmann, M. 2007; lognormal variance with pedigree 0.235, pedigree (5,5,5,5,5)
  properties: UVEK_relative_amount_1 1, UVEK_link_1 4895
- wastewater from lorry production: -3.751 m3; name w_WW; = ((1+maintenance_factor)*2.42)*-1; source Spielmann, M. 2007; lognormal variance with pedigree 0.203, pedigree (4,5,5,5,5)
  total production specific waste water from production and maintenance (estimated via default factor); the amount of waste water from production is extrapolated from reference (data for truck) via total weight of machine
  production volume 18755 m3; = p_machinery*w_WW
    Calculated from production volume of reference product using the relative outputs.
  properties: wet mass 1000 kg, water content 2962.17, UVEK_relative_amount_1 -1, UVEK_link_1 4575, dry mass 0.337476 kg
- powder coat, steel: 194.928 m2; = (1+maintenance_factor)*125.76; source Spielmann, M. 2007; lognormal variance with pedigree 0.235, pedigree (5,5,5,5,5)
  total power coating input for production and maintenance (estimated via default factor); the amount of heat used in production is calculated from the powder coating used for the mobile cable yarder mounted on the truck by weight of the two machineries
  properties: UVEK_link_1 3613, UVEK_relative_amount_1 1
- scrap copper: 0 kg; name w_copper; source Spielmann, M. 2007; pedigree (1,1,1,1,1)
  production volume 0 kg
    Calculated from production volume of reference product using the relative outputs.
  property dry mass 1 kg; name w_copper_DM
  properties: wet mass 1 kg
- waste aluminium: -542.5 kg; name w_aluminium; = (m_aluminium)*-1; source Spielmann, M. 2007; lognormal variance with pedigree 0.203, pedigree (4,5,5,5,5)
  production volume 2.7125e6 kg; = p_machinery*w_aluminium
    Calculated from production volume of reference product using the relative outputs.
  property dry mass 1 kg; name w_aluminium_DM
  properties: wet mass 1 kg
- waste rubber, unspecified: 0 kg; name w_rubber; source Spielmann, M. 2007; pedigree (1,1,1,1,1)
  production volume 0 kg
    Calculated from production volume of reference product using the relative outputs.
  property dry mass 1 kg; name w_rubber_DM
  properties: carbon content, fossil 0.853, UVEK_link_1 1079, heating value, net 27.19 MJ, wet mass 1 kg, UVEK_relative_amount_1 -1
  note on heating value, net: Value taken from the general comment of the treatment dataset.
- zinc coat, coils: 247.299 m2; = (1*600*0.022+1*600*0.012+1*1200*0.011+4*80*0.018)*3.1415*MF_cable; lognormal variance with pedigree 0.235, pedigree (5,5,5,5,5)
  Area of the cables for zinc coating is approximated via the cylindrical surface of cables (length x diameter x pi); for diameters, see comment field for wire drawing
  properties: UVEK_relative_amount_1 1, UVEK_link_1 4964
- water, completely softened: 0 kg; name m_water_softened; source Spielmann, M. 2007; pedigree (1,1,1,1,1)
  for battery; data from reference for harvester
  property dry mass 0 kg; name m_water_softened_DM
  properties: wet mass 1 kg, UVEK_link_1 4851, UVEK_relative_amount_1 1
- waste polypropylene: 0 kg; name w_PP; source Spielmann, M. 2007; pedigree (1,1,1,1,1)
  input of PP correct for water content of waste flow
  production volume 0 kg
    Calculated from production volume of reference product using the relative outputs.
  property water content 0.189061; name WC_waste_PP
  property dry mass 0.841 kg; name DM_waste_polypropylene
  properties: wet mass 1 kg, carbon content, fossil 0.825208, UVEK_link_1 1042, heating value, net 32.78 MJ, UVEK_relative_amount_1 -1.18906
  note on heating value, net: Value assumed for all polypropylene products. Source: Phyllis2, database for (treated) biomass, algae, feedstocks for biogas production and biochar, https://phyllis.nl/Biomass/View/1186, ECN.TNO
- scrap lead acid battery: -81 kg; source Spielmann, M. 2007; lognormal variance with pedigree 0.203, pedigree (4,5,5,5,5)
  production volume 405000 kg
- waste bulk iron, excluding reinforcement: -1545.6, -40.4011, -3214 kg (3 entries); source Spielmann, M. 2007; lognormal variance with pedigree 0.203, pedigree (4,5,5,5,5)
  production volume 2.4e7 kg
  properties: dry mass 1 kg, wet mass 1 kg
- oxygen, liquid: 2.58372, 9.41628 kg (2 entries); source Spielmann, M. 2007; lognormal variance with pedigree 0.235, pedigree (5,5,5,5,5)
  used during disassembly
- acetylene: 0.87, 4.13 kg (2 entries); source Spielmann, M. 2007; lognormal variance with pedigree 0.235, pedigree (5,5,5,5,5)
  used during disassembly
  properties: UVEK_relative_amount_1 1, dry mass 1 kg, UVEK_link_1 101, heating value, net 51.2 MJ, carbon content, fossil 0.923077, wet mass 1 kg
- scrap steel: -3110.16, -3.94047, -9658.9 kg (3 entries); source Spielmann, M. 2007; lognormal variance with pedigree 0.203, pedigree (4,5,5,5,5)
  used for chromium steel, for which no specific dataset is available (15.09.2012)
  production volume 6.3865e7 kg
  properties: dry mass 1 kg, wet mass 1 kg
- wastewater, average: -8.81403, -0.953513, -18.4409 m3 (3 entries); source Spielmann, M. 2007; lognormal variance with pedigree 0.203, pedigree (4,5,5,5,5)
  amounts of water inputs converted to m3
  production volume 141042 m3
- scrap copper: -15.5432, -0.729252, -32.7276 kg (3 entries); source Spielmann, M. 2007; lognormal variance with pedigree 0.203, pedigree (4,5,5,5,5)
  production volume 245000 kg
  properties: wet mass 1 kg, dry mass 1 kg
- waste rubber, unspecified: -136.632, -5.73579, -136.632 kg (3 entries); source Spielmann, M. 2007; lognormal variance with pedigree 0.203, pedigree (4,5,5,5,5)
  production volume 1.395e6 kg
  properties: carbon content, fossil 0.853, UVEK_link_1 1079, heating value, net 27.19 MJ, dry mass 1 kg, wet mass 1 kg, UVEK_relative_amount_1 -1
- water, completely softened: 4.00008, 5.56525, 7.43467 kg (3 entries); source Spielmann, M. 2007; lognormal variance with pedigree 0.235, pedigree (5,5,5,5,5)
  for battery; data from reference for harvester
- waste polypropylene: -62.0906, -4.78682, -1.97713, -1.87747, -71.6416, -0.798737, -0.362019, -501.531 kg (8 entries); source Spielmann, M. 2007; lognormal variance with pedigree 0.203, pedigree (4,5,5,5,5)
  input of PP correct for water content of waste flow
  production volume 3.22533e6 kg
  properties: wet mass 1 kg, carbon content, fossil 0.825208, water content 0.189061, UVEK_link_1 1042, dry mass 0.841 kg, heating value, net 32.78 MJ, UVEK_relative_amount_1 -1.18906

## Emissions to nature
- Carbon dioxide, fossil [air, non-urban air or from high stacks]: 16.9231 kg; = m_acethylene*C_content_fossil_acetylene/12*(12+2*16); source Spielmann, M. 2007; lognormal variance with pedigree 0.033, pedigree (1,1,4,1,1)
  acethylene converted to CO2

## Sampling procedure
Data modified from Spielmann, M,, L. Barreto, V. Erni, F. Frutig and O.Thees (2007): Life cycle assessment of energy wood supply of forest wood chips in Switzerland, Paul Scherrer Institute and Swiss Federal Institute for Forest, Snow and Landscape Research (WSL), unpublished.

## Extrapolations
This dataset has been extrapolated from year 2012 to the year of the calculation (2021). The uncertainty has been adjusted accordingly.
