# cement production, limestone 21-35%

Dataset: EcoSpold 2, unit process
Geography: ZA
Time period: 2017-01-01 to 2021-12-31
Technology level: current
Classification: ISIC rev.4 ecoinvent: 2394:Manufacture of cement, lime and plaster
Synonyms: Portland Limestone Cement; CEM II B-L
Scenario: Business-as-Usual
System model: Allocation, cut-off by classification
Share of production covered: 90 %
Generated by: Rachel Muigai
Published in: Muigai, R. 2017
Database: ecoinvent
isCopyrightProtected: true
accessRestrictedTo: 1

## General comment
The dataset describes the production of cement (CEM II/B-L )
CEM II/B-L is a blended cement that is made by partially replacing 21-35% of Portland cement with limestone.
Portland cement production involves the chemical transformation of raw materials: calcium oxides; silica; alumina and iron oxide into various types of cementitious products, by-products and wastes. The Portland cement manufacturing process consists of four main steps: (1) Quarrying of limestone and transportation of raw materials to the processing plant. (2) Preparation of “raw meal” for pyroprocessing (3) Pyroprocessing of raw materials to produce Portland cement clinker using the dry process. (4) Final grinding of the clinker together with inter-grinding with a small proportion of gypsum to produce Portland cement. Steps (1) to (4) are not considered in dataset.

## Included activities start
From cradle, i.e. including all upstream activities. As source of gypsum, waste gypsum from flue gas treatment is assumed.

## Included activities end
This activity ends with the cement produced in the cement mill. The dataset does not include packaging and administration.

## Geography
The dataset represents the Portland cement production for South Africa.

## Technology
In South Africa, all cement production is through dry kiln process. The clinker is ground in mills with gypsum (5%) and depending on the type of cement and technical standard (SAN 50197-1) with other materials such as blast furnace slag, fly ash, pozzolan and lime fillers to produce the Portland cement.

## Parameters
- annual production: 1.23847e10 kg; name annualProduction; lognormal variance with pedigree 0.21, pedigree (5,5,5,5,5)

## Reference product
- cement, limestone 21-35%: 1 kg; name cement; CPC 374: Plaster, lime and cement; By-product classification allocatable product; pedigree (1,1,1,1,1)
  production volume 1.11957e9 kg
    The produciton volume is set equal to the production volume of the corresponding ZA dataset.
  property price 0.0615 EUR2005; name cement_price_EUR2005
    2005 import and export prices (total trades (USD) divided by total weight (kg) in China, India, USA, Japan, Russia and Europe, major producers and consumers (http://www.cementchina.net/freport/showfre.asp?id=749) from UN Commodity Trade Statistics Database (http://data.un.org/Explorer.aspxDatabase [Accessed 2 July 2010]). Commodity: Cement (portland, aluminious, slag or hydraulic)
  property water in wet mass 0 kg; name cement_WWM
  property carbon content, fossil 0; name cement_C_content_fossil
  property wet mass 1 kg; name cement_WM
  property dry mass 1 kg; name cement_DM
  property carbon content, non-fossil 0; name cement_C_content_non_fossil
  property water content 0; name cement_water_content
  property carbon content 0
    carbon content on a dry matter basis (reserved; not for manual entry)
  properties: carbon allocation 0 kg

## Inputs from technosphere
- clinker: 0.76 kg; source Gary Theodosiou 2010; lognormal variance with pedigree 0.21, pedigree (5,5,5,5,5)
  Values were calculated based on primary data collection in South Africa. The data were collected from 5 cement companies which represent 90% of the cement market share.
  properties: wet mass 1 kg, dry mass 1 kg
- ethylene glycol: 0.00019 kg; = 1.9e-4* cement; source Kellenberger D. 2007; lognormal variance with pedigree 0.0113, pedigree (3,3,4,3,1)
  Ancillary product for grinding. Adopted from the "cement production, Portland, GLO 2009" dataset. Accessed 20171106
  Uncertainty: Variance of log-transformed data was taken from ecoinvent report no 1, table 10.3. Value represents demand of products, electricity etc. for input/output group c.
  properties: wet mass 1 kg, dry mass 1 kg, carbon content, fossil 0.387097, heating value, net 23.44 MJ
- steel, low-alloyed: 5.25e-5 kg; = 5.25E-05*cement; source Kellenberger D. 2007; lognormal variance with pedigree 0.21, pedigree (5,5,5,5,5)
  Literature value:Adopted from the "cement production, Portland, CH 2010" dataset. Accessed 20171106
  properties: wet mass 1 kg, carbon content, fossil 0.005, dry mass 1 kg
- gypsum, mineral: 0.04 kg; source Gary Theodosiou 2010; lognormal variance with pedigree 0.0113, pedigree (3,3,4,3,1)
  Values were calculated based on primary data collection in South Africa. The data were collected from 5 cement companies which represent 90% of the cement market share.
  Uncertainty: Variance of log-transformed data was taken from ecoinvent report no 1, table 10.3. Value represents demand of products, electricity etc. for input/output group c.
  properties: wet mass 1 kg, dry mass 1 kg
- electricity, medium voltage: 0.0497 kWh; = 0.0497*cement; source Boesch, M.E. 2010; lognormal variance with pedigree 0.0113, pedigree (3,3,4,3,1)
  Literature value. Adopted from the "cement production, Portland, GLO 2009" dataset. Accessed 20171106
  Uncertainty: Variance of log-transformed data was taken from ecoinvent report no 1, table 10.3. Value represents demand of products, electricity etc. for input/output group c.
- limestone, crushed, for mill: 0.2 kg; source Gary Theodosiou 2010; lognormal variance with pedigree 0.21, pedigree (5,5,5,5,5)
  (same comment as for clinker)
  properties: wet mass 1 kg, dry mass 0.998 kg, water content 0.00200401, carbon content, fossil 0.117492
- cement factory: 5.36e-11 unit; = 5.36e-11*cement; source Kellenberger D. 2007; lognormal variance with pedigree 0.3092, pedigree (2,1,4,4,1)
  Literature Value. Adopted from the "cement production, Portland, GLO 2009" dataset. Accessed 20171106
  Uncertainty: Variance of log-transformed data was taken from ecoinvent report no 1, table 10.3. Value represents demand of infrastructure for input/output group c.

## Emissions to nature
- Heat, waste [air, unspecified]: 0.179 MJ; = 0.179* cement; source Boesch, M.E. 2010; lognormal variance with pedigree 0.0507, pedigree (3,3,4,3,1)
  Literature value. Adopted from the "cement production, Portland, GLO 2009" dataset. Accessed 20171106
  Uncertainty: Variance of log-transformed data was taken from ecoinvent report no 1, table 10.3. Value represents others emitted to air for input/output group p.

## Sampling procedure
Data approximates average South African production

## Extrapolations
This dataset has been extrapolated from year 2017 to the year of the calculation (2021). The uncertainty has been adjusted accordingly.
