# propane, burned in building machine

Dataset: EcoSpold 2, unit process
Geography: GLO
Time period: 2013-01-01 to 2021-12-31
Technology level: current
Classification: ISIC rev.4 ecoinvent: 4312:Site preparation
Classification: EcoSpold01Categories: construction processes/machinery
Scenario: Business-as-Usual
System model: Allocation, cut-off by classification
Generated by: Jean-Francois Menard
Database: ecoinvent
isCopyrightProtected: false
accessRestrictedTo: 1

## General comment
This dataset represents the combustion of propane in a building machine. It is adapted from ecoinvent v3.0 dataset "diesel, burned in building machine, GLO 2001".
Modified flows:
Carbon dioxide, fossil emissions: stoichiometric calculation based on hypothetical commercial propane composition (see table below); Sulfur dioxide emissions: stoichiometric calculation based on sulfur content; propane fuel input, Nitrogen oxides, Carbon monoxide, fossil and Particulates, <2.5µm emissions taken from U.S. EPA NONROAD 2008 model for LGT252 machines (Phase II emission standard (post-2007), over 25 HP, liquid petroleum gas fuelled).
Commercial propane composition: 90% propane and propene; 10% ethane, ethene, butane and butene; and 0.005% (w/w) sulfur content (http://www.cfbp.fr/proprietes-des-gpl/specifications-administratives-n312, consulted on 2013-05-29)

. The following table shows the calculation for energy content and carbon dioxide emissions (individual hydrocarbons heating values taken from Table B.1 in Felder, R. M., Rousseau, R. W. (1986) Elementary Principles of Chemical Processes, 2nd ed.,Wiley):

## Included activities start
This activity starts with the reception of the propane fuel.

## Included activities end
This activity ends with the supplied service of the operating building machine.
The dataset includes the fuel for combustion, the infrastructure, lubricating oil and air emissions.

## Geography
Emission data extrapolated from Switzerland conditions, except for nitrogen oxides, carbon monoxide and particulates emissions extrapolated from U.S.A. conditions.The uncertainties have been adjusted accordingly.

## Technology
Average current technology.

## Parameters
- liquified petroleun gas combustion carbon conversion ratio: 0.995 dimensionless; name LPG_C_conversion; lognormal variance with pedigree 0.0666, pedigree (4,5,5,5,3)
  from the U.S. EPA AP-42, Compilation of Air Pollutant Emission Factors, Section 1.5 Liquified Petroleum Gas Combustion, Sub-section 1.5.3.2 (http://www.epa.gov/ttn/chief/ap42/ch01/final/c01s05.pdf)

## Reference product
- propane, burned in building machine: 1 MJ; name RefProd; CPC 543: Site preparation services; By-product classification allocatable product
  production volume 4 MJ; name ProdVol
    This is a placeholder value that does not reflect real-world production volumes. This dataset does not currently require a real-world production volume to work in the database framework, and no actual data were collected yet. This has no negative effect on the results of the ecoinvent database.
  property price 0.00816771 EUR2005; name RefProd_price_EUR2005
    Calculated based on inputs: The price of the product has been calculated as a sum of the values of the material and energy inputs for this product. This value is therefore a rough estimation. It may underestimate the real price since there are additional expenses when producing any product. These expences can include for example labour costs, treatment of waste materials and profit for the producer. Please consider carefully whether this level of data quality is acceptable for your application.
  properties: heating value, net 1 MJ

## Inputs from technosphere
- waste mineral oil: 0 kg; name WasteOil; source Kellenberger D. 2007; pedigree (1,1,1,1,1)
  Taken directly from ecoinvent v3.0 dataset "diesel burned in building machine, GLO 2001".
  production volume 0 kg
    Calculated from production volume of reference product using the relative outputs.
  property price 0 EUR2005; name WasteOil_price_EUR2005
  properties: heating value, net 34.7 MJ, carbon content, fossil 0.864444, water content 0.111111, wet mass 1 kg, dry mass 0.9 kg
  note on heating value, net: Value taken from the general comment of the treatment dataset.
  note on carbon content, fossil: Tab A.6, ecoinvent v2.2 report 13_I. C content has been calculated after data in the tables, and then referred to 1 kg DM
- propane: 0.0215239 kg; = 1/heating_value_net; lognormal variance with pedigree 0.008, pedigree (1,1,4,1,1)
  Calculated based on net heating value.
  Uncertainty: Calculated variable. Uncertainty will be determined from propagation of uncertainty factors of underlying variables. Uncertainty of actual relation between variables not accounted for at this time, although this could be included in a future update.
  property sulfur content 5e-5; name propane_sulfur_content
  property heating value, gross 50.38 MJ; name heating_value_gross
  property carbon content, fossil 0.8206; name propane_carbon_content
  property heating value, net 46.46 MJ; name heating_value_net
  properties: dry mass 1 kg, wet mass 1 kg
  note on sulfur content: Taken from http://www.cfbp.fr/proprietes-des-gpl/specifications-administratives-n312.
- building machine: 1.34e-7 unit; source Kellenberger D. 2007; lognormal variance with pedigree 0.43, pedigree (5,5,5,5,4)
  Taken directly from ecoinvent v3.0 dataset "diesel burned in building machine, GLO 2001".
- lubricating oil: 0 kg; source Kellenberger D. 2007; pedigree (1,1,1,1,1)
  Taken directly from ecoinvent v3.0 dataset "diesel burned in building machine, GLO 2001".
  properties: heating value, net 40.2 MJ, wet mass 1 kg, dry mass 1 kg, carbon content, fossil 0.75
  note on heating value, net: Literature value, Source: IPCC 2006, 2006 IPCC Guidelines for National Greenhouse Gas Inventories, Prepared by the National Greenhouse Gas Inventories Programme, Eggleston H.S., Buendia L., Miwa K., Ngara T. and Tanabe K. (eds). Published: IGES, Japan
  note on carbon content, fossil: Lubricating oil is produced from diesel. C-content/dry mass of fats and oils considered 75%, from: ecoinvent v2.2 report, n 15a, pg 40
- waste mineral oil: -0.000141088, -3.49279e-6, -0.000369419 kg (3 entries); source Kellenberger D. 2007; lognormal variance with pedigree 0.1306, pedigree (5,5,5,5,4)
  Taken directly from ecoinvent v3.0 dataset "diesel burned in building machine, GLO 2001".
  production volume 0.002056 kg
- lubricating oil: 8.9436e-5, 0.000424564 kg (2 entries); source Kellenberger D. 2007; lognormal variance with pedigree 0.1306, pedigree (5,5,5,5,4)
  Taken directly from ecoinvent v3.0 dataset "diesel burned in building machine, GLO 2001".

## Emissions to nature
- Mercury [air, urban air close to ground]: 3e-11 kg; source Faist Emmenegger, M. 2007; lognormal variance with pedigree 0.86, pedigree (5,5,5,5,5)
  Trace element in natural gas", as cited in ecoinvent v3.0 dataset "heat production, natural gas, at industrial furnace, GLO 2000".
- Particulates, < 2.5 um [air, urban air close to ground]: 5.84352e-6 kg; lognormal variance with pedigree 0.352, pedigree (3,5,5,5,1)
  Taken from U.S. EPA NONROAD 2008 model.
- Methane, fossil [air, urban air close to ground]: 2e-6 kg; source Faist Emmenegger, M. 2007; lognormal variance with pedigree 1.29, pedigree (5,5,5,5,5)
  Rough estimate, high uncertainty", as cited in ecoinvent v3.0 dataset "heat production, natural gas, at industrial furnace, GLO 2000".
- Acetaldehyde [air, urban air close to ground]: 1e-9 kg; source Faist Emmenegger, M. 2007; lognormal variance with pedigree 1.29, pedigree (5,5,5,5,5)
  (same comment as for Methane, fossil)
- Toluene [air, urban air close to ground]: 2e-7 kg; source Faist Emmenegger, M. 2007; lognormal variance with pedigree 1.29, pedigree (5,5,5,5,5)
  (same comment as for Methane, fossil)
- Pentane [air, urban air close to ground]: 1.2e-6 kg; source Faist Emmenegger, M. 2007; lognormal variance with pedigree 1.29, pedigree (5,5,5,5,5)
  (same comment as for Methane, fossil)
- Carbon monoxide, fossil [air, urban air close to ground]: 0.000458132 kg; name CO; lognormal variance with pedigree 0.702, pedigree (3,5,5,5,1)
  Taken from U.S. EPA NONROAD 2008 model.
  property carbon content, fossil 0.428805; name carbon_content_CO
- Benzene [air, urban air close to ground]: 4e-7 kg; source Faist Emmenegger, M. 2007; lognormal variance with pedigree 1.29, pedigree (5,5,5,5,5)
  (same comment as for Methane, fossil)
- Acetic acid [air, urban air close to ground]: 1.5e-7 kg; source Faist Emmenegger, M. 2007; lognormal variance with pedigree 1.29, pedigree (5,5,5,5,5)
  (same comment as for Methane, fossil)
- Benzo(a)pyrene [air, urban air close to ground]: 1e-11 kg; source Faist Emmenegger, M. 2007; lognormal variance with pedigree 1.29, pedigree (5,5,5,5,5)
  (same comment as for Methane, fossil)
- Sulfur dioxide [air, urban air close to ground]: 2.15239e-6 kg; = propane*propane_sulfur_content*(32+2*16)/32; lognormal variance with pedigree 0.008, pedigree (1,1,4,1,1)
  Stoechiometric calculation, based on sulfur content.
  Uncertainty: Calculated variable. Uncertainty will be determined from propagation of uncertainty factors of underlying variables. Uncertainty of actual relation between variables not accounted for at this time, although this could be included in a future update.
- Formaldehyde [air, urban air close to ground]: 1e-7 kg; source Faist Emmenegger, M. 2007; lognormal variance with pedigree 1.29, pedigree (5,5,5,5,5)
  (same comment as for Methane, fossil)
- Butane [air, urban air close to ground]: 7e-7 kg; source Faist Emmenegger, M. 2007; lognormal variance with pedigree 1.29, pedigree (5,5,5,5,5)
  (same comment as for Methane, fossil)
- Propionic acid [air, urban air close to ground]: 2e-8 kg; source Faist Emmenegger, M. 2007; lognormal variance with pedigree 1.29, pedigree (5,5,5,5,5)
  (same comment as for Methane, fossil)
- Dinitrogen monoxide [air, urban air close to ground]: 1e-7 kg; source Faist Emmenegger, M. 2007; lognormal variance with pedigree 1.29, pedigree (5,5,5,5,5)
  (same comment as for Methane, fossil)
- Carbon dioxide, fossil [air, urban air close to ground]: 0.0637184 kg; = (propane*propane_carbon_content*LPG_C_conversion-CO*carbon_content_CO)*44/12; lognormal variance with pedigree 0.008, pedigree (1,1,4,1,1)
  Stoechiometric calculation, based on carbon content.
  Uncertainty: Calculated variable. Uncertainty will be determined from propagation of uncertainty factors of underlying variables. Uncertainty of actual relation between variables not accounted for at this time, although this could be included in a future update.
- Nitrogen oxides [air, urban air close to ground]: 9.93398e-5 kg; lognormal variance with pedigree 0.092, pedigree (3,5,5,5,1)
  Taken from U.S. EPA NONROAD 2008 model.
- Propane [air, urban air close to ground]: 2e-7 kg; source Faist Emmenegger, M. 2007; lognormal variance with pedigree 1.29, pedigree (5,5,5,5,5)
  (same comment as for Methane, fossil)
- Dioxins, measured as 2,3,7,8-tetrachlorodibenzo-p-dioxin [air, urban air close to ground]: 0 kg; source Faist Emmenegger, M. 2007; pedigree (1,1,1,1,1)
  (same comment as for Methane, fossil)
- PAH, polycyclic aromatic hydrocarbons [air, urban air close to ground]: 1e-8 kg; source Faist Emmenegger, M. 2007; lognormal variance with pedigree 1.29, pedigree (5,5,5,5,5)
  (same comment as for Methane, fossil)

## Sampling procedure
"Literature, manufacturers" and "Some data from the LCA study Oekoinventare von Energiesystemen 1996 and emissions from the Swiss "Offroad" database", as cited in ecoinvent dataset "diesel, burned in building machine, GLO 2001".

## Extrapolations
This dataset has been extrapolated from year 2013 to the year of the calculation (2021). The uncertainty has been adjusted accordingly.
