# Brown-Schlesinger process

Dataset: EcoSpold 2, unit process
Geography: GLO
Time period: 2000-01-01 to 2021-12-31
Technology level: current
Classification: ISIC rev.4 ecoinvent: 2011:Manufacture of basic chemicals
Classification: EcoSpold01Categories: chemicals/inorganics
Synonyms: sodium borohydride
Tags: ConvertedDataset
Scenario: Business-as-Usual
System model: Allocation, cut-off by classification
Share of production covered: 100 %
Generated by: Jürgen Sutter
Published in: Sutter, J. 2007
Database: ecoinvent
isCopyrightProtected: true
accessRestrictedTo: 1

## General comment
This dataset represents the Brown-Schlesinger process.The functional unit is 1 kg trimethyl borate. The system includes the process with consumption of raw materials, energy, infrastructure, and land use, as well as the generation of emissions to air and water. It also includes transportation of the raw materials. Transient or unstable operations like starting-up or shutting-down, are not included, but the production during stable operation conditions. Storage and transportation of the final product are also not included. It is assumed that the manufacturing plants are located in an urban/industrial area and consequently the emissions are categorised as emanating in a high population density area. The emissions into water are assumed to be emitted into rivers. Within the Brown-Schlesinger process, sodium tetrahydroborate and sodium methoxide are derived as co-product, so it is a multi output process.
[This dataset was already contained in the ecoinvent database version 2. It was not individually updated during the transfer to ecoinvent version 3. Life Cycle Impact Assessment results may still have changed, as they are affected by changes in the supply chain, i.e. in other datasets. This dataset was generated following the ecoinvent quality guidelines for version 2. It may have been subject to central changes described in the ecoinvent version 3 change report (http://www.ecoinvent.org/database/ecoinvent-version-3/reports-of-changes/), and the results of the central updates were reviewed extensively. The changes added e.g. consistent water flows and other information throughout the database. The documentation of this dataset can be found in the ecoinvent reports of version 2, which are still available via the ecoinvent website. The change report linked above covers all central changes that were made during the conversion process.]

## Included activities start
From reception of sodium hydroxide (NaOH) and methyl borate (B(OCH3)) at the factory gate.

## Included activities end
This activity ends with the Brown-Schlesinger process, including materials, energy uses, infrastructure and emissions.

## Geography
The inventory is modelled for the world..

## Technology
The Brown-Schlesinger process is one of the most important production processes for sodium tetrahydroborate.In the Brown-Schlesinger-Process methyl borate is added to hydrogenated sodium in mineral oil:
4 Na + 2 H2 +B(OCH3)3 → NaBH4 + 3 NaOCH3
Separation of the sodium methoxide from NaBH4 was accomplished by such methods as extraction with amines, and extraction with water followed by a counterextraction with a solvent, such as 2-aminopropane.
The sodium and hydrogen for the Brown-Schlesinger process are produced by an electrolysis of NaOH.
2 NaOH → 2 Na + O2 + H2
The overall equation for the process:
4 NaOH + B(OCH3)3 → NaBH4 + 3 NaOCH3 + O2
Baudis, U., Fichte, R.: Boron and Boron Alloys. Published online: 2000. In: Ullmann's Encyclopedia of Industrial Chemistry, Seventh Edition, 2004 Electronic Release (ed. Fiedler E., Grossmann G., Kersebohm D., Weiss G. and Witte C.). 7 th Electronic Release Edition. Wiley InterScience, New York, Online-Version under: http://www.mrw.interscience.wiley.com/emrw/9783527306732/home

## Time period
Time of publications.

## Parameters
- fraction, cooling water, to air: 0.3875 dimensionless; name fraction_CW_to_air; = (0.5*fraction_CW_OT_to_air)+(0.5*fraction_CW_R_to_air); lognormal variance with pedigree 0.092025, pedigree (4,4,3,2,4)
  Calculated value based on literature value (see comments of the other parametres present in this dataset) and expert opinion. In the case when no industry/literature data are available about the type of cooling or directly fraction, cooling water, to air specific for the process a default assumption is applied. It is assumed that the once-through cooling system is used in 50% of all cases and recirculating system is used in another 50% of all cases.
- fraction, cooling water, recirculating system, to air: 0.771 dimensionless; name fraction_CW_R_to_air; lognormal variance with pedigree 0.0413, pedigree (2,3,1,3,1)
  Calculated based on literature value (Scown, C.D., 2011, Water Footprint of U.S. Transportation Fuels and supplying information of the article) (Vionnet, S., Quantis Water Database - Technical Report, 2012).
- fraction, cooling water, once-through system, to air: 0.004 dimensionless; name fraction_CW_OT_to_air; lognormal variance with pedigree 0.0413, pedigree (2,3,1,3,1)
  (same comment as for fraction, cooling water, recirculating system, to air)
- fraction, cooling water, cooling pond system, to air: 0.032 dimensionless; name fraction_CW_CP_to_air; lognormal variance with pedigree 0.0413, pedigree (2,3,1,3,1)
  (same comment as for fraction, cooling water, recirculating system, to air)

## Reference product
- sodium tetrahydridoborate: 0 kg; name RP_amount_1; By-product classification allocatable product; CPC 34280: Hydrogen peroxide; phosphides; carbides; hydrides, nitrides, azides, silicides and borides; CAS 16940-66-2
  EcoSpold01Location=GLO
  Sodium tetrahydroborate is a white crystalline solid. It is stable in dry air, reacting slowly with moisture. A concentrated aqueous solution of NaBH4 stabilized by NaOH is used to reduce hydrogen sulfite to dithionite in the bleaching of ground wood pulp. Also, NaBH4 has extensive and important use as a reducing agent in organic synthesis. Other hydroborates can be obtained by reaction with NaBH4 to give different reductive capabilities (e.g., NaBH3CN).
  Additional applications are extensive, e.g., electroless plating, blowing agent for cellular plastics, removal of heavy metals from waste streams, polymerization catalyst, and hydrogen source for fuel cells.
  production volume 3.97755e6 kg; = RP_amount_1/ BP_amount_1* BP_PV_1
    Calculated from the production volume of sodium methoxide in proportion to the respective output amounts.
  property price 37.7 EUR2005
    Temporary price data. Calculated as 90% of purchasers price based on: Kirk-Othmer
  property heating value, net 12.81 MJ
    LHV is calculated based on the elemental composition of the substance. Based on the CAS number of the substance (016940-66-2), the chemical formula of the substance is found to be: NaBH4, (PubChem 2020).
    Reference: Kim, S., Chen, J., Cheng, T., Gindulyte, A., He, J., He, S., Li, Q., Shoemaker, B. A., Thiessen, P. A., Yu, B., Zaslavsky, L., Zhang, J., & Bolton, E. E. (2019). PubChem 2019 update: improved access to chemical data. Nucleic acids research, 47(D1), D1102–D1109. https://doi.org/10.1093/nar/gky1033
  property carbon content 0
    carbon content on a dry matter basis (reserved; not for manual entry)
  property true value 13.6372; name RP_amount_1_true_value
    allocation property applied in "true value" allocation // value calculated from revenue
  properties: dry mass 1 kg, wet mass 1 kg, carbon content, fossil 0, water content 0, water in wet mass 0 kg, carbon content, non-fossil 0, carbon allocation 0 kg
- sodium methoxide: 1 kg; name BP_amount_1; CPC 34: Basic chemicals; By-product classification allocatable product; CAS 124-41-4
  EcoSpold01Location=GLO
  production volume 1.69568e7 kg; name BP_PV_1; = ((4.57E6*(1+0.09)^(2006-1983))*(66228.669/12954.713))*0.1
    Estimated value.
    Due to the fact that companies which produce chemicals do not reveal their production volumes (PV) some modeling, including estimates is needed. The only data publicaly available are from the US, for the year 1983. The annual production volume in the U.S. in 1983 was 4.47 million kg / year (US National Library of Medicine, Hazardous Substances Data Bank, http://toxnet.nlm.nih.gov/cgi-bin/sis/search/f?./temp/~DRDXMT:1:FULL).
    Three main manufactoring methods of sodium methoxide which are being used are; reaction of sodium with methanol (presented in this activity, estimated to be 40% of the total PV ), reaction of methanol with sodium amalgam obtained from the electrolysis (estimated to be 40% of total PV) of brine or Brown-Schlesinger process where sodium methoxide is produced as a by-product (estimated to be 10% of total PV) (http://toxnet.nlm.nih.gov/cgi-bin/sis/search/f?./temp/~XHdbtv:1:FULL). The global production volume is calculated using an estimate that sodium formate production annual growth is 9% (based on global chemicals shipments, American Chemistry Council; http://www.americanchemistry.com/Jobs/EconomicStatistics/Industry-Profile/Global-Business-of-Chemistry). The extrapolation from US data to GLO data is using GDP (International Monetary Fund database; http://www.imf.org/external/index.htm). The GDP of the US in 2006 was (according to IMF) 12,954.7 billion USD and the GDP of the whole world (GLO) was 66,228.7 billion USD.
  property heating value, net 13.47 MJ
    LHV is calculated based on the elemental composition of the substance. Based on the CAS number of the substance (000124-41-4), the chemical formula of the substance is found to be: CH3NaO, (PubChem 2020).
    Reference: Kim, S., Chen, J., Cheng, T., Gindulyte, A., He, J., He, S., Li, Q., Shoemaker, B. A., Thiessen, P. A., Yu, B., Zaslavsky, L., Zhang, J., & Bolton, E. E. (2019). PubChem 2019 update: improved access to chemical data. Nucleic acids research, 47(D1), D1102–D1109. https://doi.org/10.1093/nar/gky1033
  property price 0.729 EUR2005
    Temporary price data. Calculated as 90% of purchasers price based on: 2005 price assumed by Haas M J, McAloon A J, Yee W C, Foglia T A. (2005): A process model to estimate biodiesel production costs
  property carbon content 0.222222
    carbon content on a dry matter basis (reserved; not for manual entry)
  property true value 1.12419; name BP_amount_1_true_value
    allocation property applied in "true value" allocation // value calculated from revenue
  properties: carbon content, fossil 0.222222, wet mass 1 kg, carbon content, non-fossil 0, dry mass 1 kg, water in wet mass 0 kg, water content 0, carbon allocation 0.222222 kg

## Inputs from technosphere
- electricity, medium voltage: 0.466915 kWh; source Gendorf 2000; lognormal variance with pedigree 0.1786, pedigree (4,5,5,5,5)
  Estimation. This data was taken from a large chemical plant site in Germany producing 2.05 Mt a-1 (intermediates included) of different chemicals. The values for the energy consumption per kg of product of this plant (3.2 MJ kg-1) were used as approximation for the energy consumption of the Brown-Schlesinger process. This total energy demand contains a split of 50% natural gas, 38% electricity and 12% steam from external energy sources. For this dataset all energy used for heat or steam was assumed to be natural gas. For the electricity, a reference of sodium hydroxide electrolysis reports an electricity consumption of 10 kWh per kg sodium is taken into account.
  Further references:
  Baudis, U., Fichte, R.: Boron and Boron Alloys. Published online: 2000. In: Ullmann's Encyclopedia of Industrial Chemistry, Seventh Edition, 2004 Electronic Release (ed. Fiedler E., Grossmann G., Kersebohm D., Weiss G. and Witte C.). 7 th Electronic Release Edition. Wiley InterScience, New York, Online-Version under: http://www.mrw.interscience.wiley.com/emrw/9783527306732/home
  EcoSpold01Location=UCTE
  Uncertainty: Estimation
- chemical factory, organics: 3.60895e-11 unit; lognormal variance with pedigree 0.448, pedigree (4,5,5,5,5)
  Estimation. This module assumes a built area of about 4.2 ha, an average output of 50'000 t/a, and plant life of fifty years.
  EcoSpold01Location=RER
  Uncertainty: Estimation
- heat, district or industrial, natural gas: 0.180445 MJ; source Gendorf 2000; lognormal variance with pedigree 0.1786, pedigree (4,5,5,5,5)
  Estimation. This data was taken from a large chemical plant site in Germany producing 2.05 Mt a-1 (intermediates included) of different chemicals. The values for the energy consumption per kg of product of this plant (3.2 MJ kg-1) were used as approximation for the energy consumption of the Brown-Schlesinger process. This total energy demand contains a split of 50% natural gas, 38% electricity and 12% steam from external energy sources. For this dataset all energy used for heat or steam was assumed to be natural gas.
  EcoSpold01Location=RER
  Uncertainty: Estimation
  properties: heating value, net 1 MJ
- sodium hydroxide, without water, in 50% solution state: 0.0759796 kg; source Baudis, U 2004; lognormal variance with pedigree 0.076, pedigree (4,5,5,1,1)
  EcoSpold01Location=RER
  Stoichiometric calculation. It is calculated with a yield of 95 %.
  Uncertainty: Stoechiometric calculation
  properties: heating value, net 3.03 MJ, wet mass 1 kg, dry mass 1 kg
- trimethyl borate: 0.0493855 kg; source Baudis, U 2004; lognormal variance with pedigree 0.076, pedigree (4,5,5,1,1)
  Functional unit
  EcoSpold01Location=GLO
  Uncertainty: Stoechiometric calculation
  properties: carbon content, fossil 0.346154, wet mass 1 kg, dry mass 1 kg, heating value, net 21 MJ

## Inputs from nature
- Water, cooling, unspecified natural origin [natural resource, in water]: 0.00216536 m3; name water_cooling_UNO_input; source Gendorf 2000; lognormal variance with pedigree 0.198, pedigree (4,5,5,5,5)
  Estimation. This data was estimated with data from an large chemical plant site in Germany producing 2.05 Mt a-1 (intermediates included) of different chemicals. This value was used in this inventory as approximation for the cooling water consumption of the chlorosilane amination.
  Estimation. This data was estimated with data from an large chemical plant site in Germany producing 2.05 Mt a-1 (intermediates included) of different chemicals. This value was used in this inventory as approximation for the cooling water consumption of the chlorosilane amination.
  Uncertainty: Estimation

## Emissions to nature
- TOC, Total Organic Carbon [water, surface water]: 0.000918571 kg; lognormal variance with pedigree 0.188, pedigree (4,5,5,5,5)
  Estimation. The values for COD, BOD, TOC, and DOC used in this inventory are calculated from the amount of trimethyl borate in the treated waste water assuming a carbon conversion of 96% for COD. For the calculation of the values for BOD and DOC the worst case scenario BOD = COD and TOC = DOC is used.
  Uncertainty: Estimation
- Sodium, ion [water, surface water]: 0.00174751 kg; lognormal variance with pedigree 0.798, pedigree (4,5,5,5,5)
  Estimation. The remaining amount of unreacted sodium hydroxide and trimethyl borate is assumed to leave the production process with the waste water. Further it was assumed that this wastewater is treated in a internal wastewater plant. The removal efficiency for trimethyl borate is assumed with 90%.
  Uncertainty: Estimation
- Boron [water, surface water]: 0.000250725 kg; lognormal variance with pedigree 0.218, pedigree (4,5,5,5,5)
  Estimation. The remaining amount of unreacted sodium hydroxide and trimethyl borate is assumed to leave the production process with the waste water. Further it was assumed that this wastewater is treated in a internal wastewater plant. The removal efficiency for trimethyl borate is assumed with 90%. The trimethyl borate is calculated as boron emission.
  Uncertainty: Estimation
- Water [water, unspecified]: 0.00132628 m3; name water_to_water_unspecified; = water_cooling_UNO_input*(1-fraction_CW_to_air); lognormal variance with pedigree 0.0807, pedigree (2,2,5,1,1)
  Calculated value based on literature values and expert opinion. See comments in the parametres' comment field.
  property carbon content, fossil 0; name C_content_fossil
  property fraction, origin: salt water 0; name fraction_origin_salt_water_Ww
  property fraction, origin: unspecified 1; name fraction_origin_unspecified_Ww
  property wet mass 1000 kg; name WM
  property water in wet mass 1000 kg; name WWM
  property dry mass 0 kg; name DM
  property carbon content, non-fossil 0; name C_content_non_fossil
  property fraction, origin: fresh water 0; name fraction_origin_fresh_water_Ww
- COD, Chemical Oxygen Demand [water, surface water]: 0.0029335 kg; lognormal variance with pedigree 0.188, pedigree (4,5,5,5,5)
  (same comment as for TOC, Total Organic Carbon)
- DOC, Dissolved Organic Carbon [water, surface water]: 0.000918571 kg; lognormal variance with pedigree 0.188, pedigree (4,5,5,5,5)
  (same comment as for TOC, Total Organic Carbon)
- Water [air, unspecified]: 0.000839076 m3; name water_to_air_unspecified; = (water_cooling_UNO_input*fraction_CW_to_air); lognormal variance with pedigree 0.0807, pedigree (2,2,5,1,1)
  (same comment as for Water)
  property fraction, origin: fresh water 0; name fraction_origin_fresh_water
  property fraction, origin: unspecified 1; name fraction_origin_unspecified
  property fraction, origin: salt water 0; name fraction_origin_salt_water
- Methyl borate [air, urban air close to ground]: 9.8771e-5 kg; lognormal variance with pedigree 0.188, pedigree (4,5,5,5,5)
  Estimation. The air emissions occurring from the purge vent, the distillation vent and fugitive emission sources were estimated to 0.2% of the trimethyl borate input.
  Uncertainty: Estimation
- BOD5, Biological Oxygen Demand [water, surface water]: 0.0029335 kg; lognormal variance with pedigree 0.188, pedigree (4,5,5,5,5)
  (same comment as for TOC, Total Organic Carbon)
- Carbon dioxide, fossil [air, urban air close to ground]: 0.00225652 kg; lognormal variance with pedigree 0.1786, pedigree (4,5,5,5,5)
  Estimation. The carbon contained in the removed trimethyl borate during the wastewater treatment operation is accounted as CO2 emissions to air.
  Uncertainty: Estimation
- Hydroxide [water, surface water]: 0.00129163 kg; lognormal variance with pedigree 0.188, pedigree (4,5,5,5,5)
  (same comment as for Sodium, ion)

## Sampling procedure
Literature data

## Extrapolations
Energy consumptions and emissions are estimated. Infrastructure and transports are calculated with standard values.

## Review by Roland Hischier 2011-09-23
Transfer of documentation done.

## Review by Roland Hischier 2007-09-20
passed.
-
