# liquid manure storage and processing facility construction

Dataset: EcoSpold 2, unit process
Geography: RoW
Time period: 1994-01-01 to 2021-12-31
Technology level: current
Classification: EcoSpold01Categories: agricultural means of production/buildings
Classification: ISIC rev.4 ecoinvent: 4290:Construction of other civil engineering projects
Tags: ConvertedDataset
Scenario: Business-as-Usual
System model: Allocation, cut-off by classification
Generated by: Dunja Dux
Published in: Nemecek, T. 2007
Database: ecoinvent
isCopyrightProtected: true
accessRestrictedTo: 1

## General comment
The module includes a covered, underfloor and rectangular slurry store made of concrete. Also included is a marine screw agitator. Size: 300 m3. Lifetime of the building is 40 years.
[This dataset was already contained in the ecoinvent database version 2. It was not individually updated during the transfer to ecoinvent version 3. Life Cycle Impact Assessment results may still have changed, as they are affected by changes in the supply chain, i.e. in other datasets. This dataset was generated following the ecoinvent quality guidelines for version 2. It may have been subject to central changes described in the ecoinvent version 3 change report (http://www.ecoinvent.org/database/ecoinvent-version-3/reports-of-changes/), and the results of the central updates were reviewed extensively. The changes added e.g. consistent water flows and other information throughout the database. The documentation of this dataset can be found in the ecoinvent reports of version 2, which are still available via the ecoinvent website. The change report linked above covers all central changes that were made during the conversion process.]

## Included activities end
The inventory takes into account the use of construction materials and building machines for construction, repair and replacement including waste disposal and the transportation of the materials to the building site. Not taken into account were direct emission of the construction, disposal of production waste and the use of resources during utilization phase.

## Geography
The inventory applies for Swiss agricultural buildings only, because of the solid method of construction.

## Technology
The data of the inventory are based on one example of a typical agricultural building.

## Reference product
- liquid manure storage and processing facility: 1 m3; CPC 53121: Industrial buildings; By-product classification allocatable product
  EcoSpold01Location=CH
  production volume 91137.6 m3
    Per m3 liquid manure processed, 0.0000347 units of store (=5 months average storage time/(12months*40years*300m3/unit-year)). (note the unit of this dataset is "unit" of a store with 300 m3 capacity, i.e. m3 is not a correct unit of this dataset). Amount of liquid manure is from cattle and swine in mixed farming systems. The amount of liquid manure from cattle is calculated from the number of cattle (from FAOSTAT), 2833 kg feed dry matter intake per unit of cattle, 22% of this dry matter appears in the manure (18% for beef cattle, 23% for dairy cows), 3% of the manure is handled as liquid manure with 7.5% dry matter content. The amount of swine manure is calculated from the meat production (from FAOSTAT), 0.94 kg manure dry matter per kg meat (at 55% dry matter), 71% of swine manure handled as liquid manure with 5% dry matter content.
  property price 111.955 EUR2005
    Calculated based on inputs: The price of the product has been calculated as a sum of the values of the material and energy inputs for this product. This value is therefore a rough estimation. It may underestimate the real price since there are additional expenses when producing any product. These expences can include for example labour costs, treatment of waste materials and profit for the producer. Please consider carefully whether this level of data quality is acceptable for your application.

## Inputs from technosphere
- reinforcing steel: 22.6 kg; lognormal variance with pedigree 0.0421, pedigree (1,2,5,5,1)
  EcoSpold01Location=RER
  properties: carbon content, fossil 0.004, wet mass 1 kg, dry mass 1 kg
- lean concrete: 0.0244 m3; lognormal variance with pedigree 0.0421, pedigree (1,2,5,5,1)
  EcoSpold01Location=CH
  properties: water content 0.0528846, dry mass 2080 kg, wet mass 2190 kg
- waste wood, untreated: 0 kg; pedigree (1,1,1,1,1)
  EcoSpold01Location=CH
  production volume 0 kg
    Calculated from the production volume of liquid manure storage and processing facility in proportion to the respective output amounts.
  properties: heating value, net 13.99 MJ, water content 0.25, carbon content, non-fossil 0.48632, dry mass 0.8 kg, wet mass 1 kg
  note on heating value, net: Value taken from the general comment of the treatment dataset.
  note on carbon content, non-fossil: Tab A.4, ecoinvent v2.2 report 13_I. C content has been referred to 1 kg DM,
- waste reinforced concrete: 0 kg; pedigree (1,1,1,1,1)
  EcoSpold01Location=CH
  production volume 0 kg
    (same comment as for waste wood, untreated)
  properties: water content 0.00585407, dry mass 0.99418 kg, wet mass 1 kg
- zinc coat, pieces: 0.109 m2; lognormal variance with pedigree 0.0421, pedigree (1,2,5,5,1)
  EcoSpold01Location=RER
- electricity, low voltage: 0 kWh; pedigree (1,1,1,1,1)
  EcoSpold01Location=CH
- excavation, hydraulic digger: 2.53 m3; lognormal variance with pedigree 0.0421, pedigree (1,2,5,5,1)
  EcoSpold01Location=RER
- steel, chromium steel 18/8, hot rolled: 1.74 kg; lognormal variance with pedigree 0.0421, pedigree (1,2,5,5,1)
  EcoSpold01Location=RER
  properties: carbon content, fossil 0.0008, dry mass 1 kg, wet mass 1 kg
  note on carbon content, fossil: Stainless steel model is the grade 304 steel (18/8 stainless, 18% chromium 8% nickel; max. 0.08% C)
- cast iron: 1.91 kg; lognormal variance with pedigree 0.0421, pedigree (1,2,5,5,1)
  EcoSpold01Location=RER
  properties: carbon content, fossil 0.04, dry mass 1 kg, wet mass 1 kg
  note on carbon content, fossil: Cast iron is made by remelting pig iron in small furnaces (e.g. cupola furnaces or electric arc furnaces) and poured into moulds to make castings. It usually contains 2% to 6% carbon (ecoinvent v2.2 report 10_partII). An average content of 4% was considered
- waste bulk iron, excluding reinforcement: 0 kg; pedigree (1,1,1,1,1)
  EcoSpold01Location=CH
  production volume 0 kg
    (same comment as for waste wood, untreated)
  properties: dry mass 1 kg, wet mass 1 kg
- concrete, normal: 0 m3; pedigree (1,1,1,1,1)
  EcoSpold01Location=CH
  properties: water content 0.086758, dry mass 2190 kg, wet mass 2380 kg
- sawnwood, softwood, dried (u=20%), planed: 0.00272 m3; lognormal variance with pedigree 0.0421, pedigree (1,2,5,5,1)
  EcoSpold01Location=RER
  properties: heating value, net 6514.84 MJ, water content 0.2, carbon content, non-fossil 0.494, wet mass 540 kg, dry mass 450 kg
  note on carbon content, non-fossil: C content of dry mass is 0.494 kgC/kg dry wood (ecoinvent v2.2 report 9)
- waste concrete, not reinforced: 0 kg; pedigree (1,1,1,1,1)
  EcoSpold01Location=CH
  production volume 0 kg
    (same comment as for waste wood, untreated)
  properties: wet mass 1 kg, dry mass 1 kg
- excavation, skid-steer loader: 1.49 m3; lognormal variance with pedigree 0.0421, pedigree (1,2,5,5,1)
  EcoSpold01Location=RER
- waste wood, untreated: -0.0827154, -0.0102704, -0.000750879, -0.0288463, -0.00435799, -0.00688962, -0.128789, -1.09738 kg (8 entries); lognormal variance with pedigree 0.0421, pedigree (1,2,5,5,1)
  EcoSpold01Location=CH
  production volume 123947 kg
- waste reinforced concrete: -54.2833, -774.717 kg (2 entries); lognormal variance with pedigree 0.0421, pedigree (1,2,5,5,1)
  EcoSpold01Location=CH
  production volume 7.5553e7 kg
- electricity, low voltage: 0.00499018, 0.000908616, 0.0205109, 0.0716605, 0.0146299, 0.224615, 0.0363388, 0.104346 kWh (8 entries); lognormal variance with pedigree 0.0421, pedigree (1,2,5,5,1)
  EcoSpold01Location=CH
- waste bulk iron, excluding reinforcement: -1.21775, -2.53225 kg (2 entries); lognormal variance with pedigree 0.0421, pedigree (1,2,5,5,1)
  EcoSpold01Location=CH
  production volume 341766 kg
- concrete, normal: 0.00830047, 0.000864898, 0.00700196, 0.0039386, 0.0166789, 0.000562568, 0.329653 m3 (7 entries); lognormal variance with pedigree 0.0421, pedigree (1,2,5,5,1)
  EcoSpold01Location=CH
- waste concrete, not reinforced: -3.50975, -50.0903 kg (2 entries); lognormal variance with pedigree 0.0421, pedigree (1,2,5,5,1)
  EcoSpold01Location=CH
  production volume 4.88497e6 kg

## Inputs from nature
- Occupation, construction site [natural resource, land]: 0.376 m2*year; lognormal variance with pedigree 0.0821, pedigree (1,2,5,5,1)
- Transformation, from pasture, man made [natural resource, land]: 0.376 m2; lognormal variance with pedigree 0.1621, pedigree (1,2,5,5,1)
- Transformation, to urban, discontinuously built [natural resource, land]: 0.376 m2; lognormal variance with pedigree 0.1621, pedigree (1,2,5,5,1)
- Occupation, urban, discontinuously built [natural resource, land]: 15 m2*year; lognormal variance with pedigree 0.0821, pedigree (1,2,5,5,1)

## Sampling procedure
The inventory is calculated based on a solid database of agricultural buildings.

## Extrapolations
This dataset has been copied from an original dataset covering the geography CH. The uncertainty has been adjusted accordingly.

## Review by Roland Hischier 2003-08-06
Passed.
