# flexible duct production, aluminium/PET, DN of 125

Dataset: EcoSpold 2, unit process
Geography: RER
Time period: 2003-01-01 to 2021-12-31
Technology level: current
Classification: ISIC rev.4 ecoinvent: 2819:Manufacture of other general-purpose machinery
Classification: EcoSpold01Categories: ventilation/production of components
Tags: ConvertedDataset
Scenario: Business-as-Usual
System model: Allocation, cut-off by classification
Generated by: Alex Primas
Published in: Hässig, W. 2007
Database: ecoinvent
isCopyrightProtected: true
accessRestrictedTo: 1

## General comment
Production of a typical component used for a ventilation system in a multi family house. The house considered in the investigation includes 6 flats with 130 m2 floor area each and a ventilation rate of 120 m3/h.
[This dataset was already contained in the ecoinvent database version 2. It was not individually updated during the transfer to ecoinvent version 3. Life Cycle Impact Assessment results may still have changed, as they are affected by changes in the supply chain, i.e. in other datasets. This dataset was generated following the ecoinvent quality guidelines for version 2. It may have been subject to central changes described in the ecoinvent version 3 change report (http://www.ecoinvent.org/database/ecoinvent-version-3/reports-of-changes/), and the results of the central updates were reviewed extensively. The changes added e.g. consistent water flows and other information throughout the database. The documentation of this dataset can be found in the ecoinvent reports of version 2, which are still available via the ecoinvent website. The change report linked above covers all central changes that were made during the conversion process.]

## Geography
Data for production in Germany used.

## Technology
Flexible tube made of PET, laminated with aluminium foil and strengthened with galvanised steel spiral wire. Weight 0.205 kg/m

## Time period
Materials investigated in 2003

## Reference product
- flexible duct, aluminium/PET, DN of 125: 1 m; CPC 439: Other general-purpose machinery and parts thereof; By-product classification allocatable product
  EcoSpold01Location=RER
  production volume 1.32237 m
    This is a placeholder value that does not reflect real-world production volumes. This dataset does not currently require a real-world production volume to work in the database framework, and no actual data were collected yet. This has no negative effect on the results of the ecoinvent database. The placeholder value of this activity was scaled according to the nominal GDP of 2005 (source: United Nations, http://data.un.org/Glossary.aspx?q=GDP+%28current+US%24%29, accessed 20130726) to reflect an appropriate share of the global production volume, which is also a placeholder value.
  property carbon content, fossil 0.436512
    C content was calculated as an addition of C content in the product components (Flexible tube made of PET, laminated with aluminium foil and strengthened with galvanised steel spiral wire)
  property carbon content 0.436512
    carbon content on a dry matter basis (reserved; not for manual entry)
  properties: water in wet mass 0 kg, dry mass 0.205 kg, price 11.3 EUR2005, water content 0, carbon content, non-fossil 0, wet mass 0.205 kg, carbon allocation 0.089485 kg

## Inputs from technosphere
- laminating service, foil, with acrylic binder: 0.4 m2; lognormal variance with pedigree 0.072, pedigree (3,4,5,1,3)
  EcoSpold01Location=RER
  Questionnaire, approximation for technology
  Uncertainty: Questionnaire, approximation for technology
- waste paperboard: -0.0003 kg; lognormal variance with pedigree 0.07, pedigree (4,4,5,1,1)
  Estimations on precentage material disposed
  EcoSpold01Location=CH
  Uncertainty: Estimations on precentage material disposed
  production volume 0.0003 kg
    Calculated from the production volume of flexible duct, aluminum/PET, DN of 125 in proportion to the respective output amounts.
  properties: water content 0.243781, dry mass 0.804 kg, wet mass 1 kg, heating value, net 15.92 MJ, carbon content, non-fossil 0.483259
  note on heating value, net: Value taken from the general comment of the treatment dataset.
  note on carbon content, non-fossil: C content was calculated for 1 kg DM, using data in Tab A.3, ecoinvent v2.2 report 13_I.
- waste polyethylene terephthalate: -0.013 kg; lognormal variance with pedigree 0.07, pedigree (4,4,5,1,1)
  EcoSpold01Location=CH
  Estimations on precentage material disposed
  Uncertainty: Estimations on precentage material disposed
  production volume 0.013 kg
    (same comment as for waste paperboard)
  properties: heating value, net 22.95 MJ, dry mass 0.998 kg, wet mass 1 kg, carbon content, fossil 0.554108, water content 0.00200401
  note on carbon content, fossil: C content in 1 kg DM was calculated using data in Tab A.1, ecoinvent v2.2 report 13_I
- electricity, medium voltage: 0.0327 kWh; lognormal variance with pedigree 0.108, pedigree (3,5,5,1,3)
  Data estimated from related processes
  EcoSpold01Location=UCTE
  Uncertainty: Data estimated from related processes
- heat, district or industrial, natural gas: 0.28215 MJ; lognormal variance with pedigree 0.076, pedigree (4,5,5,1,1)
  Data estimated from related companies
  EcoSpold01Location=RER
  Uncertainty: Data estimated from related companies
  properties: heating value, net 1 MJ
- wire drawing, steel: 0.022 kg; lognormal variance with pedigree 0.054, pedigree (3,4,5,1,1)
  EcoSpold01Location=RER
  Questionnaire, estimations
  Uncertainty: Questionnaire, estimations
- corrugated board box: 0.0153 kg; lognormal variance with pedigree 0.054, pedigree (3,4,5,1,1)
  EcoSpold01Location=RER
  Questionnaire, estimations
  Uncertainty: Questionnaire, estimations
  properties: carbon content, fossil 0.00365437, dry mass 0.945 kg, carbon content, non-fossil 0.450248, wet mass 1 kg, heating value, net 12.86 MJ, water content 0.0582011
  note on carbon content, fossil: C content was calculated as an addition of C content in the raw materials.
- polyethylene terephthalate, granulate, amorphous: 0.143 kg; lognormal variance with pedigree 0.0526, pedigree (2,4,5,1,1)
  Questionnaire
  EcoSpold01Location=RER
  Uncertainty: Questionnaire
  properties: carbon content, fossil 0.625, dry mass 1 kg, wet mass 1 kg, heating value, net 22.95 MJ
  note on carbon content, fossil: Polymer of the ethylen terephtalate monomer (C10H8O4)n (ecoinvent v2.2 report 11_II), MW=192 g/mol
- extrusion, plastic film: 0.143 kg; lognormal variance with pedigree 0.054, pedigree (3,4,5,1,1)
  Questionnaire, estimations
  EcoSpold01Location=RER
  Uncertainty: Questionnaire, estimations
- aluminium, wrought alloy: 0.044 kg; lognormal variance with pedigree 0.0526, pedigree (2,4,5,1,1)
  Questionnaire
  EcoSpold01Location=RER
  Uncertainty: Questionnaire
  properties: wet mass 1 kg, dry mass 1 kg
- heat, district or industrial, other than natural gas: 0.28215 MJ; lognormal variance with pedigree 0.07, pedigree (1,1,5,1,1)
  EcoSpold01Location=RER
  4,5,1,1,1,5; Data estimated from related companies
  properties: heating value, net 1 MJ
- plastic processing factory: 1.52e-10 unit; lognormal variance with pedigree 0.394, pedigree (4,5,5,1,3)
  EcoSpold01Location=RER
  Calculated with data of a similar company
  Uncertainty: Calculated with data of a similar company
- sheet rolling, aluminium: 0.044 kg; lognormal variance with pedigree 0.054, pedigree (3,4,5,1,1)
  EcoSpold01Location=RER
  Questionnaire, estimations
  Uncertainty: Questionnaire, estimations
- steel, low-alloyed, hot rolled: 0.022 kg; lognormal variance with pedigree 0.054, pedigree (3,4,5,1,1)
  Questionnaire, estimations
  EcoSpold01Location=RER
  Uncertainty: Questionnaire, estimations
  properties: carbon content, fossil 0.005, dry mass 1 kg, wet mass 1 kg
  note on carbon content, fossil: Low alloyed steel composition given in Tab. 3.2 ecoinvent v2.2 report 10_partII. Steel assumed to have a C content of 0.5%

## Sampling procedure
Questionnaire and technical information of producer. Data of one common product used.

## Extrapolations
This dataset has been extrapolated from year 2003 to the year of the calculation (2021). The uncertainty has been adjusted accordingly.

## Review by Rolf Frischknecht 2007-08-16
passed
none
