# expansion vessel production, 25l

Dataset: EcoSpold 2, unit process
Geography: CH
Time period: 1993-01-01 to 2021-12-31
Technology level: current
Classification: ISIC rev.4 ecoinvent: 2512:Manufacture of tanks, reservoirs and containers of metal
Classification: EcoSpold01Categories: solar collector systems/production of components
Tags: ConvertedDataset
Scenario: Business-as-Usual
System model: Allocation, cut-off by classification
Generated by: Niels Jungbluth
Published in: Jungbluth, N. 2007
Database: ecoinvent
isCopyrightProtected: true
accessRestrictedTo: 1

## General comment
Expansion vessel with a capacity of 25l
[This dataset was already contained in the ecoinvent database version 2. It was not individually updated during the transfer to ecoinvent version 3. Life Cycle Impact Assessment results may still have changed, as they are affected by changes in the supply chain, i.e. in other datasets. This dataset was generated following the ecoinvent quality guidelines for version 2. It may have been subject to central changes described in the ecoinvent version 3 change report (http://www.ecoinvent.org/database/ecoinvent-version-3/reports-of-changes/), and the results of the central updates were reviewed extensively. The changes added e.g. consistent water flows and other information throughout the database. The documentation of this dataset can be found in the ecoinvent reports of version 2, which are still available via the ecoinvent website. The change report linked above covers all central changes that were made during the conversion process.]

## Included activities end
Production and disposal of an expansion vessel. Including materials and energy use of production. Not including infrastructure for factory.

## Geography
Production in CH.

## Technology
Expansion vessel (steel body with plastic) for heat exchange fluid used in a solar collector system.

## Time period
Time of information.

## Reference product
- expansion vessel, 25l: 1 unit; By-product classification allocatable product; CPC 39370: Vessels and other floating structures for breaking up
  production volume 0.0336675 unit
    This is a placeholder value that does not reflect real-world production volumes. This dataset does not currently require a real-world production volume to work in the database framework, and no actual data were collected yet. This has no negative effect on the results of the ecoinvent database. The placeholder value of this activity was scaled according to the nominal GDP of 2005 (source: United Nations, http://data.un.org/Glossary.aspx?q=GDP+%28current+US%24%29, accessed 20130726) to reflect an appropriate share of the global production volume, which is also a placeholder value.
  property price 21.6 EUR2005
    The production volume of this product is small compared to other products supplied by the activities within the same ISIC 3 category. Therefore, an average price of products supplied by the activities in the same ISIC 3 code has been applied.This price is obtained as '_65 Fabricated metal products, except machinery, EU27' (3.63 EURO2003/kg dry soilds) in the 'EU & DK Input Output Database' (available in SimaPro); Weight of product according to Ecoinvent: approx 6 kg per unit

## By-products
- waste paperboard, unsorted: 0 kg; By-product classification Recyclable; CPC 39240: Waste and scrap of paper or paperboard; pedigree (1,1,1,1,1)
  Questionnaire
  Questionnaire
  production volume 0 kg
    Calculated from the production volume of expansion vessel, 25l in proportion to the respective output amounts.
  property price 0.03924 EUR2005
    Temporary price data. Calculated as 90% of purchasers price based on: Assumed to be 10% less than for sorted waste paperboard
  property carbon content, non-fossil 0.483259
    C content was calculated for 1 kg DM, using data in Tab A.3, ecoinvent v2.2 report 13_I.
  property carbon content 0.483259
    carbon content on a dry matter basis (reserved; not for manual entry)
  properties: heating value, net 15.92 MJ, carbon content, fossil 0, wet mass 1 kg, water content 0.243781, dry mass 0.804 kg, water in wet mass 0.196 kg, carbon allocation 0.38854 kg

## Inputs from technosphere
- butyl acrylate: 0.7 kg; lognormal variance with pedigree 0.0506, pedigree (2,1,5,1,1)
  Questionnaire
  Questionnaire
  properties: heating value, net 31.22 MJ, wet mass 1 kg, carbon content, fossil 0.756757, dry mass 1 kg
- welding, gas, steel: 0.5 m; lognormal variance with pedigree 0.0506, pedigree (2,1,5,1,1)
  Questionnaire
  Questionnaire
- hot water tank factory: 4e-7 unit; lognormal variance with pedigree 0.348, pedigree (5,5,5,1,5)
  Rough estimation
  This exchange has an activity link directly to the producing activity because the product is primarily consumed in the same geographical area where it is produced.
- alkyd paint, white, without solvent, in 60% solution state: 0.07 kg; lognormal variance with pedigree 0.0506, pedigree (2,1,5,1,1)
  Questionnaire
  Questionnaire
  properties: dry mass 1 kg, heating value, net 10.3 MJ, wet mass 1 kg, carbon content, non-fossil 0.199629, carbon content, fossil 0.140367
  note on carbon content, non-fossil: C content was calculated as an addition of C content in the raw materials.
- waste plastic, mixture: -0.77 kg; lognormal variance with pedigree 0.0506, pedigree (2,1,5,1,1)
  Questionnaire
  Questionnaire
  production volume 0.77 kg
    (same comment as for waste paperboard, unsorted)
  properties: water content 0.180638, heating value, net 30.79 MJ, carbon content, fossil 0.747344, dry mass 0.847 kg, wet mass 1 kg
  note on heating value, net: Value taken from the general comment of the treatment dataset.
  note on carbon content, fossil: C content in 1 kg DM was calculated using data in Tab A.2, ecoinvent v2.2 report 13_I
- electricity, medium voltage: 8.61 kWh; lognormal variance with pedigree 0.0506, pedigree (2,1,5,1,1)
  Questionnaire
  Questionnaire
- waste polypropylene: -0.025 kg; lognormal variance with pedigree 0.0506, pedigree (2,1,5,1,1)
  Questionnaire
  Questionnaire
  production volume 0.025 kg
    (same comment as for waste paperboard, unsorted)
  properties: dry mass 0.841 kg, wet mass 1 kg, water content 0.189061, heating value, net 32.78 MJ, carbon content, fossil 0.825208
  note on heating value, net: Value assumed for all polypropylene products. Source: Phyllis2, database for (treated) biomass, algae, feedstocks for biogas production and biochar, https://phyllis.nl/Biomass/View/1186, ECN.TNO
  note on carbon content, fossil: C content in 1 kg DM was calculated using data in Tab A.1, ecoinvent v2.2 report 13_I
- steel, low-alloyed, hot rolled: 4.7 kg; lognormal variance with pedigree 0.0506, pedigree (2,1,5,1,1)
  Questionnaire
  Questionnaire
  properties: wet mass 1 kg, dry mass 1 kg, carbon content, fossil 0.005
  note on carbon content, fossil: Low alloyed steel composition given in Tab. 3.2 ecoinvent v2.2 report 10_partII. Steel assumed to have a C content of 0.5%
- heat, district or industrial, other than natural gas: 19 MJ; lognormal variance with pedigree 0.0506, pedigree (2,1,5,1,1)
  Questionnaire
  Questionnaire
  properties: heating value, net 1 MJ
- corrugated board box: 0.5 kg; lognormal variance with pedigree 0.0506, pedigree (2,1,5,1,1)
  Questionnaire
  Questionnaire
  properties: wet mass 1 kg, water content 0.0582011, dry mass 0.945 kg, carbon content, fossil 0.000656085, carbon content, non-fossil 0.432275, heating value, net 12.86 MJ
  note on carbon content, fossil: Fossil C content was calculated after fossil C contents of chemicals used in the production of board (Tab 10-15 & 10.16 ecoinvent v2.2 report 11_III, part 10)
  note on carbon content, non-fossil: Biogenic C content was calculated after biogenic C contents of chemicals used in the production of board (Tab 10.15 & 10.16, ecoinvent v2.2 report 11_III, part 10).
- polypropylene, granulate: 0.025 kg; lognormal variance with pedigree 0.0506, pedigree (2,1,5,1,1)
  Questionnaire
  Questionnaire
  properties: heating value, net 32.78 MJ, wet mass 1 kg, carbon content, fossil 0.857143, dry mass 1 kg
  note on heating value, net: Value extracted from "treatment of waste polypropylene, open burning"
  note on carbon content, fossil: Polypropylene is formed by the polymerisation of propylene, C3H6 (ecoinvent v2.2 report 11_II)
- waste paperboard, unsorted: -0.5 kg; lognormal variance with pedigree 0.0506, pedigree (2,1,5,1,1)
  Questionnaire
  Questionnaire
  production volume 0.5 kg
  properties: heating value, net 15.92 MJ, price 0.03924 EUR2005, wet mass 1 kg, water content 0.243781, dry mass 0.804 kg, carbon content, non-fossil 0.483259
  note on carbon content, non-fossil: C content was calculated for 1 kg DM, using data in Tab A.3, ecoinvent v2.2 report 13_I.

## Sampling procedure
Questionnaire.

## Extrapolations
This dataset has been extrapolated from year 1993 to the year of the calculation (2021). The uncertainty has been adjusted accordingly.

## Review by Sebastiano Meier 2003-07-16
Passed.
