# platinum group metal, mine and concentration operations

Dataset: EcoSpold 2, unit process
Geography: ZA
Time period: 2015-01-01 to 2021-12-31
Technology level: current
Classification: ISIC rev.4 ecoinvent: 0729:Mining of other non-ferrous metal ores
Scenario: Business-as-Usual
System model: Allocation, cut-off by classification
Share of production covered: 74.8 %
Generated by: Russo
Published in: Charikinya E. 2017
Database: ecoinvent
isCopyrightProtected: true
accessRestrictedTo: 1

## General comment
This dataset represents data from four major platinum producing companies in South Africa Northam Platinum, Anglo American Platinum, Lonmin Platinum and Impala Platinum. Of the four only Anglo-American Platinum, Lonmin Platinum and Impala Platinum operate refineries. Platinum Group Metals (PGMs) is recovered through underground and open pit mining. The processing of the ore consists of concentration, smelting and refining.
PGM mining in South Africa is located in the Bushveld Complex, which includes three distinct mineral-bearing reefs: The Merensky Reef, The UG2 Reef and Platreef.
[This dataset is meant to replace the following datasets:]

## Included activities start
Activities start with the ore mined and transported to the concentration facilities

## Included activities end
Activties end with the production of the PGMs concentrate. The datastes has an additional water input of wastewater of 0.105 m3 per kg of PGM concentrate produced, but it is not included in the exchanges due to modelling requeriments in ecoinvent. It accounts for two water sources used, namely: non potable water fom external sources and waste or second class water used.

## Geography
THE BUSHVELD COMPLEX: The Bushveld Complex, formed some 2 billion years ago, is found in the northern part of South Africa, and is the world’s largest layered intrusion. This igneous body hosts more than half the work’s platinum group metals, and other associated minerals such as chromium, vanadium and refractory minerals.
The intrusion is divided into four limbs – the northern, southern, eastern and western limbs. The Bushveld Complex is made up of the Rustenburg Layered Suite, the Lebowa Granites and the Rooiberg Felsics. It is underlain by rocks from the Transvaal Supergroup and overlain by Karoo sediments.
The Rustenburg Layered Suite contains mainly mafic rocks and is divided into a number of different zones. The marginal zone is found around the edge of the intrusion, while from the base of the complex up is the Lower Zone, the Critical Zone, the Main Zone and lastly the Upper Zone.
The chromitite seams in the Critical Zone are divided into the lower, the middle and the upper groups (UG), with the LG6, UG1 and UG2 being of greatest economic importance.
The magnetite in the Upper Zone is rich in vanadium.
The Merensky Reef is found between the Critical and the Main Zone, and is rich in Platinum Group Elements (PGEs) – i.e. platinum, palladium, rhodium, iridium, osmium and ruthenium.The complex has its geographic centre located north of Pretoria and it covers over 66.000 km2.
PLATINUM IN HISTORY: The first known occurrence of platinum in an application dates back to 700BC in Egypt, where the metal was used in the Casket of Thebes (a little box decorated with hieroglyphics in gold, silver and an alloy of PGMs).
Much later, in the 1500s in South America, the Spanish Conquistadors found many occurrences of what they termed platina, while they were panning for gold. In Europe, scientists of the day had a difficult time of trying to categorise and find application for the metal, mainly because of its durability and other extraordinary properties. A breakthrough came in the 18th century when a Swedish researcher added arsenic to the metal, but it was only in 1782 that platinum was successfully melted by adding oxygen.
After a further 25 years it became possible to produce platinum commercially using this method, and the metal was used mainly for decorative purposes. With the scientific and technological progress in the enlightenment era, there were breakthroughs in the refining of platinum, followed by the discovery of palladium and rhodium. The catalytic properties of platinum became apparent for the first time, and the first fuel cell was devised in 1842 using platinum electrodes.
In England the collaborative work of Percival Norton Johnson and his apprentice George Matthey gave rise to the eponymous partnership Johnson and Matthey. Their work at the time culminated in perfecting the techniques of separation and refining of PGMs and casting the metal in homogeneous ingots.
At that stage supplies were difficult to source, and came primarily from Colombia, the Urals in Russia and from later discoveries in Canada, which became the world’s largest supplier until the mid 20th century.
PLATINUM MINING IN SOUTH AFRICA: In South Africa the discovery of the first platinum nuggets dates back to 1924. The geologist Hans Merensky’s follow-up work resulted in the discovery of two deposits, each around 100 kilometres in length, which became known as the Bushveld Igneous Complex. This discovery started with test work in the area around Mashishing (formerly known as Lydenburg). Based on successive encouraging findings, Merensky approached a circle of friends to raise funds to investigate any payable platinum deposits. He used the farm Maandagshoek as a base and later secured 23 claims, and worked quickly to locate other platinum occurrences in the area. Merensky’s work resulted in the naming of the Merensky reef. In 1925 follow-up work resulted in the identification of the eastern limb of the Bushveld Complex.
The mines on this geological structure have for many years produced more than 75% of the world’s output.
Since World War 2 platinum mine production grew continuously in response to new applications being developed for the metals. A significant new use of platinum was in the petroleum industry, where platinum catalysts were introduced to increase the octane rating of petroleum and to manufacture important primary feedstocks for the growing plastics industry. This was followed in the 1960s by growing demand for platinum jewellery – given its purity, colour, prestige and value.
In the latter half of the 20th century, the platinum sector in South Africa was dominated by Gencor, JCI and Lonrho. Corporate actions eventually saw the mines in these groups housed under Implats, Amplats and Lonmin respectively, the majors in the sector, and responsible for producing up to 80% of the world’s PGM supplies.
The advent of black economic empowerment, and the use-it-or-lose-it approach to minerals rights (envisaged in the MPRDA) led to a shift in the sector, and the growth and rise of smaller platinum companies, including intense interest from foreign investors and operators alike. This legislation coincided with an upswing in PGM demand and prices from 2002 through to 2008, before a global economic depression heralded the end of the glory days in the platinum sector and shut many smaller operators down.

## Technology
The ores from the different ore bodies are processed in concentrators where a PGM concentrate is produced with a tailing by product. The PGM base metal concentrate product from the different concentrators processing the different ores are blended during the smelting phase to balance the sulphur content in the final matte product. Smelter operators also carry out toll smelting from third part concentrators. The smelter product is send to the Base metal refinery where the PGMs are separated from the Base Metals. Precious metal refinery is carried out on PGM concentrate from the Base metal refinery to split the PGMs into individual metal products.
Water analyses measurements for Anglo Platinum obtained from literature (Slatter et.al, 2009).
Mudd, G., 2010. Platinum group metals: a unique case study in the sustainability of mineral resources, in: The 4th International Platinum Conference, Platinum in Transition “Boom or Bust.”
Water share between MC and EC from Mudd (2010).
Mudd, G., 2010. Platinum group metals: a unique case study in the sustainability of mineral resources, in: The 4th International Platinum Conference, Platinum in Transition “Boom or Bust.”

## Parameters
- water used in primary activity: 0.04118 m3; name totWaterPA; = surface_water+water_well_in_ground+(potable_water/1000)
  total water consumption considering all the water sources
- fraction, process water, to air: 0.15 dimensionless; name fraction_PW_to_air
  Literature value. In case when no industry/process specific data are available, default evaporation fraction value is used. This value is 15% and is based on literature (Statistics Canada, 2007 & Shaffer, K.H., 2008, Consumptive water use in the Great Lakes Basin, USGS & Shiklomanov, 2003, World Water Resources at the Beginning of the 21st Century) and has been approved by an expert.

## Reference product
- platinum group metal concentrate: 1 kg; name PGM_concentrate; CPC 4133: Platinum, unwrought or in semi-manufactured forms, or in powder form; By-product classification allocatable product
  Concentrate quantity back calculated from PGM production volumes in 2015 SD reports for Anglo, Lonmin, Northam and implats. A refinery and smlter recovery value of 98% was assummed from literature (Jones, 1999). Total PGM produced ex-mine operations: (Anglo,2015),(Implats,2015),(Northam, 2015), (Lonmin,2015). Refinery recovery (Jones,1999)
  production volume 1.59249e9 kg; name APV_PGM_conc
    South Africa overall PGM concentrate production 1592485549 kg, calculated figure based on PGM 4E concentrate average grade value of 173.33 g/t (Cowen et.al, 2012)
    Cowen, D.A., Agnello, V., Petit, P.J. Evaluation of net smelter returns in the South African PGE industry by application of base metal concentrate commercial treatment terms. Southern African Institute of Mining and Metallurgy, Platinum conference, 2012. pp. 577-592.
  property carbon content, fossil 0; name PGM_concentrate_C_content_fossil
    fossil carbon content on a dry matter basis
  property nickel content 0.0141; name PGM_concentrate_Ni_content
    nickel content (as percentage) on a dry matter basis
  property platinum content 8.75e-5; name PGM_concentrate_Pt_content
    platinum content (as percentage) on a dry matter basis
  property dry mass 1 kg; name PGM_concentrate_DM
  property wet mass 1 kg; name PGM_concentrate_WM
  property price 1358.26 EUR2005; name PGM_concentrate_price_EUR2005
    Literature price. CRAMER, L.A. What is your PGM concentrate worth? Third International Platinum Conference Platinum in Transformation, The Southern African
    Institute of Mining and Metallurgy, 2008.
  property sulfur content 0.0655; name PGM_concentrate_S_content
  property water in wet mass 0 kg; name PGM_concentrate_WWM
  property water content 0; name PGM_concentrate_water_content
  property carbon content, non-fossil 0; name PGM_concentrate_C_content_non_fossil
    biogene carbon content on a dry matter basis
  property silicon content 0.432; name PGM_concentrate_Si_content
  property rhodium content 1.17e-5; name PGM_concentrate_Rh_content
    rhodium content (as percentage) on a dry matter basis
  property gold content 3.63e-6; name PGM_concentrate_Au_content
    gold content (as percentage) on a dry matter basis
  property calcium content 0.0275; name PGM_concentrate_Ca_content
  property palladium content 5.18e-5; name PGM_concentrate_Pd_content
    palladium content (as percentage) on a dry matter basis
  property manganese content 0.195; name PGM_concentrate_Mn_content
  property copper content 0.0323; name PGM_concentrate_Cu_content
    copper content (as percentage) on a dry matter basis
  property cobalt content 0.0007; name PGM_concentrate_Co_content
  property aluminium content 0.027; name PGM_concentrate_Al_content
  property chromium content 0.016; name PGM_concentrate_Cr_content
  property iron content 0.19; name PGM_concentrate_Fe_content
  property carbon content 0
    carbon content on a dry matter basis (reserved; not for manual entry)
  properties: carbon allocation 0 kg

## Inputs from technosphere
- chemical, organic: 0.0494 kg; lognormal variance with pedigree 0.0027, pedigree (2,2,3,1,1)
  Flotation chemical used during PGM concentration, calculated per kg ore processed based on reagent feed dossage (depressants, focculants and collectors) of 720g/ton. Value obtained from Personal communication with CMR UCT flotation lab
  properties: carbon content, fossil 0.628, wet mass 1 kg, dry mass 1 kg, heating value, net 19.03 MJ
  note on carbon content, fossil: This dataset is an unweighted average of 20 organic substances (listed in Tab 88.1, ecoinvent v2.2 report 8, part II), being part of the top100 chemicals included in this database. The C-content has also been calculated as an unweighted average of the C content of the substances composing this dataset.
- tap water: 19.3 kg; name potable_water; lognormal variance with pedigree 0.0027, pedigree (2,2,3,1,1)
  Values from 2015 SD reports for Anglo and implats. Shares for water between Mining and Concentration and Extraction and Refinery obtained from Mudd 2010.
  properties: water content 2962.17, wet mass 1 kg, dry mass 0.000337476 kg, carbon content, fossil 0.00178991
  note on carbon content, fossil: Bicarbonate content is 2.93 mol/m3. CO2 content is 0.1 mol/m3 (ecoinvent v2.2 report 8, Tab 93.1).
- diesel, burned in building machine: 2.8 MJ; lognormal variance with pedigree 0.0027, pedigree (2,2,3,1,1)
  This account for Scope 1 emission from fuel use within the plant. Values from 2015 SD reports for Anglo Platinum , Northam and implats. Shares of fossil fuels between MC and ER obtained from Anglo SD 2015.
  properties: heating value, net 1 MJ
- blasting: 0.377 kg; lognormal variance with pedigree 0.0027, pedigree (2,2,3,1,1)
  Values from 2015 SD reports for Anglo, and Northam
- electricity, medium voltage: 4.75 kWh; lognormal variance with pedigree 0.0027, pedigree (2,2,3,1,1)
  Electricity requirements for the mining and concentration operation for PGMs. Calulated on the average annual production and scaled donw to 1 kg of PMG concentrate produce. Values from 2015 SD reports for Anglo Platinum , Northam, Lonmin and implats. Shares of electricity between MC and ER obtained from Anglo SD 2015.
- sulfidic tailings, generic: -38 kg; name pgm_tailing; lognormal variance with pedigree 0.0027, pedigree (2,2,3,1,1)
  Tailings calculated from mineral waste accumulated in tailings dam values reported in 2015 SD for Anglo, Lonmin, Northam and implats.
  production volume 6.05145e10 kg; = APV_PGM_conc * (pgm_tailing / PGM_concentrate)
    Calculated from production volume of reference product using the relative outputs.
  properties: oxygen content 0.89157, calcium content 0.034, potassium content 0.0025181, magnesium content 0.239, iron content 0.263, aluminium content 0.175, sulfur content 0.00743, wet mass 1 kg, water content 0.428571, chromium content 0.348, dry mass 0.7 kg, silicon content 0.362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
- mine infrastructure, underground, non-ferrous metal: 5e-11 unit; = 1/(50*400000000); lognormal variance with pedigree 0.172, pedigree (4,4,5,5,5)
  Calculated value from the infrastructure capacity of 400.000 ton/year, life time of 50 years and scaed down to 1kg of PGM concentrate produce.
- lubricating oil: 0.0856 kg; name lub_oil; lognormal variance with pedigree 0.0027, pedigree (2,2,3,1,1)
  Values from 2015 SD reports for Anglo Platinum and implats. Shares of lubricants between MC and ER obtained Anglo SD 2015. Calculated value from companies annual reports and scaled down to refer 1 kg of PGMs concentrate. It accounts for lubricating oils and grease used within the plant. A density of 0.9 kg/m3 was used to convert volumes into mass. Usual range for lubricating oil and grease is 0,85/0,95 kg/m3.
  properties: dry mass 1 kg, carbon content, fossil 0.75, wet mass 1 kg, heating value, net 40.2 MJ
  note on carbon content, fossil: Lubricating oil is produced from diesel. C-content/dry mass of fats and oils considered 75%, from: ecoinvent v2.2 report, n 15a, pg 40
  note on heating value, net: Literature value, Source: IPCC 2006, 2006 IPCC Guidelines for National Greenhouse Gas Inventories, Prepared by the National Greenhouse Gas Inventories Programme, Eggleston H.S., Buendia L., Miwa K., Ngara T. and Tanabe K. (eds). Published: IGES, Japan

## Inputs from nature
- Transformation, to unspecified [natural resource, land]: 0.1575 m2; = land_disturbed-new_land_to_mineral_extraction_site; lognormal variance with pedigree 0.0021, pedigree (1,2,3,1,1)
  Calculated value to close the balance of the total land disturbed
- Gangue, in ground [natural resource, in ground]: 38.92 kg; lognormal variance with pedigree 0.0021, pedigree (1,2,3,1,1)
  Calculated value from the milled ore and the feed composition to produce 1 kg of PGMs concentrate as RP.
- Occupation, mineral extraction site [natural resource, land]: 0.246 m2*year; lognormal variance with pedigree 0.0027, pedigree (2,2,3,1,1)
  Values from 2015 SD reports for Anglo, Northam and implats.
- Water, well, in ground [natural resource, in water]: 0.00668 m3; name water_well_in_ground; lognormal variance with pedigree 0.0027, pedigree (2,2,3,1,1)
  Values from 2015 SD reports for Anglo, Northam and implats. Shares for water between Mining and Concentration and Extraction and Refinery obtained from Mudd 2010.
- Copper, in ground [natural resource, in ground]: 0.038 kg; name Cu_in_ground; lognormal variance with pedigree 0.0027, pedigree (2,2,3,1,1)
  Calculated from tons ore milled and feed ore grade based on feed ore minerology in Ore Reserves and Mineral Resources reports 2015
- Transformation, to mineral extraction site [natural resource, land]: 0.0285 m2; name new_land_to_mineral_extraction_site; lognormal variance with pedigree 0.0027, pedigree (2,2,3,1,1)
  Values from 2015 SD reports for Anglo, Lonmin, Northam and implats.
- Platinum, in ground [natural resource, in ground]: 0.000103 kg; name platinun_in_ground; lognormal variance with pedigree 0.0027, pedigree (2,2,3,1,1)
  (same comment as for Copper, in ground)
- Transformation, from unspecified [natural resource, land]: 0.186 m2; name land_disturbed; lognormal variance with pedigree 0.0027, pedigree (2,2,3,1,1)
  Values from 2015 SD reports for Anglo, Northam and implats.
- Water, river [natural resource, in water]: 0.0152 m3; name surface_water; lognormal variance with pedigree 0.0027, pedigree (2,2,3,1,1)
  Values from 2015 SD reports for Anglo and implats. Shares for water between Mining and Concentration and Extraction and Refinery obtained from Mudd (2010). Mudd, G., 2010. Platinum group metals: a unique case study in the sustainability of mineral resources, in: The 4th International Platinum Conference, Platinum in Transition “Boom or Bust.”
- Rhodium, in ground [natural resource, in ground]: 1.37e-5 kg; name Rh_in_ground; lognormal variance with pedigree 0.0027, pedigree (2,2,3,1,1)
  (same comment as for Copper, in ground)
- Palladium, in ground [natural resource, in ground]: 6.09e-5 kg; name Pd_in_ground; lognormal variance with pedigree 0.0027, pedigree (2,2,3,1,1)
  (same comment as for Copper, in ground)
- Gold, in ground [natural resource, in ground]: 4.27e-6 kg; lognormal variance with pedigree 0.0027, pedigree (2,2,3,1,1)
  (same comment as for Copper, in ground)
- Nickel, in ground [natural resource, in ground]: 0.0166 kg; name Ni_in_groud; lognormal variance with pedigree 0.0027, pedigree (2,2,3,1,1)
  (same comment as for Copper, in ground)

## Emissions to nature
- Nitrogen oxides [air, non-urban air or from high stacks]: 1.2e-7 kg; lognormal variance with pedigree 0.0067, pedigree (3,4,3,3,2)
  Emissions of NOx to air have been calculated using the following reference in combination with companies reports. 2012, NIP Emissions Estimation Technique Manual for Mining, National Pollution Inventory, 1, Environmental Australia, 0 - Undefined. Online version: http://www.npi.gov.au
- Oils, unspecified [soil, industrial]: 0.0642 kg; = lub_oil*0.75; lognormal variance with pedigree 0.0027, pedigree (2,2,3,1,1)
  Emission to soil from the use of Luricating and hydraulic oils. It has been estimated that approximaly 70-80 % of hydraulic oils leave the system due to leakage, spill, line and hose breakage and fitting failures. www.machinerylubrication.com
- Manganese [air, non-urban air or from high stacks]: 3.38e-7 kg; lognormal variance with pedigree 0.0067, pedigree (3,4,3,3,2)
  Emissions of Manganese to air have been calculated using the following reference in combination with companies reports. 2012, NIP Emissions Estimation Technique Manual for Mining, National Pollution Inventory, 1, Environmental Australia, 0 - Undefined. Online version: http://www.npi.gov.au
- Particulates, > 2.5 um, and < 10um [air, low population density, long-term]: 0.000158 kg; lognormal variance with pedigree 0.0027, pedigree (2,2,3,1,1)
  Emissions of PM < 2.5 um and > 10 to air have been calculated using the following reference in combination with companies reports. 2012, NIP Emissions Estimation Technique Manual for Mining, National Pollution Inventory, 1, Environmental Australia, 0 - Undefined. Online version: http://www.npi.gov.au
- Chromium [air, non-urban air or from high stacks]: 5.56e-8 kg; lognormal variance with pedigree 0.0067, pedigree (3,4,3,3,2)
  Emissions of Chromium to air have been calculated using the following reference in combination with companies reports. 2012, NIP Emissions Estimation Technique Manual for Mining, National Pollution Inventory, 1, Environmental Australia, 0 - Undefined. Online version: http://www.npi.gov.au
- Carbon disulfide [air, non-urban air or from high stacks]: 9.07e-5 kg; lognormal variance with pedigree 0.0067, pedigree (3,4,3,3,2)
  Emissions of Carbon disulfide to air have been calculated using the following reference in combination with companies reports. 2012, NIP Emissions Estimation Technique Manual for Mining, National Pollution Inventory, 1, Environmental Australia, 0 - Undefined. Online version: http://www.npi.gov.au
- Cobalt [air, non-urban air or from high stacks]: 3.29e-8 kg; lognormal variance with pedigree 0.0067, pedigree (3,4,3,3,2)
  Emissions of Cobalt to air have been calculated using the following reference in combination with companies reports. 2012, NIP Emissions Estimation Technique Manual for Mining, National Pollution Inventory, 1, Environmental Australia, 0 - Undefined. Online version: http://www.npi.gov.au
- Cadmium [air, urban air close to ground]: 3.9e-11 kg; lognormal variance with pedigree 0.0067, pedigree (3,4,3,3,2)
  Emissions of Cadmium to air have been calculated using the following reference in combination with companies reports. 2012, NIP Emissions Estimation Technique Manual for Mining, National Pollution Inventory, 1, Environmental Australia, 0 - Undefined. Online version: http://www.npi.gov.au
- Antimony [air, non-urban air or from high stacks]: 7.12e-8 kg; lognormal variance with pedigree 0.0067, pedigree (3,4,3,3,2)
  Emissions of Antimony to air have been calculated using the following reference in combination with companies reports. 2012, NIP Emissions Estimation Technique Manual for Mining, National Pollution Inventory, 1, Environmental Australia, 0 - Undefined. Online version: http://www.npi.gov.au
- Copper [air, non-urban air or from high stacks]: 5.2e-8 kg; lognormal variance with pedigree 0.0086, pedigree (3,4,3,5,2)
  Emissions of Copper to air have been calculated using the following reference in combination with companies reports. 2012, NIP Emissions Estimation Technique Manual for Mining, National Pollution Inventory, 1, Environmental Australia, 0 - Undefined. Online version: http://www.npi.gov.au
- Dioxins, measured as 2,3,7,8-tetrachlorodibenzo-p-dioxin [air, non-urban air or from high stacks]: 8.59e-15 kg; lognormal variance with pedigree 0.0067, pedigree (3,4,3,3,2)
  Emissions of Dioxins to air have been calculated using the following reference in combination with companies reports. 2012, NIP Emissions Estimation Technique Manual for Mining, National Pollution Inventory, 1, Environmental Australia, 0 - Undefined. Online version: http://www.npi.gov.au
- Zinc, ion [water, surface water]: 3.46e-5 kg; lognormal variance with pedigree 0.0086, pedigree (3,4,3,5,2)
  Emissions of Zinc, ion to water have been calculated using the following reference in combination with companies reports 2016, IPCC, Draf Document of Best Available Techinques for Management of Tailings and Waste Rock in Mining Activities 1, EU, 0 udefined, retrived at http://susproc.jrc.ec.europa.eu/activities/waste/documents/MWEI_BREF_draft.pdf
- Arsenic [air, non-urban air or from high stacks]: 5.55e-9 kg; lognormal variance with pedigree 0.0067, pedigree (3,4,3,3,2)
  Emissions of Arsenic to air have been calculated using the following reference in combination with companies reports. 2012, NIP Emissions Estimation Technique Manual for Mining, National Pollution Inventory, 1, Environmental Australia, 0 - Undefined. Online version: http://www.npi.gov.au
- DOC, Dissolved Organic Carbon [water, surface water]: 1.89e-6 kg; lognormal variance with pedigree 0.0067, pedigree (3,4,3,3,2)
  Emissions of COD to water have been calculated using the following reference in combination with companies reports 2016, IPCC, Draf Document of Best Available Techinques for Management of Tailings and Waste Rock in Mining Activities 1, EU, 0 udefined, retrived at http://susproc.jrc.ec.europa.eu/activities/waste/documents/MWEI_BREF_draft.pdf
- Iron, ion [water, surface water]: 0.000133 kg; lognormal variance with pedigree 0.0067, pedigree (3,4,3,3,2)
  Emissions of Iron, ion to water have been calculated using the following reference in combination with companies reports 2016, IPCC, Draf Document of Best Available Techinques for Management of Tailings and Waste Rock in Mining Activities 1, EU, 0 udefined, retrived at http://susproc.jrc.ec.europa.eu/activities/waste/documents/MWEI_BREF_draft.pdf
- Beryllium [air, non-urban air or from high stacks]: 9.24e-10 kg; lognormal variance with pedigree 0.0067, pedigree (3,4,3,3,2)
  Emissions of Beryllium to air have been calculated using the following reference in combination with companies reports. 2012, NIP Emissions Estimation Technique Manual for Mining, National Pollution Inventory, 1, Environmental Australia, 0 - Undefined. Online version: http://www.npi.gov.au
- Carbon dioxide, fossil [air, non-urban air or from high stacks]: 0.000941 kg; lognormal variance with pedigree 0.1261, pedigree (3,4,3,3,5)
  Emissions of CO2 to air have been calculated using the following reference in combination with companies reports. 2012, NIP Emissions Estimation Technique Manual for Mining, National Pollution Inventory, 1, Environmental Australia, 0 - Undefined. Online version: http://www.npi.gov.au
- Boron [air, non-urban air or from high stacks]: 3.56e-9 kg; lognormal variance with pedigree 0.0067, pedigree (3,4,3,3,2)
  Emissions of Boron to air have been calculated using the following reference in combination with companies reports. 2012, NIP Emissions Estimation Technique Manual for Mining, National Pollution Inventory, 1, Environmental Australia, 0 - Undefined. Online version: http://www.npi.gov.au
- Tin, ion [water, surface water]: 1.29e-9 kg; lognormal variance with pedigree 0.0067, pedigree (3,4,3,3,2)
  Emissions of Tin, ion to water have been calculated using the following reference in combination with companies reports 2016, IPCC, Draf Document of Best Available Techinques for Management of Tailings and Waste Rock in Mining Activities 1, EU, 0 udefined, retrived at http://susproc.jrc.ec.europa.eu/activities/waste/documents/MWEI_BREF_draft.pdf
- TOC, Total Organic Carbon [water, surface water]: 1.89e-6 kg; lognormal variance with pedigree 0.0067, pedigree (3,4,3,3,2)
  Emissions of TOC to water have been calculated using the following reference in combination with companies reports 2016, IPCC, Draf Document of Best Available Techinques for Management of Tailings and Waste Rock in Mining Activities 1, EU, 0 udefined, retrived at http://susproc.jrc.ec.europa.eu/activities/waste/documents/MWEI_BREF_draft.pdf
- Manganese [water, surface water]: 1.13e-5 kg; lognormal variance with pedigree 0.0086, pedigree (3,4,3,5,2)
  Emissions of Manganese to water have been calculated using the following reference in combination with companies reports 2016, IPCC, Draf Document of Best Available Techinques for Management of Tailings and Waste Rock in Mining Activities 1, EU, 0 udefined, retrived at http://susproc.jrc.ec.europa.eu/activities/waste/documents/MWEI_BREF_draft.pdf
- Mercury [water, surface water]: 1.73e-8 kg; lognormal variance with pedigree 0.0067, pedigree (3,4,3,3,2)
  Emissions of Mercury to water have been calculated using the following reference in combination with companies reports 2016, IPCC, Draf Document of Best Available Techinques for Management of Tailings and Waste Rock in Mining Activities 1, EU, 0 udefined, retrived at http://susproc.jrc.ec.europa.eu/activities/waste/documents/MWEI_BREF_draft.pdf
- Chromium, ion [water, surface water]: 2.51e-7 kg; lognormal variance with pedigree 0.0067, pedigree (3,4,3,3,2)
  Emissions of Chromium, ion to water have been calculated using the following reference in combination with companies reports 2016, IPCC, Draf Document of Best Available Techinques for Management of Tailings and Waste Rock in Mining Activities 1, EU, 0 udefined, retrived at http://susproc.jrc.ec.europa.eu/activities/waste/documents/MWEI_BREF_draft.pdf
- COD, Chemical Oxygen Demand [water, surface water]: 4.84e-6 kg; lognormal variance with pedigree 0.0067, pedigree (3,4,3,3,2)
  (same comment as for DOC, Dissolved Organic Carbon)
- Cobalt [water, surface water]: 3.59e-7 kg; lognormal variance with pedigree 0.0067, pedigree (3,4,3,3,2)
  Emissions of Cobalt to water have been calculated using the following reference in combination with companies reports 2016, IPCC, Draf Document of Best Available Techinques for Management of Tailings and Waste Rock in Mining Activities 1, EU, 0 udefined, retrived at http://susproc.jrc.ec.europa.eu/activities/waste/documents/MWEI_BREF_draft.pdf
- Cyanide [water, surface water]: 3.16e-6 kg; lognormal variance with pedigree 0.008, pedigree (3,4,3,5,1)
  Emissions of Cyanide to water have been calculated using the following reference in combination with companies reports 2016, IPCC, Draf Document of Best Available Techinques for Management of Tailings and Waste Rock in Mining Activities 1, EU, 0 udefined, retrived at http://susproc.jrc.ec.europa.eu/activities/waste/documents/MWEI_BREF_draft.pdf
- Copper, ion [water, surface water]: 3.62e-6 kg; lognormal variance with pedigree 0.0067, pedigree (3,4,3,3,2)
  Emissions of Copper, ion to water have been calculated using the following reference in combination with companies reports 2016, IPCC, Draf Document of Best Available Techinques for Management of Tailings and Waste Rock in Mining Activities 1, EU, 0 udefined, retrived at http://susproc.jrc.ec.europa.eu/activities/waste/documents/MWEI_BREF_draft.pdf
- Aluminium [water, surface water]: 3.95e-5 kg; lognormal variance with pedigree 0.0067, pedigree (3,4,3,3,2)
  Emissions of aluminium to water have been calculated using the following reference in combination with companies reports. 2016, IPCC, Draf Document of Best Available Techinques for Management of Tailings and Waste Rock in Mining Activities 1, EU, 0 udefined, retrived at http://susproc.jrc.ec.europa.eu/activities/waste/documents/MWEI_BREF_draft.pdf
- Water [air, unspecified]: 0.006177 m3; name water_to_air_unspecified; = totWaterPA*fraction_PW_to_air; lognormal variance with pedigree 0.0027, pedigree (2,2,3,1,1)
  water emission to air
- Lead [water, surface water]: 1.28e-6 kg; lognormal variance with pedigree 0.0067, pedigree (3,4,3,3,2)
  Emissions of Lead to water have been calculated using the following reference in combination with companies reports 2016, IPCC, Draf Document of Best Available Techinques for Management of Tailings and Waste Rock in Mining Activities 1, EU, 0 udefined, retrived at http://susproc.jrc.ec.europa.eu/activities/waste/documents/MWEI_BREF_draft.pdf
- Arsenic, ion [water, surface water]: 1.35e-6 kg; lognormal variance with pedigree 0.0067, pedigree (3,4,3,3,2)
  Emissions of Aresenic, ion to water have been calculated using the following reference in combination with companies reports 2016, IPCC, Draf Document of Best Available Techinques for Management of Tailings and Waste Rock in Mining Activities 1, EU, 0 udefined, retrived at http://susproc.jrc.ec.europa.eu/activities/waste/documents/MWEI_BREF_draft.pdf
- Zinc [air, non-urban air or from high stacks]: 1.54e-7 kg; lognormal variance with pedigree 0.0067, pedigree (3,4,3,3,2)
  Emissions of Zinc to air have been calculated using the following reference in combination with companies reports. 2012, NIP Emissions Estimation Technique Manual for Mining, National Pollution Inventory, 1, Environmental Australia, 0 - Undefined. Online version: http://www.npi.gov.au
- BOD5, Biological Oxygen Demand [water, surface water]: 3.22e-6 kg; lognormal variance with pedigree 0.0067, pedigree (3,4,3,3,2)
  Emissions of BOD5 to water have been calculated using the following reference in combination with companies reports 2016, IPCC, Draf Document of Best Available Techinques for Management of Tailings and Waste Rock in Mining Activities 1, EU, 0 udefined, retrived at http://susproc.jrc.ec.europa.eu/activities/waste/documents/MWEI_BREF_draft.pdf
- Nickel [air, non-urban air or from high stacks]: 5.51e-8 kg; lognormal variance with pedigree 0.0067, pedigree (3,4,3,3,2)
  Emissions of Nickel to air have been calculated using the following reference in combination with companies reports. 2012, NIP Emissions Estimation Technique Manual for Mining, National Pollution Inventory, 1, Environmental Australia, 0 - Undefined. Online version: http://www.npi.gov.au
- Chlorine [water, surface water]: 0.000138 kg; lognormal variance with pedigree 0.0027, pedigree (2,2,3,1,1)
  Water analyses measurements for Anglo Platinum obtained from literature (Slatter et.al, 2009). Slatter, KA and Plint, ND and Cole, M and Dilsook, V and De Vaux, D and Palm, N and Oostendorp, B., 2009. Water management in Anglo Platinum process operations: effects of water quality on process operations, in: International Mine Water Conference. pp. 19-23.
- Particulates, < 2.5 um [air, non-urban air or from high stacks]: 1.75e-5 kg; lognormal variance with pedigree 0.0067, pedigree (3,4,3,3,2)
  Emissions of PM < 2.5 to air have been calculated using the following reference in combination with companies reports. 2012, NIP Emissions Estimation Technique Manual for Mining, National Pollution Inventory, 1, Environmental Australia, 0 - Undefined. Online version: http://www.npi.gov.au
- Calcium, ion [water, surface water]: 0.000313 kg; lognormal variance with pedigree 0.0027, pedigree (2,2,3,1,1)
  (same comment as for Chlorine)
- Particulates, > 10 um [air, non-urban air or from high stacks]: 0.000181 kg; lognormal variance with pedigree 0.0067, pedigree (3,4,3,3,2)
  Emissions of PM > 10 to air have been calculated using the following reference in combination with companies reports. 2012, NIP Emissions Estimation Technique Manual for Mining, National Pollution Inventory, 1, Environmental Australia, 0 - Undefined. Online version: http://www.npi.gov.au
- Cadmium, ion [water, surface water]: 1.45e-7 kg; lognormal variance with pedigree 0.0067, pedigree (3,4,3,3,2)
  Emissions of Cadmium, ion to water have been calculated using the following reference in combination with companies reports 2016, IPCC, Draf Document of Best Available Techinques for Management of Tailings and Waste Rock in Mining Activities 1, EU, 0 udefined, retrived at http://susproc.jrc.ec.europa.eu/activities/waste/documents/MWEI_BREF_draft.pdf
- Sulfur dioxide [air, non-urban air or from high stacks]: 0.000654 kg; lognormal variance with pedigree 0.0086, pedigree (3,4,3,5,2)
  Emissions of SO2 to air have been calculated using the following reference in combination with companies reports. 2012, NIP Emissions Estimation Technique Manual for Mining, National Pollution Inventory, 1, Environmental Australia, 0 - Undefined. Online version: http://www.npi.gov.au
- Nitrogen, organic bound [water, surface water]: 1.04e-5 kg; lognormal variance with pedigree 0.0027, pedigree (2,2,3,1,1)
  (same comment as for Chlorine)
- Fluorine [air, non-urban air or from high stacks]: 3.38e-7 kg; lognormal variance with pedigree 0.0086, pedigree (3,4,3,5,2)
  Emissions of Florine to air have been calculated using the following reference in combination with companies reports. 2012, NIP Emissions Estimation Technique Manual for Mining, National Pollution Inventory, 1, Environmental Australia, 0 - Undefined. Online version: http://www.npi.gov.au
- Sulfur dioxide [air, low population density, long-term]: 0.043 kg; lognormal variance with pedigree 0.0027, pedigree (2,2,3,1,1)
  Values from 2015 SD reports for Anglo Platinum.
- Selenium [air, non-urban air or from high stacks]: 1.89e-11 kg; lognormal variance with pedigree 0.0067, pedigree (3,4,3,3,2)
  Emissions of Selenium to air have been calculated using the following reference in combination with companies reports. 2012, NIP Emissions Estimation Technique Manual for Mining, National Pollution Inventory, 1, Environmental Australia, 0 - Undefined. Online version: http://www.npi.gov.au
- Sodium [water, unspecified]: 0.000215 kg; lognormal variance with pedigree 0.0027, pedigree (2,2,3,1,1)
  (same comment as for Chlorine)
- Tin [air, non-urban air or from high stacks]: 5.61e-9 kg; lognormal variance with pedigree 0.0067, pedigree (3,4,3,3,2)
  Emissions of Tin to air have been calculated using the following reference in combination with companies reports. 2012, NIP Emissions Estimation Technique Manual for Mining, National Pollution Inventory, 1, Environmental Australia, 0 - Undefined. Online version: http://www.npi.gov.au
- Water [water, surface water]: 0.035003 m3; name water_to_water_unspecified; = totWaterPA*(1-fraction_PW_to_air); lognormal variance with pedigree 0.0027, pedigree (2,2,3,1,1)
  Water emission to water bodies. Calculated from values from 2015 SD reports for Anglo Platinum and subtracting the fraction of Process water lost to air
- NMVOC, non-methane volatile organic compounds, unspecified origin [air, non-urban air or from high stacks]: 1.71e-7 kg; lognormal variance with pedigree 0.0067, pedigree (3,4,3,3,2)
  Emissions of NMVOC to air have been calculated using the following reference in combination with companies reports. 2012, NIP Emissions Estimation Technique Manual for Mining, National Pollution Inventory, 1, Environmental Australia, 0 - Undefined. Online version: http://www.npi.gov.au
- Dissolved solids [water, surface water]: 2.37e-6 kg; lognormal variance with pedigree 0.0027, pedigree (2,2,3,1,1)
  (same comment as for Chlorine)
- Mercury [air, non-urban air or from high stacks]: 1.78e-11 kg; lognormal variance with pedigree 0.0067, pedigree (3,4,3,3,2)
  Emissions of Mercury to air have been calculated using the following reference in combination with companies reports. 2012, NIP Emissions Estimation Technique Manual for Mining, National Pollution Inventory, 1, Environmental Australia, 0 - Undefined. Online version: http://www.npi.gov.au
- Nickel, ion [water, surface water]: 1.11e-5 kg; lognormal variance with pedigree 0.0027, pedigree (2,2,3,1,1)
  (same comment as for Chlorine)
- Lead [air, non-urban air or from high stacks]: 3.17e-8 kg; lognormal variance with pedigree 0.0067, pedigree (3,4,3,3,2)
  Emissions of Lead to air have been calculated using the following reference in combination with companies reports. 2012, NIP Emissions Estimation Technique Manual for Mining, National Pollution Inventory, 1, Environmental Australia, 0 - Undefined. Online version: http://www.npi.gov.au
- Sulfate [water, surface water]: 0.00108 kg; lognormal variance with pedigree 0.0027, pedigree (2,2,3,1,1)
  (same comment as for Chlorine)

## Sampling procedure
Extrapolation of data from Companies Sustainability Reports, Chamber of Mines and relevant literature. (Anglo,2015),(Implats,2015),(Northam, 2015), (Lonmin,2015).
Refinery recovery (Jones,1999)
Water analyses measurements for Anglo Platinum obtained from literature (Slatter et.al, 2009). Slatter, KA and Plint, ND and Cole, M and Dilsook, V and De Vaux, D and Palm, N and Oostendorp, B., 2009. Water management in Anglo Platinum process operations: effects of water quality on process operations, in: International Mine Water Conference. pp. 19-23.

Water share between MC and EC from Mudd (2010).
Mudd, G., 2010. Platinum group metals: a unique case study in the sustainability of mineral resources, in: The 4th International Platinum Conference, Platinum in Transition “Boom or Bust.”

Air emission where missing from companies reports were calculated using companies reports in combination with the following reference:. 2012, NIP Emissions Estimation Technique Manual for Mining, National Pollution Inventory, 1, Environmental Australia, 0 - Undefined. Online version: <http://www.npi.gov.au>

Water Emission where missing from companies reports where calculated using companies reports in combination with the following reference: 2016, IPCC, Draf Document of Best Available Techinques for Management of Tailings and Waste Rock in Mining Activities 1, EU, 0 udefined, retrived at <http://susproc.jrc.ec.europa.eu/activities/waste/documents/MWEI_BREF_draft.pdf>

## Extrapolations
This dataset has been extrapolated from year 2015 to the year of the calculation (2021). The uncertainty has been adjusted accordingly.
