# transport, passenger coach

Dataset: EcoSpold 2, unit process
Geography: RoW
Time period: 2005-01-01 to 2021-12-31
Technology level: current
Classification: ISIC rev.4 ecoinvent: 4922:Other passenger land transport
Scenario: Business-as-Usual
System model: Allocation, cut-off by classification
Share of production covered: 100 %
Generated by: Michael Spielmann (obsolete)
Published in: Spielmann M. 2007
Database: ecoinvent
isCopyrightProtected: true
accessRestrictedTo: 1

## General comment
Based on 'transport, passenger coach, CH 2005'. Inventory refers to the entire transport life cycle. For road infrastructure, expenditures and environmental interventions due to construction of roads have been allocated based on the Gross tonne kilometre performance. Expenditures due to operation of the road infrastructure, as well as land use have been allocated based on the yearly vehicle kilometre performance. For the attribution of vehicle share to the transport performance a vehicle life time performance of 2.39E05 pkm/vehicle has been assumed. The energy use and combustion emissions data represents average data for the operation of an average Swiss coach (fleet average) in the year 2005, comprising various emission technologies.

## Included activities end
operation of vehicle; production and maintenance of vehicles; constructionof road. For the energy use and combustion emissions dataset, the fuel consumption is included. Direct airborne emissions of gaseous substances, particulate matters and heavy metals are accounted for. Particulate emissions comprise exhaust- and abrasions emissions. Heavy metal emissions to soil and water caused by tyre abrasion are included.

## Geography
Extrapolated from 'transport, passenger coach, CH 2005'. The data for vehicle operation and road infrastructure reflect Swiss conditions. Data for vehicle manufacturing and maintenance represents generic European data. Data for the vehicle disposal reflect the Swiss situation. The data of the energy use and combustion emissions refers to Swiss Conditions.

## Technology
Diesel, various emission treatment standards. Diesel engine

## Reference product
- transport, passenger coach: 1 person*km; CPC 64119: Other land transportation services of passengers, n.e.c.; By-product classification allocatable product
  production volume 3.96633 person*km; name transport_RP_PV
    This is a placeholder value that does not reflect real-world production volumes. This dataset does not currently require a real-world production volume to work in the database framework, and no actual data were collected yet. This has no negative effect on the results of the ecoinvent database.
  property price 0.0107206 EUR2005
    Calculated based on inputs: The price of the product has been calculated as a sum of the values of the material and energy inputs for this product. This value is therefore a rough estimation. It may underestimate the real price since there are additional expenses when producing any product. These expences can include for example labour costs, treatment of waste materials and profit for the producer. Please consider carefully whether this level of data quality is acceptable for your application.

## Inputs from technosphere
- maintenance, bus: 4.7619e-8 unit; lognormal variance with pedigree 0.344, pedigree (3,1,5,5,1)
  Uncertainty: o
- road maintenance: 6.14971e-5 m*year; lognormal variance with pedigree 0.344, pedigree (3,1,5,5,1)
  This input indicates the unit of road per vkm used during the transport activity. The road input is composed by two demand factors: - Road infrastructure and disposal (RI&D), which varies according to the gross vehicle weight. - Road operations & maintenance (RO&M), which does not vary according to the gross vehicle weight.
  Uncertainty: o
- road: 0.00031567 m*year; lognormal variance with pedigree 0.344, pedigree (3,1,5,5,1)
  Uncertainty: o
- diesel, low-sulfur: 0 kg; pedigree (1,1,1,1,1)
  Energy use and combustion emissions
  Uncertainty: d
  properties: wet mass 1 kg, dry mass 1 kg, carbon content, fossil 0.865, heating value, net 42.8 MJ
- bus: 4.7619e-8 unit; lognormal variance with pedigree 0.344, pedigree (3,1,5,5,1)
  Uncertainty: o
- diesel, low-sulfur: 0.000360178, 0.000363608, 0.00170581, 0.000726973, 2.41155e-5, 0.000163122, 0.00868047 kg (7 entries); lognormal variance with pedigree 0.042, pedigree (1,1,5,5,1)
  Energy use and combustion emissions
  Uncertainty: d

## Emissions to nature
- Acetaldehyde [air, unspecified]: 9.58142e-7 kg; lognormal variance with pedigree 0.0832, pedigree (2,3,5,5,1)
  Energy use and combustion emissions
  Uncertainty: d
- NMVOC, non-methane volatile organic compounds, unspecified origin [air, unspecified]: 1.71324e-5 kg; lognormal variance with pedigree 0.082, pedigree (1,1,5,5,1)
  Energy use and combustion emissions
  Uncertainty: d
- Zinc, ion [water, unspecified]: 2.38995e-7 kg; lognormal variance with pedigree 0.81, pedigree (5,5,5,5,1)
  Energy use and combustion emissions
  Uncertainty: a
- Particulates, > 10 um [air, unspecified]: 2.69714e-6 kg; lognormal variance with pedigree 0.0826, pedigree (1,3,5,5,1)
  Energy use and combustion emissions
  Uncertainty: a
- Particulates, < 2.5 um [air, unspecified]: 1.235e-5 kg; lognormal variance with pedigree 0.342, pedigree (1,1,5,5,1)
  Energy use and combustion emissions
  Uncertainty: i
- Dinitrogen monoxide [air, unspecified]: 6.29476e-7 kg; lognormal variance with pedigree 0.0832, pedigree (2,3,5,5,1)
  Energy use and combustion emissions
  Uncertainty: d
- Xylene [air, unspecified]: 1.71857e-7 kg; lognormal variance with pedigree 0.082, pedigree (1,1,5,5,1)
  Energy use and combustion emissions
  Uncertainty: d
- Cadmium, ion [water, unspecified]: 8.46237e-11 kg; lognormal variance with pedigree 0.47, pedigree (5,5,5,5,1)
  Energy use and combustion emissions
  Uncertainty: a
- Carbon monoxide, fossil [air, unspecified]: 6.84999e-5 kg; lognormal variance with pedigree 0.692, pedigree (1,1,5,5,1)
  Energy use and combustion emissions
  Uncertainty: d
- Sulfur dioxide [air, unspecified]: 1.20243e-6 kg; lognormal variance with pedigree 0.0426, pedigree (2,1,5,5,1)
  Energy use and combustion emissions
  Uncertainty: o
- Methane, fossil [air, unspecified]: 5.15571e-7 kg; lognormal variance with pedigree 0.082, pedigree (1,1,5,5,1)
  Energy use and combustion emissions
  Uncertainty: d
- Nickel [air, unspecified]: 1.07905e-9 kg; lognormal variance with pedigree 0.758, pedigree (4,5,5,5,1)
  Energy use and combustion emissions
  Uncertainty: t
- PAH, polycyclic aromatic hydrocarbons [air, unspecified]: 1.90476e-11 kg; lognormal variance with pedigree 1.5832, pedigree (2,3,5,5,1)
  Energy use and combustion emissions
  Uncertainty: r
- Chromium VI [air, unspecified]: 1.20243e-12 kg; lognormal variance with pedigree 0.758, pedigree (4,5,5,5,1)
  Energy use and combustion emissions
  Uncertainty: o
- Mercury [air, unspecified]: 2.40481e-13 kg; lognormal variance with pedigree 0.758, pedigree (4,5,5,5,1)
  Energy use and combustion emissions
  Uncertainty: t
- Toluene [air, unspecified]: 3.58747e-7 kg; lognormal variance with pedigree 0.082, pedigree (1,1,5,5,1)
  Energy use and combustion emissions
  Uncertainty: d
- Copper, ion [water, unspecified]: 5.66333e-9 kg; lognormal variance with pedigree 0.47, pedigree (5,5,5,5,1)
  Energy use and combustion emissions
  Uncertainty: a
- Particulates, > 2.5 um, and < 10um [air, unspecified]: 2.93281e-6 kg; lognormal variance with pedigree 0.1646, pedigree (3,3,5,5,1)
  Energy use and combustion emissions
  Uncertainty: a
- Chromium [soil, unspecified]: 4.0359e-10 kg; lognormal variance with pedigree 0.21, pedigree (5,5,5,5,1)
  Energy use and combustion emissions
  Uncertainty: a
- Zinc [soil, unspecified]: 2.38995e-7 kg; lognormal variance with pedigree 0.21, pedigree (5,5,5,5,1)
  Energy use and combustion emissions
  Uncertainty: a
- Zinc [air, unspecified]: 3.08576e-8 kg; lognormal variance with pedigree 0.758, pedigree (4,5,5,5,1)
  Energy use and combustion emissions
  Uncertainty: t
- Chromium, ion [water, unspecified]: 4.0359e-10 kg; lognormal variance with pedigree 0.47, pedigree (5,5,5,5,1)
  Energy use and combustion emissions
  Uncertainty: a
- Carbon dioxide, fossil [air, unspecified]: 0.0380328 kg; lognormal variance with pedigree 0.0426, pedigree (2,1,5,5,1)
  Energy use and combustion emissions
  Uncertainty: o
- Formaldehyde [air, unspecified]: 1.76119e-6 kg; lognormal variance with pedigree 0.0832, pedigree (2,3,5,5,1)
  Energy use and combustion emissions
  Uncertainty: d
  property wet mass 1 kg; name WM
  property water content 0; name water_content
  property carbon content, fossil 0.400016; name C_content_fossil
  property water in wet mass 0 kg; name WWM
  property carbon content, non-fossil 0; name C_content_non_fossil
  property dry mass 1 kg; name DM
- Selenium [air, unspecified]: 1.20243e-10 kg; lognormal variance with pedigree 0.758, pedigree (4,5,5,5,1)
  Energy use and combustion emissions
  Uncertainty: t
- Copper [soil, unspecified]: 5.66333e-9 kg; lognormal variance with pedigree 0.21, pedigree (5,5,5,5,1)
  Energy use and combustion emissions
  Uncertainty: a
- Lead [water, unspecified]: 3.48262e-9 kg; lognormal variance with pedigree 0.81, pedigree (5,5,5,5,1)
  Energy use and combustion emissions
  Uncertainty: a
- Cadmium [air, unspecified]: 1.30528e-10 kg; lognormal variance with pedigree 0.758, pedigree (4,5,5,5,1)
  Energy use and combustion emissions
  Uncertainty: t
- Copper [air, unspecified]: 3.90681e-8 kg; lognormal variance with pedigree 0.758, pedigree (4,5,5,5,1)
  Energy use and combustion emissions
  Uncertainty: t
- Chromium [air, unspecified]: 8.77428e-10 kg; lognormal variance with pedigree 0.758, pedigree (4,5,5,5,1)
  Energy use and combustion emissions
  Uncertainty: t
- Nickel, ion [water, unspecified]: 1.09362e-9 kg; lognormal variance with pedigree 0.81, pedigree (5,5,5,5,1)
  Energy use and combustion emissions
  Uncertainty: a
- Benzene [air, unspecified]: 6.87428e-8 kg; lognormal variance with pedigree 0.082, pedigree (1,1,5,5,1)
  Energy use and combustion emissions
  Uncertainty: d
- Nitrogen oxides [air, unspecified]: 0.000415242 kg; lognormal variance with pedigree 0.082, pedigree (1,1,5,5,1)
  Energy use and combustion emissions
  Uncertainty: d
- Lead [air, unspecified]: 1.34571e-9 kg; lognormal variance with pedigree 0.758, pedigree (4,5,5,5,1)
  Energy use and combustion emissions
  Uncertainty: t
- Lead [soil, unspecified]: 3.48262e-9 kg; lognormal variance with pedigree 0.21, pedigree (5,5,5,5,1)
  Energy use and combustion emissions
  Uncertainty: a
- Cadmium [soil, unspecified]: 8.46237e-11 kg; lognormal variance with pedigree 0.21, pedigree (5,5,5,5,1)
  Energy use and combustion emissions
  Uncertainty: a
- Ammonia [air, unspecified]: 2.38095e-7 kg; lognormal variance with pedigree 0.0532, pedigree (2,3,5,5,1)
  Energy use and combustion emissions
  Uncertainty: d
- Nickel [soil, unspecified]: 1.09362e-9 kg; lognormal variance with pedigree 0.21, pedigree (5,5,5,5,1)
  Energy use and combustion emissions
  Uncertainty: a

## Sampling procedure
Literature data.

## Extrapolations
none This dataset has been copied from an original dataset covering the geography CH. The uncertainty has been adjusted accordingly.
