# titanium zinc plate production, without pre-weathering

Dataset: EcoSpold 2, unit process
Geography: DE
Time period: 1997-01-01 to 2021-12-31
Technology level: current
Classification: EcoSpold01Categories: metals/extraction
Classification: ISIC rev.4 ecoinvent: 2420:Manufacture of basic precious and other non-ferrous metals
Tags: ConvertedDataset
Scenario: Business-as-Usual
System model: Allocation, cut-off by classification
Generated by: Martin Lehmann
Published in: Kellenberger D. 2007
Database: ecoinvent
isCopyrightProtected: true
accessRestrictedTo: 1

## General comment
The production steps pre-alloying, melting, casting, rolling, coiling, stretch forming and cutting are approximated using "casting, brass", "contour brass" and "sheet rolling, aluminium".
[This dataset was already contained in the ecoinvent database version 2. It was not individually updated during the transfer to ecoinvent version 3. Life Cycle Impact Assessment results may still have changed, as they are affected by changes in the supply chain, i.e. in other datasets. This dataset was generated following the ecoinvent quality guidelines for version 2. It may have been subject to central changes described in the ecoinvent version 3 change report (http://www.ecoinvent.org/database/ecoinvent-version-3/reports-of-changes/), and the results of the central updates were reviewed extensively. The changes added e.g. consistent water flows and other information throughout the database. The documentation of this dataset can be found in the ecoinvent reports of version 2, which are still available via the ecoinvent website. The change report linked above covers all central changes that were made during the conversion process.]

## Included activities end
The dataset describes the production of titanium zinc alloy from primary zinc and the fabrication of titanium zinc plates with all included fabrication steps. Pre-weathering of the plate is not included.

## Geography
Data from a leading titan zinc plate producer in Germany. Applicable for Europe.

## Technology
Induction furnace for all the pre-alloying and melting steps, roll stands with 5 rolling pairs for the rolling step. Coiling facilities.

## Parameters
- fraction, tap water, to air: 0.15 dimensionless; name fraction_TW_to_air; = fraction_PW_to_air; lognormal variance with pedigree 0.092025, pedigree (4,4,3,2,4)
  Calculated value. See comment in the other parametres present in this dataset. Tap water is considered to be always used as process water, thus process water fractions to air are applied to all tap water input flows to calculate the amount of water consumed in the processes.
- fraction, process water, to air: 0.15 dimensionless; name fraction_PW_to_air; lognormal variance with pedigree 0.092025, pedigree (4,4,3,2,4)
  Literature value. In case when no industry/process specific data are available, default evaporation fraction value is used. This value is 15% and is based on literature (Statistics Canada, 2007 & Shaffer, K.H., 2008, Consumptive water use in the Great Lakes Basin, USGS & Shiklomanov, 2003, World Water Resources at the Beginning of the 21st Century) and has been approved by an expert.

## Reference product
- titanium zinc plate, without pre-weathering: 1 kg; name RP_amount_1; By-product classification allocatable product; CPC 41: Basic metals
  EcoSpold01Location=DE
  production volume 0.242058 kg; name RP_PV_1
    This is a placeholder value that does not reflect real-world production volumes. This dataset does not currently require a real-world production volume to work in the database framework, and no actual data were collected yet. This has no negative effect on the results of the ecoinvent database. The placeholder value of this activity was scaled according to the nominal GDP of 2005 (source: United Nations, http://data.un.org/Glossary.aspx?q=GDP+%28current+US%24%29, accessed 20130726) to reflect an appropriate share of the global production volume, which is also a placeholder value.
  property price 1.76 EUR2005
    Calculated value based on data from United Nations Commodity Trade Statistics Database (comtrade.un.org). UN comtrade category: 790500 Zinc plates, sheets, strip and foil. Year 2005. Using exchange rate of 1EURO = 1.209 USD. Average of price of import into 5 main markets (EU, US, JP, IN and CN).
  property carbon content 0
    carbon content on a dry matter basis (reserved; not for manual entry)
  properties: wet mass 1 kg, water in wet mass 0 kg, dry mass 1 kg, carbon content, fossil 0, water content 0, carbon content, non-fossil 0, carbon allocation 0 kg

## Inputs from technosphere
- copper, cathode: 0.00127 kg; lognormal variance with pedigree 0.0521, pedigree (1,4,5,3,1)
  EcoSpold01Location=RER
  properties: dry mass 1 kg, wet mass 1 kg
- aluminium, cast alloy: 5.088e-5 kg; lognormal variance with pedigree 0.0521, pedigree (1,4,5,3,1)
  EcoSpold01Location=RER
  properties: dry mass 1 kg, wet mass 1 kg
- casting, brass: 2.11 kg; lognormal variance with pedigree 0.07, pedigree (1,1,5,1,1)
  composite
  EcoSpold01Location=CH
- aluminium, wrought alloy: 0.00111812 kg; lognormal variance with pedigree 0.0521, pedigree (1,4,5,3,1)
  EcoSpold01Location=RER
  properties: dry mass 1 kg, wet mass 1 kg
- sludge from steel rolling: -0.016335 kg; name BP_amount_1; lognormal variance with pedigree 0.38, pedigree (5,5,5,5,5)
  This flow is issued during the process "contouring, brass". Contouring, brass is used as a proxy for rolling and colling of titanium zinc plate. This flow refers to 1 kg of contouring, brass, which is in its turn and input for the production of 1 kg titanium zinc plate production.
  production volume 0.00395403 kg; = RP_PV_1 * (BP_amount_1 / RP_amount_1)
    Calculated from production volume of reference product using the relative outputs.
  property price 0 EUR2005; name BP_amount_1_price_EUR2005
  properties: carbon content, fossil 0.0123943, wet mass 1 kg, dry mass 0.8 kg, water content 0.25
- sulfuric acid: 0.34 kg; lognormal variance with pedigree 0.318, pedigree (4,5,5,5,5)
  (same comment as for sludge from steel rolling)
  properties: wet mass 1 kg, dry mass 1 kg
- zinc: 1.06 kg; lognormal variance with pedigree 0.0521, pedigree (1,4,5,3,1)
  EcoSpold01Location=RER
  properties: dry mass 1 kg, wet mass 1 kg
- heat, district or industrial, natural gas: 1.6 MJ; lognormal variance with pedigree 0.318, pedigree (4,5,5,5,5)
  (same comment as for sludge from steel rolling)
  properties: heating value, net 1 MJ
- electricity, medium voltage: 0.65833 kWh; = 0.435 + 0.22333; lognormal variance with pedigree 0.05, pedigree (1,1,5,1,1)
  EcoSpold01Location=UCTE
  composite + electricity used for process contouring, brass
- lubricating oil: 0.004 kg; lognormal variance with pedigree 0.318, pedigree (4,5,5,5,5)
  (same comment as for sludge from steel rolling)
  properties: heating value, net 40.2 MJ, dry mass 1 kg, carbon content, fossil 0.75, wet mass 1 kg
  note on heating value, net: Literature value, Source: IPCC 2006, 2006 IPCC Guidelines for National Greenhouse Gas Inventories, Prepared by the National Greenhouse Gas Inventories Programme, Eggleston H.S., Buendia L., Miwa K., Ngara T. and Tanabe K. (eds). Published: IGES, Japan
  note on carbon content, fossil: Lubricating oil is produced from diesel. C-content/dry mass of fats and oils considered 75%, from: ecoinvent v2.2 report, n 15a, pg 40
- aluminium casting facility: 1.01e-10 unit; lognormal variance with pedigree 0.35, pedigree (1,1,5,1,1)
  EcoSpold01Location=RER
  composite
- tap water: 6 kg; name tap_water_input; lognormal variance with pedigree 0.18, pedigree (4,5,5,5,5)
  (same comment as for sludge from steel rolling)
  properties: carbon content, fossil 0.00178991, dry mass 0.000337476 kg, water content 2962.17, wet mass 1 kg
  note on carbon content, fossil: Bicarbonate content is 2.93 mol/m3. CO2 content is 0.1 mol/m3 (ecoinvent v2.2 report 8, Tab 93.1).
- electric arc furnace dust: -0.00044159 kg; name BP_amount_2; lognormal variance with pedigree 0.38, pedigree (5,5,5,5,5)
  (same comment as for sludge from steel rolling)
  production volume 0.000106891 kg; = RP_PV_1 * (BP_amount_2 / RP_amount_1)
    Calculated from production volume of reference product using the relative outputs.
  property price 0 EUR2005; name BP_amount_2_price_EUR2005
  properties: dry mass 0.846 kg, carbon content, fossil 0.01339, water content 0.182033, wet mass 1 kg
- rolling mill: 1.4286e-9 unit; lognormal variance with pedigree 0.68, pedigree (5,5,5,5,5)
  This flow is issued during the process "contouring, brass". Contouring, brass is used as a proxy for rolling and colling of titanium zinc plate. This flow refers to 1 kg of contouring, brass, which is in its turn and input for the production of 1 kg titanium zinc plate production.;activityLink introduced to establish a direct link to the corresponding regional supply of this product

## Emissions to nature
- Mercury [water, unspecified]: 1.5714e-9 kg; lognormal variance with pedigree 1.02, pedigree (5,5,5,5,5)
  (same comment as for sludge from steel rolling)
- Tin, ion [water, unspecified]: 1.5714e-7 kg; lognormal variance with pedigree 1.02, pedigree (5,5,5,5,5)
  (same comment as for sludge from steel rolling)
- TOC, Total Organic Carbon [water, unspecified]: 2.0551e-5 kg; lognormal variance with pedigree 0.42, pedigree (5,5,5,5,5)
  (same comment as for sludge from steel rolling)
- DOC, Dissolved Organic Carbon [water, unspecified]: 2.0551e-5 kg; lognormal variance with pedigree 0.42, pedigree (5,5,5,5,5)
  (same comment as for sludge from steel rolling)
- BOD5, Biological Oxygen Demand [water, unspecified]: 7.9e-5 kg; lognormal variance with pedigree 0.42, pedigree (5,5,5,5,5)
  (same comment as for sludge from steel rolling)
- Chromium VI [water, unspecified]: 6.2857e-9 kg; lognormal variance with pedigree 1.02, pedigree (5,5,5,5,5)
  (same comment as for sludge from steel rolling)
- Zinc, ion [water, unspecified]: 3.9286e-6 kg; lognormal variance with pedigree 1.02, pedigree (5,5,5,5,5)
- Chromium, ion [water, unspecified]: 1.5086e-7 kg; lognormal variance with pedigree 1.02, pedigree (5,5,5,5,5)
  (same comment as for sludge from steel rolling)
- Copper, ion [water, unspecified]: 1.7286e-6 kg; lognormal variance with pedigree 1.02, pedigree (5,5,5,5,5)
  (same comment as for sludge from steel rolling)
- COD, Chemical Oxygen Demand [water, unspecified]: 7.9e-5 kg; lognormal variance with pedigree 0.42, pedigree (5,5,5,5,5)
  (same comment as for sludge from steel rolling)
- Arsenic, ion [water, unspecified]: 1.5714e-9 kg; lognormal variance with pedigree 1.02, pedigree (5,5,5,5,5)
  (same comment as for sludge from steel rolling)
- Lead [water, unspecified]: 1.5714e-7 kg; lognormal variance with pedigree 1.02, pedigree (5,5,5,5,5)
  (same comment as for sludge from steel rolling)
- Water [air, unspecified]: 0.0009 m3; name water_to_air_unspecified; lognormal variance with pedigree 0.0807, pedigree (2,2,5,1,1)
  (same comment as for sludge from steel rolling)
  property fraction, origin: fresh water 1; name fraction_origin_fresh_water
  property fraction, origin: unspecified 0; name fraction_origin_unspecified
  property fraction, origin: salt water 0; name fraction_origin_salt_water
- Zinc [air, unspecified]: 0.000318 kg; lognormal variance with pedigree 0.0927, pedigree (2,4,5,3,1)
- Water [water, unspecified]: 0.0051 m3; name water_to_water_unspecified; lognormal variance with pedigree 0.0807, pedigree (2,2,5,1,1)
  (same comment as for sludge from steel rolling)
  property fraction, origin: salt water 0; name fraction_origin_salt_water_Ww
  property fraction, origin: fresh water 1; name fraction_origin_fresh_water_Ww
  property fraction, origin: unspecified 0; name fraction_origin_unspecified_Ww
- NMVOC, non-methane volatile organic compounds, unspecified origin [air, unspecified]: 4.5e-5 kg; lognormal variance with pedigree 0.358, pedigree (4,5,5,5,5)
  (same comment as for sludge from steel rolling)
- Cadmium, ion [water, unspecified]: 1.5714e-9 kg; lognormal variance with pedigree 1.02, pedigree (5,5,5,5,5)
  (same comment as for sludge from steel rolling)
- Nickel, ion [water, unspecified]: 4.7143e-7 kg; lognormal variance with pedigree 1.02, pedigree (5,5,5,5,5)
  (same comment as for sludge from steel rolling)

## Sampling procedure
Environmental report, certificate

## Extrapolations
This dataset has been extrapolated from year 2002 to the year of the calculation (2021). The uncertainty has been adjusted accordingly.

## Review by Bo Weidema 2012-11-05
contouring of brass has been integrated in this activity, thus avoiding a negative input correction for brass swarf

## Review by Rolf Frischknecht 2007-11-07
passed
