# furnace production, pellets, 9kW

Dataset: EcoSpold 2, unit process
Geography: CH
Time period: 2010-01-01 to 2021-12-31
Technology level: modern
Classification: ISIC rev.4 ecoinvent: 2815:Manufacture of ovens, furnaces and furnace burners
Classification: EcoSpold01Categories: wood energy/heating systems
Synonyms: wood pellets stove production; wood fired stove production
Tags: biomass power
Scenario: Business-as-Usual
System model: Allocation, cut-off by classification
Generated by: Marco Mina
Database: ecoinvent
isCopyrightProtected: true
accessRestrictedTo: 1

## General comment
This dataset represent the production and the disposal of a wood-pellets burning stove for domestic heating. Its assumed lifetime is 15 years, with an estimated operation time of 1700 h/a.

## Included activities start
From reception of furnace components at the factory gate

## Included activities end
This activity ends with the disposal of the device in the end of its lifetime. The dataset includes the most important materials used for the fabrication of the stove and the chimney flue pipes: steel, rock wool, aluminum, cast iron, ceramic tiles, lubricating oil, electronic components. It includes also the energy and heat for the construction and the disposal of the elements of the furnace. The dataset doesn"t include the basement in concrete for the stove installation and the pellet storage silo (not necessary). Since it is used for domestic heating, transformation and land occupation are not considered.

## Geography
Could be used for Central European conditions

## Technology
Automatic pellets stove available on the European and Swiss market. The model of reference is the stove from Austrian brand Rika, model Como. Represent the market leader wood pellets device for residential wood combustion in a domestic environment in Switzerland (model most sold).
Source of the image: http://www.rika.at/datasheet.php?IDofen=19

## Time period
This stove model is commercialized since 2010 in Europe and Switzerland and is still available on the market (end 2011)

## Reference product
- furnace, pellets, 9kW: 1 unit; name RP_amount_1; By-product classification allocatable product; CPC 43420: Industrial or laboratory furnaces and ovens, except non-electric bakery ovens; other industrial or laboratory […]
  production volume 6000 unit; name RP_PV_1
    Extrapolated from the installed devices within the country, category "pelletoefen, wohnbereich" (from Hozenergiestatistik report)
  property capacity [MW] 0.009 MW; name capacity_MW
  property lifetime capacity [kWh] 1.1826e6 kWh; name lifetime_capacity_kWh; = (lifetime*8760)*capacity_MW*1000
    calculated value.
  property lifetime 15 year; name lifetime
  property price 1159 EUR2005
    Average 2005 prices for EU27, USA, China, Japan and India from Import/Export data (US$ and tonnes) in UN Commodity Trade Statistics Database; Commodity: "Industrial furnace, oven, incinerator non-electric ne". The prices are per kg and converted to per unit by summed weight of material concumption of the process in existing ecoinvent dâtaset for production of this furnace.

## By-products
- iron scrap, unsorted: 0 kg; CPC 39310: Slag, dross, scalings and other waste from the manufacture of iron or steel; By-product classification Recyclable; pedigree (1,1,1,1,1)
  disposal of cast iron
  production volume 0 kg; = RP_PV_1 * (BP_amount_2 / RP_amount_1)
    Calculated from production volume of reference product using the relative outputs.
  property price 0.149 EUR2005
    Temporary price data. Calculated as 90% of purchasers price based on: estimated at 85% of sorted scrap
  property carbon content 0
    carbon content on a dry matter basis (reserved; not for manual entry)
  properties: carbon content, fossil 0, carbon content, non-fossil 0, wet mass 1 kg, water content 0, dry mass 1 kg, water in wet mass 0 kg, carbon allocation 0 kg

## Inputs from technosphere
- ceramic tile: 33 kg; source RIKA Ofentechnik GmbH 2011; lognormal variance with pedigree 0.0333, pedigree (1,5,4,3,1)
  Calculated value - weight calculated in the reference stove model (ceramic tiles are used for the external cover of the stove)
  properties: dry mass 1 kg, wet mass 1 kg
- aluminium, wrought alloy: 2 kg; source RIKA Ofentechnik GmbH 2011; lognormal variance with pedigree 0.0333, pedigree (1,5,4,3,1)
  estimation - blower for pellet combustion chamber
  properties: dry mass 1 kg, wet mass 1 kg
- scrap copper: -0.3 kg; name BP_amount_9; lognormal variance with pedigree 0.0167, pedigree (1,5,4,3,1)
  disposal copper
  production volume 1800 kg; = RP_PV_1* BP_amount_9
    Calculated from production volume of reference product using the relative outputs.
  property price 0 EUR2005; name BP_amount_9_price_EUR2005
  properties: wet mass 1 kg, dry mass 1 kg, lifetime 15 year
- electricity, low voltage: 184 kWh; source RIKA innovative Ofentechnik GmbH 2011; lognormal variance with pedigree 0.0241, pedigree (1,5,4,3,1)
  estimation - data comes from a comparison between old dataset v.2.2 value and communication with producer (total annual heating value in factory/production). The value is scaled for the new capacity 9kW.
- sheet rolling, steel: 11.5 kg; source RIKA Ofentechnik GmbH 2011; lognormal variance with pedigree 0.0333, pedigree (1,5,4,3,1)
  estimation
- cast iron: 32 kg; source RIKA Ofentechnik GmbH 2011; lognormal variance with pedigree 0.0333, pedigree (1,5,4,3,1)
  estimation
  properties: carbon content, fossil 0.04, wet mass 1 kg, dry mass 1 kg
  note on carbon content, fossil: Cast iron is made by remelting pig iron in small furnaces (e.g. cupola furnaces or electric arc furnaces) and poured into moulds to make castings. It usually contains 2% to 6% carbon (ecoinvent v2.2 report 10_partII). An average content of 4% was considered
- waste glass: -2.5 kg; name BP_amount_1; lognormal variance with pedigree 0.0167, pedigree (1,5,4,3,1)
  disposal of frontal glass
  production volume 15000 kg; = RP_PV_1* BP_amount_1
    Calculated from production volume of reference product using the relative outputs.
  property price 0 EUR2005; name BP_amount_1_price_EUR2005
  properties: lifetime 15 year, heating value, net 0.05 MJ, wet mass 1 kg, dry mass 1 kg
  note on heating value, net: Value extracted from "treatment of waste glass, open dump, very wet infiltration class (1000mm)"
- polyethylene, high density, granulate: 0.2 kg; source RIKA Ofentechnik GmbH 2011; lognormal variance with pedigree 0.0333, pedigree (1,5,4,3,1)
  calculated value
  properties: heating value, net 42.47 MJ, wet mass 1 kg, carbon content, fossil 0.857143, dry mass 1 kg
  note on carbon content, fossil: Polyethylene is formed out of a huge amount of ethylene monomers (C2H4) (ecoinvent v2.2 report 11_II). MW=28 g/mol
- waste polyethylene: -0.2 kg; name BP_amount_3; lognormal variance with pedigree 0.0167, pedigree (1,5,4,3,1)
  disposal of plastic components
  production volume 1200 kg; = RP_PV_1* BP_amount_3
    Calculated from production volume of reference product using the relative outputs.
  property price 0 EUR2005; name BP_amount_8_price_EUR2005
  properties: heating value, net 42.47 MJ, wet mass 1 kg, dry mass 0.996 kg, carbon content, fossil 0.825301, water content 0.00401606, lifetime 15 year
  note on heating value, net: Value taken from the general comment of the treatment dataset.
  note on carbon content, fossil: C content in 1 kg DM was calculated using data in Tab A.1, ecoinvent v2.2 report 13_I
- heat, central or small-scale, other than natural gas: 600 MJ; source RIKA innovative Ofentechnik GmbH 2011; lognormal variance with pedigree 0.0961, pedigree (1,5,4,3,1)
  (same comment as for electricity, low voltage)
  properties: heating value, net 1 MJ
- waste mineral wool, for final disposal: -2 kg; name BP_amount_4; lognormal variance with pedigree 0.0167, pedigree (1,5,4,3,1)
  disposal of insulation material used in the chimney
  production volume 12000 kg; = RP_PV_1* BP_amount_4
    Calculated from production volume of reference product using the relative outputs.
  property price 0 EUR2005; name BP_amount_6_price_EUR2005
  properties: wet mass 1 kg, lifetime 15 year, dry mass 1 kg
- flat glass, coated: 0.3 kg; source RIKA Ofentechnik GmbH 2011; lognormal variance with pedigree 0.0333, pedigree (1,5,4,3,1)
  literature value - frontal glass in the stove door
  properties: dry mass 1 kg, wet mass 1 kg
- waste mineral oil: -0.4 kg; name BP_amount_5; lognormal variance with pedigree 0.0167, pedigree (1,5,4,3,1)
  disposal of lubricating oil
  production volume 2400 kg; = RP_PV_1 * (BP_amount_5 / RP_amount_1)
    Calculated from production volume of reference product using the relative outputs.
  property price 0 EUR2005; name BP_amount_2_price_EUR2005
  properties: wet mass 1 kg, carbon content, fossil 0.864444, water content 0.111111, dry mass 0.9 kg, heating value, net 34.7 MJ
  note on carbon content, fossil: Tab A.6, ecoinvent v2.2 report 13_I. C content has been calculated after data in the tables, and then referred to 1 kg DM
- stone wool: 2 kg; source RIKA Ofentechnik GmbH 2011; lognormal variance with pedigree 0.0333, pedigree (1,5,4,3,1)
  estimation
  properties: dry mass 1 kg, carbon content, fossil 0.015401, wet mass 1 kg
  note on carbon content, fossil: The chemical composition of the glass fibres used in the rock wool production is similar to the composition of naturally cooled volcano basalt and has a composition listed in Tab. 3.1 and 3.2 in ecoinvent v2.2 report 16, part XIV. Rock wool contains: a minimum of 96% mineral fibres,between 0.5 and 3.0 weight percent of phenolic resin depending on the specific product characteristics, and about 0.2 percent mineral oil (ecoinvent v2.2 report 16, part XIV). An average composition of 1.8% phenolic resin, 0.2% mineral oil, and 98% mineral fibres has been assumed and used to calculate C content of the rock wool
- copper, cathode: 0.3 kg; source RIKA Ofentechnik GmbH 2011; lognormal variance with pedigree 0.0333, pedigree (1,5,4,3,1)
  estimation
  properties: dry mass 1 kg, wet mass 1 kg
- scrap steel: -95 kg; name BP_amount_6; lognormal variance with pedigree 0.0167, pedigree (1,5,4,3,1)
  disposal of steel for the body of the stove and chimney flue pipes
  production volume 570000 kg; = RP_PV_1* BP_amount_6
    Calculated from production volume of reference product using the relative outputs.
  property price 0 EUR2005; name BP_amount_5_price_EUR2005
  properties: wet mass 1 kg, dry mass 1 kg, lifetime 15 year
- steel, low-alloyed, hot rolled: 95 kg; source RIKA Ofentechnik GmbH 2011; lognormal variance with pedigree 0.0333, pedigree (1,5,4,3,1)
  literature value
  properties: carbon content, fossil 0.005, dry mass 1 kg, wet mass 1 kg
  note on carbon content, fossil: Low alloyed steel composition given in Tab. 3.2 ecoinvent v2.2 report 10_partII. Steel assumed to have a C content of 0.5%
- inert waste, for final disposal: -33 kg; name BP_amount_7; lognormal variance with pedigree 0.0167, pedigree (1,5,4,3,1)
  disposal of ceramic tiles
  production volume 198000 kg; = RP_PV_1* BP_amount_7
    Calculated from production volume of reference product using the relative outputs.
  property price 0 EUR2005; name BP_amount_7_price_EUR2005
  properties: lifetime 15 year, dry mass 0.995 kg, wet mass 1 kg, water content 0.00502513
- lubricating oil: 0.4 kg; source RIKA innovative Ofentechnik GmbH 2011; lognormal variance with pedigree 0.0333, pedigree (1,5,4,3,1)
  estimation - lubricating oil used for lubricating different parts of the stove during the manufacturing and when is delivered. The disposal of this small quantity can be negleted (remain within the furnace)
  properties: wet mass 1 kg, dry mass 1 kg, carbon content, fossil 0.75, heating value, net 40.2 MJ
  note on carbon content, fossil: Lubricating oil is produced from diesel. C-content/dry mass of fats and oils considered 75%, from: ecoinvent v2.2 report, n 15a, pg 40
  note on heating value, net: Literature value, Source: IPCC 2006, 2006 IPCC Guidelines for National Greenhouse Gas Inventories, Prepared by the National Greenhouse Gas Inventories Programme, Eggleston H.S., Buendia L., Miwa K., Ngara T. and Tanabe K. (eds). Published: IGES, Japan
- scrap aluminium: -2 kg; name BP_amount_8; lognormal variance with pedigree 0.0167, pedigree (1,5,4,3,1)
  disposal aluminium
  production volume 12000 kg; = RP_PV_1* BP_amount_8
    Calculated from production volume of reference product using the relative outputs.
  property price 0 EUR2005; name BP_amount_4_price_EUR2005
  properties: lifetime 15 year, dry mass 1 kg, wet mass 1 kg
- iron scrap, unsorted: -32 kg; lognormal variance with pedigree 0.0167, pedigree (1,5,4,3,1)
  disposal of cast iron
  production volume 192000 kg
  properties: wet mass 1 kg, price 0.149 EUR2005, dry mass 1 kg

## Sampling procedure
literature, furnace manual available for customers, investigation and personal communication from producer and technician

## Extrapolations
This dataset has been extrapolated from year 2011 to the year of the calculation (2021). The uncertainty has been adjusted accordingly.

## Review by Bo Weidema 2012-03-12
Child dataset of already reviewed parent. Some changes made in this dataset should probably also (or better) be made in the parent dataset.
