# fibre production, viscose

Dataset: EcoSpold 2, unit process
Geography: GLO
Time period: 1997-01-01 to 2021-12-31
Technology level: current
Classification: ISIC rev.4 ecoinvent: 2030:Manufacture of man-made fibres
Classification: EcoSpold01Categories: textiles/production
Tags: ConvertedDataset
Scenario: Business-as-Usual
System model: Allocation, cut-off by classification
Share of production covered: 0.1 %
Generated by: Cornelia Stettler
Published in: Althaus H.J. 2007
Database: ecoinvent
isCopyrightProtected: true
accessRestrictedTo: 1

## General comment
The inventory represents the production of viscose fibre using sulfate pulp as the main constituent. This transformation of sulphate pulp to spinnable viscose is done using carbon disulfide. The dataset models all relevant inputs necessary for the production of the fibre. Among others are, water, electricity, heat and chemical substances. Infrastracture is also considered. The process includes the following steps, alkalization, sulfurization and maturity. Sulphate pulp reacts with carbon disulfide and sodium hydroxide to create a solution that can be spun into a fibre. The process also recovers parts of the initially used materials, namely producing sodium sulfate and sulfuric acid.

## Included activities start
Activity starts with the arrival of sulphate pulp and all the relevant necessary inputs such as water, chemicals, heat, electricity and others.

## Included activities end
Activity ends with the production of finished viscose fibre at the production site.

## Geography
Data are from an Austrian company having production sites in different countries, so the data can be taken as an global average.

## Technology
Transformation of sulfate pulp by CS2 to spinnable viscose

## Time period
Time of publications.

## Parameters
- fraction, process water, to air: 0.205 dimensionless; name fraction_PW_to_air; lognormal variance with pedigree 0.092025, pedigree (4,4,3,2,4)
  Literature value (Statistics Canada, 2007 & Shaffer, K.H., 2008, Consumptive water use in the Great Lakes Basin, USGS) (Vionnet, S., Quantis Water Database - Technical Report, 2012).

## Reference product
- sulfuric acid: 1 kg; CPC 34231: Chemical elements n.e.c.; inorganic acids except phosphoric, nitric and sulphonitric; inorganic oxygen compoun[…]; By-product classification allocatable product; CAS 7664-93-9
  EcoSpold01Location=GLO
  production volume 1.57e9 kg
    World production about 1.8 million tons
    Calculated from viscose output
  properties: water in wet mass 0 kg, price 0.063 EUR2005, water content 0, carbon content, fossil 0, carbon content, non-fossil 0, dry mass 1 kg, wet mass 1 kg, carbon content 0, carbon allocation 0 kg, true value 0.0494701
- fibre, viscose: 0 kg; By-product classification allocatable product; CPC 355: Man-made fibres
  EcoSpold01Location=GLO
  production volume 2e9 kg
    World production about 1.8 million tons
    Estimate from market research and producer's (Lenzing and Oerlikon)
  property heating value, net 7.29 MJ
    LHV is calculated based on the Carbon content of the product. More details can be found on the respective documentation.
  property price 0.273 EUR2005
    Temporary price data. Calculated as 90% of purchasers price based on: Source: ecoinvent v2 report 21-partI, pg 41.
  property carbon content, non-fossil 0.240535
    The Viscose fibres (rayon) are derived from sulphate pulp (ecoinvent v2.2 report 21_partI). Its chemical strucuture is [C18S12O10Na6]n
  property carbon content 0.240535
    carbon content on a dry matter basis (reserved; not for manual entry)
  property true value 0.184428
    allocation property applied in "true value" allocation // value calculated from revenue
  properties: water in wet mass 0 kg, wet mass 1 kg, water content 0, carbon content, fossil 0, dry mass 1 kg, carbon allocation 0.240535 kg

## By-products
- sodium sulfate, anhydrite: 0 kg; CPC 34240: Phosphates of triammonium; salts and peroxysalts of inorganic acids and metals n.e.c.; By-product classification allocatable product; CAS 7757-82-6
  EcoSpold01Location=GLO
  production volume 1.726e9 kg
    World production about 1.8 million tons
    Calculated from viscose output
  property price 0.191 EUR2005
    Temporary price data. Calculated as 90% of purchasers price based on: 2004 Import/Export data (total trades (USD) divided by total weight (kg) in EU27, USA, China, Japan and India) from UN Commodity Trade Statistics Database (http://data.un.org/Explorer.aspxDatabase [Accessed 2 July 2010]). Commodity: Sodium sulphates other than disodium sulphate
  property carbon content 0
    carbon content on a dry matter basis (reserved; not for manual entry)
  property true value 0.164869
    allocation property applied in "true value" allocation // value calculated from revenue
  properties: carbon content, non-fossil 0, dry mass 1 kg, carbon content, fossil 0, water content 0, wet mass 1 kg, water in wet mass 0 kg, carbon allocation 0 kg

## Inputs from technosphere
- carbon disulfide: 0.0144 kg; lognormal variance with pedigree 0.0513, pedigree (2,3,5,3,1)
  EcoSpold01Location=GLO
  Data 2001 for fibre production Lenzing AG (Federal Environment Agency- Austria, 2004)
  Uncertainty: Data 2001 for fibre production Lenzing AG (Federal Environment Agency- Austria, 2004)
  properties: heating value, net 32.72 MJ, dry mass 1 kg, wet mass 1 kg, carbon content, fossil 0.157895
- oxygen, liquid: 0 kg; pedigree (1,1,1,1,1)
  EcoSpold01Location=RER
  Data 2001 for fibre production Lenzing AG (Federal Environment Agency- Austria, 2004)
  Uncertainty: Data 2001 for fibre production Lenzing AG (Federal Environment Agency- Austria, 2004)
  properties: dry mass 1 kg, wet mass 1 kg
- heat, district or industrial, natural gas: 0.795366 MJ; = 4.5678+0.93316/2; lognormal variance with pedigree 0.0513, pedigree (2,3,5,3,1)
  Gas consumption for heat production from Lenzing AG 2001 (Federal Environment Agency- Austria, 2004)
  EcoSpold01Location=RER
  Uncertainty: Gas consumption for heat production from Lenzing AG 2001 (Federal Environment Agency- Austria, 2004)
  properties: heating value, net 1 MJ
- electricity, medium voltage: 0.000985089 kWh; lognormal variance with pedigree 0.0513, pedigree (2,3,5,3,1)
  Uncertainty: Heat unspecific assumed for not specified energy in fibres production Lenzing AG 2001 (Federal Environment Agency- Austria, 2004)
- sulfuric acid: 0 kg; pedigree (1,1,1,1,1)
  Data 2001 for fibre production Lenzing AG (Federal Environment Agency- Austria, 2004)
  EcoSpold01Location=RER
  Uncertainty: Data 2001 for fibre production Lenzing AG (Federal Environment Agency- Austria, 2004)
  properties: wet mass 1 kg, dry mass 1 kg
- sulfate pulp, bleached: 0 kg; pedigree (1,1,1,1,1)
  Pulp amount and type from fibres production Lenzing AG 2001 (Federal Environment Agency- Austria, 2004).
  Uncertainty: Pulp amount and type from fibres production Lenzing AG 2001 (Federal Environment Agency- Austria, 2004). Use of existing data inventory 'sulphate pulp, TCF bleached, at plant'
  properties: carbon content, non-fossil 0.494, wet mass 1 kg, heating value, net 13.23 MJ, dry mass 0.9 kg, water content 0.111111
  note on carbon content, non-fossil: C content of dry mass of sulfate pulp is 0.494 kgC/kg dry wood (ecoinvent v2.2 report 6_IX & ecoinvent v2.2 report 9). No other C containing products in the formulation of the pulp.
- sodium hydroxide, without water, in 50% solution state: 0.115608 kg; lognormal variance with pedigree 0.0513, pedigree (2,3,5,3,1)
  (same comment as for oxygen, liquid)
  properties: wet mass 1 kg, dry mass 1 kg, heating value, net 3.03 MJ
- wastewater, average: 0 m3; pedigree (1,1,1,1,1)
  Assumption Carbotech AG, 50% of total water consumed to waste water treatment ARA (in Lenzing total waste water treatment about 35% of total water consumption of company)
  EcoSpold01Location=CH
  Uncertainty: Assumption Carbotech AG, 50% of total water consumed to waste water treatment ARA (in Lenzing total waste water treatment about 35% of total water consumption of company)
  production volume 0 m3
    Calculated from the production volume of viscose fibres in proportion to the respective output amounts.
  properties: water content 2882.2, wet mass 1000 kg, dry mass 0.346837 kg, carbon content, non-fossil 0.194039
  note on carbon content, non-fossil: 0.0673 kg TOC/m3 (Tab A.17, ecoinvent v2.2 report 13_I). TOC was considered as Total Carbon.
- nitrogen, liquid: 0 kg; pedigree (1,1,1,1,1)
  (same comment as for sulfuric acid)
  properties: wet mass 1 kg, dry mass 1 kg
- pulp factory: 7.89934e-12 unit; lognormal variance with pedigree 0.3513, pedigree (2,3,5,3,1)
  EcoSpold01Location=RER
  Assumption Carbotech AG, infrastructure similar than pulp plant with comparable output fibres respectively pulp
  Uncertainty: Assumption Carbotech AG, infrastructure similar than pulp plant with comparable output fibres respectively pulp
- zinc monosulfate: 0 kg; pedigree (1,1,1,1,1)
  (same comment as for sulfuric acid)
  properties: wet mass 1 kg, dry mass 1 kg
- municipal solid waste: 0 kg; pedigree (1,1,1,1,1)
  Assumption Carbotech AG, 1/3 of Lenzing waste materials from fibres production, delivery non-hazardous waste Lenzing AG in depostion site
  EcoSpold01Location=CH
  Uncertainty: Assumption Carbotech AG, 1/3 of Lenzing waste materials from fibres production, delivery non-hazardous waste Lenzing AG in depostion site
  production volume 0 kg
    (same comment as for wastewater, average)
  properties: wet mass 1 kg, carbon content, fossil 0.171549, water content 0.297017, dry mass 0.771 kg, carbon content, non-fossil 0.261655, heating value, net 11.74 MJ
  note on carbon content, fossil: MSW composition in tab 4.1, ecoinvent v2.2 report 13_I. C content referred to 1 kg DM
  note on heating value, net: Value taken from the general comment of the treatment dataset.
- sulfur dioxide, liquid: 0 kg; pedigree (1,1,1,1,1)
  (same comment as for oxygen, liquid)
  properties: wet mass 1 kg, dry mass 1 kg
- chemical, inorganic: 0.00245543 kg; lognormal variance with pedigree 0.0513, pedigree (2,3,5,3,1)
  EcoSpold01Location=GLO
  Data 2001 for fibre production Lenzing AG (Federal Environment Agency- Austria, 2004), no specific data about used auxiliaries, assupmtion Carbotehc AG 50% organic and 50% anorganic
  Uncertainty: Data 2001 for fibre production Lenzing AG (Federal Environment Agency- Austria, 2004), no specific data about used auxiliaries, assupmtion Carbotehc AG 50% organic and 50% anorganic
  properties: dry mass 1 kg, carbon content, fossil 0.003, wet mass 1 kg
  note on carbon content, fossil: This dataset is an unweighted average of 20 inorganic substances (listed in Tab 88.1, ecoinvent v2.2 report 8, part II), being part of the top100 chemicals included in this database. The C-content has also been calculated as an unweighted average of the C content of the substances composing this dataset.
- sodium hypochlorite, without water, in 15% solution state: 0 kg; pedigree (1,1,1,1,1)
  (same comment as for oxygen, liquid)
  properties: dry mass 1 kg, wet mass 1 kg
- hazardous waste, for incineration: 0 kg; pedigree (1,1,1,1,1)
  EcoSpold01Location=CH
  Mainly batteries and accumaltors, assumption Carbotech AG 1/3 of Lenzing waste materials from fibres production, 50% in recycling and 50% as hazardous waste Lenzing AG icineration of hazardous waste
  Uncertainty: Mainly batteries and accumaltors, assumption Carbotech AG 1/3 of Lenzing waste materials from fibres production, 50% in recycling and 50% as hazardous waste Lenzing AG icineration of hazardous waste
  production volume 0 kg
    (same comment as for wastewater, average)
  properties: wet mass 1 kg, carbon content, fossil 0.554667, water content 0.333333, dry mass 0.75 kg, heating value, net 17 MJ
  note on carbon content, fossil: Tab A.6, ecoinvent v2.2 report 13_I. C content has been calculated after data in the tables, and then referred to 1 kg DM
- sodium chloride, powder: 0.0195604 kg; lognormal variance with pedigree 0.0513, pedigree (2,3,5,3,1)
  (same comment as for sulfuric acid)
  properties: dry mass 1 kg, wet mass 1 kg
- chemical, organic: 0.00245543 kg; lognormal variance with pedigree 0.0513, pedigree (2,3,5,3,1)
  Data 2001 for fibre production Lenzing AG (Federal Environment Agency- Austria, 2004), no specific data about used auxiliaries, assupmtion Carbotehc AG 50% organic and 50% anorganic
  EcoSpold01Location=GLO
  Uncertainty: Data 2001 for fibre production Lenzing AG (Federal Environment Agency- Austria, 2004), no specific data about used auxiliaries, assupmtion Carbotehc AG 50% organic and 50% anorganic
  properties: carbon content, fossil 0.628, dry mass 1 kg, heating value, net 19.03 MJ, wet mass 1 kg
  note on carbon content, fossil: This dataset is an unweighted average of 20 organic substances (listed in Tab 88.1, ecoinvent v2.2 report 8, part II), being part of the top100 chemicals included in this database. The C-content has also been calculated as an unweighted average of the C content of the substances composing this dataset.
- heat, district or industrial, other than natural gas: 2.14208 MJ; = 13.092+0.93316/2; lognormal variance with pedigree 0.0513, pedigree (2,3,5,3,1)
  Oil consumption for heat production from Lenzing AG 2001 (Federal Environment Agency- Austria, 2004)
  EcoSpold01Location=RER
  Uncertainty: Oil consumption for heat production from Lenzing AG 2001 (Federal Environment Agency- Austria, 2004)
  properties: heating value, net 1 MJ
- electricity, low voltage: 0.161494 kWh; lognormal variance with pedigree 0.0513, pedigree (2,3,5,3,1)
  Electricity amount for fibre production from Lenzing AG 2001 (Federal Environment Agency- Austria, 2004), general electricity mix UCTE
  EcoSpold01Location=RER
  Uncertainty: Electricity amount for fibre production from Lenzing AG 2001 (Federal Environment Agency- Austria, 2004), general electricity mix UCTE
- oxygen, liquid: 0.000633177, 0.00230759 kg (2 entries); lognormal variance with pedigree 0.0513, pedigree (2,3,5,3,1)
  (same comment as for oxygen, liquid)
- sulfuric acid: 0.0012791, 0.00977746 kg (2 entries); lognormal variance with pedigree 0.0513, pedigree (2,3,5,3,1)
  (same comment as for sulfuric acid)
- sulfate pulp, bleached: 0.023849, 0.13714 kg (2 entries); lognormal variance with pedigree 0.0513, pedigree (2,3,5,3,1)
  (same comment as for sulfate pulp, bleached)
- wastewater, average: -5.04064e-6, -5.45303e-7, -1.05461e-5 m3 (3 entries); lognormal variance with pedigree 0.0513, pedigree (2,3,5,3,1)
  (same comment as for wastewater, average)
  production volume 302297 m3
- nitrogen, liquid: 0.00159567, 0.00581313 kg (2 entries); lognormal variance with pedigree 0.0513, pedigree (2,3,5,3,1)
  (same comment as for sulfuric acid)
- zinc monosulfate: 0.000371614, 0.00196312 kg (2 entries); lognormal variance with pedigree 0.0513, pedigree (2,3,5,3,1)
  (same comment as for sulfuric acid)
- municipal solid waste: -8.98346e-5, -5.50621e-7, -3.85303e-7, -1.52913e-6, -0.00108146 kg (5 entries); lognormal variance with pedigree 0.0513, pedigree (2,3,5,3,1)
  (same comment as for municipal solid waste)
  production volume 2.19951e7 kg
- sulfur dioxide, liquid: 0.00935015, 0.0232741 kg (2 entries); lognormal variance with pedigree 0.0513, pedigree (2,3,5,3,1)
  (same comment as for oxygen, liquid)
- sodium hypochlorite, without water, in 15% solution state: 0.00429169, 0.0203732 kg (2 entries); lognormal variance with pedigree 0.0513, pedigree (2,3,5,3,1)
  (same comment as for oxygen, liquid)
- hazardous waste, for incineration: -9.06637e-7, -2.36989e-8, -1.88531e-6 kg (3 entries); lognormal variance with pedigree 0.0513, pedigree (2,3,5,3,1)
  (same comment as for hazardous waste, for incineration)
  production volume 52762.2 kg

## Inputs from nature
- Water, river [natural resource, in water]: 0.0322641 m3; name water_river_input; lognormal variance with pedigree 0.0513, pedigree (2,3,5,3,1)
  Water consumption for fibre production Lenzing AG 2001 (Federal Environment Agency- Austria, 2004)
  Uncertainty: Water consumption for fibre production Lenzing AG 2001 (Federal Environment Agency- Austria, 2004)

## Emissions to nature
- Water [water, unspecified]: 0.0256499 m3; name water_to_water_unspecified; = water_river_input*(1-fraction_PW_to_air); lognormal variance with pedigree 0.0807, pedigree (2,2,5,1,1)
  Calculated value based on literature values and expert opinion. See comments in the parametres' comment field.
  property fraction, origin: unspecified 0; name fraction_origin_unspecified_Ww
  property carbon content, fossil 0; name C_content_fossil
  property dry mass 0 kg; name DM
  property fraction, origin: salt water 0; name fraction_origin_salt_water_Ww
  property wet mass 1000 kg; name WM
  property fraction, origin: fresh water 1; name fraction_origin_fresh_water_Ww
  property water in wet mass 1000 kg; name WWM
  property carbon content, non-fossil 0; name C_content_non_fossil
- Water [air, unspecified]: 0.00661414 m3; name water_to_air_unspecified; = (water_river_input*fraction_PW_to_air); lognormal variance with pedigree 0.0807, pedigree (2,2,5,1,1)
  (same comment as for Water)
  property fraction, origin: unspecified 0; name fraction_origin_unspecified
  property fraction, origin: fresh water 1; name fraction_origin_fresh_water
  property fraction, origin: salt water 0; name fraction_origin_salt_water

## Sampling procedure
Literature data.

## Extrapolations
Some data are derived from other technologies.

## Review by Hans-Jörg Althaus 2007-11-07
passed

## Review by Emilia Moreno Ruiz 2013-02-11
the flow "heat, future" was deleted, and the amount of heat distributed evenly between the other sources of heat.
