# transport, passenger car, large size, petrol, EURO 3

Dataset: EcoSpold 2, unit process
Geography: RoW
Time period: 2012-01-01 to 2021-12-31
Technology level: current
Classification: ISIC rev.4 ecoinvent: 4922:Other passenger land transport
Tags: internal combustion engine
Scenario: Business-as-Usual
System model: Allocation, cut-off by classification
Generated by: Andrew Simons
Database: ecoinvent
isCopyrightProtected: true
accessRestrictedTo: 1

## General comment
This dataset represents the service of transport in a passenger car for a journey length of 1vkm. The data used for the creation of the global datasets are initially based on European data. Fuel consumption and emissions are for average vehicle use and not representative of a specific driving cycle. The dataset is parametrized with respect to vehicle size, fuel consumption and vehicle lifetime.
Datasets for three different passenger car categories are available in ecoinvent in view of size: small, medium and large.
The category “small” includes passenger cars with engine size up to 1.4 liters. The average weight of this category is estimated to be 1200 kg.
The category “medium” includes passenger cars with engine size between 1.4 and 2.0 liters. The average weight of this category is estimated to be 1600 kg.
The category “large” includes passenger cars with engine size larger than 2.0 liters. The average weight of this category is estimated to be 2000 kg.
The passenger car size influences the amount of both exhaust and non-exhaust emissions. The exhaust emissions caused by the burning of fuel are divided into two groups: fuel dependent emissions (dependent on fuel type and quantity) and Euro class dependent emissions which reflect the emission standards which the vehicle complies with. Three classes of Euro engine type are considered: Euro 3, Euro 4 and Euro 5. The higher the class (e.g. Euro 5), the lower the emissions and viceversa. The Euro engine regulation is set by the European Commission “in order to limit as much as possible the negative impact of road vehicles on the environment and health” (European Commission 2012). This dataset considers a large petrol passenger car of Euro 3 class. Also included within the direct exchanges to the environment are the fuel evaporation emissions from the fuel tank, relevant to petrol vehicles only.
Non-exhaust emissions are those resulting from tyre, brake and road wear. These emissions are considered as by-products.

Reference: European Commission - Mobility and transport. (n.d.). Euro 5 and Euro 6 standards: reduction of pollutant emissions from light. Retrieved May 31, 2012, from http://ec.europa.eu/transport/index_en.htm: http://ec.europa.eu/transport/urban/vehicles/doc/legislation_guide_other.pdf

## Included activities start
From combustion of fuel in the engine. The dataset takes as input the infrastructure of the car and road network, the materials and efforts needed for maintenance of these and the fuel consumed in the vehicle for the journey.

## Included activities end
The activity ends with the transport over 1vkm and the emissions of exhaust and non-exhaust emissions into air, water and soil.

The dataset includes the construction, operation, maintenance and disposal of the vehicle and road infrastructure. Operation of the vehicle includes all the direct emissions produced by fuel combustion and evaporation as well as from tyre, brake and road wear.

The dataset doesn't specifically model cold start emissions. These are assumed to be included in the data for average driving which was used.

## Technology
Transport in a passenger car with internal combustion engine, fueled by petrol. The size is large, with engine size above 2.0 litres and weight of approximately 2000 kg.
Technology classifications are based on those used widely within the works of the European Environment Agency, particularly in the Emissions Inventory Guidebook. The Tremove model - which is also used to generate fuel consumption and emission factors for the datasets presented here - follows this classification system.

## Parameters
- lifetime of the vehicle: 150000 km; name vehicle_lifetime_km; lognormal variance with pedigree 0.0021, pedigree (2,2,2,4,1)
  distance capacity in the assumed vehicle lifetime.
  Reference: Althaus & gauch, Vergleichende Oekobilanz individueller Mobilität: Elektromobilität versus konventionelle Mobilität mit Bio- und fossilen Treibstoffen, EMPA, Dübendorf, 2010
- scaling factor: 1.6129 dimensionless; name scaling_factor; = (vehicle_weight/1240); lognormal variance with pedigree 0.0012, pedigree (2,1,1,1,1)
  The weight of a vehicle determines the non-exhaust emissions of tyre, brake and road wear, reported in kg/kg vehicle.
  The non-exhaust emissions (kg) are calculated multiplying vehicle’s non-exhaust emissions (kg/kg vehicle) by the scaled vehicle weight (kg vehicle).
  The input passenger car weighs 1240 kg. The scaling factor is given by vehicle weight/input passenger car weight. Therefore: the scaling factor is 1200/1240 for small passenger cars.
- so2 emissions per kg petrol: 2e-5 kg; name so2_kg_petrol; = 2.0e-5; lognormal variance with pedigree 0.0021, pedigree (2,2,2,4,1)
  Constant for all petrol vehicles
- weight of the basis vehicle: 1240 kg/unit; name basis_vehicle_weight; lognormal variance with pedigree 0.0021, pedigree (2,2,2,4,1)
  The basis vehicle is the one on which the original life cycle inventory was conducted. It is representative of a VW Golf.
- annual total vkm: 5.32257e10 km; name annual_vkm; lognormal variance with pedigree 0.0021, pedigree (2,2,2,4,1)
  Based on Tremove (2009)
- weight of the vehicle: 2000 kg/unit; name vehicle_weight; lognormal variance with pedigree 0.0015, pedigree (2,2,2,1,1)
  A scaling factor is used to adjust to the vehicle weight chosen in this dataset.
  The weight of a vehicle determines the non-exhaust emissions of tyre, brake and road wear, reported in kg/kg vehicle. The non-exhaust emissions (kg) are calculated multiplying vehicle’s non-exhaust emissions (kg/kg vehicle) by the scaled vehicle weight (kg vehicle).
  Passenger cars are divided into three classes of weight, whereas this dataset has implemented the value valid for a large car: 2000 kg.
  Uncertainty: B
- fuel consumption constant: 2.9288e-5 dimensionless; name fc_constant; = 2.9288E-05; lognormal variance with pedigree 0.0021, pedigree (2,2,2,4,1)
  Determined from analysing the fuel consumption for vehicles in the Tremove model (2009)
- passengers: 1.62 unit; lognormal variance with pedigree 0.0021, pedigree (2,2,2,4,1)
  Average number of passengers in passenger car 1.62
- emissions from tyre abrasion: 5.725e-8 kg/kg vehicle; name tyre_wear_emissions; lognormal variance with pedigree 0.0021, pedigree (2,2,2,4,1)
  average (small, medium and large weight class) emissions produced per kg vehicle. example:
  small medium large average
  kg/vkm kg/vkm kg/vkm kg/vkm
  6.611E-08 6.343E-08 6.258E-08 6.404E-08
  Calculation of non-exhaust emissions (tyre, brake and road wear emissions as well as petrol evaporation emissions) are based on: Ntziachristos, L., Boulter, P. (2009b). EMEP/EEA air pollutant emissions inventory guidebook 2009: Road vehicle tyre and brake wear; Road surface wear. Copenhagen, European Environment Agency.
  Uncertainty: B
- european to global total vkm scaling factor: 5.7 dimensionless; name global_scaling_factor; lognormal variance with pedigree 0.0118, pedigree (3,3,4,4,1)
  Estimation
  Uncertainty: B
- emissions from road abrasion: 9.79e-9 kg/kg vehicle; name road_wear_emissions; lognormal variance with pedigree 0.0021, pedigree (2,2,2,4,1)
  average (small, medium and large weight class) emissions produced per kg vehicle. example:
  small medium large average
  kg/km kg/km kg/km kg/km
  1.25E-08 9.38E-09 7.500E-09 9.79E-09
  Calculation of non-exhaust emissions (tyre, brake and road wear emissions as well as petrol evaporation emissions) are based on: Ntziachristos, L., Boulter, P. (2009b). EMEP/EEA air pollutant emissions inventory guidebook 2009: Road vehicle tyre and brake wear; Road surface wear. Copenhagen, European Environment Agency
  Uncertainty: B
- gross vehicle weight: 2097.2 kg; name gross_vehicle_weight; = vehicle_weight+(1.62*60); lognormal variance with pedigree 0.0015, pedigree (2,2,2,1,1)
  It corresponds to the following formula:
  weight of the vehicle + ((average load * 60 kg / 1000).
  The average load is estimated to be 1.6 passengers and 60 kg is the weight of a passenger.
  Based on: TREMOVE v2.7b, ransport & Mobility Leuven, 2009
- passenger load factor: 97.2 kg; name LF_passengers; = passengers*60; lognormal variance with pedigree 0.0021, pedigree (2,2,2,4,1)
  Number of passengers multiplied by 60 kg per passenger
- fuel consumption of basis vehicle: 0.07839 dimensionless; name fc_basis_vehicle; lognormal variance with pedigree 0.0021, pedigree (2,2,2,4,1)
  Fuel consumption as derived from the source data for each vehicle type, size and emissions standard
- co2 emissions per kg petrol: 3.18 kg; name co2_kg_petrol; lognormal variance with pedigree 0.0021, pedigree (2,2,2,4,1)
  Constant for all petrol vehicles
- emissions from brake friction: 4.45e-9 kg/kg vehicle; name brake_wear_emissions; lognormal variance with pedigree 0.0021, pedigree (2,2,2,4,1)
  average (small, medium and large weight class) emissions produced per kg vehicle.
  Calculation of non-exhaust emissions (tyre, brake and road wear emissions as well as petrol evaporation emissions) are based on: Ntziachristos, L., Boulter, P. (2009b). EMEP/EEA air pollutant emissions inventory guidebook 2009: Road vehicle tyre and brake wear; Road surface wear. Copenhagen, European Environment Agency
  Uncertainty: B

## Reference product
- transport, passenger car, large size, petrol, EURO 3: 1 km; CPC 64119: Other land transportation services of passengers, n.e.c.; By-product classification allocatable product
  production volume 2.50161e11 km; name transport_RP_PV; = annual_vkm*global_scaling_factor
    Based on Tremove model (2009) and scaling factor calculated from Schafer, A. (1998) The global demand for motorized mobility. Trtansportation Research Part A: Policy and Practice 32 (6) 445-477
  property price 0.21605 EUR2005
    Calculated based on inputs: The price of the product has been calculated as a sum of the values of the material and energy inputs for this product. This value is therefore a rough estimation. It may underestimate the real price since there are additional expenses when producing any product. These expences can include for example labour costs, treatment of waste materials and profit for the producer. Please consider carefully whether this level of data quality is acceptable for your application.

## Inputs from technosphere
- road maintenance: 0.000265427 m*year; lognormal variance with pedigree 0.0413, pedigree (2,2,5,1,1)
  This input indicates the unit of road per vkm used during the transport activity. The road input is composed by two demand factors: - Road infrastructure and disposal (RI&D), which varies according to the gross vehicle weight. - Road operations & maintenance (RO&M), which does not vary according to the gross vehicle weight.
- passenger car maintenance: 1.07527e-5 unit; = (1/vehicle_lifetime_km)*scaling_factor; source Spielmann M. 2007; lognormal variance with pedigree 0.0413, pedigree (2,2,5,1,1)
  The dataset is for a medium size passenger car. In order to make the demand appropriate to the particular vehicle in question a scaling factor is applied which is the product of the vehicle weight devided by the weight of the medium size vehicle.
- passenger car, petrol/natural gas: 0.0133333 kg; name passenger_car; = (1/vehicle_lifetime_km)*vehicle_weight; source Spielmann M. 2007; lognormal variance with pedigree 0.0419, pedigree (2,2,5,4,1)
  The dataset is calculated from the LCI of VW Golf. The infrastructure demand is scaled according to the weight of the specific vehicle in question.
- tyre wear emissions, passenger car: -0.000120065 kg; name tyre_emissions; = (tyre_wear_emissions*gross_vehicle_weight)*-1; source Ntziachristos, L. 2009; lognormal variance with pedigree 0.0419, pedigree (2,2,5,4,1)
  Quantity of emissions based on values from Ntziachristos, L., Boulter, P. (2009) EMEP/EEA air pollutant emissions inventory guidebook 2009: Road vehicle tyre and brake wear; Road surface wear. Copenhagen, European Environment Agency. Quantities given in the source assumed to represent medium sized vehicles. Quantities for small and large vehicles taken from the bounds of the ranges given.
  production volume 3.00355e7 kg; = tyre_emissions*transport_RP_PV
    Calculated from production volume of reference product using the relative outputs.
  property price 0 EUR2005; name tyre_emissions_price_EUR2005
- road: 0.0011262 m*year; name road_use; = 5.37E-07*gross_vehicle_weight; source Spielmann M. 2007; lognormal variance with pedigree 0.0413, pedigree (2,2,5,1,1)
  This input indicates the unit of road per vkm used during the transport activity.
  The road input is composed by two demand factors:
  - Road infrastructure and disposal (RI&D), which varies according to the gross vehicle weight.
  - Road operations & maintenance (RO&M), which does not vary according to the gross vehicle weight.
- brake wear emissions, passenger car: -9.33254e-6 kg; name brake_emissions; = (brake_wear_emissions* gross_vehicle_weight)*-1; source Ntziachristos, L. 2009; lognormal variance with pedigree 0.0419, pedigree (2,2,5,4,1)
  (same comment as for tyre wear emissions, passenger car)
  production volume 2.33463e6 kg; = brake_emissions*transport_RP_PV
    Calculated from production volume of reference product using the relative outputs.
  property price 0 EUR2005; name brake_emissions_price_EUR2005
- petrol, low-sulfur: 0.0812368 kg; name petrol_use; = ((gross_vehicle_weight-2000)* fc_constant) + fc_basis_vehicle; source TREMOVE 2007; lognormal variance with pedigree 0.0419, pedigree (2,2,5,4,1)
  Estimation. Calculations are based on data from TREMOVE (2007)
  Fuel consumption is influenced by vehicle weight. Fuel input exchanges (petrol low-sulphur, diesel low-sulphur and natural gas) are scaled on the specific vehicle weight inserted by the ecoinvent user. The scaling factor is estimated to be 2.93E-05.
  The scaling factor corresponds to the difference in terms of fuel consumption of the two extremes that compose each class of passenger car emerging from the match between the three sizes and the three Euro categories. The result is then divided by the difference of the two extremes weight of each emerged class, which is 300 kg for all size categories.
  The size “large” has extremes of 2000 kg and 2300 kg. The scaling factor of a large passenger cars petrol Euro 3 is therefore calculated as:
  ((specific vehicle weight - weight of minor extreme) * 2.93E-05 + fuel consumption of minor extreme).
  This corresponds to:
  ((specific vehicle weight - 2000 kg) * 2.93E-05 + 7.84E-02
  property carbon content, fossil 0.865; name C_content_fossil
  property wet mass 1 kg; name WM
  property water content 0; name water_content
  property water in wet mass 0 kg; name WWM
  property dry mass 1 kg; name DM
  property carbon content, non-fossil 0; name C_content_non_fossil
  properties: heating value, net 42.5 MJ
  note on heating value, net: Based on literature, page 611, Report 17: Jungbluth, N., Chudacoff, M., Dauriat, A., Dinkel, F., Doka, G., Faist Emmenegger, M., Gnansounou, E., Kljun, N., Schleiss, K., Spielmann, M., Stettler, C., Sutter, J. 2007: Life Cycle Inventories of Bioenergy. ecoinvent report No. 17, Swiss Centre for Life Cycle Inventories, Dübendorf, CH.
- road wear emissions, passenger car: -2.05316e-5 kg; name road_emissions; = (road_wear_emissions* gross_vehicle_weight)*-1; source Ntziachristos, L. 2009; lognormal variance with pedigree 0.0419, pedigree (2,2,5,4,1)
  (same comment as for tyre wear emissions, passenger car)
  production volume 5.1362e6 kg; = road_emissions*transport_RP_PV
    Calculated from production volume of reference product using the relative outputs.
  property price 0 EUR2005; name road_emissions_price_EUR2005

## Emissions to nature
All rows: lognormal variance with pedigree 0.0419, pedigree (2,2,5,4,1)
- Methyl ethyl ketone [air, urban air close to ground]: 1.574e-8 kg; source Ntziachristos, L. 2009
  Emissions dependent on engine Euro class (Euro 3, Euro 4 and Euro 5).
- Acetaldehyde [air, urban air close to ground]: 2.361e-7 kg; source Ntziachristos, L. 2009
  Emissions dependent on engine Euro class (Euro 3, Euro 4 and Euro 5).
- Cyclohexane (for all cycloalkanes) [air, urban air close to ground]: 3.589e-7 kg; source Ntziachristos, L. 2009
  Emissions dependent on engine Euro class (Euro 3, Euro 4 and Euro 5).
- Nickel [air, urban air close to ground]: 5.68658e-9 kg; = 7.00000E-08* petrol_use; source Ntziachristos, L. 2009
  7.00000E-08 is the emission value of nickel per kg of petrol used
- Copper [air, urban air close to ground]: 1.38103e-7 kg; = 1.70000E-06*petrol_use; source Ntziachristos, L. 2009
  1.70000E-06 is the emission value of copper per kg of petrol used
- Acetone [air, urban air close to ground]: 1.92e-7 kg; source Ntziachristos, L. 2009
  Emissions dependent on engine Euro class (Euro 3, Euro 4 and Euro 5).
- Propene [air, urban air close to ground]: 1.481e-7 kg; source Mellios, G. 2009
  petrol evaporation emissions
- Dinitrogen monoxide [air, urban air close to ground]: 1.05608e-5 kg; = 1.30000E-04*petrol_use; source Ntziachristos, L. 2009
  1.30000E-04 is the emission value of dinitrogen monoxide per kg of petrol used
- Ethylene oxide [air, urban air close to ground]: 2.298e-6 kg; source Ntziachristos, L. 2009
  Emissions dependent on engine Euro class (Euro 3, Euro 4 and Euro 5).
- Propylene oxide [air, urban air close to ground]: 1.203e-6 kg; source Ntziachristos, L. 2009
  Emissions dependent on engine Euro class (Euro 3, Euro 4 and Euro 5).
- Methane [air, urban air close to ground]: 3.506e-5 kg; source Ntziachristos, L. 2009
  Emissions dependent on engine Euro class (Euro 3, Euro 4 and Euro 5).
- m-Xylene [air, urban air close to ground]: 3.378e-6 kg; source Ntziachristos, L. 2009
  emissions dependent on engine Euro class (Euro 3, Euro 4 and Euro 5). Includes petrol evaporation.
- Toluene [air, urban air close to ground]: 7.835e-6 kg; source Ntziachristos, L. 2009
  (same comment as for m-Xylene)
- Pentane [air, urban air close to ground]: 8.845e-6 kg; source Ntziachristos, L. 2009
  (same comment as for m-Xylene)
- Lead [air, urban air close to ground]: 1.21855e-10 kg; = 1.50000E-09*petrol_use; source Ntziachristos, L. 2009
  1.50000E-09 is the emission value of lead per kg of petrol used
- Heptane [air, urban air close to ground]: 2.33e-7 kg; source Ntziachristos, L. 2009
  Emissions dependent on engine Euro class (Euro 3, Euro 4 and Euro 5).
- Hexane [air, urban air close to ground]: 5.068e-7 kg; source Ntziachristos, L. 2009
  Emissions dependent on engine Euro class (Euro 3, Euro 4 and Euro 5).
- Butane [air, urban air close to ground]: 7.85e-6 kg; source Ntziachristos, L. 2009
  (same comment as for m-Xylene)
- Styrene [air, urban air close to ground]: 3.18e-7 kg; source Ntziachristos, L. 2009
  Emissions dependent on engine Euro class (Euro 3, Euro 4 and Euro 5).
- Acrolein [air, urban air close to ground]: 5.981e-8 kg; source Ntziachristos, L. 2009
  Emissions dependent on engine Euro class (Euro 3, Euro 4 and Euro 5).
- NMVOC, non-methane volatile organic compounds, unspecified origin [air, urban air close to ground]: 7.063e-5 kg; source TREMOVE 2007
  (same comment as for m-Xylene)
- Benzaldehyde [air, urban air close to ground]: 6.926e-8 kg; source Ntziachristos, L. 2009
  Emissions dependent on engine Euro class (Euro 3, Euro 4 and Euro 5).
- Ethane [air, urban air close to ground]: 1.322e-6 kg; source Ntziachristos, L. 2009
  (same comment as for m-Xylene)
- Propane [air, urban air close to ground]: 5.653e-6 kg; source Ntziachristos, L. 2009
  (same comment as for m-Xylene)
- Nitrogen oxides [air, urban air close to ground]: 7.801e-5 kg; source TREMOVE 2007
  Emissions dependent on engine Euro class (Euro 3, Euro 4 and Euro 5).
- Ammonia [air, urban air close to ground]: 2.4371e-6 kg; = 3.00000E-05* petrol_use; source Ntziachristos, L. 2009
  3.00000E-05 is the emission value of ammonia per kg of petrol used
- Cadmium [air, urban air close to ground]: 8.12368e-10 kg; = 1.00000E-08*petrol_use; source Ntziachristos, L. 2009
  1.00000E-08 is the emission value of cadmium per kg of petrol used
- PAH, polycyclic aromatic hydrocarbons [air, urban air close to ground]: 2.82704e-9 kg; = 3.48000E-08*petrol_use; source Ntziachristos, L. 2009
  3.48000E-08 is the emission value of PAH per kg of petrol used
- Carbon dioxide, fossil [air, urban air close to ground]: 0.258333 kg; = co2_kg_petrol*petrol_use; source TREMOVE 2007
  Calculated based on the amount of petrol used and the emission of CO2 per kg of petrol.
- 1-Pentene [air, urban air close to ground]: 5.352e-7 kg; source Ntziachristos, L. 2009
  Emissions dependent on engine Euro class (Euro 3, Euro 4 and Euro 5).
- Selenium [air, urban air close to ground]: 8.12368e-10 kg; = 1.00000E-08*petrol_use; source Ntziachristos, L. 2009
  1.00000E-08 is the emission value of selenium per kg of petrol used
- Chromium [air, urban air close to ground]: 4.06184e-9 kg; = 5.00000E-08*petrol_use; source Ntziachristos, L. 2009
  5.00000E-08 is the emission value of chromium per kg of petrol used
- 2-Methyl pentane [air, urban air close to ground]: 7.417e-6 kg; source Mellios, G. 2009
  petrol evaporation emissions
- Carbon monoxide, fossil [air, urban air close to ground]: 0.001746 kg; source TREMOVE 2007
  Emissions dependent on engine Euro class (Euro 3, Euro 4 and Euro 5).
- Mercury [air, urban air close to ground]: 5.68658e-12 kg; = 7.00000E-11*petrol_use; source Ntziachristos, L. 2009
  7.00000E-11 is the emission value of mercury per kg of petrol used
- Chromium IV [air, urban air close to ground]: 8.12368e-12 kg; = 1.00000E-10*petrol_use; source Ntziachristos, L. 2009
  1.00000E-10 is the emission value of chromium IV per kg of petrol used
- Zinc [air, urban air close to ground]: 8.12368e-8 kg; = 1.00000E-06*petrol_use; source Ntziachristos, L. 2009
  1.00000E-06 is the emission value of zinc per kg of petrol used
- Formaldehyde [air, urban air close to ground]: 5.352e-7 kg; source Ntziachristos, L. 2009
  Emissions dependent on engine Euro class (Euro 3, Euro 4 and Euro 5).
- Benzene [air, urban air close to ground]: 4.382e-6 kg; source Ntziachristos, L. 2009
  (same comment as for m-Xylene)
- Sulfur dioxide [air, urban air close to ground]: 1.62474e-6 kg; = so2_kg_petrol*petrol_use; source TREMOVE 2007
  1.99998E-05 is the emission value of sulphur dioxide per kg of petrol used
- o-Xylene [air, urban air close to ground]: 8.311e-7 kg; source Ntziachristos, L. 2009
  (same comment as for m-Xylene)
- Particulates, < 2.5 um [air, urban air close to ground]: 1.044e-6 kg; source TREMOVE 2007
  Emissions dependent on engine Euro class (Euro 3, Euro 4 and Euro 5).
- Ethene [air, urban air close to ground]: 2.645e-8 kg; source Mellios, G. 2009
  petrol evaporation emissions

## Sampling procedure
Literature
