# evaporation of natural gas

Dataset: EcoSpold 2, unit process
Geography: RoW
Time period: 2012-01-01 to 2021-12-31
Technology level: current
Classification: ISIC rev.4 ecoinvent: 3520:Manufacture of gas; distribution of gaseous fuels through mains
Classification: EcoSpold01Categories: natural gas/production
Synonyms: LNG
Scenario: Business-as-Usual
System model: Allocation, cut-off by classification
Share of production covered: 100 %
Generated by: Mireille Faist Emmenegger
Published in: Faist Emmenegger, Mireille 2015
Database: ecoinvent
isCopyrightProtected: true
accessRestrictedTo: 1

## General comment
This dataset describes the evaporation of liquefied gas in a evaporation plant. The process is normalized on the gaseous form of gas.
Characteristics of natural gas: HV , Methan kg/m3, density kg/m3

## Included activities start
The activity starts with the arrival of natural gas, liquefied.

## Included activities end
The activity ends with the production of natural gas, high pressure.

## Geography
The data describes the evaporation of average gas in an European gasification plants. The DZ Dataset is used as proxy for GLO.

## Parameters
- fraction, process water, to air: 0.15 dimensionless; name fraction_PW_to_air; lognormal variance with pedigree 0.092025, pedigree (4,4,3,2,4)
  Literature value. In case when no industry/process specific data are available, default evaporation fraction value is used. This value is 15% and is based on literature (Statistics Canada, 2007 & Shaffer, K.H., 2008, Consumptive water use in the Great Lakes Basin, USGS & Shiklomanov, 2003, World Water Resources at the Beginning of the 21st Century) and has been approved by an expert.

## Reference product
- natural gas, high pressure: 1 m3; CPC 12020: Natural gas, liquefied or in the gaseous state; By-product classification allocatable product; CAS 14493-06-2
  production volume 1.80157e11 m3; = 325.3*1000000000*37.8/39
    BP statistics; scaled to 39 MJ/m3
  property heating value, net 39 MJ
    Literature value, Source: United Nations Statistics Division (2018) International Recommendations for Energy Statistics (IRES). Available at: http://unstats.un.org/unsd/statcom/doc11/BG-IRES.pdf.
  property heating value, gross 0 MJ; name Gross_Heat_Value
  property price 0.166 EUR2005
    Temporary price data. Calculated as 90% of purchasers price based on: 2005 price for Europe-27 Import (US$ and kg) in UN Commodity Trade Statistics Database - Natural gas in gaseous state (http://data.un.org/Data.aspx?q=natural+gas&d=ComTrade&f=_l1Code%3a28%3bcmdCode%3a271121; accessed 4 January 2011), using density of natural gas of 0.8 kg/m3 for unit conversion.
  property wet mass 0.84 kg; name WM
  property water content 0; name water_content
  property dry mass 0.84 kg; name DM
  property carbon content, fossil 0.602381; name C_content_fossil
  property water in wet mass 0 kg; name WWM
  property carbon content, non-fossil 0; name C_content_non_fossil
  property carbon content 0.602381
    carbon content on a dry matter basis (reserved; not for manual entry)
  properties: carbon allocation 0.506 kg

## Inputs from technosphere
- electricity, medium voltage: 0 kWh; pedigree (1,1,1,1,1)
  EcoSpold01Location=DZ
  Average data for gasification
  Uncertainty: Environmental report for italian plant, standard technology
- natural gas, liquefied: 1.0043 m3; = 1+0.0043; lognormal variance with pedigree 0.0106, pedigree (1,1,4,5,1)
  gas input including leakages
  properties: heating value, net 39 MJ, dry mass 0.84 kg, carbon content, fossil 0.602381, wet mass 0.84 kg
  note on carbon content, fossil: An average C content of 0.506 kg C/ Nm3 has been assumed for natural gas (this average has been calculated using data in Tab 3.5, ecoinvent v2.2 report 6_V). It equals 0.60238 kg C per 0.84kg dry mass.
- natural gas processing plant: 7.89e-13 unit; lognormal variance with pedigree 0.328, pedigree (4,4,4,5,3)
  estimation for infrastructure
  EcoSpold01Location=GLO
  Uncertainty: estimation for infrastructure
- electricity, medium voltage: 4.59841e-6, 0.000169689, 1.56617e-5, 4.77075e-5, 1.35093e-5, 2.74109e-6, 3.57104e-6, 8.89244e-6, 3.66237e-5, 0.00013123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 kWh (43 entries); lognormal variance with pedigree 0.0192, pedigree (1,3,4,5,3)
  (same comment as for electricity, medium voltage)

## Inputs from nature
- Water, salt, ocean [natural resource, in water]: 0.000639 m3; name water_salt_ocean_input; lognormal variance with pedigree 0.0506, pedigree (1,3,4,5,1)
  Environmental report for italian plant
  Uncertainty: Environmental report for italian plant

## Emissions to nature
- Water [water, unspecified]: 0.00054315 m3; name water_to_water_unspecified; = water_salt_ocean_input*(1-fraction_PW_to_air); lognormal variance with pedigree 0.130025, pedigree (4,4,5,2,4)
  Calculated value based on literature values and expert opinion. See comments in the parametres' comment field.
  property fraction, origin: fresh water 0; name fraction_origin_fresh_water_Ww
  property fraction, origin: unspecified 0; name fraction_origin_unspecified_Ww
  property fraction, origin: salt water 1; name fraction_origin_salt_water_Ww
- Nitrogen oxides [air, non-urban air or from high stacks]: 4e-6 kg; lognormal variance with pedigree 0.0506, pedigree (1,3,4,5,1)
  Average data for gasification
  Uncertainty: Environmental report for italian plant
- Water [air, unspecified]: 9.585e-5 m3; name water_to_air_unspecified; = water_salt_ocean_input*fraction_PW_to_air; lognormal variance with pedigree 0.130025, pedigree (4,4,5,2,4)
  (same comment as for Water)
  property fraction, origin: unspecified 0; name fraction_origin_unspecified
  property fraction, origin: fresh water 0; name fraction_origin_fresh_water
  property fraction, origin: salt water 1; name fraction_origin_salt_water
- Methane, fossil [air, non-urban air or from high stacks]: 7e-5 kg; = 0.7*0.0001; lognormal variance with pedigree 0.0506, pedigree (1,3,4,5,1)
  average data for the leakages in gasification
  Uncertainty: Environmental report for italian plant
- Carbon dioxide, fossil [air, non-urban air or from high stacks]: 0.0088 kg; lognormal variance with pedigree 0.0112, pedigree (1,3,4,5,1)
  Average data for gasification
  Uncertainty: Environmental report for italian plant

## Sampling procedure
environmental report

## Extrapolations
The data is extrapolated from European data.
