# anti-reflex-coating, etching, solar glass

Dataset: EcoSpold 2, unit process
Geography: RoW
Time period: 2002-01-01 to 2021-12-31
Technology level: current
Classification: EcoSpold01Categories: glass/construction
Classification: ISIC rev.4 ecoinvent: 2310:Manufacture of glass and glass products
Tags: ConvertedDataset
Scenario: Business-as-Usual
System model: Allocation, cut-off by classification
Share of production covered: 100 %
Generated by: Niels Jungbluth
Published in: Kellenberger D. 2007
Database: ecoinvent
isCopyrightProtected: true
accessRestrictedTo: 1

## General comment
The filter cake contains silicone-sodium-fluoride and calcium carbonates or oxides. They can be disposed with the normal household wastes. Standard distances have been assumed for the transport. The exhausts from the treatment chambers go through a so-called air-scrubber (air/water cleaner). The waste material from the scrubber is collected with the water from rinsing of the glasses between the different operations of the treatment and from the final cleaning. This liquid is then passed through a waste water treatment system, resulting in clean water, to be used again in process. The dry matters from the filter press consist of non-aggressive and non-toxic materials, mainly silica-, sodium-, fluoride- and calcium- carbonates and oxides
[This dataset was already contained in the ecoinvent database version 2. It was not individually updated during the transfer to ecoinvent version 3. Life Cycle Impact Assessment results may still have changed, as they are affected by changes in the supply chain, i.e. in other datasets. This dataset was generated following the ecoinvent quality guidelines for version 2. It may have been subject to central changes described in the ecoinvent version 3 change report (http://www.ecoinvent.org/database/ecoinvent-version-3/reports-of-changes/), and the results of the central updates were reviewed extensively. The changes added e.g. consistent water flows and other information throughout the database. The documentation of this dataset can be found in the ecoinvent reports of version 2, which are still available via the ecoinvent website. The change report linked above covers all central changes that were made during the conversion process.]

## Included activities end
Gate to gate inventory for the process including cleaning, etching and clarification and drying. Losses of glass are not included.

## Geography
Production plant in DK. Some pre-products and waste treatment services estimated with European and Swiss data.

## Technology
The antireflection microstructure is impressed on the solar glass by an automatic etching procedure. Etching is made with fluorosilic acid (H2(SiF6). It is possible to produce a film layer on structured and smooth float glass as well as on tempered or un-tempered glasses.

## Time period
Time of information

## Parameters
- fraction, tap water, to air: 0.15 dimensionless; name fraction_TW_to_air; lognormal variance with pedigree 0.092025, pedigree (4,4,3,2,4)
- fraction, process water, to air: 0.15 dimensionless; name fraction_PW_to_air; lognormal variance with pedigree 0.092025, pedigree (4,4,3,2,4)

## Reference product
- anti-reflex-coating, etching, solar glass: 1 m2; CPC 35110: Paints and varnishes and related products; By-product classification allocatable product
  EcoSpold01Location=DK
  production volume 3.97745 m2
    This is a placeholder value that does not reflect real-world production volumes. This dataset does not currently require a real-world production volume to work in the database framework, and no actual data were collected yet. This has no negative effect on the results of the ecoinvent database.
  property price 4.38 EUR2005
    Calculated from `Tempering, flat glass', by assuming the cost is the same per MJ Natural gas used.

## Inputs from technosphere
- heat, district or industrial, natural gas: 0 MJ; pedigree (1,1,1,1,1)
  EcoSpold01Location=RER
  Data provided by manufacturer including also room heating
  Uncertainty: Data provided by manufacturer including also room heating
  properties: heating value, net 1 MJ
- electricity, low voltage: 0 kWh; pedigree (1,1,1,1,1)
  EcoSpold01Location=DK
  Data provided by manufacturer, all electricity uses in the plant
  Uncertainty: Data provided by manufacturer, all electricity uses in the plant
- tap water: 0 kg; name tap_water_input; pedigree (1,1,1,1,1)
  EcoSpold01Location=RER
  Data provided by manufacturer
  Uncertainty: Data provided by manufacturer
  properties: wet mass 1 kg, carbon content, fossil 0.00178991, water content 2962.17, dry mass 0.000337476 kg
  note on carbon content, fossil: Bicarbonate content is 2.93 mol/m3. CO2 content is 0.1 mol/m3 (ecoinvent v2.2 report 8, Tab 93.1).
- wastewater, unpolluted, from residence: -0.01 m3; lognormal variance with pedigree 0.0426, pedigree (2,1,5,5,1)
  EcoSpold01Location=CH
  Data provided by manufacturer, fluoride emission separate considered
  Uncertainty: Data provided by manufacturer, fluoride emission separate considered
  production volume 0.03 m3
    Calculated from the production volume of anti-reflex-coating, etching, solar glass in proportion to the respective output amounts.
  properties: carbon content, fossil 0.00178991, water content 2962.17, dry mass 0.337476 kg, wet mass 1000 kg
  note on carbon content, fossil: Assumed to be like in tap water. Bicarbonate content is 2.93 mol/m3. CO2 content is 0.1 mol/m3 (ecoinvent v2.2 report 8, Tab 93.1).
- fluosilicic acid, without water, in 22% solution state: 0.133 kg; lognormal variance with pedigree 0.0426, pedigree (2,1,5,5,1)
  Data provided by manufacturer
  EcoSpold01Location=RER
  Uncertainty: Data provided by manufacturer
  properties: dry mass 1 kg, wet mass 1 kg
- lime, hydrated, packed: 0.02 kg; lognormal variance with pedigree 0.0426, pedigree (2,1,5,5,1)
  EcoSpold01Location=CH
  Data provided by manufacturer
  Uncertainty: Data provided by manufacturer
  properties: water content 0.00300903, dry mass 0.997 kg, wet mass 1 kg
- refinery sludge: 0 kg; pedigree (1,1,1,1,1)
  (same comment as for lime, hydrated, packed)
  production volume 0 kg
    (same comment as for wastewater, unpolluted, from residence)
  properties: dry mass 0.105 kg, wet mass 1 kg, heating value, net 2.45 MJ, carbon content, fossil 0.767857, water content 8.52381
  note on heating value, net: Value taken from the general comment of the treatment dataset.
  note on carbon content, fossil: Tab A.6, ecoinvent v2.2 report 13_I. C content has been calculated after data in the tables, and then referred to 1 kg DM
- glass etching factory: 2e-7 unit; lognormal variance with pedigree 0.0426, pedigree (2,1,5,5,1)
  EcoSpold01Location=DK
  Data provided by manufacturer
  Uncertainty: Data provided by manufacturer
- heat, district or industrial, natural gas: 0.099144, 0.00198795, 6.43287 MJ (3 entries); lognormal variance with pedigree 0.0426, pedigree (2,1,5,5,1)
  (same comment as for heat, district or industrial, natural gas)
- electricity, low voltage: 0.000485446, 0.0140572, 0.00193034, 0.000501437, 0.00496074, 0.0179395, 0.00171803, 0.00122639, 0.000758476, 0.000425507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 kWh (21 entries); lognormal variance with pedigree 0.0426, pedigree (2,1,5,5,1)
  (same comment as for electricity, low voltage)
- tap water: 0.155444, 0.0187113, 0.0139063, 0.0309234, 0.779766, 0.0202854, 0.0577015, 8.92326 kg (8 entries); lognormal variance with pedigree 0.0426, pedigree (2,1,5,5,1)
  (same comment as for tap water)
- refinery sludge: -0.000118097, -0.0248819 kg (2 entries); lognormal variance with pedigree 0.0426, pedigree (2,1,5,5,1)
  (same comment as for lime, hydrated, packed)
  production volume 0.075 kg

## Emissions to nature
- Fluoride [water, surface water]: 0.0005 kg; lognormal variance with pedigree 0.0826, pedigree (2,1,5,5,1)
  Data provided by manufacturer, estimation no reduction in wastewater treatment
  Uncertainty: Data provided by manufacturer, estimation no reduction in wastewater treatment
- Water [air, unspecified]: 0.0015 m3; name water_to_air_unspecified; lognormal variance with pedigree 0.0827, pedigree (2,2,5,5,1)
  Calculated value based on literature values and expert opinion. See comments in the parametres' comment field.
  property fraction, origin: salt water 0; name fraction_origin_salt_water
  property fraction, origin: fresh water 1; name fraction_origin_fresh_water
  property fraction, origin: unspecified 0; name fraction_origin_unspecified

## Sampling procedure
Personal communication

## Extrapolations
This dataset has been copied from an original dataset covering the geography DK. The uncertainty has been adjusted accordingly.

## Review by Daniel Kellenberger (obsolete) 2003-07-11
Passed.
