# 2-methyl-2-butanol production

Dataset: EcoSpold 2, unit process
Geography: RER
Time period: 1989-01-01 to 2021-12-31
Technology level: current
Classification: EcoSpold01Categories: chemicals/organics
Classification: ISIC rev.4 ecoinvent: 2011:Manufacture of basic chemicals
Synonyms: tert-amyl alcohol; tert-pentanol
Tags: ConvertedDataset
Scenario: Business-as-Usual
System model: Allocation, cut-off by classification
Share of production covered: 10 %
Generated by: Jürgen Sutter
Published in: Sutter, J. 2007
Database: ecoinvent
isCopyrightProtected: true
accessRestrictedTo: 1

## General comment
This data represents the production of 1 kg of pure 2-methyl-2-butanol via the hydration of 2-methyl-2-butene. Raw materials and energy consumption are modelled with data from a similar process. The emissions are estimated. Infrastructure is included with a default value.
[This dataset was already contained in the ecoinvent database version 2. It was not individually updated during the transfer to ecoinvent version 3. Life Cycle Impact Assessment results may still have changed, as they are affected by changes in the supply chain, i.e. in other datasets. This dataset was generated following the ecoinvent quality guidelines for version 2. It may have been subject to central changes described in the ecoinvent version 3 change report (http://www.ecoinvent.org/database/ecoinvent-version-3/reports-of-changes/), and the results of the central updates were reviewed extensively. The changes added e.g. consistent water flows and other information throughout the database. The documentation of this dataset can be found in the ecoinvent reports of version 2, which are still available via the ecoinvent website. The change report linked above covers all central changes that were made during the conversion process.]

## Included activities start
From reception of pentane at the factory gate.

## Included activities end
This activity ends with 1 kg of 2-methyl-2-butanol, 100% at the factory gate. The dataset includes the input materials, energy uses, infrastructure and emissions.

## Geography
The inventory is modelled for Europe.

## Technology
2-Methyl-2-butanol is produced by the hydration of 2-methyl-2-butene (isopentene).
Reference:
Lappe, P., Hoffmann, T.: Pentanols. In: Ullmann's Encyclopedia of Industrial Chemistry, Seventh Edition, 2004 Electronic Release (ed. Fiedler E., Grossman G., Kersebohm D., Weiss G. and Witte C.). 7th Electronic Release Edition. Wiley InterScience, New York, Online-Version under: http://www.mrw.interscience.wiley.com/ueic/articles

## Time period
Time of publications

## Parameters
- fraction, cooling water, recirculating system, to air: 0.771 dimensionless; name fraction_CW_R_to_air; lognormal variance with pedigree 0.0413, pedigree (2,3,1,3,1)
  Calculated based on literature value (Scown, C.D., 2011, Water Footprint of U.S. Transportation Fuels and supplying information of the article) (Vionnet, S., Quantis Water Database - Technical Report, 2012).
- fraction, cooling water, to air: 0.3875 dimensionless; name fraction_CW_to_air; = (0.5*fraction_CW_OT_to_air)+(0.5*fraction_CW_R_to_air); lognormal variance with pedigree 0.092025, pedigree (4,4,3,2,4)
  Calculated value based on literature value (see comments of the other parametres present in this dataset) and expert opinion. In the case when no industry/literature data are available about the type of cooling or directly fraction, cooling water, to air specific for the process a default assumption is applied. It is assumed that the once-through cooling system is used in 50% of all cases and recirculating system is used in another 50% of all cases.
- fraction, process water, to air: 0.205 dimensionless; name fraction_PW_to_air; lognormal variance with pedigree 0.092025, pedigree (4,4,3,2,4)
  Literature value (Statistics Canada, 2007 & Shaffer, K.H., 2008, Consumptive water use in the Great Lakes Basin, USGS) (Vionnet, S., Quantis Water Database - Technical Report, 2012).
- fraction, cooling water, cooling pond system, to air: 0.032 dimensionless; name fraction_CW_CP_to_air; lognormal variance with pedigree 0.0413, pedigree (2,3,1,3,1)
  (same comment as for fraction, cooling water, recirculating system, to air)
- fraction, water, deionised, to air: 0.205 dimensionless; name fraction_WDI_to_air; = fraction_PW_to_air; lognormal variance with pedigree 0.092025, pedigree (4,4,3,2,4)
  Calculated value. See comment in the other parametres present in this dataset. Deionised water is considered to be always used as process water, thus process water fractions to air are applied to all deionised water input flows to calculate the amount of water consumed in the processes.
- fraction, cooling water, once-through system, to air: 0.004 dimensionless; name fraction_CW_OT_to_air; lognormal variance with pedigree 0.0413, pedigree (2,3,1,3,1)
  (same comment as for fraction, cooling water, recirculating system, to air)

## Reference product
- 2-methyl-2-butanol: 1 kg; By-product classification allocatable product; CPC 341: Basic organic chemicals; CAS 75-85-4
  2-Methyl-2-butanol is a colourless liquid of characteristic odor. It is only sparingly miscible with water at 20 °C. However, it is almost completely miscible with most organic solvents.
  2-Methyl-2-butanol is employed as solvent for coating materials based on epoxy resins and polyurethanes, in the production of aryl pyruvic acids, and in the oxidation of olefins to the corresponding carbonyl compounds. It is also used as a stabilizing agent for 1,1,1-trichloroethane, chlorinated C3 - C4-hydrocarbons, and N,N,- dialkylallyl amines. The reaction of 2,2,6,6-tetramethyl-4-cyano-4-hydroxypiperidine with 2-methyl-2-butanol yields highly active light stabilizers for polymers.
  EcoSpold01Location=RER
  production volume 1.32237 kg
    This is a placeholder value that does not reflect real-world production volumes. This dataset does not currently require a real-world production volume to work in the database framework, and no actual data were collected yet. This has no negative effect on the results of the ecoinvent database. The placeholder value of this activity was scaled according to the nominal GDP of 2005 (source: United Nations, http://data.un.org/Glossary.aspx?q=GDP+%28current+US%24%29, accessed 20130726) to reflect an appropriate share of the global production volume, which is also a placeholder value.
  property heating value, net 37.14 MJ
    LHV is calculated based on the elemental composition of the substance. Based on the CAS number of the substance (000075-85-4), the chemical formula of the substance is found to be: C5H12O, (PubChem 2020).
    Reference: Kim, S., Chen, J., Cheng, T., Gindulyte, A., He, J., He, S., Li, Q., Shoemaker, B. A., Thiessen, P. A., Yu, B., Zaslavsky, L., Zhang, J., & Bolton, E. E. (2019). PubChem 2019 update: improved access to chemical data. Nucleic acids research, 47(D1), D1102–D1109. https://doi.org/10.1093/nar/gky1033
  property price 1.40603 EUR2005
    Calculated based on inputs: The price of the product has been calculated as a sum of the values of the material and energy inputs for this product. This value is therefore a rough estimation. It may underestimate the real price since there are additional expenses when producing any product. These expences can include for example labour costs, treatment of waste materials and profit for the producer. Please consider carefully whether this level of data quality is acceptable for your application.
  property carbon content 0.681818
    carbon content on a dry matter basis (reserved; not for manual entry)
  properties: water content 0, carbon content, fossil 0.681818, dry mass 1 kg, carbon content, non-fossil 0, water in wet mass 0 kg, wet mass 1 kg, carbon allocation 0.681818 kg

## Inputs from technosphere
- electricity, medium voltage: 0.192212 kWh; source Chauvel, A. 1989; lognormal variance with pedigree 0.0841, pedigree (4,5,5,3,3)
  Estimation. Estimated from data for the production of isopropanol from the hydration of isopropylene. This process is considered to be similar to the hydration of 2-methyl-2-butene.
  EcoSpold01Location=UCTE
  Uncertainty: Estimation
- water, deionised: 0 kg; name water_deionised_input; source Chauvel, A. 1989; pedigree (1,1,1,1,1)
  EcoSpold01Location=CH
  Estimation. This data was estimated from the production of isopropanol from the hydration of isopropylene. The isopropylene process is considered to be similar to the hydration of 2-methyl-2-butene.
  Uncertainty: Estimation
  properties: wet mass 1 kg
- chemical factory, organics: 4e-10 unit; lognormal variance with pedigree 0.448, pedigree (4,5,5,5,5)
  Estimation. Data was estimated based on the dataset "chemical plant, organics". This module assumes a built area of about 4.2 ha, an average output of 50'000 t/a, and plant life of fifty years. The estimated value is 4.00 E-10 units per kg of produced chemical.
  EcoSpold01Location=RER
  Uncertainty: Estimation
- heat, district or industrial, natural gas: 9.614 MJ; source Chauvel, A. 1989; lognormal variance with pedigree 0.0841, pedigree (4,5,5,3,3)
  Estimation. Estimated from data for the production of isopropanol from the hydration of isopropylene. This process is considered to be similar to the hydration of 2-methyl-2-butene.
  Uncertainty: Estimation
  properties: heating value, net 1 MJ
- heat, district or industrial, other than natural gas: 14.3911 MJ; source Chauvel, A. 1989; lognormal variance with pedigree 0.0841, pedigree (4,5,5,3,3)
  EcoSpold01Location=RER
  Estimation. Estimated from data for the production of isopropanol from the hydration of isopropylene. This process is considered to be similar to the hydration of 2-methyl-2-butene.
  Uncertainty: Estimation
  properties: heating value, net 1 MJ
- pentane: 0.83732 kg; source Frischknecht R. 2007; lognormal variance with pedigree 0.076, pedigree (4,5,5,1,1)
  EcoSpold01Location=RER
  Proxy. For the 2-methyl-2-butene input, the dataset for pentene was used. The values for the consumption of the raw materials were calculated with an assumed yield of 95 %.
  Uncertainty: Stoechiometric calculation
  properties: carbon content, fossil 0.833333, dry mass 1 kg, wet mass 1 kg, heating value, net 45.37 MJ
- water, deionised: 0.996413, 0.00358684 kg (2 entries); source Chauvel, A. 1989; lognormal variance with pedigree 0.198, pedigree (4,5,5,5,5)
  (same comment as for water, deionised)

## Inputs from nature
- Water, cooling, unspecified natural origin [natural resource, in water]: 0.19 m3; name water_cooling_UNO_input; source Chauvel, A. 1989; lognormal variance with pedigree 0.198, pedigree (4,5,5,5,5)
  Estimation. Estimated from the production of isopropanol from the hydration of isopropylene. The isopropylene process is considered to be similar to the hydration of 2-methyl-2-butene.
  Uncertainty: Estimation

## Emissions to nature
- Water [air, unspecified]: 0.07383 m3; name water_to_air_unspecified; = (water_deionised_input/1000*fraction_WDI_to_air)+(water_cooling_UNO_input*fraction_CW_to_air); lognormal variance with pedigree 0.0807, pedigree (2,2,5,1,1)
  Calculated value based on literature values and expert opinion. See comments in the parametres' comment field.
  property fraction, origin: salt water 0; name fraction_origin_salt_water
  property fraction, origin: fresh water 0.00277665; name fraction_origin_fresh_water
  property fraction, origin: unspecified 0.997223; name fraction_origin_unspecified
- COD, Chemical Oxygen Demand [water, surface water]: 0.0163 kg; lognormal variance with pedigree 0.188, pedigree (4,5,5,5,5)
  Calculation. This data was calculated from the amount of 2-methyl-2-butene in the treated waste water assuming a carbon conversion of 96% for COD. The worst case scenario BOD=COD was used.
  It is assumed that the manufacturing plants are located in an urban/industrial area and consequently the emissions are categorised as emanating in a high population density area.
  Water emissions are assumed to be emitted into rivers.
  Uncertainty: Calculated from the water emissions
- 2-Methyl-2-butene [air, urban air close to ground]: 0.0016746 kg; lognormal variance with pedigree 0.218, pedigree (4,5,5,5,5)
  Estimation. Air emissions occurring from the purge vent, the distillation vent and fugitive emission sources were estimated to 0.2% of the raw material input.
  It is assumed that the manufacturing plants are located in an urban/industrial area and consequently the emissions are categorised as emanating in a high population density area.
  Uncertainty: Estimation
- TOC, Total Organic Carbon [water, surface water]: 0.00283 kg; lognormal variance with pedigree 0.188, pedigree (4,5,5,5,5)
  Calculation. This data was calculated from the amount of 2-methyl-2-butene in the treated waste water assuming a carbon conversion of 96% for COD. The worst case scenario TOC=DOC was used.
  It is assumed that the manufacturing plants are located in an urban/industrial area and consequently the emissions are categorised as emanating in a high population density area.
  Water emissions are assumed to be emitted into rivers.
  Uncertainty: Calculated from the water emissions
- 2-Methyl-2-butene [water, surface water]: 0.0040191 kg; lognormal variance with pedigree 0.218, pedigree (4,5,5,5,5)
  Estimation. The remaining amount of unreacted 2-methyl-2-butene (4.8 % of the input) was assumed to leave the production process with the waste water. This waste water is treated in a internal waste water plant with a removal efficiency of 90% for 2-methyl-2-butene. The carbon contained in the removed 2-methyl-2-butene was accounted as CO2 emissions to air.
  It is assumed that the manufacturing plants are located in an urban/industrial area and consequently the emissions are categorised as emanating in a high population density area.
  Water emissions are assumed to be emitted into rivers.
  Uncertainty: Estimation
- Carbon dioxide, fossil [air, urban air close to ground]: 0.11368 kg; lognormal variance with pedigree 0.1786, pedigree (4,5,5,5,5)
  Estimation. Air emissions occurring from the purge vent, the distillation vent and fugitive emission sources were estimated to 0.2% of the raw material input.
  The carbon contained in the removed 2-methyl-2-butene during waste water treatment was accounted as CO2 emissions to air.
  It is assumed that the manufacturing plants are located in an urban/industrial area and consequently the emissions are categorised as emanating in a high population density area.
  Uncertainty: Calculated from the water treatment
- Water [water, unspecified]: 0.11717 m3; name water_to_water_unspecified; = (water_deionised_input/1000)*(1-fraction_WDI_to_air)+water_cooling_UNO_input*(1-fraction_CW_to_air); lognormal variance with pedigree 0.0807, pedigree (2,2,5,1,1)
  (same comment as for Water)
  property fraction, origin: salt water 0; name fraction_origin_salt_water_Ww
  property fraction, origin: unspecified 0.993215; name fraction_origin_unspecified_Ww
  property fraction, origin: fresh water 0.00678501; name fraction_origin_fresh_water_Ww
  property carbon content, fossil 0; name C_content_fossil
  property water in wet mass 1000 kg; name WWM
  property carbon content, non-fossil 0; name C_content_non_fossil
  property wet mass 1000 kg; name WM
  property dry mass 0 kg; name DM
- BOD5, Biological Oxygen Demand [water, surface water]: 0.0163 kg; lognormal variance with pedigree 0.188, pedigree (4,5,5,5,5)
  Calculation. Calculated from the amount of 2-methyl-2-butene in the treated waste water assuming a carbon conversion of 96% for COD. The worst case scenario BOD=COD was used.
  It is assumed that the manufacturing plants are located in an urban/industrial area and consequently the emissions are categorised as emanating in a high population density area.
  Water emissions are assumed to be emitted into rivers
  Uncertainty: Calculated from the water emissions
- DOC, Dissolved Organic Carbon [water, surface water]: 0.00283 kg; lognormal variance with pedigree 0.188, pedigree (4,5,5,5,5)
  (same comment as for TOC, Total Organic Carbon)

## Sampling procedure
Literature data

## Extrapolations
This dataset has been extrapolated from year 2006 to the year of the calculation (2021). The uncertainty has been adjusted accordingly.

## Review by Roland Hischier 2007-09-01
passed.
none

## Review by Roland Hischier 2011-09-22
Transfer of documentation done.
