# transport, pipeline, onshore, long distance, natural gas

Dataset: EcoSpold 2, unit process
Geography: NO
Time period: 2000-01-01 to 2021-12-31
Technology level: current
Classification: EcoSpold01Categories: natural gas/production
Classification: ISIC rev.4 ecoinvent: 4930:Transport via pipeline
Scenario: Business-as-Usual
System model: Allocation, cut-off by classification
Share of production covered: 100 %
Generated by: Mireille Faist Emmenegger
Published in: Faist Emmenegger, Mireille 2015
Database: ecoinvent
isCopyrightProtected: true
accessRestrictedTo: 1

## General comment
This dataset describes the transport from Norway to importing countries in Europe. Leakages per 1'000 km are based on on data collected by Marcogaz by several natural gas companies..

## Included activities end
This dataset describes the energy consumption and the emissions linked to the transport of 1 tkm Norwegian natural gas in an onshore pipeline.

## Geography
The data for emissions and for energy requirements is based on the environmental report of a Dutch company as in the ecoinvent v2 datasets.

## Technology
Long-distance gas transport onshore with average compressor station.

## Time period
The composition of the gas stems from 1994, the data for energy requirements from 2001, the leakage rate from 2006.

## Reference product
- transport, pipeline, onshore, long distance, natural gas: 1 metric ton*km; name RP_amount_1; CPC 65131: Transport services via pipeline of petroleum and natural gas; By-product classification allocatable product
  EcoSpold01Location=NO
  production volume 5.792e10 metric ton*km; name RP_PV_1
    52.5 e9 Nm3
    //Comment added during dataset update://
    90500 million m3 (Norwegian production) at 0.64 tkm/m3 (from data in datasets ; ref. Ecoinvent v2 report 06_V)
  property price 0.0083 EUR2005
    Same calculations in file R61. The variations is due to industry price per MJ, which has been updated to prices in EU27 in 2005 (http://epp.eurostat.ec.europa.eu/tgm/table.do?tab=table&init=1&language=en&pcode=ten00112&plugin=1).

## Inputs from technosphere
- electricity, medium voltage: 0.072496 kWh; lognormal variance with pedigree 0.0099, pedigree (2,3,4,3,1)
  Based on information from industry experts (German and Swiss data from 2001, ecoinvent report version 2). In Europe, about 0.27% of natural gas is used in gas turbines with 34-38% efficiency factor. For Russia, about 0.4% of natural gas is used in gas turbines with 25% efficiency factor.
  EcoSpold01Location=NO
  Uncertainty: qualified estimates
- natural gas, high pressure: 0.00022619 m3; = Methane_fossil_amount_1/0.719; lognormal variance with pedigree 0.0419, pedigree (2,3,5,3,1)
  Accounts for input of natural gas lost during transport. Calculated based on leakage rate and gas composition (methane content).
  EcoSpold01Location=NO
  Uncertainty: published data
  properties: heating value, net 39 MJ, wet mass 0.84 kg, dry mass 0.84 kg, carbon content, fossil 0.602381
  note on heating value, net: Literature value, Source: United Nations Statistics Division (2018) International Recommendations for Energy Statistics (IRES). Available at: http://unstats.un.org/unsd/statcom/doc11/BG-IRES.pdf.
  note on carbon content, fossil: An average C content of 0.506 kg C/ m3 has been assumed (this average has been calculated using data in Tab 3.5, ecoinvent v2.2 report 6_V
- waste mineral oil: -1.16e-6 kg; name BP_amount_1; lognormal variance with pedigree 0.0099, pedigree (2,3,4,3,1)
  EcoSpold01Location=CH
  based on dutch data
  Uncertainty: based on dutch data
  production volume 67187.2 kg; = BP_amount_1/ RP_amount_1* RP_PV_1
    Calculated from the production volume of transport, pipeline, onshore, long distance, natural gas in proportion to the respective output amounts.
  property price 0 EUR2005; name BP_amount_1_price_EUR2005
  properties: heating value, net 34.7 MJ, water content 0.111111, wet mass 1 kg, carbon content, fossil 0.864444, dry mass 0.9 kg
  note on heating value, net: Value taken from the general comment of the treatment dataset.
  note on carbon content, fossil: Tab A.6, ecoinvent v2.2 report 13_I. C content has been calculated after data in the tables, and then referred to 1 kg DM
- pipeline, natural gas, long distance, low capacity, onshore: 3.57e-9 km; lognormal variance with pedigree 0.3186, pedigree (3,3,4,1,3)
  based on estimated standard capacity
  EcoSpold01Location=GLO
  Uncertainty: based on estimated standard capacity

## Emissions to nature
- Methane, bromochlorodifluoro-, Halon 1211 [air, non-urban air or from high stacks]: 2.24e-8 kg; lognormal variance with pedigree 0.0493, pedigree (2,3,4,3,1)
  dutch environmental report + qualified estimates
  Uncertainty: dutch environmental report + qualified estimates
- Hydrogen sulfide [air, unspecified]: 4.52381e-10 kg; = 0.00019*2e-6/0.84
  calculated based on leakage 0.019% (per 1'000km), gas composition (per m3) and density 0.84 kg / m3 ( used for the conversion in tkm)
- Methane, fossil [air, non-urban air or from high stacks]: 0.000162631 kg; name Methane_fossil_amount_1; = 0.00019*0.719/0.84; lognormal variance with pedigree 0.1686, pedigree (2,5,5,1,1)
  calculated based on leakage 0.019% (per 1'000km), gas composition (per m3) and density 0.84 kg / m3 ( used for the conversion in tkm)
  Uncertainty: calculated based on leakage and gas composition
- Mercury [air, non-urban air or from high stacks]: 2.2619e-12 kg; = 0.00019*1e-8/0.84; lognormal variance with pedigree 0.706025, pedigree (4,5,5,2,1)
  (same comment as for Methane, fossil)
- Propane [air, non-urban air or from high stacks]: 4.29762e-6 kg; = 0.00019*0.019/0.84; lognormal variance with pedigree 0.1686, pedigree (2,5,5,1,1)
  (same comment as for Methane, fossil)
- Carbon dioxide, fossil [air, non-urban air or from high stacks]: 2.94048e-6 kg; = 0.00019*0.013/0.84; lognormal variance with pedigree 0.0492, pedigree (2,5,5,1,1)
  (same comment as for Methane, fossil)
- Butane [air, non-urban air or from high stacks]: 1.35714e-6 kg; = 0.00019*0.006/0.84; lognormal variance with pedigree 0.1686, pedigree (2,5,5,1,1)
  (same comment as for Methane, fossil)
- NMVOC, non-methane volatile organic compounds, unspecified origin [air, non-urban air or from high stacks]: 4.52381e-7 kg; = 0.00019*0.002/0.84; lognormal variance with pedigree 0.1686, pedigree (2,5,5,1,1)
  (same comment as for Methane, fossil)
- Ethane [air, non-urban air or from high stacks]: 1.67381e-5 kg; = 0.00019*0.074/0.84; lognormal variance with pedigree 0.1686, pedigree (2,5,5,1,1)
  (same comment as for Methane, fossil)
- Methane, chlorodifluoro-, HCFC-22 [air, non-urban air or from high stacks]: 6.93e-8 kg; lognormal variance with pedigree 0.0493, pedigree (2,3,4,3,1)
  (same comment as for Methane, bromochlorodifluoro-, Halon 1211)

## Sampling procedure
statistics

## Extrapolations
This dataset has been extrapolated from year 2012 to the year of the calculation (2021). The uncertainty has been adjusted accordingly.
