# electricity production, hard coal

Dataset: EcoSpold 2, unit process
Geography: FI
Time period: 1980-01-01 to 2021-12-31
Technology level: modern
Classification: ISIC rev.4 ecoinvent: 3510:Electric power generation, transmission and distribution
Classification: EcoSpold01Categories: hard coal/power plants
Synonyms: other bituminous coal; anthracite; coking coal
Tags: coal power; fossil fuels; hard coal power
Scenario: Business-as-Usual
System model: Allocation, cut-off by classification
Generated by: Karin Treyer
Published in: Röder, A. 2007
Database: ecoinvent
isCopyrightProtected: true
accessRestrictedTo: 1

## General comment
This dataset represents the production of high voltage electricity in an average hard coal power plant in Finland in 2012. "Hard coal" includes anthracite, coking coal and other bituminous coal according to the definition of the IEA electricity information 2014. (IEA. 2014. Electricity Information 2014. ISBN 978-92-64-21692-1. International Energy Agency (IEA), Paris Cedex (FR).)
All exchanges in this dataset except for emissions of SO2, NOx and particles are production-weighted averages of the figures in the datasets in ecoinvent version two, which are valid for the following 14 countries: AT, BE, ES, FR, IT, NL, PT, DE, CZ, HR, PL, SK, CN, US. The exception values are production-weighted averages of version 2 countries and the new countries in version 3 (AU, CA, CL, ID, IN, KR, MX, MY, PE, RU, TH, TR, TW, TZ, UA, ZA)
Comments on the inventory data of emissions:
- For the assessment of main characteristics (sulphur and ash content of coal, efficiency of the plant) and CO2 a bottom-up approach has been used. It consists in the collection of information about single plants.
- The size distribution of particle emissions has been derived from German data.
- Halogene emissions have been estimated on the basis of the content of the species in the country-specific coal input mix, assuming average retention rates.
- For CO and particle emissions average values for the former UCTE are included (Union for the Coordination of the Transmission of Electricity, since 2009 replaced by ENTSO-E European Network of Transmission System Operators for Electricity).
- The country specific emission depend on the share of DeNOx.
- Emissions of trace elements were calculated by means of a formula (CORINAIR) using the ash content in the country-specific coal input mix and average transfer coefficients for coal power plants, taking into account the share of DeSOx installed.
- Emission of uranium and thorium radioactive isotopes were assumed proportional to the corresponding element emitted with particles; the other non-gaseous radioactive isotopes of the uranium and thorium decay chain were assumed proportional to the emitted U-238 or Th-232.
- The emission of gaseous radon and K-40 are taken from the literature.
The module describes the operation of an average plant in the country. The plant is used for middle load with 4000 hours of operation at full capacity per year. The plant is assumed to operate 150000 hours during its lifetime. For the assessment of main characteristics (LHV, sulphur and ash content of coal, efficiency of the plant) and criteria emissions (SOx, NOx, particles, and CO2) a bottom-up approach has been used. It consists on the collection of information about single plants. Base data on all major UCTE power plants in 1993 have been integrated, to the extent possible, with updated information for year 2000. The size distribution of particles has been derived from German data. Halogene emissions have been estimated on the basis of the content of the species in the country-specific coal input mix, assuming average retention rates. For CO and VOC-emissions average values for UCTE are included. Two average values for N2O emissions from UCTE plants are considered for the two cases with or without DeNOx; the country specific emission depend therefore on the share of DeNOx. Emissions of trace elements were calculated by means of a formula (CORINAIR) using the ash content in the country-specific coal input mix and average transfer coefficients for coal power plants, taking into account the share of DeSOx installed. Emission of uranium and thorium radioactive isotopes were assumed proportional to the corresponding element emitted with particles; the other non-gaseous radioactive isotopes of the uranium and thorium decay chain were assumed proportional to the emitted U-238 or Th-232. The emission of gaseous radon and K-40 are taken from the literature. The waste heat releases to air and water have been allocated on the basis of the assumed share of river cooled power plants and assumptions on the direct losses to air. The share of the recycled ash is country-specific. For the disposal of the remaining ash, typical country-specific compositions are taken into account in appropriate disposal modules.
[This dataset was already contained in the ecoinvent database version 2. It was not individually updated during the transfer to ecoinvent version 3. Life Cycle Impact Assessment results may still have changed, as they are affected by changes in the supply chain, i.e. in other datasets. This dataset was generated following the ecoinvent quality guidelines for version 2. It may have been subject to central changes described in the ecoinvent version 3 change report (http://www.ecoinvent.org/database/ecoinvent-version-3/reports-of-changes/), and the results of the central updates were reviewed extensively. The changes added e.g. consistent water flows and other information throughout the database. The documentation of this dataset can be found in the ecoinvent reports of version 2, which are still available via the ecoinvent website. The change report linked above covers all central changes that were made during the conversion process.]

## Included activities start
From the constructed hard coal power plant ready to produce electricity.
From reception of hard coal and operating materials at power plant gate.

## Included activities end
Energy conversion for electricity production. Use of fuel oil for startup is accounted for. Particle removal is included in this module. DeSOx is described in a different module; it is applied here according to the actual use in the country; SOx emission is the reduced one. There is no information about the use of DeNOx in the country. There is no information about the use of DeNOx in the country. It is assumed that 25 % of the plants are river cooled, 75 % use cooling tower (average UCTE). The water treatment is described in separate modules. The disposal of non-recycled ashes is modelled separately.

## Technology
POWER PLANT:
Hard coal power plant input is a market mix of 100MWe power plants (representing all power plants with a capacity <250MWe and 7% of installed capacity) and 500MWe power plants (representing all power plants with a capacity >250MWe and 93% of installed capacity). Please note that in contrast to ecoinvent v2, the two power plant types do not exist anymore as single datasets. Along with (Röder et al. 2004), lifetime of these power plants is assumed to be 150’000 full load hours. Whereas European hard coal power plants are assumed to be operated in mid-load mode with 4000 full load hours per year (corresponding to a lifetime of 37.5 years) (Röder et al. 2004), a capacity factor (average US) of 66% is documented (eGRID 2006), corresponding to about 5800 full load hours per year, or a lifetime of about 26 years.
Average installed technology.
- Share of installed capacity with desulfurisation 2% (rough estimation based on sulfur mass balance
- Average efficiency of desulfurisation installations: 92% (rough estimation based on Dones et al. 27
- Share of installed capacity with denitrification (primary and/or secondary installations): 73% (figure based on IEA 212 )
- Average efficiency of denitrification installations: 8% (estimation based on Dones et al. 27, p.128. Valid for selective catalytic reaction systems)
- Share of installed capacity with particle filters: 98% (figure based on IEA 212 )
- Average efficiency of particle filters: 98% (figure based on IEA 212 )
- IEA 2012. Coal Power Database. International Energy Agency Clean Coal Centre, London
- IEA/OECD. 2010. Electricity Information 2010. International Energy Agency (IEA), Paris Cedex (FR). Part IV. Detailed OECD Electricity And Heat Data.
- Dones, R., Bauer, C., Röder, A. (2007) Kohle. In: Dones, R. (Ed.) et al., Sachbilanzen von Energiesystemen: Grundlagen für den ökologischen Vergleich von Energiesystemen und den Einbezug von Energiesystemen in Ökobilanzen für die Schweiz. Final report ecoinvent No.

## Time period
The Annual Production Volume is valid for the year 2012.

## Parameters
- water withdrawal, electricity production from hard coal, once-through and coolin: 0.0815 m3/kWh; name WWithdrawal_EP_HC_once_through_andCP_CS; lognormal variance with pedigree 0.092025, pedigree (4,4,3,2,4)
  Estimated based on literature (Scown, 2011, Water Footprint of U.S. Transportation Fuels, SI). The amount of water withdrawn while burning lignite and peat is assumed to be the same as in case of coal.
  nan
- losses from gross electricity production: 0.05 dimensionless; name losses_gross_net; lognormal variance with pedigree 0.003525, pedigree (3,2,2,2,2)
  Calculated value. Own use of electricity plants in this country in 2012. For the OECD countries, the OECD iLibrary provides gross and net electricity values for the specific sector "Total Fuel Combustion", from which the loss value is being calculated. This value is then applied to all fossil fuel datasets, as no data on a more detailed level were available.
  OECD. 2014. IEA Electricity Information Statistics: OECD - Electricity and heat generation. OECD iLibrary. Online database. DOI : 10.1787/elect-data-en
  nan
  Uncertainty: G
- fraction, water, decarbonised, to air: 0.0251074 dimensionless; name fraction_WDC_to_air; = fraction_CW_to_air; lognormal variance with pedigree 0.092025, pedigree (4,4,3,2,4)
  Calculated value. See comments in the other parametres present in this dataset. Decarbonised water is considered to be always used as cooling water, thus cooling water fractions to air are applied to all carbonised water input flows to calculate the amount of water consumed in the processes.
  nan
- fraction, water, completely softened, to air: 0.15 dimensionless; name fraction_WCS_to_air; = fraction_PW_to_air; lognormal variance with pedigree 0.092025, pedigree (4,4,3,2,4)
  Calculated value. See comment in the other parametres present in this dataset. Water, completely softened is considered to be always used as process water, thus process water fractions to air are applied to all water, completely softened input flows to calculate the amount of water consumed in the processes.
  nan
- once-through and cooling pond cooling systems as a fraction of all cooling syste: 0.73 dimensionless; name once_through_andCP_CS_fractio_from_allCS; lognormal variance with pedigree 0.092025, pedigree (4,4,3,2,4)
  Calculated as an average of data available for Europe (Floerke, 2008, Future changes of freshwater needs in the electricity production sector) and USA (NERL, 2011, Estimating freshwater needs to meet future thermoelectric generation requirements).
  nan
- fraction, cooling water, to air: 0.0251074 dimensionless; name fraction_CW_to_air; lognormal variance with pedigree 0.092025, pedigree (4,4,3,2,4)
  Calculated
  nan
- factor: input of MJ for the production of 1 kWh: 9.18367 MJ/kWh; name factor_MJ_kWh; = 1*3.6/efficiency; undefined min 11.1801, max 11.1801, standardDeviation95 0, pedigree (1,1,1,1,1)
  Calculated value. 3.6 MJ = 1kWh.
  nan
- water withdrawal, electricity production from hard coal, recirculating CS: 0.0021 m3/kWh; name WWithdrawal_EP_HC_recirculating_CS; lognormal variance with pedigree 0.092025, pedigree (4,4,3,2,4)
  (same comment as for water withdrawal, electricity production from hard coal, once-through )
- recirculating cooling system as a fraction of all cooling systems: 0.27 dimensionless; name recirculating_CS_fraction_from_allCS; lognormal variance with pedigree 0.092025, pedigree (4,4,3,2,4)
  (same comment as for once-through and cooling pond cooling systems as a fraction of all coo)
- gross electricity production: 2.824e9 kWh; name gross_electricity; lognormal variance with pedigree 0.0012, pedigree (2,1,1,1,1)
  Literature value/statistics. Taken from the IEA electricity information 2014, table 1.3.
  IEA. 2014. Electricity Information 2014. ISBN 978-92-64-21692-1. International Energy Agency (IEA), Paris Cedex (FR).
  nan
- efficiency: 0.392 dimensionless; lognormal variance with pedigree 0.003325, pedigree (3,2,1,2,2)
  Literature value/calculated value. Net electrical efficiency based on the lower heating value (LHV).
  For all OECD countries, the IEA Electricity information 2014 provides data for the year 2012 on fuel input (TJ, Net calorific value NCV) and gross electricity production (GWh) as well as heat production (TJ) in tables 8 and 9 for each country for electricity only and Combined Heat and Power (CHP) plants each. Together with the information on own use (see parameter "losses"), the net electrical efficiency based on the NCV is calculated.
  For all non-OECD countries, data from the IEA Energy balances of non-OECD countries 2014 have been used. These tables do not always provide information on how much of the electricity has been produced in electricity only and in CHP plants, but often give the total value only.
  IEA. 2014. Electricity Information 2014. ISBN 978-92-64-21692-1. International Energy Agency (IEA), Paris Cedex (FR).
  IEA/OECD. 2014. Energy balances of non-OECD countries 2014. International Energy Agency (IEA), Paris Cedex (FR).
- fraction, process water, to air: 0.15 dimensionless; name fraction_PW_to_air; lognormal variance with pedigree 0.092025, pedigree (4,4,3,2,4)
  Literature value. In case when no industry/process specific data are available, default evaporation fraction value is used. This value is 15% and is based on literature (Statistics Canada, 2007 & Shaffer, K.H., 2008, Consumptive water use in the Great Lakes Basin, USGS & Shiklomanov, 2003, World Water Resources at the Beginning of the 21st Century) and has been approved by an expert.
  nan
- water consumption, electricity production from hard coal, recirculating CS: 0.0018 m3/kWh; name WConsumption_EP_HC_recirculatingCS; lognormal variance with pedigree 0.092025, pedigree (4,4,3,2,4)
  Estimated based on literature (Scown, 2011, Water Footprint of U.S. Transportation Fuels, SI). The amount of water consumed while burning lignite and peat is assumed to be the same as in case of coal.
  nan
- water consumption, electricity production from hard coal, once-through and cooli: 0.0014 m3/kWh; name WConsumption_EP_HC_once_through_andCP_CS; lognormal variance with pedigree 0.092025, pedigree (4,4,3,2,4)
  (same comment as for water consumption, electricity production from hard coal, recirculatin)

## Reference product
- electricity, high voltage: 1 kWh; name electricity; By-product classification allocatable product; CPC 17100: Electrical energy
  production volume 2.6828e9 kWh; name electricity_apv; = gross_electricity*(1- losses_gross_net)
    Calculated value
  property price 0.0977 EUR2005
    Temporary price data. Calculated as 90% of purchasers price based on: 94% of the average price (to account for a 6% loss in transformation and transmission) for electricity for industrial consumersin 2005 (excluded taxes). From IEA.

## By-products
- hard coal ash: 0 kg; name amount_ash; By-product classification Waste; CPC 39: Wastes or scraps
  exchange present because of parent child relationship
  production volume 0 kg; = amount_ash/electricity*electricity_apv
    Calculated from the production volume of hard coal, burned in power plant in proportion to the respective output amounts.
  property price 0 EUR2005; name amount_ash_price_EUR2005
    Waste products are assigned a price of zero as they are assumed to require further treatment.
  property carbon content 0
    carbon content on a dry matter basis (reserved; not for manual entry)
  properties: carbon content, fossil 0, carbon content, non-fossil 0, water in wet mass 0 kg, dry mass 1 kg, wet mass 1 kg, water content 0, carbon allocation 0 kg

## Inputs from technosphere
- light fuel oil: 0.000156122 kg; name light_fuel_oil; = 1.7E-05 * factor_MJ_kWh; lognormal variance with pedigree 0.0541, pedigree (3,4,5,3,1)
  Typical value for hard coal plant in DE
  Amount was scaled to the amount of reference product.
  properties: dry mass 1 kg, carbon content, fossil 0.862, heating value, net 42.6 MJ, wet mass 1 kg
- hard coal: 0, 0, 0, 0, 0, 0 kg (6 entries)
  exchange present because of parent/child relationship
  properties: heating value, net 27.91 MJ
  note on heating value, net: Based on the Characterization factor of Hard coal in the CED method
- water, decarbonised: 1.37755 kg; name water_decarbonised_input; = 0.15 * factor_MJ_kWh; lognormal variance with pedigree 0.084025, pedigree (4,5,5,2,3)
  Estimate based on literature
  Amount was scaled to the amount of reference product.
  estimate based on literature
  Amount was scaled to the amount of reference product.
  properties: wet mass 1 kg
- NOx retained, by selective catalytic reduction: 0.00178163 kg; name nox_retained; = 0.000194 * factor_MJ_kWh; source Itten R. 2012; lognormal variance with pedigree 0.044, pedigree (3,1,3,1,1)
  See power plant data base for details
  Amount was scaled to the amount of reference product.
  properties: dry mass 1 kg, wet mass 1 kg
- chlorine, liquid: 9.18367e-5 kg; = 1E-05 * factor_MJ_kWh; lognormal variance with pedigree 0.140025, pedigree (5,4,5,2,3)
  Rough guess
  Amount was scaled to the amount of reference product.
  properties: wet mass 1 kg, dry mass 1 kg
- transport, freight, sea, bulk carrier for dry goods: 0 metric ton*km
  Exchange present due to parent child relationship
- hard coal: 0.395816 kg; name hard_coal; = 0.0431 * factor_MJ_kWh; lognormal variance with pedigree 0.21, pedigree (5,5,5,5,5)
  own assumption, based on uncertainty on power plant data base and coal quality (mismatch between regional supply mix and input coal)
  Amount was scaled to the amount of reference product.
  properties: heating value, net 27.91 MJ, wet mass 1 kg, carbon content, fossil 0.845, dry mass 0.94 kg, water content 0.0638298
  note on carbon content, fossil: C content 75-94% (specified in Tab 1.1, report 6, part VI). A mean content of 0.845 kg C/ kg dry hard coal was considered
- SOx retained, in hard coal flue gas desulfurisation: 0.00404082 kg; name sox_retained; = 0.00044 * factor_MJ_kWh; source Itten R. 2012; lognormal variance with pedigree 0.004, pedigree (3,1,3,1,1)
  (same comment as for NOx retained, by selective catalytic reduction)
  properties: wet mass 1 kg, dry mass 1 kg
- hard coal power plant: 1.19388e-11 unit; name hard_coal_power_plant; = 1.3E-12 * factor_MJ_kWh; source Röder, A. 2007; lognormal variance with pedigree 0.3527, pedigree (3,3,5,3,1)
  Calculated value. At the moment, the hard coal power plant input consists of a market mix of a 100MWe power plant and a 500MWe power plant
  .
  For this calculation, 4000 load hours per year are assumed. It is assumed that a total of 150"000h is reached during the lifetime. A capacity of 500MW is taken for the calculation.
- water, completely softened: 0.055102 kg; name water_softened_input; = 0.006 * factor_MJ_kWh; lognormal variance with pedigree 0.084025, pedigree (4,5,5,2,3)
  (same comment as for water, decarbonised)
  properties: wet mass 1 kg
- residue from cooling tower: -4.59184e-5 kg; name amount_residue; = (5E-06 * factor_MJ_kWh)*-1; lognormal variance with pedigree 0.072, pedigree (5,1,3,1,1)
  Calculated from mass balance
  Amount was scaled to the amount of reference product.
  production volume 123190 kg; = amount_residue/electricity*electricity_apv
    (same comment as for hard coal ash)
  property price 0 EUR2005; name amount_residue_price_EUR2005
  properties: water content 0.428571, carbon content, fossil 0.0544233, dry mass 0.7 kg, wet mass 1 kg

## Inputs from nature
- Water, cooling, unspecified natural origin [natural resource, in water]: 0.0487701 m3; name water_cooling_UNO_input; = ((recirculating_CS_fraction_from_allCS*WWithdrawal_EP_HC_recirculating_CS)+(once_through_andCP_CS_fractio_from_allCS*WWithdrawal_EP_HC_once_through_andCP_CS))/11.31*factor_MJ_kWh; lognormal variance with pedigree 0.130025, pedigree (4,4,5,2,4)
  Estimate based on literature
  Amount was scaled to the amount of reference product.
  Calculated based on literature data.

## Emissions to nature
- Dioxins, measured as 2,3,7,8-tetrachlorodibenzo-p-dioxin [air, non-urban air or from high stacks]: 6.42857e-14 kg; name dioxins; = 7E-15 * factor_MJ_kWh; lognormal variance with pedigree 0.432, pedigree (1,1,3,1,1)
  own assumption, based on austrian data
  Amount was scaled to the amount of reference product.
- Radon-222 [air, non-urban air or from high stacks]: 0.00445408 kBq; name radon_222; = 0.000485 * factor_MJ_kWh; lognormal variance with pedigree 0.432, pedigree (1,1,3,1,1)
  (same comment as for Dioxins, measured as 2,3,7,8-tetrachlorodibenzo-p-dioxin)
- Radium-226 [air, non-urban air or from high stacks]: 1.78163e-6 kBq; name radium_226; = 1.94E-07 * factor_MJ_kWh; lognormal variance with pedigree 0.432, pedigree (1,1,3,1,1)
  (same comment as for Dioxins, measured as 2,3,7,8-tetrachlorodibenzo-p-dioxin)
- Selenium [air, non-urban air or from high stacks]: 4.05918e-8 kg; name selenium; = 4.42E-09 * factor_MJ_kWh; lognormal variance with pedigree 0.802, pedigree (1,1,3,1,1)
  (same comment as for Dioxins, measured as 2,3,7,8-tetrachlorodibenzo-p-dioxin)
- Arsenic [air, non-urban air or from high stacks]: 2.76429e-9 kg; name arsenic; = 3.01E-10 * factor_MJ_kWh; lognormal variance with pedigree 0.802, pedigree (1,1,3,1,1)
  (same comment as for Dioxins, measured as 2,3,7,8-tetrachlorodibenzo-p-dioxin)
- Carbon monoxide, fossil [air, non-urban air or from high stacks]: 7.34694e-5 kg; name carbon_monoxide_fossil; = 8E-06 * factor_MJ_kWh; lognormal variance with pedigree 0.802, pedigree (1,1,3,1,1)
  (same comment as for Dioxins, measured as 2,3,7,8-tetrachlorodibenzo-p-dioxin)
- Particulates, > 10 um [air, non-urban air or from high stacks]: 4.73878e-5 kg; name particulates_gt10; = 5.16E-06 * factor_MJ_kWh; source Itten R. 2012; lognormal variance with pedigree 0.162, pedigree (1,1,3,1,1)
  (same comment as for Dioxins, measured as 2,3,7,8-tetrachlorodibenzo-p-dioxin)
- Water [air, unspecified]: 0.00126734 m3; name water_to_air_unspecified; = (water_softened_input/1000)*fraction_WCS_to_air+(water_decarbonised_input/1000)*fraction_WDC_to_air+water_cooling_UNO_input*fraction_CW_to_air; lognormal variance with pedigree 0.130025, pedigree (4,4,5,2,4)
  Calculated value based on literature values and expert opinion. See comments in the parametres" comment field.
  property fraction, origin: salt water 0; name fraction_origin_salt_water
  property fraction, origin: fresh water 0.0338067; name fraction_origin_fresh_water
  property fraction, origin: unspecified 0.966193; name fraction_origin_unspecified
- Methane, fossil [air, non-urban air or from high stacks]: 9.18367e-6 kg; name methane_fossil; = 1E-06 * factor_MJ_kWh; lognormal variance with pedigree 0.122, pedigree (1,1,3,1,1)
  (same comment as for Dioxins, measured as 2,3,7,8-tetrachlorodibenzo-p-dioxin)
- Water [water, unspecified]: 0.0489354 m3; name water_to_water_unspecified; = (water_softened_input/1000)*(1-fraction_WCS_to_air)+(water_decarbonised_input/1000)*(1-fraction_WDC_to_air)+water_cooling_UNO_input*(1-fraction_CW_to_air); lognormal variance with pedigree 0.130025, pedigree (4,4,5,2,4)
  (same comment as for Water)
  property fraction, origin: fresh water 0.0283958; name fraction_origin_fresh_water_Ww
  property fraction, origin: salt water 0; name fraction_origin_salt_water_Ww
  property fraction, origin: unspecified 0.971604; name fraction_origin_unspecified_Ww
- Dinitrogen monoxide [air, non-urban air or from high stacks]: 3.58163e-5 kg; name dinitrogen_monoxide; = 3.9E-06 * factor_MJ_kWh; lognormal variance with pedigree 0.122, pedigree (1,1,3,1,1)
  (same comment as for Dioxins, measured as 2,3,7,8-tetrachlorodibenzo-p-dioxin)
- Carbon dioxide, fossil [air, non-urban air or from high stacks]: 0.863265 kg; name carbon_dioxide_fossil; = 0.094 * factor_MJ_kWh; lognormal variance with pedigree 0.022, pedigree (1,1,3,1,1)
  (same comment as for Dioxins, measured as 2,3,7,8-tetrachlorodibenzo-p-dioxin)
- Benzo(a)pyrene [air, non-urban air or from high stacks]: 1.83673e-12 kg; name benzo_a_pyrene; = 2E-13 * factor_MJ_kWh; lognormal variance with pedigree 0.122, pedigree (1,1,3,1,1)
  (same comment as for Dioxins, measured as 2,3,7,8-tetrachlorodibenzo-p-dioxin)
- Lead [air, non-urban air or from high stacks]: 5.73061e-8 kg; name lead; = 6.24E-09 * factor_MJ_kWh; lognormal variance with pedigree 0.802, pedigree (1,1,3,1,1)
  (same comment as for Dioxins, measured as 2,3,7,8-tetrachlorodibenzo-p-dioxin)
- Potassium-40 [air, non-urban air or from high stacks]: 1.47857e-5 kBq; name potassium_40; = 1.61E-06 * factor_MJ_kWh; lognormal variance with pedigree 0.432, pedigree (1,1,3,1,1)
  (same comment as for Dioxins, measured as 2,3,7,8-tetrachlorodibenzo-p-dioxin)
- Hydrocarbons, aliphatic, alkanes, unspecified [air, non-urban air or from high stacks]: 2.01122e-6 kg; name hydrocarbons_al_al_unspec; = 2.19E-07 * factor_MJ_kWh; lognormal variance with pedigree 0.122, pedigree (1,1,3,1,1)
  (same comment as for Dioxins, measured as 2,3,7,8-tetrachlorodibenzo-p-dioxin)
- Xylene [air, non-urban air or from high stacks]: 8.46735e-6 kg; name xylene; = 9.22E-07 * factor_MJ_kWh; lognormal variance with pedigree 0.122, pedigree (1,1,3,1,1)
  (same comment as for Dioxins, measured as 2,3,7,8-tetrachlorodibenzo-p-dioxin)
- Sulfur dioxide [air, non-urban air or from high stacks]: 0.00119388 kg; name sulfur_dioxide; = 0.00013 * factor_MJ_kWh; source Itten R. 2012; lognormal variance with pedigree 0.022, pedigree (1,1,3,1,1)
  (same comment as for Dioxins, measured as 2,3,7,8-tetrachlorodibenzo-p-dioxin)
- Propene [air, non-urban air or from high stacks]: 1.46939e-7 kg; name propene; = 1.6E-08 * factor_MJ_kWh; lognormal variance with pedigree 0.122, pedigree (1,1,3,1,1)
  (same comment as for Dioxins, measured as 2,3,7,8-tetrachlorodibenzo-p-dioxin)
- Polonium-210 [air, non-urban air or from high stacks]: 1.25816e-5 kBq; name polonium_210; = 1.37E-06 * factor_MJ_kWh; lognormal variance with pedigree 0.252, pedigree (1,1,3,1,1)
  (same comment as for Dioxins, measured as 2,3,7,8-tetrachlorodibenzo-p-dioxin)
- Particulates, < 2.5 um [air, non-urban air or from high stacks]: 2.49796e-5 kg; name particulates_lt2_5; = 2.72E-06 * factor_MJ_kWh; source Itten R. 2012; lognormal variance with pedigree 0.412, pedigree (1,1,3,1,1)
  (same comment as for Dioxins, measured as 2,3,7,8-tetrachlorodibenzo-p-dioxin)
- Vanadium [air, non-urban air or from high stacks]: 4.77551e-9 kg; name vanadium; = 5.2E-10 * factor_MJ_kWh; lognormal variance with pedigree 0.802, pedigree (1,1,3,1,1)
  (same comment as for Dioxins, measured as 2,3,7,8-tetrachlorodibenzo-p-dioxin)
- Particulates, > 2.5 um, and < 10um [air, non-urban air or from high stacks]: 2.93878e-6 kg; name particulates_2_5_to_10; = 3.2E-07 * factor_MJ_kWh; source Itten R. 2012; lognormal variance with pedigree 0.252, pedigree (1,1,3,1,1)
  (same comment as for Dioxins, measured as 2,3,7,8-tetrachlorodibenzo-p-dioxin)
- Bromine [air, non-urban air or from high stacks]: 7.78776e-7 kg; name bromine; = 8.48E-08 * factor_MJ_kWh; lognormal variance with pedigree 0.212, pedigree (1,1,3,1,1)
  (same comment as for Dioxins, measured as 2,3,7,8-tetrachlorodibenzo-p-dioxin)
- Cadmium [air, non-urban air or from high stacks]: 8.32041e-10 kg; name cadmium; = 9.06E-11 * factor_MJ_kWh; lognormal variance with pedigree 0.802, pedigree (1,1,3,1,1)
  (same comment as for Dioxins, measured as 2,3,7,8-tetrachlorodibenzo-p-dioxin)
- Acrolein [air, non-urban air or from high stacks]: 0 kg; name acrolein
  Literature value/calculated value. Emissions when producing 1kWh of electricity from hard coal, based on the value for burning 1MJ of hard coal. Weighted average with electricity production data (Itten&Frischknecht 2012) and emission values of 14 countries
  (AT, BE, ES, FR, IT, NL, PT, DE, CZ, HR, PL, SK, CN, US) (Röder et al. 2007)
  Country emissions values based on literature.
  Source:
  Itten R. and Frischknecht R. (2012) Life Cycle Inventories of Electricity Mixes and Grid. ESU-services Ltd., Uster, Switzerland.
- Butane [air, non-urban air or from high stacks]: 1.7449e-7 kg; name butane; = 1.9E-08 * factor_MJ_kWh; lognormal variance with pedigree 0.122, pedigree (1,1,3,1,1)
  (same comment as for Dioxins, measured as 2,3,7,8-tetrachlorodibenzo-p-dioxin)
- Boron [air, non-urban air or from high stacks]: 1.94694e-6 kg; name boron; = 2.12E-07 * factor_MJ_kWh; lognormal variance with pedigree 0.802, pedigree (1,1,3,1,1)
  (same comment as for Dioxins, measured as 2,3,7,8-tetrachlorodibenzo-p-dioxin)
- Propane [air, non-urban air or from high stacks]: 3.21429e-7 kg; name propane; = 3.5E-08 * factor_MJ_kWh; lognormal variance with pedigree 0.122, pedigree (1,1,3,1,1)
  (same comment as for Dioxins, measured as 2,3,7,8-tetrachlorodibenzo-p-dioxin)
- Mercury [air, non-urban air or from high stacks]: 1.35918e-8 kg; name mercury; = 1.48E-09 * factor_MJ_kWh; lognormal variance with pedigree 0.802, pedigree (1,1,3,1,1)
  (same comment as for Dioxins, measured as 2,3,7,8-tetrachlorodibenzo-p-dioxin)
- Formaldehyde [air, non-urban air or from high stacks]: 5.32653e-7 kg; name formaldehyde; = 5.8E-08 * factor_MJ_kWh; lognormal variance with pedigree 0.122, pedigree (1,1,3,1,1)
  (same comment as for Dioxins, measured as 2,3,7,8-tetrachlorodibenzo-p-dioxin)
- Hydrogen chloride [air, non-urban air or from high stacks]: 3.30612e-5 kg; name hydrogen_chloride; = 3.6E-06 * factor_MJ_kWh; lognormal variance with pedigree 0.252, pedigree (1,1,3,1,1)
  (same comment as for Dioxins, measured as 2,3,7,8-tetrachlorodibenzo-p-dioxin)
- Hydrogen fluoride [air, non-urban air or from high stacks]: 2.51633e-5 kg; name hydrogen_fluoride; = 2.74E-06 * factor_MJ_kWh; lognormal variance with pedigree 0.252, pedigree (1,1,3,1,1)
  (same comment as for Dioxins, measured as 2,3,7,8-tetrachlorodibenzo-p-dioxin)
- PAH, polycyclic aromatic hydrocarbons [air, non-urban air or from high stacks]: 9.18367e-9 kg; name pah; = 1E-09 * factor_MJ_kWh; lognormal variance with pedigree 0.392, pedigree (1,1,3,1,1)
  (same comment as for Dioxins, measured as 2,3,7,8-tetrachlorodibenzo-p-dioxin)
- Strontium [air, non-urban air or from high stacks]: 7.11735e-9 kg; name strontium; = 7.75E-10 * factor_MJ_kWh; lognormal variance with pedigree 0.802, pedigree (1,1,3,1,1)
  (same comment as for Dioxins, measured as 2,3,7,8-tetrachlorodibenzo-p-dioxin)
- Thorium-232 [air, non-urban air or from high stacks]: 1.51531e-6 kBq; name thorium_232; = 1.65E-07 * factor_MJ_kWh; lognormal variance with pedigree 0.432, pedigree (1,1,3,1,1)
  (same comment as for Dioxins, measured as 2,3,7,8-tetrachlorodibenzo-p-dioxin)
- Antimony [air, non-urban air or from high stacks]: 7.17245e-10 kg; name antimony; = 7.81E-11 * factor_MJ_kWh; lognormal variance with pedigree 0.802, pedigree (1,1,3,1,1)
  (same comment as for Dioxins, measured as 2,3,7,8-tetrachlorodibenzo-p-dioxin)
- Chromium VI [air, non-urban air or from high stacks]: 2.39694e-10 kg; name chromium_vi; = 2.61E-11 * factor_MJ_kWh; lognormal variance with pedigree 0.482, pedigree (1,1,3,1,1)
  based on range of data
  Amount was scaled to the amount of reference product.
- Manganese [air, non-urban air or from high stacks]: 2.36939e-8 kg; name manganese; = 2.58E-09 * factor_MJ_kWh; lognormal variance with pedigree 0.802, pedigree (1,1,3,1,1)
  (same comment as for Dioxins, measured as 2,3,7,8-tetrachlorodibenzo-p-dioxin)
- Chromium [air, non-urban air or from high stacks]: 1.93776e-9 kg; name chromium; = 2.11E-10 * factor_MJ_kWh; lognormal variance with pedigree 0.802, pedigree (1,1,3,1,1)
  (same comment as for Dioxins, measured as 2,3,7,8-tetrachlorodibenzo-p-dioxin)
- Hydrocarbons, aliphatic, unsaturated [air, non-urban air or from high stacks]: 1.98367e-6 kg; name hydrocarbons_aliphatic_unsaturated; = 2.16E-07 * factor_MJ_kWh; lognormal variance with pedigree 0.122, pedigree (1,1,3,1,1)
  (same comment as for Dioxins, measured as 2,3,7,8-tetrachlorodibenzo-p-dioxin)
- Nitrogen oxides [air, non-urban air or from high stacks]: 0.000562959 kg; name nitrogen_oxides; = 6.13E-05 * factor_MJ_kWh; source Itten R. 2012; lognormal variance with pedigree 0.092, pedigree (1,1,3,1,1)
  (same comment as for Dioxins, measured as 2,3,7,8-tetrachlorodibenzo-p-dioxin)
- Pentane [air, non-urban air or from high stacks]: 1.35e-6 kg; name pentane; = 1.47E-07 * factor_MJ_kWh; lognormal variance with pedigree 0.122, pedigree (1,1,3,1,1)
  (same comment as for Dioxins, measured as 2,3,7,8-tetrachlorodibenzo-p-dioxin)
- Uranium-238 [air, non-urban air or from high stacks]: 1.48776e-6 kBq; name uranium_238; = 1.62E-07 * factor_MJ_kWh; lognormal variance with pedigree 0.432, pedigree (1,1,3,1,1)
  (same comment as for Dioxins, measured as 2,3,7,8-tetrachlorodibenzo-p-dioxin)
- Thorium-228 [air, non-urban air or from high stacks]: 9.64286e-7 kBq; name throium_228; = 1.05E-07 * factor_MJ_kWh; lognormal variance with pedigree 0.432, pedigree (1,1,3,1,1)
  (same comment as for Dioxins, measured as 2,3,7,8-tetrachlorodibenzo-p-dioxin)
- Iodine [air, non-urban air or from high stacks]: 1.4602e-7 kg; name iodine; = 1.59E-08 * factor_MJ_kWh; lognormal variance with pedigree 0.252, pedigree (1,1,3,1,1)
  (same comment as for Dioxins, measured as 2,3,7,8-tetrachlorodibenzo-p-dioxin)
- Ethane [air, non-urban air or from high stacks]: 3.76531e-7 kg; name ethane; = 4.1E-08 * factor_MJ_kWh; lognormal variance with pedigree 0.122, pedigree (1,1,3,1,1)
  (same comment as for Dioxins, measured as 2,3,7,8-tetrachlorodibenzo-p-dioxin)
- Barium [air, non-urban air or from high stacks]: 4.76633e-8 kg; name barium; = 5.19E-09 * factor_MJ_kWh; lognormal variance with pedigree 0.802, pedigree (1,1,3,1,1)
  (same comment as for Dioxins, measured as 2,3,7,8-tetrachlorodibenzo-p-dioxin)
- Cobalt [air, non-urban air or from high stacks]: 1.68061e-9 kg; name cobalt; = 1.83E-10 * factor_MJ_kWh; lognormal variance with pedigree 0.802, pedigree (1,1,3,1,1)
  (same comment as for Dioxins, measured as 2,3,7,8-tetrachlorodibenzo-p-dioxin)
- Molybdenum [air, non-urban air or from high stacks]: 1.4602e-9 kg; name molybdenum; = 1.59E-10 * factor_MJ_kWh; lognormal variance with pedigree 0.802, pedigree (1,1,3,1,1)
  (same comment as for Dioxins, measured as 2,3,7,8-tetrachlorodibenzo-p-dioxin)
- Toluene [air, non-urban air or from high stacks]: 1.00102e-6 kg; name toluene; = 1.09E-07 * factor_MJ_kWh; lognormal variance with pedigree 0.122, pedigree (1,1,3,1,1)
  (same comment as for Dioxins, measured as 2,3,7,8-tetrachlorodibenzo-p-dioxin)
- Lead-210 [air, non-urban air or from high stacks]: 6.89694e-6 kBq; name lead_210; = 7.51E-07 * factor_MJ_kWh; lognormal variance with pedigree 0.482, pedigree (1,1,3,1,1)
  (same comment as for Dioxins, measured as 2,3,7,8-tetrachlorodibenzo-p-dioxin)
- Zinc [air, non-urban air or from high stacks]: 4.16939e-8 kg; name zinc; = 4.54E-09 * factor_MJ_kWh; lognormal variance with pedigree 0.802, pedigree (1,1,3,1,1)
  (same comment as for Dioxins, measured as 2,3,7,8-tetrachlorodibenzo-p-dioxin)
- Radon-220 [air, non-urban air or from high stacks]: 0.00250714 kBq; name radon_220; = 0.000273 * factor_MJ_kWh; lognormal variance with pedigree 0.432, pedigree (1,1,3,1,1)
  (same comment as for Dioxins, measured as 2,3,7,8-tetrachlorodibenzo-p-dioxin)
- Benzene [air, non-urban air or from high stacks]: 1.99286e-6 kg; name benzene; = 2.17E-07 * factor_MJ_kWh; lognormal variance with pedigree 0.122, pedigree (1,1,3,1,1)
  (same comment as for Dioxins, measured as 2,3,7,8-tetrachlorodibenzo-p-dioxin)
- Radium-228 [air, non-urban air or from high stacks]: 1.79082e-6 kBq; name radium_228; = 1.95E-07 * factor_MJ_kWh; lognormal variance with pedigree 0.432, pedigree (1,1,3,1,1)
  (same comment as for Dioxins, measured as 2,3,7,8-tetrachlorodibenzo-p-dioxin)
- Copper [air, non-urban air or from high stacks]: 8.29286e-9 kg; name copper; = 9.03E-10 * factor_MJ_kWh; lognormal variance with pedigree 0.802, pedigree (1,1,3,1,1)
  (same comment as for Dioxins, measured as 2,3,7,8-tetrachlorodibenzo-p-dioxin)
- Nickel [air, non-urban air or from high stacks]: 1.57959e-8 kg; name nickel; = 1.72E-09 * factor_MJ_kWh; lognormal variance with pedigree 0.802, pedigree (1,1,3,1,1)
  (same comment as for Dioxins, measured as 2,3,7,8-tetrachlorodibenzo-p-dioxin)
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
## Sampling procedure
literature and statistics

## Extrapolations
This dataset has been extrapolated from year 2015 to the year of the calculation (2021). The uncertainty has been adjusted accordingly.

## Review by Carl Vadenbo 2015-07-23
The update of the whole electricity sector for the ecoinvent v3.2 database consist of hundreds of datasets. All these datasets have passed through a streamlined review processes where the underlying modelling of production volumes, technology shares and efficiencies was reviewed in detail prior to the datasets being submitted to the database.
