# heat production, natural gas, at boiler atm. low-NOx condensing non-modulating <100kW

Dataset: EcoSpold 2, unit process
Geography: RoW
Time period: 1990-01-01 to 2021-12-31
Technology level: current
Classification: ISIC rev.4 ecoinvent: 3530:Steam and air conditioning supply
Classification: EcoSpold01Categories: natural gas/heating systems
Synonyms: Brennwerttechnik
Tags: ConvertedDataset
Scenario: Business-as-Usual
System model: Allocation, cut-off by classification
Generated by: Thomas Heck
Published in: Faist Emmenegger, M. 2007
Database: ecoinvent
isCopyrightProtected: true
accessRestrictedTo: 1

## General comment
[This dataset was already contained in the ecoinvent database version 2. It was not individually updated during the transfer to ecoinvent version 3. Life Cycle Impact Assessment results may still have changed, as they are affected by changes in the supply chain, i.e. in other datasets. This dataset was generated following the ecoinvent quality guidelines for version 2. It may have been subject to central changes described in the ecoinvent version 3 change report (http://www.ecoinvent.org/database/ecoinvent-version-3/reports-of-changes/), and the results of the central updates were reviewed extensively. The changes added e.g. consistent water flows and other information throughout the database. The documentation of this dataset can be found in the ecoinvent reports of version 2, which are still available via the ecoinvent website. The change report linked above covers all central changes that were made during the conversion process.]

## Included activities end
The module includes fuel input from low pressure (CH) network, infrastructure (boiler), emissions to air and water, and electricity needed for operation.

## Geography
Emission data extrapolated from Switzerland to Europe (RER).

## Technology
Technology available in mid 1990s.

## Time period
Old emission values (from early 1990s)

## Reference product
- heat, central or small-scale, natural gas: 1 MJ; CPC 17300: Steam and hot water; By-product classification allocatable product
  EcoSpold01Location=RER
  production volume 5.07e15 MJ
    Estimation. This value does not reflect real conditions. The annual production volume determines the shares of supplying activities on a certain market.
    The share of heat, central or small-scale, natural gas from CHP plants was assumed to amount to 4%; the share from pure heat plants was assumed to amount to 96%. The annual production volumes of all supplying datasets reflect these shares on the market, but are not realistic production volumes. Identical shares for all 7 boiler types producing heat from natural gas on a small-scale are assumed.
    See talk pages for further discussion of the modelling of the heat markets.
    //
    Previous comment and production volume:
    Consumption in residential and small-scale applications (IEA Balance tables: 25 EJ net calorific value = 27.84 EJ gross calorific value), divided evenly over 7 boiler types, multiplied by the conversion efficiency of the boiler type on a gross calorific value basis (86.4%)
    3.4365E+12MJ
  property price 0.01 EUR2005
    Temporary price data. Calculated as 90% of purchasers price based on: Average European district heat price from Ecoheatcool and Euroheat 2005-2006, Ecoheat Work package 1: The European heat market. Final report. http://www.solarthermalworld.org/files/Ecoheatcool%20WP1%20Web.pdf?download
  properties: Corresponding fuel use 1 MJ, heating value, net 1 MJ

## Inputs from technosphere
- natural gas, low pressure: 0.0275482 m3; lognormal variance with pedigree 0.052, pedigree (1,1,5,5,1)
  EcoSpold01Location=CH
  CH module used for RER
  properties: wet mass 1 kg, heating value, net 36.3 MJ, dry mass 1 kg, carbon content, fossil 0.695187, heating value, gross 39 MJ
  note on heating value, net: Literature value, Source: United Nations Statistics Division (2018) International Recommendations for Energy Statistics (IRES). Available at: http://unstats.un.org/unsd/statcom/doc11/BG-IRES.pdf.
  note on carbon content, fossil: C content considered the same as in high pressure (consumption mix)
- gas boiler: 6.6e-7 unit; lognormal variance with pedigree 0.082, pedigree (1,1,5,5,1)
  EcoSpold01Location=RER
  uncertainty of life time and extrapolation to range of capacity
- electricity, low voltage: 0 kWh; pedigree (1,1,1,1,1)
  range of electricity for pumps etc., old information
  EcoSpold01Location=UCTE
- electricity, low voltage: 7.19112e-5, 1.30937e-5, 0.000210824, 0.00323682, 0.000523661, 0.00150369 kWh (6 entries); lognormal variance with pedigree 0.162, pedigree (1,1,5,5,1)
  range of electricity for pumps etc., old information
  EcoSpold01Location=UCTE

## Emissions to nature
- Formaldehyde [air, urban air close to ground]: 1e-7 kg; lognormal variance with pedigree 1.122, pedigree (1,1,5,5,1)
  rough estimate, high uncertainty
- Nitrogen oxides [air, urban air close to ground]: 2e-5 kg; lognormal variance with pedigree 0.342, pedigree (1,1,5,5,1)
  old data
- Dioxins, measured as 2,3,7,8-tetrachlorodibenzo-p-dioxin [air, urban air close to ground]: 0 kg; pedigree (1,1,1,1,1)
  rough estimate, high uncertainty
- Nitrite [water, surface water]: 3e-9 kg; lognormal variance with pedigree 0.342, pedigree (1,1,5,5,1)
  literature, range of values
- Sulfur dioxide [air, urban air close to ground]: 5e-7 kg; lognormal variance with pedigree 0.042, pedigree (1,1,5,5,1)
  composition of natural gas
- Sulfate [water, surface water]: 5e-8 kg; lognormal variance with pedigree 0.342, pedigree (1,1,5,5,1)
  literature, range of values
- Nitrate [water, surface water]: 1.3e-7 kg; lognormal variance with pedigree 0.342, pedigree (1,1,5,5,1)
  literature, range of values
- Methane, fossil [air, urban air close to ground]: 2e-6 kg; lognormal variance with pedigree 1.122, pedigree (1,1,5,5,1)
  rough estimate, high uncertainty
- Pentane [air, urban air close to ground]: 1.2e-6 kg; lognormal variance with pedigree 1.122, pedigree (1,1,5,5,1)
  rough estimate, high uncertainty
- Acetaldehyde [air, urban air close to ground]: 1e-9 kg; lognormal variance with pedigree 1.122, pedigree (1,1,5,5,1)
  rough estimate, high uncertainty
- Sulfite [water, surface water]: 5e-8 kg; lognormal variance with pedigree 0.342, pedigree (1,1,5,5,1)
  literature, range of values
- Acetic acid [air, urban air close to ground]: 1.5e-7 kg; lognormal variance with pedigree 1.122, pedigree (1,1,5,5,1)
  rough estimate, high uncertainty
- PAH, polycyclic aromatic hydrocarbons [air, urban air close to ground]: 1e-8 kg; lognormal variance with pedigree 1.122, pedigree (1,1,5,5,1)
  rough estimate, high uncertainty
- Carbon dioxide, fossil [air, urban air close to ground]: 0.056 kg; lognormal variance with pedigree 0.042, pedigree (1,1,5,5,1)
  composition of natural gas
- Mercury [air, urban air close to ground]: 3e-11 kg; lognormal variance with pedigree 0.692, pedigree (1,1,5,5,1)
  trace element in natural gas
- Carbon monoxide, fossil [air, urban air close to ground]: 3e-5 kg; lognormal variance with pedigree 0.692, pedigree (1,1,5,5,1)
  old data
- Dinitrogen monoxide [air, urban air close to ground]: 5e-7 kg; lognormal variance with pedigree 1.122, pedigree (1,1,5,5,1)
  rough estimate, high uncertainty
- Benzene [air, urban air close to ground]: 4e-7 kg; lognormal variance with pedigree 1.122, pedigree (1,1,5,5,1)
  rough estimate, high uncertainty
- Butane [air, urban air close to ground]: 7e-7 kg; lognormal variance with pedigree 1.122, pedigree (1,1,5,5,1)
  rough estimate, high uncertainty
- Propane [air, urban air close to ground]: 2e-7 kg; lognormal variance with pedigree 1.122, pedigree (1,1,5,5,1)
  rough estimate, high uncertainty
- Toluene [air, urban air close to ground]: 2e-7 kg; lognormal variance with pedigree 1.122, pedigree (1,1,5,5,1)
  rough estimate, high uncertainty
- Propionic acid [air, urban air close to ground]: 2e-8 kg; lognormal variance with pedigree 1.122, pedigree (1,1,5,5,1)
  rough estimate, high uncertainty
- Particulates, < 2.5 um [air, urban air close to ground]: 1e-7 kg; lognormal variance with pedigree 0.162, pedigree (1,1,5,5,1)
  literature
- Benzo(a)pyrene [air, urban air close to ground]: 1e-11 kg; lognormal variance with pedigree 1.122, pedigree (1,1,5,5,1)
  rough estimate, high uncertainty

## Sampling procedure
Literature

## Extrapolations
see Geography This dataset has been copied from an original dataset covering the geography RER. The uncertainty has been adjusted accordingly.

## Review by Michael Spielmann (obsolete) 2003-07-06
Preliminary passed, based on a review of a first draft of the final report. Data have to be validated again after review of the written report.
