# wood preservative production, water-based, indoor use, occasionally wet

Dataset: EcoSpold 2, unit process
Geography: GLO
Time period: 2012-01-01 to 2021-12-31
Technology level: current
Classification: ISIC rev.4 ecoinvent: 2021:Manufacture of pesticides and other agrochemical products
Tags: Swiss brush-up completed
Scenario: Business-as-Usual
System model: Allocation, cut-off by classification
Generated by: Frank Werner
Database: ecoinvent
isCopyrightProtected: true
accessRestrictedTo: 1

## General comment
According to EN 335-1:2005, five use classes are distinguished for chemical wood protection based on the general exposure of wood in its application, wetting regime in service and the biological agents to be expected. This exposure scenario determines the potentially vulnerable zone of wood and the required treatment for the application of the wood preservative (see table)

## Included activities start
From reception of chemicals at the factory gate

## Included activities end
The datasets covers the components and preparation of a typical water-based/organic solvent based [as applicable] wood preservative for the use class according to EN 335-1:2006 as indicated in the name of the dataset, ready to be packed. In addition in contains an estimate for electricity consumption and for infrastructure. Packaging is not included

## Geography
Data referring to (Central) European conditions

## Reference product
- wood preservative, water-based, indoor use, occasionally wet: 1 kg; source Empa St. Gallen 2012; CPC 345: Miscellaneous basic chemical products; By-product classification allocatable product
  production volume 5.59667e8 kg; name p_preservative; = 3.65E9*0.5*0.92/3
    Using the GLO value of 3.65E09 kg preservative derived from Vlosky (2009), the distribution on waterborne (92%), the 50% non-pressure methods, and the assumption of equal distribution over the 3 use classes
  property price 1.72932 EUR2005
    Calculated based on inputs: The price of the product has been calculated as a sum of the values of the material and energy inputs for this product. This value is therefore a rough estimation. It may underestimate the real price since there are additional expenses when producing any product. These expences can include for example labour costs, treatment of waste materials and profit for the producer. Please consider carefully whether this level of data quality is acceptable for your application.
  property water content 1.09205; = 0.522/0.478
  property carbon content 0.34325
    carbon content on a dry matter basis (reserved; not for manual entry)
  properties: water in wet mass 0.522 kg, carbon content, fossil 0.34325, dry mass 0.478 kg, carbon content, non-fossil 0, wet mass 1 kg, carbon allocation 0.164074 kg

## Inputs from technosphere
- methyl ethyl ketone: 0 kg; source Empa St. Gallen 2012; pedigree (1,1,1,1,1)
  antigoagulating agent
  properties: wet mass 1 kg, carbon content, fossil 0.666667, UVEK_link_1 2971, dry mass 1 kg, heating value, net 33.63 MJ, UVEK_relative_amount_1 1
  note on UVEK_link_1: to be used only in special submissions in coordination with ecoinvent and the Swiss FOEN
- hazardous waste, for incineration: 0 kg; name m_hazardous_waste; source Nemecek, T. 2007; pedigree (1,1,1,1,1)
  estimated as 200 kg/t active ingredient
  production volume 0 kg
    Calculated from production volume of reference product using the relative outputs.
  properties: UVEK_link_1 965, heating value, net 17 MJ, water content 0.333333, UVEK_relative_amount_1 -1, dry mass 0.75 kg, carbon content, fossil 0.554667, wet mass 1 kg
  note on heating value, net: Value taken from the general comment of the treatment dataset.
- chemical factory, organics: 4e-10 unit; source Althaus H.-J. 2007; lognormal variance with pedigree 0.76, pedigree (5,5,5,5,5)
  assumed to be equal as for paint production
  properties: UVEK_relative_amount_1 1, UVEK_link_1 430
- pyrethroid-compound: 0.00075 kg; name m_permetrine; lognormal variance with pedigree 0.235, pedigree (5,5,5,5,5)
  active agent
  properties: dry mass 1 kg, UVEK_relative_amount_1 1, carbon content, fossil 0.623, UVEK_link_1 3716, wet mass 1 kg
- electricity, medium voltage: 0.0428 kWh; source Althaus H.-J. 2007; lognormal variance with pedigree 0.235, pedigree (5,5,5,5,5)
  assumed to equal as for water-based paint
  properties: UVEK_relative_amount_1 1, UVEK_link_1 1785
- white spirit: 0.0035 kg; source Empa St. Gallen 2012; lognormal variance with pedigree 0.235, pedigree (5,5,5,5,5)
  main component of drying agent
  properties: heating value, net 45 MJ, UVEK_link_1 4879, carbon content, fossil 0.863404, wet mass 1 kg, dry mass 1 kg, UVEK_relative_amount_1 1
  note on carbon content, fossil: The most common variety of white spirit is a mixture of saturated aliphatic and alicyclic C7-C12 hydrocarbons with a content of 15-20% (by weight) of aromatic C7-C12 hydrocarbons (ecoinvent v2.2 report 8-part 94). The average composition was assumed as being 82.5% C9.5 saturated aliphatic and alicyclic hydrocarbons (average formula C9.5H20), and 17.5% C9.5 aromatic hydrocarbons (average formula C9.5H9.5).
- diethanolamine: 0.005 kg; source Empa St. Gallen 2012; lognormal variance with pedigree 0.235, pedigree (5,5,5,5,5)
  proxy for a defoaming agent
  properties: heating value, net 26.52 MJ, UVEK_link_1 742, wet mass 1 kg, dry mass 1 kg, carbon content, fossil 0.457143, UVEK_relative_amount_1 1
- alkyd resin, long oil, without solvent, in 70% white spirit solution state: 0 kg; source Empa St. Gallen 2012; pedigree (1,1,1,1,1)
  binder
  properties: dry mass 1 kg, UVEK_link_1 141, carbon content, non-fossil 0.412906, heating value, net 20.65 MJ, UVEK_relative_amount_1 1, carbon content, fossil 0.268755, wet mass 1 kg
- benzo[thia]diazole-compound: 0.0001 kg; source Empa St. Gallen 2012; lognormal variance with pedigree 0.235, pedigree (5,5,5,5,5)
  component of in can preservative
  properties: wet mass 1 kg, dry mass 1 kg, carbon content, fossil 0.499869, UVEK_link_1 280, UVEK_relative_amount_1 1
- water, deionised: 0 kg; source Empa St. Gallen 2012; pedigree (1,1,1,1,1)
  solvent
  property water in wet mass 1 kg; name WWM
  property dry mass 0 kg; name DM
  property carbon content, non-fossil 0; name C_content_non_fossil
  property wet mass 1 kg; name WM
  properties: UVEK_relative_amount_1 1, UVEK_link_1 4853, UVEK_link_9 4433, UVEK_link_8 4417, UVEK_relative_amount_8 0.0900383, UVEK_relative_amount_9 0.542146
  note on UVEK_link_9: This link has been introduced to model transport specifically for the SAM model; to be used only in special submissions in coordination with ecoinvent and the Swiss FOEN.
  note on UVEK_relative_amount_8: Scaling factor = amount of transport in corresponding KBOB dataset/amount of this input from technosphere. Source for transport distance: Life Cycle Inventories of Wood as Fuel and Construction Material/2007/Werner F. To be used only in special submissions in coordination with ecoinvent and the Swiss FOEN
- cyclic N-compound: 0.007 kg; name m_tebuconazole; lognormal variance with pedigree 0.235, pedigree (5,5,5,5,5)
  active agent
  properties: UVEK_link_1 688, UVEK_relative_amount_1 1, wet mass 1 kg, carbon content, fossil 0.641962, dry mass 1 kg
- dipropylene glycol monomethyl ether: 0 kg; source Empa St. Gallen 2012; pedigree (1,1,1,1,1)
  main component of drying agent; solvent
  properties: UVEK_relative_amount_1 1, carbon content, fossil 0.567568, UVEK_link_1 762, dry mass 1 kg, heating value, net 30.27 MJ, wet mass 1 kg
- propylene glycol, liquid: 0 kg; source Empa St. Gallen 2012; pedigree (1,1,1,1,1)
  sum of various glycols used as solvents
  property water content 0; name water_content
  properties: dry mass 1 kg, heating value, net 27.09 MJ, carbon content, fossil 0.473684, UVEK_relative_amount_1 1, wet mass 1 kg, UVEK_link_1 3681
- [thio]carbamate-compound: 0.0045 kg; name m_IBPC; lognormal variance with pedigree 0.235, pedigree (5,5,5,5,5)
  active agent
  properties: wet mass 1 kg, carbon content, fossil 0.626349, UVEK_link_1 4, dry mass 1 kg, UVEK_relative_amount_1 1
- methyl ethyl ketone: 0.000273969, 0.000726031 kg (2 entries); source Empa St. Gallen 2012; lognormal variance with pedigree 0.235, pedigree (5,5,5,5,5)
  antigoagulating agent
- hazardous waste, for incineration: -0.0007889, -2.06214e-5, -0.00164048 kg (3 entries); source Nemecek, T. 2007; lognormal variance with pedigree 0.203, pedigree (4,5,5,5,5)
  estimated as 200 kg/t active ingredient
  production volume 1.37118e6 kg
- alkyd resin, long oil, without solvent, in 70% white spirit solution state: 0.138849, 0.281151 kg (2 entries); source Empa St. Gallen 2012; lognormal variance with pedigree 0.235, pedigree (5,5,5,5,5)
  binder
- water, deionised: 0.122826, 0.000442143, 0.398732 kg (3 entries); source Empa St. Gallen 2012; lognormal variance with pedigree 0.235, pedigree (5,5,5,5,5)
  solvent
  properties: UVEK_relative_amount_1 1, UVEK_link_1 4853, UVEK_link_9 4433, UVEK_link_8 4417, UVEK_relative_amount_8 0.0900383, UVEK_relative_amount_9 0.542146, wet mass 1 kg
- dipropylene glycol monomethyl ether: 0.001131, 0.005369 kg (2 entries); source Empa St. Gallen 2012; lognormal variance with pedigree 0.235, pedigree (5,5,5,5,5)
  main component of drying agent; solvent
- propylene glycol, liquid: 0.00785157, 0.0158984 kg (2 entries); source Empa St. Gallen 2012; lognormal variance with pedigree 0.235, pedigree (5,5,5,5,5)
  sum of various glycols used as solvents

## Sampling procedure
Ideal-type formulation of wood preservative for a water-/solvent-based [as applicable] wood preservative for the respective use class

## Extrapolations
This dataset has been extrapolated from year 2012 to the year of the calculation (2021). The uncertainty has been adjusted accordingly.
