# chickpea production

Dataset: EcoSpold 2, unit process
Geography: IN
Time period: 2015-01-01 to 2021-12-31
Technology level: current
Classification: ISIC rev.4 ecoinvent: 0111:Growing of cereals (except rice), leguminous crops and oil seeds
Scenario: Business-as-Usual
System model: Allocation, cut-off by classification
Generated by: Sanjeevan Bajaj
Database: ecoinvent
isCopyrightProtected: true
accessRestrictedTo: 1

## General comment
This dataset represents the production of 1 kg of fresh Chickpea during September, 2016- January, 2017 at a farm located in village Chandragadh, District Surendranagar of Gujarat. In this area, fields are irrigated using electric pump for surface irrigation. The farm has a yield of 2900 kg fresh matter per ha for this crop cycle. Sowing date for the crop is 02-October, 2016 and harvesting date is 09-January, 2017. Mineral NP fertilizer input is 77-51 kg/ha. Organic fertilizer applied amounts to 14,000 kg of compost from cattle dung. Insecticide used has active ingredient as Dimethoate 104g/ha, Chlorpyrifos 137.55g/ha, Monocrotophos 79.80g/ha. Machinery is used for soil cultivation, other work processes with fuel consumption of 72 kg/ha, and 6.40 kg/ha respectively.

## Included activities start
This activity starts about three weeks after the harvest of the previous crop. The soil is prepared for cultivation in third week of September and sowing of seeds started about 10 days after soil preparation. Thereafter the crop is mature for harvesting in about 3 months.

## Included activities end
The activity ends with the harvesting of the mature Chickpea (gram in local language) from the Chickpea plant

## Geography
Village Chandragadh, District Surendranagar of Gujarat

## Technology
Cultivation of Chickpea follows conventional production standards

## Time period
Soil cultivating date for the main crop: 21-September, 2016; Harvesting date main crop: 09-January, 2017. The soil cultivation, sowing and harvesting dates are taken as the middle date of the week or fortnight told to the data collector by the farmer. Total time from date of sowing to date of harvesting comes to 100 days. The data is collected for one crop cycle. The cycle of one year is considered for entry in ecoeditor.

## Parameters
- LUC_crop_specific: 1 dimensionless
  This parameter allows to switch between a "crop specific" and a "country specific" approach when calculating the LUC of a crop. By default, the chosen approach is "crop specific", so the value of the parameter is 1. If you want to apply a "country specific" approach, turn the parameter to 0.

## Reference product
- chickpea: 1 kg; By-product classification allocatable product; CPC 01703: Chick peas, dry
  production volume 7.18e9 kg; = 7180*1000*1000
    Production volume for gram (which is the local name for chickpea) is provided in thousand tonnes; Data is for the year 2015-16. Source: http://agriexchange.apeda.gov.in/India%20Production/India_Productions.aspx?cat=Agri&hscode=1006
  property price 0.524552 EUR2005
    Literature value. Price from FAOSTAT data Producer Prices - Annual (retrieved from: http://www.fao.org/faostat/en/#data/PP, accessed 15Feb2018). Data from 2005.
  property carbon content, non-fossil 0.475
    biogenic carbon content on a dry matter basis.
    Reference: http://www.fao.org/forestry/17111/en
  property carbon content 0.475
    carbon content on a dry matter basis (reserved; not for manual entry)
  properties: water content 3.73037, dry mass 0.2114 kg, carbon content, fossil 0, wet mass 1 kg, water in wet mass 0.7886 kg, carbon allocation 0.100415 kg

## Inputs from technosphere
- packaging, for fertilisers: 0.0882759 kg; lognormal variance with pedigree 0.0514, pedigree (4,3,2,5,4)
  Total amount of active substance/s of fertilisers needed for the production of 'chickpea' is calculated to be circa 4.41E-02 kg. Fertiliser/s used in this dataset is/are: 'nitrogen fertiliser, as N', 'phosphate fertiliser, as P2O5', 'urea, as N'. The total amount of active substance/s is doubled in order to account for the packaging of the dilluted product of fertiliser/s that is/are applied. Therefore, 8.83E-02 kg of packaging for fertilisers is justified with this exchange.
  properties: wet mass 1 kg, carbon content, fossil 0.825301, heating value, net 25.01 MJ, price 0.0642 EUR2005, dry mass 1 kg
  note on carbon content, fossil: Considering a chemical formula (C2H4)n for polyethylene, carbon content-fossil is calculated to be 0.856286 kg of Carbon per kg of dry mass.
- compost: 4.82759 kg; lognormal variance with pedigree 0.0034, pedigree (2,4,2,1,1)
  The data was collected for a hectare area through interview
  property cadmium content 3.6e-7; name Cd_content
  property zinc content 0.000184; name Zn_content
  property mercury content 1.2e-7; name Hg_content
  property lead content 4.9e-5; name Pb_content
  property dry mass 0.5 kg; name DM
  property nickel content 1.63e-5; name Ni_content
  property phosphorus content 0.0035; name P_content
  property chromium content 2.23e-5; name Cr_content
  property nitrogen content 0.014; name N_content
  property copper content 5.77e-5; name Cu_content
  property potassium content 0.01; name K_content
  properties: water content 1, wet mass 1 kg, carbon content, non-fossil 0.183645
- pesticide, unspecified: 2.75172e-5 kg; lognormal variance with pedigree 0.0034, pedigree (2,4,2,1,1)
  consideing 2 pumps of 15 ml each multiplied with density
  properties: carbon content, fossil 0.486978, dry mass 1 kg, wet mass 1 kg
- transport, tractor and trailer, agricultural: 0.0506169 metric ton*km; lognormal variance with pedigree 0.1228, pedigree (2,4,2,1,1)
  The data was collected for a hectare area through interview
- pea seed, for sowing: 0.0213793 kg; lognormal variance with pedigree 0.0034, pedigree (2,4,2,1,1)
  The data was collected for a hectare area through interview
  properties: dry mass 0.87 kg, carbon content, non-fossil 0.469421, water content 0.149425, wet mass 1 kg
- organophosphorus-compound, unspecified: 8.32931e-5 kg; lognormal variance with pedigree 0.0034, pedigree (2,4,2,1,1)
  This exchange is an aggregation of amounts:
  4.743103448275862E-5. Comment: used as a substitute of Used as a substitute for Quinalphos. Considering 7 pumps of 15 ml each multiplied with density
  3.586206896551724E-5. Comment: Considering 2 pumps of 20 ml each is sprayed two times, Multiplied by the density
  properties: dry mass 1 kg, carbon content, fossil 0.260898, wet mass 1 kg
- urea: 0.042122 kg; lognormal variance with pedigree 0.0034, pedigree (2,4,2,1,1)
  The exchange has been updated from 'urea, as N' into 'urea' and therefore its amount has been scaled (multiplied) from 0.0196 kg by 2.1438 kg of 'urea' per kg of 'urea, as N'. Original comment of the exchange is: The data was collected for a hectare area through interview
  properties: carbon content, fossil 0.2, dry mass 1 kg, wet mass 1 kg
- packaging, for pesticides: 0.000221621 kg; lognormal variance with pedigree 0.0514, pedigree (4,3,2,5,4)
  Total amount of active substance/s of pesticides needed for the production of chickpea is calculated to be circa 1.11E-04 kg. Pesticide/s used in this dataset is/are: 'organophosphorus-compound, unspecified', 'pesticide, unspecified'. The total amount of active substance/s is doubled in order to account for the packaging of the dilluted product of pesticide/s that is/are applied. Therefore, 2.22E-04 kg of packaging for pesticides is justified with this exchange.
  properties: heating value, net 25.97 MJ, price 0.0642 EUR2005, carbon content, fossil 0.85714, wet mass 1 kg, dry mass 1 kg
- inorganic nitrogen fertiliser, as N: 0.00690345 kg; lognormal variance with pedigree 0.0034, pedigree (2,4,2,1,1)
  The data was collected for a hectare area through interview
  properties: dry mass 1 kg, wet mass 1 kg
- tillage, ploughing: 0.000951249 ha; lognormal variance with pedigree 0.0034, pedigree (2,4,2,1,1)
  The data was collected for a hectare area through interview
- irrigation: 0.537931 m3; lognormal variance with pedigree 0.0034, pedigree (2,4,2,1,1)
  The data was collected for a hectare area through interview
  properties: water content 9089.91, wet mass 1000 kg, dry mass 0.11 kg
- inorganic phosphorus fertiliser, as P2O5: 0.0175862 kg; lognormal variance with pedigree 0.0034, pedigree (2,4,2,1,1)
  The data was collected for a hectare area through interview
  properties: wet mass 1 kg, dry mass 1 kg
- land use change, annual crop: 2.02513e-5 ha; = (0.058728712871287 * LUC_crop_specific + 0.025665138215835298 * (1-LUC_crop_specific))/2900
  Calculated Value. This value has been calculated by using the ecoinvent LCI calculation tool for crop production.

## Inputs from nature
- Carbon dioxide, in air [natural resource, in air]: 1.33043 kg; lognormal variance with pedigree 0.0034, pedigree (2,4,2,1,1)
  (same comment as for land use change, annual crop)
- Transformation, to annual crop, irrigated [natural resource, land]: 3.44828 m2; lognormal variance with pedigree 0.0108, pedigree (2,4,2,1,1)
  (same comment as for land use change, annual crop)
- Occupation, annual crop, irrigated [natural resource, land]: 1.14943 m2*year; lognormal variance with pedigree 0.0048, pedigree (2,4,2,1,1)
  (same comment as for land use change, annual crop)
- Transformation, from annual crop, irrigated [natural resource, land]: 3.44828 m2; lognormal variance with pedigree 0.0108, pedigree (2,4,2,1,1)
  (same comment as for land use change, annual crop)
- Energy, gross calorific value, in biomass [natural resource, biotic]: 15.2971 MJ; lognormal variance with pedigree 0.0034, pedigree (2,4,2,1,1)
  The data was collected for a hectare area through interview

## Emissions to nature
- Chromium, ion [water, surface water]: 5.45491e-11 kg; lognormal variance with pedigree 0.0928, pedigree (2,4,2,1,1)
  (same comment as for land use change, annual crop)
- Chromium [soil, agricultural]: 6.10081e-5 kg; lognormal variance with pedigree 0.0428, pedigree (2,4,2,1,1)
  (same comment as for land use change, annual crop)
- Chromium, ion [water, ground-]: 2.421e-6 kg; lognormal variance with pedigree 0.0928, pedigree (2,4,2,1,1)
  (same comment as for land use change, annual crop)
- Cadmium [soil, agricultural]: 1.60179e-6 kg; lognormal variance with pedigree 0.0428, pedigree (2,4,2,1,1)
  (same comment as for land use change, annual crop)
- Lead [water, surface water]: 4.36384e-11 kg; lognormal variance with pedigree 0.0928, pedigree (2,4,2,1,1)
  (same comment as for land use change, annual crop)
- Lead [soil, agricultural]: 0.000116566 kg; lognormal variance with pedigree 0.0428, pedigree (2,4,2,1,1)
  (same comment as for land use change, annual crop)
- Copper, ion [water, ground-]: 4.1299e-7 kg; lognormal variance with pedigree 0.0928, pedigree (2,4,2,1,1)
  (same comment as for land use change, annual crop)
- Nickel [soil, agricultural]: 3.97613e-5 kg; lognormal variance with pedigree 0.0428, pedigree (2,4,2,1,1)
  (same comment as for land use change, annual crop)
- Copper, ion [water, surface water]: 4.57031e-11 kg; lognormal variance with pedigree 0.0928, pedigree (2,4,2,1,1)
  (same comment as for land use change, annual crop)
- Copper [soil, agricultural]: 0.000135149 kg; lognormal variance with pedigree 0.0428, pedigree (2,4,2,1,1)
  (same comment as for land use change, annual crop)
- Lead [water, ground-]: 6.77443e-8 kg; lognormal variance with pedigree 0.0928, pedigree (2,4,2,1,1)
  (same comment as for land use change, annual crop)
- Mercury [soil, agricultural]: 2.66884e-7 kg; lognormal variance with pedigree 0.0428, pedigree (2,4,2,1,1)
  (same comment as for land use change, annual crop)
- Mercury [water, surface water]: 1.63278e-13 kg; lognormal variance with pedigree 0.0928, pedigree (2,4,2,1,1)
  (same comment as for land use change, annual crop)
- Chlorpyrifos [soil, agricultural]: 4.7431e-5 kg; lognormal variance with pedigree 0.0358, pedigree (2,4,2,1,1)
  used as a substitute of Used as a substitute for Quinalphos. Considering 7 pumps of 15 ml each multiplied with density
- Nickel, ion [water, surface water]: 5.16129e-11 kg; lognormal variance with pedigree 0.0928, pedigree (2,4,2,1,1)
  (same comment as for land use change, annual crop)
- Zinc [soil, agricultural]: 0.00041635 kg; lognormal variance with pedigree 0.0428, pedigree (2,4,2,1,1)
  (same comment as for land use change, annual crop)
- Mercury [water, ground-]: 1.46702e-10 kg; lognormal variance with pedigree 0.0928, pedigree (2,4,2,1,1)
  (same comment as for land use change, annual crop)
- Dimethoate [soil, agricultural]: 3.58621e-5 kg; lognormal variance with pedigree 0.0358, pedigree (2,4,2,1,1)
  Considering 2 pumps of 20 ml each is sprayed two times, Multiplied by the density
- Zinc, ion [water, ground-]: 3.7092e-6 kg; lognormal variance with pedigree 0.0928, pedigree (2,4,2,1,1)
  (same comment as for land use change, annual crop)
- Nitrate [water, ground-]: 0.0386948 kg; lognormal variance with pedigree 0.0428, pedigree (2,4,2,1,1)
  (same comment as for land use change, annual crop)
- Water [water, surface water]: 0.0537931 m3; lognormal variance with pedigree 0.0034, pedigree (2,4,2,1,1)
  (same comment as for land use change, annual crop)
- Water [water, ground-]: 0.209793 m3; lognormal variance with pedigree 0.0034, pedigree (2,4,2,1,1)
  (same comment as for land use change, annual crop)
- Carbon dioxide, fossil [air, non-urban air or from high stacks]: 0.0308677 kg; lognormal variance with pedigree 0.0034, pedigree (2,4,2,1,1)
  (same comment as for land use change, annual crop)
- Phosphorus [water, surface water]: 4.68092e-9 kg; lognormal variance with pedigree 0.0428, pedigree (2,4,2,1,1)
  (same comment as for land use change, annual crop)
- Ammonia [air, non-urban air or from high stacks]: 0.00741628 kg; lognormal variance with pedigree 0.0034, pedigree (2,4,2,1,1)
  (same comment as for land use change, annual crop)
- Phosphate [water, surface water]: 6.95399e-5 kg; lognormal variance with pedigree 0.0428, pedigree (2,4,2,1,1)
  (same comment as for land use change, annual crop)
- Zinc, ion [water, surface water]: 1.105e-10 kg; lognormal variance with pedigree 0.0928, pedigree (2,4,2,1,1)
  (same comment as for land use change, annual crop)
- Phosphate [water, ground-]: 2.46705e-5 kg; lognormal variance with pedigree 0.0428, pedigree (2,4,2,1,1)
  (same comment as for land use change, annual crop)
- Dinitrogen monoxide [air, non-urban air or from high stacks]: 0.00116463 kg; lognormal variance with pedigree 0.0328, pedigree (2,4,2,1,1)
  (same comment as for land use change, annual crop)
- Cadmium, ion [water, ground-]: 5.49813e-9 kg; lognormal variance with pedigree 0.0928, pedigree (2,4,2,1,1)
  (same comment as for land use change, annual crop)
- Nitrogen oxides [air, non-urban air or from high stacks]: 0.00370084 kg; lognormal variance with pedigree 0.0428, pedigree (2,4,2,1,1)
  (same comment as for land use change, annual crop)
- Cadmium, ion [water, surface water]: 5.23081e-13 kg; lognormal variance with pedigree 0.0928, pedigree (2,4,2,1,1)
  (same comment as for land use change, annual crop)
- Water [air, non-urban air or from high stacks]: 0.274345 m3; lognormal variance with pedigree 0.0034, pedigree (2,4,2,1,1)
  (same comment as for land use change, annual crop)

## Sampling procedure
The farmer was identified and contacted by agriculture science faculty familiar with the local farmers in the region. Data was collected directly from the farmer through semi-structured interview using a questionnaire based on the input requirements of the ecoinvent LCI calculation tool for crop production. The farmer does not maintain any written records and has provided the data from recent memory. In this region, typically farmers are unable to provide exact name of active ingredient in the pesticide they use and the same was noted from details given on the pesticide packet. Individual farmer is not able to calculate fuel consumption for his own farm alone and this information has been collected from farming community of the area.

## Extrapolations
This dataset has been extrapolated from year 2018 to the year of the calculation (2021). The uncertainty has been adjusted accordingly.
