# maintenance, barge

Dataset: EcoSpold 2, unit process
Geography: RER
Time period: 1990-01-01 to 2021-12-31
Technology level: current
Classification: EcoSpold01Categories: transport systems/ship
Classification: ISIC rev.4 ecoinvent: 3315:Repair of transport equipment, except motor vehicles
Tags: ConvertedDataset
Scenario: Business-as-Usual
System model: Allocation, cut-off by classification
Generated by: Michael Spielmann (obsolete)
Published in: Spielmann M. 2007
Database: ecoinvent
isCopyrightProtected: true
accessRestrictedTo: 1

## General comment
The dataset represents the maintenance of a barge with an average total capacity of 1000 t/vessel.
[This dataset was already contained in the ecoinvent database version 2. It was not individually updated during the transfer to ecoinvent version 3. Life Cycle Impact Assessment results may still have changed, as they are affected by changes in the supply chain, i.e. in other datasets. This dataset was generated following the ecoinvent quality guidelines for version 2. It may have been subject to central changes described in the ecoinvent version 3 change report (http://www.ecoinvent.org/database/ecoinvent-version-3/reports-of-changes/), and the results of the central updates were reviewed extensively. The changes added e.g. consistent water flows and other information throughout the database. The documentation of this dataset can be found in the ecoinvent reports of version 2, which are still available via the ecoinvent website. The change report linked above covers all central changes that were made during the conversion process.]

## Included activities start
Barge maintenance starting with the painting of the barge.

## Included activities end
The activity ends with the maintenance of one barge. The dataset includes the use of paint and emissions of the solvent of the paint as NMVOC. The dataset doesn't incude teh consumption of lubricates.

## Geography
Europe

## Technology
The data is derived from an assessment of one barge, with a load capacity of 2800t Bialonski (1990; Engelkamp (1993) as quoted in Maibach et al. (1999). This data was adjusted to model a barge, representing the current average total capacity for a barge (1000 t/vessel). For inland waterways vessels we assume that they are painted 10 times in their entire life span.
References:
Bialonski W. (1990) Spezifischer Energieeinsatz im Verkehr – Ermittlung und Vergleich der spezifischen Energieverbräuche. Forschungsbericht FE Nr. 90 247/88, im Auftrag des Bundesministers für Verkehr (ausgeführt am Verkehrswissenschaftlichen Institut der Rheinisch-Westfälischen Technischen Hochschule Aachen), Bonn
Engelkamp P. (1993) Stellungnahme des Europäischen Entwicklungszent-rums für die Binnenschifffahrt e.V. Duisburg zum Fragenkatalog für die öffentliche Anhörung der Enquete Komission " Schutz des Menschen und der Umwelt". Enquete Komission zum Thema "Mobilität - Darstellung, Bewertung und Optimierung von Stoffströmen., Bonn
Maibach M., Peter D. and Seiler B. (1999) Ökoinventar Transporte: Grundlagen für den ökologischen Vergleich von Transportsystemen und den Einbezug von Transportsystemen in Ökobilanzen. Technischer Schlussbericht. In: Schweizerischer Nationalfonds zur Förderung der wissenschaftlichen Forschung (ed. SPP Umwelt M.). 2nd Edition. INFRAS, Zürich

## Reference product
- maintenance, barge: 1 unit; CPC 87149: Maintenance and repair services of other transport equipment; By-product classification allocatable product
  EcoSpold01Location=RER
  production volume 1.32237 unit
    This is a placeholder value that does not reflect real-world production volumes. This dataset does not currently require a real-world production volume to work in the database framework, and no actual data were collected yet. This has no negative effect on the results of the ecoinvent database. The placeholder value of this activity was scaled according to the nominal GDP of 2005 (source: United Nations, http://data.un.org/Glossary.aspx?q=GDP+%28current+US%24%29, accessed 20130726) to reflect an appropriate share of the global production volume, which is also a placeholder value.
  property price 146932 EUR2005
    Calculated based on inputs: The price of the product has been calculated as a sum of the values of the material and energy inputs for this product. This value is therefore a rough estimation. It may underestimate the real price since there are additional expenses when producing any product. These expences can include for example labour costs, treatment of waste materials and profit for the producer. Please consider carefully whether this level of data quality is acceptable for your application.

## Inputs from technosphere
- alkyd paint, white, without solvent, in 60% solution state: 43600 kg; lognormal variance with pedigree 0.16, pedigree (1,1,5,1,1)
  Estimation. For inland waterways vessels it's assumed that they are painted 10 times in their entire life span.
  EcoSpold01Location=RER
  properties: dry mass 1 kg, carbon content, fossil 0.140367, carbon content, non-fossil 0.199629, wet mass 1 kg, heating value, net 10.3 MJ
  note on carbon content, fossil: C content was calculated as an addition of C content in the raw materials.

## Emissions to nature
- NMVOC, non-methane volatile organic compounds, unspecified origin [air, non-urban air or from high stacks]: 15700 kg; lognormal variance with pedigree 0.16, pedigree (1,1,5,1,1)
  Estimation. NMVOC emissions are estimated based on a 60% solvent content in the used paint and assuming that the entire amount of solvents is released as NMVOC.

## Sampling procedure
literature studies and own assumptions

## Extrapolations
This dataset has been extrapolated from year 1994 to the year of the calculation (2021). The uncertainty has been adjusted accordingly.

## Review by Niels Jungbluth 2003-08-27
passed.

## Review by Roland Hischier 2011-09-23
Transfer of Documentation done.
