# polyethylene production, low density, granulate

Dataset: EcoSpold 2, unit process
Geography: RER
Time period: 2011-01-01 to 2021-12-31
Technology level: current
Classification: ISIC rev.4 ecoinvent: 2013:Manufacture of plastics and synthetic rubber in primary forms
Synonyms: LDPE
Scenario: Business-as-Usual
System model: Allocation, cut-off by classification
Share of production covered: 72 %
Generated by: Thomas Fröhlich
Published in: PlasticsEurope 2016
Database: ecoinvent
isCopyrightProtected: true
accessRestrictedTo: 1

## General comment
The dataset represents the production mix of commercial LDPE production technologies: high pressure polymerisation using oxygen and/or organic peroxides as initiator
LDPE is produced through high-pressure polymerisation. As typical initiators to start the polymerisation process, organic peroxides and oxygen are used. Furthermore, polar modifiers (aldehydes, ketones, or alcohols) or aliphatic hydrocarbons are fed into the monomer stream to control the molecular weight distribution.
High-pressure polymerisation is carried out at pressures of 1500 to 3500 bar and temperatures of about 200°C. Under those conditions, oxygen or peroxides work as initiators to start the radical polymerisation process. The reaction may take place either in an autoclave or a tubular reactor. The polymerisation is an exothermic reaction. The ethylene gas is used as a heat sink for the resulting heat, which means that the ethylene gas cannot be to-tally converted to polymer. The unreacted gas is directly recycled back into the process and combined with fresh ethylene. Furthermore, the heat of the exothermic reaction can be recuperated to generate low pressure steam.
The initiator concentrations usually vary between 0.1 and 0.5 wt.-%. Decomposed metal alkyl residues of the initiator remain in the product and sometimes have an influence on end-use properties. Dissociation products of the radical initiator are removed from the polymer or built in.
After the reaction phase, most of the residual (unreacted) monomers (which are mostly present as gases) are separated from the polymer and are either recycled back into the process or flared of. Depending on the purity of the separated monomers, the gas can either be fed directly back into the production line or the monomers are returned to a purification unit. To limit the accumulation of impurities in the process, usually a small side-stream (purge) of the unreacted gas is sent back to the cracker or to a dedicated purification unit. After polymerisation, the polymer is usually fed di-rectly into a hot melt extruder, where additives can be added to the melted polymer if required. The polymer is then pelletised in an underwater pelletiser. The pelletised product is dried, blended where required and degassed.

## Included activities start
Acitivity starts with monomers and comonomers entering the polymerisation plant. Energy supply is included in terms of heat production inside the battery limits of the plant. Steam and electricity supply is outside the activity.

## Included activities end
Activity ends with polymer granulate leaving the factory.

## Allocation
The polyolefin production itself is regarded as a single-output process since only one polymer type is produced by one installation. All other products of this installation, e.g. monomers being recycled to the cracker or distillation, or hydrocarbons being used thermally, are treated as internal flows replacing the respective input materials (i.e. monomers or energy carriers). Hence, no allocation is needed for the polyolefin production process.

## Geography
EU27 including Norway and Switzerland

## Technology
Coverage of production capacity in Europe: 72%

## Time period
Data was collected for the year 2011, processed in 2013 and published in 2014

## Reference product
- polyethylene, low density, granulate: 1 kg; CPC 34710: Polymers of ethylene, in primary forms; By-product classification allocatable product; CAS 9002-88-4
  Reference Product
  production volume 6.3e9 kg; name RP_PV
    Production Capacity in 2013 in EU27+NOR+CH, Source: PlasticsEurope
  property carbon content 0.857143
    carbon content on a dry matter basis (reserved; not for manual entry)
  property true value 1.29
    allocation property applied in "true value" allocation // value calculated from revenue
  properties: carbon content, fossil 0.857143, carbon content, non-fossil 0, water in wet mass 0 kg, heating value, net 42.47 MJ, price 1.29 EUR2005, dry mass 1 kg, wet mass 1 kg, water content 0, carbon allocation 0.857143 kg

## By-products
- steam, in chemical industry: 0 kg; name BP_amount6; CPC 17300: Steam and hot water; By-product classification allocatable product; CAS 7732-18-5; pedigree (1,1,1,1,1)
  Weighted average of reported surplus energy
  production volume 1.01383e9 kg; = BP_amount6*RP_PV
    calculated with production volume of reference product
  property price 0.015 EUR2005; name BP_amount6_price_EUR2005
    Data related to the price of steam were provided by Yara International (https://www.yara.com/)
  property carbon content 0
    carbon content on a dry matter basis (reserved; not for manual entry)
  property true value 0.00241388; name BP_amount6_true_value
    allocation property applied in "true value" allocation // value calculated from revenue
  properties: wet mass 1 kg, water in wet mass 0 kg, water content 0, carbon content, fossil 0, dry mass 1 kg, carbon content, non-fossil 0, carbon allocation 0 kg

## Inputs from technosphere
- chemical, inorganic: 0.000319646 kg; lognormal variance with pedigree 0.0093, pedigree (2,2,4,1,1)
  Sum input parameter covering partly confidential information on additives, solvents, catalysts. Weighted average of reported input materials.
  properties: carbon content, fossil 0.003, dry mass 1 kg, wet mass 1 kg
  note on carbon content, fossil: This dataset is an unweighted average of 20 inorganic substances (listed in Tab 88.1, ecoinvent v2.2 report 8, part II), being part of the top100 chemicals included in this database. The C-content has also been calculated as an unweighted average of the C content of the substances composing this dataset.
- chemical, organic: 0.0182261 kg; lognormal variance with pedigree 0.0093, pedigree (2,2,4,1,1)
  (same comment as for chemical, inorganic)
  properties: dry mass 1 kg, heating value, net 19.03 MJ, wet mass 1 kg, carbon content, fossil 0.628
  note on carbon content, fossil: This dataset is an unweighted average of 20 organic substances (listed in Tab 88.1, ecoinvent v2.2 report 8, part II), being part of the top100 chemicals included in this database. The C-content has also been calculated as an unweighted average of the C content of the substances composing this dataset.
- electricity, medium voltage: 0.951613 kWh; lognormal variance with pedigree 0.0093, pedigree (2,2,4,1,1)
  Weighted average of reported input
- wastewater, average: 0 m3; name BP_amount3; pedigree (1,1,1,1,1)
  Weighted average of reported waste
  production volume 0 m3
    calculated with production volume of reference product
  property price 0 EUR2005; name BP_amount3_price_EUR2005
  properties: dry mass 0.346837 kg, wet mass 1000 kg, carbon content, non-fossil 0.194039, water content 2882.2
  note on carbon content, non-fossil: 0.0673 kg TOC/m3 (Tab A.17, ecoinvent v2.2 report 13_I). TOC was considered as Total Carbon.
- solvent, organic: 0.00285155 kg; lognormal variance with pedigree 0.0093, pedigree (2,2,4,1,1)
  Weighted average of reported input
  properties: wet mass 1 kg, carbon content, fossil 0.63072, dry mass 1 kg, heating value, net 19.11 MJ
- nitrogen, liquid: 0.0154055 kg; lognormal variance with pedigree 0.0093, pedigree (2,2,4,1,1)
  Weighted average of reported input
  properties: wet mass 1 kg, dry mass 1 kg
- propylene: 0.00318504 kg; lognormal variance with pedigree 0.0093, pedigree (2,2,4,1,1)
  Weighted average of reported input
  properties: wet mass 1 kg, dry mass 1 kg, heating value, net 43.22 MJ, carbon content, fossil 0.857143
- hazardous waste, for incineration: 0 kg; name BP_amount2; pedigree (1,1,1,1,1)
  Weighted average of reported waste
  production volume 0 kg
    calculated with production volume of reference product
  property price 0 EUR2005; name BP_amount2_price_EUR2005
  properties: water content 0.333333, wet mass 1 kg, dry mass 0.75 kg, carbon content, fossil 0.554667, heating value, net 17 MJ
  note on carbon content, fossil: Tab A.6, ecoinvent v2.2 report 13_I. C content has been calculated after data in the tables, and then referred to 1 kg DM
  note on heating value, net: Value taken from the general comment of the treatment dataset.
- wastewater, unpolluted: -0.030621 m3; name BP_amount5; lognormal variance with pedigree 0.0107, pedigree (3,2,4,1,1)
  Weighted average of reported waste
  production volume 1.93273e8 m3; = BP_amount5*RP_PV
    calculated with production volume of reference product
  property price 0 EUR2005; name BP_amount5_price_EUR2005
  properties: water content 2962.17, carbon content, non-fossil 0.00178991, dry mass 0.337476 kg, wet mass 1000 kg, carbon content, fossil 0.00178991
  note on carbon content, fossil: Assumed to be like in tap water. Bicarbonate content is 2.93 mol/m3. CO2 content is 0.1 mol/m3 (ecoinvent v2.2 report 8, Tab 93.1).
- ethylene: 0.996454 kg; lognormal variance with pedigree 0.0093, pedigree (2,2,4,1,1)
  Weighted average of reported input
  properties: wet mass 1 kg, dry mass 1 kg, carbon content, fossil 0.857143, heating value, net 43.22 MJ
- chemical factory, organics: 3.99253e-10 unit; lognormal variance with pedigree 0.311225, pedigree (2,3,3,2,3)
  Calculated based on literature data published by the industry. For this activity, no information was readily available concerning infrastructure and land-use. Therefore, the infrastructure is estimated based on data from two chemical factories, the BASF site of Ludwigshafen and the chemical factory in Gendorf (which are both located in Germany), which produce a wide range of chemical substances. Based on this data, the following assumptions are made: the built area amounts to about 4.2 ha, the plant has an average output of 50"000 t/a and a lifespan of fifty years. The estimated infrastructure amount is therefore 4.00 E-10 units per kg of produced chemical.
  References:
  Althaus H.-J., Chudacoff M., Hischier R., Jungbluth N., Osses M. and Primas A. (2007) Life Cycle Inventories of Chemicals. ecoinvent report No. 8, v2.0. EMPA Dübendorf, Swiss Centre for Life Cycle Inventories, Dübendorf, CH.
  Gendorf (2000) Umwelterklärung 2000, Werk Gendorf. Werk Gendorf, Burgkirchen.
- natural gas, high pressure: 0 m3; pedigree (1,1,1,1,1)
  Weighted average of reported input
  properties: dry mass 1 kg, heating value, net 39 MJ, wet mass 1 kg, carbon content, fossil 0.695187
  note on heating value, net: Literature value, Source: United Nations Statistics Division (2018) International Recommendations for Energy Statistics (IRES). Available at: http://unstats.un.org/unsd/statcom/doc11/BG-IRES.pdf.
- spent solvent mixture: 0 kg; name BP_amount1; pedigree (1,1,1,1,1)
  Weighted average of reported waste
  production volume 0 kg
    calculated with production volume of reference product
  property price 0 EUR2005; name BP_amount1_price_EUR2005
  properties: dry mass 0.835 kg, heating value, net 21.7 MJ, water content 0.197605, carbon content, fossil 0.571257, wet mass 1 kg
  note on carbon content, fossil: Tab A.7, ecoinvent v2.2 report 13_I. C content has been calculated after data in the tables, and then referred to 1 kg DM
- waste plastic, mixture: -0.00237305 kg; name BP_amount4; lognormal variance with pedigree 0.0107, pedigree (3,2,4,1,1)
  Weighted average of reported waste
  production volume 1.49782e7 kg; = BP_amount4*RP_PV
    calculated with production volume of reference product
  property price 0 EUR2005; name BP_amount4_price_EUR2005
  properties: water content 0.180638, wet mass 1 kg, carbon content, fossil 0.747344, dry mass 0.847 kg, heating value, net 30.79 MJ
- compressed air, 600 kPa gauge: 0.0286665 m3; lognormal variance with pedigree 0.0093, pedigree (2,2,4,1,1)
  Weighted average of reported input
- hydrogen, liquid: 1.65949e-7 kg; lognormal variance with pedigree 0.0093, pedigree (2,2,4,1,1)
  Weighted average of reported input
  properties: dry mass 1 kg, wet mass 1 kg, heating value, net 120.21 MJ
- wastewater, average: -0.00172789, -0.000186925 m3 (2 entries); lognormal variance with pedigree 0.0492, pedigree (2,3,4,1,1)
  Weighted average of reported waste
  production volume 1.20859e7 m3
- hazardous waste, for incineration: -0.00173155, -4.52618e-5 kg (2 entries); lognormal variance with pedigree 0.0107, pedigree (3,2,4,1,1)
  Weighted average of reported waste
  production volume 1.12149e7 kg
- natural gas, high pressure: 0.00572587, 3.69695e-5 m3 (2 entries); lognormal variance with pedigree 0.0093, pedigree (2,2,4,1,1)
  Weighted average of reported input
- spent solvent mixture: -0.00125008, -2.92875e-5 kg (2 entries); lognormal variance with pedigree 0.0107, pedigree (3,2,4,1,1)
  Weighted average of reported waste
  production volume 8.0751e6 kg

## Inputs from nature
- Water, cooling, unspecified natural origin [natural resource, in water]: 0.0412614 m3; lognormal variance with pedigree 0.0093, pedigree (2,2,4,1,1)
  Weighted average of reported input
- Water, unspecified natural origin [natural resource, in water]: 0.00158078 m3; lognormal variance with pedigree 0.0093, pedigree (2,2,4,1,1)
  Weighted average of reported input

## Emissions to nature
- Chloride [water, unspecified]: 0.000128678 kg; lognormal variance with pedigree 0.0492, pedigree (2,3,4,1,1)
  Weighted average of reported emissions
- Particulates, > 10 um [air, unspecified]: 3.28644e-6 kg; lognormal variance with pedigree 0.0492, pedigree (2,3,4,1,1)
  Weighted average of reported emissions
- Hydrogen [air, unspecified]: 3.42102e-6 kg; lognormal variance with pedigree 0.0492, pedigree (2,3,4,1,1)
  Weighted average of reported emissions
- AOX, Adsorbable Organic Halogen as Cl [water, unspecified]: 1.49939e-7 kg; lognormal variance with pedigree 0.0487, pedigree (2,2,4,1,1)
  Weighted average of reported emissions
- Cadmium, ion [water, unspecified]: 1.29863e-10 kg; lognormal variance with pedigree 0.6592, pedigree (2,3,4,1,1)
  Weighted average of reported emissions
- Sulfate [water, unspecified]: 0.0003121 kg; lognormal variance with pedigree 0.0492, pedigree (2,3,4,1,1)
  Weighted average of reported emissions
- Fluoride [water, unspecified]: 2.87537e-7 kg; lognormal variance with pedigree 0.0492, pedigree (2,3,4,1,1)
  Weighted average of reported emissions
- Propene [air, unspecified]: 1.95575e-5 kg; lognormal variance with pedigree 0.1292, pedigree (2,3,4,1,1)
  Weighted average of reported emissions
- NMVOC, non-methane volatile organic compounds, unspecified origin [air, unspecified]: 0.00102793 kg; lognormal variance with pedigree 0.0487, pedigree (2,2,4,1,1)
  Weighted average of reported emissions
- Phosphorus [water, unspecified]: 2.14625e-6 kg; lognormal variance with pedigree 0.0492, pedigree (2,3,4,1,1)
  Weighted average of reported emissions
- Ethene [air, unspecified]: 0.000929289 kg; lognormal variance with pedigree 0.1292, pedigree (2,3,4,1,1)
  Weighted average of reported emissions
- Arsenic, ion [water, unspecified]: 1.29256e-9 kg; lognormal variance with pedigree 0.6592, pedigree (2,3,4,1,1)
  Weighted average of reported emissions
- Sulfur hexafluoride [air, unspecified]: 9.81747e-10 kg; lognormal variance with pedigree 0.0492, pedigree (2,3,4,1,1)
  Weighted average of reported emissions
- Ammonium, ion [water, unspecified]: 1.21078e-6 kg; lognormal variance with pedigree 0.0492, pedigree (2,3,4,1,1)
  Weighted average of reported emissions
- Carbon dioxide, fossil [air, unspecified]: 0.0201831 kg; lognormal variance with pedigree 0.0093, pedigree (2,2,4,1,1)
  Weighted average of reported emissions
- Chromium, ion [water, unspecified]: 1.88538e-8 kg; lognormal variance with pedigree 0.6592, pedigree (2,3,4,1,1)
  Weighted average of reported emissions
- Lead [water, unspecified]: 1.29383e-9 kg; lognormal variance with pedigree 0.6592, pedigree (2,3,4,1,1)
  Weighted average of reported emissions
- Dinitrogen monoxide [air, unspecified]: 3.63653e-7 kg; lognormal variance with pedigree 0.0487, pedigree (2,2,4,1,1)
  Weighted average of reported emissions
- Mercury [water, unspecified]: 2.50496e-11 kg; lognormal variance with pedigree 0.6592, pedigree (2,3,4,1,1)
  Weighted average of reported emissions
- Sulfur dioxide [air, unspecified]: 6.53471e-7 kg; lognormal variance with pedigree 0.0098, pedigree (2,3,4,1,1)
  Weighted average of reported emissions
- Suspended solids, unspecified [water, unspecified]: 2.06661e-5 kg; lognormal variance with pedigree 0.0487, pedigree (2,2,4,1,1)
  Weighted average of reported emissions
- Nitrogen oxides [air, unspecified]: 2.44306e-5 kg; lognormal variance with pedigree 0.0487, pedigree (2,2,4,1,1)
  Weighted average of reported emissions
- Copper, ion [water, unspecified]: 1.39307e-8 kg; lognormal variance with pedigree 0.6592, pedigree (2,3,4,1,1)
  Weighted average of reported emissions
- Nitrogen, organic bound [water, unspecified]: 6.17556e-6 kg; lognormal variance with pedigree 0.0492, pedigree (2,3,4,1,1)
  Weighted average of reported emissions
- Nitrate [water, unspecified]: 4.92424e-7 kg; lognormal variance with pedigree 0.0492, pedigree (2,3,4,1,1)
  Weighted average of reported emissions
- Water [air, unspecified]: 0.0103064 m3; lognormal variance with pedigree 0.0167, pedigree (4,2,4,1,1)
  Calculated to close water balance
- Nickel, ion [water, unspecified]: 2.66759e-9 kg; lognormal variance with pedigree 0.6592, pedigree (2,3,4,1,1)
  Weighted average of reported emissions
- Carbon monoxide, fossil [air, unspecified]: 1.70701e-5 kg; lognormal variance with pedigree 0.6592, pedigree (2,3,4,1,1)
  Weighted average of reported emissions
- Zinc, ion [water, unspecified]: 4.01501e-7 kg; lognormal variance with pedigree 0.6592, pedigree (2,3,4,1,1)
  Weighted average of reported emissions
- Particulates, > 2.5 um, and < 10um [air, unspecified]: 9.27206e-8 kg; lognormal variance with pedigree 0.1292, pedigree (2,3,4,1,1)
  Weighted average of reported emissions
- Methane, fossil [air, unspecified]: 1.54005e-6 kg; lognormal variance with pedigree 0.0492, pedigree (2,3,4,1,1)
  Weighted average of reported emissions
- Zinc [air, unspecified]: 5.72686e-9 kg; lognormal variance with pedigree 0.6592, pedigree (2,3,4,1,1)
  Weighted average of reported emissions

## Sampling procedure
Questionnaires sent out to all production units in Europe operated by PlasticEurope member companies.

## Extrapolations
no extrapolation
