# natural gas, high pressure, import from NL

Dataset: EcoSpold 2, unit process
Geography: DK
Time period: 2012-01-01 to 2021-12-31
Technology level: current
Classification: ISIC rev.4 ecoinvent: 4930:Transport via pipeline
Scenario: Business-as-Usual
System model: Allocation, cut-off by classification
Share of production covered: 100 %
Generated by: Mireille Faist Emmenegger
Published in: Faist Emmenegger, Mireille 2015
Database: ecoinvent
isCopyrightProtected: true
accessRestrictedTo: 1

## General comment
This dataset describes the transport needed for the export of Dutch natural gas to Denmark (expressed in tkm). It takes into account the parts of on- (71.6%) and offshore (28.4%) production. Gas losses and emissions during seasonal storage are included. An average distance of 400 km is estimated for the export.
Characteristics are based on the ecoinvent report v2 'Erdgas' from 2007: HV; 38.41 MJ/m-3; density, 0.82 kg/m-3, 0.67 kg CH4/m-3, 0.008 kg CO2/m-3

## Included activities start
Export natural gas field

## Included activities end
Distribution market of country

## Geography
The average weighted export distance is based on the trade movements 2012.

## Technology
The distance to the different countries is based on rough estimates.

## Reference product
- natural gas, high pressure: 1 m3; source BP 2014; CPC 12020: Natural gas, liquefied or in the gaseous state; By-product classification allocatable product; CAS 14493-06-2
  production volume 9.54e6 m3
    m3 imported from NL to DK. Total amount of natural gas imports to Denmark according to Central Intelligence Agency (n.d.), The World Factbook, split on countries of origin according to supply mix shares as reported by Schori et al. (2012). Reference(s): Central Intelligence Agency (n.d.) The World Factbook. FIELD LISTING : NATURAL GAS - IMPORTS. Retrieved online from https://www.cia.gov/library/publications/resources/the-world-factbook/fields/2252.html#da, August 31, 2017. Schori S., Frischknecht R., 2012, Life Cycle Inventory of Natural Gas Supply. ESU-services Ltd., Zürich, CH, commissioned by the Swiss Federal Office of Energy SFOE.
  properties: heating value, net 39 MJ, price 0.166 EUR2005, dry mass 0.84 kg, water in wet mass 0 kg, heating value, gross 0 MJ, carbon content, non-fossil 0, carbon content, fossil 0.602381, water content 0, wet mass 0.84 kg, carbon content 0.602381, carbon allocation 0.506 kg

## Inputs from technosphere
- natural gas, high pressure: 0, 0 m3 (2 entries); source Faist Emmenegger, M. 2007; pedigree (1,1,1,1,1)
  incl. storage losses
  Uncertainty: a
  properties: heating value, net 39 MJ, carbon content, fossil 0.602381, wet mass 0.84 kg, dry mass 0.84 kg
  note on heating value, net: Literature value, Source: United Nations Statistics Division (2018) International Recommendations for Energy Statistics (IRES). Available at: http://unstats.un.org/unsd/statcom/doc11/BG-IRES.pdf.
  note on carbon content, fossil: An average C content of 0.506 kg C/ m3 has been assumed (this average has been calculated using data in Tab 3.5, ecoinvent v2.2 report 6_V
- natural gas, burned in gas motor, for storage: 0.0524 MJ; source Faist Emmenegger, M. 2007; lognormal variance with pedigree 0.0341, pedigree (4,1,4,3,3)
  Data from german industrial expert for 2001, standard technology
  Uncertainty: D
  properties: heating value, net 1 MJ
- transport, pipeline, long distance, natural gas: 0.316 metric ton*km; = 400*0.79/1000; lognormal variance with pedigree 0.1286, pedigree (2,1,4,1,1)
  Average distance is estimated based on pipeline length and multiplied by the density of natural gas.
  Uncertainty: A
- natural gas, high pressure: 0.284028, 0.716072 m3 (2 entries); source Faist Emmenegger, M. 2007; lognormal variance with pedigree 0.0261, pedigree (4,1,4,3,1)
  incl. storage losses
  Uncertainty: a

## Emissions to nature
All rows: source Faist Emmenegger, M. 2007
- Carbon dioxide, fossil [air, non-urban air or from high stacks]: 8e-7 kg; lognormal variance with pedigree 0.0086, pedigree (2,1,4,1,1)
  calculated based on average losses for storage (0.01%) and dutch gas composition
  Uncertainty: c
- Propane [air, non-urban air or from high stacks]: 3e-7 kg; lognormal variance with pedigree 0.1286, pedigree (2,1,4,1,1)
  (same comment as for Carbon dioxide, fossil)
- Methane, fossil [air, non-urban air or from high stacks]: 6.71e-5 kg; lognormal variance with pedigree 0.1286, pedigree (2,1,4,1,1)
  (same comment as for Carbon dioxide, fossil)
- Butane [air, non-urban air or from high stacks]: 1e-7 kg; lognormal variance with pedigree 0.1286, pedigree (2,1,4,1,1)
  (same comment as for Carbon dioxide, fossil)
- Ethane [air, non-urban air or from high stacks]: 2.3e-6 kg; lognormal variance with pedigree 0.1286, pedigree (2,1,4,1,1)
  (same comment as for Carbon dioxide, fossil)
- Mercury [air, non-urban air or from high stacks]: 1e-12 kg; lognormal variance with pedigree 0.0486, pedigree (2,1,4,1,1)
  (same comment as for Carbon dioxide, fossil)

## Sampling procedure
statistics

## Extrapolations
This dataset has been extrapolated from year 2012 to the year of the calculation (2021). The uncertainty has been adjusted accordingly.
