# oil power plant construction, 500MW

Dataset: EcoSpold 2, unit process
Geography: RER
Time period: 1983-01-01 to 2021-12-31
Technology level: current
Classification: ISIC rev.4 ecoinvent: 4220:Construction of utility projects
Classification: EcoSpold01Categories: oil/power plants
Tags: ConvertedDataset
Scenario: Business-as-Usual
System model: Allocation, cut-off by classification
Generated by: Niels Jungbluth
Published in: Jungbluth, N. 2007
Database: ecoinvent
isCopyrightProtected: true
accessRestrictedTo: 1

## General comment
Infrastructure with a life time of 30 years, 65% employment and 38% efficiency.
[This dataset was already contained in the ecoinvent database version 2. It was not individually updated during the transfer to ecoinvent version 3. Life Cycle Impact Assessment results may still have changed, as they are affected by changes in the supply chain, i.e. in other datasets. This dataset was generated following the ecoinvent quality guidelines for version 2. It may have been subject to central changes described in the ecoinvent version 3 change report (http://www.ecoinvent.org/database/ecoinvent-version-3/reports-of-changes/), and the results of the central updates were reviewed extensively. The changes added e.g. consistent water flows and other information throughout the database. The documentation of this dataset can be found in the ecoinvent reports of version 2, which are still available via the ecoinvent website. The change report linked above covers all central changes that were made during the conversion process.]

## Included activities end
Infrastructure of a power plant with 500MW including materials, energy use for construction, disposal and land use.

## Geography
Estimation for Europe.

## Technology
Material split derived from a 800Mw plant in the US with electrostatic particle filter, desulphurisation unit, effluent treatment, sludge dewatering and waste management.

## Time period
Data based on old literature data. Material use might be underestimated due to new flue gas treatment facilities.

## Reference product
- oil power plant, 500MW: 1 unit; CPC 53262: Power plants; By-product classification allocatable product
  EcoSpold01Location=RER
  production volume 1.32237 unit
    This is a placeholder value that does not reflect real-world production volumes. This dataset does not currently require a real-world production volume to work in the database framework, and no actual data were collected yet. This has no negative effect on the results of the ecoinvent database. The placeholder value of this activity was scaled according to the nominal GDP of 2005 (source: United Nations, http://data.un.org/Glossary.aspx?q=GDP+%28current+US%24%29, accessed 20130726) to reflect an appropriate share of the global production volume, which is also a placeholder value.
  property price 1.42046e9 EUR2005
    EU27 I/O database(in the 'EU & DK Input Output Database' (available in SimaPro)); -79 Building, non-residential EU 27 (calculated to be 38.169 EUR2003/kg). Based on consumption of (_53 Iron basic, virgin, EU27;7.25517782294095E-3 kg/EUR building; 0.45 EUR2003 per kg DS), (_61 Iron, after first processing, EU27;5.8766830719783E-3kg/EUR building; 0.62 EUR2003 per kg DS), (_65 Fabricated metal products, except machinery, EU27; 8.9167022775554E-3 kg/EUR building; 3.63 EUR2003 per kg DS) and (_66 Machinery and equipment n.e.c., EU27;4.15071881936446E-3 kg/EUR building; 5.71 EUR2003 per kg DS) - 37500000 kg

## Inputs from technosphere
- electricity, medium voltage: 5.62e6 kWh; lognormal variance with pedigree 0.0526, pedigree (3,3,5,1,1)
  Estimation
  EcoSpold01Location=UCTE
  Uncertainty: Estimation
- reinforcing steel: 3.3e7 kg; lognormal variance with pedigree 0.0526, pedigree (3,3,5,1,1)
  EcoSpold01Location=RER
  Literature
  Uncertainty: Literature
  properties: carbon content, fossil 0.004, dry mass 1 kg, wet mass 1 kg
- steel, chromium steel 18/8, hot rolled: 750000 kg; lognormal variance with pedigree 0.0526, pedigree (3,3,5,1,1)
  EcoSpold01Location=RER
  Literature
  Uncertainty: Literature
  properties: carbon content, fossil 0.0008, wet mass 1 kg, dry mass 1 kg
  note on carbon content, fossil: Stainless steel model is the grade 304 steel (18/8 stainless, 18% chromium 8% nickel; max. 0.08% C)
- waste polyethylene/polypropylene product: 0 kg; pedigree (1,1,1,1,1)
  Estimation
  EcoSpold01Location=CH
  Uncertainty: Estimation
  production volume 0 kg
    Calculated from the production volume of oil power plant, 500MW in proportion to the respective output amounts.
  properties: carbon content, fossil 0.748045, water content 0.180638, wet mass 1 kg, dry mass 0.847 kg, heating value, net 42.47 MJ
  note on carbon content, fossil: Mixed various plastics was used to estimate the C content of this waste (Tab A.2, ecoinvent v2.2 report 13_I)
- waste mineral wool: 0 kg; pedigree (1,1,1,1,1)
  Estimation
  EcoSpold01Location=CH
  Uncertainty: Estimation
  production volume 0 kg
    (same comment as for waste polyethylene/polypropylene product)
  properties: dry mass 1 kg, wet mass 1 kg
- waste mineral oil: 0 kg; pedigree (1,1,1,1,1)
  EcoSpold01Location=CH
  Estimation
  Uncertainty: Estimation
  production volume 0 kg
    (same comment as for waste polyethylene/polypropylene product)
  properties: dry mass 0.9 kg, wet mass 1 kg, heating value, net 34.7 MJ, carbon content, fossil 0.864444, water content 0.111111
  note on heating value, net: Value taken from the general comment of the treatment dataset.
  note on carbon content, fossil: Tab A.6, ecoinvent v2.2 report 13_I. C content has been calculated after data in the tables, and then referred to 1 kg DM
- lubricating oil: 60000 kg; lognormal variance with pedigree 0.1726, pedigree (3,3,5,1,1)
  EcoSpold01Location=RER
  Literature
  Uncertainty: Literature
  properties: carbon content, fossil 0.75, dry mass 1 kg, wet mass 1 kg, heating value, net 40.2 MJ
  note on carbon content, fossil: Lubricating oil is produced from diesel. C-content/dry mass of fats and oils considered 75%, from: ecoinvent v2.2 report, n 15a, pg 40
  note on heating value, net: Literature value, Source: IPCC 2006, 2006 IPCC Guidelines for National Greenhouse Gas Inventories, Prepared by the National Greenhouse Gas Inventories Programme, Eggleston H.S., Buendia L., Miwa K., Ngara T. and Tanabe K. (eds). Published: IGES, Japan
- waste cement in concrete and mortar: 0 kg; pedigree (1,1,1,1,1)
  EcoSpold01Location=CH
  Estimation
  Uncertainty: Estimation
  production volume 0 kg
    (same comment as for waste polyethylene/polypropylene product)
  properties: wet mass 1 kg, dry mass 0.995 kg, water content 0.00502513
- cast iron: 450000 kg; lognormal variance with pedigree 0.0526, pedigree (3,3,5,1,1)
  EcoSpold01Location=RER
  Literature
  Uncertainty: Literature
  properties: carbon content, fossil 0.04, dry mass 1 kg, wet mass 1 kg
  note on carbon content, fossil: Cast iron is made by remelting pig iron in small furnaces (e.g. cupola furnaces or electric arc furnaces) and poured into moulds to make castings. It usually contains 2% to 6% carbon (ecoinvent v2.2 report 10_partII). An average content of 4% was considered
- copper, cathode: 750000 kg; lognormal variance with pedigree 0.0526, pedigree (3,3,5,1,1)
  EcoSpold01Location=RER
  Literature
  Uncertainty: Literature
  properties: wet mass 1 kg, dry mass 1 kg
- heat, district or industrial, other than natural gas: 2.565e8 MJ; lognormal variance with pedigree 0.0526, pedigree (3,3,5,1,1)
  EcoSpold01Location=RER
  Estimation
  Uncertainty: Estimation
  properties: heating value, net 1 MJ
- stone wool, packed: 300000 kg; lognormal variance with pedigree 0.0526, pedigree (3,3,5,1,1)
  Literature
  EcoSpold01Location=CH
  Uncertainty: Literature
  properties: carbon content, fossil 0.015401, dry mass 1 kg, wet mass 1 kg
  note on carbon content, fossil: The chemical composition of the glass fibres used in the rock wool production is similar to the composition of naturally cooled volcano basalt and has a composition listed in Tab. 3.1 and 3.2 in ecoinvent v2.2 report 16, part XIV. Rock wool contains: a minimum of 96% mineral fibres,between 0.5 and 3.0 weight percent of phenolic resin depending on the specific product characteristics, and about 0.2 percent mineral oil (ecoinvent v2.2 report 16, part XIV). An average composition of 1.8% phenolic resin, 0.2% mineral oil, and 98% mineral fibres has been assumed and used to calculate C content of the rock wool
- diesel, burned in building machine: 2.7e8 MJ; lognormal variance with pedigree 0.0526, pedigree (3,3,5,1,1)
  EcoSpold01Location=GLO
  Estimation
  Uncertainty: Estimation
  properties: heating value, net 1 MJ
- aluminium, cast alloy: 96000 kg; lognormal variance with pedigree 0.0526, pedigree (3,3,5,1,1)
  Literature
  EcoSpold01Location=RER
  Uncertainty: Literature
  properties: wet mass 1 kg, dry mass 1 kg
- concrete, normal: 50800 m3; lognormal variance with pedigree 0.0526, pedigree (3,3,5,1,1)
  EcoSpold01Location=CH
  Literature
  Uncertainty: Literature
  properties: water content 0.086758, wet mass 2380 kg, dry mass 2190 kg
- steel, low-alloyed, hot rolled: 2.25e6 kg; lognormal variance with pedigree 0.0526, pedigree (3,3,5,1,1)
  Literature
  EcoSpold01Location=RER
  Uncertainty: Literature
  properties: wet mass 1 kg, dry mass 1 kg, carbon content, fossil 0.005
  note on carbon content, fossil: Low alloyed steel composition given in Tab. 3.2 ecoinvent v2.2 report 10_partII. Steel assumed to have a C content of 0.5%
- aluminium, wrought alloy: 204000 kg; lognormal variance with pedigree 0.0526, pedigree (3,3,5,1,1)
  Literature
  EcoSpold01Location=RER
  Uncertainty: Literature
  properties: wet mass 1 kg, dry mass 1 kg
- polyethylene, high density, granulate: 300000 kg; lognormal variance with pedigree 0.0526, pedigree (3,3,5,1,1)
  EcoSpold01Location=RER
  Literature
  Uncertainty: Literature
  properties: heating value, net 42.47 MJ, dry mass 1 kg, wet mass 1 kg, carbon content, fossil 0.857143
  note on carbon content, fossil: Polyethylene is formed out of a huge amount of ethylene monomers (C2H4) (ecoinvent v2.2 report 11_II). MW=28 g/mol
- waste polyethylene/polypropylene product: -291260, -8739.96 kg (2 entries); lognormal variance with pedigree 0.0426, pedigree (3,3,5,1,1)
  Estimation
  EcoSpold01Location=CH
  Uncertainty: Estimation
  production volume 300000 kg
- waste mineral wool: -296615, -3384.6 kg (2 entries); lognormal variance with pedigree 0.0426, pedigree (3,3,5,1,1)
  Estimation
  EcoSpold01Location=CH
  Uncertainty: Estimation
  production volume 300000 kg
- waste mineral oil: -58550.5, -1449.48 kg (2 entries); lognormal variance with pedigree 0.0426, pedigree (3,3,5,1,1)
  EcoSpold01Location=CH
  Estimation
  Uncertainty: Estimation
  production volume 60000 kg
- waste cement in concrete and mortar: -1.08737e8, -3.26292e6 kg (2 entries); lognormal variance with pedigree 0.0426, pedigree (3,3,5,1,1)
  EcoSpold01Location=CH
  Estimation
  Uncertainty: Estimation
  production volume 1.12e8 kg

## Inputs from nature
- Transformation, to industrial area [natural resource, land]: 125000 m2; lognormal variance with pedigree 0.6926, pedigree (3,3,5,1,1)
  Literature, basic uncertainty estimated = 5
  Uncertainty: Literature, basic uncertainty estimated = 5
- Transformation, from unspecified [natural resource, land]: 125000 m2; lognormal variance with pedigree 0.6926, pedigree (3,3,5,1,1)
  (same comment as for Transformation, to industrial area)
- Occupation, industrial area [natural resource, land]: 3.75e6 m2*year; lognormal variance with pedigree 0.6926, pedigree (3,3,5,1,1)
  (same comment as for Transformation, to industrial area)

## Sampling procedure
Literature.

## Extrapolations
This dataset has been extrapolated from year 1989 to the year of the calculation (2021). The uncertainty has been adjusted accordingly.

## Review by Michael Spielmann (obsolete) 2003-07-11
Passed.
