# wood preservation, vacuum pressure method, organic salt, Cr-free, outdoor use, ground contact

Dataset: EcoSpold 2, unit process
Geography: RER
Time period: 2012-01-01 to 2021-12-31
Technology level: current
Classification: ISIC rev.4 ecoinvent: 1610:Sawmilling and planing of wood
Synonyms: full-cell process; saturation impregnation
Tags: Swiss brush-up completed
Scenario: Business-as-Usual
System model: Allocation, cut-off by classification
Generated by: Frank Werner
Published in: Künniger T. 2000
Database: ecoinvent
isCopyrightProtected: true
accessRestrictedTo: 1

## General comment
This dataset covers the treatment of dried timber with organic salt (Cu-HDO) with the oscillating pressure method.
Wood is not included in the dataset.
Pressure processes have been used for more than 150 years for impregnating wood with preservatives. The choice of the pressure process depends on the intended use, the nature and quality of the preservative, and the moisture level of the wood at the time of treatment.
In the vacuum pressure process (also called full-cell process or saturation impregnation), air present in the dried wood is removed with a high initial vaccum, then the impregnaton dylinder is filled with the preservative solution while the vaccum is maintained. Finally, after air is admitted to teh dyclinder, an impregnation pressure is produced and maintained for a defined period, depending on the ease of impregnation of the wood. Generally pressures >0.9 MPa are applied. The pressure is maintanined until virtually no more liquid is absorbed by the wood. In some plants, this is controlled automatically via an end-phase counter, which determines the quantity of preservative thatt can still be absorbed by the wood. Application of a short final vacuum should decrease the extend of dripping of the impregnationg solution from the wood after it is removed from the cyclinder. This process was introduced by Bréant in 1831 for impregnation with salts, and by Bethell in 1838 for impregnation with tar oils.
The following figure illustrates the prinicple of the vacuum pressure method.

## Included activities start
Service starting with the reception of the wood preservative at the factory gate

## Included activities end
The data set contains the treatment service of dried wood with wood preservative based on organic copper salts (Cu-HDO) with the vacuum pressure method. It covers the necessary inputs of the wood preservative, electricity, ingredients for waste water/surface water treatment as well as some infrastructure. For the inventorying of emissions into surface water and air, see general comment.The dataset does not include wood. Also eventual waste streams (e.g. saw dust recollected from the pressure vessel) are not included.

## Parameters
- share of collected rainwater: 0.5 dimensionless; name share_collected_rainwater

## Reference product
- wood preservation, vacuum pressure method, organic salts, Cr-free, outdoor use, ground contact: 1 kg; CPC 54730: Painting services; By-product classification allocatable product
  production volume 2.53872e6 kg; name p_preservation; = 2100 * 1000/3429519*16584000 * 0.5* 0.5
    estimated from annual production of salt-based preservatives for pressure treatment in DE: 2000-2200 t (OECD 2000), extrapolated to RER via GDP, assuming 50% Cr-free preservatives and 50% oscillating pressure method/50% vacuum pressure.
  property price 1.7392 EUR2005
    Calculated based on inputs: The price of the product has been calculated as a sum of the values of the material and energy inputs for this product. This value is therefore a rough estimation. It may underestimate the real price since there are additional expenses when producing any product. These expences can include for example labour costs, treatment of waste materials and profit for the producer. Please consider carefully whether this level of data quality is acceptable for your application.

## Inputs from technosphere
- sulfuric acid: 0.025 kg; = share_collected_rainwater*0.5/10; source Leuenberger H. 2012; lognormal variance with pedigree 0.0343, pedigree (2,3,4,3,1)
  used for treatment of wastewater, mainly from recollection of rainwater from storage area; consumption largely depending on annual rainfall, less on production volume. Normalized to 1 kg preservative, assume an average input of 10 kg/m3.
  properties: wet mass 1 kg, dry mass 1 kg, UVEK_relative_amount_1 1, UVEK_link_1 4259
  note on UVEK_relative_amount_1: to be used only in special submissions in coordination with ecoinvent and the Swiss FOEN
- electricity, medium voltage: 0.416667 kWh; = 15/3.6/10; source Künniger T. 2000; lognormal variance with pedigree 0.037, pedigree (1,4,4,5,1)
  Conversion from MJ to kWh; value confirmed personal communication by Mr. H. Leuenberger, Holzmprägnierwerk Waldkirch. Normalized to 1 kg preservative, assume an average input of 10 kg/m3. 15 MJ/m3 are representative for spruce, fir and douglas fir; 10.3 MJ/m3 can be assumed for pine.
  properties: UVEK_relative_amount_1 1, UVEK_link_1 1779
- wood preservation facility, vacuum pressure method: 2.77778e-7 unit; = 1/6000/75/8; source Leuenberger H. 2012; lognormal variance with pedigree 0.568, pedigree (3,5,4,1,1)
  per 6000 m3/year over 75 years with an average input of 8 kg of preservative/m3
- wood preservative, organic salt, Cr-free: 1 kg; source Künniger T. 2000
  properties: UVEK_relative_amount_8 0.1, dry mass 1 kg, UVEK_link_9 4433, heating value, net 19.11 MJ, carbon content, fossil 0.63072, wet mass 1 kg, UVEK_link_8 4417
  note on UVEK_relative_amount_8: No scaling needed as transport is modelled in market dataset that has been part of the brush-up
  note on UVEK_link_9: This link has been introduced to model transport specifically for the SAM model; to be used only in special submissions in coordination with ecoinvent and the Swiss FOEN.
- sodium hydroxide, without water, in 50% solution state: 0.010656 kg; = share_collected_rainwater*0.333/0.5*0.32/10; source Leuenberger H. 2012; lognormal variance with pedigree 0.0343, pedigree (2,3,4,3,1)
  Used for treatment of wastewater, mainly from recollection of rainwater from storage area; consumption largely depending on annual rainfall, less on production volume; adaption to 32% concentration. Normalized to 1 kg preservative, assume an average input of 10 kg/m3.
  properties: wet mass 1 kg, heating value, net 3.03 MJ, UVEK_link_1 4137, UVEK_relative_amount_1 1, dry mass 1 kg
- tap water: 25 kg; name m_tapwater; = 250/10; source Leuenberger H. 2012; lognormal variance with pedigree 0.0343, pedigree (2,3,4,3,1)
  Used as process water. Normalized to 1 kg preservative, assume an average input of 10 kg/m3.
  property water content 2962.17; name water_content
  property wet mass 1 kg; name WM
  property water in wet mass 0.999663 kg; name WWM
  property carbon content, fossil 0.00178991; name C_content_fossil
  property carbon content, non-fossil 0; name C_content_non_fossil
  property dry mass 0.000337476 kg; name DM
  properties: UVEK_relative_amount_1 1, UVEK_link_1 4285

## Emissions to nature
- Carbonate [water, unspecified]: 0.000745323 kg; = (1-share_collected_rainwater)*(0.0125/(2*39+12+3*16)*(12+3*16)*0.03+0.163/(63.5+12+3*16+63.5+2*(16+1))*(12+3*16)*0.03); source OECD 2000; lognormal variance with pedigree 0.2501, pedigree (3,5,5,3,1)
  scenario according to (OECD 2000, p. 46ff); molar relations of K and CO3 in K2CO3 and Cu and CO3 in CuCO3 x Cu(OH)3
- Potassium, ion [water, unspecified]: 0.000105978 kg; = (1-share_collected_rainwater)*0.0125/(2*39+12+3*16)*(2*39)*0.03; source OECD 2000; lognormal variance with pedigree 0.2501, pedigree (3,5,5,3,1)
  scenario according to (OECD 2000, p. 46 ff); molar relations of K and CO3 in K2CO3.
- Water [air, unspecified]: 0.025405 m3; = (m_tapwater+0.405)/1000; lognormal variance with pedigree 0.208, pedigree (1,1,4,1,1)
  tap water plus water in preservative
- Borate [water, unspecified]: 0.000955847 kg; = (1-share_collected_rainwater)*0.05/61.83*(10.8+4*(16+1))*0.03; source OECD 2000; lognormal variance with pedigree 0.8501, pedigree (3,5,5,3,1)
  as tetrahydroxy borate (B(OH4)) ions from boric acid
- Carboxylic acids, unspecified [water, unspecified]: 0.00084 kg; = (1-share_collected_rainwater)*(0.05*0.03+0.006*0.03); source OECD 2000; lognormal variance with pedigree 0.6001, pedigree (3,5,5,3,1)
  scenario according to (OECD 2000, p. 46ff)
- Cu-HDO [water, unspecified]: 1.75e-6 kg; = (1-share_collected_rainwater)*0.035*0.0001; source OECD 2000; lognormal variance with pedigree 0.8501, pedigree (3,5,5,3,1)
  scenario according to (OECD 2000, p. 46ff)
- Copper, ion [water, unspecified]: 0.00140505 kg; = (1-share_collected_rainwater)*0.163/(63.5+12+3*16+63.5+2*(16+1))*(2*63.5)*0.03; source OECD 2000; lognormal variance with pedigree 0.8501, pedigree (3,5,5,3,1)
  (same comment as for Carbonate)
- Monoethanolamine [water, unspecified]: 0.0063 kg; = (1-share_collected_rainwater)*0.42*0.03; source OECD 2000; lognormal variance with pedigree 0.6001, pedigree (3,5,5,3,1)
  scenario according to (OECD 2000, p. 46ff)

## Sampling procedure
Plant measurements for input of energy, water, etc. Estimates based on literature for air-borne emissions and emissions into water.

## Extrapolations
This dataset has been extrapolated from year 2012 to the year of the calculation (2021). The uncertainty has been adjusted accordingly.
