# medium density fibreboard production, uncoated

Dataset: EcoSpold 2, unit process
Geography: RoW
Time period: 2012-01-01 to 2021-12-31
Technology level: current
Classification: ISIC rev.4 ecoinvent: 1621:Manufacture of veneer sheets and wood-based panels
Classification: EcoSpold01Categories: wooden materials/processing
Synonyms: MDF
Scenario: Business-as-Usual
System model: Allocation, cut-off by classification
Generated by: Frank Werner
Database: ecoinvent
isCopyrightProtected: true
accessRestrictedTo: 1

## General comment
This dataset represents medium density fibreboard (MDF) production as the weighted average of medium density board produced by the members of the European Panel Federation (EPF)
Medium density fibreboard (MDF) is an engineered wood product according to the standard EN 622-5. It is formed by breaking down hardwood or softwood residuals into wood fibres, often in a defibrator, combining it with wax and a resin binder, and forming panels by applying high temperature and pressure.
Over time, the word "MDF" has become a generic name for any dry process fibre board. MDF density is typically between 500 kg/m3 and 1000 kg/m3. Standard boards are available in Europe with thicknesses in the range of 1.8 to 60 mm.
The inventoried MDF has the following average composition:
Unlike most other wood based sheet materials, the uniform and close packed fibre distribution throughout the thickness of MDF allows detailed machining operations to be carried out on the faces and edges without breakout or the exposure of voids within the core of the board.
Standard MDF is being used for the manufacture of table tops, door panels and drawer fronts with moulded edges or profiled surfaces. The smooth and stable surfaces of MDF provide an excellent substrate for painting or the application of decorative foils or wood veneers. The inherent stability, good machinability and high strength of MDF creates opportunities for it to be used as an alternative to solid wood for applications such as drawer sides, cabinet rails, mirror surrounds and mouldings.
Although primarily developed for use in furniture, standard MDF is being used increasingly for shop fitments, exhibition displays, wall panelling, architectural mouldings and many other applications where its good machining and finishing characteristics are used to advantage.
MDF product types are available for the use in more demanding situations like for moisture resistant, flame retardant, high density and exterior grades of MDF.
Moisture resistant boards are being used for bathroom fitments, doors, window boards and other interior building applications where resistance to damp conditions or intermittent wetting are important requirements.
Flame retardant boards are being used increasingly for fitted furniture, doors and panelling in public buildings and other areas which have to conform to national fire regulations.

## Included activities start
From the reception at the factory gate of all materials and fuels used.

## Included activities end
Activity ends with the uncoated medium density board at the factory gate.

## Geography
Representation of the production of the member companies of the European Panel Federation (EPF).

## Technology
The most raw materials used for MDF production are wooden materials, such as logs with diameter of 50 – 200 mm, small diameter wood, roundwood core and veneer wastes from plywood produc-tion, saw dust and wood strips from sawmills etc. If necessary, the chips are washed to remove dirt and other debris.
Clean chips are softened in a steam-pressurized digester, then transported into a pressurized refiner chamber. In the refiner chamber, single or double revolving disks are used to mechanically pulp the softened chips into fibres suitable for making the board.
From the refiners, the fibres move to the drying and blending area. A rotary predryer may be used for initial drying of relatively wet furnish. Regardless of whether or not a predryer is used, tube dryers typically are used to reduce the moisture content of the fibres to desired levels. Single-stage or multiple-stage tube drying systems are commonly used in MDF manufacture. Most of the multiple-stage tube drying systems incorporate two stages. In multiple-stage tube dryers, there is a primary tube dryer and a second stage tube dryer in series separated by an emission point such as a cyclonic collector. Heat is usually provided to tube dryers by the direct firing of propane, natural gas, or distillate oil or by indirect heating.
The sequence of the drying and blending operations depends on the method by which resins and other additives are blended with the fibres. Urea-formaldehyde (UF) resins are the most common resins used in the manufacture of MDF. Phenolic resins, melamine resins, and isocyanates are also used. Some plants inject resins into a short-retention blender, while most facilities inject resin formulations into a blowline system. If resin is added in a separate blender, the fibres are first dried and separated from the gas stream by a fibre recovery cyclone, then conveyed to the blender. The fibres then are blended with resin, wax, and any other additives and conveyed to a dry fibre storage bin.
If a blowline system is used, the fibres are first blended with resin, wax, and other additives in a blowline, which is a duct that discharges the resinated fibres to the dryer. After drying, the fibres are separated from the gas stream by a fibre recovery cyclone and then conveyed to a dry fibre storage bin.
Air conveys the resinated fibres from the dry storage bin to the forming machine, where they are deposited on a continuously moving screen system. The continuously formed mat must be pre-pressed before being loaded into the hot press. After prepressing, some pretrimming is done. The trimmed material is collected and recycled to the forming machine.
The prepressed and trimmed mats then are transferred to the hot press. The press applies heat and pressure to activate the resin and bond the fibres into a solid panel. The mat may be pressed in a continuous hot press, or the precompressed mat may be cut by a flying cut-off saw into individual mats that are then loaded into a multi-opening, batch-type hot press. Steam or hot oil heating of the press platens is common in European MDF plants. After pressing, the boards are cooled, sanded, trimmed, and sawed to final dimensions. The boards may also be painted or laminated. Finally, the finished product is packaged for shipment.

## Parameters
- input wood fuel: 4212.26 MJ; name wood_fuel; = 221*19.06
  input of wood fuel used in production, i.e. wood fuel from forestry, internal wood residues, post-consumer wood used for energy purposes, etc; expressed in MJ of absolutely dry mass (lower heating value at humidity u=0%)

## Reference product
- residual wood, dry: 1 m3; name w_chips; CPC 39283: Non-agglomerated wood waste and scrap; By-product classification allocatable product; pedigree (1,1,1,1,1)
  sold residual wood
  production volume 3.30042e6 m3; = p_board * (w_chips / RP_amount_1)
    Calculated from production volume of reference product using the relative outputs.
  property heating value, net 8030.06 MJ
    LHV is calculated based on the Carbon content of the product. More details can be found on the respective documentation.The property is based on a value of 12.7MJ/kg
  property price 26.9 EUR2005; name w_chips_price_EUR2005
    Temporary price data. Calculated as 90% of purchasers price based on: 2004 prices for World Import/Export (USD/cubicmeter) from FaoStat (http://faostat.fao.org/site/626/default.aspx#ancor, [accessed 10th June 2010]) Commodity: 'Chips and Particles' assuming this is for air-dry chips (10% water on a dry matter basis at 650 kg/m3) and no price difference for water content (i.e. assuming air-drying).
  property carbon content 0.494
    carbon content on a dry matter basis (reserved; not for manual entry)
  property true value 1.24719; name w_chips_true_value
    allocation property applied in "true value" allocation // value calculated from revenue
  properties: carbon content, fossil 0, carbon content, non-fossil 0.494, water in wet mass 82.5 kg, wet mass 632.5 kg, water content 0.15, dry mass 550 kg, carbon allocation 271.7 kg
- medium density fibreboard: 0 m3; name RP_amount_1; By-product classification allocatable product; CPC 31441: Medium density fibreboard (MDF)
  production volume 7.11851e7 m3; name p_board
    FaoStat 2011
  property wet mass 684 kg; name MDF_WM
  property water in wet mass 44.4 kg; name MDF_WWM
  property water content 0.0694184; = MDF_WWM/MDF_DM
  property carbon content, non-fossil 0.421707; = 546*0.494/MDF_DM
    carbon content of wood mass divided by dry mass
  property heating value, net 10890.3 MJ
    Assumed equal to "fiberboard, hard".The property is based on a value of 13.96MJ/kg
  property price 252 EUR2005
    Export prices for the World+ according to: http://faostat.fao.org/site/626/DesktopDefault.aspx?PageID=626#ancor downloaded 28 April 2009; calculated as export value divided by export volume.
  property dry mass 639.6 kg; name MDF_DM; = MDF_WM-MDF_WWM
  property carbon content 0.47755
    carbon content on a dry matter basis (reserved; not for manual entry)
  property true value 252; name RP_amount_1_true_value
    allocation property applied in "true value" allocation // value calculated from revenue
  properties: carbon content, fossil 0.0558423, carbon allocation 305.441 kg

## Inputs from technosphere
- furnace, wood chips, with silo, 5000kW: 1.24994e-5 unit; = 2.9333E-08*wood_fuel/1.05; lognormal variance with pedigree 0.043, pedigree (1,5,4,5,1)
  Infrastructure factor from DS on heat generation from industrial residual wood mulitplied by the input of wood fuel (direct wood fuel plus production residues); correction for assumed efficiency as original value refers to heat output
- wood chips, dry, measured as dry mass: 39.037 kg; = 23.9+33.6+294+4.81+11.2; lognormal variance with pedigree 0.043, pedigree (1,5,4,5,1)
  input of different types of wood chips from sawmills
  properties: wet mass 1.4 kg, dry mass 1 kg, water content 0.4, carbon content, non-fossil 0.494, heating value, net 9.99 MJ
  note on carbon content, non-fossil: C content of dry mass is 0.494 kgC/kg dry wood (ecoinvent v2.2 report 9).
- dust collector, electrostatic precipitator, for industrial use: 5.9184e-7 unit; = 1.3889E-09*wood_fuel/1.05; lognormal variance with pedigree 0.043, pedigree (1,5,4,5,1)
  (same comment as for furnace, wood chips, with silo, 5000kW)
- heat, district or industrial, natural gas: 114.01 MJ; = (989+138)/1.05; lognormal variance with pedigree 0.043, pedigree (1,5,4,5,1)
  Input of natural gas plus liquified petrolium gas, converted to heat output
  properties: heating value, net 1 MJ
- wastewater from medium density board production: -0.0432317 m3; name w_WW; lognormal variance with pedigree 0.043, pedigree (1,5,4,5,1)
  production volume 2.89723e7 m3; = w_WW*p_board
    Calculated from production volume of reference product using the relative outputs.
  property price 0 EUR2005; name w_WW_price_EUR2005
- wood chips, from post-consumer wood, measured as dry mass: 11.7905 kg; lognormal variance with pedigree 0.043, pedigree (1,5,4,5,1)
  properties: heating value, net 9.99 MJ, water content 0.4, dry mass 1 kg, wet mass 1.4 kg, carbon content, non-fossil 0.494
- sawdust, wet, measured as dry mass: 0 kg; pedigree (1,1,1,1,1)
  input of sawdust
  properties: heating value, net 7.79 MJ
- heat, district or industrial, other than natural gas: 1.63883 MJ; = 16.2/1.05; lognormal variance with pedigree 0.043, pedigree (1,5,4,5,1)
  Fuel input, converted to heat output
  properties: heating value, net 1 MJ
- electricity, medium voltage: 0 kWh; pedigree (1,1,1,1,1)
- heat, district or industrial, other than natural gas: 2.69092 MJ; = 26.6/1.05; lognormal variance with pedigree 0.043, pedigree (1,5,4,5,1)
  Fuel input, converted to heat output
- slab and siding, softwood, wet, measured as dry mass: 0 kg; pedigree (1,1,1,1,1)
  input of industrial residual wood
  properties: heating value, net 7.79 MJ
- urea formaldehyde resin: 4.94987 kg; lognormal variance with pedigree 0.043, pedigree (1,5,4,5,1)
  part of glueing system (inventoried as averaged production average in Europe)
  properties: dry mass 1 kg, carbon content, fossil 0.408958, wet mass 1 kg, heating value, net 12.39 MJ
- paraffin: 0.50136 kg; lognormal variance with pedigree 0.043, pedigree (1,5,4,5,1)
  hydrophobing agent
  properties: heating value, net 41.5 MJ, dry mass 1 kg, carbon content, fossil 0.847059, wet mass 1 kg
  note on heating value, net: Indicative value. Reference: Fuels - Higher and Lower Calorific Values, available at: https://www.engineeringtoolbox.com/fuels-higher-calorific-values-d_169.html
- wooden board factory, organic bonded boards: 4.04649e-9 unit; = 1/(525000*50); lognormal variance with pedigree 0.043, pedigree (1,5,4,5,1)
  estimated based on an assumed yearly production volume o 525,000 m3/year and a life time of infrastructure of 50 years
- tap water: 0 kg; pedigree (1,1,1,1,1)
  properties: dry mass 0.000337476 kg, wet mass 1 kg, water content 2962.17, carbon content, fossil 0.00178991
  note on carbon content, fossil: Bicarbonate content is 2.93 mol/m3. CO2 content is 0.1 mol/m3 (ecoinvent v2.2 report 8, Tab 93.1).
- melamine formaldehyde resin: 4.46125 kg; lognormal variance with pedigree 0.043, pedigree (1,5,4,5,1)
  part of glueing system (inventoried as averaged production average in Europe)
  properties: wet mass 1 kg, dry mass 1 kg, carbon content, fossil 0.311708, heating value, net 9.44 MJ
- urea: 0 kg; pedigree (1,1,1,1,1)
  The exchange has been updated from 'urea, as N' into 'urea' and therefore its amount has been scaled (multiplied) from 0.3276 kg by 2.1438 kg of 'urea' per kg of 'urea, as N'. Original comment of the exchange is: input of urea, converted to input of N via molar relationship
  properties: dry mass 1 kg, wet mass 1 kg, carbon content, fossil 0.2
- aluminium sulfate, powder: 0.00242182 kg; lognormal variance with pedigree 0.043, pedigree (1,5,4,5,1)
  aluminium sulfate plus input of unspecified hardeners
  properties: dry mass 1 kg, wet mass 1 kg
- chemical, organic: 0.0950672 kg; lognormal variance with pedigree 0.043, pedigree (1,5,4,5,1)
  input of unspecified additives, dyes, flame redardants, etc.
  properties: heating value, net 19.03 MJ, dry mass 1 kg, wet mass 1 kg, carbon content, fossil 0.628
  note on carbon content, fossil: This dataset is an unweighted average of 20 organic substances (listed in Tab 88.1, ecoinvent v2.2 report 8, part II), being part of the top100 chemicals included in this database. The C-content has also been calculated as an unweighted average of the C content of the substances composing this dataset.
- wood ash mixture, pure: -0.212976 kg; name w_wood_ash; = (0.000476*wood_fuel)*-1; lognormal variance with pedigree 0.043, pedigree (1,5,4,5,1)
  EcoSpold01Location=CH
  Emission factor from DS on heat generation from industrial residual wood mulitplied by the input of wood fuel (direct wood fuel plus production residues)
  production volume 1.35288e8 kg; = w_wood_ash*p_board
    Calculated from production volume of reference product using the relative outputs.
  property price 0 EUR2005; name w_wood_ash_price_EUR2005
  properties: dry mass 1 kg, carbon content, non-fossil 0.012, wet mass 1 kg
- diesel, burned in building machine: 3.78144 MJ; lognormal variance with pedigree 0.043, pedigree (1,5,4,5,1)
  for internal transport
  properties: heating value, net 1 MJ
- furnace, wood chips, softwood storage area, 1000kW: 2.9575e-6 unit; = 6.61E-09*wood_fuel; lognormal variance with pedigree 0.028, pedigree (1,5,4,5,1)
  Factor from DS on heat generation from industrial residual wood mulitplied by the input of wood fuel (direct wood fuel plus production residues)
  EcoSpold01Location=CH
- lubricating oil: 0.0139255 kg; = 0.112+0.0191; lognormal variance with pedigree 0.043, pedigree (1,5,4,5,1)
  input of lubricating oils plus mineral oils, incl. thermooil
  properties: dry mass 1 kg, wet mass 1 kg, carbon content, fossil 0.75, heating value, net 40.2 MJ
  note on carbon content, fossil: Lubricating oil is produced from diesel. C-content/dry mass of fats and oils considered 75%, from: ecoinvent v2.2 report, n 15a, pg 40
  note on heating value, net: Literature value, Source: IPCC 2006, 2006 IPCC Guidelines for National Greenhouse Gas Inventories, Prepared by the National Greenhouse Gas Inventories Programme, Eggleston H.S., Buendia L., Miwa K., Ngara T. and Tanabe K. (eds). Published: IGES, Japan
- pulpwood, softwood, measured as solid wood under bark: 0.0663175 m3; = 236/378; lognormal variance with pedigree 0.043, pedigree (1,5,4,5,1)
  input in kg divided by the basic wood density of 378 kg/m3
  properties: heating value, net 4483.78 MJ, dry mass 440 kg, carbon content, non-fossil 0.494, wet mass 748 kg, water content 0.7
  note on heating value, net: Value based on "softwood forestry, mixed species, sustainable forest management"The property is based on a value of 11.58MJ/kg
- hazardous waste, for incineration: -0.0843586 kg; name w_HW; lognormal variance with pedigree 0.043, pedigree (1,5,4,5,1)
  Output of minor quantities of waste resins, oily filters and rags
  production volume 5.65341e7 kg; = w_HW*p_board
    Calculated from production volume of reference product using the relative outputs.
  property price 0 EUR2005; name w_HW_price_EUR2005
  properties: wet mass 1 kg, heating value, net 17 MJ, dry mass 0.75 kg, carbon content, fossil 0.554667, water content 0.333333
  note on heating value, net: Value taken from the general comment of the treatment dataset.
  note on carbon content, fossil: Tab A.6, ecoinvent v2.2 report 13_I. C content has been calculated after data in the tables, and then referred to 1 kg DM
- pulpwood, hardwood, measured as solid wood under bark: 0.000791081 m3; = 4.26/572; lognormal variance with pedigree 0.043, pedigree (1,5,4,5,1)
  input in kg divided by the basic wood density of 572 kg/m3
  properties: water content 0.8, dry mass 681.818 kg, wet mass 1227.27 kg, carbon content, non-fossil 0.494, heating value, net 6071.3 MJ
  note on heating value, net: Value based on "hardwood forestry, mixed species, sustainable forest management"The property is based on a value of 11.58MJ/kg
- biowaste: -0.095917 kg; name w_biowaste; lognormal variance with pedigree 0.0436, pedigree (2,5,4,5,1)
  sludges from chip washing etc.
  production volume 6.42801e7 kg; = w_biowaste*p_board
    Calculated from production volume of reference product using the relative outputs.
  property price 0 EUR2005; name w_biowaste_price_EUR2005
  properties: carbon content, non-fossil 0.1624, water content 1.5, heating value, net 4.29 MJ, dry mass 0.4 kg, wet mass 1 kg
- wood chips, wet, measured as dry mass: 0 kg; pedigree (1,1,1,1,1)
  input of wood chips from forestry
  properties: dry mass 1 kg, carbon content, non-fossil 0.494, wet mass 2.1 kg, water content 1.1, heating value, net 10.84 MJ
  note on heating value, net: Value based on the dataset 'softwood forestry, mixed species, sustainable forest management'
- sawdust, wet, measured as dry mass: 0.0636787, 3.12506 kg (2 entries); lognormal variance with pedigree 0.0146, pedigree (1,3,4,5,1)
  input of sawdust
- electricity, medium voltage: 0.295903, 0.0567414, 0.952571, 13.8543, 1.95277, 6.36242 kWh (6 entries); lognormal variance with pedigree 0.0205, pedigree (1,5,4,5,1)
- slab and siding, softwood, wet, measured as dry mass: 0.222127, 0.86132 kg (2 entries); lognormal variance with pedigree 0.0146, pedigree (1,3,4,5,1)
  input of industrial residual wood
- tap water: 0.474534, 0.0571211, 0.094402, 2.38045, 0.0619267, 0.176149, 27.2407 kg (7 entries); lognormal variance with pedigree 0.043, pedigree (1,5,4,5,1)
- urea: 0.0321665, 0.00476405, 0.0376689 kg (3 entries); lognormal variance with pedigree 0.043, pedigree (1,5,4,5,1)
  (same comment as for urea)
- wood chips, wet, measured as dry mass: 0.000139033, 0.0613625 kg (2 entries); lognormal variance with pedigree 0.268, pedigree (1,5,4,5,1)
  input of wood chips from forestry

## Inputs from nature
- Water, cooling, unspecified natural origin [natural resource, in water]: 0.0304852 m3; lognormal variance with pedigree 0.042, pedigree (1,5,4,5,1)
- Water, well, in ground [natural resource, in water]: 2.98479e-5 m3; lognormal variance with pedigree 0.043, pedigree (1,5,4,5,1)
- Water, river [natural resource, in water]: 0.0343092 m3; lognormal variance with pedigree 0.043, pedigree (1,5,4,5,1)

## Emissions to nature
- Manganese [air, urban air close to ground]: 7.60627e-5 kg; = 1.7E-07*wood_fuel; lognormal variance with pedigree 0.4806, pedigree (2,5,5,5,1)
  Emission factor from DS on heat generation from industrial residual wood mulitplied by the input of wood fuel (direct wood fuel plus production residues)
- Methane, non-fossil [air, urban air close to ground]: 0.000671141 kg; = 1.5E-06*wood_fuel; lognormal variance with pedigree 0.4806, pedigree (2,5,5,5,1)
  (same comment as for Manganese)
- Fluorine [air, urban air close to ground]: 2.23714e-5 kg; = 5E-08*wood_fuel; lognormal variance with pedigree 0.4806, pedigree (2,5,5,5,1)
  (same comment as for Manganese)
- Toluene [air, urban air close to ground]: 0.000134228 kg; = 3E-07*wood_fuel; lognormal variance with pedigree 0.4806, pedigree (2,5,5,5,1)
  (same comment as for Manganese)
- Magnesium [air, urban air close to ground]: 0.000161074 kg; = 3.6E-07*wood_fuel; lognormal variance with pedigree 0.4806, pedigree (2,5,5,5,1)
  (same comment as for Manganese)
- Acetaldehyde [air, urban air close to ground]: 6.38329e-5 kg; = 6.1E-08*wood_fuel+0.000344; lognormal variance with pedigree 0.4806, pedigree (2,5,5,5,1)
  Emission factor from DS on heat generation from industrial residual wood mulitplied by the input of wood fuel (direct wood fuel plus production residues ) plus estimated emissions from wood and glue drying processes (based on Albrecht et al. 2009).
- Calcium [air, urban air close to ground]: 0.00261745 kg; = 5.85E-06*wood_fuel; lognormal variance with pedigree 0.4806, pedigree (2,5,5,5,1)
  (same comment as for Manganese)
- Sodium [air, urban air close to ground]: 0.000581656 kg; = 1.3E-06*wood_fuel; lognormal variance with pedigree 0.4806, pedigree (2,5,5,5,1)
  (same comment as for Manganese)
- Carbon monoxide, non-fossil [air, urban air close to ground]: 0.0894855 kg; = 2E-04*wood_fuel; lognormal variance with pedigree 0.0706, pedigree (2,5,5,5,1)
  (same comment as for Manganese)
- Copper [air, urban air close to ground]: 9.84341e-6 kg; = 2.2E-08*wood_fuel; lognormal variance with pedigree 0.4806, pedigree (2,5,5,5,1)
  (same comment as for Manganese)
- Ammonia [air, urban air close to ground]: 0.00077405 kg; = 1.73E-06*wood_fuel; lognormal variance with pedigree 0.4806, pedigree (2,5,5,5,1)
  (same comment as for Manganese)
- Potassium [air, urban air close to ground]: 0.0104698 kg; = 2.34E-05*wood_fuel; lognormal variance with pedigree 0.4806, pedigree (2,5,5,5,1)
  (same comment as for Manganese)
- Methanol [air, non-urban air or from high stacks]: 0.00191197 kg; lognormal variance with pedigree 0.482, pedigree (3,5,5,5,1)
  Estimated emissions from wood and glue drying processes
- Chlorine [air, urban air close to ground]: 8.0537e-5 kg; = 1.8E-07*wood_fuel; lognormal variance with pedigree 0.4806, pedigree (2,5,5,5,1)
  (same comment as for Manganese)
- Phosphorus [air, urban air close to ground]: 0.000134228 kg; = 3E-07*wood_fuel; lognormal variance with pedigree 0.4806, pedigree (2,5,5,5,1)
  (same comment as for Manganese)
- Nitrogen oxides [air, urban air close to ground]: 0.0536913 kg; = 0.00012*wood_fuel; lognormal variance with pedigree 0.1206, pedigree (2,5,5,5,1)
  (same comment as for Manganese)
- Particulates, > 10 um [air, unspecified]: 0.00851887 kg; lognormal variance with pedigree 0.45, pedigree (3,5,4,5,1)
  dust emissions
- Chromium [air, urban air close to ground]: 1.77181e-6 kg; = 3.96E-09*wood_fuel; lognormal variance with pedigree 0.4806, pedigree (2,5,5,5,1)
  (same comment as for Manganese)
- Benzo(a)pyrene [air, urban air close to ground]: 2.23714e-7 kg; = 5E-10*wood_fuel; lognormal variance with pedigree 0.4806, pedigree (2,5,5,5,1)
  (same comment as for Manganese)
- Sulfur dioxide [air, urban air close to ground]: 0.00111857 kg; = 2.5E-06*wood_fuel; lognormal variance with pedigree 0.4806, pedigree (2,5,5,5,1)
  (same comment as for Manganese)
- Benzene [air, urban air close to ground]: 0.000407159 kg; = 9.1E-07*wood_fuel; lognormal variance with pedigree 0.4806, pedigree (2,5,5,5,1)
  (same comment as for Manganese)
- Hydrocarbons, aliphatic, alkanes, unspecified [air, urban air close to ground]: 0.000407159 kg; = 9.1E-07*wood_fuel; lognormal variance with pedigree 0.4806, pedigree (2,5,5,5,1)
  (same comment as for Manganese)
- Phenol, pentachloro- [air, urban air close to ground]: 3.62416e-9 kg; = 8.1E-12*wood_fuel; lognormal variance with pedigree 0.4806, pedigree (2,5,5,5,1)
  (same comment as for Manganese)
- Dioxins, measured as 2,3,7,8-tetrachlorodibenzo-p-dioxin [air, urban air close to ground]: 1.34228e-11 kg; = 3E-14*wood_fuel; lognormal variance with pedigree 0.4806, pedigree (2,5,5,5,1)
  (same comment as for Manganese)
- Hydrocarbons, aliphatic, unsaturated [air, urban air close to ground]: 0.00138703 kg; = 3.1E-06*wood_fuel; lognormal variance with pedigree 0.4806, pedigree (2,5,5,5,1)
  (same comment as for Manganese)
- Particulates, < 2.5 um [air, urban air close to ground]: 0.00111857 kg; = 2.5E-06*wood_fuel; lognormal variance with pedigree 0.1206, pedigree (2,5,5,5,1)
  (same comment as for Manganese)
- Chromium VI [air, urban air close to ground]: 1.78971e-8 kg; = 4E-11*wood_fuel; lognormal variance with pedigree 0.5306, pedigree (2,5,5,5,1)
  (same comment as for Manganese)
- Bromine [air, urban air close to ground]: 2.68457e-5 kg; = 6E-08*wood_fuel; lognormal variance with pedigree 0.4806, pedigree (2,5,5,5,1)
  (same comment as for Manganese)
- Benzene, ethyl- [air, urban air close to ground]: 1.34228e-5 kg; = 3E-08*wood_fuel; lognormal variance with pedigree 0.4806, pedigree (2,5,5,5,1)
  (same comment as for Manganese)
- Carbon dioxide, non-fossil [air, urban air close to ground]: 45.6376 kg; = 0.102*wood_fuel; lognormal variance with pedigree 0.0506, pedigree (2,5,5,5,1)
  (same comment as for Manganese)
- Mercury [air, urban air close to ground]: 1.34228e-7 kg; = 3E-10*wood_fuel; lognormal variance with pedigree 0.4806, pedigree (2,5,5,5,1)
  (same comment as for Manganese)
- NMVOC, non-methane volatile organic compounds, unspecified origin [air, urban air close to ground]: 0.0419994 kg; = 3.5E-06*wood_fuel + (0.519-0.138-0.000344); lognormal variance with pedigree 0.2106, pedigree (2,5,5,5,1)
  Emission factor from DS on heat generation from industrial residual wood mulitplied by the input of wood fuel (direct wood fuel plus production residues) plus estimated emissions from wood and glue drying processes (based on Albrecht et al. 2009) minus emissions that have been inventoried specifically
- Lead [air, urban air close to ground]: 1.11857e-5 kg; = 2.5E-08*wood_fuel; lognormal variance with pedigree 0.4806, pedigree (2,5,5,5,1)
  (same comment as for Manganese)
- m-Xylene [air, urban air close to ground]: 5.36913e-5 kg; = 1.2E-07*wood_fuel; lognormal variance with pedigree 0.4806, pedigree (2,5,5,5,1)
  (same comment as for Manganese)
- Nickel [air, urban air close to ground]: 2.68457e-6 kg; = 6E-09*wood_fuel; lognormal variance with pedigree 0.4806, pedigree (2,5,5,5,1)
  (same comment as for Manganese)
- Formaldehyde [air, urban air close to ground]: 0.0147166 kg; = 1.3E-07*wood_fuel+0.138; lognormal variance with pedigree 0.4806, pedigree (2,5,5,5,1)
  Emission factor from DS on heat generation from industrial residual wood mulitplied by the input of wood fuel (direct wood fuel plus production residues) plus estimated emissions from wood and glue drying processes
- Zinc [air, urban air close to ground]: 0.000134228 kg; = 3E-07*wood_fuel; lognormal variance with pedigree 0.4806, pedigree (2,5,5,5,1)
  (same comment as for Manganese)
- Arsenic [air, urban air close to ground]: 4.47428e-7 kg; = 1E-09*wood_fuel; lognormal variance with pedigree 0.4806, pedigree (2,5,5,5,1)
  (same comment as for Manganese)
- Dinitrogen monoxide [air, urban air close to ground]: 0.00102908 kg; = 2.3E-06*wood_fuel; lognormal variance with pedigree 0.4806, pedigree (2,5,5,5,1)
  (same comment as for Manganese)
- Cadmium [air, urban air close to ground]: 3.13199e-7 kg; = 7E-10*wood_fuel; lognormal variance with pedigree 0.4806, pedigree (2,5,5,5,1)
  (same comment as for Manganese)
- PAH, polycyclic aromatic hydrocarbons [air, urban air close to ground]: 4.96645e-6 kg; = 1.11E-08*wood_fuel; lognormal variance with pedigree 0.4806, pedigree (2,5,5,5,1)
  (same comment as for Manganese)
- Benzene, hexachloro- [air, urban air close to ground]: 3.22148e-12 kg; = 7.2E-15*wood_fuel; lognormal variance with pedigree 0.4806, pedigree (2,5,5,5,1)
  (same comment as for Manganese)

## Sampling procedure
Survey among member companies of the European Panel Federation; emissions profile per MJ wood input from PSI (2014)
