# medium density fibreboard production, uncoated

Dataset: EcoSpold 2, unit process
Geography: RER
Time period: 2012-01-01 to 2021-12-31
Technology level: current
Classification: ISIC rev.4 ecoinvent: 1621:Manufacture of veneer sheets and wood-based panels
Synonyms: MDF
Tags: Swiss brush-up completed
Scenario: Business-as-Usual
System model: Allocation, cut-off by classification
Generated by: Frank Werner
Database: ecoinvent
isCopyrightProtected: true
accessRestrictedTo: 1

## General comment
This dataset represents medium density fibreboard (MDF) production as the weighted average of medium density board produced by the members of the European Panel Federation (EPF)

## Included activities start
From the reception at the factory gate of all materials and fuels used.

## Included activities end
Activity ends with the uncoated medium density board at the factory gate.

## Geography
Representation of the production of the member companies of the European Panel Federation (EPF).

## Technology
The most raw materials used for MDF production are wooden materials, such as logs with diameter of 50 – 200 mm, small diameter wood, roundwood core and veneer wastes from plywood produc-tion, saw dust and wood strips from sawmills etc. If necessary, the chips are washed to remove dirt and other debris.
Clean chips are softened in a steam-pressurized digester, then transported into a pressurized refiner chamber. In the refiner chamber, single or double revolving disks are used to mechanically pulp the softened chips into fibres suitable for making the board.
From the refiners, the fibres move to the drying and blending area. A rotary predryer may be used for initial drying of relatively wet furnish. Regardless of whether or not a predryer is used, tube dryers typically are used to reduce the moisture content of the fibres to desired levels. Single-stage or multiple-stage tube drying systems are commonly used in MDF manufacture. Most of the multiple-stage tube drying systems incorporate two stages. In multiple-stage tube dryers, there is a primary tube dryer and a second stage tube dryer in series separated by an emission point such as a cyclonic collector. Heat is usually provided to tube dryers by the direct firing of propane, natural gas, or distillate oil or by indirect heating.
The sequence of the drying and blending operations depends on the method by which resins and other additives are blended with the fibres. Urea-formaldehyde (UF) resins are the most common resins used in the manufacture of MDF. Phenolic resins, melamine resins, and isocyanates are also used. Some plants inject resins into a short-retention blender, while most facilities inject resin formulations into a blowline system. If resin is added in a separate blender, the fibres are first dried and separated from the gas stream by a fibre recovery cyclone, then conveyed to the blender. The fibres then are blended with resin, wax, and any other additives and conveyed to a dry fibre storage bin.
If a blowline system is used, the fibres are first blended with resin, wax, and other additives in a blowline, which is a duct that discharges the resinated fibres to the dryer. After drying, the fibres are separated from the gas stream by a fibre recovery cyclone and then conveyed to a dry fibre storage bin.
Air conveys the resinated fibres from the dry storage bin to the forming machine, where they are deposited on a continuously moving screen system. The continuously formed mat must be pre-pressed before being loaded into the hot press. After prepressing, some pretrimming is done. The trimmed material is collected and recycled to the forming machine.
The prepressed and trimmed mats then are transferred to the hot press. The press applies heat and pressure to activate the resin and bond the fibres into a solid panel. The mat may be pressed in a continuous hot press, or the precompressed mat may be cut by a flying cut-off saw into individual mats that are then loaded into a multi-opening, batch-type hot press. Steam or hot oil heating of the press platens is common in European MDF plants. After pressing, the boards are cooled, sanded, trimmed, and sawed to final dimensions. The boards may also be painted or laminated. Finally, the finished product is packaged for shipment.

## Parameters
- input wood fuel: 4212.26 MJ; name wood_fuel; = 221*19.06
  input of wood fuel used in production, i.e. wood fuel from forestry, internal wood residues, post-consumer wood used for energy purposes, etc; expressed in MJ of absolutely dry mass (lower heating value at humidity u=0%)

## Reference product
- residual wood, dry: 1 m3; name w_chips; CPC 39283: Non-agglomerated wood waste and scrap; By-product classification allocatable product; pedigree (1,1,1,1,1)
  Emission factor from DS on heat generation from industrial residual wood mulitplied by the input of wood fuel (direct wood fuel plus production residues)
  production volume 515332 m3
    Calculated from production volume of reference product using the relative outputs.
  property heating value, net 8030.06 MJ
    LHV is calculated based on the Carbon content of the product. More details can be found on the respective documentation.The property is based on a value of 12.7MJ/kg
  property price 26.9 EUR2005
    Temporary price data. Calculated as 90% of purchasers price based on: 2004 prices for World Import/Export (USD/cubicmeter) from FaoStat (http://faostat.fao.org/site/626/default.aspx#ancor, [accessed 10th June 2010]) Commodity: 'Chips and Particles' assuming this is for air-dry chips (10% water on a dry matter basis at 650 kg/m3) and no price difference for water content (i.e. assuming air-drying).
  property carbon content 0.494
    carbon content on a dry matter basis (reserved; not for manual entry)
  property true value 1.24719; name w_chips_true_value
    allocation property applied in "true value" allocation // value calculated from revenue
  properties: dry mass 550 kg, carbon content, fossil 0, wet mass 632.5 kg, water in wet mass 82.5 kg, carbon content, non-fossil 0.494, water content 0.15, carbon allocation 271.7 kg
- medium density fibreboard: 0 m3; By-product classification allocatable product; CPC 31441: Medium density fibreboard (MDF)
  production volume 1.11149e7 m3; name p_board
    FaoStat 2011
  property price 252 EUR2005
    Export prices for the World+ according to: http://faostat.fao.org/site/626/DesktopDefault.aspx?PageID=626#ancor downloaded 28 April 2009; calculated as export value divided by export volume.
  property wet mass 684 kg; name MDF_WM
  property dry mass 639.6 kg; name MDF_DM; = MDF_WM-MDF_WWM
  property carbon content, non-fossil 0.421707; = 546*0.494/MDF_DM
    carbon content of wood mass divided by dry mass
  property heating value, net 10890.3 MJ
    Assumed equal to "fiberboard, hard".The property is based on a value of 13.96MJ/kg
  property water content 0.0694184; = MDF_WWM/MDF_DM
  property water in wet mass 44.4 kg; name MDF_WWM
  property carbon content 0.47755
    carbon content on a dry matter basis (reserved; not for manual entry)
  property true value 252
    allocation property applied in "true value" allocation // value calculated from revenue
  properties: carbon content, fossil 0.0558423, carbon allocation 305.441 kg

## Inputs from technosphere
- slab and siding, softwood, wet, measured as dry mass: 0 kg; pedigree (1,1,1,1,1)
  input of industrial residual wood
  properties: carbon content, non-fossil 0.494, dry mass 1 kg, wet mass 1.7 kg, heating value, net 7.79 MJ, water content 0.7
- electricity, medium voltage: 1.1513 kWh; = 221.2*0.049; lognormal variance with pedigree 0.033, pedigree (1,1,4,1,1)
  electricity input from grid times share of total production in specific country
  properties: UVEK_relative_amount_1 1, UVEK_link_1 1724
  note on UVEK_relative_amount_1: to be used only in special submissions in coordination with ecoinvent and the Swiss FOEN
- sawdust, wet, measured as dry mass: 0 kg; pedigree (1,1,1,1,1)
  input of sawdust
  properties: heating value, net 7.79 MJ, carbon content, non-fossil 0.494, wet mass 1.7 kg, water content 0.7, dry mass 1 kg
- electricity, medium voltage: 4.91065 kWh; = 221.2*0.209; lognormal variance with pedigree 0.033, pedigree (1,1,4,1,1)
  electricity input from grid times share of total production in specific country
  properties: UVEK_relative_amount_1 1, UVEK_link_1 1742
- tap water: 30.4852 kg; lognormal variance with pedigree 0.0336, pedigree (1,3,4,1,1)
  properties: water content 2962.17, wet mass 1 kg, UVEK_relative_amount_1 1, UVEK_link_1 4285, dry mass 0.000337476 kg, carbon content, fossil 0.00178991
  note on carbon content, fossil: Bicarbonate content is 2.93 mol/m3. CO2 content is 0.1 mol/m3 (ecoinvent v2.2 report 8, Tab 93.1).
- electricity, medium voltage: 1.69171 kWh; = 221.2*0.072; lognormal variance with pedigree 0.033, pedigree (1,1,4,1,1)
  electricity input from grid times share of total production in specific country
  properties: UVEK_link_1 1730, UVEK_relative_amount_1 1
- pulpwood, softwood, measured as solid wood under bark: 0 m3; pedigree (1,1,1,1,1)
  input in kg divided by the basic wood density of 378 kg/m3
  properties: heating value, net 4483.78 MJ, water content 0.7, wet mass 748 kg, basic wood density 400, carbon content, non-fossil 0.494, dry mass 440 kg
  note on heating value, net: Value based on "softwood forestry, mixed species, sustainable forest management"The property is based on a value of 11.58MJ/kg
- electricity, medium voltage: 1.95016 kWh; = 221.2*0.083; lognormal variance with pedigree 0.033, pedigree (1,1,4,1,1)
  electricity input from grid times share of total production in specific country
  properties: UVEK_link_1 1720, UVEK_relative_amount_1 1
- pulpwood, hardwood, measured as solid wood under bark: 0 m3; pedigree (1,1,1,1,1)
  input in kg divided by the basic wood density of 572 kg/m3
  properties: carbon content, non-fossil 0.494, wet mass 1227.27 kg, water content 0.8, basic wood density 550, dry mass 681.818 kg, heating value, net 6071.3 MJ
  note on heating value, net: Value based on "hardwood forestry, mixed species, sustainable forest management"The property is based on a value of 11.58MJ/kg
- electricity, medium voltage: 1.80919 kWh; = 221.2*0.077; lognormal variance with pedigree 0.033, pedigree (1,1,4,1,1)
  electricity input from grid times share of total production in specific country
  properties: UVEK_relative_amount_1 1, UVEK_link_1 1718
- melamine formaldehyde resin: 4.46125 kg; lognormal variance with pedigree 0.0336, pedigree (1,3,4,1,1)
  part of glueing system (inventoried as averaged production average in Europe)
  properties: heating value, net 9.44 MJ, UVEK_relative_amount_1 1, wet mass 1 kg, UVEK_link_1 2931, dry mass 1 kg, carbon content, fossil 0.311708
- electricity, medium voltage: 3.54789 kWh; = 221.2*0.151; lognormal variance with pedigree 0.033, pedigree (1,1,4,1,1)
  electricity input from grid times share of total production in specific country
  properties: UVEK_link_1 1715, UVEK_relative_amount_1 1
- paraffin: 0.50136 kg; lognormal variance with pedigree 0.0336, pedigree (1,3,4,1,1)
  hydrophobing agent
  properties: heating value, net 41.5 MJ, UVEK_relative_amount_1 1, wet mass 1 kg, UVEK_link_1 3381, carbon content, fossil 0.847059, dry mass 1 kg
  note on heating value, net: Indicative value. Reference: Fuels - Higher and Lower Calorific Values, available at: https://www.engineeringtoolbox.com/fuels-higher-calorific-values-d_169.html
- electricity, medium voltage: 1.69171 kWh; = 221.2*0.072; lognormal variance with pedigree 0.033, pedigree (1,1,4,1,1)
  electricity input from grid times share of total production in specific country
  properties: UVEK_link_1 1721, UVEK_relative_amount_1 1
- electricity, medium voltage: 2.49057 kWh; = 221.2*0.106; lognormal variance with pedigree 0.033, pedigree (1,1,4,1,1)
  electricity input from grid times share of total production not covered via specific country mixes; it covers the electricity input in countries where < 3% of the total production are produced.
  properties: UVEK_relative_amount_1 1, UVEK_link_1 1779
- heat, district or industrial, other than natural gas: 1.63883 MJ; = 16.2/1.05; lognormal variance with pedigree 0.0336, pedigree (1,3,4,1,1)
  Fuel input, converted to heat output
  properties: heating value, net 1 MJ, UVEK_link_1 2556, UVEK_relative_amount_1 1
- furnace, wood chips, with silo, 5000kW: 1.24994e-5 unit; = 2.9333E-08*wood_fuel/1.05; lognormal variance with pedigree 0.558, pedigree (1,1,4,1,1)
  Infrastructure factor from DS 'Heat, district or industrial, other than natural gas {CH}| heat production, wood chips from industry, at furnace 5000kW | Cut-off, U', multiplied by the input of wood fuel (direct wood fuel plus production residues); correction for assumed efficiency as original value refers to heat output
  properties: UVEK_relative_amount_1 1, UVEK_link_1 999999
- electricity, medium voltage: 1.45675 kWh; = 221.2*0.062; lognormal variance with pedigree 0.033, pedigree (1,1,4,1,1)
  electricity input from grid times share of total production in specific country
  properties: UVEK_relative_amount_1 1, UVEK_link_1 1703
- dust collector, electrostatic precipitator, for industrial use: 5.9184e-7 unit; = 1.3889E-09*wood_fuel/1.05; lognormal variance with pedigree 0.558, pedigree (1,1,4,1,1)
  (same comment as for furnace, wood chips, with silo, 5000kW)
  properties: UVEK_link_1 999999, UVEK_relative_amount_1 1
- heat, district or industrial, natural gas: 114.01 MJ; = (989+138)/1.05; lognormal variance with pedigree 0.0336, pedigree (1,3,4,1,1)
  Input of natural gas plus liquified petrolium gas, converted to heat output
  properties: UVEK_link_1 2576, UVEK_relative_amount_1 1, heating value, net 1 MJ
- lubricating oil: 0.0139255 kg; = 0.112+0.0191; lognormal variance with pedigree 0.0336, pedigree (1,3,4,1,1)
  input of lubricating oils plus mineral oils, incl. thermooil
  properties: carbon content, fossil 0.75, dry mass 1 kg, UVEK_link_1 2866, heating value, net 40.2 MJ, UVEK_relative_amount_1 1, wet mass 1 kg
  note on carbon content, fossil: Lubricating oil is produced from diesel. C-content/dry mass of fats and oils considered 75%, from: ecoinvent v2.2 report, n 15a, pg 40
  note on heating value, net: Literature value, Source: IPCC 2006, 2006 IPCC Guidelines for National Greenhouse Gas Inventories, Prepared by the National Greenhouse Gas Inventories Programme, Eggleston H.S., Buendia L., Miwa K., Ngara T. and Tanabe K. (eds). Published: IGES, Japan
- wood ash mixture, pure: 0 kg; name w_wood_ash; pedigree (1,1,1,1,1)
  Emission factor from DS on heat generation from industrial residual wood mulitplied by the input of wood fuel (direct wood fuel plus production residues), scaled to convert wood input to resulting heat.
  production volume 0 kg
    Calculated from production volume of reference product using the relative outputs.
  properties: dry mass 1 kg, wet mass 1 kg, UVEK_link_1 1128, carbon content, non-fossil 0.012, UVEK_relative_amount_3 -1, UVEK_link_3 1129, UVEK_link_2 1127
- chemical, organic: 0.0950672 kg; lognormal variance with pedigree 0.0336, pedigree (1,3,4,1,1)
  input of unspecified additives, dyes, flame redardants, etc.
  properties: carbon content, fossil 0.628, UVEK_relative_amount_1 1, UVEK_link_1 432, dry mass 1 kg, heating value, net 19.03 MJ, wet mass 1 kg
  note on carbon content, fossil: This dataset is an unweighted average of 20 organic substances (listed in Tab 88.1, ecoinvent v2.2 report 8, part II), being part of the top100 chemicals included in this database. The C-content has also been calculated as an unweighted average of the C content of the substances composing this dataset.
- heat, district or industrial, other than natural gas: 2.69092 MJ; = 26.6/1.05; lognormal variance with pedigree 0.0336, pedigree (1,3,4,1,1)
  Fuel input, converted to heat output
  properties: UVEK_link_1 2547, heating value, net 1 MJ, UVEK_relative_amount_1 1
- diesel, burned in building machine: 3.78144 MJ; lognormal variance with pedigree 0.0336, pedigree (1,3,4,1,1)
  for internal transport
  properties: heating value, net 1 MJ, UVEK_link_1 732, UVEK_relative_amount_1 1
- wastewater from medium density board production: -0.0432317 m3; name w_WW; lognormal variance with pedigree 0.0342, pedigree (2,3,4,1,1)
  production volume 4.52377e6 m3; = w_WW*p_board
    Calculated from production volume of reference product using the relative outputs.
  properties: UVEK_relative_amount_1 -1, carbon content, fossil 0.093538, water content 15383.6, dry mass 0.065 kg, wet mass 1000 kg, carbon content, non-fossil 0.8418, UVEK_link_1 4577
- wood chips, wet, measured as dry mass: 0 kg; pedigree (1,1,1,1,1)
  input of wood chips from forestry
  properties: carbon content, non-fossil 0.494, water content 1.1, wet mass 2.1 kg, dry mass 1 kg, heating value, net 10.84 MJ
  note on heating value, net: Value based on the dataset 'softwood forestry, mixed species, sustainable forest management'
- aluminium sulfate, powder: 0.00242182 kg; lognormal variance with pedigree 0.0336, pedigree (1,3,4,1,1)
  aluminium sulfate plus input of unspecified hardeners
  properties: UVEK_relative_amount_1 1, UVEK_relative_amount_9 0.0327273, UVEK_link_8 4417, UVEK_link_9 4433, wet mass 1 kg, dry mass 1 kg, UVEK_link_1 158
  note on UVEK_relative_amount_9: Scaling factor = amount of transport in corresponding KBOB dataset (excluding the input of wood, assumed to be 95%)/amount of this input from technosphere. Source for transport distance: Life Cycle Inventories of Wood as Fuel and Construction Material/2007/Werner F. To be used only in special submissions in coordination with ecoinvent and the Swiss FOEN
  note on UVEK_link_8: This link has been introduced to model transport specifically for the SAM model; to be used only in special submissions in coordination with ecoinvent and the Swiss FOEN.
- wood chips, from post-consumer wood, measured as dry mass: 11.7905 kg; lognormal variance with pedigree 0.0336, pedigree (1,3,4,1,1)
  properties: heating value, net 9.99 MJ, carbon content, non-fossil 0.494, dry mass 1 kg, wet mass 1.4 kg, water content 0.4
- electricity, medium voltage: 1.24528 kWh; = 221.2*0.053; lognormal variance with pedigree 0.033, pedigree (1,1,4,1,1)
  electricity input from grid times share of total production in specific country
  properties: UVEK_relative_amount_1 1, UVEK_link_1 1744
- biowaste: -0.095917 kg; name w_biowaste; lognormal variance with pedigree 0.0342, pedigree (2,3,4,1,1)
  sludges from chip washing etc.
  production volume 1.00368e7 kg; = w_biowaste*p_board
    Calculated from production volume of reference product using the relative outputs.
  properties: water content 1.5, carbon content, non-fossil 0.1624, UVEK_relative_amount_1 -1, dry mass 0.4 kg, wet mass 1 kg, heating value, net 4.29 MJ, UVEK_link_1 813
  note on heating value, net: Value taken from the general comment of the treatment dataset.
- wood chips, dry, measured as dry mass: 39.037 kg; = 23.9+33.6+294+4.81+11.2; lognormal variance with pedigree 0.0336, pedigree (1,3,4,1,1)
  input of different types of wood chips from sawmills
  properties: heating value, net 9.99 MJ, carbon content, non-fossil 0.494, water content 0.4, wet mass 1.4 kg, dry mass 1 kg
  note on carbon content, non-fossil: C content of dry mass is 0.494 kgC/kg dry wood (ecoinvent v2.2 report 9).
- wooden board factory, organic bonded boards: 4.04649e-9 unit; = 1/(525000*50); lognormal variance with pedigree 0.5586, pedigree (1,3,4,1,1)
  estimated based on an assumed yearly production volume o 525,000 m3/year and a life time of infrastructure of 50 years
- hazardous waste, for incineration: 0 kg; name w_HW; pedigree (1,1,1,1,1)
  Output of minor quantities of waste resins, oily filters and rags
  production volume 0 kg
    Calculated from production volume of reference product using the relative outputs.
  properties: wet mass 1 kg, UVEK_relative_amount_1 -1, UVEK_link_1 965, dry mass 0.75 kg, heating value, net 17 MJ, water content 0.333333, carbon content, fossil 0.554667
  note on carbon content, fossil: Tab A.6, ecoinvent v2.2 report 13_I. C content has been calculated after data in the tables, and then referred to 1 kg DM
- urea formaldehyde resin: 4.94987 kg; lognormal variance with pedigree 0.0336, pedigree (1,3,4,1,1)
  part of glueing system (inventoried as averaged production average in Europe)
  properties: wet mass 1 kg, carbon content, fossil 0.408958, UVEK_link_1 4736, UVEK_relative_amount_1 1, dry mass 1 kg, heating value, net 12.39 MJ
- electricity, medium voltage: 0.728374 kWh; = 221.2*0.031; lognormal variance with pedigree 0.033, pedigree (1,1,4,1,1)
  electricity input from grid times share of total production in specific country
  properties: UVEK_link_1 1743, UVEK_relative_amount_1 1
- urea: 0.0745994 kg; = (0.702/(12+4+2*14+16)*(2*14))*2.14379903903132; lognormal variance with pedigree 0.0336, pedigree (1,3,4,1,1)
  The exchange has been updated from 'urea, as N' into 'urea' and therefore its amount has been scaled (multiplied) from 0.3276 kg by 2.1438 kg of 'urea' per kg of 'urea, as N'. Original comment of the exchange is: input of urea, converted to input of N via molar relationship
  properties: dry mass 1 kg, UVEK_link_1 4737, carbon content, fossil 0.2, UVEK_relative_amount_1 1, wet mass 1 kg
- electricity, medium voltage: 0.822358 kWh; = 221.2*0.035; lognormal variance with pedigree 0.033, pedigree (1,1,4,1,1)
  electricity input from grid times share of total production in specific country
  properties: UVEK_link_1 1726, UVEK_relative_amount_1 1
- slab and siding, softwood, wet, measured as dry mass: 1.06971, 0.0137396 kg (2 entries); lognormal variance with pedigree 0.0336, pedigree (1,3,4,1,1)
  input of industrial residual wood
- sawdust, wet, measured as dry mass: 3.15246, 0.0362714 kg (2 entries); lognormal variance with pedigree 0.0336, pedigree (1,3,4,1,1)
  input of sawdust
- pulpwood, softwood, measured as solid wood under bark: 0.0655169, 0.000800558 m3 (2 entries); lognormal variance with pedigree 0.0336, pedigree (1,3,4,1,1)
  input in kg divided by the basic wood density of 378 kg/m3
- pulpwood, hardwood, measured as solid wood under bark: 0.000769698, 2.1384e-5 m3 (2 entries); lognormal variance with pedigree 0.0336, pedigree (1,3,4,1,1)
  input in kg divided by the basic wood density of 572 kg/m3
- wood ash mixture, pure: -0.278359, -0.00572208 kg (2 entries); lognormal variance with pedigree 0.0342, pedigree (2,3,4,1,1)
  (same comment as for wood ash mixture, pure)
  production volume 2.97263e7 kg
- wood chips, wet, measured as dry mass: 0.0592474, 0.00225413 kg (2 entries); lognormal variance with pedigree 0.0336, pedigree (1,3,4,1,1)
  input of wood chips from forestry
- hazardous waste, for incineration: -0.0822097, -0.00214891 kg (2 entries); lognormal variance with pedigree 0.0342, pedigree (2,3,4,1,1)
  Output of minor quantities of waste resins, oily filters and rags
  production volume 8.82731e6 kg

## Inputs from nature
- Water, well, in ground [natural resource, in water]: 2.98479e-5 m3; lognormal variance with pedigree 0.0336, pedigree (1,3,4,1,1)
- Water, river [natural resource, in water]: 0.0343092 m3; lognormal variance with pedigree 0.033, pedigree (1,1,4,1,1)
- Water, cooling, unspecified natural origin [natural resource, in water]: 0.0304852 m3; lognormal variance with pedigree 0.0336, pedigree (1,3,4,1,1)

## Emissions to nature
- Toluene [air, unspecified]: 0.000170449 kg; = 0.0000004*wood_fuel/1.05; lognormal variance with pedigree 0.3912, pedigree (2,3,5,1,1)
  Emission factor from DS 'Heat, district or industrial, other than natural gas {CH}| heat production, wood chips from industry, at furnace 5000kW | Cut-off, U' on heat generation from industrial residual wood per MJ, multiplied by the input of wood fuel (direct wood fuel plus production residues ) scaled to reflect wood input per generated heat.
- Lead [air, unspecified]: 1.42041e-5 kg; = 3.33333333333333E-08*wood_fuel/1.05; lognormal variance with pedigree 0.8412, pedigree (2,3,5,1,1)
  (same comment as for Toluene)
- Benzene [air, unspecified]: 0.000517027 kg; = 1.21333333333333E-06*wood_fuel/1.05; lognormal variance with pedigree 0.2412, pedigree (2,3,5,1,1)
  (same comment as for Toluene)
- Phosphorus [air, unspecified]: 0.000170449 kg; = 0.0000004*wood_fuel/1.05; lognormal variance with pedigree 0.2412, pedigree (2,3,5,1,1)
  (same comment as for Toluene)
- Fluorine [air, unspecified]: 2.84081e-5 kg; = 6.66666666666667E-08*wood_fuel/1.05; lognormal variance with pedigree 0.2412, pedigree (2,3,5,1,1)
  (same comment as for Toluene)
- Ammonia [air, unspecified]: 0.00098292 kg; = 2.30666666666667E-06*wood_fuel/1.05; lognormal variance with pedigree 0.2412, pedigree (2,3,5,1,1)
  (same comment as for Toluene)
- Potassium [air, unspecified]: 0.013295 kg; = 0.0000312*wood_fuel/1.05; lognormal variance with pedigree 0.2412, pedigree (2,3,5,1,1)
  (same comment as for Toluene)
- Formaldehyde [air, unspecified]: 0.0147323 kg; = 1.73333333333334E-07*wood_fuel/1.05+0.138; lognormal variance with pedigree 0.2412, pedigree (2,3,5,1,1)
  Emission factor from DS 'Heat, district or industrial, other than natural gas {CH}| heat production, wood chips from industry, at furnace 5000kW | Cut-off, U' on heat generation from industrial residual wood per MJ, multiplied by the input of wood fuel (direct wood fuel plus production residues ) scaled to reflect wood input per generated heat plus estimated emissions from wood and glue drying processes (based on Albrecht et al. 2009).
- Acetaldehyde [air, urban air close to ground]: 7.11977e-5 kg; = 8.13333333333333E-08*wood_fuel/1.05+0.000344; lognormal variance with pedigree 0.2412, pedigree (2,3,5,1,1)
  Emission factor from DS on heat generation from industrial residual wood mulitplied by the input of wood fuel (direct wood fuel plus production residues ) plus estimated emissions from wood and glue drying processes (based on Albrecht et al. 2009).
- Phenol, pentachloro- [air, unspecified]: 4.60211e-9 kg; = 0.0000000000108*wood_fuel/1.05; lognormal variance with pedigree 0.3912, pedigree (2,3,5,1,1)
  (same comment as for Toluene)
- Dioxins, measured as 2,3,7,8-tetrachlorodibenzo-p-dioxin [air, unspecified]: 1.7613e-11 kg; = 4.13333333333333E-14*wood_fuel/1.05; lognormal variance with pedigree 0.5912, pedigree (2,3,5,1,1)
  (same comment as for Toluene)
- PAH, polycyclic aromatic hydrocarbons [air, unspecified]: 6.3066e-6 kg; name pah; = 0.0000000148*wood_fuel/1.05; lognormal variance with pedigree 0.5912, pedigree (2,3,5,1,1)
  (same comment as for Toluene)
- Chromium VI [air, unspecified]: 2.27265e-8 kg; = 5.33333333333334E-11*wood_fuel/1.05; lognormal variance with pedigree 0.8412, pedigree (2,3,5,1,1)
  (same comment as for Toluene)
- Particulates, < 2.5 um [air, unspecified]: 0.0142041 kg; = 0.0000333333333333333*wood_fuel/1.05; lognormal variance with pedigree 0.5912, pedigree (2,3,5,1,1)
  (same comment as for Toluene)
- Copper [air, unspecified]: 1.24996e-5 kg; = 2.93333333333334E-08*wood_fuel/1.05; lognormal variance with pedigree 0.2412, pedigree (2,3,5,1,1)
  (same comment as for Toluene)
- Particulates, > 10 um [air, unspecified]: 0.00851887 kg; lognormal variance with pedigree 0.2106, pedigree (3,3,4,1,1)
  dust emissions
- Dinitrogen monoxide [air, unspecified]: 0.00130677 kg; = 3.06666666666667E-06*wood_fuel/1.05; lognormal variance with pedigree 0.2412, pedigree (2,3,5,1,1)
  (same comment as for Toluene)
- Nickel [air, unspecified]: 3.40897e-6 kg; name nickel; = 0.000000008*wood_fuel/1.05; lognormal variance with pedigree 0.8412, pedigree (2,3,5,1,1)
  (same comment as for Toluene)
- Chlorine [air, unspecified]: 0.000102269 kg; = 0.00000024*wood_fuel/1.05; lognormal variance with pedigree 0.2412, pedigree (2,3,5,1,1)
  (same comment as for Toluene)
- NMVOC, non-methane volatile organic compounds, unspecified origin [air, unspecified]: 0.042422 kg; name nmvoc; = 4.66666666666666E-06*wood_fuel/1.05 + (0.519-0.138-0.000344); lognormal variance with pedigree 0.2412, pedigree (2,3,5,1,1)
  Emission factor from DS 'Heat, district or industrial, other than natural gas {CH}| heat production, wood chips from industry, at furnace 5000kW | Cut-off, U' on heat generation from industrial residual wood per MJ, multiplied by the input of wood fuel (direct wood fuel plus production residues ) scaled to reflect wood input per generated heat plus estimated emissions from wood and glue drying processes (based on Albrecht et al. 2009), minus VOC emissions that are inventoried specifically.
- Carbon monoxide, non-fossil [air, unspecified]: 0.113632 kg; = 0.000266666666666667*wood_fuel/1.05; lognormal variance with pedigree 0.2412, pedigree (2,3,5,1,1)
  (same comment as for Toluene)
- Nitrogen oxides [air, unspecified]: 0.127836 kg; = 0.0003*wood_fuel/1.05; lognormal variance with pedigree 0.2412, pedigree (2,3,5,1,1)
  (same comment as for Toluene)
- Chromium [air, unspecified]: 2.24992e-6 kg; = 5.28000000000001E-09*wood_fuel/1.05; lognormal variance with pedigree 0.8412, pedigree (2,3,5,1,1)
  (same comment as for Toluene)
- m-Xylene [air, unspecified]: 6.81795e-5 kg; name mxylene; = 0.00000016*wood_fuel/1.05; lognormal variance with pedigree 0.3912, pedigree (2,3,5,1,1)
  (same comment as for Toluene)
- Cadmium [air, unspecified]: 3.97713e-7 kg; = 9.33333333333334E-10*wood_fuel/1.05; lognormal variance with pedigree 0.8412, pedigree (2,3,5,1,1)
  (same comment as for Toluene)
- Methanol [air, non-urban air or from high stacks]: 0.00191197 kg; lognormal variance with pedigree 0.3926, pedigree (3,3,5,1,1)
  Estimated emissions from wood and glue drying processes
- Calcium [air, unspecified]: 0.00332375 kg; = 0.0000078*wood_fuel/1.05; lognormal variance with pedigree 0.2412, pedigree (2,3,5,1,1)
  (same comment as for Toluene)
- Mercury [air, unspecified]: 1.70449e-7 kg; name mercury; = 0.0000000004*wood_fuel/1.05; lognormal variance with pedigree 0.8412, pedigree (2,3,5,1,1)
  (same comment as for Toluene)
- Carbon dioxide, non-fossil [air, unspecified]: 60.7933 kg; = 0.142666666666666*wood_fuel/1.05; lognormal variance with pedigree 0.0662, pedigree (2,3,5,1,1)
  (same comment as for Toluene)
- Manganese [air, unspecified]: 9.65876e-5 kg; name manganese; = 2.26666666666667E-07*wood_fuel/1.05; lognormal variance with pedigree 0.2412, pedigree (2,3,5,1,1)
  (same comment as for Toluene)
- Benzene, hexachloro- [air, unspecified]: 4.09077e-12 kg; = 9.60000000000001E-15*wood_fuel/1.05; lognormal variance with pedigree 0.2412, pedigree (2,3,5,1,1)
  (same comment as for Toluene)
- Zinc [air, unspecified]: 0.000170449 kg; = 0.0000004*wood_fuel/1.05; lognormal variance with pedigree 0.8412, pedigree (2,3,5,1,1)
  (same comment as for Toluene)
- Methane, non-fossil [air, unspecified]: 0.000852243 kg; = 0.000002*wood_fuel/1.05; lognormal variance with pedigree 0.2412, pedigree (2,3,5,1,1)
  (same comment as for Toluene)
- Benzene, ethyl- [air, unspecified]: 1.70449e-5 kg; = 0.00000004*wood_fuel/1.05; lognormal variance with pedigree 0.2412, pedigree (2,3,5,1,1)
  (same comment as for Toluene)
- Magnesium [air, unspecified]: 0.000204538 kg; name magnesium; = 0.00000048*wood_fuel/1.05; lognormal variance with pedigree 0.2412, pedigree (2,3,5,1,1)
  (same comment as for Toluene)
- Benzo(a)pyrene [air, unspecified]: 2.84081e-7 kg; = 6.66666666666667E-10*wood_fuel/1.05; lognormal variance with pedigree 0.5912, pedigree (2,3,5,1,1)
  (same comment as for Toluene)
- Sulfur dioxide [air, unspecified]: 0.00142041 kg; = 3.33333333333334E-06*wood_fuel/1.05; lognormal variance with pedigree 0.0662, pedigree (2,3,5,1,1)
  (same comment as for Toluene)
- Hydrocarbons, aliphatic, alkanes, unspecified [air, unspecified]: 0.000517027 kg; = 1.21333333333333E-06*wood_fuel/1.05; lognormal variance with pedigree 0.2412, pedigree (2,3,5,1,1)
  (same comment as for Toluene)
- Bromine [air, unspecified]: 3.40897e-5 kg; = 0.00000008*wood_fuel/1.05; lognormal variance with pedigree 0.8412, pedigree (2,3,5,1,1)
  (same comment as for Toluene)
- Sodium [air, unspecified]: 0.000738611 kg; = 1.73333333333334E-06*wood_fuel/1.05; lognormal variance with pedigree 0.2412, pedigree (2,3,5,1,1)
  (same comment as for Toluene)
- Hydrocarbons, aliphatic, unsaturated [air, unspecified]: 0.0017613 kg; = 4.13333333333333E-06*wood_fuel/1.05; lognormal variance with pedigree 0.2412, pedigree (2,3,5,1,1)
  (same comment as for Toluene)
- Arsenic [air, unspecified]: 5.68162e-7 kg; = 1.33333333333333E-09*wood_fuel/1.05; lognormal variance with pedigree 0.2412, pedigree (2,3,5,1,1)
  (same comment as for Toluene)

## Sampling procedure
Survey among member companies of the European Panel Federation; emissions profile per MJ wood input from PSI (2014)
