# milk spray-drying

Dataset: EcoSpold 2, unit process
Geography: RoW
Time period: 2004-01-01 to 2021-12-31
Technology level: current
Classification: ISIC rev.4 ecoinvent: 1050:Manufacture of dairy products
Synonyms: milk powder production
Scenario: Business-as-Usual
System model: Allocation, cut-off by classification
Generated by: François Saunier
Database: ecoinvent
isCopyrightProtected: true
accessRestrictedTo: 1

## General comment
This GLO dataset is based on the Quebec dataset. Uncertainty has been adjusted accordingly.
The functional unit is 1 kg water evaporated. This module is based on literature from milk processing equipment manufacturer and should be used when evaluating evaporation of water from evaporated milk to produce milk powder. Basic solid contents are 50% for evaporated milk at input and 96.5% for milk powder at output. Only steam and energy demand for the evaporator are considered.

## Included activities start
From evaporated milk at spray dryer input.

## Included activities end
This activity ends with milk powder at the output of the dryer.
The dataset includes the energy demand (supplied by consumption of electricity and oil) and steam production for evaporating 1 kg of water.
The dataset does not include waste and emissions to environment (except water from steam to air).

## Geography
Data used are from one European company whose equipment is used worldwide.
Quebec specificity for steam production from natural gas is supposed. Uncertainty is adjusted accordingly in this GLO dataset.

## Technology
Two-stage drying occurs in a spray dryer operated at high temperature (200C) with Vibro-Fluidizer.
Spray dryer and fluid bed power consumption are respectively 130 kW and 20 kW. Fuel oil consumption of the spray dryer is 205 kg/h and steam consumption of the fluid bed is 167 kg/h. Evaporator capacity is 3,5 ton of evaporated milk per hour.
References :
WESTERGAARD, V. ( 2004). Milk powder technology : evaporation and spray drying. Report for GEA Niro, Danemark. 301 p.

## Time period
Time of publication of the report used for data.

## Parameters
- water for steam: 1.17 kg/kg; name water_for_steam; lognormal variance with pedigree 0.1638, pedigree (2,3,5,5,5)
  kg of water for production of 1 kg of steam
- fuel consumption: 205 kg/hour; name fuel_consumption; lognormal variance with pedigree 0.001825, pedigree (2,3,1,2,1)
  Fuel oil consumption of the dryer.
  Source : WESTERGAARD, V. ( 2004). Milk powder technology : evaporation and spray drying. Report for GEA Niro, Danemark. 301 p.
- heat for steam: 3.07 MJ/kg; name heat_for_steam; lognormal variance with pedigree 0.1638, pedigree (2,3,5,5,5)
  Heat for production of 1 kg of steam
- drying capacity: 1765 kg/hour; name drying_capacity; lognormal variance with pedigree 0.0019, pedigree (2,3,1,3,1)
  Mass of condensate (water) produced per hour in the dryer.
  Source : WESTERGAARD, V. ( 2004). Milk powder technology : evaporation and spray drying. Report for GEA Niro, Danemark. 301 p.
- steam consumption: 167 kg/hour; name steam_consumption; lognormal variance with pedigree 0.0019, pedigree (2,3,1,3,1)
  kg of steam per hour.
  Source : WESTERGAARD, V. ( 2004). Milk powder technology : evaporation and spray drying. Report for GEA Niro, Danemark. 301 p.
- motor power: 150 kW; name motor_power; = 130+20; lognormal variance with pedigree 0.0019, pedigree (2,3,1,3,1)
  Source : WESTERGAARD, V. ( 2004). Milk powder technology : evaporation and spray drying. Report for GEA Niro, Danemark. 301 p.

## Reference product
- spray-drying of milk: 1 kg; CPC 88150: Dairy product manufacturing services; By-product classification allocatable product
  Functional unit is kg of water evaporated.
  production volume 3.98223 kg
    Dummy value to be replaced by measured, estimated or calculated value.
    This is a placeholder value that does not reflect real-world production volumes. This dataset does not currently require a real-world production volume to work in the database framework, and no actual data were collected yet. This has no negative effect on the results of the ecoinvent database.
  property price 0.0673119 EUR2005
    Calculated based on inputs: The price of the product has been calculated as a sum of the values of the material and energy inputs for this product. This value is therefore a rough estimation. It may underestimate the real price since there are additional expenses when producing any product. These expences can include for example labour costs, treatment of waste materials and profit for the producer. Please consider carefully whether this level of data quality is acceptable for your application.

## Inputs from technosphere
- electricity, medium voltage: 0 kWh; pedigree (1,1,1,1,1)
  Calculated value.
  Uncertainty: No uncertainty added - uncertainty based on propagation of the uncertainty of the underlying parameters.
- tap water: 0 kg; name water_use; pedigree (1,1,1,1,1)
  Calculated value. Water input for production of the steam used in the dryer.
  Uncertainty: No uncertainty added - uncertainty based on propagation of the uncertainty of the underlying parameters.
  properties: water content 2962.17, dry mass 0.000337476 kg, carbon content, fossil 0.00178991, wet mass 1 kg
  note on carbon content, fossil: Bicarbonate content is 2.93 mol/m3. CO2 content is 0.1 mol/m3 (ecoinvent v2.2 report 8, Tab 93.1).
- heat, district or industrial, other than natural gas: 0 MJ; pedigree (1,1,1,1,1)
  Calculated value. Based on reported fuel input (in kg), the Net Heating Value of the fuel and efficiency (1/Fuel_use). It is assumed that used oil is heavy fuel oil.
  Uncertainty: No uncertainty added - uncertainty based on propagation of the uncertainty of the underlying parameters.
  property heating value, net 1 MJ; name Net_Heat_Value
  property Corresponding fuel use 1.11111 MJ; name fuel_use; = 1/0.9
  note on heating value, net: Net (lower) heating (calorific) value of the oil. Supposed to be heavy fuel oil. Data from ecoinvent report no5, table 4.1.
  note on Corresponding fuel use: Lower heating value of the fuel input related to the heat/electricity output. Efficiency of 0.9 supposed as proxy.
- chemical factory, organics: 5.90807e-12 unit; = (1/0.93)/factory_annual_production*factory_lifetime; lognormal variance with pedigree 0.51, pedigree (5,5,5,5,5)
  Proxy value for the infrastructures. Calculation based on the evaporated milk production for the removal of 1kg of water (on a basis of basic solid contents of 50% for input and 3.5% for output, 0.93 kg of water are removed for the production of 1kg of evaporated milk) and the total production of the plant among its lifetime.
  property lifetime 50 year; name factory_lifetime
  property chemical factory annual production 9.1e12 kg/year; name factory_annual_production
  note on lifetime: Based on the ecoinvent 2.0 report L Life Cycle Inventories of Chemicals
- heat, district or industrial, natural gas: 0 MJ; pedigree (1,1,1,1,1)
  Calculated value. Heat for production of the steam used in the dryer. It is assumed that steam is produced from natural gas, as it's the prevalent fuel for heat production in Quebec.
  Uncertainty: No uncertainty added - uncertainty based on propagation of the uncertainty of the underlying parameters.
  properties: heating value, net 1 MJ
- electricity, medium voltage: 0.000869859, 0.000166801, 0.00383002, 0.00135972, 0.00280025, 0.0407271, 0.0129099, 0.00574051, 0.0165817 kWh (9 entries); lognormal variance with pedigree 0.04, pedigree (1,1,5,1,1)
  (same comment as for electricity, medium voltage)
- tap water: 0.00103472, 0.000205844, 0.00519056, 0.000135031, 0.000384094, 0.0443541, 0.0593982 kg (7 entries); lognormal variance with pedigree 0.04, pedigree (1,1,5,1,1)
  (same comment as for tap water)
- heat, district or industrial, other than natural gas: 0.119036, 4.84045 MJ (2 entries); lognormal variance with pedigree 0.04, pedigree (1,1,5,1,1)
  (same comment as for heat, district or industrial, other than natural gas)
  properties: heating value, net 1 MJ, Corresponding fuel use 1.11111 MJ
- heat, district or industrial, natural gas: 0.0783898, 0.212086 MJ (2 entries); lognormal variance with pedigree 0.04, pedigree (1,1,5,1,1)
  (same comment as for heat, district or industrial, natural gas)

## Emissions to nature
- Water [air, unspecified]: 0.000110703 m3; = water_use/1000; lognormal variance with pedigree 0.21, pedigree (5,5,5,5,5)
  Calculated value. All steam is supposed to be rejected to atmosphere.
  Uncertainty: No uncertainty added - uncertainty based on propagation of the uncertainty of the underlying parameters.

## Extrapolations
The GLO dataset is based on the Quebec dataset. Uncertainty has been adjusted accordingly.
Proxy dataset based on literature from milk processing equipment manufacturer. Only energy demand of dryer and steam production are considered.
Infrastructure are extrapolated from the "chemical factory, organics" dataset.
The dataset does not include waste and emissions to environment (except steam to air).

## Review by Emilia Moreno Ruiz 2015-09-17
broken formula fixed
