# treatment of waste polyethylene/polypropylene product, collection for final disposal

Dataset: EcoSpold 2, unit process
Geography: Europe without Switzerland
Time period: 1994-01-01 to 2021-12-31
Technology level: current
Classification: ISIC rev.4 ecoinvent: 3821:Treatment and disposal of non-hazardous waste
Classification: EcoSpold01Categories: waste management/building demolition
Synonyms: PE or PP
Tags: Treatment
Scenario: Business-as-Usual
System model: Allocation, cut-off by classification
Generated by: Lucia Valsasina
Published in: Doka G. 2007
Database: ecoinvent
isCopyrightProtected: true
accessRestrictedTo: 1

## General comment
The waste contains 1kg polyethylene/polypropylene (GSD=100%) Waste density is 950 kg/m3. Allocation of energy production in waste incineration: no substitution or expansion. Total burden allocated to waste disposal function of waste incinerator.

## Included activities end
transport to dismantling facilities, final disposal of waste material,

## Technology
Building demolition with skid-steer loaders.

## Reference product
- waste polyethylene/polypropylene product: -1 kg; name RP; CPC 39270: Waste, parings and scrap of plastics; By-product classification Waste
  EcoSpold01Location=CH
  production volume 1.12197 kg; name RP_PV; = 4*0.280493523
    Estimated. The EU without CH production volume is extrapolated from the global production volume using the nominal GDP of 2010 (source: United Nations, http://data.un.org/Glossary.aspx?q=GDP+%28current+US%24%29, accessed 20130726 and 20130312). Where the Global GDP is set to a dummy value of 4.
    Gross domestic product (GDP) at current prices is GDP at prices of the current reporting period. Also known as nominal GDP.
  property price 0 EUR2005; name RP_price_EUR2005
    Waste products are assigned a price of zero as they are assumed to require further treatment.
  property carbon content, fossil 0.748045
    Mixed various plastics was used to estimate the C content of this waste (Tab A.2, ecoinvent v2.2 report 13_I)
  property carbon content 0.748045
    carbon content on a dry matter basis (reserved; not for manual entry)
  properties: carbon content, non-fossil 0, wet mass 1 kg, water in wet mass 0.153 kg, dry mass 0.847 kg, water content 0.180638, heating value, net 42.47 MJ, carbon allocation 0.633594 kg

## Inputs from technosphere
- waste polyethylene: -1 kg; name waste_polyethylene; lognormal variance with pedigree 0.042, pedigree (1,1,5,5,1)
  EcoSpold01Location=CH
  disposed masses. Uncertainty calculated from uncertainty of waste composition
  production volume 1.12197 kg; = waste_polyethylene*RP_PV/ABS(RP)
    Calculated from the production volume of waste polyethylene/polypropylene product in proportion to the respective output amounts.
  property price 0 EUR2005; name waste_polyethylene_price_EUR2005
  properties: wet mass 1 kg, dry mass 0.996 kg, carbon content, fossil 0.825301, water content 0.00401606, heating value, net 42.47 MJ
  note on carbon content, fossil: C content in 1 kg DM was calculated using data in Tab A.1, ecoinvent v2.2 report 13_I
  note on heating value, net: Value taken from the general comment of the treatment dataset.

## Sampling procedure
waste-specific calculation based on literature data

## Extrapolations
This dataset has been extrapolated from year 2002 to the year of the calculation (2021). The uncertainty has been adjusted accordingly.
