# electricity, high voltage, production mix

Dataset: EcoSpold 2, unit process, production mix
Geography: CN-SGCC
Time period: 2014-01-01 to 2021-12-31
Scenario: Business-as-Usual
System model: Allocation, cut-off by classification
Generated by: [System]
Database: ecoinvent
isCopyrightProtected: false
accessRestrictedTo: 1

## General comment
The calculation of the shares of specific generation technologies in this market is based on two sources. (IEA 2017) contains the share of each technology in this market, for year 2014. (IEA 2014) contains the provincial distribution of production volumes of each technology, for year 2012. These two statistics were combined to calculate the share of each province/technology combination in this electricity market.

## Technology
Average technology used to transmit and distribute electricity. Includes underground and overhead lines. Electricity production according to related technology datasets.
Definition of the voltage levels:
- High voltage level above 24 kV (large scale industry)
- Medium voltage level between 1 kV and 24 kV (medium to small scale industry, service sector
and public buildings)
- Low voltage level below 1 kV (Households)

## Reference product
- electricity, high voltage: 1 kWh; By-product classification allocatable product; CPC 17100: Electrical energy
  production volume 4.28609e12 kWh
  property price 0.0977 EUR2005
    Temporary price data. Calculated as 90% of purchasers price based on: 94% of the average price (to account for a 6% loss in transformation and transmission) for electricity for industrial consumersin 2005 (excluded taxes). From IEA.

## Inputs from technosphere
- electricity, high voltage: 0 kWh; source Itten R. 2012; pedigree (1,1,1,1,1)
  Calculated value/estimation. This value compensates for the losses during transmission on the high voltage level and transformation within the high voltage level. The value for total China is used for this sub-market. The calculation is made based on total electricity losses between net electricity available at the busbar and the use of electricity calculated based on the IEA electricity information 2014, table 1.1, Electrity supply vs. transmission losses. These total losses over the whole chain are then allocated to the different voltage levels as well as transformation and transmission losses based on information in Itten et al. 2014. For details please see the documentation available on ecoQuery.
  IEA. 2014. Electricity Information 2014. ISBN 978-92-64-21692-1. International Energy Agency (IEA), Paris Cedex (FR).
  Itten R., Frischknecht R., Stucki M. 2014. Life Cycle Inventories of Electricity Mixes and Grid. Version 1.3. treeze, Uster, Switzerland
- electricity, high voltage: 0, 0, 0, 0, 0, 0, 0, 0, 0, 0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 kWh (223 entries)
  properties: price 0.0977 EUR2005
- electricity, high voltage: 0.00566507 kWh
  production volume 2.37372e10 kWh
- electricity, high voltage: 0 kWh
  properties: exergy 3.6 MJ, price 0.0977 EUR2005
  note on exergy: allocation factor for electricity (=1) vs. heat, where heat is calculated as the termodynamic mean temperature Tm = (Tfeed-Treturn)/ln(Tfeed/Treturn), relative to the application temperature (Tu, typically = 293 K), i.e. (Tm-Tu)/Tm
- electricity, high voltage: 0, 0, 0, 0, 0, 0, 0, 0, 0, 0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 kWh (14 entries)
  note on exergy: This exergy property is based on the exergy content of the product.
- electricity, high voltage: 0, 0, 0, 0, 0, 0, 0, 0, 0, 0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 kWh (12 entries)
  properties: price 0.0977 EUR2005, exergy 3.6 MJ
- electricity, high voltage: 0.0414497 kWh
  production volume 1.73678e11 kWh
- electricity, high voltage: 0.00754586 kWh
  production volume 3.16178e10 kWh
- electricity, high voltage: 0.00905924 kWh
  production volume 3.7959e10 kWh
- electricity, high voltage: 0.0268414 kWh
  production volume 1.12468e11 kWh
- electricity, high voltage: 0.015365 kWh
  production volume 6.43806e10 kWh
- electricity, high voltage: 0.046242 kWh
  production volume 1.93758e11 kWh
- electricity, high voltage: 0.0540401 kWh
  production volume 2.26433e11 kWh
- electricity, high voltage: 0.0168363 kWh
  production volume 7.05456e10 kWh
- electricity, high voltage: 0.0160796 kWh
  production volume 6.73751e10 kWh
- electricity, high voltage: 0.0209561 kWh
  production volume 8.78078e10 kWh
- electricity, high voltage: 0.013242 kWh
  production volume 5.54853e10 kWh
- electricity, high voltage: 0.0861363 kWh
  production volume 3.60919e11 kWh
- electricity, high voltage: 0.0154911 kWh
  production volume 6.4909e10 kWh
- electricity, high voltage: 0.0283968 kWh
  production volume 1.18985e11 kWh
- electricity, high voltage: 0.0717803 kWh
  production volume 3.00766e11 kWh
- electricity, high voltage: 0.0221331 kWh
  production volume 9.27398e10 kWh
- electricity, high voltage: 0.0027535 kWh
  production volume 1.15374e10 kWh
- electricity, high voltage: 0.0260637 kWh
  production volume 1.09209e11 kWh
- electricity, high voltage: 0.0114975 kWh
  production volume 4.81754e10 kWh
- electricity, high voltage: 0.0762363 kWh
  production volume 3.19437e11 kWh
- electricity, high voltage: 0.0168153 kWh
  production volume 7.04576e10 kWh
- electricity, high voltage: 0.0531784 kWh
  production volume 2.22822e11 kWh
- electricity, high voltage: 0.0127166 kWh
  production volume 5.32835e10 kWh
- electricity, high voltage: 0.0369096 kWh
  production volume 1.54654e11 kWh
- electricity, high voltage: 6.30569e-5 kWh
  production volume 2.64214e8 kWh
- electricity, high voltage: 0.0491847 kWh
  production volume 2.06088e11 kWh
- electricity, high voltage: 0.000148963, 0.000148963, 0.000148963 kWh (3 entries)
  production volume 6.24167e8 kWh
- electricity, high voltage: 0.000178755, 0.000178755, 0.000178755, 0.000178755, 0.000178755, 0.000178755 kWh (6 entries)
  production volume 7.48999e8 kWh
- electricity, high voltage: 0.000118924 kWh
  production volume 4.983e8 kWh
- electricity, high voltage: 0.00045225 kWh
  production volume 1.89497e9 kWh
- electricity, high voltage: 0.000737557 kWh
  production volume 3.09043e9 kWh
- electricity, high voltage: 0.000151357 kWh
  production volume 6.34197e8 kWh
- electricity, high voltage: 0.005211 kWh
  production volume 2.18346e10 kWh
- electricity, high voltage: 0.0087513 kWh
  production volume 3.66687e10 kWh
- electricity, high voltage: 0.00767596 kWh
  production volume 3.2163e10 kWh
- electricity, high voltage: 0.000132129 kWh
  production volume 5.53631e8 kWh
- electricity, high voltage: 0.001897 kWh
  production volume 7.94859e9 kWh
- electricity, high voltage: 0.000454071 kWh
  production volume 1.9026e9 kWh
- electricity, high voltage: 0.010373 kWh
  production volume 4.34637e10 kWh
- electricity, high voltage: 0.0297683 kWh
  production volume 1.24732e11 kWh
- electricity, high voltage: 0.00151357 kWh
  production volume 6.34199e9 kWh
- electricity, high voltage: 0.000110507 kWh
  production volume 4.63034e8 kWh
- electricity, high voltage: 0.00287578 kWh
  production volume 1.20498e10 kWh
- electricity, high voltage: 0.000729386 kWh
  production volume 3.05619e9 kWh
- electricity, high voltage: 0.000756785 kWh
  production volume 3.171e9 kWh
- electricity, high voltage: 0.000389204 kWh
  production volume 1.6308e9 kWh
- electricity, high voltage: 0.00871383 kWh
  production volume 3.65117e10 kWh
- electricity, high voltage: 0.00153519 kWh
  production volume 6.43259e9 kWh
- electricity, high voltage: 0.0557426 kWh
  production volume 2.33566e11 kWh
- electricity, high voltage: 0.000556407 kWh
  production volume 2.3314e9 kWh
- electricity, high voltage: 4.32333e-6 kWh
  production volume 1.81152e7 kWh
- electricity, high voltage: 0.00343796 kWh
  production volume 1.44054e10 kWh
- electricity, high voltage: 0.000462719 kWh
  production volume 1.93884e9 kWh
- electricity, high voltage: 0.0039371 kWh
  production volume 1.64968e10 kWh
- electricity, high voltage: 0.00107403 kWh
  production volume 4.50029e9 kWh
- electricity, high voltage: 0.000195526 kWh
  production volume 8.19273e8 kWh
- electricity, high voltage: 0.00023474 kWh
  production volume 9.83582e8 kWh
- electricity, high voltage: 0.000695506 kWh
  production volume 2.91423e9 kWh
- electricity, high voltage: 0.000398132 kWh
  production volume 1.66821e9 kWh
- electricity, high voltage: 0.00119821 kWh
  production volume 5.0206e9 kWh
- electricity, high voltage: 0.00140027 kWh
  production volume 5.86726e9 kWh
- electricity, high voltage: 0.000436256 kWh
  production volume 1.82795e9 kWh
- electricity, high voltage: 0.00041665 kWh
  production volume 1.7458e9 kWh
- electricity, high voltage: 0.000543006 kWh
  production volume 2.27524e9 kWh
- electricity, high voltage: 0.000343123 kWh
  production volume 1.43772e9 kWh
- electricity, high voltage: 0.00223194 kWh
  production volume 9.35201e9 kWh
- electricity, high voltage: 0.0004014 kWh
  production volume 1.6819e9 kWh
- electricity, high voltage: 0.000735809 kWh
  production volume 3.0831e9 kWh
- electricity, high voltage: 0.00185995 kWh
  production volume 7.79334e9 kWh
- electricity, high voltage: 0.000573506 kWh
  production volume 2.40304e9 kWh
- electricity, high voltage: 7.1325e-5 kWh
  production volume 2.98858e8 kWh
- electricity, high voltage: 0.000675354 kWh
  production volume 2.82979e9 kWh
- electricity, high voltage: 0.000297919 kWh
  production volume 1.24831e9 kWh
- electricity, high voltage: 0.00197541 kWh
  production volume 8.27715e9 kWh
- electricity, high voltage: 0.000435712 kWh
  production volume 1.82567e9 kWh
- electricity, high voltage: 0.00137794 kWh
  production volume 5.77369e9 kWh
- electricity, high voltage: 0.000329507 kWh
  production volume 1.38066e9 kWh
- electricity, high voltage: 0.000956388 kWh
  production volume 4.00735e9 kWh
- electricity, high voltage: 1.6337e-6 kWh
  production volume 6.84536e6 kWh
- electricity, high voltage: 0.00127446 kWh
  production volume 5.34009e9 kWh
- electricity, high voltage: 0.000100822 kWh
  production volume 4.22455e8 kWh
- electricity, high voltage: 1.83293e-5 kWh
  production volume 7.68016e7 kWh
- electricity, high voltage: 2.20151e-5 kWh
  production volume 9.22454e7 kWh
- electricity, high voltage: 6.52485e-5 kWh
  production volume 2.73397e8 kWh
- electricity, high voltage: 3.7356e-5 kWh
  production volume 1.56525e8 kWh
- electricity, high voltage: 0.000112478 kWh
  production volume 4.71295e8 kWh
- electricity, high voltage: 0.000131447 kWh
  production volume 5.50776e8 kWh
- electricity, high voltage: 4.09422e-5, 4.09422e-5 kWh (2 entries)
  production volume 1.71551e8 kWh
- electricity, high voltage: 3.91491e-5 kWh
  production volume 1.64038e8 kWh
- electricity, high voltage: 5.10034e-5 kWh
  production volume 2.13709e8 kWh
- electricity, high voltage: 3.2176e-5 kWh
  production volume 1.3482e8 kWh
- electricity, high voltage: 0.000209517 kWh
  production volume 8.77896e8 kWh
- electricity, high voltage: 3.76548e-5 kWh
  production volume 1.57777e8 kWh
- electricity, high voltage: 6.90339e-5 kWh
  production volume 2.89258e8 kWh
- electricity, high voltage: 0.000174598 kWh
  production volume 7.31581e8 kWh
- electricity, high voltage: 5.37926e-5 kWh
  production volume 2.25396e8 kWh
- electricity, high voltage: 6.69419e-6 kWh
  production volume 2.80493e7 kWh
- electricity, high voltage: 6.33558e-5 kWh
  production volume 2.65466e8 kWh
- electricity, high voltage: 2.79921e-5 kWh
  production volume 1.17289e8 kWh
- electricity, high voltage: 0.000185437 kWh
  production volume 7.76998e8 kWh
- electricity, high voltage: 0.00012935 kWh
  production volume 5.4199e8 kWh
- electricity, high voltage: 3.09806e-5 kWh
  production volume 1.29811e8 kWh
- electricity, high voltage: 8.9754e-5 kWh
  production volume 3.76077e8 kWh
- electricity, high voltage: 1.53409e-7 kWh
  production volume 642796 kWh
- electricity, high voltage: 0.000119637 kWh
  production volume 5.01289e8 kWh
- electricity, high voltage: 0.00363257 kWh
  production volume 1.52208e10 kWh
- electricity, high voltage: 0.00765434 kWh
  production volume 3.20724e10 kWh
- electricity, high voltage: 1.48428e-5 kWh
  production volume 6.21926e7 kWh
- electricity, high voltage: 2.70955e-6 kWh
  production volume 1.13533e7 kWh
- electricity, high voltage: 3.24748e-6 kWh
  production volume 1.36072e7 kWh
- electricity, high voltage: 9.6229e-6 kWh
  production volume 4.03208e7 kWh
- electricity, high voltage: 5.50876e-6 kWh
  production volume 2.30822e7 kWh
- electricity, high voltage: 1.66359e-5 kWh
  production volume 6.97058e7 kWh
- electricity, high voltage: 1.94251e-5, 1.94251e-5 kWh (2 entries)
  production volume 8.1393e7 kWh
- electricity, high voltage: 6.03673e-6 kWh
  production volume 2.52944e7 kWh
- electricity, high voltage: 5.76777e-6 kWh
  production volume 2.41675e7 kWh
- electricity, high voltage: 7.52101e-6 kWh
  production volume 3.15137e7 kWh
- electricity, high voltage: 4.75168e-6 kWh
  production volume 1.991e7 kWh
- electricity, high voltage: 3.0881e-5 kWh
  production volume 1.29394e8 kWh
- electricity, high voltage: 5.55857e-6 kWh
  production volume 2.32909e7 kWh
- electricity, high voltage: 1.01608e-5 kWh
  production volume 4.25748e7 kWh
- electricity, high voltage: 2.57009e-5 kWh
  production volume 1.07689e8 kWh
- electricity, high voltage: 7.93939e-6 kWh
  production volume 3.32668e7 kWh
- electricity, high voltage: 9.87194e-7 kWh
  production volume 4.13643e6 kWh
- electricity, high voltage: 9.34398e-6 kWh
  production volume 3.91521e7 kWh
- electricity, high voltage: 4.1241e-6 kWh
  production volume 1.72804e7 kWh
- electricity, high voltage: 2.72948e-5 kWh
  production volume 1.14368e8 kWh
- electricity, high voltage: 6.02677e-6 kWh
  production volume 2.52527e7 kWh
- electricity, high voltage: 1.90267e-5 kWh
  production volume 7.97234e7 kWh
- electricity, high voltage: 4.56241e-6 kWh
  production volume 1.91169e7 kWh
- electricity, high voltage: 1.32489e-5 kWh
  production volume 5.55142e7 kWh
- electricity, high voltage: 2.26128e-8 kWh
  production volume 94749.8 kWh
- electricity, high voltage: 1.7632e-5 kWh
  production volume 7.38798e7 kWh
- electricity, high voltage: 0.000347037 kWh
  production volume 1.45412e9 kWh
- electricity, high voltage: 3.46664e-5 kWh
  production volume 1.45255e8 kWh
- electricity, high voltage: 8.78613e-5 kWh
  production volume 3.68147e8 kWh
- electricity, high voltage: 0.000160006 kWh
  production volume 6.7044e8 kWh
- electricity, high voltage: 0.000128528 kWh
  production volume 5.38542e8 kWh
- electricity, high voltage: 2.86894e-5 kWh
  production volume 1.20211e8 kWh
- electricity, high voltage: 1.78313e-5 kWh
  production volume 7.47146e7 kWh
- electricity, high voltage: 0.000374707 kWh
  production volume 1.57005e9 kWh
- electricity, high voltage: 0.001135 kWh
  production volume 4.75574e9 kWh
- electricity, high voltage: 0.00161945 kWh
  production volume 6.78563e9 kWh
- electricity, high voltage: 6.92331e-5 kWh
  production volume 2.90093e8 kWh
- electricity, high voltage: 0.000707889 kWh
  production volume 2.96612e9 kWh
- electricity, high voltage: 7.80989e-5 kWh
  production volume 3.27242e8 kWh
- electricity, high voltage: 0.000127538, 0.000127538 kWh (2 entries)
  production volume 5.34397e8 kWh
- electricity, high voltage: 0.000577385 kWh
  production volume 2.4193e9 kWh
- electricity, high voltage: 0.000401897 kWh
  production volume 1.68398e9 kWh
- electricity, high voltage: 5.63826e-5 kWh
  production volume 2.36248e8 kWh
- electricity, high voltage: 0.00100842 kWh
  production volume 4.22539e9 kWh
- electricity, high voltage: 0.00381825 kWh
  production volume 1.59988e10 kWh
- electricity, high voltage: 0.000699981 kWh
  production volume 2.93298e9 kWh
- electricity, high voltage: 4.2536e-5 kWh
  production volume 1.7823e8 kWh
- electricity, high voltage: 0.00013347 kWh
  production volume 5.59253e8 kWh
- electricity, high voltage: 3.55629e-5 kWh
  production volume 1.49012e8 kWh
- electricity, high voltage: 0.000957415 kWh
  production volume 4.01166e9 kWh
- electricity, high voltage: 0.000753369 kWh
  production volume 3.15668e9 kWh
- electricity, high voltage: 5.73788e-5 kWh
  production volume 2.40422e8 kWh
- electricity, high voltage: 0.00133372 kWh
  production volume 5.58841e9 kWh
- electricity, high voltage: 9.88191e-7 kWh
  production volume 4.14061e6 kWh
- electricity, high voltage: 4.43291e-5 kWh
  production volume 1.85743e8 kWh
- electricity, high voltage: 9.88191e-6 kWh
  production volume 4.14061e7 kWh
- electricity, high voltage: 6.13634e-6 kWh
  production volume 2.57118e7 kWh
- electricity, high voltage: 0.000129144 kWh
  production volume 5.41126e8 kWh
- electricity, high voltage: 0.00039118 kWh
  production volume 1.63908e9 kWh
- electricity, high voltage: 0.000558147 kWh
  production volume 2.33869e9 kWh
- electricity, high voltage: 2.38082e-5 kWh
  production volume 9.97586e7 kWh
- electricity, high voltage: 0.000243976 kWh
  production volume 1.02228e9 kWh
- electricity, high voltage: 2.68963e-5 kWh
  production volume 1.12698e8 kWh
- electricity, high voltage: 4.39307e-5, 4.39307e-5 kWh (2 entries)
  production volume 1.84073e8 kWh
- electricity, high voltage: 0.000198998 kWh
  production volume 8.33819e8 kWh
- electricity, high voltage: 0.000138515 kWh
  production volume 5.8039e8 kWh
- electricity, high voltage: 0.000347557 kWh
  production volume 1.4563e9 kWh
- electricity, high voltage: 0.00131597 kWh
  production volume 5.51405e9 kWh
- electricity, high voltage: 0.000241251 kWh
  production volume 1.01086e9 kWh
- electricity, high voltage: 1.46436e-5 kWh
  production volume 6.13578e7 kWh
- electricity, high voltage: 4.60226e-5 kWh
  production volume 1.92839e8 kWh
- electricity, high voltage: 1.22528e-5 kWh
  production volume 5.13402e7 kWh
- electricity, high voltage: 0.000329977 kWh
  production volume 1.38263e9 kWh
- electricity, high voltage: 0.000259651 kWh
  production volume 1.08796e9 kWh
- electricity, high voltage: 1.9724e-5 kWh
  production volume 8.26452e7 kWh
- electricity, high voltage: 0.000459671 kWh
  production volume 1.92606e9 kWh
- electricity, high voltage: 3.40687e-7 kWh
  production volume 1.42751e6 kWh
- electricity, high voltage: 0.000108267 kWh
  production volume 4.53647e8 kWh
- electricity, high voltage: 2.41071e-5 kWh
  production volume 1.01011e8 kWh
- electricity, high voltage: 1.49424e-5 kWh
  production volume 6.261e7 kWh
- electricity, high voltage: 0.000315638 kWh
  production volume 1.32255e9 kWh
- electricity, high voltage: 0.000956077 kWh
  production volume 4.00605e9 kWh
- electricity, high voltage: 0.00136416 kWh
  production volume 5.71595e9 kWh
- electricity, high voltage: 5.82754e-5 kWh
  production volume 2.44179e8 kWh
- electricity, high voltage: 0.000596299 kWh
  production volume 2.49855e9 kWh
- electricity, high voltage: 6.57466e-5 kWh
  production volume 2.75484e8 kWh
- electricity, high voltage: 0.000107434, 0.000107434 kWh (2 entries)
  production volume 4.50158e8 kWh
- electricity, high voltage: 0.000486367 kWh
  production volume 2.03792e9 kWh
- electricity, high voltage: 0.000338542 kWh
  production volume 1.41852e9 kWh
- electricity, high voltage: 4.75168e-5 kWh
  production volume 1.991e8 kWh
- electricity, high voltage: 0.000849457 kWh
  production volume 3.5593e9 kWh
- electricity, high voltage: 0.00321635 kWh
  production volume 1.34768e10 kWh
- electricity, high voltage: 0.000589636 kWh
  production volume 2.47063e9 kWh
- electricity, high voltage: 3.57621e-5 kWh
  production volume 1.49847e8 kWh
- electricity, high voltage: 0.000112431 kWh
  production volume 4.71094e8 kWh
- electricity, high voltage: 2.99844e-5 kWh
  production volume 1.25637e8 kWh
- electricity, high voltage: 0.00080649 kWh
  production volume 3.37927e9 kWh
- electricity, high voltage: 0.000634609 kWh
  production volume 2.65907e9 kWh
- electricity, high voltage: 4.83138e-5 kWh
  production volume 2.02439e8 kWh
- electricity, high voltage: 0.00112347 kWh
  production volume 4.70746e9 kWh
- electricity, high voltage: 8.3279e-7 kWh
  production volume 3.48946e6 kWh
- electricity, high voltage: 2.38658e-13 kWh
  production volume 1 kWh
- electricity, high voltage: 4.96409e-5 kWh
  production volume 2.08e8 kWh
- electricity, high voltage: 2.98323e-5, 2.98323e-5 kWh (2 entries)
  production volume 1.25e8 kWh
- electricity, high voltage: 1.45582e-5 kWh
  production volume 6.1e7 kWh
- electricity, high voltage: 4.86863e-5 kWh
  production volume 2.04e8 kWh
- electricity, high voltage: 1.71834e-5 kWh
  production volume 7.2e7 kWh
- electricity, high voltage: 0.00209494 kWh
  production volume 8.778e9 kWh
- electricity, high voltage: 0.000116465 kWh
  production volume 4.88e8 kWh
- electricity, high voltage: 0.000202144 kWh
  production volume 8.47e8 kWh
- electricity, high voltage: 5.7278e-5 kWh
  production volume 2.4e8 kWh
- electricity, high voltage: 9.06902e-5 kWh
  production volume 3.8e8 kWh
- electricity, high voltage: 3.12642e-5 kWh
  production volume 1.31e8 kWh
- electricity, high voltage: 0.000166106 kWh
  production volume 6.96e8 kWh
- electricity, high voltage: 6.89723e-5 kWh
  production volume 2.89e8 kWh
- electricity, high voltage: 0.000125773 kWh
  production volume 5.27e8 kWh
- electricity, high voltage: 0.00012625 kWh
  production volume 5.29e8 kWh
- electricity, high voltage: 4.41518e-5 kWh
  production volume 1.85e8 kWh
- electricity, high voltage: 3.914e-5 kWh
  production volume 1.64e8 kWh
- electricity, high voltage: 0.000111692 kWh
  production volume 4.68e8 kWh
- electricity, high voltage: 5.89486e-5 kWh
  production volume 2.47e8 kWh
- electricity, high voltage: 3.03096e-5 kWh
  production volume 1.27e8 kWh
- electricity, high voltage: 3.41281e-5 kWh
  production volume 1.43e8 kWh
- electricity, high voltage: 3.96173e-5 kWh
  production volume 1.66e8 kWh
- electricity, high voltage: 6.20512e-6 kWh
  production volume 2.6e7 kWh
- electricity, high voltage: 2.38658e-7 kWh
  production volume 1e6 kWh
- electricity, high voltage: 0.000155367 kWh
  production volume 6.51e8 kWh
- electricity, high voltage: 5.10729e-5 kWh
  production volume 2.14e8 kWh

## Extrapolations
This dataset has been extrapolated from year 2017 to the year of the calculation (2021). The uncertainty has been adjusted accordingly.
