# nitric acid production, product in 50% solution state

Dataset: EcoSpold 2, unit process
Geography: RoW
Time period: 2011-01-01 to 2021-12-31
Technology level: current
Classification: ISIC rev.4 ecoinvent: 2012:Manufacture of fertilizers and nitrogen compounds
Synonyms: Aqua fortis; Hydrogen nitrate; Salpetersaeure; Azotic acid
Scenario: Business-as-Usual
System model: Allocation, cut-off by classification
Generated by: Anna Kounina
Database: ecoinvent
isCopyrightProtected: true
accessRestrictedTo: 1

## General comment
This dataset is a weighted average from the respective regional datasets.
This dataset represents the production of 1 kg of nitric acid, with 100% HNO3, via the oxidation of ammonia (Ostwald process). Nitric acid is a colourless to yellow liquid with an acrid odour. It is a chemical of major industrial importance. Its main use is as a starting material in the production of ammonium-, calcium- and potassium-nitrates for the fertiliser industry. These nitrates are either used directly as fertilisers or are mixed into compound fertilisers. About 75 to 85% of the nitric acid produced are used in the fertiliser sector. Nitric acid is also used for the digestion of crude phosphates, as nitrating agent in the preparation of explosives and organic intermediates such as nitroalkanes and nitroaromatics. It is furthermore used in the production of adipic acid, in metallurgy and in rocket fuel production.
Nitric acid is produced with the Ostwald process where anhydrous ammonia is oxidized to nitric oxide, in the presence of platinum or rhodium gauze catalyst at a high temperature of about 500 K and a pressure of 9 atm.
4 NH3 + 5 O2 → 4 NO + 6 H2O
Nitric oxide is then reacted with oxygen in air to form nitrogen dioxide (NO2).
2 NO + O2 → 2 NO2
This is subsequently absorbed in water to form nitric acid (HNO3) and nitric oxide (NO).
3 NO2 + H2O → 2 HNO3 + NO
The process can however result in undesired chemical reactions:
4 NH3 + 3 O2 → 2 N2 + 6 H2O4 (production of hydroxyperoxide), or
NH3 + 4 O2 → 2 N2O + 6 H2O (production of nitrous oxide)
The production process involves the following main unit operations in their sequential order: air filtration, air compression, air/ammonia mixing, air/ammonia oxidation over catalytic gauzes, Energy recovery by steam generation and/or gas re-heating, gas cooling, gas compression, energy recovery and cooling (dual pressure plants only), absorption, with the production of nitric acid, waste gas (tail gas) heating, energy recovery by expansion of the waste gas to atmosphere, in a gas turbine. The reaction from ammonia to nitric acid is exothermic, therefore steam is generated as co-product.
The production results in emissions of nitrogen oxides (NO and NO2) and nitrous oxide (N2O) to air. In modern production plants, nitrous oxide emissions are abatted by catalytic decomposition, where N2O is split into gaseous nitrogen (N2) and oxygen (O2) with a catalyst. The dataset does not include the catalysts and is up to the user to add them if deemed relevant.
This dataset corresponds to the technology used in China, where it is assumed that N2O abatement technology is only used to a small extent (based on Integer Research, 2016).
The main data sources for this dataset are Fertilizers Europe (2014, 2016). Additional data sources are listed as follows.
References:
Fertilizers Europe (2000): Best Available Techniques for Pollution Prevention and Control in the European Fertilizer Industry. Booklet No. 1 of 8: Production of Ammonia. Fertilizers Europe, Brussels.
Kongshaug G. (1998): Energy Consumption and Greenhouse Gas Emissions in Fertilizer Production. IFA 20th July 1998
Davies J., Haglund C. (1999): Life Cycle Inventory of Fertiliser Production. SIK-Report No 654 1999. Chalmers University of Technology, Sweden.
Fertilizers Europe (2000): Best Available Techniques for Pollution Prevention and Control in the European Fertilizer Industry. Booklet No. 2 of 8: Production of Nitric Acid. Fertilizers Europe, Brussels.
Patyk R., Reinhardt, G.A. (1997): Düngemittel - Energie- und Stoffstrombilanzen. Vieweg Verlag, Braunschweig.
Fertilizers Europe (2014): Average Emissions Year 2011. Fertilizers Europe Environmental report (internal).
Fertilizers Europe (2016): Carbon Footprint Calculator for Fertilizer Production. Specification. Version 2.1
Fertilizers Europe (2016): Average Emissions Year 2014. Fertilizers Europe Environmental report (internal). Used for updated energy and GHG emission in Carbon Footprint Calculator
Integer Research (2016): Regional N2O and CO2emissions from ammonia and nitric acid production 2014. Internal report for Fertilizers Europe.
Althaus H.-J., Chudacoff M., Hischier R., Jungbluth N., Osses M. and Primas A. (2007) Life Cycle Inventories of Chemicals. ecoinvent report No. 8, v2.0. EMPA Dübendorf, Swiss Centre for Life Cycle Inventories, Dübendorf, CH.

## Included activities start
The activity includes all the raw and processed materials necessary to produce this product. Liquid ammonia, water and electricity are included. Direct emissions include ammonia, nitrous oxide and nitrogen oxides to air, as well as nitrogen to water.

## Included activities end
The activity ends with the final product being ready for transportation at the production site.

## Geography
This dataset is a weighted average built from the following geographies: RER, RNA, CN, RLA, SAS, FSU, RAF, UN-SEASIA, RME, UN-OCEANIA.

## Technology
Average techlogy from the regional counterparts as given in the geography comment.

## Time period
Primary data were collected on nitric acid production for the year 2013-2014. These data were based on annual average data based on different production plants.

## Reference product
- nitric acid, without water, in 50% solution state: 1 kg; name RP; CPC 34233: Nitric acid, sulphonitric acids; By-product classification allocatable product; CAS 7697-37-2
  production volume 2.79465e12 kg; name PVRP
    Estimated value in kg/y. In 1987 nitric acid production is reported to be circa 26882000000000 Kg. The PV was scaled according to the nominal GDP in 2014 of the given region and the global nominal GDP in 2014 (retrieved from: https://unstats.un.org/unsd/snaama/Basic, accessed 20200512). The nominal GDP corresponds to GDP at current price-US Dollars (source: United Nations, http://data.un.org/Glossary.aspx?q=GDP+%28current+US%24%29, accessed 20200512).
  property hydrogen content 0.0159952
    Hydrogen content (on a dry matter basis) of nitric acid, without water, in 50% solution state is calculated from the molecular formula of the substance (HNO3).
  property nitrogen content 0.222283
    Nitrogen content (on a dry matter basis) of nitric acid, without water, in 50% solution state is calculated from the molecular formula of the substance (HNO3).
  property oxygen content 0.761721
    Oxygen content (on a dry matter basis) of nitric acid, without water, in 50% solution state is calculated from the molecular formula of the substance (HNO3).
  property price 0.127 EUR2005; name RP_price_EUR2005
    Official Data Foundation (2020). Inflation Calculator [Online]. Available from: https://www.officialdata.org/us/inflation/2005?endYear=2019&amount=1 [Accessed 28/07/2020]
  property carbon content, fossil 0
    Carbon content, fossil is calculated based on the chemical formula of the substance.
  property carbon content 0
    carbon content on a dry matter basis (reserved; not for manual entry)
  property true value 0.127; name RP_true_value
    allocation property applied in "true value" allocation // value calculated from revenue
  properties: water in wet mass 0 kg, dry mass 1 kg, carbon content, non-fossil 0, wet mass 1 kg, water content 0, carbon allocation 0 kg

## By-products
- steam, in chemical industry: 0 kg; name BPS; CPC 17300: Steam and hot water; By-product classification allocatable product; CAS 7732-18-5; pedigree (1,1,1,1,1)
  This flow is weighted averages using the exchanges in the corresponding regional data.
  production volume 1.81471e12 kg; = PVRP*BPS/RP
    Calculated based on the production volume of the reference product.
  property price 0.015 EUR2005; name BPS_price_EUR2005
    Data related to the price of steam were provided by Yara International (https://www.yara.com/)
  property carbon content 0
    carbon content on a dry matter basis (reserved; not for manual entry)
  property true value 0.00974026; name BPS_true_value
    allocation property applied in "true value" allocation // value calculated from revenue
  properties: water in wet mass 0 kg, dry mass 1 kg, carbon content, non-fossil 0, carbon content, fossil 0, wet mass 1 kg, water content 0, carbon allocation 0 kg

## Inputs from technosphere
- electricity, low voltage: 0 kWh; pedigree (1,1,1,1,1)
  This flow is weighted averages using the exchanges in the corresponding regional data.
- chemical factory, organics: 3.79089e-10 unit; lognormal variance with pedigree 0.308, pedigree (3,4,3,5,1)
  This flow is weighted averages using the exchanges in the corresponding regional data.
- tap water: 0.414155 kg; lognormal variance with pedigree 0.0086, pedigree (3,4,3,5,1)
  This flow is weighted averages using the exchanges in the corresponding regional data.
  properties: carbon content, fossil 0.00178991, water content 2962.17, dry mass 0.000337476 kg, wet mass 1 kg
  note on carbon content, fossil: Bicarbonate content is 2.93 mol/m3. CO2 content is 0.1 mol/m3 (ecoinvent v2.2 report 8, Tab 93.1).
- ammonia, anhydrous, liquid: 0.269153 kg; lognormal variance with pedigree 0.0086, pedigree (3,4,3,5,1)
  This flow is weighted averages using the exchanges in the corresponding regional data.
  properties: hydrogen content 0.177547, dry mass 1 kg, wet mass 1 kg, nitrogen content 0.822453
  note on hydrogen content: Hydrogen content (on a dry matter basis) of ammonia, anhydrous, liquid is calculated from the molecular formula of the substance (H3N).
  note on nitrogen content: Nitrogen content (on a dry matter basis) of ammonia, anhydrous, liquid is calculated from the molecular formula of the substance (H3N).
- electricity, low voltage: 0.00034249, 1.55964e-5, 5.31536e-5, 4.76829e-5, 1.30794e-5, 3.04227e-5, 0.00012823, 0.000158815, 0.000190709, 4.80864e-5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 kWh (28 entries); lognormal variance with pedigree 0.0086, pedigree (3,4,3,5,1)
  This flow is weighted averages using the exchanges in the corresponding regional data.

## Inputs from nature
- Water, unspecified natural origin [natural resource, in water]: 0.00185754 m3; lognormal variance with pedigree 0.0086, pedigree (3,4,3,5,1)
  This flow is weighted averages using the exchanges in the corresponding regional data.

## Emissions to nature
All rows: lognormal variance with pedigree 0.048, pedigree (3,4,3,5,1)
- Nitrogen [air, unspecified]: 0.0019813 kg
  This flow is weighted averages using the exchanges in the corresponding regional data.
- Ammonia [air, urban air close to ground]: 0.00232192 kg
  This flow is weighted averages using the exchanges in the corresponding regional data.
- Nitrogen oxides [air, urban air close to ground]: 0.000407521 kg
  This flow is weighted averages using the exchanges in the corresponding regional data.
- Dinitrogen monoxide [air, urban air close to ground]: 0.00389752 kg
  This flow is weighted averages using the exchanges in the corresponding regional data.
- Nitrogen [water, surface water]: 0.000122257 kg
  This flow is weighted averages using the exchanges in the corresponding regional data.
- Water [water, surface water]: 0.00208499 m3
  This flow is weighted averages using the exchanges in the corresponding regional data.

## Extrapolations
This dataset was built as a weighted average of regional datasets of the same activityName. Weights are based on production volumes.
RER: production volume = 7.57e+12 kg/year, weight = 0.3055
RNA: production volume = 6.56e+12 kg/year, weight = 0.2649
CN: production volume = 3.54e+12 kg/year, weight = 0.143
RLA: production volume = 2.15e+12 kg/year, weight = 0.08678
SAS: production volume = 1.03e+12 kg/year, weight = 0.04158
FSU: production volume = 9.34e+11 kg/year, weight = 0.0377
RAF: production volume = 8.64e+11 kg/year, weight = 0.03489
UN-SEASIA: production volume = 8.61e+11 kg/year, weight = 0.03477
RME: production volume = 6.77e+11 kg/year, weight = 0.02732
UN-OCEANIA: production volume = 5.82e+11 kg/year, weight = 0.02348
