# polystyrene production, extruded, CO2 blown

Dataset: EcoSpold 2, unit process
Geography: RoW
Time period: 1994-01-01 to 2021-12-31
Technology level: current
Classification: EcoSpold01Categories: insulation materials/production
Classification: ISIC rev.4 ecoinvent: 2013:Manufacture of plastics and synthetic rubber in primary forms
Synonyms: XPS
Tags: ConvertedDataset
Scenario: Business-as-Usual
System model: Allocation, cut-off by classification
Generated by: Dominic Notter
Published in: Hischier, R. 2009
Database: ecoinvent
isCopyrightProtected: true
accessRestrictedTo: 1

## General comment
This dataset can be used in the construction building sector. The cutting of the extruded polystyrene blocks is not included in the process. Blowing agent is CO2 (50.7% w/w). Co-blowing agent ist aceton (49.3% w/w). Process emissions are 25% (w/w) for aceton.
[This dataset was already contained in the ecoinvent database version 2. It was not individually updated during the transfer to ecoinvent version 3. Life Cycle Impact Assessment results may still have changed, as they are affected by changes in the supply chain, i.e. in other datasets. This dataset was generated following the ecoinvent quality guidelines for version 2. It may have been subject to central changes described in the ecoinvent version 3 change report (http://www.ecoinvent.org/database/ecoinvent-version-3/reports-of-changes/), and the results of the central updates were reviewed extensively. The changes added e.g. consistent water flows and other information throughout the database. The documentation of this dataset can be found in the ecoinvent reports of version 2, which are still available via the ecoinvent website. The change report linked above covers all central changes that were made during the conversion process.]

## Included activities end
The dataset describes the production of extruded polystyrene. Included processes are the melting of polystyrene pearls in the extruder, the discharge through a slot die, as well as the cooling with water.

## Geography
Data for leading polystyrene XPS producers in Germany and the USA. Applicable for Europe and North America.

## Technology
Extrusion process of expandable polystyrene including discharge via slot die. CO2 as blowing agents, aceton as Co-blowing agent.

## Time period
Technology in 1994 was still using CFC or HCFC as blowing agent. In 2005, already more than 50% of companies in Europe are using CO2 as blowing agent. Though mainly in the USA, HFC-134a and HFC-152a as a blowing agent are still common.

## Parameters
- fraction, cooling water, cooling pond system, to air: 0.032 dimensionless; lognormal variance with pedigree 0.0413, pedigree (2,3,1,3,1)
- fraction, cooling water, recirculating system, to air: 0.771 dimensionless; lognormal variance with pedigree 0.0413, pedigree (2,3,1,3,1)
- fraction, cooling water, once-through system, to air: 0.004 dimensionless; lognormal variance with pedigree 0.0413, pedigree (2,3,1,3,1)
- fraction, cooling water, to air: 0.3875 dimensionless; lognormal variance with pedigree 0.092025, pedigree (4,4,3,2,4)

## Reference product
- polystyrene, extruded: 1 kg; CPC 34720: Polymers of styrene, in primary forms; By-product classification allocatable product
  EcoSpold01Location=RER
  production volume 7.51682e8 kg
    27E9 kg styrene capacity ; 90% capacity use; assumed 8% is used in XPS ; 50% assumed to be extruded with CO2
  property price 1.29 EUR2005
    Estimated price to be the same as polystyrene, general purpose.
  property carbon content, fossil 0.873427
    XPS consists in 91% of polystyrene, 7% of blowing agent and the remaining 2% are flame retardants (bromine compounds) and other additives (ecoinvent v2.2 report 16_part XIV). The chemical formula of polystyrene is (C8H8)n. Here, the blowing agent is CO2 (3.55% w/w), and co-blowing agent is acetone -C3H6O- (3.45% w/w). Process emissions are 25% (w/w) for aceton (Tab 4.24, ecoinvent v2.2 report 16, part XIV), that means that contribution to the C content of the final product are 3.55% for CO2 and 2.6% for acetone
  property carbon content 0.873427
    carbon content on a dry matter basis (reserved; not for manual entry)
  properties: water in wet mass 0 kg, water content 0, carbon content, non-fossil 0, wet mass 1 kg, dry mass 1 kg, heating value, net 38.67 MJ, carbon allocation 0.873427 kg

## Inputs from technosphere
- fluorspar, 97% purity: 0.005 kg; lognormal variance with pedigree 0.056, pedigree (3,4,5,5,1)
  EcoSpold01Location=GLO
  properties: dry mass 1 kg, wet mass 1 kg
- chemical, inorganic: 0.01 kg; lognormal variance with pedigree 0.0546, pedigree (2,4,5,5,1)
  EcoSpold01Location=GLO
  properties: carbon content, fossil 0.003, wet mass 1 kg, dry mass 1 kg
  note on carbon content, fossil: This dataset is an unweighted average of 20 inorganic substances (listed in Tab 88.1, ecoinvent v2.2 report 8, part II), being part of the top100 chemicals included in this database. The C-content has also been calculated as an unweighted average of the C content of the substances composing this dataset.
- polystyrene, expandable: 0.92144 kg; lognormal variance with pedigree 0.0546, pedigree (2,4,5,5,1)
  EcoSpold01Location=RER
  properties: wet mass 1 kg, dry mass 1 kg, heating value, net 38.67 MJ, carbon content, fossil 0.923077
  note on carbon content, fossil: Chemical formula of polystyrene is (C8H8)n (ecoinvent v2.2 report 11_II)
- acetone, liquid: 0.033 kg; lognormal variance with pedigree 0.0546, pedigree (2,4,5,5,1)
  EcoSpold01Location=RER
  properties: heating value, net 31.32 MJ, carbon content, fossil 0.62069, dry mass 1 kg, wet mass 1 kg
- explosives factory: 6.67e-9 unit; lognormal variance with pedigree 0.35, pedigree (5,5,5,5,5)
  EcoSpold01Location=CH
- sodium chloride, powder: 0.005 kg; lognormal variance with pedigree 0.056, pedigree (3,4,5,5,1)
  EcoSpold01Location=RER
  properties: dry mass 1 kg, wet mass 1 kg
- electricity, medium voltage: 0 kWh; pedigree (1,1,1,1,1)
  EcoSpold01Location=UCTE
- waste polystyrene: 0 kg; pedigree (1,1,1,1,1)
  EcoSpold01Location=CH
  production volume 0 kg
    Calculated from the production volume of polystyrene, extruded in proportion to the respective output amounts.
  properties: heating value, net 38.67 MJ, water content 0.00200401, dry mass 0.998 kg, carbon content, fossil 0.922579, wet mass 1 kg
  note on heating value, net: Value taken from the general comment of the treatment dataset.
- carbon dioxide, liquid: 0.034 kg; lognormal variance with pedigree 0.0532, pedigree (2,3,5,5,1)
  EcoSpold01Location=RER
  properties: carbon content, fossil 0.272727, dry mass 1 kg, wet mass 1 kg, heating value, net 8.27 MJ
- electricity, medium voltage: 0.0127459, 0.00244412, 0.0199238, 0.0410317, 0.59677, 0.084115, 0.242969 kWh (7 entries); lognormal variance with pedigree 0.0546, pedigree (2,4,5,5,1)
  EcoSpold01Location=UCTE
- waste polystyrene: -8.79645e-5, -5.87745e-6, -4.44502e-7, -2.4276e-6, -9.80721e-7, -2.30523e-6 kg (6 entries); lognormal variance with pedigree 0.0546, pedigree (2,4,5,5,1)
  EcoSpold01Location=CH
  production volume 75168.2 kg

## Inputs from nature
- Water, cooling, unspecified natural origin [natural resource, in water]: 0.0197 m3; lognormal variance with pedigree 0.056, pedigree (3,4,5,5,1)

## Emissions to nature
- Water [water, unspecified]: 0.0120663 m3; lognormal variance with pedigree 0.0827, pedigree (2,2,5,5,1)
  Calculated value based on literature values and expert opinion. See comments in the parametres' comment field.
  property wet mass 1000 kg; name WM
  property water in wet mass 1000 kg; name WWM
  property dry mass 0 kg; name DM
  property carbon content, fossil 0; name C_content_fossil
  property carbon content, non-fossil 0; name C_content_non_fossil
- Acetone [air, unspecified]: 0.00825 kg; lognormal variance with pedigree 0.0946, pedigree (2,4,5,5,1)
- Water [air, unspecified]: 0.00763375 m3; lognormal variance with pedigree 0.0827, pedigree (2,2,5,5,1)
  (same comment as for Water)
- Styrene [air, unspecified]: 9.2144e-5 kg; lognormal variance with pedigree 0.096, pedigree (3,4,5,5,1)

## Sampling procedure
Literature, database

## Extrapolations
see Geography This dataset has been copied from an original dataset covering the geography RER. The uncertainty has been adjusted accordingly.

## Review by Hans-Jörg Althaus 2009-02-05
passed
