# operation, computer, desktop, with liquid crystal display, standby mode

Dataset: EcoSpold 2, unit process
Geography: Europe without Switzerland
Time period: 2001-01-01 to 2021-12-31
Technology level: current
Classification: ISIC rev.4 ecoinvent: 8219:Photocopying, document preparation and other specialized office support act
Classification: EcoSpold01Categories: electronics/services
Synonyms: PC; LCD
Tags: Operation
Scenario: Business-as-Usual
System model: Allocation, cut-off by classification
Generated by: Martin Lehmann
Published in: Hischier R. 2007
Database: ecoinvent
isCopyrightProtected: false
accessRestrictedTo: 1

## General comment
The computer desktop use in the standby/sleep mode includes the share of computer production (CPU, keyboard, mouse, LCD) as well as the energy consumption (use-phase) and the rail and road transport from factory to user. Energy consumption of computer CPUs and LCD monitors (use-phase) vary a lot depending on the computer looked at. Min.-Max. values are listed; the mean value is calculated via the most likely value according to the reference data. Due to relatively vague literature data for computer and LCD life span, assumptions had to be made.

## Included activities end
Describes the use of a desktop computer with a LCD monitor in the standby/sleep mode. Calculated per 1 hour of computer use. Computer life span assumed to be 4 years, for the LCD monitor 6 years. Standby/sleep mode 2 hours a day (office use), 240 days a year. UCTE production mix applied for electricity consumption (low voltage).

## Geography
The data is based on information by international computer manufacturers and literature (standby/sleep mode consumption).

## Technology
No technology involved, except for the production of the desktop computer (including LCD, keyboard and mouse), which is described in another dataset.

## Parameters
- number of hours in a day when computer (desktop) is in standby mode - home use: 2.62 dimensionless; name no_hours_computer_desktop_SM_home_use; lognormal variance with pedigree 0.0127, pedigree (4,4,3,3,1)
  Literature value (Williams, 2005).
- fraction of computers desktop sold for office use: 0.9 dimensionless; name fraction_computer_desktop_office_use; lognormal variance with pedigree 0.2106, pedigree (5,5,5,5,5)
  Estimation
- number of computers (desktop) sold in 2005 world: 1.304e8 dimensionless; name no_computer_desktop_sold_GLO_2005; = 130.4*1000000; lognormal variance with pedigree 0.0166, pedigree (4,5,1,1,1)
  Literature value (http://www.etforecasts.com/products/ES_pcww1203.htm). Number of computers (desktop, units) sold in 2005 in the whole world.
- number of hours in a day when computer (desktop) is in standby mode - office use: 2 dimensionless; name no_hours_computer_desktop_SM_office_use; lognormal variance with pedigree 0.0127, pedigree (4,4,3,3,1)
  Literature value (Williams, 2005).
- number of computers (desktop) sold in 4 years: 4.79462e8 dimensionless; name no_computer_desktop_sold_4years; = no_computer_desktop_sold_GLO_2005+((123.109+116.226+109.727)*1000000); lognormal variance with pedigree 0.0166, pedigree (4,5,1,1,1)
  Calculated value. Number of computers (desktop) sold in 4 years (from 2002 - 2005 included). Using annual growth of 5.92%. Literature value (http://www.etforecasts.com/products/ES_pcww1203.htm); worldwide sales of desktop computers in millions in 2005 was 130.4 mill. units. Calculated values (using annual growth of 5.92%); 123.1 mil. (2004), 116.2 mil. (2003) and 109.7 mil. (2002).
- fraction of computers (desktop) sold with liquid crystal display: 0.64 % (obsolete); name fraction_computer_desktop_LCD_display; lognormal variance with pedigree 0.0566, pedigree (4,5,5,1,1)
  Literature value (ecoinvent report v2 no.18 IV).
- number of days in a year computer desktop office use: 200 dimensionless; name no_days_computer_desktop_office_use; lognormal variance with pedigree 0.1786, pedigree (4,5,5,5,5)
  Estimation (based on assumptions made in ecoinvent report no.18 IV ecoinvent database v2). Number of days in the year when computer (desktop) is used in the office.
- number of days in a year computer desktop home use: 365 dimensionless; name no_days_computer_desktop_home_use; lognormal variance with pedigree 0.1786, pedigree (4,5,5,5,5)
  Estimation (based on assumptions made in ecoinvent report no.18 IV ecoinvent database v2). Number of days in the year when computer (desktop) is used in a home.
- fraction of computers desktop sold for home use: 0.1 dimensionless; name fraction_computer_desktop_home_use; lognormal variance with pedigree 0.2106, pedigree (5,5,5,5,5)
  Estimation

## Reference product
- operation, computer, desktop, with liquid crystal display, standby mode: 1 hour; CPC 85: Support services; By-product classification allocatable product
  production volume 3.48913e10 hour; = ((no_computer_desktop_sold_4years* fraction_computer_desktop_LCD_display* fraction_computer_desktop_office_use* no_days_computer_desktop_office_use* no_hours_computer_desktop_SM_office_use)+( no_computer_desktop_sold_4years* fraction_computer_desktop_LCD_display*fraction_computer_desktop_home_use* no_days_computer_desktop_home_use* no_hours_computer_desktop_SM_home_use))*(1.41E+13/5.65E+13)
    Calculated value based on literature values and estimates. See comments of the parametres used to calculate this value. Computer (desktop) lifetime is estimated to be 4 years (based on ecoinvent report v2 18, IV). The amount of computers (desktop) sold in total in 4 years is calculated. 36% are sold with CRT screen and 64% with LCD screen. It is assumed that 90% of those computers are being used in an office and 10% in a home. The ones used in an office in standby mode are used 200 days in a year, 2 hours a day. The ones used in a home in standby mode are used 365 days in a year, 2.62 hours a day. The European production volume is extrapolated from the global one using GDP (IMF, 2012, http://www.imf.org/external/pubs/ft/weo/2010/01/weodata/index.aspx). GDP (PPP) world = 5.65E+13 USD in 2005, GDP (PPP) Europe - Switzerland = 1.41E+11 USD in 2005.
  property price 0.0215953 EUR2005
    Calculated based on inputs: The price of the product has been calculated as a sum of the values of the material and energy inputs for this product. This value is therefore a rough estimation. It may underestimate the real price since there are additional expenses when producing any product. These expences can include for example labour costs, treatment of waste materials and profit for the producer. Please consider carefully whether this level of data quality is acceptable for your application.

## Inputs from technosphere
- display, liquid crystal, 17 inches: 1.9026e-5 unit; lognormal variance with pedigree 0.052625, pedigree (3,3,5,2,1)
  EcoSpold01Location=GLO
  properties: carbon content, non-fossil 7.50159e-5, carbon content, fossil 0.309893, wet mass 5.1 kg, dry mass 5.1 kg
  note on carbon content, non-fossil: Calculated as the addition of C contents in the product composition, then referred to 1 kg DM
- electricity, low voltage: 0.03 kWh; lognormal variance with pedigree 0.041225, pedigree (2,3,5,2,1)
  EcoSpold01Location=UCTE
- keyboard: 2.8539e-5 unit; lognormal variance with pedigree 0.052625, pedigree (3,3,5,2,1)
  EcoSpold01Location=GLO
  properties: dry mass 1.18 kg, carbon content, fossil 0.57577, wet mass 1.18 kg
- pointing device, optical mouse, with cable: 2.8539e-5 unit; lognormal variance with pedigree 0.052625, pedigree (3,3,5,2,1)
  EcoSpold01Location=GLO
  properties: carbon content, fossil 0.482336, dry mass 0.12 kg, wet mass 0.12 kg
- computer, desktop, without screen: 2.8539e-5 unit; lognormal variance with pedigree 0.052625, pedigree (3,3,5,2,1)
  EcoSpold01Location=GLO
  properties: wet mass 11.3 kg, carbon content, fossil 0.0877555, dry mass 11.3 kg, carbon content, non-fossil 0.000485011

## Sampling procedure
Manufacturers, literature and own assumptions.

## Extrapolations
This dataset has been extrapolated from year 2006 to the year of the calculation (2021). The uncertainty has been adjusted accordingly.
