# pump station construction

Dataset: EcoSpold 2, unit process
Geography: CH
Time period: 1993-01-01 to 2021-12-31
Technology level: current
Classification: EcoSpold01Categories: water supply/production
Classification: ISIC rev.4 ecoinvent: 4220:Construction of utility projects
Tags: ConvertedDataset
Scenario: Business-as-Usual
System model: Allocation, cut-off by classification
Share of production covered: 9 %
Generated by: Niels Jungbluth
Published in: Althaus H.-J. 2004
Database: ecoinvent
isCopyrightProtected: true
accessRestrictedTo: 1

## General comment
Estimation for a pump station in Marin (NE) with a capacity of 644546 m3 per year. Life time 70 years.
[This dataset was already contained in the ecoinvent database version 2. It was not individually updated during the transfer to ecoinvent version 3. Life Cycle Impact Assessment results may still have changed, as they are affected by changes in the supply chain, i.e. in other datasets. This dataset was generated following the ecoinvent quality guidelines for version 2. It may have been subject to central changes described in the ecoinvent version 3 change report (http://www.ecoinvent.org/database/ecoinvent-version-3/reports-of-changes/), and the results of the central updates were reviewed extensively. The changes added e.g. consistent water flows and other information throughout the database. The documentation of this dataset can be found in the ecoinvent reports of version 2, which are still available via the ecoinvent website. The change report linked above covers all central changes that were made during the conversion process.]

## Included activities end
Materials, transports, disposal for the infrastructure. Estimation for land use. No data for construction work.

## Geography
Data provided by a CH company in Marin (NE).

## Technology
pump station

## Time period
Time of publication.

## Reference product
- pump station: 1 unit; CPC 54231: General construction services of aqueducts and other water supply conduits, except pipelines; By-product classification allocatable product
  EcoSpold01Location=CH
  production volume 0.0336675 unit
    This is a placeholder value that does not reflect real-world production volumes. This dataset does not currently require a real-world production volume to work in the database framework, and no actual data were collected yet. This has no negative effect on the results of the ecoinvent database. The placeholder value of this activity was scaled according to the nominal GDP of 2005 (source: United Nations, http://data.un.org/Glossary.aspx?q=GDP+%28current+US%24%29, accessed 20130726) to reflect an appropriate share of the global production volume, which is also a placeholder value.
  property price 1.05504e6 EUR2005
    Convert from EU 27 price to the world by currency exchange rate.

## Inputs from technosphere
All rows: lognormal variance with pedigree 0.0512, pedigree (2,3,5,1,1)
- cast iron: 4492 kg
  Literature
  EcoSpold01Location=RER
  Uncertainty: Literature
  properties: carbon content, fossil 0.04, wet mass 1 kg, dry mass 1 kg
  note on carbon content, fossil: Cast iron is made by remelting pig iron in small furnaces (e.g. cupola furnaces or electric arc furnaces) and poured into moulds to make castings. It usually contains 2% to 6% carbon (ecoinvent v2.2 report 10_partII). An average content of 4% was considered
- waste glass pane in burnable frame: -323 kg
  EcoSpold01Location=CH
  Estimation for materials used
  Uncertainty: Estimation for materials used
  production volume 323 kg
    Calculated from the production volume of pump station in proportion to the respective output amounts.
  properties: wet mass 1 kg, dry mass 1 kg
- waste rubber, unspecified: -0.42 kg
  (same comment as for waste glass pane in burnable frame)
  production volume 0.42 kg
    (same comment as for waste glass pane in burnable frame)
  properties: carbon content, fossil 0.853, dry mass 1 kg, wet mass 1 kg, heating value, net 27.19 MJ
  note on heating value, net: Value taken from the general comment of the treatment dataset.
- aluminium, cast alloy: 3.52 kg
  EcoSpold01Location=RER
  Literature
  Uncertainty: Literature
  properties: dry mass 1 kg, wet mass 1 kg
- cement, unspecified: 52812 kg
  EcoSpold01Location=CH
  Literature
  Uncertainty: Literature
  properties: wet mass 1 kg, dry mass 1 kg
- lean concrete: 16.105 m3
  EcoSpold01Location=CH
  Literature
  Uncertainty: Literature
  properties: water content 0.0528846, dry mass 2080 kg, wet mass 2190 kg
- waste reinforced concrete: -535870 kg
  Estimation for materials used
  EcoSpold01Location=CH
  Uncertainty: Estimation for materials used
  production volume 535870 kg
    (same comment as for waste glass pane in burnable frame)
  properties: wet mass 1 kg, dry mass 0.99418 kg, water content 0.00585407
- waste cement in concrete and mortar: -52812 kg
  (same comment as for waste reinforced concrete)
  production volume 52812 kg
    (same comment as for waste glass pane in burnable frame)
  properties: dry mass 0.995 kg, wet mass 1 kg, water content 0.00502513
- waste reinforcement steel: -4492 kg
  (same comment as for waste reinforced concrete)
  production volume 4492 kg
    (same comment as for waste glass pane in burnable frame)
  properties: wet mass 1 kg, dry mass 1 kg
- reinforcing steel: 17968 kg
  EcoSpold01Location=RER
  Literature
  Uncertainty: Literature
  properties: carbon content, fossil 0.004, dry mass 1 kg, wet mass 1 kg
- steel, low-alloyed, hot rolled: 3216 kg
  Literature
  EcoSpold01Location=RER
  Uncertainty: Literature
  properties: wet mass 1 kg, dry mass 1 kg, carbon content, fossil 0.005
  note on carbon content, fossil: Low alloyed steel composition given in Tab. 3.2 ecoinvent v2.2 report 10_partII. Steel assumed to have a C content of 0.5%
- copper, cathode: 861 kg
  Literature
  EcoSpold01Location=RER
  Uncertainty: Literature
  properties: dry mass 1 kg, wet mass 1 kg
- synthetic rubber: 0.42 kg
  Literature
  EcoSpold01Location=RER
  Uncertainty: Literature
  properties: dry mass 1 kg, carbon content, fossil 0.871949, wet mass 1 kg, heating value, net 26.42 MJ
  note on carbon content, fossil: EPDM (Ethylene-propene-diene terpolymer) rubber is a terpolymer of ethylene, propene, and a diene with the residual unsaturated portion of the diene in the side chain (ecoinvent v2.2 report 7-part XX & Ullmann). Chemical formula (deduced from Evidences of Solvent-Induced Miscibility in Polychloroprene-co-Ethylene-Propene Diene Terpolymer Blends, Dubey et al., Journal of Applied Polymer Science, 2009, 111:1884–1891): C20H35
- polyvinylchloride, bulk polymerised: 1164 kg
  EcoSpold01Location=RER
  Literature
  Uncertainty: Literature
  properties: dry mass 1 kg, heating value, net 21.5 MJ, carbon content, fossil 0.387097, wet mass 1 kg
  note on carbon content, fossil: Monomer is vynyl chloride, C2H3Cl (ecoinvent v2.2 report 11_II). MW=62 g/mol
- brass: 0.63 kg
  EcoSpold01Location=CH
  Literature
  Uncertainty: Literature
  properties: dry mass 1 kg, wet mass 1 kg
- flat glass, coated: 323 kg
  Literature
  EcoSpold01Location=RER
  Uncertainty: Literature
  properties: wet mass 1 kg, dry mass 1 kg
- concrete, normal: 227.47 m3
  Literature
  EcoSpold01Location=CH
  Uncertainty: Literature
  properties: water content 0.086758, dry mass 2190 kg, wet mass 2380 kg
- aluminium, wrought alloy: 7.48 kg
  EcoSpold01Location=RER
  Literature
  Uncertainty: Literature
  properties: wet mass 1 kg, dry mass 1 kg
- bronze: 1.05 kg
  Literature
  EcoSpold01Location=CH
  Uncertainty: Literature
  properties: dry mass 1 kg, wet mass 1 kg
- waste polyvinylchloride: -1164 kg
  (same comment as for waste glass pane in burnable frame)
  production volume 1164 kg
    (same comment as for waste glass pane in burnable frame)
  properties: carbon content, fossil 0.440882, water content 0.00200401, dry mass 0.998 kg, wet mass 1 kg, heating value, net 21.51 MJ
  note on carbon content, fossil: C content in 1 kg DM was calculated using data in Tab A.1, ecoinvent v2.2 report 13_I

## Inputs from nature
- Transformation, to industrial area [natural resource, land]: 625 m2; lognormal variance with pedigree 0.238, pedigree (5,5,5,1,1)
  Rough estimation
  Uncertainty: Rough estimation
- Occupation, industrial area [natural resource, land]: 43750 m2*year; lognormal variance with pedigree 0.158, pedigree (5,5,5,1,1)
  Rough estimation for 70a life time
  Uncertainty: Rough estimation for 70a life time
- Transformation, from unspecified [natural resource, land]: 625 m2; lognormal variance with pedigree 0.238, pedigree (5,5,5,1,1)
  Rough estimation
  Uncertainty: Rough estimation

## Sampling procedure
Literature and own estimations

## Extrapolations
This dataset has been extrapolated from year 1998 to the year of the calculation (2021). The uncertainty has been adjusted accordingly.

## Review by Manuele Margni (obsolete) 2005-07-19
Passed
