# treatment of sulfidic tailing, off-site, high gold content

Dataset: EcoSpold 2, unit process
Geography: ZA
Time period: 2012-01-01 to 2021-12-31
Technology level: current
Classification: ISIC rev.4 ecoinvent: 0729:Mining of other non-ferrous metal ores
Synonyms: crude gold; gold dore
Scenario: Business-as-Usual
System model: Allocation, cut-off by classification
Share of production covered: 6.3 %
Generated by: Russo
Published in: Charikinya E. 2017
Database: ecoinvent
isCopyrightProtected: true
accessRestrictedTo: 1

## General comment
This dataset represents the treatment of gold wastes to recover gold in South Africa. The production volume reported, as well as all inputs/outputs for the activity, represent an 'average retreatment site' and don't refer to a specific one. Data were taken from 2015 Environmental report of three different companies, namely: AngloGold Ashanti MWS, DRD and Harmony. Retreatment activities contribute to the 6.30% of the total annual production occured in 2015.

## Included activities start
The dataset includes all the activity needed to perform the retreatment of sulfidic tailing with high gold content.

## Included activities end
The activity ends with the production of unrefined gold and sulfidic tailing, off-site to be disposed/deposited.

## Geography
Material requirements for gold concentration as well as emissions to air are estimated with South African data.
Most of the mining operation and unrefined gold production activities are in an area called Witwatersrand basin. The are is approximately 350 km long and 200 km wide. the gold mines in this area are possiblu the deepest in the world (mining operation at 3600 m and explortion core-drilling up to 4600 m. Peak gold production occurred in 1970 when over 1000 metinc tonnes were mined.

## Technology
OPERATIONS
Over the next century of underground gold mining, several residue dumps arose from mining one of the largest orebodies ever mined. Significantly, these waste dumps contained minute gold particles that, with scale and technology, have become financially feasible to mine. The waste dumps are classified into two specific types: sand and slime dumps. Sand dumps are the by-product of the “stamp milling” process, which left coarser sand residue. Most of these sand dumps have been reclaimed. Slime dumps are the by-product of the tube and ball mill recovery process, comprising much finer material and generally containing lower gold grades.
Tailings retreatment in South Africa began in the 1970s and the process involves the extraction of minute particles of gold from past mining 'waste', and operations are performed by three major companies, namely AngloGoldAshanti Mine Waste Solution (AGA-MWS), at Harmony’s sites and at DRDGold Ergo Operations; they mostly lay in the Witwatersrand Basin Area.
AGAMWS surface operations encompasses those facilities at the Vaal River and West Wits operations which process and extract gold from: marginal ore dumps on surface and tailings storage facilities on surface. Surface Operations also includes Mine Waste Solutions (MWS), which operates independently, processing slurry material reclaimed hydraulically from the various tailings storage facilities. Uranium is produced as a by-product, as is backfill for use as mining support in underground mined out areas.
Harmony – It comprises several surface sources in South Africa - Phoenix, a tailings retreatment operation situated in Virginia in the Free State Province, makes use of the Saaiplaas plant to retreat tailings.
DRDGOLD – ErgoOperations - Ergo Gold Mining Proprietary Limited (Ergo), one of the world’s largest gold surface tailings retreatment facilities, owns the rights to treat around 100 sand dumps and slimes dams on the Witwatersrand. Some of these are currently being treated.
Surface recovery: The retreatment business is high-volume and low-risk. Vast quantities of material are processed in order to recover gold from old mine dumps at a recovery rate that varies depending on the material being treated. Sand and Slime Sand dumps are the result of the less efficient ‘stamp-milling’ process employed in the early gold mining years. They consist of coarse-grained particles which generally contain higher quantities of gold. Sand dumps are reclaimed mechanically using front end loaders that load sand onto conveyor belts. The sand is fed onto a screen where water is added to wash the sand into a sump, from where it is pumped to the plant. Most sand dumps have already been retreated using more efficient milling methods. Slimes dams are also the result of older treatment methods, although they are more recent than sand dumps, and contain lower grades of gold. However, this material has become economically more viable to process owing to improved treatment methods and a higher gold price. The material from the slimes dams is broken down using monitor guns that spray jets of high pressure water at the target area. The resulting slurry is then pumped to a treatment plant for processing.
Flotation/fine-grind and CIL: The slurry material from the reclamation sites feeds into the plant via a complex pipe network. Here it passes over linear screens to remove organic material and debris. The slurry then enters a flotation section consisting of banks of flotation cells. After the material is conditioned with reagents (collectors and frothers) it enters the cells where it is separated into two streams. One stream, the flotation concentrate, contains the sulphides which are enriched with gold while the second stream, the flotation tails, is made up of lower-grade siliceous material. This stream is treated by the conventional CIL process, which is the treatment process that has been used for the past 30 years with an extraction efficiency of 39% to 40%.
The concentrate stream is subjected to the new fine-grind process which research and development has demonstrated is more efficient in recovering the gold. Fine-grind involves milling the slurry material with tiny beads. At this stage the milled product, 80% of which is smaller than 24 microns, has been liberated from the sulphides, making recovery of the previously encapsulated gold easier as it comes into contact with cyanide during the process that follows. Research shows the extraction efficiency of this process to be 75% to 76%.
The dissolved gold is adsorbed onto activated carbon, and the ‘loaded carbon’ in each circuit enters the carbon treatment section where the gold is eluted from the carbon. The carbon then returns to the CIL circuit via a regeneration kiln. Once the gold has been eluted, it undergoes a process called electro-winning where the gold is precipitated, calcined and smelted in the existing smelthouse. The two eluate streams are kept separate to allow for accurate accounting of the gold produced by the respective high- and low-grade circuits. The leach residues are combined before being pumped to the BTF.
REFERENCES:
AngloGlodAshanti Limited, Operational Report - Surface Operations,2016
DRDGold Limited, Annual Integrated Report, 2016
Harmony, Integrated Annual Report, 2016
Harmony, Operational Performance, 2016

## Time period
Companies environmental and operational reports, year 2015 and 2016

## Parameters
- water used in primary activity: 1409.88 m3; name totWaterPA; = water_well_in_ground_input+(potable_water/1000)+water_surface; lognormal variance with pedigree 0.0007, pedigree (2,2,1,1,1)
  This is the sum of the all source of water (ground, surface and tap/municipal) used in the treatment of sulfidic tailing, off-site, high gold conten to produce unrefined gold.
- fraction, process water, to air: 0.15 dimensionless; name fraction_PW_to_air; lognormal variance with pedigree 0.092025, pedigree (4,4,3,2,4)
  Literature value. In case when no industry/process specific data are available, default evaporation fraction value is used. This value is 15% and is based on literature (Statistics Canada, 2007 & Shaffer, K.H., 2008, Consumptive water use in the Great Lakes Basin, USGS & Shiklomanov, 2003, World Water Resources at the Beginning of the 21st Century) and has been approved by an expert.

## Reference product
- sulfidic tailing, off-site, high gold content: 0 kg; By-product classification Recyclable; CPC 39331: Waste and scrap of gold or of metal clad with gold
  Calculated value from companies reports and scaled down to refer to 1 kg of unrefined gold produced.
  This represents the gold wastes whose gold content make it feasible to be further processed to recover gold from old mine dupms at a recovery rate that varies depending on the material being treated
  production volume 0 kg; name APV_ByP_01; = abs(APV_RP*ByP_01)
    Calculated from the production volume of gold, unrefined, based on the relative output amounts.
  property dry mass 0.7 kg; name dry_mass_ST
  property price 0 EUR2005; name ByP_01_price_EUR2005
    Assumed without economic value
  property gold content 0.277637; = 0.194346/dry_mass_ST
    grade of gold in the sulfidic tailing, off-site, high gold content is 0.194346 gr/tonne; the results has been adjusted on a dry mass basis
  property carbon content 0
    carbon content on a dry matter basis (reserved; not for manual entry)
  properties: carbon content, fossil 0, water content 0.42857, wet mass 1 kg, carbon content, non-fossil 0, water in wet mass 0.3 kg, carbon allocation 0 kg
- gold, unrefined: 1 kg; name RP; By-product classification allocatable product; CPC 4132: Gold (including gold plated with platinum), unwrought or in semi-manufactured forms, or in powder form; CAS 7440-57-5; pedigree (1,1,1,1,1)
  Calculated value from companies reports. Unrefined gold (85% pure); synonims are gold dore, crude gold. Dore refers to an unrefined (therefore impure) alloy of gold with variable quantities of silver and smaller quantities of base metals, which is produced at a mine berfore passing on to a refinery for upgrading toLondon Good Delivery Standard.
  Uncertainty: C
  production volume 14468.8 kg; name APV_RP
  property price 21359.1 EUR2005; name RP_price_EUR2005
  properties: gold content 0.85, water content 0, wet mass 1 kg, dry mass 1 kg, carbon content, fossil 0, carbon content, non-fossil 0, water in wet mass 0 kg, carbon content 0, carbon allocation 0 kg

## By-products
- gold, unrefined: 0 kg; By-product classification allocatable product; CPC 4132: Gold (including gold plated with platinum), unwrought or in semi-manufactured forms, or in powder form; CAS 7440-57-5; pedigree (1,1,1,1,1)
  (same comment as for gold, unrefined)
  production volume 0 kg; name APV_RP
    Total annual production for the year of reference: it has been calculated as the sum of the Annual Production Volumes of three companies in the year of reference.
    AngloGlodAshanti Limited, Operational Report - Surface Operations, 2016
    DRDGold Limited, Annual Integrated Report, 2016
    Harmony, Integrated Annual Report, 2016
    Harmony, Operational Performance, 2016
  property carbon content 0
    carbon content on a dry matter basis (reserved; not for manual entry)
  properties: gold content 0.85, water content 0, wet mass 1 kg, dry mass 1 kg, carbon content, fossil 0, carbon content, non-fossil 0, water in wet mass 0 kg, carbon allocation 0 kg

## Inputs from technosphere
- sulfidic tailings, from gold mine operation: -351265 kg; name ByP_02; source Classen M. 2009; lognormal variance with pedigree 0.0026, pedigree (1,3,3,1,1)
  Calculated value from companies reports and scaled down to refer to 1 kg of unrefined gold produced.
  Proxy: Disposal is approximated with 'sulfidic tailing, off-site'.
  Uncertainty: C
  production volume 5.08239e9 kg; = APV_RP*ByP_02
    (same comment as for sulfidic tailing, off-site, high gold content)
  property price 0 EUR2005; name ByP_02_price_EUR2005
  properties: wet mass 1 kg, water content 0.428571, potassium content 0.0031243, aluminium content 0.017079, fluorine content 0.0011041, oxygen content 0.88758, magnesium content 0.0020127, dry mass 0.7 kg, iron content 0.014628, sodium content 0.0014916, silicon content 0.056714, calcium content 0.0037589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
- diesel, burned in building machine: 7202.25 MJ; source Placer Dome Inc. 2002; triangular min 1404.34, mostLikely 7202.25, max 26702.8, pedigree (2,1,3,1,1)
  Calculated value.
  properties: heating value, net 1 MJ
- lubricating oil: 17.6415 kg; name LubOil; triangular min 6.59, mostLikely 17.6415, max 72.95, pedigree (2,3,3,1,1)
  Calculated value from companies annual reports and scaled down to refer 1 kg of unrefined gold produced. It accounts for lubricating oils and grease used within the plant. A density of 0.9 kg/m3 was used to convert volumes into mass. Usual range for lubricating oil and grease is 0,85/0,95 kg/m3.
  properties: carbon content, fossil 0.75, dry mass 1 kg, wet mass 1 kg, heating value, net 40.2 MJ
  note on carbon content, fossil: Lubricating oil is produced from diesel. C-content/dry mass of fats and oils considered 75%, from: ecoinvent v2.2 report, n 15a, pg 40
  note on heating value, net: Literature value, Source: IPCC 2006, 2006 IPCC Guidelines for National Greenhouse Gas Inventories, Prepared by the National Greenhouse Gas Inventories Programme, Eggleston H.S., Buendia L., Miwa K., Ngara T. and Tanabe K. (eds). Published: IGES, Japan
- hydrochloric acid, without water, in 30% solution state: 2171.83 kg; source Placer Dome Inc. 2002; triangular min 794.86, mostLikely 2171.83, max 13398.3, pedigree (2,3,3,1,1)
  Calculated value.
  properties: wet mass 1 kg, heating value, net 3.32 MJ, dry mass 1 kg
- tap water: 512570 kg; name potable_water; triangular min 113825, mostLikely 512570, max 2.69581e6, pedigree (2,1,3,1,1)
  Calculated value from companies reports and scaled down to 1 kg of unrefined gold produced. Tap water refers both to potable and non-potable water from external sources
  properties: water content 2962.17, wet mass 1 kg, carbon content, fossil 0.00178991, dry mass 0.000337476 kg
  note on carbon content, fossil: Bicarbonate content is 2.93 mol/m3. CO2 content is 0.1 mol/m3 (ecoinvent v2.2 report 8, Tab 93.1).
- charcoal: 168.52 kg; lognormal variance with pedigree 0.0032, pedigree (2,3,3,1,1)
  Calculated value (weighted average) from companies reports.
  Uncertainty: C
  properties: wet mass 1 kg, dry mass 1 kg, carbon content, non-fossil 0.8, heating value, net 28.4 MJ
  note on heating value, net: Indicative value. Reference: Fuels - Higher and Lower Calorific Values, available at: https://www.engineeringtoolbox.com/fuels-higher-calorific-values-d_169.html
- lime, packed: 9917.77 kg; source Placer Dome Inc. 2002; lognormal variance with pedigree 0.0032, pedigree (2,3,3,1,1)
  Calculated value.
  Uncertainty: C
  properties: wet mass 1 kg, carbon content, fossil 0.117492, water content 0.00200401, dry mass 0.998 kg
  note on carbon content, fossil: Table 3.1, ecoinvent v2.2 report 7, part VII, pg 3. MW CaCO3=100, MW MgCO3=84
- zinc: 2.8946 kg; source Placer Dome Inc. 2002; lognormal variance with pedigree 0.0427, pedigree (3,3,5,3,1)
  Calculated value: Data was obtained from Australian mining, scaled by processed gold.
  Further references:
  Stewart M. (1999) Environmental Life Cycle Considerations for Design-Related Decision Making in Minerals Processing. PhD Thesis. University of Cape Town, Cape Town.
  Uncertainty: C
  properties: wet mass 1 kg, dry mass 1 kg
- mine infrastructure, treatment of sulfidic tailing, off-site, high gold content: 1.3945e-6 unit; lognormal variance with pedigree 0.0026, pedigree (2,1,3,1,1)
  Estimation from dataset author.
  Uncertainty: C
  property lifetime 50 year; name lifetime_Surf_ZA
  properties: wet mass 1 kg, dry mass 1 kg
- sodium cyanide: 748.23 kg; source Placer Dome Inc. 2002; triangular min 271.19, mostLikely 748.23, max 2507.55, pedigree (2,1,3,1,1)
  Calculated value.
  Proxy: Cyanide is approximated with 'sodium cyanide'.
  properties: heating value, net 7.43 MJ, wet mass 1 kg, dry mass 1 kg, carbon content, fossil 0.244898
- electricity, medium voltage: 75852.3 kWh; source Placer Dome Inc. 2002; triangular min 61307.1, mostLikely 75852.3, max 79393.4, pedigree (2,1,3,1,1)
  Calculated value: Total electricity consumption was obtained by adding electricity consumption of the mining and refining steps (see source).
- fatty alcohol: 4.6019 kg; source Placer Dome Inc. 2002; lognormal variance with pedigree 0.0427, pedigree (3,3,5,3,1)
  Proxy: Organic compounds such as flocculant / flotation / magnafloc 351 are approximated with 'fatty alcohol'.
  Uncertainty: E
  properties: carbon content, non-fossil 0.743434, carbon content, fossil 0.0408973, wet mass 1 kg, dry mass 1 kg, heating value, net 41.01 MJ
  note on carbon content, non-fossil: Fatty alcohols have chain lengths between C6 and C22, their chemical formula is CH3(CH2)nCH2OH (ecoinvent v2.2 report 12, pg 16). As an average, C14 was used. The dataset represents a mix of 27% produced from fatty acid splitting and 73% produced from methyl ester (ecoinvent v2.2 report 12, pg 21). In the methyl esterification, methanol (CH3OH) has a fossil origin
- sodium hydroxide, without water, in 50% solution state: 2143.47 kg; source Placer Dome Inc. 2002; triangular min 830.41, mostLikely 2143.47, max 1.19292e6, pedigree (2,3,3,1,1)
  Calculated value.
  Proxy: Caustic is approximated with 'sodium hydroxide, without water, in 50% solution state'.
  properties: dry mass 1 kg, wet mass 1 kg, heating value, net 3.03 MJ
- sulfidic tailing, off-site, high gold content: 351266 kg
  (same comment as for sulfidic tailing, off-site, high gold content)
  production volume 5.0824e9 kg
  properties: water content 0.42857, wet mass 1 kg, gold content 0.277637
  note on gold content: grade of gold in the sulfidic tailing, off-site, high gold content is 0.194346 gr/tonne; the results has been adjusted on a dry mass basis

## Inputs from nature
- Water, river [natural resource, in water]: 431.869 m3; name water_surface; triangular min 61.3, mostLikely 431.869, max 1112.49, pedigree (2,1,3,1,1)
  Calculated value from companies reports and scaled down to 1 kg of unrefined gold produced.
- Water, well, in ground [natural resource, in water]: 465.445 m3; name water_well_in_ground_input; triangular min 144.48, mostLikely 465.445, max 2462.53, pedigree (2,3,3,1,1)
  (same comment as for Water, river)

## Emissions to nature
- Cadmium [air, non-urban air or from high stacks]: 2.2978e-5 kg; source Placer Dome Inc. 2002; lognormal variance with pedigree 0.6932, pedigree (3,3,5,4,1)
  Calculated value: Data was obtained from Australian mining, scaled by milled ore.
  Further references:
  Stewart M. (1999) Environmental Life Cycle Considerations for Design-Related Decision Making in Minerals Processing. PhD Thesis. University of Cape Town, Cape Town.
  Uncertainty: C
- Sulfur oxides [air, unspecified]: 81.99 kg; triangular min 9.09, mostLikely 81.99, max 720.77, pedigree (2,1,3,1,1)
  Calculated value from companies reports and scaled down to refer to 1 kg of unrefined gold produced.
- Cyanide [water, surface water]: 0.30684 kg; source Placer Dome Inc. 2002; lognormal variance with pedigree 0.3606, pedigree (3,3,5,1,3)
  Calculated value: Amount is based in data from older Environmental report, scaled by milled ore (see source).
  Uncertainty: E
- Nickel, ion [water, surface water]: 0.070088 kg; source Placer Dome Inc. 2002; lognormal variance with pedigree 0.7106, pedigree (3,3,5,1,3)
  (same comment as for Cyanide)
- Zinc, ion [water, surface water]: 0.04611 kg; source Placer Dome Inc. 2002; lognormal variance with pedigree 0.7286, pedigree (5,3,5,1,3)
  (same comment as for Cyanide)
- Water [air, unspecified]: 211.483 m3; name water_to_air_unspecified; = (totWaterPA*fraction_PW_to_air); lognormal variance with pedigree 0.0432, pedigree (2,3,3,1,1)
  Calculated value based on literature values and expert opinion. See comments in the parametres' comment field.
  Uncertainty: C
  property fraction, origin: fresh water 1; name fraction_origin_fresh_water
  property fraction, origin: unspecified 0; name fraction_origin_unspecified
  property fraction, origin: salt water 0; name fraction_origin_salt_water
- Water [water, unspecified]: 1198.4 m3; name water_to_water_unspecified; = totWaterPA*(1-fraction_PW_to_air); lognormal variance with pedigree 0.0432, pedigree (2,3,3,1,1)
  (same comment as for Water)
  property carbon content, non-fossil 0; name C_content_non_fossil
  property water in wet mass 1000 kg; name WWM
  property fraction, origin: fresh water 1; name fraction_origin_fresh_water_Ww
  property carbon content, fossil 0; name C_content_fossil
  property dry mass 0 kg; name DM
  property wet mass 1000 kg; name WM
  property fraction, origin: salt water 0; name fraction_origin_salt_water_Ww
  property fraction, origin: unspecified 0; name fraction_origin_unspecified_Ww
- Copper, ion [water, surface water]: 0.030684 kg; source Placer Dome Inc. 2002; lognormal variance with pedigree 0.3606, pedigree (3,3,5,1,3)
  (same comment as for Cyanide)
- Antimony [air, non-urban air or from high stacks]: 0.00016114 kg; source Placer Dome Inc. 2002; lognormal variance with pedigree 0.694, pedigree (3,4,5,1,1)
  Calculated value: Data was obtained from Australian mining, scaled by milled ore.
  Further references:
  Stewart M. (1999) Environmental Life Cycle Considerations for Design-Related Decision Making in Minerals Processing. PhD Thesis. University of Cape Town, Cape Town.
  Uncertainty: E
- Arsenic [air, non-urban air or from high stacks]: 0.0073967 kg; source Placer Dome Inc. 2002; lognormal variance with pedigree 0.7092, pedigree (4,3,5,4,1)
  (same comment as for Antimony)
- Chromium [air, non-urban air or from high stacks]: 0.0037554 kg; source Placer Dome Inc. 2002; lognormal variance with pedigree 0.6932, pedigree (3,3,5,4,1)
  (same comment as for Cadmium)
- Mercury [water, surface water]: 0.00062039 kg; source Placer Dome Inc. 2002; lognormal variance with pedigree 0.7106, pedigree (3,3,5,1,3)
  (same comment as for Cyanide)
- Cadmium, ion [water, surface water]: 0.00062039 kg; source Placer Dome Inc. 2002; lognormal variance with pedigree 0.3606, pedigree (3,3,5,1,3)
  (same comment as for Cyanide)
- Cobalt [air, non-urban air or from high stacks]: 0.00065064 kg; source Placer Dome Inc. 2002; lognormal variance with pedigree 0.6932, pedigree (3,3,5,4,1)
  (same comment as for Cadmium)
- Selenium [air, non-urban air or from high stacks]: 0.011952 kg; source Placer Dome Inc. 2002; lognormal variance with pedigree 0.6932, pedigree (3,3,5,4,1)
  (same comment as for Cadmium)
- Manganese [air, non-urban air or from high stacks]: 0.020341 kg; source Placer Dome Inc. 2002; lognormal variance with pedigree 0.6932, pedigree (3,3,5,4,1)
  (same comment as for Cadmium)
- Beryllium [air, non-urban air or from high stacks]: 0.00043372 kg; source Placer Dome Inc. 2002; lognormal variance with pedigree 0.6932, pedigree (3,3,5,4,1)
  (same comment as for Cadmium)
- Mercury [air, non-urban air or from high stacks]: 0.010467 kg; source Placer Dome Inc. 2002; lognormal variance with pedigree 0.7092, pedigree (4,3,5,4,1)
  (same comment as for Antimony)
- Lead [water, surface water]: 0.0036888 kg; source Placer Dome Inc. 2002; lognormal variance with pedigree 0.7106, pedigree (3,3,5,1,3)
  (same comment as for Cyanide)
- Particulates, > 2.5 um, and < 10um [air, non-urban air or from high stacks]: 29.98 kg; lognormal variance with pedigree 0.0026, pedigree (2,1,3,1,1)
  Calculated value from companies reports and scaled down to refer to 1 kg of unrefined gold produced.
  Uncertainty: C
- Carbon monoxide, fossil [air, non-urban air or from high stacks]: 4.07 kg; lognormal variance with pedigree 0.0026, pedigree (2,1,3,1,1)
  (same comment as for Particulates, > 2.5 um, and < 10um)
- Lead [air, non-urban air or from high stacks]: 0.00018263 kg; source Placer Dome Inc. 2002; lognormal variance with pedigree 0.7092, pedigree (4,3,5,4,1)
  (same comment as for Antimony)
- NMVOC, non-methane volatile organic compounds, unspecified origin [air, non-urban air or from high stacks]: 1.5 kg; lognormal variance with pedigree 0.0026, pedigree (2,1,3,1,1)
  (same comment as for Particulates, > 2.5 um, and < 10um)
- Nitrogen oxides [air, non-urban air or from high stacks]: 56.88 kg; triangular min 11.26, mostLikely 56.88, max 366.81, pedigree (2,1,3,1,1)
  (same comment as for Sulfur oxides)
- Arsenic, ion [water, surface water]: 0.0055332 kg; source Placer Dome Inc. 2002; lognormal variance with pedigree 0.7106, pedigree (3,3,5,1,3)
  (same comment as for Cyanide)
- Oils, unspecified [soil, industrial]: 13.2311 kg; = LubOil*0.75; lognormal variance with pedigree 0.0106, pedigree (4,3,3,1,1)
  Emission to soil from the use of Luricating and hydraulic oils. It has been estimated that approximaly 70-80 % of hydraulic oils leave the system due to leakage, spill, line and hose breakage and fitting failures. www.machinerylubrication.com
  Uncertainty: C

## Sampling procedure
Companies Operational and Sustainable reports:
AngloGlodAshanti Limited, Operational Report - Surface Operations, 2016
DRDGold Limited, Annual Integrated Report, 2016
Harmony, Integrated Annual Report, 2016
Harmony, Operational Performance, 2016

## Extrapolations
This dataset has been extrapolated from year 2016 to the year of the calculation (2021). The uncertainty has been adjusted accordingly.
