# amination of chlorosilane

Dataset: EcoSpold 2, unit process
Geography: GLO
Time period: 2000-01-01 to 2021-12-31
Technology level: current
Classification: EcoSpold01Categories: chemicals/inorganics
Classification: ISIC rev.4 ecoinvent: 2011:Manufacture of basic chemicals
Synonyms: HMDS
Tags: ConvertedDataset
Scenario: Business-as-Usual
System model: Allocation, cut-off by classification
Share of production covered: 100 %
Generated by: Jürgen Sutter
Published in: Sutter, J. 2007
Database: ecoinvent
isCopyrightProtected: true
accessRestrictedTo: 1

## General comment
This dataset represents the chlorosilane amination to obtain hexamethyldisilazane and ammonium chloride, which are derived as co-products. The functional unit is 1 kg chlorosilane. The system includes the process with consumption of raw materials, energy, infrastructure, and land use, as well as the generation of emissions to air and water. It also includes transportation of the raw materials. Transient or unstable operations like starting-up or shutting-down, are not included, but the production during stable operation conditions. Storage and transportation of the final product are also not included. It is assumed that the manufacturing plants are located in an urban/industrial area and consequently the emissions are categorised as emanating in a high population density area. The emissions into water are assumed to be emitted into rivers.
[This dataset was already contained in the ecoinvent database version 2. It was not individually updated during the transfer to ecoinvent version 3. Life Cycle Impact Assessment results may still have changed, as they are affected by changes in the supply chain, i.e. in other datasets. This dataset was generated following the ecoinvent quality guidelines for version 2. It may have been subject to central changes described in the ecoinvent version 3 change report (http://www.ecoinvent.org/database/ecoinvent-version-3/reports-of-changes/), and the results of the central updates were reviewed extensively. The changes added e.g. consistent water flows and other information throughout the database. The documentation of this dataset can be found in the ecoinvent reports of version 2, which are still available via the ecoinvent website. The change report linked above covers all central changes that were made during the conversion process.]

## Included activities start
From the reception of chlorosilane at the factory gate.

## Included activities end
This activity ends with the chlorosilane amination. This activity includes materials, energy uses, infrastructure and emissions.

## Geography
The inventory is modelled for the world..

## Technology
Chlorosilane amination is the most important process to produce hexamethyldisilazane. Many chlorosilanes react with ammonia to give not stable, simple silylamines SiNH2, but disubstitution products with the SiNHSi building block. The exothermic reaction can be carried out in solvents such as hexane, toluene, or isododecane, but is best performed in warm HMDS itself. The latter variant leads to the formation of coarse-grained ammonium chloride, which can be readily stirred and filtered and gives better turnover and yield. The suggestion has been made that the salt be separated by treatment with water.
A continuous process for the production of HMDS consisting of the concurrent actions of continuously introducing predetermined quantities per time unit of trimethylchlorosilane and gaseous ammonia to form a mixture of HMDS and ammonium chloride in a first reactor while simultaneously subjecting said mixture to continuous high shear agitation, for a time period related to the volume of the reactor and the quantities of trimethylchlorosilane and ammonia introduced, to form a slurry; and simultaneously separating the ammonium chloride from said slurry to provide a solution principally comprising HMDS, while continuing to introduce a continuous flow of further quantities of trimethylchlorosilane and ammonia as the HMDS is removed.
Rösch, L., John, P., Reitmeier, R.: Silicon Compounds, Organic. Published online: 2000. In: Ullmann's Encyclopedia of Industrial Chemistry, Seventh Edition, 2004 Electronic Release (ed. Fiedler E., Grossmann G., Kersebohm D., Weiss G. and Witte C.). 7 th Electronic Release Edition. Wiley InterScience, New York, Online-Version under: http://www.mrw.interscience.wiley.com/emrw/9783527306732/home

## Time period
Time of publications.

## Parameters
- fraction, cooling water, once-through system, to air: 0.004 dimensionless; name fraction_CW_OT_to_air; lognormal variance with pedigree 0.0413, pedigree (2,3,1,3,1)
  Calculated based on literature value (Scown, C.D., 2011, Water Footprint of U.S. Transportation Fuels and supplying information of the article) (Vionnet, S., Quantis Water Database - Technical Report, 2012).
- fraction, cooling water, to air: 0.3875 dimensionless; name fraction_CW_to_air; = (0.5*fraction_CW_OT_to_air)+(0.5*fraction_CW_R_to_air); lognormal variance with pedigree 0.092025, pedigree (4,4,3,2,4)
  Calculated value based on literature value (see comments of the other parametres present in this dataset) and expert opinion. In the case when no industry/literature data are available about the type of cooling or directly fraction, cooling water, to air specific for the process a default assumption is applied. It is assumed that the once-through cooling system is used in 50% of all cases and recirculating system is used in another 50% of all cases.
- fraction, cooling water, recirculating system, to air: 0.771 dimensionless; name fraction_CW_R_to_air; lognormal variance with pedigree 0.0413, pedigree (2,3,1,3,1)
  (same comment as for fraction, cooling water, once-through system, to air)
- fraction, cooling water, cooling pond system, to air: 0.032 dimensionless; name fraction_CW_CP_to_air; lognormal variance with pedigree 0.0413, pedigree (2,3,1,3,1)
  (same comment as for fraction, cooling water, once-through system, to air)

## Reference product
- ammonium chloride: 1 kg; CPC 34653: Ammonium chloride; nitrites; By-product classification allocatable product; CAS 12125-02-9
  EcoSpold01Location=GLO
  Stoichiometric calculation. As there was no data available for the chlorosilane amination, the values for the consumption of the raw materials are calculated with an assumed yield of 95 %
  production volume 1.18537e6 kg
    Na
    From production volume of hexamethyldisilazane; stoichiometric
  property price 0.1 EUR2005
    Temporary price data. Calculated as 90% of purchasers price based on: Average import and export prices (total trades (USD) divided by total weight (kg) in EU27, USA, China, Japan and India) from UN data - Ammonium chloride (http://data.un.org/Data.aspx?q=+Ammonium+chloride&d=ComTrade&f=_l1Code%3a29%3bcmdCode%3a282710; accessed 1 June 10).
  property carbon content 0
    carbon content on a dry matter basis (reserved; not for manual entry)
  property true value 0.048583
    allocation property applied in "true value" allocation // value calculated from revenue
  properties: water content 0, dry mass 1 kg, wet mass 1 kg, water in wet mass 0 kg, carbon content, fossil 0, carbon content, non-fossil 0, EcoSpold01Allocation_undefined_9 39.7, EcoSpold01Allocation_undefined_7 39.7, EcoSpold01Allocation_undefined_16 39.7, EcoSpold01Allocation_undefined_11 39.7, EcoSpold01Allocation_undefined_6 39.7, EcoSpold01Allocation_undefined_12 39.7, EcoSpold01Allocation_undefined_4 39.7, EcoSpold01Allocation_undefined_3 39.7, EcoSpold01Allocation_undefined_5 39.7, EcoSpold01Allocation_undefined_13 39.7, EcoSpold01Allocation_undefined_14 39.7, EcoSpold01Allocation_undefined_8 39.7, EcoSpold01Allocation_undefined_2 39.7, EcoSpold01Allocation_undefined_15 39.7, EcoSpold01Allocation_undefined_10 39.7, EcoSpold01Allocation_undefined_1 100, EcoSpold01Allocation_undefined_19 39.7001, EcoSpold01Allocation_undefined_18 39.7001, carbon allocation 0 kg
- hexamethyldisilazane: 0 kg; By-product classification allocatable product; CPC 34150: Amine-function compounds; oxygen-function amino-compounds, except lysine and its esters and salts thereof and […]; CAS 999-97-3
  Hexamethyldisilazane is a clear, colorless liquid that hydrolizes slowly upon exposure to water.
  HMDS forms strong hydrogen bonds and is only weakly basic. Alkali and alkaline-earth metals form salts with it, e.g., LiN (SiMe3)2.
  Hexamethyldisilazane is used as a catalyst in condensation reactions of heterocyclic compounds such as in the microwave synthesis of a derivative of xanthine.
  It is also used as raw material to produce amidosilanes.
  EcoSpold01Location=GLO
  production volume 1.8e6 kg
    Na
    Estimate. Minimum for being listed as High Production Volume chemical
  property price 107 EUR2005
    Temporary price data. Calculated as 90% of purchasers price based on: Spot price per 4 gallons at http://www.sciencelab.com/page/S/PVAR/10415/SLH1687. 0.77 kg/l ; 3.78 l/gallon
  property heating value, net 27.79 MJ
    LHV is calculated based on the elemental composition of the substance. Based on the CAS number of the substance (000999-97-3), the chemical formula of the substance is found to be: C6H19NSi2, (PubChem 2020).
    Reference: Kim, S., Chen, J., Cheng, T., Gindulyte, A., He, J., He, S., Li, Q., Shoemaker, B. A., Thiessen, P. A., Yu, B., Zaslavsky, L., Zhang, J., & Bolton, E. E. (2019). PubChem 2019 update: improved access to chemical data. Nucleic acids research, 47(D1), D1102–D1109. https://doi.org/10.1093/nar/gky1033
  property carbon content 0.447205
    carbon content on a dry matter basis (reserved; not for manual entry)
  property true value 78.9574
    allocation property applied in "true value" allocation // value calculated from revenue
  properties: EcoSpold01Allocation_undefined_18 60.2999, EcoSpold01Allocation_undefined_19 60.2999, water content 0, carbon content, fossil 0.447205, carbon content, non-fossil 0, wet mass 1 kg, water in wet mass 0 kg, dry mass 1 kg, EcoSpold01Allocation_undefined_13 60.3, EcoSpold01Allocation_undefined_15 60.3, EcoSpold01Allocation_undefined_7 60.3, EcoSpold01Allocation_undefined_14 60.3, EcoSpold01Allocation_undefined_10 60.3, EcoSpold01Allocation_undefined_6 60.3, EcoSpold01Allocation_undefined_5 60.3, EcoSpold01Allocation_undefined_9 60.3, EcoSpold01Allocation_undefined_4 60.3, EcoSpold01Allocation_undefined_12 60.3, EcoSpold01Allocation_undefined_8 60.3, EcoSpold01Allocation_undefined_2 60.3, EcoSpold01Allocation_undefined_16 60.3, EcoSpold01Allocation_undefined_11 60.3, EcoSpold01Allocation_undefined_17 100, EcoSpold01Allocation_undefined_3 60.3, carbon allocation 0.447205 kg

## Inputs from technosphere
- heat, district or industrial, natural gas: 0.00297268 MJ; source Gendorf 2000; lognormal variance with pedigree 0.1786, pedigree (4,5,5,5,5)
  Estimation. Those values were approximated with data from an large chemical plant site in Germany producing 2.05 Mt a-1 (intermediates included) of different chemicals. The values for the energy consumption per kg of product of this plant (3.2 MJ kg-1) were used as approximation for the energy consumption of the chlorosilane amination. This total energy demand contains a split of 50% natural gas, 38% electricity and 12% steam from external energy sources. For this inventory all energy used for heat or steam was assumed to be natural gas
  EcoSpold01Location=RER
  Uncertainty: Estimation
  properties: heating value, net 1 MJ
- chemical factory, organics: 5.94537e-13 unit; source Rösch, L. 2004; lognormal variance with pedigree 0.448, pedigree (4,5,5,5,5)
  Estimation. The infrastructure is estimated based on the module "chemical plant, organics". This module assumes a built area of about 4.2 ha, an average output of 50'000 t/a, and plant life of fifty years.
  EcoSpold01Location=RER
  Uncertainty: Estimation
- silicone product: 0 kg; source Rösch, L. 2004; pedigree (1,1,1,1,1)
  EcoSpold01Location=RER
  Stoichiometric calculation. The chlorosilane input is modelled with the dataset "silicon product" as a functional unit (1 kg).
  Uncertainty: Stoechiometric calculation
  properties: heating value, net 9.83 MJ, wet mass 1 kg, carbon content, fossil 0.324324, dry mass 1 kg
  note on carbon content, fossil: The term silicones is used for compounds in which silicon atoms are linked via oxygen atoms, each silicon atom bearing one or several organic groups. In industrially important silicones, these groups are usually methyl or phenyl (ecoinvent v2.2 report 8_part71 & Ullmann). The chemical formula was considered to be [Si(CH3)2O]n (Ullmann).
- electricity, medium voltage: 0.00049495 kWh; source Gendorf 2000; lognormal variance with pedigree 0.1786, pedigree (4,5,5,5,5)
  Estimation. Those values were approximated with data from an large chemical plant site in Germany producing 2.05 Mt a-1 (intermediates included) of different chemicals. The values for the energy consumption per kg of product of this plant (3.2 MJ kg-1) were used as approximation for the energy consumption of the chlorosilane amination. This total energy demand contains a split of 50% natural gas, 38% electricity and 12% steam from external energy sources.
  EcoSpold01Location=UCTE
  Uncertainty: Estimation
- ammonia, anhydrous, liquid: 0 kg; source Rösch, L. 2004; pedigree (1,1,1,1,1)
  Stoichiometric calculation. As there was no data available for the chlorosilane amination, the values for the consumption of the raw materials are calculated with an assumed yield of 95 %
  EcoSpold01Location=RER
  Uncertainty: Stoechiometric calculation
  properties: wet mass 1 kg, dry mass 1 kg
- silicone product: 0.000417011, 0.000848715 kg (2 entries); source Rösch, L. 2004; lognormal variance with pedigree 0.076, pedigree (4,5,5,1,1)
  (same comment as for silicone product)
- ammonia, anhydrous, liquid: 4.80611e-6, 3.21224e-5, 7.47707e-6, 1.45145e-5, 1.48147e-5, 6.80067e-6, 5.59097e-5, 1.52128e-6, 0.000160884 kg (9 entries); source Rösch, L. 2004; lognormal variance with pedigree 0.076, pedigree (4,5,5,1,1)
  (same comment as for ammonia, anhydrous, liquid)

## Inputs from nature
- Water, cooling, unspecified natural origin [natural resource, in water]: 3.5672e-5 m3; name water_cooling_UNO_input; source Gendorf 2000; lognormal variance with pedigree 0.198, pedigree (4,5,5,5,5)
  Estimation. This value was approximated with data from an large chemical plant site in Germany producing 2.05 Mt a-1 (intermediates included) of different chemicals. This value was used in this inventory as approximation for the cooling water consumption of the chlorosilane amination.
  Estimation. This value was approximated with data from an large chemical plant site in Germany producing 2.05 Mt a-1 (intermediates included) of different chemicals. This value was used in this inventory as approximation for the cooling water consumption of the chlorosilane amination.
  Uncertainty: Estimation

## Emissions to nature
- Water [water, unspecified]: 2.18491e-5 m3; name water_to_water_unspecified; = water_cooling_UNO_input*(1-fraction_CW_to_air); lognormal variance with pedigree 0.0807, pedigree (2,2,5,1,1)
  Calculated value based on literature values and expert opinion. See comments in the parametres' comment field.
  property fraction, origin: fresh water 0; name fraction_origin_fresh_water_Ww
  property fraction, origin: salt water 0; name fraction_origin_salt_water_Ww
  property fraction, origin: unspecified 1; name fraction_origin_unspecified_Ww
  property dry mass 0 kg; name DM
  property wet mass 1000 kg; name WM
  property carbon content, fossil 0; name C_content_fossil
  property water in wet mass 1000 kg; name WWM
  property carbon content, non-fossil 0; name C_content_non_fossil
- Chlorosilane, trimethyl- [air, urban air close to ground]: 2.53145e-6 kg; lognormal variance with pedigree 0.188, pedigree (4,5,5,5,5)
  Estimation. As approximation the air emissions occurring from the purge vent, the distillation vent and fugitive emission sources were estimated to 0.2% of the raw material input.
  Uncertainty: Estimation
- Water [air, unspecified]: 1.38229e-5 m3; name water_to_air_unspecified; = (water_cooling_UNO_input*fraction_CW_to_air); lognormal variance with pedigree 0.0807, pedigree (2,2,5,1,1)
  (same comment as for Water)
  property fraction, origin: unspecified 1; name fraction_origin_unspecified
  property fraction, origin: salt water 0; name fraction_origin_salt_water
  property fraction, origin: fresh water 0; name fraction_origin_fresh_water
- Ammonium, ion [water, surface water]: 7.17249e-6 kg; lognormal variance with pedigree 0.188, pedigree (4,5,5,5,5)
  Estimation. The remaining amount of unreacted chlorosilane and ammonium (4.8 % of the input) is assumed to leave the production process with the waste water. Further it was assumed that this wastewater is treated in an internal wastewater plant. For the ammonia within the waste water a removal efficiency of 50% was assumed. The nitrogen emitted to air (N2). The removal efficiency for chlorosilane is assumed with 90%. The remaining in the sewage sludge is neglected. The remaining chlorosilane is calculated as silicon and chloride emissions.
  Uncertainty: Estimation
- Silicon [water, surface water]: 1.57507e-5 kg; lognormal variance with pedigree 0.218, pedigree (4,5,5,5,5)
  Estimation. The remaining amount of unreacted chlorosilane and ammonium (4.8 % of the input) is assumed to leave the production process with the waste water. Further it was assumed that this wastewater is treated in an internal wastewater plant. The removal efficiency for chlorosilane is assumed with 90%. The remaining in the sewage sludge is neglected. The remaining chlorosilane is calculated as silicon and chloride emissions.
  Uncertainty: Estimation
- Carbon dioxide, fossil [air, urban air close to ground]: 6.68303e-5 kg; lognormal variance with pedigree 0.1786, pedigree (4,5,5,5,5)
  Estimation. This value was approximated from the gases implied in the water treatment: the carbon contained in the removed chlorosilane is accounted as CO2 emissions to air.
  Uncertainty: Estimation
- Chloride [water, surface water]: 1.96896e-5 kg; lognormal variance with pedigree 0.448, pedigree (4,5,5,5,5)
  Estimation. The remaining amount of unreacted chlorosilane and ammonium (4.8 % of the input) is assumed to leave the production process with the waste water. Further it was assumed that this wastewater is treated in an internal wastewater plant. The nitrogen emitted to air (N2). The removal efficiency for chlorosilane is assumed with 90%. The remaining in the sewage sludge is neglected. The remaining chlorosilane is calculated as silicon and chloride emissions.
  Uncertainty: Estimation
- Ammonia [air, urban air close to ground]: 5.97701e-7 kg; lognormal variance with pedigree 0.218, pedigree (4,5,5,5,5)
  (same comment as for Chlorosilane, trimethyl-)

## Sampling procedure
Literature data

## Extrapolations
Energy consumptions and emissions are estimated. Infrastructure and transports are calculated with standard values.

## Review by Roland Hischier 2011-09-23
Transfer of documentation done.

## Review by Roland Hischier 2009-01-28
passed.
none
