# natural gas pressure reduction from high to low pressure

Dataset: EcoSpold 2, unit process
Geography: RoW
Time period: 2010-01-01 to 2021-12-31
Technology level: current
Classification: ISIC rev.4 ecoinvent: 3520:Manufacture of gas; distribution of gaseous fuels through mains
Scenario: Business-as-Usual
System model: Allocation, cut-off by classification
Generated by: trainee ecoinvent
Database: ecoinvent
isCopyrightProtected: false
accessRestrictedTo: 1

## General comment
Losses and capital goods are currently included in market for natural gas, low pressure, but are to be moved to this new activity when updating the datasets.
[This dataset was already contained in the ecoinvent database version 2. It was not individually updated during the transfer to ecoinvent version 3. Life Cycle Impact Assessment results may still have changed, as they are affected by changes in the supply chain, i.e. in other datasets. This dataset was generated following the ecoinvent quality guidelines for version 2. It may have been subject to central changes described in the ecoinvent version 3 change report (http://www.ecoinvent.org/database/ecoinvent-version-3/reports-of-changes/), and the results of the central updates were reviewed extensively. The changes added e.g. consistent water flows and other information throughout the database. The documentation of this dataset can be found in the ecoinvent reports of version 2, which are still available via the ecoinvent website. The change report linked above covers all central changes that were made during the conversion process.]

## Reference product
- natural gas, low pressure: 1 m3; By-product classification allocatable product; CPC 69120: Gas distribution through mains (on own account); CAS 14493-06-2
  production volume 1.67031e12 m3; = 1487179487.179/2.9e9*3.26e12
    Based on the reported quantity of low pressure natural gas produced in CH and the ratio of high pressure produced in CH to GLO
  property carbon content, fossil 0.695187
    C content considered the same as in high pressure (consumption mix)
  property heating value, net 39 MJ
    Literature value, Source: United Nations Statistics Division (2018) International Recommendations for Energy Statistics (IRES). Available at: http://unstats.un.org/unsd/statcom/doc11/BG-IRES.pdf.
  property price 0.205 EUR2005
    Calculated value based on data from United Nations Commodity Trade Statistics Database (comtrade.un.org). UN comtrade category: 271121 Natural gas in gaseous state. Year 2005. Using exchange rate of 1EURO = 1.209 USD. Average of price of import into 4 main markets (EU, US, JP and CN).
  property carbon content 0.695187
    carbon content on a dry matter basis (reserved; not for manual entry)
  properties: dry mass 1 kg, wet mass 1 kg, water in wet mass 0 kg, water content 0, carbon content, non-fossil 0, carbon allocation 0.695187 kg

## Inputs from technosphere
- natural gas, high pressure: 0, 0.00954309, 0.0142599, 0.0237387, 0.133811, 0.193822, 0.0327187, 0.147155, 0.444951 m3 (9 entries)
  properties: wet mass 0.84 kg, carbon content, fossil 0.602381, dry mass 0.84 kg, heating value, net 39 MJ
  note on carbon content, fossil: An average C content of 0.506 kg C/ m3 has been assumed (this average has been calculated using data in Tab 3.5, ecoinvent v2.2 report 6_V
  note on heating value, net: Literature value, Source: United Nations Statistics Division (2018) International Recommendations for Energy Statistics (IRES). Available at: http://unstats.un.org/unsd/statcom/doc11/BG-IRES.pdf.

## Review by Emilia Moreno Ruiz 2015-09-17
broken formula fixed
