# powder coating, steel

Dataset: EcoSpold 2, unit process
Geography: RER
Time period: 1996-01-01 to 2021-12-31
Technology level: current
Classification: ISIC rev.4 ecoinvent: 2592:Treatment and coating of metals; machining
Classification: EcoSpold01Categories: metals/processing
Tags: ConvertedDataset
Scenario: Business-as-Usual
System model: Allocation, cut-off by classification
Generated by: Hans-Jörg Althaus
Published in: Althaus H.-J. 2004
Database: ecoinvent
isCopyrightProtected: true
accessRestrictedTo: 1

## General comment
The powder inventoried is mainly used in exterior architectural applications. The coating thickness is 80 um. The heat consumption is calculated for a sheet of 2 mm thickness.
[This dataset was already contained in the ecoinvent database version 2. It was not individually updated during the transfer to ecoinvent version 3. Life Cycle Impact Assessment results may still have changed, as they are affected by changes in the supply chain, i.e. in other datasets. This dataset was generated following the ecoinvent quality guidelines for version 2. It may have been subject to central changes described in the ecoinvent version 3 change report (http://www.ecoinvent.org/database/ecoinvent-version-3/reports-of-changes/), and the results of the central updates were reviewed extensively. The changes added e.g. consistent water flows and other information throughout the database. The documentation of this dataset can be found in the ecoinvent reports of version 2, which are still available via the ecoinvent website. The change report linked above covers all central changes that were made during the conversion process.]

## Included activities end
Phosphating of the steel sheet, powder coating and heat curing. No transports of the steel sheet to the coating plant or back are inventoried.

## Geography
Swiss waste treatment assumed

## Technology
Phosphating, coating and heat curing. Treatment of the waste water is assumed.

## Parameters
- fraction, cooling water, once-through system, to air: 0.004 dimensionless; name fraction_CW_OT_to_air; lognormal variance with pedigree 0.0413, pedigree (2,3,1,3,1)
  Calculated based on literature value (Scown, C.D., 2011, Water Footprint of U.S. Transportation Fuels and supplying information of the article) (Vionnet, S., Quantis Water Database - Technical Report, 2012).
- fraction, cooling water, recirculating system, to air: 0.771 dimensionless; name fraction_CW_R_to_air; lognormal variance with pedigree 0.0413, pedigree (2,3,1,3,1)
  (same comment as for fraction, cooling water, once-through system, to air)
- fraction, cooling water, cooling pond system, to air: 0.032 dimensionless; name fraction_CW_CP_to_air; lognormal variance with pedigree 0.0413, pedigree (2,3,1,3,1)
  (same comment as for fraction, cooling water, once-through system, to air)
- fraction, water, decarbonised, to air: 0.3875 dimensionless; name fraction_WDC_to_air; = fraction_CW_to_air; lognormal variance with pedigree 0.092025, pedigree (4,4,3,2,4)
  Calculated value. See comments in the other parametres present in this dataset. Decarbonised water is considered to be always used as cooling water, thus cooling water fractions to air are applied to all carbonised water input flows to calculate the amount of water consumed in the processes.
- fraction, cooling water, to air: 0.3875 dimensionless; name fraction_CW_to_air; = (0.5*fraction_CW_OT_to_air)+(0.5*fraction_CW_R_to_air); lognormal variance with pedigree 0.092025, pedigree (4,4,3,2,4)
  Calculated value based on literature value (see comments of the other parametres present in this dataset) and expert opinion. In the case when no industry/literature data are available about the type of cooling or directly fraction, cooling water, to air specific for the process a default assumption is applied. It is assumed that the once-through cooling system is used in 50% of all cases and recirculating system is used in another 50% of all cases.
- fraction, process water, to air: 0.15 dimensionless; name fraction_PW_to_air; lognormal variance with pedigree 0.092025, pedigree (4,4,3,2,4)
  Literature value. In case when no industry/process specific data are available, default evaporation fraction value is used. This value is 15% and is based on literature (Statistics Canada, 2007 & Shaffer, K.H., 2008, Consumptive water use in the Great Lakes Basin, USGS & Shiklomanov, 2003, World Water Resources at the Beginning of the 21st Century) and has been approved by an expert.

## Reference product
- powder coat, steel: 1 m2; By-product classification allocatable product; CPC 41117: Granules and powders, of pig iron and spiegeleisen, or steel
  EcoSpold01Location=RER
  production volume 1.32237 m2
    This is a placeholder value that does not reflect real-world production volumes. This dataset does not currently require a real-world production volume to work in the database framework, and no actual data were collected yet. This has no negative effect on the results of the ecoinvent database. The placeholder value of this activity was scaled according to the nominal GDP of 2005 (source: United Nations, http://data.un.org/Glossary.aspx?q=GDP+%28current+US%24%29, accessed 20130726) to reflect an appropriate share of the global production volume, which is also a placeholder value.
  property price 4.61571 EUR2005
    Calculated based on inputs: The price of the product has been calculated as a sum of the values of the material and energy inputs for this product. This value is therefore a rough estimation. It may underestimate the real price since there are additional expenses when producing any product. These expences can include for example labour costs, treatment of waste materials and profit for the producer. Please consider carefully whether this level of data quality is acceptable for your application.

## Inputs from technosphere
- water, decarbonised: 0 kg; name water_decarbonised_input; pedigree (1,1,1,1,1)
  EcoSpold01Location=RER
  properties: wet mass 1 kg
- sludge from steel rolling: -0.00925 kg; lognormal variance with pedigree 0.5, pedigree (1,1,5,1,1)
  calculated from max value assuming lognormal distribution
  EcoSpold01Location=CH
  production volume 0.00925 kg
    Calculated from the production volume of powder coat, steel in proportion to the respective output amounts.
  properties: dry mass 0.8 kg, wet mass 1 kg, carbon content, fossil 0.0123943, water content 0.25
- heat, district or industrial, natural gas: 34.4 MJ; lognormal variance with pedigree 0.178, pedigree (4,5,5,5,4)
  EcoSpold01Location=RER
  properties: heating value, net 1 MJ
- chemical factory, organics: 4e-10 unit; lognormal variance with pedigree 0.68, pedigree (5,5,5,5,5)
  EcoSpold01Location=RER
  activityLink introduced to establish a direct link to the corresponding regional supply of this product
- lubricating oil: 0.0172 kg; lognormal variance with pedigree 0.0526, pedigree (3,3,5,1,1)
  EcoSpold01Location=RER
  properties: dry mass 1 kg, wet mass 1 kg, heating value, net 40.2 MJ, carbon content, fossil 0.75
  note on heating value, net: Literature value, Source: IPCC 2006, 2006 IPCC Guidelines for National Greenhouse Gas Inventories, Prepared by the National Greenhouse Gas Inventories Programme, Eggleston H.S., Buendia L., Miwa K., Ngara T. and Tanabe K. (eds). Published: IGES, Japan
  note on carbon content, fossil: Lubricating oil is produced from diesel. C-content/dry mass of fats and oils considered 75%, from: ecoinvent v2.2 report, n 15a, pg 40
- hazardous waste, for incineration: 0 kg; pedigree (1,1,1,1,1)
  EcoSpold01Location=CH
  production volume 0 kg
    (same comment as for sludge from steel rolling)
  properties: water content 0.333333, dry mass 0.75 kg, wet mass 1 kg, carbon content, fossil 0.554667, heating value, net 17 MJ
  note on carbon content, fossil: Tab A.6, ecoinvent v2.2 report 13_I. C content has been calculated after data in the tables, and then referred to 1 kg DM
  note on heating value, net: Value taken from the general comment of the treatment dataset.
- electricity, medium voltage: 1.3 kWh; lognormal variance with pedigree 0.38, pedigree (5,5,5,5,5)
  EcoSpold01Location=UCTE
- waste polyethylene: -0.00261 kg; lognormal variance with pedigree 0.38, pedigree (5,5,5,5,5)
  EcoSpold01Location=CH
  production volume 0.00261 kg
    (same comment as for sludge from steel rolling)
  properties: water content 0.00401606, dry mass 0.996 kg, wet mass 1 kg, carbon content, fossil 0.825301, heating value, net 42.47 MJ
  note on carbon content, fossil: C content in 1 kg DM was calculated using data in Tab A.1, ecoinvent v2.2 report 13_I
- sodium hydroxide, without water, in 50% solution state: 0.00342 kg; lognormal variance with pedigree 0.0526, pedigree (3,3,5,1,1)
  EcoSpold01Location=RER
  properties: wet mass 1 kg, dry mass 1 kg, heating value, net 3.03 MJ
- coating powder: 0.0965 kg; lognormal variance with pedigree 0.318, pedigree (4,5,5,5,5)
  EcoSpold01Location=RER
  properties: heating value, net 10.28 MJ, carbon content, fossil 0.339435, dry mass 1 kg, wet mass 1 kg
  note on carbon content, fossil: The dataset assumes a 1:1 mixture of epoxy (C7H15ClO4) and polyester resin (C8H6O2, C8H16O4, C5H12O2,C4H2O3)n (29.3% w/w each). The pigment inventoried (35.4% w/w) is TiO2 (ecoinvent v2.2 report 10-part 10). The C content has been calculated as the addition of C content in each ingredient (including chemicals, organic)
- hydrochloric acid, without water, in 30% solution state: 0.34 kg; lognormal variance with pedigree 0.0526, pedigree (3,3,5,1,1)
  EcoSpold01Location=RER
  properties: heating value, net 3.32 MJ, dry mass 1 kg, wet mass 1 kg
- aluminium sulfate, powder: 5.9e-5 kg; lognormal variance with pedigree 0.0526, pedigree (3,3,5,1,1)
  EcoSpold01Location=RER
  properties: wet mass 1 kg, dry mass 1 kg
- water, decarbonised: 3.43901e-6, 6.93288e-7, 2.27966e-6, 2.18367e-9, 1.25851e-7 kg (5 entries); lognormal variance with pedigree 0.0526, pedigree (3,3,5,1,1)
  EcoSpold01Location=RER
- hazardous waste, for incineration: -0.0302103, -0.00078968 kg (2 entries); lognormal variance with pedigree 0.0526, pedigree (3,3,5,1,1)
  EcoSpold01Location=CH
  production volume 0.031 kg

## Inputs from nature
- Water, unspecified natural origin [natural resource, in water]: 0.0164837 m3; name water_UNO_input; source Byers, W. 2003; lognormal variance with pedigree 0.052625, pedigree (3,3,5,2,1)
  Calculated based on literature, (Vionnet, S., Quantis Water Database - Technical Report, 2012). Recalculated from the source file; thickness of the steel sheet of 0.002m and steel density of 7900 kg/m3. The process starts when untreated surface (steel sheet) enters the coating plant. It includes the processes: pre-treatment (cleaning) and coating itself.
  property wet mass 1000 kg; name WM
  property dry mass 0.1101 kg; name DM
  property carbon content, non-fossil 0; name C_content_non_fossil
  property water in wet mass 999.89 kg; name WWM
  property water content 9081.65; name water_content
  property carbon content, fossil 0.0104329; name C_content_fossil

## Emissions to nature
- DOC, Dissolved Organic Carbon [water, unspecified]: 1.93e-5 kg; lognormal variance with pedigree 1.72, pedigree (1,1,5,1,1)
  Twice the uncertainty of TOC
- Hydrocarbons, unspecified [water, unspecified]: 1.12e-6 kg; lognormal variance with pedigree 0.0526, pedigree (3,3,5,1,1)
- Chromium, ion [water, unspecified]: 1.41e-6 kg; lognormal variance with pedigree 0.16, pedigree (1,1,5,1,1)
  calculated from max value assuming lognormal distribution
- TOC, Total Organic Carbon [water, unspecified]: 1.93e-5 kg; lognormal variance with pedigree 0.94, pedigree (1,1,5,1,1)
  calculated from max value assuming lognormal distribution
- Nickel, ion [water, unspecified]: 1.92e-7 kg; lognormal variance with pedigree 0.37, pedigree (1,1,5,1,1)
  calculated from max value assuming lognormal distribution
- Zinc, ion [water, unspecified]: 1.52e-6 kg; lognormal variance with pedigree 2.28, pedigree (1,1,5,1,1)
  calculated from max value assuming lognormal distribution
- Sodium [air, unspecified]: 4.37e-7 kg; lognormal variance with pedigree 0.178, pedigree (1,5,5,1,1)
- Lead [water, unspecified]: 1.28e-7 kg; lognormal variance with pedigree 0.0526, pedigree (3,3,5,1,1)
- Phosphorus [water, unspecified]: 1.14e-7 kg; lognormal variance with pedigree 1.29, pedigree (1,1,5,1,1)
  calculated from max value assuming lognormal distribution
- Suspended solids, unspecified [water, unspecified]: 5.19e-6 kg; lognormal variance with pedigree 1.19, pedigree (1,1,5,1,1)
  calculated from max value assuming lognormal distribution
- NMVOC, non-methane volatile organic compounds, unspecified origin [air, unspecified]: 0.000482 kg; lognormal variance with pedigree 0.5, pedigree (5,5,5,5,5)
- Hydrogen chloride [air, unspecified]: 0.0505 kg; lognormal variance with pedigree 0.1686, pedigree (2,5,5,1,1)
- COD, Chemical Oxygen Demand [water, unspecified]: 0.000416 kg; lognormal variance with pedigree 0.76, pedigree (1,1,5,1,1)
  calculated from max value assuming lognormal distribution
- Oils, unspecified [water, unspecified]: 6.75e-6 kg; lognormal variance with pedigree 0.85, pedigree (1,1,5,1,1)
  calculated from max value assuming lognormal distribution
- Sodium, ion [water, unspecified]: 0.00393 kg; lognormal variance with pedigree 0.098, pedigree (1,5,5,1,1)
- BOD5, Biological Oxygen Demand [water, unspecified]: 0.000416 kg; lognormal variance with pedigree 1.48, pedigree (1,1,5,1,1)
  Twice the uncertainty of COD
- Chloride [water, unspecified]: 3.13e-5 kg; lognormal variance with pedigree 0.0526, pedigree (3,3,5,1,1)
- Water [air, unspecified]: 0.00247256 m3; name water_to_air_unspecified; = (water_decarbonised_input/1000*fraction_WDC_to_air)+(water_UNO_input*fraction_PW_to_air); lognormal variance with pedigree 0.0807, pedigree (2,2,5,1,1)
  Calculated value based on literature values and expert opinion. See comments in the parametres' comment field.
  property fraction, origin: unspecified 0.999999; name fraction_origin_unspecified
  property fraction, origin: fresh water 1.02495e-6; name fraction_origin_fresh_water
  property fraction, origin: salt water 0; name fraction_origin_salt_water
- Chromium VI [water, unspecified]: 6.54e-8 kg; lognormal variance with pedigree 0.16, pedigree (1,1,5,1,1)
  calculated from max value assuming lognormal distribution
- Iron, ion [water, unspecified]: 1.12e-5 kg; lognormal variance with pedigree 1.14, pedigree (1,1,5,1,1)
  calculated from max value assuming lognormal distribution
- Water [water, unspecified]: 0.0140112 m3; name water_to_water_unspecified; = (water_decarbonised_input/1000)*(1-fraction_WDC_to_air)+water_UNO_input*(1-fraction_PW_to_air); lognormal variance with pedigree 0.0807, pedigree (2,2,5,1,1)
  (same comment as for Water)
  property fraction, origin: salt water 0; name fraction_origin_salt_water_Ww
  property fraction, origin: unspecified 1; name fraction_origin_unspecified_Ww
  property fraction, origin: fresh water 2.85897e-7; name fraction_origin_fresh_water_Ww

## Sampling procedure
Literature

## Extrapolations
This dataset has been extrapolated from year 2003 to the year of the calculation (2021). The uncertainty has been adjusted accordingly.

## Review by Roland Hischier 2004-04-13
passed
