# wood preservation facility construction, vacuum pressure vessel

Dataset: EcoSpold 2, unit process
Geography: GLO
Time period: 2012-01-01 to 2021-12-31
Technology level: current
Classification: ISIC rev.4 ecoinvent: 4290:Construction of other civil engineering projects
Tags: Swiss brush-up completed
Scenario: Business-as-Usual
System model: Allocation, cut-off by classification
Generated by: Frank Werner
Published in: Werner F. 2007
Database: ecoinvent
isCopyrightProtected: true
accessRestrictedTo: 1

## General comment
The plant has a yearly throughput of 6'000 m3 timber, a life time of 75 years and a life time output of 4.5E5 m3 treated timber. The infrastructure represents plants with pressure vessels used for vacuum pressure treatment. A more detailed description of the design of the required equipment can be found in the respective datasets for wood preservation services.

## Included activities start
Infrastructure dataset containing the main elements of the facility.

## Included activities end
The land area and the material (production and disposal) needed for a preservative treatment plant for oscillating pressure treatment including strorage area is included.

## Geography
Data from Germany and Switzerland. Location of plant within Europe of minor importance

## Technology
Infrastructure for vacuum pressure impregnation; the vessel is comparably large.

## Reference product
- wood preservation facility, vacuum pressure method: 1 unit; CPC 53269: Other constructions for manufacturing; By-product classification allocatable product
  production volume 1000 unit; name p_vaccum_pressure_vessel
    estimated based on estimated production volume
  property price 117779 EUR2005
    Calculated based on inputs: The price of the product has been calculated as a sum of the values of the material and energy inputs for this product. This value is therefore a rough estimation. It may underestimate the real price since there are additional expenses when producing any product. These expences can include for example labour costs, treatment of waste materials and profit for the producer. Please consider carefully whether this level of data quality is acceptable for your application.
  property lifetime 50 year; name lifetime

## Inputs from technosphere
- scrap steel: 0 kg; pedigree (1,1,1,1,1)
  calculated from steel input
  production volume 0 kg
    Calculated from production volume of reference product using the relative outputs.
  properties: carbon content, fossil 0.0025, wet mass 1 kg, dry mass 1 kg
- electronics, for control units: 200 kg; name m_electronics; source Hubel M. 2012; lognormal variance with pedigree 0.235, pedigree (5,5,5,5,5)
  Rough estimate based on equipment for similar technology
  property dry mass 1 kg; name m_electronics_DM
  property wet mass 1 kg; name m_electronics_WM
  property carbon content, non-fossil 0.00013442; name C_content_non_fossil_electronics
  property carbon content, fossil 0.337146; name C_content_fossil_electronics
  property water content 0; name water_content
  property water in wet mass 0 kg; name WWM
  properties: UVEK_link_1 2021, UVEK_relative_amount_1 1
  note on UVEK_link_1: to be used only in special submissions in coordination with ecoinvent and the Swiss FOEN
- concrete, normal: 3 m3; name v_concrete; source Werner F. 2007; lognormal variance with pedigree 0.235, pedigree (5,5,5,5,5)
  Reinforcement for heavy machinery
  properties: dry mass 2190 kg, water content 0.086758, wet mass 2380 kg
- waste electric and electronic equipment: -200 kg; name w_electronics; = (m_electronics)*-1; source Hubel M. 2012; lognormal variance with pedigree 0.203, pedigree (4,5,5,5,5)
  Rough estimate based on equipment for similar technology
  production volume 200000 kg; = p_vaccum_pressure_vessel*w_electronics
    Calculated from production volume of reference product using the relative outputs.
  property water in wet mass 0 kg; name w_electronics_WWM
  property wet mass 1 kg; name w_electronics_WM
  property water content 0; name w_electronics_water_content
  property dry mass 1 kg; name w_electronics_DM
  property carbon content, fossil 0.33715; name w_electronics_C_content_fossil
  property carbon content, non-fossil 0.00013442; name w_electronics_C_content_non_fossil
  properties: UVEK_relative_amount_1 -1, UVEK_link_1 928
- steel, low-alloyed, hot rolled: 10000 kg; name m_steel_unalloyed; source Leuenberger H. 2012; lognormal variance with pedigree 0.235, pedigree (5,5,5,5,5)
  Weight of pressure vessel + storage tank
  property wet mass 1 kg; name m_steel_unalloyed_WM
  property dry mass 1 kg; name m_steel_unalloyed_DM
  properties: UVEK_link_2 2662, UVEK_relative_amount_1 1, UVEK_relative_amount_9 0.212, carbon content, fossil 0.0025, UVEK_link_1 4222, UVEK_relative_amount_8 0.139, UVEK_link_8 4417, UVEK_link_9 4433, UVEK_relative_amount_2 1
  note on UVEK_relative_amount_9: Scaling factor = amount of transport in corresponding KBOB dataset/amount of this input from technosphere. Transport distances estimated based on: ecoinvent report Overview and methodology, Table 4.2/Frischknecht, Jungblut/2007. To be used only in special submissions in coordination with ecoinvent and the Swiss FOEN
  note on UVEK_link_8: This link has been introduced to model transport specifically for the SAM model; to be used only in special submissions in coordination with ecoinvent and the Swiss FOEN.
- building, hall: 750 m2; source Leuenberger H. 2012
  Estimate for roofed area per pressure vessel
  properties: UVEK_relative_amount_1 1, UVEK_link_1 342
- waste reinforced concrete: 0 kg; name w_concrete; source Werner F. 2007; pedigree (1,1,1,1,1)
  Conversion to kg from volume with 2400 kg/m3
  production volume 0 kg
    Calculated from the production volume of wood preservation facility in proportion to the respective output amounts.
  properties: water content 0.00585407, UVEK_link_1 883, dry mass 0.99418 kg, UVEK_relative_amount_1 -1, wet mass 1 kg
- scrap steel: -2434.95, -3.085, -7561.96 kg (3 entries); lognormal variance with pedigree 0.203, pedigree (4,5,5,5,5)
  calculated from steel input
  production volume 1e7 kg
- waste reinforced concrete: -471.132, -4.992, -6723.88 kg (3 entries); source Werner F. 2007; lognormal variance with pedigree 0.203, pedigree (4,5,5,5,5)
  Conversion to kg from volume with 2400 kg/m3
  production volume 7.2e6 kg

## Inputs from nature
All rows: source Leuenberger H. 2012
- Transformation, to industrial area [natural resource, land]: 1750 m2; name asphalted_area; lognormal variance with pedigree 0.3761, pedigree (3,5,4,3,3)
  Storage place, asphalted
- Transformation, to urban/industrial fallow (non-use) [natural resource, land]: 7500 m2; name storage_area_in_gravel; lognormal variance with pedigree 0.3761, pedigree (3,5,4,3,3)
  Storage place under gravel with partly fallow type vegetation
- Transformation, from unspecified [natural resource, land]: 9250 m2; = storage_area_in_gravel+asphalted_area; lognormal variance with pedigree 0.358, pedigree (1,1,4,1,1)
  Total area used for building and storage place
- Occupation, urban/industrial fallow (non-use) [natural resource, land]: 562500 m2*year; = storage_area_in_gravel*75; lognormal variance with pedigree 0.208, pedigree (1,1,4,1,1)
  Area times service life
- Occupation, industrial area [natural resource, land]: 131250 m2*year; = asphalted_area*75; lognormal variance with pedigree 0.208, pedigree (1,1,4,1,1)
  Area times service life

## Sampling procedure
estimation

## Extrapolations
This dataset has been extrapolated from year 2012 to the year of the calculation (2021). The uncertainty has been adjusted accordingly.
