# treatment of wastewater from maize starch production, capacity 1.1E10l/year

Dataset: EcoSpold 2, unit process
Geography: CH
Time period: 1994-01-01 to 2021-12-31
Technology level: current
Classification: EcoSpold01Categories: waste management/wastewater treatment
Classification: ISIC rev.4 ecoinvent: 3700:Sewerage
Tags: Treatment; ConvertedDataset
Scenario: Business-as-Usual
System model: Allocation, cut-off by classification
Generated by: Gabor Doka (obsolete)
Published in: Doka G. 2008
Database: ecoinvent
isCopyrightProtected: true
accessRestrictedTo: 1

## General comment
Wastewater purified in a moderatly large municipal wastewater treatment plant (capacity class 2), with an average capacity size of 71100 per-captia-equivalents PCE.
Wastewater contains (in kg/m3): COD: 7.34 (GSD=217%); BOD: 6.13 (GSD=154%); Ntot.: 0.569 (GSD=113%); Ptot.: 0.105 (GSD=132%);
[This dataset was already contained in the ecoinvent database version 2. It was not individually updated during the transfer to ecoinvent version 3. Life Cycle Impact Assessment results may still have changed, as they are affected by changes in the supply chain, i.e. in other datasets. This dataset was generated following the ecoinvent quality guidelines for version 2. It may have been subject to central changes described in the ecoinvent version 3 change report (http://www.ecoinvent.org/database/ecoinvent-version-3/reports-of-changes/), and the results of the central updates were reviewed extensively. The changes added e.g. consistent water flows and other information throughout the database. The documentation of this dataset can be found in the ecoinvent reports of version 2, which are still available via the ecoinvent website. The change report linked above covers all central changes that were made during the conversion process.]

## Included activities end
Infrastructure materials for municipal wastewater treatment plant, transports, dismantling. Land use burdens.

## Geography
Specific to the technology mix encountered in Switzerland in 2000. Well applicable to modern treatment practices in Europe, North America or Japan.

## Technology
Three stage wastewater treatment (mechanical, biological, chemical) including sludge digestion (fermentation) according to the average technology in Switzerland

## Parameters
- fraction, process water, to air: 0.1 dimensionless; name fraction_PW_to_air; lognormal variance with pedigree 0.092025, pedigree (4,4,3,2,4)
  Literature value (Statistics Canada, 2007 & Shaffer, K.H., 2008, Consumptive water use in the Great Lakes Basin, USGS) (Vionnet, S., Quantis Water Database - Technical Report, 2012).

## Reference product
- wastewater from maize starch production: -1 m3; name RP_amount_1; CPC 39920: Sewage sludge; By-product classification Waste
  production volume 0.0336675 m3; name RP_PV_1
    This is a placeholder value that does not reflect real-world production volumes. This dataset does not currently require a real-world production volume to work in the database framework, and no actual data were collected yet. This has no negative effect on the results of the ecoinvent database. The placeholder value of this activity was scaled according to the nominal GDP of 2005 (source: United Nations, http://data.un.org/Glossary.aspx?q=GDP+%28current+US%24%29, accessed 20130726) to reflect an appropriate share of the global production volume, which is also a placeholder value.
  property price 0 EUR2005; name RP_amount_1_price_EUR2005
    Waste products are assigned a price of zero as they are assumed to require further treatment.
  property carbon content, non-fossil 0.825003
    COD= 7.34 kg/m3 (Tab A.19, ecoinvent v2.2 report 13_I). COD was converted to TOC, using conversion factors in Tab 4.10 (ecoinvent v2.2 report 13_IV). TOC was considered as Total Carbon.
  property carbon content 0.825003
    carbon content on a dry matter basis (reserved; not for manual entry)
  properties: water in wet mass 996.149 kg, carbon content, fossil 0, dry mass 3.85149 kg, water content 258.64, wet mass 1000 kg, carbon allocation 3.17749 kg

## Inputs from technosphere
- chemical, inorganic: 5.5966e-6 kg; lognormal variance with pedigree 0.14, pedigree (1,1,5,1,1)
  burden from sludge incineration. Uncertainty calculated from wastewater composition and treatment model
  properties: carbon content, fossil 0.003, wet mass 1 kg, dry mass 1 kg
  note on carbon content, fossil: This dataset is an unweighted average of 20 inorganic substances (listed in Tab 88.1, ecoinvent v2.2 report 8, part II), being part of the top100 chemicals included in this database. The C-content has also been calculated as an unweighted average of the C content of the substances composing this dataset.
- heat, district or industrial, other than natural gas: 3.6446 MJ; lognormal variance with pedigree 0.05, pedigree (1,1,5,1,1)
  (same comment as for chemical, inorganic)
  properties: heating value, net 1 MJ
- municipal waste incineration facility: 1.0864e-9 unit; lognormal variance with pedigree 0.05, pedigree (1,1,5,1,1)
  (same comment as for chemical, inorganic)
- quicklime, milled, packed: 3.1487e-5 kg; lognormal variance with pedigree 0.1, pedigree (1,1,5,1,1)
  (same comment as for chemical, inorganic)
  properties: water content 0.010101, dry mass 0.99 kg, wet mass 1 kg
- liquid manure spreading, by vacuum tanker: 0.013439 m3; lognormal variance with pedigree 0.04, pedigree (1,1,5,1,1)
  burden from sludge spreading. Uncertainty calculated from wastewater composition and treatment model
  This exchange has an activity link directly to the producing activity because the product is primarily consumed in the same geographical area where it is produced.
- wastewater treatment facility, capacity 1.1E10l/year: 1.9883e-9 unit; lognormal variance with pedigree 0.04, pedigree (1,1,5,1,1)
  uncertainty heeded in exchanges of the module
  This exchange has an activity link directly to the producing activity because the product is primarily consumed in the same geographical area where it is produced.
- heat, district or industrial, natural gas: 0.125433 MJ; lognormal variance with pedigree 0.2, pedigree (1,1,5,1,1)
  (same comment as for chemical, inorganic)
  properties: heating value, net 1 MJ
- electricity, low voltage: 4.6033 kWh; lognormal variance with pedigree 0.11, pedigree (1,1,5,1,1)
  direct wastewater treatment plant burden. Uncertainty calculated from wastewater composition and treatment model
- slag landfill: 7.3313e-10 unit; lognormal variance with pedigree 0.07, pedigree (1,1,5,1,1)
  (same comment as for chemical, inorganic)
- waste plastic, mixture: -0.0155 kg; name BP_amount_1; lognormal variance with pedigree 0.04, pedigree (1,1,5,1,1)
  (same comment as for electricity, low voltage)
  production volume 0.000521847 kg; = BP_amount_1* RP_PV_1/ABS( RP_amount_1)
    Calculated from the production volume of wastewater from maize starch production in proportion to the respective output amounts.
  property price 0 EUR2005; name BP_amount_1_price_EUR2005
  properties: heating value, net 30.79 MJ, wet mass 1 kg, water content 0.180638, carbon content, fossil 0.747344, dry mass 0.847 kg
  note on heating value, net: Value taken from the general comment of the treatment dataset.
  note on carbon content, fossil: C content in 1 kg DM was calculated using data in Tab A.2, ecoinvent v2.2 report 13_I
- iron (III) chloride, without water, in 40% solution state: 0.65112 kg; lognormal variance with pedigree 0.13, pedigree (1,1,5,1,1)
  direct wastewater treatment plant burden plus burden from sludge incineration. Uncertainty calculated from wastewater composition and treatment model
  properties: wet mass 1 kg, dry mass 1 kg
- waste graphical paper: -0.0155 kg; name BP_amount_2; lognormal variance with pedigree 0.04, pedigree (1,1,5,1,1)
  (same comment as for electricity, low voltage)
  production volume 0.000521847 kg; = BP_amount_2* RP_PV_1/ABS( RP_amount_1)
    (same comment as for waste plastic, mixture)
  property price 0 EUR2005; name BP_amount_2_price_EUR2005
  properties: heating value, net 14.12 MJ, carbon content, non-fossil 0.454955, water content 0.126126, wet mass 1 kg, dry mass 0.888 kg
- sewer grid, 1.1E10l/year, 242 km: 1.6832e-7 km; lognormal variance with pedigree 0.04, pedigree (1,1,5,1,1)
  (same comment as for wastewater treatment facility, capacity 1.1E10l/year)
- waste cement, hydrated: -0.051029 kg; name BP_amount_3; lognormal variance with pedigree 0.08, pedigree (1,1,5,1,1)
  (same comment as for chemical, inorganic)
  production volume 0.00171802 kg; = BP_amount_3* RP_PV_1/ABS( RP_amount_1)
    (same comment as for waste plastic, mixture)
  property price 0 EUR2005; name BP_amount_3_price_EUR2005
  properties: dry mass 1 kg, wet mass 1 kg
- residual material landfill: 1.0631e-10 unit; lognormal variance with pedigree 0.07, pedigree (1,1,5,1,1)
  (same comment as for chemical, inorganic)
- titanium dioxide: 4.0907e-5 kg; lognormal variance with pedigree 0.53, pedigree (1,1,5,1,1)
  (same comment as for chemical, inorganic)
  properties: wet mass 1 kg, dry mass 1 kg
- sodium hydroxide, without water, in 50% solution state: 0.00017367 kg; lognormal variance with pedigree 0.1, pedigree (1,1,5,1,1)
  (same comment as for chemical, inorganic)
  properties: dry mass 1 kg, heating value, net 3.03 MJ, wet mass 1 kg
- iron sulfate: 0.47623 kg; lognormal variance with pedigree 0.13, pedigree (1,1,5,1,1)
  (same comment as for electricity, low voltage)
  properties: wet mass 1 kg, dry mass 1 kg
- aluminium sulfate, powder: 0.12871 kg; lognormal variance with pedigree 0.13, pedigree (1,1,5,1,1)
  (same comment as for electricity, low voltage)
  properties: wet mass 1 kg, dry mass 1 kg
- process-specific burdens, municipal waste incineration: 4.3456 kg; lognormal variance with pedigree 0.05, pedigree (1,1,5,1,1)
  burden from sludge incineration. Uncertainty calculated from wastewater composition and treatment model;activityLink introduced to establish a direct link to the corresponding regional supply of this product
- ammonia, anhydrous, liquid: 0.0014291 kg; lognormal variance with pedigree 0.2, pedigree (1,1,5,1,1)
  (same comment as for chemical, inorganic)
  properties: dry mass 1 kg, wet mass 1 kg
- electricity, high voltage: 0.62476 kWh; lognormal variance with pedigree 0.49, pedigree (1,1,5,1,1)
  (same comment as for chemical, inorganic)
- process-specific burdens, residual material landfill: 0.051029 kg; lognormal variance with pedigree 0.07, pedigree (1,1,5,1,1)
  (same comment as for process-specific burdens, municipal waste incineration)
- chromium oxide, flakes: 8.3483e-7 kg; lognormal variance with pedigree 0.53, pedigree (1,1,5,1,1)
  (same comment as for chemical, inorganic)
  properties: dry mass 1 kg, wet mass 1 kg
- cement, unspecified: 0.020412 kg; lognormal variance with pedigree 0.08, pedigree (1,1,5,1,1)
  (same comment as for chemical, inorganic)
  properties: dry mass 1 kg, wet mass 1 kg
- hydrochloric acid, without water, in 30% solution state: 3.358e-6 kg; lognormal variance with pedigree 0.14, pedigree (1,1,5,1,1)
  (same comment as for chemical, inorganic)
  properties: heating value, net 3.32 MJ, dry mass 1 kg, wet mass 1 kg
- process-specific burdens, slag landfill: 0.41239 kg; lognormal variance with pedigree 0.07, pedigree (1,1,5,1,1)
  (same comment as for process-specific burdens, municipal waste incineration)

## Emissions to nature
- DOC, Dissolved Organic Carbon [water, ground-, long-term]: 0.0062382 kg; lognormal variance with pedigree 0.26, pedigree (1,1,5,1,1)
  emission from sludge incineration. Uncertainty calculated from wastewater composition and treatment model
- Aluminium [water, ground-, long-term]: 0.0090236 kg; lognormal variance with pedigree 0.14, pedigree (1,1,5,1,1)
  (same comment as for DOC, Dissolved Organic Carbon)
- Ammonium, ion [water, surface water]: 0.22351 kg; lognormal variance with pedigree 0.05, pedigree (1,1,5,1,1)
  direct wastewater treatment plant emission. Uncertainty calculated from wastewater composition and treatment model
- Nitrite [water, surface water]: 0.013054 kg; lognormal variance with pedigree 0.06, pedigree (1,1,5,1,1)
  (same comment as for Ammonium, ion)
- Carbon [soil, agricultural]: 0.42589 kg; lognormal variance with pedigree 0.25, pedigree (1,1,5,1,1)
  emission from sludge spreading. Uncertainty calculated from wastewater composition and treatment model
- Aluminium [soil, agricultural]: 0.0081289 kg; lognormal variance with pedigree 0.14, pedigree (1,1,5,1,1)
  (same comment as for Carbon)
- Nitrate [water, surface water]: 0.97915 kg; lognormal variance with pedigree 0.05, pedigree (1,1,5,1,1)
  sewer overload discharge plus direct wastewater treatment plant emission plus emission from sludge incineration. Uncertainty calculated from wastewater composition and treatment model
- COD, Chemical Oxygen Demand [water, ground-, long-term]: 0.015765 kg; lognormal variance with pedigree 0.26, pedigree (1,1,5,1,1)
  (same comment as for DOC, Dissolved Organic Carbon)
- Water [air, unspecified]: 0.1 m3; name water_to_air_unspecified; lognormal variance with pedigree 0.0807, pedigree (2,2,5,1,1)
  Calculated value based on water balance.
  property fraction, origin: salt water 0; name fraction_origin_salt_water
  property fraction, origin: unspecified 1; name fraction_origin_unspecified
  property fraction, origin: fresh water 0; name fraction_origin_fresh_water
- Nitrogen [water, surface water]: 0.0099325 kg; lognormal variance with pedigree 0.06, pedigree (1,1,5,1,1)
  (same comment as for Ammonium, ion)
- Methane, non-fossil [air, urban air close to ground]: 0.030921 kg; lognormal variance with pedigree 0.28, pedigree (1,1,5,1,1)
  direct digester gas emission plus emission from sludge incineration. Uncertainty calculated from wastewater composition and treatment model
- Water [water, unspecified]: 0.9 m3; name water_to_water_unspecified; lognormal variance with pedigree 0.0807, pedigree (2,2,5,1,1)
  Calculated value based on water balance.
  property fraction, origin: salt water 0; name fraction_origin_salt_water_Ww
  property fraction, origin: unspecified 0; name fraction_origin_unspecified_Ww
  property carbon content, non-fossil 0; name C_content_non_fossil
  property dry mass 0 kg; name DM
  property fraction, origin: fresh water 1; name fraction_origin_fresh_water_Ww
  property water in wet mass 1000 kg; name WWM
  property wet mass 1000 kg; name WM
  property carbon content, fossil 0; name C_content_fossil
- Phosphate [water, surface water]: 0.11002 kg; lognormal variance with pedigree 0.11, pedigree (1,1,5,1,1)
  sewer overload discharge plus direct wastewater treatment plant emission plus emission from sludge incineration plus emission from sludge spreading. Uncertainty calculated from wastewater composition and treatment model
- Phosphate [water, ground-, long-term]: 0.0047959 kg; lognormal variance with pedigree 4.3, pedigree (1,1,5,1,1)
  (same comment as for DOC, Dissolved Organic Carbon)
- TOC, Total Organic Carbon [water, surface water]: 0.47357 kg; lognormal variance with pedigree 0.17, pedigree (1,1,5,1,1)
  (same comment as for Nitrate)
- TOC, Total Organic Carbon [water, ground-, long-term]: 0.0062382 kg; lognormal variance with pedigree 0.26, pedigree (1,1,5,1,1)
  (same comment as for DOC, Dissolved Organic Carbon)
- Carbon dioxide, non-fossil [air, urban air close to ground]: 11.283 kg; lognormal variance with pedigree 0.12, pedigree (1,1,5,1,1)
  direct wastewater treatment plant emission plus direct digester gas emission plus emission from sludge incineration. Uncertainty calculated from wastewater composition and treatment model
- Iron, ion [water, surface water]: 8.1998e-5 kg; lognormal variance with pedigree 0.16, pedigree (1,1,5,1,1)
  (same comment as for Nitrate)
- NMVOC, non-methane volatile organic compounds, unspecified origin [air, urban air close to ground]: 0.00014047 kg; lognormal variance with pedigree 0.4, pedigree (1,1,5,1,1)
  direct digester gas emission. Uncertainty calculated from wastewater composition and treatment model
- Iron [air, urban air close to ground]: 7.9994e-6 kg; lognormal variance with pedigree 0.18, pedigree (1,1,5,1,1)
  (same comment as for Methane, non-fossil)
- Ammonia [air, urban air close to ground]: 0.0074146 kg; lognormal variance with pedigree 0.27, pedigree (1,1,5,1,1)
  direct digester gas emission plus emission from sludge incineration plus emission from sludge spreading. Uncertainty calculated from wastewater composition and treatment model
- Phosphorus [air, urban air close to ground]: 4.095e-5 kg; lognormal variance with pedigree 0.14, pedigree (1,1,5,1,1)
  (same comment as for Methane, non-fossil)
- Nitrogen oxides [air, urban air close to ground]: 0.014168 kg; lognormal variance with pedigree 0.07, pedigree (1,1,5,1,1)
  (same comment as for Methane, non-fossil)
- Carbon monoxide, non-fossil [air, urban air close to ground]: 0.010019 kg; lognormal variance with pedigree 0.29, pedigree (1,1,5,1,1)
  (same comment as for Methane, non-fossil)
- COD, Chemical Oxygen Demand [water, surface water]: 1.4224 kg; lognormal variance with pedigree 0.57, pedigree (1,1,5,1,1)
  (same comment as for Nitrate)
- Sulfate [water, surface water]: 0.40946 kg; lognormal variance with pedigree 0.13, pedigree (1,1,5,1,1)
  (same comment as for Nitrate)
- Aluminium [air, urban air close to ground]: 1.9048e-5 kg; lognormal variance with pedigree 0.15, pedigree (1,1,5,1,1)
  (same comment as for Methane, non-fossil)
- Iron, ion [water, ground-, long-term]: 0.11224 kg; lognormal variance with pedigree 0.97, pedigree (1,1,5,1,1)
  (same comment as for DOC, Dissolved Organic Carbon)
- BOD5, Biological Oxygen Demand [water, surface water]: 0.58122 kg; lognormal variance with pedigree 0.18, pedigree (1,1,5,1,1)
  (same comment as for Nitrate)
- Phosphate [water, ground-]: 0.00047687 kg; lognormal variance with pedigree 0.17, pedigree (1,1,5,1,1)
  (same comment as for Carbon)
- Nitrate [water, ground-, long-term]: 0.0010176 kg; lognormal variance with pedigree 0.07, pedigree (1,1,5,1,1)
  (same comment as for DOC, Dissolved Organic Carbon)
- Cyanide [air, urban air close to ground]: 2.5494e-5 kg; lognormal variance with pedigree 0.23, pedigree (1,1,5,1,1)
  (same comment as for DOC, Dissolved Organic Carbon)
- Aluminium [water, surface water]: 1.0146e-6 kg; lognormal variance with pedigree 0.74, pedigree (1,1,5,1,1)
  (same comment as for Nitrate)
- Iron [soil, agricultural]: 0.15974 kg; lognormal variance with pedigree 0.14, pedigree (1,1,5,1,1)
  (same comment as for Carbon)
- DOC, Dissolved Organic Carbon [water, surface water]: 0.44341 kg; lognormal variance with pedigree 0.53, pedigree (1,1,5,1,1)
  (same comment as for Nitrate)
- BOD5, Biological Oxygen Demand [water, ground-, long-term]: 0.0051566 kg; lognormal variance with pedigree 0.26, pedigree (1,1,5,1,1)
  (same comment as for DOC, Dissolved Organic Carbon)
- Dinitrogen monoxide [air, urban air close to ground]: 0.0021097 kg; lognormal variance with pedigree 0.07, pedigree (1,1,5,1,1)
  direct wastewater treatment plant emission plus direct digester gas emission plus emission from sludge incineration plus emission from sludge spreading. Uncertainty calculated from wastewater composition and treatment model
- Chloride [water, surface water]: 0.42692 kg; lognormal variance with pedigree 0.13, pedigree (1,1,5,1,1)
  (same comment as for Nitrate)

## Extrapolations
This dataset has been extrapolated from year 2000 to the year of the calculation (2021). The uncertainty has been adjusted accordingly.

## Review by Niels Jungbluth 2009-01-22
passed.
