# lime production, hydrated, loose weight

Dataset: EcoSpold 2, unit process
Geography: CH
Time period: 2000-01-01 to 2021-12-31
Technology level: current
Classification: ISIC rev.4 ecoinvent: 2394:Manufacture of cement, lime and plaster
Classification: EcoSpold01Categories: construction materials/binder
Tags: ConvertedDataset
Scenario: Business-as-Usual
System model: Allocation, cut-off by classification
Share of production covered: 50 %
Generated by: [System]
Published in: Kellenberger D. 2004
Database: ecoinvent
isCopyrightProtected: true
accessRestrictedTo: 1

## General comment
This dataset represents the production of 1 kg of hydrated lime. The infrastructure data is estimated based on a tour and sketches of the process, and normalized with a annual production capacity of about 20'000 tons of product per year. There are no significant dust emissions as a dust control system is installed.
[This dataset was already contained in the ecoinvent database version 2. It was not individually updated during the transfer to ecoinvent version 3. Life Cycle Impact Assessment results may still have changed, as they are affected by changes in the supply chain, i.e. in other datasets. This dataset was generated following the ecoinvent quality guidelines for version 2. It may have been subject to central changes described in the ecoinvent version 3 change report (http://www.ecoinvent.org/database/ecoinvent-version-3/reports-of-changes/), and the results of the central updates were reviewed extensively. The changes added e.g. consistent water flows and other information throughout the database. The documentation of this dataset can be found in the ecoinvent reports of version 2, which are still available via the ecoinvent website. The change report linked above covers all central changes that were made during the conversion process.]

## Included activities start
From the reception of quicklime at the factory gate.

## Included activities end
This activity ends with the hydrated lime produced. The dataset includes the different production processes (slaking, crushing, dust abatement (cyclone), transportation and storing), the total heating energy for "production" and "administration", and the infrastructure.

## Geography
Data is based on a Swiss company.

## Technology
Data is based on the Swiss current technology. The company KFN works on a technically high level. Effective dust control systems are installed.

## Parameters
- fraction, process water, to air: 0.15 dimensionless; name fraction_PW_to_air; lognormal variance with pedigree 0.092025, pedigree (4,4,3,2,4)
  Literature value. In case when no industry/process specific data are available, default evaporation fraction value is used. This value is 15% and is based on literature (Statistics Canada, 2007 & Shaffer, K.H., 2008, Consumptive water use in the Great Lakes Basin, USGS & Shiklomanov, 2003, World Water Resources at the Beginning of the 21st Century) and has been approved by an expert.

## Reference product
- lime, hydrated, loose weight: 1 kg; CPC 37420: Quicklime, slaked lime and hydraulic lime; By-product classification allocatable product; CAS 1305-62-0
  Hydrated lime is produced by reacting quicklime with water; it consists mainly of calcium hydroxide. In general, hydrated lime refers to a dry calcium hydroxide powder. Hydrated lime is widely used in aqueous systems as a low-cost alkali.
  EcoSpold01Location=CH
  production volume 1.22953e8 kg; = 14607717041.8006*0.008417
    Estimated. The swiss production volume is extrapolated from the global production volume using the nominal GDP of 2005 (source: United Nations, http://data.un.org/Glossary.aspx?q=GDP+%28current+US%24%29, accessed 20130726 and 20130312).
    Gross domestic product (GDP) at current prices is GDP at prices of the current reporting period. Also known as nominal GDP.
  property price 0.108 EUR2005
    Calculated value based on data from United Nations Commodity Trade Statistics Database (comtrade.un.org). UN comtrade category: 252220 Slaked lime. Year 2005. Using exchange rate of 1EURO = 1.209 USD. Average of price of import into 5 main markets (EU, US, JP, IN and CN).
  property carbon content, non-fossil 0
    Mainly Ca(OH)2. Tab 3.4, ecoinvent v2.2 report 7, part VII, pg 7
  property carbon content, fossil 0
    Mainly Ca(OH)2. Tab 3.4, ecoinvent v2.2 report 7, part VII, pg 7
  property carbon content 0
    carbon content on a dry matter basis (reserved; not for manual entry)
  properties: wet mass 1 kg, water in wet mass 0.003 kg, dry mass 0.997 kg, water content 0.00300903, carbon allocation 0 kg

## Inputs from technosphere
- quicklime, in pieces, loose: 0.769 kg; lognormal variance with pedigree 0.0401, pedigree (1,2,5,1,1)
  EcoSpold01Location=CH
  Estimation, based on company data. The total amount of milled quicklime used by 2001 was 14.058t.
  properties: wet mass 1 kg, water content 0.010101, dry mass 0.99 kg
- heat, central or small-scale, other than natural gas: 0.00141 MJ; lognormal variance with pedigree 0.0401, pedigree (1,2,5,1,1)
  Estimation, based on company data. The energy consumption for building heating is considered.
  EcoSpold01Location=CH
  properties: heating value, net 1 MJ
- industrial machine, heavy, unspecified: 8.76e-5 kg; lognormal variance with pedigree 0.3686, pedigree (4,3,5,1,1)
  Estimation. The weight of the machines has been estimated and summed up 60t (1 swing-hammer crusher, 2 cyclone dust catchers1 lime slaking plan, 1 silo, 2 conveyor worms). The service life is assumed to be 25 years. The total amount of material treated by the machines over this period is about 450’000 t.
  EcoSpold01Location=RER
- electricity, high voltage: 0.00636 kWh; lognormal variance with pedigree 0.0401, pedigree (1,2,5,1,1)
  Estimation, based on company data. It is assumed that the 50% of the electricity consumption is covered by the grid and the othet 50% by a hydropower plant nearby.
- electricity, medium voltage: 0.00636 kWh; lognormal variance with pedigree 0.0401, pedigree (1,2,5,1,1)
  EcoSpold01Location=CH
  Estimation, based on company data. It is assumed that the 50% of the electricity consumption is covered by the grid and the othet 50% by a hydropower plant nearby.

## Inputs from nature
- Water, well, in ground [natural resource, in water]: 0.000602 m3; name water_well_in_ground_input; lognormal variance with pedigree 0.0421, pedigree (3,2,5,1,1)
  Estimation, based on company data. The total amount of water consumed for hydratation by 2001 was 11.010 m3.

## Emissions to nature
- Water [air, unspecified]: 9.03e-5 m3; name water_to_air_unspecified; = (water_well_in_ground_input*fraction_PW_to_air); lognormal variance with pedigree 0.0807, pedigree (2,2,5,1,1)
  Calculated value based on literature values and expert opinion. See comments in the parametres' comment field.
  property fraction, origin: salt water 0; name fraction_origin_salt_water
  property fraction, origin: unspecified 0; name fraction_origin_unspecified
  property fraction, origin: fresh water 1; name fraction_origin_fresh_water
- Water [water, unspecified]: 0.0005117 m3; name water_to_water_unspecified; = water_well_in_ground_input*(1-fraction_PW_to_air); lognormal variance with pedigree 0.0807, pedigree (2,2,5,1,1)
  (same comment as for Water)
  property carbon content, fossil 0; name C_content_fossil
  property carbon content, non-fossil 0; name C_content_non_fossil
  property fraction, origin: unspecified 0; name fraction_origin_unspecified_Ww
  property wet mass 1000 kg; name WM
  property water in wet mass 1000 kg; name WWM
  property fraction, origin: fresh water 1; name fraction_origin_fresh_water_Ww
  property fraction, origin: salt water 0; name fraction_origin_salt_water_Ww
  property dry mass 0 kg; name DM

## Sampling procedure
survey

## Extrapolations
This dataset has been extrapolated from year 2002 to the year of the calculation (2021). The uncertainty has been adjusted accordingly.

## Review by Roland Hischier 2011-09-22
Transfer of documentation done.

## Review by Roberto Dones 2004-04-14
Passed

## Review by Bo Weidema 2012-09-28
replaced "electricity, high voltage, hydro, run-of-river" with "electricity, high voltage" + activity link to "electricity production, hydro, run-of-river"
