# power block installation, solar tower power plant, 20 MW

Dataset: EcoSpold 2, unit process
Geography: ZA
Time period: 2010-01-01 to 2021-01-01
Technology level: current
Classification: ISIC rev.4 ecoinvent: 4220:Construction of utility projects
Tags: Concentrated Solar Power; CSP
Scenario: Business-as-Usual
System model: Allocation, cut-off by classification
Generated by: Karin Treyer
Published in: Telsnig, Thomas 2015
Database: ecoinvent
isCopyrightProtected: true
accessRestrictedTo: 1

## General comment
This activity represents the components involved for the setting up of a power block unit for electricity production with a 20 MW concentrated solar power tower plant in Upington, South Africa. The main components are pressure vessels, compressors, heat exchangers with cooling towers, steam turbine and the generators.
This dataset is entirely based on the detailed life cycle inventory as presented in the dissertation report by
Telsnig, Thomas. 2015. Standortabhängige Analyse und Bewertung solarthermischer Kraftwerke am Beispiel Südafrikas. Forschungsbericht. Band 123. ISSN 0938-1228. Institut für Energiewirtschaft und Rationelle Energieanwendung, Universität Stuttgart, Germany.

## Included activities start
The activity starts with the assembly of all needed components of the power block.

## Included activities end
The activity concludes when the solar power plant is decomissioned.

## Geography
The CSP plant represented in this dataset has been modelled specifically for South African conditions (see Telsnig 2015).

## Technology
Short description of components:
condensate - 3 x 50 %, 2400 gpm, 301 ft tdh, 114 oF, 250 bhp motor, 480 V 1750 rpm, multi-stage vertical turbine, mounted in below-grade cans (Solana: 200 bhp; $161,000)
Feedwater - 3 x 50 %, 3200 gpm, 4525 ft tdh, 312 oF, 4500 bhp 4.16 kV motor, variable speed drive, multi-stage horizontal turbine (Solana: 1,000 bhp; $583,000)
Component Cooling Water - 2 x 100 %, 9600 gpm, 225 ft tdh, 650 bhp, 4.16 kV Double suction, single state, horizontal split case, centrifugal Cast iron case and impeller
Turbine Oil Pit Sump - 25 gpm, 50 ft tdh, 3/4 bhp, 480 V, 1750 rpm Positive displacement, with level switch
Oily Waste Sump - 100 gpm, 50 ft tdh, 2 bhp, 480 V, 1750 rpm Positive displacement, with level switch
Fire Water - 1000 gpm, 300 ft tdh, 125 bhp motor, 480 V Single stage centrifugal, NFPA access and control panel
Air Compressors - 2 x 100 %, rotary schromiumew compressor 750 actual ft3/min delivery, 110 psig, 200 bhp, 480 V Inter- and after-coolers, carbon steel shell, stainless steel tubes Cooling water - 20 gpm, 10 psi
vacuum Pumps - 900 actual ft3/min, 300,000 ft total developed head 75 bhp motor, single stage, positive displacement with liquid seal rotor Discharge with water trap silencer
Gland Steam concretedenser Air Exhauster - Horizontal shaft axial blower 500 ft3/min, 5,000 ft total developed head, 7.5 bhp motor, 480 V
Generator - 2 pole, air cooled, 490 MVA, 0.9 lagging power factor 13.8 kV, 20500 A each phase
Turbine Generator Package: Steam Turbine - 2 cylinder (HP and IP/LP), downward exhaust
440 MWe, 1800 rpm, 1815 psia / 1,005 F / 1,005 F, 2.5 in. HgA exhaust
3,450,000 lb/hr main steam flow rate
Generator - 2 pole, air cooled, 490 MVA, 0.9 lagging power factor
13.8 kV, 20500 A each phase
Exciter - Direct drive, solid state
Turbine turbine gear and motor
Automatic voltage and stability control panel
Generator gas control panel
Lube oil reservoir - 10,000 gallons, carbon steel tank
Lube oil coolers - Straight tube / straight shell, 300 gpm oil flow
Lube oil vapor extractor - 15 bhp, 175 cfm
Primary oil pumps - Vertical centrifugal, single stage pump
250 bhp, 480 V motor, mounted on oil reservoir
Emergency oil pumps - Vertical centrifugal, single stage pump
250 bhp, 125 V DC motor, mounted on oil reservoir
Turning gear oil pumps - Vertical centrifugal, single stage pump
50 bhp, 480 V motor, mounted on oil reservoir
Jacking oil pumps - Positive displacement, horizontal
50 bhp, 480 V motor, mounted on oil reservoir
Electro-hydraulic control unit - Skid mounted with oil reservoir Seal oil pumps - 150 gpm, 200 ft total developed head, 25 bhp, 480 V
Cast iron case, carbon steel shaft and impeller, TEFC motor"

## Reference product
- power block, solar tower power plant, 20 MW: 1 unit; name RP_amount_1; By-product classification allocatable product; CPC 53262: Power plants; pedigree (1,1,1,1,1)
  Reference product unit for construction of a power block for a 20MW solar tower plant
  production volume 1 unit; name RP_PV_1
    Assumption
  property lifetime 30 year
    The economic lifetime of the plant is assumed to be 30 years.
  property price 2.4e7 EUR2005; name RP_amount_1_price_EUR2005
    Telsnig 2015: Investment cost for the powe block of a 20MW CSP solar tower plant in South Africa (EUR2010) with limited storage capacity (see Table 4-4 in Telsnig, 2015).
    Reference(s): Telsnig, Thomas. 2015. Standortabhängige Analyse und Bewertung solarthermischer Kraftwerke am Beispiel Südafrikas. Forschungsbericht. Band 123. ISSN 0938-1228. Institut für Energiewirtschaft und Rationelle Energieanwendung, Universität Stuttgart, Germany.

## Inputs from technosphere
- aluminium, cast alloy: 40 kg; name aluminium_castalloy; lognormal variance with pedigree 0.0197, pedigree (4,4,4,3,2)
  Aluminium supplied for providing rolling sheets
  properties: wet mass 1 kg, dry mass 1 kg
- electricity, high voltage: 161136 kWh; lognormal variance with pedigree 0.0197, pedigree (4,4,4,3,2)
  Electrical energy needed for processing of materials and assembly of the power block
- glass fibre reinforced plastic, polyamide, injection moulded: 327879 kg; name glassfibrereinforced; lognormal variance with pedigree 0.0197, pedigree (4,4,4,3,2)
  Material composition of cooling towers and ventilators etc.
  properties: carbon content, fossil 0.446018, dry mass 1 kg, wet mass 1 kg
- copper, cathode: 10338 kg; name copper; lognormal variance with pedigree 0.0197, pedigree (4,4,4,3,2)
  Copper supplied for field wiring cables etc.
  properties: wet mass 1 kg, dry mass 1 kg
- alkyd paint, white, without solvent, in 60% solution state: 152 kg; name paint; lognormal variance with pedigree 0.0197, pedigree (4,4,4,3,2)
  Paint to prevent rust of structural steel materials
  properties: heating value, net 10.3 MJ, wet mass 1 kg, carbon content, fossil 0.140367, carbon content, non-fossil 0.199629, dry mass 1 kg
  note on carbon content, fossil: C content was calculated as an addition of C content in the raw materials.
- zinc coat, coils: 13108 m2; lognormal variance with pedigree 0.0197, pedigree (4,4,4,3,2)
  Coating used in cooling tower
- iron-nickel-chromium alloy: 22978 kg; name alloy; lognormal variance with pedigree 0.0197, pedigree (4,4,4,3,2)
  Material composition in steam turbines
  properties: dry mass 1 kg, wet mass 1 kg
- transformer, high voltage use: 227 kg; lognormal variance with pedigree 0.0197, pedigree (4,4,4,3,2)
  Transformer setup including substations and primary power distribution sources.
  properties: wet mass 1 kg, dry mass 1 kg, carbon content, fossil 0.262798
- reinforcing steel: 1.55787e6 kg; name steel; lognormal variance with pedigree 0.0197, pedigree (4,4,4,3,2)
  Used in construction of tanks, columns and vessels etc
  properties: wet mass 1 kg, carbon content, fossil 0.004, dry mass 1 kg
- polystyrene, high impact: 7 kg; name polystyrene; lognormal variance with pedigree 0.0197, pedigree (4,4,4,3,2)
  Used in air compressors
  properties: heating value, net 38.67 MJ, wet mass 1 kg, carbon content, fossil 0.923077, dry mass 1 kg
- sand: 38 kg; lognormal variance with pedigree 0.0197, pedigree (4,4,4,3,2)
  Used in sand filters
  properties: wet mass 1 kg, dry mass 1 kg
- zinc: 825 kg; lognormal variance with pedigree 0.0197, pedigree (4,4,4,3,2)
  Used for zinc coating
  properties: dry mass 1 kg, wet mass 1 kg
- steel removed by milling, average: 24613 kg; lognormal variance with pedigree 0.0197, pedigree (4,4,4,3,2)
  Process of milling steel
  properties: carbon content, fossil 0.0025, dry mass 1 kg, wet mass 1 kg
- polyvinylchloride, bulk polymerised: 3 kg; name pvc; lognormal variance with pedigree 0.0197, pedigree (4,4,4,3,2)
  Used in hypochlorinator
  properties: dry mass 1 kg, heating value, net 21.5 MJ, carbon content, fossil 0.387097, wet mass 1 kg
  note on carbon content, fossil: Monomer is vynyl chloride, C2H3Cl (ecoinvent v2.2 report 11_II). MW=62 g/mol
- section bar rolling, steel: 204815 kg; lognormal variance with pedigree 0.0197, pedigree (4,4,4,3,2)
  Process for using zinc to coat materials. Indicates galvanization.
- molybdenum: 574 kg; lognormal variance with pedigree 0.0197, pedigree (4,4,4,3,2)
  Material composition in steam turbines
  properties: wet mass 1 kg, dry mass 1 kg
- scrap copper: -10338 kg; name BP_amount_1; = (copper)*-1; lognormal variance with pedigree 0.0197, pedigree (4,4,4,3,2)
  Scrap copper sent for municipal incineration
  production volume 10338 kg; = RP_PV_1 * (BP_amount_1 / RP_amount_1)
    Calculated from production volume of reference product using the relative outputs.
  property price 0 EUR2005; name BP_amount_1_price_EUR2005
  properties: dry mass 1 kg, wet mass 1 kg
- concrete, normal: 11785 m3; name concrete; lognormal variance with pedigree 0.0197, pedigree (4,4,4,3,2)
  Main application in turbine-generator foundation and cooling tower foundation.
  properties: water content 0.086758, dry mass 2190 kg, wet mass 2380 kg
- cast iron removed by milling, average: 7484 kg; lognormal variance with pedigree 0.0197, pedigree (4,4,4,3,2)
  Process of milling cast iron
  properties: dry mass 1 kg, wet mass 1 kg, carbon content, fossil 0.04
- waste concrete: -2.6225e7 kg; name BP_amount_2; = ((concrete+particleboard)*2200 +(expandedperilite+ceramic))*-1; lognormal variance with pedigree 0.0197, pedigree (4,4,4,3,2)
  Disposal of concrete. The density is assumed to be 2200kg/m3.
  production volume 2.6225e7 kg; = RP_PV_1 * (BP_amount_2 / RP_amount_1)
    Calculated from production volume of reference product using the relative outputs.
  property price 0 EUR2005; name BP_amount_2_price_EUR2005
  properties: wet mass 1 kg, water content 1, dry mass 0.5 kg
- cast iron: 67659 kg; name castiron; lognormal variance with pedigree 0.0197, pedigree (4,4,4,3,2)
  Used in material composition of pumps, compressors, turbines
  properties: dry mass 1 kg, carbon content, fossil 0.04, wet mass 1 kg
  note on carbon content, fossil: Cast iron is made by remelting pig iron in small furnaces (e.g. cupola furnaces or electric arc furnaces) and poured into moulds to make castings. It usually contains 2% to 6% carbon (ecoinvent v2.2 report 10_partII). An average content of 4% was considered
- metal working, average for aluminium product manufacturing: 340290 kg; lognormal variance with pedigree 0.0197, pedigree (4,4,4,3,2)
  Coating in compressors, pumps.
- injection moulding: 7 kg; = polystyrene; lognormal variance with pedigree 0.0197, pedigree (4,4,4,3,2)
  Process to obtain polystyrene
- waste paint: -152 kg; name BP_amount_3; = (paint)*-1; lognormal variance with pedigree 0.0197, pedigree (4,4,4,3,2)
  Disposal of waste paint
  production volume 152 kg; = RP_PV_1 * (BP_amount_3 / RP_amount_1)
    Calculated from production volume of reference product using the relative outputs.
  property price 0 EUR2005; name BP_amount_3_price_EUR2005
  properties: dry mass 1 kg, wet mass 1 kg, carbon content, fossil 0.65, heating value, net 19.7 MJ
- silicone product: 5567 kg; name silicone_product; lognormal variance with pedigree 0.0197, pedigree (4,4,4,3,2)
  Used in pumps for prevention of mositure entry. End of life is neglected
  properties: wet mass 1 kg, dry mass 1 kg, heating value, net 9.83 MJ, carbon content, fossil 0.324324
- ceramic tile: 1615 kg; name ceramic; lognormal variance with pedigree 0.0197, pedigree (4,4,4,3,2)
  Porcelain materials in transformer electrical appliances
  properties: wet mass 1 kg, dry mass 1 kg
- scrap aluminium: -340374 kg; name BP_amount_4; = ((aluminium + aluminium_castalloy))*-1; lognormal variance with pedigree 0.0197, pedigree (4,4,4,3,2)
  aluminium disposal
  production volume 340374 kg; = RP_PV_1 * (BP_amount_4 / RP_amount_1)
    Calculated from production volume of reference product using the relative outputs.
  property price 0 EUR2005; name BP_amount_4_price_EUR2005
  properties: wet mass 1 kg, dry mass 1 kg
- drawing of pipe, steel: 1.27112e6 kg; lognormal variance with pedigree 0.0197, pedigree (4,4,4,3,2)
  Process done to draw pipes from steel.
- expanded perlite: 118204 kg; name expandedperilite; lognormal variance with pedigree 0.0197, pedigree (4,4,4,3,2)
  Expanded perilite used for insulation
  properties: wet mass 1 kg, dry mass 1 kg
- waste polyethylene/polypropylene product: -329298 kg; name BP_amount_5; = (polyethylene+glassfibrereinforced+pvc)*-1; lognormal variance with pedigree 0.0197, pedigree (4,4,4,3,2)
  Polyethylene disposal
  production volume 329298 kg; = RP_PV_1 * (BP_amount_5 / RP_amount_1)
    Calculated from production volume of reference product using the relative outputs.
  property price 0 EUR2005; name BP_amount_5_price_EUR2005
  properties: wet mass 1 kg, carbon content, fossil 0.748045, dry mass 0.847 kg, water content 0.180638, heating value, net 42.47 MJ
  note on carbon content, fossil: Mixed various plastics was used to estimate the C content of this waste (Tab A.2, ecoinvent v2.2 report 13_I)
- particleboard, cement bonded: 81 m3; name particleboard; lognormal variance with pedigree 0.0197, pedigree (4,4,4,3,2)
  Used in pumps to prevent leakage
  properties: wet mass 1200 kg, carbon content, fossil 0.0240148, water content 0.0197355, dry mass 1176.78 kg, carbon content, non-fossil 0.139276, heating value, net 5765.37 MJ
- welding, arc, steel: 664 m; lognormal variance with pedigree 0.0197, pedigree (4,4,4,3,2)
  Reinforced steel welded using arc welding
- waste glass: -155 kg; name BP_amount_6; = (glassfibre)*-1; lognormal variance with pedigree 0.0197, pedigree (4,4,4,3,2)
  Disposal of glass fibre
  production volume 155 kg; = RP_PV_1 * (BP_amount_6 / RP_amount_1)
    Calculated from production volume of reference product using the relative outputs.
  property price 0 EUR2005; name BP_amount_6_price_EUR2005
  properties: wet mass 1 kg, dry mass 1 kg, heating value, net 0.05 MJ
  note on heating value, net: Value extracted from "treatment of waste glass, open dump, very wet infiltration class (1000mm)"
- tap water: 16160 kg; name water; lognormal variance with pedigree 0.0197, pedigree (4,4,4,3,2)
  Used in the manufacturing process of pumps.
  properties: carbon content, fossil 0.00178991, wet mass 1 kg, water content 2962.17, dry mass 0.000337476 kg
  note on carbon content, fossil: Bicarbonate content is 2.93 mol/m3. CO2 content is 0.1 mol/m3 (ecoinvent v2.2 report 8, Tab 93.1).
- chromium steel removed by milling, average: 7960 kg; lognormal variance with pedigree 0.0197, pedigree (4,4,4,3,2)
  Process of milling chromesteel
  properties: dry mass 1 kg, carbon content, fossil 0.0008, wet mass 1 kg
- waste rubber, unspecified: -3 kg; name BP_amount_7; = (rubber)*-1; lognormal variance with pedigree 0.0197, pedigree (4,4,4,3,2)
  Disposal of waste rubber
  production volume 3 kg; = RP_PV_1 * (BP_amount_7 / RP_amount_1)
    Calculated from production volume of reference product using the relative outputs.
  property price 0 EUR2005; name BP_amount_7_price_EUR2005
  properties: carbon content, fossil 0.853, dry mass 1 kg, wet mass 1 kg, heating value, net 27.19 MJ
  note on heating value, net: Value taken from the general comment of the treatment dataset.
- sheet rolling, aluminium: 40 kg; = aluminium_castalloy; lognormal variance with pedigree 0.0197, pedigree (4,4,4,3,2)
  Process done for coating using aluminium
- polyethylene, high density, granulate: 1416 kg; name polyethylene; lognormal variance with pedigree 0.0197, pedigree (4,4,4,3,2)
  Used for pneumatic tubing etc.
  properties: dry mass 1 kg, carbon content, fossil 0.857143, wet mass 1 kg, heating value, net 42.47 MJ
  note on carbon content, fossil: Polyethylene is formed out of a huge amount of ethylene monomers (C2H4) (ecoinvent v2.2 report 11_II). MW=28 g/mol
- waste polystyrene: -7 kg; name BP_amount_8; = (polystyrene)*-1; lognormal variance with pedigree 0.0197, pedigree (4,4,4,3,2)
  Disposal of waste polystyrene
  production volume 7 kg; = RP_PV_1 * (BP_amount_8 / RP_amount_1)
    Calculated from production volume of reference product using the relative outputs.
  property price 0 EUR2005; name BP_amount_8_price_EUR2005
  properties: dry mass 0.998 kg, wet mass 1 kg, water content 0.00200401, carbon content, fossil 0.922579, heating value, net 38.67 MJ
- sheet rolling, steel: 236 kg; lognormal variance with pedigree 0.0197, pedigree (4,4,4,3,2)
  Process done for coating using steel
- glass fibre: 155 kg; name glassfibre; lognormal variance with pedigree 0.0197, pedigree (4,4,4,3,2)
  Material composition used in fuel oil storage, sand filters, and service water storage
  properties: wet mass 1 kg, dry mass 1 kg
- aluminium, wrought alloy: 340334 kg; name aluminium; lognormal variance with pedigree 0.0197, pedigree (4,4,4,3,2)
  Mainly supplied for meta working as coating in compressors, pumps etc
  properties: dry mass 1 kg, wet mass 1 kg
- steel, chromium steel 18/8, hot rolled: 13010 kg; name chromesteel; lognormal variance with pedigree 0.0197, pedigree (4,4,4,3,2)
  Material composition in pumps, compressors etc.
  properties: dry mass 1 kg, carbon content, fossil 0.0008, wet mass 1 kg
  note on carbon content, fossil: Stainless steel model is the grade 304 steel (18/8 stainless, 18% chromium 8% nickel; max. 0.08% C)
- extrusion, plastic pipes: 358 kg; lognormal variance with pedigree 0.0197, pedigree (4,4,4,3,2)
  High density polyethylene used for extrusion plastic pipes for underground concretenectivity
- heat, district or industrial, other than natural gas: 15791 MJ; lognormal variance with pedigree 0.0197, pedigree (4,4,4,3,2)
  Heat energy used during assembly of the power block.
  properties: heating value, net 1 MJ, corresponding fuel use, propane, furnace >100kW 1.05263 MJ
  note on corresponding fuel use, propane, furnace >100kW: Lower heating value of the fuel input related to the heat/electricity output, taken directly from ecoinvent v3.0 dataset "heat production, natural gas, at industrial furnace >100kW, GLO 2000".
- sheet rolling, chromium steel: 41 kg; lognormal variance with pedigree 0.0197, pedigree (4,4,4,3,2)
  Process done for coating using chromium steel
- kraft paper: 147 kg; lognormal variance with pedigree 0.0197, pedigree (4,4,4,3,2)
  Used as a proxy for electrical insulation paper
  properties: heating value, net 14.11 MJ, wet mass 1 kg, water content 0.0582011, dry mass 0.945 kg, carbon content, fossil 0.0020219, carbon content, non-fossil 0.41662
  note on carbon content, fossil: Fossil C content was calculated after fossil C contents of chemicals used in the production of the paper (in Tab 9.4 ecoinvent v2.2 report 11_III, part 9).
  note on carbon content, non-fossil: Biogenic C content was calculated after biogenic C contents of chemicals used in the production of the paper (in Tab 9.4 ecoinvent v2.2 report 11_III, part 9). The cellulose content in 1 kg of paper (on a wet mas basis) was estimated as (1-chemical content), C content of cellulose was considered 0.44 kgC/kg dry mass (ecoinvent v2.2 report, n 15a, pg 40)
- wastewater, unpolluted: -16.16 m3; name BP_amount_12; = (water/1000)*-1; lognormal variance with pedigree 0.0197, pedigree (4,4,4,3,2)
  The amount of tap water input stems from the water consumption reported in the EPDs of the modelled pumps (Sulzer EPDs). It is stated in the EPDs that the water is used for testing purposes. Therefore, it is assumed to be discharged to the sewer system without pollution. Sulzer EPDs: https://www.sulzer.com/en/shared/about-us/2017/08/10/13/22/environmental-product-declarations (accessed May 2019)
  production volume 16.16 m3; = RP_PV_1 * (BP_amount_12 / RP_amount_1)
    Calculated from production volume of reference product using the relative outputs.
  property price 0 EUR2005; name BP_amount_12_price_EUR2005
  properties: carbon content, non-fossil 0.00178991, carbon content, fossil 0.00178991, wet mass 1000 kg, dry mass 0.337476 kg, water content 2962.17
  note on carbon content, fossil: Assumed to be like in tap water. Bicarbonate content is 2.93 mol/m3. CO2 content is 0.1 mol/m3 (ecoinvent v2.2 report 8, Tab 93.1).
- synthetic rubber: 3 kg; name rubber; lognormal variance with pedigree 0.0197, pedigree (4,4,4,3,2)
  Used for heat absorption
  properties: wet mass 1 kg, dry mass 1 kg, carbon content, fossil 0.871949, heating value, net 26.42 MJ
  note on carbon content, fossil: EPDM (Ethylene-propene-diene terpolymer) rubber is a terpolymer of ethylene, propene, and a diene with the residual unsaturated portion of the diene in the side chain (ecoinvent v2.2 report 7-part XX & Ullmann). Chemical formula (deduced from Evidences of Solvent-Induced Miscibility in Polychloroprene-co-Ethylene-Propene Diene Terpolymer Blends, Dubey et al., Journal of Applied Polymer Science, 2009, 111:1884–1891): C20H35
- brass: 2 kg; lognormal variance with pedigree 0.0197, pedigree (4,4,4,3,2)
  Used as red brass in transformer power distribution
  properties: wet mass 1 kg, dry mass 1 kg
- hazardous waste, for incineration: -5567 kg; name BP_amount_9; = (silicone_product)*-1; lognormal variance with pedigree 0.0197, pedigree (4,4,4,3,2)
  Disposal of the oil used for the initial filling and during operation of the pumps and transformers. Calculated based on the environmental product declarations for pumps as provided by Sulzer and for transformers as provided by ABB.
  Sulzer EPDs: https://www.sulzer.com/en/shared/about-us/2017/08/10/13/22/environmental-product-declarations (accessed May 2019)
  ABB library: https://library.abb.com/en/ (accessed May 2019)
  production volume 5567 kg; = RP_PV_1 * (BP_amount_9 / RP_amount_1)
    Calculated from production volume of reference product using the relative outputs.
  property price 0 EUR2005; name BP_amount_9_price_EUR2005
  properties: carbon content, fossil 0.554667, wet mass 1 kg, dry mass 0.75 kg, heating value, net 17 MJ, water content 0.333333
  note on carbon content, fossil: Tab A.6, ecoinvent v2.2 report 13_I. C content has been calculated after data in the tables, and then referred to 1 kg DM
- steel, low-alloyed: 260143 kg; name lowsteel; lognormal variance with pedigree 0.0197, pedigree (4,4,4,3,2)
  Material composition of cooling tower, pumps etc
  properties: carbon content, fossil 0.005, wet mass 1 kg, dry mass 1 kg
- wire drawing, copper: 3399 kg; lognormal variance with pedigree 0.0197, pedigree (4,4,4,3,2)
  Process used to draw wires for field wiring, cables etc from available copper.
- excavation, hydraulic digger: 300 m3; lognormal variance with pedigree 0.0197, pedigree (4,4,4,3,2)
  Excavation and backfilling. The digger is a removable unit. All the soil dislocated for initial construction is put back. Hence no end of life calculation is needed.
- waste reinforcement steel: -673070 kg; name BP_amount_10; = ((steel+lowsteel+chromesteel+zinc+molybdenum+alloy+brass+castiron)*0.35)*-1
  All steel types are assumed to be treated as reinforcing steel due to lack of other appropriate datasets in ecoinvent. Further included are cast iron, zinc, brass and molybdenum. For the time period 2003-2012, average steel recycling rate in South Africa amounted to 35% fo the total steel mass according to Telsnig 2015. The remaining steel is assumed to be sent to final disposal.
  production volume 673070 kg; = RP_PV_1 * (BP_amount_10 / RP_amount_1)
    Calculated from production volume of reference product using the relative outputs.
  property price 0 EUR2005; name BP_amount_10_price_EUR2005
  properties: wet mass 1 kg, dry mass 1 kg
- waste reinforcement steel: -1.24999e6 kg; name BP_amount_11; = ((steel+lowsteel+chromesteel+zinc+molybdenum+alloy+brass+castiron)*0.65)*-1
  (same comment as for waste reinforcement steel)
  production volume 1.24999e6 kg; = RP_PV_1 * (BP_amount_11 / RP_amount_1)
    Calculated from production volume of reference product using the relative outputs.
  property price 0 EUR2005; name BP_amount_11_price_EUR2005

## Sampling procedure
This dataset is entirely based on the detailed life cycle inventory as presented in the dissertation report by
Telsnig, Thomas. 2015. Standortabhängige Analyse und Bewertung solarthermischer Kraftwerke am Beispiel Südafrikas. Forschungsbericht. Band 123. ISSN 0938-1228. Institut für Energiewirtschaft und Rationelle Energieanwendung, Universität Stuttgart, Germany.

Further, data in Telsnig 2015 are not shown explicitely for the downscaled 20 MW solar tower power plant. This gap is filled in the ecoinvent report.

## Extrapolations
This dataset has been extrapolated from year 2020 to the year of the calculation (2021). The uncertainty has been adjusted accordingly.

## Review by Christopher Oberschelp 2017-03-13
Very detailed, structured and well-documented datasets. Main exchanges have been checked and make sense.
