# heat production, propane, at industrial furnace >100kW

Dataset: EcoSpold 2, unit process
Geography: CA-QC
Time period: 2013-01-01 to 2021-12-31
Technology level: current
Classification: ISIC rev.4 ecoinvent: 3530:Steam and air conditioning supply
Classification: EcoSpold01Categories: natural gas/heating systems
Scenario: Business-as-Usual
System model: Allocation, cut-off by classification
Generated by: Jean-Francois Menard
Database: ecoinvent
isCopyrightProtected: false
accessRestrictedTo: 1

## General comment
This dataset represents heat production from the combustion of propane in industrial furnaces greater than 100 kW.
The dataset is based on an adaptation of from ecoinvent v3.0 dataset "heat production, natural gas, at industrial furnace >100kW, GLO 2000".
Modified flows:
fuel input: propane; Carbon dioxide, fossil emissions: stoechiometric calculation based on hypothetical commercial propane composition (see table below); Sulfur dioxide emissions: stoechiometric calculation based on sulfur content. Commercial propane composition: 90% propane and propene; 10% ethane, ethene, butane and butene; and 0.005% (w/w) sulfur content (http://www.cfbp.fr/proprietes-des-gpl/specifications-administratives-n312, consulted on 2013-05-29)

. The following table shows the calculation for energy content and carbon dioxide emissions (individual hydrocarbons heating values taken from Table B.1 in Felder, R. M., Rousseau, R. W. (1986) Elementary Principles of Chemical Processes, 2nd ed.,Wiley):

## Included activities start
This activity starts with the reception of the fuel and other necessary inputs (electricity).

## Included activities end
This activity ends with 1MJ of heat produced by the furnace.
This dataset also includes the emissions due to fuel combustion.

## Geography
Emission data, but for carbon dioxide and sulfur dioxide, extrapolated from Switzerland conditions.

## Technology
"Fan burners on market (modulating or non-modulating, non-condensing)." as cited in ecoinvent v3.0 dataset "heat production, natural gas, at industrial furnace >100kW, GLO 2000".

## Parameters
- annual fuel consumption in liters: 2.12e7 l; name annualFuelConsumptionLiter; lognormal variance with pedigree 0.0008, pedigree (1,1,2,1,1)
  Propane consumption of Quebec industriual sectors, average of 2005-2009 period: 2,12E+07 liters, source: MDDEFP (Ministry of sustainable development, Environment, Wildlife and Parks).
- nitrogen oxides emissions from liquified petroleum gas compared to natural gas: 1.5 dimensionless; name NOx_LPG_to_natural_gas; lognormal variance with pedigree 0.106, pedigree (4,5,5,5,3)
  from the U.S. EPA AP-42, Compilation of Air Pollutant Emission Factors, Section 1.5 Liquified Petroleum Gas Combustion, Table 1.5-1 (http://www.epa.gov/ttn/chief/ap42/ch01/final/c01s05.pdf)
- nitrogen oxides emissions for natural gas combustion: 1.88421e-5 kg/MJ; name NOx_natural_gas; lognormal variance with pedigree 0.128, pedigree (5,5,4,5,4)
  "Calculated based on (SVGW 2002)" as cited in ecoinvent v3.0 dataset "heat production, natural gas, at industrial furnace >100kW, GLO 2000", per MJ of heat provided.
- liquified petroleun gas combustion carbon conversion ratio: 0.995 dimensionless; name LPG_C_conversion; lognormal variance with pedigree 0.0666, pedigree (4,5,5,5,3)
  from the U.S. EPA AP-42, Compilation of Air Pollutant Emission Factors, Section 1.5 Liquified Petroleum Gas Combustion, Sub-section 1.5.3.2 (http://www.epa.gov/ttn/chief/ap42/ch01/final/c01s05.pdf)
- industrial use fraction of global use: 0 dimensionless; name industrial_use
  Parameter not used in child dataset to calculate production volume.
- annual fuel consumption in kg: 1.06424e7 kg; name annualFuelConsumptionKg; = annualFuelConsumptionLiter*propane_density; lognormal variance with pedigree 0, pedigree (1,1,1,1,1)
  Calculated value.
  Uncertainty: C

## Reference product
- heat, district or industrial, other than natural gas: 1 MJ; By-product classification allocatable product; CPC 17300: Steam and hot water
  production volume 4.69724e8 MJ; = annualFuelConsumptionKg/propane
    Annual fuel consumption divided by the amount of fuel needed to produce 1MJ (this amounts includes the efficiency of the process) (see Parameters).
  property corresponding fuel use, propane, furnace >100kW 1.05263 MJ; name fuel_use; = 1/0.95
    Lower heating value of the fuel input related to the heat/electricity output, taken directly from ecoinvent v3.0 dataset "heat production, natural gas, at industrial furnace >100kW, GLO 2000".
  property price 0.0106 EUR2005
    Average European district heat price from Ecoheatcool and Euroheat 2005-2006, Ecoheat Work package 1: The European heat market. Final report. 10.6 EUR/GJ i s the price of district heat. http://www.solarthermalworld.org/files/Ecoheatcool%20WP1%20Web.pdf?download
  properties: heating value, net 1 MJ

## Inputs from technosphere
- industrial furnace, natural gas: 2.94737e-9 unit; lognormal variance with pedigree 0.17, pedigree (5,5,5,5,4)
  Uncertainty of life time and extrapolation to range of capacity", as cited in ecoinvent v3.0 dataset "heat production, natural gas, at industrial furnace >100kW, GLO 2000".
- electricity, low voltage: 0.00116842 kWh; lognormal variance with pedigree 0.25, pedigree (5,5,5,5,4)
  Range of electricity for pumps etc., different literature", as cited in ecoinvent v3.0 dataset "heat production, natural gas, at industrial furnace >100kW, GLO 2000".
- propane: 0.0226567 kg; = fuel_use/heating_value_net; lognormal variance with pedigree 0.008, pedigree (1,1,4,1,1)
  Calculated based on fuel use and net heating value.
  Uncertainty: C
  property sulfur content 5e-5; name propane_sulfur_content
  property heating value, gross 50.38 MJ; name heating_value_gross
  property carbon content, fossil 0.8206; name propane_carbon_content
  property heating value, net 46.46 MJ; name heating_value_net
  property density 0.502 kg/l; name propane_density
  properties: wet mass 1 kg, dry mass 1 kg
  note on sulfur content: Taken from http://www.cfbp.fr/proprietes-des-gpl/specifications-administratives-n312.
  note on density: Equal or greater than 0,502 kg/l at 15°C. Taken from http://www.cfbp.fr/proprietes-des-gpl/specifications-administratives-n312.

## Emissions to nature
- Dinitrogen monoxide [air, urban air close to ground]: 1.05263e-7 kg; lognormal variance with pedigree 1.21, pedigree (5,5,5,5,4)
  Rough estimate, high uncertainty", as cited in ecoinvent v3.0 dataset "heat production, natural gas, at industrial furnace, GLO 2000".
- Nitrogen oxides [air, urban air close to ground]: 2.82632e-5 kg; = NOx_natural_gas*NOx_LPG_to_natural_gas; lognormal variance with pedigree 0.008, pedigree (1,1,4,1,1)
  See Parameters.
  Uncertainty: C
- Particulates, < 2.5 um [air, urban air close to ground]: 2.10526e-7 kg; lognormal variance with pedigree 0.25, pedigree (5,5,5,5,4)
  Literature", as cited in ecoinvent v3.0 dataset "heat production, natural gas, at industrial furnace, GLO 2000".
- Benzene [air, urban air close to ground]: 4.21053e-7 kg; lognormal variance with pedigree 1.21, pedigree (5,5,5,5,4)
  (same comment as for Dinitrogen monoxide)
- Pentane [air, urban air close to ground]: 1.26316e-6 kg; lognormal variance with pedigree 1.21, pedigree (5,5,5,5,4)
  (same comment as for Dinitrogen monoxide)
- Propane [air, urban air close to ground]: 2.10526e-7 kg; lognormal variance with pedigree 1.21, pedigree (5,5,5,5,4)
  (same comment as for Dinitrogen monoxide)
- Mercury [air, urban air close to ground]: 3.15789e-11 kg; lognormal variance with pedigree 0.78, pedigree (5,5,5,5,4)
  Trace element in natural gas", as cited in ecoinvent v3.0 dataset "heat production, natural gas, at industrial furnace, GLO 2000".
- Sulfur dioxide [air, urban air close to ground]: 2.26567e-6 kg; = propane*propane_sulfur_content*(32+2*16)/32; lognormal variance with pedigree 0.008, pedigree (1,1,4,1,1)
  Stoechiometric calculation, based on sulfur content.
  Uncertainty: C
- Carbon monoxide, fossil [air, urban air close to ground]: 2.21053e-6 kg; lognormal variance with pedigree 1.25, pedigree (5,5,5,5,4)
  Calculated based on (SVGW 2002)", as cited in ecoinvent v3.0 dataset "heat production, natural gas, at industrial furnace >100kW, GLO 2000".
- Butane [air, urban air close to ground]: 7.36842e-7 kg; lognormal variance with pedigree 1.21, pedigree (5,5,5,5,4)
  (same comment as for Dinitrogen monoxide)
- Propionic acid [air, urban air close to ground]: 2.10526e-8 kg; lognormal variance with pedigree 1.21, pedigree (5,5,5,5,4)
  (same comment as for Dinitrogen monoxide)
- Benzo(a)pyrene [air, urban air close to ground]: 1.05263e-11 kg; lognormal variance with pedigree 1.21, pedigree (5,5,5,5,4)
  (same comment as for Dinitrogen monoxide)
- Acetaldehyde [air, urban air close to ground]: 1.05263e-9 kg; lognormal variance with pedigree 1.21, pedigree (5,5,5,5,4)
  (same comment as for Dinitrogen monoxide)
- Dioxins, measured as 2,3,7,8-tetrachlorodibenzo-p-dioxin [air, urban air close to ground]: 0 kg; pedigree (1,1,1,1,1)
  (same comment as for Dinitrogen monoxide)
- Acetic acid [air, urban air close to ground]: 1.57895e-7 kg; lognormal variance with pedigree 1.21, pedigree (5,5,5,5,4)
  (same comment as for Dinitrogen monoxide)
- Carbon dioxide, fossil [air, urban air close to ground]: 0.0678302 kg; = propane*propane_carbon_content*LPG_C_conversion*44/12; lognormal variance with pedigree 0.008, pedigree (1,1,4,1,1)
  Stoechiometric calculation, based on carbon content.
  Uncertainty: C
- Toluene [air, urban air close to ground]: 2.10526e-7 kg; lognormal variance with pedigree 1.21, pedigree (5,5,5,5,4)
  (same comment as for Dinitrogen monoxide)
- Formaldehyde [air, urban air close to ground]: 1.05263e-7 kg; lognormal variance with pedigree 1.21, pedigree (5,5,5,5,4)
  (same comment as for Dinitrogen monoxide)
- Methane, fossil [air, urban air close to ground]: 2.10526e-6 kg; lognormal variance with pedigree 1.21, pedigree (5,5,5,5,4)
  (same comment as for Dinitrogen monoxide)
- PAH, polycyclic aromatic hydrocarbons [air, urban air close to ground]: 1.05263e-8 kg; lognormal variance with pedigree 1.21, pedigree (5,5,5,5,4)
  (same comment as for Dinitrogen monoxide)

## Sampling procedure
"Literature, manufacturers; CO and NOx emissions from (SVGW 2002), sample size (number of selected devices for which emission values are given in SVGW list): CO 133, NOx 181." as cited in ecoinvent v3.0 dataset "heat production, natural gas, at industrial furnace >100kW, GLO 2000".

## Extrapolations
This dataset has been extrapolated from year 2013 to the year of the calculation (2021). The uncertainty has been adjusted accordingly.
