# treatment of used train, passenger, long distance

Dataset: EcoSpold 2, unit process
Geography: CH
Time period: 1993-01-01 to 2021-12-31
Technology level: current
Classification: EcoSpold01Categories: transport systems/train
Classification: ISIC rev.4 ecoinvent: 3830:Materials recovery
Tags: Treatment; ConvertedDataset
Scenario: Business-as-Usual
System model: Allocation, cut-off by classification
Generated by: Michael Spielmann (obsolete)
Published in: Spielmann M. 2004
Database: ecoinvent
isCopyrightProtected: true
accessRestrictedTo: 1

## General comment
The dataset represents the disposal of a long-distance passenger train in Switzerland. In Switzerland, passenger transport is performed almost exclusively by electric powered trains.
[This dataset was already contained in the ecoinvent database version 2. It was not individually updated during the transfer to ecoinvent version 3. Life Cycle Impact Assessment results may still have changed, as they are affected by changes in the supply chain, i.e. in other datasets. This dataset was generated following the ecoinvent quality guidelines for version 2. It may have been subject to central changes described in the ecoinvent version 3 change report (http://www.ecoinvent.org/database/ecoinvent-version-3/reports-of-changes/), and the results of the central updates were reviewed extensively. The changes added e.g. consistent water flows and other information throughout the database. The documentation of this dataset can be found in the ecoinvent reports of version 2, which are still available via the ecoinvent website. The change report linked above covers all central changes that were made during the conversion process.]

## Included activities start
Service starts with the transport of the material to be disposal.

## Included activities end
The dataset ends with the disposal of one long distance train. The dataset includes the transport of the material and disposal of paint, glass and plastics.

## Geography
Data represents Swiss disposal conditions

## Technology
The majority of materials of the train compositions are metals. For these metals we assume a complete recycling and thus make a cut of allocation. For the remaining materials, merely the disposal of plastics, glass and paint are taken into account. For the transportation, standard distances are applied for the disposal of glass and plastics. For the remaining materials, a distance of 50 km has been assumed.

## Reference product
- used train, passenger, long-distance: -1 unit; By-product classification Waste; CPC 39990: Other wastes n.e.c.
  EcoSpold01Location=CH
  production volume 0.0336675 unit
    This is a placeholder value that does not reflect real-world production volumes. This dataset does not currently require a real-world production volume to work in the database framework, and no actual data were collected yet. This has no negative effect on the results of the ecoinvent database. The placeholder value of this activity was scaled according to the nominal GDP of 2005 (source: United Nations, http://data.un.org/Glossary.aspx?q=GDP+%28current+US%24%29, accessed 20130726) to reflect an appropriate share of the global production volume, which is also a placeholder value.
  property price 0 EUR2005
    Waste products are assigned a price of zero as they are assumed to require further treatment.
  property carbon content, fossil 0.211693
    Calculated from C content in input materials in the infrastructure
  property carbon content, non-fossil 0.00399258
    Calculated from C content in input materials in the infrastructure
  property carbon content 0.215686
    carbon content on a dry matter basis (reserved; not for manual entry)
  properties: water content 0, wet mass 317000 kg, dry mass 317000 kg, water in wet mass 0 kg, carbon allocation 68372.4 kg

## Inputs from technosphere
- waste plastic, mixture: -78200 kg; lognormal variance with pedigree 0.0521, pedigree (3,1,5,3,1)
  Calculated value. In v2.2 the flow was called "disposal, plastics, mixture, 15.3% water, to sanitary landfill".
  EcoSpold01Location=CH
  Uncertainty: derived from the material composition of the modelled IC (unit process IC manufacturing)
  production volume 78200 kg
    Calculated from the production volume of used train, passenger, long-distance in proportion to the respective output amounts.
  properties: carbon content, fossil 0.747344, water content 0.180638, dry mass 0.847 kg, wet mass 1 kg, heating value, net 30.79 MJ
  note on carbon content, fossil: C content in 1 kg DM was calculated using data in Tab A.2, ecoinvent v2.2 report 13_I
  note on heating value, net: Value taken from the general comment of the treatment dataset.
- waste glass: -9510 kg; lognormal variance with pedigree 0.0521, pedigree (3,1,5,3,1)
  Calculated value. In v2.2. the flow was called "disposal, glass, 0% water, to municipal incineration".
  EcoSpold01Location=CH
  Uncertainty: derived from the material composition of the modelled IC (unit process IC manufacturing)
  production volume 9510 kg
    (same comment as for waste plastic, mixture)
  properties: wet mass 1 kg, dry mass 1 kg, heating value, net 0.05 MJ
  note on heating value, net: Value extracted from "treatment of waste glass, open dump, very wet infiltration class (1000mm)"
- waste emulsion paint: -645 kg; lognormal variance with pedigree 0.0521, pedigree (3,1,5,3,1)
  EcoSpold01Location=CH
  Calculated value. In v2.2. the flow was called "disposal, emulsion paint, 0% water, to municipal incineration".
  Uncertainty: derived from the material composition of the modelled IC (unit process IC manufacturing)
  production volume 645 kg
    (same comment as for waste plastic, mixture)
  properties: carbon content, fossil 0.27, dry mass 1 kg, wet mass 1 kg, heating value, net 8.18 MJ
  note on carbon content, fossil: Tab A.4, ecoinvent v2.2 report 13_I. C content has been calculated after data in the tables, and then referred to 1 kg DM

## Sampling procedure
Data based on the material composition of an IC 2000.

## Extrapolations
This dataset has been extrapolated from year 2000 to the year of the calculation (2021). The uncertainty has been adjusted accordingly.

## Review by Roland Hischier 2011-09-23
Transfer of documentation done.

## Review by Michael Spielmann (obsolete) 2004-04-05
passed
