# paper production, woodcontaining, lightweight coated

Dataset: EcoSpold 2, unit process
Geography: RER
Time period: 2000-01-01 to 2021-12-31
Technology level: current
Classification: EcoSpold01Categories: paper & cardboard/graphic paper
Classification: ISIC rev.4 ecoinvent: 1701:Manufacture of pulp, paper and paperboard
Synonyms: LWC paper
Tags: ConvertedDataset
Scenario: Business-as-Usual
System model: Allocation, cut-off by classification
Generated by: Roland Hischier
Published in: Hischier R. 2007
Database: ecoinvent
isCopyrightProtected: true
accessRestrictedTo: 1

## General comment
Lightweight coated (LWC) paper is the coated type of mechanical paper which means that less than 90% of the fibres are in form of chemical pulp. It is predominantly used for print materials such as magazines and journals that require a higher paper quality than newsprint paper. Usually, this kind of paper mills contain an integrated mechanical pulp production and sometimes also an integrated deinking equipment for recovered paper. The used sulfate pulp is usually produced outside of the paper mill.

The main sources for this LWC paper dataset is a questionnaire from a European LWC paper producer and several environmental reports from further European paper mills (Albbruck (2001); Dachau (2001); Jämsä River Mill (2000); Plattling (2001); Rauma Mill (2001)). Further sources are the Finnish EcoData database from KCL (KCL (2002)), the German inventory study about graphical paper (Tiedemann et al. (2000)) and the European IPPC documentation for the paper and pulp industry (European Commission (2000)).

References:
Albbruck (2001) Umwelterklärung 2000. MD Papier GmbH und Co.KG, Albbruck (Germany)

Dachau (2001) Umwelterklärung 2000. MD Papier GmbH und Co.KG, Dachau (Germany)

Jämsä River Mill (2000) Environmental statement 1999. UPM-Kymmene, Jämsänkoski (Finland) as pdf-File under: http://www.paper.upm-kymmene.com

Plattling (2001) Umwelterklärung 2000. MD Papier GmbH und Co.KG, Platt-ling (Germany)

Rauma Mill (2001) Environmental report 2000. UPM-Kymmene, Rauma (Fin-land) as pdf-File under: http://www.paper.upm-kymmene.com

Further References

European Commission (2000) Integrated Pollution Prevention and Control (IPPC) - Reference Document on Best Available Techniques in the Pulp and Paper Industry. Institute for Prospective Technological Studies, Sevilla

KCL (2002) KCL EcoData - life cycle inventory database. The Finnish Pulp and Paper Research Institute (KCL), Espoo (Finnland)

Tiedemann A., Böttcher Tiedemann C., Buschardt A., Georgi B., Giersberg G., Goosmann G., Gregor H.-D., Mehlhorn B., Modi A., Neitzel H., Oels H.-J., Schmitz S. and Suhr M. (2000) Ökobilanzen für graphische Papiere. Texte 22/00. Umweltbundesamt, Berlin

## Included activities start
This activity starts with the reception of the raw materials, such as pulpwood and sulfate market pulp.

## Included activities end
This dataset represents the European production of LWC paper - including wood handling, mechanical pulping and bleaching, deinking of waste paper, paper production, energy production on-site and internal waste water treatment. A small amount of waste paper input (4.3% of output paper weight) has been included in the amount of pulp. The sorting of this paper and the related by-products have been excluded, since the sorting of unsorted paper takes place in a separate activity.

## Geography
Data from several European LWC paper producers used as European average data.

## Technology
Average of present used technology

## Time period
Data represent the average technology in the late 1990ies and early 2000s. The production volume is valid for 2018.

## Parameters
- fraction, cooling water, once-through system, to air: 0.004 dimensionless; name fraction_CW_OT_to_air; lognormal variance with pedigree 0.0413, pedigree (2,3,1,3,1)
  Calculated based on literature value (Scown, C.D., 2011, Water Footprint of U.S. Transportation Fuels and supplying information of the article) (Vionnet, S., Quantis Water Database - Technical Report, 2012).
- fraction, cooling water, cooling pond system, to air: 0.032 dimensionless; name fraction_CW_CP_to_air; lognormal variance with pedigree 0.0413, pedigree (2,3,1,3,1)
  (same comment as for fraction, cooling water, once-through system, to air)
- fraction, cooling water, recirculating system, to air: 0.771 dimensionless; name fraction_CW_R_to_air; lognormal variance with pedigree 0.0413, pedigree (2,3,1,3,1)
  (same comment as for fraction, cooling water, once-through system, to air)
- fraction, cooling water, to air: 0.3875 dimensionless; name fraction_CW_to_air; = (0.5*fraction_CW_OT_to_air)+(0.5*fraction_CW_R_to_air); lognormal variance with pedigree 0.092025, pedigree (4,4,3,2,4)
  Calculated value based on literature value (see comments of the other parametres present in this dataset) and expert opinion. In the case when no industry/literature data are available about the type of cooling or directly fraction, cooling water, to air specific for the process a default assumption is applied. It is assumed that the once-through cooling system is used in 50% of all cases and recirculating system is used in another 50% of all cases.
- fraction, process water, to air: 0.15 dimensionless; name fraction_PW_to_air; lognormal variance with pedigree 0.092025, pedigree (4,4,3,2,4)
  Literature value. In case when no industry/process specific data are available, default evaporation fraction value is used. This value is 15% and is based on literature (Statistics Canada, 2007 & Shaffer, K.H., 2008, Consumptive water use in the Great Lakes Basin, USGS & Shiklomanov, 2003, World Water Resources at the Beginning of the 21st Century) and has been approved by an expert.

## Reference product
- paper, woodcontaining, lightweight coated: 1 kg; name Amount_ref; CPC 321: Pulp, paper and paperboard; By-product classification allocatable product
  EcoSpold01Location=RER
  production volume 6.208e9 kg; name PV_ref
    Kg/year, valid for 2018
    Source: CEPI Key Statistics 2018, <http://www.cepi.org/system/files/public/documents/publications/Final%20Key%20Statistics%202018.pdf>
  property carbon content, fossil 0.032531
    Fossil C content was calculated after fossil C contents of chemicals used in the production of the paper (in Tab 8.39 ecoinvent v2.2 report 11_III, part 8).
  property carbon content, non-fossil 0.257
    Calculated Value. Based in carbon content, non-fossil of inputs.
  property price 0.572 EUR2005
    Export prices for the World+ according to: http://faostat.fao.org/site/626/DesktopDefault.aspx?PageID=626#ancor downloaded 6 May 2009; calculated as export value divided by export volume.
  property carbon content 0.289531
    carbon content on a dry matter basis (reserved; not for manual entry)
  properties: water in wet mass 0.055 kg, wet mass 1 kg, heating value, net 14.11 MJ, water content 0.0582011, dry mass 0.945 kg, carbon allocation 0.273607 kg

## Inputs from technosphere
- carboxymethyl cellulose, powder: 0.00253 kg; lognormal variance with pedigree 0.0407, pedigree (1,3,5,3,1)
  Average from several LWC paper producers
  EcoSpold01Location=RER
  Uncertainty: average from several LWC paper producers
  properties: heating value, net 20.19 MJ, carbon content, non-fossil 0.293878, carbon content, fossil 0.0979592, wet mass 1 kg, dry mass 1 kg
  note on carbon content, non-fossil: Chemical structure: Cellulose-O-CH2-COO-Na+. CMC is produced by the processing of alkaline cellulose with mono acetic acid (ecoinvent v2.2 report 12, pg 76 & 81). MW Acetic acid is 60 g/mol. The degree of carboxymethyl substitution in CMC is variable. It was considered that every molecule of glucose (monomers of cellulose) had a carboxymethyl substitution. MW of glucose (C6H10O5) is 162 g/mol; cellulose is (C6H10O5)n.
  note on carbon content, fossil: Chemical structure: Cellulose-O-CH2-COO-Na+. CMC is produced by the processing of alkaline cellulose with mono acetic acid (ecoinvent v2.2 report 12, pg 76 & 81). MW Acetic acid (CH3-COOH) is 60 g/mol. The degree of carboxymethyl substitution in CMC is variable. It was considered that every molecule of glucose (monomers of cellulose) had a carboxymethyl substitution. MW of glucose (C6H10O5) is 162 g/mol; cellulose is (C6H10O5)n. MW of Na is 23
- heat, district or industrial, other than natural gas: 3.04051 MJ; lognormal variance with pedigree 0.0487, pedigree (1,2,5,1,3)
  Heat input as reported by Hischier 2007. Activity Link set to the respective heat supplying activity.
  EcoSpold01Location=RER
  Uncertainty: value according to CEPI energy report
  properties: heating value, net 1 MJ
- sulfate pulp, bleached: 0.24795 kg; = (0.218+0.043)*0.95; lognormal variance with pedigree 0.0407, pedigree (1,3,5,3,1)
  average from several LWC paper producers; includes a small amount of waste paper. Pulp input is 5% unbleached pulp and 95% bleached pulp
  Uncertainty: average from several LWC paper producers
  properties: heating value, net 13.23 MJ, wet mass 1 kg, dry mass 0.9 kg, carbon content, non-fossil 0.494, water content 0.111111
  note on carbon content, non-fossil: C content of dry mass of sulfate pulp is 0.494 kgC/kg dry wood (ecoinvent v2.2 report 6_IX & ecoinvent v2.2 report 9). No other C containing products in the formulation of the pulp.
- sodium hydroxide, without water, in 50% solution state: 0.0174 kg; lognormal variance with pedigree 0.0407, pedigree (1,3,5,3,1)
  EcoSpold01Location=RER
  Average from several LWC paper producers
  Uncertainty: average from several LWC paper producers
  properties: wet mass 1 kg, dry mass 1 kg, heating value, net 3.03 MJ
- malusil: 0.0328 kg; lognormal variance with pedigree 0.0407, pedigree (1,3,5,3,1)
  (same comment as for sodium hydroxide, without water, in 50% solution state)
  properties: dry mass 1 kg, wet mass 1 kg
- ash from paper production sludge: 0 kg; name Amount_ash; pedigree (1,1,1,1,1)
  Average from several LWC paper producers
  EcoSpold01Location=CH
  Uncertainty: average from several LWC paper producers
  production volume 0 kg
    Calculated from production volume of reference product using the relative outputs.
  property price 0 EUR2005; name Amount_ash_price_EUR2005
  properties: dry mass 1 kg, carbon content, non-fossil 0.0092, wet mass 1 kg
- heat, central or small-scale, other than natural gas: 0.10164 MJ; lognormal variance with pedigree 0.0487, pedigree (1,2,5,1,3)
  EcoSpold01Location=RER
  Heat input as reported by Hischier 2007. Activity Link set to the respective heat supplying activity.
  Uncertainty: value according to CEPI energy report
  properties: heating value, net 1 MJ
- sodium chlorate, powder: 0.0002 kg; lognormal variance with pedigree 0.0407, pedigree (1,3,5,3,1)
  (same comment as for sodium hydroxide, without water, in 50% solution state)
  properties: dry mass 1 kg, wet mass 1 kg
- potato starch: 0.0119 kg; lognormal variance with pedigree 0.0407, pedigree (1,3,5,3,1)
  Average from several LWC paper producers
  EcoSpold01Location=DE
  Uncertainty: average from several LWC paper producers
  properties: carbon content, non-fossil 0.46, dry mass 0.8 kg, water content 0.25, wet mass 1 kg, heating value, net 10.66 MJ
  note on carbon content, non-fossil: C-content of starch is considered 46% on dry mass basis (from "Evolutionary and Biochemical Aspects", A.D. Kay and T. Vrede (in Global Ecology, 2010, Elsevier B.V., S.E. Jørgensen Ed.)).
- paper mill, integrated: 5.44e-11 unit; lognormal variance with pedigree 0.448, pedigree (4,5,5,5,5)
  Own assumption
  EcoSpold01Location=RER
  Uncertainty: own assumption
- pulpwood, softwood, measured as solid wood under bark: 0 m3; pedigree (1,1,1,1,1)
  The amount of wood used as internal fuel is covered in the corresponding heat module and therefore subtracted (based on carbon content) from the original amount of pulpwood. The original value is an average from several LWC paper producers and includes a small amount of residual wood from ordinary softwood forestry
  EcoSpold01Location=RER
  Uncertainty: average from several LWC paper producers
  properties: carbon content, non-fossil 0.494, wet mass 929.28 kg, water content 1.4, dry mass 387.2 kg, heating value, net 4483.78 MJ
  note on carbon content, non-fossil: C content of dry mass is 0.494 kgC/kg dry wood (ecoinvent v2.2 report 9)
  note on heating value, net: Value based on "softwood forestry, mixed species, sustainable forest management"The property is based on a value of 11.58MJ/kg
- municipal solid waste: -0.0014 kg; name Amount_MSW; lognormal variance with pedigree 0.0407, pedigree (1,3,5,3,1)
  (same comment as for ash from paper production sludge)
  production volume 8.6912e6 kg; = PV_ref*(Amount_MSW/ Amount_ref)
    Calculated from production volume of reference product using the relative outputs.
  properties: wet mass 1 kg, water content 0.297017, dry mass 0.771 kg, carbon content, non-fossil 0.261655, carbon content, fossil 0.171549, heating value, net 11.74 MJ
  note on carbon content, non-fossil: MSW composition in tab 4.1, ecoinvent v2.2 report 13_I. C content referred to 1 kg DM
  note on heating value, net: Value taken from the general comment of the treatment dataset.
- chlorine, liquid: 7e-6 kg; lognormal variance with pedigree 0.0407, pedigree (1,3,5,3,1)
  (same comment as for sodium hydroxide, without water, in 50% solution state)
  properties: dry mass 1 kg, wet mass 1 kg
- kaolin: 0.314 kg; lognormal variance with pedigree 0.0407, pedigree (1,3,5,3,1)
  (same comment as for carboxymethyl cellulose, powder)
  properties: wet mass 1 kg, dry mass 1 kg
- heat, district or industrial, natural gas: 3.17346 MJ; lognormal variance with pedigree 0.0487, pedigree (1,2,5,1,3)
  (same comment as for heat, central or small-scale, other than natural gas)
  properties: heating value, net 1 MJ
- latex: 0.0292 kg; lognormal variance with pedigree 0.0407, pedigree (1,3,5,3,1)
  (same comment as for carboxymethyl cellulose, powder)
  properties: dry mass 1 kg, carbon content, fossil 0.872983, wet mass 1 kg, heating value, net 26.45 MJ
  note on carbon content, fossil: The Styrene-butadiene dispersion is based on styrene and 1,3-butadiene plus co-monomers like i.e. ac-rylonitrile or (meth-)acrylic acid (ecoinvent v2.2 report 11_III). Following specifications in US Patent 3,875,101 (1971), the dispersion was considered as: 52.5% 1.3-butadiene (0.8571 kg C/kg dry mass); 43% styrene (0.9231 kg C/kg dry mass); 2% acrylic acid (0.5 kg C/kg dry mass); 2.5% acrolein (C3H4O, MW=56; 0.6429 kg C/kg dry mass)
- lime: 0.00144 kg; lognormal variance with pedigree 0.0407, pedigree (1,3,5,3,1)
  EcoSpold01Location=CH
  Average from several LWC paper producers
  Uncertainty: average from several LWC paper producers
  properties: wet mass 1 kg, dry mass 1 kg, carbon content, fossil 0.120005
- sulfur dioxide, liquid: 0.0055 kg; lognormal variance with pedigree 0.0407, pedigree (1,3,5,3,1)
  (same comment as for sodium hydroxide, without water, in 50% solution state)
  properties: dry mass 1 kg, wet mass 1 kg
- activated bentonite: 0.00064 kg; lognormal variance with pedigree 0.0407, pedigree (1,3,5,3,1)
  EcoSpold01Location=DE
  Average from several LWC paper producers
  Uncertainty: average from several LWC paper producers
  properties: dry mass 1 kg, wet mass 1 kg
- chemical, organic: 0.0104 kg; lognormal variance with pedigree 0.0407, pedigree (1,3,5,3,1)
  Average from several LWC paper producers
  EcoSpold01Location=GLO
  Uncertainty: average from several LWC paper producers
  properties: dry mass 1 kg, carbon content, fossil 0.628, wet mass 1 kg, heating value, net 19.03 MJ
  note on carbon content, fossil: This dataset is an unweighted average of 20 organic substances (listed in Tab 88.1, ecoinvent v2.2 report 8, part II), being part of the top100 chemicals included in this database. The C-content has also been calculated as an unweighted average of the C content of the substances composing this dataset.
- sludge from pulp and paper production: 0 kg; name Amount_sludge; pedigree (1,1,1,1,1)
  (same comment as for ash from paper production sludge)
  production volume 0 kg
    Calculated from production volume of reference product using the relative outputs.
  property price 0 EUR2005; name Amount_sludge_price_EUR2005
  properties: dry mass 0.75 kg, water content 0.333333, carbon content, non-fossil 0.21, wet mass 1 kg, heating value, net 2.65 MJ
  note on carbon content, non-fossil: Tab 6.21, ecoinvent v2.2 report 11_III & Tab A.9, ecoinvent v2.2 report 13_I. Sludge from pulp and paper contains 15.75% carbon
- wood ash mixture, pure: 0 kg; name Amount_wodd_ash_mix; pedigree (1,1,1,1,1)
  (same comment as for lime)
  production volume 0 kg
    Calculated from production volume of reference product using the relative outputs.
  property price 0 EUR2005; name Amount_wodd_ash_mix_price_EUR2005
  properties: carbon content, non-fossil 0.012, wet mass 1 kg, dry mass 1 kg
- chemical, inorganic: 0.0104 kg; lognormal variance with pedigree 0.0407, pedigree (1,3,5,3,1)
  EcoSpold01Location=GLO
  Average from several LWC paper producers
  Uncertainty: average from several LWC paper producers
  properties: wet mass 1 kg, carbon content, fossil 0.003, dry mass 1 kg
  note on carbon content, fossil: This dataset is an unweighted average of 20 inorganic substances (listed in Tab 88.1, ecoinvent v2.2 report 8, part II), being part of the top100 chemicals included in this database. The C-content has also been calculated as an unweighted average of the C content of the substances composing this dataset.
- sulfate pulp, unbleached: 0.01305 kg; = (0.218+0.043)*0.05; lognormal variance with pedigree 0.0407, pedigree (1,3,5,3,1)
  (same comment as for sulfate pulp, bleached)
  properties: carbon content, non-fossil 0.494, dry mass 0.9 kg, price 0.355 EUR2005, water content 0.111111, wet mass 1 kg, heating value, net 13.23 MJ
- urea: 0.000651715 kg; lognormal variance with pedigree 0.0407, pedigree (1,3,5,3,1)
  EcoSpold01Location=RER
  The exchange has been updated from 'urea, as N' into 'urea' and therefore its amount has been scaled (multiplied) from 0.0003 kg by 2.1438 kg of 'urea' per kg of 'urea, as N'. Original comment of the exchange is: Average from several LWC paper producers
  Uncertainty: average from several LWC paper producers
  properties: carbon content, fossil 0.2, dry mass 1 kg, wet mass 1 kg
- hazardous waste, for underground deposit: -0.0002 kg; name Amount_hazardous_waste; lognormal variance with pedigree 0.0407, pedigree (1,3,5,3,1)
  (same comment as for activated bentonite)
  production volume 1.2416e6 kg; = PV_ref*( Amount_hazardous_waste/ Amount_ref)
    Calculated from production volume of reference product using the relative outputs.
  property price 0 EUR2005; name Amount_hazardous_waste_price_EUR2005
  properties: carbon content, fossil 0.554667, wet mass 1 kg, dry mass 1 kg
  note on carbon content, fossil: Tab A.6, ecoinvent v2.2 report 13_I, average hazardous waste composition was used, and referred to 0% water mass. No waste-specific emission are currently inventoried for underground deposits. Accordingly, no waste composition must be specified. For generic, average waste to underground deposit deposition in a 200 liter steel drum without cement solidification is assumed (ecoinvent v2.2 report 13_I).
- sodium dithionite, anhydrous: 0.00164 kg; lognormal variance with pedigree 0.0407, pedigree (1,3,5,3,1)
  (same comment as for carboxymethyl cellulose, powder)
  properties: wet mass 1 kg, dry mass 1 kg
- heat, district or industrial, other than natural gas: 0.4944 MJ; lognormal variance with pedigree 0.0487, pedigree (1,2,5,1,3)
  Heat input as reported by Hischier 2007. Activity Link set to the respective heat supplying activity.
  properties: heating value, net 1 MJ, corresponding fuel use, propane, furnace >100kW 1.05263 MJ
  note on corresponding fuel use, propane, furnace >100kW: Lower heating value of the fuel input related to the heat/electricity output, taken directly from ecoinvent v3.0 dataset "heat production, natural gas, at industrial furnace >100kW, GLO 2000".
- electricity, medium voltage: 1.5994 kWh; lognormal variance with pedigree 0.0407, pedigree (1,3,5,3,1)
  Average from several LWC paper producers
  EcoSpold01Location=NORDEL
  Uncertainty: average from several LWC paper producers
- heat, district or industrial, other than natural gas: 0.1156 MJ; lognormal variance with pedigree 0.0487, pedigree (1,2,5,1,3)
  (same comment as for heat, district or industrial, other than natural gas)
  properties: corresponding fuel use, propane, furnace >100kW 1.05263 MJ, heating value, net 1 MJ
- sulfuric acid: 0.00052 kg; lognormal variance with pedigree 0.0407, pedigree (1,3,5,3,1)
  (same comment as for sodium hydroxide, without water, in 50% solution state)
  properties: dry mass 1 kg, wet mass 1 kg
- aluminium sulfate, powder: 0.0017 kg; lognormal variance with pedigree 0.0407, pedigree (1,3,5,3,1)
  (same comment as for carboxymethyl cellulose, powder)
  properties: wet mass 1 kg, dry mass 1 kg
- hydrogen peroxide, without water, in 50% solution state: 0.00878 kg; lognormal variance with pedigree 0.0407, pedigree (1,3,5,3,1)
  (same comment as for sodium hydroxide, without water, in 50% solution state)
  properties: wet mass 1 kg, dry mass 1 kg, heating value, net 7.13 MJ
- ash from paper production sludge: -0.000207574, -5.42586e-6 kg (2 entries); lognormal variance with pedigree 0.0407, pedigree (1,3,5,3,1)
  (same comment as for ash from paper production sludge)
  production volume 1.3223e6 kg
- pulpwood, softwood, measured as solid wood under bark: 0.00069975, 8.55032e-6 m3 (2 entries); lognormal variance with pedigree 0.0407, pedigree (1,3,5,3,1)
  (same comment as for pulpwood, softwood, measured as solid wood under bark)
- sludge from pulp and paper production: -8.28566e-6, -0.000747714 kg (2 entries); lognormal variance with pedigree 0.0407, pedigree (1,3,5,3,1)
  (same comment as for ash from paper production sludge)
  production volume 4.69325e6 kg
- wood ash mixture, pure: -0.00720195, -0.000148047 kg (2 entries); lognormal variance with pedigree 0.0407, pedigree (1,3,5,3,1)
  (same comment as for lime)
  production volume 4.56288e7 kg

## Inputs from nature
- Water, unspecified natural origin [natural resource, in water]: 0.0207 m3; name water_UNO_input; lognormal variance with pedigree 0.0407, pedigree (1,3,5,3,1)
  Average from several LWC paper producers
  Uncertainty: average from several LWC paper producers
- Water, cooling, unspecified natural origin [natural resource, in water]: 0.024 m3; name water_cooling_UNO_input; lognormal variance with pedigree 0.0407, pedigree (1,3,5,3,1)
  (same comment as for Water, unspecified natural origin)

## Emissions to nature
- BOD5, Biological Oxygen Demand [water, surface water]: 0.00011 kg; lognormal variance with pedigree 0.0807, pedigree (1,3,5,3,1)
  (same comment as for Water, unspecified natural origin)
- Nitrogen [water, surface water]: 4.3e-5 kg; lognormal variance with pedigree 0.0807, pedigree (1,3,5,3,1)
  (same comment as for Water, unspecified natural origin)
- TOC, Total Organic Carbon [water, surface water]: 0.000814815 kg; lognormal variance with pedigree 0.0807, pedigree (1,3,5,3,1)
  Calculated by default as TOC (gC) = COD/2.7 (COD measured in g O2). Should more correctly be calculated from the carbon content of the specified emissions to water.
  Uncertainty: average from several LWC paper producers
- COD, Chemical Oxygen Demand [water, surface water]: 0.0022 kg; lognormal variance with pedigree 0.0807, pedigree (1,3,5,3,1)
  (same comment as for Water, unspecified natural origin)
- Phosphorus [water, surface water]: 7.6e-6 kg; lognormal variance with pedigree 0.0807, pedigree (1,3,5,3,1)
  (same comment as for Water, unspecified natural origin)
- DOC, Dissolved Organic Carbon [water, surface water]: 0.000814815 kg; lognormal variance with pedigree 0.0807, pedigree (1,3,5,3,1)
  Calculated as equal to TOC.
  Uncertainty: average from several LWC paper producers
- Water [water, unspecified]: 0.032295 m3; name water_to_water_unspecified; = water_cooling_UNO_input*(1-fraction_CW_to_air)+water_UNO_input*(1-fraction_PW_to_air); lognormal variance with pedigree 0.0807, pedigree (2,2,5,1,1)
  Calculated value based on literature values and expert opinion. See comments in the parametres' comment field.
  property fraction, origin: unspecified 1; name fraction_origin_unspecified_Ww
  property carbon content, fossil 0; name C_content_fossil
  property wet mass 1000 kg; name WM
  property dry mass 0 kg; name DM
  property fraction, origin: salt water 0; name fraction_origin_salt_water_Ww
  property water in wet mass 1000 kg; name WWM
  property fraction, origin: fresh water 0; name fraction_origin_fresh_water_Ww
  property carbon content, non-fossil 0; name C_content_non_fossil
- Water [air, unspecified]: 0.012405 m3; name water_to_air_unspecified; = (water_cooling_UNO_input*fraction_CW_to_air)+(water_UNO_input*fraction_PW_to_air); lognormal variance with pedigree 0.0807, pedigree (2,2,5,1,1)
  (same comment as for Water)
  property fraction, origin: unspecified 1; name fraction_origin_unspecified
  property fraction, origin: fresh water 0; name fraction_origin_fresh_water
  property fraction, origin: salt water 0; name fraction_origin_salt_water
- Suspended solids, unspecified [water, surface water]: 0.00034 kg; lognormal variance with pedigree 0.0807, pedigree (1,3,5,3,1)
  (same comment as for Water, unspecified natural origin)
- AOX, Adsorbable Organic Halogen as Cl [water, surface water]: 1.6e-6 kg; lognormal variance with pedigree 0.0807, pedigree (1,3,5,3,1)
  (same comment as for Water, unspecified natural origin)

## Sampling procedure
Based on literature and statistics (see dataset field “Published Source”)

## Extrapolations
This dataset has been extrapolated from year 2000 to the year of the calculation (2021). The uncertainty has been adjusted accordingly.

## Review by Hans-Jörg Althaus 2003-08-06
Passed
