# nuclear power plant construction, boiling water reactor 1000MW

Dataset: EcoSpold 2, unit process
Geography: US
Time period: 1979-01-01 to 2021-12-31
Technology level: current
Classification: ISIC rev.4 ecoinvent: 4220:Construction of utility projects
Classification: EcoSpold01Categories: nuclear power/power plants
Tags: ConvertedDataset
Scenario: Business-as-Usual
System model: Allocation, cut-off by classification
Generated by: Roberto Dones
Published in: Dones, R. 2007
Database: ecoinvent
isCopyrightProtected: true
accessRestrictedTo: 1

## General comment
The module is based on "nuclear power plant, boiling water reactor 1000MW", CH. Only two differences are: the supply mix of electricity, US instead of CH; and, the excavation volume for foundation, equal to what assumed in ecoinvent for BWR DE and UCTE.
[This dataset was already contained in the ecoinvent database version 2. It was not individually updated during the transfer to ecoinvent version 3. Life Cycle Impact Assessment results may still have changed, as they are affected by changes in the supply chain, i.e. in other datasets. This dataset was generated following the ecoinvent quality guidelines for version 2. It may have been subject to central changes described in the ecoinvent version 3 change report (http://www.ecoinvent.org/database/ecoinvent-version-3/reports-of-changes/), and the results of the central updates were reviewed extensively. The changes added e.g. consistent water flows and other information throughout the database. The documentation of this dataset can be found in the ecoinvent reports of version 2, which are still available via the ecoinvent website. The change report linked above covers all central changes that were made during the conversion process.]

## Included activities end
The module includes materials, energy and transport requirements used for construction of the plant. Land-use is included with the assumption of 40 years operation. Disposal of non-contaminated material from dismantling is also included, whereas contaminated materials are attributed to the operation.

## Geography
Swiss data on one specific plant adapted to USA.

## Technology
The described plant Leibstadt (CH) started commercial operation at the end of 1984. It belongs to the 1000 MW class (net installed capacity has been upgraded in steps from the original 990 MW to 1165 MW at the end of 1999). It has a GE (USA) designed primary circuit, a Mark III containment, and a cooling tower. This module can be assumed to be representative for the boiling water reactors of the same class in USA.

## Reference product
- nuclear power plant, boiling water reactor 1000MW: 1 unit; CPC 53262: Power plants; By-product classification allocatable product
  EcoSpold01Location=US
  production volume 0.943007 unit
    Calculated from electricity demand, using the input/output relationships of the datasets
  property price 1.49852e8 EUR2005
    Calculated based on inputs: The price of the product has been calculated as a sum of the values of the material and energy inputs for this product. This value is therefore a rough estimation. It may underestimate the real price since there are additional expenses when producing any product. These expences can include for example labour costs, treatment of waste materials and profit for the producer. Please consider carefully whether this level of data quality is acceptable for your application.

## Inputs from technosphere
- diesel, burned in building machine: 1.9e8 MJ; lognormal variance with pedigree 0.05, pedigree (1,1,5,1,1)
  EcoSpold01Location=GLO
  estrapolation from Swiss data
  properties: heating value, net 1 MJ
- paper, woodfree, coated: 4.25e6 kg; lognormal variance with pedigree 0.05, pedigree (1,1,5,1,1)
  EcoSpold01Location=RER
  estrapolation from Swiss data
  properties: heating value, net 14.11 MJ, water content 0.0582011, carbon content, fossil 0.0590617, carbon content, non-fossil 0.22775, dry mass 0.945 kg, wet mass 1 kg
  note on carbon content, fossil: Fossil C content was calculated after fossil C contents of chemicals used in the production of the paper (in Tab 8.72 & 8.73 ecoinvent v2.2 report 11_III, part 8).
  note on carbon content, non-fossil: Biogenic C content was calculated after biogenic C contents of chemicals used in the production of the paper (in Tab 8.72 & 8.73 ecoinvent v2.2 report 11_III, part 8). The cellulose content in 1 kg of paper (on a wet mas basis) was estimated as (1-chemical content), C content of cellulose was considered 0.44 kgC/kg dry mass (ecoinvent v2.2 report, n 15a, pg 40)
- reinforcing steel: 4e7 kg; lognormal variance with pedigree 0.05, pedigree (1,1,5,1,1)
  estrapolation from Swiss data
  EcoSpold01Location=RER
  properties: carbon content, fossil 0.004, wet mass 1 kg, dry mass 1 kg
- aluminium, wrought alloy: 136000 kg; lognormal variance with pedigree 0.05, pedigree (1,1,5,1,1)
  estrapolation from Swiss data
  EcoSpold01Location=RER
  properties: wet mass 1 kg, dry mass 1 kg
- plywood: 8000 m3; lognormal variance with pedigree 0.05, pedigree (1,1,5,1,1)
  EcoSpold01Location=RER
  estrapolation from Swiss data
  properties: carbon content, fossil 0.09783, dry mass 768.6 kg, carbon content, non-fossil 0.409818, wet mass 823 kg, price 400 EUR2005, heating value, net 11688.9 MJ, water content 0.070778
- aluminium, cast alloy: 64000 kg; lognormal variance with pedigree 0.05, pedigree (1,1,5,1,1)
  EcoSpold01Location=RER
  estrapolation from Swiss data
  properties: dry mass 1 kg, wet mass 1 kg
- concrete, normal: 200000 m3; lognormal variance with pedigree 0.05, pedigree (1,1,5,1,1)
  estrapolation from Swiss data
  EcoSpold01Location=CH
  properties: water content 0.086758, dry mass 2190 kg, wet mass 2380 kg
- fibre cement facing tile: 5.3e6 kg; lognormal variance with pedigree 0.05, pedigree (1,1,5,1,1)
  EcoSpold01Location=CH
  estrapolation from Swiss data
  properties: carbon content, fossil 0.0201818, wet mass 1 kg, dry mass 1 kg, carbon content, non-fossil 0.0115
  note on carbon content, fossil: Tab 5.1, ecoinvent v2.2 report 7, part IX. Fibres (pulp) 2.5%. Fibres (polyvinyl alcohol) 3.7%. C-content/dry mass of natural fibres was considered 46% (from "Evolutionary and Biochemical Aspects", A.D. Kay and T. Vrede (in Global Ecology, 2010, Elsevier B.V., S.E. Jørgensen Ed.)). C-content/dry mass of polyvinyl alcohol ((C2H4O)x) was considered =24/44.
- inert waste, for final disposal: -3.79e8 kg; lognormal variance with pedigree 0.06, pedigree (1,1,5,1,1)
  extrapolation from Swiss data
  EcoSpold01Location=CH
  production volume 3.57399e8 kg
    Calculated from the production volume of nuclear power plant, boiling water reactor 1000MW in proportion to the respective output amounts.
  properties: water content 0.00502513, wet mass 1 kg, dry mass 0.995 kg
- excavation, hydraulic digger: 100000 m3; lognormal variance with pedigree 0.06, pedigree (1,1,5,1,1)
  estrapolation from Swiss data
  EcoSpold01Location=RER
- lubricating oil: 200000 kg; lognormal variance with pedigree 0.05, pedigree (1,1,5,1,1)
  EcoSpold01Location=RER
  estrapolation from Swiss data
  properties: carbon content, fossil 0.75, wet mass 1 kg, dry mass 1 kg, heating value, net 40.2 MJ
  note on carbon content, fossil: Lubricating oil is produced from diesel. C-content/dry mass of fats and oils considered 75%, from: ecoinvent v2.2 report, n 15a, pg 40
  note on heating value, net: Literature value, Source: IPCC 2006, 2006 IPCC Guidelines for National Greenhouse Gas Inventories, Prepared by the National Greenhouse Gas Inventories Programme, Eggleston H.S., Buendia L., Miwa K., Ngara T. and Tanabe K. (eds). Published: IGES, Japan
- electricity, medium voltage: 5.31e8 kWh; lognormal variance with pedigree 0.05, pedigree (1,1,5,1,1)
  estrapolation from Swiss data
  EcoSpold01Location=US
- copper, cathode: 1.47e6 kg; lognormal variance with pedigree 0.05, pedigree (1,1,5,1,1)
  EcoSpold01Location=RER
  estrapolation from Swiss data
  properties: dry mass 1 kg, wet mass 1 kg
- steel, chromium steel 18/8, hot rolled: 2.06e7 kg; lognormal variance with pedigree 0.05, pedigree (1,1,5,1,1)
  EcoSpold01Location=RER
  estrapolation from Swiss data
  properties: carbon content, fossil 0.0008, dry mass 1 kg, wet mass 1 kg
  note on carbon content, fossil: Stainless steel model is the grade 304 steel (18/8 stainless, 18% chromium 8% nickel; max. 0.08% C)
- steel, low-alloyed, hot rolled: 5.57e6 kg; lognormal variance with pedigree 0.05, pedigree (1,1,5,1,1)
  EcoSpold01Location=RER
  estrapolation from Swiss data
  properties: wet mass 1 kg, carbon content, fossil 0.005, dry mass 1 kg
  note on carbon content, fossil: Low alloyed steel composition given in Tab. 3.2 ecoinvent v2.2 report 10_partII. Steel assumed to have a C content of 0.5%
- heat, district or industrial, other than natural gas: 1.653e8 MJ; lognormal variance with pedigree 0.05, pedigree (1,1,5,1,1)
  EcoSpold01Location=RER
  properties: heating value, net 1 MJ

## Inputs from nature
All rows: lognormal variance with pedigree 0.04, pedigree (1,1,5,1,1)
- Occupation, construction site [natural resource, land]: 3.61e6 m2*year
  own estimation on plan (Swiss plant)
- Occupation, industrial area [natural resource, land]: 7.6e6 m2*year
  own estimation on plan (Swiss plant)
- Transformation, to industrial area [natural resource, land]: 190000 m2
  assumption
- Transformation, from unspecified [natural resource, land]: 190000 m2
  assumption
- Transformation, from industrial area [natural resource, land]: 190000 m2
  assumption
- Transformation, to unspecified [natural resource, land]: 190000 m2
  assumption

## Sampling procedure
Literature

## Extrapolations
This dataset has been extrapolated from year 2006 to the year of the calculation (2021). The uncertainty has been adjusted accordingly.

## Review by Thomas Nemecek 2007-08-24
Passed.
