# electricity production, lignite

Dataset: EcoSpold 2, unit process
Geography: UA
Time period: 2008-01-01 to 2021-12-31
Technology level: modern
Classification: ISIC rev.4 ecoinvent: 3510:Electric power generation, transmission and distribution
Classification: EcoSpold01Categories: lignite/power plants
Synonyms: sub-bituminous coal; brown coal
Tags: coal power; lignite power; fossil fuels
Scenario: Business-as-Usual
System model: Allocation, cut-off by classification
Generated by: Christian Bauer
Published in: Röder, A. 2007
Database: ecoinvent
isCopyrightProtected: true
accessRestrictedTo: 1

## General comment
This dataset represents the production of high voltage electricity in an average lignite power plant in the Ukraine in 2008. This dataset stands for all brown coal, i.e. the sum of sub-bituminous coal and lignite.

NoneAll exchanges in this dataset except for emissions of SO2, NOx and particles have been overtaken from the global dataset, which in their turn are production-weighted averages of the figures in the datasets in ecoinvent version two, which are valid for the following 10 countries: AT, BA, CZ, DE, ES, FR, HU, PL, SI, SK. The exception values have been determined using a bottom-up approach. It consists in the collection of information about single plants.

The average electrical efficiency has been calculated with data from IEA/OECD statistics and amounts to 27.0% (see parameters).

The following comments are valid for the structure of the version 2 datasets.

- for the assessment of main characteristics (sulphur and ash content of coal, efficiency of the plant) and CO2 a bottom-up approach has been used. It consists in the collection of information about single plants.
- The size distribution of particle emissions has been derived from German data.
- Halogene emissions have been estimated on the basis of the content of the species in the country-specific coal input mix, assuming average retention rates.
- For CO and particle emissions average values for the former UCTE are included (Union for the Coordination of the Transmission of Electricity, since 2009 replaced by ENTSO-E European Network of Transmission System Operators for Electricity).
- The country specific emissions of N2O depend on the share of DeNOx. - Emissions of trace elements were calculated by means of a formula (CORINAIR) using the ash content in the country-specific coal input mix and average transfer coefficients for coal power plants, taking into account the share of DeSOx installed.
- Emission of uranium and thorium radioactive isotopes were assumed proportional to the corresponding element emitted with particles; the other non-gaseous radioactive isotopes of the uranium and thorium decay chain were assumed proportional to the emitted U-238 or Th-232.
- The emission of gaseous radon and K-40 are taken from the literature.
IEA. 2009. Coal information, 2009 edition. Documentation for beyond 2020 files. International Energy Agency.
European Environment Agency (1991) CORINAIR Inventory; VOC"s Default Emission Factors

## Included activities start
From the constructed lignite power plant ready to produce electricity.

From reception of lignite and operating materials at power plant gate.

## Included activities end
This activity ends with 1kWh of high voltage electricity produced at the power plant and arrived at the busbar.

This dataset includes:
- all operation and maintenance activities and materials of the power plants.

- Particle removal (dedusting of the flue gas)
- Desulfurisation and denitrification. These processes are described in separate modules; it can be decided by changing the values of NOx and SOx retained whether and how much DeNOx and DeSOx are installed.
- Cooling: It is assumed that all plants use wet cooling with a cooling tower. No cooling tower is included in this dataset (will be implemented in future versions)
- Loss of feed water
- Losses from gross electricity production, e.g. for internal use

This dataset doesn"t include
- raw materials extraction, decommissioning and waste treatment as these activities are already included in the infrastructure datasets
- transformation of the electricity produced
- The disposal of non-recycled ashes is modelled separately.
- Use of fuel oil for startup, as this can be neglected for lignite power plants because these are run for a long time (2-3 years) without being shut down.

## Technology
POWER PLANT:
Lignite power plant input is a dataset which consists of a mix of 30% 100MW power plant and 70% 500MW power plant. The plants are used for basic load with 6000 hours of operation at full capacity per year. The plants are assumed to operate 200000 hours during its lifetime.
OTHER DATA:

- Average efficiency: 27.0% (IEA/OECD 2010)
- Share of installed capacity with desulfurisation: 20.0% (rough estimation based on sulfur mass balance
- Average efficiency of desulfurisation installations: 92% (rough estimation based on Dones et al. 2007
- Share of installed capacity with denitrification (primary and/or secondary installations): no data
- Average efficiency of denitrification installations: no data
- Share of installed capacity with particle filters: no data
- Average efficiency of particle filters: no data
- IEA 2012. Coal Power Database. International Energy Agency Clean Coal Centre, London
- IEA/OECD. 2010. Electricity Information 2010. International Energy Agency (IEA), Paris Cedex (FR). Part IV. Detailed OECD Electricity And Heat Data.
- Dones, R., Bauer, C., R\xc3\xb6der, A. (2007) Kohle. In: Dones, R. (Ed.) et al., Sachbilanzen von Energiesystemen: Grundlagen fur den \xc3\xb6kologischen Vergleich von Energiesystemen und den Einbezug von Energiesystemen in \xc3\x96kobilanzen fur die Schweiz. Final report ecoinvent No.

## Parameters
- water consumption, electricity production from hard coal, recirculating CS: 0.0018 m3/kWh; name WConsumption_EP_HC_recirculatingCS; lognormal variance with pedigree 0.092025, pedigree (4,4,3,2,4)
  Estimated based on literature (Scown, 2011, Water Footprint of U.S. Transportation Fuels, SI). The amount of water consumed while burning lignite and peat is assumed to be the same as in case of coal.
- recirculating cooling system as a fraction of all cooling systems: 0.27 dimensionless; name recirculating_CS_fraction_from_allCS; lognormal variance with pedigree 0.092025, pedigree (4,4,3,2,4)
  Calculated as an average of data available for Europe (Floerke, 2008, Future changes of freshwater needs in the electricity production sector) and USA (NERL, 2011, Estimating freshwater needs to meet future thermoelectric generation requirements).
- water withdrawal, electricity production from hard coal, once-through and coolin: 0.0815 m3/kWh; name WWithdrawal_EP_HC_once_through_andCP_CS; lognormal variance with pedigree 0.092025, pedigree (4,4,3,2,4)
  Estimated based on literature (Scown, 2011, Water Footprint of U.S. Transportation Fuels, SI). The amount of water withdrawn while burning lignite and peat is assumed to be the same as in case of coal.
- gross electricity production in 2008: 2.5e8 kWh; name gross_electricity_2008; lognormal variance with pedigree 0.001225, pedigree (2,1,1,2,1)
  Literature value.
  Itten R. and Frischknecht R. (2012) Life Cycle Inventories of Electricity Mixes and Grid. ESU-services Ltd., Uster, Switzerland.Country tables.
- fraction, cooling water, cooling pond system, to air: 0 dimensionless
- fraction, cooling water, once-through system, to air: 0 dimensionless
- efficiency: 0.25 dimensionless; lognormal variance with pedigree 0.0171, pedigree (4,2,1,1,3)
  Literature value/calculation/estimation for the electrical efficiency. For non-OECD countries, IEA/OECD statistics only provided data for the total category hard coal, lignite and peat: Fuel input (ktoe), gross electricity production in hard coal, lignite and peat power plants (GWh). Electricity production was also given for the single sub-categories hard coal, lignite and peat in Itten&Frischknecht 2012. Gross production was turned into net production with the loss factor stated in the parameter "losses from gross electricity production). ktoe were converted into GWh with a factor 11.63 according to chapter 3 in part I in IEA/OECD 2010.
  The efficiency of the total category as well as the electricity production in the single categories were taken to estimate the single efficiencies.
  IEA/OECD. 2010. Energy balances of non OECD countries 2010. Statistics of the Internationsl Energy Agency, Paris. Part II-Statistical data; Country-specific net calorific values of the respective countries.
  Itten R. and Frischknecht R. (2012) Life Cycle Inventories of Electricity Mixes and Grid. ESU-services Ltd., Uster, Switzerland.
- water consumption, electricity production from hard coal, once-through and cooli: 0.0014 m3/kWh; name WConsumption_EP_HC_once_through_andCP_CS; lognormal variance with pedigree 0.092025, pedigree (4,4,3,2,4)
  (same comment as for water consumption, electricity production from hard coal, recirculatin)
- water withdrawal, electricity production from hard coal, recirculating CS: 0.0021 m3/kWh; name WWithdrawal_EP_HC_recirculating_CS; lognormal variance with pedigree 0.092025, pedigree (4,4,3,2,4)
  (same comment as for water withdrawal, electricity production from hard coal, once-through )
- losses from gross electricity production: 0.15 dimensionless; name gross_net_electricity; lognormal variance with pedigree 0.003525, pedigree (3,2,2,2,2)
  Calculated value. Internal use of gross electricity produced. Calculated with country table in Itten&Frischknecht 2012.
  Itten R. and Frischknecht R. (2012) Life Cycle Inventories of Electricity Mixes and Grid. ESU-services Ltd., Uster, Switzerland.
- fraction, water, decarbonised, to air: 0.0251074 dimensionless; name fraction_WDC_to_air; = fraction_CW_to_air; lognormal variance with pedigree 0.092025, pedigree (4,4,3,2,4)
  Calculated value. See comments in the other parametres present in this dataset. Decarbonised water is considered to be always used as cooling water, thus cooling water fractions to air are applied to all carbonised water input flows to calculate the amount of water consumed in the processes.
- factor: input of MJ for the production of 1 kWh: 14.4 MJ/kWh; name factor_MJ_kWh; = 1*3.6/efficiency; lognormal variance with pedigree 0.0532, pedigree (4,4,3,4,4)
  Calculated value. 3.6 MJ = 1kWh.
- scaling factor: 0 dimensionless; name scaling_factor
- fraction, process water, to air: 0.15 dimensionless; name fraction_PW_to_air; lognormal variance with pedigree 0.092025, pedigree (4,4,3,2,4)
  Literature value. In case when no industry/process specific data are available, default evaporation fraction value is used. This value is 15% and is based on literature (Statistics Canada, 2007 & Shaffer, K.H., 2008, Consumptive water use in the Great Lakes Basin, USGS & Shiklomanov, 2003, World Water Resources at the Beginning of the 21st Century) and has been approved by an expert.
- fraction, cooling water, recirculating system, to air: 0 dimensionless
- fraction, water, completely softened, to air: 0.15 dimensionless; name fraction_WCS_to_air; = fraction_PW_to_air; lognormal variance with pedigree 0.092025, pedigree (4,4,3,2,4)
  Calculated value. See comment in the other parametres present in this dataset. Water, completely softened is considered to be always used as process water, thus process water fractions to air are applied to all water, completely softened input flows to calculate the amount of water consumed in the processes.
- once-through and cooling pond cooling systems as a fraction of all cooling syste: 0.73 dimensionless; name once_through_andCP_CS_fractio_from_allCS; lognormal variance with pedigree 0.092025, pedigree (4,4,3,2,4)
  (same comment as for recirculating cooling system as a fraction of all cooling systems)
- fraction, cooling water, to air: 0.0251074 dimensionless; name fraction_CW_to_air; = (WConsumption_EP_HC_recirculatingCS*recirculating_CS_fraction_from_allCS+WConsumption_EP_HC_once_through_andCP_CS*once_through_andCP_CS_fractio_from_allCS)/(WWithdrawal_EP_HC_recirculating_CS*recirculating_CS_fraction_from_allCS+WWithdrawal_EP_HC_once_through_andCP_CS*once_through_andCP_CS_fractio_from_allCS); lognormal variance with pedigree 0.092025, pedigree (4,4,3,2,4)
  Calculated

## Reference product
- electricity, high voltage: 1 kWh; By-product classification allocatable product; CPC 17100: Electrical energy
  production volume 2.125e8 kWh; name apv_electricity_lignite; = gross_electricity_2008*(1- gross_net_electricity)
    Calculated value
  property price 0.0977 EUR2005
    Temporary price data. Calculated as 90% of purchasers price based on: 94% of the average price (to account for a 6% loss in transformation and transmission) for electricity for industrial consumersin 2005 (excluded taxes). From IEA.

## Inputs from technosphere
- water, completely softened: 0.0864 kg; name water_completely_softened; = water_completely_softened_calc_prop_kg* factor_MJ_kWh; lognormal variance with pedigree 0.086, pedigree (4,5,5,5,3)
  Calculated value
  Uncertainty: e
  property calculation property, kg 0.006 kg; name water_completely_softened_calc_prop_kg
  properties: wet mass 1 kg
  note on calculation property, kg: Literature value/calculated value. Feed water for the steam circuit lost when burning 1MJ of lignite. Röder et al. 2007, Tab. 9.65 and Tab. 9.66, p. 160f.
- lignite: 1.5408 kg; = lignite_calc_prop_kg* factor_MJ_kWh; lognormal variance with pedigree 0.0426, pedigree (2,1,5,5,1)
  Calculated value. About 100% of the lignite is of domestic origin.
  Uncertainty: s
  property calculation property, kg 0.107 kg; name lignite_calc_prop_kg
  properties: wet mass 1 kg, water content 1.38095, dry mass 0.42 kg, heating value, net 8.8 MJ, carbon content, fossil 0.655
  note on calculation property, kg: Literature value/calculated value. Lignite mass needed for burning 1MJ of lignite. Weighted average with electricity production data (Itten&Frischknecht 2012) and values of 10 countries (AT, BA, CZ, DE, ES, FR, HU, PL, SI, SK) (Röder et al. 2007) Source: Itten R. and Frischknecht R. (2012) Life Cycle Inventories of Electricity Mixes and Grid. ESU-services Ltd., Uster, Switzerland.
  note on heating value, net: Based on literature, page 52, Dones R., Bauer C., Bolliger R., Burger B., Faist Emmenegger M., Frischknecht R., Heck T., Jungbluth N., Röder A., Tuchschmid M. (2007) Life Cycle Inventories of Energy Systems: Results for Current Systems in Switzerland and other UCTE Countries. ecoinvent report No. 5. Paul Scherrer Institut Villigen, Swiss Centre for Life Cycle Inventories, Dübendorf, CH.
  note on carbon content, fossil: C content of dry lignite is 58-73% (specified in Tab 1.1, report 6, part VI). A mean content of 0.655 kg C/kg dry lignite was considered.
- lignite ash: -0.21168 kg; name ash; = ( ash_calc_prop_kg* factor_MJ_kWh)*-1; source Röder, A. 2007, p. Tab. 9.69, p.165; lognormal variance with pedigree 0.112, pedigree (5,1,5,5,1)
  Calculated value. Lignite ash has often high content of sulfur (as Ca SO4), high content of free lime, and large variations in composition. It is therefore not suitable for recycling in cement production,
  Lignite ash can be backfilled in opencast lignite mines. In a global weighted average, about 6% of the ash are recycled (Weighted average with electricity production data (Itten&Frischknecht 2012) and ash recycling values of 12 countries (AT, BA, CZ, DE, ES, FR, HU, MK, PL, SI, SK) (Röder et al. 2007).
  Country ash values calculated from mass balance.
  Source:
  Itten R. and Frischknecht R. (2012) Life Cycle Inventories of Electricity Mixes and Grid. ESU-services Ltd., Uster, Switzerland.
  Uncertainty: c
  production volume 4.4982e7 kg; = apv_electricity_lignite* ash
    Calculated from the production volume of lignite, burned in power plant in proportion to the respective output amounts.
  property calculation property, kg 0.0147 kg; name ash_calc_prop_kg
  property price 0 EUR2005; name ash_price_EUR2005
  properties: dry mass 1 kg, wet mass 1 kg
  note on calculation property, kg: Literature value/calculated value. Ash remaining when burning 1MJ of lignite. Weighted average with electricity production data (Itten&Frischknecht 2012) and ash values 10 countries (AT, BA, CZ, DE, ES, FR, HU, PL, SI, SK). These values were valid for the ash being disposed off. Now, total amount of ash has been calculated (disposed+recycled) with the data in Tab. 9.69 p. 165 in Röder et al. 2007. Country ash values calculated from mass balance. Globally, 6% of the lignite ash are recycled, 94% go to disposal. Source: Itten R. and Frischknecht R. (2012) Life Cycle Inventories of Electricity Mixes and Grid. ESU-services Ltd., Uster, Switzerland.
- residue from cooling tower: -7.2e-5 kg; name cooling_tower_residue; = (cooling_tower_residue_calc_prop_kg* factor_MJ_kWh)*-1
  production volume 15300 kg; = apv_electricity_lignite * cooling_tower_residue
    Calculated from production volume of reference product using the relative outputs.
  property price 0 EUR2005; name cooling_tower_residue_price_EUR2005
  property calculation property, kg 5e-6 kg; name cooling_tower_residue_calc_prop_kg
  properties: water content 0.428571, wet mass 1 kg, dry mass 0.7 kg, carbon content, fossil 0.0544233
  note on calculation property, kg: Literature value/calculated value. Amount of resuidue from cooling tower in relation to burning 1MJ of lignite. Weighted average with electricity production data (Itten&Frischknecht 2012) and values of 10 countries (AT, BA, CZ, DE, ES, FR, HU, PL, SI, SK). Source: Itten R. and Frischknecht R. (2012) Life Cycle Inventories of Electricity Mixes and Grid. ESU-services Ltd., Uster, Switzerland.
- NOx retained, by selective catalytic reduction: 0 kg; name nox_retained; source Itten R. 2012
  No SCR installed
  property calculation property, kg 0 kg; name nox_retained_calc_prop_kg
  properties: wet mass 1 kg, dry mass 1 kg
  note on calculation property, kg: Literature value/calculated value. NOx retained when burning 1MJ of lignite. Weighted average with electricity production data (Itten&Frischknecht 2012) and values of 10 countries (AT, BA, CZ, DE, ES, FR, HU, PL, SI, SK) (R\xc3\xb6der et al. 2007) Source: Itten R. and Frischknecht R. (2012) Life Cycle Inventories of Electricity Mixes and Grid. ESU-services Ltd., Uster, Switzerland.
- petroleum coke: 0.0020016 kg; name petroleum_coke; = petroleum_coke_calc_prop_kg* factor_MJ_kWh; lognormal variance with pedigree 0.0426, pedigree (2,1,5,5,1)
  Calculated value
  Uncertainty: s
  property calculation property, kg 0.000139 kg; name petroleum_coke_calc_prop_kg
  properties: wet mass 1 kg, carbon content, fossil 0.885, heating value, net 35 MJ, dry mass 1 kg
  note on calculation property, kg: Literature value/calculated value. Petroleum coke use when burning 1MJ of lignite. Weighted average with electricity production data (Itten&Frischknecht 2012) and values of 10 countries (AT, BA, CZ, DE, ES, FR, HU, PL, SI, SK) (Röder et al. 2007) Source: Itten R. and Frischknecht R. (2012) Life Cycle Inventories of Electricity Mixes and Grid. ESU-services Ltd., Uster, Switzerland.
- water, decarbonised: 2.88 kg; name water_decarbonised_user; = water_decarbonised_user_calc_prop_kg* factor_MJ_kWh; lognormal variance with pedigree 0.086, pedigree (4,5,5,5,3)
  Calculated value
  Uncertainty: e
  property calculation property, kg 0.2 kg; name water_decarbonised_user_calc_prop_kg
  properties: wet mass 1 kg
  note on calculation property, kg: Literature value/calculated value. Cooling water, decarbonised, for the cooling water circuit lost when burning 1MJ of lignite. Röder et al. 2007, Tab. 9.65 and Tab. 9.66, p. 160f. These tables give an amount of 0.15 kg/MJ burned, which is valid for the assumption of 75% wet cooling and 25% run-through cooling. However, this revised dataset assumes 100% wet cooling.
- SOx retained, in lignite flue gas desulfurisation: 0.00301 kg; name sox_retained; source IEA 2012; lognormal variance with pedigree 0.0437, pedigree (3,2,5,1,2)
  Calculated value departing from the installed desulfurisation, its efficiency and the SO2 emitted in the air (see Technology Comment for details). According to R\xc3\xb6der et al. 2007, about 20-60% of the sulfur contained in the coal don\"t turn into SO2 but can be found in the ash. A factor of 40% is taken here for calculations.
  property calculation property, kg 0 kg; name sox_retained_calc_prop_kg
  properties: dry mass 1 kg, wet mass 1 kg
  note on calculation property, kg: Literature value/calculated value. SOx retained when burning 1MJ of lignite. Weighted average with electricity production data (Itten&Frischknecht 2012) and values of 10 countries (AT, BA, CZ, DE, ES, FR, HU, PL, SI, SK) (R\xc3\xb6der et al. 2007) Source: Itten R. and Frischknecht R. (2012) Life Cycle Inventories of Electricity Mixes and Grid. ESU-services Ltd., Uster, Switzerland.
- lignite power plant: 0 unit; name dummy123; source Röder, A. 2007, p. p.99
  Calculated value. At the moment, the lignite power plant input consists out of mix of a 100MWe power plant (30%) and a 500MWe power plant (70%).
  For this calculation, 6000 load hours per year are assumed. It is assumed that a total of 200"000h is reached during the lifetime. A capacity of 500MW is taken for the calculation.
- lignite power plant: 1e-11 unit; name lignite_power_plant; = 1/(200000*500*1000); source Röder, A. 2007, p. p.99; lognormal variance with pedigree 0.4006, pedigree (5,3,5,5,3)
  Calculated value. At the moment, the lignite power plant input consists out of mix of a 100MWe power plant (30%) and a 500MWe power plant (70%).
  For this calculation, 6000 load hours per year are assumed. It is assumed that a total of 200"000h is reached during the lifetime. A capacity of 500MW is taken for the calculation.
  Uncertainty: H

## Inputs from nature
- Water, cooling, unspecified natural origin [natural resource, in water]: 0.0750775 m3; name water_cooling_UNO_input; = ((recirculating_CS_fraction_from_allCS*WWithdrawal_EP_HC_recirculating_CS)+(once_through_andCP_CS_fractio_from_allCS*WWithdrawal_EP_HC_once_through_andCP_CS))/11.52*factor_MJ_kWh; lognormal variance with pedigree 0.130025, pedigree (4,4,5,2,4)
  Calculated based on literature data.

## Emissions to nature
- Vanadium [air, non-urban air or from high stacks]: 4.8528e-8 kg; name vanadium; = vanadium_calc_prop_kg* factor_MJ_kWh; lognormal variance with pedigree 0.772, pedigree (5,1,5,5,1)
  Calculated value
  Uncertainty: c
  property calculation property, kg 3.37e-9 kg; name vanadium_calc_prop_kg
- Ethane [air, non-urban air or from high stacks]: 5.904e-7 kg; name ethane; = ethane_calc_prop_kg* factor_MJ_kWh; lognormal variance with pedigree 0.112, pedigree (3,5,5,5,1)
  Calculated value
  Uncertainty: b
  property calculation property, kg 4.1e-8 kg; name ethane_calc_prop_kg
- Radium-226 [air, non-urban air or from high stacks]: 3.1104e-5 kBq; name radium_226; = radium_226_calc_prop_kBq* factor_MJ_kWh; lognormal variance with pedigree 0.422, pedigree (5,1,5,5,1)
  Calculated value
  Uncertainty: c
  property calculation property, kBq 2.16e-6 kBq; name radium_226_calc_prop_kBq
- Hydrocarbons, aliphatic, alkanes, unspecified [air, non-urban air or from high stacks]: 3.1536e-6 kg; name hydrocarbons_al_al_unspec; = hydrocarbons_al_al_unspec_calc_prop_kg* factor_MJ_kWh; lognormal variance with pedigree 0.112, pedigree (3,5,5,5,1)
  Calculated value
  Uncertainty: b
  property calculation property, kg 2.19e-7 kg; name hydrocarbons_al_al_unspec_calc_prop_kg
- Potassium-40 [air, non-urban air or from high stacks]: 4.176e-5 kBq; name potassium_40; = potassium_40_calc_prop_kBq* factor_MJ_kWh; lognormal variance with pedigree 0.422, pedigree (5,1,5,5,1)
  Calculated value
  Uncertainty: c
  property calculation property, kBq 2.9e-6 kBq; name potassium_40_calc_prop_kBq
- Toluene [air, non-urban air or from high stacks]: 1.5696e-6 kg; name toluene; = toluene_calc_prop_kg* factor_MJ_kWh; lognormal variance with pedigree 0.112, pedigree (3,5,5,5,1)
  Calculated value
  Uncertainty: b
  property calculation property, kg 1.09e-7 kg; name toluene_calc_prop_kg
- Dinitrogen monoxide [air, non-urban air or from high stacks]: 2.088e-5 kg; name dinitrogen_monoxide; = dinitrogen_monoxide_calc_prop_kg* factor_MJ_kWh; lognormal variance with pedigree 0.106, pedigree (3,4,5,5,1)
  Calculated value
  Uncertainty: b
  property calculation property, kg 1.45e-6 kg; name dinitrogen_monoxide_calc_prop_kg
- Lead [air, non-urban air or from high stacks]: 3.744e-8 kg; name lead; = lead_calc_prop_kg* factor_MJ_kWh; lognormal variance with pedigree 0.772, pedigree (5,1,5,5,1)
  Calculated value
  Uncertainty: c
  property calculation property, kg 2.6e-9 kg; name lead_calc_prop_kg
- Carbon dioxide, fossil [air, non-urban air or from high stacks]: 1.5408 kg; name carbon_dioxide_fossil; = carbon_dioxide_fossil_calc_prop_kg* factor_MJ_kWh; lognormal variance with pedigree 0.044, pedigree (3,1,5,5,1)
  Calculated value
  Uncertainty: b
  property calculation property, kg 0.107 kg; name carbon_dioxide_fossil_calc_prop_kg
- Lead-210 [air, non-urban air or from high stacks]: 0.000120528 kBq; name lead_210; = lead_210_calc_prop_kBq* factor_MJ_kWh; lognormal variance with pedigree 0.422, pedigree (5,1,5,5,1)
  Calculated value
  Uncertainty: c
  property calculation property, kBq 8.37e-6 kBq; name lead_210_calc_prop_kBq
- Hydrogen fluoride [air, non-urban air or from high stacks]: 1.944e-5 kg; name hydrogen_fluoride; = hydrogen_fluoride_calc_prop_kg* factor_MJ_kWh; lognormal variance with pedigree 0.242, pedigree (5,1,5,5,1)
  Calculated value
  Uncertainty: c
  property calculation property, kg 1.35e-6 kg; name hydrogen_fluoride_calc_prop_kg
- Antimony [air, non-urban air or from high stacks]: 7.5168e-9 kg; name antimony; = antimony_calc_prop_kg* factor_MJ_kWh; lognormal variance with pedigree 0.772, pedigree (5,1,5,5,1)
  Calculated value
  Uncertainty: c
  property calculation property, kg 5.22e-10 kg; name antimony_calc_prop_kg
- Boron [air, non-urban air or from high stacks]: 2.6928e-5 kg; name boron; = boron_calc_prop_kg* factor_MJ_kWh; lognormal variance with pedigree 0.772, pedigree (5,1,5,5,1)
  Calculated value
  Uncertainty: c
  property calculation property, kg 1.87e-6 kg; name boron_calc_prop_kg
- Sulfur dioxide [air, non-urban air or from high stacks]: 0.0133 kg; name sulfur_dioxide; source IEA 2012; lognormal variance with pedigree 0.0517, pedigree (3,3,5,3,3)
  Rough assumption. No data were available in the Power Database, so that the values for Russia were overtaken. These values are calculated values, based on the IEA Clean Coal Centre Coal Power Database
  Calculation was made with the content of SO2 in the flue gas (mg SO2/m3) and a flue gas volume factor (m3/GJ burned): 444m3/GJ burned (EEA 2008)
  EEA. 2008. Air pollution from electricity-generating large combustion plants. An assessment of the theoretical emission reduction of SO2 and Nox through implementation of BAT as set in the BREFs. European Environment Agency, Copenhagen. EEA Technical report No 4/2008, ISSN 1725-2237, ISBN 978-92-9167-355-1. Tab. B.6 p. 38
  Uncertainty: D
  property calculation property, kg 0 kg; name sulfur_dioxide_calc_prop_kg
- Carbon monoxide, fossil [air, non-urban air or from high stacks]: 0.000288 kg; name carbon_monoxide_fossil; = carbon_monoxide_fossil_calc_prop_kg* factor_MJ_kWh; lognormal variance with pedigree 0.706, pedigree (3,4,5,5,1)
  Calculated value
  Uncertainty: b
  property calculation property, kg 2e-5 kg; name carbon_monoxide_fossil_calc_prop_kg
- Pentane [air, non-urban air or from high stacks]: 2.1168e-6 kg; name pentane; = pentane_calc_prop_kg* factor_MJ_kWh; lognormal variance with pedigree 0.112, pedigree (3,5,5,5,1)
  Calculated value
  Uncertainty: b
  property calculation property, kg 1.47e-7 kg; name pentane_calc_prop_kg
- Cadmium [air, non-urban air or from high stacks]: 9.6768e-9 kg; name cadmium; = cadmium_calc_prop_kg* factor_MJ_kWh; lognormal variance with pedigree 0.772, pedigree (5,1,5,5,1)
  Calculated value
  Uncertainty: c
  property calculation property, kg 6.72e-10 kg; name cadmium_calc_prop_kg
- Particulates, < 2.5 um [air, non-urban air or from high stacks]: 0.00536 kg; name particulates_lt2_5; source Itten R. 2012; lognormal variance with pedigree 0.0987, pedigree (4,2,5,4,4)
  Calculated value. Based on the total particle emissions, global production-weighted average of ecoinvent version 2 countries.
  The shares of the three particulates classes are taken from Dones et al 2007, Tab. 9.39 p. 130 and amount to
  -\tparticulates >10um: 5%
  -\tparticulates 2.5-10 um: 10%
  -\tparticulates < 2.5 um: 85%
  Global total emissions without any particulate filter were calculated to amount to 207 g/kWh and were then figured together with the share of installed particle filter and efficiency of the filter (see technology comment for details).
  property calculation property, kg 0 kg; name particulates_lt2_5_calc_prop_kg
- Arsenic [air, non-urban air or from high stacks]: 4.2624e-8 kg; name arsenic; = arsenic_calc_prop_kg* factor_MJ_kWh; lognormal variance with pedigree 0.772, pedigree (5,1,5,5,1)
  Calculated value
  Uncertainty: c
  property calculation property, kg 2.96e-9 kg; name arsenic_calc_prop_kg
- Zinc [air, non-urban air or from high stacks]: 2.5056e-7 kg; name zinc; = zinc_calc_prop_kg* factor_MJ_kWh; lognormal variance with pedigree 0.772, pedigree (5,1,5,5,1)
  Calculated value
  Uncertainty: c
  property calculation property, kg 1.74e-8 kg; name zinc_calc_prop_kg
- Dioxins, measured as 2,3,7,8-tetrachlorodibenzo-p-dioxin [air, non-urban air or from high stacks]: 1.008e-13 kg; name dioxins; = dioxins_calc_prop_kg* factor_MJ_kWh; lognormal variance with pedigree 0.372, pedigree (3,5,5,5,1)
  Calculated value
  Uncertainty: b
  property calculation property, kg 7e-15 kg; name dioxins_calc_prop_kg
- Cobalt [air, non-urban air or from high stacks]: 7.7472e-9 kg; name cobalt; = cobalt_calc_prop_kg* factor_MJ_kWh; lognormal variance with pedigree 0.772, pedigree (5,1,5,5,1)
  Calculated value
  Uncertainty: c
  property calculation property, kg 5.38e-10 kg; name cobalt_calc_prop_kg
- Benzene [air, non-urban air or from high stacks]: 3.1248e-6 kg; name benzene; = benzene_calc_prop_kg* factor_MJ_kWh; lognormal variance with pedigree 0.112, pedigree (3,5,5,5,1)
  Calculated value
  Uncertainty: b
  property calculation property, kg 2.17e-7 kg; name benzene_calc_prop_kg
- Methane, fossil [air, non-urban air or from high stacks]: 1.44e-5 kg; name methane_fossil; = methane_fossil_calc_prop_kg* factor_MJ_kWh; lognormal variance with pedigree 0.106, pedigree (3,4,5,5,1)
  Calculated value
  Uncertainty: b
  property calculation property, kg 1e-6 kg; name methane_fossil_calc_prop_kg
- Mercury [air, non-urban air or from high stacks]: 7.7904e-8 kg; name mercury; = mercury_calc_prop_kg* factor_MJ_kWh; lognormal variance with pedigree 0.772, pedigree (5,1,5,5,1)
  Calculated value
  Uncertainty: c
  property calculation property, kg 5.41e-9 kg; name mercury_calc_prop_kg
- Uranium-238 [air, non-urban air or from high stacks]: 2.592e-5 kBq; name uranium_238; = uranium_238_calc_prop_kBq* factor_MJ_kWh; lognormal variance with pedigree 0.422, pedigree (5,1,5,5,1)
  Calculated value
  Uncertainty: c
  property calculation property, kBq 1.8e-6 kBq; name uranium_238_calc_prop_kBq
- Particulates, > 2.5 um, and < 10um [air, non-urban air or from high stacks]: 0.000631 kg; name particulates_2_5_to_10; source Itten R. 2012; lognormal variance with pedigree 0.0987, pedigree (4,2,5,4,4)
  (same comment as for Particulates, < 2.5 um)
  property calculation property, kg 0 kg; name particulates_2_5_to_10_calc_prop_kg
- Strontium [air, non-urban air or from high stacks]: 1.9728e-7 kg; name strontium; = strontium_calc_prop_kg* factor_MJ_kWh; lognormal variance with pedigree 0.772, pedigree (5,1,5,5,1)
  Calculated value
  Uncertainty: c
  property calculation property, kg 1.37e-8 kg; name strontium_calc_prop_kg
- Hydrocarbons, aliphatic, unsaturated [air, non-urban air or from high stacks]: 3.1104e-6 kg; name hydrocarbons_aliphatic_unsaturated; = hydrocarbons_aliphatic_un_calc_prop_kg_0* factor_MJ_kWh; lognormal variance with pedigree 0.112, pedigree (3,5,5,5,1)
  Calculated value
  Uncertainty: b
  property calculation property, kg 2.16e-7 kg; name hydrocarbons_aliphatic_un_calc_prop_kg_0
- Copper [air, non-urban air or from high stacks]: 1.0656e-7 kg; name copper; = copper_calc_prop_kg* factor_MJ_kWh; lognormal variance with pedigree 0.772, pedigree (5,1,5,5,1)
  Calculated value
  Uncertainty: c
  property calculation property, kg 7.4e-9 kg; name copper_calc_prop_kg
- PAH, polycyclic aromatic hydrocarbons [air, non-urban air or from high stacks]: 1.44e-8 kg; name pah; = pah_calc_prop_kg* factor_MJ_kWh; lognormal variance with pedigree 0.372, pedigree (3,5,5,5,1)
  Calculated value
  Uncertainty: b
  property calculation property, kg 1e-9 kg; name pah_calc_prop_kg
- Water [air, unspecified]: 0.00197027 m3; name water_to_air_unspecified; = (water_completely_softened/1000)*fraction_WCS_to_air+(water_decarbonised_user/1000)*fraction_WDC_to_air+water_cooling_UNO_input*fraction_CW_to_air; lognormal variance with pedigree 0.130025, pedigree (4,4,5,2,4)
  Calculated value based on literature values and expert opinion. See comments in the parametres" comment field.
  property fraction, origin: fresh water 0.043278; name fraction_origin_fresh_water
  property fraction, origin: unspecified 0.956722; name fraction_origin_unspecified
  property fraction, origin: salt water 0; name fraction_origin_salt_water
- Nickel [air, non-urban air or from high stacks]: 1.4688e-7 kg; name nickel; = nickel_calc_prop_kg* factor_MJ_kWh; lognormal variance with pedigree 0.772, pedigree (5,1,5,5,1)
  Calculated value
  Uncertainty: c
  property calculation property, kg 1.02e-8 kg; name nickel_calc_prop_kg
- Thorium-228 [air, non-urban air or from high stacks]: 1.00368e-5 kBq; name thorium_228; = thorium_228_calc_prop_kBq* factor_MJ_kWh; lognormal variance with pedigree 0.422, pedigree (5,1,5,5,1)
  Calculated value
  Uncertainty: c
  property calculation property, kBq 6.97e-7 kBq; name thorium_228_calc_prop_kBq
- Bromine [air, non-urban air or from high stacks]: 9.5184e-7 kg; name bromine; = bromine_calc_prop_kg* factor_MJ_kWh; lognormal variance with pedigree 0.242, pedigree (5,1,5,5,1)
  Calculated value
  Uncertainty: c
  property calculation property, kg 6.61e-8 kg; name bromine_calc_prop_kg
- Propene [air, non-urban air or from high stacks]: 2.304e-7 kg; name propene; = propene_calc_prop_kg* factor_MJ_kWh; lognormal variance with pedigree 0.112, pedigree (3,5,5,5,1)
  Calculated value
  Uncertainty: b
  property calculation property, kg 1.6e-8 kg; name propene_calc_prop_kg
- Radium-228 [air, non-urban air or from high stacks]: 1.8576e-5 kBq; name radium_228; = radium_228_calc_prop_kBq* factor_MJ_kWh; lognormal variance with pedigree 0.422, pedigree (5,1,5,5,1)
  Calculated value
  Uncertainty: c
  property calculation property, kBq 1.29e-6 kBq; name radium_228_calc_prop_kBq
- Nitrogen oxides [air, non-urban air or from high stacks]: 0.00463 kg; name nitrogen_oxides; source IEA 2012; lognormal variance with pedigree 0.22, pedigree (5,5,5,5,5)
  Rough assumption. Figure overtaken from Russia
  Uncertainty: D
  property calculation property, kg 0 kg; name nitrogen_oxides_calc_prop_kg
- Chromium [air, non-urban air or from high stacks]: 3.8304e-8 kg; name chromium; = chromium_calc_prop_kg* factor_MJ_kWh; lognormal variance with pedigree 0.772, pedigree (5,1,5,5,1)
  Calculated value
  Uncertainty: c
  property calculation property, kg 2.66e-9 kg; name chromium_calc_prop_kg
- Manganese [air, non-urban air or from high stacks]: 1.21824e-7 kg; name manganese; = manganese_calc_prop_kg* factor_MJ_kWh; lognormal variance with pedigree 0.772, pedigree (5,1,5,5,1)
  Calculated value
  Uncertainty: c
  property calculation property, kg 8.46e-9 kg; name manganese_calc_prop_kg
- Molybdenum [air, non-urban air or from high stacks]: 2.3184e-8 kg; name molybdenum; = molybdenum_calc_prop_kg* factor_MJ_kWh; lognormal variance with pedigree 0.772, pedigree (5,1,5,5,1)
  Calculated value
  Uncertainty: c
  property calculation property, kg 1.61e-9 kg; name molybdenum_calc_prop_kg
- Thorium-232 [air, non-urban air or from high stacks]: 1.584e-5 kBq; name thorium_232; = thorium_232_calc_prop_kBq* factor_MJ_kWh; lognormal variance with pedigree 0.422, pedigree (5,1,5,5,1)
  Calculated value
  Uncertainty: c
  property calculation property, kBq 1.1e-6 kBq; name thorium_232_calc_prop_kBq
- Formaldehyde [air, non-urban air or from high stacks]: 8.352e-7 kg; name formaldehyde; = formaldehyde_calc_prop_kg* factor_MJ_kWh; lognormal variance with pedigree 0.112, pedigree (3,5,5,5,1)
  Calculated value
  Uncertainty: b
  property calculation property, kg 5.8e-8 kg; name formaldehyde_calc_prop_kg
- Propane [air, non-urban air or from high stacks]: 5.04e-7 kg; name propane; = propane_calc_prop_kg* factor_MJ_kWh; lognormal variance with pedigree 0.112, pedigree (3,5,5,5,1)
  Calculated value
  Uncertainty: b
  property calculation property, kg 3.5e-8 kg; name propane_calc_prop_kg
- Selenium [air, non-urban air or from high stacks]: 1.7712e-7 kg; name selenium; = selenium_calc_prop_kg* factor_MJ_kWh; lognormal variance with pedigree 0.772, pedigree (5,1,5,5,1)
  Calculated value
  Uncertainty: c
  property calculation property, kg 1.23e-8 kg; name selenium_calc_prop_kg
- Iodine [air, non-urban air or from high stacks]: 6.912e-7 kg; name iodine; = iodine_calc_prop_kg* factor_MJ_kWh; lognormal variance with pedigree 0.242, pedigree (5,1,5,5,1)
  Calculated value
  Uncertainty: c
  property calculation property, kg 4.8e-8 kg; name iodine_calc_prop_kg
- Radon-220 [air, non-urban air or from high stacks]: 0.0018288 kBq; name radon_220; = radon_220_calc_prop_kBq* factor_MJ_kWh; lognormal variance with pedigree 0.422, pedigree (5,1,5,5,1)
  Calculated value
  Uncertainty: c
  property calculation property, kBq 0.000127 kBq; name radon_220_calc_prop_kBq
- Butane [air, non-urban air or from high stacks]: 2.736e-7 kg; name butane; = butane_calc_prop_kg* factor_MJ_kWh; lognormal variance with pedigree 0.112, pedigree (3,5,5,5,1)
  Calculated value
  Uncertainty: b
  property calculation property, kg 1.9e-8 kg; name butane_calc_prop_kg
- Particulates, > 10 um [air, non-urban air or from high stacks]: 0.000316 kg; name particulates_gt10; source Itten R. 2012; lognormal variance with pedigree 0.0987, pedigree (4,2,5,4,4)
  (same comment as for Particulates, < 2.5 um)
  property calculation property, kg 0 kg; name particulates_gt10_calc_prop_kg
- Barium [air, non-urban air or from high stacks]: 2.232e-7 kg; name barium; = barium_calc_prop_kg* factor_MJ_kWh; lognormal variance with pedigree 0.772, pedigree (5,1,5,5,1)
  Calculated value
  Uncertainty: c
  property calculation property, kg 1.55e-8 kg; name barium_calc_prop_kg
- Benzo(a)pyrene [air, non-urban air or from high stacks]: 2.88e-12 kg; name benzo_a_pyrene; = benzo_a_pyrene_calc_prop_kg* factor_MJ_kWh; lognormal variance with pedigree 0.112, pedigree (3,5,5,5,1)
  Calculated value
  Uncertainty: b
  property calculation property, kg 2e-13 kg; name benzo_a_pyrene_calc_prop_kg
- Water [water, unspecified]: 0.0760736 m3; name water_to_water_unspecified; = (water_completely_softened/1000)*(1-fraction_WCS_to_air)+(water_decarbonised_user/1000)*(1-fraction_WDC_to_air)+water_cooling_UNO_input*(1-fraction_CW_to_air); lognormal variance with pedigree 0.130025, pedigree (4,4,5,2,4)
  (same comment as for Water)
  property fraction, origin: salt water 0; name fraction_origin_salt_water_Ww
  property fraction, origin: unspecified 0.962127; name fraction_origin_unspecified_Ww
  property fraction, origin: fresh water 0.0378729; name fraction_origin_fresh_water_Ww
- Radon-222 [air, non-urban air or from high stacks]: 0.00324 kBq; name radon_222; = radon_222_calc_prop_kBq* factor_MJ_kWh; lognormal variance with pedigree 0.422, pedigree (5,1,5,5,1)
  Calculated value
  Uncertainty: c
  property calculation property, kBq 0.000225 kBq; name radon_222_calc_prop_kBq
- Xylene [air, non-urban air or from high stacks]: 1.32768e-5 kg; name xylene; = xylene_calc_prop_kg* factor_MJ_kWh; lognormal variance with pedigree 0.112, pedigree (3,5,5,5,1)
  Calculated value
  Uncertainty: b
  property calculation property, kg 9.22e-7 kg; name xylene_calc_prop_kg
- Chromium VI [air, non-urban air or from high stacks]: 4.6224e-9 kg; name chromium_vi; = chromium_vi_calc_prop_kg* factor_MJ_kWh; lognormal variance with pedigree 0.522, pedigree (1,1,5,5,1)
  Calculated value
  property calculation property, kg 3.21e-10 kg; name chromium_vi_calc_prop_kg
- Polonium-210 [air, non-urban air or from high stacks]: 0.00022032 kBq; name polonium_210; = polonium_210_calc_prop_kBq* factor_MJ_kWh; lognormal variance with pedigree 0.422, pedigree (5,1,5,5,1)
  Calculated value
  Uncertainty: c
  property calculation property, kBq 1.53e-5 kBq; name polonium_210_calc_prop_kBq
- Hydrogen chloride [air, non-urban air or from high stacks]: 8.136e-5 kg; name hydrogen_chloride; = hydrogen_chloride_calc_prop_kg* factor_MJ_kWh; lognormal variance with pedigree 0.242, pedigree (5,1,5,5,1)
  Calculated value
  Uncertainty: c
  property calculation property, kg 5.65e-6 kg; name hydrogen_chloride_calc_prop_kg

## Sampling procedure
literature and statistics

## Extrapolations
This dataset has been extrapolated from year 2008 to the year of the calculation (2021). The uncertainty has been adjusted accordingly.

## Review by Carl Vadenbo 2012-06-07
The dataset were found to meet the quality guidelines for the ecoinvent database on 2012-06-28.

Due to the complexity and the importance to the concerned inventories, it is recommended that the general procedure for deriving the efficiency of electricity production and the emissions of SO2,NOx, and particulate matter is described in more detail on the editorial talk pages. It would also be relevant to indicate the quality of the underlying data, e.g. whether reported values from a subset of the existing plants have been extrapolated to represent the national average.
Furthermore, it should be noticed that the emission factors (besides SO2, NOx and particulate matter) were based on an production-volume weighted average of 10 nations from ecoinvent v2.2. It is recommended that these emission factors are revised and updated with country-specific data in future revisions of the inventory.

## Review by Emilia Moreno Ruiz 2014-03-31
water flows updated
