# acrylic acid production

Dataset: EcoSpold 2, unit process
Geography: RoW
Time period: 2000-01-01 to 2021-12-31
Technology level: current
Classification: ISIC rev.4 ecoinvent: 2011:Manufacture of basic chemicals
Synonyms: Acroleic acid; 2-Propenoic acid; 79-10-7; Propenoic acid; Propene acid
Scenario: Business-as-Usual
System model: Allocation, cut-off by classification
Generated by: Roland Hischier
Published in: Althaus H.-J. 2007
Database: ecoinvent
isCopyrightProtected: true
accessRestrictedTo: 1

## General comment
This dataset represents the production of 1 kg of liquid acrylic acid. Acrylic acid is a colourless, slightly water soluble liquid with an acrid odour. It belongs to the carboxylic acids. The acid may be transported stabilised with inhibitors (such as hydroquinone derivatives) to prevent polymerisation. Functionally, acrylic acid may be regarded as a derivative of ethylene in which one hydrogen atom has been replaced with a carboxyl group, although this is not the basis of its synthesis. The chemical and physical properties of the polymers can be modified through controlled variation in the selection and balance of the monomers, the extent of cross-linking and molecular mass. This flexibility is complemented by high resistance to chemical and environmental degradation, strength, clarity, and being readily available in high purity forms (Ohara et al. 2011).
Acrylic acid is a versatile chemical that can be esterified, aminated or otherwise modified and polymerised to complex molecular arrangements to suit requirements. This characteristic enables a broad range of reactions for providing performance characteristics to a range of polymers. The esters are produced by reacting acrylic acid with alcohols especially ethanol, methanol and butanol that may be saponified, converted to other esters or amides by aminolysis. Acrylates are derivatives of acrylic acid (such as methyl and ethyl acrylate) whose properties have been sufficiently modified to enable of acrylic acid to be used in different media as emulsion and solution polymers. As emulsions, these products may be used as coatings, finishes and binders leading to applications in paints, adhesives, and polishes with solutions used for industrial coatings. Two-third of the world's production of acrylic acid is used to produce acrylic esters (acrylates) primarily for use in emulsions and solution polymers for latex-based paints, coatings, adhesives and textiles. Polymers of acrylic acid can be produced as superabsorbent materials (e.g. for dipers), and soluble as a replacement for phosphates in detergents. Both of these represent fast growing applications for acrylic acid. The chemical and physical properties of the polymers can be modified through controlled variation in the selection and balance of the monomers, the extent of cross-linking and molecular mass. This flexibility is complemented by high resistance to chemical and environmental degradation, strength, clarity, and being readily available in high purity forms.
Acrylic acid is produced mainly by the oxidation of propylene, using either a single-step or two-step process. This dataset models the production of acrylic acid using the two-step propylene oxidation process. The data is mainly based on two general reports about the theoretical production of acrylic acid. The electricity consumption and water exchanges are approximated based on data from a large chemical plant (Gendorf 2016).
References:
Gendorf (2016) Umwelterklärung 2015, Werk Gendorf Industriepark, www.gendorf.de.
Ohara, T., Sato, T., Shimizu, N., Prescher, G., Schwind, H., Weiberg, O., Marten, K. and Greim, H. 2011. Acrylic Acid and Derivatives. Ullmann's Encyclopedia of Industrial Chemistry.
Althaus H.-J., Chudacoff M., Hischier R., Jungbluth N., Osses M. and Primas A. (2007) Life Cycle Inventories of Chemicals. ecoinvent report No. 8, v2.0. EMPA Dübendorf, Swiss Centre for Life Cycle Inventories, Dübendorf, CH.

## Included activities start
The activity starts when the raw materials enter the process.

## Included activities end
This activity ends with the production of 1 kg of acrylic acid. The dataset includes the processing of the raw materials and chemicals used for production, as well as emissions to air and water. Solid wastes are omitted.

## Geography
Some of the data are from Australia and the USA. Some values are based on data from a large chemical factory located in Germany. These are assumed to be valid for this geography.

## Technology
Most of the commercial acrylic acid is manufactured by the oxidation of propylene.
Two production processes can be distiguished:
- Single-step propylene oxidation: The yield in the single-step process is at best approximately 50-60%. Another drawback is the limited lifetime of the catalyst, which is a multicomponent system composed of polyvalent oxides with molybdenum oxide as main component and tellurium oxide as promotor. The disadvantages of this process lead to the development of the two-step process.
CH2=CHCH3 (propylene) + 3/2 O2 → CH2=CHCO2H (acrylic acid) + H2O (1.1)
- Two-step propylene oxidation: The limited life of the catalyst has promoted a two stage manufacturing process via acrolein using two catalysts. The first stage is the oxidation of propylene to acrolein using a bismuth molybdate catalyst in a strongly exothermic reaction (at about 370°C). In the second stage, the acrolein gas is passed over a molybdenum vanadium oxide catalyst that is also exothermic (at about 270°C - about 100°C cooler than the first stage). The crude acrylic acid is then cooled to about 80°C, absorbed in water (30 to 60% concentration) and extracted with organic solvent or water (depending on the concentration).
CH2=CHCH3 (propylene) + O2 → CH2=CHCHO (acrolein) + H2O (1.2)
CH2=CHCHO + 1/2 O2 → CH2=CHCO2H (acrylic acid) (1.3)
In a subsequent step, acrylic acid is separated from the large volume of water present in the absorber effluent. This purification runs either by distillation from the solvent or by removing from water with added inhibitors to minimise the formation of polymers. Conversion rates of up to 90% are achievable at commercial scales of production depending on technology, catalysts and conditions.
The inventory in this dataset models the production of acrylic acid from propylene by the two-step oxidation process with a process yield of 90%. The data is based on two general reports about the theoretical production of acrylic acid.
References:
Ohara, T., Sato, T., Shimizu, N., Prescher, G., Schwind, H., Weiberg, O., Marten, K. and Greim, H. 2011. Acrylic Acid and Derivatives. Ullmann's Encyclopedia of Industrial Chemistry.
Althaus H.-J., Chudacoff M., Hischier R., Jungbluth N., Osses M. and Primas A. (2007) Life Cycle Inventories of Chemicals. ecoinvent report No. 8, v2.0. EMPA Dübendorf, Swiss Centre for Life Cycle Inventories, Dübendorf, CH.

## Time period
The data in this dataset come from different years, but overall form the most realistic picture of the production. Some values are based on data published by the Gendorf factory that were collected between 2011 and 2015. The time period has been adjusted accordingly. For more details, see the comments of the exchanges.

## Reference product
- acrylic acid: 1 kg; name RP; By-product classification allocatable product; CPC 34120: Industrial monocarboxylic fatty acids; acid oils from refining; CAS 79-10-7
  Acrylic acid is a colourless, slightly water soluble liquid with an acrid odour. It belongs to the carboxylic acids. Acrylic acid is a versatile chemical that can be esterified, aminated or otherwise modified and polymerised to complex molecular arrangements to suit requirements. This characteristic enables a broad range of reactions for providing performance characteristics to a range of polymers. The esters are produced by reacting acrylic acid with alcohols especially ethanol, methanol and butanol that may be saponified, converted to other esters or amides by aminolysis. Acrylates are derivatives of acrylic acid (such as methyl and ethyl acrylate) whose properties have been sufficiently modified to enable of acrylic acid to be used in different media as emulsion and solution polymers. As emulsions, these products may be used as coatings, finishes and binders leading to applications in paints, adhesives, and polishes with solutions used for industrial coatings. Two-third of the world's production of acrylic acid is used to produce acrylic esters (acrylates) primarily for use in emulsions and solution polymers for latex-based paints, coatings, adhesives and textiles. Polymers of acrylic acid can be produced as superabsorbent materials (e.g. for dipers), and soluble as a replacement for phosphates in detergents. Both of these represent fast growing applications for acrylic acid. The chemical and physical properties of the polymers can be modified through controlled variation in the selection and balance of the monomers, the extent of cross-linking and molecular mass. This flexibility is complemented by high resistance to chemical and environmental degradation, strength, clarity, and being readily available in high purity forms.
  production volume 3.03816e9 kg; name RP_PV
    Estimated value. The global production volume is extrapolated from the European production volume based on reports from Cefic (European Chemical Industry Council), and the American Chemistry Council.
    According to Cefic (2016) the Global sales of chemicals in the year 2015 was 3 534 billion euros. The reported share of sales per regions are: EU28 14.7%; Other Europe (Switzerland, Norway, Turkey, Russia and Ukraine) 2.7%; NAFTA (US, Canada and Mexico) 16.5%; Latin America 3.8%; China 39.9%; Japan 3.9%; Republic of Korea 3.2%; India 2.2%; Rest of Asia 11.9%; Rest of the World 1.3%. Cefic also reports the US total sales, 518.7 billion euros of the global 3 534 billion euros (14.7%). The same share is reported from the American Chemistry Council (2016), according to this source the USA sales account for 15% of global sales for the year 2016.
    According to Ullmann's Encyclopedia of Industrial Chemistry the acrylic acid production for Western Europe in year 1994 was 640000000 kg. Since no data were found for the global production this value was scaled accordingly.
    Reference(s):
    Cefic 2016. Facts and figures 2016 of the European chemical industry. Accessible at: http://www.cefic.org/Facts-and-Figures/Chemicals-Industry-Profile/
    American Chemistry Council 2016. Outlook: U.S. Chemical Industry Continues to Outpace Industrial Output; Accounts for More Than One-Half of Construction Spending by Manufacturing Sector. Accessible at: https://www.americanchemistry.com/Media/PressReleasesTranscripts/ACC-news-releases/US-Chemical-Industry-Continues-to-Outpace-Industrial-Output.html
    Ohara, T., Sato, T., Shimizu, N., Prescher, G., Schwind, H., Weiberg, O., Marten, K. and Greim, H. 2011. Acrylic Acid and Derivatives. Ullmann's Encyclopedia of Industrial Chemistry.
  property price 1.2 EUR2005
    Calculated value based on data from United Nations Commodity Trade Statistics Database (comtrade.un.org). UN comtrade category: 291611 Acrylic acid, salts. Year 2005. Using exchange rate of 1EURO = 1.209 USD. Average of price of import into 5 main markets (EU, US, JP, IN and CN).
  property heating value, net 21.88 MJ
    LHV is calculated based on the elemental composition of the substance. Based on the CAS number of the substance (000079-10-7), the chemical formula of the substance is found to be: C3H4O2, (PubChem 2020).
    Reference: Kim, S., Chen, J., Cheng, T., Gindulyte, A., He, J., He, S., Li, Q., Shoemaker, B. A., Thiessen, P. A., Yu, B., Zaslavsky, L., Zhang, J., & Bolton, E. E. (2019). PubChem 2019 update: improved access to chemical data. Nucleic acids research, 47(D1), D1102–D1109. https://doi.org/10.1093/nar/gky1033
  property carbon content 0.5
    carbon content on a dry matter basis (reserved; not for manual entry)
  properties: water content 0, wet mass 1 kg, water in wet mass 0 kg, carbon content, non-fossil 0, dry mass 1 kg, carbon content, fossil 0.5, carbon allocation 0.5 kg

## Inputs from technosphere
- heat, district or industrial, natural gas: 0 MJ; pedigree (1,1,1,1,1)
  Data from 1 Australian source.
  Uncertainty: d
  properties: heating value, net 1 MJ
- propylene: 0 kg; pedigree (1,1,1,1,1)
  Estimated value based on expert judgement.
  properties: carbon content, fossil 0.857143, dry mass 1 kg, heating value, net 43.22 MJ, wet mass 1 kg
- chemical factory, organics: 4e-10 unit; lognormal variance with pedigree 0.31, pedigree (2,3,2,4,3)
  Calculated based on literature data published by the industry. For this activity, no information was readily available concerning infrastructure and land-use. Therefore, the infrastructure is estimated based on data from two chemical factories, the BASF site of Ludwigshafen and the chemical factory in Gendorf (which are both located in Germany), which produce a wide range of chemical substances. Based on this data, the following assumptions are made: the built area amounts to about 4.2 ha, the plant has an average output of 50'000 t/a and a lifespan of fifty years. The estimated infrastructure amount is therefore 4.00 E-10 units per kg of produced chemical.
  References:
  Althaus H.-J., Chudacoff M., Hischier R., Jungbluth N., Osses M. and Primas A. (2007) Life Cycle Inventories of Chemicals. ecoinvent report No. 8, v2.0. EMPA Dübendorf, Swiss Centre for Life Cycle Inventories, Dübendorf, CH.
  Gendorf (2000) Umwelterklärung 2000, Werk Gendorf. Werk Gendorf, Burgkirchen.
- ethyl acetate: 0.01 kg; lognormal variance with pedigree 0.042, pedigree (3,5,3,5,3)
  Data from 1 Australian source.
  Uncertainty: d
  properties: heating value, net 31.32 MJ, wet mass 1 kg, carbon content, fossil 0.545455, dry mass 1 kg
- nitrogen, liquid: 0.019 kg; lognormal variance with pedigree 0.0106, pedigree (2,3,2,4,3)
  Calculated based on literature data published by the industry. This value is a 5-year average of data (2011 - 2015) published by the Gendorf factory (Gendorf, 2016, Umwelterklärung, www.gendorf.de), (Gendorf, 2015, Umwelterklärung, www.gendorf.de), (Gendorf, 2014, Umwelterklärung, www.gendorf.de). The amount of nitrogen used per kg of chemical substance produced is calculated using literature data published by the Gendorf factory based in Germany, which produces a wide range of chemical substances. The factory produced 1657400 tonnes of chemical substances in the year 2015 (Gendorf, 2016, Umwelterklärung, www.gendorf.de) and 740000 tonnes of intermediate products. The reported amount of nitrogen used in 2015 was 33512400 Nm3 (Gendorf, 2016, Umwelterklärung, www.gendorf.de). One Nm3 of nitrogen is equal to 1.2506 kg. The resulting amount of nitrogen - the 5-year average (2011 - 2015, weighted by production volume) is 0.019 kg/kg. Nitrogen is mainly used during the production of chemicals for 'blanketing', which is the process of applying gas to the vapour space of a container or vessel in order to control its composition.
  properties: wet mass 1 kg, dry mass 1 kg
- wastewater, average: -2.7e-6 m3; name BP_wastewater_average; lognormal variance with pedigree 0.0106, pedigree (2,3,2,4,3)
  Calculated based on literature data published by the industry. This value is a 5-year average of data (2011 - 2015) published by the Gendorf factory (Gendorf, 2016, Umwelterklärung, www.gendorf.de), (Gendorf, 2015, Umwelterklärung, www.gendorf.de), (Gendorf, 2014, Umwelterklärung, www.gendorf.de). The amount of wastewater (which is later on treated in the municipal WWTP) per kg of chemical substance produced is calculated using literature data published by the Gendorf factory based in Germany, which produces a wide range of chemical substances. The factory produced 1657400 tonnes of chemical substances in the year 2015 (Gendorf, 2016, Umwelterklärung, www.gendorf.de) and 740000 tonnes of intermediate products. The amount of wastewater which is later on treated in the municipal WWTP in the year 2015 was 1200 tonnes (Gendorf, 2016, Umwelterklärung, www.gendorf.de). The resulting amount of wastewater is 2.7E-06 m3/kg of chemical product produced.
  production volume 8203.03 m3; = RP_PV*BP_wastewater_average/ABS(RP)
    Calculated from the production volume of acrylic acid in proportion to the respective output amounts.
  property price 0 EUR2005; name BP_wastewater_average_price_EUR2005
  properties: water content 2882.2, carbon content, non-fossil 0.194039, dry mass 0.346837 kg, wet mass 1000 kg
  note on carbon content, non-fossil: 0.0673 kg TOC/m3 (Tab A.17, ecoinvent v2.2 report 13_I). TOC was considered as Total Carbon.
- electricity, medium voltage: 0 kWh; pedigree (1,1,1,1,1)
  Calculated based on literature data published by the industry. This value is a 5-year average of data (2011 - 2015) published by the Gendorf factory (Gendorf, 2016, Umwelterklärung, www.gendorf.de), (Gendorf, 2015, Umwelterklärung, www.gendorf.de), (Gendorf, 2014, Umwelterklärung, www.gendorf.de). The amount of electricity per kg of chemical substance produced is calculated using literature data published by the Gendorf factory based in Germany, which produces a wide range of chemical substances. The factory produced 1657400 tonnes of chemical substances in the year 2015 (Gendorf, 2016, Umwelterklärung, www.gendorf.de) and 740000 tonnes of intermediate products. The amount of electricity consumed in the year 2015 was 3498800 GJ (Gendorf, 2016, Umwelterklärung, www.gendorf.de). The resulting amount of electricity is 0.406 kWh/kg (year 2015) of chemical substance produced. The 5-year average (2011 - 2015, weighted by production volume) is 0.416 kWh/kg (1.5 MJ/kg). Cross-reference: the amount of chemicals produced (excluding intermediate products) in the EU-28 in the year 2011 was 327 million tonnes (Eurostat, http://ec.europa.eu/eurostat/statistics-explained/index.php/Chemicals_production_statistics, accessed 20170126). The chemical and petrochemical industry sector consumed 2.33 EJ of energy in 2011 (European Commission - Joint Research Centre, 2014, BAT on Common Waste water and Waste Gas Treatment/Management Systems in the Chemical Sector). The resulting energy (both heat and electricity) consumed per kg of chemicals produced in 2011 is thus 7.13 MJ/kg. This is higher than the value calculated using data published by Gendorf – 3.85 MJ/kg, but that is to be expected as the intermediate products are not accounted for.
- hydroquinone: 0.002 kg; lognormal variance with pedigree 0.042, pedigree (3,5,3,5,3)
  Data from 1 Australian source.
  Uncertainty: d
  properties: wet mass 1 kg, carbon content, fossil 0.654476, dry mass 1 kg, heating value, net 26.43 MJ
- tap water: 0 kg; pedigree (1,1,1,1,1)
  Calculated based on literature data published by the industry. This value is a 5-year average of data (2011 - 2015) published by the Gendorf factory (Gendorf, 2016, Umwelterklärung, www.gendorf.de), (Gendorf, 2015, Umwelterklärung, www.gendorf.de), (Gendorf, 2014, Umwelterklärung, www.gendorf.de). The amount of tap water per kg of chemical substance produced is calculated using literature data published by the Gendorf factory based in Germany, which produces a wide range of chemical substances. The factory produced 1657400 tonnes of chemical substances in the year 2015 (Gendorf, 2016, Umwelterklärung, www.gendorf.de) and 740000 tonnes of intermediate products. The amount of tap water consumed in the year 2015 was 55100 tonnes (Gendorf, 2016, Umwelterklärung, www.gendorf.de). The resulting amount of tap water is 0.023 kg/kg of chemical product produced. The 5-year average (2011 - 2015, weighted by production volume) is 0.026 kg/kg.
  properties: wet mass 1 kg, dry mass 0.000337476 kg, water content 2962.17, carbon content, fossil 0.00178991
  note on carbon content, fossil: Bicarbonate content is 2.93 mol/m3. CO2 content is 0.1 mol/m3 (ecoinvent v2.2 report 8, Tab 93.1).
- chemical, inorganic: 0.0003 kg; lognormal variance with pedigree 0.042, pedigree (3,5,3,5,3)
  Data from 1 Australian source.
  Uncertainty: d
  properties: carbon content, fossil 0.003, wet mass 1 kg, dry mass 1 kg
  note on carbon content, fossil: This dataset is an unweighted average of 20 inorganic substances (listed in Tab 88.1, ecoinvent v2.2 report 8, part II), being part of the top100 chemicals included in this database. The C-content has also been calculated as an unweighted average of the C content of the substances composing this dataset.
- heat, district or industrial, natural gas: 0.00331643, 0.215184 MJ (2 entries); lognormal variance with pedigree 0.042, pedigree (3,5,3,5,3)
  Data from 1 Australian source.
  Uncertainty: d
- propylene: 0.0118398, 0.61816 kg (2 entries); lognormal variance with pedigree 0.1786, pedigree (4,5,5,5,5)
  Estimated value based on expert judgement.
- electricity, medium voltage: 0.00524376, 0.00100553, 0.0168807, 0.245515, 0.0346054, 0.11275 kWh (6 entries); lognormal variance with pedigree 0.0106, pedigree (2,3,2,4,3)
  (same comment as for electricity, medium voltage)
- tap water: 0.000404717, 4.8717e-5, 8.05128e-5, 0.00203022, 5.28156e-5, 0.000150233, 0.0232328 kg (7 entries); lognormal variance with pedigree 0.0106, pedigree (2,3,2,4,3)
  (same comment as for tap water)

## Inputs from nature
- Water, well, in ground [natural resource, in water]: 0.00083 m3; lognormal variance with pedigree 0.0106, pedigree (2,3,2,4,3)
  Calculated based on literature data published by the industry. This value is a 5-year average of data (2011 - 2015) published by the Gendorf factory (Gendorf, 2016, Umwelterklärung, www.gendorf.de), (Gendorf, 2015, Umwelterklärung, www.gendorf.de), (Gendorf, 2014, Umwelterklärung, www.gendorf.de). The amount of groundwater and surface water (river) extracted per kg of chemical substance produced is calculated using literature data published by the Gendorf factory based in Germany, which produces a wide range of chemical substances. The factory produced 1657400 tonnes of chemical substances in the year 2015 (Gendorf, 2016, Umwelterklärung, www.gendorf.de) and 740000 tonnes of intermediate products. The amount of groundwater and surface water (river) extracted in the year 2015 was 19950000 tonnes and 21488100 tonnes respectively (Gendorf, 2016, Umwelterklärung, www.gendorf.de).
- Water, cooling, unspecified natural origin [natural resource, in water]: 0.0164 m3; lognormal variance with pedigree 0.0106, pedigree (2,3,2,4,3)
  Calculated based on literature data published by the industry. This value is a 5-year average of data (2011 - 2015) published by the Gendorf factory (Gendorf, 2016, Umwelterklärung, www.gendorf.de), (Gendorf, 2015, Umwelterklärung, www.gendorf.de), (Gendorf, 2014, Umwelterklärung, www.gendorf.de). The amount of water for cooling extracted per kg of chemical substance produced is calculated using literature data published by the Gendorf factory based in Germany, which produces a wide range of chemical substances. The factory produced 1657400 tonnes of chemical substances in the year 2015 (Gendorf, 2016, Umwelterklärung, www.gendorf.de) and 740000 tonnes of intermediate products. The reported amounts of water extracted as groundwater and surface water (river) are assumed to be used entirely for cooling purposes.
- Water, river [natural resource, in water]: 0.00086 m3; lognormal variance with pedigree 0.0106, pedigree (2,3,2,4,3)
  (same comment as for Water, well, in ground)
- Oxygen [natural resource, in air]: 0.719 kg; lognormal variance with pedigree 0.1786, pedigree (4,5,5,5,5)
  Calculated based on stoechiometry: 1.5 moles of O2 per mole of propylene are consumed during the reaction.

## Emissions to nature
- COD, Chemical Oxygen Demand [water, unspecified]: 0.000294654 kg; lognormal variance with pedigree 0.218, pedigree (4,5,5,5,5)
  Calculated value. The BOD, COD, TOC and BOD5 are calculated based on the amount and type of emissions released to water in the same activity.
- Acetic acid [water, surface water]: 0.000288 kg; lognormal variance with pedigree 0.352, pedigree (3,5,3,5,3)
  Data from 1 US source.
  Uncertainty: d
- DOC, Dissolved Organic Carbon [water, unspecified]: 0.000115099 kg; lognormal variance with pedigree 0.218, pedigree (4,5,5,5,5)
  (same comment as for COD, Chemical Oxygen Demand)
- TOC, Total Organic Carbon [water, unspecified]: 0.000115099 kg; lognormal variance with pedigree 0.218, pedigree (4,5,5,5,5)
  (same comment as for COD, Chemical Oxygen Demand)
- Water [water, unspecified]: 0.0167 m3; lognormal variance with pedigree 0.0106, pedigree (2,3,2,4,3)
  Calculated based on literature data published by the industry (Gendorf, 2016, Umwelterklärung, www.gendorf.de). The amount of water released back to the environment consists of the amount of process water treated in the internal WWTP and then released back to the environment and the amount of cooling water released back to the environment.
  property water in wet mass 1000 kg; name WWM
  property wet mass 1000 kg; name WM
  property fraction, origin: unspecified 1; name fraction_origin_unspecified_Ww
  property fraction, origin: salt water 0; name fraction_origin_salt_water_Ww
  property fraction, origin: fresh water 0; name fraction_origin_fresh_water_Ww
  property carbon content, fossil 0; name C_content_fossil
  property carbon content, non-fossil 0; name C_content_non_fossil
  property dry mass 0 kg; name DM
- Water [air, unspecified]: 0.0014 m3; lognormal variance with pedigree 0.0106, pedigree (2,3,2,4,3)
  Calculated to ensure the water balance. In general, in the case of recirculating cooling systems, 77% of the water input evaporates to air. In case of once-through cooling systems, 4% of the water input evaporates to air. The process water has in the chemical industry an average evaporation rate of 20.5%. In the specific case of the Gendorf factory, the calculated evaporation rate based on the data published is 6.3%. This matches the qualitative information, that the majority of the cooling systems in Gendorf are once-through and that the amount of cooling water used is significantly higher than the amount of process water used (Gendorf, 2016, Umwelterklärung, www.gendorf.de).
  property fraction, origin: unspecified 1; name fraction_origin_unspecified
  property fraction, origin: salt water 0; name fraction_origin_salt_water
  property fraction, origin: fresh water 0; name fraction_origin_fresh_water
- Propene [air, urban air close to ground]: 1e-6 kg; lognormal variance with pedigree 0.082, pedigree (3,5,3,5,3)
  Data from personal communication.
  Uncertainty: d
- Nitrogen [air, unspecified]: 0.019 kg; lognormal variance with pedigree 0.0106, pedigree (2,3,2,4,3)
  Calculated value. The amount of nitrogen released to air is equal to the amount of nitrogen entering the activity.
- BOD5, Biological Oxygen Demand [water, unspecified]: 0.000294654 kg; lognormal variance with pedigree 0.218, pedigree (4,5,5,5,5)
  (same comment as for COD, Chemical Oxygen Demand)
- Carbon dioxide, fossil [air, urban air close to ground]: 0.737 kg; lognormal variance with pedigree 0.042, pedigree (3,5,3,5,3)
  Calculated value, based on data from 1 US source.
  Uncertainty: c

## Sampling procedure
Data based on literature as well as industrial data. Some values are calculated based on data from a large chemical factory located in Germany. For more details, see the comments of the exchanges.

## Extrapolations
This dataset has been copied from an original dataset covering the geography RER. The uncertainty has been adjusted accordingly.

## Review by Gregor Wernet 2017-08-04
This dataset was additionally reviewed in a separate review process by Eric Johnson of Atlantic Consulting as well as Emilia Moreno Ruiz and Gregor Wernet of ecoinvent.
