# gypsum fibreboard production

Dataset: EcoSpold 2, unit process
Geography: RoW
Time period: 1997-01-01 to 2021-12-31
Technology level: current
Classification: ISIC rev.4 ecoinvent: 2394:Manufacture of cement, lime and plaster
Classification: EcoSpold01Categories: construction materials/coverings
Tags: ConvertedDataset
Scenario: Business-as-Usual
System model: Allocation, cut-off by classification
Generated by: Hans-Jörg Althaus
Published in: Kellenberger D. 2004
Database: ecoinvent
isCopyrightProtected: true
accessRestrictedTo: 1

## General comment
produced 100% from natural gypsum (no FGD). Energy consumption is extrapolated from production of solid gypsum board
[This dataset was already contained in the ecoinvent database version 2. It was not individually updated during the transfer to ecoinvent version 3. Life Cycle Impact Assessment results may still have changed, as they are affected by changes in the supply chain, i.e. in other datasets. This dataset was generated following the ecoinvent quality guidelines for version 2. It may have been subject to central changes described in the ecoinvent version 3 change report (http://www.ecoinvent.org/database/ecoinvent-version-3/reports-of-changes/), and the results of the central updates were reviewed extensively. The changes added e.g. consistent water flows and other information throughout the database. The documentation of this dataset can be found in the ecoinvent reports of version 2, which are still available via the ecoinvent website. The change report linked above covers all central changes that were made during the conversion process.]

## Included activities end
production of board (incl. drying)

## Geography
data for Switzerland

## Technology
Average technology for consumption in Switzerland

## Parameters
- fraction, tap water, to air: 0.59 dimensionless; name fraction_TW_to_air; lognormal variance with pedigree 0.092025, pedigree (4,4,3,2,4)
- fraction, process water, to air: 0.59 dimensionless; name fraction_PW_to_air; lognormal variance with pedigree 0.092025, pedigree (4,4,3,2,4)

## Reference product
- gypsum fibreboard: 1 kg; CPC 37530: Articles of plaster or of compositions based on plaster; By-product classification allocatable product
  EcoSpold01Location=CH
  production volume 3.96633 kg
    This is a placeholder value that does not reflect real-world production volumes. This dataset does not currently require a real-world production volume to work in the database framework, and no actual data were collected yet. This has no negative effect on the results of the ecoinvent database.
  property carbon content, fossil 0
    Gypsum (CaSO4-2H2O) with 15-20% cellulose fibres (ecoinvent v2.2 report 7, part VIII, pg 5). C-content/dry mass of natural fibres was considered 46% (from "Evolutionary and Biochemical Aspects", A.D. Kay and T. Vrede (in Global Ecology, 2010, Elsevier B.V., S.E. Jørgensen Ed.))
  property heating value, net 2.44 MJ
    LHV is calculated based on the Carbon content of the product. More details can be found on the respective documentation.
  property price 1.77 EUR2005
    Calculated by 2.o-The production volume of this product is small compared to other products supplied by the activities within the same ISIC 3 category. Therefore, an average price of products supplied by the activities in the same ISIC 3 code has been applied.This price is obtained as '_45 Glass, mineral wool and ceramic goods, virgin, EU27' in the 'EU & DK Input Output Database' (available in SimaPro). The price is assumed to be valid for both RER2003, RER 2004, world 2003 and world 2004.
  property carbon content, non-fossil 0.0805
    (same comment as for gypsum fibreboard)
  property carbon content 0.0805
    carbon content on a dry matter basis (reserved; not for manual entry)
  properties: water in wet mass 0 kg, wet mass 1 kg, dry mass 1 kg, water content 0, carbon allocation 0.0805 kg

## Inputs from technosphere
- waste paper, sorted: 0.15 kg; lognormal variance with pedigree 0.0426, pedigree (2,1,5,5,1)
  EcoSpold01Location=RER
  properties: dry mass 0.9 kg, heating value, net 14.11 MJ, water content 0.111111, wet mass 1 kg, carbon content, non-fossil 0.448889
  note on carbon content, non-fossil: The collected waste paper has a biogenic C content of 40.4% (average C-content of waste paper according to Doka 2004)
- stucco: 0.71 kg; lognormal variance with pedigree 0.0426, pedigree (2,1,5,5,1)
  EcoSpold01Location=CH
  properties: dry mass 1 kg, wet mass 1 kg
- alkylbenzene sulfonate, linear, petrochemical: 9.68e-6 kg; lognormal variance with pedigree 0.0606, pedigree (2,1,5,5,3)
  EcoSpold01Location=RER
  properties: dry mass 1 kg, carbon content, fossil 0.407018, wet mass 1 kg, heating value, net 28.88 MJ
  note on carbon content, fossil: European LAS is a mixture of differ-ent homologues (C10-C13 alkyl chains) including all positional isomers with the exception of 1-alkyl substituted ones. The typical homologue distribution is 15%, 30%, 30% and 25% for C10, C11, C12 and C13 with an average alkyl chain of C11.6 and an average molecular weight of 342 as the sodium salt (ecoinvent v2.2 report 12)
- wooden board factory, organic bonded boards: 1.67e-11 unit; lognormal variance with pedigree 0.68, pedigree (5,5,5,5,5)
  EcoSpold01Location=RER
- silicone product: 0.000129 kg; lognormal variance with pedigree 0.0606, pedigree (2,1,5,5,3)
  EcoSpold01Location=RER
  properties: heating value, net 9.83 MJ, dry mass 1 kg, carbon content, fossil 0.324324, wet mass 1 kg
  note on carbon content, fossil: The term silicones is used for compounds in which silicon atoms are linked via oxygen atoms, each silicon atom bearing one or several organic groups. In industrially important silicones, these groups are usually methyl or phenyl (ecoinvent v2.2 report 8_part71 & Ullmann). The chemical formula was considered to be [Si(CH3)2O]n (Ullmann).
- electricity, medium voltage: 0 kWh; pedigree (1,1,1,1,1)
  EcoSpold01Location=DE
- tap water: 0 kg; name tap_water_input; pedigree (1,1,1,1,1)
  EcoSpold01Location=RER
  properties: carbon content, fossil 0.00178991, dry mass 0.000337476 kg, wet mass 1 kg, water content 2962.17
  note on carbon content, fossil: Bicarbonate content is 2.93 mol/m3. CO2 content is 0.1 mol/m3 (ecoinvent v2.2 report 8, Tab 93.1).
- heat, district or industrial, other than natural gas: 0 MJ; pedigree (1,1,1,1,1)
  EcoSpold01Location=RER
  properties: heating value, net 1 MJ
- potato starch: 0.0029 kg; lognormal variance with pedigree 0.0606, pedigree (2,1,5,5,3)
  EcoSpold01Location=DE
  properties: dry mass 0.8 kg, carbon content, non-fossil 0.46, wet mass 1 kg, water content 0.25, heating value, net 10.66 MJ
  note on carbon content, non-fossil: C-content of starch is considered 46% on dry mass basis (from "Evolutionary and Biochemical Aspects", A.D. Kay and T. Vrede (in Global Ecology, 2010, Elsevier B.V., S.E. Jørgensen Ed.)).
- electricity, medium voltage: 0.000879842, 0.000168716, 0.00387398, 0.0128261, 0.00283239, 0.0411945, 0.00580639, 0.0189181 kWh (8 entries); lognormal variance with pedigree 0.0606, pedigree (2,1,5,5,3)
  EcoSpold01Location=DE
- tap water: 0.00297144, 0.000357682, 0.000591128, 0.127107, 0.0149059, 0.000387773, 0.00110301, 0.170576 kg (8 entries); lognormal variance with pedigree 0.0606, pedigree (2,1,5,5,3)
  EcoSpold01Location=RER
- heat, district or industrial, other than natural gas: 0.000447294, 0.0270098, 1.10304 MJ (3 entries); lognormal variance with pedigree 0.0606, pedigree (2,1,5,5,3)
  EcoSpold01Location=RER

## Inputs from nature
- Water, unspecified natural origin [natural resource, in water]: 0.000159 m3; name water_UNO_input; lognormal variance with pedigree 0.0606, pedigree (2,1,5,5,3)

## Emissions to nature
- Water [air, unspecified]: 0.00028143 m3; name water_to_air_unspecified; lognormal variance with pedigree 0.0827, pedigree (2,2,5,5,1)
  Calculated value based on literature values and expert opinion. See comments in the parametres' comment field.
  property fraction, origin: fresh water 0.666667; name fraction_origin_fresh_water
  property fraction, origin: unspecified 0.333333; name fraction_origin_unspecified
  property fraction, origin: salt water 0; name fraction_origin_salt_water
- Water [water, unspecified]: 0.00019557 m3; name water_to_water_unspecified; lognormal variance with pedigree 0.0827, pedigree (2,2,5,5,1)
  (same comment as for Water)
  property fraction, origin: fresh water 0.666667; name fraction_origin_fresh_water_Ww
  property fraction, origin: salt water 0; name fraction_origin_salt_water_Ww
  property carbon content, non-fossil 0; name C_content_non_fossil
  property dry mass 0 kg; name DM
  property water in wet mass 1000 kg; name WWM
  property carbon content, fossil 0; name C_content_fossil
  property wet mass 1000 kg; name WM
  property fraction, origin: unspecified 0.333333; name fraction_origin_unspecified_Ww

## Sampling procedure
environmental report

## Extrapolations
none This dataset has been copied from an original dataset covering the geography CH. The uncertainty has been adjusted accordingly.

## Review by Roberto Dones 2004-07-01
passed
