# potassium carbonate production, from potassium hydroxide

Dataset: EcoSpold 2, unit process
Geography: GLO
Time period: 2000-01-01 to 2021-12-31
Technology level: current
Classification: ISIC rev.4 ecoinvent: 2011:Manufacture of basic chemicals
Synonyms: Pearl ash; 584-08-7; Salt of tartar; Carbonate of potash; Dipotassium carbonate
Scenario: Business-as-Usual
System model: Allocation, cut-off by classification
Share of production covered: 100 %
Generated by: Jürgen Sutter
Published in: Sutter, J. 2007
Database: ecoinvent
isCopyrightProtected: true
accessRestrictedTo: 1

## General comment
This dataset represents the production of 1 kg potassium carbonate. Anhydrous potassium carbonate (K2CO3) is a white, hygroscopic, powdery material that deliquesces in moist air. It is readily soluble in water with the formation of an alkaline solution. K2CO3 forms several hydrates, of which K2CO3 · 1.5 H2O is the stable phase in contact with the saturated solution from 0 °C to ca. 110 °C. This hydrate crystallizes in glassy, virtually dust-free crystals. It is also hygroscopic and deliquesces in moist air. It is completely dehydrated at 130 – 160 °C.
The glass industry is the most important consumer of K2CO3. Large amounts are also required for potassium silicate manufacture. Potassium carbonate is additonally used for many organic syntheses, such as the production of potassium salts, and as a starting material for the production of drying, neutralization, and condensation agents. Potassium carbonate is used as a fertilizer for acidic soil. Other users are the electrical industry, the dye industry, the printing trade, the textile industry, the leather goods industry, and the ceramic industry. The food industry uses potassium carbonate as a leavening agent in baked goods, as a debitterizing agent for cocoa beans, and as an additive for drying raisins. Potash is also frequently used in the pharmaceutical industry as a raw material and auxiliary.
For this dataset, the production of potassium carbonate by means of the reaction of potassium hydroxide and carbon dioxide is considered. Due to lack of industrial data, the inventory is based on stoechiometric calculations, as well as approximations based on data from a large chemical plant (Gendorf 2016).
References:
Sutter, J. (2007) Life Cycle Inventories of Highly Pure Chemicals. ecoinvent report No. 19. Swiss Centre for Life Cycle Inventories, Dübendorf, 2007.
Gendorf (2016) Umwelterklärung 2015, Werk Gendorf Industriepark, www.gendorf.de.

## Included activities start
From the reception of potassium hydroxide and carbon dioxide at the factory gate.

## Included activities end
This activity ends with the production of potassium carbonate. The system includes the process with consumption of raw materials, energy, infrastructure and land use as well as the generation of emissions to air and water.

## Geography
The inventory is modelled for the world. Some values are based on data from a large chemical factory located in Germany. These are assumed to be valid for this geography.

## Technology
The most important process for the manufacture of potassium carbonate begins with electrolytically produced potassium hydroxide solution. The almost chemically pure solution obtained by the mercury process is reacted with carbon dioxide or CO2-containing off-gases (flue gas, lime kiln gas).
Solid potassium carbonate is then obtained by crystallization (under vacuum and with cooling) from liquors or in the fluidized-bed process.
In the continuous crystallization process, the filtered, fresh carbonate solution is mixed with mother liquor and concentrated in several preliminary evaporators connected in series until the hydrate K2CO3 • 1.5 H2O finally precipitates in the crystallizer after cooling under vacuum. The mother liquor is separated from the crystal suspension in hydrocyclones and centrifuges, filtered, and fed back to the process. The crystals are dried at ca. 110 – 120 °C in rotary kilns or fluidized-bed dryers and packed for sale as potash hydrate, or they are calcined at 200 – 350 °C to give 98 – 100 % K2CO3. Impurities such as soda, sulfate, silicic acid, and iron that concentrate in the mother liquors can be partially removed by removing a partial stream of the mother liquor, which is either used for brine purification in the electrolysis process or sold as a low-grade potassium carbonate solution, or by crystallizing the double-salt NaKCO3 at elevated temperature in a separate crystallization and drying process.
Preparation of potassium carbonate with continuous crystallization
a) Carbonization; b) Crude liquor filter; c) Fresh liquor tank; d) Mixed liquor tank; e1), e2) Preliminary evapora-tion; f) Vacuum/cooling crystallization (Chemietechnik Messo system); g) Preheater; h) Vapor condenser; i) Vacuum pump; j) Hydrocyclone; k) Centrifuge; l) Centrifuge liquor tank; m) Filter for mother liquor; n) Mother liquor tank; o) Drying or calcining rotary kiln; p) Cooling device for calcined K2CO3; q) Storage for hydrated potash; r) Storage for calcined potash
The resulting potassium carbonate is very pure and meets the requirements of USP, BP, DAB, and JP if the process is operated in appropriate manner.
Starting from potassium carbonate solution, prills can be produced in a combined reactor, in which spray drying and fluidized-bed granulation take place simultaneously.
In the fluidized-bed process, aqueous potassium hydroxide solution is sprayed into a fluidized-bed reactor from above and exposed to a countercurrent of CO2-containing hot gas. Carbonization and calcination take place in the same reactor. Hard, spherical potassium carbonate prills are formed having a high packing density. The prills are discharged and sieved. The coarse grains are ground and returned to the reactor together with the very fine grains, where they act as crystallization seeds. The salable, dust-free, medium grains are cooled and packed. Because no mother liquor is formed, the quality of the potassium carbonate depends on that of the raw materials. Compared to the crystallization process the chlo-ride, soda, and sulfate contents are usually higher, but the investment and production costs are lower.
Production of potassium carbonate by the fluidized-bed process
a) Burner; b) Gas cooler; c) Fluidized-bed reactor; d) Cooler; e) Elevator; f) Screen; g) Mill; h) Silo; i) Cyclone; j) Exhaust gas scrubber
References:
Schultz, H., Bauer, G., Schachl, E., Hagedorn, F., Schmittinger, P.: Potassium Compounds. Published online: 2000. In: Ullmann's Encyclopedia of Industrial Chemistry, Seventh Edition, 2004 Electronic Release (ed. Fiedler E., Grossmann G., Kersebohm D., Weiss G. and Witte C.). 7 th Electronic Release Edition. Wiley InterScience, New York, Online-Version under: http://www.mrw.interscience.wiley.com/emrw/9783527306732/home

## Time period
Time of publications. Some values are based on data published by the Gendorf factory that were collected between 2011 and 2015. The time period has been adjusted accordingly. For more details, see the comments of the exchanges.

## Reference product
- potassium carbonate: 1 kg; name RP; CPC 34240: Phosphates of triammonium; salts and peroxysalts of inorganic acids and metals n.e.c.; By-product classification allocatable product; CAS 584-08-7
  Anhydrous potassium carbonate is a white, hygroscopic, powdery material that deliquesces in moist air. It is readily soluble in water with the formation of an alkaline solution. K2CO3 forms several hydrates, of which K2CO3 • 1.5 H2O is the stable phase in contact with the saturated solution from 0 °C to ca. 110 °C. This hydrate crystallizes in glassy, virtually dust-free crystals. It is also hygroscopic and deliquesces in moist air. It is completely dehydrated at 130 - 160 °C.
  The glass industry is the most important consumer of K2CO3. Large amounts are also required for potassium silicate manufacture.
  Potassium carbonate is used for many organic syntheses. Numerous inorganic and organic potassium salts are manufactured from potassium carbonate (potassium phosphate, bromide, iodide, dichromate, cyanide, and ferrocyanide); in addition it is a starting material for drying, neutralization, and condensation agents. As a regenerable absorbent for carbon dioxide, hydrogen sulfide, and sulfur oxides, it is attaining importance in environmental protection.
  Potassium carbonate is used as a fertilizer for acidic soil.
  Other users are the electrical industry, the dye industry, the printing trade, the textile industry, the leather goods industry, and the ceramic industry. Soft soap manufacture has lost its earlier importance as a customer. Potash solutions are used as fire retardants and as cooling brines (freezing point - 36 °C at 576 g/L=40.5 wt % K2CO3).
  The food industry uses potassium carbonate as a leavening agent in baked goods, as a debitterizing agent for cocoa beans, and as an additive for drying raisins. Potash in DAB quality is frequently used in the pharmaceutical industry as a raw material and auxiliary.
  production volume 3.2e8 kg; name RP_PV
    Unknown
    Raw material use: > 2.6 E8 kg potassium hydroxide http://www.inchem.org/documents/sids/sids/POTASSIUMHYD.pdf and input/output relations of dataset ; Wenshui Economic Development Zone supplies 70% of the global output (http://expocentralchina.mofcom.gov.cn/pub/zbblh/GuidanceOfSixProvinces/BriefingOfSixProvincesInCentralPartOfChina/Shanxi/default.htm)
  property price 0.344 EUR2005
    Temporary price data. Calculated as 90% of purchasers price based on: 2005 import and export prices (total trades (USD) divided by total weight (kg) in biggest economies of the world: EU27, USA, Brasil, China, India, Japan and Russia) from UN Commodity Trade Statistics Database (http://data.un.org/Explorer.aspxDatabase [Accessed 2011.06.21]).
  property heating value, net 2.63 MJ
    LHV is calculated based on the elemental composition of the substance. Based on the CAS number of the substance (000584-08-7 ), which is found manually, the chemical formula of the substance is found to be: CK2O3, (PubChem 2020).
    Reference: Kim, S., Chen, J., Cheng, T., Gindulyte, A., He, J., He, S., Li, Q., Shoemaker, B. A., Thiessen, P. A., Yu, B., Zaslavsky, L., Zhang, J., & Bolton, E. E. (2019). PubChem 2019 update: improved access to chemical data. Nucleic acids research, 47(D1), D1102–D1109. https://doi.org/10.1093/nar/gky1033
  property carbon content 0.0869565
    carbon content on a dry matter basis (reserved; not for manual entry)
  properties: wet mass 1 kg, water content 0, water in wet mass 0 kg, carbon content, fossil 0.0869565, dry mass 1 kg, carbon content, non-fossil 0, carbon allocation 0.0869565 kg

## Inputs from technosphere
- carbon dioxide, liquid: 0 kg; source Schultz, H. 2004; pedigree (1,1,1,1,1)
  Stoechiometric calculation. The values for the consumption of the raw materials are calculated with an assumed yield of 95%.
  Uncertainty: S
  properties: wet mass 1 kg, carbon content, fossil 0.272727, dry mass 1 kg, heating value, net 8.27 MJ
- heat, district or industrial, natural gas: 2.15 MJ; source Gendorf 2000; lognormal variance with pedigree 0.0106, pedigree (2,3,2,4,3)
  Calculated based on literature data published by the industry. This value is a 5-year average of data (2011 - 2015) published by the Gendorf factory (Gendorf, 2016, Umwelterklärung, www.gendorf.de), (Gendorf, 2015, Umwelterklärung, www.gendorf.de), (Gendorf, 2014, Umwelterklärung, www.gendorf.de). The amount of heat used per kg of chemical substance produced is calculated using literature data published by the Gendorf factory based in Germany, which produces a wide range of chemical substances. The factory produced 1657400 tonnes of chemical substances in the year 2015 (Gendorf, 2016, Umwelterklärung, www.gendorf.de) and 740000 tonnes of intermediate products. The amount of heat in the year 2015 was 523500 GJ (Gendorf, 2016, Umwelterklärung, www.gendorf.de) of which 90% was obtained from natural gas and 10% from steam. The resulting amount of heat from natural gas is 2.02 MJ/kg of chemical product produced. The 5-year average (2011 - 2015, weighted by production volume) is 2.15 MJ/kg. Cross-reference: the amount of chemicals produced (excluding intermediate products) in the EU-28 in the year 2011 was 327 million tonnes (Eurostat, http://ec.europa.eu/eurostat/statistics-explained/index.php/Chemicals_production_statistics, accessed 20170126). The chemical and petrochemical industry sector consumed 2.33 EJ of energy in 2011 (European Commission - Joint Research Centre, 2014, BAT on Common Waste water and Waste Gas Treatment/Management Systems in the Chemical Sector). The resulting energy (both heat and electricity) consumed per kg of chemicals produced in 2011 is thus 7.13 MJ/kg. This is higher than the value calculated using data published by Gendorf – 3.85 MJ/kg, but that is to be expected as the intermediate products are not accounted for.
  properties: heating value, net 1 MJ
- potassium hydroxide: 0.85431 kg; source Schultz, H. 2004; lognormal variance with pedigree 0.0362, pedigree (4,5,2,1,1)
  (same comment as for carbon dioxide, liquid)
  properties: water content 0.168224, wet mass 1 kg, dry mass 0.856 kg
- wastewater, average: 0 m3; name BP_wastewater_average; pedigree (1,1,1,1,1)
  Calculated based on literature data published by the industry. This value is a 5-year average of data (2011 - 2015) published by the Gendorf factory (Gendorf, 2016, Umwelterklärung, www.gendorf.de), (Gendorf, 2015, Umwelterklärung, www.gendorf.de), (Gendorf, 2014, Umwelterklärung, www.gendorf.de). The amount of wastewater (which is later on treated in the municipal WWTP) per kg of chemical substance produced is calculated using literature data published by the Gendorf factory based in Germany, which produces a wide range of chemical substances. The factory produced 1657400 tonnes of chemical substances in the year 2015 (Gendorf, 2016, Umwelterklärung, www.gendorf.de) and 740000 tonnes of intermediate products. The amount of wastewater which is later on treated in the municipal WWTP in the year 2015 was 1200 tonnes (Gendorf, 2016, Umwelterklärung, www.gendorf.de). The resulting amount of wastewater is 2.7E-06 m3/kg of chemical product produced.
  production volume 0 m3
    Calculated from the production volume of potassium carbonate in proportion to the respective output amounts.
  property price 0 EUR2005; name BP_wastewater_average_price_EUR2005
  properties: carbon content, non-fossil 0.194039, water content 2882.2, dry mass 0.346837 kg, wet mass 1000 kg
  note on carbon content, non-fossil: 0.0673 kg TOC/m3 (Tab A.17, ecoinvent v2.2 report 13_I). TOC was considered as Total Carbon.
- electricity, medium voltage: 0.416 kWh; source Gendorf 2000; lognormal variance with pedigree 0.0106, pedigree (2,3,2,4,3)
  Calculated based on literature data published by the industry. This value is a 5-year average of data (2011 - 2015) published by the Gendorf factory (Gendorf, 2016, Umwelterklärung, www.gendorf.de), (Gendorf, 2015, Umwelterklärung, www.gendorf.de), (Gendorf, 2014, Umwelterklärung, www.gendorf.de). The amount of electricity per kg of chemical substance produced is calculated using literature data published by the Gendorf factory based in Germany, which produces a wide range of chemical substances. The factory produced 1657400 tonnes of chemical substances in the year 2015 (Gendorf, 2016, Umwelterklärung, www.gendorf.de) and 740000 tonnes of intermediate products. The amount of electricity consumed in the year 2015 was 3498800 GJ (Gendorf, 2016, Umwelterklärung, www.gendorf.de). The resulting amount of electricity is 0.406 kWh/kg (year 2015) of chemical substance produced. The 5-year average (2011 - 2015, weighted by production volume) is 0.416 kWh/kg (1.5 MJ/kg). Cross-reference: the amount of chemicals produced (excluding intermediate products) in the EU-28 in the year 2011 was 327 million tonnes (Eurostat, http://ec.europa.eu/eurostat/statistics-explained/index.php/Chemicals_production_statistics, accessed 20170126). The chemical and petrochemical industry sector consumed 2.33 EJ of energy in 2011 (European Commission - Joint Research Centre, 2014, BAT on Common Waste water and Waste Gas Treatment/Management Systems in the Chemical Sector). The resulting energy (both heat and electricity) consumed per kg of chemicals produced in 2011 is thus 7.13 MJ/kg. This is higher than the value calculated using data published by Gendorf – 3.85 MJ/kg, but that is to be expected as the intermediate products are not accounted for.
- nitrogen, liquid: 0 kg; pedigree (1,1,1,1,1)
  Calculated based on literature data published by the industry. This value is a 5-year average of data (2011 - 2015) published by the Gendorf factory (Gendorf, 2016, Umwelterklärung, www.gendorf.de), (Gendorf, 2015, Umwelterklärung, www.gendorf.de), (Gendorf, 2014, Umwelterklärung, www.gendorf.de). The amount of nitrogen used per kg of chemical substance produced is calculated using literature data published by the Gendorf factory based in Germany, which produces a wide range of chemical substances. The factory produced 1657400 tonnes of chemical substances in the year 2015 (Gendorf, 2016, Umwelterklärung, www.gendorf.de) and 740000 tonnes of intermediate products. The reported amount of nitrogen used in 2015 was 33512400 Nm3 (Gendorf, 2016, Umwelterklärung, www.gendorf.de). One Nm3 of nitrogen is equal to 1.2506 kg. The resulting amount of nitrogen - the 5-year average (2011 - 2015, weighted by production volume) is 0.019 kg/kg. Nitrogen is mainly used during the production of chemicals for 'blanketing', which is the process of applying gas to the vapour space of a container or vessel in order to control its composition.
  properties: dry mass 1 kg, wet mass 1 kg
- chemical factory, organics: 4e-10 unit; lognormal variance with pedigree 0.31, pedigree (2,3,2,4,3)
  Calculated based on literature data published by the industry. For this activity, no information was readily available concerning infrastructure and land-use. Therefore, the infrastructure is estimated based on data from two chemical factories, the BASF site of Ludwigshafen and the chemical factory in Gendorf (which are both located in Germany), which produce a wide range of chemical substances. Based on this data, the following assumptions are made: the built area amounts to about 4.2 ha, the plant has an average output of 50'000 t/a and a lifespan of fifty years. The estimated infrastructure amount is therefore 4.00 E-10 units per kg of produced chemical.
  References:
  Althaus H.-J., Chudacoff M., Hischier R., Jungbluth N., Osses M. and Primas A. (2007) Life Cycle Inventories of Chemicals. ecoinvent report No. 8, v2.0. EMPA Dübendorf, Swiss Centre for Life Cycle Inventories, Dübendorf, CH.
  Gendorf (2000) Umwelterklärung 2000, Werk Gendorf. Werk Gendorf, Burgkirchen.
- heat, from steam, in chemical industry: 0 MJ; pedigree (1,1,1,1,1)
  Calculated based on literature data published by the industry. This value is a 5-year average of data (2011 - 2015) published by the Gendorf factory (Gendorf, 2016, Umwelterklärung, www.gendorf.de), (Gendorf, 2015, Umwelterklärung, www.gendorf.de), (Gendorf, 2014, Umwelterklärung, www.gendorf.de). The amount of heat used per kg of chemical substance produced is calculated using literature data published by the Gendorf factory based in Germany, which produces a wide range of chemical substances. The factory produced 1657400 tonnes of chemical substances in the year 2015 (Gendorf, 2016, Umwelterklärung, www.gendorf.de) and 740000 tonnes of intermediate products. The amount of heat in the year 2015 was 523500 GJ (Gendorf, 2016, Umwelterklärung, www.gendorf.de) of which 90% was obtained from natural gas and 10% from steam. The resulting amount of heat from steam is 0.22 MJ/kg of chemical product produced. The 5-year average (2011 - 2015, weighted by production volume) is 0.20 MJ/kg. Cross-reference: the amount of chemicals produced (excluding intermediate products) in the EU-28 in the year 2011 was 327 million tonnes (Eurostat, http://ec.europa.eu/eurostat/statistics-explained/index.php/Chemicals_production_statistics, accessed 20170126). The chemical and petrochemical industry sector consumed 2.33 EJ of energy in 2011 (European Commission - Joint Research Centre, 2014, BAT on Common Waste water and Waste Gas Treatment/Management Systems in the Chemical Sector). The resulting energy (both heat and electricity) consumed per kg of chemicals produced in 2011 is thus 7.13 MJ/kg. This is higher than the value calculated using data published by Gendorf – 3.85 MJ/kg, but that is to be expected as the intermediate products are not accounted for.
  properties: heating value, net 1 MJ
- tap water: 0.026 kg; lognormal variance with pedigree 0.0106, pedigree (2,3,2,4,3)
  Calculated based on literature data published by the industry. This value is a 5-year average of data (2011 - 2015) published by the Gendorf factory (Gendorf, 2016, Umwelterklärung, www.gendorf.de), (Gendorf, 2015, Umwelterklärung, www.gendorf.de), (Gendorf, 2014, Umwelterklärung, www.gendorf.de). The amount of tap water per kg of chemical substance produced is calculated using literature data published by the Gendorf factory based in Germany, which produces a wide range of chemical substances. The factory produced 1657400 tonnes of chemical substances in the year 2015 (Gendorf, 2016, Umwelterklärung, www.gendorf.de) and 740000 tonnes of intermediate products. The amount of tap water consumed in the year 2015 was 55100 tonnes (Gendorf, 2016, Umwelterklärung, www.gendorf.de). The resulting amount of tap water is 0.023 kg/kg of chemical product produced. The 5-year average (2011 - 2015, weighted by production volume) is 0.026 kg/kg.
  properties: wet mass 1 kg, carbon content, fossil 0.00178991, water content 2962.17, dry mass 0.000337476 kg
  note on carbon content, fossil: Bicarbonate content is 2.93 mol/m3. CO2 content is 0.1 mol/m3 (ecoinvent v2.2 report 8, Tab 93.1).
- carbon dioxide, liquid: 0.0583633, 0.277257 kg (2 entries); source Schultz, H. 2004; lognormal variance with pedigree 0.0362, pedigree (4,5,2,1,1)
  (same comment as for carbon dioxide, liquid)
- wastewater, average: -8.43646e-7, -9.12666e-8, -1.76509e-6 m3 (3 entries); lognormal variance with pedigree 0.0106, pedigree (2,3,2,4,3)
  (same comment as for wastewater, average)
  production volume 864 m3
- nitrogen, liquid: 0.00409211, 0.0149079 kg (2 entries); lognormal variance with pedigree 0.0106, pedigree (2,3,2,4,3)
  (same comment as for nitrogen, liquid)
- heat, from steam, in chemical industry: 0.0299772, 0.170023 MJ (2 entries); lognormal variance with pedigree 0.0106, pedigree (2,3,2,4,3)
  (same comment as for heat, from steam, in chemical industry)

## Inputs from nature
- Water, well, in ground [natural resource, in water]: 0.00083 m3; lognormal variance with pedigree 0.0106, pedigree (2,3,2,4,3)
  Calculated based on literature data published by the industry. This value is a 5-year average of data (2011 - 2015) published by the Gendorf factory (Gendorf, 2016, Umwelterklärung, www.gendorf.de), (Gendorf, 2015, Umwelterklärung, www.gendorf.de), (Gendorf, 2014, Umwelterklärung, www.gendorf.de). The amount of groundwater and surface water (river) extracted per kg of chemical substance produced is calculated using literature data published by the Gendorf factory based in Germany, which produces a wide range of chemical substances. The factory produced 1657400 tonnes of chemical substances in the year 2015 (Gendorf, 2016, Umwelterklärung, www.gendorf.de) and 740000 tonnes of intermediate products. The amount of groundwater and surface water (river) extracted in the year 2015 was 19950000 tonnes and 21488100 tonnes respectively (Gendorf, 2016, Umwelterklärung, www.gendorf.de).
- Water, river [natural resource, in water]: 0.00086 m3; lognormal variance with pedigree 0.0106, pedigree (2,3,2,4,3)
  (same comment as for Water, well, in ground)
- Water, cooling, unspecified natural origin [natural resource, in water]: 0.0164 m3; lognormal variance with pedigree 0.0106, pedigree (2,3,2,4,3)
  Calculated based on literature data published by the industry. This value is a 5-year average of data (2011 - 2015) published by the Gendorf factory (Gendorf, 2016, Umwelterklärung, www.gendorf.de), (Gendorf, 2015, Umwelterklärung, www.gendorf.de), (Gendorf, 2014, Umwelterklärung, www.gendorf.de). The amount of water for cooling extracted per kg of chemical substance produced is calculated using literature data published by the Gendorf factory based in Germany, which produces a wide range of chemical substances. The factory produced 1657400 tonnes of chemical substances in the year 2015 (Gendorf, 2016, Umwelterklärung, www.gendorf.de) and 740000 tonnes of intermediate products. The reported amounts of water extracted as groundwater and surface water (river) are assumed to be used entirely for cooling purposes.

## Emissions to nature
- Water [water, unspecified]: 0.0167 m3; lognormal variance with pedigree 0.0106, pedigree (2,3,2,4,3)
  Calculated based on literature data published by the industry (Gendorf, 2016, Umwelterklärung, www.gendorf.de). The amount of water released back to the environment consists of the amount of process water treated in the internal WWTP and then released back to the environment and the amount of cooling water released back to the environment.
  property wet mass 1000 kg; name WM
  property fraction, origin: unspecified 1; name fraction_origin_unspecified_Ww
  property fraction, origin: salt water 0; name fraction_origin_salt_water_Ww
  property dry mass 0 kg; name DM
  property carbon content, fossil 0; name C_content_fossil
  property carbon content, non-fossil 0; name C_content_non_fossil
  property fraction, origin: fresh water 0; name fraction_origin_fresh_water_Ww
  property water in wet mass 1000 kg; name WWM
- Hydroxide [water, surface water]: 0.012967 kg; lognormal variance with pedigree 0.188, pedigree (4,5,5,5,5)
  Estimation. The remaining amount of unreacted potassium hydroxide (4.8 % of the input) is assumed to leave the production process with the wastewater.
  Uncertainty: E
- Water [air, unspecified]: 0.0014 m3; lognormal variance with pedigree 0.0106, pedigree (2,3,2,4,3)
  Calculated to ensure the water balance. In general, in the case of recirculating cooling systems, 77% of the water input evaporates to air. In case of once-through cooling systems, 4% of the water input evaporates to air. The process water has in the chemical industry an average evaporation rate of 20.5%. In the specific case of the Gendorf factory, the calculated evaporation rate based on the data published is 6.3%. This matches the qualitative information, that the majority of the cooling systems in Gendorf are once-through and that the amount of cooling water used is significantly higher than the amount of process water used (Gendorf, 2016, Umwelterklärung, www.gendorf.de).
  property fraction, origin: salt water 0; name fraction_origin_salt_water
  property fraction, origin: unspecified 1; name fraction_origin_unspecified
  property fraction, origin: fresh water 0; name fraction_origin_fresh_water
- Carbon dioxide, fossil [air, urban air close to ground]: 0.016781 kg; source Schultz, H. 2004; lognormal variance with pedigree 0.1786, pedigree (4,5,5,5,5)
  Estimation. The unreacted carbon dioxide is assumed to be emitted to air.
  Uncertainty: E
- Potassium, ion [water, surface water]: 0.029748 kg; lognormal variance with pedigree 0.798, pedigree (4,5,5,5,5)
  (same comment as for Hydroxide)
- Nitrogen [air, unspecified]: 0.019 kg; lognormal variance with pedigree 0.0106, pedigree (2,3,2,4,3)
  Calculated value. The amount of nitrogen released to air is equal to the amount of nitrogen entering the activity.

## Sampling procedure
Data based on literature and stoichiometric calculations. Some values are calculated based on data from a large chemical factory located in Germany. For more details, see the comments of the exchanges.

## Extrapolations
This dataset has been extrapolated from year 2020 to the year of the calculation (2021). The uncertainty has been adjusted accordingly.

## Review by Gregor Wernet 2017-08-07
This dataset was additionally reviewed in a separate review process by Eric Johnson of Atlantic Consulting as well as Emilia Moreno Ruiz and Gregor Wernet of ecoinvent.
