# vinyl carbonate production

Dataset: EcoSpold 2, unit process
Geography: GLO
Time period: 2020-01-01 to 2021-12-31
Technology level: current
Classification: ISIC rev.4 ecoinvent: 2011:Manufacture of basic chemicals
Synonyms: 2H-1,3-dioxol-2-one; vinylene carbonate
Scenario: Business-as-Usual
System model: Allocation, cut-off by classification
Generated by: Eleonora Crenna
Published in: Seifert, Bernhard 2002
Database: ecoinvent
isCopyrightProtected: true
accessRestrictedTo: 1

## General comment
This dataset represents the production of 1 kg vinyl carbonate. Vinyl carbonate is an important intermediate for the synthesis of pharmaceuticals, plant protection agents, polymers, especially for lacquers, and various other chemicals. One important use of vinyl carbonate is as an additive to liquid electrolyte for batteries, especially for Lithium ion batteries.

## Included activities start
The activity starts when the materials enter the process.

## Included activities end
This activity ends with the production of vinyl carbonate. The dataset includes the consumption of materials, as well as energy use, infrastructure use and emissions.

## Geography
The data in this dataset are not geography-specific. Some values are based on data from a large chemical factory located in Germany. These are assumed to be valid for this geography.

## Technology
Ethylene carbonate is commonly used as starting material for vinyl carbonate, in reaction with chlorine. In the first stage, monochlorethylene carbonate is produced in a UV-initiated photochlorination reaction with chlorine or sulfuryl chloride at 60-70 °C in bulk. In the second stage, monochlorethylene is converted in a dehydrochlorination reaction (e.g. with triethylamine) at 40-60 °C into vinyl carbonate.

Complete reaction:
C3H4O3 + Cl2 + NC6H15 --> C3H2O3 + HCl + Cl (-) + NC6H16 (+)

Reference:
Seifert et al. (2002). US 6395908, Process for the preparation of vinylene carbonate, and the use thereof, issued 2002-05-28, assigned to MerckPatentgesellschaft

## Time period
Time of publications. Some values are based on data published by the Gendorf factory and are from the years 2011 to 2015.

## Parameters
- efficiency: 0.95 dimensionless; name process_efficiency
  output relative to input (requires additional specification)

## Reference product
- vinyl carbonate: 1 kg; name RefProd; CPC 341: Basic organic chemicals; By-product classification allocatable product; CAS 872-36-6
  production volume 5.75767e7 kg; name PV_RP; = 191922359*0.3
    The PV is expressed in kg. The PV in an underestimation of the actual market production volume, since it is based on its solely production as battery electrolyte additive.
    According to UN Comtrade (https://comtrade.un.org/data/, HS code: 850760) 191922359 kg Li-ion batteries were exported from China in 2019. Electrolyte makes on average 0.3% weight of a Li-ion battery pack.
  property price 333 EUR2005; name RefProd_price_EUR2005
    https://www.chemicalbook.com/Price/Vinylene-carbonate.htm
  property dry mass 1 kg; name RefProd_DM
  property carbon content, fossil 0.4187; name RefProd_C_content_fossil
    fossil carbon content on a dry matter basis
  property wet mass 1 kg; name RefProd_WM
  property water in wet mass 0 kg; name RefProd_WWM
  property carbon content, non-fossil 0; name RefProd_C_content_non_fossil
    biogene carbon content on a dry matter basis
  property water content 0; name RefProd_water_content
  property carbon content 0.4187
    carbon content on a dry matter basis (reserved; not for manual entry)
  properties: carbon allocation 0.4187 kg

## Inputs from technosphere
- tap water: 0.026 kg; lognormal variance with pedigree 0.0486, pedigree (3,4,3,5,4)
  Calculated based on literature data published by the industry. This value is a 5-year average of data (2011 - 2015) published by the Gendorf factory (Gendorf, 2016, Umwelterklärung, www.gendorf.de), (Gendorf, 2015, Umwelterklärung, www.gendorf.de), (Gendorf, 2014, Umwelterklärung, www.gendorf.de). The amount of tap water per kg of chemical substance produced is calculated using literature data published by the Gendorf factory based in Germany producing a wide range of chemical substances. The factory produced 1657400 tonnes of chemical substances in the year 2015 (Gendorf, 2016, Umwelterklärung, www.gendorf.de) and 740000 tonnes of intermediate products. The amount of tap water consumed in the year 2015 was 55100 tonnes (Gendorf, 2016, Umwelterklärung, www.gendorf.de). The resulting amount of tap water is 0.023kg/kg of chemical product produced. The 5-year average (2011 - 2015, weighted by production volume) is then 0.026kg/kg.
  properties: wet mass 1 kg, carbon content, fossil 0.00178991, water content 2962.17, dry mass 0.000337476 kg
  note on carbon content, fossil: Bicarbonate content is 2.93 mol/m3. CO2 content is 0.1 mol/m3 (ecoinvent v2.2 report 8, Tab 93.1).
- nitrogen, liquid: 0 kg; pedigree (1,1,1,1,1)
  Calculated based on literature data published by the industry. This value is a 5-year average of data (2011 - 2015) published by the Gendorf factory (Gendorf, 2016, Umwelterklärung, www.gendorf.de), (Gendorf, 2015, Umwelterklärung, www.gendorf.de), (Gendorf, 2014, Umwelterklärung, www.gendorf.de). The amount of nitrogen used per kg of chemical substance produced is calculated using literature data published by the Gendorf factory based in Germany producing a wide range of chemical substances. The factory produced 1657400 tonnes of chemical substances in the year 2015 (Gendorf, 2016, Umwelterklärung, www.gendorf.de) and 740000 tonnes of intermediate products. The reported amount of nitrogen used in 2015 was 33512400 Nm3 (Gendorf, 2016, Umwelterklärung, www.gendorf.de). One Nm3 of nitrogen is equal to 1.2506 kg. The resulting amount of nitrogen - the 5-year average (2011 - 2015, weighted by production volume) is then 0.019kg/kg. Nitrogen is mainly used during production of chemicals for so called "blanketing". Blanketing is the process of applying gas to the vapour space of a container or vessel in order to control its composition.
  properties: wet mass 1 kg, dry mass 1 kg
- wastewater, average: 0 m3; name BP_wastewater; pedigree (1,1,1,1,1)
  Calculated based on literature data published by the industry. This value is a 5-year average of data (2011 - 2015) published by the Gendorf factory (Gendorf, 2016, Umwelterklärung, www.gendorf.de), (Gendorf, 2015, Umwelterklärung, www.gendorf.de), (Gendorf, 2014, Umwelterklärung, www.gendorf.de). The amount of wastewater which is later on treated in the municipal WWTP per kg of chemical substance produced is calculated using literature data published by the Gendorf factory based in Germany, which is producing wide range of chemical substances. The factory produced 1657400 tonnes of chemical substances in the year 2015 (Gendorf, 2016, Umwelterklärung, www.gendorf.de) and 740000 tonnes of intermediate products. The amount of wastewater which is later on treated in the municipal WWTP in the year 2015 was 1200 tonnes (Gendorf, 2016, Umwelterklärung, www.gendorf.de). The resulting amount of wastewater is 2.7E-06 m3/kg of chemical product produced.
  production volume 0 m3
    Calculated from production volume of reference product using the relative outputs.
  property price 0 EUR2005; name BP_wastewater_price_EUR2005
  properties: water content 2882.2, dry mass 0.346837 kg, wet mass 1000 kg, carbon content, non-fossil 0.194039
  note on carbon content, non-fossil: 0.0673 kg TOC/m3 (Tab A.17, ecoinvent v2.2 report 13_I). TOC was considered as Total Carbon.
- inert waste, for final disposal: 0 kg; name BP_inert_waste; pedigree (1,1,1,1,1)
  Calculated value for mass balance, due to not complete efficiency of the reaction.
  production volume 0 kg
    Calculated from production volume of reference product using the relative outputs.
  property price 0 EUR2005; name BP_inert_waste_price_EUR2005
  properties: wet mass 1 kg, dry mass 0.995 kg, water content 0.00502513
- electricity, medium voltage: 0.416 kWh; lognormal variance with pedigree 0.0486, pedigree (3,4,3,5,4)
  Calculated based on literature data published by the industry. This value is a 5-year average of data (2011 - 2015) published by the Gendorf factory (Gendorf, 2016, Umwelterklärung, www.gendorf.de), (Gendorf, 2015, Umwelterklärung, www.gendorf.de), (Gendorf, 2014, Umwelterklärung, www.gendorf.de). The amount of electricity per kg of chemical substance produced is calculated using literature data published by the Gendorf factory based in Germany producing a wide range of chemical substances. The factory produced 1657400 tonnes of chemical substances in the year 2015 (Gendorf, 2016, Umwelterklärung, www.gendorf.de) and 740000 tonnes of intermediate products. The amount of electricity consumed in the year 2015 was 3498800 GJ (Gendorf, 2016, Umwelterklärung, www.gendorf.de). The resulting amount of electricity is 0.406kWh/kg (year 2015) of chemical product produced. The 5 year average (2011 - 2015, weighted by production volume) is then 0.416kWh/kg. Cross-reference: The amount of chemicals produced (excluding intermediate products) in the EU-28 in the year 2011 was 327 million tonnes (Eurostat, http://ec.europa.eu/eurostat/statistics-explained/index.php/Chemicals_production_statistics, accessed 20170126). The chemical and petrochemical industry sector consumed 2.33 EJ of energy in 2011 (European Commission - Joint Research Centre, 2014, BAT on Common Waste water and Waste Gas Treatment/Management Systems in the Chemical Sector). The resulting energy (both heat and electricity) consumed per kg of chemicals produced in 2011 is thus 7.13 MJ/kg. This is higher than the value calculated using data published by Gendorf - 3.85 MJ/kg, but that is to be expected as the intermediate products are not accounted for.
- chlorine, liquid: 0 kg; name chlorine_liquid_input; pedigree (1,1,1,1,1)
  Stoichiometric calculation, based on molecular weight of Cl2 in C3H2O3 and 95% reaction efficiency. Cl2= 70.9 g/mol; C3H2O3 =86.04 g/mol
  properties: dry mass 1 kg, wet mass 1 kg
- chemical factory, organics: 4e-10 unit; lognormal variance with pedigree 0.348, pedigree (3,4,3,5,4)
  Calculated based on literature data published by the industry. For this activity, no information was readily available concerning infrastructure and land-use. Therefore, the infrastructure is estimated based on data from two chemical factories, the BASF site of Ludwigshafen and the chemical factory in Gendorf (which are both located in Germany), which produce a wide range of chemical substances. Based on this data, the following assumptions are made: the built area amounts to about 4.2 ha, the plant has an average output of 50'000 t/a and a lifespan of fifty years. The estimated infrastructure amount is therefore 4.00 E-10 units per kg of produced chemical.
  References:
  Althaus H.-J., Chudacoff M., Hischier R., Jungbluth N., Osses M. and Primas A. (2007) Life Cycle Inventories of Chemicals. ecoinvent report No. 8, v2.0. EMPA Dübendorf, Swiss Centre for Life Cycle Inventories, Dübendorf, CH.
  Gendorf (2000) Umwelterklärung 2000, Werk Gendorf. Werk Gendorf, Burgkirchen.om ecoinvent)
- heat, district or industrial, natural gas: 2.35 MJ; lognormal variance with pedigree 0.0486, pedigree (3,4,3,5,4)
  Calculated based on literature data published by the industry. This value is a 5-year average of data (2011 - 2015) published by the Gendorf factory (Gendorf, 2016, Umwelterklärung, www.gendorf.de), (Gendorf, 2015, Umwelterklärung, www.gendorf.de), (Gendorf, 2014, Umwelterklärung, www.gendorf.de). The amount of heat used per kg of chemical substance produced is calculated using literature data published by the Gendorf factory based in Germany producing a wide range of chemical substances. The factory produced 1657400 tonnes of chemical substances in the year 2015 (Gendorf, 2016, Umwelterklärung, www.gendorf.de) and 740000 tonnes of intermediate products. The amount of heat (externaly sourced steam and internally generated heat) in the year 2015 was 523500 GJ (Gendorf, 2016, Umwelterklärung, www.gendorf.de). The resulting amount of heat is 2.24MJ/kg of chemical product produced. The 5-year average (2011 - 2015, weighted by production volume) is then 2.35MJ/kg. Cross-reference: The amount of chemicals produced (excluding intermediate products) in the EU-28 in the year 2011 was 327 million tonnes (Eurostat, http://ec.europa.eu/eurostat/statistics-explained/index.php/Chemicals_production_statistics, accessed 20170126). The chemical and petrochemical industry sector consumed 2.33 EJ of energy in 2011 (European Commission - Joint Research Centre, 2014, BAT on Common Waste water and Waste Gas Treatment/Management Systems in the Chemical Sector). The resulting energy (both heat and electricity) consumed per kg of chemicals produced in 2011 is thus 7.13 MJ/kg. This is higher than the value calculated using data published by Gendorf - 3.85 MJ/kg, but that is to be expected as the intermediate products are not accounted for.
  properties: heating value, net 1 MJ
- triethyl amine: 1.23827 kg; name triethyl_amine_input; = (101.19)*(1/ process_efficiency)*1/86.02; lognormal variance with pedigree 0.0212, pedigree (3,5,4,5,2)
  Stoichiometric calculation, based on molecular weight of triethyl amine (NC6H15) in final product vinyl carbonate (C3H2O3), and 95% reaction efficiency. NC6H15 = 101.19 g/mol; C3H2O3 =86.02 g/mol.
  properties: dry mass 1 kg, wet mass 1 kg, carbon content, fossil 0.712172, heating value, net 39.54 MJ
  note on carbon content, fossil: Calculated based on molecular structure. See tab "chemicals".
- ethylene carbonate: 1.07735 kg; name ethylene_carbonate_input; = (88.04)*(1/process_efficiency)*1/86.02; lognormal variance with pedigree 0.0212, pedigree (3,5,4,5,2)
  Stoichiometric calculation, based on molecular weight of ethylene carbonate (C3H4O3) in final product vinyl carbonate (C3H2O3), and 95% reaction efficiency. C3H4O3 =88.04 g/mol; C3H2O3 =86.02 g/mol
  properties: wet mass 1 kg, carbon content, fossil 0.409173, dry mass 1 kg, heating value, net 27.53 MJ
- nitrogen, liquid: 0.00409211, 0.0149079 kg (2 entries); lognormal variance with pedigree 0.0486, pedigree (3,4,3,5,4)
  (same comment as for nitrogen, liquid)
- wastewater, average: -8.43646e-7, -9.12666e-8, -1.76509e-6 m3 (3 entries); lognormal variance with pedigree 0.0486, pedigree (3,4,3,5,4)
  (same comment as for wastewater, average)
  production volume 155.457 m3
- inert waste, for final disposal: -0.00323789, -0.497352 kg (2 entries); lognormal variance with pedigree 0.0212, pedigree (3,5,4,5,2)
  Calculated value for mass balance, due to not complete efficiency of the reaction.
  production volume 2.88223e7 kg
- chlorine, liquid: 0.14459, 0.722815 kg (2 entries); lognormal variance with pedigree 0.0212, pedigree (3,5,4,5,2)
  (same comment as for chlorine, liquid)

## Inputs from nature
- Water, cooling, unspecified natural origin [natural resource, in water]: 0.0164 m3; lognormal variance with pedigree 0.0486, pedigree (3,4,3,5,4)
  Calculated based on literature data published by the industry. This value is a 5-year average of data (2011 - 2015) published by the Gendorf factory (Gendorf, 2016, Umwelterklärung, www.gendorf.de), (Gendorf, 2015, Umwelterklärung, www.gendorf.de), (Gendorf, 2014, Umwelterklärung, www.gendorf.de). The amount of water for cooling extracted per kg of chemical substance produced is calculated using literature data published by the Gendorf factory based in Germany producing a wide range of chemical substances. The factory produced 1657400 tonnes of chemical substances in the year 2015 (Gendorf, 2016, Umwelterklärung, www.gendorf.de) and 740000 tonnes of intermediate products. The reported amounts of water extracted as ground water and surface water (river) are assumed to be used entirely for cooling purposes.
- Water, river [natural resource, in water]: 0.00086 m3; lognormal variance with pedigree 0.0486, pedigree (3,4,3,5,4)
  Calculated based on literature data published by the industry. This value is a 5-year average of data (2011 - 2015) published by the Gendorf factory (Gendorf, 2016, Umwelterklärung, www.gendorf.de), (Gendorf, 2015, Umwelterklärung, www.gendorf.de), (Gendorf, 2014, Umwelterklärung, www.gendorf.de). The amount of ground water and surface water (river) extracted per kg of chemical substance produced is calculated using literature data published by the Gendorf factory based in Germany producing a wide range of chemical substances. The factory produced 1657400 tonnes of chemical substances in the year 2015 (Gendorf, 2016, Umwelterklärung, www.gendorf.de) and 740000 tonnes of intermediate products. The amount of ground water and surface water (river) extracted in the year 2015 was 19950000 tonnes and 21488100 tonnes (Gendorf, 2016, Umwelterklärung, www.gendorf.de).
- Water, well, in ground [natural resource, in water]: 0.00083 m3; lognormal variance with pedigree 0.0486, pedigree (3,4,3,5,4)
  (same comment as for Water, river)

## Emissions to nature
- BOD5, Biological Oxygen Demand [water, unspecified]: 0.421607 kg; source Frischknecht, R. 2005; lognormal variance with pedigree 0.1, pedigree (3,5,4,5,4)
  Calculated value, according to Frischknecht et al.
- Hydrochloric acid [water, unspecified]: 0.446163 kg; = (36.46)*(1/ process_efficiency)*1/86.02; lognormal variance with pedigree 0.0606, pedigree (3,5,4,5,2)
  Stoichiometric calculation, based on molecular weight of hydrochloric acid (HCl) in final product vinyl carbonate (C3H2O3), and 95% reaction efficiency. HCl = 36.46 g/mol; C3H2O3 =86.02 g/mol.
- DOC, Dissolved Organic Carbon [water, unspecified]: 0.112 kg; source Frischknecht, R. 2005; lognormal variance with pedigree 0.1, pedigree (3,5,4,5,4)
  Calculated value, according to Frischknecht et al.
- Nitrogen [air, unspecified]: 0.019 kg; lognormal variance with pedigree 0.088, pedigree (3,4,3,5,4)
  Calculated value. The amount of nitrogen released to air is equal to the amount of nitrogen entering the activity.
- Water [air, unspecified]: 0.0014 m3; lognormal variance with pedigree 0.0486, pedigree (3,4,3,5,4)
  Calculated to ensure the water balance. In general, in the case of recirculating cooling systems, 77% of the water from the input evaporates to air. In case of once-through cooling systems, 4% of the water from the input evaporates to air. The process water has in the chemical industry an average evaporation rate of 20.5%. In the specific case of the Gendorf factory, the calculated evaporation rate based on the data published is 6.3%. This matches the qualitative information, that the majority of the cooling systems in Gendorf are once-through and that the amount of cooling water used is significantly higher than the amount of process water used (Gendorf, 2016, Umwelterklärung, www.gendorf.de).
- TOC, Total Organic Carbon [water, unspecified]: 0.112 kg; source Frischknecht, R. 2005; lognormal variance with pedigree 0.1, pedigree (3,5,4,5,4)
  Calculated value, according to Frischknecht et al.
- Water [water, unspecified]: 0.0167 m3; lognormal variance with pedigree 0.0486, pedigree (3,4,3,5,4)
  Calculated based on literature data published by the industry (Gendorf, 2016, Umwelterklärung, www.gendorf.de). The amount of water released back to the environment consists of the amount of process water treated in the internal WWTP and then released back to the environment and the amount of cooling water released back to the environment.
- Chloride [water, unspecified]: 0.433804 kg; = 35.45*(1/process_efficiency)/86.02; lognormal variance with pedigree 0.0606, pedigree (3,5,4,5,2)
  Stoichiometric calculation, based on molecular weight of Chloride (Cl-) in final product vinyl carbonate (C3H2O3), and 95% reaction efficiency. C3H2O3 =86.02 g/mol. Cl= 35.45 g/mol
- COD, Chemical Oxygen Demand [water, unspecified]: 0.421607 kg; source Frischknecht, R. 2005; lognormal variance with pedigree 0.1, pedigree (3,5,4,5,4)
  Calculated value, according to Frischknecht et al.
- Triethylammonium [water, unspecified]: 1.25063 kg; = 102.2*(1/process_efficiency)/86.02; lognormal variance with pedigree 0.0212, pedigree (3,5,4,5,2)
  Stoichiometric calculation, based on molecular weight of triethylammonium (NC6H16+) in final product vinyl carbonate (C3H2O3), and 95% reaction efficiency. NC6H16+= 102.2 g/mol; C3H2O3 =86.02 g/mol.

## Sampling procedure
Stoichiometric calculations based on default modelling procedure of chemicals in ecoinvent (Hischier et al. 2005). Some values are calculated based on data from a large chemical factory located in Germany.

Reference: Hischier, R., Hellweg, S., Capello, C., & Primas, A. (2005). Establishing life cycle inventories of chemicals based on differing data availability (9 pp). The International Journal of Life Cycle Assessment, 10(1), 59-67.

## Extrapolations
This dataset has been extrapolated from year 2020 to the year of the calculation (2021). The uncertainty has been adjusted accordingly.
