# electricity production, wind, <1MW turbine, onshore

Dataset: EcoSpold 2, unit process
Geography: CA-QC
Time period: 2000-01-01 to 2021-12-31
Technology level: modern
Classification: ISIC rev.4 ecoinvent: 3510:Electric power generation, transmission and distribution
Tags: wind power
Scenario: Business-as-Usual
System model: Allocation, cut-off by classification
Generated by: Pablo Tirado
Published in: Burger, B. 2007
Database: ecoinvent
isCopyrightProtected: true
accessRestrictedTo: 1

## General comment
This dataset represents the production of high voltage electricity at onshore grid-connected wind power plants with a capacity of less than 1 MW in Quebec (Canada) in 2014. This is an adaptation of the GLO dataset. It includes operation and maintenance expenditures as well as infrastructure inputs. Wind load hours have been adapted to local conditions (see parameters).
At the moment, the class of onshore < 1MW wind turbines is approximated with a 0.8 MW onshore wind turbine consisting of the infrastructure datasets for 'moving parts' and 'fixed parts'. Moving parts are the rotor, the nacelle, electronics, and the network connection. The tower and foundation are considered as fixed parts.
According to The Wind Power Database (2014), total installed wind capacity on-and offshore worldwide in the end of 2014 amounted to 312228.392 MW. According to The Wind Power Database 2014, around 3% of the capacity is installed offshore. Percentages of the three onshore wind power plant classes modelled in ecoinvent referring to the total installed capacity (12015 wind farms by 12/2014): <1MW 14.5%; 1-3MW 70.6%; >3MW 11.9%. These values are based on 54 countries analysed in the database: AT, AU, BE, BG, BR, CA, CH, CL, CN, CY, DE, DK, EE, ES, FI, FR, GB, GR, HR, HU, ID, IE, IN, IR, IT, JP, KR, LT, LU, LV, MK, MT, MX, MY, NL, NO, PE, PL, PT, RO, RS, RU, SA, SE, SI, SK, TH, TR, TW, TZ, UA, US, ZA. [Retreived from The Wind Power. 2014. Windpower and wind farms database. www.thewindpower.net, Status December 2014]
[This dataset is meant to replace the following datasets:]

## Included activities start
From operation of the wind power plant to high voltage electricity at the plant. According to (European Communities 2001), electricity produced with wind turbines in a wind power plant is connected to medium voltage or high voltage systems, depending on the size of the windfarm. Normally, each wind turbine contains a transformer from low voltage to medium voltage. The network connection additionally transforms the electricity to high voltage electricity. It is assumed here, that there are no stand-alone grid-connected small wind turbines and that all electricity is connected to the network in form of high voltage electricity.

Source:
European Communities. 2001. Wind Turbine Grid Connection and Interaction. Deutsches Windenergie-Institut /Tech-wise A/S /DM Energy, p. 7 Tab.2.1

## Included activities end
This activity ends with the production of 1kWh of high voltage electricity produced at the power plant and delivered to the grid.

This dataset includes
- the operation and maintenance of the wind power plant
- change of lubricating oil every year

This dataset doesn't include
- raw materials extraction, decommissioning and waste treatment as these activities are already included in infrastructure datasets
- transformation of the electricity produced in order to deliver in to the grid as this is already included in the infrastructure datasets.

## Technology
Technology of a specific 800 kW wind power plant modelled with a dataset for fixed and moving parts each (the latter including the network connection). Moving parts are the rotor, the nacelle, electronics, and the network connection. The tower and foundation are considered as fixed parts.

## Time period
Production volume valid for 2014

## Parameters
- Percentage of onshore wind power plant class capacity on total: 0.149978 dimensionless; name percentage_class_onshore; lognormal variance with pedigree 0.0037, pedigree (3,2,1,1,2)
  Literature value/calculated value. Percentage of installed capacity with onshore wind turbines < 1MW on total installed wind capacity installed in this geography (see general comment for percentages in other size classes).
  Source:
  The Wind Power. 2014. Windpower and wind farms database. www.thewindpower.net, Status December 2014
  Percentage of the wind power plant class energy production on total wind power production in a country. Classes: <1MW, 1-3MW, >3MW. Values for onshore wind power plants.
- distance: 200 km; lognormal variance with pedigree 0.1016, pedigree (4,5,5,4,4)
  Estimation. Maintenance transport to the power plant. One person travels two times per year over a distance of 200 km each time, one time for check only with a car, one time for change of the lubricating oil with a lorry.
  nan
- Installed capacity: 99 MW; name capacity_installed; lognormal variance with pedigree 0.0012, pedigree (2,1,1,1,1)
  Literature value. Total installed capacity in 2014. No >3MW turbines installed in the region.
  Source: wind energy technocentre https://www.eolien.qc.ca/en/
- gross electricity production: 2.66e8 kWh; name gross_electricity; = 6.65e9*4%; lognormal variance with pedigree 0.0012, pedigree (2,1,1,1,1)
  Measured/Calculated value. Total wind power in the region measured. Split between technologies based on installed power.
  Split (2014)
  >1MW=4%
  1-3MW=62%
  2.3MW=34%
  Source: wind energy technocentre https://www.eolien.qc.ca/en/
- Wind load hours: 2660 hour; name wind_load_hours; = ( gross_electricity*(1- losses_gross_net))/(capacity_installed*1000); lognormal variance with pedigree 0.0506, pedigree (5,3,1,1,3)
  Calculated value.
  nan
- losses from gross electricity production: 0.01 dimensionless; name losses_gross_net; lognormal variance with pedigree 0.0113, pedigree (3,3,1,3,3)
  Estimation. The factor for the loss of electricity from gross to net electricity production is an assumption based on experiences, statistics and expertise (1% losses for wind).
  nan
- use of lubricating oil for maintenance: 63 kg; name lubricating_oil_maintenance; lognormal variance with pedigree 0.0912, pedigree (4,4,5,4,4)
  Literature value. 63kg of lubricating oil are changed every year.(Burger&Bauer 2007, p.41)
  nan

## Reference product
- electricity, high voltage: 1 kWh; name amounRP; By-product classification allocatable product; CPC 17100: Electrical energy
  production volume 3.94952e7 kWh; name APV_electricity; = gross_electricity* (1-losses_gross_net)* percentage_class_onshore
    Calculated value
  property price 0.0977 EUR2005
    Temporary price data. Calculated as 90% of purchasers price based on: 94% of the average price (to account for a 6% loss in transformation and transmission) for electricity for industrial consumersin 2005 (excluded taxes). From IEA.

## Inputs from technosphere
- lubricating oil: 2.96053e-5 kg; name lubricating_oil; = lubricating_oil_maintenance*lifetime/(lifetime*(capacity_MW*1000)*wind_load_hours); lognormal variance with pedigree 0.002, pedigree (1,1,3,1,1)
  Calculated value. Lubricating oil use for maintenance.
  properties: dry mass 1 kg, wet mass 1 kg, carbon content, fossil 0.75, heating value, net 40.2 MJ
  note on carbon content, fossil: Lubricating oil is produced from diesel. C-content/dry mass of fats and oils considered 75%, from: ecoinvent v2.2 report, n 15a, pg 40
  note on heating value, net: Literature value, Source: IPCC 2006, 2006 IPCC Guidelines for National Greenhouse Gas Inventories, Prepared by the National Greenhouse Gas Inventories Programme, Eggleston H.S., Buendia L., Miwa K., Ngara T. and Tanabe K. (eds). Published: IGES, Japan
- transport, freight, lorry 7.5-16 metric ton, EURO3: 2.78245e-12 metric ton*km; = ((lubricating_oil/1000)/2)*(distance*2*lifetime/(lifetime*(capacity_MW*1000)*wind_load_hours)); undefined min 5.28316e-12, max 5.28316e-12, standardDeviation95 0, pedigree (1,1,3,1,1)
  Calculated value. Two maintenance transports to the power plant with 200 km each. Once a year, the lubricating oil is transported and changed.
- wind power plant, 800kW, fixed parts: 2.34962e-8 unit; = 1/(lifetime*(capacity_MW*1000)*wind_load_hours); lognormal variance with pedigree 0.002, pedigree (1,1,3,1,1)
  Calculated value
  property capacity [MW] 0.8 MW; name capacity_MW
  properties: lifetime 20 year
  note on lifetime: Estimation/literature value. Today, wind turbine producers often use a lifetime of 20 years for all parts of the wind turbine in their financial calculataions, even if it can be assumed that the foundation could have a longer lifetime.
- waste mineral oil: -2.96053e-5 kg; name waste_min_oil; = (lubricating_oil)*-1; lognormal variance with pedigree 0.002, pedigree (1,1,3,1,1)
  Calculated value
  production volume 1169.26 kg; = waste_min_oil* APV_electricity/ amounRP
    Calculated from production volume of reference product using the relative outputs.
    Due to reasons of the parent-child relationship, a safety amount of 400000kg waste mineral oil had to be added.
  property price 0 EUR2005; name waste_min_oil_price_EUR2005
  properties: heating value, net 34.7 MJ, carbon content, fossil 0.864444, wet mass 1 kg, dry mass 0.9 kg, water content 0.111111
  note on heating value, net: Value taken from the general comment of the treatment dataset.
  note on carbon content, fossil: Tab A.6, ecoinvent v2.2 report 13_I. C content has been calculated after data in the tables, and then referred to 1 kg DM
- wind power plant, 800kW, moving parts: 2.34962e-8 unit; = 1/(lifetime*(capacity_MW*1000)*wind_load_hours); lognormal variance with pedigree 0.002, pedigree (1,1,3,1,1)
  Calculated value
  property lifetime 20 year; name lifetime

## Inputs from nature
- Energy, kinetic (in wind), converted [natural resource, in air]: 3.87 MJ; undefined min 3.87, max 3.87, standardDeviation95 0, pedigree (1,1,3,1,1)

## Sampling procedure
Literature, calculations

## Extrapolations
This dataset has been extrapolated from year 2015 to the year of the calculation (2021). The uncertainty has been adjusted accordingly.
