# melon production

Dataset: EcoSpold 2, unit process
Geography: GLO
Time period: 2010-01-01 to 2021-12-31
Technology level: current
Classification: ISIC rev.4 ecoinvent: 0113:Growing of vegetables and melons, roots and tubers
Synonyms: cantaloup
Scenario: Business-as-Usual
System model: Allocation, cut-off by classification
Generated by: Franziska Stössel
Published in: Stoessel, Franziska; 2012
Database: ecoinvent
isCopyrightProtected: false
accessRestrictedTo: 1

## General comment
This dataset represents melon (cantaloup) production.

Yield: 47 t / ha.
Duration of one cropping cycle: 4 months.
Field production.
The LCA study, from which this LCI has been derived, contains detailed descriptions of the system boundaries and the data sources used (Stoessel et al. 2012). The publication is published and freely available with comprehensive supporting information:
http://pubs.acs.org/doi/pdf/10.1021/es2030577
Franziska Stoessel, Ronnie Juraske, Stephan Pfister, Stefanie Hellweg. (2012) Life Cycle Inventory and Carbon and Water FoodPrint of Fruits and Vegetables: Application to a Swiss Retailer. Environmental Science & Technology 6(46) 3253-3262.
This activity was adapted to include the global average land use change (LUC) emissions according 2nd edition of the Quantis-modified tool developed by Blonk Consultants 'WFLDB-adapted-Blonk 2014 direct-land-use-change-assessment-tool_2015-05-18a.xlsx', tab. 'Country & land use unknown'. The size of the emission depends on (i) the relative crop expansion in all countries of the crop during the last 20 years and (ii) the corresponding, country specific land transformations. The current results are based on the average FAOSTAT data (harvested area) of 2009-2011 and 1989-1991. The weighted average is used which takes into account relative difference in crop expansion into primary forest, secondary forest, grassland, perennial and annual land.

## Included activities start
From seedling plantation.

## Included activities end
This activity ends with harvest and storage.
The dataset includes a storage period of 0.6 month and it's use of electricity. And for the production, mulch films are included and disposed according to the disposal techniques used in the production country.
The pesticide inputs are classified according to their chemical classes and the emmssions are assigned to the soil (100%). Mercury emissions are neglected due to a lack of data while other heavy metal emissions are included. The dataset doesn't include infrastructure for production and storage facilities. No transports for agricultural means of production from the regional storage to the farm are included.

## Technology
Production without production standard, but according to GAP

## Parameters
- fraction, irrigation water, to air: 0.586986 dimensionless; name fraction_IW_to_air; lognormal variance with pedigree 0.0409, pedigree (2,2,2,1,1)
  Literature value (Siebert, 2010) (Vionnet, S., Quantis Water Database - Technical Report, 2012).
- fraction, irrigation water to surface water: 0.2 dimensionless; name fraction_IW_to_surface_water; lognormal variance with pedigree 0.0886, pedigree (4,3,1,1,4)
  Literature value (Doll, 2011) cross referenced with expert opinion.
- fraction, irrigation water, to ground water: 0.8 dimensionless; name fraction_IW_to_ground_water; lognormal variance with pedigree 0.0886, pedigree (4,3,1,1,4)
  Literature value (Doll, 2011) cross referenced with expert opinion.

## Reference product
- melon: 1 kg; source Stoessel, Franziska; 2012; CPC 01229: Cantaloupes and other melons; By-product classification allocatable product
  production volume 2.56337e10 kg
    in kg / year (2010) including melons for melonseeds and other melons (but not watermelons)
  property price 0.534 EUR2005
    Calculated from the trade statistics for the year 2005 published by the UN (COMTRADE database, accessed 20151105) as an average of 5 biggest importers of melon in the world; USA, FR, UK, NL and DE. Comtrade cathegory: 80719: Melons, fresh.
  property carbon content 0.03928
    carbon content on a dry matter basis (reserved; not for manual entry)
  properties: carbon content, non-fossil 0.03928, water content 11.5, wet mass 1 kg, water in wet mass 0.92 kg, carbon content, fossil 0, dry mass 0.08 kg, carbon allocation 0.0031424 kg

## Inputs from technosphere
- glyphosate: 9.57e-5 kg; source Stoessel, Franziska; 2012; lognormal variance with pedigree 0.0439, pedigree (3,3,5,3,2)
  properties: wet mass 1 kg, carbon content, fossil 0.214286, dry mass 1 kg
- potassium sulfate: 0 kg; source Stoessel, Franziska; 2012; pedigree (1,1,1,1,1)
  The exchange has been updated from 'potassium sulfate, as K2O' into 'potassium sulfate' and therefore its amount has been scaled (multiplied) from 0.0063 kg by 1.85 kg of 'potassium sulfate' per kg of 'potassium sulfate, as K2O'.
  properties: wet mass 1 kg, dry mass 1 kg
- packaging film, low density polyethylene: 0.00404 kg; source Stoessel, Franziska; 2012; lognormal variance with pedigree 0.0439, pedigree (3,3,5,3,2)
  properties: heating value, net 42.47 MJ, carbon content, fossil 0.857143, wet mass 1 kg, dry mass 1 kg
  note on carbon content, fossil: Polyethylene is formed out of a huge amount of ethylene monomers (C2H4) (ecoinvent v2.2 report 11_II). MW=28 g/mol
- [sulfonyl]urea-compound: 9.55e-5 kg; = sulfo1; source Stoessel, Franziska; 2012; lognormal variance with pedigree 0.0453, pedigree (3,4,5,3,2)
  sum of compounds in this family
  property water content 0; name water_content
  property water in wet mass 0 kg; name WWM
  property dry mass 1 kg; name DM
  property carbon content, non-fossil 0; name C_content_non_fossil
  property wet mass 1 kg; name WM
  property carbon content, fossil 0.540853; name C_content_fossil
- irrigation: 0.0539 m3; name water_irrigation_input; source Stoessel, Franziska; 2012; lognormal variance with pedigree 0.0198, pedigree (2,4,4,4,3)
  Average France, Italy, Spain, Brazil
  properties: wet mass 1000 kg, water content 9089.91, dry mass 0.11 kg
- fertilising, by broadcaster: 0.000426 ha; source Stoessel, Franziska; 2012; lognormal variance with pedigree 0.0439, pedigree (3,3,5,3,2)
  Fertilizing by broadcaster is used as a proxy for all the machinery work done in horticultural processes.
- ammonium sulfate: 0 kg; source Stoessel, Franziska; 2012; pedigree (1,1,1,1,1)
  substance is used in the pesticide section and the emissions are neglected
  properties: wet mass 1 kg, dry mass 1 kg
- packaging, for fertilisers: 0.0221224 kg; lognormal variance with pedigree 0.0592, pedigree (4,3,4,5,4)
  Total amount of active substance/s of fertilisers needed for the production of 'melon' is calculated to be circa 1.11E-02 kg. Fertiliser/s used in this dataset is/are: 'ammonium nitrate, as N', 'ammonium sulfate, as N', 'phosphate fertiliser, as P2O5', 'potassium sulfate, as K2O', 'urea, as N'. The total amount of active substance/s is doubled in order to account for the packaging of the dilluted product of fertiliser/s that is/are applied. Therefore, 2.21E-02 kg of packaging for fertilisers is justified with this exchange.
  properties: wet mass 1 kg, price 0.0642 EUR2005, dry mass 1 kg, carbon content, fossil 0.825301, heating value, net 25.01 MJ
  note on carbon content, fossil: Considering a chemical formula (C2H4)n for polyethylene, carbon content-fossil is calculated to be 0.856286 kg of Carbon per kg of dry mass.
- packaging, for pesticides: 0.0004611 kg; lognormal variance with pedigree 0.0592, pedigree (4,3,4,5,4)
  Total amount of active substance/s of pesticides needed for the production of melon is calculated to be circa 2.31E-04 kg. Pesticide/s used in this dataset is/are: '[sulfonyl]urea-compound', 'dinitroaniline-compound', 'glyphosate', 'pesticide, unspecified'. The total amount of active substance/s is doubled in order to account for the packaging of the dilluted product of pesticide/s that is/are applied. Therefore, 4.61E-04 kg of packaging for pesticides is justified with this exchange.
  properties: heating value, net 25.97 MJ, dry mass 1 kg, price 0.0642 EUR2005, wet mass 1 kg, carbon content, fossil 0.85714
- inorganic phosphorus fertiliser, as P2O5: 0 kg; source Stoessel, Franziska; 2012; pedigree (1,1,1,1,1)
  properties: wet mass 1 kg, dry mass 1 kg
- urea: 0 kg; source Stoessel, Franziska; 2012; pedigree (1,1,1,1,1)
  The exchange has been updated from 'urea, as N' into 'urea' and therefore its amount has been scaled (multiplied) from 0.0003 kg by 2.1438 kg of 'urea' per kg of 'urea, as N'. Original comment of the exchange is: substance is used in the pesticide section and the emissions are neglected
  properties: carbon content, fossil 0.2, wet mass 1 kg, dry mass 1 kg
- electricity, low voltage: 0.015 kWh; source Stoessel, Franziska; 2012; lognormal variance with pedigree 0.0439, pedigree (3,3,5,3,2)
- ammonium nitrate: 0 kg; source Stoessel, Franziska; 2012; pedigree (1,1,1,1,1)
  The exchange has been updated from 'ammonium nitrate, as N' into 'ammonium nitrate' and therefore its amount has been scaled (multiplied) from 0.0033 kg by 2.8573 kg of 'ammonium nitrate' per kg of 'ammonium nitrate, as N'.
  properties: dry mass 1 kg, wet mass 1 kg
- dinitroaniline-compound: 2.66e-5 kg; = dini1; source Stoessel, Franziska; 2012; lognormal variance with pedigree 0.0453, pedigree (3,4,5,3,2)
  sum of compounds in this family
  properties: carbon content, fossil 0.55516, dry mass 1 kg, wet mass 1 kg
- pesticide, unspecified: 1.275e-5 kg; = unsp1; source Stoessel, Franziska; 2012; lognormal variance with pedigree 0.0439, pedigree (3,3,5,3,2)
  sum of compounds in this family
  properties: wet mass 1 kg, dry mass 1 kg, carbon content, fossil 0.486978
  note on carbon content, fossil: Mean of C content in all pesticides whose formula has been documented in Sutter 2010
- potassium sulfate: 0.00202149, 0.00959628 kg (2 entries); source Stoessel, Franziska; 2012; lognormal variance with pedigree 0.0439, pedigree (3,3,5,3,2)
  (same comment as for potassium sulfate)
- ammonium sulfate: 5.68241e-6, 1.85176e-5 kg (2 entries); source Stoessel, Franziska; 2012; lognormal variance with pedigree 0.0439, pedigree (3,3,5,3,2)
  substance is used in the pesticide section and the emissions are neglected
- inorganic phosphorus fertiliser, as P2O5: 4.59141e-5, 4.66536e-6, 0.000166623, 2.32717e-6, 3.27732e-7, 9.01401e-6, 3.3324e-7, 5.37728e-6, 3.00329e-6, 1.10286e-5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 kg (30 entries); source Stoessel, Franziska; 2012; lognormal variance with pedigree 0.0439, pedigree (3,3,5,3,2)
- urea: 4.19907e-5, 3.38725e-5, 0.000228705, 0.000267826 kg (4 entries); source Stoessel, Franziska; 2012; lognormal variance with pedigree 0.0439, pedigree (3,3,5,3,2)
  (same comment as for urea)
- ammonium nitrate: 0.00230784, 0.00160057, 0.00123021, 0.00417622 kg (4 entries); source Stoessel, Franziska; 2012; lognormal variance with pedigree 0.0439, pedigree (3,3,5,3,2)
  (same comment as for ammonium nitrate)

## Inputs from nature
- Transformation, from annual crop, irrigated, intensive [natural resource, land]: 0.2127 m2; source Stoessel, Franziska; 2012; lognormal variance with pedigree 0.0453, pedigree (3,3,5,3,2)
- Occupation, annual crop, irrigated, intensive [natural resource, land]: 0.0709 m2*year; source Stoessel, Franziska; 2012; lognormal variance with pedigree 0.0453, pedigree (3,3,5,3,2)
- Transformation, to annual crop, irrigated, intensive [natural resource, land]: 0.2127 m2; source Stoessel, Franziska; 2012; lognormal variance with pedigree 0.0453, pedigree (3,3,5,3,2)
- Energy, gross calorific value, in biomass [natural resource, biotic]: 1.46773 MJ; lognormal variance with pedigree 0.0099, pedigree (2,3,4,3,1)
  Calculated value based on literature. The gross energy is calculated using following formula; gross energy (MJ) = crude protein (kg)*23.04 (MJ/kg)+crude fat (kg)*38.96 (MJ/kg)+crude fibre (kg)*17.95 (MJ/kg)+carbohydrates (kg)*17.17 (MJ/kg) (formula based on expert opinion, cross referenced; Diepenbrock, 2012, Energy Balance in Crop Production). The product composition of fruits and vegetables is extracted from the USDA National Nutrient Database for Standard Reference (http://ndb.nal.usda.gov/, accessed 20131114). Crude protein (g)= 7.4, crude fat (g)= 1.9, crude fibre (g)= 9, ash (g)= 6.5, water (g)= 901.5, carbohydrates (g)= 81.6. The gross energy per kg of DM is 22.59MJ. The calculated gross energy per kg of reference product is thus 1.47MJ.

## Emissions to nature
- Copper [soil, agricultural]: -5.32714e-7 kg; source Thomas Nemecek 2011
- Water [water, ground-]: 0.0178092 m3; name water_to_water_ground; = water_irrigation_input*(1-fraction_IW_to_air)*fraction_IW_to_ground_water; lognormal variance with pedigree 0.0966, pedigree (4,3,4,1,4)
  Calculated value. See the parameters and their comments to understand the calculation.
  property fraction, origin: fresh water 1; name fraction_origin_fresh_water_Wgw
  property fraction, origin: salt water 0; name fraction_origin_salt_water_Wgw
  property fraction, origin: unspecified 0; name fraction_origin_unspecified_Wgw
- Metalaxyl-M [soil, agricultural]: 1.275e-5 kg; name unsp1; source Stoessel, Franziska; 2012; lognormal variance with pedigree 0.0777, pedigree (3,4,5,3,2)
- Cadmium [soil, agricultural]: 5.52092e-8 kg; source Thomas Nemecek 2011; lognormal variance with pedigree 0.0847, pedigree (3,4,5,3,2)
- Nitrate [water, ground-]: 0.00433114 kg; source Thomas Nemecek 2011; lognormal variance with pedigree 0.0847, pedigree (3,4,5,3,2)
- Ammonia [air, non-urban air or from high stacks]: 7.91714e-5 kg; source Thomas Nemecek 2011; lognormal variance with pedigree 0.0527, pedigree (3,4,5,3,2)
- Lead [soil, agricultural]: 6.48765e-7 kg; source Thomas Nemecek 2011; lognormal variance with pedigree 0.0847, pedigree (3,4,5,3,2)
- Trifluralin [soil, agricultural]: 2.66e-5 kg; name dini1; source Stoessel, Franziska; 2012; lognormal variance with pedigree 0.0777, pedigree (3,4,5,3,2)
- Nitrogen oxides [air, non-urban air or from high stacks]: 1.33937e-5 kg; source Thomas Nemecek 2011; lognormal variance with pedigree 0.0747, pedigree (3,4,5,3,2)
- Phosphorus [water, surface water]: 1.74e-6 kg; source Stoessel, Franziska; 2012; lognormal variance with pedigree 0.0847, pedigree (3,4,5,3,2)
- Zinc [soil, agricultural]: -7.02763e-7 kg; source Thomas Nemecek 2011
- Nickel [soil, agricultural]: 1.18601e-7 kg; source Thomas Nemecek 2011; lognormal variance with pedigree 0.0847, pedigree (3,4,5,3,2)
- Chromium [soil, agricultural]: 2.00578e-7 kg; source Thomas Nemecek 2011; lognormal variance with pedigree 0.0847, pedigree (3,4,5,3,2)
- Benfluralin [soil, agricultural]: 9.55e-5 kg; name sulfo1; source Stoessel, Franziska; 2012; lognormal variance with pedigree 0.0777, pedigree (3,4,5,3,2)
- Dinitrogen monoxide [air, non-urban air or from high stacks]: 6.37796e-5 kg; source Thomas Nemecek 2011; lognormal variance with pedigree 0.0747, pedigree (3,4,5,3,2)
- Glyphosate [soil, agricultural]: 9.55e-5 kg; source Stoessel, Franziska; 2012; lognormal variance with pedigree 0.0777, pedigree (3,4,5,3,2)
- Water [air, unspecified]: 0.0316385 m3; name water_to_air_unspecified; = water_irrigation_input*fraction_IW_to_air; lognormal variance with pedigree 0.0487, pedigree (2,2,4,1,1)
  Calculated value based on literature values and expert opinion. See comments in the parametres' comment field.
  property fraction, origin: unspecified 0; name fraction_origin_unspecified
  property fraction, origin: fresh water 1; name fraction_origin_fresh_water
  property fraction, origin: salt water 0; name fraction_origin_salt_water
- Carbon dioxide, from soil or biomass stock [air, non-urban air or from high stacks]: 0.0139213 kg; normal variance with pedigree 0.5452, pedigree (3,3,5,5,2)
  Global average LUC emissions according 2nd edition of the Quantis-modified tool developed by Blonk Consultants 'WFLDB-adapted-Blonk 2014 direct-land-use-change-assessment-tool_2015-05-18a.xlsx', tab. 'Country & land use unknown'. The emission are based on the relative change in production areas in all countries for a given crop. The weighted average is used which takes into acount relative difference in crop expansion into primary forest, secondary forest, grassland, perennial and annual land.
  Uncertainty: Uncertainty estimated based on IPCC 2006
- Phosphate [water, ground-]: 4.96e-7 kg; source Stoessel, Franziska; 2012; lognormal variance with pedigree 0.0847, pedigree (3,4,5,3,2)
- Water [water, surface water]: 0.00445229 m3; name water_to_water_surface; = water_irrigation_input*(1-fraction_IW_to_air)*fraction_IW_to_surface_water; lognormal variance with pedigree 0.0966, pedigree (4,3,4,1,4)
  Calculated value. See the parameters and their comments to understand the calculation.
  property fraction, origin: fresh water 1; name fraction_origin_fresh_water_Wsw
  property fraction, origin: salt water 0; name fraction_origin_salt_water_Wsw

## Sampling procedure
The LCI is based on melon production information from different sources (peer reviewed journals, books, extension leaflets, personal information) and is well representative for a conventional production in their main production countries. Most probably it is representative for productions in other countries or farms which produces similarly.
Please refer to Stoessel et al. (2012) for more information: http://pubs.acs.org/doi/pdf/10.1021/es2030577
Franziska Stoessel, Ronnie Juraske, Stephan Pfister, Stefanie Hellweg. (2012) Life Cycle Inventory and Carbon and Water FoodPrint of Fruits and Vegetables: Application to a Swiss Retailer. Environmental Science & Technology 6(46) 3253-3262.

## Extrapolations
This dataset has been extrapolated from year 2010 to the year of the calculation (2021). The uncertainty has been adjusted accordingly.

## Review by Bo Weidema 2011-12-31
Infrastructure missing. Source of production volume (FAOSTAT) missing.

## Review by Gregor Wernet 2011-12-31
The documentation on this dataset is quite poor. The dataset has been temporarily accepted since the data provider promised to provide more detailed information within the dataset and in a general document in the editorial section of the ecoinvent homepage.
