# capacitor production, auxilliaries and energy use

Dataset: EcoSpold 2, unit process
Geography: GLO
Time period: 1998-01-01 to 2021-12-31
Technology level: current
Classification: ISIC rev.4 ecoinvent: 2610:Manufacture of electronic components and boards
Classification: EcoSpold01Categories: electronics/component
Synonyms: Condenser production
Scenario: Business-as-Usual
System model: Allocation, cut-off by classification
Generated by: Roland Hischier
Published in: Hischier R. 2007
Database: ecoinvent
isCopyrightProtected: true
accessRestrictedTo: 1

## General comment
This dataset represents the average production efforts of 1 kg of capacitors over all types of capacitors.There is no distinction between the different types of capacitors produced. Data for auxillaries, energy, emissions and waste are taken from the Environmental report of a global producer as well as from two datasets out of an international LCI database. Infrastructure and transportation efforts are based on own assumptions. As the raw material input is taken into account in the respective capacitor datasets this dataset here has no input of raw materials.

## Included activities start
From reception of electronic components, raw materials and auxiliares at the factory gate.

## Included activities end
This module includes auxillary and energy consumption, emissions (air, water) and waste amounts, as well as an estimation of the efforts for transportation and of the infrastructure for the production of capacitors.

## Geography
Data from literature and one global producer – here representing the global situation.

## Technology
average production composed of: formulation; build-up process; cutting; bisquing; Pre-Firing; Firing; Tumbling; Termination (SMT) resp. metallization; slitting; winding; metal spray; heat treatment; sawing; lead welding; epoxy filling (THT)

## Parameters
- fraction, cooling water, recirculating system, to air: 0.771 dimensionless; name fraction_CW_R_to_air; lognormal variance with pedigree 0.0413, pedigree (2,3,1,3,1)
  Calculated based on literature value (Scown, C.D., 2011, Water Footprint of U.S. Transportation Fuels and supplying information of the article) (Vionnet, S., Quantis Water Database - Technical Report, 2012).
- fraction, process water, to air: 0.061 dimensionless; name fraction_PW_to_air; lognormal variance with pedigree 0.092025, pedigree (4,4,3,2,4)
  Literature value (Statistics Canada, 2007 & Shaffer, K.H., 2008, Consumptive water use in the Great Lakes Basin, USGS) (Vionnet, S., Quantis Water Database - Technical Report, 2012).
- fraction, cooling water, once-through system, to air: 0.004 dimensionless; name fraction_CW_OT_to_air; lognormal variance with pedigree 0.0413, pedigree (2,3,1,3,1)
  (same comment as for fraction, cooling water, recirculating system, to air)
- fraction, cooling water, to air: 0.3875 dimensionless; name fraction_CW_to_air; = (0.5*fraction_CW_OT_to_air)+(0.5*fraction_CW_R_to_air); lognormal variance with pedigree 0.092025, pedigree (4,4,3,2,4)
  Calculated value based on literature value (see comments of the other parametres present in this dataset) and expert opinion. In the case when no industry/literature data are available about the type of cooling or directly fraction, cooling water, to air specific for the process a default assumption is applied. It is assumed that the once-through cooling system is used in 50% of all cases and recirculating system is used in another 50% of all cases.
- fraction, cooling water, cooling pond system, to air: 0.032 dimensionless; name fraction_CW_CP_to_air; lognormal variance with pedigree 0.0413, pedigree (2,3,1,3,1)
  (same comment as for fraction, cooling water, recirculating system, to air)

## Reference product
- capacitor, auxilliaries and energy use: 1 kg; CPC 47110: Electrical capacitors; By-product classification allocatable product
  EcoSpold01Location=GLO
  A capacitor “is an electrical device that can store energy in the electric field between a pair of closely-spaced conductors (called 'plates').”
  As soon as voltage is applied to a capacitor, this leads to the building of electric charges of equal magnitude, but opposite polarity, on each plate. Within electrical circuits, hence, capacitors are used as devices for energy-storage. In an electronic filter, a capacitor can differentiate between signals of different frequences - i.e. between high-frequency and low-frequency signals.
  Capacitors are occasionally referred to as condensers, however this is considered today an antiquated term.
  Many types of capacitor are available commercially, with capacitances ranging from the picofarad range to more than a farad, and voltage ratings up to hundreds of kilovolts. In general, the higher the capacitance and voltage rating, the larger the physical size of the capacitor and the higher the cost. Tolerances in capacitance value for discrete capacitors are usually specified as a percentage of the nominal value. Tolerances ranging from 50% (electrolytic types) to less than 1% are commonly available.
  Currently, there is a huge variety of different types of capacitors on the market - a variety that can not be covered 100% by the here described ecoinvent datasets. Main characteristics are different dielectric media used in these different types of capacitors - from paper, over various plastics up to aluminium oxide.
  production volume 1 kg
    Dummy value to be replaced by measured, estimated or calculated value
  property price 10.9692 EUR2005
    Calculated based on inputs: The price of the product has been calculated as a sum of the values of the material and energy inputs for this product. This value is therefore a rough estimation. It may underestimate the real price since there are additional expenses when producing any product. These expences can include for example labour costs, treatment of waste materials and profit for the producer. Please consider carefully whether this level of data quality is acceptable for your application.

## Inputs from technosphere
- electricity, medium voltage: 48.7 kWh; source EPCOS 2006; lognormal variance with pedigree 0.0527, pedigree (2,4,5,3,1)
  EcoSpold01Location=UCTE
  Calculated, average value.
  Further references:
  CPM (2006) LCI@CPM datastore - various datasets about electronic components. Download of December 12, 2006, from <http://databases.imi.chalmers.se/nukes/index.html>.
  Uncertainty: average from literature & CER
- chemical, organic: 0.099 kg; source EPCOS 2006; lognormal variance with pedigree 0.0527, pedigree (2,4,5,3,1)
  EcoSpold01Location=GLO
  Estimation. An average input of about 0.99 kg of auxiliaries per kg of produced capacitors is calculated. Based on the information in CPM (2006), the substances with the highest amount have been chosen here.
  Further references:
  CPM (2006) LCI@CPM datastore - various datasets about electronic components. Download of December 12, 2006, from <http://databases.imi.chalmers.se/nukes/index.html>.
  Uncertainty: average from literature & CER
  properties: dry mass 1 kg, carbon content, fossil 0.628, wet mass 1 kg, heating value, net 19.03 MJ
  note on carbon content, fossil: This dataset is an unweighted average of 20 organic substances (listed in Tab 88.1, ecoinvent v2.2 report 8, part II), being part of the top100 chemicals included in this database. The C-content has also been calculated as an unweighted average of the C content of the substances composing this dataset.
- waste, from silicon wafer production, inorganic: -0.24 kg; source EPCOS 2006; lognormal variance with pedigree 0.0527, pedigree (2,4,5,3,1)
  Proxy with a calculated Value. A total output of 1.13 kg of waste per kg of produced capacitors is calculated. Auxiliaries are emitted 100% either as emissions (air, water, soil) or as waste - i.e. 0.48 kg of waste are non-used input materials - and for 50% here of this byproduct is used as a proxy.
  Further references:
  CPM (2006) LCI@CPM datastore - various datasets about electronic components. Download of December 12, 2006, from <http://databases.imi.chalmers.se/nukes/index.html>.
  EcoSpold01Location=CH
  Uncertainty: assumption, based on literature & CER
  production volume 0.24 kg
    Calculated from the production volume of capacitor, auxilliaries and energy use in proportion to the respective output amounts.
  properties: wet mass 1 kg, water content 0.103753, carbon content, fossil 0.0347572, dry mass 0.906 kg
- heat, district or industrial, natural gas: 25.3 MJ; source EPCOS 2006; lognormal variance with pedigree 0.0527, pedigree (2,4,5,3,1)
  EcoSpold01Location=RER
  Calculated, average value.
  Further references:
  CPM (2006) LCI@CPM datastore - various datasets about electronic components. Download of December 12, 2006, from <http://databases.imi.chalmers.se/nukes/index.html>.
  Uncertainty: average from literature & CER
  properties: heating value, net 1 MJ
- spent solvent mixture: 0 kg; source EPCOS 2006; pedigree (1,1,1,1,1)
  EcoSpold01Location=CH
  Proxy with a calculated Value. A total output of 1.13 kg of waste per kg of produced capacitors is calculated. Auxiliaries are emitted 100% either as emissions (air, water, soil) or as waste - i.e. 0.65 kg of auxiliaries, are emitted as waste - and this byproduct is used as a proxy for this part of the waste.
  Further references:
  CPM (2006) LCI@CPM datastore - various datasets about electronic components. Download of December 12, 2006, from <http://databases.imi.chalmers.se/nukes/index.html>.
  Uncertainty: average from literature & CER
  production volume 0 kg
    (same comment as for waste, from silicon wafer production, inorganic)
  properties: wet mass 1 kg, dry mass 0.835 kg, heating value, net 21.7 MJ, carbon content, fossil 0.571257, water content 0.197605
  note on heating value, net: Value taken from the general comment of the treatment dataset.
  note on carbon content, fossil: Tab A.7, ecoinvent v2.2 report 13_I. C content has been calculated after data in the tables, and then referred to 1 kg DM
- electronic component factory: 1e-12 unit; lognormal variance with pedigree 0.5761, pedigree (4,5,5,3,5)
  Expert assumption. Original value of 2E-08 was based a a wafer fabrication facility. It is assumed a factory produces more components than this in its lifetime.
  EcoSpold01Location=GLO
  Uncertainty: rough estimation of infrastructure
- acetone, liquid: 0 kg; source EPCOS 2006; pedigree (1,1,1,1,1)
  EcoSpold01Location=RER
  Estimation. An average input of about 0.99 kg of auxiliaries per kg of produced capacitors is calculated. Based on the information in CPM (2006), the substances with the highest amount have been chosen here.
  Further references:
  CPM (2006) LCI@CPM datastore - various datasets about electronic components. Download of December 12, 2006, from <http://databases.imi.chalmers.se/nukes/index.html>.
  Uncertainty: average from literature & CER
  properties: heating value, net 31.32 MJ, wet mass 1 kg, carbon content, fossil 0.62069, dry mass 1 kg
- wastewater, average: 0 m3; pedigree (1,1,1,1,1)
  Estimation, due to a lack of respective emission information.
  EcoSpold01Location=CH
  Uncertainty: average from literature & CER
  production volume 0 m3
    (same comment as for waste, from silicon wafer production, inorganic)
  properties: carbon content, non-fossil 0.194039, wet mass 1000 kg, water content 2882.2, dry mass 0.346837 kg
  note on carbon content, non-fossil: 0.0673 kg TOC/m3 (Tab A.17, ecoinvent v2.2 report 13_I). TOC was considered as Total Carbon.
- ethyl acetate: 0.396 kg; source EPCOS 2006; lognormal variance with pedigree 0.0527, pedigree (2,4,5,3,1)
  Estimation. An average input of about 0.99 kg of auxiliaries per kg of produced capacitors is calculated. Based on the information in CPM (2006), the substances with the highest amount have been chosen here.
  Further references:
  CPM (2006) LCI@CPM datastore - various datasets about electronic components. Download of December 12, 2006, from <http://databases.imi.chalmers.se/nukes/index.html>.
  EcoSpold01Location=RER
  Uncertainty: average from literature & CER
  properties: wet mass 1 kg, dry mass 1 kg, heating value, net 31.32 MJ, carbon content, fossil 0.545455
- methyl ethyl ketone: 0 kg; source EPCOS 2006; pedigree (1,1,1,1,1)
  (same comment as for acetone, liquid)
  properties: heating value, net 33.63 MJ, wet mass 1 kg, dry mass 1 kg, carbon content, fossil 0.666667
- waste plastic, mixture: 0 kg; source EPCOS 2006; pedigree (1,1,1,1,1)
  EcoSpold01Location=CH
  Proxy with a calculated Value. A total output of 1.13 kg of waste per kg of produced capacitors is calculated. Auxiliaries are emitted 100% either as emissions (air, water, soil) or as waste - i.e. 0.48 kg of waste are non-used input materials - and for 50% hereof this byproduct is used as a proxy.
  Further references:
  CPM (2006) LCI@CPM datastore - various datasets about electronic components. Download of December 12, 2006, from <http://databases.imi.chalmers.se/nukes/index.html>.
  Uncertainty: assumption, based on literature & CER
  production volume 0 kg
    (same comment as for waste, from silicon wafer production, inorganic)
  properties: dry mass 0.847 kg, carbon content, fossil 0.747344, water content 0.180638, wet mass 1 kg, heating value, net 30.79 MJ
  note on carbon content, fossil: C content in 1 kg DM was calculated using data in Tab A.2, ecoinvent v2.2 report 13_I
- spent solvent mixture: -0.181427, -0.00425055, -0.464322 kg (3 entries); source EPCOS 2006; lognormal variance with pedigree 0.0527, pedigree (2,4,5,3,1)
  (same comment as for spent solvent mixture)
  production volume 0.65 kg
- acetone, liquid: 0.0263016, 0.0726984 kg (2 entries); source EPCOS 2006; lognormal variance with pedigree 0.0527, pedigree (2,4,5,3,1)
  (same comment as for acetone, liquid)
- wastewater, average: -0.0468692, -0.00507037, -0.0980604 m3 (3 entries); lognormal variance with pedigree 0.0527, pedigree (2,4,5,3,1)
  (same comment as for wastewater, average)
  production volume 0.15 m3
- methyl ethyl ketone: 0.108492, 0.287508 kg (2 entries); source EPCOS 2006; lognormal variance with pedigree 0.0527, pedigree (2,4,5,3,1)
  (same comment as for acetone, liquid)
- waste plastic, mixture: -0.0231011, -0.00178096, -0.000735601, -0.000698522, -0.0266546, -0.000297174, -0.000134691, -0.186597 kg (8 entries); source EPCOS 2006; lognormal variance with pedigree 0.0527, pedigree (2,4,5,3,1)
  (same comment as for waste plastic, mixture)
  production volume 0.24 kg

## Inputs from nature
- Water, cooling, unspecified natural origin [natural resource, in water]: 0.13 m3; name water_cooling_UNO_input; source EPCOS 2006; lognormal variance with pedigree 0.0527, pedigree (2,4,5,3,1)
  Estimation.
  Uncertainty: average from literature & CER
- Water, unspecified natural origin [natural resource, in water]: 0.15 m3; name water_UNO_input; source EPCOS 2006; lognormal variance with pedigree 0.0527, pedigree (2,4,5,3,1)
  Estimation.
  Uncertainty: average from literature & CER

## Emissions to nature
- Ethyl acetate [air, urban air close to ground]: 0.136 kg; source EPCOS 2006; lognormal variance with pedigree 0.1727, pedigree (2,4,5,3,1)
  Estimation. An average output of 0.34 kg of air emissions per kg of produced capacitors is calculated. The output amount is split up assuming that the emissions have a similar distribution like the auxiliaries input.
  Further references:
  CPM (2006) LCI@CPM datastore - various datasets about electronic components. Download of December 12, 2006, from <http://databases.imi.chalmers.se/nukes/index.html>.
  Uncertainty: calculated from input of auxillaries
- Acetone [air, urban air close to ground]: 0.034 kg; source EPCOS 2006; lognormal variance with pedigree 0.1727, pedigree (2,4,5,3,1)
  (same comment as for Ethyl acetate)
- Methyl ethyl ketone [air, urban air close to ground]: 0.136 kg; source EPCOS 2006; lognormal variance with pedigree 0.1727, pedigree (2,4,5,3,1)
  (same comment as for Ethyl acetate)
- NMVOC, non-methane volatile organic compounds, unspecified origin [air, urban air close to ground]: 0.034 kg; source EPCOS 2006; lognormal variance with pedigree 0.1727, pedigree (2,4,5,3,1)
  (same comment as for Ethyl acetate)
- Water [air, unspecified]: 0.059525 m3; name water_to_air_unspecified; = (water_cooling_UNO_input*fraction_CW_to_air)+(water_UNO_input*fraction_PW_to_air); lognormal variance with pedigree 0.0807, pedigree (2,2,5,1,1)
  Calculated value based on literature values and expert opinion. See comments in the parametres' comment field.
  property fraction, origin: fresh water 0; name fraction_origin_fresh_water
  property fraction, origin: salt water 0; name fraction_origin_salt_water
  property fraction, origin: unspecified 1; name fraction_origin_unspecified
- Water [water, unspecified]: 0.070475 m3; name water_to_water_unspecified; = water_cooling_UNO_input*(1-fraction_CW_to_air)+water_UNO_input*(1-fraction_PW_to_air)-0.15; lognormal variance with pedigree 0.0807, pedigree (2,2,5,1,1)
  (same comment as for Water)
  property fraction, origin: fresh water 0; name fraction_origin_fresh_water_Ww
  property carbon content, non-fossil 0; name C_content_non_fossil
  property fraction, origin: unspecified 1; name fraction_origin_unspecified_Ww
  property wet mass 1000 kg; name WM
  property fraction, origin: salt water 0; name fraction_origin_salt_water_Ww
  property water in wet mass 1000 kg; name WWM
  property dry mass 0 kg; name DM
  property carbon content, fossil 0; name C_content_fossil

## Sampling procedure
own estimation

## Extrapolations
This dataset has been extrapolated from year 2005 to the year of the calculation (2021). The uncertainty has been adjusted accordingly.

## Review by Rolf Frischknecht 2007-09-20
passed.

## Review by Roland Hischier 2011-09-21
Transfer of documentation done.
