# anode production, paste, for aluminium electrolysis

Dataset: EcoSpold 2, unit process
Geography: IAI Area, EU27 & EFTA
Time period: 2015-01-01 to 2021-12-31
Technology level: old
Classification: ISIC rev.4 ecoinvent: 2790:Manufacture of other electrical equipment
Classification: EcoSpold01Categories: metals/extraction
Scenario: Business-as-Usual
System model: Allocation, cut-off by classification
Generated by: Linlin Wu
Published in: International Aluminium Insitute 2015
Database: ecoinvent
isCopyrightProtected: false
accessRestrictedTo: 1

## General comment
Industry average of paste anodes for use in the Hall-Héroult process using Söderberg technology.
[This dataset is meant to replace the following datasets:]

## Included activities start
The unit process begins with the unloading of process materials to the storage areas on site. The operations associated with this unit process include:
* anode mix preparation and anode briquette forming;
* maintenance and repair of plant and equipment; and
* treatment of process air, liquids and solids.
Treatment of scrubber sludges are excluded, as there is no corresponding waste treatment in the ecoinvent database.

## Included activities end
The output of this process is anode paste (briquettes) to be transported to electrolysis plants employing Söderberg technology.

## Geography
Data mostly from global surveys by IAI.

## Reference product
- anode, paste, for aluminium electrolysis: 1 kg; name anodePasteAmount; CPC 46950: Carbon electrodes, carbon brushes, lamp carbons, battery carbons and other articles of graphite or other carbo[…]; By-product classification allocatable product
  production volume 9.72e7 kg; name anodePasteProductionVolume
    Calculated value based on reported data, scaled up to correspond with Annual Production Volume of aluminium using Söderberg technology.
  property price 0.15 EUR2005; name anodePasteAmount_price_EUR2005
    Literature value; U.S. Department of Energy (Inert Anode Roadmap, 1998, http://www1.eere.energy.gov/manufacturing/industries_technologies/aluminum/pdfs/inertroad.pdf).
  property carbon content 0.868686
    carbon content on a dry matter basis (reserved; not for manual entry)
  properties: dry mass 1 kg, wet mass 1 kg, water in wet mass 0 kg, carbon content, fossil 0.868686, carbon content, non-fossil 0, water content 0, carbon allocation 0.868686 kg

## Inputs from technosphere
- petroleum coke: 0.702 kg; source International Aluminium Insitute 2015; lognormal variance with pedigree 0.0027, pedigree (1,2,3,1,1)
  EcoSpold01Location=RER
  properties: heating value, net 35 MJ, dry mass 1 kg, wet mass 1 kg, carbon content, fossil 0.885
- anode factory: 2.5e-10 unit; source Classen M. 2008; lognormal variance with pedigree 0.5, pedigree (5,5,5,5,5)
  Rough estimate;activityLink introduced to establish a direct link to the corresponding regional supply of this product
  EcoSpold01Location=RER
  Uncertainty: rough guess
- waste asphalt: -0.00265 kg; name wasteCarbonAmount; source International Aluminium Insitute 2015; lognormal variance with pedigree 0.0032, pedigree (1,3,3,1,1)
  EcoSpold01Location=CH
  Proxy for treatment of waste carbon
  production volume 257580 kg; = wasteCarbonAmount*anodePasteProductionVolume
    Calculated from the production volume of anode, for aluminium electrolysis in proportion to the respective output amounts.
  property price 0 EUR2005; name wasteCarbonAmount_price_EUR2005
  properties: dry mass 0.999 kg, carbon content, fossil 0.0440796, wet mass 1 kg, water content 0.001001
  note on carbon content, fossil: The waste contains 94.7% inert material (see Tab A.5 for details) 5.3% bitumen (see Tab A.6 for details), ecoinvent v2.2 report 13_I
- pitch: 0.306 kg; source International Aluminium Insitute 2015; lognormal variance with pedigree 0.0027, pedigree (1,2,3,1,1)
  Reported as Pitch in IAI report
  EcoSpold01Location=RER
  properties: dry mass 1 kg, carbon content, fossil 0.83, wet mass 1 kg, heating value, net 28 MJ
- fly ash and scrubber sludge: -0.000658 kg; name BP_amount_2; source International Aluminium Insitute 2015; lognormal variance with pedigree 0.0040006, pedigree (1,4,3,1,1)
  Reported as scrubber sludges in landfill solid waste
  production volume 63957.6 kg; = anodePasteProductionVolume * (BP_amount_2 / anodePasteAmount)
    Calculated from production volume of reference product using the relative outputs.
  property price 0 EUR2005; name BP_amount_2_price_EUR2005
  properties: water content 9, carbon content, fossil 0.167, wet mass 1 kg, dry mass 0.1 kg
  note on carbon content, fossil: Tab A.6, ecoinvent v2.2 report 13_I. C content has been calculated after data in the tables, and then referred to 1 kg DM
- heat, district or industrial, natural gas: 0.00877923 MJ; = Net_Heat_Value_ng*40.4 * m3fuel_use_ng/ fuel_use_ng; source International Aluminium Insitute 2015; lognormal variance with pedigree 0.002, pedigree (1,1,3,1,1)
  Natural gas combustion
  Uncertainty: No uncertainty added - uncertainty should be based on propagation of the uncertainty of the underlying parameters.
  property Corresponding fuel use 1.04 MJ; name fuel_use_ng
  property fuel input in physical units, m3 0.000226 m3; name m3fuel_use_ng
  property heating value, net 1 MJ; name Net_Heat_Value_ng
  note on Corresponding fuel use: Lower heating value of the fuel input related to the heat/electricity output, based on an efficiency of 96%
  note on heating value, net: net (lower) heating (calorific) value. Based on European average as reported in Dones et al. 2007.
- heat, district or industrial, other than natural gas: 0.338082 MJ; = Net_Heat_Value_HFO*40.0 * kgFuel_Input_HFO /fuel_use_HFO; source International Aluminium Insitute 2015; lognormal variance with pedigree 0.002, pedigree (1,1,3,1,1)
  Heavy oil combustion.
  Uncertainty: No uncertainty added - uncertainty should be based on propagation of the uncertainty of the underlying parameters.
  property Corresponding fuel use 1.053 MJ; name fuel_use_HFO
  property fuel input in physical units, kg 0.0089 kg; name kgFuel_Input_HFO
  property heating value, net 1 MJ; name Net_Heat_Value_HFO
  note on Corresponding fuel use: Lower heating value of the fuel input related to the heat/electricity output
- electricity, medium voltage: 0 kWh; source International Aluminium Insitute 2015; pedigree (1,1,1,1,1)
  EcoSpold01Location=UCTE
- inert waste, for final disposal: -0.00098 kg; name BP_amount_1; lognormal variance with pedigree 0.00261, pedigree (1,3,3,1,1)
  as ecoInvent does not relevent recycled by-products, this number includes external recyceled by products, as well as landfilled industrial waste.
  production volume 95256 kg; = anodePasteProductionVolume * (BP_amount_1 / anodePasteAmount)
    Calculated from production volume of reference product using the relative outputs.
  property price 0 EUR2005; name BP_amount_1_price_EUR2005
  properties: dry mass 0.995 kg, wet mass 1 kg, water content 0.00502513
- electricity, medium voltage: 0.000902701, 0.0162471, 0.00474797, 0.0079605, 0.00461153, 0.0160887, 0.00172747, 0.00049726, 0.000681767, 0.00174404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 kWh (13 entries); source International Aluminium Insitute 2015; lognormal variance with pedigree 0.0027, pedigree (1,2,3,1,1)
  EcoSpold01Location=UCTE

## Inputs from nature
- Water, cooling, unspecified natural origin [natural resource, in water]: 0.00475 m3; source International Aluminium Insitute 2015; lognormal variance with pedigree 0.0038, pedigree (2,3,3,1,1)
  Specified as freshwater in IAI report.

## Emissions to nature
- PAH, polycyclic aromatic hydrocarbons [air, unspecified]: 1e-7 kg; source International Aluminium Insitute 2015; lognormal variance with pedigree 0.0026, pedigree (1,3,3,1,1)
  Reporting rate 7%
  Uncertainty: Uncertainty calculated from that of underlying variables.
  property total PAH emission to air 7.5e-6 kg; name totalPAH
- Benzo(a)pyrene [air, unspecified]: 2e-8 kg; name BaPAmount; source International Aluminium Insitute 2015; lognormal variance with pedigree 0.304, pedigree (1,4,3,1,1)
  Reporting rate 4%
- Hydrocarbons, unspecified [water, unspecified]: 2.02e-5 kg; source International Aluminium Insitute 2015; lognormal variance with pedigree 0.004001, pedigree (1,4,3,1,1)
  Reported as Oil and grease/total hydrocarbons in IAI survey, reporting rate 2%
- Sulfur dioxide [air, unspecified]: 5.1e-5 kg; source International Aluminium Insitute 2015; lognormal variance with pedigree 0.0032, pedigree (1,3,3,1,1)
- Water [water, surface water]: 0.0042 m3; lognormal variance with pedigree 0.0038, pedigree (2,3,3,1,1)
- Particulates, > 10 um [air, unspecified]: 4.9e-5 kg; source International Aluminium Insitute 2015; lognormal variance with pedigree 0.0406, pedigree (1,3,5,1,1)
  the only particulates that is reported in the IAI 2015 LCI survey
  Uncertainty: Uncertainty calculated from that of underlying variables.
  property ratio pf particulates greater than 10 microns 0.2; name PM_greater_10um; = (4-3.2)/4
  property total particulates 0.0001 kg; name PM_total_2
- Suspended solids, unspecified [water, unspecified]: 0.00011 kg; source International Aluminium Insitute 2015; lognormal variance with pedigree 0.0046, pedigree (1,4,3,1,1)
- Fluoride [water, unspecified]: 7.1e-5 kg; source International Aluminium Insitute 2015; lognormal variance with pedigree 0.00401, pedigree (1,4,3,1,1)
- Nitrogen oxides [air, unspecified]: 1.5e-5 kg; source International Aluminium Insitute 2015; lognormal variance with pedigree 0.0426, pedigree (1,3,3,1,1)
- PAH, polycyclic aromatic hydrocarbons [water, unspecified]: 3e-8 kg; source International Aluminium Insitute 2015; lognormal variance with pedigree 0.0046, pedigree (1,4,3,1,1)
  Reported as PAH (6 Borneff components)
- Water [air, unspecified]: 0.00071 m3; source International Aluminium Insitute 2015; lognormal variance with pedigree 0.2106, pedigree (5,5,5,5,5)
  IAI data reported as "Fresh Water Consumption"

## Sampling procedure
Flows are based on a life cycle inventory (LCI) survey and an energy survey carried out by IAI for its member and non member companies. The survey was conducted in 2016 for 2015 data. Global total percent representativeness is 0.4%, based on 2015 LCI data, using 2015 production volumes. Data reported from this region reached only 7% of 2015 Soderberg production. Weighted averages from global reported facilities are adopted.

## Extrapolations
This dataset has been extrapolated from year 2015 to the year of the calculation (2021). The uncertainty has been adjusted accordingly.
