# inductor production, ring core choke type

Dataset: EcoSpold 2, unit process
Geography: GLO
Time period: 2005-01-01 to 2021-12-31
Technology level: current
Classification: ISIC rev.4 ecoinvent: 2610:Manufacture of electronic components and boards
Classification: EcoSpold01Categories: electronics/component
Scenario: Business-as-Usual
System model: Allocation, cut-off by classification
Generated by: Roland Hischier
Published in: Hischier R. 2007
Database: ecoinvent
isCopyrightProtected: true
accessRestrictedTo: 1

## General comment
This dataset represents the production of 1 kg of ring core choke type inductors. It is based on the assumption that a typical ring core choke inductor electronic module has an average weight of 6 g. The data represent a typical ring core choke type inductor used in the information and communication technology. Material data are taken from datasheets of producers of such inductors and from the literature. Infrastructure and production efforts are based on own assumptions. The production efforts represent not a specific inductor type and have thus, accordingly higher uncertainties.

## Included activities start
From reception of metals, plastics at the factory gate.

## Included activities end
This dataset includes raw material input and production efforts for the production of currently used ring core choke type inductors.

## Geography
Data represent a global valuable composition of ring core choke type inductors.

## Technology
average production comprising the following steps: core mounting; epxoy-curing; winding; welding; molding; marking; bending; testing and final control.

## Reference product
- inductor, ring core choke type: 1 kg; By-product classification allocatable product; CPC 471: Electronic valves and tubes; electronic components; parts thereof
  EcoSpold01Location=GLO
  Inductors are used extensively in analog circuits and signal processing, in conjunction with capacitors and other components form tuned circuits which can emphasize or filter out specific signal frequencies. This can range from the use of large inductors as chokes in power supplies, now obsolete, which in conjunction with filter capacitors remove residual hum or other fluctuations from the direct current output, to such small inductances as generated by a ferrite bead or torus around a cable to prevent radio frequency interference from being transmitted down the wire. Smaller inductor/capacitor combinations provide tuned circuits used in radio reception and broadcasting, for instance. (Wikipedia (2007))
  production volume 1 kg
    Dummy value to be replaced by measured, estimated or calculated value
  property carbon content, non-fossil 0
    Calculated as the addition of C contents in the product composition, and referred to 1 kg DM inductor
  property price 22.2369 EUR2005
    Calculated based on inputs: The price of the product has been calculated as a sum of the values of the material and energy inputs for this product. This value is therefore a rough estimation. It may underestimate the real price since there are additional expenses when producing any product. These expences can include for example labour costs, treatment of waste materials and profit for the producer. Please consider carefully whether this level of data quality is acceptable for your application.
  property carbon content, fossil 0.445934
    (same comment as for inductor, ring core choke type)
  property carbon content 0.445934
    carbon content on a dry matter basis (reserved; not for manual entry)
  properties: water in wet mass 0 kg, water content 0, dry mass 1 kg, wet mass 1 kg, carbon allocation 0.445934 kg

## Inputs from technosphere
- lead: 0.03774 kg; source Behrendt S 1998; lognormal variance with pedigree 0.052, pedigree (1,4,5,1,1)
  EcoSpold01Location=RER
  Calculated Value. The production of 1 kg of inductors lead to a waste amount of 0.48 kg unused raw materials. Hence, this dataset here has an input of 1.48 kg of raw materials per kg of inductor. The split to the different raw materials (metals, plastics, etc.) is based on the reported material specifications.
  Further references
  EPCOS (2006) Electronic Parts and Components. Product Survey 2007. EPCOS AG - Corporate Centre, München (Germany)
  Uncertainty: average from literature & company information
  properties: wet mass 1 kg, dry mass 1 kg
- pig iron: 0 kg; source Behrendt S 1998; pedigree (1,1,1,1,1)
  EcoSpold01Location=GLO
  Calculated Value. The production of 1 kg of inductors lead to a waste amount of 0.48 kg unused raw materials. Hence, this dataset here has an input of 1.48 kg of raw materials per kg of inductor. The split to the different raw materials (metals, plastics, etc.) is based on the reported material specifications.
  Further references
  EPCOS (2006) Electronic Parts and Components. Product Survey 2007. EPCOS AG - Corporate Centre, München (Germany)
  Uncertainty: average from literature & company information
  properties: carbon content, fossil 0.045, dry mass 1 kg, wet mass 1 kg
  note on carbon content, fossil: Pig iron is the iron produced in the blast furnace. It is an alloy of 94% Fe and more than 2% C (world average 4.5%). (ecoinvent v2.2 report 10_partII)
- polycarbonate: 0.8584 kg; source Behrendt S 1998; lognormal variance with pedigree 0.052, pedigree (1,4,5,1,1)
  Calculated Value. The production of 1 kg of inductors lead to a waste amount of 0.48 kg unused raw materials. Hence, this dataset here has an input of 1.48 kg of raw materials per kg of inductor. The split to the different raw materials (metals, plastics, etc.) is based on the reported material specifications.
  Further references
  EPCOS (2006) Electronic Parts and Components. Product Survey 2007. EPCOS AG - Corporate Centre, München (Germany)
  EcoSpold01Location=RER
  Uncertainty: average from literature & company information
  properties: heating value, net 29.57 MJ, carbon content, fossil 0.755906, dry mass 1 kg, wet mass 1 kg
  note on carbon content, fossil: Polycarbonate means here 2,2-bis(4-hydroxyphenyl)propane polycarbonate – also called bisphenol A polycarbonate ( -(O-C6H4-C(CH3)2-C6H4-O-CO)n- (ecoinvent v2.2 report 11_II), C16H14O3, MW=254 g/mol.
- funnel glass, for cathode ray tube display: 0.39856 kg; source Behrendt S 1998; lognormal variance with pedigree 0.052, pedigree (1,4,5,1,1)
  Calculated Value. The production of 1 kg of inductors lead to a waste amount of 0.48 kg unused raw materials. Hence, this dataset here has an input of 1.48 kg of raw materials per kg of inductor. The split to the different raw materials (metals, plastics, etc.) is based on the reported material specifications.
  Further references:
  EPCOS (2006) Electronic Parts and Components. Product Survey 2007. EPCOS AG - Corporate Centre, München (Germany)
  EcoSpold01Location=GLO
  Uncertainty: average from literature & company information
  properties: wet mass 1 kg, dry mass 1 kg
- zircon, 50% zirconium: 0.019092 kg; source Behrendt S 1998; lognormal variance with pedigree 0.052, pedigree (1,4,5,1,1)
  EcoSpold01Location=AU
  Calculated Value. The production of 1 kg of inductors lead to a waste amount of 0.48 kg unused raw materials. Hence, this dataset here has an input of 1.48 kg of raw materials per kg of inductor. The split to the different raw materials (metals, plastics, etc.) is based on the reported material specifications.
  Further references
  EPCOS (2006) Electronic Parts and Components. Product Survey 2007. EPCOS AG - Corporate Centre, München (Germany)
  Uncertainty: average from literature & company information
  properties: dry mass 1 kg, wet mass 1 kg
- inductor, auxilliaries and energy use: 1 kg; lognormal variance with pedigree 0.134, pedigree (3,4,5,1,4)
  EcoSpold01Location=GLO
  Estimation - details see this other activity dataset
  Uncertainty: rough estimation
- copper, cathode: 0.093092 kg; source Behrendt S 1998; lognormal variance with pedigree 0.052, pedigree (1,4,5,1,1)
  (same comment as for polycarbonate)
  properties: wet mass 1 kg, dry mass 1 kg
- epoxy resin, liquid: 0 kg; source Behrendt S 1998; pedigree (1,1,1,1,1)
  (same comment as for lead)
  properties: dry mass 1 kg, wet mass 1 kg, heating value, net 12.82 MJ, carbon content, fossil 0.42325
- tin: 0.03774 kg; source Behrendt S 1998; lognormal variance with pedigree 0.052, pedigree (1,4,5,1,1)
  (same comment as for polycarbonate)
  properties: dry mass 1 kg, wet mass 1 kg
- pig iron: 0.000865679, 0.00934632 kg (2 entries); source Behrendt S 1998; lognormal variance with pedigree 0.052, pedigree (1,4,5,1,1)
  (same comment as for pig iron)
- epoxy resin, liquid: 0.00435209, 0.0206599 kg (2 entries); source Behrendt S 1998; lognormal variance with pedigree 0.052, pedigree (1,4,5,1,1)
  (same comment as for lead)

## Sampling procedure
literature

## Extrapolations
This dataset has been extrapolated from year 2007 to the year of the calculation (2021). The uncertainty has been adjusted accordingly.

## Review by Rolf Frischknecht 2007-09-14
passed
