# treatment of residue from mechanical treatment, IT accessory, municipal waste incineration

Dataset: EcoSpold 2, unit process
Geography: CH
Time period: 1994-01-01 to 2021-12-31
Technology level: outdated
Classification: ISIC rev.4 ecoinvent: 3821:Treatment and disposal of non-hazardous waste
Classification: EcoSpold01Categories: waste management/municipal incineration
Tags: Treatment; ConvertedDataset
Scenario: Business-as-Usual
System model: Allocation, cut-off by classification
Generated by: Roland Hischier
Published in: Hischier R. 2007
Database: ecoinvent
isCopyrightProtected: true
accessRestrictedTo: 1

## General comment
Inventoried waste contains 1.9% rubber; 46.5% Plastics from electronic consumer goods; 46.5% Plastics from electronic industrial goods; 1.57% MSWI iron scrap; 0.35% Alu in MSW; 1.04% Glass; 1.99% wiring copper; 0.05% Pb in ASR inert; 0.01% silver; .
waste composition (wet, in ppm): upper heating value 34.31 MJ/kg; lower heating value 32.89 MJ/kg; H2O 8745.6; O 54869; H 70914; C 774440; S 408.04; N 12381; P 478.01; B n.a.; Cl 6321.9; Br 5120; F 232.73; I n.a.; Ag 100; As 6.9818; Ba 164.77; Cd 140.31; Co 27.441; Cr 70.87; Cu 23087; Hg 0.79129; Mn 44.103; Mo 2.7927; Ni 482.87; Pb 643.7; Sb 4467.2; Se 1.8242; Sn 199.49; V 4.6232; Zn 717.34; Be 0.43433; Sc n.a.; Sr 76.876; Ti 4167.6; Tl 0.34746; W n.a.; Si 6980.6; Fe 14270; Ca 3654.3; Al 5874.2; K 108.92; Mg n.a.; Na 800.37;
Share of carbon in waste that is biogenic 0%.
Share of iron in waste that is metallic/recyclable 89.7%.
Net energy produced in MSWI: 3.76MJ/kg waste electric energy and 7.57MJ/kg waste thermal energy
Allocation of energy production: no substitution or expansion. Total burden allocated to waste disposal function of MSWI.
One kg of this waste produces 0.08335 kg of slag and 0.01731 kg of residues, which are landfilled. Additional solidification with 0.006923 kg of cement.
[This dataset was already contained in the ecoinvent database version 2. It was not individually updated during the transfer to ecoinvent version 3. Life Cycle Impact Assessment results may still have changed, as they are affected by changes in the supply chain, i.e. in other datasets. This dataset was generated following the ecoinvent quality guidelines for version 2. It may have been subject to central changes described in the ecoinvent version 3 change report (http://www.ecoinvent.org/database/ecoinvent-version-3/reports-of-changes/), and the results of the central updates were reviewed extensively. The changes added e.g. consistent water flows and other information throughout the database. The documentation of this dataset can be found in the ecoinvent reports of version 2, which are still available via the ecoinvent website. The change report linked above covers all central changes that were made during the conversion process.]

## Included activities end
waste-specific air and water emisions from incineration, auxiliary material consumption for flue gas cleaning. Short-term emissions to river water and long-term emisisons to ground water from slag compartment (from bottom slag) and residual material landfill (from solidified fly ashes and scrubber slugde). Process energy demands for MSWI.

## Geography
Specific to the technology mix encountered in Switzerland in 2000. Well applicable to modern incineration practices in Europe, North America or Japan.

## Technology
replaced by newer incineration technology with fly ash extraction. Average Swiss MSWI plants in 2000 (grate incinerators) with electrostatic precipitator for fly ash (ESP), wet flue gas scrubber and 29.4% SNCR , 32.2% SCR-high dust , 24.6% SCR-low dust -DeNOx facilities and 13.8% without Denox (by burnt waste, according to Swiss average). Share of waste incinerated in plants with magnetic scrap separation from slag : 50%. Gross electric efficiency technology mix 12.997% and Gross thermal efficiency technology mix 25.57%

## Time period
Waste composition as given in literature reference, theoretical data or other source. Transfer coefficients for modern Swiss MSWI. Emission speciation based on early 90ies data.

## Reference product
- residue from mechanical treatment, IT accessory: -1 kg; CPC 39: Wastes or scraps; By-product classification Waste
  EcoSpold01Location=CH
  production volume 0 kg; name RP_PV_1
    outdated. Replaced by newer incineration technology with fly ash extraction.
  property price 0 EUR2005
    Waste products are assigned a price of zero as they are assumed to require further treatment.
  property carbon content, fossil 0.788899
    Tab 4.44, ecoinvent v2.2 report 18_V, for details in fraction composition. Carbon content in plastic was calculated using data in Tab A.2, ecoinvent v2.2 report 13_I. Others was also considered plastic, and calculated the same way (from pg 70, ecoinvent v2.2 report 18_V). Ferro was assumed to have a C content of 0.012 kg C/ kg (C content of steel, calculated out of emission factors published in Commission Decision of 18 July 2007 establishing guidelines for the monitoring and reporting of greenhouse gas emissions pursuant to Directive 2003/87/EC of the European Parliament and of the Council (notified under document number C(2007) 3416)). The other component of the fraction were considered to content no C.
  property heating value, net 32.89 MJ
    Value taken from the general comment of the treatment dataset.
  property carbon content 0.788899
    carbon content on a dry matter basis (reserved; not for manual entry)
  properties: dry mass 1 kg, wet mass 1 kg, carbon content, non-fossil 0, water in wet mass 0 kg, water content 0, carbon allocation 0.788899 kg

## Inputs from technosphere
- heat, district or industrial, natural gas: 0.0548235 MJ; lognormal variance with pedigree 1.3, pedigree (1,1,5,1,1)
  EcoSpold01Location=RER
  uncertainty calculated from uncertainty in average DeNOx input, uncertainty in the share of thermal NOx, uncertainty of nitrogen content in average municipal waste and the unertainty in nitrogen content in *this* waste.
  properties: heating value, net 1 MJ
- waste cement, hydrated: -0.017307 kg; name BP_amount_1; lognormal variance with pedigree 0.12, pedigree (1,1,5,1,1)
  Hydrated cement for solidification of landfilled residual material. Uncertainty calculated from unertainty of the waste composition of this waste and transfer coefficients in the incinerator and of the solidification recipe.
  EcoSpold01Location=CH
  production volume 0 kg; = RP_PV_1* BP_amount_1
    Calculated from the production volume of residue from mechanical treatment, IT accessory in proportion to the respective output amounts.
  property price 0 EUR2005; name BP_amount_1_price_EUR2005
  properties: wet mass 1 kg, dry mass 1 kg
- chemical, inorganic: 2.1764e-5 kg; lognormal variance with pedigree 0.36, pedigree (1,1,5,1,1)
  EcoSpold01Location=GLO
  Proxy for Polyelectrolyte. uncertainty calculated from uncertainty in average auxiliary material input, and the unertainty of the waste composition of this waste
  properties: wet mass 1 kg, dry mass 1 kg, carbon content, fossil 0.003
  note on carbon content, fossil: This dataset is an unweighted average of 20 inorganic substances (listed in Tab 88.1, ecoinvent v2.2 report 8, part II), being part of the top100 chemicals included in this database. The C-content has also been calculated as an unweighted average of the C content of the substances composing this dataset.
- process-specific burdens, municipal waste incineration: 1 kg; lognormal variance with pedigree 0.04, pedigree (1,1,5,1,1)
  demands per kilogram waste. uncertainty is heeded in the module;activityLink introduced to establish a direct link to the corresponding regional supply of this product
  EcoSpold01Location=CH
- residual material landfill: 3.6055e-11 unit; lognormal variance with pedigree 0.11, pedigree (1,1,5,1,1)
  uncertainty is calculated from uncertainties in waste composition and transfer coefficients in incinerator
  EcoSpold01Location=CH
- sodium hydroxide, without water, in 50% solution state: 0.0063388 kg; lognormal variance with pedigree 0.44, pedigree (1,1,5,1,1)
  uncertainty calculated from uncertainty in average auxiliary material input, and the unertainty of the waste composition of this waste
  EcoSpold01Location=RER
  properties: wet mass 1 kg, dry mass 1 kg, heating value, net 3.03 MJ
- ammonia, anhydrous, liquid: 0.00062462 kg; lognormal variance with pedigree 1.3, pedigree (1,1,5,1,1)
  EcoSpold01Location=CH
  uncertainty calculated from uncertainty in average DeNOx input, uncertainty in the share of thermal NOx, uncertainty of nitrogen content in average municipal waste and the unertainty in nitrogen content in *this* waste.
  properties: wet mass 1 kg, dry mass 1 kg
- titanium dioxide: 1.788e-5 kg; lognormal variance with pedigree 2.01, pedigree (1,1,5,1,1)
  uncertainty calculated from uncertainty in average DeNOx input, uncertainty in the share of thermal NOx, uncertainty of nitrogen content in average municipal waste and the unertainty in nitrogen content in *this* waste.
  EcoSpold01Location=RER
  properties: dry mass 1 kg, wet mass 1 kg
- cement, unspecified: 0.0069226 kg; lognormal variance with pedigree 0.12, pedigree (1,1,5,1,1)
  EcoSpold01Location=CH
  Cement for solidification of landfilled residual material. Uncertainty calculated from unertainty of the waste composition of this waste, of transfer coefficients in the incinerator and of the solidification recipe.
  properties: wet mass 1 kg, dry mass 1 kg
- quicklime, milled, packed: 0.0010975 kg; lognormal variance with pedigree 0.46, pedigree (1,1,5,1,1)
  EcoSpold01Location=CH
  uncertainty calculated from uncertainty in average auxiliary material input, and the unertainty of the waste composition of this waste
  properties: wet mass 1 kg, dry mass 0.99 kg, water content 0.010101
- slag landfill: 1.4817e-10 unit; lognormal variance with pedigree 0.09, pedigree (1,1,5,1,1)
  EcoSpold01Location=CH
  uncertainty is calculated from uncertainties in waste composition and transfer coefficients in incinerator
- chemical, organic: 0.00055959 kg; lognormal variance with pedigree 0.96, pedigree (1,1,5,1,1)
  Proxy for TMT15. uncertainty calculated from uncertainty in average auxiliary material input, and the unertainty of the waste composition of this waste
  EcoSpold01Location=GLO
  properties: heating value, net 19.03 MJ, dry mass 1 kg, wet mass 1 kg, carbon content, fossil 0.628
  note on carbon content, fossil: This dataset is an unweighted average of 20 organic substances (listed in Tab 88.1, ecoinvent v2.2 report 8, part II), being part of the top100 chemicals included in this database. The C-content has also been calculated as an unweighted average of the C content of the substances composing this dataset.
- process-specific burdens, residual material landfill: 0.017307 kg; lognormal variance with pedigree 0.11, pedigree (1,1,5,1,1)
  EcoSpold01Location=CH
  uncertainty is calculated from uncertainties in waste composition and transfer coefficients in incinerator;activityLink introduced to establish a direct link to the corresponding regional supply of this product
- chromium oxide, flakes: 3.6489e-7 kg; lognormal variance with pedigree 2.01, pedigree (1,1,5,1,1)
  Proxy for vanadium pentoxide V2O5 in SCR catalyst, uncertainty calculated from uncertainty in average DeNOx input, uncertainty in the share of thermal NOx, uncertainty of nitrogen content in average municipal waste and the unertainty in nitrogen content in *this* waste.
  EcoSpold01Location=RER
  properties: dry mass 1 kg, wet mass 1 kg
- municipal waste incineration facility: 2.5e-10 unit; lognormal variance with pedigree 0.04, pedigree (1,1,5,1,1)
  demands per kilogram waste. uncertainty is heeded in the module
  EcoSpold01Location=CH
- process-specific burdens, slag landfill: 0.083348 kg; lognormal variance with pedigree 0.09, pedigree (1,1,5,1,1)
  (same comment as for process-specific burdens, residual material landfill)
- hydrochloric acid, without water, in 30% solution state: 1.3059e-5 kg; lognormal variance with pedigree 0.36, pedigree (1,1,5,1,1)
  (same comment as for sodium hydroxide, without water, in 50% solution state)
  properties: dry mass 1 kg, wet mass 1 kg, heating value, net 3.32 MJ
- iron (III) chloride, without water, in 40% solution state: 0.00053698 kg; lognormal variance with pedigree 0.32, pedigree (1,1,5,1,1)
  (same comment as for quicklime, milled, packed)
  properties: dry mass 1 kg, wet mass 1 kg

## Emissions to nature
- Potassium, ion [water, surface water]: 1.8887e-5 kg; lognormal variance with pedigree 0.62, pedigree (1,1,5,1,1)
  uncertainty is calculated from uncertainties in waste composition and transfer coefficients in incinerator and landfills
- Iron, ion [water, surface water]: 5.568e-7 kg; lognormal variance with pedigree 0.4, pedigree (1,1,5,1,1)
  (same comment as for Potassium, ion)
- Fluoride [water, ground-, long-term]: 0.0002076 kg; lognormal variance with pedigree 0.58, pedigree (1,1,5,1,1)
  Long-term emissions from landfilling of incineration residues. uncertainty is calculated from uncertainties in waste composition and transfer coefficients in incinerator and landfills.
- Chromium VI [water, ground-, long-term]: 5.3176e-6 kg; lognormal variance with pedigree 1.9, pedigree (1,1,5,1,1)
  (same comment as for Fluoride)
- Silicon [water, ground-, long-term]: 0.00027578 kg; lognormal variance with pedigree 5.75, pedigree (1,1,5,1,1)
  (same comment as for Fluoride)
- Arsenic, ion [water, ground-, long-term]: 3.8342e-6 kg; lognormal variance with pedigree 1.36, pedigree (1,1,5,1,1)
  (same comment as for Fluoride)
- Lead [water, surface water]: 1.3068e-8 kg; lognormal variance with pedigree 1.56, pedigree (1,1,5,1,1)
  (same comment as for Potassium, ion)
- Cadmium, ion [water, surface water]: 6.3637e-8 kg; lognormal variance with pedigree 0.93, pedigree (1,1,5,1,1)
  (same comment as for Potassium, ion)
- Thallium [air, urban air close to ground]: 3.4746e-10 kg; lognormal variance with pedigree 1.77, pedigree (1,1,5,1,1)
  uncertainty is calculated from uncertainties in waste composition and transfer coefficients in incinerator
- Titanium, ion [water, ground-, long-term]: 0.0012488 kg; lognormal variance with pedigree 0.88, pedigree (1,1,5,1,1)
  (same comment as for Fluoride)
- TOC, Total Organic Carbon [water, surface water]: 2.123e-5 kg; lognormal variance with pedigree 0.27, pedigree (1,1,5,1,1)
  (same comment as for Potassium, ion)
- COD, Chemical Oxygen Demand [water, surface water]: 5.1761e-5 kg; lognormal variance with pedigree 0.28, pedigree (1,1,5,1,1)
  (same comment as for Potassium, ion)
- Tin, ion [water, ground-, long-term]: 0.00010545 kg; lognormal variance with pedigree 1.23, pedigree (1,1,5,1,1)
  (same comment as for Fluoride)
- Zinc, ion [water, ground-, long-term]: 1.4384e-5 kg; lognormal variance with pedigree 5.3, pedigree (1,1,5,1,1)
  (same comment as for Fluoride)
- Chromium [air, urban air close to ground]: 3.6137e-12 kg; lognormal variance with pedigree 1.14, pedigree (1,1,5,1,1)
  (same comment as for Thallium)
- COD, Chemical Oxygen Demand [water, ground-, long-term]: 0.019111 kg; lognormal variance with pedigree 0.05, pedigree (1,1,5,1,1)
  (same comment as for Fluoride)
- Molybdenum [water, ground-, long-term]: 2.3101e-6 kg; lognormal variance with pedigree 1.48, pedigree (1,1,5,1,1)
  (same comment as for Fluoride)
- Iron, ion [water, ground-, long-term]: 0.0040519 kg; lognormal variance with pedigree 0.5, pedigree (1,1,5,1,1)
  (same comment as for Fluoride)
- Nickel [air, urban air close to ground]: 2.0128e-11 kg; lognormal variance with pedigree 0.89, pedigree (1,1,5,1,1)
  (same comment as for Thallium)
- Chromium VI [water, surface water]: 1.593e-6 kg; lognormal variance with pedigree 1, pedigree (1,1,5,1,1)
  (same comment as for Potassium, ion)
- Thallium [water, surface water]: 2.1286e-10 kg; lognormal variance with pedigree 1.92, pedigree (1,1,5,1,1)
  (same comment as for Potassium, ion)
- Cobalt [water, surface water]: 4.6942e-9 kg; lognormal variance with pedigree 1.62, pedigree (1,1,5,1,1)
  (same comment as for Potassium, ion)
- Calcium, ion [water, surface water]: 1.4256e-5 kg; lognormal variance with pedigree 0.99, pedigree (1,1,5,1,1)
  (same comment as for Potassium, ion)
- DOC, Dissolved Organic Carbon [water, surface water]: 2.123e-5 kg; lognormal variance with pedigree 0.27, pedigree (1,1,5,1,1)
  (same comment as for Potassium, ion)
- Methane, fossil [air, urban air close to ground]: 6.3821e-6 kg; lognormal variance with pedigree 0.091225, pedigree (2,3,5,2,1)
  Confidential data from 5 plants in Switzerland and Germany
  Uncertainty: & basic uncertainty of 1.5; confidential data from 5 plants in Switzerland and Germany
- Mercury [air, urban air close to ground]: 2.7329e-14 kg; lognormal variance with pedigree 1.75, pedigree (1,1,5,1,1)
  (same comment as for Thallium)
- Copper [air, urban air close to ground]: 2.1949e-8 kg; lognormal variance with pedigree 0.38, pedigree (1,1,5,1,1)
  (same comment as for Thallium)
- Calcium, ion [water, ground-, long-term]: 0.003275 kg; lognormal variance with pedigree 0.52, pedigree (1,1,5,1,1)
  (same comment as for Fluoride)
- Silicon [water, surface water]: 7.406e-7 kg; lognormal variance with pedigree 0.75, pedigree (1,1,5,1,1)
  (same comment as for Potassium, ion)
- Phosphate [water, ground-, long-term]: 5.502e-5 kg; lognormal variance with pedigree 5.02, pedigree (1,1,5,1,1)
  (same comment as for Fluoride)
- DOC, Dissolved Organic Carbon [water, ground-, long-term]: 0.0075623 kg; lognormal variance with pedigree 0.05, pedigree (1,1,5,1,1)
  (same comment as for Fluoride)
- BOD5, Biological Oxygen Demand [water, surface water]: 2.8981e-5 kg; lognormal variance with pedigree 0.16, pedigree (1,1,5,1,1)
  (same comment as for Potassium, ion)
- Zinc, ion [water, surface water]: 1.3138e-7 kg; lognormal variance with pedigree 0.67, pedigree (1,1,5,1,1)
  (same comment as for Potassium, ion)
- Sodium [air, urban air close to ground]: 1.2218e-6 kg; lognormal variance with pedigree 0.74, pedigree (1,1,5,1,1)
  (same comment as for Thallium)
- Aluminium [air, urban air close to ground]: 3.4851e-6 kg; lognormal variance with pedigree 0.49, pedigree (1,1,5,1,1)
  (same comment as for Thallium)
- Cobalt [air, urban air close to ground]: 8.7124e-13 kg; lognormal variance with pedigree 1.28, pedigree (1,1,5,1,1)
  (same comment as for Thallium)
- Bromine [water, ground-, long-term]: 0.0008953 kg; lognormal variance with pedigree 0.5, pedigree (1,1,5,1,1)
  (same comment as for Fluoride)
- Vanadium, ion [water, ground-, long-term]: 5.0337e-7 kg; lognormal variance with pedigree 2.65, pedigree (1,1,5,1,1)
  (same comment as for Fluoride)
- Cyanide [air, urban air close to ground]: 1.1143e-5 kg; lognormal variance with pedigree 1.41, pedigree (1,1,5,1,1)
  uncertainty calculated from uncertainty in average N-emissions, uncertainty in the share of thermal NOx, uncertainty of nitrogen content in average municipal waste and the unertainty in nitrogen content in *this* waste.
- Antimony [water, surface water]: 0.0015494 kg; lognormal variance with pedigree 0.43, pedigree (1,1,5,1,1)
  (same comment as for Potassium, ion)
- Beryllium [air, urban air close to ground]: 4.3433e-10 kg; lognormal variance with pedigree 1.74, pedigree (1,1,5,1,1)
  (same comment as for Thallium)
- Chloride [water, ground-, long-term]: 0.00015262 kg; lognormal variance with pedigree 0.23, pedigree (1,1,5,1,1)
  (same comment as for Fluoride)
- Sodium, ion [water, ground-, long-term]: 0.00068924 kg; lognormal variance with pedigree 0.69, pedigree (1,1,5,1,1)
  (same comment as for Fluoride)
- Potassium [air, urban air close to ground]: 3.2837e-7 kg; lognormal variance with pedigree 1, pedigree (1,1,5,1,1)
  (same comment as for Thallium)
- Calcium [air, urban air close to ground]: 4.8293e-6 kg; lognormal variance with pedigree 0.55, pedigree (1,1,5,1,1)
  (same comment as for Thallium)
- Barium [water, ground-, long-term]: 0.00014628 kg; lognormal variance with pedigree 0.98, pedigree (1,1,5,1,1)
  (same comment as for Fluoride)
- Hydrogen fluoride [air, urban air close to ground]: 1.2249e-7 kg; lognormal variance with pedigree 0.91, pedigree (1,1,5,1,1)
  (same comment as for Thallium)
- Manganese [air, urban air close to ground]: 3.4974e-14 kg; lognormal variance with pedigree 1.25, pedigree (1,1,5,1,1)
  (same comment as for Thallium)
- Thallium [water, ground-, long-term]: 2.0275e-7 kg; lognormal variance with pedigree 1.32, pedigree (1,1,5,1,1)
  (same comment as for Fluoride)
- Nitrate [water, surface water]: 0.00015837 kg; lognormal variance with pedigree 0.28, pedigree (1,1,5,1,1)
  (same comment as for Potassium, ion)
- Cadmium, ion [water, ground-, long-term]: 1.4649e-6 kg; lognormal variance with pedigree 6.8, pedigree (1,1,5,1,1)
  (same comment as for Fluoride)
- Cobalt [water, ground-, long-term]: 2.4025e-5 kg; lognormal variance with pedigree 1.12, pedigree (1,1,5,1,1)
  (same comment as for Fluoride)
- Bromine [air, urban air close to ground]: 1.536e-5 kg; lognormal variance with pedigree 0.51, pedigree (1,1,5,1,1)
  (same comment as for Thallium)
- Mercury [water, surface water]: 8.4619e-9 kg; lognormal variance with pedigree 1.61, pedigree (1,1,5,1,1)
  (same comment as for Potassium, ion)
- Beryllium [water, surface water]: 2.699e-10 kg; lognormal variance with pedigree 1.96, pedigree (1,1,5,1,1)
  (same comment as for Potassium, ion)
- Molybdenum [air, urban air close to ground]: 5.5854e-9 kg; lognormal variance with pedigree 1.49, pedigree (1,1,5,1,1)
  (same comment as for Thallium)
- Chloride [water, surface water]: 0.0061692 kg; lognormal variance with pedigree 0.41, pedigree (1,1,5,1,1)
  (same comment as for Potassium, ion)
- Silicon [air, urban air close to ground]: 6.4257e-6 kg; lognormal variance with pedigree 0.47, pedigree (1,1,5,1,1)
  (same comment as for Thallium)
- Antimony [water, ground-, long-term]: 0.0028534 kg; lognormal variance with pedigree 0.4, pedigree (1,1,5,1,1)
  (same comment as for Fluoride)
- Titanium, ion [water, surface water]: 2.0086e-8 kg; lognormal variance with pedigree 1.87, pedigree (1,1,5,1,1)
  (same comment as for Potassium, ion)
- Sulfate [water, ground-, long-term]: 0.001026 kg; lognormal variance with pedigree 0.5, pedigree (1,1,5,1,1)
  (same comment as for Fluoride)
- Molybdenum [water, surface water]: 4.7698e-7 kg; lognormal variance with pedigree 0.97, pedigree (1,1,5,1,1)
  (same comment as for Potassium, ion)
- Dinitrogen monoxide [air, urban air close to ground]: 5.2282e-5 kg; lognormal variance with pedigree 1.41, pedigree (1,1,5,1,1)
  (same comment as for Cyanide)
- Phosphate [water, surface water]: 9.1852e-8 kg; lognormal variance with pedigree 1.11, pedigree (1,1,5,1,1)
  (same comment as for Potassium, ion)
- Ammonia [air, urban air close to ground]: 9.8102e-6 kg; lognormal variance with pedigree 1.41, pedigree (1,1,5,1,1)
  (same comment as for Cyanide)
- Strontium [water, ground-, long-term]: 7.6775e-5 kg; lognormal variance with pedigree 1.04, pedigree (1,1,5,1,1)
  (same comment as for Fluoride)
- Lead [water, ground-, long-term]: 0.00051623 kg; lognormal variance with pedigree 1.58, pedigree (1,1,5,1,1)
  (same comment as for Fluoride)
- Aluminium [water, surface water]: 2.335e-7 kg; lognormal variance with pedigree 0.88, pedigree (1,1,5,1,1)
  (same comment as for Potassium, ion)
- Carbon monoxide, fossil [air, urban air close to ground]: 0.0002229 kg; lognormal variance with pedigree 0.690625, pedigree (1,3,5,2,1)
  Literature data from switzerland and germany adapted to plant age distribution in switzerland
  Uncertainty: & basic uncertainty of 5; literature data from switzerland and germany adapted to plant age distribution in switzerland
- Arsenic, ion [water, surface water]: 3.1476e-6 kg; lognormal variance with pedigree 1.13, pedigree (1,1,5,1,1)
  (same comment as for Potassium, ion)
- Potassium, ion [water, ground-, long-term]: 8.9701e-5 kg; lognormal variance with pedigree 0.7, pedigree (1,1,5,1,1)
  (same comment as for Fluoride)
- Copper, ion [water, ground-, long-term]: 0.022516 kg; lognormal variance with pedigree 0.31, pedigree (1,1,5,1,1)
  (same comment as for Fluoride)
- Phosphorus [air, urban air close to ground]: 4.6545e-7 kg; lognormal variance with pedigree 0.81, pedigree (1,1,5,1,1)
  (same comment as for Thallium)
- Carbon dioxide, fossil [air, urban air close to ground]: 2.808 kg; lognormal variance with pedigree 0.04, pedigree (1,1,5,1,1)
  (same comment as for Thallium)
- Copper, ion [water, surface water]: 8.1905e-7 kg; lognormal variance with pedigree 1.34, pedigree (1,1,5,1,1)
  (same comment as for Potassium, ion)
- Silver, ion [water, surface water]: 3.4719e-9 kg; lognormal variance with pedigree 2.1, pedigree (1,1,5,1,1)
  (same comment as for Potassium, ion)
- Sulfate [water, surface water]: 0.0001956 kg; lognormal variance with pedigree 0.41, pedigree (1,1,5,1,1)
  (same comment as for Potassium, ion)
- BOD5, Biological Oxygen Demand [water, ground-, long-term]: 0.0062512 kg; lognormal variance with pedigree 0.05, pedigree (1,1,5,1,1)
  (same comment as for Fluoride)
- Manganese [water, ground-, long-term]: 4.3209e-5 kg; lognormal variance with pedigree 1.11, pedigree (1,1,5,1,1)
  (same comment as for Fluoride)
- Nickel, ion [water, surface water]: 3.029e-7 kg; lognormal variance with pedigree 1.38, pedigree (1,1,5,1,1)
  (same comment as for Potassium, ion)
- Arsenic [air, urban air close to ground]: 7.1214e-14 kg; lognormal variance with pedigree 1.47, pedigree (1,1,5,1,1)
  (same comment as for Thallium)
- Bromine [water, surface water]: 0.0042195 kg; lognormal variance with pedigree 0.39, pedigree (1,1,5,1,1)
  (same comment as for Potassium, ion)
- Iron [air, urban air close to ground]: 4.9041e-8 kg; lognormal variance with pedigree 0.43, pedigree (1,1,5,1,1)
  (same comment as for Thallium)
- Nitrate [water, ground-, long-term]: 0.00044476 kg; lognormal variance with pedigree 0.39, pedigree (1,1,5,1,1)
  (same comment as for Fluoride)
- Fluoride [water, surface water]: 1.789e-5 kg; lognormal variance with pedigree 0.62, pedigree (1,1,5,1,1)
  (same comment as for Potassium, ion)
- Chromium, ion [water, surface water]: 1.5576e-7 kg; lognormal variance with pedigree 1.06, pedigree (1,1,5,1,1)
  (same comment as for Potassium, ion)
- Antimony [air, urban air close to ground]: 1.7364e-11 kg; lognormal variance with pedigree 0.63, pedigree (1,1,5,1,1)
  (same comment as for Thallium)
- Silver, ion [water, ground-, long-term]: 9.9997e-5 kg; lognormal variance with pedigree 1, pedigree (1,1,5,1,1)
  (same comment as for Fluoride)
- Strontium [air, urban air close to ground]: 7.6876e-9 kg; lognormal variance with pedigree 1.07, pedigree (1,1,5,1,1)
  (same comment as for Thallium)
- Sodium, ion [water, surface water]: 0.0001099 kg; lognormal variance with pedigree 0.67, pedigree (1,1,5,1,1)
  (same comment as for Potassium, ion)
- Cadmium [air, urban air close to ground]: 7.7234e-9 kg; lognormal variance with pedigree 1, pedigree (1,1,5,1,1)
  (same comment as for Thallium)
- Tin, ion [water, surface water]: 7.1795e-9 kg; lognormal variance with pedigree 1.09, pedigree (1,1,5,1,1)
  (same comment as for Potassium, ion)
- Lead [air, urban air close to ground]: 5.0942e-9 kg; lognormal variance with pedigree 0.81, pedigree (1,1,5,1,1)
  (same comment as for Thallium)
- TOC, Total Organic Carbon [water, ground-, long-term]: 0.0075623 kg; lognormal variance with pedigree 0.05, pedigree (1,1,5,1,1)
  (same comment as for Fluoride)
- Selenium [water, ground-, long-term]: 1.2265e-6 kg; lognormal variance with pedigree 1.04, pedigree (1,1,5,1,1)
  (same comment as for Fluoride)
- Aluminium [water, ground-, long-term]: 0.0046271 kg; lognormal variance with pedigree 0.47, pedigree (1,1,5,1,1)
  (same comment as for Fluoride)
- Selenium [air, urban air close to ground]: 9.1739e-15 kg; lognormal variance with pedigree 1.65, pedigree (1,1,5,1,1)
  (same comment as for Thallium)
- Nickel, ion [water, ground-, long-term]: 0.00045313 kg; lognormal variance with pedigree 0.76, pedigree (1,1,5,1,1)
  (same comment as for Fluoride)
- Nitrogen oxides [air, urban air close to ground]: 0.00039392 kg; lognormal variance with pedigree 1.41, pedigree (1,1,5,1,1)
  (same comment as for Cyanide)
- Titanium [air, urban air close to ground]: 4.1676e-6 kg; lognormal variance with pedigree 0.53, pedigree (1,1,5,1,1)
  (same comment as for Thallium)
- Selenium [water, surface water]: 5.9415e-7 kg; lognormal variance with pedigree 1.22, pedigree (1,1,5,1,1)
  (same comment as for Potassium, ion)
- Tin [air, urban air close to ground]: 2.5068e-7 kg; lognormal variance with pedigree 0.93, pedigree (1,1,5,1,1)
  (same comment as for Thallium)
- Vanadium, ion [water, surface water]: 2.2124e-9 kg; lognormal variance with pedigree 2.04, pedigree (1,1,5,1,1)
  (same comment as for Potassium, ion)
- Barium [air, urban air close to ground]: 1.6477e-7 kg; lognormal variance with pedigree 0.95, pedigree (1,1,5,1,1)
  (same comment as for Thallium)
- Beryllium [water, ground-, long-term]: 3.4979e-7 kg; lognormal variance with pedigree 1.49, pedigree (1,1,5,1,1)
  (same comment as for Fluoride)
- Vanadium [air, urban air close to ground]: 6.9818e-11 kg; lognormal variance with pedigree 1.46, pedigree (1,1,5,1,1)
  (same comment as for Thallium)
- Zinc [air, urban air close to ground]: 1.1665e-8 kg; lognormal variance with pedigree 0.79, pedigree (1,1,5,1,1)
  (same comment as for Thallium)
- Manganese [water, surface water]: 2.2879e-9 kg; lognormal variance with pedigree 2.11, pedigree (1,1,5,1,1)
  (same comment as for Potassium, ion)
- Barium [water, surface water]: 2.2656e-8 kg; lognormal variance with pedigree 1.81, pedigree (1,1,5,1,1)
  (same comment as for Potassium, ion)
- Sulfur dioxide [air, urban air close to ground]: 1.6875e-6 kg; lognormal variance with pedigree 0.83, pedigree (1,1,5,1,1)
  (same comment as for Thallium)
- Mercury [water, ground-, long-term]: 4.117e-8 kg; lognormal variance with pedigree 3.41, pedigree (1,1,5,1,1)
  (same comment as for Fluoride)
- Hydrogen chloride [air, urban air close to ground]: 6.9851e-8 kg; lognormal variance with pedigree 0.51, pedigree (1,1,5,1,1)
  (same comment as for Thallium)
- Strontium [water, surface water]: 4.8403e-8 kg; lognormal variance with pedigree 1.75, pedigree (1,1,5,1,1)
  (same comment as for Potassium, ion)

## Sampling procedure
waste-specific calculation based on literature data

## Extrapolations
This dataset has been extrapolated from year 2000 to the year of the calculation (2021). The uncertainty has been adjusted accordingly.

## Review by Jürgen Sutter 2007-08-31
passed.
