# treatment of used fluorescent lamp

Dataset: EcoSpold 2, unit process
Geography: GLO
Time period: 2005-01-01 to 2021-12-31
Technology level: current
Classification: ISIC rev.4 ecoinvent: 3830:Materials recovery
Classification: EcoSpold01Categories: waste management/recycling
Tags: ConvertedDataset; Treatment
Scenario: Business-as-Usual
System model: Allocation, cut-off by classification
Generated by: Roland Hischier
Published in: Hischier R. 2007
Database: ecoinvent
isCopyrightProtected: true
accessRestrictedTo: 1

## General comment
This dataset is based on a dataset from ecoinvent v2. Names of by-product/waste have been changed to ensure alignement with available treatment activities.
[This dataset was already contained in the ecoinvent database version 2. It was not individually updated during the transfer to ecoinvent version 3. Life Cycle Impact Assessment results may still have changed, as they are affected by changes in the supply chain, i.e. in other datasets. This dataset was generated following the ecoinvent quality guidelines for version 2. It may have been subject to central changes described in the ecoinvent version 3 change report (http://www.ecoinvent.org/database/ecoinvent-version-3/reports-of-changes/), and the results of the central updates were reviewed extensively. The changes added e.g. consistent water flows and other information throughout the database. The documentation of this dataset can be found in the ecoinvent reports of version 2, which are still available via the ecoinvent website. The change report linked above covers all central changes that were made during the conversion process.]

## Included activities end
This dataset represents the treatment of fluorescent lamps. It includes infrastructure, energy consumption, waste and air emissions. The process has no water consumption and no water emissions.

## Geography
Information from German recycling companies - used as global average data.

## Technology
Dry dismantling technology of fluorescent lamps – with cutting, blowing, crushing and air exhaust cleaning steps.

## Reference product
- used fluorescent lamp: -1 kg; name used_flamp_RP; CPC 39990: Other wastes n.e.c.; By-product classification Waste
  EcoSpold01Location=GLO
  production volume 3.6e7 kg; name RP_PV_1; = 120000000*0.3
    Calculated based on estimates.
    120 kt fluorescent lamp annually sold (unknown source)
    0.3 share of fluorescent lamps which are actually recycled (estimate)
  property price 0 EUR2005; name used_flamp_RP_price_EUR2005
    Waste products are assigned a price of zero as they are assumed to require further treatment.
  property carbon content, fossil 0.554974
    CCFL backlight lamps is used as a specific example of fluorescent lamps (ecoinvent v2.2 report 18_V)
  property carbon content 0.554974
    carbon content on a dry matter basis (reserved; not for manual entry)
  properties: water in wet mass 0 kg, wet mass 1 kg, carbon content, non-fossil 0, dry mass 1 kg, water content 0, carbon allocation 0.554974 kg

## By-products
- aluminium scrap, post-consumer: 0 kg; CPC 39363: Waste and scrap of aluminium; By-product classification Recyclable; pedigree (1,1,1,1,1)
  this flow represents the secondary metals fraction of the treatment activity
  production volume 0 kg; = RP_PV_1 * (BP_amount_2 / used_flamp_RP)*-1
    Calculated from production volume of reference product using the relative outputs.
  property price 0.685 EUR2005
    Temporary price data. Calculated as 90% of purchasers price based on: estimated at 85% of new scrap
  property carbon content 0
    carbon content on a dry matter basis (reserved; not for manual entry)
  properties: wet mass 1 kg, water in wet mass 0 kg, carbon content, fossil 0, dry mass 1 kg, water content 0, carbon content, non-fossil 0, carbon allocation 0 kg
- mercury: 0 kg; name BP_amount_5; CPC 4160: Other non-ferrous metals and articles thereof (including waste and scrap of some metals); cermets and articles […]; By-product classification allocatable product; CAS 7439-97-6
  production volume 180000 kg; = BP_amount_5/ ABS(used_flamp_RP)* RP_PV_1
    Calculated from production volume of reference product using the relative outputs.
  property price 12.5 EUR2005
    Temporary price data. Calculated as 90% of purchasers price based on: 2005 import and export prices (total trades (USD) divided by total weight (kg) in biggest economies of the world: EU27, USA, Brasil, China, India, Japan and Russia) from UN Commodity Trade Statistics Database (http://data.un.org/Explorer.aspxDatabase [Accessed 2011.06.20]). Commodity: Mercury
  property carbon content 0
    carbon content on a dry matter basis (reserved; not for manual entry)
  properties: water in wet mass 0 kg, water content 0, dry mass 1 kg, wet mass 1 kg, carbon content, non-fossil 0, carbon content, fossil 0, carbon allocation 0 kg

## Inputs from technosphere
- manual treatment facility, waste electric and electronic equipment: 8e-10 unit; lognormal variance with pedigree 0.5761, pedigree (4,5,5,3,5)
  EcoSpold01Location=GLO
  Rough estimation of infrastructure
  Uncertainty: rough estimation of infrastructure
- electric arc furnace dust: 0 kg; name BP_amount_4; pedigree (1,1,1,1,1)
  Data from 1 German lamp recycling companies
  EcoSpold01Location=CH
  Uncertainty: data from 1 German lamp recycling companies
  production volume 0 kg
    Calculated from the production volume of used fluorescent lamp in proportion to the respective output amounts.
  property price 0 EUR2005; name BP_amount_4_price_EUR2005
  properties: carbon content, fossil 0.01339, dry mass 0.846 kg, water content 0.182033, wet mass 1 kg
- glass cullet, from fluorescent lamps treatment: -0.89 kg; name BP_amount_1
  EcoSpold01Location=GLO
  production volume 3.204e7 kg; = BP_amount_1/ ABS(used_flamp_RP)* RP_PV_1
    Calculated from production volume of reference product using the relative outputs.
  properties: wet mass 1 kg, dry mass 1 kg
- electricity, medium voltage: 0.03 kWh; lognormal variance with pedigree 0.0767, pedigree (4,3,5,3,3)
  EcoSpold01Location=UCTE
  Estimated - from CRT treatment activities
  Uncertainty: estimated - from CRT treatment activities
- hazardous waste, for underground deposit: 0 kg; name BP_amount_3
  this flow represents the rare-earth activated phosphors, from treatment of used fluorescent lamps
  production volume 0 kg
    Calculated from production volume of reference product using the relative outputs.
  property sulfur content 0.0015; name S_content
  property carbon content, non-fossil 0; name C_content_non_fossil
  property aluminium content 0.0219; name Al_content
  property water in wet mass 0 kg; name WWM
  property phosphorus content 0.529; name P_content
  property manganese content 0.0106; name Mn_content
  property barium content 0.00927; name Ba_content
  property dry mass 1 kg; name DM
  property magnesium content 0.0015; name Mg_content
  property price 0 EUR2005; name BP_amount_3_price_EUR2005
  property sodium content 0.00445; name Na_content
  property water content 0; name water_content
  property calcium content 0.693; name Ca_content
  property yttrium content 0.392; name Y_content
  property chlorine content 0.0044; name Cl_content
  property fluorine content 0.0243; name F_content
  property zinc content 0.000249; name Zn_content
  property lead content 0.00248; name Pb_content
  property strontium content 0.0134; name Sr_content
  property wet mass 1 kg; name WM
  property lanthanum content 0.00758; name La_content
  property germanium content 0.000288; name Ge_content
  property europium content 0.0022; name Eu_content
  property silicon content 0.0403; name Si_content
  property potassium content 0.000723; name K_content
  property iron content 0.00171; name Fe_content
  property terbium content 0.00188; name Tb_content
  property carbon content, fossil 0.554667; name C_content_fossil
  property antimony content 0.0109; name Sb_content
- aluminium scrap, post-consumer: -0.08 kg; lognormal variance with pedigree 0.0573, pedigree (4,3,5,3,3)
  this flow represents the secondary metals fraction of the treatment activity
  production volume 2.88e6 kg
  properties: wet mass 1 kg, dry mass 1 kg, price 0.685 EUR2005
- electric arc furnace dust: -0.00799172, -0.00200708, -1.19754e-6 kg (3 entries); lognormal variance with pedigree 0.0527, pedigree (2,4,5,3,1)
  (same comment as for electric arc furnace dust)
  production volume 360000 kg
- hazardous waste, for underground deposit: -0.000907719, -0.0140923 kg (2 entries)
  (same comment as for hazardous waste, for underground deposit)
  production volume 540000 kg
  properties: aluminium content 0.0219, phosphorus content 0.529, manganese content 0.0106, dry mass 1 kg, calcium content 0.693, yttrium content 0.392, fluorine content 0.0243, strontium content 0.0134, wet mass 1 kg, silicon content 0.0403, carbon content, fossil 0.554667, antimony content 0.0109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

## Sampling procedure
Company information & own estimation

## Extrapolations
This dataset has been extrapolated from year 2005 to the year of the calculation (2021). The uncertainty has been adjusted accordingly.

## Review by Jürgen Sutter 2007-08-31
passed.

## Review by Bo Weidema 2012-06-08
Names of by-product/wastes have been changed to ensure alignment with available treatment activities.

## Review by Bo Weidema 2012-02-17
name change of an intermediate exchange
