# treatment of waste polyvinylchloride, municipal incineration

Dataset: EcoSpold 2, unit process
Geography: CH
Time period: 1994-01-01 to 2021-12-31
Technology level: outdated
Classification: EcoSpold01Categories: waste management/municipal incineration
Classification: ISIC rev.4 ecoinvent: 3821:Treatment and disposal of non-hazardous waste
Synonyms: PVC
Tags: Treatment; ConvertedDataset
Scenario: Business-as-Usual
System model: Allocation, cut-off by classification
Generated by: Gabor Doka (obsolete)
Published in: Doka G. 2007
Database: ecoinvent
isCopyrightProtected: true
accessRestrictedTo: 1

## General comment
Inventoried waste contains 100% PVC; .
waste composition (wet, in ppm): upper heating value 21.67 MJ/kg; lower heating value 21.51 MJ/kg; H2O 2000; O 16911; H 54921; C 440610; S 1057; N 1057; P n.a.; B n.a.; Cl 475290; Br 73.839; F 15.506; I n.a.; Ag n.a.; As 2.0042; Ba 196.73; Cd 2.7546; Co 33.322; Cr 43.106; Cu 28.223; Hg 0.89569; Mn 84.301; Mo n.a.; Ni 21.729; Pb 16.002; Sb 45.323; Se 2.2152; Sn 391.41; V 303.95; Zn 59.775; Be 0.52742; Sc n.a.; Sr 93.353; Ti 1054.8; Tl 0.42194; W n.a.; Si n.a.; Fe 3930; Ca n.a.; Al 210.97; K n.a.; Mg n.a.; Na 1545.9;
Share of carbon in waste that is biogenic 0%.
Share of iron in waste that is metallic/recyclable 0%.
Net energy produced in MSWI: 2.28MJ/kg waste electric energy and 4.66MJ/kg waste thermal energy
Allocation of energy production: no substitution or expansion. Total burden allocated to waste disposal function of MSWI.
One kg of this waste produces 0.04839 kg of slag and 0.01377 kg of residues, which are landfilled. Additional solidification with 0.005508 kg of cement.
[This dataset was already contained in the ecoinvent database version 2. It was not individually updated during the transfer to ecoinvent version 3. Life Cycle Impact Assessment results may still have changed, as they are affected by changes in the supply chain, i.e. in other datasets. This dataset was generated following the ecoinvent quality guidelines for version 2. It may have been subject to central changes described in the ecoinvent version 3 change report (http://www.ecoinvent.org/database/ecoinvent-version-3/reports-of-changes/), and the results of the central updates were reviewed extensively. The changes added e.g. consistent water flows and other information throughout the database. The documentation of this dataset can be found in the ecoinvent reports of version 2, which are still available via the ecoinvent website. The change report linked above covers all central changes that were made during the conversion process.]

## Included activities end
waste-specific air and water emisions from incineration, auxiliary material consumption for flue gas cleaning. Short-term emissions to river water and long-term emisisons to ground water from slag compartment (from bottom slag) and residual material landfill (from solidified fly ashes and scrubber slugde). Process energy demands for MSWI.

## Geography
Specific to the technology mix encountered in Switzerland in 2000. Well applicable to modern incineration practices in Europe, North America or Japan.

## Technology
replaced by newer incineration technology with fly ash extraction. Average Swiss MSWI plants in 2000 with electrostatic precipitator for fly ash (ESP), wet flue gas scrubber and 29.4% SNCR , 32.2% SCR-high dust , 24.6% SCR-low dust -DeNOx facilities and 13.8% without Denox (by burnt waste, according to Swiss average). Share of waste incinerated in plants with magnetic scrap separation from slag : 50%. Gross electric efficiency technology mix 12.997% and Gross thermal efficiency technology mix 25.57%

## Time period
Waste composition as given in literature reference, theoretical data or other source. Transfer coefficients for modern Swiss MSWI. Emission speciation based on early 90ies data.

## Reference product
- waste polyvinylchloride: -1 kg; CPC 39270: Waste, parings and scrap of plastics; By-product classification Waste; CAS 9002-86-2
  EcoSpold01Location=CH
  production volume 0 kg; name RP_PV_1
    outdated. Replaced by newer incineration technology with fly ash extraction.
  property price 0 EUR2005
    Waste products are assigned a price of zero as they are assumed to require further treatment.
  property carbon content, fossil 0.440882
    C content in 1 kg DM was calculated using data in Tab A.1, ecoinvent v2.2 report 13_I
  property heating value, net 21.51 MJ
    Value taken from the general comment of the treatment dataset.
  property carbon content 0.440882
    carbon content on a dry matter basis (reserved; not for manual entry)
  properties: water in wet mass 0.002 kg, wet mass 1 kg, dry mass 0.998 kg, carbon content, non-fossil 0, water content 0.00200401, carbon allocation 0.44 kg

## Inputs from technosphere
- titanium dioxide: 1.53e-6 kg; lognormal variance with pedigree 2.31, pedigree (1,1,5,1,1)
  uncertainty calculated from uncertainty in average DeNOx input, uncertainty in the share of thermal NOx, uncertainty of nitrogen content in average municipal waste and the unertainty in nitrogen content in *this* waste.
  EcoSpold01Location=RER
  properties: wet mass 1 kg, dry mass 1 kg
- heat, district or industrial, natural gas: 0.00468 MJ; lognormal variance with pedigree 1.6, pedigree (1,1,5,1,1)
  (same comment as for titanium dioxide)
  properties: heating value, net 1 MJ
- iron (III) chloride, without water, in 40% solution state: 2.41e-5 kg; lognormal variance with pedigree 0.31, pedigree (1,1,5,1,1)
  EcoSpold01Location=CH
  uncertainty calculated from uncertainty in average auxiliary material input, and the unertainty of the waste composition of this waste
  properties: dry mass 1 kg, wet mass 1 kg
- ammonia, anhydrous, liquid: 5.33e-5 kg; lognormal variance with pedigree 1.6, pedigree (1,1,5,1,1)
  uncertainty calculated from uncertainty in average DeNOx input, uncertainty in the share of thermal NOx, uncertainty of nitrogen content in average municipal waste and the unertainty in nitrogen content in *this* waste.
  EcoSpold01Location=CH
  properties: wet mass 1 kg, dry mass 1 kg
- residual material landfill: 2.87e-11 unit; lognormal variance with pedigree 0.05, pedigree (1,1,5,1,1)
  EcoSpold01Location=CH
  uncertainty is calculated from uncertainties in waste composition and transfer coefficients in incinerator
- process-specific burdens, municipal waste incineration: 1 kg; lognormal variance with pedigree 0.04, pedigree (1,1,5,1,1)
  demands per kilogram waste. uncertainty is heeded in the module;activityLink introduced to establish a direct link to the corresponding regional supply of this product
  EcoSpold01Location=CH
- chemical, inorganic: 0.00138 kg; lognormal variance with pedigree 0.07, pedigree (1,1,5,1,1)
  Proxy for Polyelectrolyte. uncertainty calculated from uncertainty in average auxiliary material input, and the unertainty of the waste composition of this waste
  EcoSpold01Location=GLO
  properties: dry mass 1 kg, wet mass 1 kg, carbon content, fossil 0.003
  note on carbon content, fossil: This dataset is an unweighted average of 20 inorganic substances (listed in Tab 88.1, ecoinvent v2.2 report 8, part II), being part of the top100 chemicals included in this database. The C-content has also been calculated as an unweighted average of the C content of the substances composing this dataset.
- hydrochloric acid, without water, in 30% solution state: 0.000829 kg; lognormal variance with pedigree 0.07, pedigree (1,1,5,1,1)
  uncertainty calculated from uncertainty in average auxiliary material input, and the unertainty of the waste composition of this waste
  EcoSpold01Location=RER
  properties: heating value, net 3.32 MJ, dry mass 1 kg, wet mass 1 kg
- quicklime, milled, packed: 0.0819 kg; lognormal variance with pedigree 0.07, pedigree (1,1,5,1,1)
  uncertainty calculated from uncertainty in average auxiliary material input, and the unertainty of the waste composition of this waste
  EcoSpold01Location=CH
  properties: wet mass 1 kg, water content 0.010101, dry mass 0.99 kg
- chemical, organic: 1.29e-5 kg; lognormal variance with pedigree 1.26, pedigree (1,1,5,1,1)
  EcoSpold01Location=GLO
  Proxy for TMT15. uncertainty calculated from uncertainty in average auxiliary material input, and the unertainty of the waste composition of this waste
  properties: heating value, net 19.03 MJ, carbon content, fossil 0.628, dry mass 1 kg, wet mass 1 kg
  note on carbon content, fossil: This dataset is an unweighted average of 20 organic substances (listed in Tab 88.1, ecoinvent v2.2 report 8, part II), being part of the top100 chemicals included in this database. The C-content has also been calculated as an unweighted average of the C content of the substances composing this dataset.
- waste cement, hydrated: -0.0138 kg; name BP_amount_1; lognormal variance with pedigree 0.06, pedigree (1,1,5,1,1)
  EcoSpold01Location=CH
  Hydrated cement for solidification of landfilled residual material. Uncertainty calculated from unertainty of the waste composition of this waste and transfer coefficients in the incinerator and of the solidification recipe.
  production volume 0 kg; = RP_PV_1* BP_amount_1
    Calculated from the production volume of waste polyvinylchloride, 0.2% water in proportion to the respective output amounts.
  property price 0 EUR2005; name BP_amount_1_price_EUR2005
  properties: dry mass 1 kg, wet mass 1 kg
- sodium hydroxide, without water, in 50% solution state: 0.463 kg; lognormal variance with pedigree 0.07, pedigree (1,1,5,1,1)
  EcoSpold01Location=RER
  uncertainty calculated from uncertainty in average auxiliary material input, and the unertainty of the waste composition of this waste
  properties: dry mass 1 kg, wet mass 1 kg, heating value, net 3.03 MJ
- slag landfill: 8.6e-11 unit; lognormal variance with pedigree 0.06, pedigree (1,1,5,1,1)
  (same comment as for residual material landfill)
- chromium oxide, flakes: 3.12e-8 kg; lognormal variance with pedigree 2.31, pedigree (1,1,5,1,1)
  Proxy for vanadium pentoxide V2O5 in SCR catalyst, uncertainty calculated from uncertainty in average DeNOx input, uncertainty in the share of thermal NOx, uncertainty of nitrogen content in average municipal waste and the unertainty in nitrogen content in *this* waste.
  EcoSpold01Location=RER
  properties: dry mass 1 kg, wet mass 1 kg
- process-specific burdens, slag landfill: 0.0484 kg; lognormal variance with pedigree 0.06, pedigree (1,1,5,1,1)
  EcoSpold01Location=CH
  uncertainty is calculated from uncertainties in waste composition and transfer coefficients in incinerator;activityLink introduced to establish a direct link to the corresponding regional supply of this product
- process-specific burdens, residual material landfill: 0.0138 kg; lognormal variance with pedigree 0.05, pedigree (1,1,5,1,1)
  (same comment as for process-specific burdens, slag landfill)
- cement, unspecified: 0.00551 kg; lognormal variance with pedigree 0.06, pedigree (1,1,5,1,1)
  EcoSpold01Location=CH
  Cement for solidification of landfilled residual material. Uncertainty calculated from unertainty of the waste composition of this waste, of transfer coefficients in the incinerator and of the solidification recipe.
  properties: dry mass 1 kg, wet mass 1 kg
- municipal waste incineration facility: 2.5e-10 unit; lognormal variance with pedigree 0.04, pedigree (1,1,5,1,1)
  demands per kilogram waste. uncertainty is heeded in the module
  EcoSpold01Location=CH

## Emissions to nature
- Cobalt [water, surface water]: 5.7e-9 kg; lognormal variance with pedigree 1.6, pedigree (1,1,5,1,1)
  uncertainty is calculated from uncertainties in waste composition and transfer coefficients in incinerator and landfills
- Copper, ion [water, ground-, long-term]: 2.28e-5 kg; lognormal variance with pedigree 1.14, pedigree (1,1,5,1,1)
  Long-term emissions from landfilling of incineration residues. uncertainty is calculated from uncertainties in waste composition and transfer coefficients in incinerator and landfills.
- Antimony [water, surface water]: 1.57e-5 kg; lognormal variance with pedigree 0.93, pedigree (1,1,5,1,1)
  (same comment as for Cobalt)
- Tin, ion [water, ground-, long-term]: 0.000197 kg; lognormal variance with pedigree 1.22, pedigree (1,1,5,1,1)
  (same comment as for Copper, ion)
- Chromium [air, urban air close to ground]: 3.19e-12 kg; lognormal variance with pedigree 1.21, pedigree (1,1,5,1,1)
  uncertainty is calculated from uncertainties in waste composition and transfer coefficients in incinerator
- COD, Chemical Oxygen Demand [water, surface water]: 2.94e-5 kg; lognormal variance with pedigree 0.29, pedigree (1,1,5,1,1)
  (same comment as for Cobalt)
- DOC, Dissolved Organic Carbon [water, ground-, long-term]: 0.0043 kg; lognormal variance with pedigree 0.06, pedigree (1,1,5,1,1)
  (same comment as for Copper, ion)
- Methane, fossil [air, urban air close to ground]: 6.38e-6 kg; lognormal variance with pedigree 0.091225, pedigree (2,3,5,2,1)
  Confidential data from 5 plants in Switzerland and Germany
  Uncertainty: & basic uncertainty of 1.5; confidential data from 5 plants in Switzerland and Germany
- Antimony [air, urban air close to ground]: 1.76e-13 kg; lognormal variance with pedigree 1.23, pedigree (1,1,5,1,1)
  (same comment as for Chromium)
- Zinc, ion [water, ground-, long-term]: 9.27e-7 kg; lognormal variance with pedigree 5.65, pedigree (1,1,5,1,1)
  (same comment as for Copper, ion)
- Beryllium [water, ground-, long-term]: 4.25e-7 kg; lognormal variance with pedigree 1.47, pedigree (1,1,5,1,1)
  (same comment as for Copper, ion)
- Nickel, ion [water, ground-, long-term]: 2.03e-5 kg; lognormal variance with pedigree 1.16, pedigree (1,1,5,1,1)
  (same comment as for Copper, ion)
- BOD5, Biological Oxygen Demand [water, surface water]: 1.65e-5 kg; lognormal variance with pedigree 0.17, pedigree (1,1,5,1,1)
  (same comment as for Cobalt)
- Antimony [water, ground-, long-term]: 2.9e-5 kg; lognormal variance with pedigree 0.9, pedigree (1,1,5,1,1)
  (same comment as for Copper, ion)
- Chromium VI [water, ground-, long-term]: 4.56e-6 kg; lognormal variance with pedigree 1.34, pedigree (1,1,5,1,1)
  (same comment as for Copper, ion)
- Iron, ion [water, ground-, long-term]: 0.00184 kg; lognormal variance with pedigree 1.3, pedigree (1,1,5,1,1)
  (same comment as for Copper, ion)
- Strontium [water, ground-, long-term]: 9.32e-5 kg; lognormal variance with pedigree 1.01, pedigree (1,1,5,1,1)
  (same comment as for Copper, ion)
- Copper [air, urban air close to ground]: 2.08e-10 kg; lognormal variance with pedigree 1.22, pedigree (1,1,5,1,1)
  (same comment as for Chromium)
- Dinitrogen monoxide [air, urban air close to ground]: 4.46e-6 kg; lognormal variance with pedigree 1.71, pedigree (1,1,5,1,1)
  uncertainty calculated from uncertainty in average N-emissions, uncertainty in the share of thermal NOx, uncertainty of nitrogen content in average municipal waste and the unertainty in nitrogen content in *this* waste.
- Zinc [air, urban air close to ground]: 9.77e-10 kg; lognormal variance with pedigree 1.11, pedigree (1,1,5,1,1)
  (same comment as for Chromium)
- Nickel, ion [water, surface water]: 1.36e-8 kg; lognormal variance with pedigree 1.78, pedigree (1,1,5,1,1)
  (same comment as for Cobalt)
- Manganese [air, urban air close to ground]: 4.59e-13 kg; lognormal variance with pedigree 1.14, pedigree (1,1,5,1,1)
  (same comment as for Chromium)
- Lead [water, surface water]: 4.46e-10 kg; lognormal variance with pedigree 1.24, pedigree (1,1,5,1,1)
  (same comment as for Cobalt)
- Barium [water, surface water]: 2.71e-8 kg; lognormal variance with pedigree 1.79, pedigree (1,1,5,1,1)
  (same comment as for Cobalt)
- Hydrogen fluoride [air, urban air close to ground]: 8.16e-9 kg; lognormal variance with pedigree 1.27, pedigree (1,1,5,1,1)
  (same comment as for Chromium)
- Strontium [air, urban air close to ground]: 9.34e-9 kg; lognormal variance with pedigree 1.05, pedigree (1,1,5,1,1)
  (same comment as for Chromium)
- Manganese [water, ground-, long-term]: 7.26e-5 kg; lognormal variance with pedigree 1.11, pedigree (1,1,5,1,1)
  (same comment as for Copper, ion)
- Cobalt [water, ground-, long-term]: 2.92e-5 kg; lognormal variance with pedigree 1.1, pedigree (1,1,5,1,1)
  (same comment as for Copper, ion)
- Cadmium, ion [water, ground-, long-term]: 2.76e-8 kg; lognormal variance with pedigree 7.21, pedigree (1,1,5,1,1)
  (same comment as for Copper, ion)
- Selenium [water, surface water]: 7.21e-7 kg; lognormal variance with pedigree 1.2, pedigree (1,1,5,1,1)
  (same comment as for Cobalt)
- Thallium [water, surface water]: 2.58e-10 kg; lognormal variance with pedigree 1.89, pedigree (1,1,5,1,1)
  (same comment as for Cobalt)
- Titanium, ion [water, surface water]: 5.08e-9 kg; lognormal variance with pedigree 2.05, pedigree (1,1,5,1,1)
  (same comment as for Cobalt)
- Sodium [air, urban air close to ground]: 1.45e-5 kg; lognormal variance with pedigree 0.65, pedigree (1,1,5,1,1)
  (same comment as for Chromium)
- Strontium [water, surface water]: 5.88e-8 kg; lognormal variance with pedigree 1.72, pedigree (1,1,5,1,1)
  (same comment as for Cobalt)
- Lead [water, ground-, long-term]: 1.14e-6 kg; lognormal variance with pedigree 7.29, pedigree (1,1,5,1,1)
  (same comment as for Copper, ion)
- TOC, Total Organic Carbon [water, surface water]: 1.21e-5 kg; lognormal variance with pedigree 0.28, pedigree (1,1,5,1,1)
  (same comment as for Cobalt)
- Chromium, ion [water, surface water]: 1.37e-7 kg; lognormal variance with pedigree 1.13, pedigree (1,1,5,1,1)
  (same comment as for Cobalt)
- Copper, ion [water, surface water]: 1.15e-9 kg; lognormal variance with pedigree 1.78, pedigree (1,1,5,1,1)
  (same comment as for Cobalt)
- Nickel [air, urban air close to ground]: 9.38e-13 kg; lognormal variance with pedigree 1.31, pedigree (1,1,5,1,1)
  (same comment as for Chromium)
- Sulfate [water, surface water]: 0.000513 kg; lognormal variance with pedigree 0.34, pedigree (1,1,5,1,1)
  (same comment as for Cobalt)
- Nitrate [water, surface water]: 1.35e-5 kg; lognormal variance with pedigree 0.5, pedigree (1,1,5,1,1)
  (same comment as for Cobalt)
- DOC, Dissolved Organic Carbon [water, surface water]: 1.21e-5 kg; lognormal variance with pedigree 0.28, pedigree (1,1,5,1,1)
  (same comment as for Cobalt)
- Chloride [water, surface water]: 0.464 kg; lognormal variance with pedigree 0.05, pedigree (1,1,5,1,1)
  (same comment as for Cobalt)
- Bromine [air, urban air close to ground]: 2.22e-7 kg; lognormal variance with pedigree 1.06, pedigree (1,1,5,1,1)
  (same comment as for Chromium)
- Titanium [air, urban air close to ground]: 1.05e-6 kg; lognormal variance with pedigree 0.71, pedigree (1,1,5,1,1)
  (same comment as for Chromium)
- Sodium, ion [water, surface water]: 0.000334 kg; lognormal variance with pedigree 0.35, pedigree (1,1,5,1,1)
  (same comment as for Cobalt)
- Arsenic, ion [water, surface water]: 9.04e-7 kg; lognormal variance with pedigree 1.28, pedigree (1,1,5,1,1)
  (same comment as for Cobalt)
- Thallium [air, urban air close to ground]: 4.22e-10 kg; lognormal variance with pedigree 1.73, pedigree (1,1,5,1,1)
  (same comment as for Chromium)
- Vanadium, ion [water, surface water]: 2.05e-7 kg; lognormal variance with pedigree 1.08, pedigree (1,1,5,1,1)
  (same comment as for Cobalt)
- Cadmium, ion [water, surface water]: 1.25e-9 kg; lognormal variance with pedigree 1.44, pedigree (1,1,5,1,1)
  (same comment as for Cobalt)
- Barium [air, urban air close to ground]: 1.97e-7 kg; lognormal variance with pedigree 0.93, pedigree (1,1,5,1,1)
  (same comment as for Chromium)
- BOD5, Biological Oxygen Demand [water, ground-, long-term]: 0.00356 kg; lognormal variance with pedigree 0.06, pedigree (1,1,5,1,1)
  (same comment as for Copper, ion)
- Lead [air, urban air close to ground]: 5.94e-10 kg; lognormal variance with pedigree 1.28, pedigree (1,1,5,1,1)
  (same comment as for Chromium)
- Cobalt [air, urban air close to ground]: 1.06e-12 kg; lognormal variance with pedigree 1.25, pedigree (1,1,5,1,1)
  (same comment as for Chromium)
- Hydrogen chloride [air, urban air close to ground]: 5.28e-6 kg; lognormal variance with pedigree 0.11, pedigree (1,1,5,1,1)
  (same comment as for Chromium)
- Mercury [water, surface water]: 9.58e-9 kg; lognormal variance with pedigree 1.59, pedigree (1,1,5,1,1)
  (same comment as for Cobalt)
- Selenium [air, urban air close to ground]: 1.11e-14 kg; lognormal variance with pedigree 1.63, pedigree (1,1,5,1,1)
  (same comment as for Chromium)
- Bromine [water, surface water]: 6.09e-5 kg; lognormal variance with pedigree 0.87, pedigree (1,1,5,1,1)
  (same comment as for Cobalt)
- Bromine [water, ground-, long-term]: 1.29e-5 kg; lognormal variance with pedigree 1.04, pedigree (1,1,5,1,1)
  (same comment as for Copper, ion)
- Sulfate [water, ground-, long-term]: 0.00265 kg; lognormal variance with pedigree 0.41, pedigree (1,1,5,1,1)
  (same comment as for Copper, ion)
- Manganese [water, surface water]: 4.72e-9 kg; lognormal variance with pedigree 1.79, pedigree (1,1,5,1,1)
  (same comment as for Cobalt)
- Vanadium, ion [water, ground-, long-term]: 5.21e-5 kg; lognormal variance with pedigree 1.59, pedigree (1,1,5,1,1)
  (same comment as for Copper, ion)
- Chloride [water, ground-, long-term]: 0.0112 kg; lognormal variance with pedigree 0.05, pedigree (1,1,5,1,1)
  (same comment as for Copper, ion)
- Cyanide [air, urban air close to ground]: 9.51e-7 kg; lognormal variance with pedigree 1.71, pedigree (1,1,5,1,1)
  (same comment as for Dinitrogen monoxide)
- Beryllium [water, surface water]: 3.28e-10 kg; lognormal variance with pedigree 1.94, pedigree (1,1,5,1,1)
  (same comment as for Cobalt)
- Sodium, ion [water, ground-, long-term]: 0.0012 kg; lognormal variance with pedigree 0.42, pedigree (1,1,5,1,1)
  (same comment as for Copper, ion)
- Carbon monoxide, fossil [air, urban air close to ground]: 0.000223 kg; lognormal variance with pedigree 0.690625, pedigree (1,3,5,2,1)
  Literature data from switzerland and germany adapted to plant age distribution in switzerland
  Uncertainty: & basic uncertainty of 5; literature data from switzerland and germany adapted to plant age distribution in switzerland
- Arsenic [air, urban air close to ground]: 2.04e-14 kg; lognormal variance with pedigree 1.63, pedigree (1,1,5,1,1)
  (same comment as for Chromium)
- COD, Chemical Oxygen Demand [water, ground-, long-term]: 0.0109 kg; lognormal variance with pedigree 0.06, pedigree (1,1,5,1,1)
  (same comment as for Copper, ion)
- Cadmium [air, urban air close to ground]: 1.52e-10 kg; lognormal variance with pedigree 1.52, pedigree (1,1,5,1,1)
  (same comment as for Chromium)
- Vanadium [air, urban air close to ground]: 3.04e-8 kg; lognormal variance with pedigree 0.89, pedigree (1,1,5,1,1)
  (same comment as for Chromium)
- Aluminium [air, urban air close to ground]: 3.3e-7 kg; lognormal variance with pedigree 0.92, pedigree (1,1,5,1,1)
  (same comment as for Chromium)
- Barium [water, ground-, long-term]: 0.000175 kg; lognormal variance with pedigree 0.96, pedigree (1,1,5,1,1)
  (same comment as for Copper, ion)
- Tin [air, urban air close to ground]: 5.19e-7 kg; lognormal variance with pedigree 0.84, pedigree (1,1,5,1,1)
  (same comment as for Chromium)
- Chromium VI [water, surface water]: 1.4e-6 kg; lognormal variance with pedigree 1.06, pedigree (1,1,5,1,1)
  (same comment as for Cobalt)
- Carbon dioxide, fossil [air, urban air close to ground]: 1.6 kg; lognormal variance with pedigree 0.06, pedigree (1,1,5,1,1)
  (same comment as for Chromium)
- Iron [air, urban air close to ground]: 1.31e-7 kg; lognormal variance with pedigree 0.56, pedigree (1,1,5,1,1)
  (same comment as for Chromium)
- Mercury [water, ground-, long-term]: 4.66e-8 kg; lognormal variance with pedigree 3.4, pedigree (1,1,5,1,1)
  (same comment as for Copper, ion)
- Nitrate [water, ground-, long-term]: 3.8e-5 kg; lognormal variance with pedigree 0.7, pedigree (1,1,5,1,1)
  (same comment as for Copper, ion)
- Zinc, ion [water, surface water]: 1.1e-8 kg; lognormal variance with pedigree 0.95, pedigree (1,1,5,1,1)
  (same comment as for Cobalt)
- Titanium, ion [water, ground-, long-term]: 0.000316 kg; lognormal variance with pedigree 1.05, pedigree (1,1,5,1,1)
  (same comment as for Copper, ion)
- Fluoride [water, surface water]: 1.19e-6 kg; lognormal variance with pedigree 0.9, pedigree (1,1,5,1,1)
  (same comment as for Cobalt)
- TOC, Total Organic Carbon [water, ground-, long-term]: 0.0043 kg; lognormal variance with pedigree 0.06, pedigree (1,1,5,1,1)
  (same comment as for Copper, ion)
- Beryllium [air, urban air close to ground]: 5.27e-10 kg; lognormal variance with pedigree 1.7, pedigree (1,1,5,1,1)
  (same comment as for Chromium)
- Selenium [water, ground-, long-term]: 1.49e-6 kg; lognormal variance with pedigree 1.02, pedigree (1,1,5,1,1)
  (same comment as for Copper, ion)
- Thallium [water, ground-, long-term]: 2.46e-7 kg; lognormal variance with pedigree 1.3, pedigree (1,1,5,1,1)
  (same comment as for Copper, ion)
- Aluminium [water, surface water]: 1.76e-8 kg; lognormal variance with pedigree 1.2, pedigree (1,1,5,1,1)
  (same comment as for Cobalt)
- Arsenic, ion [water, ground-, long-term]: 1.1e-6 kg; lognormal variance with pedigree 1.52, pedigree (1,1,5,1,1)
  (same comment as for Copper, ion)
- Tin, ion [water, surface water]: 1.45e-8 kg; lognormal variance with pedigree 1.02, pedigree (1,1,5,1,1)
  (same comment as for Cobalt)
- Fluoride [water, ground-, long-term]: 1.38e-5 kg; lognormal variance with pedigree 0.86, pedigree (1,1,5,1,1)
  (same comment as for Copper, ion)
- Mercury [air, urban air close to ground]: 3.09e-14 kg; lognormal variance with pedigree 1.72, pedigree (1,1,5,1,1)
  (same comment as for Chromium)
- Aluminium [water, ground-, long-term]: 0.000156 kg; lognormal variance with pedigree 0.84, pedigree (1,1,5,1,1)
  (same comment as for Copper, ion)
- Ammonia [air, urban air close to ground]: 8.37e-7 kg; lognormal variance with pedigree 1.71, pedigree (1,1,5,1,1)
  (same comment as for Dinitrogen monoxide)
- Sulfur dioxide [air, urban air close to ground]: 4.5e-6 kg; lognormal variance with pedigree 0.71, pedigree (1,1,5,1,1)
  (same comment as for Chromium)
- Nitrogen oxides [air, urban air close to ground]: 3.36e-5 kg; lognormal variance with pedigree 1.71, pedigree (1,1,5,1,1)
  (same comment as for Dinitrogen monoxide)
- Iron, ion [water, surface water]: 1.34e-6 kg; lognormal variance with pedigree 0.52, pedigree (1,1,5,1,1)
  (same comment as for Cobalt)

## Sampling procedure
waste-specific calculation based on literature data

## Extrapolations
This dataset has been extrapolated from year 2000 to the year of the calculation (2021). The uncertainty has been adjusted accordingly.

## Review by Niels Jungbluth 2003-07-15
Passed. Calculation for standard deviation 95 of, i.e., infrastructure,
land occupation, transport services or other services can differ from
standard Pedigree approach used in this project and figures obtained by
this procedure.
