# treatment of waste packaging paper, municipal incineration with fly ash extraction

Dataset: EcoSpold 2, unit process
Geography: CH
Time period: 2006-01-01 to 2021-12-31
Technology level: current
Classification: ISIC rev.4 ecoinvent: 3821:Treatment and disposal of non-hazardous waste
Synonyms: municipal waste incineration
Scenario: Business-as-Usual
System model: Allocation, cut-off by classification
Share of production covered: 1.8 %
Generated by: Gabor Doka
Published in: Doka G. 2015
Database: ecoinvent
isCopyrightProtected: true
accessRestrictedTo: 1

## General comment
This dataset represents the activity of waste disposal of waste packaging paper in a municipal solid waste incinerator (MSWI) // Recommended use of this dataset: For packaging paper, which goes to disposal as part of communal waste mixture. Larger amounts of separated packaging paper will likely not be disposed in incinerators or landfills, but rather go to recycling. // // Waste composition (wet, in ppm): upper heating value 16.77 MJ/kg; lower heating value 14.12 MJ/kg; H2O 110980; O 377790; H 53851; C 403520; S 1381.8; N 4098.6; P 124.15; B 19.101; Cl 1892.4; Br n.a.; F 21.631; I n.a.; Ag n.a.; As 2.2761; Ba 125.43; Cd 1.8323; Co 0.71627; Cr 14.922; Cu 64.327; Hg 0.14537; Mn 39.49; Mo 4.7751; Ni 10.235; Pb 79.273; Sb 0.7879; Se 2.8651; Sn n.a.; V n.a.; Zn 132.49; Be 1.0824; Sc n.a.; Sr 64.751; Ti 191.01; Tl 1.9101; W n.a.; Si 21297; Fe 1305; Ca 3820.1; Al 12415; K 955.03; Mg 4775.1; Na 1020.9; // Share of carbon in waste that is biogenic 100%. // Share of metals in waste not oxidised and bulk-recyclable (exclude very small or thin parts) Iron: 0%; Alu: 0%; Copper: 0%. // Recovery of metal scrap from bottom ash to recycling: 0g iron scrap, 0g aluminium scrap, 0g copper scrap. From this waste, the FLUWA process in the technology mix recovers 0.00047kg (DM) of a hydroxide sludge to be recycled in zinc furnaces. // Ultimately one kg of this waste produces 0.1052 kg of bottom ash (can include some washed ash) and 0.009005 kg of residues, which are landfilled (technology mix). Additional solidification of residues with 0.003602 kg of cement.Net energy production: 1.74MJ/kg electric energy and 3.5MJ/kg thermal energy. //

## Included activities start
waste incineration from waste reception gate and delivery into waste bunker at incinerator plant site (without transports to the incinerator)

## Included activities end
Waste-specific short-term emissions to water from leachate. Long-term emissions from landfill to ground water.

## Geography
Specific to the technology mix encountered in Switzerland in 2012.

## Technology
average Swiss MSWI plants in 2010 (grate incinerators) with electrostatic precipitator for fly ash (ESP), wet flue gas scrubber and 25% SNCR , 42.77% SCR-high dust , 32.68% SCR-low dust -DeNOx facilities and 0% without Denox (weighted according to mass of burnt waste, representing Swiss average). Efficiency of iron scrap separation from slag : 58%. Efficiency of non-ferrous scrap separation from slag : 31%. The technology mix for this dataset includes a filter ash treatment (FLUWA) of a share of 46.22%. Gross electric efficiency technology mix 15.84% and Gross thermal efficiency technology mix 28.51%

## Time period
Waste composition as given in literature reference, theoretical data or other source. Transfer coefficients for modern MSWI.

## Reference product
- waste packaging paper: 0 kg; CPC 39240: Waste and scrap of paper or paperboard; By-product classification Recyclable
  Main reference product of this activity (supply of disposal service).
  production volume 0 kg; name RP_PV_1
    based on corresponding global production volume of MSW fraction in conventional MSWI (wo fly ash extraction) and scaled down to annual Swiss incinerated MSW mass of 3.02 mio. tonnes.
  property price 0.1 EUR2005
    For paper and board waste the price, in 2005, according to [http://ec.europa.eu/eurostat] is about 1 EUR/kg corresponding to a purchase price of 0.099 similar to the price of UN comodittie: Waste, scrap of paper, board, nes (including unsorted).
  property carbon content 0.45389
    carbon content on a dry matter basis (reserved; not for manual entry)
  properties: nitrogen content 0.0046102, oxygen content 0.42495, hydrogen content 0.060574, phosphorus content 0.00013965, cadmium content 2.061e-6, barium content 0.00014108, sulfur content 0.0015543, chromium content 1.6785e-5, arsenic content 2.5603e-6, chlorine content 0.0021286, manganese content 4.442e-5, fluorine content 2.4332e-5, cobalt content 8.0568e-7, boron content 2.1485e-5, copper content 7.2357e-5, nickel content 1.1512e-5, mercury content 1.6352e-7, aluminium content 0.013965, magnesium content 0.0053712, lead content 8.9169e-5, selenium content 3.2227e-6, molybdenum content 5.3712e-6, calcium content 0.004297, antimony content 8.8625e-7, thallium content 2.1485e-6, iron content 0.001468, zinc content 0.00014903, beryllium content 1.2175e-6, sodium content 0.0011484, strontium content 7.2834e-5, titanium content 0.00021485, dry mass 0.88902 kg, water in wet mass 0.11098 kg, wet mass 1 kg, carbon content, non-fossil 0.45389, silicon content 0.023956, potassium content 0.0010742, water content 0.12483, heating value, net 14.11 MJ, carbon allocation 0.403517 kg
- heat, for reuse in municipal waste incineration only: 1 MJ; name E_th_prod_MSWI; By-product classification allocatable product; CPC 17300: Steam and hot water; pedigree (1,1,1,1,1)
  Net useful heat generated from this waste and used in internal MSWI plant energy redistribution.
  Uncertainty: uncertainty is calculated from uncertainties in waste composition and uncertainties in energy efficiency and the uncertainty in internal energy demand
  production volume 7.7721e8 MJ
    calculated in proportion to reference product waste input to incinerator
  property exergy 0.1842 MJ; name E_th_prod_MSWI_exergy
    This exergy property is based on the exergy content of the product.
  property true value relation 0.1842; name E_th_prod_MSWI_true_value_relation
    property to calculate "true value" from
  property price 0.0106 EUR2005; name E_th_prod_MSWI_price_EUR2005
    Average European district heat price from Ecoheatcool and Euroheat 2005-2006, Ecoheat Work package 1: The European heat market. Final report. 10.6 EUR/GJ i s the price of district heat. http://www.solarthermalworld.org/files/Ecoheatcool%20WP1%20Web.pdf?download
  property true value 0.0230867; name E_th_prod_MSWI_true_value
    allocation property applied in "true value" allocation // value calculated from true value relation
- electricity, for reuse in municipal waste incineration only: 0 kWh; name E_el_prod_MSWI; CPC 17100: Electrical energy; By-product classification allocatable product; pedigree (1,1,1,1,1)
  Net electricity generated from this waste and used in internal MSWI plant energy redistribution.
  Uncertainty: uncertainty is calculated from uncertainties in waste composition and uncertainties in energy efficiency and the uncertainty in internal energy demand
  production volume 1.0761e8 kWh
  property true value relation 3.6; name E_el_prod_MSWI_true_value_relation
  property exergy 3.6 MJ; name E_el_prod_MSWI_exergy
  property price 0.1 EUR2005; name E_el_prod_MSWI_price_EUR2005
  property true value 0.0624753; name E_el_prod_MSWI_true_value

## By-products
- electricity, for reuse in municipal waste incineration only: 0 kWh; CPC 17100: Electrical energy; By-product classification allocatable product; pedigree (1,1,1,1,1)
  (same comment as for electricity, for reuse in municipal waste incineration only)
  production volume 0 kWh
    calculated in proportion to reference product waste input to incinerator
- metalliferous hydroxide sludge: 0 kg; By-product classification Recyclable; CPC 1429: Other non-ferrous metal ores and concentrates (other than uranium or thorium ores and concentrates); pedigree (1,1,1,1,1)
  Metalliferous hydroxide sludge from filter ash leaching (FLUWA).
  Uncertainty: uncertainty is calculated from uncertainties in waste composition and transfer coefficients to filter ash in incinerator and the uncertainty of the transfer coefficients of the FLUWA process.
  production volume 0 kg
    calculated in proportion to reference product waste input to incinerator
  property price 0.0042 EUR2005
    World market value of manure, deflated with barley world market price and consumer price index, based on [http://www.gov.pe.ca/photos/original/af_NM_manconv.pdf].
  property heating value, net 0 MJ
    Non combustible products are assumed to have an LHV equal to zero (0).
  property carbon content 0.044633
    carbon content on a dry matter basis (reserved; not for manual entry)
  properties: barium content 7.507e-5, phosphorus content 0.0051825, sulfur content 0.18071, oxygen content 0.48257, boron content 0.00067832, cadmium content 0.0013276, chlorine content 0.097023, fluorine content 0.00067106, antimony content 1.8181e-5, copper content 5.6837e-5, mercury content 5.6331e-7, cobalt content 3.7576e-5, arsenic content 4.4845e-5, manganese content 8.5825e-5, selenium content 6.4707e-5, nickel content 2.0259e-5, molybdenum content 0.00062235, strontium content 1.5704e-6, thallium content 4.1048e-5, silicon content 0.0023994, chromium content 0.0001521, zinc content 0.049695, iron content 0.00030623, lead content 0.0030434, water in wet mass 0.75 kg, titanium content 3.3311e-5, dry mass 0.25 kg, calcium content 0.081947, carbon content, non-fossil 0.044633, water content 3, aluminium content 0.0018219, beryllium content 3.4396e-5, potassium content 0.012919, magnesium content 0.015952, sodium content 0.017833, wet mass 1 kg, carbon allocation 0.0111582 kg

## Inputs from technosphere
- slag landfill: 1.44156e-11 unit; lognormal variance with pedigree 0.036545, pedigree (1,1,4,1,1)
  Landfill infrastructure required for landfilling of bottom ash.
  Uncertainty: uncertainty is calculated from uncertainties in waste composition and transfer coefficients in incinerator
- ammonia, anhydrous, liquid: 6.36362e-5 kg; lognormal variance with pedigree 0.7053, pedigree (1,1,4,1,1)
  Input to DeNOx stage (100% NH3).
  Uncertainty: uncertainty calculated from uncertainty in average DeNOx input, uncertainty in the share of thermal NOx, uncertainty of nitrogen content in average municipal waste and the uncertainty in nitrogen content in *this* waste.
  properties: dry mass 1 kg, wet mass 1 kg
- sodium hydroxide, without water, in 50% solution state: 6.54324e-5 kg; lognormal variance with pedigree 0.18373, pedigree (1,1,4,1,1)
  Auxilliary inputs for the flue gas treatment stage of the incinerator plant, and partially in the filter ash treatment (FLUWA).
  Uncertainty: uncertainty calculated from uncertainty in average NaOH input, of transfer coefficients in the incinerator, and the uncertainty of the waste composition of this waste
  properties: heating value, net 3.03 MJ, wet mass 1 kg, dry mass 1 kg
- waste cement, hydrated: -0.000694212 kg; lognormal variance with pedigree 0.034674, pedigree (1,1,4,1,1)
  Hydrated cement output for solidification of landfilled residual material.
  Uncertainty: Uncertainty calculated from uncertainty of the waste composition of this waste and transfer coefficients in the incinerator and of the solidification recipe.
  production volume 1.9996e6 kg
    calculated in proportion to reference product waste input to incinerator
  properties: wet mass 1 kg, dry mass 1 kg
- municipal waste incineration facility: 1.92732e-11 unit
  Demands per kilogram waste.
- process-specific burdens, slag landfill: 0.00810861 kg; lognormal variance with pedigree 0.036545, pedigree (1,1,4,1,1)
  Mass-specific expenditures required for landfilling of bottom ash.;activityLink introduced to establish a direct link to the corresponding regional supply of this product
  Uncertainty: uncertainty is calculated from uncertainties in waste composition and transfer coefficients in incinerator
- spent activated carbon with mercury: -5.979e-8 kg; name BP_amount_1; lognormal variance with pedigree 1.8232, pedigree (1,1,4,1,1)
  Spent ion exchanger charged with mercury, from FLUWA filter ash treatment, approximated here with Spent activated carbon with mercury, deposited undergound in a polyethylene Big Bag.
  Uncertainty: uncertainty calculated from uncertainty in of transfer coefficients in the incinerator, and the uncertainty of the waste composition of this waste.
  production volume 172.221 kg; = ABS(RP_PV_1 * (BP_amount_1 / RP_amount_1))
    Calculated from production volume of reference product using the relative outputs.
  property price 0 EUR2005; name BP_amount_1_price_EUR2005
  properties: heating value, net 18.18 MJ, dry mass 1 kg, wet mass 1 kg, carbon content, fossil 0.6
- hydrochloric acid, without water, in 30% solution state: 1.9681e-5 kg; lognormal variance with pedigree 0.028945, pedigree (1,1,4,1,1)
  Auxilliary inputs for the wastewater treatment stage of the incinerator plant.
  Uncertainty: uncertainty calculated from uncertainty in average HCl input, of transfer coefficients in the incinerator, and the uncertainty of the waste composition of this waste
  properties: heating value, net 3.32 MJ, dry mass 1 kg, wet mass 1 kg
- process-specific burdens, residual material landfill: 0.00138404 kg; lognormal variance with pedigree 0.02559, pedigree (1,1,4,1,1)
  Mass-specific expenditures required for landfilling of incineration residues.;activityLink introduced to establish a direct link to the corresponding regional supply of this product
  Uncertainty: uncertainty is calculated from uncertainties in waste composition and transfer coefficients in incinerator
- iron (III) chloride, without water, in 40% solution state: 8.16566e-7 kg; lognormal variance with pedigree 0.41366, pedigree (1,1,4,1,1)
  Auxilliary inputs for the wastewater treatment stage of the incinerator plant.
  Uncertainty: uncertainty calculated from uncertainty in average FeCl3 input, of transfer coefficients in the incinerator, and the uncertainty of the waste composition of this waste
  properties: wet mass 1 kg, dry mass 1 kg
- heat, district or industrial, natural gas: 0.0119 MJ; lognormal variance with pedigree 0.7053, pedigree (1,1,4,1,1)
  Input to DeNOx stage, to heat up flue gas in low-dust SCR.
  Uncertainty: uncertainty calculated from uncertainty in average DeNOx input, uncertainty in the share of thermal NOx, uncertainty of nitrogen content in average municipal waste and the uncertainty in nitrogen content in *this* waste.
  properties: heating value, net 1 MJ
- chemical, organic: 1.19771e-7 kg; lognormal variance with pedigree 1.5836, pedigree (1,1,4,1,1)
  Auxilliary inputs for the wastewater treatment stage of the incinerator plant. Proxy for (pure) Trisodium-trimercapto-s-triazine (CAS 17766-26-6), used as 15% diluted solution, aka TMT15.
  Uncertainty: uncertainty calculated from uncertainty in average TMT15 input, of transfer coefficients in the incinerator, and the uncertainty of the waste composition of this waste
  properties: wet mass 1 kg, carbon content, fossil 0.628, dry mass 1 kg, heating value, net 19.03 MJ
- transport, freight, lorry, unspecified: 0.000367177 metric ton*km; lognormal variance with pedigree 0.030503, pedigree (1,1,4,1,1)
  Transport services to transport incineration residues to landfills and filter ash to external treatments (FLUWA).
  Uncertainty: uncertainty calculated from uncertainty of the waste composition of this waste, uncertainty of transfer coefficients and the uncertainty in generic transportation distances
- residual material landfill: 2.8835e-12 unit; lognormal variance with pedigree 0.02559, pedigree (1,1,4,1,1)
  Landfill infrastructure required for landfilling of incineration residues.
  Uncertainty: uncertainty is calculated from uncertainties in waste composition and transfer coefficients in incinerator
- titanium dioxide: 3.98692e-6 kg; lognormal variance with pedigree 1.0541, pedigree (1,1,4,1,1)
  Input to DeNOx stage (TiO2 catalyst carrier)
  Uncertainty: uncertainty calculated from uncertainty in average DeNOx input, uncertainty in the share of thermal NOx, uncertainty of nitrogen content in average municipal waste and the uncertainty in nitrogen content in *this* waste.
  properties: dry mass 1 kg, wet mass 1 kg
- chemical, inorganic: 3.64016e-6 kg; lognormal variance with pedigree 0.24103, pedigree (1,1,4,1,1)
  Auxilliary inputs for the wastewater treatment stage of the incinerator plant. Proxy for Polyelectrolyte.
  Uncertainty: uncertainty calculated from uncertainty in average Polyelectrolyte input, of transfer coefficients in the incinerator, and the uncertainty of the waste composition of this waste
  properties: wet mass 1 kg, dry mass 1 kg, carbon content, fossil 0.003
- chromium oxide, flakes: 8.13636e-8 kg; lognormal variance with pedigree 1.0541, pedigree (1,1,4,1,1)
  Input to DeNOx stage. Active component in SCR catalyst (vanadium pentoxide, V2O5), here approximated with the available chromium trioxide.
  Uncertainty: uncertainty calculated from uncertainty in average DeNOx input, uncertainty in the share of thermal NOx, uncertainty of nitrogen content in average municipal waste and the uncertainty in nitrogen content in *this* waste.
  properties: dry mass 1 kg, wet mass 1 kg
- cement, unspecified: 0.00027768 kg; lognormal variance with pedigree 0.034674, pedigree (1,1,4,1,1)
  Cement required for solidification of landfilled residual material.
  Uncertainty: Uncertainty calculated from uncertainty of the waste composition of this waste, of transfer coefficients in the incinerator and of the solidification recipe.
  properties: wet mass 1 kg, dry mass 1 kg
- cationic resin: 5.68003e-8 kg; lognormal variance with pedigree 1.8232, pedigree (1,1,4,1,1)
  Auxilliary input for mercury removal in filter ash treatment (FLUWA).
  Uncertainty: uncertainty calculated from uncertainty in of transfer coefficients in the incinerator, and the uncertainty of the waste composition of this waste
  properties: dry mass 0.5 kg, wet mass 1 kg, water content 1, carbon content, fossil 0.521606, heating value, net 6.68 MJ
- hydrogen peroxide, without water, in 50% solution state: 4.76572e-5 kg; lognormal variance with pedigree 0.030536, pedigree (1,1,4,1,1)
  Auxilliary oxidising agent for filter ash treatment (FLUWA).
  Uncertainty: uncertainty calculated from uncertainty in of transfer coefficients in the incinerator, and the uncertainty of the waste composition of this waste
  properties: dry mass 1 kg, wet mass 1 kg, heating value, net 7.13 MJ
- water, decarbonised: 0.0431542 kg; lognormal variance with pedigree 0.41366, pedigree (1,1,4,1,1)
  Incinerator process water used in flue gas scrubber stage.
  Uncertainty: uncertainty calculated from uncertainty in average water input, and the uncertainty of the waste composition of this waste
  properties: wet mass 1 kg
- quicklime, milled, packed: 5.19774e-5 kg; lognormal variance with pedigree 0.87331, pedigree (1,1,4,1,1)
  Auxilliary inputs for the flue gas treatment stage of the incinerator plant.
  Uncertainty: uncertainty calculated from uncertainty in average CaO input, of transfer coefficients in the incinerator, and the uncertainty of the waste composition of this waste
  properties: water content 0.010101, dry mass 0.99 kg, wet mass 1 kg
- waste packaging paper: 0.0770927 kg
  Main reference product of this activity (supply of disposal service).
  production volume 2.2206e8 kg
  properties: price 0.1 EUR2005, nitrogen content 0.0046102, oxygen content 0.42495, hydrogen content 0.060574, aluminium content 0.013965, magnesium content 0.0053712, dry mass 0.88902 kg, wet mass 1 kg, carbon content, non-fossil 0.45389, silicon content 0.023956, water content 0.12483, heating value, net 14.11 MJ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
- metalliferous hydroxide sludge: -0.000145004 kg; lognormal variance with pedigree 0.045077, pedigree (1,1,4,1,1)
  (same comment as for metalliferous hydroxide sludge)
  production volume 417670 kg
  properties: sulfur content 0.18071, oxygen content 0.48257, chlorine content 0.097023, zinc content 0.049695, dry mass 0.25 kg, calcium content 0.081947, carbon content, non-fossil 0.044633, water content 3, potassium content 0.012919, magnesium content 0.015952, sodium content 0.017833, wet mass 1 kg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

## Inputs from nature
- Oxygen [natural resource, in air]: 0.0898361 kg; lognormal variance with pedigree 0.035, pedigree (1,1,4,1,1)
  Oxygen from ambient air needed to combust and oxidise this waste. Net demand, i.e. without O2 leaving the plant in flue gas uncombusted.
  Uncertainty: uncertainty is calculated from uncertainties in waste composition and transfer coefficients to flue gas and soild residues in incinerator

## Emissions to nature
- Zinc, ion [water, ground-, long-term]: 4.58663e-6 kg; lognormal variance with pedigree 1.7477, pedigree (1,1,4,1,1)
  Long-term emissions from landfilling of incineration residues.
  Uncertainty: uncertainty is calculated from uncertainties in waste composition and transfer coefficients in incinerator and landfills.
- Manganese [water, surface water]: 3.72458e-10 kg; lognormal variance with pedigree 1.1073, pedigree (1,1,4,1,1)
  Emissions to water from waste composition and transfer coefficients in incinerator and landfills.
  Uncertainty: uncertainty is calculated from uncertainties in waste composition and transfer coefficients in incinerator and landfills
- Cadmium [air, urban air close to ground]: 7.19992e-11 kg; lognormal variance with pedigree 1.52, pedigree (1,1,4,1,1)
  Emission to air from waste composition and transfer coefficients.
  Uncertainty: uncertainty is calculated from uncertainties in waste composition and transfer coefficients in incinerator
- Beryllium [water, ground-, long-term]: 7.83107e-8 kg; lognormal variance with pedigree 1.5258, pedigree (1,1,4,1,1)
  (same comment as for Zinc, ion)
- Molybdenum [water, surface water]: 6.1254e-8 kg; lognormal variance with pedigree 0.86868, pedigree (1,1,4,1,1)
  (same comment as for Manganese)
- Cobalt [air, urban air close to ground]: 1.00429e-10 kg; lognormal variance with pedigree 1.6346, pedigree (1,1,4,1,1)
  (same comment as for Cadmium)
- Strontium [water, ground-, long-term]: 4.98643e-6 kg; lognormal variance with pedigree 1.0276, pedigree (1,1,4,1,1)
  (same comment as for Zinc, ion)
- Nickel, ion [water, surface water]: 5.25094e-10 kg; lognormal variance with pedigree 1.8772, pedigree (1,1,4,1,1)
  (same comment as for Manganese)
- Chromium [air, urban air close to ground]: 1.00452e-9 kg; lognormal variance with pedigree 1.2442, pedigree (1,1,4,1,1)
  (same comment as for Cadmium)
- Titanium, ion [water, ground-, long-term]: 4.40669e-6 kg; lognormal variance with pedigree 1.1058, pedigree (1,1,4,1,1)
  (same comment as for Zinc, ion)
- Lead [water, surface water]: 4.16185e-10 kg; lognormal variance with pedigree 0.83035, pedigree (1,1,4,1,1)
  (same comment as for Manganese)
- Copper [air, urban air close to ground]: 4.54207e-10 kg; lognormal variance with pedigree 1.0608, pedigree (1,1,4,1,1)
  (same comment as for Cadmium)
- Thallium [water, ground-, long-term]: 1.12709e-7 kg; lognormal variance with pedigree 1.2416, pedigree (1,1,4,1,1)
  (same comment as for Zinc, ion)
- Antimony [water, surface water]: 1.19602e-8 kg; lognormal variance with pedigree 1.5139, pedigree (1,1,4,1,1)
  (same comment as for Manganese)
- Mercury [air, urban air close to ground]: 3.17768e-10 kg; lognormal variance with pedigree 1.8323, pedigree (1,1,4,1,1)
  (same comment as for Cadmium)
- Silicon [water, ground-, long-term]: 0.000124219 kg; lognormal variance with pedigree 5.1972, pedigree (1,1,4,1,1)
  (same comment as for Zinc, ion)
- Selenium [water, surface water]: 4.40076e-8 kg; lognormal variance with pedigree 1.0125, pedigree (1,1,4,1,1)
  (same comment as for Manganese)
- Manganese [air, urban air close to ground]: 5.81418e-10 kg; lognormal variance with pedigree 1.1269, pedigree (1,1,4,1,1)
  (same comment as for Cadmium)
- Iron, ion [water, ground-, long-term]: 5.15126e-5 kg; lognormal variance with pedigree 1.1454, pedigree (1,1,4,1,1)
  (same comment as for Zinc, ion)
- Tin, ion [water, surface water]: 3.12996e-14 kg; lognormal variance with pedigree 1.1159, pedigree (1,1,4,1,1)
  (same comment as for Manganese)
- Molybdenum [air, urban air close to ground]: 4.84381e-10 kg; lognormal variance with pedigree 1.39, pedigree (1,1,4,1,1)
  (same comment as for Cadmium)
- Calcium, ion [water, ground-, long-term]: 0.000258353 kg; lognormal variance with pedigree 0.44826, pedigree (1,1,4,1,1)
  (same comment as for Zinc, ion)
- Vanadium, ion [water, surface water]: 4.22553e-11 kg; lognormal variance with pedigree 0.54562, pedigree (1,1,4,1,1)
  (same comment as for Manganese)
- Nickel [air, urban air close to ground]: 9.91181e-10 kg; lognormal variance with pedigree 1.2881, pedigree (1,1,4,1,1)
  (same comment as for Cadmium)
- Aluminium [water, ground-, long-term]: 0.000736104 kg; lognormal variance with pedigree 0.3342, pedigree (1,1,4,1,1)
  (same comment as for Zinc, ion)
- Zinc, ion [water, surface water]: 6.24196e-10 kg; lognormal variance with pedigree 0.80022, pedigree (1,1,4,1,1)
  (same comment as for Manganese)
- Lead [air, urban air close to ground]: 5.03485e-10 kg; lognormal variance with pedigree 1.0387, pedigree (1,1,4,1,1)
  (same comment as for Cadmium)
- Potassium, ion [water, ground-, long-term]: 5.28285e-5 kg; lognormal variance with pedigree 0.43243, pedigree (1,1,4,1,1)
  (same comment as for Zinc, ion)
- Beryllium [water, surface water]: 5.19289e-11 kg; lognormal variance with pedigree 2.167, pedigree (1,1,4,1,1)
  (same comment as for Manganese)
- Antimony [air, urban air close to ground]: 4.8657e-14 kg; lognormal variance with pedigree 1.6772, pedigree (1,1,4,1,1)
  (same comment as for Cadmium)
- Sodium, ion [water, ground-, long-term]: 5.1511e-5 kg; lognormal variance with pedigree 0.43702, pedigree (1,1,4,1,1)
  (same comment as for Zinc, ion)
- Strontium [water, surface water]: 3.26349e-9 kg; lognormal variance with pedigree 1.6965, pedigree (1,1,4,1,1)
  (same comment as for Manganese)
- Selenium [air, urban air close to ground]: 2.63503e-9 kg; lognormal variance with pedigree 1.4479, pedigree (1,1,4,1,1)
  (same comment as for Cadmium)
- Magnesium [water, ground-, long-term]: 0.000342854 kg; lognormal variance with pedigree 0.4563, pedigree (1,1,4,1,1)
  (same comment as for Zinc, ion)
- Titanium, ion [water, surface water]: 2.99775e-9 kg; lognormal variance with pedigree 0.64944, pedigree (1,1,4,1,1)
  (same comment as for Manganese)
- Zinc [air, urban air close to ground]: 6.84629e-9 kg; lognormal variance with pedigree 0.95777, pedigree (1,1,4,1,1)
  (same comment as for Cadmium)
- NMVOC, non-methane volatile organic compounds, unspecified origin [air, urban air close to ground]: 1.15654e-7 kg; lognormal variance with pedigree 0.101504, pedigree (1,1,4,1,1)
  Incomplete combustion product emitted to air.
  Uncertainty: uncertainty calculated from uncertainty in average operation emissions, and the uncertainty of the flue gas volume from this waste.
- Thallium [water, surface water]: 1.04299e-10 kg; lognormal variance with pedigree 1.5361, pedigree (1,1,4,1,1)
  (same comment as for Manganese)
- Strontium [air, urban air close to ground]: 4.99183e-10 kg; lognormal variance with pedigree 1.0608, pedigree (1,1,4,1,1)
  (same comment as for Cadmium)
- Particulates, < 2.5 um [air, urban air close to ground]: 3.03414e-7 kg; lognormal variance with pedigree 0.43357, pedigree (1,1,4,1,1)
  (same comment as for NMVOC, non-methane volatile organic compounds, unspecified origin)
- Silicon [water, surface water]: 3.95802e-7 kg; lognormal variance with pedigree 0.43911, pedigree (1,1,4,1,1)
  (same comment as for Manganese)
- Titanium [air, urban air close to ground]: 1.22169e-8 kg; lognormal variance with pedigree 0.9063, pedigree (1,1,4,1,1)
  (same comment as for Cadmium)
- Particulates, > 2.5 um, and < 10um [air, urban air close to ground]: 1.52474e-9 kg; lognormal variance with pedigree 0.21016, pedigree (1,1,4,1,1)
  (same comment as for NMVOC, non-methane volatile organic compounds, unspecified origin)
- Iron, ion [water, surface water]: 1.97596e-9 kg; lognormal variance with pedigree 1.1048, pedigree (1,1,4,1,1)
  (same comment as for Manganese)
- Thallium [air, urban air close to ground]: 1.47255e-10 kg; lognormal variance with pedigree 1.5128, pedigree (1,1,4,1,1)
  (same comment as for Cadmium)
- Dioxins, measured as 2,3,7,8-tetrachlorodibenzo-p-dioxin [air, urban air close to ground]: 5.08233e-15 kg; lognormal variance with pedigree 0.43357, pedigree (1,1,4,1,1)
  (same comment as for NMVOC, non-methane volatile organic compounds, unspecified origin)
- Calcium, ion [water, surface water]: 5.30721e-6 kg; lognormal variance with pedigree 0.21668, pedigree (1,1,4,1,1)
  (same comment as for Manganese)
- Silicon [air, urban air close to ground]: 2.55724e-9 kg; lognormal variance with pedigree 0.35349, pedigree (1,1,4,1,1)
  (same comment as for Cadmium)
- Toluene [air, urban air close to ground]: 5.08272e-9 kg; lognormal variance with pedigree 0.101504, pedigree (1,1,4,1,1)
  (same comment as for NMVOC, non-methane volatile organic compounds, unspecified origin)
- Aluminium [water, surface water]: 6.64485e-8 kg; lognormal variance with pedigree 0.72905, pedigree (1,1,4,1,1)
  (same comment as for Manganese)
- Calcium [air, urban air close to ground]: 2.31771e-6 kg; lognormal variance with pedigree 0.50235, pedigree (1,1,4,1,1)
  (same comment as for Cadmium)
- Benzene [air, urban air close to ground]: 2.54136e-9 kg; lognormal variance with pedigree 0.101504, pedigree (1,1,4,1,1)
  (same comment as for NMVOC, non-methane volatile organic compounds, unspecified origin)
- Potassium, ion [water, surface water]: 1.99647e-5 kg; lognormal variance with pedigree 0.2501, pedigree (1,1,4,1,1)
  (same comment as for Manganese)
- Iron [air, urban air close to ground]: 1.80304e-10 kg; lognormal variance with pedigree 0.6945, pedigree (1,1,4,1,1)
  (same comment as for Cadmium)
- Benzene, pentachloro- [air, urban air close to ground]: 1.34265e-11 kg; lognormal variance with pedigree 0.101504, pedigree (1,1,4,1,1)
  (same comment as for NMVOC, non-methane volatile organic compounds, unspecified origin)
- Magnesium [water, surface water]: 2.78721e-6 kg; lognormal variance with pedigree 0.43266, pedigree (1,1,4,1,1)
  (same comment as for Manganese)
- Potassium [air, urban air close to ground]: 3.63746e-7 kg; lognormal variance with pedigree 0.68727, pedigree (1,1,4,1,1)
  (same comment as for Cadmium)
- Phenol, pentachloro- [air, urban air close to ground]: 1.10674e-12 kg; lognormal variance with pedigree 0.101504, pedigree (1,1,4,1,1)
  (same comment as for NMVOC, non-methane volatile organic compounds, unspecified origin)
- Sodium, ion [water, surface water]: 2.59016e-5 kg; lognormal variance with pedigree 0.21068, pedigree (1,1,4,1,1)
  (same comment as for Manganese)
- Aluminium [air, urban air close to ground]: 7.80332e-10 kg; lognormal variance with pedigree 0.41998, pedigree (1,1,4,1,1)
  (same comment as for Cadmium)
- Benzene, hexachloro- [air, urban air close to ground]: 5.31384e-12 kg; lognormal variance with pedigree 0.101504, pedigree (1,1,4,1,1)
  (same comment as for NMVOC, non-methane volatile organic compounds, unspecified origin)
- Chromium, ion [water, surface water]: 1.49352e-10 kg; lognormal variance with pedigree 0.81093, pedigree (1,1,4,1,1)
  (same comment as for Manganese)
- Magnesium [air, urban air close to ground]: 3.88293e-7 kg; lognormal variance with pedigree 0.48845, pedigree (1,1,4,1,1)
  (same comment as for Cadmium)
- Benzo(a)pyrene [air, urban air close to ground]: 5.65529e-14 kg; lognormal variance with pedigree 0.43357, pedigree (1,1,4,1,1)
  (same comment as for NMVOC, non-methane volatile organic compounds, unspecified origin)
- COD, Chemical Oxygen Demand [water, ground-, long-term]: 0.000230523 kg; lognormal variance with pedigree 0.034847, pedigree (1,1,4,1,1)
  (same comment as for Zinc, ion)
- BOD5, Biological Oxygen Demand [water, surface water]: 2.31432e-5 kg; lognormal variance with pedigree 0.04113, pedigree (1,1,4,1,1)
  (same comment as for Manganese)
- Water [air, urban air close to ground]: 6.96049e-5 m3; lognormal variance with pedigree 1.3619, pedigree (1,1,4,1,1)
  Water vapour from waste humidity, hydrogen oxidation and part of the process water.
  Uncertainty: Uncertainty calculated from uncertainty in waste composition, process water input and the uncertainty of fraction to air.
- BOD5, Biological Oxygen Demand [water, ground-, long-term]: 7.54036e-5 kg; lognormal variance with pedigree 0.034847, pedigree (1,1,4,1,1)
  (same comment as for Zinc, ion)
- Sodium [air, urban air close to ground]: 6.46191e-7 kg; lognormal variance with pedigree 0.67282, pedigree (1,1,4,1,1)
  (same comment as for Cadmium)
- Heat, waste [air, urban air close to ground]: 0.959341 MJ; lognormal variance with pedigree 0.059549, pedigree (1,1,4,1,1)
  Waste heat generated from heating value of this waste plus any electricity required to process it.
  Uncertainty: uncertainty is calculated from uncertainties in waste composition and uncertainties in energy efficiency and the uncertainty in internal energy demand
- TOC, Total Organic Carbon [water, ground-, long-term]: 9.12161e-5 kg; lognormal variance with pedigree 0.034847, pedigree (1,1,4,1,1)
  (same comment as for Zinc, ion)
- TOC, Total Organic Carbon [water, surface water]: 1.0315e-5 kg; lognormal variance with pedigree 0.040269, pedigree (1,1,4,1,1)
  (same comment as for Manganese)
- Water [water, surface water]: 1.45236e-5 m3; lognormal variance with pedigree 1.728, pedigree (1,1,4,1,1)
  Process water released to surface water.
  Uncertainty: uncertainty calculated from uncertainty in process water input and the uncertainty of fraction to surface water.
- Sulfate [water, ground-, long-term]: 0.000254691 kg; lognormal variance with pedigree 0.45232, pedigree (1,1,4,1,1)
  (same comment as for Zinc, ion)
- Arsenic, ion [water, ground-, long-term]: 1.06982e-7 kg; lognormal variance with pedigree 1.4711, pedigree (1,1,4,1,1)
  (same comment as for Zinc, ion)
- COD, Chemical Oxygen Demand [water, surface water]: 2.36489e-5 kg; lognormal variance with pedigree 0.040189, pedigree (1,1,4,1,1)
  (same comment as for Manganese)
- DOC, Dissolved Organic Carbon [water, ground-, long-term]: 9.12161e-5 kg; lognormal variance with pedigree 0.034847, pedigree (1,1,4,1,1)
  (same comment as for Zinc, ion)
- Barium [water, ground-, long-term]: 7.06431e-6 kg; lognormal variance with pedigree 1.2872, pedigree (1,1,4,1,1)
  (same comment as for Zinc, ion)
- Sulfate [water, surface water]: 4.35304e-5 kg; lognormal variance with pedigree 0.31477, pedigree (1,1,4,1,1)
  (same comment as for Manganese)
- Heat, waste [water, surface water]: 0.236844 MJ; lognormal variance with pedigree 0.059549, pedigree (1,1,4,1,1)
  (same comment as for Heat, waste)
- Nitrate [water, ground-, long-term]: 1.13326e-5 kg; lognormal variance with pedigree 0.49366, pedigree (1,1,4,1,1)
  (same comment as for Zinc, ion)
- Cadmium, ion [water, ground-, long-term]: 2.26475e-8 kg; lognormal variance with pedigree 5.4987, pedigree (1,1,4,1,1)
  (same comment as for Zinc, ion)
- DOC, Dissolved Organic Carbon [water, surface water]: 1.0315e-5 kg; lognormal variance with pedigree 0.040269, pedigree (1,1,4,1,1)
  (same comment as for Manganese)
- Carbon monoxide, non-fossil [air, urban air close to ground]: 4.32004e-6 kg; lognormal variance with pedigree 0.83205, pedigree (1,1,4,1,1)
  (same comment as for NMVOC, non-methane volatile organic compounds, unspecified origin)
- Boron [water, ground-, long-term]: 1.21598e-6 kg; lognormal variance with pedigree 1.1059, pedigree (1,1,4,1,1)
  (same comment as for Zinc, ion)
- Cobalt [water, ground-, long-term]: 4.85237e-8 kg; lognormal variance with pedigree 1.5673, pedigree (1,1,4,1,1)
  (same comment as for Zinc, ion)
- Nitrate [water, surface water]: 4.05947e-6 kg; lognormal variance with pedigree 0.32553, pedigree (1,1,4,1,1)
  (same comment as for Manganese)
- Carbon dioxide, non-fossil [air, urban air close to ground]: 0.113372 kg; lognormal variance with pedigree 0.031121, pedigree (1,1,4,1,1)
  (same comment as for Cadmium)
- Phosphate [water, ground-, long-term]: 8.60817e-7 kg; lognormal variance with pedigree 5.3208, pedigree (1,1,4,1,1)
  (same comment as for Zinc, ion)
- Chromium VI [water, ground-, long-term]: 6.191e-8 kg; lognormal variance with pedigree 2.5995, pedigree (1,1,4,1,1)
  (same comment as for Zinc, ion)
- Phosphate [water, surface water]: 1.42514e-8 kg; lognormal variance with pedigree 0.46741, pedigree (1,1,4,1,1)
  (same comment as for Manganese)
- Methane, non-fossil [air, urban air close to ground]: 3.812e-8 kg; lognormal variance with pedigree 0.101504, pedigree (1,1,4,1,1)
  (same comment as for NMVOC, non-methane volatile organic compounds, unspecified origin)
- Chloride [water, ground-, long-term]: 1.83766e-5 kg; lognormal variance with pedigree 0.57109, pedigree (1,1,4,1,1)
  (same comment as for Zinc, ion)
- Copper, ion [water, ground-, long-term]: 4.67212e-6 kg; lognormal variance with pedigree 1.0182, pedigree (1,1,4,1,1)
  (same comment as for Zinc, ion)
- Boron [water, surface water]: 1.5252e-8 kg; lognormal variance with pedigree 1.1859, pedigree (1,1,4,1,1)
  (same comment as for Manganese)
- Sulfur dioxide [air, urban air close to ground]: 1.1328e-6 kg; lognormal variance with pedigree 0.63546, pedigree (1,1,4,1,1)
  (same comment as for Cadmium)
- Fluoride [water, ground-, long-term]: 1.1126e-6 kg; lognormal variance with pedigree 0.74756, pedigree (1,1,4,1,1)
  (same comment as for Zinc, ion)
- Mercury [water, ground-, long-term]: 2.35387e-9 kg; lognormal variance with pedigree 1.8261, pedigree (1,1,4,1,1)
  (same comment as for Zinc, ion)
- Chloride [water, surface water]: 0.000123911 kg; lognormal variance with pedigree 0.23281, pedigree (1,1,4,1,1)
  (same comment as for Manganese)
- Nitrogen oxides [air, urban air close to ground]: 2.36929e-5 kg; lognormal variance with pedigree 0.75918, pedigree (1,1,4,1,1)
  Sum of fuel-Nox and thermal-NOx emitted to air after DeNOx stage.
  Uncertainty: uncertainty calculated from uncertainty in average N-emissions and uncertainty in the share of thermal NOx and the uncertainty in nitrogen content in *this* waste.
- Manganese [water, ground-, long-term]: 2.414e-6 kg; lognormal variance with pedigree 1.3837, pedigree (1,1,4,1,1)
  (same comment as for Zinc, ion)
- Fluoride [water, surface water]: 4.85352e-7 kg; lognormal variance with pedigree 0.78418, pedigree (1,1,4,1,1)
  (same comment as for Manganese)
- Ammonia [air, urban air close to ground]: 7.482e-8 kg; lognormal variance with pedigree 0.75918, pedigree (1,1,4,1,1)
  Nitrogen species emitted to air after DeNOx stage.
  Uncertainty: uncertainty calculated from uncertainty in average N-emissions and uncertainty in the share of thermal NOx and the uncertainty in nitrogen content in *this* waste.
- Molybdenum [water, ground-, long-term]: 2.83824e-7 kg; lognormal variance with pedigree 1.3726, pedigree (1,1,4,1,1)
  (same comment as for Zinc, ion)
- Arsenic, ion [water, surface water]: 6.80998e-8 kg; lognormal variance with pedigree 1.3541, pedigree (1,1,4,1,1)
  (same comment as for Manganese)
- Dinitrogen monoxide [air, urban air close to ground]: 4.7126e-6 kg; lognormal variance with pedigree 1.2588, pedigree (1,1,4,1,1)
  (same comment as for Ammonia)
- Nickel, ion [water, ground-, long-term]: 7.73085e-7 kg; lognormal variance with pedigree 1.2525, pedigree (1,1,4,1,1)
  (same comment as for Zinc, ion)
- Barium [water, surface water]: 4.10272e-9 kg; lognormal variance with pedigree 0.75096, pedigree (1,1,4,1,1)
  (same comment as for Manganese)
- Cyanide [air, urban air close to ground]: 1.01246e-6 kg; lognormal variance with pedigree 1.2588, pedigree (1,1,4,1,1)
  (same comment as for Ammonia)
- Lead [water, ground-, long-term]: 4.30293e-6 kg; lognormal variance with pedigree 2.5349, pedigree (1,1,4,1,1)
  (same comment as for Zinc, ion)
- Cadmium, ion [water, surface water]: 2.51075e-11 kg; lognormal variance with pedigree 1.4156, pedigree (1,1,4,1,1)
  (same comment as for Manganese)
- Phosphorus [air, urban air close to ground]: 9.72678e-9 kg; lognormal variance with pedigree 0.95777, pedigree (1,1,4,1,1)
  (same comment as for Cadmium)
- Antimony [water, ground-, long-term]: 2.46889e-8 kg; lognormal variance with pedigree 1.3627, pedigree (1,1,4,1,1)
  (same comment as for Zinc, ion)
- Cobalt [water, surface water]: 9.45927e-12 kg; lognormal variance with pedigree 2.0756, pedigree (1,1,4,1,1)
  (same comment as for Manganese)
- Hydrogen chloride [air, urban air close to ground]: 8.32524e-8 kg; lognormal variance with pedigree 0.60628, pedigree (1,1,4,1,1)
  (same comment as for Cadmium)
- Selenium [water, ground-, long-term]: 1.69496e-7 kg; lognormal variance with pedigree 0.92255, pedigree (1,1,4,1,1)
  (same comment as for Zinc, ion)
- Chromium VI [water, surface water]: 1.78493e-8 kg; lognormal variance with pedigree 1.2942, pedigree (1,1,4,1,1)
  (same comment as for Manganese)
- Hydrogen fluoride [air, urban air close to ground]: 1.12509e-8 kg; lognormal variance with pedigree 1.1848, pedigree (1,1,4,1,1)
  (same comment as for Cadmium)
- Tin, ion [water, ground-, long-term]: 1.87482e-11 kg; lognormal variance with pedigree 3.9403, pedigree (1,1,4,1,1)
  (same comment as for Zinc, ion)
- Copper, ion [water, surface water]: 4.29206e-10 kg; lognormal variance with pedigree 1.1693, pedigree (1,1,4,1,1)
  (same comment as for Manganese)
- Arsenic [air, urban air close to ground]: 1.37456e-9 kg; lognormal variance with pedigree 1.484, pedigree (1,1,4,1,1)
  (same comment as for Cadmium)
- Vanadium, ion [water, ground-, long-term]: 1.32337e-8 kg; lognormal variance with pedigree 0.02524, pedigree (1,1,4,1,1)
  (same comment as for Zinc, ion)
- Mercury [water, surface water]: 5.9635e-11 kg; lognormal variance with pedigree 1.9899, pedigree (1,1,4,1,1)
  (same comment as for Manganese)
- Barium [air, urban air close to ground]: 3.79535e-8 kg; lognormal variance with pedigree 0.95041, pedigree (1,1,4,1,1)
  (same comment as for Cadmium)
