# treatment of residue from cooling tower, sanitary landfill

Dataset: EcoSpold 2, unit process
Geography: CH
Time period: 1994-01-01 to 2021-12-31
Technology level: current
Classification: ISIC rev.4 ecoinvent: 3821:Treatment and disposal of non-hazardous waste
Classification: EcoSpold01Categories: waste management/sanitary landfill
Tags: Treatment; ConvertedDataset
Scenario: Business-as-Usual
System model: Allocation, cut-off by classification
Generated by: Gabor Doka (obsolete)
Published in: Doka G. 2007
Database: ecoinvent
isCopyrightProtected: true
accessRestrictedTo: 1

## General comment
Inventoried waste contains 100% cooling tower residue; .
waste composition (wet, in ppm): H2O 300000; O 274410; H n.a.; C 38096; S 51430; N n.a.; P n.a.; B n.a.; Cl 22.858; Br n.a.; F n.a.; I n.a.; Ag n.a.; As 26.667; Ba n.a.; Cd 2.2858; Co n.a.; Cr 224.77; Cu 476.2; Hg 1.181; Mn n.a.; Mo n.a.; Ni 4000.1; Pb 102.86; Sb n.a.; Se n.a.; Sn n.a.; V 8000.2; Zn 838.12; Be n.a.; Sc n.a.; Sr n.a.; Ti n.a.; Tl n.a.; W n.a.; Si 83695; Fe 111910; Ca 73513; Al 32259; K 6483.3; Mg 5743.9; Na 8762.1;
Share of carbon in waste that is biogenic 0%.
Overall degradability of waste during 100 years: 1.52%.
[This dataset was already contained in the ecoinvent database version 2. It was not individually updated during the transfer to ecoinvent version 3. Life Cycle Impact Assessment results may still have changed, as they are affected by changes in the supply chain, i.e. in other datasets. This dataset was generated following the ecoinvent quality guidelines for version 2. It may have been subject to central changes described in the ecoinvent version 3 change report (http://www.ecoinvent.org/database/ecoinvent-version-3/reports-of-changes/), and the results of the central updates were reviewed extensively. The changes added e.g. consistent water flows and other information throughout the database. The documentation of this dataset can be found in the ecoinvent reports of version 2, which are still available via the ecoinvent website. The change report linked above covers all central changes that were made during the conversion process.]

## Included activities end
Waste-specific short-term emissions to air via landfill gas incineration and landfill leachate. Burdens from treatment of short-term leachate (0-100a) in wastewater treatment plant (including WWTP sludge disposal in municipal incinerator). Long-term emissions from landfill to groundwater (after base lining failure).

## Geography
Technology encountered in Switzerland in 2000. Landfill includes base seal, leachate collection system, treatment of leachate in municipal wastewater treatment plant.

## Technology
Swiss municipal sanitary landfill for biogenic or untreated municipal waste ('reactive organic landfill'). Landfill gas and leachate collection system. Recultivation and monitoring for 150 years after closure.

## Reference product
- residue from cooling tower: -1 kg; CPC 39: Wastes or scraps; By-product classification Waste
  production volume 0.0336675 kg
    This is a placeholder value that does not reflect real-world production volumes. This dataset does not currently require a real-world production volume to work in the database framework, and no actual data were collected yet. This has no negative effect on the results of the ecoinvent database. The placeholder value of this activity was scaled according to the nominal GDP of 2005 (source: United Nations, http://data.un.org/Glossary.aspx?q=GDP+%28current+US%24%29, accessed 20130726) to reflect an appropriate share of the global production volume, which is also a placeholder value.
  property heating value, net 0 MJ
    Non combustible products are assumed to have an LHV equal to zero (0).
  property price 0 EUR2005
    Waste products are assigned a price of zero as they are assumed to require further treatment.
  property carbon content 0.0544233
    carbon content on a dry matter basis (reserved; not for manual entry)
  properties: water content 0.428571, carbon content, non-fossil 0, carbon content, fossil 0.0544233, water in wet mass 0.3 kg, wet mass 1 kg, dry mass 0.7 kg, carbon allocation 0.0380963 kg

## Inputs from technosphere
- process-specific burdens, residual material landfill: 2.36e-5 kg; lognormal variance with pedigree 0.37, pedigree (1,1,5,1,1)
  burden from incineration of sludge from wastewater treatment of the short-term leachate (0-100a). uncertainty is calculated from uncertainties in waste composition and transfer coefficients in incinerator and uncertainty of waste decomposition and short-term leaching in sanitary landfill;activityLink introduced to establish a direct link to the corresponding regional supply of this product
- electricity, for reuse in municipal waste incineration only: 5.13e-5 kWh; name E_el_prod_MSWI; lognormal variance with pedigree 0.59, pedigree (1,1,5,1,1)
  burden from incineration of sludge from wastewater treatment of the short-term leachate (0-100a). uncertainty is calculated from uncertainties in waste composition and transfer coefficients in incinerator and uncertainty of waste decomposition and short-term leaching in sanitary landfill
- iron (III) chloride, without water, in 40% solution state: 8.35e-8 kg; lognormal variance with pedigree 0.85, pedigree (1,1,5,1,1)
  (same comment as for electricity, for reuse in municipal waste incineration only)
  properties: dry mass 1 kg, wet mass 1 kg
- process-specific burdens, municipal waste incineration: 0.000357 kg; lognormal variance with pedigree 0.36, pedigree (1,1,5,1,1)
  Burden from incineration of sludge from wastewater treatment of the short-term leachate (0-100a).
  Burden from incineration of sludge from wastewater treatment of the short-term leachate (0-100a).;activityLink introduced to establish a direct link to the corresponding regional supply of this product
- heat, district or industrial, natural gas: 0.00020256 MJ; lognormal variance with pedigree 0.44, pedigree (5,5,5,5,5)
  burden from wastewater treatment of the short-term leachate (0-100a). Uncertainty calculated from unertainty of the waste composition of this waste, uncertainty in waste decomposition and short-term leaching in sanitary landfill
  properties: heating value, net 1 MJ
- municipal waste incineration facility: 8.91e-14 unit; lognormal variance with pedigree 0.36, pedigree (1,1,5,1,1)
  Burden from incineration of sludge from wastewater treatment of the short-term leachate (0-100a).
  Burden from incineration of sludge from wastewater treatment of the short-term leachate (0-100a).
- chemical, organic: 1.2e-8 kg; lognormal variance with pedigree 1.69, pedigree (1,1,5,1,1)
  (same comment as for electricity, for reuse in municipal waste incineration only)
  properties: dry mass 1 kg, wet mass 1 kg, carbon content, fossil 0.628, heating value, net 19.03 MJ
  note on carbon content, fossil: This dataset is an unweighted average of 20 organic substances (listed in Tab 88.1, ecoinvent v2.2 report 8, part II), being part of the top100 chemicals included in this database. The C-content has also been calculated as an unweighted average of the C content of the substances composing this dataset.
- slag landfill: 3.64e-13 unit; lognormal variance with pedigree 0.45, pedigree (1,1,5,1,1)
  (same comment as for electricity, for reuse in municipal waste incineration only)
- waste cement, hydrated: -2.36e-5 kg; lognormal variance with pedigree 0.37, pedigree (1,1,5,1,1)
  (same comment as for electricity, for reuse in municipal waste incineration only)
  production volume 2.36e-5 kg
    Calculated from the production volume of residue from cooling tower, 30% water in proportion to the respective output amounts.
  properties: wet mass 1 kg, dry mass 1 kg
- residual material landfill: 4.91e-14 unit; lognormal variance with pedigree 0.37, pedigree (1,1,5,1,1)
  (same comment as for electricity, for reuse in municipal waste incineration only)
- electricity, low voltage: 0.000135 kWh; lognormal variance with pedigree 0.29, pedigree (5,5,5,5,5)
  (same comment as for heat, district or industrial, natural gas)
- heat, for reuse in municipal waste incineration only: 0.000299 MJ; name E_th_prod_MSWI; lognormal variance with pedigree 0.36, pedigree (1,1,5,1,1)
  (same comment as for electricity, for reuse in municipal waste incineration only)
- waste plastic, mixture: -3.88e-5 kg; lognormal variance with pedigree 0.2106, pedigree (5,5,5,5,5)
  (same comment as for heat, district or industrial, natural gas)
  production volume 3.88e-5 kg
    (same comment as for waste cement, hydrated)
  properties: water content 0.180638, dry mass 0.847 kg, carbon content, fossil 0.747344, wet mass 1 kg, heating value, net 30.79 MJ
  note on carbon content, fossil: C content in 1 kg DM was calculated using data in Tab A.2, ecoinvent v2.2 report 13_I
  note on heating value, net: Value taken from the general comment of the treatment dataset.
- process-specific burdens, slag landfill: 0.000205 kg; lognormal variance with pedigree 0.45, pedigree (1,1,5,1,1)
  (same comment as for process-specific burdens, residual material landfill)
- cement, unspecified: 9.43e-6 kg; lognormal variance with pedigree 0.37, pedigree (1,1,5,1,1)
  (same comment as for electricity, for reuse in municipal waste incineration only)
  properties: wet mass 1 kg, dry mass 1 kg
- heat, central or small-scale, other than natural gas: 0.00014758 MJ; lognormal variance with pedigree 0.44, pedigree (5,5,5,5,5)
  (same comment as for heat, district or industrial, natural gas)
  properties: heating value, net 1 MJ
- sanitary landfill facility: 5.56e-10 unit; lognormal variance with pedigree 0.04, pedigree (1,1,5,1,1)
  demands per kilogram waste. uncertainty is heeded in the module
  This exchange has an activity link directly to the producing activity because the product is primarily consumed in the same geographical area where it is produced.
- chemical, inorganic: 7.14e-10 kg; lognormal variance with pedigree 0.6, pedigree (1,1,5,1,1)
  (same comment as for electricity, for reuse in municipal waste incineration only)
  properties: wet mass 1 kg, carbon content, fossil 0.003, dry mass 1 kg
  note on carbon content, fossil: This dataset is an unweighted average of 20 inorganic substances (listed in Tab 88.1, ecoinvent v2.2 report 8, part II), being part of the top100 chemicals included in this database. The C-content has also been calculated as an unweighted average of the C content of the substances composing this dataset.
- waste graphical paper: -3.88e-5 kg; lognormal variance with pedigree 0.2106, pedigree (5,5,5,5,5)
  (same comment as for heat, district or industrial, natural gas)
  production volume 3.88e-5 kg
    (same comment as for waste cement, hydrated)
  properties: heating value, net 14.12 MJ, water content 0.126126, wet mass 1 kg, carbon content, non-fossil 0.454955, dry mass 0.888 kg
- process-specific burdens, sanitary landfill: 1 kg; lognormal variance with pedigree 0.04, pedigree (1,1,5,1,1)
  demands per kilogram waste. uncertainty is heeded in the module;activityLink introduced to establish a direct link to the corresponding regional supply of this product
- sewer grid, 5E9l/year, 110 km: 5.45e-10 km; lognormal variance with pedigree 0.2106, pedigree (5,5,5,5,5)
  (same comment as for heat, district or industrial, natural gas)
- wastewater treatment facility, capacity 5E9l/year: 1.42e-11 unit; lognormal variance with pedigree 0.2106, pedigree (5,5,5,5,5)
  (same comment as for heat, district or industrial, natural gas)
- hydrochloric acid, without water, in 30% solution state: 4.29e-10 kg; lognormal variance with pedigree 0.6, pedigree (1,1,5,1,1)
  (same comment as for electricity, for reuse in municipal waste incineration only)
  properties: heating value, net 3.32 MJ, wet mass 1 kg, dry mass 1 kg

## Emissions to nature
- Copper, ion [water, surface water]: 9.22e-9 kg; lognormal variance with pedigree 1.79, pedigree (1,1,5,1,1)
  Emissions from short-term leachate treatment and incineration of resulting sludge. Uncertainty calculated depending on waste input and uncertainty of transfer coefficents in landfill, wastewater treatment and incineration model.
- Potassium, ion [water, ground-, long-term]: 0.00641 kg; lognormal variance with pedigree 0.46, pedigree (1,1,5,1,1)
  Emissions from long-term leachate (>100a) directly from MSW landfill and indirectly via incineration of treatement sludge from leachate treatement. Uncertainty calculated depending on waste input and uncertainty of long-term transfer coefficents in landfill.
- COD, Chemical Oxygen Demand [water, ground-, long-term]: 0.0105 kg; lognormal variance with pedigree 0.73, pedigree (1,1,5,1,1)
  (same comment as for Potassium, ion)
- COD, Chemical Oxygen Demand [water, surface water]: 1.07e-5 kg; lognormal variance with pedigree 1.02, pedigree (1,1,5,1,1)
  (same comment as for Copper, ion)
- Hydrogen chloride [air, non-urban air or from high stacks]: 1.26e-8 kg; lognormal variance with pedigree 1.94, pedigree (1,1,5,1,1)
  burden from direct release or incineration of landfill biogas. Uncertainty calculated from unertainty of the waste composition of this waste, uncertainty in waste decomposition and short-term leaching in sanitary landfill
- Zinc [air, urban air close to ground]: 6.83e-12 kg; lognormal variance with pedigree 1.48, pedigree (1,1,5,1,1)
  (same comment as for Copper, ion)
- Nickel, ion [water, surface water]: 2.15e-6 kg; lognormal variance with pedigree 1.19, pedigree (1,1,5,1,1)
  (same comment as for Copper, ion)
- Nickel, ion [water, ground-, long-term]: 0.004 kg; lognormal variance with pedigree 0.52, pedigree (1,1,5,1,1)
  (same comment as for Potassium, ion)
- Aluminium [water, surface water]: 1.48e-6 kg; lognormal variance with pedigree 0.97, pedigree (1,1,5,1,1)
  (same comment as for Copper, ion)
- Sulfate [water, ground-, long-term]: 0.143 kg; lognormal variance with pedigree 0.22, pedigree (1,1,5,1,1)
  (same comment as for Potassium, ion)
- Mercury [air, urban air close to ground]: 2.09e-15 kg; lognormal variance with pedigree 2.29, pedigree (1,1,5,1,1)
  (same comment as for Copper, ion)
- Calcium, ion [water, surface water]: 0.000132 kg; lognormal variance with pedigree 0.75, pedigree (1,1,5,1,1)
  (same comment as for Copper, ion)
- Vanadium, ion [water, ground-, long-term]: 0.00233 kg; lognormal variance with pedigree 0.81, pedigree (1,1,5,1,1)
  (same comment as for Potassium, ion)
- Calcium [air, urban air close to ground]: 2.39e-8 kg; lognormal variance with pedigree 0.79, pedigree (1,1,5,1,1)
  (same comment as for Copper, ion)
- NMVOC, non-methane volatile organic compounds, unspecified origin [air, non-urban air or from high stacks]: 1.56e-9 kg; lognormal variance with pedigree 0.62, pedigree (1,1,5,1,1)
  (same comment as for Hydrogen chloride)
- Potassium, ion [water, surface water]: 7.22e-5 kg; lognormal variance with pedigree 0.81, pedigree (1,1,5,1,1)
  Emissions from short-term leachate treatment. Uncertainty calculated depending on waste input and uncertainty of transfer coefficents in landfill and wastewater treatment.
- Arsenic [air, non-urban air or from high stacks]: 1.02e-9 kg; lognormal variance with pedigree 2.26, pedigree (1,1,5,1,1)
  (same comment as for Hydrogen chloride)
- Sulfur dioxide [air, non-urban air or from high stacks]: 0.000102 kg; lognormal variance with pedigree 0.88, pedigree (1,1,5,1,1)
  (same comment as for Hydrogen chloride)
- Iron [air, urban air close to ground]: 3.85e-10 kg; lognormal variance with pedigree 1.07, pedigree (1,1,5,1,1)
  (same comment as for Copper, ion)
- Lead [air, urban air close to ground]: 3.05e-13 kg; lognormal variance with pedigree 2.03, pedigree (1,1,5,1,1)
  (same comment as for Copper, ion)
- BOD5, Biological Oxygen Demand [water, ground-, long-term]: 0.00249 kg; lognormal variance with pedigree 0.73, pedigree (1,1,5,1,1)
  (same comment as for Potassium, ion)
- Sodium, ion [water, surface water]: 0.000553 kg; lognormal variance with pedigree 0.59, pedigree (1,1,5,1,1)
  (same comment as for Potassium, ion)
- Silicon [water, surface water]: 3.84e-6 kg; lognormal variance with pedigree 0.89, pedigree (1,1,5,1,1)
  (same comment as for Copper, ion)
- Vanadium [air, non-urban air or from high stacks]: 3.21e-9 kg; lognormal variance with pedigree 2.11, pedigree (1,1,5,1,1)
  (same comment as for Hydrogen chloride)
- Cadmium [air, urban air close to ground]: 1.68e-13 kg; lognormal variance with pedigree 2.09, pedigree (1,1,5,1,1)
  (same comment as for Copper, ion)
- Methane, fossil [air, non-urban air or from high stacks]: 0.000223 kg; lognormal variance with pedigree 0.62, pedigree (1,1,5,1,1)
  (same comment as for Hydrogen chloride)
- Mercury [water, surface water]: 3.9e-10 kg; lognormal variance with pedigree 2.24, pedigree (1,1,5,1,1)
  (same comment as for Copper, ion)
- Magnesium [air, urban air close to ground]: 7.3e-9 kg; lognormal variance with pedigree 0.88, pedigree (1,1,5,1,1)
  (same comment as for Copper, ion)
- DOC, Dissolved Organic Carbon [water, ground-, long-term]: 0.00962 kg; lognormal variance with pedigree 0.73, pedigree (1,1,5,1,1)
  (same comment as for Potassium, ion)
- Zinc, ion [water, surface water]: 1.87e-7 kg; lognormal variance with pedigree 1.42, pedigree (1,1,5,1,1)
  (same comment as for Copper, ion)
- Aluminium [air, urban air close to ground]: 3.61e-8 kg; lognormal variance with pedigree 1, pedigree (1,1,5,1,1)
  (same comment as for Copper, ion)
- Cadmium, ion [water, surface water]: 3.11e-9 kg; lognormal variance with pedigree 2.03, pedigree (1,1,5,1,1)
  (same comment as for Copper, ion)
- Copper [air, non-urban air or from high stacks]: 1.02e-11 kg; lognormal variance with pedigree 2.84, pedigree (1,1,5,1,1)
  (same comment as for Hydrogen chloride)
- Copper, ion [water, ground-, long-term]: 0.000476 kg; lognormal variance with pedigree 0.79, pedigree (1,1,5,1,1)
  (same comment as for Potassium, ion)
- Chromium [air, urban air close to ground]: 1.42e-15 kg; lognormal variance with pedigree 1.89, pedigree (1,1,5,1,1)
  (same comment as for Copper, ion)
- Nickel [air, urban air close to ground]: 6.02e-14 kg; lognormal variance with pedigree 1.31, pedigree (1,1,5,1,1)
  (same comment as for Copper, ion)
- DOC, Dissolved Organic Carbon [water, surface water]: 2.59e-6 kg; lognormal variance with pedigree 1.02, pedigree (1,1,5,1,1)
  (same comment as for Copper, ion)
- Silicon [water, ground-, long-term]: 0.00161 kg; lognormal variance with pedigree 4.08, pedigree (1,1,5,1,1)
  (same comment as for Potassium, ion)
- Vanadium [air, urban air close to ground]: 6.33e-10 kg; lognormal variance with pedigree 1.08, pedigree (1,1,5,1,1)
  (same comment as for Copper, ion)
- Chromium, ion [water, surface water]: 6.13e-11 kg; lognormal variance with pedigree 1.81, pedigree (1,1,5,1,1)
  (same comment as for Copper, ion)
- Chloride [water, ground-, long-term]: 2.2e-5 kg; lognormal variance with pedigree 1.2, pedigree (1,1,5,1,1)
  (same comment as for Potassium, ion)
- Carbon dioxide, fossil [air, urban air close to ground]: 4.85e-5 kg; lognormal variance with pedigree 1.02, pedigree (1,1,5,1,1)
  (same comment as for Copper, ion)
- BOD5, Biological Oxygen Demand [water, surface water]: 3.36e-6 kg; lognormal variance with pedigree 1.02, pedigree (1,1,5,1,1)
  (same comment as for Copper, ion)
- Chromium [air, non-urban air or from high stacks]: 9.76e-12 kg; lognormal variance with pedigree 2.85, pedigree (1,1,5,1,1)
  (same comment as for Hydrogen chloride)
- Chromium VI [water, ground-, long-term]: 1.02e-6 kg; lognormal variance with pedigree 8.17, pedigree (1,1,5,1,1)
  (same comment as for Potassium, ion)
- Magnesium [water, surface water]: 4.87e-5 kg; lognormal variance with pedigree 0.85, pedigree (1,1,5,1,1)
  (same comment as for Copper, ion)
- Iron [air, non-urban air or from high stacks]: 5.86e-9 kg; lognormal variance with pedigree 2.09, pedigree (1,1,5,1,1)
  (same comment as for Hydrogen chloride)
- Sodium, ion [water, ground-, long-term]: 0.00821 kg; lognormal variance with pedigree 0.42, pedigree (1,1,5,1,1)
  (same comment as for Potassium, ion)
- Carbon monoxide, fossil [air, non-urban air or from high stacks]: 8.24e-8 kg; lognormal variance with pedigree 1.22, pedigree (1,1,5,1,1)
  (same comment as for Hydrogen chloride)
- Calcium, ion [water, ground-, long-term]: 0.0734 kg; lognormal variance with pedigree 0.19, pedigree (1,1,5,1,1)
  (same comment as for Potassium, ion)
- TOC, Total Organic Carbon [water, surface water]: 2.7e-6 kg; lognormal variance with pedigree 1.02, pedigree (1,1,5,1,1)
  (same comment as for Copper, ion)
- Vanadium, ion [water, surface water]: 6.53e-6 kg; lognormal variance with pedigree 1.03, pedigree (1,1,5,1,1)
  (same comment as for Copper, ion)
- Arsenic, ion [water, surface water]: 6.43e-8 kg; lognormal variance with pedigree 1.7, pedigree (1,1,5,1,1)
  (same comment as for Copper, ion)
- Magnesium [water, ground-, long-term]: 0.00569 kg; lognormal variance with pedigree 0.47, pedigree (1,1,5,1,1)
  (same comment as for Potassium, ion)
- Nickel [air, non-urban air or from high stacks]: 8.86e-10 kg; lognormal variance with pedigree 2.28, pedigree (1,1,5,1,1)
  (same comment as for Hydrogen chloride)
- NMVOC, non-methane volatile organic compounds, unspecified origin [air, urban air close to ground]: 4.32e-10 kg; lognormal variance with pedigree 1.18, pedigree (1,1,5,1,1)
  (same comment as for Copper, ion)
- Iron, ion [water, ground-, long-term]: 0.00784 kg; lognormal variance with pedigree 1.92, pedigree (1,1,5,1,1)
  (same comment as for Potassium, ion)
- Particulates, < 2.5 um [air, non-urban air or from high stacks]: 2.77e-8 kg; lognormal variance with pedigree 0.88, pedigree (1,1,5,1,1)
  (same comment as for Hydrogen chloride)
- Arsenic, ion [water, ground-, long-term]: 2.66e-5 kg; lognormal variance with pedigree 1.18, pedigree (1,1,5,1,1)
  (same comment as for Potassium, ion)
- Chloride [water, surface water]: 8.77e-7 kg; lognormal variance with pedigree 1.41, pedigree (1,1,5,1,1)
  (same comment as for Potassium, ion)
- Chromium VI [water, surface water]: 2.04e-8 kg; lognormal variance with pedigree 1.78, pedigree (1,1,5,1,1)
  (same comment as for Copper, ion)
- Potassium [air, non-urban air or from high stacks]: 1.81e-8 kg; lognormal variance with pedigree 1.89, pedigree (1,1,5,1,1)
  (same comment as for Hydrogen chloride)
- Carbon monoxide, fossil [air, urban air close to ground]: 1.08e-7 kg; lognormal variance with pedigree 0.57, pedigree (1,1,5,1,1)
  (same comment as for Copper, ion)
- Methane, fossil [air, urban air close to ground]: 9.73e-8 kg; lognormal variance with pedigree 1.04, pedigree (1,1,5,1,1)
  (same comment as for Copper, ion)
- Iron, ion [water, surface water]: 1.19e-5 kg; lognormal variance with pedigree 1.01, pedigree (1,1,5,1,1)
  (same comment as for Copper, ion)
- Mercury [water, ground-, long-term]: 1.18e-6 kg; lognormal variance with pedigree 1.58, pedigree (1,1,5,1,1)
  (same comment as for Potassium, ion)
- Sulfate [water, surface water]: 0.000892 kg; lognormal variance with pedigree 0.66, pedigree (1,1,5,1,1)
  (same comment as for Potassium, ion)
- Silicon [air, non-urban air or from high stacks]: 1.59e-8 kg; lognormal variance with pedigree 1.95, pedigree (1,1,5,1,1)
  (same comment as for Hydrogen chloride)
- Lead [air, non-urban air or from high stacks]: 3.08e-12 kg; lognormal variance with pedigree 3, pedigree (1,1,5,1,1)
  (same comment as for Hydrogen chloride)
- TOC, Total Organic Carbon [water, ground-, long-term]: 0.00962 kg; lognormal variance with pedigree 0.73, pedigree (1,1,5,1,1)
  (same comment as for Potassium, ion)
- Silicon [air, urban air close to ground]: 1.4e-7 kg; lognormal variance with pedigree 0.9, pedigree (1,1,5,1,1)
  (same comment as for Copper, ion)
- Sodium [air, non-urban air or from high stacks]: 1.38e-7 kg; lognormal variance with pedigree 1.62, pedigree (1,1,5,1,1)
  (same comment as for Hydrogen chloride)
- Arsenic [air, urban air close to ground]: 2.05e-11 kg; lognormal variance with pedigree 1.74, pedigree (1,1,5,1,1)
  (same comment as for Copper, ion)
- Zinc, ion [water, ground-, long-term]: 0.000692 kg; lognormal variance with pedigree 0.73, pedigree (1,1,5,1,1)
  (same comment as for Potassium, ion)
- Lead [water, surface water]: 1.02e-9 kg; lognormal variance with pedigree 1.97, pedigree (1,1,5,1,1)
  (same comment as for Copper, ion)
- Mercury [air, non-urban air or from high stacks]: 4.93e-10 kg; lognormal variance with pedigree 2.36, pedigree (1,1,5,1,1)
  (same comment as for Hydrogen chloride)
- Cadmium [air, non-urban air or from high stacks]: 4.09e-11 kg; lognormal variance with pedigree 2.69, pedigree (1,1,5,1,1)
  (same comment as for Hydrogen chloride)
- Hydrogen sulfide [water, ground-, long-term]: 0.00372 kg; lognormal variance with pedigree 0.22, pedigree (1,1,5,1,1)
  (same comment as for Potassium, ion)
- Copper [air, urban air close to ground]: 1.94e-13 kg; lognormal variance with pedigree 1.86, pedigree (1,1,5,1,1)
  (same comment as for Copper, ion)
- Lead [water, ground-, long-term]: 0.000103 kg; lognormal variance with pedigree 1, pedigree (1,1,5,1,1)
  (same comment as for Potassium, ion)
- Aluminium [air, non-urban air or from high stacks]: 6.14e-9 kg; lognormal variance with pedigree 2.05, pedigree (1,1,5,1,1)
  (same comment as for Hydrogen chloride)
- Aluminium [water, ground-, long-term]: 0.0323 kg; lognormal variance with pedigree 0.27, pedigree (1,1,5,1,1)
  (same comment as for Potassium, ion)
- Cadmium, ion [water, ground-, long-term]: 2.28e-6 kg; lognormal variance with pedigree 1.5, pedigree (1,1,5,1,1)
  (same comment as for Potassium, ion)
- Calcium [air, non-urban air or from high stacks]: 3.65e-8 kg; lognormal variance with pedigree 1.84, pedigree (1,1,5,1,1)
  (same comment as for Hydrogen chloride)
- Carbon dioxide, fossil [air, non-urban air or from high stacks]: 0.00145 kg; lognormal variance with pedigree 0.58, pedigree (1,1,5,1,1)
  (same comment as for Hydrogen chloride)
- Magnesium [air, non-urban air or from high stacks]: 1.35e-8 kg; lognormal variance with pedigree 1.93, pedigree (1,1,5,1,1)
  (same comment as for Hydrogen chloride)
- Zinc [air, non-urban air or from high stacks]: 1.34e-10 kg; lognormal variance with pedigree 2.51, pedigree (1,1,5,1,1)
  (same comment as for Hydrogen chloride)

## Sampling procedure
Landfill model based on observed leachate concentrations in literature. Extrapolated to 60'000 years heeding chemical characteristics. Initial waste composition from various literature sources.

## Extrapolations
This dataset has been extrapolated from year 2000 to the year of the calculation (2021). The uncertainty has been adjusted accordingly.

## Review by Niels Jungbluth 2003-07-21
Passed. Calculation for standard deviation 95 of, i.e., infrastructure,
land occupation, transport services or other services can differ from
standard Pedigree approach used in this project and figures obtained by
this procedure.
