# treatment of used train, passenger, long distance

Dataset: EcoSpold 2, unit process
Geography: RoW
Time period: 1993-01-01 to 2021-12-31
Technology level: current
Classification: EcoSpold01Categories: transport systems/train
Classification: ISIC rev.4 ecoinvent: 3830:Materials recovery
Tags: Treatment; ConvertedDataset
Scenario: Business-as-Usual
System model: Allocation, cut-off by classification
Generated by: Michael Spielmann (obsolete)
Published in: Spielmann M. 2004
Database: ecoinvent
isCopyrightProtected: true
accessRestrictedTo: 1

## General comment
The data is based on the bulk material composition of the IC 2000, a state of the art Swiss train composition. The life span of the lis assumed to be 40 years resulting in a life time performance of 20 Mio. vkm
[This dataset was already contained in the ecoinvent database version 2. It was not individually updated during the transfer to ecoinvent version 3. Life Cycle Impact Assessment results may still have changed, as they are affected by changes in the supply chain, i.e. in other datasets. This dataset was generated following the ecoinvent quality guidelines for version 2. It may have been subject to central changes described in the ecoinvent version 3 change report (http://www.ecoinvent.org/database/ecoinvent-version-3/reports-of-changes/), and the results of the central updates were reviewed extensively. The changes added e.g. consistent water flows and other information throughout the database. The documentation of this dataset can be found in the ecoinvent reports of version 2, which are still available via the ecoinvent website. The change report linked above covers all central changes that were made during the conversion process.]

## Included activities end
The inventory includes waste treatment processes for non metal components of a IC 2000 train composition. For the transport of disposed materials standard distances have been applied.

## Geography
Data represents Swiss disposal conditions

## Technology
no technologies are specified

## Reference product
- used train, passenger, long-distance: -1 unit; By-product classification Waste; CPC 39990: Other wastes n.e.c.
  EcoSpold01Location=CH
  production volume 3.96633 unit
    This is a placeholder value that does not reflect real-world production volumes. This dataset does not currently require a real-world production volume to work in the database framework, and no actual data were collected yet. This has no negative effect on the results of the ecoinvent database.
  property price 0 EUR2005
    Waste products are assigned a price of zero as they are assumed to require further treatment.
  property carbon content, non-fossil 0.00399258
    Calculated from C content in input materials in the infrastructure
  property carbon content, fossil 0.211693
    Calculated from C content in input materials in the infrastructure
  property carbon content 0.215686
    carbon content on a dry matter basis (reserved; not for manual entry)
  properties: water content 0, wet mass 317000 kg, water in wet mass 0 kg, dry mass 317000 kg, carbon allocation 68372.4 kg

## Inputs from technosphere
- waste glass: 0 kg; pedigree (1,1,1,1,1)
  EcoSpold01Location=CH
  Derived from the material composition of the modelled IC (unit process IC manufacturing)
  Uncertainty: derived from the material composition of the modelled IC (unit process IC manufacturing)
  production volume 0 kg
    Calculated from the production volume of used train, passenger, long-distance in proportion to the respective output amounts.
  properties: dry mass 1 kg, wet mass 1 kg, heating value, net 0.05 MJ
  note on heating value, net: Value extracted from "treatment of waste glass, open dump, very wet infiltration class (1000mm)"
- waste plastic, mixture: 0 kg; pedigree (1,1,1,1,1)
  (same comment as for waste glass)
  production volume 0 kg
    (same comment as for waste glass)
  properties: heating value, net 30.79 MJ, water content 0.180638, dry mass 0.847 kg, carbon content, fossil 0.747344, wet mass 1 kg
  note on heating value, net: Value taken from the general comment of the treatment dataset.
  note on carbon content, fossil: C content in 1 kg DM was calculated using data in Tab A.2, ecoinvent v2.2 report 13_I
- waste emulsion paint: 0 kg; pedigree (1,1,1,1,1)
  (same comment as for waste glass)
  production volume 0 kg
    (same comment as for waste glass)
  properties: dry mass 1 kg, carbon content, fossil 0.27, wet mass 1 kg, heating value, net 8.18 MJ
  note on carbon content, fossil: Tab A.4, ecoinvent v2.2 report 13_I. C content has been calculated after data in the tables, and then referred to 1 kg DM
- waste glass: -763.293, -70.3511, -1.59603, -6.56365, -9.96728, -29.3699, -1435.48, -7193.38 kg (8 entries); lognormal variance with pedigree 0.054, pedigree (3,1,5,5,1)
  (same comment as for waste glass)
  production volume 28530 kg
- waste plastic, mixture: -8699.11, -581.241, -43.9583, -240.073, -96.9869, -227.972, -7412.05, -60898.6 kg (8 entries); lognormal variance with pedigree 0.054, pedigree (3,1,5,5,1)
  (same comment as for waste glass)
  production volume 234600 kg
- waste emulsion paint: -55.5629, -589.437 kg (2 entries); lognormal variance with pedigree 0.054, pedigree (3,1,5,5,1)
  (same comment as for waste glass)
  production volume 1935 kg

## Sampling procedure
Data based on the material composition of an IC 2000.

## Extrapolations
This dataset has been copied from an original dataset covering the geography CH. The uncertainty has been adjusted accordingly.

## Review by Michael Spielmann (obsolete) 2004-04-05
passed
