# sunflower production

Dataset: EcoSpold 2, unit process
Geography: RoW
Time period: 2000-01-01 to 2021-12-31
Technology level: current
Classification: ISIC rev.4 ecoinvent: 0111:Growing of cereals (except rice), leguminous crops and oil seeds
Tags: ConvertedDataset
Scenario: Business-as-Usual
System model: Allocation, cut-off by classification
Share of production covered: 100 %
Generated by: Thomas Nemecek
Published in: Nemecek, T. 2007
Database: ecoinvent
isCopyrightProtected: true
accessRestrictedTo: 1

## General comment
This dataset represents the production of 1 kg of sunflower seed (fresh matter). The yield is 1032 kg/ha at a moisture content at storage of 6%.
[This dataset was already contained in the ecoinvent database version 2. It was not individually updated during the transfer to ecoinvent version 3. Life Cycle Impact Assessment results may still have changed, as they are affected by changes in the supply chain, i.e. in other datasets. This dataset was generated following the ecoinvent quality guidelines for version 2. It may have been subject to central changes described in the ecoinvent version 3 change report (http://www.ecoinvent.org/database/ecoinvent-version-3/reports-of-changes/), and the results of the central updates were reviewed extensively. The changes added e.g. consistent water flows and other information throughout the database. The documentation of this dataset can be found in the ecoinvent reports of version 2, which are still available via the ecoinvent website. The change report linked above covers all central changes that were made during the conversion process.]

## Included activities start
This activity starts after the harvest of the previous crop. The inputs of seeds, mineral fertilisers and pesticides are considered. It is assumed that no organic fertilisers are applied.

## Included activities end
The dataset includes all machine operations and corresponding machine infrastructure and sheds. Machine operations are: soil cultivation, sowing, fertilisation, weed control, pest and pathogen control, combine-harvest and transport from field to farm (5 km). Further, direct field emissions are included. This activity ends after harvest at the farm gate.

## Geography
Refers to an average production in the region Castilla-y-Leon (ES).

## Technology
conventional production typical for the region

## Time period
The yield data have been collected for the years 2000-2004.

## Parameters
- fraction, irrigation water to surface water: 0.2 dimensionless; name fraction_IW_to_surface_water; lognormal variance with pedigree 0.0886, pedigree (4,3,1,1,4)
- fraction, irrigation water, to air: 0.586986 dimensionless; name fraction_IW_to_air; lognormal variance with pedigree 0.0409, pedigree (2,2,2,1,1)
- fraction, irrigation water, to ground water: 0.8 dimensionless; name fraction_IW_to_ground_water; lognormal variance with pedigree 0.0886, pedigree (4,3,1,1,4)

## Reference product
- sunflower seed: 1 kg; name REF_PRODUCT; By-product classification allocatable product; CPC 01445: Sunflower seed
  EcoSpold01Location=ES
  production volume 1.23174e10 kg
    FAOSTAT World 2005
  property energy content 28.435 MJ; name REF_PRODUCT_energy_content
    See chapter 'Product Properties' in "01_crop production - yields & inputs CH & Europe_v1.0.pdf", section "AGRICULTURAL PRODUCTION IN SWITZERLAND" - pdf-document on the dedicated talk page of ecoinvent (www.ecoinvent.org/documentation)
  property wet mass 1 kg; name REF_PRODUCT_WM
  property carbon content, non-fossil 0.78; name REF_PRODUCT_C_content_non_fossil
    biogene carbon content on a dry matter basis
  property water content 0.0638298; name REF_PRODUCT_water_content; = (1-REF_PRODUCT_DM)/REF_PRODUCT_DM
  property dry mass 0.94 kg; name REF_PRODUCT_DM
  property price 0.317966 EUR2005; name REF_PRODUCT_price_EUR2005
    Calculated based on inputs: The price of the product has been calculated as a sum of the values of the material and energy inputs for this product. This value is therefore a rough estimation. It may underestimate the real price since there are additional expenses when producing any product. These expences can include for example labour costs, treatment of waste materials and profit for the producer. Please consider carefully whether this level of data quality is acceptable for your application.
  property water in wet mass 0.06 kg; name REF_PRODUCT_WWM; = 1-REF_PRODUCT_DM
  property carbon content, fossil 0; name REF_PRODUCT_C_content_fossil
    fossil carbon content on a dry matter basis
  property carbon content 0.78
    carbon content on a dry matter basis (reserved; not for manual entry)
  properties: carbon allocation 0.7332 kg

## Inputs from technosphere
- irrigation: 0 m3; name water_irrigation_input; source Siebert, S. 2010; pedigree (1,1,1,1,1)
  Calculated based on literature values (Döll, 2010) and partially modelled at ETH (Pfister, S.).
  property carbon content, non-fossil 0; name C_content_non_fossil
  property wet mass 1000 kg; name WM
  property water in wet mass 999.89 kg; name WWM
  property dry mass 0.11 kg; name DM
  property water content 9089.91; name water_content
  property carbon content, fossil 0; name C_content_fossil
- packaging, for pesticides: 0.0029651 kg; lognormal variance with pedigree 0.0912, pedigree (4,3,5,5,4)
  Total amount of active substance/s of pesticides needed for the production of sunflower seed is calculated to be circa 1.48E-03 kg. Pesticide/s used in this dataset is/are: '[sulfonyl]urea-compound', 'pesticide, unspecified'. The total amount of active substance/s is doubled in order to account for the packaging of the dilluted product of pesticide/s that is/are applied. Therefore, 2.97E-03 kg of packaging for pesticides is justified with this exchange.
  properties: wet mass 1 kg, heating value, net 25.97 MJ, dry mass 1 kg, price 0.0642 EUR2005, carbon content, fossil 0.85714
- [sulfonyl]urea-compound: 0.00043605 kg; lognormal variance with pedigree 0.0427, pedigree (2,2,5,5,1)
  EcoSpold01Location=RER
  See chapter 'Yields and Inputs of Arable Crop Production' in "01_crop production - yields & inputs CH & Europe_v1.0.pdf", section "AGRICULTURAL PRODUCTION IN THE EU" - pdf-document on the dedicated talk page of ecoinvent (www.ecoinvent.org/documentation)
  properties: carbon content, fossil 0.540853, wet mass 1 kg, dry mass 1 kg
  note on carbon content, fossil: Approximated as an unweighted average of the C-content of the [sulfonyl]urea-compounds (Tab 2.25 Sutter, 2010) chlorotoluron, Diuron, Linuron and Isoproturon.
- sowing: 0.00096899 ha; lognormal variance with pedigree 0.0426, pedigree (2,1,5,5,1)
  See chapter 'Yields and Inputs of Arable Crop Production' in "01_crop production - yields & inputs CH & Europe_v1.0.pdf", section "AGRICULTURAL PRODUCTION IN THE EU" - pdf-document on the dedicated talk page of ecoinvent (www.ecoinvent.org/documentation)
  EcoSpold01Location=CH
- tillage, cultivating, chiselling: 0.00096899 ha; lognormal variance with pedigree 0.0426, pedigree (2,1,5,5,1)
  (same comment as for sowing)
- application of plant protection product, by field sprayer: 0.001938 ha; lognormal variance with pedigree 0.0426, pedigree (2,1,5,5,1)
  (same comment as for sowing)
- tillage, ploughing: 0.00096899 ha; lognormal variance with pedigree 0.0426, pedigree (2,1,5,5,1)
  (same comment as for sowing)
- pesticide, unspecified: 0.0010465 kg; lognormal variance with pedigree 0.0427, pedigree (2,2,5,5,1)
  (same comment as for [sulfonyl]urea-compound)
  properties: dry mass 1 kg, wet mass 1 kg, carbon content, fossil 0.486978
  note on carbon content, fossil: Mean of C content in all pesticides whose formula has been documented in Sutter 2010
- combine harvesting: 0.00096899 ha; lognormal variance with pedigree 0.0426, pedigree (2,1,5,5,1)
  (same comment as for sowing)
- sunflower seed, for sowing: 0.0031492 kg; name SEED; lognormal variance with pedigree 0.0426, pedigree (2,1,5,5,1)
  See chapter 'Yields and Inputs of Arable Crop Production' in "01_crop production - yields & inputs CH & Europe_v1.0.pdf", section "AGRICULTURAL PRODUCTION IN THE EU" - pdf-document on the dedicated talk page of ecoinvent (www.ecoinvent.org/documentation)
  property water in wet mass 0.06 kg; name sunflower_seed_sowing_WWM
  property wet mass 1 kg; name sunflower_seed_sowing_WM
  property energy content 28.435 MJ; name SEED_energy_content
  property carbon content, non-fossil 0.776596; name SEED_C_content_non_fossil
  property dry mass 0.94 kg; name SEED_DM
  property water content 0.0638298; name sunflower_seed_sowing_water_content
  note on energy content: See chapter 'Product Properties' in "01_crop production - yields & inputs CH & Europe_v1.0.pdf", section "AGRICULTURAL PRODUCTION IN SWITZERLAND" - pdf-document on the dedicated talk page of ecoinvent (www.ecoinvent.org/documentation)
  note on carbon content, non-fossil: biogene carbon content on a dry matter basis; rape seed has been used as an approximation (ecoinvent report 15a, pg 136). C content of rapeseed is 0.73 kg/kg wet mass (Tab 3.3, ecoinvent report 17)
- transport, tractor and trailer, agricultural: 0.0047 metric ton*km; lognormal variance with pedigree 0.0426, pedigree (2,1,5,5,1)
  EcoSpold01Location=CH
  See chapter 'Yields and Inputs of Arable Crop Production' in "01_crop production - yields & inputs CH & Europe_v1.0.pdf", section "AGRICULTURAL PRODUCTION IN THE EU" - pdf-document on the dedicated talk page of ecoinvent (www.ecoinvent.org/documentation)
- irrigation: 0.0069827, 0.000296394, 1.18558e-5, 0.0624206, 0.00102291, 5.11496e-5, 0.119952, 0.00230577, 0.00078806, 0.00211294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 m3 (15 entries); source Siebert, S. 2010; lognormal variance with pedigree 0.0447, pedigree (2,2,5,5,1)
  (same comment as for irrigation)
  properties: wet mass 1000 kg, dry mass 0.11 kg, water content 9089.91

## Inputs from nature
- Occupation, annual crop, non-irrigated, intensive [natural resource, land]: 12.112 m2*year; lognormal variance with pedigree 0.0426, pedigree (2,1,5,5,1)
  Modelled, see chapter 'Land use' in "01_crop production_direct field emissions and natural resources_v1.0.pdf" - pdf-document on the dedicated talk page of ecoinvent (www.ecoinvent.org/documentation)
- Carbon dioxide, in air [natural resource, in air]: 2.67997 kg; = 44/12 * (REF_PRODUCT_C_content_non_fossil * REF_PRODUCT * REF_PRODUCT_DM - SEED_C_content_non_fossil * SEED * SEED_DM); lognormal variance with pedigree 0.0426, pedigree (2,1,5,5,1)
  Modelled,see chapter 'CO2 binding' in "01_crop production_direct field emissions and natural resources_v1.0.pdf" - pdf-document on the dedicated talk page of ecoinvent (www.ecoinvent.org/documentation)
- Transformation, to annual crop, non-irrigated, intensive [natural resource, land]: 9.6899 m2; lognormal variance with pedigree 0.0526, pedigree (2,1,5,5,1)
  (same comment as for Occupation, annual crop, non-irrigated, intensive)
- Transformation, from annual crop, non-irrigated, intensive [natural resource, land]: 9.6899 m2; lognormal variance with pedigree 0.0526, pedigree (2,1,5,5,1)
  (same comment as for Occupation, annual crop, non-irrigated, intensive)
- Energy, gross calorific value, in biomass [natural resource, biotic]: 28.345 MJ; lognormal variance with pedigree 0.0411891, pedigree (2,1,5,1,1)

## Emissions to nature
- Phosphate [water, ground-]: 0.00025983 kg; lognormal variance with pedigree 0.0827, pedigree (2,2,5,5,1)
  Modelled, see chapter 'Emissions of phosphorous to the water' in "01_crop production_direct field emissions and natural resources_v1.0.pdf" - pdf-document on the dedicated talk page of ecoinvent (www.ecoinvent.org/documentation)
- Cadmium, ion [water, surface water]: 3.3141e-10 kg; lognormal variance with pedigree 0.1327, pedigree (2,2,5,5,1)
  Modelled, see chapter 'Emissions of heavy metals to agricultural soil, surface water and ground water' in "01_crop production_direct field emissions and natural resources_v1.0.pdf" - pdf-document on the dedicated talk page of ecoinvent (www.ecoinvent.org/documentation)
- Phosphorus [water, surface water]: 0.00020198 kg; lognormal variance with pedigree 0.0827, pedigree (2,2,5,5,1)
  (same comment as for Phosphate)
- Oxyfluorfen [soil, agricultural]: 0.00017442 kg; lognormal variance with pedigree 0.0527, pedigree (2,2,5,5,1)
  Modelled, see chapter 'Emissions of pesticides to agricultural soil' in "01_crop production_direct field emissions and natural resources_v1.0.pdf" - pdf-document on the dedicated talk page of ecoinvent (www.ecoinvent.org/documentation)
- Copper, ion [water, surface water]: 1.674e-8 kg; lognormal variance with pedigree 0.1327, pedigree (2,2,5,5,1)
  (same comment as for Cadmium, ion)
- Mercury [water, surface water]: 8.8275e-11 kg; lognormal variance with pedigree 0.1327, pedigree (2,2,5,5,1)
  (same comment as for Cadmium, ion)
- Mercury [soil, agricultural]: -9.0237e-11 kg
  (same comment as for Cadmium, ion)
- Zinc [soil, agricultural]: 2.2905e-8 kg; lognormal variance with pedigree 0.0827, pedigree (2,2,5,5,1)
  (same comment as for Cadmium, ion)
- Nitrate [water, ground-]: 0.214292 kg; lognormal variance with pedigree 0.0827, pedigree (2,2,5,5,1)
  Modelled with the 'SALCA-NO3 model' described in "01_crop production_direct field emissions and natural resources_v1.0.pdf" - pdf-document on the dedicated talk page of ecoinvent (www.ecoinvent.org/documentation)
- Cadmium, ion [water, ground-]: 3.1467e-10 kg; lognormal variance with pedigree 0.1327, pedigree (2,2,5,5,1)
  (same comment as for Cadmium, ion)
- Dinitrogen monoxide [air, non-urban air or from high stacks]: 0.000852602 kg; name N2O; lognormal variance with pedigree 0.0727, pedigree (2,2,5,5,1)
  Modelled, see chapter 'Emissions of N2O to the air' in "01_crop production_direct field emissions and natural resources_v1.0.pdf" - pdf-document on the dedicated talk page of ecoinvent (www.ecoinvent.org/documentation)
- Copper [soil, agricultural]: -4.566e-8 kg
  (same comment as for Cadmium, ion)
- Nitrogen oxides [air, non-urban air or from high stacks]: 0.000179046 kg; = 0.21 * N2O; lognormal variance with pedigree 0.0727, pedigree (2,2,5,5,1)
  Modelled, see chapter 'Emissions of NOx to the air' in "01_crop production_direct field emissions and natural resources_v1.0.pdf" - pdf-document on the dedicated talk page of ecoinvent (www.ecoinvent.org/documentation)
- Lead [soil, agricultural]: 1.0349e-8 kg; lognormal variance with pedigree 0.0827, pedigree (2,2,5,5,1)
  (same comment as for Cadmium, ion)
- Mercury [water, ground-]: 6.2276e-11 kg; lognormal variance with pedigree 0.1327, pedigree (2,2,5,5,1)
  (same comment as for Cadmium, ion)
- Chromium, ion [water, surface water]: 2.0067e-9 kg; lognormal variance with pedigree 0.1327, pedigree (2,2,5,5,1)
  (same comment as for Cadmium, ion)
- Lead [water, surface water]: 3.3263e-9 kg; lognormal variance with pedigree 0.1327, pedigree (2,2,5,5,1)
  (same comment as for Cadmium, ion)
- Ammonia [air, non-urban air or from high stacks]: 0 kg
  Modelled with the 'AGRAMMON model' described in "01_crop production_direct field emissions and natural resources_v1.0.pdf" - pdf-document on the dedicated talk page of ecoinvent (www.ecoinvent.org/documentation)
- Water [water, ground-]: 0.10921 m3; name water_to_water_ground; lognormal variance with pedigree 0.1306, pedigree (4,3,5,5,4)
  Calculated value. See the parameters and their comments to understand the calculation.
  property fraction, origin: salt water 0; name fraction_origin_salt_water_Wgw
  property fraction, origin: fresh water 1; name fraction_origin_fresh_water_Wgw
  property fraction, origin: unspecified 0; name fraction_origin_unspecified_Wgw
- Chromium [soil, agricultural]: -8.8667e-9 kg
  (same comment as for Cadmium, ion)
- Lead [water, ground-]: 4.6645e-10 kg; lognormal variance with pedigree 0.1327, pedigree (2,2,5,5,1)
  (same comment as for Cadmium, ion)
- Chromium, ion [water, ground-]: 8.0451e-9 kg; lognormal variance with pedigree 0.1327, pedigree (2,2,5,5,1)
  (same comment as for Cadmium, ion)
- Copper, ion [water, ground-]: 1.3664e-8 kg; lognormal variance with pedigree 0.1327, pedigree (2,2,5,5,1)
  (same comment as for Cadmium, ion)
- Linuron [soil, agricultural]: 0.00043605 kg; lognormal variance with pedigree 0.0527, pedigree (2,2,5,5,1)
  (same comment as for Oxyfluorfen)
- Water [air, unspecified]: 0.326084 m3; name water_to_air_unspecified; lognormal variance with pedigree 0.0827, pedigree (2,2,5,5,1)
  Calculated value based on literature values and expert opinion. See comments in the parametres' comment field.
  property fraction, origin: salt water 0; name fraction_origin_salt_water
  property fraction, origin: fresh water 1; name fraction_origin_fresh_water
  property fraction, origin: unspecified 0; name fraction_origin_unspecified
- Cadmium [soil, agricultural]: 3.1681e-9 kg; lognormal variance with pedigree 0.0827, pedigree (2,2,5,5,1)
  (same comment as for Cadmium, ion)
- Zinc, ion [water, surface water]: 1.599e-8 kg; lognormal variance with pedigree 0.1327, pedigree (2,2,5,5,1)
  (same comment as for Cadmium, ion)
- Nickel [soil, agricultural]: -7.5906e-10 kg
  (same comment as for Cadmium, ion)
- Nickel, ion [water, surface water]: 6.6327e-9 kg; lognormal variance with pedigree 0.1327, pedigree (2,2,5,5,1)
  (same comment as for Cadmium, ion)
- Water [water, surface water]: 0.0273024 m3; name water_to_water_surface; lognormal variance with pedigree 0.1306, pedigree (4,3,5,5,4)
  Calculated value. See the parameters and their comments to understand the calculation.
  property fraction, origin: salt water 0; name fraction_origin_salt_water_Wsw
  property fraction, origin: fresh water 1; name fraction_origin_fresh_water_Wsw
- Zinc, ion [water, ground-]: 4.8486e-8 kg; lognormal variance with pedigree 0.1327, pedigree (2,2,5,5,1)
  (same comment as for Cadmium, ion)
- Alachlor [soil, agricultural]: 0.00043605 kg; lognormal variance with pedigree 0.0527, pedigree (2,2,5,5,1)
  (same comment as for Oxyfluorfen)

## Sampling procedure
Data come from a survey in the concerted action GL-Pro of the EU (QLK5-CT-2002-02418). Data were compiled from statistics, pilot networks, fertilising recommendations, documents from extension services, information provided by retailers and expert knowledge. The production data were verified and adjusted by a group of experts in GL-Pro and by other experts.

## Extrapolations
This dataset has been copied from an original dataset covering the geography ES.

## Review by Hans-Jörg Althaus 2007-11-07
passed
