# textile production, cotton, circular knitting

Dataset: EcoSpold 2, unit process
Geography: BD
Time period: 2017-01-01 to 2021-12-31
Technology level: current
Classification: ISIC rev.4 ecoinvent: 1391:Manufacture of knitted and crocheted fabrics
Scenario: Business-as-Usual
System model: Allocation, cut-off by classification
Generated by: Mireille Faist Emmenegger
Published in: Faist Emmenegger, M. 2018
Database: ecoinvent
isCopyrightProtected: true
accessRestrictedTo: 1

## General comment
Inventory refers to the production of 1 kg knit textile. The process converts greige/dyed yarn to knit textile.
Knitting involves interlacing loops of yarn, which are formed on a knitting needle, together in a line. Knitting by machine is done in two different ways; warp and weft. Weft knitting is similar in method to hand knitting with stitches all connected to each other horizontally. Various weft machines can be configured to produce textiles from a single spool of yarn or multiple spools depending on the size of the machine cylinder. In a warp knit there are many pieces of yarn and there are vertical chains, zigzagged together by crossing the yarn. Warp knits do not stretch as much as a weft knit, and it is run-resistant. A weft knit is not run-resistant, but stretches more. This is especially true if spools of Lycra are processed from separate spool containers and interwoven through the cylinder with cotton yarn, giving the finished product more flexibility and making it less prone to having a "baggy" appearance. The average t-shirt is a weft knit. Hence, the main inputs for circular knitting activity are yarn, electricity and lubricant oil to run the machine. The activity also produces yarn dust as waste which ends up in landfilling.

## Included activities start
The activity starts with the unwinding of the yarn.

## Included activities end
The activity ends with the produced knit fabric at factory gate.

## Geography
Bangladesh

## Reference product
- textile, knit cotton: 1 kg; name RP_amount_1; CPC 28190: Other knitted or crocheted fabrics; By-product classification allocatable product
  production volume 7.7295e7 kg; name PV_RP
    Literature data. Collected from Bangladesh Textile Manufacturers Association (BTMA).
  property price 11.7 EUR2005; name RP_amount_1_price_EUR2005
    Calculated based on data from UN comtrade database.
  property carbon content 0.46
    carbon content on a dry matter basis (reserved; not for manual entry)
  properties: carbon content, non-fossil 0.46, wet mass 1 kg, dry mass 1 kg, carbon allocation 0.46 kg

## Inputs from technosphere
- waste yarn and waste textile: -0.0555556 kg; name waste
  Industry data. In reality, this goes to be recycled as secondary low quality textile. We will be updating this as soon as we get better data on the secondary textile production.
  production volume 4.29417e6 kg; = PV_RP*waste
    Calculated from production volume of reference product using the relative outputs.
  property price 0 EUR2005; name waste_price_EUR2005
  properties: heating value, net 13.14 MJ, dry mass 0.97917 kg, wet mass 1 kg, water content 0.0212731, carbon content, non-fossil 0.44455
- waste mineral oil: -0.00121429 kg; name BP_amount_1; lognormal variance with pedigree 0.0038, pedigree (2,3,3,1,1)
  This is produced due to the use of lubricating oil necessary for the operation of machinery.
  production volume 93858.2 kg; = PV_RP * (BP_amount_1 / RP_amount_1)
    Calculated from production volume of reference product using the relative outputs.
  property price 0 EUR2005; name BP_amount_1_price_EUR2005
  properties: water content 0.111111, heating value, net 34.7 MJ, dry mass 0.9 kg, wet mass 1 kg, carbon content, fossil 0.864444
  note on heating value, net: Value taken from the general comment of the treatment dataset.
  note on carbon content, fossil: Tab A.6, ecoinvent v2.2 report 13_I. C content has been calculated after data in the tables, and then referred to 1 kg DM
- building, hall, steel construction: 6.94444e-5 m2; lognormal variance with pedigree 0.016, pedigree (4,1,3,1,1)
  Industry data.
- lubricating oil: 0.00121429 kg; = 2*0.85/1400; lognormal variance with pedigree 0.0038, pedigree (2,3,3,1,1)
  Industry data: 2 liters per 1300-1500 kg of fabric, converted with a density of 0.85.
  properties: dry mass 1 kg, carbon content, fossil 0.75, wet mass 1 kg, heating value, net 40.2 MJ
  note on carbon content, fossil: Lubricating oil is produced from diesel. C-content/dry mass of fats and oils considered 75%, from: ecoinvent v2.2 report, n 15a, pg 40
  note on heating value, net: Literature value, Source: IPCC 2006, 2006 IPCC Guidelines for National Greenhouse Gas Inventories, Prepared by the National Greenhouse Gas Inventories Programme, Eggleston H.S., Buendia L., Miwa K., Ngara T. and Tanabe K. (eds). Published: IGES, Japan
- electricity, medium voltage: 0.595238 kWh; lognormal variance with pedigree 0.0106, pedigree (4,1,3,1,1)
  Industry data.
- yarn, cotton: 1.16 kg; lognormal variance with pedigree 0.0106, pedigree (4,1,3,1,1)
  Industry data. 1 kg output of textile requires 1.11 kg yarn on an average because 10 - 12% yarn get wasted as process waste and some other as waste textile.
  properties: heating value, net 12.95 MJ, dry mass 0.94 kg, water content 0.0638298, carbon content, non-fossil 0.46, wet mass 1 kg

## Emissions to nature
- Particulates, > 10 um [air, urban air close to ground]: 0.11 kg
  Industry data. Companies in Bangladesh usually do not collect all the dusts produced during the process. Hence, dusts are blown away with the wind while a very small portion is directly landfilled.

## Sampling procedure
Industry data. Representative mills in Bangladesh. The mills were chosen to provide data based on their technical representation of the current state of business and their willingness to participate.

## Extrapolations
This dataset has been extrapolated from year 2017 to the year of the calculation (2021). The uncertainty has been adjusted accordingly.
