# treatment of wastewater, average, capacity 1E9l/year

Dataset: EcoSpold 2, unit process
Geography: CA-QC
Time period: 1994-01-01 to 2021-12-31
Technology level: current
Classification: ISIC rev.4 ecoinvent: 3700:Sewerage
Classification: EcoSpold01Categories: waste management/wastewater treatment
Tags: Treatment
Scenario: Business-as-Usual
System model: Allocation, cut-off by classification
Generated by: Marylène Dussault
Published in: Doka G. 2008
Database: ecoinvent
isCopyrightProtected: true
accessRestrictedTo: 1

## General comment
This dataset represents activated sludge wastewater treatment. This dataset is a copy of the Global version and is used to approximate activated sludage and biofiltration technolgie in Quebec. This dataset should be replace as soon as data for these technologies in the Quebec region become available. Only the production volume have been modified and the sewer process have been removed as it is included in the market process. Wastewater purified in a smaller municipal wastewater treatment plant (capacity class 4), with an average capacity size of 5320 per-captia-equivalents PCE.
Wastewater contains (in kg/m3): COD: 0.1556 (GSD=122.5%); BOD: 0.1036 (GSD=122.5%); DOC: 0.04575 (GSD=122.5%); TOC: 0.0673 (GSD=122.5%); SO4-S: 0.044 (GSD=122.5%); S part.: 0.002 (GSD=122.5%); NH4-N: 0.01495 (GSD=122.5%); NO3-N: 0.00105 (GSD=122.5%); NO2-N: 0.0004 (GSD=122.5%); N part.: 0.003279 (GSD=122.5%); N org. solv.: 0.008392 (GSD=122.5%); PO4-P: 0.002459 (GSD=122.5%); P part.: 0.0006147 (GSD=122.5%); Cl: 0.03003 (GSD=224.1%); F: 0.00003277 (GSD=224.1%); As: 0.0000009 (GSD=224.1%); Cd: 0.0000002806 (GSD=223.8%); Co: 0.000001618 (GSD=223.8%); Cr: 0.00001223 (GSD=223.8%); Cu: 0.00003744 (GSD=223.8%); Hg: 0.0000002 (GSD=223.8%); Mn: 0.000053 (GSD=224.1%); Mo: 0.0000009574 (GSD=223.8%); Ni: 0.000006589 (GSD=223.8%); Pb: 0.000008631 (GSD=223.8%); Sn: 0.0000034 (GSD=224.1%); Zn: 0.0001094 (GSD=223.8%); Si: 0.003126 (GSD=224.1%); Fe: 0.007093 (GSD=224.1%); Ca: 0.05083 (GSD=224.1%); Al: 0.001038 (GSD=224.1%); K: 0.0003989 (GSD=224.1%); Mg: 0.005707 (GSD=224.1%); Na: 0.002186 (GSD=224.1%);

## Included activities end
Infrastructure materials for municipal wastewater treatment plant, transports, dismantling. Land use burdens.

## Geography
Specific to the technology mix encountered in Switzerland in 2000. Well applicable to modern treatment practices in Europe, North America or Japan.

## Technology
Three stage wastewater treatment (mechanical, biological, chemical) including sludge digestion (fermentation) according to the average technology in Switzerland

## Parameters
- fraction, process water, to air: 0.1 dimensionless; lognormal variance with pedigree 0.092025, pedigree (4,4,3,2,4)

## Reference product
- wastewater, average: -1 m3; name WWT; CPC 39920: Sewage sludge; By-product classification Waste
  EcoSpold01Location=CH
  production volume 1.10349e7 m3; name PV_WWT
    Literature value. Represents volume of treated wastewater from lagoon facility during a year in Québec. Calculated from Quebec government published data in annual report on wastewater treatments in the region (MAMOT, 2011). Includes all types of lagoon technology (aerated, facultative, non-aerated, etc.).
  property price 0 EUR2005; name WWT_price_EUR2005
    Waste products are assigned a price of zero as they are assumed to require further treatment.
  property carbon content, non-fossil 0.194039
    0.0673 kg TOC/m3 (Tab A.17, ecoinvent v2.2 report 13_I). TOC was considered as Total Carbon.
  property carbon content 0.194039
    carbon content on a dry matter basis (reserved; not for manual entry)
  properties: dry mass 0.346837 kg, wet mass 1000 kg, carbon content, fossil 0, water in wet mass 999.653 kg, water content 2882.2, carbon allocation 0.0673 kg

## Inputs from technosphere
- heat, district or industrial, natural gas: 0.00294966 MJ; lognormal variance with pedigree 0.222, pedigree (1,1,5,5,1)
  burden from sludge incineration. Uncertainty calculated from wastewater composition and treatment model
  EcoSpold01Location=RER
  properties: heating value, net 1 MJ
- wastewater treatment facility, capacity 1E9l/year: 2.6582e-8 unit; lognormal variance with pedigree 0.042, pedigree (1,1,5,5,1)
  EcoSpold01Location=CH
  uncertainty heeded in exchanges of the module;activityLink introduced to establish a direct link to the corresponding regional supply of this product
- electricity, low voltage: 0.20571 kWh; lognormal variance with pedigree 0.062, pedigree (1,1,5,5,1)
  direct wastewater treatment plant burden. Uncertainty calculated from wastewater composition and treatment model
  EcoSpold01Location=CH
- chemical, organic: 2.4507e-7 kg; lognormal variance with pedigree 0.432, pedigree (1,1,5,5,1)
  burden from sludge incineration. Uncertainty calculated from wastewater composition and treatment model
  EcoSpold01Location=GLO
  properties: dry mass 1 kg, heating value, net 19.03 MJ, carbon content, fossil 0.628, wet mass 1 kg
  note on carbon content, fossil: This dataset is an unweighted average of 20 organic substances (listed in Tab 88.1, ecoinvent v2.2 report 8, part II), being part of the top100 chemicals included in this database. The C-content has also been calculated as an unweighted average of the C content of the substances composing this dataset.
- quicklime, milled, packed: 5.8472e-7 kg; lognormal variance with pedigree 0.092, pedigree (1,1,5,5,1)
  EcoSpold01Location=CH
  burden from sludge incineration. Uncertainty calculated from wastewater composition and treatment model
  properties: wet mass 1 kg, dry mass 0.99 kg, water content 0.010101
- slag landfill: 1.9579e-11 unit; lognormal variance with pedigree 0.072, pedigree (1,1,5,5,1)
  burden from sludge incineration. Uncertainty calculated from wastewater composition and treatment model
  EcoSpold01Location=CH
- sodium hydroxide, without water, in 50% solution state: 0.00016423 kg; lognormal variance with pedigree 0.092, pedigree (1,1,5,5,1)
  EcoSpold01Location=RER
  burden from sludge incineration. Uncertainty calculated from wastewater composition and treatment model
  properties: wet mass 1 kg, dry mass 1 kg, heating value, net 3.03 MJ
- heat, district or industrial, other than natural gas: 0.05072 MJ; lognormal variance with pedigree 0.052, pedigree (1,1,5,5,1)
  (same comment as for slag landfill)
  properties: heating value, net 1 MJ
- waste graphical paper: -0.0155 kg; name w_paper; lognormal variance with pedigree 0.042, pedigree (1,1,5,5,1)
  (same comment as for electricity, low voltage)
  production volume 171041 kg; = (-1)*w_paper/WWT*PV_WWT
    Calculated from the production volume of sewage, average in proportion to the respective output amounts.
  property price 0 EUR2005; name w_paper_price_EUR2005
  properties: water content 0.126126, carbon content, non-fossil 0.454955, wet mass 1 kg, dry mass 0.888 kg, heating value, net 14.12 MJ
  note on heating value, net: Value taken from the general comment of the treatment dataset.
- process-specific burdens, municipal waste incineration: 0.060476 kg; lognormal variance with pedigree 0.052, pedigree (1,1,5,5,1)
  (same comment as for slag landfill)
- residual material landfill: 3.5972e-12 unit; lognormal variance with pedigree 0.072, pedigree (1,1,5,5,1)
  (same comment as for slag landfill)
- cement, unspecified: 0.00069066 kg; lognormal variance with pedigree 0.082, pedigree (1,1,5,5,1)
  (same comment as for quicklime, milled, packed)
  properties: wet mass 1 kg, dry mass 1 kg
- municipal waste incineration facility: 1.5119e-11 unit; lognormal variance with pedigree 0.052, pedigree (1,1,5,5,1)
  (same comment as for quicklime, milled, packed)
- process-specific burdens, residual material landfill: 0.0017266 kg; lognormal variance with pedigree 0.072, pedigree (1,1,5,5,1)
  (same comment as for quicklime, milled, packed)
- waste cement, hydrated: -0.0017266 kg; name w_cement; lognormal variance with pedigree 0.082, pedigree (1,1,5,5,1)
  (same comment as for slag landfill)
  production volume 19052.9 kg; = (-1)*w_cement/WWT*PV_WWT
    (same comment as for waste graphical paper)
  property price 0 EUR2005; name w_cement_price_EUR2005
  properties: wet mass 1 kg, dry mass 1 kg
- titanium dioxide: 9.6199e-7 kg; lognormal variance with pedigree 0.542, pedigree (1,1,5,5,1)
  (same comment as for sodium hydroxide, without water, in 50% solution state)
  properties: dry mass 1 kg, wet mass 1 kg
- waste plastic, mixture: -0.0155 kg; name w_plastic; lognormal variance with pedigree 0.042, pedigree (1,1,5,5,1)
  EcoSpold01Location=CH
  direct wastewater treatment plant burden. Uncertainty calculated from wastewater composition and treatment model
  production volume 171041 kg; = (-1)*w_plastic/WWT*PV_WWT
    (same comment as for waste graphical paper)
  property price 0 EUR2005; name w_plastic_price_EUR2005
  properties: heating value, net 30.79 MJ, wet mass 1 kg, water content 0.180638, dry mass 0.847 kg, carbon content, fossil 0.747344
  note on carbon content, fossil: C content in 1 kg DM was calculated using data in Tab A.2, ecoinvent v2.2 report 13_I
- iron sulfate: 0.01166 kg; lognormal variance with pedigree 0.102, pedigree (1,1,5,5,1)
  direct wastewater treatment plant burden. Uncertainty calculated from wastewater composition and treatment model
  EcoSpold01Location=RER
  properties: wet mass 1 kg, dry mass 1 kg
- process-specific burdens, slag landfill: 0.011013 kg; lognormal variance with pedigree 0.072, pedigree (1,1,5,5,1)
  (same comment as for quicklime, milled, packed)
- hydrochloric acid, without water, in 30% solution state: 1.8424e-7 kg; lognormal variance with pedigree 0.082, pedigree (1,1,5,5,1)
  (same comment as for heat, district or industrial, natural gas)
  properties: heating value, net 3.32 MJ, dry mass 1 kg, wet mass 1 kg
- aluminium sulfate, powder: 0.0031512 kg; lognormal variance with pedigree 0.102, pedigree (1,1,5,5,1)
  EcoSpold01Location=RER
  direct wastewater treatment plant burden. Uncertainty calculated from wastewater composition and treatment model
  properties: dry mass 1 kg, wet mass 1 kg
- liquid manure spreading, by vacuum tanker: 0.00060399 m3; lognormal variance with pedigree 0.042, pedigree (1,1,5,5,1)
  EcoSpold01Location=CH
  burden from sludge spreading. Uncertainty calculated from wastewater composition and treatment model;activityLink introduced to establish a direct link to the corresponding regional supply of this product
- ammonia, anhydrous, liquid: 3.3607e-5 kg; lognormal variance with pedigree 0.222, pedigree (1,1,5,5,1)
  (same comment as for slag landfill)
  properties: wet mass 1 kg, dry mass 1 kg
- electricity, high voltage: 0.0086946 kWh; lognormal variance with pedigree 0.492, pedigree (1,1,5,5,1)
  (same comment as for slag landfill)
- chemical, inorganic: 3.0706e-7 kg; lognormal variance with pedigree 0.082, pedigree (1,1,5,5,1)
  (same comment as for chemical, organic)
  properties: dry mass 1 kg, carbon content, fossil 0.003, wet mass 1 kg
  note on carbon content, fossil: This dataset is an unweighted average of 20 inorganic substances (listed in Tab 88.1, ecoinvent v2.2 report 8, part II), being part of the top100 chemicals included in this database. The C-content has also been calculated as an unweighted average of the C content of the substances composing this dataset.
- iron (III) chloride, without water, in 40% solution state: 0.015944 kg; lognormal variance with pedigree 0.102, pedigree (1,1,5,5,1)
  direct wastewater treatment plant burden plus burden from sludge incineration. Uncertainty calculated from wastewater composition and treatment model
  EcoSpold01Location=CH
  properties: wet mass 1 kg, dry mass 1 kg
- chromium oxide, flakes: 1.9632e-8 kg; lognormal variance with pedigree 0.542, pedigree (1,1,5,5,1)
  (same comment as for sodium hydroxide, without water, in 50% solution state)
  properties: wet mass 1 kg, dry mass 1 kg

## Emissions to nature
- Molybdenum [water, surface water]: 5.0894e-7 kg; lognormal variance with pedigree 0.622, pedigree (1,1,5,5,1)
  sewer overload discharge plus direct wastewater treatment plant emission plus emission from sludge incineration. Uncertainty calculated from wastewater composition and treatment model
- Nickel [air, urban air close to ground]: 3.2014e-14 kg; lognormal variance with pedigree 0.812, pedigree (1,1,5,5,1)
  direct digester gas emission plus emission from sludge incineration. Uncertainty calculated from wastewater composition and treatment model
- Silicon [air, urban air close to ground]: 1.9568e-6 kg; lognormal variance with pedigree 0.732, pedigree (1,1,5,5,1)
  (same comment as for Nickel)
- Manganese [soil, agricultural]: 1.8637e-5 kg; lognormal variance with pedigree 0.712, pedigree (1,1,5,5,1)
  emission from sludge spreading. Uncertainty calculated from wastewater composition and treatment model
- TOC, Total Organic Carbon [water, surface water]: 0.0072992 kg; lognormal variance with pedigree 0.082, pedigree (1,1,5,5,1)
  (same comment as for Molybdenum)
- Molybdenum [soil, agricultural]: 3.3667e-7 kg; lognormal variance with pedigree 0.712, pedigree (1,1,5,5,1)
  (same comment as for Manganese)
- Calcium, ion [water, ground-, long-term]: 0.0012412 kg; lognormal variance with pedigree 0.712, pedigree (1,1,5,5,1)
  emission from sludge incineration. Uncertainty calculated from wastewater composition and treatment model
- Ammonium, ion [water, surface water]: 0.011027 kg; lognormal variance with pedigree 0.062, pedigree (1,1,5,5,1)
  direct wastewater treatment plant emission. Uncertainty calculated from wastewater composition and treatment model
- Aluminium [water, surface water]: 6.228e-5 kg; lognormal variance with pedigree 0.552, pedigree (1,1,5,5,1)
  (same comment as for Molybdenum)
- Molybdenum [air, urban air close to ground]: 2.6973e-10 kg; lognormal variance with pedigree 0.732, pedigree (1,1,5,5,1)
  (same comment as for Nickel)
- Sulfate [water, ground-, long-term]: 0.0011039 kg; lognormal variance with pedigree 0.112, pedigree (1,1,5,5,1)
  (same comment as for Calcium, ion)
- Iron [soil, agricultural]: 0.009475 kg; lognormal variance with pedigree 0.162, pedigree (1,1,5,5,1)
  (same comment as for Manganese)
- Silicon [water, ground-, long-term]: 7.2988e-5 kg; lognormal variance with pedigree 5.462, pedigree (1,1,5,5,1)
  (same comment as for Calcium, ion)
- Calcium [air, urban air close to ground]: 2.3777e-6 kg; lognormal variance with pedigree 0.732, pedigree (1,1,5,5,1)
  (same comment as for Nickel)
- Iron, ion [water, surface water]: 0.0036009 kg; lognormal variance with pedigree 0.662, pedigree (1,1,5,5,1)
  (same comment as for Molybdenum)
- Arsenic [air, urban air close to ground]: 2.5337e-10 kg; lognormal variance with pedigree 0.732, pedigree (1,1,5,5,1)
  (same comment as for Nickel)
- BOD5, Biological Oxygen Demand [water, surface water]: 0.0098227 kg; lognormal variance with pedigree 0.072, pedigree (1,1,5,5,1)
  (same comment as for Molybdenum)
- BOD5, Biological Oxygen Demand [water, ground-, long-term]: 3.9921e-5 kg; lognormal variance with pedigree 0.122, pedigree (1,1,5,5,1)
  (same comment as for Calcium, ion)
- Chromium, ion [water, surface water]: 5.4915e-9 kg; lognormal variance with pedigree 0.732, pedigree (1,1,5,5,1)
  (same comment as for Calcium, ion)
- Phosphate [water, ground-, long-term]: 7.2652e-5 kg; lognormal variance with pedigree 4.252, pedigree (1,1,5,5,1)
  (same comment as for Calcium, ion)
- Tin [air, urban air close to ground]: 7.5069e-10 kg; lognormal variance with pedigree 0.732, pedigree (1,1,5,5,1)
  (same comment as for Nickel)
- NMVOC, non-methane volatile organic compounds, unspecified origin [air, urban air close to ground]: 2.2813e-6 kg; lognormal variance with pedigree 0.262, pedigree (1,1,5,5,1)
  direct digester gas emission. Uncertainty calculated from wastewater composition and treatment model
- Lead [air, urban air close to ground]: 8.1848e-11 kg; lognormal variance with pedigree 0.752, pedigree (1,1,5,5,1)
  (same comment as for Nickel)
- Mercury [water, ground-, long-term]: 2.0567e-9 kg; lognormal variance with pedigree 2.982, pedigree (1,1,5,5,1)
  (same comment as for Calcium, ion)
- Cobalt [water, surface water]: 8.2105e-7 kg; lognormal variance with pedigree 0.662, pedigree (1,1,5,5,1)
  (same comment as for Molybdenum)
- Calcium, ion [water, surface water]: 0.045852 kg; lognormal variance with pedigree 0.672, pedigree (1,1,5,5,1)
  (same comment as for Molybdenum)
- Tin, ion [water, surface water]: 1.4223e-6 kg; lognormal variance with pedigree 0.662, pedigree (1,1,5,5,1)
  (same comment as for Molybdenum)
- Magnesium [water, ground-, long-term]: 0.00014782 kg; lognormal variance with pedigree 0.712, pedigree (1,1,5,5,1)
  (same comment as for Calcium, ion)
- Iron [air, urban air close to ground]: 1.2671e-7 kg; lognormal variance with pedigree 0.212, pedigree (1,1,5,5,1)
  (same comment as for Nickel)
- DOC, Dissolved Organic Carbon [water, surface water]: 0.0075377 kg; lognormal variance with pedigree 0.082, pedigree (1,1,5,5,1)
  (same comment as for Molybdenum)
- Aluminium [soil, agricultural]: 0.0010518 kg; lognormal variance with pedigree 0.452, pedigree (1,1,5,5,1)
  (same comment as for Manganese)
- Copper, ion [water, surface water]: 9.7122e-6 kg; lognormal variance with pedigree 0.652, pedigree (1,1,5,5,1)
  (same comment as for Molybdenum)
- Phosphate [water, ground-]: 2.705e-5 kg; lognormal variance with pedigree 0.122, pedigree (1,1,5,5,1)
  (same comment as for Manganese)
- Nickel [soil, agricultural]: 1.8517e-6 kg; lognormal variance with pedigree 0.712, pedigree (1,1,5,5,1)
  (same comment as for Manganese)
- Magnesium [water, surface water]: 0.0051478 kg; lognormal variance with pedigree 0.672, pedigree (1,1,5,5,1)
  (same comment as for Molybdenum)
- Cadmium [soil, agricultural]: 9.868e-8 kg; lognormal variance with pedigree 0.712, pedigree (1,1,5,5,1)
  (same comment as for Manganese)
- Potassium, ion [water, surface water]: 0.0003989 kg; lognormal variance with pedigree 0.672, pedigree (1,1,5,5,1)
  (same comment as for Molybdenum)
- Sulfate [water, surface water]: 0.14465 kg; lognormal variance with pedigree 0.082, pedigree (1,1,5,5,1)
  (same comment as for Molybdenum)
- Copper [air, urban air close to ground]: 5.8549e-11 kg; lognormal variance with pedigree 0.772, pedigree (1,1,5,5,1)
  (same comment as for Nickel)
- Magnesium [soil, agricultural]: 0.00039974 kg; lognormal variance with pedigree 0.712, pedigree (1,1,5,5,1)
  (same comment as for Manganese)
- Aluminium [air, urban air close to ground]: 6.5822e-7 kg; lognormal variance with pedigree 0.472, pedigree (1,1,5,5,1)
  (same comment as for Nickel)
- DOC, Dissolved Organic Carbon [water, ground-, long-term]: 4.8293e-5 kg; lognormal variance with pedigree 0.122, pedigree (1,1,5,5,1)
  (same comment as for Calcium, ion)
- Chromium VI [water, surface water]: 6.264e-6 kg; lognormal variance with pedigree 0.652, pedigree (1,1,5,5,1)
  (same comment as for Molybdenum)
- Cadmium, ion [water, ground-, long-term]: 3.9664e-10 kg; lognormal variance with pedigree 6.902, pedigree (1,1,5,5,1)
  (same comment as for Calcium, ion)
- Carbon [soil, agricultural]: 0.012346 kg; lognormal variance with pedigree 0.102, pedigree (1,1,5,5,1)
  (same comment as for Manganese)
- Manganese [water, surface water]: 2.6898e-5 kg; lognormal variance with pedigree 0.662, pedigree (1,1,5,5,1)
  (same comment as for Molybdenum)
- COD, Chemical Oxygen Demand [water, surface water]: 0.030152 kg; lognormal variance with pedigree 0.082, pedigree (1,1,5,5,1)
  (same comment as for Molybdenum)
- Arsenic [soil, agricultural]: 1.3867e-7 kg; lognormal variance with pedigree 0.712, pedigree (1,1,5,5,1)
  (same comment as for Manganese)
- Methane, non-fossil [air, urban air close to ground]: 0.00050213 kg; lognormal variance with pedigree 0.142, pedigree (1,1,5,5,1)
  (same comment as for Nickel)
- Water [water, unspecified]: 0.9 m3; lognormal variance with pedigree 0.0827, pedigree (2,2,5,5,1)
  Calculated value based on water balance.
  property carbon content, non-fossil 0; name C_content_non_fossil
  property water in wet mass 1000 kg; name WWM
  property carbon content, fossil 0; name C_content_fossil
  property wet mass 1000 kg; name WM
  property dry mass 0 kg; name DM
- Carbon dioxide, non-fossil [air, urban air close to ground]: 0.17202 kg; lognormal variance with pedigree 0.062, pedigree (1,1,5,5,1)
  direct wastewater treatment plant emission plus direct digester gas emission plus emission from sludge incineration. Uncertainty calculated from wastewater composition and treatment model
- Phosphorus [air, urban air close to ground]: 6.2034e-7 kg; lognormal variance with pedigree 0.102, pedigree (1,1,5,5,1)
  (same comment as for Nickel)
- Water [air, unspecified]: 0.1 m3; lognormal variance with pedigree 0.0827, pedigree (2,2,5,5,1)
  Calculated value based on water balance.
- Fluoride [water, surface water]: 3.2769e-5 kg; lognormal variance with pedigree 0.672, pedigree (1,1,5,5,1)
  (same comment as for Molybdenum)
- Arsenic, ion [water, ground-, long-term]: 3.0507e-8 kg; lognormal variance with pedigree 0.712, pedigree (1,1,5,5,1)
  (same comment as for Calcium, ion)
- Mercury [soil, agricultural]: 9.868e-8 kg; lognormal variance with pedigree 0.712, pedigree (1,1,5,5,1)
  (same comment as for Manganese)
- Cadmium [air, urban air close to ground]: 2.2388e-12 kg; lognormal variance with pedigree 0.722, pedigree (1,1,5,5,1)
  (same comment as for Nickel)
- Lead [water, ground-, long-term]: 1.5656e-7 kg; lognormal variance with pedigree 6.922, pedigree (1,1,5,5,1)
  (same comment as for Calcium, ion)
- Cobalt [air, urban air close to ground]: 7.2351e-15 kg; lognormal variance with pedigree 0.822, pedigree (1,1,5,5,1)
  (same comment as for Nickel)
- Sodium, ion [water, surface water]: 0.002186 kg; lognormal variance with pedigree 0.672, pedigree (1,1,5,5,1)
  (same comment as for Molybdenum)
- Carbon monoxide, non-fossil [air, urban air close to ground]: 0.0001613 kg; lognormal variance with pedigree 0.162, pedigree (1,1,5,5,1)
  (same comment as for Nickel)
- Copper [soil, agricultural]: 1.98e-5 kg; lognormal variance with pedigree 0.712, pedigree (1,1,5,5,1)
  (same comment as for Manganese)
- Copper, ion [water, ground-, long-term]: 6.4114e-6 kg; lognormal variance with pedigree 0.732, pedigree (1,1,5,5,1)
  (same comment as for Calcium, ion)
- Zinc, ion [water, surface water]: 3.3805e-5 kg; lognormal variance with pedigree 0.652, pedigree (1,1,5,5,1)
  (same comment as for Molybdenum)
- Lead [soil, agricultural]: 5.4854e-6 kg; lognormal variance with pedigree 0.712, pedigree (1,1,5,5,1)
  (same comment as for Manganese)
- Mercury [water, surface water]: 6.2256e-8 kg; lognormal variance with pedigree 0.652, pedigree (1,1,5,5,1)
  (same comment as for Molybdenum)
- Aluminium [water, ground-, long-term]: 0.00031181 kg; lognormal variance with pedigree 0.472, pedigree (1,1,5,5,1)
  (same comment as for Calcium, ion)
- Nitrogen oxides [air, urban air close to ground]: 0.00067568 kg; lognormal variance with pedigree 0.092, pedigree (1,1,5,5,1)
  (same comment as for Nickel)
- COD, Chemical Oxygen Demand [water, ground-, long-term]: 0.00012204 kg; lognormal variance with pedigree 0.122, pedigree (1,1,5,5,1)
  (same comment as for Calcium, ion)
- Silicon [soil, agricultural]: 0.0020983 kg; lognormal variance with pedigree 0.712, pedigree (1,1,5,5,1)
  (same comment as for Manganese)
- Tin [soil, agricultural]: 1.4121e-6 kg; lognormal variance with pedigree 0.712, pedigree (1,1,5,5,1)
  (same comment as for Manganese)
- Dinitrogen monoxide [air, urban air close to ground]: 0.0001146 kg; lognormal variance with pedigree 0.092, pedigree (1,1,5,5,1)
  direct wastewater treatment plant emission plus direct digester gas emission plus emission from sludge incineration plus emission from sludge spreading. Uncertainty calculated from wastewater composition and treatment model
- Nitrate [water, ground-, long-term]: 2.393e-5 kg; lognormal variance with pedigree 0.092, pedigree (1,1,5,5,1)
  (same comment as for Calcium, ion)
- Arsenic, ion [water, surface water]: 7.3057e-7 kg; lognormal variance with pedigree 0.642, pedigree (1,1,5,5,1)
  (same comment as for Molybdenum)
- Nitrogen [water, surface water]: 0.00049 kg; lognormal variance with pedigree 0.082, pedigree (1,1,5,5,1)
  (same comment as for Ammonium, ion)
- Zinc [air, urban air close to ground]: 3.5302e-10 kg; lognormal variance with pedigree 0.762, pedigree (1,1,5,5,1)
  (same comment as for Nickel)
- Chloride [water, surface water]: 0.040484 kg; lognormal variance with pedigree 0.482, pedigree (1,1,5,5,1)
  (same comment as for Molybdenum)
- Cyanide [air, urban air close to ground]: 5.9952e-7 kg; lognormal variance with pedigree 0.242, pedigree (1,1,5,5,1)
  (same comment as for Calcium, ion)
- Nickel, ion [water, ground-, long-term]: 6.9449e-7 kg; lognormal variance with pedigree 0.712, pedigree (1,1,5,5,1)
  (same comment as for Calcium, ion)
- Sulfur dioxide [air, urban air close to ground]: 0.000884 kg; lognormal variance with pedigree 0.112, pedigree (1,1,5,5,1)
  (same comment as for Nickel)
- Tin, ion [water, ground-, long-term]: 2.8434e-7 kg; lognormal variance with pedigree 1.272, pedigree (1,1,5,5,1)
  (same comment as for Calcium, ion)
- Iron, ion [water, ground-, long-term]: 0.0017779 kg; lognormal variance with pedigree 1.002, pedigree (1,1,5,5,1)
  (same comment as for Calcium, ion)
- Zinc [soil, agricultural]: 5.3943e-5 kg; lognormal variance with pedigree 0.712, pedigree (1,1,5,5,1)
  (same comment as for Manganese)
- Nitrite [water, surface water]: 0.000644 kg; lognormal variance with pedigree 0.082, pedigree (1,1,5,5,1)
  (same comment as for Ammonium, ion)
- Nickel, ion [water, surface water]: 3.9961e-6 kg; lognormal variance with pedigree 0.662, pedigree (1,1,5,5,1)
  (same comment as for Molybdenum)
- TOC, Total Organic Carbon [water, ground-, long-term]: 4.8293e-5 kg; lognormal variance with pedigree 0.122, pedigree (1,1,5,5,1)
  (same comment as for Calcium, ion)
- Phosphate [water, surface water]: 0.0027476 kg; lognormal variance with pedigree 0.082, pedigree (1,1,5,5,1)
  sewer overload discharge plus direct wastewater treatment plant emission plus emission from sludge incineration plus emission from sludge spreading. Uncertainty calculated from wastewater composition and treatment model
- Sulfur [soil, agricultural]: 0.0010988 kg; lognormal variance with pedigree 0.102, pedigree (1,1,5,5,1)
  (same comment as for Manganese)
- Zinc, ion [water, ground-, long-term]: 3.3502e-7 kg; lognormal variance with pedigree 5.512, pedigree (1,1,5,5,1)
  (same comment as for Calcium, ion)
- Silicon [water, surface water]: 0.00018768 kg; lognormal variance with pedigree 0.572, pedigree (1,1,5,5,1)
  (same comment as for Molybdenum)
- Magnesium [air, urban air close to ground]: 2.205e-7 kg; lognormal variance with pedigree 0.732, pedigree (1,1,5,5,1)
  (same comment as for Nickel)
- Molybdenum [water, ground-, long-term]: 1.1156e-7 kg; lognormal variance with pedigree 0.712, pedigree (1,1,5,5,1)
  (same comment as for Calcium, ion)
- Chromium [air, urban air close to ground]: 1.274e-13 kg; lognormal variance with pedigree 0.812, pedigree (1,1,5,5,1)
  (same comment as for Nickel)
- Chromium [soil, agricultural]: 4.3013e-6 kg; lognormal variance with pedigree 0.712, pedigree (1,1,5,5,1)
  (same comment as for Manganese)
- Mercury [air, urban air close to ground]: 3.3527e-13 kg; lognormal variance with pedigree 0.742, pedigree (1,1,5,5,1)
  (same comment as for Nickel)
- Cobalt [soil, agricultural]: 5.6886e-7 kg; lognormal variance with pedigree 0.712, pedigree (1,1,5,5,1)
  (same comment as for Manganese)
- Manganese [water, ground-, long-term]: 6.4288e-6 kg; lognormal variance with pedigree 0.872, pedigree (1,1,5,5,1)
  (same comment as for Calcium, ion)
- Cadmium, ion [water, surface water]: 1.4244e-7 kg; lognormal variance with pedigree 0.662, pedigree (1,1,5,5,1)
  (same comment as for Molybdenum)
- Ammonia [air, urban air close to ground]: 0.00059438 kg; lognormal variance with pedigree 0.312, pedigree (1,1,5,5,1)
  direct digester gas emission plus emission from sludge incineration plus emission from sludge spreading. Uncertainty calculated from wastewater composition and treatment model
- Lead [water, surface water]: 9.4866e-7 kg; lognormal variance with pedigree 0.602, pedigree (1,1,5,5,1)
  (same comment as for Molybdenum)
- Manganese [air, urban air close to ground]: 4.0651e-14 kg; lognormal variance with pedigree 0.842, pedigree (1,1,5,5,1)
  (same comment as for Nickel)
- Chromium VI [water, ground-, long-term]: 1.824e-7 kg; lognormal variance with pedigree 1.092, pedigree (1,1,5,5,1)
  (same comment as for Calcium, ion)
- Nitrate [water, surface water]: 0.048295 kg; lognormal variance with pedigree 0.062, pedigree (1,1,5,5,1)
  (same comment as for Molybdenum)
- Cobalt [water, ground-, long-term]: 1.9951e-7 kg; lognormal variance with pedigree 0.712, pedigree (1,1,5,5,1)
  (same comment as for Calcium, ion)
- Calcium [soil, agricultural]: 0.0035605 kg; lognormal variance with pedigree 0.712, pedigree (1,1,5,5,1)
  (same comment as for Manganese)

## Extrapolations
This dataset has been extrapolated from year 2000 to the year of the calculation (2021). The uncertainty has been adjusted accordingly.
