# machine operation, diesel, < 18.64 kW, high load factor

Dataset: EcoSpold 2, unit process
Geography: GLO
Time period: 2014-01-01 to 2021-12-31
Technology level: current
Classification: ISIC rev.4 ecoinvent: 4312:Site preparation
Classification: EcoSpold01Categories: construction processes/machinery
Synonyms: construction - rough terrain forklifts; construction - off-highway trucks; logging - chain saws > 6 hp; construction - graders; construction - paving equipment; construction - scrapers; construction - pavers; construction - surfacing equipment; construction - rollers; logging - other forest equipment (feller/bunch/ski); airport terminal - other service equipment; construction - other construction equipment; construction - excavators; construction - trenchers; construction - off-highway tractors; industrial - forklifts; construction - crawler tractors; airport terminal - tractors; construction - concrete/industrial saw; construction - rubber tire loaders; logging - shredders > 6 hp; construction - rubber tire bulldozers
Tags: template dataset
Scenario: Business-as-Usual
System model: Allocation, cut-off by classification
Generated by: Jean-Francois Menard
Published in: Kellenberger D. 2007
Database: ecoinvent
isCopyrightProtected: true
accessRestrictedTo: 1

## General comment
This dataset represents the operation of construction/industrial/airport terminal/logging machines (see list in Synonyms field). The U.S. EPA NONROAD2008 model for off-road machines has been used as basis for this dataset, it refers to engine power in units of horsepower (hp), the engine power range for the dataset is then < 25 hp. The fuel consumption and emission factors from the model have been kept in the original units of kg/hp.hour for transparency reasons. However the engine power parameter used as input data for the dataset is quantified in the SI power unit of kilowatt (kW).
As cited in the U.S. EPA NONROAD2008 model documentation (Median Life, Annual Activity, and Load Factor Values for Nonroad engine Emissions Modeling, NR-005d, 47 pp, EPA-420-R-10-016, July 2010, http://www.epa.gov/oms/models/nonrdmdl/nonrdmdl2010/420r10016.pdf), "Each diesel nonroad equipment type was assigned one of three composite load factors (High load factor, Low load factor, or 7-cycle average, i.e. steady-state). To apply these load factors, we matched nonroad applications with the test cycle that most closely represents the nonroad activity for the application". The functional unit is 1 hour of operation.
The fuel consumption and basic emission factors are generated by the U.S. EPA NONROAD2008 model. Supplementary emissions are provided by the U.S. EPA NMIM model and copied directly from the ecoinvent v3.0 dataset "diesel burned in building machine, GLO 2001". The building machine infrastructure and lubricating oil input and waste output have been copied from the same ecoinvent dataset.
This dataset is a template dataset and has been parameterized for the machine power (in kW), emission standard (referred to as "tier" by the U.S EPA, the European equivalents would be the Stage I to IV standards published by the European Commission) and load factor to enable the creation of specific instances. To do so, the tier fraction (e.g. T0) and power (e.g. T0_kW), and the load factor parameters could be changed to reflect a specific situation/machine. The diesel fuel sulfur content (see Exchange Properties) could also be changed (the ultra-low sulfur nonroad diesel sulfur content of 0,0015% or 15 ppm, effective June 2010 in the United States of America is used as default).

## Included activities end
Includes the inputs " building machine" for infrastructure, lubricating oil and fuel consumption, and air emissions and waste oil as outputs.

## Geography
Fuel flow and most emission flows are extrapolated from US conditions, some emission flows and the other intermediate product flows (building machine, lubricating oil) are extrapolated from RER and CH conditions. The uncertainty has been adjusted accordingly.

## Technology
Average current technology for one typical machine representing the category.

## Parameters
- power tier T4B: 10.9746 kW; name T4B_kW; lognormal variance with pedigree 0.0986, pedigree (4,5,5,5,4)
  Calculated value. Represents the average engine nominal power of the US (lower 48 states) 2014 machine population of the type represented by this dataset (< 18.64 kW, high load factor, see list in Synonyms field) for which the model year falls under the tier T4B emission standard (from 2013). Value calculated from the population data included in the NONROAD2008 model. The NONROAD2008 data is given in the unit of horsepower, the "horsepower to kilowatt conversion factor" parameter was used to convert the result in kW, the SI unit of power.
  Basic parameter used to define the machine population represented by the dataset, could be changed to create a new instance of the dataset to reflect a specific situation/machine.
- power tier T4A: 10.6106 kW; name T4A_kW; lognormal variance with pedigree 0.0986, pedigree (4,5,5,5,4)
  Calculated value. Represents the average engine nominal power of the US (lower 48 states) 2014 machine population of the type represented by this dataset (< 18.64 kW, high load factor, see list in Synonyms field) for which the model year falls under the tier T4A emission standard (from 2008 to 2012). Value calculated from the population data included in the NONROAD2008 model. The NONROAD2008 data is given in the unit of horsepower, the "horsepower to kilowatt conversion factor" parameter was used to convert the result in kW, the SI unit of power.
  Basic parameter used to define the machine population represented by the dataset, could be changed to create a new instance of the dataset to reflect a specific situation/machine.
- power tier T0: 0 kW; name T0_kW
  Calculated value. Represents the average engine nominal power of the US (lower 48 states) 2014 machine population of the type represented by this dataset (< 18.64 kW, high load factor, see list in Synonyms field) for which the model year falls under the tier T0 emission standard (pre-2000). Value calculated from the population data included in the NONROAD2008 model. The NONROAD2008 data is given in the unit of horsepower, the "horsepower to kilowatt conversion factor" parameter was used to convert the result in kW, the SI unit of power.
  Basic parameter used to define the machine population represented by the dataset, could be changed to create a new instance of the dataset to reflect a specific situation/machine.
- particulates <= 10 um emissions tier T1-T2 for hp < 25: 0.00033 kg/hp*h; name T12_pm10_25hp; lognormal variance with pedigree 0.218, pedigree (4,5,5,5,4)
  Literature value. Taken from the NONROAD2008 model.
- power tier T2: 11.5252 kW; name T2_kW; lognormal variance with pedigree 0.0986, pedigree (4,5,5,5,4)
  Calculated value. Represents the average engine nominal power of the US (lower 48 states) 2014 machine population of the type represented by this dataset (< 18.64 kW, high load factor, see list in Synonyms field) for which the model year falls under the tier T2 emission standard (from 2005 to 2007). Value calculated from the population data included in the NONROAD2008 model. The NONROAD2008 data is given in the unit of horsepower, the "horsepower to kilowatt conversion factor" parameter was used to convert the result in kW, the SI unit of power.
  Basic parameter used to define the machine population represented by the dataset, could be changed to create a new instance of the dataset to reflect a specific situation/machine.
- power tier T1: 0 kW; name T1_kW
  Calculated value. Represents the average engine nominal power of the US (lower 48 states) 2014 machine population of the type represented by this dataset (< 18.64 kW, high load factor, see list in Synonyms field) for which the model year falls under the tier T1 emission standard (from 2000 to 2004). Value calculated from the population data included in the NONROAD2008 model. The NONROAD2008 data is given in the unit of horsepower, the "horsepower to kilowatt conversion factor" parameter was used to convert the result in kW, the SI unit of power.
  Basic parameter used to define the machine population represented by the dataset, could be changed to create a new instance of the dataset to reflect a specific situation/machine.
- horsepower to kilowatt conversion factor: 0.7457 dimensionless; name hp_to_kW; lognormal variance with pedigree 0, pedigree (1,1,1,1,1)
  Literature value. Taken from http://en.wikipedia.org/wiki/Horsepower.
- total hydrocarbon emissions tier T1-T2 for hp < 25: 0.00046 kg/hp*h; name T12_thc_25hp; lognormal variance with pedigree 0.138, pedigree (4,5,5,5,4)
  Literature value. Taken from the NONROAD2008 model.
- fraction tier T4B: 0.60116 dimensionless; name T4B
  Calculated value. Represents the fraction of the US (lower 48 states) 2014 machine population of the type represented by this dataset (< 18.64 kW, high load factor, see list in Synonyms field) for which the model year falls under the tier T4B emission standard (from 2013). Value calculated from the population data included in the NONROAD2008 model.
  Basic parameter used to define the machine population represented by the dataset, could be changed to create a new instance of the dataset to reflect a specific situation/machine.
- fraction tier T4A: 0.393041 dimensionless; name T4A
  Calculated value. Represents the fraction of the US (lower 48 states) 2014 machine population of the type represented by this dataset (< 18.64 kW, high load factor, see list in Synonyms field) for which the model year falls under the tier T4A emission standard (from 2008 to 2012). Value calculated from the population data included in the NONROAD2008 model.
  Basic parameter used to define the machine population represented by the dataset, could be changed to create a new instance of the dataset to reflect a specific situation/machine.
- total particulates <= 10 um emissions: 0.00236885 kg; name PM10; = (T0*T0_kW/hp_to_kW*if(T0_kW/hp_to_kW<11;T0_pm10_11hp;T0_pm10_25hp)+T1*T1_kW/hp_to_kW*if(T1_kW/hp_to_kW<11;T1_pm10_11hp;T12_pm10_25hp)+T2*T2_kW/hp_to_kW*if(T2_kW/hp_to_kW<11;T2_pm10_11hp;T12_pm10_25hp)+T4A*T4A_kW/hp_to_kW*T4AB_pm10_25hp+T4B*T4B_kW/hp_to_kW*T4AB_pm10_25hp)*load; lognormal variance with pedigree 0, pedigree (1,1,1,1,1)
  Calculated value. Represents the emissions per hour of operation of the US weigthed average machine represented by this dataset (< 18.64 kW, high load factor, see list in Synonyms field).
  Uncertainty: Calculated variable. Uncertainty should be determined from propagation of uncertainty factors of underlying variables, however no uncertainty could be generated for the terms of the power function. Uncertainty of actual relation between variables not accounted at this time, although this could be included in a future update.
- fraction tier T0: 0 dimensionless; name T0
  Calculated value. Represents the fraction of the US (lower 48 states) 2014 machine population of the type represented by this dataset (< 18.64 kW, high load factor, see list in Synonyms field) for which the model year falls under the tier T0 emission standard (pre-2000). Value calculated from the population data included in the NONROAD2008 model.
  Basic parameter used to define the machine population represented by the dataset, could be changed to create a new instance of the dataset to reflect a specific situation/machine.
- fraction tier T2: 0.00579897 dimensionless; name T2
  Calculated value. Represents the fraction of the US (lower 48 states) 2014 machine population of the type represented by this dataset (< 18.64 kW, high load factor, see list in Synonyms field) for which the model year falls under the tier T2 emission standard (from 2005 to 2007). Value calculated from the population data included in the NONROAD2008 model.
  Basic parameter used to define the machine population represented by the dataset, could be changed to create a new instance of the dataset to reflect a specific situation/machine.
- fraction tier T1: 0 dimensionless; name T1
  Calculated value. Represents the fraction of the US (lower 48 states) 2014 machine population of the type represented by this dataset (< 18.64 kW, high load factor, see list in Synonyms field) for which the model year falls under the tier T1 emission standard (from 2000 to 2004). Value calculated from the population data included in the NONROAD2008 model.
  Basic parameter used to define the machine population represented by the dataset, could be changed to create a new instance of the dataset to reflect a specific situation/machine.
- volatile organic compound emissions ratio: 1.053 dimensionless; name VOC_to_THC; lognormal variance with pedigree 0.138, pedigree (4,5,5,5,4)
  Literature value. Taken from the NONROAD2008 model.
- total hydrocarbon emissions tier T4A-T4B for hp < 11: 0.00055 kg/hp*h; name T4AB_thc_11hp; lognormal variance with pedigree 0.138, pedigree (4,5,5,5,4)
  Literature value. Taken from the NONROAD2008 model.
- total hydrocarbon emissions tier T4A-T4B for hp < 25: 0.00044 kg/hp*h; name T4AB_thc_25hp; lognormal variance with pedigree 0.138, pedigree (4,5,5,5,4)
  Literature value. Taken from the NONROAD2008 model.
- total hydrocarbon emissions: 0.00377294 kg; name THC; = (T0*T0_kW/hp_to_kW*if(T0_kW/hp_to_kW<11;T0_thc_11hp;T0_thc_25hp)+T1*T1_kW/hp_to_kW*if(T1_kW/hp_to_kW<11;T1_thc_11hp;T12_thc_25hp)+T2*T2_kW/hp_to_kW*if(T2_kW/hp_to_kW<11;T2_thc_11hp;T12_thc_25hp)+T4A*T4A_kW/hp_to_kW*if(T4A_kW/hp_to_kW<11;T4AB_thc_11hp;T4AB_thc_25hp)+T4B*T4B_kW/hp_to_kW*if(T4B_kW/hp_to_kW<11;T4AB_thc_11hp;T4AB_thc_25hp))*load; lognormal variance with pedigree 0, pedigree (1,1,1,1,1)
  (same comment as for total particulates <= 10 um emissions)
- total hydrocarbon emissions tier T1 for hp < 11: 0.0008 kg/hp*h; name T1_thc_11hp; lognormal variance with pedigree 0.138, pedigree (4,5,5,5,4)
  Literature value. Taken from the NONROAD2008 model.
- total hydrocarbon emissions tier T0 for hp < 25: 0.00178 kg/hp*h; name T0_thc_25hp; lognormal variance with pedigree 0.138, pedigree (4,5,5,5,4)
  Literature value. Taken from the NONROAD2008 model.
- total hydrocarbon emissions tier T2 for hp < 11: 0.00058 kg/hp*h; name T2_thc_11hp; lognormal variance with pedigree 0.138, pedigree (4,5,5,5,4)
  Literature value. Taken from the NONROAD2008 model.
- particulates <= 10 um emissions tier T2 for hp < 11: 0.00061 kg/hp*h; name T2_pm10_11hp; lognormal variance with pedigree 0.218, pedigree (4,5,5,5,4)
  Literature value. Taken from the NONROAD2008 model.
- particulates <= 10 um emissions tier T0 for hp < 25: 0.0011 kg/hp*h; name T0_pm10_25hp; lognormal variance with pedigree 0.218, pedigree (4,5,5,5,4)
  Literature value. Taken from the NONROAD2008 model.
- particulates <= 10 um emissions tier T4A-T4B for hp < 25: 0.000276 kg/hp*h; name T4AB_pm10_25hp; lognormal variance with pedigree 0.218, pedigree (4,5,5,5,4)
  Literature value. Taken from the NONROAD2008 model.
- total hydrocarbon emissions tier T0 for hp < 11: 0.00157 kg/hp*h; name T0_thc_11hp; lognormal variance with pedigree 0.138, pedigree (4,5,5,5,4)
  Literature value. Taken from the NONROAD2008 model.
- particulates <= 10 um emissions tier T1 for hp < 11: 0.00055 kg/hp*h; name T1_pm10_11hp; lognormal variance with pedigree 0.218, pedigree (4,5,5,5,4)
  Literature value. Taken from the NONROAD2008 model.
- particulates <= 10 um emissions tier T0 for hp < 11: 0.00123 kg/hp*h; name T0_pm10_11hp; lognormal variance with pedigree 0.218, pedigree (4,5,5,5,4)
  Literature value. Taken from the NONROAD2008 model.
- load factor: 0.59 dimensionless; name load; lognormal variance with pedigree 0.0986, pedigree (4,5,5,5,4)
  Literature value. Represents the average fraction of the nominal engine power output used by the machine during its normal work cycle. Taken from the NONROAD2008 model.
  As cited in the U.S. EPA NONROAD2008 model documentation (Median Life, Annual Activity, and Load Factor Values for Nonroad engine Emissions Modeling, NR-005d, 47 pp, EPA-420-R-10-016, July 2010, http://www.epa.gov/oms/models/nonrdmdl/nonrdmdl2010/420r10016.pdf), "Each diesel nonroad equipment type was assigned one of three composite load factors (High load factor or 0.59, Low load factor or 0.21, or 7-cycle average, i.e. steady-state, or 0.43). To apply these load factors, we matched nonroad applications with the test cycle that most closely represents the nonroad activity for the application".
  Basic parameter used to define the machine population represented by the dataset, could be changed to create a new instance of the dataset to reflect a specific situation/machine.
- total volatile organic compound emissions: 0.0039729 kg; name VOC; = THC*VOC_to_THC; lognormal variance with pedigree 0, pedigree (1,1,1,1,1)
  (same comment as for total particulates <= 10 um emissions)

## Reference product
- machine operation, diesel, < 18.64 kW, high load factor: 1 hour; name RefProd; By-product classification allocatable product; CPC 543: Site preparation services
  production volume 4 hour; name ProdVol
    This is a placeholder value that does not reflect real-world production volumes. This dataset does not currently require a real-world production volume to work in the database framework, and no actual data were collected yet. This has no negative effect on the results of the ecoinvent database.
  property price 0.758695 EUR2005; name RefProd_price_EUR2005
    Calculated based on inputs: The price of the product has been calculated as a sum of the values of the material and energy inputs for this product. This value is therefore a rough estimation. It may underestimate the real price since there are additional expenses when producing any product. These expences can include for example labour costs, treatment of waste materials and profit for the producer. Please consider carefully whether this level of data quality is acceptable for your application.

## Inputs from technosphere
- lubricating oil: 0 kg; name oil; pedigree (1,1,1,1,1)
  Calculated value (see Exchange Properties).
  EcoSpold01Location=RER
  Uncertainty: Calculated variable. Uncertainty should be determined from propagation of uncertainty factors of underlying variables, however no uncertainty could be generated for the terms of the power function. Uncertainty of actual relation between variables not accounted at this time, although this could be included in a future update.
  property consumption ratio 0.022; name oil_ratio
  properties: wet mass 1 kg, heating value, net 40.2 MJ, carbon content, fossil 0.75, dry mass 1 kg
  note on heating value, net: Literature value, Source: IPCC 2006, 2006 IPCC Guidelines for National Greenhouse Gas Inventories, Prepared by the National Greenhouse Gas Inventories Programme, Eggleston H.S., Buendia L., Miwa K., Ngara T. and Tanabe K. (eds). Published: IGES, Japan
  note on consumption ratio: Calculated value. The consumption value has been taken directly from the ecoinvent v3.0 dataset "diesel, burned in building machine, GLO 2001" and divided by the diesel fuel consumption indicated in the same dataset (0,0234 kg) to obtain the consumption ratio per kg of diesel fuel.
  note on carbon content, fossil: Lubricating oil is produced from diesel. C-content/dry mass of fats and oils considered 75%, from: ecoinvent v2.2 report, n 15a, pg 40
- building machine: 9.17974e-6 unit; = diesel*machine_ratio; lognormal variance with pedigree 0.002, pedigree (1,1,3,1,1)
  (same comment as for lubricating oil)
  property consumption ratio 5.73e-6; name machine_ratio
- waste mineral oil: 0 kg; name waste_oil; pedigree (1,1,1,1,1)
  EcoSpold01Location=CH
  Uncertainty: Calculated variable. Uncertainty should be determined from propagation of uncertainty factors of underlying variables, however no uncertainty could be generated for the terms of the power function. Uncertainty of actual relation between variables not accounted at this time, although this could be included in a future update.
  production volume 0 kg
    Calculated from production volume of reference product using the relative outputs.
  property price 0 EUR2005; name waste_oil_price_EUR2005
  properties: dry mass 0.9 kg, water content 0.111111, wet mass 1 kg, carbon content, fossil 0.864444, heating value, net 34.7 MJ
  note on carbon content, fossil: Tab A.6, ecoinvent v2.2 report 13_I. C content has been calculated after data in the tables, and then referred to 1 kg DM
  note on heating value, net: Value taken from the general comment of the treatment dataset.
- diesel: 1.60205 kg; = (T0*T0_kW/hp_to_kW+T1*T1_kW/hp_to_kW+T2*T2_kW/hp_to_kW+T4A*T4A_kW/hp_to_kW+T4B*T4B_kW/hp_to_kW)*T0124AB_diesel_25hp*load; lognormal variance with pedigree 0.002, pedigree (1,1,3,1,1)
  Calculated value. Represents the diesel fuel consumption per hour of operation of the US weigthed average machine represented by this dataset (< 18.64 kW, high load factor, see list in Synonyms field).
  EcoSpold01Location=RER
  Uncertainty: Calculated variable. Uncertainty should be determined from propagation of uncertainty factors of underlying variables, however no uncertainty could be generated for the terms of the power function. Uncertainty of actual relation between variables not accounted at this time, although this could be included in a future update.
  property sulfur content 1.5e-5; name diesel_S_content
  property fuel consumption tier T0-T1-T2-T4A-T4B for hp < 25 0.186883 kg/hp*h; name T0124AB_diesel_25hp
  property carbon content, fossil 0.865; name diesel_C
  properties: heating value, net 42.8 MJ, wet mass 1 kg, dry mass 1 kg
  note on sulfur content: sulfur content on a dry matter basis. Basic parameter used to define the diesel fuel sulfur content (the default value is the ultra-low sulfur nonroad diesel sulfur content, effective June 2010 in the United States of America), could be changed to create a new instance of the dataset to reflect a specific situation/machine.
  note on carbon content, fossil: C-content of diesel is 86.5% (ecoinvent v2.2 report 6_IV, Tab 3.14)
- lubricating oil: 0.00613264, 0.0291124 kg (2 entries); lognormal variance with pedigree 0.002, pedigree (1,1,3,1,1)
  (same comment as for lubricating oil)
  properties: wet mass 1 kg, heating value, net 40.2 MJ, consumption ratio 0.022, carbon content, fossil 0.75, dry mass 1 kg
- waste mineral oil: -0.00967446, -0.000239501, -0.0253311 kg (3 entries); lognormal variance with pedigree 0.002, pedigree (1,1,3,1,1)
  (same comment as for waste mineral oil)
  production volume 0.14098 kg

## Inputs from nature
- Oxygen [natural resource, in air]: 3.71728 kg; = acetaldehyde*acetaldehyde_O+acrolein*acrolein_O+formaldehyde*formaldehyde_O+propanal*propanal_O+N2O*N2O_O+NOx*NOx_O+CO*CO_O+CO2*CO2_O+dioxins*dioxins_O+SO2*SO2_O; lognormal variance with pedigree 0.002, pedigree (1,1,3,1,1)
  Calculated value.
  Uncertainty: Calculated variable. Uncertainty should be determined from propagation of uncertainty factors of underlying variables, however no uncertainty could be generated for the terms of the power function. Uncertainty of actual relation between variables not accounted at this time, although this could be included in a future update.

## Emissions to nature
All rows: lognormal variance with pedigree 0.002, pedigree (1,1,3,1,1)
- Fluoranthene [air, unspecified]: 4.02705e-8 kg; name fluoranthene; = PM10*fluoranthene_ratio
  Calculated value (see Exchange Properties).
  Uncertainty: Calculated variable. Uncertainty should be determined from propagation of uncertainty factors of underlying variables, however no uncertainty could be generated for the terms of the power function. Uncertainty of actual relation between variables not accounted at this time, although this could be included in a future update.
  property emission ratio 1.7e-5 kg/kg; name fluoranthene_ratio
  property carbon content, fossil 0.950167; name fluoranthene_C
- Ethane [air, unspecified]: 3.77294e-6 kg; name ethane; = THC*ethane_ratio
  (same comment as for Fluoranthene)
  property carbon content, fossil 0.798885; name ethane_C
  property emission ratio 0.001 kg/kg; name ethane_ratio
- Ammonia [air, unspecified]: 4.1607e-5 kg; = diesel*ammonia_ratio
  (same comment as for Fluoranthene)
  property emission ratio 2.59711e-5 kg/kg; name ammonia_ratio
- Dibenz(a,h)anthracene [air, unspecified]: 6.86968e-12 kg; name dibenzAHanthracene; = PM10*dibenzAHanthracene_ratio
  (same comment as for Fluoranthene)
  property emission ratio 2.9e-9 kg/kg; name dibenzAHanthracene_ratio
  property carbon content, fossil 0.949307; name dibenzAHanthracene_C
- Chromium VI [air, unspecified]: 9.73134e-11 kg; = diesel*chromiumVI_ratio
  (same comment as for Fluoranthene)
  property emission ratio 6.07431e-11 kg/kg; name chromiumVI_ratio
- Methane, fossil [air, unspecified]: 6.0367e-5 kg; name methane; = THC*methane_ratio
  (same comment as for Fluoranthene)
  property emission ratio 0.016 kg/kg; name methane_ratio
  property carbon content, fossil 0.748694; name methane_C
- Chrysene [air, unspecified]: 4.50082e-9 kg; name chrysene; = PM10*chrysene_ratio
  (same comment as for Fluoranthene)
  property carbon content, fossil 0.947021; name chrysene_C
  property emission ratio 1.9e-6 kg/kg; name chrysene_ratio
- Benzene [air, unspecified]: 8.08248e-5 kg; name benzene; = VOC*benzene_ratio
  (same comment as for Fluoranthene)
  property emission ratio 0.020344 kg/kg; name benzene_ratio
  property carbon content, fossil 0.922582; name benzene_C
- Carbon monoxide, fossil [air, unspecified]: 0.0185773 kg; name CO; = (T0*T0_kW/hp_to_kW*T0_co_25hp+T1*T1_kW/hp_to_kW*if(T1_kW/hp_to_kW<11;T12_co_11hp;T12_co_25hp)+T2*T2_kW/hp_to_kW*if(T2_kW/hp_to_kW<11;T12_co_11hp;T12_co_25hp)+T4A*T4A_kW/hp_to_kW*if(T4A_kW/hp_to_kW<11;T4AB_co_11hp;T4AB_co_25hp)+T4B*T4B_kW/hp_to_kW*if(T4B_kW/hp_to_kW<11;T4AB_co_11hp;T4AB_co_25hp))*load
  (same comment as for total particulates <= 10 um emissions)
  property carbon content, fossil 0.428811; name CO_C
  property carbon monoxide emissions tier T1-T2 for hp < 25 0.00331 kg/hp*h; name T12_co_25hp
  property carbon monoxide emissions tier T4A-T4B for hp < 25 0.00216 kg/hp*h; name T4AB_co_25hp
  property carbon monoxide emissions tier T1-T2 for hp < 11 0.00629 kg/hp*h; name T12_co_11hp
  property oxygen content 0.571189; name CO_O; = 1-CO_C
  property carbon monoxide emissions tier T0 for hp < 25 0.00765 kg/hp*h; name T0_co_25hp
  property carbon monoxide emissions tier T4A-T4B for hp < 11 0.00411 kg/hp*h; name T4AB_co_11hp
- Benzo(k)fluoranthene [air, unspecified]: 8.29099e-10 kg; name benzoKfluoranthene; = PM10*benzoKfluoranthene_ratio
  (same comment as for Fluoranthene)
  property carbon content, fossil 0.952065; name benzoKfluoranthene_C
  property emission ratio 3.5e-7 kg/kg; name benzoKfluoranthene_ratio
- Acrolein [air, unspecified]: 1.20445e-5 kg; name acrolein; = VOC*acrolein_ratio
  (same comment as for Fluoranthene)
  property oxygen content 0.285372; name acrolein_O
  property carbon content, fossil 0.642716; name acrolein_C
  property emission ratio 0.00303165 kg/kg; name acrolein_ratio
- Chromium [air, unspecified]: 1.88902e-10 kg; = diesel*chromium_ratio
  (same comment as for Fluoranthene)
  property emission ratio 1.17913e-10 kg/kg; name chromium_ratio
- Benzo(ghi)perylene [air, unspecified]: 4.50082e-10 kg; name benzoGHIperylene; = PM10*benzoGHIperylene_ratio
  (same comment as for Fluoranthene)
  property carbon content, fossil 0.956232; name benzoGHIperylene_C
  property emission ratio 1.9e-7 kg/kg; name benzoGHIperylene_ratio
- Acetaldehyde [air, unspecified]: 0.000210882 kg; name acetaldehyde; = VOC*acetaldehyde_ratio
  (same comment as for Fluoranthene)
  property oxygen content 0.363179; name acetaldehyde_O
  property emission ratio 0.05308 kg/kg; name acetaldehyde_ratio
  property carbon content, fossil 0.545303; name acetaldehyde_C
- Sulfur dioxide [air, unspecified]: 4.68909e-5 kg; name SO2; = (T0*T0_kW/hp_to_kW*(T0124AB_diesel_25hp*sulfur_to_direct_PM-if(T0_kW/hp_to_kW<11;T0_thc_11hp;T0_thc_25hp))+T1*T1_kW/hp_to_kW*(T0124AB_diesel_25hp*sulfur_to_direct_PM-if(T1_kW/hp_to_kW<11;T1_thc_11hp;T12_thc_25hp))+T2*T2_kW/hp_to_kW*(T0124AB_diesel_25hp*sulfur_to_direct_PM-if(T2_kW/hp_to_kW<11;T2_thc_11hp;T12_thc_25hp))+T4A*T4A_kW/hp_to_kW*(T0124AB_diesel_25hp*sulfur_to_direct_PM-if(T4A_kW/hp_to_kW<11;T4AB_thc_11hp;T4AB_thc_25hp))+T4B*T4B_kW/hp_to_kW*(T0124AB_diesel_25hp*sulfur_to_direct_PM-if(T4B_kW/hp_to_kW<11;T4AB_thc_11hp;T4AB_thc_25hp)))*diesel_S_content*2*load
  Calculated value. Represents the emissions per hour of operation of the US weigthed average machine represented by this dataset (< 18.64 kW, high load factor, see list in Synonyms field). Based on the diesel fuel sulfur content, modulated by the estimated fraction of sulfur directly converted to particulate form (value of 0,978 taken from NONROAD2008 model). The value of 2 in the mathematical relation repressents the stoichiometric relationship between sulfur dioxide and elementary sulfur (2 g SO2/g S).
  Uncertainty: Calculated variable. Uncertainty should be determined from propagation of uncertainty factors of underlying variables, however no uncertainty could be generated for the terms of the power function. Uncertainty of actual relation between variables not accounted at this time, although this could be included in a future update.
  property fraction of diesel sulfur converted to direct PM (hydrated sulfuric acid) 0.978; name sulfur_to_direct_PM
  property oxygen content 0.499477; name SO2_O
- Benzo(b)fluoranthene [air, unspecified]: 1.16074e-9 kg; name benzoBfluoranthene; = PM10*benzoBfluoranthene_ratio
  (same comment as for Fluoranthene)
  property emission ratio 4.9e-7 kg/kg; name benzoBfluoranthene_ratio
  property carbon content, fossil 0.952065; name benzoBfluoranthene_C
- Acenaphthylene [air, unspecified]: 1.98984e-7 kg; name acenaphthylene; = PM10*acenaphthylene_ratio
  (same comment as for Fluoranthene)
  property emission ratio 8.4e-5 kg/kg; name acenaphthylene_ratio
  property carbon content, fossil 0.947021; name acenaphthylene_C
- Particulates, < 2.5 um [air, unspecified]: 0.00229779 kg; name PM25; = PM10*PM25_ratio
  (same comment as for Fluoranthene)
  property carbon content, fossil 0.922582; name PM_C
  property emission ratio 0.97 kg/kg; name PM25_ratio
- Benz(a)anthracene [air, unspecified]: 1.68189e-9 kg; name benzAanthracene; = PM10*benzAanthracene_ratio
  (same comment as for Fluoranthene)
  property carbon content, fossil 0.947021; name benzAanthracene_C
  property emission ratio 7.1e-7 kg/kg; name benzAanthracene_ratio
- Acenaphthene [air, unspecified]: 2.36885e-7 kg; name acenaphthene; = PM10*acenaphthene_ratio
  (same comment as for Fluoranthene)
  property emission ratio 0.0001 kg/kg; name acenaphthene_ratio
  property carbon content, fossil 0.934641; name acenaphthene_C
- Nitrogen oxides [air, unspecified]: 0.0380495 kg; name NOx; = (T0*T0_kW/hp_to_kW*if(T0_kW/hp_to_kW<11;T0_nox_11hp;T0_nox_25hp)+T1*T1_kW/hp_to_kW*if(T1_kW/hp_to_kW<11;T1_nox_11hp;T12_nox_25hp)+T2*T2_kW/hp_to_kW*if(T2_kW/hp_to_kW<11;T2_nox_11hp;T12_nox_25hp)+T4A*T4A_kW/hp_to_kW*if(T4A_kW/hp_to_kW<11;T4AB_nox_11hp;T4AB_nox_25hp)+T4B*T4B_kW/hp_to_kW*if(T4B_kW/hp_to_kW<11;T4AB_nox_11hp;T4AB_nox_25hp))*load
  (same comment as for total particulates <= 10 um emissions)
  property nitrogen oxides emissions tier T0 for hp < 25 0.00805 kg/hp*h; name T0_nox_25hp
  property nitrogen oxides emissions tier T0 for hp < 11 0.00948 kg/hp*h; name T0_nox_11hp
  property nitrogen oxides emissions tier T4A-T4B for hp < 25 0.00444 kg/hp*h; name T4AB_nox_25hp
  property nitrogen oxides emissions tier T1-T2 for hp < 25 0.00421 kg/hp*h; name T12_nox_25hp
  property oxygen content 0.695533; name NOx_O
  property nitrogen oxides emissions tier T4A-T4B for hp < 11 0.0043 kg/hp*h; name T4AB_nox_11hp
  property nitrogen oxides emissions tier T2 for hp < 11 0.00407 kg/hp*h; name T2_nox_11hp
  property nitrogen oxides emissions tier T1 for hp < 11 0.00496 kg/hp*h; name T1_nox_11hp
- Anthracene [air, unspecified]: 1.01861e-9 kg; name anthracene; = PM10*anthracene_ratio
  (same comment as for Fluoranthene)
  property emission ratio 4.3e-7 kg/kg; name anthracene_ratio
  property carbon content, fossil 0.94345; name anthracene_C
- Butadiene [air, unspecified]: 7.39596e-6 kg; name butadiene; = VOC*butadiene_ratio
  (same comment as for Fluoranthene)
  property carbon content, fossil 0.8882; name butadiene_C
  property emission ratio 0.0018616 kg/kg; name butadiene_ratio
- Copper [air, unspecified]: 2.72348e-6 kg; = diesel*copper_ratio
  (same comment as for Fluoranthene)
  property emission ratio 1.7e-6 kg/kg; name copper_ratio
- 2,2,4-Trimethyl pentane [air, unspecified]: 2.85745e-6 kg; name trimethylpentane; = VOC*trimethylpentane_ratio
  (same comment as for Fluoranthene)
  property emission ratio 0.000719235 kg/kg; name trimethylpentane_ratio
  property carbon content, fossil 0.841179; name trimethylpentane_C
- Carbon dioxide, fossil [air, unspecified]: 5.06104 kg; name CO2; = (diesel*diesel_C-trimethylpentane*trimethylpentane_C-acenaphthene*acenaphthene_C-acenaphthylene*acenaphthylene_C-acetaldehyde*acetaldehyde_C-acrolein*acrolein_C-anthracene*anthracene_C-benzAanthracene*benzAanthracene_C-benzene*benzene_C-ethylbenzene*ethylbenzene_C-benzoApyrene*benzoApyrene_C-benzoBfluoranthene*benzoBfluoranthene_C-benzoGHIperylene*benzoGHIperylene_C-benzoKfluoranthene*benzoKfluoranthene_C-butadiene*butadiene_C-chrysene*chrysene_C-dibenzAHanthracene*dibenzAHanthracene_C-dioxins*dioxins_C-ethane*ethane_C-fluoranthene*fluoranthene_C-fluorene*fluorene_C-formaldehyde*formaldehyde_C-hexane*hexane_C-indeno123CDpyrene*indeno123CDpyrene_C-methane*methane_C-naphthalene*naphthalene_C-NMVOC*NMVOC_C-phenanthrene*phenanthrene_C-(PM10p+PM25+PM2510)*PM_C-propanal*propanal_C-pyrene*pyrene_C-styrene*styrene_C-toluene*toluene_C-xylene*xylene_C)*44/12
  Calculated value. Represents the emissions per hour of operation of the US weigthed average machine represented by this dataset (< 18.64 kW, high load factor, see list in Synonyms field). Based on the carbon balance, considers the diesel fuel carbon content and the carbon in the other carbon containing emissions and converts the remaining into carbon dioxide. The 44/12 term represents the stoichiometric relationship between carbon dioxide and carbon.
  Uncertainty: Calculated variable. Uncertainty should be determined from propagation of uncertainty factors of underlying variables, however no uncertainty could be generated for the terms of the power function. Uncertainty of actual relation between variables not accounted at this time, although this could be included in a future update.
  property carbon content, fossil 0.272921; name CO2_C
  property oxygen content 0.727079; name CO2_O; = 1-CO2_C
- Particulates, > 10 um [air, unspecified]: 0.000151045 kg; name PM10p; = PM10*PM10p_ratio
  (same comment as for Fluoranthene)
  property emission ratio 0.0637628 kg/kg; name PM10p_ratio
- NMVOC, non-methane volatile organic compounds, unspecified origin [air, unspecified]: 0.0030201 kg; name NMVOC; = VOC-trimethylpentane-acetaldehyde-acrolein-benzene-ethylbenzene-butadiene-formaldehyde-hexane-propanal-styrene-toluene-xylene
  (same comment as for Oxygen)
  property carbon content, fossil 0.854049; name NMVOC_C
- Propanal [air, unspecified]: 4.68803e-5 kg; name propanal; = VOC*propanal_ratio
  (same comment as for Fluoranthene)
  property carbon content, fossil 0.620409; name propanal_C
  property emission ratio 0.0118 kg/kg; name propanal_ratio
  property oxygen content 0.275468; name propanal_O
- Zinc [air, unspecified]: 1.60205e-6 kg; = diesel*zinc_ratio
  (same comment as for Fluoranthene)
  property emission ratio 1e-6 kg/kg; name zinc_ratio
- Xylene [air, unspecified]: 4.20413e-5 kg; name xylene; = VOC*xylene_ratio
  (same comment as for Fluoranthene)
  property carbon content, fossil 0.905065; name xylene_C
  property emission ratio 0.010582 kg/kg; name xylene_ratio
- Benzo(a)pyrene [air, unspecified]: 8.29099e-10 kg; name benzoApyrene; = PM10*benzoApyrene_ratio
  (same comment as for Fluoranthene)
  property carbon content, fossil 0.952065; name benzoApyrene_C
  property emission ratio 3.5e-7 kg/kg; name benzoApyrene_ratio
- Toluene [air, unspecified]: 5.94625e-5 kg; name toluene; = VOC*toluene_ratio
  (same comment as for Fluoranthene)
  property carbon content, fossil 0.91249; name toluene_C
  property emission ratio 0.014967 kg/kg; name toluene_ratio
- Cadmium [air, unspecified]: 1.60205e-8 kg; = diesel*cadmium_ratio
  (same comment as for Fluoranthene)
  property emission ratio 1e-8 kg/kg; name cadmium_ratio
- Pyrene [air, unspecified]: 6.86968e-9 kg; name pyrene; = PM10*pyrene_ratio
  (same comment as for Fluoranthene)
  property carbon content, fossil 0.950167; name pyrene_C
  property emission ratio 2.9e-6 kg/kg; name pyrene_ratio
- Styrene [air, unspecified]: 2.36181e-6 kg; name styrene; = VOC*styrene_ratio
  (same comment as for Fluoranthene)
  property carbon content, fossil 0.922582; name styrene_C
  property emission ratio 0.00059448 kg/kg; name styrene_ratio
- Particulates, > 2.5 um, and < 10um [air, unspecified]: 7.10656e-5 kg; name PM2510; = PM10-PM25
  Calculated value
  Uncertainty: Calculated variable. Uncertainty should be determined from propagation of uncertainty factors of underlying variables, however no uncertainty could be generated for the terms of the power function. Uncertainty of actual relation between variables not accounted at this time, although this could be included in a future update.
- Phenanthrene [air, unspecified]: 6.15902e-7 kg; name phenanthrene; = PM10*phenanthrene_ratio
  (same comment as for Fluoranthene)
  property carbon content, fossil 0.94345; name phenanthrene_C
  property emission ratio 0.00026 kg/kg; name phenanthrene_ratio
- Manganese [air, unspecified]: 1.30705e-8 kg; = diesel*manganese_ratio
  (same comment as for Fluoranthene)
  property emission ratio 8.15864e-9 kg/kg; name manganese_ratio
- Dioxins, measured as 2,3,7,8-tetrachlorodibenzo-p-dioxin [air, unspecified]: 9.61537e-13 kg; name dioxins; = diesel*dioxins_ratio
  (same comment as for Fluoranthene)
  property emission ratio 6.00192e-13 kg/kg; name dioxins_ratio
  property oxygen content 0.0993808; name dioxins_O
  property carbon content, fossil 0.447652; name dioxins_C
- Naphthalene [air, unspecified]: 1.08967e-6 kg; name naphthalene; = PM10*Naphthalene_ratio
  (same comment as for Fluoranthene)
  property emission ratio 0.00046 kg/kg; name naphthalene_ratio
  property carbon content, fossil 0.937091; name naphthalene_C
- Hexane [air, unspecified]: 6.32208e-6 kg; name hexane; = VOC*hexane_ratio
  (same comment as for Fluoranthene)
  property emission ratio 0.0015913 kg/kg; name hexane_ratio
  property carbon content, fossil 0.836259; name hexane_C
- Dinitrogen monoxide [air, unspecified]: 0.000192246 kg; name N2O; = diesel*N2O_ratio
  (same comment as for Fluoranthene)
  property oxygen content 0.363506; name N2O_O
  property emission ratio 0.00012 kg/kg; name N2O_ratio
- Indeno(1,2,3-cd)pyrene [air, unspecified]: 1.87139e-10 kg; name indeno123CDpyrene; = PM10*indeno123CDpyrene_ratio
  (same comment as for Fluoranthene)
  property emission ratio 7.9e-8 kg/kg; name indeno123CDpyrene_ratio
  property carbon content, fossil 0.956232; name indeno123CDpyrene_C
- Formaldehyde [air, unspecified]: 0.000469419 kg; name formaldehyde; = VOC*formaldehyde_ratio
  (same comment as for Fluoranthene)
  property emission ratio 0.118155 kg/kg; name formaldehyde_ratio
  property oxygen content 0.532842; name formaldehyde_O
  property carbon content, fossil 0.400023; name formaldehyde_C
- Selenium [air, unspecified]: 1.60205e-8 kg; = diesel*selenium_ratio
  (same comment as for Fluoranthene)
  property emission ratio 1e-8 kg/kg; name selenium_ratio
- Fluorene [air, unspecified]: 2.36885e-7 kg; name fluorene; = PM10*fluorene_ratio
  (same comment as for Fluoranthene)
  property emission ratio 0.0001 kg/kg; name fluorene_ratio
  property carbon content, fossil 0.939364; name fluorene_C
- Benzene, ethyl- [air, unspecified]: 1.23164e-5 kg; name ethylbenzene; = VOC*ethylbenzene_ratio
  (same comment as for Fluoranthene)
  property carbon content, fossil 0.905065; name ethylbenzene_C
  property emission ratio 0.0031001 kg/kg; name ethylbenzene_ratio
- Nickel [air, unspecified]: 1.94151e-8 kg; = diesel*nickel_ratio
  Calculated value (see Exchange Properties).
  property emission ratio 1.21189e-8 kg/kg; name nickel_ratio

## Sampling procedure
Most data from the U.S. EPA NONROAD2008 and NMIM models. Some data from the LCA study Oekoinventare von Energiesystemen 1996 and emissions from the Swiss "Offroad" database.

## Extrapolations
This dataset has been extrapolated from year 2014 to the year of the calculation (2021). The uncertainty has been adjusted accordingly.
