# treatment of waste fibreboard, collection for final disposal

Dataset: EcoSpold 2, unit process
Geography: RoW
Time period: 1994-01-01 to 2021-12-31
Technology level: current
Classification: ISIC rev.4 ecoinvent: 3821:Treatment and disposal of non-hazardous waste
Classification: EcoSpold01Categories: waste management/building demolition
Tags: Treatment; ConvertedDataset
Scenario: Business-as-Usual
System model: Allocation, cut-off by classification
Generated by: Gabor Doka (obsolete)
Published in: Doka G. 2007
Database: ecoinvent
isCopyrightProtected: true
accessRestrictedTo: 1

## General comment
The waste contains 0.925kg untreated wood (GSD=100.2%) and 0.075kg polyurethane (GSD=105.8%) Waste density is 740 kg/m3. Allocation of energy production in waste incineration: no substitution or expansion. Total burden allocated to waste disposal function of waste incinerator.
[This dataset was already contained in the ecoinvent database version 2. It was not individually updated during the transfer to ecoinvent version 3. Life Cycle Impact Assessment results may still have changed, as they are affected by changes in the supply chain, i.e. in other datasets. This dataset was generated following the ecoinvent quality guidelines for version 2. It may have been subject to central changes described in the ecoinvent version 3 change report (http://www.ecoinvent.org/database/ecoinvent-version-3/reports-of-changes/), and the results of the central updates were reviewed extensively. The changes added e.g. consistent water flows and other information throughout the database. The documentation of this dataset can be found in the ecoinvent reports of version 2, which are still available via the ecoinvent website. The change report linked above covers all central changes that were made during the conversion process.]

## Included activities end
transport to dismantling facilities, final disposal of waste material,

## Geography
Specific to the technology mix encountered in Switzerland in late 1990ies

## Technology
Building demolition with skid-steer loaders.

## Reference product
- waste fibreboard: -1 kg; CPC 37111: Glass in the mass, in balls (except microspheres), rods or tubes, unworked; waste and scrap of glass; By-product classification Waste
  EcoSpold01Location=CH
  production volume 3.96633 kg
    This is a placeholder value that does not reflect real-world production volumes. This dataset does not currently require a real-world production volume to work in the database framework, and no actual data were collected yet. This has no negative effect on the results of the ecoinvent database.
  property price 0 EUR2005
    Waste products are assigned a price of zero as they are assumed to require further treatment.
  property carbon content, non-fossil 0.439195
    The waste contains 0.925kg untreated wood (Tab A.4 for details) and 0.075kg polyurethane (Tab A.1 for details), (ecoinvent v2.2 report 13_I)
  property carbon content, fossil 0.0731794
    (same comment as for waste fibreboard)
  property heating value, net 12.69 MJ
    LHV is calculated based on the Carbon content of the product. More details can be found on the respective documentation.
  property carbon content 0.512375
    carbon content on a dry matter basis (reserved; not for manual entry)
  properties: dry mass 0.84245 kg, water in wet mass 0.15755 kg, water content 0.187014, wet mass 1 kg, carbon allocation 0.43165 kg

## Inputs from technosphere
- waste wood, untreated: 0 kg; pedigree (1,1,1,1,1)
  disposed masses. Uncertainty calculated from uncertainty of waste composition
  EcoSpold01Location=CH
  production volume 0 kg
    Calculated from the production volume of waste fibreboard in proportion to the respective output amounts.
  properties: carbon content, non-fossil 0.48632, dry mass 0.8 kg, water content 0.25, wet mass 1 kg, heating value, net 13.99 MJ
  note on carbon content, non-fossil: Tab A.4, ecoinvent v2.2 report 13_I. C content has been referred to 1 kg DM,
  note on heating value, net: Value taken from the general comment of the treatment dataset.
- waste polyurethane: 0 kg; pedigree (1,1,1,1,1)
  (same comment as for waste wood, untreated)
  production volume 0 kg
    (same comment as for waste wood, untreated)
  properties: wet mass 1 kg, carbon content, fossil 0.641283, dry mass 0.998 kg, water content 0.00200401, heating value, net 30.67 MJ
  note on carbon content, fossil: C content was calculated for 1 kg DM, using data in Tab A.2, ecoinvent v2.2 report 13_I.
- waste wood, untreated: -0.0562586, -0.00698535, -0.000510708, -0.0196198, -0.00296407, -0.00468595, -0.0875953, -0.74638 kg (8 entries); lognormal variance with pedigree 0.042, pedigree (1,1,5,5,1)
  (same comment as for waste wood, untreated)
  production volume 3.66886 kg
- waste polyurethane: -0.00921673, -0.000615826, -4.6574e-5, -0.000254358, -0.000102758, -0.000241537, -0.0645222 kg (7 entries); lognormal variance with pedigree 0.042, pedigree (1,1,5,5,1)
  (same comment as for waste wood, untreated)
  production volume 0.3 kg

## Sampling procedure
waste-specific calculation based on literature data

## Extrapolations
none This dataset has been copied from an original dataset covering the geography CH. The uncertainty has been adjusted accordingly.

## Review by Niels Jungbluth 2003-08-06
Passed. Calculation for standard deviation 95 of infrastructure, land occupation, transport services and other services can differ from standard Pedigree approach used in this project and figures obtained by this procedure.
