# natural gas, high pressure, import from DE

Dataset: EcoSpold 2, unit process
Geography: DK
Time period: 2012-01-01 to 2021-12-31
Technology level: current
Classification: ISIC rev.4 ecoinvent: 4930:Transport via pipeline
Scenario: Business-as-Usual
System model: Allocation, cut-off by classification
Generated by: Mireille Faist Emmenegger
Published in: Faist Emmenegger, Mireille 2015
Database: ecoinvent
isCopyrightProtected: true
accessRestrictedTo: 1

## General comment
This dataset describes the transport (expressed in tkm) needed for an average export of German natural gas to Denmark. An average distance of 400km is estimated for the export.
Characteristics are based on the ecoinvent report v2 'Erdgas' from 2007: HV; 38.72 MJ/m-3; density, 0.76 kg/m-3, 0.69 kg CH4/m-3, 0.002 kg CO2/m-3

## Included activities start
'Gate' of natural gas field

## Included activities end
'Entry gate' of national NG market

## Geography
The average weighted export distance is based on the trade movements 2012.

## Technology
The distance is based on rough estimates, using maps of natural gas pipeline infrastructure.

## Reference product
- natural gas, high pressure: 1 m3; CPC 12020: Natural gas, liquefied or in the gaseous state; By-product classification allocatable product; CAS 14493-06-2
  production volume 4.09e6 m3
    m3 imported from DE to DK. Total amount of natural gas imports to Denmark according to Central Intelligence Agency (n.d.), The World Factbook, split on countries of origin according to supply mix shares as reported by Schori et al. (2012). Reference(s): Central Intelligence Agency (n.d.) The World Factbook. FIELD LISTING : NATURAL GAS - IMPORTS. Retrieved online from https://www.cia.gov/library/publications/resources/the-world-factbook/fields/2252.html#da, August 31, 2017. Schori S., Frischknecht R., 2012, Life Cycle Inventory of Natural Gas Supply. ESU-services Ltd., Zürich, CH, commissioned by the Swiss Federal Office of Energy SFOE.
  properties: heating value, gross 0 MJ, water in wet mass 0 kg, water content 0, dry mass 0.84 kg, wet mass 0.84 kg, heating value, net 39 MJ, price 0.166 EUR2005, carbon content, non-fossil 0, carbon content, fossil 0.602381, carbon content 0.602381, carbon allocation 0.506 kg

## Inputs from technosphere
- transport, pipeline, long distance, natural gas: 0.304 metric ton*km; = 400*0.76/1000; lognormal variance with pedigree 0.1286, pedigree (2,1,4,1,1)
  Estimated average distance of pipleine transport for the export from Germany to Denmark, multiplied by density of the natural gas.
  Uncertainty: A
- natural gas, high pressure: 1.0001 m3; source Faist Emmenegger, M. 2007; lognormal variance with pedigree 0.026, pedigree (4,1,4,1,1)
  Data for leckages from german industrial expert for 2001
  Uncertainty: D
  properties: heating value, net 39 MJ, dry mass 0.84 kg, carbon content, fossil 0.602381, wet mass 0.84 kg
  note on heating value, net: Literature value, Source: United Nations Statistics Division (2018) International Recommendations for Energy Statistics (IRES). Available at: http://unstats.un.org/unsd/statcom/doc11/BG-IRES.pdf.
  note on carbon content, fossil: An average C content of 0.506 kg C/ m3 has been assumed (this average has been calculated using data in Tab 3.5, ecoinvent v2.2 report 6_V
- natural gas, burned in gas motor, for storage: 0.0525 MJ; source Faist Emmenegger, M. 2007; lognormal variance with pedigree 0.034, pedigree (4,1,4,1,3)
  Data from german industrial expert for 2001, standard technology
  Uncertainty: D
  properties: heating value, net 1 MJ

## Emissions to nature
All rows: source Faist Emmenegger, M. 2007
- Ethane [air, non-urban air or from high stacks]: 8e-7 kg; lognormal variance with pedigree 0.1286, pedigree (2,1,4,1,1)
  calculated based on losses during storage (0.01%) and estimation of Hg-content
  Uncertainty: c
- Mercury [air, non-urban air or from high stacks]: 1e-12 kg; lognormal variance with pedigree 0.116025, pedigree (4,1,5,2,3)
  (same comment as for Ethane)
- Methane, fossil [air, non-urban air or from high stacks]: 6.9e-5 kg; lognormal variance with pedigree 0.1286, pedigree (2,1,4,1,1)
  (same comment as for Ethane)
- Propane [air, non-urban air or from high stacks]: 1e-7 kg; lognormal variance with pedigree 0.1286, pedigree (2,1,4,1,1)
  (same comment as for Ethane)
- Carbon dioxide, fossil [air, non-urban air or from high stacks]: 2e-7 kg; lognormal variance with pedigree 0.1286, pedigree (2,1,4,1,1)
  (same comment as for Ethane)

## Extrapolations
This dataset has been extrapolated from year 2012 to the year of the calculation (2021). The uncertainty has been adjusted accordingly.
