# indium production

Dataset: EcoSpold 2, unit process
Geography: RER
Time period: 2000-01-01 to 2021-12-31
Technology level: current
Classification: ISIC rev.4 ecoinvent: 2011:Manufacture of basic chemicals
Classification: EcoSpold01Categories: metals/extraction
Tags: ConvertedDataset
Scenario: Business-as-Usual
System model: Allocation, cut-off by classification
Generated by: Mischa Classen
Published in: Classen M. 2009
Database: ecoinvent
isCopyrightProtected: true
accessRestrictedTo: 1

## General comment
This dataset describes the primary production of 1 kg of indium metal (99.999%, 5N) on a European average, at plant. No secondary sources from post consumer scrap are considered; only the most important source of indium raw material: The hydrometallurgical zinc operations. Process steps are taken from solvent extraction / electrowinning of copper, given the absence of data specific to indium production, and the many similarities indium production has with copper beneficiation. This dataset is not to be used when indium is a substantial part of the system modelled, i.e. for comparisons of special solder pastes.
[This dataset was already contained in the ecoinvent database version 2. It was not individually updated during the transfer to ecoinvent version 3. Life Cycle Impact Assessment results may still have changed, as they are affected by changes in the supply chain, i.e. in other datasets. This dataset was generated following the ecoinvent quality guidelines for version 2. It may have been subject to central changes described in the ecoinvent version 3 change report (http://www.ecoinvent.org/database/ecoinvent-version-3/reports-of-changes/), and the results of the central updates were reviewed extensively. The changes added e.g. consistent water flows and other information throughout the database. The documentation of this dataset can be found in the ecoinvent reports of version 2, which are still available via the ecoinvent website. The change report linked above covers all central changes that were made during the conversion process.]

## Included activities start
From transport of indium raw material to the factory gate.

## Included activities end
This activity ends with the transport of indium to dealers in Europe, by plane.

The dataset includes the leaching and solvent extraction of zinc hydrometallurgy byproducts, the subsequent cementation and anode casting step, the electrorefining of indium, the final vacuum refining, and the production infrastructure.

The dataset does not include the additional power consumption for vacuum preparation (other than the stated in the technology), nor the inert gas atmosphere.

## Geography
This module represents the production of primary indium on a European average. The inventory however is compiled with global average data, e.g. for zinc-production.

## Technology
Indium containing residues from hydrometallurgical zinc operations are leached. Subsequent solvent extraction and precipitation of sponge indium. Indium cathodes are cast and electrorefined, followed by vacuum refining to obtain 5N quality.
LEACHING AND SOLVENT EXTRACTION WITH D2EHPA
This leaching step works on residues from hydrometallurgical zinc extraction.
CEMENTATION WITH ZINC POWDER AND ANODE CASTING:
Crude indium is formed by the precipitation of a sponge. Here, it is assumed that the sponge contains 20%wt moisture and is dried prior to anode casting. Drying is effected in a spray dryer used in ceramic industry (38kW at 250 kg per hour), Melting is assessed using the heat of fusion and assuming a system efficiency of 70%.
ELECTROREFINING:
Electricity consumption equals 0.35 kWh per kg indium cathode sheet.
VACUUM REFINING:
A RF induction heated Vacuum furnace is employed. It uses 0.5 kW per kg load, which corresponds to a batch of 30 kg indium that is heated for 4 hours in a 15kW furnace, and utterly results in a somewhat higher span of 0.5 – 0.3 kW per kg batch.
References:
Timokhova M. I. (2002) Certain specifics of quasi-isostatic molding (a review). In: Glass and Ceramics, 59(1-2), pp. 22-26, Online-Version under: <Go to ISI>://000177012300007.

## Reference product
- indium: 1 kg; name RP_amount_1; source Davenport W. G. 2002; CPC 34231: Chemical elements n.e.c.; inorganic acids except phosphoric, nitric and sulphonitric; inorganic oxygen compoun[…]; By-product classification allocatable product; CAS 7440-74-6
  EcoSpold01Location=RER
  Indium is a very soft, silvery-white metal that has a bright luster. As a pure metal indium emits a high-pitched "cry" when it is bent. Both gallium and indium are able to wet glass. Indium has a low melting point (429.75 K) but a high boiling point (2353.15 K). Indium becomes superconducting at 3.37 K. Metallic indium is not oxidized by air or oxygen at room temperature. It reacts directly with arsenic, antimony, the halogens, oxygen, phosphorus, sulfur, selenium, and tellurium when heated. Indium dissolves only slowly in cold dilute mineral acids, but more readily in hot dilute or concentrated acids. Alkalis do not attack the massive metal. Indium forms alloys with most other metals. Extensive solid solutions are formed with lead, thallium, and mercury.
  Uses:
  - Coatings: Indium's largest use is for coatings. Metallic indium ingots are processed into an oxide and then mixed with tin-oxide to form indium-tin-oxide (ITO). This material is used to produce sputtering targets. These targets are placed in a vacuum and the ITO is "sputtered" onto glass for use in display devices such as laptop computer screens, LCD watches, appliance display panels and portable phones.
  ITO is also used in traditional applications such as low-pressure sodium lamps, architectural glass and oven doors (heat reflector applications).
  New applications for indium coatings include high definition televisions and thin screen computer monitors (Teckcominco, 2006).
  Application of ITO coatings is a wasteful process and only around 20-30% of the material actually ends up on the substrate (Jansseune, 2005). The rest is recycled as prompt scrap.
  - Alloys: Indium has a relatively low melting point at 157°C. This enables it to be utilized in alloy production such as AgInSbTe sputtering target manufacturing for the electronics industry (Teckcominco, 2006).
  - Electronics & Semiconductors: Indium is used as a doping agent for germanium (Ge) and gallium arsenide (GaAs) semiconductors.
  The largest use for high purity indium is for the production of indium phosphide (InP) for use in the semiconductor industry. InP is also used in photonic applications, such as lasers, photo detectors, optical modulators and amplifiers, and in electronic applications, such as, HEMT’s (high electron mobility transistors), HBT’s (heterojunction bipolar transistors), and FET’s (field effect transistors), millimeter wave and microwave circuits, and high-speed digital integrated circuits. (Teckcominco, 2006)
  Calculated value.
  production volume 55000 kg; = 55E3
    The indium production in the RER in 2005 has been estimated using the information on:
    http://minerals.usgs.gov/minerals/pubs/commodity/indium/myb1-2007-indiu.xls .
    It has been calculated as the addition of the RER coiuntries listed in the document, that is: Belgium, France, Germany, Italy, Netherlands, United Kingdom.
  property price 855 EUR2005
    Literature value (USGS, http://minerals.usgs.gov/minerals/pubs/commodity/indium/mcs-2009-indiu.pdf, accessed 20160222). The price of indium in 2005 was 946 USD.
  property carbon content 0
    carbon content on a dry matter basis (reserved; not for manual entry)
  properties: carbon content, fossil 0, water content 0, wet mass 1 kg, carbon content, non-fossil 0, water in wet mass 0 kg, dry mass 1 kg, carbon allocation 0 kg

## Inputs from technosphere
- chemical factory, organics: 8e-10 unit; lognormal variance with pedigree 0.438, pedigree (5,1,5,1,3)
  Estimation from dataset author: The infrastructure has a built area of about 4.2 ha and an average output of 50'000 t/year.
  Proxy: "chemical factory, organics" is used as a proxy for the process infrastructure.\
  EcoSpold01Location=RER
- chemical, organic: 0.0425 kg; source Krauss U. 1999; lognormal variance with pedigree 0.068125, pedigree (4,2,5,2,1)
  EcoSpold01Location=GLO
  Estimation: It is assumed that the required accumulation of indium requires consequently 20 to 30 times the volume put through that of copper. Hence the energy and material consumption documented for the solvent extraction of copper is multiplied by 25 and are taken as approximation for the solvent extraction of indium.
  properties: dry mass 1 kg, wet mass 1 kg, carbon content, fossil 0.628, heating value, net 19.03 MJ
  note on carbon content, fossil: This dataset is an unweighted average of 20 organic substances (listed in Tab 88.1, ecoinvent v2.2 report 8, part II), being part of the top100 chemicals included in this database. The C-content has also been calculated as an unweighted average of the C content of the substances composing this dataset.
- indium rich leaching residues, from zinc production: 10000 kg; = 1/ indium_rich_leaching_residues_concentrat* RP_amount_1; source Davenport W. G. 2002; lognormal variance with pedigree 0.070125, pedigree (3,2,5,2,3)
  Estimation: In the case of solvent extraction in copper production, 35 g Cu / L are required for electrowinning. Solvent extraction has to yield this concentration starting from leach solutions not richer than 1 - 6 g / L. This concentration factor of around ten times is comparable with the solvent extraction of indium, where a solution of 50 - 200 mg / L is concentrated to 1 to 2 g / l.
  In this study it is assumed that the lower concentration level in the case of solvent extraction of indium leads to a proportional increase of throughput compared to solvent extraction of copper. The leach solution of indium is 20 to 30 times less concentrated than in the copper extraction. It is assumed in this study, that the required accumulation of indium requires consequently 20 to 30 times the volume put through.
  EcoSpold01Location=GLO
  property concentration, indium 0.0001 kg/kg; name indium_rich_leaching_residues_concentrat
  properties: wet mass 1 kg, dry mass 1 kg
  note on concentration, indium: Calculated value transfered from "primary zinc production from concentrate" dataset.
- sulfuric acid: 0.0375 kg; source Davenport W. G. 2002; lognormal variance with pedigree 0.076125, pedigree (4,2,5,2,3)
  Estimation: It is stated that 0.1 to 0.2 m3 electrolyte is bled per tonne of copper, i.e. re-circulated for purification. The electrolyte is a low concentration solution of sulphuric acid. We assume a value of 0.15 kg 25% H2SO4 per kg indium refined.
  Further references:
  Zhou Z.-H., Ruan J.-M. and Mo H.-B. (2005) Preparation of 6N high-purity indium by method of physical-chemical purification and electrorefining. In: Journal of Materials Science, 40(24), pp. 6529-6533 as pdf-File under: 10.1007/s10853-005-1817-y, Online-Version under: http://dx.doi.org/10.1007/ s10853-005-1817-y <http://dx.doi.org/10.1007/s10853-005-1817-y>
  EcoSpold01Location=RER
  properties: wet mass 1 kg, dry mass 1 kg
- electricity, medium voltage: 11.267 kWh; source Krauss U. 1999; lognormal variance with pedigree 0.076125, pedigree (4,2,5,2,3)
  EcoSpold01Location=UCTE
  Calculated value: Total electricity consumption results from consumption in each of the following steps: Leaching and solvent extraction, cementation and anode casting, electrorefining and vacuum refining.
  Estimation: In the leaching and solvent extraction step, it is assumed that the required accumulation of indium requires consequently 20 to 30 times the volume put through that of copper. Hence the energy consumption documented for the solvent extraction of copper is multiplied by 25 and are taken as approximation for the solvent extraction of indium.
  Estimation: In the cementation step, the sponge contains 20%wt moisture and is dried prior to anode casting. Drying is effected in a spray dryer used in ceramic industry (38kW at 250 kg per hour), and the melting is assessed using the heat of fusion and assuming a system efficiency of 70%.
  Estimation: In the electrorefining step, an electricity consumption of 0.35 kWh per kg indium cathode sheet is assumed. This is supported by the fact that energy consumption for this process usually ranges between 0.2 to 0.5 kWh per kg, and that literature points out a consumption of 0.25 to 0.35 kWh / kg.
  Estimation: In the vacuum refining step, it's assumed that the RF induction heated vacuum furnace consumes 0.5 kW per kg load, which corresponds to a batch of 30 kg indium that is heated for 4 hours in a 15kW furnace, utterly resulting in a somewhat higher span of 0.5 - 0.3 kW per kg batch.
  Further references:
  Davenport W. G., King M., Schlesinger M. and Biswas A. K. (2002) Extractive metallurgy of copper. 4th Edition. Pergamon, Oxford. ISBN 0-08-044029-0. Online-Version under: <http://www.engineeringvillage2.org/controller/servlet/OpenURL?genre=book&isbn=0080440290>.
  Belsky A. A., Eljutin A. V., Zubkov V. N., Konjukov A. I., Krasinskaya L. I., Nekrasova E. A., Nizharadze K. S., Markova L. F., Mirskaya M. G., Frolov A. V. and Judin E. A. (1980) Process of Ultrapurification of Indium. Patent Number U.S. 4,287,030.

## Emissions to nature
- NMVOC, non-methane volatile organic compounds, unspecified origin [air, urban air close to ground]: 0.091735 kg; source ADEQ 2006; lognormal variance with pedigree 0.108125, pedigree (4,2,5,2,1)
  Calculated value: Direct emissions were estimated based on reported yearly air emissions of an U.S. SX/EW copper operation in Arizona and the reported copper output of the facility.
- Sulfuric acid [air, non-urban air or from high stacks]: 0.043382 kg; source ADEQ 2006; lognormal variance with pedigree 0.108125, pedigree (4,2,5,2,1)
  Calculated value: Direct emissions were estimated based on reported yearly air emissions of an U.S. SX/EW copper operation in Arizona and the reported copper output of the facility.
  Proxy: "sulfuric acid" is used as a proxy for Sulfuric acid mist.

## Sampling procedure
literature

## Extrapolations
This dataset has been extrapolated from year 2005 to the year of the calculation (2021). The uncertainty has been adjusted accordingly.

## Review by Roland Hischier 2011-09-19
Transfer of documentation done.

## Review by Roberto Dones 2007-08-22
Passed
