# petrol production, 15% ETBE additive by volume, with ethanol from biomass

Dataset: EcoSpold 2, unit process
Geography: RER
Time period: 2004-01-01 to 2021-12-31
Technology level: current
Classification: EcoSpold01Categories: oil/fuels
Classification: ISIC rev.4 ecoinvent: 1920:Manufacture of refined petroleum products
Synonyms: bioethanol; ethyl alcohol; ethyl tert-butyl oxide; alcohol dehydrated; fermentation alcohol; ethanol; grain alcohol; 2-methyl-2-ethoxypropane; cologne spirit; ethanol absolute; ethyl tertiary butyl ether; alkohol; anhydrol; ethyl tertio butyl ether; tert-butyl ethyl ether; algrain; 2-ethoxy-2-methylpropane; ethyl hydroxide; denatured alcohol; bio-ethanol; cologne spirits (alcohol); ETBE; ethanol 200 proof; ethyl tert-butyl ether; ethyl hydrate
Tags: ConvertedDataset
Scenario: Business-as-Usual
System model: Allocation, cut-off by classification
Share of production covered: 0 %
Generated by: Edgard Gnansounou
Published in: Jungbluth N. 2007
Database: ecoinvent
isCopyrightProtected: true
accessRestrictedTo: 1

## General comment
Inventory refers to the blending of 15% vol. ETBE to low-sulphur gasoline, on the oil refinery site. Fossil and biogenic carbon contents are respectively 80.3% and 3.7%.
[This dataset was already contained in the ecoinvent database version 2. It was not individually updated during the transfer to ecoinvent version 3. Life Cycle Impact Assessment results may still have changed, as they are affected by changes in the supply chain, i.e. in other datasets. This dataset was generated following the ecoinvent quality guidelines for version 2. It may have been subject to central changes described in the ecoinvent version 3 change report (http://www.ecoinvent.org/database/ecoinvent-version-3/reports-of-changes/), and the results of the central updates were reviewed extensively. The changes added e.g. consistent water flows and other information throughout the database. The documentation of this dataset can be found in the ecoinvent reports of version 2, which are still available via the ecoinvent website. The change report linked above covers all central changes that were made during the conversion process.]

## Included activities end
This process includes the production unleaded gasoline blended with 15% vol. ethyl tert-butyl ether (ETBE), at the oil refinery. Operation of storage tanks and refinery facilities are taken into account. All processes on the refinery site specifically related to the production of ETBE are included.

## Geography
Mainly based on EU studies. ETBE is largely produced in France, Spain and possibly soon in Germany.

## Technology
Simple blending of the two components of the fuel blend

## Reference product
- petrol, 15% ETBE additive by volume, with ethanol from biomass: 1 kg; CPC 333: Petroleum oils and oils obtained from bituminous materials, other than crude; preparations n.e.c. containing by […]; By-product classification allocatable product; CAS 637-92-3
  EcoSpold01Location=RER
  production volume 1.32237 kg
    This is a placeholder value that does not reflect real-world production volumes. This dataset does not currently require a real-world production volume to work in the database framework, and no actual data were collected yet. This has no negative effect on the results of the ecoinvent database. The placeholder value of this activity was scaled according to the nominal GDP of 2005 (source: United Nations, http://data.un.org/Glossary.aspx?q=GDP+%28current+US%24%29, accessed 20130726) to reflect an appropriate share of the global production volume, which is also a placeholder value.
  property price 0.71 EUR2005
    Average calculated from All Grades, Areas and Formulations in USA for 2005. Source: http://www.eia.gov/oil_gas/petroleum/data_publications/wrgp/mogas_history.html
  property heating value, net 41.51 MJ
    Based on literature, page 611, Report 17: Jungbluth, N., Chudacoff, M., Dauriat, A., Dinkel, F., Doka, G., Faist Emmenegger, M., Gnansounou, E., Kljun, N., Schleiss, K., Spielmann, M., Stettler, C., Sutter, J. 2007: Life Cycle Inventories of Bioenergy. ecoinvent report No. 17, Swiss Centre for Life Cycle Inventories, Dübendorf, CH.
  property carbon content 0.84
    carbon content on a dry matter basis (reserved; not for manual entry)
  properties: carbon content, fossil 0.803, water content 0, wet mass 1 kg, water in wet mass 0 kg, dry mass 1 kg, carbon content, non-fossil 0.037, carbon allocation 0.84 kg

## Inputs from technosphere
- petrol, low-sulfur: 0 kg; pedigree (1,1,1,1,1)
  EcoSpold01Location=RER
  Calculations, according to the incorporation rate of ETBE and the respective densities of ETBE (0.75 kg/l) and gasoline (0.75 kg/l)
  Uncertainty: Calculations, according to the incorporation rate of ETBE and the respective densities of ETBE (0.75 kg/l) and gasoline (0.75 kg/l)
  properties: dry mass 1 kg, heating value, net 42.5 MJ, carbon content, fossil 0.865, wet mass 1 kg
  note on heating value, net: Based on literature, page 611, Report 17: Jungbluth, N., Chudacoff, M., Dauriat, A., Dinkel, F., Doka, G., Faist Emmenegger, M., Gnansounou, E., Kljun, N., Schleiss, K., Spielmann, M., Stettler, C., Sutter, J. 2007: Life Cycle Inventories of Bioenergy. ecoinvent report No. 17, Swiss Centre for Life Cycle Inventories, Dübendorf, CH.
- ethyl tert-butyl ether: 0.15 kg; lognormal variance with pedigree 0.0501, pedigree (1,2,5,1,1)
  EcoSpold01Location=RER
  Literature survey, ETBE synthesis chemical reaction, industrial data
  Uncertainty: Literature survey, ETBE synthesis chemical reaction, industrial data
  properties: carbon content, fossil 0.454, dry mass 1 kg, carbon content, non-fossil 0.245, wet mass 1 kg, heating value, net 37.97 MJ
- petrol, low-sulfur: 0.834102, 0.0158978 kg (2 entries); lognormal variance with pedigree 0.0501, pedigree (1,2,5,1,1)
  (same comment as for petrol, low-sulfur)

## Extrapolations
This dataset has been extrapolated from year 2008 to the year of the calculation (2021). The uncertainty has been adjusted accordingly.

## Review by Niels Jungbluth 2006-07-12
Passed.
none
