# polyethylene terephthalate production, granulate, bottle grade, recycled

Dataset: EcoSpold 2, unit process
Geography: RoW
Time period: 2014-01-01 to 2021-12-31
Technology level: current
Classification: ISIC rev.4 ecoinvent: 3830:Materials recovery
Scenario: Business-as-Usual
System model: Allocation, cut-off by classification
Generated by: Thomas Kägi
Published in: Kägi T. 2017
Database: ecoinvent
isCopyrightProtected: true
accessRestrictedTo: 1

## General comment
This dataset is a copy of the regional dataset CH.

## Included activities start
Service is starting with the receipt of bales of sorted waste PET

## Included activities end
This module includes all processes of the production of recycled PET granulate, bottle grade up to the factory gate. Machinery infrastructure is excluded

## Allocation
economic allocation is used: 99.5 % is allocated to recycled PET granulate, 0.5% to Waste PE

## Reference product
- polyethylene terephthalate, granulate, bottle grade, recycled: 1 kg; By-product classification allocatable product; CPC 34710: Polymers of ethylene, in primary forms; CAS 25038-59-9
  production volume 7.65e8 kg; name APV_RP
    Global production volume (PV) estimated based on WRF (2016) 'The New Plastics Economy - Rethinking the future of plastics': According to figure 4 in WRF (2016), the annual global production of plastic packaging material amounted to 78 milon tonnes in 2013. 14% was collected for recycling, of which 2% entered closed-loop recycling, 8% cascaded recycling, and 4% process losses.
    PVs of by-products/waste are scaled according to their relationship with the reference product.
  property heating value, net 22.95 MJ
    Assumed equal to "polyethylene terephthalate, granulate, amorphous"
  property carbon content 0.625
    carbon content on a dry matter basis (reserved; not for manual entry)
  properties: water content 0, water in wet mass 0 kg, price 0.84 EUR2005, dry mass 1 kg, wet mass 1 kg, carbon content, non-fossil 0, carbon content, fossil 0.625, carbon allocation 0.625 kg

## By-products
- waste polyethylene, for recycling, sorted: 0 kg; By-product classification Recyclable; CPC 39270: Waste, parings and scrap of plastics; pedigree (1,1,1,1,1)
  production volume 0 kg; = APV_RP* BP_amount_2
    PVs of by-products/waste are scaled according to their relationship with the reference product.
  property price 0.035 EUR2005
    Convert from EU 27 price to the world by currency exchange rate.
  properties: heating value, net 42.47 MJ

## Inputs from technosphere
- municipal solid waste: 0 kg; name BP_amount_3; pedigree (1,1,1,1,1)
  production volume 0 kg
    (same comment as for waste polyethylene, for recycling, sorted)
  property price 0 EUR2005; name BP_amount_3_price_EUR2005
  properties: heating value, net 11.74 MJ, carbon content, fossil 0.171549, water content 0.297017, carbon content, non-fossil 0.261655, wet mass 1 kg, dry mass 0.771 kg
  note on heating value, net: Value taken from the general comment of the treatment dataset.
  note on carbon content, fossil: MSW composition in tab 4.1, ecoinvent v2.2 report 13_I. C content referred to 1 kg DM
- heat, district or industrial, other than natural gas: 0 MJ; pedigree (1,1,1,1,1)
  properties: heating value, net 1 MJ
- waste preparation facility: 2e-9 unit; lognormal variance with pedigree 0.0526, pedigree (4,1,3,5,4)
  properties: lifetime 50 year, lifetime capacity [kg] 5e8 kg
- wire drawing, steel: 9.6e-7 kg; lognormal variance with pedigree 0.0046, pedigree (1,1,3,5,1)
- waste polyethylene terephthalate, for recycling, sorted: 0 kg; pedigree (1,1,1,1,1)
  properties: dry mass 0.986 kg, carbon content, fossil 0.624, water content 0.0141988, wet mass 1 kg, heating value, net 22.95 MJ
- extrusion, plastic film: 1.87e-5 kg; lognormal variance with pedigree 0.0046, pedigree (1,1,3,5,1)
- sulfuric acid: 0.01798 kg; lognormal variance with pedigree 0.0046, pedigree (1,1,3,5,1)
  properties: dry mass 1 kg, wet mass 1 kg
- chemical, organic: 0.00033 kg; lognormal variance with pedigree 0.1246, pedigree (1,1,3,5,5)
  properties: heating value, net 19.03 MJ, carbon content, fossil 0.628, dry mass 1 kg, wet mass 1 kg
  note on carbon content, fossil: This dataset is an unweighted average of 20 organic substances (listed in Tab 88.1, ecoinvent v2.2 report 8, part II), being part of the top100 chemicals included in this database. The C-content has also been calculated as an unweighted average of the C content of the substances composing this dataset.
- steel, low-alloyed: 9.6e-7 kg; lognormal variance with pedigree 0.0046, pedigree (1,1,3,5,1)
  properties: wet mass 1 kg, dry mass 1 kg, carbon content, fossil 0.005
- electricity, low voltage: 0 kWh; pedigree (1,1,1,1,1)
- heat, district or industrial, natural gas: 0 MJ; pedigree (1,1,1,1,1)
  properties: heating value, net 1 MJ
- sodium hydroxide, without water, in 50% solution state: 0.03083 kg; lognormal variance with pedigree 0.0046, pedigree (1,1,3,5,1)
  properties: dry mass 1 kg, heating value, net 3.03 MJ, wet mass 1 kg
- wastewater, average: 0 m3; name BP_amount_1; pedigree (1,1,1,1,1)
  production volume 0 m3
    (same comment as for waste polyethylene, for recycling, sorted)
  property price 0 EUR2005; name BP_amount_1_price_EUR2005
  properties: water content 2882.2, carbon content, non-fossil 0.194039, dry mass 0.346837 kg, wet mass 1000 kg
  note on carbon content, non-fossil: 0.0673 kg TOC/m3 (Tab A.17, ecoinvent v2.2 report 13_I). TOC was considered as Total Carbon.
- soap: 9e-5 kg; lognormal variance with pedigree 0.0126, pedigree (1,1,3,5,3)
  properties: heating value, net 17.93 MJ, carbon content, non-fossil 0.692237, water content 0.149425, wet mass 1 kg, dry mass 0.87 kg
- polypropylene, granulate: 1.87e-5 kg; lognormal variance with pedigree 0.0046, pedigree (1,1,3,5,1)
  properties: wet mass 1 kg, heating value, net 32.78 MJ, carbon content, fossil 0.857143, dry mass 1 kg
  note on heating value, net: Value extracted from "treatment of waste polypropylene, open burning"
- waste polyethylene, for recycling, sorted: -0.122 kg; lognormal variance with pedigree 0.0046, pedigree (1,1,3,5,1)
  production volume 9.333e7 kg
  properties: price 0.035 EUR2005, heating value, net 42.47 MJ
- municipal solid waste: -0.000132422, -3.33671e-5, -4.76836e-5, -0.00763229, -0.0936542 kg (5 entries); lognormal variance with pedigree 0.0046, pedigree (1,1,3,5,1)
  production volume 7.76475e7 kg
- heat, district or industrial, other than natural gas: 0.000822816, 0.0496855, 2.02909 MJ (3 entries); lognormal variance with pedigree 0.0046, pedigree (1,1,3,5,1)
- waste polyethylene terephthalate, for recycling, sorted: 0.875267, 0.26258, 0.077153 kg (3 entries); lognormal variance with pedigree 0.0046, pedigree (1,1,3,5,1)
- electricity, low voltage: 0.00357664, 0.000651238, 0.0147009, 0.0513617, 0.0104858, 0.16099, 0.0260453, 0.0747887 kWh (8 entries); lognormal variance with pedigree 0.0046, pedigree (1,1,3,5,1)
- heat, district or industrial, natural gas: 0.0055072, 0.131963, 0.35733 MJ (3 entries); lognormal variance with pedigree 0.0052, pedigree (1,1,3,5,2)
- wastewater, average: -0.00206001, -0.00430999 m3 (2 entries); lognormal variance with pedigree 0.0426, pedigree (1,1,5,5,1)
  production volume 4.87305e6 m3

## Inputs from nature
- Water, cooling, unspecified natural origin [natural resource, in water]: 0.00602 m3; lognormal variance with pedigree 0.0046, pedigree (1,1,3,5,1)
- Water, unspecified natural origin [natural resource, in water]: 0.00035 m3; lognormal variance with pedigree 0.0046, pedigree (1,1,3,5,1)

## Sampling procedure
Uncertainty estimation according to the pedigree matrix
