# natural gas, burned in solid oxide fuel cell 125kWe, future

Dataset: EcoSpold 2, unit process
Geography: CH
Time period: 2000-01-01 to 2021-12-31
Technology level: current
Classification: EcoSpold01Categories: natural gas/cogeneration
Classification: ISIC rev.4 ecoinvent: 3510:Electric power generation, transmission and distribution
Synonyms: Festoxid Brennstoffzelle; solid oxide fuel cell; oxidkeramische Hochtemperaturbrennstoffzelle; Festkeramik Brennstoffzelle
Tags: with true value; ConvertedDataset
Scenario: Business-as-Usual
System model: Allocation, cut-off by classification
Generated by: Alex Primas
Published in: Primas A. 2007
Database: ecoinvent
isCopyrightProtected: true
accessRestrictedTo: 1

## General comment
The multioutput-process 'natural gas, burned in SOFC fuel cell 125kWe delivers the coproducts 'heat, natural gas, allocation exergy, at SOFC fuel cell 125kWe' and 'electricity, natural gas, allocation exergy, at SOFC fuel cell 125kWe' . The exergy allocation is the allocation scheme suggested to be used within the ecoinvent database (e.g. in electricity mixes).
[This dataset was already contained in the ecoinvent database version 2. It was not individually updated during the transfer to ecoinvent version 3. Life Cycle Impact Assessment results may still have changed, as they are affected by changes in the supply chain, i.e. in other datasets. This dataset was generated following the ecoinvent quality guidelines for version 2. It may have been subject to central changes described in the ecoinvent version 3 change report (http://www.ecoinvent.org/database/ecoinvent-version-3/reports-of-changes/), and the results of the central updates were reviewed extensively. The changes added e.g. consistent water flows and other information throughout the database. The documentation of this dataset can be found in the ecoinvent reports of version 2, which are still available via the ecoinvent website. The change report linked above covers all central changes that were made during the conversion process.]

## Included activities end
The module includes fuel input, infrastructure, emissions to air, and working materials for operation.

## Geography
Natural gas input modelled for Switzerland. Process applicable in central European conditions.

## Technology
Solid oxide fuel cell (SOFC) with unpressurised tubular stack design for central cogeneration use. Performance, stack lifetime and catalyst use according to expected future values for a serial product. Operation with connection to low pressure gas network. Electrical efficiency 47%, total efficiency 80%. Operation as base load engine with low partial load hours.

## Parameters
- fraction, process water, to air: 0.15 dimensionless; name fraction_PW_to_air; lognormal variance with pedigree 0.092025, pedigree (4,4,3,2,4)
  Literature value. In case when no industry/process specific data are available, default evaporation fraction value is used. This value is 15% and is based on literature (Statistics Canada, 2007 & Shaffer, K.H., 2008, Consumptive water use in the Great Lakes Basin, USGS & Shiklomanov, 2003, World Water Resources at the Beginning of the 21st Century) and has been approved by an expert.
- fraction, tap water, to air: 0.15 dimensionless; name fraction_TW_to_air; = fraction_PW_to_air; lognormal variance with pedigree 0.092025, pedigree (4,4,3,2,4)
  Calculated value. See comment in the other parametres present in this dataset. Tap water is considered to be always used as process water, thus process water fractions to air are applied to all tap water input flows to calculate the amount of water consumed in the processes.

## Reference product
- electricity, low voltage: 1 kWh; CPC 17100: Electrical energy; By-product classification allocatable product
  production volume 0 kWh
    Unknown
    Calculated from the production volume of heat, future in proportion to the respective output amounts.
  property price 0.107 EUR2005
    Temporary price data. Calculated as 90% of purchasers price based on: IEA Key world energy statistics 2004 (www.iea.org/textbase/nppdf/free/2004/keyworld2004.pdf)
  property exergy 3.6 MJ
    allocation factor for electricity (=1) vs. heat, where heat is calculated as the termodynamic mean temperature Tm = (Tfeed-Treturn)/ln(Tfeed/Treturn), relative to the application temperature (Tu, typically = 293 K), i.e. (Tm-Tu)/Tm
  property true value 0.0156085
    allocation property applied in "true value" allocation // value calculated from true value relation
  properties: true value relation 3.6
- heat, future: 0 MJ; CPC 17300: Steam and hot water; By-product classification allocatable product
  production volume 0 MJ
    Unknown
    Future. Included in other supplies of electricity from co-generation of natural gas
  property Corresponding fuel use 2.76084 MJ; name fuel_use; = 0.025641*35.532/0.33
    Lower heating value of the fuel input related to the heat/electricity output
  property price 0.0106 EUR2005
    Average European district heat price from Ecoheatcool and Euroheat 2005-2006, Ecoheat Work package 1: The European heat market. Final report. 10.6 EUR/GJ i s the price of district heat. http://www.solarthermalworld.org/files/Ecoheatcool%20WP1%20Web.pdf?download
  property exergy 0.169678 MJ
    (same comment as for electricity, low voltage)
  property true value 0.00185946
    (same comment as for electricity, low voltage)
  properties: true value relation 0.169678, heating value, net 1 MJ

## Inputs from technosphere
- storage, 10'000 l: 7.87058e-8 unit; lognormal variance with pedigree 0.3512, pedigree (2,3,5,1,1)
  Uncertainty of life time
  Uncertainty of life time;activityLink introduced to establish a direct link to the corresponding regional supply of this product
- tap water: 0.000164256 kg; name tap_water_input; lognormal variance with pedigree 0.054025, pedigree (3,4,5,2,1)
  Company data
  Company data
  properties: dry mass 0.000337476 kg, carbon content, fossil 0.00178991, wet mass 1 kg, water content 2962.17
  note on carbon content, fossil: Bicarbonate content is 2.93 mol/m3. CO2 content is 0.1 mol/m3 (ecoinvent v2.2 report 8, Tab 93.1).
- natural gas, low pressure: 0.175487 m3; lognormal variance with pedigree 0.2106, pedigree (5,5,5,5,5)
  Input
  Input
  properties: carbon content, fossil 0.695187, heating value, gross 39 MJ, wet mass 1 kg, heating value, net 39 MJ, dry mass 1 kg
  note on carbon content, fossil: C content considered the same as in high pressure (consumption mix)
  note on heating value, net: Literature value, Source: United Nations Statistics Division (2018) International Recommendations for Energy Statistics (IRES). Available at: http://unstats.un.org/unsd/statcom/doc11/BG-IRES.pdf.
- maintenance, solid oxide fuel cell, 125kW electrical, future: 9.92377e-7 unit; lognormal variance with pedigree 0.0412, pedigree (2,3,5,1,1)
  Uncertainty of maintenance cycle
  This exchange has an activity link directly to the producing activity because the product is primarily consumed in the same geographical area where it is produced.
- fuel cell, solid oxide, 125kW electrical, future: 1.10188e-7 unit; lognormal variance with pedigree 0.3512, pedigree (2,3,5,1,1)
  Uncertainty of life time
  This exchange has an activity link directly to the producing activity because the product is primarily consumed in the same geographical area where it is produced.

## Emissions to nature
- Sulfur dioxide [air, urban air close to ground]: 3.76419e-6 kg; lognormal variance with pedigree 0.0512, pedigree (2,5,5,5,1)
  Composition of natural gas
- NMVOC, non-methane volatile organic compounds, unspecified origin [air, urban air close to ground]: 4.79079e-6 kg; lognormal variance with pedigree 0.0986, pedigree (4,3,5,1,1)
  Estimate based on different references
- Water [water, unspecified]: 1.39617e-7 m3; name water_to_water_unspecified; = (tap_water_input/1000)*(1-fraction_TW_to_air); lognormal variance with pedigree 0.0807, pedigree (2,2,5,1,1)
  Calculated value based on literature values and expert opinion. See comments in the parametres' comment field.
  property water in wet mass 1000 kg; name WWM
  property carbon content, fossil 0; name C_content_fossil
  property dry mass 0 kg; name DM
  property fraction, origin: fresh water 1; name fraction_origin_fresh_water_Ww
  property carbon content, non-fossil 0; name C_content_non_fossil
  property wet mass 1000 kg; name WM
  property fraction, origin: unspecified 0; name fraction_origin_unspecified_Ww
  property fraction, origin: salt water 0; name fraction_origin_salt_water_Ww
- Carbon monoxide, fossil [air, urban air close to ground]: 1.16348e-5 kg; lognormal variance with pedigree 0.6912, pedigree (2,3,5,1,1)
  Estimate based on different references
- Carbon dioxide, fossil [air, urban air close to ground]: 0.383263 kg; lognormal variance with pedigree 0.0512, pedigree (2,5,5,5,1)
  Composition of natural gas
- Water [air, unspecified]: 2.46383e-8 m3; name water_to_air_unspecified; = (tap_water_input/1000*fraction_TW_to_air); lognormal variance with pedigree 0.0807, pedigree (2,2,5,1,1)
  (same comment as for Water)
  property fraction, origin: fresh water 1; name fraction_origin_fresh_water
  property fraction, origin: unspecified 0; name fraction_origin_unspecified
  property fraction, origin: salt water 0; name fraction_origin_salt_water
- Nitrogen oxides [air, urban air close to ground]: 1.3688e-5 kg; lognormal variance with pedigree 0.0812, pedigree (2,3,5,1,1)
  Estimate based on different references
- Methane, fossil [air, urban air close to ground]: 2.73759e-5 kg; lognormal variance with pedigree 0.1086, pedigree (4,3,5,1,1)
  Estimate based on few references

## Sampling procedure
Literature data and manufacturer information

## Review by Emilia Moreno Ruiz 2012-04-16
calculation of fuel use property.

## Review by Rolf Frischknecht 2007-08-13
passed
none
