# ventilation system production, decentralized, 6 x 120 m3/h, polyethylene ducts

Dataset: EcoSpold 2, unit process
Geography: RoW
Time period: 2003-01-01 to 2021-12-31
Technology level: current
Classification: ISIC rev.4 ecoinvent: 4322:Plumbing, heat and air-conditioning installation
Classification: EcoSpold01Categories: ventilation/ventilation systems
Tags: ConvertedDataset
Scenario: Business-as-Usual
System model: Allocation, cut-off by classification
Generated by: Alex Primas
Published in: Hässig, W. 2007
Database: ecoinvent
isCopyrightProtected: true
accessRestrictedTo: 1

## General comment
Ventilation system for a multi family house. The house considered in the investigation includes 6 flats with 130 m2 floor area each and a ventilation rate of 120 m3/h. The influence of a smaller concrete demand due to embedment of ventilation tubes in the concrete of the floor (-4.86 kg concrete per m2 floor area) is not included.
[This dataset was already contained in the ecoinvent database version 2. It was not individually updated during the transfer to ecoinvent version 3. Life Cycle Impact Assessment results may still have changed, as they are affected by changes in the supply chain, i.e. in other datasets. This dataset was generated following the ecoinvent quality guidelines for version 2. It may have been subject to central changes described in the ecoinvent version 3 change report (http://www.ecoinvent.org/database/ecoinvent-version-3/reports-of-changes/), and the results of the central updates were reviewed extensively. The changes added e.g. consistent water flows and other information throughout the database. The documentation of this dataset can be found in the ecoinvent reports of version 2, which are still available via the ecoinvent website. The change report linked above covers all central changes that were made during the conversion process.]

## Included activities end
Materials used for the ventilation system. Transport of the components to the construction site. Disposal of the components included. Influence of ventilation ducts on building construction not included. No materials for renwal of components included. Operation of system not included.

## Geography
Data representative for a building in Zurich, Switzerland

## Technology
Decentral ventilation system without ground heat exchanger. Air intake on the facade and direct to the 6 decentral ventilation units with a short galvanised steel tube (125 mm diameter). Distribution of fresh- and exhaust-air within the flat with polyethylene tubes (75 mm diameter). Exhaust air from the 6 decentral ventilation units with a short galvanised steel tube (400 mm diameter) direct to the exhaust on the facade.

## Time period
Amount of material investigated in 2003

## Reference product
- ventilation system, decentralized, 6 x 120 m3/h, polyethylene ducts: 1 unit; name vent_sys_RP; CPC 44815: Fans and ventilating or recycling hoods of the domestic type; By-product classification allocatable product
  EcoSpold01Location=CH
  production volume 3.96633 unit; name vent_sys_RP_PV
    This is a placeholder value that does not reflect real-world production volumes. This dataset does not currently require a real-world production volume to work in the database framework, and no actual data were collected yet. This has no negative effect on the results of the ecoinvent database.
  property price 1759.41 EUR2005
    Calculated based on inputs: The price of the product has been calculated as a sum of the values of the material and energy inputs for this product. This value is therefore a rough estimation. It may underestimate the real price since there are additional expenses when producing any product. These expences can include for example labour costs, treatment of waste materials and profit for the producer. Please consider carefully whether this level of data quality is acceptable for your application.

## Inputs from technosphere
- air filter, in exhaust air valve: 18 unit; lognormal variance with pedigree 0.0446, pedigree (2,4,5,5,1)
  Questionnaire, Data related to building considered
  EcoSpold01Location=RER
  Uncertainty: Questionnaire, Data related to building considered
  properties: dry mass 0.04 kg, wet mass 0.04 kg, carbon content, fossil 0.65625
  note on carbon content, fossil: C content was calculated as an addition of C content in the product components (Mat filter made of polyester fleece). Then, it was referred to 1 kg DM
- used air filter decentralized unit, 180-250 m3/h: -12 unit; name byP_5; lognormal variance with pedigree 0.0446, pedigree (2,4,5,5,1)
  EcoSpold01Location=CH
  Questionnaire, Data related to building considered
  Uncertainty: Questionnaire, Data related to building considered
  production volume 47.596 unit; = byP_5/ vent_sys_RP* vent_sys_RP_PV
    Calculated from the production volume of ventilation system, decentralized, 6 x 120 m3/h, polyethylene ducts in proportion to the respective output amounts.
  property price 0 EUR2005; name byP_5_price_EUR2005
  properties: carbon content, fossil 0.367027, dry mass 0.22 kg, wet mass 0.22 kg, carbon content, non-fossil 0.154835
- used flexible duct aluminium/PET, DN of 125: -10 m; name byP_4; lognormal variance with pedigree 0.0446, pedigree (2,4,5,5,1)
  (same comment as for used air filter decentralized unit, 180-250 m3/h)
  production volume 39.6633 m; = byP_4/ vent_sys_RP* vent_sys_RP_PV
    (same comment as for used air filter decentralized unit, 180-250 m3/h)
  property price 0 EUR2005; name byP_4_price_EUR2005
  properties: carbon content, fossil 0.436512, dry mass 0.205 kg, wet mass 0.205 kg
- used ventilation control and wiring decentralized unit: -6 unit; name byP_3; lognormal variance with pedigree 0.0446, pedigree (2,4,5,5,1)
  Questionnaire, Data related to building considered
  EcoSpold01Location=CH
  Uncertainty: Questionnaire, Data related to building considered
  production volume 23.798 unit; = byP_3/ vent_sys_RP* vent_sys_RP_PV
    (same comment as for used air filter decentralized unit, 180-250 m3/h)
  property price 0 EUR2005; name byP_3_price_EUR2005
  properties: dry mass 2.18 kg, carbon content, non-fossil 3.69963e-5, carbon content, fossil 0.275687, wet mass 2.18 kg
- used sealing tape aluminium/PE, 50 mm wide: -200 m; name byP_15; lognormal variance with pedigree 0.0446, pedigree (2,4,5,5,1)
  (same comment as for used air filter decentralized unit, 180-250 m3/h)
  production volume 793.266 m; = byP_15/ vent_sys_RP* vent_sys_RP_PV
    (same comment as for used air filter decentralized unit, 180-250 m3/h)
  property price 0 EUR2005; name byP_15_price_EUR2005
  properties: dry mass 0.057 kg, wet mass 0.057 kg, carbon content, fossil 0.707644
- used exhaust air valve in-wall housing, plastic/steel: -18 unit; name byP_8; lognormal variance with pedigree 0.0446, pedigree (2,4,5,5,1)
  (same comment as for used air filter decentralized unit, 180-250 m3/h)
  production volume 71.394 unit; = byP_8/ vent_sys_RP* vent_sys_RP_PV
    (same comment as for used air filter decentralized unit, 180-250 m3/h)
  property price 0 EUR2005; name byP_8_price_EUR2005
  properties: dry mass 0.5 kg, wet mass 0.5 kg, carbon content, fossil 0.0797702
- waste polyethylene/polypropylene product: 0 kg; name byP_9; pedigree (1,1,1,1,1)
  (same comment as for used air filter decentralized unit, 180-250 m3/h)
  production volume 0 kg
    (same comment as for used air filter decentralized unit, 180-250 m3/h)
  property price 0 EUR2005; name byP_9_price_EUR2005
  properties: wet mass 1 kg, carbon content, fossil 0.748045, water content 0.180638, heating value, net 42.47 MJ, dry mass 0.847 kg
  note on carbon content, fossil: Mixed various plastics was used to estimate the C content of this waste (Tab A.2, ecoinvent v2.2 report 13_I)
- ventilation control and wiring, decentralized unit: 6 unit; lognormal variance with pedigree 0.0446, pedigree (2,4,5,5,1)
  EcoSpold01Location=RER
  Questionnaire, Data related to building considered
  Uncertainty: Questionnaire, Data related to building considered
  properties: wet mass 2.18 kg, dry mass 2.18 kg, carbon content, non-fossil 3.69963e-5, carbon content, fossil 0.275687
  note on carbon content, non-fossil: C content was calculated as an addition of C content in the product components, then it was referred to 1 kg DM
- air distribution terminal panel, steel, 120 m3/h: 12 unit; lognormal variance with pedigree 0.0446, pedigree (2,4,5,5,1)
  (same comment as for used ventilation control and wiring decentralized unit)
  properties: carbon content, fossil 0.0166978, dry mass 9.5 kg, wet mass 9.5 kg
  note on carbon content, fossil: C content was calculated as an addition of C content in the product component, and then referred to 1 kg DM
- spiral-seam duct, steel, DN 125: 12 m; lognormal variance with pedigree 0.0446, pedigree (2,4,5,5,1)
  (same comment as for air filter, in exhaust air valve)
  properties: carbon content, fossil 0.00377105, wet mass 1.9 kg, dry mass 1.9 kg
  note on carbon content, fossil: Tube made of galvanised steel, 2.6 m electric welded seam per m tube.
- exhaust air outlet, steel/aluminium, 85x365 mm: 12 unit; lognormal variance with pedigree 0.0446, pedigree (2,4,5,5,1)
  (same comment as for used air filter decentralized unit, 180-250 m3/h)
  properties: dry mass 2.5 kg, carbon content, fossil 0.00317, wet mass 2.5 kg
  note on carbon content, fossil: Facade mounted exhaust air outlet made of zinc coated steel and aluminium
- sealing tape, aluminium/PE, 50 mm wide: 200 m; lognormal variance with pedigree 0.0446, pedigree (2,4,5,5,1)
  (same comment as for air filter, in exhaust air valve)
  properties: wet mass 0.057 kg, dry mass 0.057 kg, carbon content, fossil 0.707644
  note on carbon content, fossil: C content calculated as the addition of the C contents in the final product components (Tape made of Polyethylene, laminated with aluminium foil and acrylic glue as adherent layer)
- air filter, decentralized unit, 180-250 m3/h: 12 unit; lognormal variance with pedigree 0.0446, pedigree (2,4,5,5,1)
  (same comment as for ventilation control and wiring, decentralized unit)
  properties: wet mass 0.22 kg, dry mass 0.22 kg, carbon content, non-fossil 0.154835, carbon content, fossil 0.367027
  note on carbon content, non-fossil: C content was calculated as an addition of C content in the product components (Bag filter made of polyester fleece, frame cardboard). Then, it was referred to 1 kg DM
- used room-connecting overflow element steel, approx. 40 m3/h: -18 unit; name byP_7; lognormal variance with pedigree 0.0446, pedigree (2,4,5,5,1)
  (same comment as for used ventilation control and wiring decentralized unit)
  production volume 71.394 unit; = byP_7/ vent_sys_RP* vent_sys_RP_PV
    (same comment as for used air filter decentralized unit, 180-250 m3/h)
  property price 0 EUR2005; name byP_7_price_EUR2005
  properties: wet mass 1.1 kg, carbon content, fossil 0.211386, dry mass 1.1 kg
- waste bulk iron, excluding reinforcement: 0 kg; name byP_2; pedigree (1,1,1,1,1)
  (same comment as for used air filter decentralized unit, 180-250 m3/h)
  production volume 0 kg
    (same comment as for used air filter decentralized unit, 180-250 m3/h)
  property price 0 EUR2005; name byP_2_price_EUR2005
  properties: wet mass 1 kg, dry mass 1 kg
- room-connecting overflow element, steel, approx. 40 m3/h: 18 unit; lognormal variance with pedigree 0.0446, pedigree (2,4,5,5,1)
  (same comment as for air filter, in exhaust air valve)
  properties: dry mass 1.1 kg, carbon content, fossil 0.211386, wet mass 1.1 kg
- exhaust air valve, in-wall housing, plastic/steel, DN 125: 18 unit; lognormal variance with pedigree 0.0446, pedigree (2,4,5,5,1)
  (same comment as for used ventilation control and wiring decentralized unit)
  properties: dry mass 0.5 kg, wet mass 0.5 kg, carbon content, fossil 0.0797702
  note on carbon content, fossil: Exhaust air outlet mounted in room ceiling. Including housing for duct connection. component made of polyvinylchloride and zinc coated steel.
- silencer, steel, DN 125: 24 unit; lognormal variance with pedigree 0.0446, pedigree (2,4,5,5,1)
  (same comment as for used ventilation control and wiring decentralized unit)
  properties: carbon content, fossil 0.00483456, wet mass 8.3 kg, dry mass 8.3 kg
  note on carbon content, fossil: C content was calculated as an addition of C content in the product components
- used air filter in exhaust air valve: -18 unit; name byP_6; lognormal variance with pedigree 0.0446, pedigree (2,4,5,5,1)
  (same comment as for used ventilation control and wiring decentralized unit)
  production volume 71.394 unit; = byP_6/ vent_sys_RP* vent_sys_RP_PV
    (same comment as for used air filter decentralized unit, 180-250 m3/h)
  property price 0 EUR2005; name byP_6_price_EUR2005
  properties: carbon content, fossil 0.65625, dry mass 0.04 kg, wet mass 0.04 kg
- blower and heat exchange unit, decentralized, 180-250 m3/h: 6 unit; lognormal variance with pedigree 0.0446, pedigree (2,4,5,5,1)
  (same comment as for air filter, in exhaust air valve)
  properties: carbon content, non-fossil 6.48865e-7, dry mass 43.1 kg, carbon content, fossil 0.225044, wet mass 43.1 kg
- used silencer steel, DN 125: -24 unit; name byP_12; lognormal variance with pedigree 0.0446, pedigree (2,4,5,5,1)
  (same comment as for used air filter decentralized unit, 180-250 m3/h)
  production volume 95.192 unit; = byP_12/ vent_sys_RP* vent_sys_RP_PV
    (same comment as for used air filter decentralized unit, 180-250 m3/h)
  property price 0 EUR2005; name byP_12_price_EUR2005
  properties: dry mass 8.3 kg, carbon content, fossil 0.00483456, wet mass 8.3 kg
- flexible duct, aluminium/PET, DN of 125: 10 m; lognormal variance with pedigree 0.0446, pedigree (2,4,5,5,1)
  (same comment as for ventilation control and wiring, decentralized unit)
  properties: carbon content, fossil 0.436512, wet mass 0.205 kg, dry mass 0.205 kg
  note on carbon content, fossil: C content was calculated as an addition of C content in the product components (Flexible tube made of PET, laminated with aluminium foil and strengthened with galvanised steel spiral wire)
- polyethylene pipe, corrugated, DN 75: 400 m; lognormal variance with pedigree 0.0446, pedigree (2,4,5,5,1)
  (same comment as for air filter, in exhaust air valve)
  properties: wet mass 0.33 kg, dry mass 0.33 kg, carbon content, fossil 0.901299, heating value, net 14.02 MJ
- supply air inlet, steel/SS, DN 75: 30 unit; lognormal variance with pedigree 0.0446, pedigree (2,4,5,5,1)
  (same comment as for air filter, in exhaust air valve)
  properties: dry mass 2.2 kg, wet mass 2.2 kg, carbon content, fossil 0.00337682
- used air distribution terminal panel steel, 120 m3/h: -12 unit; name byP_11; lognormal variance with pedigree 0.0446, pedigree (2,4,5,5,1)
  (same comment as for used air filter decentralized unit, 180-250 m3/h)
  production volume 47.596 unit; = byP_11/ vent_sys_RP* vent_sys_RP_PV
    (same comment as for used air filter decentralized unit, 180-250 m3/h)
  property price 0 EUR2005; name byP_11_price_EUR2005
  properties: wet mass 9.5 kg, dry mass 9.5 kg, carbon content, fossil 0.0166978
- used blower and heat exchange unit decentralized, 180-250 m3/h: -6 unit; name byP_10; lognormal variance with pedigree 0.0446, pedigree (2,4,5,5,1)
  (same comment as for used ventilation control and wiring decentralized unit)
  production volume 23.798 unit; = byP_10/ vent_sys_RP* vent_sys_RP_PV
    (same comment as for used air filter decentralized unit, 180-250 m3/h)
  property price 0 EUR2005; name byP_10_price_EUR2005
  properties: wet mass 43.1 kg, dry mass 43.1 kg, carbon content, non-fossil 6.48865e-7, carbon content, fossil 0.225044
- waste polyethylene/polypropylene product: -37.3394, -94.6606 kg (2 entries); lognormal variance with pedigree 0.0446, pedigree (2,4,5,5,1)
  (same comment as for used air filter decentralized unit, 180-250 m3/h)
  production volume 523.556 kg
- waste bulk iron, excluding reinforcement: -38.6433, -80.3567 kg (2 entries); lognormal variance with pedigree 0.0446, pedigree (2,4,5,5,1)
  (same comment as for used air filter decentralized unit, 180-250 m3/h)
  production volume 471.994 kg

## Sampling procedure
Questionnaire and assumptions. Data valid for example building used.

## Extrapolations
none This dataset has been copied from an original dataset covering the geography CH. The uncertainty has been adjusted accordingly.

## Review by Rolf Frischknecht 2007-08-16
passed
none
