# photovoltaics, electric installation for 570kWp module, open ground

Dataset: EcoSpold 2, unit process
Geography: GLO
Time period: 2008-01-01 to 2021-12-31
Technology level: current
Classification: ISIC rev.4 ecoinvent: 4390:Other specialized construction activities
Tags: photovoltaic power; infrastructure
Scenario: Business-as-Usual
System model: Allocation, cut-off by classification
Share of production covered: 100 %
Generated by: Jungbluth Niels
Published in: Jungbluth N. 2012
Database: ecoinvent
isCopyrightProtected: true
accessRestrictedTo: 1

## General comment
This dataset represents the production of different components of the electric installation for a 570 kWp photovoltaic power plant namely the fuse box, electric cables, and the electric meter. There is no lighthning protection taken into account. The inverter is modelled in a separate dataset.

## Included activities start
This dataset starts from the purchase of the needed components for the photovoltaic electric installation.

## Included activities end
This dataset includes all installations between the panel and the grid, but not the inverter. Process data of the electric equipment include construction materials and wire drawing. The energy use for the manufacturing of the electric installations is only considered with a copper wire drawing process. This dataset includes materials and packaging for the production of cabling and fuse bux. Metal processing is modeled with estimations. The disposal of the product after use is included.

This dataset doesn't include the inverter.

## Technology
Electric installation for an open ground 570 kWp photovoltaic plant. No specifications available on cable lengths and further details.

## Parameters
- share open ground installations, multi-Si, on open ground, total: 0.351918 dimensionless; name pv_openground_total; lognormal variance with pedigree 0.1782, pedigree (4,5,2,5,5)
  Literature value, calculated value. The shares of the different types of cells and mounting systems are taken from Jungbluth N. et al. (2012)and adapted for GLO for open ground PV plants. According to IEA (2009), there were 35.19% grid-connected centralized PV power plants globally. It is assumed that all centralized PV power plants are open ground plants.
  Sources:
  - Jungbluth N., Stucki M., Flury K., Frischknecht R. and Buesser S. (2012) Life Cycle Inventories of Photovoltaic Power Production. ESU-services Ltd., Uster, CH, retrieved from: www.esu-services.ch/data/public-lci-reports/ <http://www.esu-services.ch/data/public-lci-reports
  - IEA. 2009. Trends in Photovoltaic Applications:Survey report of selected IEA countries between1992 and 2008. International Energy Agency (IEA), Report IEA-PVPS T1-18:2009, Paris Cedex (FR)
- Installed capacity: 5490 MW; name capacity_installed_2008; lognormal variance with pedigree 0.0562, pedigree (4,2,1,3,3)
  Literature value. New installed capacity of photovoltaic power in 2008. Valid for grid-connected new capacity. [IEA. 2009. Trends in Photovoltaic Applications:Survey report of selected IEA countries between1992 and 2008. International Energy Agency (IEA), Report IEA-PVPS T1-18:2009, Paris Cedex (FR)]
  Uncertainty: The given value for new installed grid-connected capacity in 2008 is too low, which is considered in the uncertainty.
  Investigations for the year 2009 showed the following figures:
  - Total installed capacity in 2009 (on- and offgrid or not specified in the sources): 14560MWp GLO, out of it 7450MWp installed in 2009.
  Source: Data from 30 countries (AU,AT, BE, CA, CN, CZ, DK, FI, FR, DE, GR, HU, IN, IT, JP, LU, MY, MX, NL, PT, SI, ZA, KR, ES, SE, CH, TW, TH, GB, US) and 4 sources: [1] [IEA, 2010. Trends in Photovoltaic Applications:Survey report of selected IEA countries between1992 and 2009. International Energy Agency, Report IEA-PVPS T1-19:2010]; [2] [Eurobserver, 2010. Photovoltaic barometer. Systèmes Solaires - le journal du photovoltaïque; Baromètre Photovoltaïque - Eurobserver Nr.3, avril 2010. ]; [3] [Eurobserver, 2011. Photovoltaic barometer. Systèmes Solaires - le journal du photovoltaïque; Baromètre Photovoltaïque - Eurobserver Nr.5, avril 2011.]; [4] [EPIA.Global Market Outlook for Photovoltaics until 2015. European Photovoltaic Industry Association.]
  - Total installed new capacity in 2009, total: 6188 MW (21 countries) [IEA. 2010. Trends in Photovoltaic Applications:Survey report of selected IEA countries between1992 and 2009. International Energy Agency (IEA), Report IEA-PVPS T1-19:2010, Paris Cedex (FR)]
  - New on-grid capacity in 2009: 6113 MW (21 countries) [IEA. 2010. Trends in Photovoltaic Applications:Survey report of selected IEA countries between1992 and 2009. International Energy Agency (IEA), Report IEA-PVPS T1-19:2010, Paris Cedex (FR)]
  This gives a factor of 7447/6188=1.2 between the sources.
- capacity: 0.57 MW; lognormal variance with pedigree 0.0006, pedigree (1,1,1,1,1)
  capacity of photovoltaic cells in MWp.

## Reference product
- photovoltaics, electric installation for 570kWp module, open ground: 1 unit; name RP_amount_1; CPC 53262: Power plants; By-product classification allocatable product
  EcoSpold01Location=ES
  production volume 3389.52 unit; name apv_elinst_570; = (capacity_installed_2008*pv_openground_total)/capacity
    Calculated value. Details see parameters.
    This open ground construction is used in the datasets for 569kWp as well as 570kWp installations. It is assumed that there are produced as many pieces of open ground constructions as pv plant installations.
  property price 3504.25 EUR2005
    Calculated based on inputs: The price of the product has been calculated as a sum of the values of the material and energy inputs for this product. This value is therefore a rough estimation. It may underestimate the real price since there are additional expenses when producing any product. These expences can include for example labour costs, treatment of waste materials and profit for the producer. Please consider carefully whether this level of data quality is acceptable for your application.
  property lifetime 30 year; name lifetime
    Estimation

## Inputs from technosphere
- waste electric wiring: 0 kg; name waste_electricwiring; pedigree (1,1,1,1,1)
  Calculated value. Proxy for the treatment of brass.
  EcoSpold01Location=CH
  production volume 0 kg
    Calculated from production volume of reference product using the relative outputs.
  property lifetime 30 year; name waste_electricwiring_lifetime
  property price 0 EUR2005; name waste_electricwiring_price_EUR2005
  properties: wet mass 1 kg, dry mass 1 kg, carbon content, fossil 0.34
  note on carbon content, fossil: The waste contains 0.615kg cable insulation (Wire insulation is calculated as 66.3% PVC, 31.2% PE and contains 2.5% copper) and 0.385kg copper (ecoinvent v2.2 report 13_I). So, 40% copper and 40%PVC, 20%PE. C contents in PVC and PE from tab A.1, ecoinvent v2.2 report 13_I
- waste polyethylene/polypropylene product: 0 kg; name BP_amount_4
  Calculated value. Proxy for the treatment of brass.
  production volume 0 kg
    Calculated from production volume of reference product using the relative outputs.
  property price 0 EUR2005; name BP_amount_4_price_EUR2005
  properties: carbon content, fossil 0.748045, dry mass 0.847 kg, water content 0.180638, heating value, net 42.47 MJ, wet mass 1 kg
- zinc: 2.7285 kg; source Schwarz U. 1992; lognormal variance with pedigree 0.0615, pedigree (2,1,5,1,1)
  EcoSpold01Location=RER
  Literature value/estimation. Scaled from smaller plants over cabling length and fuse box weight
  Uncertainty: Scaled from smaller plants over cabling length and fuse box weight
  properties: wet mass 1 kg, dry mass 1 kg
- wire drawing, copper: 740.72 kg; = copper; source Schwarz U. 1992; lognormal variance with pedigree 0.0615, pedigree (2,1,5,1,1)
  Literature value/estimation. Scaled from smaller plants over cabling length and fuse box weight
  EcoSpold01Location=RER
  Uncertainty: Scaled from smaller plants over cabling length and fuse box weight
- nylon 6: 0 kg; name nylon_6; source Schwarz U. 1992; pedigree (1,1,1,1,1)
  (same comment as for zinc)
  properties: carbon content, fossil 0.637168, wet mass 1 kg, dry mass 1 kg, heating value, net 30.9 MJ
  note on carbon content, fossil: It is a chain of caprolactam molecules, originating from aminocarboxylic acids - here caproic acid or caprolactam. The structure of nylon 6 is -(NH-(CH2)5-CO)n-, C6H11NO (ecoinvent v2.2 report 11_II). MW=113 g/mol
  note on heating value, net: Assumed equal to Nylon-66. Reference: Walters, R. N., Hackett, S. M. and Lyon, R. E. (2000) ‘Heats of combustion of high temperature polymers’, Fire and Materials, 24(5), pp. 245–252. doi: 10.1002/1099-1018(200009/10)24:5<245::AID-FAM744>3.0.CO;2-7.
- copper, cathode: 740.72 kg; name copper; source Schwarz U. 1992; lognormal variance with pedigree 0.0615, pedigree (2,1,5,1,1)
  Literature value/estimation. Scaled from smaller plants over cabling length and fuse box weight
  Uncertainty: Scaled from smaller plants over cabling length and fuse box weight
  properties: dry mass 1 kg, wet mass 1 kg
- brass: 0 kg; source Schwarz U. 1992; pedigree (1,1,1,1,1)
  EcoSpold01Location=CH
  Literature value/estimation. Scaled from smaller plants over cabling length and fuse box weight
  Uncertainty: Scaled from smaller plants over cabling length and fuse box weight
  properties: dry mass 1 kg, wet mass 1 kg
- polycarbonate: 0.13643 kg; source Schwarz U. 1992; lognormal variance with pedigree 0.0615, pedigree (2,1,5,1,1)
  (same comment as for zinc)
  properties: heating value, net 29.57 MJ, wet mass 1 kg, dry mass 1 kg, carbon content, fossil 0.755906
  note on carbon content, fossil: Polycarbonate means here 2,2-bis(4-hydroxyphenyl)propane polycarbonate – also called bisphenol A polycarbonate ( -(O-C6H4-C(CH3)2-C6H4-O-CO)n- (ecoinvent v2.2 report 11_II), C16H14O3, MW=254 g/mol.
- waste polyvinylchloride: 0 kg; name BP_amount_1
  Calculated value. Proxy for the treatment of brass.
  production volume 0 kg
    Calculated from production volume of reference product using the relative outputs.
  property price 0 EUR2005; name BP_amount_1_price_EUR2005
  properties: heating value, net 21.51 MJ, carbon content, fossil 0.440882, water content 0.00200401, wet mass 1 kg, dry mass 0.998 kg
  note on heating value, net: Value taken from the general comment of the treatment dataset.
- polyvinylchloride, bulk polymerised: 44.947 kg; name pvc; source Schwarz U. 1992; lognormal variance with pedigree 0.0615, pedigree (2,1,5,1,1)
  (same comment as for zinc)
  properties: heating value, net 21.5 MJ, dry mass 1 kg, carbon content, fossil 0.387097, wet mass 1 kg
  note on carbon content, fossil: Monomer is vynyl chloride, C2H3Cl (ecoinvent v2.2 report 11_II). MW=62 g/mol
- scrap copper: 0 kg; name BP_amount_2
  Calculated value. Proxy for the treatment of brass.
  production volume 0 kg
    Calculated from production volume of reference product using the relative outputs.
  property carbon content, non-fossil 0; name C_content_non_fossil
  property wet mass 1 kg; name WM
  property price 0 EUR2005; name BP_amount_2_price_EUR2005
  property dry mass 1 kg; name DM
  property water in wet mass 0 kg; name WWM
  property water content 0; name water_content
  property carbon content, fossil 0; name C_content_fossil
- epoxy resin, liquid: 0 kg; name epoxy; source Schwarz U. 1992; pedigree (1,1,1,1,1)
  (same comment as for zinc)
  properties: heating value, net 12.82 MJ, dry mass 1 kg, carbon content, fossil 0.42325, wet mass 1 kg
- scrap steel: 0 kg; name BP_amount_3
  Calculated value. Proxy for the treatment of brass.
  production volume 0 kg
    Calculated from production volume of reference product using the relative outputs.
  property price 0 EUR2005; name BP_amount_3_price_EUR2005
  properties: dry mass 1 kg, wet mass 1 kg
- polyethylene, high density, granulate: 708.7 kg; name hdpe; source Schwarz U. 1992; lognormal variance with pedigree 0.0615, pedigree (2,1,5,1,1)
  EcoSpold01Location=RER
  Literature value/estimation/proxy. Scaled from smaller plants over cabling length and fuse box weight. The Radox-cable cladding is approximated with HDPE-plastic.
  Uncertainty: Scaled from smaller plants over cabling length and fuse box weight
  properties: wet mass 1 kg, carbon content, fossil 0.857143, dry mass 1 kg, heating value, net 42.47 MJ
  note on carbon content, fossil: Polyethylene is formed out of a huge amount of ethylene monomers (C2H4) (ecoinvent v2.2 report 11_II). MW=28 g/mol
- steel, low-alloyed, hot rolled: 52.884 kg; name steel; source Schwarz U. 1992; lognormal variance with pedigree 0.0615, pedigree (2,1,5,1,1)
  (same comment as for wire drawing, copper)
  properties: dry mass 1 kg, carbon content, fossil 0.005, wet mass 1 kg
  note on carbon content, fossil: Low alloyed steel composition given in Tab. 3.2 ecoinvent v2.2 report 10_partII. Steel assumed to have a C content of 0.5%
- waste electric wiring: -12.3317, -1452.78 kg (2 entries); lognormal variance with pedigree 0.1606, pedigree (2,1,5,1,1)
  Calculated value. Proxy for the treatment of brass.
  EcoSpold01Location=CH
  production volume 4.96602e6 kg
  properties: wet mass 1 kg, lifetime 30 year, dry mass 1 kg, carbon content, fossil 0.34
- waste polyethylene/polypropylene product: -0.0765355, -0.00229663, -0.194028 kg (3 entries)
  Calculated value. Proxy for the treatment of brass.
  production volume 924.865 kg
- nylon 6: 5.18666, 10.5023 kg (2 entries); source Schwarz U. 1992; lognormal variance with pedigree 0.0615, pedigree (2,1,5,1,1)
  (same comment as for zinc)
- brass: 0.0068215, 1.35748 kg (2 entries); source Schwarz U. 1992; lognormal variance with pedigree 0.0615, pedigree (2,1,5,1,1)
  (same comment as for brass)
- waste polyvinylchloride: -4.32636, -0.333537, -0.137763, -0.130819, -4.99186, -0.0556545, -0.0252249, -34.9458 kg (8 entries)
  Calculated value. Proxy for the treatment of brass.
  production volume 152349 kg
- scrap copper: -0.432767, -0.0203045, -0.911229 kg (3 entries)
  Calculated value. Proxy for the treatment of brass.
  production volume 4624.33 kg
  properties: wet mass 1 kg, dry mass 1 kg
- epoxy resin, liquid: 0.0237388, 0.112691 kg (2 entries); source Schwarz U. 1992; lognormal variance with pedigree 0.0615, pedigree (2,1,5,1,1)
  (same comment as for zinc)
- scrap steel: -13.5414, -0.0171564, -42.054 kg (3 entries)
  Calculated value. Proxy for the treatment of brass.
  production volume 188500 kg

## Sampling procedure
Literature, calculations, estimations

## Extrapolations
This dataset has been extrapolated from year 2008 to the year of the calculation (2021). The uncertainty has been adjusted accordingly.

## Review by Christian Bauer 2012-02-01
passed

## Review by Bo Weidema 2012-02-01
As an exception, this dataset has only been reviewed by two reviewers. This can be justified by the limited number of exchanges with the environment of such an infrastructure dataset.
