# treatment of waste polyethylene, unsanitary landfill, hyperarid infiltration class (-250mm)

Dataset: EcoSpold 2, unit process
Geography: GLO
Time period: 2006-01-01 to 2021-12-31
Technology level: current
Classification: ISIC rev.4 ecoinvent: 3821:Treatment and disposal of non-hazardous waste
Synonyms: municipal waste landfill
Scenario: Business-as-Usual
System model: Allocation, cut-off by classification
Share of production covered: 1 %
Generated by: Avraam Symeonidis
Database: ecoinvent
isCopyrightProtected: true
accessRestrictedTo: 1

## General comment
This dataset represents the activity of waste disposal of waste polyethylene in a unsanitary landfill. Recommended use of this dataset: For PE, which goes to disposal as part of managed communal waste mixture. // Waste composition (wet, in ppm): upper heating value 42.82 MJ/kg; lower heating value 42.47 MJ/kg; H2O 4000; O 38435; H 122490; C 822050; S 426.9; N 1297.2; P n.a.; B n.a.; Cl 1461.5; Br 9.5896; F 14.384; I n.a.; Ag n.a.; As 1.822; Ba 239.74; Cd 33.946; Co 1.6782; Cr 12.466; Cu 41.367; Hg 0.047948; Mn 30.047; Mo n.a.; Ni 0.95896; Pb 22.596; Sb 10.069; Se 2.0138; Sn 3.814; V 2205.6; Zn 342.01; Be 0.47948; Sc n.a.; Sr 84.868; Ti 958.96; Tl 0.38358; W n.a.; Si n.a.; Fe 1534.3; Ca 2589.2; Al 191.79; K n.a.; Mg 95.896; Na 1405.4; . // Share of carbon in waste that is biogenic 0%. Share of metals in waste not oxidised and bulk-recyclable (exclude very small or thin parts) Iron: 0%; Alu: 0%; Copper: 0%. Overall degradability of waste during 100 years: 1%.

## Included activities start
from final waste deposition (without transports to the site)

## Included activities end
Waste-specific short-term emissions to air via landfill gas and landfill leachate. Waste-specific long-term emissions from landfill.

## Geography
Given name of landfill location is 'infiltration class 1 hyperarid (2018)'. Landfill site with mean annual temperature (MAT) of 8 degC, mean annual precipitation (MAP) of 350 mm/year, and net infiltration of -250 mm/year. Negative infiltration means that leachate flow is reversed and flows upward to the surface, where water is evaporated and dissolved solids become solid evaporites.
Climate adjustments result in an alpha t (temperature) for permafrost areas of 0.999. Total climate adjustments with alpha pt of 0.999.

## Technology
This is an inventory for an unsanitary, sub-controlled landfill for municipal solid waste. Ultimate average landfill height is 15 meters. Operation phase duration is 25 years.Percentage of landfill gas directly emitted is 100w%.
Leachate of the landfill is not treated. Leachate flow is upward to the surface due to net negative infiltration. No leachate treatment can be performed. Based on average waste composition and climate data the end of carbonate phase is estimated to be reached 6681 years after waste deposition. Arid conditions at this location prompt formation of evaporites from landfill contents which are partially eroded by wind. It is assumed that 10% of these evaporites are eroded by wind and airborne. Initial decay in the first 100 years of this waste results in a wind erosion rate corresponding to 7.955 g/m2.year and long-term decay corresponds to wind erosion of 24.79 g/m2.year.

## Reference product
- waste polyethylene: -1 kg; By-product classification Waste; CPC 39270: Waste, parings and scrap of plastics; CAS 9002-88-4; pedigree (1,1,1,1,1)
  main reference product of this activity (supply of disposal service).
  Uncertainty: Uncertainty is not adjusted, as this is the refence product
  production volume 1 kg
    The amount of the annual production volume is a placeholder value. The contribution of this technology to the different local markets can be found in the markets themselves.
  property heating value, net 42.47 MJ
    Value taken from the general comment of the treatment dataset.
  property price 0 EUR2005
    Waste products are assigned a price of zero as they are assumed to require further treatment.
  property carbon content 0.82535
    carbon content on a dry matter basis (reserved; not for manual entry)
  properties: calcium content 0.0025996, nickel content 9.6281e-7, water content 0.0040161, barium content 0.0002407, sulfur content 0.00042861, oxygen content 0.03859, heating value, gross 42.823 MJ, wet mass 1 kg, water in wet mass 0.004 kg, arsenic content 1.8293e-6, chromium content 1.2517e-5, aluminium content 0.00019256, titanium content 0.00096281, bromine content 9.6281e-6, iron content 0.0015405, beryllium content 4.8141e-7, strontium content 8.5209e-5, copper content 4.1533e-5, chlorine content 0.0014674, selenium content 2.0219e-6, manganese content 3.0168e-5, carbon content, fossil 0.82535, fluorine content 1.4442e-5, nitrogen content 0.0013024, lead content 2.2687e-5, zinc content 0.00034338, hydrogen content 0.12298, tin content 3.8294e-6, antimony content 1.011e-5, thallium content 3.8512e-7, sodium content 0.001411, vanadium content 0.0022145, cadmium content 3.4082e-5, magnesium content 9.6281e-5, cobalt content 1.6849e-6, mercury content 4.8141e-8, dry mass 0.996 kg, carbon allocation 0.822049 kg

## Inputs from technosphere
- diesel, burned in building machine: 0.046738 MJ; lognormal variance with pedigree 0.088256, pedigree (1,1,4,1,1)
  for waste distribution and compaction.
  Uncertainty: Uncertainty calculated from uncertainty in base parameters.
  properties: heating value, net 1 MJ
- excavation, skid-steer loader: 0.00031708 m3; lognormal variance with pedigree 0.088256, pedigree (1,1,4,1,1)
  application of daily cover.
  Uncertainty: Uncertainty calculated from uncertainty in base parameters.

## Inputs from nature
- Occupation, dump site [natural resource, land]: 0.0023333 m2*year; lognormal variance with pedigree 0.088256, pedigree (1,1,4,1,1)
  for landfill operation phase and spontaneous renaturation.
  Uncertainty: Uncertainty calculated from uncertainty in base parameters.

## Emissions to nature
- Nickel [soil, industrial]: 8.6306e-7 kg; lognormal variance with pedigree 0.40138, pedigree (1,1,4,1,1)
  burden from leachate evaporite in arid climates deposited on landflill surface.
  Uncertainty: Uncertainty calculated from unertainty of the waste composition of this waste, uncertainty in waste decomposition and short-term leaching in landfill
- Beryllium [air, low population density, long-term]: 4.792e-8 kg; lognormal variance with pedigree 0.42407, pedigree (1,1,4,1,1)
  burden from windblown long-term leachate evaporite in arid climates.
  Uncertainty: Uncertainty calculated from unertainty of the waste composition of this waste, uncertainty in waste decomposition and short-term leaching in landfill
- Arsenic [air, non-urban air or from high stacks]: 3.7268e-10 kg; lognormal variance with pedigree 0.4656, pedigree (1,1,4,1,1)
  burden from direct release or incineration of landfill biogas; or windblown leachate evaporite in arid climates.
  Uncertainty: Uncertainty calculated from unertainty of the waste composition of this waste, uncertainty in waste decomposition and short-term leaching in landfill
- Selenium [soil, industrial]: 6.8062e-7 kg; lognormal variance with pedigree 0.43647, pedigree (1,1,4,1,1)
  (same comment as for Nickel)
- Zinc [air, low population density, long-term]: 3.4184e-5 kg; lognormal variance with pedigree 0.20767, pedigree (1,1,4,1,1)
  (same comment as for Beryllium)
- Cadmium [air, non-urban air or from high stacks]: 6.3634e-9 kg; lognormal variance with pedigree 0.39761, pedigree (1,1,4,1,1)
  (same comment as for Arsenic)
- Manganese [soil, industrial]: 2.7043e-5 kg; lognormal variance with pedigree 0.28397, pedigree (1,1,4,1,1)
  (same comment as for Nickel)
- Strontium [air, low population density, long-term]: 8.4819e-6 kg; lognormal variance with pedigree 0.25397, pedigree (1,1,4,1,1)
  (same comment as for Beryllium)
- Hydrogen chloride [air, non-urban air or from high stacks]: 4.2058e-6 kg; lognormal variance with pedigree 0.18793, pedigree (1,1,4,1,1)
  (same comment as for Arsenic)
- Mercury [soil, industrial]: 4.3141e-8 kg; lognormal variance with pedigree 0.48804, pedigree (1,1,4,1,1)
  (same comment as for Nickel)
- Tin [air, low population density, long-term]: 3.8138e-7 kg; lognormal variance with pedigree 0.35671, pedigree (1,1,4,1,1)
  (same comment as for Beryllium)
- Bromine [air, non-urban air or from high stacks]: 2.75e-8 kg; lognormal variance with pedigree 0.33892, pedigree (1,1,4,1,1)
  (same comment as for Arsenic)
- Copper [soil, industrial]: 3.7231e-5 kg; lognormal variance with pedigree 0.27785, pedigree (1,1,4,1,1)
  (same comment as for Nickel)
- Vanadium [air, low population density, long-term]: 8.5117e-5 kg; lognormal variance with pedigree 0.20347, pedigree (1,1,4,1,1)
  (same comment as for Beryllium)
- Hydrogen fluoride [air, non-urban air or from high stacks]: 5.8323e-8 kg; lognormal variance with pedigree 0.4256, pedigree (1,1,4,1,1)
  (same comment as for Arsenic)
- Cobalt [soil, industrial]: 1.5104e-6 kg; lognormal variance with pedigree 0.38194, pedigree (1,1,4,1,1)
  (same comment as for Nickel)
- Lead [air, low population density, long-term]: 2.2595e-6 kg; lognormal variance with pedigree 0.29798, pedigree (1,1,4,1,1)
  (same comment as for Beryllium)
- Sulfate [air, non-urban air or from high stacks]: 4.7634e-7 kg; lognormal variance with pedigree 0.32167, pedigree (1,1,4,1,1)
  burden from windblown leachate evaporite in arid climates.
  Uncertainty: Uncertainty calculated from unertainty of the waste composition of this waste, uncertainty in waste decomposition and short-term leaching in landfill
- Chromium [soil, industrial]: 7.3286e-8 kg; lognormal variance with pedigree 1.9101, pedigree (1,1,4,1,1)
  (same comment as for Nickel)
- Selenium [air, low population density, long-term]: 7.5413e-8 kg; lognormal variance with pedigree 0.43787, pedigree (1,1,4,1,1)
  (same comment as for Beryllium)
- Nitrate [air, non-urban air or from high stacks]: 1.3408e-5 kg; lognormal variance with pedigree 0.23067, pedigree (1,1,4,1,1)
  (same comment as for Sulfate)
- Barium [soil, industrial]: 0.00021577 kg; lognormal variance with pedigree 0.21561, pedigree (1,1,4,1,1)
  (same comment as for Nickel)
- Antimony [air, low population density, long-term]: 1.4003e-7 kg; lognormal variance with pedigree 0.56794, pedigree (1,1,4,1,1)
  (same comment as for Beryllium)
- Nitrogen oxides [air, non-urban air or from high stacks]: 1.7769e-8 kg; lognormal variance with pedigree 0.32289, pedigree (1,1,4,1,1)
  burden from direct release or incineration of landfill biogas.
  Uncertainty: Uncertainty calculated from unertainty of the waste composition of this waste, uncertainty in waste decomposition and short-term leaching in landfill
- Arsenic [soil, industrial]: 1.6398e-6 kg; lognormal variance with pedigree 0.37994, pedigree (1,1,4,1,1)
  (same comment as for Nickel)
- Mercury [air, low population density, long-term]: 4.7902e-9 kg; lognormal variance with pedigree 0.48845, pedigree (1,1,4,1,1)
  (same comment as for Beryllium)
- Particulates, < 2.5 um [air, non-urban air or from high stacks]: 1.0607e-5 kg; lognormal variance with pedigree 0.20612, pedigree (1,1,4,1,1)
  (same comment as for Arsenic)
- Cadmium [soil, industrial]: 3.0551e-5 kg; lognormal variance with pedigree 0.28367, pedigree (1,1,4,1,1)
  (same comment as for Nickel)
- Nickel [air, low population density, long-term]: 9.584e-8 kg; lognormal variance with pedigree 0.40171, pedigree (1,1,4,1,1)
  (same comment as for Beryllium)
- Particulates, > 2.5 um, and < 10um [air, non-urban air or from high stacks]: 1.591e-5 kg; lognormal variance with pedigree 0.16071, pedigree (1,1,4,1,1)
  (same comment as for Arsenic)
- Bromine [soil, industrial]: 8.6276e-6 kg; lognormal variance with pedigree 0.31625, pedigree (1,1,4,1,1)
  (same comment as for Nickel)
- Manganese [air, low population density, long-term]: 2.9704e-6 kg; lognormal variance with pedigree 0.28851, pedigree (1,1,4,1,1)
  (same comment as for Beryllium)
- Sulfur dioxide [air, non-urban air or from high stacks]: 5.5642e-7 kg; lognormal variance with pedigree 0.37749, pedigree (1,1,4,1,1)
  (same comment as for Nitrogen oxides)
- Chloride [soil, industrial]: 0.0013149 kg; lognormal variance with pedigree 0.15376, pedigree (1,1,4,1,1)
  (same comment as for Nickel)
- Chromium [air, low population density, long-term]: 8.001e-9 kg; lognormal variance with pedigree 1.9107, pedigree (1,1,4,1,1)
  (same comment as for Beryllium)
- Particulates, > 10 um [air, non-urban air or from high stacks]: 2.6517e-5 kg; lognormal variance with pedigree 0.14096, pedigree (1,1,4,1,1)
  (same comment as for Arsenic)
- Fluoride [soil, industrial]: 1.2897e-5 kg; lognormal variance with pedigree 0.31258, pedigree (1,1,4,1,1)
  (same comment as for Nickel)
- Copper [air, low population density, long-term]: 4.1365e-6 kg; lognormal variance with pedigree 0.27788, pedigree (1,1,4,1,1)
  (same comment as for Beryllium)
- Methane, fossil [air, non-urban air or from high stacks]: 0.0059467 kg; lognormal variance with pedigree 0.11136, pedigree (1,1,4,1,1)
  (same comment as for Nitrogen oxides)
- Sulfur [soil, industrial]: 0.00038396 kg; lognormal variance with pedigree 0.19908, pedigree (1,1,4,1,1)
  (same comment as for Nickel)
- Cobalt [air, low population density, long-term]: 1.6728e-7 kg; lognormal variance with pedigree 0.38354, pedigree (1,1,4,1,1)
  (same comment as for Beryllium)
- Nitrogen [soil, industrial]: 0.0011656 kg; lognormal variance with pedigree 0.15792, pedigree (1,1,4,1,1)
  (same comment as for Nickel)
- Cadmium [air, low population density, long-term]: 3.3886e-6 kg; lognormal variance with pedigree 0.28446, pedigree (1,1,4,1,1)
  (same comment as for Beryllium)
- Carbon dioxide, fossil [air, non-urban air or from high stacks]: 0.012875 kg; lognormal variance with pedigree 0.101232, pedigree (1,1,4,1,1)
  (same comment as for Nitrogen oxides)
- Magnesium [air, non-urban air or from high stacks]: 5.9251e-8 kg; lognormal variance with pedigree 0.35402, pedigree (1,1,4,1,1)
  (same comment as for Arsenic)
- Barium [air, low population density, long-term]: 2.37e-5 kg; lognormal variance with pedigree 0.21945, pedigree (1,1,4,1,1)
  (same comment as for Beryllium)
- Sodium [air, non-urban air or from high stacks]: 5.8232e-6 kg; lognormal variance with pedigree 0.21155, pedigree (1,1,4,1,1)
  (same comment as for Arsenic)
- Hydrogen fluoride [air, low population density, long-term]: 1.4319e-6 kg; lognormal variance with pedigree 0.31295, pedigree (1,1,4,1,1)
  (same comment as for Beryllium)
- Carbon [soil, industrial]: 0.73267 kg; lognormal variance with pedigree 0.00830648, pedigree (1,1,4,1,1)
  (same comment as for Nickel)
- Bromine [air, low population density, long-term]: 9.345e-7 kg; lognormal variance with pedigree 0.32638, pedigree (1,1,4,1,1)
  (same comment as for Beryllium)
- Heat, waste [water, ground-, long-term]: 42.395 MJ; lognormal variance with pedigree 0.020651, pedigree (1,1,4,1,1)
  burden from long-term decomposition of waste (>100a).
  Uncertainty: Uncertainty calculated from unertainty of the waste composition of this waste, uncertainty in waste decomposition and short-term leaching in landfill
- Arsenic [air, low population density, long-term]: 1.8187e-7 kg; lognormal variance with pedigree 0.38087, pedigree (1,1,4,1,1)
  (same comment as for Beryllium)
- Heat, waste [soil, industrial]: 0.29461 MJ; lognormal variance with pedigree 0.077031, pedigree (1,1,4,1,1)
  burden from short-term decomposition of waste (0-100a).
  Uncertainty: Uncertainty calculated from unertainty of the waste composition of this waste, uncertainty in waste decomposition and short-term leaching in landfill
- Hydrogen chloride [air, low population density, long-term]: 0.00014243 kg; lognormal variance with pedigree 0.16009, pedigree (1,1,4,1,1)
  (same comment as for Beryllium)
- Calcium [air, non-urban air or from high stacks]: 3.3756e-7 kg; lognormal variance with pedigree 0.29498, pedigree (1,1,4,1,1)
  (same comment as for Arsenic)
- Sulfate [air, low population density, long-term]: 0.00012751 kg; lognormal variance with pedigree 0.20035, pedigree (1,1,4,1,1)
  (same comment as for Beryllium)
- Aluminium [air, non-urban air or from high stacks]: 9.5994e-9 kg; lognormal variance with pedigree 0.41101, pedigree (1,1,4,1,1)
  (same comment as for Arsenic)
- Nitrate [air, low population density, long-term]: 0.00056014 kg; lognormal variance with pedigree 0.16396, pedigree (1,1,4,1,1)
  (same comment as for Beryllium)
- Iron [air, non-urban air or from high stacks]: 2.1101e-8 kg; lognormal variance with pedigree 0.38528, pedigree (1,1,4,1,1)
  (same comment as for Arsenic)
- Particulates, < 2.5 um [air, low population density, long-term]: 0.019797 kg; lognormal variance with pedigree 0.12849, pedigree (1,1,4,1,1)
  (same comment as for Beryllium)
- Titanium [air, non-urban air or from high stacks]: 4.7997e-8 kg; lognormal variance with pedigree 0.35802, pedigree (1,1,4,1,1)
  (same comment as for Arsenic)
- Particulates, > 10 um [air, low population density, long-term]: 0.049493 kg; lognormal variance with pedigree 0.063331, pedigree (1,1,4,1,1)
  (same comment as for Beryllium)
- Thallium [air, non-urban air or from high stacks]: 2.2329e-11 kg; lognormal variance with pedigree 0.6102, pedigree (1,1,4,1,1)
  (same comment as for Arsenic)
- Particulates, > 2.5 um, and < 10um [air, low population density, long-term]: 0.029696 kg; lognormal variance with pedigree 0.083084, pedigree (1,1,4,1,1)
  (same comment as for Beryllium)
- Strontium [air, non-urban air or from high stacks]: 4.9403e-9 kg; lognormal variance with pedigree 0.43314, pedigree (1,1,4,1,1)
  (same comment as for Arsenic)
- Magnesium [soil, industrial]: 8.6306e-5 kg; lognormal variance with pedigree 0.24756, pedigree (1,1,4,1,1)
  (same comment as for Nickel)
- Zinc [air, non-urban air or from high stacks]: 1.6218e-8 kg; lognormal variance with pedigree 0.39379, pedigree (1,1,4,1,1)
  (same comment as for Arsenic)
- Sodium [soil, industrial]: 0.0012648 kg; lognormal variance with pedigree 0.15132, pedigree (1,1,4,1,1)
  (same comment as for Nickel)
- Beryllium [air, non-urban air or from high stacks]: 2.7911e-11 kg; lognormal variance with pedigree 0.60305, pedigree (1,1,4,1,1)
  (same comment as for Arsenic)
- Aluminium [soil, industrial]: 0.00017261 kg; lognormal variance with pedigree 0.22664, pedigree (1,1,4,1,1)
  (same comment as for Nickel)
- Vanadium [air, non-urban air or from high stacks]: 2.3289e-7 kg; lognormal variance with pedigree 0.30688, pedigree (1,1,4,1,1)
  (same comment as for Arsenic)
- Iron [soil, industrial]: 0.0013809 kg; lognormal variance with pedigree 0.15845, pedigree (1,1,4,1,1)
  (same comment as for Nickel)
- Tin [air, non-urban air or from high stacks]: 2.2503e-11 kg; lognormal variance with pedigree 0.61123, pedigree (1,1,4,1,1)
  (same comment as for Arsenic)
- Calcium [soil, industrial]: 0.0023303 kg; lognormal variance with pedigree 0.14135, pedigree (1,1,4,1,1)
  (same comment as for Nickel)
- Selenium [air, non-urban air or from high stacks]: 2.1263e-10 kg; lognormal variance with pedigree 0.53726, pedigree (1,1,4,1,1)
  (same comment as for Arsenic)
- Thallium [soil, industrial]: 3.4523e-7 kg; lognormal variance with pedigree 0.43089, pedigree (1,1,4,1,1)
  (same comment as for Nickel)
- Lead [air, non-urban air or from high stacks]: 1.3342e-10 kg; lognormal variance with pedigree 0.55197, pedigree (1,1,4,1,1)
  (same comment as for Arsenic)
- Strontium [soil, industrial]: 7.6381e-5 kg; lognormal variance with pedigree 0.25371, pedigree (1,1,4,1,1)
  (same comment as for Nickel)
- Antimony [air, non-urban air or from high stacks]: 1.0632e-9 kg; lognormal variance with pedigree 0.48446, pedigree (1,1,4,1,1)
  (same comment as for Arsenic)
- Titanium [soil, industrial]: 0.00086306 kg; lognormal variance with pedigree 0.17359, pedigree (1,1,4,1,1)
  (same comment as for Nickel)
- Sodium [air, low population density, long-term]: 0.00013473 kg; lognormal variance with pedigree 0.16138, pedigree (1,1,4,1,1)
  (same comment as for Beryllium)
- Manganese [air, non-urban air or from high stacks]: 3.4457e-8 kg; lognormal variance with pedigree 0.37403, pedigree (1,1,4,1,1)
  (same comment as for Arsenic)
- Beryllium [soil, industrial]: 4.3153e-7 kg; lognormal variance with pedigree 0.42373, pedigree (1,1,4,1,1)
  (same comment as for Nickel)
- Aluminium [air, low population density, long-term]: 1.917e-5 kg; lognormal variance with pedigree 0.22685, pedigree (1,1,4,1,1)
  (same comment as for Beryllium)
- Mercury [air, non-urban air or from high stacks]: 1.6402e-11 kg; lognormal variance with pedigree 0.60747, pedigree (1,1,4,1,1)
  (same comment as for Arsenic)
- Vanadium [soil, industrial]: 0.00076815 kg; lognormal variance with pedigree 0.20256, pedigree (1,1,4,1,1)
  (same comment as for Nickel)
- Magnesium [air, low population density, long-term]: 9.5305e-6 kg; lognormal variance with pedigree 0.2499, pedigree (1,1,4,1,1)
  (same comment as for Beryllium)
- Nickel [air, non-urban air or from high stacks]: 5.5822e-11 kg; lognormal variance with pedigree 0.58071, pedigree (1,1,4,1,1)
  (same comment as for Arsenic)
- Zinc [soil, industrial]: 0.00030781 kg; lognormal variance with pedigree 0.20749, pedigree (1,1,4,1,1)
  (same comment as for Nickel)
- Iron [air, low population density, long-term]: 0.00015341 kg; lognormal variance with pedigree 0.1585, pedigree (1,1,4,1,1)
  (same comment as for Beryllium)
- Chromium [air, non-urban air or from high stacks]: 1.4228e-10 kg; lognormal variance with pedigree 0.55041, pedigree (1,1,4,1,1)
  (same comment as for Arsenic)
- Tin [soil, industrial]: 3.4326e-6 kg; lognormal variance with pedigree 0.35668, pedigree (1,1,4,1,1)
  (same comment as for Nickel)
- Calcium [air, low population density, long-term]: 0.00025858 kg; lognormal variance with pedigree 0.14171, pedigree (1,1,4,1,1)
  (same comment as for Beryllium)
- Copper [air, non-urban air or from high stacks]: 2.029e-10 kg; lognormal variance with pedigree 0.53834, pedigree (1,1,4,1,1)
  (same comment as for Arsenic)
- Antimony [soil, industrial]: 1.2698e-6 kg; lognormal variance with pedigree 0.56508, pedigree (1,1,4,1,1)
  (same comment as for Nickel)
- Thallium [air, low population density, long-term]: 3.8336e-8 kg; lognormal variance with pedigree 0.43123, pedigree (1,1,4,1,1)
  (same comment as for Beryllium)
- Barium [air, non-urban air or from high stacks]: 2.7492e-7 kg; lognormal variance with pedigree 0.30512, pedigree (1,1,4,1,1)
  (same comment as for Arsenic)
- Lead [soil, industrial]: 2.0336e-5 kg; lognormal variance with pedigree 0.29794, pedigree (1,1,4,1,1)
  (same comment as for Nickel)
- Titanium [air, low population density, long-term]: 9.5848e-5 kg; lognormal variance with pedigree 0.17377, pedigree (1,1,4,1,1)
  (same comment as for Beryllium)
- Cobalt [air, non-urban air or from high stacks]: 5.4009e-10 kg; lognormal variance with pedigree 0.50763, pedigree (1,1,4,1,1)
  (same comment as for Arsenic)

## Extrapolations
This dataset has been extrapolated from year 2012 to the year of the calculation (2021). The uncertainty has been adjusted accordingly.
