# gallium production, semiconductor-grade

Dataset: EcoSpold 2, unit process
Geography: GLO
Time period: 1999-01-01 to 2021-12-31
Technology level: current
Classification: EcoSpold01Categories: metals/extraction
Classification: ISIC rev.4 ecoinvent: 2011:Manufacture of basic chemicals
Tags: ConvertedDataset
Scenario: Business-as-Usual
System model: Allocation, cut-off by classification
Share of production covered: 63 %
Generated by: Matthias Tuchschmid (obsolete)
Published in: Classen M. 2009
Database: ecoinvent
isCopyrightProtected: true
accessRestrictedTo: 1

## General comment
Production of gallium from Bayer-liquor, purification to 99.9999% (6N)
[This dataset was already contained in the ecoinvent database version 2. It was not individually updated during the transfer to ecoinvent version 3. Life Cycle Impact Assessment results may still have changed, as they are affected by changes in the supply chain, i.e. in other datasets. This dataset was generated following the ecoinvent quality guidelines for version 2. It may have been subject to central changes described in the ecoinvent version 3 change report (http://www.ecoinvent.org/database/ecoinvent-version-3/reports-of-changes/), and the results of the central updates were reviewed extensively. The changes added e.g. consistent water flows and other information throughout the database. The documentation of this dataset can be found in the ecoinvent reports of version 2, which are still available via the ecoinvent website. The change report linked above covers all central changes that were made during the conversion process.]

## Included activities end
The energy consumption and auxiliary materials are considered for, emissions are estimated.

## Geography
Production in GLO.

## Technology
The module includes the production and purification of high grade gallium (99.9999%) by hydrometallurgical processes (Rhõne-Poulenc-Process).

## Time period
patents and literatur

## Reference product
- gallium, semiconductor-grade: 1 kg; CPC 34231: Chemical elements n.e.c.; inorganic acids except phosphoric, nitric and sulphonitric; inorganic oxygen compoun[…]; By-product classification allocatable product; CAS 7440-55-3
  EcoSpold01Location=GLO
  production volume 1 kg
    60 t in 2005
    Dummy value to be replaced by measured, estimated or calculated value
  property price 343.159 EUR2005
    Calculated based on inputs: The price of the product has been calculated as a sum of the values of the material and energy inputs for this product. This value is therefore a rough estimation. It may underestimate the real price since there are additional expenses when producing any product. These expences can include for example labour costs, treatment of waste materials and profit for the producer. Please consider carefully whether this level of data quality is acceptable for your application.
  property carbon content 0
    carbon content on a dry matter basis (reserved; not for manual entry)
  properties: water in wet mass 0 kg, water content 0, carbon content, non-fossil 0, carbon content, fossil 0, wet mass 1 kg, dry mass 1 kg, carbon allocation 0 kg

## Inputs from technosphere
- gallium, in Bayer liquor from aluminium production: 1.2346 kg; lognormal variance with pedigree 0.1226, pedigree (2,4,5,1,4)
  Literature (Selvi, 2004)
  EcoSpold01Location=GLO
  Uncertainty: Literature (Selvi, 2004)
  properties: wet mass 1 kg, dry mass 1 kg
- lime, hydrated, packed: 0 kg; pedigree (1,1,1,1,1)
  Calculation (for neutralization of sulphuric acid)
  EcoSpold01Location=CH
  Uncertainty: Calculation (for neutralization of sulphuric acid)
  properties: dry mass 0.997 kg, wet mass 1 kg, water content 0.00300903
- electricity, medium voltage: 2.6265 kWh; lognormal variance with pedigree 0.140025, pedigree (4,4,5,2,4)
  EcoSpold01Location=UCTE
  Literature (Dresher 2001) & (Meijer 2003)
  Uncertainty: Literature (Dresher 2001) & (Meijer 2003)
- fatty alcohol: 0.17 kg; lognormal variance with pedigree 0.140025, pedigree (4,4,5,2,4)
  EcoSpold01Location=RER
  Literature (Bautista 2003), similar to n-decanol
  Uncertainty: Literature (Bautista 2003), similar to n-decanol
  properties: dry mass 1 kg, wet mass 1 kg, heating value, net 41.01 MJ, carbon content, non-fossil 0.743434, carbon content, fossil 0.0408973
  note on carbon content, non-fossil: Fatty alcohols have chain lengths between C6 and C22, their chemical formula is CH3(CH2)nCH2OH (ecoinvent v2.2 report 12, pg 16). As an average, C14 was used. The dataset represents a mix of 27% produced from fatty acid splitting and 73% produced from methyl ester (ecoinvent v2.2 report 12, pg 21). In the methyl esterification, methanol (CH3OH) has a fossil origin
- aluminium electrolysis facility: 7.6923e-9 unit; lognormal variance with pedigree 0.578625, pedigree (4,3,5,2,5)
  EcoSpold01Location=RER
  Estimation
  Uncertainty: Estimation
- kerosene: 0 kg; pedigree (1,1,1,1,1)
  Literature (Bautista 2003)
  EcoSpold01Location=RER
  Uncertainty: Literature (Bautista 2003)
  properties: carbon content, fossil 0.85, dry mass 1 kg, wet mass 1 kg, heating value, net 43 MJ
- sulfuric acid: 0 kg; pedigree (1,1,1,1,1)
  Literature (Bautista 2003)
  EcoSpold01Location=RER
  Uncertainty: Literature (Bautista 2003)
  properties: wet mass 1 kg, dry mass 1 kg
- EDTA, ethylenediaminetetraacetic acid: 28.4 kg; lognormal variance with pedigree 0.192025, pedigree (5,4,5,2,4)
  EcoSpold01Location=RER
  Literature (Bautista 2003), sas a proxy value to Kelex 100
  Uncertainty: Literature (Bautista 2003), sas a proxy value to Kelex 100
  properties: dry mass 1 kg, wet mass 1 kg, carbon content, fossil 0.410959, heating value, net 19.09 MJ
- chemical factory, organics: 4e-10 unit; lognormal variance with pedigree 0.578625, pedigree (4,3,5,2,5)
  Estimation
  EcoSpold01Location=RER
  Uncertainty: Estimation
- adipic acid: 0.11 kg; lognormal variance with pedigree 0.192025, pedigree (5,4,5,2,4)
  EcoSpold01Location=RER
  Literature (Bautista 2003), as a proxy value to Versatic 10
  Uncertainty: Literature (Bautista 2003), as a proxy value to Versatic 10
  properties: carbon content, fossil 0.493151, wet mass 1 kg, heating value, net 23.23 MJ, dry mass 1 kg
- spent solvent mixture: 0 kg; pedigree (1,1,1,1,1)
  Calculation
  EcoSpold01Location=CH
  Uncertainty: Calculation
  production volume 0 kg
    Calculated from the production volume of gallium, semiconductor-grade in proportion to the respective output amounts.
  properties: heating value, net 21.7 MJ, water content 0.197605, carbon content, fossil 0.571257, dry mass 0.835 kg, wet mass 1 kg
  note on heating value, net: Value taken from the general comment of the treatment dataset.
  note on carbon content, fossil: Tab A.7, ecoinvent v2.2 report 13_I. C content has been calculated after data in the tables, and then referred to 1 kg DM
- lime, hydrated, packed: 0.0188765, 2.22382 kg (2 entries); lognormal variance with pedigree 0.070625, pedigree (3,3,5,2,3)
  (same comment as for lime, hydrated, packed)
- kerosene: 0.24734, 0.00907213, 0.135826, 0.0175821, 0.0428127, 0.00714498, 0.0116371, 1.20858 kg (8 entries); lognormal variance with pedigree 0.192025, pedigree (5,4,5,2,4)
  Literature (Bautista 2003)
  EcoSpold01Location=RER
  Uncertainty: Literature (Bautista 2003)
- sulfuric acid: 0.252197, 1.9278 kg (2 entries); lognormal variance with pedigree 0.192025, pedigree (5,4,5,2,4)
  Literature (Bautista 2003)
  EcoSpold01Location=RER
  Uncertainty: Literature (Bautista 2003)
- spent solvent mixture: -8.47404, -0.198534, -21.6874 kg (3 entries); lognormal variance with pedigree 0.0706, pedigree (3,3,5,1,3)
  Calculation
  EcoSpold01Location=CH
  Uncertainty: Calculation
  production volume 30.36 kg

## Emissions to nature
- Calcium, ion [water, surface water]: 1.1213 kg; lognormal variance with pedigree 0.0706, pedigree (3,3,5,1,3)
  Calculation
  Uncertainty: Calculation
- Sulfate [water, surface water]: 2.18 kg; lognormal variance with pedigree 0.0706, pedigree (3,3,5,1,3)
  Calculation
  Uncertainty: Calculation
- NMVOC, non-methane volatile organic compounds, unspecified origin [air, urban air close to ground]: 0.0010923 kg; lognormal variance with pedigree 0.0706, pedigree (3,3,5,1,3)
  Estimation, Literature (Richardson 2002)
  Uncertainty: Estimation, Literature (Richardson 2002)

## Sampling procedure
Analysis based on literature.

## Extrapolations
This dataset has been extrapolated from year 2005 to the year of the calculation (2021). The uncertainty has been adjusted accordingly.

## Review by Mischa Classen 2007-09-20
passed
none
