# polyester resin production, unsaturated

Dataset: EcoSpold 2, unit process
Geography: RoW
Time period: 1995-01-01 to 2021-12-31
Technology level: current
Classification: ISIC rev.4 ecoinvent: 2013:Manufacture of plastics and synthetic rubber in primary forms
Classification: EcoSpold01Categories: paintings/production
Tags: ConvertedDataset
Scenario: Business-as-Usual
System model: Allocation, cut-off by classification
Generated by: Roland Hischier
Published in: Althaus H.-J. 2007
Database: ecoinvent
isCopyrightProtected: true
accessRestrictedTo: 1

## General comment
The functional unit represent 1 kg of polyester resin, unsaturated.
[This dataset was already contained in the ecoinvent database version 2. It was not individually updated during the transfer to ecoinvent version 3. Life Cycle Impact Assessment results may still have changed, as they are affected by changes in the supply chain, i.e. in other datasets. This dataset was generated following the ecoinvent quality guidelines for version 2. It may have been subject to central changes described in the ecoinvent version 3 change report (http://www.ecoinvent.org/database/ecoinvent-version-3/reports-of-changes/), and the results of the central updates were reviewed extensively. The changes added e.g. consistent water flows and other information throughout the database. The documentation of this dataset can be found in the ecoinvent reports of version 2, which are still available via the ecoinvent website. The change report linked above covers all central changes that were made during the conversion process.]

## Included activities end
Estimated raw material input. Energy input and emissions to water by analogy to other process. Transports and Infrastructure estimated. Further inputs and solid wastes omitted.

## Geography
Data used has no specific geographical origin (general information about composition). Data are used as European average data.

## Technology
data represents a mix of most often used substances for the production of polyester resin

## Parameters
- fraction, cooling water, cooling pond system, to air: 0.032 dimensionless; name fraction_CW_CP_to_air; lognormal variance with pedigree 0.0413, pedigree (2,3,1,3,1)
  Calculated based on literature value (Scown, C.D., 2011, Water Footprint of U.S. Transportation Fuels and supplying information of the article) (Vionnet, S., Quantis Water Database - Technical Report, 2012).
- fraction, cooling water, to air: 0.3875 dimensionless; name fraction_CW_to_air; = (0.5*fraction_CW_OT_to_air)+(0.5*fraction_CW_R_to_air); lognormal variance with pedigree 0.092025, pedigree (4,4,3,2,4)
  Calculated value based on literature value (see comments of the other parametres present in this dataset) and expert opinion. In the case when no industry/literature data are available about the type of cooling or directly fraction, cooling water, to air specific for the process a default assumption is applied. It is assumed that the once-through cooling system is used in 50% of all cases and recirculating system is used in another 50% of all cases.
- fraction, cooling water, once-through system, to air: 0.004 dimensionless; name fraction_CW_OT_to_air; lognormal variance with pedigree 0.0413, pedigree (2,3,1,3,1)
  (same comment as for fraction, cooling water, cooling pond system, to air)
- fraction, cooling water, recirculating system, to air: 0.771 dimensionless; name fraction_CW_R_to_air; lognormal variance with pedigree 0.0413, pedigree (2,3,1,3,1)
  (same comment as for fraction, cooling water, cooling pond system, to air)
- fraction, process water, to air: 0.15 dimensionless; name fraction_PW_to_air; lognormal variance with pedigree 0.092025, pedigree (4,4,3,2,4)

## Reference product
- polyester resin, unsaturated: 1 kg; CPC 34740: Polyacetals, other polyethers and epoxide resins, in primary forms; polycarbonates, alkyd resins, polyallyl es[…]; By-product classification allocatable product
  EcoSpold01Location=RER
  production volume 1.78832e6 kg
    Estimated value. The global production volume of this technology is estimated to be the same as in case of "soy-based resin production".
  property heating value, net 17.75 MJ
    LHV is calculated based on the Carbon content of the product. More details can be found on the respective documentation.
  property price 3.38 EUR2005
    From UN trade database. http://data.un.org/ Import data from the largest economies of the world are used (Brazil, India, USA, China, Japan and EU-27). Commodities: 'Acrylic or vinyl polymer paint or varnish, non-aqueou', 'Polyester based paints, varnishes, non-aqueous medium' and 'Polymer based paint, varnish in non-aqueous medium ne'.
  property carbon content, fossil 0.58584
    (C8H6O2, C8H16O4, C5H12O2,C4H2O3)n was used as a representative formula for unsaturated polyester resin. This formula corresponds to the M390B Unsaturated Polyester Resin (National Industrial Chemicals Notification and Assessment Scheme, full public report, 1994).
  property carbon content 0.58584
    carbon content on a dry matter basis (reserved; not for manual entry)
  properties: water content 0, dry mass 1 kg, wet mass 1 kg, water in wet mass 0 kg, carbon content, non-fossil 0, carbon allocation 0.58584 kg

## Inputs from technosphere
- ethylene glycol: 0.192 kg; lognormal variance with pedigree 0.08, pedigree (3,5,5,5,3)
  Personal communication, based on literature
  EcoSpold01Location=RER
  Uncertainty: personal communication, based on literature
  properties: carbon content, fossil 0.387097, dry mass 1 kg, wet mass 1 kg, heating value, net 23.44 MJ
- propylene glycol, liquid: 0.304 kg; lognormal variance with pedigree 0.08, pedigree (3,5,5,5,3)
  EcoSpold01Location=RER
  Personal communication, based on literature
  Uncertainty: personal communication, based on literature
  properties: carbon content, fossil 0.473684, dry mass 1 kg, wet mass 1 kg, heating value, net 27.09 MJ
- adipic acid: 0.146 kg; lognormal variance with pedigree 0.08, pedigree (3,5,5,5,3)
  (same comment as for ethylene glycol)
  properties: carbon content, fossil 0.493151, wet mass 1 kg, dry mass 1 kg, heating value, net 23.23 MJ
- heat, district or industrial, natural gas: 0 MJ; pedigree (1,1,1,1,1)
  (same comment as for ethylene glycol)
  properties: heating value, net 1 MJ
- chemical factory, organics: 4e-10 unit; lognormal variance with pedigree 0.588, pedigree (4,5,5,5,5)
  EcoSpold01Location=RER
  Estimation
  Uncertainty: estimation
- electricity, medium voltage: 0 kWh; pedigree (1,1,1,1,1)
  EcoSpold01Location=UCTE
  Personal communication, based on literature
  Uncertainty: personal communication, based on literature
- heat, district or industrial, other than natural gas: 0 MJ; pedigree (1,1,1,1,1)
  (same comment as for propylene glycol, liquid)
  properties: heating value, net 1 MJ
- phthalic anhydride: 0.592 kg; lognormal variance with pedigree 0.08, pedigree (3,5,5,5,3)
  (same comment as for ethylene glycol)
  properties: carbon content, fossil 0.648649, dry mass 1 kg, wet mass 1 kg, heating value, net 22.93 MJ
- acetic anhydride: 0.1 kg; lognormal variance with pedigree 0.08, pedigree (3,5,5,5,3)
  (same comment as for propylene glycol, liquid)
  properties: heating value, net 21.38 MJ, dry mass 1 kg, carbon content, fossil 0.470588, wet mass 1 kg
- heat, district or industrial, natural gas: 0.0204754, 1.32852 MJ (2 entries); lognormal variance with pedigree 0.08, pedigree (3,5,5,5,3)
  (same comment as for ethylene glycol)
- electricity, medium voltage: 0.000163867, 3.14227e-5, 0.000527522, 0.00767234, 0.00108142, 0.00352343 kWh (6 entries); lognormal variance with pedigree 0.08, pedigree (3,5,5,5,3)
  (same comment as for electricity, medium voltage)
- heat, district or industrial, other than natural gas: 0.000571841, 1.41018 MJ (2 entries); lognormal variance with pedigree 0.08, pedigree (3,5,5,5,3)
  (same comment as for propylene glycol, liquid)

## Inputs from nature
- Water, unspecified natural origin [natural resource, in water]: 0.006 m3; name water_UNO_input; lognormal variance with pedigree 0.21, pedigree (5,5,5,5,4)
  Assumption
  Uncertainty: assumption
- Water, cooling, unspecified natural origin [natural resource, in water]: 0.024 m3; name water_cooling_UNO_input; lognormal variance with pedigree 0.21, pedigree (5,5,5,5,4)
  Data based on consumption of 1 big company
  Uncertainty: data based on consumption of 1 big company

## Emissions to nature
- Water [air, unspecified]: 0.0102 m3; name water_to_air_unspecified; lognormal variance with pedigree 0.0827, pedigree (2,2,5,5,1)
  Calculated value based on literature values and expert opinion. See comments in the parametres' comment field.
  property fraction, origin: unspecified 1; name fraction_origin_unspecified
  property fraction, origin: fresh water 0; name fraction_origin_fresh_water
  property fraction, origin: salt water 0; name fraction_origin_salt_water
- DOC, Dissolved Organic Carbon [water, surface water]: 0.000740741 kg; lognormal variance with pedigree 0.12, pedigree (3,5,5,5,3)
  Calculated as equal to TOC.
  Uncertainty: personal communication, based on literature
- Water [water, unspecified]: 0.0198 m3; name water_to_water_unspecified; lognormal variance with pedigree 0.0827, pedigree (2,2,5,5,1)
  (same comment as for Water)
  property carbon content, non-fossil 0; name C_content_non_fossil
  property carbon content, fossil 0; name C_content_fossil
  property fraction, origin: fresh water 0; name fraction_origin_fresh_water_Ww
  property fraction, origin: unspecified 1; name fraction_origin_unspecified_Ww
  property fraction, origin: salt water 0; name fraction_origin_salt_water_Ww
  property dry mass 0 kg; name DM
  property wet mass 1000 kg; name WM
  property water in wet mass 1000 kg; name WWM
- COD, Chemical Oxygen Demand [water, surface water]: 0.002 kg; lognormal variance with pedigree 0.12, pedigree (3,5,5,5,3)
  Personal communication, based on literature
  Uncertainty: personal communication, based on literature
- BOD5, Biological Oxygen Demand [water, surface water]: 0.004 kg; lognormal variance with pedigree 0.12, pedigree (3,5,5,5,3)
  Calculated as 0.5*COD.
  Uncertainty: personal communication, based on literature
- TOC, Total Organic Carbon [water, surface water]: 0.000740741 kg; lognormal variance with pedigree 0.12, pedigree (3,5,5,5,3)
  Calculated by default as TOC (gC) = COD/2.7 (COD measured in g O2). Should more correctly be calculated from the carbon content of the specified emissions to water.
  Uncertainty: personal communication, based on literature

## Sampling procedure
literature, expert knowledge and estimations out of similar processes

## Extrapolations
see geography and technology This dataset has been copied from an original dataset covering the geography RER. The uncertainty has been adjusted accordingly.

## Review by Heiko Kunst 2003-07-07
Passed.
