# treatment of waste paperboard, unsanitary landfill, wet infiltration class (500mm)

Dataset: EcoSpold 2, unit process
Geography: GLO
Time period: 2006-01-01 to 2021-12-31
Technology level: current
Classification: ISIC rev.4 ecoinvent: 3821:Treatment and disposal of non-hazardous waste
Synonyms: municipal waste landfill
Scenario: Business-as-Usual
System model: Allocation, cut-off by classification
Share of production covered: 1 %
Generated by: Avraam Symeonidis
Database: ecoinvent
isCopyrightProtected: true
accessRestrictedTo: 1

## General comment
This dataset represents the activity of waste disposal of waste paperboard in a unsanitary landfill. Recommended use of this dataset: For cardboard, which goes to disposal as part of managed communal waste mixture. Larger amounts of *already separated* cardboard could go to recycling, depending on country-specific situation. // Waste composition (wet, in ppm): upper heating value 17.91 MJ/kg; lower heating value 15.92 MJ/kg; H2O 104370; O 392680; H 57791; C 433270; S 1776.8; N 2583.5; P n.a.; B n.a.; Cl 7173.3; Br n.a.; F n.a.; I n.a.; Ag n.a.; As 1.168; Ba 57.193; Cd 0.93313; Co 0.91806; Cr 9.2403; Cu 35.113; Hg 0.30131; Mn 95.196; Mo n.a.; Ni 10.64; Pb 28.963; Sb 0.0046044; Se 3.1073; Sn 6.7521; V n.a.; Zn 63.333; Be 1.1299; Sc n.a.; Sr 45.009; Ti n.a.; Tl n.a.; W n.a.; Si n.a.; Fe n.a.; Ca n.a.; Al n.a.; K n.a.; Mg n.a.; Na n.a.; . // Share of carbon in waste that is biogenic 100%. Share of metals in waste not oxidised and bulk-recyclable (exclude very small or thin parts) Iron: 0%; Alu: 0%; Copper: 0%. Overall degradability of waste during 100 years: 32.44%.

## Included activities start
from final waste deposition (without transports to the site)

## Included activities end
Waste-specific short-term emissions to air via landfill gas and landfill leachate. Waste-specific long-term emissions from landfill.

## Geography
Given name of landfill location is 'infiltration class 4 wet (2018)'. Landfill site with mean annual temperature (MAT) of 8 degC, mean annual precipitation (MAP) of 1100 mm/year, and net infiltration of 500 mm/year.
Climate adjustments result in an alpha t (temperature) for permafrost areas of 0.999. Total climate adjustments with alpha pt of 0.999.

## Technology
This is an inventory for an unsanitary, sub-controlled landfill for municipal solid waste. Ultimate average landfill height is 15 meters. Operation phase duration is 25 years.Percentage of landfill gas directly emitted is 100w%.
Leachate of the landfill is not treated. Based on average waste composition and climate data the end of carbonate phase is estimated to be reached 3382 years after waste deposition.

## Reference product
- waste paperboard: -1 kg; CPC 39240: Waste and scrap of paper or paperboard; By-product classification Waste; pedigree (1,1,1,1,1)
  main reference product of this activity (supply of disposal service).
  Uncertainty: Uncertainty is not adjusted, as this is the refence product
  production volume 1 kg
    The amount of the annual production volume is a placeholder value. The contribution of this technology to the different local markets can be found in the markets themselves.
  property heating value, net 15.92 MJ
    Value taken from the general comment of the treatment dataset.
  property price 0 EUR2005
    Waste products are assigned a price of zero as they are assumed to require further treatment.
  property carbon content 0.48376
    carbon content on a dry matter basis (reserved; not for manual entry)
  properties: water content 0.11653, water in wet mass 0.10437 kg, nitrogen content 0.0028846, hydrogen content 0.064525, copper content 3.9204e-5, selenium content 3.4694e-6, oxygen content 0.43844, antimony content 5.141e-9, manganese content 0.00010629, chlorine content 0.0080092, lead content 3.2338e-5, cobalt content 1.025e-6, sulfur content 0.0019839, mercury content 3.3642e-7, nickel content 1.188e-5, cadmium content 1.0419e-6, barium content 6.3858e-5, zinc content 7.0713e-5, beryllium content 1.2616e-6, arsenic content 1.3041e-6, chromium content 1.0317e-5, heating value, gross 17.906 MJ, tin content 7.5389e-6, carbon content, non-fossil 0.48376, strontium content 5.0253e-5, dry mass 0.89563 kg, wet mass 1 kg, carbon allocation 0.43327 kg

## Inputs from technosphere
- diesel, burned in building machine: 0.046738 MJ; lognormal variance with pedigree 0.088256, pedigree (1,1,4,1,1)
  for waste distribution and compaction.
  Uncertainty: Uncertainty calculated from uncertainty in base parameters.
  properties: heating value, net 1 MJ
- excavation, skid-steer loader: 0.00031708 m3; lognormal variance with pedigree 0.088256, pedigree (1,1,4,1,1)
  application of daily cover.
  Uncertainty: Uncertainty calculated from uncertainty in base parameters.

## Inputs from nature
- Occupation, dump site [natural resource, land]: 0.0023333 m2*year; lognormal variance with pedigree 0.088256, pedigree (1,1,4,1,1)
  for landfill operation phase and spontaneous renaturation.
  Uncertainty: Uncertainty calculated from uncertainty in base parameters.

## Emissions to nature
- Strontium [water, ground-]: 8.4784e-7 kg; lognormal variance with pedigree 0.34781, pedigree (1,1,4,1,1)
  burden from short-term leachate to groundwater in uncontrolled landfill in moist cimate.
  Uncertainty: Uncertainty calculated from unertainty of the waste composition of this waste, uncertainty in waste decomposition and short-term leaching in landfill
- Copper [air, non-urban air or from high stacks]: 1.5918e-11 kg; lognormal variance with pedigree 0.69872, pedigree (1,1,4,1,1)
  burden from direct release or incineration of landfill biogas; or windblown leachate evaporite in arid climates.
  Uncertainty: Uncertainty calculated from unertainty of the waste composition of this waste, uncertainty in waste decomposition and short-term leaching in landfill
- Beryllium [water, ground-]: 2.1285e-8 kg; lognormal variance with pedigree 0.46913, pedigree (1,1,4,1,1)
  (same comment as for Strontium)
- Cobalt [air, non-urban air or from high stacks]: 2.3903e-11 kg; lognormal variance with pedigree 0.68654, pedigree (1,1,4,1,1)
  (same comment as for Copper)
- Zinc, ion [water, ground-]: 9.7213e-7 kg; lognormal variance with pedigree 0.34229, pedigree (1,1,4,1,1)
  (same comment as for Strontium)
- Cadmium [air, non-urban air or from high stacks]: 3.5467e-10 kg; lognormal variance with pedigree 0.5974, pedigree (1,1,4,1,1)
  (same comment as for Copper)
- Selenium [water, ground-]: 1.0617e-7 kg; lognormal variance with pedigree 0.4198, pedigree (1,1,4,1,1)
  (same comment as for Strontium)
- Arsenic [air, non-urban air or from high stacks]: 9.5291e-10 kg; lognormal variance with pedigree 0.56514, pedigree (1,1,4,1,1)
  (same comment as for Copper)
- Tin, ion [water, ground-]: 1.2892e-8 kg; lognormal variance with pedigree 0.48033, pedigree (1,1,4,1,1)
  (same comment as for Strontium)
- Barium [air, non-urban air or from high stacks]: 5.306e-9 kg; lognormal variance with pedigree 0.50847, pedigree (1,1,4,1,1)
  (same comment as for Copper)
- Antimony [water, ground-]: 1.5733e-10 kg; lognormal variance with pedigree 0.54482, pedigree (1,1,4,1,1)
  (same comment as for Strontium)
- Sulfur dioxide [air, non-urban air or from high stacks]: 7.5131e-5 kg; lognormal variance with pedigree 0.22325, pedigree (1,1,4,1,1)
  burden from direct release or incineration of landfill biogas.
  Uncertainty: Uncertainty calculated from unertainty of the waste composition of this waste, uncertainty in waste decomposition and short-term leaching in landfill
- Lead [water, ground-]: 5.5294e-8 kg; lognormal variance with pedigree 0.43213, pedigree (1,1,4,1,1)
  (same comment as for Strontium)
- Nitrogen oxides [air, non-urban air or from high stacks]: 1.1481e-6 kg; lognormal variance with pedigree 0.19827, pedigree (1,1,4,1,1)
  (same comment as for Sulfur dioxide)
- Nickel, ion [water, ground-]: 2.0043e-7 kg; lognormal variance with pedigree 0.39566, pedigree (1,1,4,1,1)
  (same comment as for Strontium)
- Hydrogen chloride [air, non-urban air or from high stacks]: 8.4366e-5 kg; lognormal variance with pedigree 0.19704, pedigree (1,1,4,1,1)
  (same comment as for Copper)
- Manganese [water, ground-]: 3.5327e-5 kg; lognormal variance with pedigree 0.25688, pedigree (1,1,4,1,1)
  (same comment as for Strontium)
- Mercury [water, ground-]: 6.6877e-9 kg; lognormal variance with pedigree 0.50708, pedigree (1,1,4,1,1)
  (same comment as for Strontium)
- Carbon dioxide, non-fossil [air, non-urban air or from high stacks]: 0.22014 kg; lognormal variance with pedigree 0.008, pedigree (1,1,4,1,1)
  (same comment as for Sulfur dioxide)
- Copper, ion [water, ground-]: 5.5712e-8 kg; lognormal variance with pedigree 0.43165, pedigree (1,1,4,1,1)
  (same comment as for Strontium)
- Methane, non-fossil [air, non-urban air or from high stacks]: 0.10168 kg; lognormal variance with pedigree 0.032929, pedigree (1,1,4,1,1)
  (same comment as for Sulfur dioxide)
- Cobalt [water, ground-]: 9.5612e-8 kg; lognormal variance with pedigree 0.43229, pedigree (1,1,4,1,1)
  (same comment as for Strontium)
- Zinc, ion [water, ground-, long-term]: 6.236e-5 kg; lognormal variance with pedigree 0.26372, pedigree (1,1,4,1,1)
  Emissions from long-term leachate (>100a) directly from MSW landfill and indirectly via incineration of treatement sludge from leachate treatement.
  Uncertainty: Uncertainty calculated depending on waste input and uncertainty of long-term transfer coefficents in landfill.
- Chromium VI [water, ground-]: 3.4127e-8 kg; lognormal variance with pedigree 0.44912, pedigree (1,1,4,1,1)
  (same comment as for Strontium)
- Strontium [water, ground-, long-term]: 4.4161e-5 kg; lognormal variance with pedigree 0.27508, pedigree (1,1,4,1,1)
  (same comment as for Zinc, ion)
- Cadmium, ion [water, ground-]: 5.3201e-8 kg; lognormal variance with pedigree 0.44582, pedigree (1,1,4,1,1)
  (same comment as for Strontium)
- Beryllium [water, ground-, long-term]: 1.1086e-6 kg; lognormal variance with pedigree 0.39641, pedigree (1,1,4,1,1)
  (same comment as for Zinc, ion)
- Arsenic, ion [water, ground-]: 6.7974e-8 kg; lognormal variance with pedigree 0.43804, pedigree (1,1,4,1,1)
  (same comment as for Strontium)
- Tin, ion [water, ground-, long-term]: 6.7392e-6 kg; lognormal variance with pedigree 0.33793, pedigree (1,1,4,1,1)
  (same comment as for Zinc, ion)
- Chloride [water, ground-]: 0.005853 kg; lognormal variance with pedigree 0.11021, pedigree (1,1,4,1,1)
  (same comment as for Strontium)
- Antimony [water, ground-, long-term]: 3.4241e-10 kg; lognormal variance with pedigree 0.90624, pedigree (1,1,4,1,1)
  (same comment as for Zinc, ion)
- Barium [water, ground-]: 2.1224e-5 kg; lognormal variance with pedigree 0.27384, pedigree (1,1,4,1,1)
  (same comment as for Strontium)
- Selenium [water, ground-, long-term]: 6.664e-7 kg; lognormal variance with pedigree 0.50903, pedigree (1,1,4,1,1)
  (same comment as for Zinc, ion)
- Nitrogen, organic bound [water, ground-]: 0.0013036 kg; lognormal variance with pedigree 0.14238, pedigree (1,1,4,1,1)
  (same comment as for Strontium)
- Lead [water, ground-, long-term]: 2.8908e-5 kg; lognormal variance with pedigree 0.28973, pedigree (1,1,4,1,1)
  (same comment as for Zinc, ion)
- Nitrate [water, ground-]: 8.3882e-5 kg; lognormal variance with pedigree 0.14238, pedigree (1,1,4,1,1)
  (same comment as for Strontium)
- Nickel, ion [water, ground-, long-term]: 1.044e-5 kg; lognormal variance with pedigree 0.32293, pedigree (1,1,4,1,1)
  (same comment as for Zinc, ion)
- Nitrite [water, ground-]: 4.3412e-5 kg; lognormal variance with pedigree 0.14238, pedigree (1,1,4,1,1)
  (same comment as for Strontium)
- Mercury [water, ground-, long-term]: 2.9195e-7 kg; lognormal variance with pedigree 0.43898, pedigree (1,1,4,1,1)
  (same comment as for Zinc, ion)
- Ammonium, ion [water, ground-]: 0.00079761 kg; lognormal variance with pedigree 0.14238, pedigree (1,1,4,1,1)
  (same comment as for Strontium)
- Manganese [water, ground-, long-term]: 5.9861e-5 kg; lognormal variance with pedigree 0.25161, pedigree (1,1,4,1,1)
  (same comment as for Zinc, ion)
- Hydrogen sulfide [water, ground-]: 1.5617e-5 kg; lognormal variance with pedigree 0.17978, pedigree (1,1,4,1,1)
  (same comment as for Strontium)
- Copper, ion [water, ground-, long-term]: 3.5057e-5 kg; lognormal variance with pedigree 0.28333, pedigree (1,1,4,1,1)
  (same comment as for Zinc, ion)
- COD, Chemical Oxygen Demand [water, ground-]: 0.0044723 kg; lognormal variance with pedigree 0.105812, pedigree (1,1,4,1,1)
  (same comment as for Strontium)
- Cadmium, ion [water, ground-, long-term]: 8.7957e-7 kg; lognormal variance with pedigree 0.40267, pedigree (1,1,4,1,1)
  (same comment as for Zinc, ion)
- TOC, Total Organic Carbon [water, ground-]: 0.0040889 kg; lognormal variance with pedigree 0.105812, pedigree (1,1,4,1,1)
  (same comment as for Strontium)
- Cobalt [water, ground-, long-term]: 8.2243e-7 kg; lognormal variance with pedigree 0.40332, pedigree (1,1,4,1,1)
  (same comment as for Zinc, ion)
- DOC, Dissolved Organic Carbon [water, ground-]: 0.0040889 kg; lognormal variance with pedigree 0.105812, pedigree (1,1,4,1,1)
  (same comment as for Strontium)
- Chromium VI [water, ground-, long-term]: 3.163e-8 kg; lognormal variance with pedigree 2.3414, pedigree (1,1,4,1,1)
  (same comment as for Zinc, ion)
- BOD5, Biological Oxygen Demand [water, ground-]: 0.0010587 kg; lognormal variance with pedigree 0.105812, pedigree (1,1,4,1,1)
  (same comment as for Strontium)
- Barium [water, ground-, long-term]: 3.5964e-5 kg; lognormal variance with pedigree 0.26857, pedigree (1,1,4,1,1)
  (same comment as for Zinc, ion)
- Sulfate [water, ground-]: 0.00059909 kg; lognormal variance with pedigree 0.17978, pedigree (1,1,4,1,1)
  (same comment as for Strontium)
- Arsenic, ion [water, ground-, long-term]: 1.0991e-6 kg; lognormal variance with pedigree 0.3954, pedigree (1,1,4,1,1)
  (same comment as for Zinc, ion)
- Heat, waste [soil, industrial]: 3.5262 MJ; lognormal variance with pedigree 0.039354, pedigree (1,1,4,1,1)
  burden from short-term decomposition of waste (0-100a).
  Uncertainty: Uncertainty calculated from unertainty of the waste composition of this waste, uncertainty in waste decomposition and short-term leaching in landfill
- Chloride [water, ground-, long-term]: 0.0012382 kg; lognormal variance with pedigree 0.1162, pedigree (1,1,4,1,1)
  (same comment as for Zinc, ion)
- Strontium [air, non-urban air or from high stacks]: 2.1196e-10 kg; lognormal variance with pedigree 0.61474, pedigree (1,1,4,1,1)
  (same comment as for Copper)
- Nitrogen, organic bound [water, ground-, long-term]: 0.00032838 kg; lognormal variance with pedigree 0.15296, pedigree (1,1,4,1,1)
  (same comment as for Zinc, ion)
- Heat, waste [water, ground-, long-term]: 12.104 MJ; lognormal variance with pedigree 0.030912, pedigree (1,1,4,1,1)
  burden from long-term decomposition of waste (>100a).
  Uncertainty: Uncertainty calculated from unertainty of the waste composition of this waste, uncertainty in waste decomposition and short-term leaching in landfill
- Nitrite [water, ground-, long-term]: 1.0935e-5 kg; lognormal variance with pedigree 0.15296, pedigree (1,1,4,1,1)
  (same comment as for Zinc, ion)
- Tin [air, non-urban air or from high stacks]: 3.2229e-12 kg; lognormal variance with pedigree 0.75167, pedigree (1,1,4,1,1)
  (same comment as for Copper)
- Nitrate [water, ground-, long-term]: 2.1129e-5 kg; lognormal variance with pedigree 0.15296, pedigree (1,1,4,1,1)
  (same comment as for Zinc, ion)
- Zinc [air, non-urban air or from high stacks]: 2.1603e-10 kg; lognormal variance with pedigree 0.6139, pedigree (1,1,4,1,1)
  (same comment as for Copper)
- Ammonium, ion [water, ground-, long-term]: 0.00020091 kg; lognormal variance with pedigree 0.15296, pedigree (1,1,4,1,1)
  (same comment as for Zinc, ion)
- Beryllium [air, non-urban air or from high stacks]: 5.3212e-12 kg; lognormal variance with pedigree 0.73606, pedigree (1,1,4,1,1)
  (same comment as for Copper)
- Hydrogen sulfide [water, ground-, long-term]: 0.00011107 kg; lognormal variance with pedigree 0.15417, pedigree (1,1,4,1,1)
  (same comment as for Zinc, ion)
- Antimony [air, non-urban air or from high stacks]: 3.9332e-14 kg; lognormal variance with pedigree 0.8086, pedigree (1,1,4,1,1)
  (same comment as for Copper)
- Sulfate [water, ground-, long-term]: 0.0042609 kg; lognormal variance with pedigree 0.15417, pedigree (1,1,4,1,1)
  (same comment as for Zinc, ion)
- Selenium [air, non-urban air or from high stacks]: 2.6543e-11 kg; lognormal variance with pedigree 0.68357, pedigree (1,1,4,1,1)
  (same comment as for Copper)
- DOC, Dissolved Organic Carbon [water, ground-, long-term]: 0.29289 kg; lognormal variance with pedigree 0.0142852, pedigree (1,1,4,1,1)
  (same comment as for Zinc, ion)
- Lead [air, non-urban air or from high stacks]: 1.8431e-11 kg; lognormal variance with pedigree 0.69426, pedigree (1,1,4,1,1)
  (same comment as for Copper)
- BOD5, Biological Oxygen Demand [water, ground-, long-term]: 0.075836 kg; lognormal variance with pedigree 0.0142852, pedigree (1,1,4,1,1)
  (same comment as for Zinc, ion)
- Manganese [air, non-urban air or from high stacks]: 8.8316e-9 kg; lognormal variance with pedigree 0.49152, pedigree (1,1,4,1,1)
  (same comment as for Copper)
- COD, Chemical Oxygen Demand [water, ground-, long-term]: 0.32034 kg; lognormal variance with pedigree 0.0142852, pedigree (1,1,4,1,1)
  (same comment as for Zinc, ion)
- Mercury [air, non-urban air or from high stacks]: 2.6751e-9 kg; lognormal variance with pedigree 0.53362, pedigree (1,1,4,1,1)
  (same comment as for Copper)
- TOC, Total Organic Carbon [water, ground-, long-term]: 0.29289 kg; lognormal variance with pedigree 0.0142852, pedigree (1,1,4,1,1)
  (same comment as for Zinc, ion)
- Nickel [air, non-urban air or from high stacks]: 5.0108e-11 kg; lognormal variance with pedigree 0.66259, pedigree (1,1,4,1,1)
  (same comment as for Copper)
- Chromium [air, non-urban air or from high stacks]: 8.5318e-12 kg; lognormal variance with pedigree 0.72015, pedigree (1,1,4,1,1)
  (same comment as for Copper)

## Extrapolations
This dataset has been extrapolated from year 2012 to the year of the calculation (2021). The uncertainty has been adjusted accordingly.
