# photovoltaic mounting system production, for slanted-roof installation

Dataset: EcoSpold 2, unit process
Geography: RER
Time period: 1992-01-01 to 2021-12-31
Technology level: current
Classification: EcoSpold01Categories: photovoltaic/production of components
Classification: ISIC rev.4 ecoinvent: 4390:Other specialized construction activities
Tags: ConvertedDataset
Scenario: Business-as-Usual
System model: Allocation, cut-off by classification
Share of production covered: 10 %
Generated by: Niels Jungbluth
Published in: Jungbluth, N. 2008
Database: ecoinvent
isCopyrightProtected: true
accessRestrictedTo: 1

## General comment
Production of the additional components necessary for the mounting of 1 m2 PV panel or laminate.
[This dataset was already contained in the ecoinvent database version 2. It was not individually updated during the transfer to ecoinvent version 3. Life Cycle Impact Assessment results may still have changed, as they are affected by changes in the supply chain, i.e. in other datasets. This dataset was generated following the ecoinvent quality guidelines for version 2. It may have been subject to central changes described in the ecoinvent version 3 change report (http://www.ecoinvent.org/database/ecoinvent-version-3/reports-of-changes/), and the results of the central updates were reviewed extensively. The changes added e.g. consistent water flows and other information throughout the database. The documentation of this dataset can be found in the ecoinvent reports of version 2, which are still available via the ecoinvent website. The change report linked above covers all central changes that were made during the conversion process.]

## Included activities end
Materials and packaging for the production and estimation for metal processing. Disposal of the product after use. Energy use for the construction process must be included in data for the PV-plant.

## Geography
Production in CH.

## Technology
Construction parts for a photovoltaic system.

## Time period
Date of data investigation. Actual weight of materials updated in 2008.

## Reference product
- photovoltaic mounting system, for slanted-roof installation: 1 m2; By-product classification allocatable product; CPC 87360: Installation services of electrical machinery and apparatus n.e.c.
  EcoSpold01Location=RER
  production volume 15805.5 m2
    Not known.
    Estimated from total installed capacity of 3kWp PV plant in 2000: GLO installed PV-power 711MWp (Tab 11.3, ecoinvent v2 report 6_XII). It was assumed that Europe produces 36% of PV capacities (info obtained from Fig 8.1, ecoinvent v2 report 6_XII). An average surface of 28.5 m2 was estimated using information in Tab 11.2 from the same report. And the share between the different types of installation was obtained from Tab 12.7 of the same report. RER shares were used for GLO.
  property price 5.28756 EUR2005
    Calculated based on inputs: The price of the product has been calculated as a sum of the values of the material and energy inputs for this product. This value is therefore a rough estimation. It may underestimate the real price since there are additional expenses when producing any product. These expences can include for example labour costs, treatment of waste materials and profit for the producer. Please consider carefully whether this level of data quality is acceptable for your application.

## By-products
- waste paperboard, unsorted: 0 kg; By-product classification Recyclable; CPC 39240: Waste and scrap of paper or paperboard; pedigree (1,1,1,1,1)
  Calculated with use
  EcoSpold01Location=CH
  Uncertainty: Calculated with use
  production volume 0 kg
    Calculated from the production volume of photovoltaic slanted-roof construction, mounted, on roof in proportion to the respective output amounts.
  property price 0.03924 EUR2005
    Temporary price data. Calculated as 90% of purchasers price based on: Assumed to be 10% less than for sorted waste paperboard
  property carbon content, non-fossil 0.483259
    C content was calculated for 1 kg DM, using data in Tab A.3, ecoinvent v2.2 report 13_I.
  property carbon content 0.483259
    carbon content on a dry matter basis (reserved; not for manual entry)
  properties: heating value, net 15.92 MJ, water in wet mass 0.196 kg, carbon content, fossil 0, water content 0.243781, dry mass 0.804 kg, wet mass 1 kg, carbon allocation 0.38854 kg

## Inputs from technosphere
- sheet rolling, steel: 1.4999 kg; lognormal variance with pedigree 0.202, pedigree (3,4,5,1,3)
  EcoSpold01Location=RER
  Estimation
  Uncertainty: Estimation
- section bar extrusion, aluminium: 3.0312 kg; lognormal variance with pedigree 0.202, pedigree (3,4,5,1,3)
  EcoSpold01Location=RER
  Estimation
  Uncertainty: Estimation
- waste polystyrene isolation, flame-retardant: 0 kg; pedigree (1,1,1,1,1)
  EcoSpold01Location=CH
  Disposal of plastics parts at end of life
  Uncertainty: Disposal of plastics parts at end of life
  production volume 0 kg
    (same comment as for waste paperboard, unsorted)
  properties: dry mass 0.998012 kg, heating value, net 38.67 MJ, water content 0.00199232, carbon content, fossil 0.918145, wet mass 1 kg
  note on carbon content, fossil: Polystyrene isolation (EPS) is flame-retarded with hexa-bromo-cyclo-dodecan (C12H18Br6) and contains 0.67 w% bromine (ecoinvent v2.2 report 13_I, pg 39). The rest is polystyrene: (C8H8)n.
- corrugated board box: 0.13332 kg; lognormal variance with pedigree 0.202, pedigree (3,4,5,1,3)
  EcoSpold01Location=RER
  Schwarz et al. 1992
  Uncertainty: Schwarz et al. 1992
  properties: water content 0.0582011, wet mass 1 kg, dry mass 0.945 kg, carbon content, non-fossil 0.432275, carbon content, fossil 0.000656085, heating value, net 12.86 MJ
  note on carbon content, non-fossil: Biogenic C content was calculated after biogenic C contents of chemicals used in the production of board (Tab 10.15 & 10.16, ecoinvent v2.2 report 11_III, part 10).
  note on carbon content, fossil: Fossil C content was calculated after fossil C contents of chemicals used in the production of board (Tab 10-15 & 10.16 ecoinvent v2.2 report 11_III, part 10)
- steel, low-alloyed, hot rolled: 1.4999 kg; lognormal variance with pedigree 0.1701, pedigree (1,2,5,1,1)
  EcoSpold01Location=RER
  Literature and own estimations
  Uncertainty: Literature and own estimations
  properties: dry mass 1 kg, carbon content, fossil 0.005, wet mass 1 kg
  note on carbon content, fossil: Low alloyed steel composition given in Tab. 3.2 ecoinvent v2.2 report 10_partII. Steel assumed to have a C content of 0.5%
- waste polyethylene/polypropylene product: 0 kg; pedigree (1,1,1,1,1)
  Disposal of plastics parts at end of life
  EcoSpold01Location=CH
  Uncertainty: Disposal of plastics parts at end of life
  production volume 0 kg
    (same comment as for waste paperboard, unsorted)
  properties: water content 0.180638, carbon content, fossil 0.748045, wet mass 1 kg, heating value, net 42.47 MJ, dry mass 0.847 kg
  note on carbon content, fossil: Mixed various plastics was used to estimate the C content of this waste (Tab A.2, ecoinvent v2.2 report 13_I)
- polystyrene, high impact: 0.0070167 kg; lognormal variance with pedigree 0.202, pedigree (3,4,5,1,3)
  EcoSpold01Location=RER
  Schwarz et al. 1992
  Uncertainty: Schwarz et al. 1992
  properties: carbon content, fossil 0.923077, dry mass 1 kg, wet mass 1 kg, heating value, net 38.67 MJ
  note on carbon content, fossil: Chemical formula of polystyrene is (C8H8)n (ecoinvent v2.2 report 11_II)
- polyethylene, high density, granulate: 0.0014033 kg; lognormal variance with pedigree 0.1701, pedigree (1,2,5,1,1)
  Literature and own estimations, recycled PE
  EcoSpold01Location=RER
  Uncertainty: Literature and own estimations, recycled PE
  properties: carbon content, fossil 0.857143, dry mass 1 kg, wet mass 1 kg, heating value, net 42.47 MJ
  note on carbon content, fossil: Polyethylene is formed out of a huge amount of ethylene monomers (C2H4) (ecoinvent v2.2 report 11_II). MW=28 g/mol
- aluminium, wrought alloy: 2.8355 kg; lognormal variance with pedigree 0.1701, pedigree (1,2,5,1,1)
  Literature and own estimations
  EcoSpold01Location=RER
  Uncertainty: Literature and own estimations
  properties: dry mass 1 kg, wet mass 1 kg
- waste paperboard, unsorted: -0.13332 kg; lognormal variance with pedigree 0.202, pedigree (3,4,5,1,3)
  Calculated with use
  EcoSpold01Location=CH
  Uncertainty: Calculated with use
  production volume 2107.19 kg
  properties: heating value, net 15.92 MJ, price 0.03924 EUR2005, carbon content, non-fossil 0.483259, water content 0.243781, dry mass 0.804 kg, wet mass 1 kg
  note on carbon content, non-fossil: C content was calculated for 1 kg DM, using data in Tab A.3, ecoinvent v2.2 report 13_I.
- waste polystyrene isolation, flame-retardant: -0.00681228, -0.000204419 kg (2 entries); lognormal variance with pedigree 0.202, pedigree (3,4,5,1,3)
  (same comment as for waste polystyrene isolation, flame-retardant)
  production volume 110.903 kg
- waste polyethylene/polypropylene product: -0.00136242, -4.08826e-5 kg (2 entries); lognormal variance with pedigree 0.202, pedigree (3,4,5,1,3)
  (same comment as for waste polyethylene/polypropylene product)
  production volume 22.1799 kg

## Sampling procedure
Detailed analysis of materials for one product in a diploma thesis.

## Extrapolations
This dataset has been extrapolated from year 2008 to the year of the calculation (2021). The uncertainty has been adjusted accordingly.

## Review by Christian Bauer 2009-02-15
Passed.
none
