# fishmeal and fish oil production, 63-65% protein, from fresh anchovy and fish residues

Dataset: EcoSpold 2, unit process
Geography: PE
Time period: 2010-01-01 to 2021-12-31
Technology level: current
Classification: ISIC rev.4 ecoinvent: 1020:Processing and preserving of fish, crustaceans and molluscs
Scenario: Business-as-Usual
System model: Allocation, cut-off by classification
Generated by: Avraam Symeonidis
Published in: Avadí, A. 2018
Database: ecoinvent
isCopyrightProtected: true
accessRestrictedTo: 1

## General comment
The activity represents the co-production of fishmeal and fish oil in a reduction plant. The life cycle inventories were produced based on a representative sample of 2 Peruvian plants and their activity.~200 fishmeal plants existed in Peru as of 2016. This activity can be used to modelfishmeal production in other geographies, after substituting the fish provision exchanges.
System boundaries of FMFO production and relations between activities

## Included activities start
From delivery of raw material to the plant, through its Use phase (production), including all upstream activities (e.g. provision of fuels, electricity and chemicals)

## Geography
Representative of Peru and Chile.

## Technology
Production of Fair Average Quality (FAQ) fishmeal (63-65% protein) by indirect drying, residual heavy fuel (R500) powered. Data from one plant representing 8% of the total amount of anchovy processed into FAQ fishmeal (48 430 t/y out of 5.2 million t/y * 12%, in 2008-2010). The technology is common in the country for FAQ fishmeal production.

After arrival of the fishing vessel at the floating terminal, the fish is pumped out of the vessel’s hold and conveyed to the plant mixed with seawater in a proportion close to 1 m3 per t of fish. There the fish is separated from the mix of water, fish residues and blood (bloodwater) through a screw drainer. The drained bloodwater is processed in a rotating screen in order to remove the solid residues (flesh, scale, etc.) that are then conveyed to the “solid line” (described below), and the remaining water is processed first in an oil and solids separator and then in a flotation tank where oil is recuperated thanks to its positive buoyancy. The oil is conveyed to the “liquid line” (described below) whereas the remaining water is discharged at sea through a long underwater pipe (e.g. one-km long). In modern plants, the flotation process is accelerated by the release of fine air bubbles at the bottom of the flotation tank. The remaining bulk of the fish is then conveyed by a wire mesh conveyor belt to an automated weighting hopper and then released into large storage pits. From there fish is conveyed to a cooker using a conveyor, whereas additional bloodwater is processed into a specific trommel. There, a continuous cooking occurs by means of an internal rotary screw conveyor, at a temperature of 95 to 100°C in order to coagulate the proteins. The cooking process is indirect, thanks to steam-heated jacket surrounding the conveyor, but still generates odorous fumes. From the cooker the product is conveyed to strainer (or first to a pre-strainer and then to double helicoid press) that allows draining a mix of oil, protein (dissolved and suspended) and water from the solid mass, thanks to the previous cooking step. From the straining process starts the major separation between the liquid line (oily water or “press liquor") and the solid line (presscake), but with further bridging connections.
The processes in the liquid line consists in a further separation between oil, water and protein coming from different paths. The press liquor, along with the bloodwater, is first transferred by pipe to an oil and liquid separator (or decanter) which is a horizontal centrifuge. After two to three separation phases, the oil and liquid separator returns the remaining solid (sludge) to the solid line whereas the liquid goes to a vertical disk centrifuge. The centrifugation process allows further separation between fish oil and the aqueous phase named “stickwater”. Stickwater is concentrated in a multi-stage (two to four) evaporation unit, prior to enzyme addition aimed at reducing its viscosity. The unit must be cleaned at regular interval, usually using caustic soda, to maintain its thermal efficiency. This is because the evaporator tubes where steam circulates are quickly fouled. The final phase of the liquid line is oil polishing, which is carried out in special separators and facilitated by using hot water, which extracts impurities from the oil (resulting in additional stickwater) and thus ensures stability during storage. This phase ends with the transfer of the stickwater to the evaporation unit and with the pumping of the refined oil into storage.
The presscake along with the sludge from the oil and liquid separator is conveyed first to a wet mill and then to a rotating dryer. As indicated earlier, direct-fire dryers or indirect steam dryers can be used and will result in different qualities of fishmeal. The drying process also generates smells and particles, especially in the case of direct-fire dryers. The raw dry meal (“scrap”) first passes through a sieve to remove large extraneous material mostly collected during the purse-seining operation (wood, rope, plastic residues, etc.). Then the meal is pneumatically conveyed to a cyclonic tower to extract fish meal particles from the drying air. In the sampled plant of FAQ fishmeal, the air emission of the cyclone was processed in a scrubbing tower where water is pulverised in order to limit particles and odours emissions. The fishmeal is then milled in a dry mill. Follows a centrifuging purifier that allows a final elimination of small extraneous material. Finally anti-oxidant is added before automatic weighting and conditioning into plastic bags for distribution.
Steam is produced in a series of boilers and distributed throughout the plant by insulated pipes, forming close circuits in order to save energy. Steam condensate is also returned to the boiler through a piping systems.
The energy source in boilers is either natural gas when available or heavy fuel. In the past fish oil was recycled in boiler burners because its commercial value was very low.
Electricity from the Peruvian grid is used most of the time, except during peak hours (or power breakdowns) where it is supplied by a series of powerful electric generators fuelled by light fuel. This strategy is used to reduce production costs because self-generated energy is cheaper than the grid energy during peak hours.
Process diagram of FMFO production

## Time period
Production figures represent the period 2005-2015, relative production of the three fishmeal types represent the period 2012-2014 (chosen due to an ongoing trend in shifting production from FAQ to Prime), and fishmeal and fish oil yields represent the period 2001-2011. Valid as of 2017.

## Parameters
- antioxidant use: 0.25 kg; name antioxidant_use; triangular min 0.23, mostLikely 0.25, max 0.28, pedigree (1,4,1,1,1)
  Antioxidant use per t of processed raw material
  Uncertainty: Data from one representative plant. Molecule: Cyclohexane
- biological oxygen demand 5 emissions: 17.8 kg; name bod5_emissions; triangular min 16.02, mostLikely 17.8, max 19.58, pedigree (1,4,1,1,1)
  BOD5 emitted to ocean per t of processed raw material
  Uncertainty: Data from one representative plant.
- raw material to fishmeal ratio: 4.9453 kg/kg; name fish_to_fm; = 0.57*5.5+0.43*4.21; triangular min 2.98, mostLikely 4.9453, max 5.66, pedigree (1,1,1,1,1)
  Amount of raw material needed to produce 1000 kg of fishmeal, considering a 43% inclusion of fish residues
  Uncertainty: Based on PRODUCE annual production figures for the period 2001-2011. Considering a 43% inclusion of fresh fish (range 30-50%), which results in a 50:50 ratio in fresh fish and fish residue in the origin of fishmeal, given their different conversion ratios (1:4.21 vs 1:5.5).
- fishmeal bags use: 0.592 kg; name fm_bag_use; triangular min 0.533, mostLikely 0.592, max 0.651, pedigree (1,4,1,1,1)
  Fishmeal bags use per t of processed raw material
  Uncertainty: Data from one representative plant.
- oil and fat emissions: 3.94 kg; name oil_emissions; triangular min 3.55, mostLikely 3.94, max 4.33, pedigree (1,4,1,1,1)
  Oils and fats from raw material emitted to ocean per t of processed raw material
  Uncertainty: Data from one representative plant.
- electricity use: 13.8 kWh; name electricity_use; triangular min 12.4, mostLikely 13.8, max 15.2, pedigree (1,4,1,1,1)
  Electricity use per t of processed raw material
  Uncertainty: Data from one representative plant.
- fuel use: 1913 MJ; name fuel_use; triangular min 1722, mostLikely 1913, max 2104, pedigree (1,4,1,1,1)
  Fuel use per t of processed raw material
  Uncertainty: Data from one representative plant.
- suspended solids emissions: 6.92 kg; name suspended_solids_emissions; triangular min 6.23, mostLikely 6.92, max 7.61, pedigree (1,4,1,1,1)
  Suspended solids from raw material emitted to ocean per t of processed raw material
  Uncertainty: Data from one representative plant.

## Reference product
- fishmeal, 63-65% protein: 1 kg; name production; source Pierre Fréon 2017; By-product classification allocatable product; CPC 21291: Flours, meals and pellets, inedible, of fish, crustaceans, molluscs or other aquatic invertebrates
  Fishmeal from fishmeal and fish oil co-production
  production volume 1.4196e7 kg; name prod_vol; = 1183000000*0.024*0.5
    1.183 million t (24% of world's production) produced per year in Peru in the period 2012-2014, as reported by PRODUCE. 2.4% of fishmeal production was residual in the period. It is further assumed that half of it (50%) is produced using only fish residues as input while the other half is produced by using a mixture of fish residues and raw anchovy.
  property ash content 0.1494 kg; name FMFAQ_ash
    Data for Peruvian anchovies FM
  property carbon content, fossil 0.00106102; name production_C_content_fossil; = antiox_C_fossil*(antiox/(1000-antiox))
    Calculated from the inclusion rate of antioxidant cyclohexane in fishmeal
  property price 1.27239 EUR2005; name production_price_EUR2005
    Calculated value based on data from United Nations Commodity Trade Statistics Database (comtrade.un.org). UN comtrade category: 230120 Flours, meals and pellets; of fish or of crustaceans, molluscs or other aquatic invertebrates. Year 2015. Using exchange rate of 1EURO = 1.209 USD. Average of price of import into 5 main markets (EU, US, IN, JPN and CN).
  property protein content 0.65; name FMFAQ_protein
    Data for Peruvian anchovies FM
  property fat content 0.0819; name FMFAQ_fat
    Data for Peruvian anchovies FM
  property carbon content, non-fossil 0.463843; = (1-FMFAQ_protein-FMFAQ_fat-FMFAQ_ash)*0.444+FMFAQ_protein*0.535+FMFAQ_fat*0.774
    Calculated from C_content = polysaccharids*0.444+protein*0.535+lipids*0.774 and polysaccharids = 1-(protein+lipids+ash)
  property water in wet mass 0.076944 kg; name FM65_water
  property carbon content 0.464904
    carbon content on a dry matter basis (reserved; not for manual entry)
  property true value 1272.39; name production_true_value
    allocation property applied in "true value" allocation // value calculated from revenue
  properties: dry mass 0.916 kg, water content 0.084, wet mass 0.992944 kg, energy content 17.9 MJ, carbon allocation 0.425852 kg

## By-products
- fish oil, from anchovy: 0 kg; name prod_FO; source Pierre Fréon 2017; By-product classification allocatable product; CPC 21525: Fats and oils and their fractions, of fish, other than liver oils; pedigree (1,1,1,1,1)
  Fish oil from the coproduction of fishmeal and fish oil. The ratio between the two co-products is statistically variable.
  Uncertainty: Based on PRODUCE annual production figures for the period 2001-2011
  production volume 2.76e6 kg; = 230000000*0.024*0.5
    230 000 t (23% of world's production) produced per year in Peru in the period 2012-2014, as reported by PRODUCE. 2.4% of fishmeal production was residual in the period. It is further assumed that half of it (50%) is produced using only fish residues as input while the other half is produced by using a mixture of fish residues and raw anchovy.
  property water in wet mass 0 kg; name FO_water
  property protein content 0; name oil_protein
    Data for Peruvian anchovies FO
  property fat content 0.99; name oil_fat
    Data for Peruvian anchovies FO
  property ash content 0.1 kg; name oil_ash
    Data for Peruvian anchovies FO
  property carbon content, non-fossil 0.7263; name FO_CCNF; = (1-oil_protein-oil_fat-oil_ash)*0.444+oil_protein*0.535+oil_fat*0.774
    (same comment as for fishmeal, 63-65% protein)
  property price 2.78243 EUR2005; name prod_FO_price_EUR2005
    Calculated value based on data from United Nations Commodity Trade Statistics Database (comtrade.un.org). UN comtrade category: 150420 Fats and oils and their fractions; of fish, (excluding liver-oils). Year 2015. Using exchange rate of 1EURO = 1.209 USD. Average of price of import into 5 main markets (EU, US, IN, JPN and CN).
  property carbon content 0.7263
    carbon content on a dry matter basis (reserved; not for manual entry)
  property true value 584.311; name prod_FO_true_value
    allocation property applied in "true value" allocation // value calculated from revenue
  properties: energy content 38.6 MJ, water content 0, dry mass 1 kg, wet mass 1 kg, carbon allocation 0.7263 kg

## Inputs from technosphere
- extrusion, plastic film: 0.00200629 kg; = fm_bag_use*fish_to_fm; source Pierre Fréon 2017
  Polypropylene fishmeal bags consumed per t of processed raw material multiplied by the fishmeal yield.
- waste plastic, mixture: -0.00200629 kg; name plastic_w; = (fm_bag_use*fish_to_fm)*-1; source Pierre Fréon 2017
  (same comment as for extrusion, plastic film)
  production volume 41560.5 kg; = ABS(prod_vol*plastic_w/production)
    Calculated from production volume of reference product using the relative outputs.
  property price 0 EUR2005; name plastic_w_price_EUR2005
  properties: dry mass 0.847 kg, heating value, net 30.79 MJ, carbon content, fossil 0.857143, wet mass 1 kg, water content 0.180638
  note on heating value, net: Value taken from the general comment of the treatment dataset.
- polypropylene, granulate: 0.00200629 kg; = fm_bag_use*fish_to_fm; source Pierre Fréon 2017
  (same comment as for extrusion, plastic film)
  property carbon content, fossil 0.857143; name poly_CCF
  properties: heating value, net 32.78 MJ, wet mass 1 kg, dry mass 1 kg
  note on heating value, net: Value extracted from "treatment of waste polypropylene, open burning"
- weaving, synthetic fibre: 0.00200629 kg; = fm_bag_use*fish_to_fm; source Pierre Fréon 2017
  (same comment as for extrusion, plastic film)
  properties: wet mass 1 kg, dry mass 1 kg
- fish residues: 2.1484 kg; name fish_2; = fish_to_fm*1000*((0.57*5.5)/fish_to_fm)
  Residues from fish processing, raw or cooked (57% of raw material)
  property water in wet mass 0.43146 kg; name residues_WWM
  property wet mass 1 kg; name residues_WM
  property energy content 4.01 MJ; name residues_energy_content
  property water content 0.75889; name residues_water_content
  property dry mass 0.56854 kg; name residues_DM
  property protein content 0.18; name residues_protein
  property ash content 0.015 kg; name residues_ash
  property fat content 0.061; name residues_fat_content
  property carbon content, non-fossil 0.47385; name residues_C_content_non_fossil; = (1-residues_protein-residues_fat_content-residues_ash)*0.444+residues_protein*0.535+residues_fat_content*0.774
  note on energy content: Average of 49 fish species, http://www.fao.org/wairdocs/tan/x5916e/x5916e01.htm
  note on ash content: Ash content of fish is between 1-2% of the edible portion, http://www.fao.org/wairdocs/tan/x5916e/x5916e01.htm
  note on carbon content, non-fossil: Calculated from C_content = polysaccharids*0.444+protein*0.535+lipids*0.774 and polysaccharids = 1-(protein+lipids+ash)
- fishmeal plant: 0.003389 unit; = fish_to_fm; source Pierre Fréon 2017
  One unit of plant represents the installed capacity required to process 1 t of raw material, including infrastructure maintenance.;activityLink introduced to establish a direct link to the corresponding regional supply of this product
  properties: capacity [kg] 1000 kg, lifetime 30 year
- electricity, medium voltage: 0.0467681 kWh; = electricity_use*fish_to_fm; source Pierre Fréon 2017
  Electricity use per t of processed raw material multiplied by the fishmeal yield
- heat, district or industrial, other than natural gas: 6.48315 MJ; = fuel_use*fish_to_fm; source Pierre Fréon 2017
  Fuel use per t of processed raw material multiplied by the fishmeal yield
  properties: heating value, net 1 MJ, corresponding fuel use, propane, furnace >100kW 1.05263 MJ
  note on corresponding fuel use, propane, furnace >100kW: Lower heating value of the fuel input related to the heat/electricity output, taken directly from ecoinvent v3.0 dataset "heat production, natural gas, at industrial furnace >100kW, GLO 2000".
- landed anchovy, fresh: 1.24059 kg; name fish_1; = fish_to_fm*1000*((0.43*4.21)/fish_to_fm); source Pierre Fréon 2017
  Fresh anchovy from Eastern Pacific Ocean (EPO), 81% provided by steel industrial fleet (43% of raw material)
  property protein content 0.191; name anch_protein
  property water in wet mass 0.73798 kg; name anch_water
  property fat content 0.088; name anch_fat
  property ash content 0.02 kg; name anch_ash
  properties: carbon content, non-fossil 0.481541, water content 2.81651, wet mass 1 kg, energy content 7.9 MJ, dry mass 0.26202 kg
- cyclohexane: 0.000847249 kg; name antiox; = antioxidant_use*fish_to_fm; source Pierre Fréon 2017
  Antioxidant use per t of processed raw material multiplied by the fishmeal yield
  property carbon content, fossil 0.857143; name antiox_C_fossil
  properties: wet mass 1 kg, dry mass 1 kg, heating value, net 43.22 MJ

## Emissions to nature
- BOD5, Biological Oxygen Demand [water, ocean]: 0.0603241 kg; = bod5_emissions*fish_to_fm; source Pierre Fréon 2017
  BOD5 emitted to ocean per t of processed raw material multiplied by the fishmeal yield
- Oils, non-fossil [water, ocean]: 0.0133526 kg; = oil_emissions*fish_to_fm; source Pierre Fréon 2017
  Oils and fats emitted to ocean per t of processed raw material multiplied by the fishmeal yield
- COD, Chemical Oxygen Demand [water, ocean]: 0.0331783 kg; = (bod5_emissions*fish_to_fm)*0.55; source Pierre Fréon 2017
  Ratio BOD/COD from https://cgi.tu-harburg.de/~awwweb/wbt/emwater/lessons/lesson_a1/lm_pg_1068.html
- DOC, Dissolved Organic Carbon [water, ocean]: 0.0965186 kg; = (bod5_emissions*fish_to_fm)*1.6; source Pierre Fréon 2017
  DOC is assumed to correspond approximately to TOC, following https://dowac.custhelp.com/app/answers/detail/a_id/4219/~/dow-water-and-process-solutions---correlation-between-kmno4%2C-cod%2C-bod%2C-doc-and
- TOC, Total Organic Carbon [water, ocean]: 0.0965186 kg; = (bod5_emissions*fish_to_fm)*1.6; source Pierre Fréon 2017
  Ratio BOD/TOC from https://cgi.tu-harburg.de/~awwweb/wbt/emwater/lessons/lesson_a1/lm_pg_1068.html
- Suspended solids, unspecified [water, ocean]: 0.0234519 kg; = suspended_solids_emissions*fish_to_fm; source Pierre Fréon 2017
  Suspended solids emitted to ocean per t of processed raw material multiplied by the fishmeal yield
- Water [air, low population density, long-term]: 0.0024932 m3; = ((fish_1*anch_water+fish_2*residues_water_content)-(production*FM65_water)-(prod_FO*FO_water))/1000; source Avadí, A. 2018
  Volume of water from raw material emitted to air via evaporation

## Sampling procedure
Data from 2 fishmeal plants, opperated by the largest and one of the other main fish processing companies in the country. These plants are representative of the current technology and management, as determined by interviews with many technical, commercial, academic and governmental representatives.
In Peru, as of 2016 there are 207 fishmeal plants, out of which 37 have cancelled permits.
