# heat production, biomethane, at boiler condensing modulating <100kW

Dataset: EcoSpold 2, unit process
Geography: Europe without Switzerland
Time period: 2000-01-01 to 2021-12-31
Technology level: current
Classification: ISIC rev.4 ecoinvent: 3530:Steam and air conditioning supply
Synonyms: Brennwerttechnik
Tags: ConvertedDataset
Scenario: Business-as-Usual
System model: Allocation, cut-off by classification
Generated by: Avraam Symeonidis
Published in: Faist Emmenegger, M. 2007
Database: ecoinvent
isCopyrightProtected: true
accessRestrictedTo: 1

## General comment
NOx and CO emissions derived from measurements under controlled conditions; no adjustment to real operation made due to lack of information. Other emission data from different references.

## Included activities end
The module includes fuel input from low pressure (CH) network, infrastructure (boiler), emissions to air and water, and electricity needed for operation.

## Geography
Biomethane input and emission data extrapolated to European conditions.

## Technology
Models on market

## Reference product
- heat, central or small-scale, biomethane: 1 MJ; By-product classification allocatable product; CPC 17300: Steam and hot water
  production volume 0.322175 MJ; name apv_heat
    This annual production volume does not reflect a real situation. Data on energy produced from biomethane are not available or are unknown. Yet this activity is known to take place.
  property price 0.0106 EUR2005
    Average European district heat price from Ecoheatcool and Euroheat 2005-2006, Ecoheat Work package 1: The European heat market. Final report. 10.6 EUR/GJ i s the price of district heat. http://www.solarthermalworld.org/files/Ecoheatcool%20WP1%20Web.pdf?download

## Inputs from technosphere
- biomethane, high pressure: 0.0251282 m3; lognormal variance with pedigree 0.05, pedigree (1,1,5,1,1)
  CH module used for RER
  properties: wet mass 0.752 kg, dry mass 0.752 kg, carbon content, non-fossil 0.695496, heating value, net 34.97 MJ
  note on heating value, net: Literature value, Source: United Nations Statistics Division (2018) International Recommendations for Energy Statistics (IRES). Available at: http://unstats.un.org/unsd/statcom/doc11/BG-IRES.pdf.
- electricity, low voltage: 0.0027244 kWh; lognormal variance with pedigree 0.16, pedigree (1,1,5,1,1)
  range of electricity for pumps etc., different literature
- gas boiler: 6.468e-7 unit; lognormal variance with pedigree 0.08, pedigree (1,1,5,1,1)
  uncertainty of life time and extrapolation to range of capacity

## Emissions to nature
- Nitrate [water, surface water]: 1.274e-7 kg; lognormal variance with pedigree 0.34, pedigree (1,1,5,1,1)
  literature, range of values
- Methane, non-fossil [air, urban air close to ground]: 1.96e-6 kg; lognormal variance with pedigree 1.12, pedigree (1,1,5,1,1)
  rough estimate, high uncertainty
- Benzo(a)pyrene [air, urban air close to ground]: 9.8e-12 kg; lognormal variance with pedigree 1.12, pedigree (1,1,5,1,1)
  rough estimate, high uncertainty
- Nitrite [water, surface water]: 2.94e-9 kg; lognormal variance with pedigree 0.34, pedigree (1,1,5,1,1)
  literature, range of values
- Sulfur dioxide [air, urban air close to ground]: 4.9e-7 kg; lognormal variance with pedigree 0.0401, pedigree (1,1,5,3,1)
  composition of natural gas
- Benzene [air, urban air close to ground]: 3.92e-7 kg; lognormal variance with pedigree 1.12, pedigree (1,1,5,1,1)
  rough estimate, high uncertainty
- Sulfate [water, surface water]: 4.9e-8 kg; lognormal variance with pedigree 0.34, pedigree (1,1,5,1,1)
  literature, range of values
- Propionic acid [air, urban air close to ground]: 1.96e-8 kg; lognormal variance with pedigree 1.12, pedigree (1,1,5,1,1)
  rough estimate, high uncertainty
- Toluene [air, urban air close to ground]: 1.96e-7 kg; lognormal variance with pedigree 1.12, pedigree (1,1,5,1,1)
  rough estimate, high uncertainty
- Carbon monoxide, non-fossil [air, urban air close to ground]: 5.782e-6 kg; lognormal variance with pedigree 1.04, pedigree (1,1,5,1,1)
  calculated based on (SVGW 2002)
- Particulates, < 2.5 um [air, urban air close to ground]: 9.8e-8 kg; lognormal variance with pedigree 0.16, pedigree (1,1,5,1,1)
  literature
- Sulfite [water, surface water]: 4.9e-8 kg; lognormal variance with pedigree 0.34, pedigree (1,1,5,1,1)
  literature, range of values
- Dinitrogen monoxide [air, urban air close to ground]: 4.9e-7 kg; lognormal variance with pedigree 1.12, pedigree (1,1,5,1,1)
  rough estimate, high uncertainty
- Formaldehyde [air, urban air close to ground]: 9.8e-8 kg; lognormal variance with pedigree 1.12, pedigree (1,1,5,1,1)
  rough estimate, high uncertainty
- Mercury [air, urban air close to ground]: 2.94e-11 kg; lognormal variance with pedigree 0.69, pedigree (1,1,5,1,1)
  trace element in natural gas
- Nitrogen oxides [air, urban air close to ground]: 9.702e-6 kg; lognormal variance with pedigree 0.45, pedigree (1,1,5,1,1)
  calculated based on (SVGW 2002)
- Dioxins, measured as 2,3,7,8-tetrachlorodibenzo-p-dioxin [air, urban air close to ground]: 0 kg; pedigree (1,1,1,1,1)
  rough estimate, high uncertainty
- Acetic acid [air, urban air close to ground]: 1.47e-7 kg; lognormal variance with pedigree 1.12, pedigree (1,1,5,1,1)
  rough estimate, high uncertainty
- Pentane [air, urban air close to ground]: 1.176e-6 kg; lognormal variance with pedigree 1.12, pedigree (1,1,5,1,1)
  rough estimate, high uncertainty
- PAH, polycyclic aromatic hydrocarbons [air, urban air close to ground]: 9.8e-9 kg; lognormal variance with pedigree 1.12, pedigree (1,1,5,1,1)
  rough estimate, high uncertainty
- Acetaldehyde [air, urban air close to ground]: 9.8e-10 kg; lognormal variance with pedigree 1.12, pedigree (1,1,5,1,1)
  rough estimate, high uncertainty
- Propane [air, urban air close to ground]: 1.96e-7 kg; lognormal variance with pedigree 1.12, pedigree (1,1,5,1,1)
  rough estimate, high uncertainty
- Butane [air, urban air close to ground]: 6.86e-7 kg; lognormal variance with pedigree 1.12, pedigree (1,1,5,1,1)
  rough estimate, high uncertainty
- Carbon dioxide, non-fossil [air, urban air close to ground]: 0.05488 kg; lognormal variance with pedigree 0.0401, pedigree (1,1,5,3,1)
  composition of biomethane

## Sampling procedure
Literature, manufacturers; CO and NOx emissions from (SVGW 2002), sample size (number of selected devices for which emission values are given in SVGW list): CO 402 , NOx 402 .

## Extrapolations
This dataset has been extrapolated from year 2000 to the year of the calculation (2021). The uncertainty has been adjusted accordingly.
