# maintenance, tram

Dataset: EcoSpold 2, unit process
Geography: RoW
Time period: 2000-01-01 to 2021-12-31
Technology level: current
Classification: ISIC rev.4 ecoinvent: 3315:Repair of transport equipment, except motor vehicles
Classification: EcoSpold01Categories: transport systems/road
Tags: ConvertedDataset
Scenario: Business-as-Usual
System model: Allocation, cut-off by classification
Generated by: Michael Spielmann (obsolete)
Published in: Spielmann M. 2004
Database: ecoinvent
isCopyrightProtected: true
accessRestrictedTo: 1

## General comment
For energy data, yearly energy consumption figures from selected service garages of Swiss transport companies is employed. The data is presented for a life span of a tram of 30 years.
[This dataset was already contained in the ecoinvent database version 2. It was not individually updated during the transfer to ecoinvent version 3. Life Cycle Impact Assessment results may still have changed, as they are affected by changes in the supply chain, i.e. in other datasets. This dataset was generated following the ecoinvent quality guidelines for version 2. It may have been subject to central changes described in the ecoinvent version 3 change report (http://www.ecoinvent.org/database/ecoinvent-version-3/reports-of-changes/), and the results of the central updates were reviewed extensively. The changes added e.g. consistent water flows and other information throughout the database. The documentation of this dataset can be found in the ecoinvent reports of version 2, which are still available via the ecoinvent website. The change report linked above covers all central changes that were made during the conversion process.]

## Included activities end
The inventory includes materials energy and resource consumption of garages. Rail and road transport of materials is accounted for

## Geography
Data represent Swiss conditions

## Technology
no technologies are specified

## Parameters
- fraction, process water, to air: 0.15 dimensionless; name fraction_PW_to_air; lognormal variance with pedigree 0.092025, pedigree (4,4,3,2,4)
- fraction, tap water, to air: 0.15 dimensionless; name fraction_TW_to_air; lognormal variance with pedigree 0.092025, pedigree (4,4,3,2,4)

## Reference product
- maintenance, tram: 1 unit; CPC 87149: Maintenance and repair services of other transport equipment; By-product classification allocatable product
  EcoSpold01Location=CH
  production volume 3.96633 unit
    This is a placeholder value that does not reflect real-world production volumes. This dataset does not currently require a real-world production volume to work in the database framework, and no actual data were collected yet. This has no negative effect on the results of the ecoinvent database.
  property price 24232.2 EUR2005
    Calculated based on inputs: The price of the product has been calculated as a sum of the values of the material and energy inputs for this product. This value is therefore a rough estimation. It may underestimate the real price since there are additional expenses when producing any product. These expences can include for example labour costs, treatment of waste materials and profit for the producer. Please consider carefully whether this level of data quality is acceptable for your application.

## Inputs from technosphere
- wastewater, average: 0 m3; pedigree (1,1,1,1,1)
  EcoSpold01Location=CH
  calculated from the used tap water
  production volume 0 m3
    Calculated from the production volume of maintenance, tram in proportion to the respective output amounts.
  properties: carbon content, non-fossil 0.194039, dry mass 0.346837 kg, water content 2882.2, wet mass 1000 kg
  note on carbon content, non-fossil: 0.0673 kg TOC/m3 (Tab A.17, ecoinvent v2.2 report 13_I). TOC was considered as Total Carbon.
- heat, district or industrial, other than natural gas: 0 MJ; pedigree (1,1,1,1,1)
  EcoSpold01Location=RER
  Derived from yearly consumption of service garages from public transport companies in Switzerland.
  properties: heating value, net 1 MJ
- electricity, medium voltage: 0 kWh; pedigree (1,1,1,1,1)
  EcoSpold01Location=CH
  Derived from yearly consumption of service garages from public transport companies in Switzerland.
- sand: 0 kg; pedigree (1,1,1,1,1)
  Derived from yearly consumption of service garages from public transport companies in Switzerland.
  EcoSpold01Location=CH
  properties: wet mass 1 kg, dry mass 1 kg
- heat, district or industrial, natural gas: 0 MJ; pedigree (1,1,1,1,1)
  (same comment as for heat, district or industrial, other than natural gas)
  properties: heating value, net 1 MJ
- tap water: 0 kg; name tap_water_input; pedigree (1,1,1,1,1)
  EcoSpold01Location=CH
  Calculated value. Figures are derived from service garages in Bern (Switzerland).
  properties: water content 2962.17, carbon content, fossil 0.00178991, dry mass 0.000337476 kg, wet mass 1 kg
  note on carbon content, fossil: Bicarbonate content is 2.93 mol/m3. CO2 content is 0.1 mol/m3 (ecoinvent v2.2 report 8, Tab 93.1).
- wastewater, average: -375.136, -784.864 m3 (2 entries); lognormal variance with pedigree 0.132, pedigree (1,1,5,5,1)
  EcoSpold01Location=CH
  calculated from the used tap water
  production volume 3480 m3
- heat, district or industrial, other than natural gas: 84.9483, 5129.58, 209485 MJ (3 entries); lognormal variance with pedigree 0.132, pedigree (1,1,5,5,1)
  (same comment as for heat, district or industrial, other than natural gas)
- electricity, medium voltage: 1912.26, 366.689, 8419.75, 27876.3, 6155.94, 89532.6, 12619.7, 41116.8 kWh (8 entries); lognormal variance with pedigree 0.132, pedigree (1,1,5,5,1)
  (same comment as for electricity, medium voltage)
- sand: 1588.96, 8.24913, 103403 kg (3 entries); lognormal variance with pedigree 0.132, pedigree (1,1,5,5,1)
  (same comment as for sand)
- heat, district or industrial, natural gas: 2389.64, 57260.5, 155050 MJ (3 entries); lognormal variance with pedigree 0.132, pedigree (1,1,5,5,1)
  (same comment as for heat, district or industrial, other than natural gas)
- tap water: 10839.2, 1304.75, 2156.31, 463662, 54373.7, 1414.52, 4023.57, 622226 kg (8 entries); lognormal variance with pedigree 0.132, pedigree (1,1,5,5,1)
  (same comment as for tap water)

## Emissions to nature
- NMVOC, non-methane volatile organic compounds, unspecified origin [air, unspecified]: 302 kg
  Derived from yearly consumption of service garages from public transport companies in Switzerland.
- Water [air, unspecified]: 174 m3; name water_to_air_unspecified; lognormal variance with pedigree 0.0827, pedigree (2,2,5,5,1)
  Calculated value based on literature values and expert opinion. See comments in the parametres' comment field.
  property fraction, origin: fresh water 1; name fraction_origin_fresh_water
  property fraction, origin: salt water 0; name fraction_origin_salt_water
  property fraction, origin: unspecified 0; name fraction_origin_unspecified

## Sampling procedure
Data, is based on a brief survey of public transport companies.

## Extrapolations
none This dataset has been copied from an original dataset covering the geography CH. The uncertainty has been adjusted accordingly.

## Review by Niels Jungbluth 2004-04-02
Passed.
