# solder production, bar, Sn95.5Ag3.9Cu0.6, for electronics industry

Dataset: EcoSpold 2, unit process
Geography: GLO
Time period: 2005-01-01 to 2021-12-31
Technology level: current
Classification: ISIC rev.4 ecoinvent: 2029:Manufacture of other chemical products n.e.c.
Classification: EcoSpold01Categories: metals/extraction
Tags: ConvertedDataset
Scenario: Business-as-Usual
System model: Allocation, cut-off by classification
Generated by: Roland Hischier
Published in: Hischier R. 2007
Database: ecoinvent
isCopyrightProtected: true
accessRestrictedTo: 1

## General comment
This dataset represents the production of 1 kg of solder bar of the type SAC396. It is based on a SnAgCu solder with 95.5% Sn, 3.9% Ag and the remaining 0.6% Cu. Information represent current solder materials used in the electronics industry. Data are taken from literature (report from a European research project in the field of lead-free soldering). Infrastructure are based on own assumptions.
[This dataset was already contained in the ecoinvent database version 2. It was not individually updated during the transfer to ecoinvent version 3. Life Cycle Impact Assessment results may still have changed, as they are affected by changes in the supply chain, i.e. in other datasets. This dataset was generated following the ecoinvent quality guidelines for version 2. It may have been subject to central changes described in the ecoinvent version 3 change report (http://www.ecoinvent.org/database/ecoinvent-version-3/reports-of-changes/), and the results of the central updates were reviewed extensively. The changes added e.g. consistent water flows and other information throughout the database. The documentation of this dataset can be found in the ecoinvent reports of version 2, which are still available via the ecoinvent website. The change report linked above covers all central changes that were made during the conversion process.]

## Included activities start
From reception of metals at the factory gate.

## Included activities end
This dataset includes raw material input, energy consumption and emissions (air), as well as an estimation of the efforts for transportation and of the infrastructure for the production of solder bar.

## Geography
Data represent global valid composition data for Pb-free solder bar, used in the electronics industry.

## Technology
Typical solder material for the electronics industry. Production through melting process out of respective metals. Data based on literature.

## Reference product
- solder, bar, Sn95.5Ag3.9Cu0.6, for electronics industry: 1 kg; By-product classification allocatable product; CPC 42950: Wire, rods, tubes, plates, electrodes and similar products, of base metal or of metal carbides, coated or core[…]
  EcoSpold01Location=GLO
  A soldering material or a solder is a fusible metal alloy, with a melting point or melting range of 180-190°C (360-370 °F), which is melted to join metallic surfaces, especially in the fields of electronics and plumbing, in a process called soldering.
  production volume 1 kg
    Dummy value to be replaced by measured, estimated or calculated value
  property price 22.3625 EUR2005
    Calculated based on inputs: The price of the product has been calculated as a sum of the values of the material and energy inputs for this product. This value is therefore a rough estimation. It may underestimate the real price since there are additional expenses when producing any product. These expences can include for example labour costs, treatment of waste materials and profit for the producer. Please consider carefully whether this level of data quality is acceptable for your application.
  property carbon content 0
    carbon content on a dry matter basis (reserved; not for manual entry)
  properties: carbon content, non-fossil 0, carbon content, fossil 0, wet mass 1 kg, water content 0, dry mass 1 kg, water in wet mass 0 kg, carbon allocation 0 kg

## Inputs from technosphere
- heat, district or industrial, natural gas: 2.541 MJ; source Alvarado Ascencio C. 2005; lognormal variance with pedigree 0.0513, pedigree (2,3,5,3,1)
  Literature Value.
  EcoSpold01Location=RER
  Uncertainty: data from literature
  properties: heating value, net 1 MJ
- electricity, medium voltage: 0.161 kWh; source Alvarado Ascencio C. 2005; lognormal variance with pedigree 0.0513, pedigree (2,3,5,3,1)
  Literature Value.
  EcoSpold01Location=UCTE
  Uncertainty: data from literature
- aluminium casting facility: 4.725e-11 unit; lognormal variance with pedigree 0.5761, pedigree (4,5,5,3,5)
  Proxy, due to a lack of specific information, the infrastructure module for aluminium casting is used.
  EcoSpold01Location=RER
  Uncertainty: rough estimation of infrastructure
- copper, cathode: 0.006 kg; source Alvarado Ascencio C. 2005; lognormal variance with pedigree 0.0513, pedigree (2,3,5,3,1)
  Literature Value.
  EcoSpold01Location=RER
  Uncertainty: data from literature
  properties: dry mass 1 kg, wet mass 1 kg
- tin: 0.955 kg; source Alvarado Ascencio C. 2005; lognormal variance with pedigree 0.0513, pedigree (2,3,5,3,1)
  Literature Value.
  EcoSpold01Location=RER
  Uncertainty: data from literature
  properties: dry mass 1 kg, wet mass 1 kg
- silver: 0.039 kg; source Alvarado Ascencio C. 2005; lognormal variance with pedigree 0.0513, pedigree (2,3,5,3,1)
  Literature Value.
  EcoSpold01Location=RER
  Uncertainty: data from literature
  properties: wet mass 1 kg, dry mass 1 kg

## Emissions to nature
- Particulates, > 10 um [air, urban air close to ground]: 3.473e-6 kg; source Alvarado Ascencio C. 2005; lognormal variance with pedigree 0.3513, pedigree (2,3,5,3,1)
  Literature Value.
  Uncertainty: data from literature
- Particulates, > 2.5 um, and < 10um [air, urban air close to ground]: 7.8143e-6 kg; source Alvarado Ascencio C. 2005; lognormal variance with pedigree 0.3513, pedigree (2,3,5,3,1)
  Literature Value.
  Uncertainty: data from literature
- Tin [air, urban air close to ground]: 2.8e-7 kg; source Alvarado Ascencio C. 2005; lognormal variance with pedigree 0.0913, pedigree (2,3,5,3,1)
  Literature Value.
  Uncertainty: data from literature
- Particulates, < 2.5 um [air, urban air close to ground]: 6.0777e-6 kg; source Alvarado Ascencio C. 2005; lognormal variance with pedigree 0.3513, pedigree (2,3,5,3,1)
  Literature Value.
  Uncertainty: data from literature

## Sampling procedure
own estimation

## Extrapolations
This dataset has been extrapolated from year 2005 to the year of the calculation (2021). The uncertainty has been adjusted accordingly.

## Review by Rolf Frischknecht 2007-09-14
passed
