# ammonia production, steam reforming, liquid

Dataset: EcoSpold 2, unit process
Geography: RER w/o RU
Time period: 2011-01-01 to 2021-12-31
Technology level: current
Classification: ISIC rev.4 ecoinvent: 2012:Manufacture of fertilizers and nitrogen compounds
Synonyms: Nitrogen trihydride; Hydrogen nitride; Trihydridonitrogen
Scenario: Business-as-Usual
System model: Allocation, cut-off by classification
Generated by: Anna Kounina
Database: ecoinvent
isCopyrightProtected: true
accessRestrictedTo: 1

## General comment
This dataset represents the production of 1 kg of liquid ammonia (100% NH3) using the steam reforming process. About 85% of the world ammonia production is using this technology. Ammonia is a colourless gas with a penetrating, pungent suffocating odour. It is liquid when under pressure. It is hygroscopic and soluble in water (89.9 g/L at 0°C).
The most important use for ammonia is as a supply of vital agricultural nitrogen for crops. It is either applied as a fertiliser directly or it is used as a feedstock in the manufacture of urea, ammonium nitrate or nitric acid. The industrial use of ammonia as a nitrogen source has consumed an increasingly greater share of total ammonia production, amounting now to about 20% of world output. Virtually all nitrogen used in the chemical industry enters the process as ammonia. The major uses of industrial ammonia-nitrogen , in part after conversion into nitric acid, are the manufacture of plastics and fibres. Other important applications are the manufacture of explosives, hydrazine, amines, amides, nitriles, and other organic nitrogen compounds serving as intermediates for dyes and pharmaceuticals. The most important products manufactured from ammonia are nitric acid, urea, sodium cyanide and sodium carbonate.
Ammonia is used in the area of environmental protection to remove SO2 and NOx from steam boiler flue gases. The resulting ammonium sulphate (and sometimes ammonium nitrate) is marketed as a fertiliser product. Liquid ammonia has a considerable importance as a solvent. Ammonia is also used in the nitriding of steel. It is also still used as a refrigerant in industrial and commercial refrigeration and air-conditioning installations.
Ammonia is an inexpensive and easily managed starting material for manufacturing protective gas mixtures for chemical products and for metal-working processes. It is also used for manufacturing hydrogen and is even proposed for use in energy-related applications.
In this process, sulfur content of naturag gas is catalysed in a molybdenum (or other) catalyst with the addition of zinc oxide. This specific part of air pollution control (APC) is not taken into account in this dataset. A user should consider modelling the appropriate catalyst as no sulfur emissions are taken into account as well.
The process generates 1.44 kg of CO2 per kg of NH3. Ammonia production takes the full burden of this CO2 as an emission to the environment. In certain regions urea plants are located adjacent to ammonia plants where part of this CO2 is fed into the urea production. Therefore, urea production takes the relevant CO2 credit in the form of a negative CO2 emission. The process assumes 1% of this CO2 as by-product in ammonia.
The main data sources for this dataset are Fertilizers Europe (2014, 2016). Additional data sources are listed as follows.
References:
Fertilizers Europe (2000): Best Available Techniques for Pollution Prevention and Control in the European Fertilizer Industry. Booklet No. 1 of 8: Production of Ammonia. Fertilizers Europe, Brussels.
Kongshaug G. (1998): Energy Consumption and Greenhouse Gas Emissions in Fertilizer Production. IFA 20th July 1998
Davies J., Haglund C. (1999): Life Cycle Inventory of Fertiliser Production. SIK-Report No 654 1999. Chalmers University of Technology, Sweden.
Fertilizers Europe (2014): Average Emissions Year 2011. Fertilizers Europe Environmental report (internal).
Fertilizers Europe (2016): Carbon Footprint Calculator for Fertilizer Production. Specification. Version 2.1
Fertilizers Europe (2016): Average Emissions Year 2014. Fertilizers Europe Environmental report (internal). Used for updated energy and GHG emission in Carbon Footprint Calculator
Phillip Townsend Associates Inc. (2016): Ammonia Plant Energy Efficiency and CO2 Emissions Benchmarking 2013-2014. Internal report for Fertilizers Europe.
Integer Research (2016): Regional N2O and CO2emissions from ammonia and nitric acid production 2014. Internal report for Fertilizers Europe.
Althaus H.-J., Chudacoff M., Hischier R., Jungbluth N., Osses M. and Primas A. (2007) Life Cycle Inventories of Chemicals. ecoinvent report No. 8, v2.0. EMPA Dübendorf, Swiss Centre for Life Cycle Inventories, Dübendorf, CH.
[This dataset is meant to replace the following datasets:
- ammonia production, steam reforming, liquid, RER, 2011 - 2014]

## Included activities start
The activity includes all the raw and processed materials necessary to produce this product. Natural gas as feedstock and fuel, water, heat and electricity are included, covering the following steps: desulphurization, primary production, secondary reforming, shift conversion, CO2 removal, methanation, synthesis gas compression and ammonia synthesis. Direct emissions include nitrogen to water, nitrogen oxides to air and carbon dioxide to air. It is assumed, that all carbon dioxide is emitted to air, except if ammonia is later used for urea production. In this case, state-of-the-art industrial practice is that carbon dioxide originating from ammonia production is directly used as feedstock for urea production. The dataset does not include the catalyst for the desulfurisation step in the air pollution control system.

## Included activities end
The activity ends with the final product being ready for transportation at the production site.

## Geography
The dataset is representative of ammonia production in Europe.

## Technology
This datasets corresponds to the technology used in European ammonia plants with natural gas based fuel and feedstock. The most efficient way of ammonia synthesis gas production is natural gas reforming with steam and air. The ammonia production process consists of several steps: desulphurization, primary production, secondary reforming, shift conversion, CO2 removal, methanation, synthesis gas compression and ammonia synthesis.

## Time period
Primary data were collected on fertiliser production for the year 2013-2014. These data were based on annual average data based on different production plants.

## Reference product
- ammonia, anhydrous, liquid: 0 kg; name RP; CPC 34651: Ammonia, anhydrous; By-product classification allocatable product; CAS 7664-41-7
  production volume 2.05661e10 kg; name PVRP
    Kg/y, International Fertilizers Association (2014).
  property price 0.333 EUR2005; name RP_price_EUR2005
    Data related to the price of nitric acid were provided by Yara International (https://www.yara.com/)
  property hydrogen content 0.177547
    Hydrogen content (on a dry matter basis) of ammonia, anhydrous, liquid is calculated from the molecular formula of the substance (H3N).
  property nitrogen content 0.822453
    Nitrogen content (on a dry matter basis) of ammonia, anhydrous, liquid is calculated from the molecular formula of the substance (H3N).
  property carbon content, fossil 0
    Carbon content, fossil is calculated based on the chemical formula of the substance.
  property carbon content 0
    carbon content on a dry matter basis (reserved; not for manual entry)
  property true value 0.333; name RP_true_value
    allocation property applied in "true value" allocation // value calculated from revenue
  properties: water in wet mass 0 kg, dry mass 1 kg, water content 0, wet mass 1 kg, carbon content, non-fossil 0, carbon allocation 0 kg
- steam, in chemical industry: 1 kg; name BPS; CPC 17300: Steam and hot water; By-product classification allocatable product; CAS 7732-18-5; pedigree (1,1,1,1,1)
  Data from Fertilizer Europe (2016).
  production volume 1.11431e10 kg; = PVRP*BPS/RP
    Calculated based on the production volume of the reference product.
  property price 0.015 EUR2005; name BPS_price_EUR2005
    Data related to the price of steam were provided by Yara International (https://www.yara.com/)
  property carbon content 0
    carbon content on a dry matter basis (reserved; not for manual entry)
  property true value 0.00812727; name BPS_true_value
    allocation property applied in "true value" allocation // value calculated from revenue
  properties: wet mass 1 kg, water in wet mass 0 kg, carbon content, fossil 0, water content 0, carbon content, non-fossil 0, dry mass 1 kg, carbon allocation 0 kg

## By-products
- carbon dioxide, in chemical industry: 0 kg; name BPCO2; By-product classification allocatable product; CPC 34210: Hydrogen, nitrogen, oxygen, carbon dioxide and rare gases; inorganic oxygen compounds of non-metals n.e.c.; CAS 124-38-9; pedigree (1,1,1,1,1)
  Amount of CO2 that is captured and can be further utilised in the chemical industry. It is assumed that this BP has a zero price and it is here for traceability reasons of carbon.
  production volume 2.96152e8 kg; = PVRP*BPCO2/RP
    Calculated based on the production volume of the reference product.
  property price 0 EUR2005; name BPCO2_price_EUR2005
    No price assigned.
  property oxygen content 0.727088
    Oxygen content (on a dry matter basis) of carbon dioxide, in chemical industry is calculated from the molecular formula of the substance (CO2).
  property carbon content, fossil 0.272912
    Carbon content (on a dry matter basis) of carbon dioxide, in chemical industry is calculated from the molecular formula of the substance (CO2).
  property heating value, net 8.27 MJ
    LHV is calculated based on the elemental composition of the substance. Based on the name of the substance, the formula is found manually.
  property carbon content 0.272912
    carbon content on a dry matter basis (reserved; not for manual entry)
  property true value 0; name BPCO2_true_value
    allocation property applied in "true value" allocation // value calculated from revenue
  properties: water content 0, water in wet mass 0 kg, wet mass 1 kg, carbon content, non-fossil 0, dry mass 1 kg, carbon allocation 0.272912 kg

## Inputs from technosphere
- heat, district or industrial, natural gas: 0.448513 MJ; lognormal variance with pedigree 0.0413, pedigree (2,2,5,1,1)
  Calculation, based on Fertilizer Europe (2016).
  properties: heating value, net 1 MJ
- tap water: 0.0317037 kg; lognormal variance with pedigree 0.0413, pedigree (2,2,5,1,1)
  Calculation, based on Fertilizer Europe (2014).
  properties: carbon content, fossil 0.00178991, water content 2962.17, dry mass 0.000337476 kg, wet mass 1 kg
  note on carbon content, fossil: Bicarbonate content is 2.93 mol/m3. CO2 content is 0.1 mol/m3 (ecoinvent v2.2 report 8, Tab 93.1).
- municipal solid waste: 0 kg; name BP; pedigree (1,1,1,1,1)
  Estimation, based on various data sources (Althaus et al. 2007).
  production volume 0 kg
    Calculated based on the production volume of the reference product.
  property price 0 EUR2005; name BP_price_EUR2005
  properties: wet mass 1 kg, carbon content, fossil 0.171549, water content 0.297017, heating value, net 11.74 MJ, dry mass 0.771 kg, carbon content, non-fossil 0.261655
  note on carbon content, fossil: MSW composition in tab 4.1, ecoinvent v2.2 report 13_I. C content referred to 1 kg DM
  note on heating value, net: Value taken from the general comment of the treatment dataset.
- solvent, organic: 1.31916e-6 kg; lognormal variance with pedigree 0.0413, pedigree (2,2,5,1,1)
  Estimation, based on various data sources (Althaus et al. 2007).
  properties: carbon content, fossil 0.63072, wet mass 1 kg, dry mass 1 kg, heating value, net 19.11 MJ
- electricity, low voltage: 0 kWh; pedigree (1,1,1,1,1)
  Calculation, based on Fertilizer Europe (2016).
- natural gas, high pressure: 0 m3; pedigree (1,1,1,1,1)
  Calculation, based on Fertilizer Europe (2016). Density of natural gas is 0.84 kg/m3.
  properties: wet mass 0.84 kg, carbon content, fossil 0.602381, dry mass 0.84 kg, heating value, net 39 MJ
  note on carbon content, fossil: An average C content of 0.506 kg C/ m3 has been assumed (this average has been calculated using data in Tab 3.5, ecoinvent v2.2 report 6_V
  note on heating value, net: Literature value, Source: United Nations Statistics Division (2018) International Recommendations for Energy Statistics (IRES). Available at: http://unstats.un.org/unsd/statcom/doc11/BG-IRES.pdf.
- nickel, class 1: 1.53902e-5 kg; lognormal variance with pedigree 0.0413, pedigree (2,2,5,1,1)
  Estimation, based on various data sources (Althaus et al. 2007).
  properties: dry mass 1 kg, wet mass 1 kg
- chemical factory, organics: 1.75887e-11 unit; lognormal variance with pedigree 0.3407, pedigree (2,2,5,1,1)
  Estimation, based on various data sources (Althaus et al. 2007).
- municipal solid waste: -8.79437e-6 kg; lognormal variance with pedigree 0.0413, pedigree (2,2,5,1,1)
  Estimation, based on various data sources (Althaus et al. 2007).
  production volume 4.11322e6 kg
- electricity, low voltage: 9.63919e-5, 2.42408e-5, 0.000420042, 1.76931e-5, 0.00970173 kWh (5 entries); lognormal variance with pedigree 0.0413, pedigree (2,2,5,1,1)
  Calculation, based on Fertilizer Europe (2016).
- natural gas, high pressure: 0.0273061, 0.000176304 m3 (2 entries); lognormal variance with pedigree 0.0413, pedigree (2,2,5,1,1)
  Calculation, based on Fertilizer Europe (2016). Density of natural gas is 0.84 kg/m3.

## Inputs from nature
- Water, cooling, unspecified natural origin [natural resource, in water]: 0.00615606 m3; lognormal variance with pedigree 0.0413, pedigree (2,2,5,1,1)
  Estimation, based on various data sources (Althaus et al. 2007).

## Emissions to nature
- Nitrogen [water, surface water]: 5.27662e-6 kg; lognormal variance with pedigree 0.0807, pedigree (2,2,5,1,1)
  Data from Fertilizer Europe (2014).
- Nitrogen oxides [air, urban air close to ground]: 3.07803e-5 kg; lognormal variance with pedigree 0.0807, pedigree (2,2,5,1,1)
  Data from Fertilizer Europe (2014).
- Water [water, surface water]: 0.00380205 m3; lognormal variance with pedigree 0.0807, pedigree (2,2,5,1,1)
  Estimation, based on various data sources (Althaus et al. 2007).
- Water [air, unspecified]: 0.00239207 m3; lognormal variance with pedigree 0.0807, pedigree (2,2,5,1,1)
  Estimation, based on various data sources (Althaus et al. 2007).
- Carbon dioxide, fossil [air, urban air close to ground]: 0.0633195 kg; name CO2; lognormal variance with pedigree 0.0413, pedigree (2,2,5,1,1)
  Amount of CO2 that is not captured and subsequently emitted to air.
