# carbon fibre reinforced plastic, injection moulded

Dataset: EcoSpold 2, unit process
Geography: GLO
Time period: 2016-01-01 to 2021-12-31
Technology level: current
Classification: EcoSpold01Categories: plastics/others
Classification: ISIC rev.4 ecoinvent: 2220:Manufacture of plastics products
Synonyms: CFRP; Aircraft composite
Scenario: Business-as-Usual
System model: Allocation, cut-off by classification
Generated by: Philippa Notten
Published in: Notten, P.J. 2018
Database: ecoinvent
isCopyrightProtected: true
accessRestrictedTo: 1

## General comment
The dataset represents the production of one kilogram of carbon fibre reinforced plastic for use in aircraft manufacture. The data is based on information presented as part of the supplementary information of Cox et al. (2018).
Carbon fibre reinforced plastic (CFRP) is a structural material formed from extremely thin carbon fibres in a polymeric matrix. The composite has high tensile strength, low thermal expansion and a very high strength-to-weight ratio. These properties have made it an important structural material in the aircraft manufacturing industry (Uhlmann et al., 2014; Pramanik et al., 2017).
The material and energy required for the production of carbon fibres is considered, along with the waste and environmental emissions released by this process. Transformation of these fibres into carbon fibre reinforced plastics, as used in aircraft manufacture are then considered (Cox et al., 2018).
This activity was created as an input for the aircraft production activities.
Reference: Cox, B., Jemiolo, W. & Mutel, C. (2018) Life cycle assessment of air transport and the Swiss commercial air transport fleet. Transport Research Part D. 58. 1-13 Uhlmann, E., Sammler, F., Richarz, S., Heitmuller, F. & Bilz, M. (2014) Machining of Carbon Fibre Reinforced Plastics. New Production Technologies in the Aerospace Industry - 5th Machining Innovations Conference (MIC 2014). Procedia CIRP 24. 19-24 Pramanik, A., Basak, A., Dong, Y., Sarker, P., Uddin, M., Littlefair, G., Dixit, A. & Chattopadhyaya, S. (2017) Joining of carbon fibre reinforced polymer (CFRP) composites and aluminium alloys - A review. Composites Part A: Applied Science and Manufacturing. 101. 1-29

## Included activities start
Carbon fibre production, starting with receiving the materials required for production, and the subsequent injection moulding to form carbon fibre reinforced plastic.

## Included activities end
The inventory includes the production of carbon fibres and their conversion into carbon fibre reinforced plastic. Environmental emissions and waste production in the carbon fibre manufacturing process are considered, along with injection moulding and the plastic polymer input.

## Geography
Data from one life-cycle analysis on Swiss commercial aircraft fleet (Cox et al., 2018).
Carbon fibre reinforced plastic data presented for Europe in life-cycle analysis.

## Technology
Data based on life-cycle data presented in 2018 using 2015 representative aircraft parameters.
Activity used as input for 2016 aircraft production activity.

## Time period
Time of publication

## Reference product
- carbon fibre reinforced plastic, injection moulded: 1 kg; name RP_amount_1; By-product classification allocatable product; CPC 49640: Parts of aircraft and spacecraft
  production volume 4 kg; name RP_PV_1
    Unknown value. Placeholder value used.
  property price 17.7805 EUR2005; name RP_amount_1_price_EUR2005
    Literature price. Source: Shama Rao, N., et al. 2017. Carbon Composites Are Becoming Competitve And Cost Effective. Infosys White Paper. Retrieved from: https://www.infosys.com/engineering-services/white-papers/Documents/carbon-composites-cost-effective.pdf, accessed 20180615
  property carbon content 0.68
    carbon content on a dry matter basis (reserved; not for manual entry)
  properties: wet mass 1 kg, carbon content, non-fossil 0, dry mass 1 kg, water content 0, water in wet mass 0 kg, carbon content, fossil 0.68, carbon allocation 0.68 kg

## Inputs from technosphere
All rows: source Cox, B. 2018
- chemical, organic: 0.03 kg; lognormal variance with pedigree 0.0666, pedigree (4,5,4,5,4)
  Organic chemical production for the production of carbon fibre reinforced plastic based on LCA study by Cox, Jemiolo & Mutel (2018).
  properties: wet mass 1 kg, dry mass 1 kg, carbon content, fossil 0.628, heating value, net 19.03 MJ
  note on carbon content, fossil: This dataset is an unweighted average of 20 organic substances (listed in Tab 88.1, ecoinvent v2.2 report 8, part II), being part of the top100 chemicals included in this database. The C-content has also been calculated as an unweighted average of the C content of the substances composing this dataset.
- acrylonitrile-butadiene-styrene copolymer: 2.3 kg; lognormal variance with pedigree 0.0666, pedigree (4,5,4,5,4)
  Acrylonitrile for the production of carbon fibre reinforced plastic based on LCA study by Cox, Jemiolo & Mutel (2018).
  properties: carbon content, fossil 0.853081, wet mass 1 kg, dry mass 1 kg, heating value, net 35.58 MJ
- waste asphalt: 0 kg; name WA; pedigree (1,1,1,1,1)
  Waste from the production of carbon fibre based on LCA study by Cox, Jemiolo & Mutel (2018). Cox, Jemiolo & Mutel (2018) and referenced LCA papers do not discuss why "waste asphalt" is included as an exhange in their carbon fibre LCA. However, from other studies it can be seen that a large percentage of carbon fibre is wasted during manufacturing activities due to the layering and cutting nature of the process (Saburow et al., 2017; Schmidt & Watson, 2013). It is assumed that "waste asphalt" is used as a proxy for this carbon fibre waste. References: Schmidt, J. & Watson, J. (2013) Eco Island Ferry - Comparitice LCA of island ferry with carbon fibre composite based and steel based structures. 2-0 LCA consultants. Aalborg, Denmark. Saburow, O., Huether, J., Maertens, R., Trauth, A., Kechaou, Y., Henning, F. & Weidenmann, K (2017) A Direct Process to Reuse Dry Fibre Production Waste for Recycled Carbon Fibre Bulk Molding Compounds. Procedia CIRP. 66. 265-270.
  production volume 0 kg; name AWA
    Calculated from production volume of reference product using the relative outputs.
  property price 0 EUR2005; name WA_price_EUR2005
  properties: water content 0.001001, wet mass 1 kg, dry mass 0.999 kg, carbon content, fossil 0.0440796
- electricity, low voltage: 58 kWh; lognormal variance with pedigree 0.0666, pedigree (4,5,4,5,4)
  Electricity usage for the production of carbon fibre reinforced plastic based on LCA study by Cox, Jemiolo & Mutel (2018).
- injection moulding: 1 kg; lognormal variance with pedigree 0.0666, pedigree (4,5,4,5,4)
  Injection moulding for the production of carbon fibre reinforced plastic based on LCA study by Cox, Jemiolo & Mutel (2018).
- heat, district or industrial, other than natural gas: 237.3 MJ; lognormal variance with pedigree 0.0666, pedigree (4,5,4,5,4)
  Heat usage for the production of carbon fibre based on LCA study by Cox, Jemiolo & Mutel (2018).
  properties: heating value, net 1 MJ, corresponding fuel use, propane, furnace >100kW 1.05263 MJ
  note on corresponding fuel use, propane, furnace >100kW: Lower heating value of the fuel input related to the heat/electricity output, taken directly from ecoinvent v3.0 dataset "heat production, natural gas, at industrial furnace >100kW, GLO 2000".
- waste asphalt: -0.0019443, -0.229056 kg (2 entries); lognormal variance with pedigree 0.0666, pedigree (4,5,4,5,4)
  (same comment as for waste asphalt)
  production volume 0.924 kg

## Emissions to nature
- Heat, waste [air, unspecified]: 756 MJ; source Cox, B. 2018; lognormal variance with pedigree 0.0666, pedigree (4,5,4,5,4)
  Waste heat release from the production of carbon fibre based on LCA study by Cox, Jemiolo & Mutel (2018).
- Carbon dioxide, fossil [air, unspecified]: 3.14 kg; source Cox, B. 2018; lognormal variance with pedigree 0.0666, pedigree (4,5,4,5,4)
  Carbon dioxide release from the production of carbon fibre based on LCA study by Cox, Jemiolo & Mutel (2018).

## Sampling procedure
Data is taken from a journal article presenting carbon fibre reinforced plastic life-cycle data for Europe.

## Extrapolations
This dataset has been extrapolated from year 2016 to the year of the calculation (2021). The uncertainty has been adjusted accordingly.
