# barley production

Dataset: EcoSpold 2, unit process
Geography: FR
Time period: 2000-01-01 to 2021-12-31
Technology level: current
Classification: ISIC rev.4 ecoinvent: 0111:Growing of cereals (except rice), leguminous crops and oil seeds
Scenario: Business-as-Usual
System model: Allocation, cut-off by classification
Share of production covered: 100 %
Generated by: Thomas Nemecek
Published in: Nemecek, T. 2007
Database: ecoinvent
isCopyrightProtected: true
accessRestrictedTo: 1

## General comment
This dataset represents the production of 1 kg of barley grain (fresh matter). The yield is 6760 kg/ha at a moisture content at storage of 14%.
[This dataset was already contained in the ecoinvent database version 2. It was not individually updated during the transfer to ecoinvent version 3. Life Cycle Impact Assessment results may still have changed, as they are affected by changes in the supply chain, i.e. in other datasets. This dataset was generated following the ecoinvent quality guidelines for version 2. It may have been subject to central changes described in the ecoinvent version 3 change report (http://www.ecoinvent.org/database/ecoinvent-version-3/reports-of-changes/), and the results of the central updates were reviewed extensively. The changes added e.g. consistent water flows and other information throughout the database. The documentation of this dataset can be found in the ecoinvent reports of version 2, which are still available via the ecoinvent website. The change report linked above covers all central changes that were made during the conversion process.]

## Included activities start
This activity starts after the harvest of the previous crop. The inputs of seeds, mineral fertilisers and pesticides are considered. It is assumed that no organic fertilisers are applied.

## Included activities end
The dataset includes all machine operations and corresponding machine infrastructure and sheds. Machine operations are: soil cultivation, sowing, fertilisation, weed control, pest and pathogen control, combine-harvest and transport from field to farm (2 km). Further, direct field emissions are included. This activity ends after harvest at the farm gate.

## Geography
Refers to an average production in the region Barrois (FR).

## Technology
conventional production typical for the region

## Time period
The yield data have been collected for the years 2000-2004.

## Parameters
- fraction, irrigation water to surface water: 0.2 dimensionless; name fraction_IW_to_surface_water; lognormal variance with pedigree 0.0886, pedigree (4,3,1,1,4)
  Literature value (Döll, 2011) cross referenced with expert opinion.
- fraction, irrigation water, to air: 0.7945 dimensionless; name fraction_IW_to_air; lognormal variance with pedigree 0.0409, pedigree (2,2,2,1,1)
  Literature value (Siebert, 2010) (Vionnet, S., Quantis Water Database - Technical Report, 2012).
- fraction, irrigation water, to ground water: 0.8 dimensionless; name fraction_IW_to_ground_water; lognormal variance with pedigree 0.0886, pedigree (4,3,1,1,4)
  Literature value (Döll, 2011) cross referenced with expert opinion.

## Reference product
- barley grain: 1 kg; name REF_PRODUCT; CPC 01152: Barley, other; By-product classification allocatable product
  EcoSpold01Location=FR
  production volume 1.03134e10 kg
    11026000t in 2004.
    FAOSTAT
  property water in wet mass 0.14 kg; name REF_PRODUCT_WWM; = 1-REF_PRODUCT_DM
  property price 0.117 EUR2005; name REF_PRODUCT_price_EUR2005
    Temporary price data. Calculated as 90% of purchasers price based on: 2004 prices for World import/export data (tonnes and US$) from FaoStat statistics (http://faostat.fao.org/site/535/default.aspx#ancor, TRADE)- [Accessed 24 May 2010].
  property energy content 15.5832 MJ; name REF_PRODUCT_energy_content
    See chapter 'Product Properties' in "01_crop production - yields & inputs CH & Europe_v1.0.pdf", section "AGRICULTURAL PRODUCTION IN SWITZERLAND" - pdf-document on the dedicated talk page of ecoinvent (www.ecoinvent.org/documentation)
  property wet mass 1 kg; name REF_PRODUCT_WM
  property water content 0.162791; name REF_PRODUCT_water_content; = (1-REF_PRODUCT_DM)/REF_PRODUCT_DM
  property carbon content, fossil 0; name REF_PRODUCT_C_content_fossil
    fossil carbon content on a dry matter basis
  property dry mass 0.86 kg; name REF_PRODUCT_DM
  property carbon content, non-fossil 0.46538; name REF_PRODUCT_C_content_non_fossil
    biogene carbon content on a dry matter basis
    Composition data obtained from Barley hulled, in (http://www.nal.usda.gov/fnic/foodcomp/search/). First, composition data were refered to 1 kg dry mass. Then, C-contents were calculated considering a C-content/dry mass of 46% in carbohydrates (including fibres), 53% in proteins and 75% in fats. All data from "Evolutionary and Biochemical Aspects", A.D. Kay and T. Vrede (in Global Ecology, 2010, Elsevier B.V., S.E. Jørgensen Ed.).
  property carbon content 0.46538
    carbon content on a dry matter basis (reserved; not for manual entry)
  properties: carbon allocation 0.400227 kg

## Inputs from technosphere
- potassium chloride: 0.0117134 kg
  The exchange has been updated from 'potassium chloride, as K2O' into 'potassium chloride' and therefore its amount has been scaled (multiplied) from 0.0074 kg by 1.5829 kg of 'potassium chloride' per kg of 'potassium chloride, as K2O'.
  properties: wet mass 1 kg, dry mass 1 kg
- [sulfonyl]urea-compound: 8.5615e-5 kg; lognormal variance with pedigree 0.0407, pedigree (2,2,5,1,1)
  See chapter 'Yields and Inputs of Arable Crop Production' in "01_crop production - yields & inputs CH & Europe_v1.0.pdf", section "AGRICULTURAL PRODUCTION IN THE EU" - pdf-document on the dedicated talk page of ecoinvent (www.ecoinvent.org/documentation)
  EcoSpold01Location=RER
  properties: wet mass 1 kg, carbon content, fossil 0.540853, dry mass 1 kg
  note on carbon content, fossil: Approximated as an unweighted average of the C-content of the [sulfonyl]urea-compounds (Tab 2.25 Sutter, 2010) chlorotoluron, Diuron, Linuron and Isoproturon.
- application of plant protection product, by field sprayer: 0.00081361 ha; lognormal variance with pedigree 0.0406, pedigree (2,1,5,1,1)
  EcoSpold01Location=CH
  See chapter 'Yields and Inputs of Arable Crop Production' in "01_crop production - yields & inputs CH & Europe_v1.0.pdf", section "AGRICULTURAL PRODUCTION IN THE EU" - pdf-document on the dedicated talk page of ecoinvent (www.ecoinvent.org/documentation)
- lime: 0.0018665 kg; lognormal variance with pedigree 0.0406, pedigree (2,1,5,1,1)
  See chapter 'Yields and Inputs of Arable Crop Production' in "01_crop production - yields & inputs CH & Europe_v1.0.pdf", section "AGRICULTURAL PRODUCTION IN THE EU" - pdf-document on the dedicated talk page of ecoinvent (www.ecoinvent.org/documentation)
  EcoSpold01Location=CH
  properties: wet mass 1 kg, dry mass 1 kg, carbon content, fossil 0.120005
- fertilising, by broadcaster: 0.00036982 ha; lognormal variance with pedigree 0.0406, pedigree (2,1,5,1,1)
  (same comment as for lime)
- packaging, for fertilisers: 0.086773 kg; lognormal variance with pedigree 0.0912, pedigree (4,3,5,5,4)
  Total amount of active substance/s of fertilisers needed for the production of 'barley grain' is calculated to be circa 4.34E-02 kg. Fertiliser/s used in this dataset is/are: 'ammonium nitrate, as N', 'ammonium sulfate, as N', 'lime', 'phosphate fertiliser, as P2O5', 'potassium chloride, as K2O', 'urea, as N'. The total amount of active substance/s is doubled in order to account for the packaging of the dilluted product of fertiliser/s that is/are applied. Therefore, 8.68E-02 kg of packaging for fertilisers is justified with this exchange.
  properties: heating value, net 25.01 MJ, dry mass 1 kg, wet mass 1 kg, price 0.0642 EUR2005, carbon content, fossil 0.825301
  note on carbon content, fossil: Considering a chemical formula (C2H4)n for polyethylene, carbon content-fossil is calculated to be 0.856286 kg of Carbon per kg of dry mass.
- ammonium nitrate: 0.0297161 kg; lognormal variance with pedigree 0.0406, pedigree (2,1,5,1,1)
  EcoSpold01Location=RER
  The exchange has been updated from 'ammonium nitrate, as N' into 'ammonium nitrate' and therefore its amount has been scaled (multiplied) from 0.0104 kg by 2.8573 kg of 'ammonium nitrate' per kg of 'ammonium nitrate, as N'. Original comment of the exchange is: See chapter 'Yields and Inputs of Arable Crop Production' in "01_crop production - yields & inputs CH & Europe_v1.0.pdf", section "AGRICULTURAL PRODUCTION IN THE EU" - pdf-document on the dedicated talk page of ecoinvent (www.ecoinvent.org/documentation)
  properties: dry mass 1 kg, wet mass 1 kg
- nitrile-compound: 4.2348e-5 kg; lognormal variance with pedigree 0.0407, pedigree (2,2,5,1,1)
  (same comment as for [sulfonyl]urea-compound)
  properties: carbon content, fossil 0.344995, dry mass 1 kg, wet mass 1 kg
  note on carbon content, fossil: An unweighted average of the C content in chlorothalonil, dichlobenil, bromoxynil, ioxynil, substances classified as nitrile-compounds in Tab 2.25, Sutter 2010
- tillage, harrowing, by rotary harrow: 2.9586e-5 ha; lognormal variance with pedigree 0.0406, pedigree (2,1,5,1,1)
  (same comment as for application of plant protection product, by field sprayer)
- urea: 0.0222955 kg; lognormal variance with pedigree 0.0406, pedigree (2,1,5,1,1)
  The exchange has been updated from 'urea, as N' into 'urea' and therefore its amount has been scaled (multiplied) from 0.0104 kg by 2.1438 kg of 'urea' per kg of 'urea, as N'. Original comment of the exchange is: See chapter 'Yields and Inputs of Arable Crop Production' in "01_crop production - yields & inputs CH & Europe_v1.0.pdf", section "AGRICULTURAL PRODUCTION IN THE EU" - pdf-document on the dedicated talk page of ecoinvent (www.ecoinvent.org/documentation)
  EcoSpold01Location=RER
  properties: carbon content, fossil 0.2, dry mass 1 kg, wet mass 1 kg
- cyclic N-compound: 1.491e-5 kg; lognormal variance with pedigree 0.0407, pedigree (2,2,5,1,1)
  EcoSpold01Location=RER
  See chapter 'Yields and Inputs of Arable Crop Production' in "01_crop production - yields & inputs CH & Europe_v1.0.pdf", section "AGRICULTURAL PRODUCTION IN THE EU" - pdf-document on the dedicated talk page of ecoinvent (www.ecoinvent.org/documentation)
  properties: carbon content, fossil 0.641962, wet mass 1 kg, dry mass 1 kg
  note on carbon content, fossil: Calculated as an unweigthed average of the C content of the cyclic N-compounds where information was avaliable in Sutter, 2010, following the classification in Tab 2.25 in Sutter 2010: Difenoconazole (C19H17Cl2N3O3), Fenpropidin (C19H31N), Fenpropimorph (C20H33NO), Flusilazole (C16H15F2N3Si), Metconazole (C17H22ClN3O), Penconazole (C13H15Cl2N3), Propiconazole (C15H17Cl2N3O2), Tebuconazole (C16H22ClN3O)
- pyrethroid-compound: 1.0725e-6 kg; lognormal variance with pedigree 0.0407, pedigree (2,2,5,1,1)
  (same comment as for cyclic N-compound)
  properties: carbon content, fossil 0.623, wet mass 1 kg, dry mass 1 kg
  note on carbon content, fossil: C content of pyrethroid-compounds was calculated as an unweigthed average of C content of the substances: cypermethrin, alpha-cypermethrin,beta-cyfluthrin, lambdacyhalothrin. Those substances are classified as pyrethroid-compounds in Tab 2.25, Sutter 2010
- tillage, ploughing: 0.00011834 ha; lognormal variance with pedigree 0.0406, pedigree (2,1,5,1,1)
  (same comment as for application of plant protection product, by field sprayer)
- tillage, harrowing, by spring tine harrow: 0.00023669 ha; lognormal variance with pedigree 0.0406, pedigree (2,1,5,1,1)
  (same comment as for application of plant protection product, by field sprayer)
- organophosphorus-compound, unspecified: 2.8503e-5 kg; lognormal variance with pedigree 0.0407, pedigree (2,2,5,1,1)
  (same comment as for [sulfonyl]urea-compound)
  properties: wet mass 1 kg, dry mass 1 kg, carbon content, fossil 0.260898
  note on carbon content, fossil: C content was calculated as an unweighted average of glyphosate, parathion, and fosetyl-Al. Those substances are classified as organo-phosphorous compounds in Tab 2.25, Sutter 2010
- ammonium sulfate: 0.00222 kg; lognormal variance with pedigree 0.0406, pedigree (2,1,5,1,1)
  (same comment as for cyclic N-compound)
  properties: dry mass 1 kg, wet mass 1 kg
- phenoxy-compound: 4.7337e-7 kg; lognormal variance with pedigree 0.0407, pedigree (2,2,5,1,1)
  (same comment as for [sulfonyl]urea-compound)
  properties: wet mass 1 kg, dry mass 1 kg, carbon content, fossil 0.532559
  note on carbon content, fossil: An unweighted average of the C content in mCPA, mCPB, mecoprop, fluazifop-P-butyl, and 2,4-D. Those substances are classified as phenoxy-compounds in Tab 2.25, Sutter 2010
- transport, tractor and trailer, agricultural: 0.002 metric ton*km; lognormal variance with pedigree 0.0406, pedigree (2,1,5,1,1)
  (same comment as for lime)
- inorganic phosphorus fertiliser, as P2O5: 0.0111 kg; lognormal variance with pedigree 0.0406, pedigree (2,1,5,1,1)
  (same comment as for cyclic N-compound)
  properties: dry mass 1 kg, wet mass 1 kg
- combine harvesting: 0.00014793 ha; lognormal variance with pedigree 0.0406, pedigree (2,1,5,1,1)
  (same comment as for lime)
- packaging, for pesticides: 0.000570637 kg; lognormal variance with pedigree 0.0912, pedigree (4,3,5,5,4)
  Total amount of active substance/s of pesticides needed for the production of barley grain is calculated to be circa 2.85E-04 kg. Pesticide/s used in this dataset is/are: '[sulfonyl]urea-compound', 'cyclic N-compound', 'diphenylether-compound', 'nitrile-compound', 'organophosphorus-compound, unspecified', 'pesticide, unspecified', 'phenoxy-compound', 'pyrethroid-compound'. The total amount of active substance/s is doubled in order to account for the packaging of the dilluted product of pesticide/s that is/are applied. Therefore, 5.71E-04 kg of packaging for pesticides is justified with this exchange.
  properties: price 0.0642 EUR2005, heating value, net 25.97 MJ, dry mass 1 kg, wet mass 1 kg, carbon content, fossil 0.85714
- irrigation: 0.129139 m3; name water_irrigation_input; source Siebert, S. 2010; lognormal variance with pedigree 0.0427, pedigree (2,2,5,1,1)
  Calculated based on literature values (Döll, 2010) and partially modelled at ETH (Pfister, S.).
  property carbon content, fossil 0; name C_content_fossil
  property dry mass 0.11 kg; name DM
  property water content 9089.91; name water_content
  property wet mass 1000 kg; name WM
  property water in wet mass 999.89 kg; name WWM
  property carbon content, non-fossil 0; name C_content_non_fossil
- diphenylether-compound: 6.0766e-6 kg; lognormal variance with pedigree 0.0407, pedigree (2,2,5,1,1)
  (same comment as for cyclic N-compound)
  properties: dry mass 1 kg, wet mass 1 kg, carbon content, fossil 0.560061
  note on carbon content, fossil: C content of diphenylether-compounds was calculated after the C content of thepesticides aclonifen and diflufenican classified as diphenylether-compound in Tab 2.25 of Sutter 2010
- pesticide, unspecified: 0.00010632 kg; lognormal variance with pedigree 0.0407, pedigree (2,2,5,1,1)
  (same comment as for [sulfonyl]urea-compound)
  properties: dry mass 1 kg, wet mass 1 kg, carbon content, fossil 0.486978
  note on carbon content, fossil: Mean of C content in all pesticides whose formula has been documented in Sutter 2010
- barley seed, for sowing: 0.020832 kg; name SEED; lognormal variance with pedigree 0.0406, pedigree (2,1,5,1,1)
  See chapter 'Yields and Inputs of Arable Crop Production' in "01_crop production - yields & inputs CH & Europe_v1.0.pdf", section "AGRICULTURAL PRODUCTION IN THE EU" - pdf-document on the dedicated talk page of ecoinvent (www.ecoinvent.org/documentation)
  property energy content 15.402 MJ; name SEED_energy_content
  property dry mass 0.85 kg; name SEED_DM
  property water in wet mass 0.15 kg; name barley_seed_sowing_WWM
  property wet mass 1 kg; name barley_seed_sowing_WM
  property carbon content, non-fossil 0.449101; name SEED_C_content_non_fossil
  property water content 0.176471; name barley_seed_sowing_water_content
  note on energy content: See chapter 'Product Properties' in "01_crop production - yields & inputs CH & Europe_v1.0.pdf", section "AGRICULTURAL PRODUCTION IN SWITZERLAND" - pdf-document on the dedicated talk page of ecoinvent (www.ecoinvent.org/documentation)
  note on carbon content, non-fossil: biogene carbon content on a dry matter basis; Composition data obtained from Barley hulled, in (http://www.nal.usda.gov/fnic/foodcomp/search/). First, composition data were refered to 1 kg dry mass. Then, C-contents were calculated considering a C-content/dry mass of 44% in carbohydrates (including fibres), 53% in proteins and 75% in fats. All data from ecoinvent report, n 15a, pg 40, except C-content in protein, that comes from Determination of protein concentration by total organic carbon analysis, Rouwenhorst et al., 1991, J Biochem and Biophys Methods, 22:119-128.
- sowing: 0.00014793 ha; lognormal variance with pedigree 0.0406, pedigree (2,1,5,1,1)
  (same comment as for lime)

## Inputs from nature
- Energy, gross calorific value, in biomass [natural resource, biotic]: 15.259 MJ; lognormal variance with pedigree 0.0411891, pedigree (2,1,5,1,1)
- Transformation, from annual crop, non-irrigated, intensive [natural resource, land]: 1.4793 m2; lognormal variance with pedigree 0.0506, pedigree (2,1,5,1,1)
  Modelled, see chapter 'Land use' in "01_crop production_direct field emissions and natural resources_v1.0.pdf" - pdf-document on the dedicated talk page of ecoinvent (www.ecoinvent.org/documentation)
- Transformation, to annual crop, non-irrigated, intensive [natural resource, land]: 1.4793 m2; lognormal variance with pedigree 0.0506, pedigree (2,1,5,1,1)
  (same comment as for Transformation, from annual crop, non-irrigated, intensive)
- Occupation, annual crop, non-irrigated, intensive [natural resource, land]: 1.4793 m2*year; lognormal variance with pedigree 0.0406, pedigree (2,1,5,1,1)
  (same comment as for Transformation, from annual crop, non-irrigated, intensive)
- Carbon dioxide, in air [natural resource, in air]: 1.43834 kg; = 44/12 * (REF_PRODUCT_C_content_non_fossil * REF_PRODUCT * REF_PRODUCT_DM - SEED_C_content_non_fossil * SEED * SEED_DM); lognormal variance with pedigree 0.0406, pedigree (2,1,5,1,1)
  Modelled,see chapter 'CO2 binding' in "01_crop production_direct field emissions and natural resources_v1.0.pdf" - pdf-document on the dedicated talk page of ecoinvent (www.ecoinvent.org/documentation)

## Emissions to nature
- Chromium [soil, agricultural]: 2.9322e-6 kg; lognormal variance with pedigree 0.0807, pedigree (2,2,5,1,1)
  Modelled, see chapter 'Emissions of heavy metals to agricultural soil, surface water and ground water' in "01_crop production_direct field emissions and natural resources_v1.0.pdf" - pdf-document on the dedicated talk page of ecoinvent (www.ecoinvent.org/documentation)
- Trinexapac-ethyl [soil, agricultural]: 2.8846e-6 kg; lognormal variance with pedigree 0.0507, pedigree (2,2,5,1,1)
  Modelled, see chapter 'Emissions of pesticides to agricultural soil' in "01_crop production_direct field emissions and natural resources_v1.0.pdf" - pdf-document on the dedicated talk page of ecoinvent (www.ecoinvent.org/documentation)
- Picoxystrobin [soil, agricultural]: 3.6834e-6 kg; lognormal variance with pedigree 0.0507, pedigree (2,2,5,1,1)
  (same comment as for Trinexapac-ethyl)
- Copper [soil, agricultural]: -2.2506e-6 kg
  (same comment as for Chromium)
- Chlormequat [soil, agricultural]: 2.6627e-7 kg; lognormal variance with pedigree 0.0507, pedigree (2,2,5,1,1)
  (same comment as for Trinexapac-ethyl)
- Cypermethrin [soil, agricultural]: 7.3964e-7 kg; lognormal variance with pedigree 0.0507, pedigree (2,2,5,1,1)
  (same comment as for Trinexapac-ethyl)
- Phosphate [water, surface water]: 9.4204e-5 kg; lognormal variance with pedigree 0.0807, pedigree (2,2,5,1,1)
  Modelled, see chapter 'Emissions of phosphorous to the water' in "01_crop production_direct field emissions and natural resources_v1.0.pdf" - pdf-document on the dedicated talk page of ecoinvent (www.ecoinvent.org/documentation)
- Cyproconazole [soil, agricultural]: 4.0473e-7 kg; lognormal variance with pedigree 0.0507, pedigree (2,2,5,1,1)
  (same comment as for Trinexapac-ethyl)
- Nickel [soil, agricultural]: 8.5329e-7 kg; lognormal variance with pedigree 0.0807, pedigree (2,2,5,1,1)
  (same comment as for Chromium)
- Mepiquat chloride [soil, agricultural]: 1.0851e-5 kg; lognormal variance with pedigree 0.0507, pedigree (2,2,5,1,1)
  (same comment as for Trinexapac-ethyl)
- Cadmium [soil, agricultural]: 1.2073e-6 kg; lognormal variance with pedigree 0.0807, pedigree (2,2,5,1,1)
  (same comment as for Chromium)
- Chlortoluron [soil, agricultural]: 1.5976e-5 kg; lognormal variance with pedigree 0.0507, pedigree (2,2,5,1,1)
  (same comment as for Trinexapac-ethyl)
- Epoxiconazole [soil, agricultural]: 2.2855e-6 kg; lognormal variance with pedigree 0.0507, pedigree (2,2,5,1,1)
  (same comment as for Trinexapac-ethyl)
- Copper, ion [water, surface water]: 3.1921e-7 kg; lognormal variance with pedigree 0.1307, pedigree (2,2,5,1,1)
  (same comment as for Chromium)
- Metsulfuron-methyl [soil, agricultural]: 1.5459e-7 kg; lognormal variance with pedigree 0.0507, pedigree (2,2,5,1,1)
  (same comment as for Trinexapac-ethyl)
- Anthraquinone [soil, agricultural]: 1.0355e-5 kg; lognormal variance with pedigree 0.0507, pedigree (2,2,5,1,1)
  (same comment as for Trinexapac-ethyl)
- Carbon dioxide, fossil [air, non-urban air or from high stacks]: 0.017938 kg; lognormal variance with pedigree 0.0407, pedigree (2,2,5,1,1)
  Modelled, see chapter 'Release of fossil CO2 after urea applications' in "01_crop production_assessment methods of direct field emissions_v1.0.pdf" - pdf-document on the dedicated talk page of ecoinvent (www.ecoinvent.org/documentation)
- Nickel, ion [water, surface water]: 2.6777e-7 kg; lognormal variance with pedigree 0.1307, pedigree (2,2,5,1,1)
  (same comment as for Chromium)
- Imidacloprid [soil, agricultural]: 5.2189e-6 kg; lognormal variance with pedigree 0.0507, pedigree (2,2,5,1,1)
  (same comment as for Trinexapac-ethyl)
- Ethephon [soil, agricultural]: 2.8503e-5 kg; lognormal variance with pedigree 0.0507, pedigree (2,2,5,1,1)
  (same comment as for Trinexapac-ethyl)
- Diflufenican [soil, agricultural]: 3.4246e-6 kg; lognormal variance with pedigree 0.0507, pedigree (2,2,5,1,1)
  (same comment as for Trinexapac-ethyl)
- Bromoxynil [soil, agricultural]: 6.6568e-6 kg; lognormal variance with pedigree 0.0507, pedigree (2,2,5,1,1)
  (same comment as for Trinexapac-ethyl)
- Nitrogen oxides [air, non-urban air or from high stacks]: 0.000121404 kg; = 0.21 * N2O; lognormal variance with pedigree 0.0707, pedigree (2,2,5,1,1)
  Modelled, see chapter 'Emissions of NOx to the air' in "01_crop production_direct field emissions and natural resources_v1.0.pdf" - pdf-document on the dedicated talk page of ecoinvent (www.ecoinvent.org/documentation)
- Phosphorus [water, surface water]: 1.8703e-5 kg; lognormal variance with pedigree 0.0807, pedigree (2,2,5,1,1)
  (same comment as for Phosphate)
- Dinitrogen monoxide [air, non-urban air or from high stacks]: 0.000578115 kg; name N2O; lognormal variance with pedigree 0.0707, pedigree (2,2,5,1,1)
  Modelled, see chapter 'Emissions of N2O to the air' in "01_crop production_direct field emissions and natural resources_v1.0.pdf" - pdf-document on the dedicated talk page of ecoinvent (www.ecoinvent.org/documentation)
- Water [water, ground-]: 0.0212304 m3; name water_to_water_ground; = water_irrigation_input*(1-fraction_IW_to_air)*fraction_IW_to_ground_water; lognormal variance with pedigree 0.1286, pedigree (4,3,5,1,4)
  Calculated value. See the parameters and their comments to understand the calculation.
  property fraction, origin: fresh water 1; name fraction_origin_fresh_water_Wgw
  property fraction, origin: unspecified 0; name fraction_origin_unspecified_Wgw
  property fraction, origin: salt water 0; name fraction_origin_salt_water_Wgw
- Bifenox [soil, agricultural]: 2.6521e-6 kg; lognormal variance with pedigree 0.0507, pedigree (2,2,5,1,1)
  (same comment as for Trinexapac-ethyl)
- Zinc, ion [water, ground-]: 2.0936e-6 kg; lognormal variance with pedigree 0.1307, pedigree (2,2,5,1,1)
  (same comment as for Chromium)
- Deltamethrin [soil, agricultural]: 1.6642e-7 kg; lognormal variance with pedigree 0.0507, pedigree (2,2,5,1,1)
  (same comment as for Trinexapac-ethyl)
- Zinc, ion [water, surface water]: 4.188e-7 kg; lognormal variance with pedigree 0.1307, pedigree (2,2,5,1,1)
  (same comment as for Chromium)
- Trifloxystrobin [soil, agricultural]: 1.52e-6 kg; lognormal variance with pedigree 0.0507, pedigree (2,2,5,1,1)
  (same comment as for Trinexapac-ethyl)
- Fenoxaprop-P ethyl ester [soil, agricultural]: 7.6923e-7 kg; lognormal variance with pedigree 0.0507, pedigree (2,2,5,1,1)
  (same comment as for Trinexapac-ethyl)
- Kresoxim-methyl [soil, agricultural]: 1.0159e-7 kg; lognormal variance with pedigree 0.0507, pedigree (2,2,5,1,1)
  (same comment as for Trinexapac-ethyl)
- Cadmium, ion [water, ground-]: 6.8274e-9 kg; lognormal variance with pedigree 0.1307, pedigree (2,2,5,1,1)
  (same comment as for Chromium)
- Chromium, ion [water, surface water]: 4.3723e-7 kg; lognormal variance with pedigree 0.1307, pedigree (2,2,5,1,1)
  (same comment as for Chromium)
- Azoxystrobin [soil, agricultural]: 1.1207e-5 kg; lognormal variance with pedigree 0.0507, pedigree (2,2,5,1,1)
  (same comment as for Trinexapac-ethyl)
- Propiconazole [soil, agricultural]: 3.2992e-6 kg; lognormal variance with pedigree 0.0507, pedigree (2,2,5,1,1)
  (same comment as for Trinexapac-ethyl)
- Isoproturon [soil, agricultural]: 6.9484e-5 kg; lognormal variance with pedigree 0.0507, pedigree (2,2,5,1,1)
  (same comment as for Trinexapac-ethyl)
- Lambda-cyhalothrin [soil, agricultural]: 1.6642e-7 kg; lognormal variance with pedigree 0.0507, pedigree (2,2,5,1,1)
  (same comment as for Trinexapac-ethyl)
- Ammonia [air, non-urban air or from high stacks]: 0.00235629 kg; lognormal variance with pedigree 0.0507, pedigree (2,2,5,1,1)
  Modelled with the 'AGRAMMON model' described in "01_crop production_direct field emissions and natural resources_v1.0.pdf" - pdf-document on the dedicated talk page of ecoinvent (www.ecoinvent.org/documentation)
- Fenpropimorph [soil, agricultural]: 5.302e-6 kg; lognormal variance with pedigree 0.0507, pedigree (2,2,5,1,1)
  (same comment as for Trinexapac-ethyl)
- Mefenpyr-diethyl [soil, agricultural]: 1.5385e-6 kg; lognormal variance with pedigree 0.0507, pedigree (2,2,5,1,1)
  (same comment as for Trinexapac-ethyl)
- Clopyralid [soil, agricultural]: 2.3669e-7 kg; lognormal variance with pedigree 0.0507, pedigree (2,2,5,1,1)
  (same comment as for Trinexapac-ethyl)
- Copper, ion [water, ground-]: 4.2958e-7 kg; lognormal variance with pedigree 0.1307, pedigree (2,2,5,1,1)
  (same comment as for Chromium)
- Lead [water, ground-]: 4.6306e-9 kg; lognormal variance with pedigree 0.1307, pedigree (2,2,5,1,1)
  (same comment as for Chromium)
- Ioxynil [soil, agricultural]: 3.9941e-6 kg; lognormal variance with pedigree 0.0507, pedigree (2,2,5,1,1)
  (same comment as for Trinexapac-ethyl)
- Chromium, ion [water, ground-]: 2.8899e-6 kg; lognormal variance with pedigree 0.1307, pedigree (2,2,5,1,1)
  (same comment as for Chromium)
- Carfentrazone-ethyl [soil, agricultural]: 1.0355e-7 kg; lognormal variance with pedigree 0.0507, pedigree (2,2,5,1,1)
  (same comment as for Trinexapac-ethyl)
- Cadmium, ion [water, surface water]: 4.3615e-9 kg; lognormal variance with pedigree 0.1307, pedigree (2,2,5,1,1)
  (same comment as for Chromium)
- Flusilazole [soil, agricultural]: 1.2814e-6 kg; lognormal variance with pedigree 0.0507, pedigree (2,2,5,1,1)
  (same comment as for Trinexapac-ethyl)
- Fludioxonil [soil, agricultural]: 6.6272e-7 kg; lognormal variance with pedigree 0.0507, pedigree (2,2,5,1,1)
  (same comment as for Trinexapac-ethyl)
- Fluroxypyr [soil, agricultural]: 4.7337e-7 kg; lognormal variance with pedigree 0.0507, pedigree (2,2,5,1,1)
  (same comment as for Trinexapac-ethyl)
- Zinc [soil, agricultural]: -2.2815e-6 kg
  (same comment as for Chromium)
- Tebuconazole [soil, agricultural]: 2.3373e-6 kg; lognormal variance with pedigree 0.0507, pedigree (2,2,5,1,1)
  (same comment as for Trinexapac-ethyl)
- Phosphate [water, ground-]: 3.1733e-5 kg; lognormal variance with pedigree 0.0807, pedigree (2,2,5,1,1)
  (same comment as for Phosphate)
- Diclofop-methyl [soil, agricultural]: 1.6605e-5 kg; lognormal variance with pedigree 0.0507, pedigree (2,2,5,1,1)
  (same comment as for Trinexapac-ethyl)
- Bitertanol [soil, agricultural]: 1.1183e-6 kg; lognormal variance with pedigree 0.0507, pedigree (2,2,5,1,1)
  (same comment as for Trinexapac-ethyl)
- Pyraclostrobin (prop) [soil, agricultural]: 1.2936e-6 kg; lognormal variance with pedigree 0.0507, pedigree (2,2,5,1,1)
  (same comment as for Trinexapac-ethyl)
- Lead [soil, agricultural]: 1.1863e-7 kg; lognormal variance with pedigree 0.0807, pedigree (2,2,5,1,1)
  (same comment as for Chromium)
- Metaldehyde [soil, agricultural]: 3.5503e-5 kg; lognormal variance with pedigree 0.0507, pedigree (2,2,5,1,1)
  (same comment as for Trinexapac-ethyl)
- Lead [water, surface water]: 2.0029e-8 kg; lognormal variance with pedigree 0.1307, pedigree (2,2,5,1,1)
  (same comment as for Chromium)
- Water [air, unspecified]: 0.102601 m3; name water_to_air_unspecified; = (water_irrigation_input*fraction_IW_to_air); lognormal variance with pedigree 0.0807, pedigree (2,2,5,1,1)
  Calculated value based on literature values and expert opinion. See comments in the parametres' comment field.
  property fraction, origin: salt water 0; name fraction_origin_salt_water
  property fraction, origin: fresh water 1; name fraction_origin_fresh_water
  property fraction, origin: unspecified 0; name fraction_origin_unspecified
- Cyprodinil [soil, agricultural]: 3.1697e-5 kg; lognormal variance with pedigree 0.0507, pedigree (2,2,5,1,1)
  (same comment as for Trinexapac-ethyl)
- Nitrate [water, ground-]: 0.0418395 kg; lognormal variance with pedigree 0.0807, pedigree (2,2,5,1,1)
  Modelled with the 'SALCA-NO3 model' described in "01_crop production_direct field emissions and natural resources_v1.0.pdf" - pdf-document on the dedicated talk page of ecoinvent (www.ecoinvent.org/documentation)
- Water [water, surface water]: 0.0053076 m3; name water_to_water_surface; = water_irrigation_input*(1-fraction_IW_to_air)*fraction_IW_to_surface_water; lognormal variance with pedigree 0.1286, pedigree (4,3,5,1,4)
  Calculated value. See the parameters and their comments to understand the calculation.
  property fraction, origin: fresh water 1; name fraction_origin_fresh_water_Wsw
  property fraction, origin: salt water 0; name fraction_origin_salt_water_Wsw
- MCPA [soil, agricultural]: 2.3669e-6 kg; lognormal variance with pedigree 0.0507, pedigree (2,2,5,1,1)
  (same comment as for Trinexapac-ethyl)

## Sampling procedure
Data come from a survey in the concerted action GL-Pro of the EU (QLK5-CT-2002-02418). Data were compiled from statistics, pilot networks, fertilising recommendations, documents from extension services, information provided by retailers and expert knowledge. The production data were verified and adjusted by a group of experts in GL-Pro and by other experts.

## Extrapolations
This dataset has been extrapolated from year 2004 to the year of the calculation (2021). The uncertainty has been adjusted accordingly.

## Review by Hans-Jörg Althaus 2007-11-07
passed
