# intermodal shipping container production, 45-foot, high-cube

Dataset: EcoSpold 2, unit process
Geography: GLO
Time period: 2010-01-01 to 2021-12-31
Technology level: current
Classification: ISIC rev.4 ecoinvent: 2920:Manufacture of bodies (coachwork) for motor vehicles; manufacture of traile
Synonyms: freight container; sea can; ISO container; conex box
Scenario: Business-as-Usual
System model: Allocation, cut-off by classification
Generated by: Tereza Levova
Database: ecoinvent
isCopyrightProtected: true
accessRestrictedTo: 1

## General comment
This dataset represents production of 45-foot, high-cube ISO standard container.
The intermodal shipping containers are basically metal boxes which are used for storage and transport of goods. The advantage of using these containers is, that they can be easily transferred from one type of transport to another without the necessity of unloading the goods.
There are several types and sizes of the containers mainly related to the historical development of intermodal container transport in the given region. There is a continuous effort in the standardization of the container sizes. Below see the table of the different sizes of the intermodal shipping containers as defined by the ISO standard (ISO 6346:1995, ISO 1161:1984, ISO 1496-1:2013).
The container is designed and constructed for the transportation of general cargo on sea (above and under deck) and on land (road or rail) throughout the world, and will be suitable for the environmental conditions imposed by those modes of transport. All materials used in the construction are able to withstand extreme temperature ranging from -40°C to 70°C without effect on container’s strength and water tightness.
Typical intermodal shipping container. Source: (http://speedlinkltd.com/wp-content/uploads/2011/11/container.jpg, accessed 20141015).
Data for the life cycle inventory of this container were taken from different sources, primarily from the documentation of different container producers. The main source of information is the technical documentation from Steinecker Containerhandel (Technical Specification for typical 40'x8'x9'6'' ISO Type Steel Dry Cargo Container, "High Cube", 2012).
Comparison of different container sizes

## Included activities start
The activity starts when all the individual parts needed for the production of a container enter the assembly site.

## Included activities end
The activity ends when the container is ready to be used.

## Technology
The container side rails are welded to create a frame. The walls of the container are made from corrugated steel. In order to protect the container againt different weather conditions zinc coating is needed.
Technical sketch of the differnt parts of the shipping container. Source: (http://shippingandfreightresource.com/how-strong-is-your-container-floorboard/, accessed 20141015).
The container has door on one side which can be locked using four locking bars. The doors have rubber seal gasket to ensure the water resistence of the container.

## Parameters
- weight of steel container's walls: 1752.04 kg; name weight_walls; = (area_corrugated_steel_walls*( thickness_walls/1000)* density_corrugated_steel_wall); lognormal variance with pedigree 0.0006, pedigree (1,1,1,1,1)
  Calculated value.
- density: 7800 kg/m3; name density_corrugated_steel_wall; lognormal variance with pedigree 0.0032, pedigree (3,3,1,1,1)
  Estimated. The density of steel, low-alloyed used for the corrugated steel walls of the container.
- area: 160.443 m2; name area_corrugated_steel_walls; = (container_length_ex* container_height_ex*2)+( container_length_ex* container_width_ex*2)+( container_width_ex* container_height_ex*2); lognormal variance with pedigree 0.0006, pedigree (1,1,1,1,1)
  Calculated value. Area of the corrugated steel walls.
- thickness of wooden floor: 28 mm; name thickness_wooden_floor; lognormal variance with pedigree 0.0026, pedigree (1,4,1,1,1)
  Industrial data (Steinecker Containerhandel, 2012, Technical Specification for a typical 40'x8'x9'6'' ISO type Steel Dry Cargo Container "High Cube").
- thickness of metal sheet_01: 1.4 mm; name thickness_walls; lognormal variance with pedigree 0.0026, pedigree (1,4,1,1,1)
  Industrial data.
- number of days_cargo present in the container: 10 day; name number_days_cargo_in; lognormal variance with pedigree 0.0166, pedigree (4,5,1,1,1)
  Estimated value based on literature.
- distance of travel of average 1 tone of persihable goods: 10000 km; name distance_ave_1ton; lognormal variance with pedigree 0.0186, pedigree (4,5,1,5,1)
  Estimated value.
  The distance taken by 1 ton of parishable food tansported in reefer.
  The distance is estimated by looking at the main reefer transport rouds around the world. For example the bananas (representing 20% of reefer transport) are transported mainly from South America to Europe.
  Dekker, N., 2014, Global reefer trades - 2014, Dewry Meritime Research (http://www.joc.com/sites/default/files/u221106/SpeakerPresentations/March3/Dekker_Neil_Cool_Cargoes_Presentation.pdf, accessed 20141030)
  Hamburh Süd, 2013, Reefer services company information (http://www.hamburg-sued.com/group/media/sharedmedia/dokumente/brochures/Reefer_guide.pdf, accessed 20141030)
- weight of a steel frame: 2295.76 kg; name weight_steel_frame; = weight_container-weight_walls- rubber_in- steel_pipe_input-( plywood_in* plywood_WM); lognormal variance with pedigree 0.0566, pedigree (4,5,1,1,4)
  Calculated value.
  The weight of the frame is calculated as a difference between the weight of the whole container minus the other materials (walls, floor, etc.).
  Cross-reference; steel I-beam (HE140A) weight 24.7kg/m. The length of all the side rails creating the frame is (length*4+width*4+height*4=) 70.104 m. The calculated weight is thus (70.104*24.7=) 1624kg. So the calculated 1753 kg looks as an adequate value.

## Reference product
- intermodal shipping container, 45-foot, high-cube: 1 unit; name container_RP; CPC 49221: Containers specially designed and equipped for carriage by one or more modes of transport; By-product classification allocatable product
  Standard 40-food, high-cube intermodal shipping container.
  External dimensions; length - 12.192 m, width - 2.438 m and height - 2.896 m.
  Interior dimensions: length - 12.000 m, width - 2.311 m and height - 2.2.650 m.
  Internal volume: 75.3 m3
  Maximum gross weight: 30.848 tons
  Empty weight: 3.9 tons
  Net load: 26.58 tons
  production volume 40000 unit; name RP_PV_1; = (1.6*1000000*0.05)/ container_RP_capacity_cargo
    Calculated value.
    1.6 million TEU (Twenty-foot Equivalent unit) is newly added to the total capacity of shipping containers in the world (World Shipping Council, http://www.worldshipping.org/about-the-industry/containers/global-container-fleet, accessed 20141014).
    Out of that 5% is 45-food, high-cube containers. Estimated based on literature (Containerization International Market Analysis, World Container Census 2008, http://people.hofstra.edu/geotrans/eng/ch3en/conc3en/containerfleet.html, accessed 20141014).
  property lifetime capacity [kg*day] 7.24611e8 kg*day; name lifetime_capacity_kg_day; = (1.524E+12*0.05)/(32.9E6*0.05/container_RP_capacity_cargo)* lifetime*365*(1/0.7)
    Calculated value based on literature data.
    1.52E+12 kg of cargo have been transported by different type of containers in the year 2012 (www.statista.com, accessed 20141110).
    32.9 million TEU is the global capacity of all containers in operation (World Shipping Council, www.worldshipping.org, 20150203). Out of that;
    27% are 20' containers
    24% are 40' containers
    33% are 40'HC containers
    5% are 45'HC containers
    70% is the utilization rate - weight, the container carry 70% (in kg) of what they could be able to carry
  property height, internal 2.698 m; name container_height_in
    Industrial data. Standard 40-foot, high-cube intermodal shipping container.
  property length, internal 13.556 m; name container_length_in
    Industrial data. Standard 40-foot, high-cube intermodal shipping container.
  property length, external 13.716 m; name container_length_ex
    Industrial data. Standard 40-foot, high-cube intermodal shipping container.
  property height, external 2.896 m; name container_height_ex
    Industrial data. Standard 40-foot, high-cube intermodal shipping container.
  property maximum gross weight 32500 kg
    Industrial data. The maxiumum gross weight of a dry container.
  property capacity, cargo 2 TEU; name container_RP_capacity_cargo
    Literature value.
  property width, external 2.438 m; name container_width_ex
    Industrial data. Standard 40-foot, high-cube intermodal shipping container.
  property price 4277.12 EUR2005; name container_RP_price_EUR2005
    Calculated based on inputs: The price of the product has been calculated as a sum of the values of the material and energy inputs for this product. This value is therefore a rough estimation. It may underestimate the real price since there are additional expenses when producing any product. These expences can include for example labour costs, treatment of waste materials and profit for the producer. Please consider carefully whether this level of data quality is acceptable for your application.
  property weight 4800 kg; name weight_container
    Industrial data. Tare weight of a dry container.
  property lifetime 15 year; name lifetime
    Industrial data.
  property volume 86.1 m3; name container_volume
    The maximum inside cubic capacity of the container.
  property maximum payload 27450 kg; name max_payload
    Industrial data. The maxiumum payload of a dry container.
  property width, internal 2.352 m; name container_width_in
    Industrial data. Standard 40-foot, high-cube intermodal shipping container.

## Inputs from technosphere
- zinc coat, pieces: 481.33 m2; = area_corrugated_steel_walls*3; lognormal variance with pedigree 0.0038, pedigree (2,3,3,1,1)
  Calculated value.
  The "zinc coating, pieces" dataset is created for the thickess of the coat of 65mm. While the interior coating of the container should be approximatelly 65mm the exterior should be at least double (Steinecker, 2012). So the additional amount of coating is added to assure the correct thickness of the exterior coat.
- synthetic rubber: 5.88678 kg; name rubber_in; = (container_width_ex*2+ container_height_ex*3)* rubber_kg_per_m; lognormal variance with pedigree 0.0038, pedigree (2,3,3,1,1)
  Calculated value. The seal gasket is made of EPDM synthetic rubber. It cover all the edges of the container door.
  property weight per length 0.434 kg/m; name rubber_kg_per_m
  properties: dry mass 1 kg, wet mass 1 kg, heating value, net 26.42 MJ, carbon content, fossil 0.871949
  note on weight per length: Industrial data (http://hxtruck.en.made-in-china.com/product/OMqJuparbeRw/China-Container-Door-Seal-Rubber-Door-Seal-Door-Gasket-072006-.html, accessed 20141015). Container door seal (seal gasket) from synthetic rubber (EPDM).
  note on carbon content, fossil: EPDM (Ethylene-propene-diene terpolymer) rubber is a terpolymer of ethylene, propene, and a diene with the residual unsaturated portion of the diene in the side chain (ecoinvent v2.2 report 7-part XX & Ullmann). Chemical formula (deduced from Evidences of Solvent-Induced Miscibility in Polychloroprene-co-Ethylene-Propene Diene Terpolymer Blends, Dubey et al., Journal of Applied Polymer Science, 2009, 111:1884–1891): C20H35
- metal working, average for steel product manufacturing: 4047.8 kg; = steel_input; lognormal variance with pedigree 0.0038, pedigree (2,3,3,1,1)
  Calculated value.
  This exchange represent general metal working of the steel to form it into all the individual components needed for the assemby of the container.
- used intermodal shipping container, 45-foot, high-cube: -1 unit; name BP_amount_1; = (container_RP)*-1; lognormal variance with pedigree 0.0026, pedigree (1,1,3,1,1)
  Calculated value.
  production volume 40000 unit; = RP_PV_1 * (BP_amount_1 / container_RP)
    Calculated from production volume of reference product using the relative outputs.
  property price 0 EUR2005; name BP_amount_1_price_EUR2005
  property dry mass 4751.43 kg; name used_container_DM; = used_container_WM-( plywood_WM- plywood_DM)* plywood_in
  property water in wet mass 48.5653 kg; name used_container_WWM; = used_container_WM- used_container_DM
  property water content 0.0102212; name used_container_WC; = used_container_WWM/ used_container_DM
  property wet mass 4800 kg; name used_container_WM; = weight_container
  properties: carbon content, fossil 0.0102083, carbon content, non-fossil 0.0464583
- plywood: 0 m3; name plywood_in; pedigree (1,1,1,1,1)
  Calculated value. This exchange represent the amount of wood needed for the wooden floor of the container.
  property wet mass 823 kg; name plywood_WM
  property dry mass 768.6 kg; name plywood_DM
  properties: heating value, net 11688.9 MJ, price 400 EUR2005, water content 0.070778, carbon content, non-fossil 0.409818, carbon content, fossil 0.09783
- steel, low-alloyed, hot rolled: 4047.8 kg; name steel_input; = weight_walls+ weight_steel_frame; lognormal variance with pedigree 0.0038, pedigree (2,3,3,1,1)
  Calculated value based on dimentions, thickness and density of the material.
  This exchange represent the amount of steel needed both for the frame and the sides of the container.
  properties: wet mass 1 kg, dry mass 1 kg, carbon content, fossil 0.005
  note on carbon content, fossil: Low alloyed steel composition given in Tab. 3.2 ecoinvent v2.2 report 10_partII. Steel assumed to have a C content of 0.5%
- chromium steel pipe: 11.584 kg; name steel_pipe_input; = 4*container_height_ex; lognormal variance with pedigree 0.0038, pedigree (2,3,3,1,1)
  Industrial value (Jost, Products for Container Equipment and Intermodal transports, http://www.jost-world.com/workflow/pdfanleitungen/kataloge/JOST_CT_ZDE180000039E_0910.pdf, accessed 20141014).
  There are 4 locking bars on the container.
  properties: wet mass 1 kg, carbon content, fossil 0.0008, dry mass 1 kg
- welding, arc, steel: 76.68 m; = 0.48+ container_length_ex*4+ container_height_ex*4+ container_width_ex*4; lognormal variance with pedigree 0.0038, pedigree (2,3,3,1,1)
  Calculated value based on estimates.
- metal working, average for chromium steel product manufacturing: 11.584 kg; = steel_pipe_input; lognormal variance with pedigree 0.0038, pedigree (2,3,3,1,1)
  Calculated value.
- building, hall: 0.0183231 m2; = 1/(( lifetime_building*365)/(container_length_ex* container_width_ex*10)); lognormal variance with pedigree 0.318, pedigree (4,5,3,1,1)
  Calculated value based on estimates.
  1m2 of hall is available every day for 50 years
  1 container occupies the area of its base for the period of 10 days
  Resulting lifetime capacity of m2 of hall is 61 containers. Thus one container is responsible of construction of 0.016m2 of a hall.
  property lifetime 50 year; name lifetime_building
- plywood: 0.0401823, 0.852562 m3 (2 entries); lognormal variance with pedigree 0.0038, pedigree (2,3,3,1,1)
  (same comment as for plywood)
  properties: heating value, net 11688.9 MJ, price 400 EUR2005, wet mass 823 kg, water content 0.070778, carbon content, non-fossil 0.409818, dry mass 768.6 kg, carbon content, fossil 0.09783

## Extrapolations
This dataset has been extrapolated from year 2014 to the year of the calculation (2021). The uncertainty has been adjusted accordingly.
