# sugarcane transfer, by dump cart

Dataset: EcoSpold 2, unit process
Geography: RoW
Time period: 2012-01-01 to 2021-12-31
Technology level: current
Classification: EcoSpold01Categories: agricultural means of production/work processes
Classification: ISIC rev.4 ecoinvent: 0161:Support activities for crop production
Scenario: Business-as-Usual
System model: Allocation, cut-off by classification
Generated by: Otávio Cavalett
Published in: Cavalett O. 2016
Database: ecoinvent
isCopyrightProtected: true
accessRestrictedTo: 1

## General comment
This dataset represents the sugarcane loading operation in one hectare (ha). This operation is carried out together with the mechanized harvesting, once the harvested sugarcane is placed in the dump cart (infield wagon). Functional unit (FU) is one hectare of sugarcane transfer. The operation time is about 6.60 hours per ha (56.0% of this time is effectively worked, discounting time for maintenance, waiting in the field and re-allocations between the plots).
Dataset authors:
Mateus Ferreira Chagas, CTBE, mateus.chagas@bioetanol.org.br; Otávio Cavalett, CTBE, otavio.cavalett@bioetanol.org.br; Terezinha de Fátima Cardoso, CTBE, terezinha.cardoso@bioetanol.org.br; Antonio Bonimi, CTBE, antonio.bonomi@bioetanol.org.br
References:
1. Cavalett, O., Chagas, M.F., Magalhães, P.S.G., Carvalho, J.L.N. Cardoso, T.F., Franco, HC.J., Braunbeck, O.A., Bonomi, A., 2016a. The Agricultural Produciton Model. In: Bonomi, A., Cavalett, O., Pereira da Cunha, M., Lima, M.A.P. (Eds.). Virtual Biorefinery: An Optimization Strategy for Renewable Carbon Valorization. 13-52.
2. Nemecek T, Kagi T (2007) Life Cycle Inventories of Agricultural Production Systems – Data v2.0, Zurich and Dubendorf: 2007

## Included activities start
This activity starts when sugarcane is loaded in the dump cart (infield wagon) by sugarcane harvester machine.

## Included activities end
This activity includes the infield transportation from the sugarcane harvester to the transport truck, and ends with sugarcane transfered into the transport truck. The dataset includes the diesel fuel consumption (10.65 L of diesel per hour of effective operation) and the amount of agricultural machinery and shed. Also taken into consideration is the amount of emissions to the air from diesel combustion and the emission to the soil from tyre abrasion during the work process.

## Geography
The global dataset is modeled based on information from sugarcane production system in Brazilian South-Cental region.

## Technology
This activity is performed with a tractor (power 180 hp; weight 7477 kg) plus two infield wagons (combined capacity for 15 tonnes fo sugarcane; weight 15380 kg). Life spam of the tractor is considered as 13250 operating hours and of the implement as 10000 operating hours. Machinery used, fuel consumption and operation efficiencies were based on data from sugarcane mills in Brazil, expert's informations and unpublished data.

## Time period
Most of the data used to modelling this activity were collected in the last few years (2012-2014).

## Reference product
- sugarcane transfer, by dump cart: 1 ha; CPC 86119: Other support services to crop production; By-product classification allocatable product
  production volume 1.47332e7 ha; = 27045769*0.888
    Estimated based global sugarcane production area, year 2014, according to the FAOSTAT data. This operation is assumed to occur in the 88.8% of mecanized harvesting area, taken into account the technology from sugarcane production area in the South-Central Brazilian region.
  property price 61.7515 EUR2005
    Calculated based on inputs: The price of the product has been calculated as a sum of the values of the material and energy inputs for this product. This value is therefore a rough estimation. It may underestimate the real price since there are additional expenses when producing any product. These expences can include for example labour costs, treatment of waste materials and profit for the producer. Please consider carefully whether this level of data quality is acceptable for your application.

## Inputs from technosphere
- agricultural trailer: 10.157 kg; source Otávio Cavalett 2016; lognormal variance with pedigree 0.0052, pedigree (2,3,3,5,1)
  Proxy, based on data from sugarcane mills in Brazil, expert's informations and unpublished data. The main source of data for agricultural inputs and operations modelling prodedures is detailed in Cavalett et al., 2016.
- diesel: 0 kg; source Otávio Cavalett 2016; pedigree (1,1,1,1,1)
  (same comment as for agricultural trailer)
  properties: heating value, net 42.8 MJ, wet mass 1 kg, carbon content, fossil 0.865, dry mass 1 kg
  note on carbon content, fossil: C-content of diesel is 86.5% (ecoinvent v2.2 report 6_IV, Tab 3.14)
- shed: 0.002 m2; lognormal variance with pedigree 0.0146, pedigree (3,3,3,5,3)
  Proxy, based on ecoinvent database.
- tractor, 4-wheel, agricultural: 3.72668 kg; source Otávio Cavalett 2016; lognormal variance with pedigree 0.0052, pedigree (2,3,3,5,1)
  (same comment as for agricultural trailer)
- diesel: 0.060755, 2.55059, 0.178659, 0.25823, 5.32971, 25.1858 kg (6 entries); source Otávio Cavalett 2016; lognormal variance with pedigree 0.0052, pedigree (2,3,3,5,1)
  (same comment as for agricultural trailer)

## Emissions to nature
All rows: source Nemecek, T. 2007
- Cadmium [air, non-urban air or from high stacks]: 3.36e-7 kg; lognormal variance with pedigree 0.6641, pedigree (3,2,3,5,3)
  Proxy, based on 'Agricultural Field Work Processes'from Nemecek and Kagi, 2007.
- Zinc [soil, agricultural]: 0.01488 kg; lognormal variance with pedigree 0.048, pedigree (3,4,3,5,1)
  Proxy, based on 'Agricultural Field Work Processes'from Nemecek and Kagi, 2007.
- Copper [air, non-urban air or from high stacks]: 5.71e-5 kg; lognormal variance with pedigree 0.6641, pedigree (3,2,3,5,3)
  Proxy, based on 'Agricultural Field Work Processes'from Nemecek and Kagi, 2007.
- Lead [soil, agricultural]: 0.00242 kg; lognormal variance with pedigree 0.048, pedigree (3,4,3,5,1)
  Proxy, based on 'Agricultural Field Work Processes'from Nemecek and Kagi, 2007.
- NMVOC, non-methane volatile organic compounds, unspecified origin [air, non-urban air or from high stacks]: 0.10069 kg; lognormal variance with pedigree 0.0641, pedigree (3,2,3,5,3)
  Proxy, based on 'Agricultural Field Work Processes'from Nemecek and Kagi, 2007. Emissions of CO, NOx and NMVOC were estimated based on avarege of the agricultural process used in sugarcane production.
- Benzo(a)pyrene [air, non-urban air or from high stacks]: 1.01e-6 kg; lognormal variance with pedigree 0.6641, pedigree (3,2,3,5,3)
  Proxy, based on 'Agricultural Field Work Processes'from Nemecek and Kagi, 2007.
- Benzene [air, non-urban air or from high stacks]: 0.000245 kg; lognormal variance with pedigree 0.0641, pedigree (3,2,3,5,3)
  Proxy, based on 'Agricultural Field Work Processes'from Nemecek and Kagi, 2007.
- Carbon dioxide, fossil [air, non-urban air or from high stacks]: 105 kg; lognormal variance with pedigree 0.0241, pedigree (3,2,3,5,3)
  Proxy, based on 'Agricultural Field Work Processes'from Nemecek and Kagi, 2007.
- Sulfur dioxide [air, non-urban air or from high stacks]: 0.0339 kg; lognormal variance with pedigree 0.0241, pedigree (3,2,3,5,3)
  Proxy, based on 'Agricultural Field Work Processes'from Nemecek and Kagi, 2007.
- PAH, polycyclic aromatic hydrocarbons [air, non-urban air or from high stacks]: 0.00011 kg; lognormal variance with pedigree 0.3241, pedigree (3,2,3,5,3)
  Proxy, based on 'Agricultural Field Work Processes'from Nemecek and Kagi, 2007.
- Cadmium [soil, agricultural]: 0.00056 kg; lognormal variance with pedigree 0.056, pedigree (3,4,3,5,3)
  Proxy, based on 'Agricultural Field Work Processes'from Nemecek and Kagi, 2007.
- Nitrogen oxides [air, non-urban air or from high stacks]: 1.42646 kg; lognormal variance with pedigree 0.0541, pedigree (3,2,3,5,3)
  (same comment as for NMVOC, non-methane volatile organic compounds, unspecified origin)
- Chromium [air, non-urban air or from high stacks]: 1.68e-6 kg; lognormal variance with pedigree 0.6641, pedigree (3,2,3,5,3)
  Proxy, based on 'Agricultural Field Work Processes'from Nemecek and Kagi, 2007.
- Ammonia [air, non-urban air or from high stacks]: 0.000671 kg; lognormal variance with pedigree 0.0641, pedigree (3,2,3,5,3)
  Proxy, based on 'Agricultural Field Work Processes'from Nemecek and Kagi, 2007.
- Methane, fossil [air, non-urban air or from high stacks]: 0.00433 kg; lognormal variance with pedigree 0.0641, pedigree (3,2,3,5,3)
  Proxy, based on 'Agricultural Field Work Processes'from Nemecek and Kagi, 2007.
- Selenium [air, non-urban air or from high stacks]: 3.36e-7 kg; lognormal variance with pedigree 0.0641, pedigree (3,2,3,5,3)
  Proxy, based on 'Agricultural Field Work Processes'from Nemecek and Kagi, 2007.
- Zinc [air, non-urban air or from high stacks]: 3.36e-5 kg; lognormal variance with pedigree 0.6641, pedigree (3,2,3,5,3)
  Proxy, based on 'Agricultural Field Work Processes'from Nemecek and Kagi, 2007.
- Carbon monoxide, fossil [air, non-urban air or from high stacks]: 0.18124 kg; lognormal variance with pedigree 0.6641, pedigree (3,2,3,5,3)
  (same comment as for NMVOC, non-methane volatile organic compounds, unspecified origin)
- Particulates, < 2.5 um [air, non-urban air or from high stacks]: 0.35491 kg; lognormal variance with pedigree 0.0641, pedigree (3,2,3,5,3)
  Proxy, based on 'Agricultural Field Work Processes'from Nemecek and Kagi, 2007.
- Nickel [air, non-urban air or from high stacks]: 2.35e-6 kg; lognormal variance with pedigree 0.6641, pedigree (3,2,3,5,3)
  Proxy, based on 'Agricultural Field Work Processes'from Nemecek and Kagi, 2007.
- Dinitrogen monoxide [air, non-urban air or from high stacks]: 0.00403 kg; lognormal variance with pedigree 0.0641, pedigree (3,2,3,5,3)
  Proxy, based on 'Agricultural Field Work Processes'from Nemecek and Kagi, 2007.

## Sampling procedure
The main source of data for agricultural inputs and operations modelling procedures is detailed in Cavalett et al., 2016. Emissions from the agricultural process are estimated according to Nemecek and Kagi, 2007.

## Extrapolations
Extrapolated from Brazilian data, uncertainty adjusted accordingly.

## Review by Jens Lansche 2018-02-23
All review comments considered
