# DTPA production

Dataset: EcoSpold 2, unit process
Geography: RoW
Time period: 2000-01-01 to 2021-12-31
Technology level: current
Classification: ISIC rev.4 ecoinvent: 2011:Manufacture of basic chemicals
Classification: EcoSpold01Categories: chemicals/organics
Tags: ConvertedDataset
Scenario: Business-as-Usual
System model: Allocation, cut-off by classification
Generated by: Roland Hischier
Published in: Hischier R. 2007
Database: ecoinvent
isCopyrightProtected: true
accessRestrictedTo: 1

## General comment
The functional unit represent 1 kg of DTPA. Large uncertainty of the process data due to the fact that EDTA data are used here.
[This dataset was already contained in the ecoinvent database version 2. It was not individually updated during the transfer to ecoinvent version 3. Life Cycle Impact Assessment results may still have changed, as they are affected by changes in the supply chain, i.e. in other datasets. This dataset was generated following the ecoinvent quality guidelines for version 2. It may have been subject to central changes described in the ecoinvent version 3 change report (http://www.ecoinvent.org/database/ecoinvent-version-3/reports-of-changes/), and the results of the central updates were reviewed extensively. The changes added e.g. consistent water flows and other information throughout the database. The documentation of this dataset can be found in the ecoinvent reports of version 2, which are still available via the ecoinvent website. The change report linked above covers all central changes that were made during the conversion process.]

## Included activities end
Data from EDTA production taken as a first approximation

## Parameters
- fraction, cooling water, recirculating system, to air: 0.771 dimensionless; name fraction_CW_R_to_air; lognormal variance with pedigree 0.0413, pedigree (2,3,1,3,1)
  Calculated based on literature value (Scown, C.D., 2011, Water Footprint of U.S. Transportation Fuels and supplying information of the article) (Vionnet, S., Quantis Water Database - Technical Report, 2012).
- fraction, cooling water, cooling pond system, to air: 0.032 dimensionless; name fraction_CW_CP_to_air; lognormal variance with pedigree 0.0413, pedigree (2,3,1,3,1)
  (same comment as for fraction, cooling water, recirculating system, to air)
- fraction, cooling water, once-through system, to air: 0.004 dimensionless; name fraction_CW_OT_to_air; lognormal variance with pedigree 0.0413, pedigree (2,3,1,3,1)
  (same comment as for fraction, cooling water, recirculating system, to air)
- fraction, process water, to air: 0.205 dimensionless; name fraction_PW_to_air; lognormal variance with pedigree 0.092025, pedigree (4,4,3,2,4)
- fraction, cooling water, to air: 0.3875 dimensionless; name fraction_CW_to_air; = (0.5*fraction_CW_OT_to_air)+(0.5*fraction_CW_R_to_air); lognormal variance with pedigree 0.092025, pedigree (4,4,3,2,4)
  Calculated value based on literature value (see comments of the other parametres present in this dataset) and expert opinion. In the case when no industry/literature data are available about the type of cooling or directly fraction, cooling water, to air specific for the process a default assumption is applied. It is assumed that the once-through cooling system is used in 50% of all cases and recirculating system is used in another 50% of all cases.

## Reference product
- DTPA, diethylenetriaminepentaacetic acid: 1 kg; CPC 34: Basic chemicals; By-product classification allocatable product; CAS 67-43-6
  EcoSpold01Location=RER
  production volume 2.67763 kg
    This is a placeholder value that does not reflect real-world production volumes. This dataset does not currently require a real-world production volume to work in the database framework, and no actual data were collected yet. This has no negative effect on the results of the ecoinvent database.
  property price 1.11334 EUR2005
    Calculated based on inputs: The price of the product has been calculated as a sum of the values of the material and energy inputs for this product. This value is therefore a rough estimation. It may underestimate the real price since there are additional expenses when producing any product. These expences can include for example labour costs, treatment of waste materials and profit for the producer. Please consider carefully whether this level of data quality is acceptable for your application.
  property heating value, net 12.95 MJ
    LHV is calculated based on the Carbon content of the product. More details can be found on the respective documentation.
  property carbon content 0.427481
    carbon content on a dry matter basis (reserved; not for manual entry)
  properties: carbon content, non-fossil 0, water content 0, carbon content, fossil 0.427481, water in wet mass 0 kg, wet mass 1 kg, dry mass 1 kg, carbon allocation 0.427481 kg

## Inputs from technosphere
- formaldehyde: 0.333 kg; lognormal variance with pedigree 0.21, pedigree (5,5,5,5,5)
  Estimation, based on stoechiometry
  EcoSpold01Location=RER
  Uncertainty: estimation, based on stoechiometry
  properties: dry mass 1 kg, wet mass 1 kg, carbon content, fossil 0.4, heating value, net 20.19 MJ
- sodium cyanide: 0.543 kg; lognormal variance with pedigree 0.21, pedigree (5,5,5,5,5)
  (same comment as for formaldehyde)
  properties: dry mass 1 kg, carbon content, fossil 0.244898, wet mass 1 kg, heating value, net 7.43 MJ
- electricity, medium voltage: 0 kWh; pedigree (1,1,1,1,1)
  Estimated with data from a chemical plant
  EcoSpold01Location=UCTE
  Uncertainty: estimated with data from a chemical plant
- ethylenediamine: 0.166 kg; lognormal variance with pedigree 0.21, pedigree (5,5,5,5,5)
  (same comment as for formaldehyde)
  properties: heating value, net 28.24 MJ, carbon content, fossil 0.5, dry mass 1 kg, wet mass 1 kg
- heat, district or industrial, natural gas: 0 MJ; pedigree (1,1,1,1,1)
  EcoSpold01Location=RER
  Estimated with data from a chemical plant
  Uncertainty: estimated with data from a chemical plant
  properties: heating value, net 1 MJ
- chemical factory, organics: 4e-10 unit; lognormal variance with pedigree 0.5, pedigree (5,5,5,5,5)
  Estimation
  EcoSpold01Location=RER
  Uncertainty: estimation
- electricity, medium voltage: 0.00419753, 0.000804905, 0.0135127, 0.19653, 0.027701, 0.090254 kWh (6 entries); lognormal variance with pedigree 0.21, pedigree (5,5,5,5,4)
  (same comment as for electricity, medium voltage)
- heat, district or industrial, natural gas: 0.0303564, 1.96964 MJ (2 entries); lognormal variance with pedigree 0.21, pedigree (5,5,5,5,4)
  (same comment as for heat, district or industrial, natural gas)

## Inputs from nature
- Water, unspecified natural origin [natural resource, in water]: 0.012 m3; name water_UNO_input; lognormal variance with pedigree 0.21, pedigree (5,5,5,5,5)
  Estimation
  Uncertainty: estimation
- Water, cooling, unspecified natural origin [natural resource, in water]: 0.024 m3; name water_cooling_UNO_input; lognormal variance with pedigree 0.21, pedigree (5,5,5,5,4)
  Estimated with data from a chemical plant
  Uncertainty: estimated with data from a chemical plant

## Emissions to nature
- Carbon dioxide, fossil [air, urban air close to ground]: 0.0526 kg; lognormal variance with pedigree 0.21, pedigree (5,5,5,5,5)
  Estimation
  Uncertainty: estimation
- Water [air, unspecified]: 0.01176 m3; name water_to_air_unspecified; lognormal variance with pedigree 0.0827, pedigree (2,2,5,5,1)
  Calculated value based on literature values and expert opinion. See comments in the parametres' comment field.
  property fraction, origin: fresh water 0; name fraction_origin_fresh_water
  property fraction, origin: unspecified 1; name fraction_origin_unspecified
  property fraction, origin: salt water 0; name fraction_origin_salt_water
- Formaldehyde [water, surface water]: 0.0016 kg; lognormal variance with pedigree 0.51, pedigree (5,5,5,5,5)
  Estimation
  Uncertainty: estimation
- Nitrate [water, surface water]: 0.0139 kg; lognormal variance with pedigree 0.26, pedigree (5,5,5,5,5)
  Estimation
  Uncertainty: estimation
- COD, Chemical Oxygen Demand [water, surface water]: 0.00245 kg; lognormal variance with pedigree 0.26, pedigree (5,5,5,5,5)
  Estimation
  Uncertainty: estimation
- Ethylene diamine [air, urban air close to ground]: 0.00033 kg; lognormal variance with pedigree 0.33, pedigree (5,5,5,5,5)
  Estimation
  Uncertainty: estimation
- Ethylene diamine [water, surface water]: 0.0008 kg; lognormal variance with pedigree 0.51, pedigree (5,5,5,5,5)
  Estimation
  Uncertainty: estimation
- Sodium, ion [water, surface water]: 0.0127 kg; lognormal variance with pedigree 0.26, pedigree (5,5,5,5,5)
  Estimation
  Uncertainty: estimation
- Formaldehyde [air, urban air close to ground]: 0.00067 kg; lognormal variance with pedigree 0.33, pedigree (5,5,5,5,5)
  Estimation
  Uncertainty: estimation
- TOC, Total Organic Carbon [water, surface water]: 0.0016 kg; lognormal variance with pedigree 0.26, pedigree (5,5,5,5,5)
  Estimation
  Uncertainty: estimation
- Ammonium, ion [water, surface water]: 0.00402 kg; lognormal variance with pedigree 0.26, pedigree (5,5,5,5,5)
  Estimation
  Uncertainty: estimation
- DOC, Dissolved Organic Carbon [water, surface water]: 0.0016 kg; lognormal variance with pedigree 0.26, pedigree (5,5,5,5,5)
  Estimation
  Uncertainty: estimation
- BOD5, Biological Oxygen Demand [water, surface water]: 0.00245 kg; lognormal variance with pedigree 0.26, pedigree (5,5,5,5,5)
  Estimation
  Uncertainty: estimation
- Cyanide [water, surface water]: 0.00183 kg; lognormal variance with pedigree 0.26, pedigree (5,5,5,5,5)
  Estimation
  Uncertainty: estimation
- Cyanide [air, urban air close to ground]: 0.000576 kg; lognormal variance with pedigree 0.26, pedigree (5,5,5,5,5)
  Estimation
  Uncertainty: estimation
- Water [water, unspecified]: 0.02424 m3; name water_to_water_unspecified; lognormal variance with pedigree 0.0827, pedigree (2,2,5,5,1)
  (same comment as for Water)
  property carbon content, non-fossil 0; name C_content_non_fossil
  property water in wet mass 1000 kg; name WWM
  property carbon content, fossil 0; name C_content_fossil
  property wet mass 1000 kg; name WM
  property dry mass 0 kg; name DM
  property fraction, origin: fresh water 0; name fraction_origin_fresh_water_Ww
  property fraction, origin: unspecified 1; name fraction_origin_unspecified_Ww
  property fraction, origin: salt water 0; name fraction_origin_salt_water_Ww

## Extrapolations
This dataset has been copied from an original dataset covering the geography RER. The uncertainty has been adjusted accordingly.

## Review by Hans-Jörg Althaus 2003-07-02
passed
