# transport, passenger train

Dataset: EcoSpold 2, unit process
Geography: IT
Time period: 2000-01-01 to 2021-12-31
Technology level: current
Classification: EcoSpold01Categories: transport systems/train
Classification: ISIC rev.4 ecoinvent: 4911:Passenger rail transport, interurban
Scenario: Business-as-Usual
System model: Allocation, cut-off by classification
Share of production covered: 1 %
Generated by: Michael Spielmann (obsolete)
Published in: Spielmann M. 2007
Database: ecoinvent
isCopyrightProtected: true
accessRestrictedTo: 1

## General comment
The dataset represents the entire transport life cycle of a passenger train in Italy. Data of the energy use and operation emissions for the operation of average trains in Italy (regional trains, S-Bahn, long distance-trains), the data has been determined top down by International Rail Statistics. Particulate emissions due to abrasion of rail tracks, wheels, brakes and overhead contact line is included according to Swiss situation. Emission of sulphur hexafluoride (SF6) occurring during conversion at traction substations are accounted for.

## Included activities start
The dataset starts with the production of a long-distance train.

## Included activities end
The dataset ends with the service of transporting 1 passenger over a distance of 1 km by a long-distance train. The dataset includes the production, the maintenance and the energy use and operation emissions of a long-distance train, the construction of a railway track. The inventory of the energy use and operation emissions includes the actual energy consumption (77000 t Diesel and 3607 GWh of electricity) due to traction of passenger trains.

## Geography
Data of the energy use and operation emissions refers to average transport conditions

## Technology
Demand factors of various transport components required to fulfill the functional unit of one pkm. In order to account for the fact that the same rail tracks are used for both passenger and goods transportation are applied allocation factors. For the enrgy use and operation emissions, all technologies are included, the train is operated with the country electricity mix.

## Time period
For the enrgy use and operation emissions, all data is based on situation in the year 2000, except the specific energy consumption per pkm (year 2007)

## Reference product
- transport, passenger train: 1 person*km; By-product classification allocatable product; CPC 64: Passenger transport services
  EcoSpold01Location=IT
  production volume 3.8768e10 person*km
    47114 Mio. pkm in 2007
    UIC statistical synopsis 2005 http://www.uic.org/IMG/xls/synth2005-2.xls (total minus high-speed)
  property price 0.0208844 EUR2005
    Calculated based on inputs: The price of the product has been calculated as a sum of the values of the material and energy inputs for this product. This value is therefore a rough estimation. It may underestimate the real price since there are additional expenses when producing any product. These expences can include for example labour costs, treatment of waste materials and profit for the producer. Please consider carefully whether this level of data quality is acceptable for your application.

## Inputs from technosphere
All rows: lognormal variance with pedigree 0.04, pedigree (1,1,5,1,1)
- train, passenger, long-distance: 3.0166e-10 unit
  Calculated value, required to fulfill the functional unit of one pkm.
  EcoSpold01Location=CH
- maintenance, train, passenger, long distance: 3.0166e-10 unit
  Calculated value, required to fulfill the functional unit of one pkm.
- railway track: 6.1907e-5 m*year
  EcoSpold01Location=CH
  Calculated value, required to fulfill the functional unit of one pkm.
- electricity, high voltage: 0.076559 kWh
  Energy use and operation emissions
- diesel: 0.0016343 kg
  Energy use and operation emissions
  properties: wet mass 1 kg, heating value, net 42.8 MJ, carbon content, fossil 0.865, dry mass 1 kg
  note on carbon content, fossil: C-content of diesel is 86.5% (ecoinvent v2.2 report 6_IV, Tab 3.14)

## Emissions to nature
All rows: lognormal variance with pedigree 0.04, pedigree (1,1,5,1,1)
- Particulates, < 2.5 um [air, unspecified]: 2.0968e-6 kg
  Energy use and operation emissions
- Nickel [air, unspecified]: 1.1443e-10 kg
  Energy use and operation emissions
- Lead [air, unspecified]: 1.7985e-13 kg
  Energy use and operation emissions
- Sulfur dioxide [air, unspecified]: 9.8012e-7 kg
  Energy use and operation emissions
- Particulates, > 10 um [air, unspecified]: 1.1643e-5 kg
  Energy use and operation emissions
- Cadmium [air, unspecified]: 1.6343e-11 kg
  Energy use and operation emissions
- Dinitrogen monoxide [air, unspecified]: 1.6343e-7 kg
  Energy use and operation emissions
- Carbon dioxide, fossil [air, unspecified]: 0.005142 kg
  Energy use and operation emissions
- Selenium [air, unspecified]: 1.6343e-11 kg
  Energy use and operation emissions
- Nitrogen oxides [air, unspecified]: 8.9804e-5 kg
  Energy use and operation emissions
- Methane, fossil [air, unspecified]: 2.1244e-7 kg
  Energy use and operation emissions
- Carbon monoxide, fossil [air, unspecified]: 2.5831e-5 kg
  Energy use and operation emissions
- Sulfur hexafluoride [air, unspecified]: 3.3686e-9 kg
  Energy use and operation emissions
- Xylene [air, unspecified]: 6.5422e-8 kg
  Energy use and operation emissions
- Particulates, > 2.5 um, and < 10um [air, unspecified]: 1.0636e-5 kg
  Energy use and operation emissions
- NMVOC, non-methane volatile organic compounds, unspecified origin [air, unspecified]: 8.2803e-6 kg
  Energy use and operation emissions
- Benzene [air, unspecified]: 1.6343e-7 kg
  Energy use and operation emissions
- Zinc [air, unspecified]: 1.6343e-9 kg
  Energy use and operation emissions
- Mercury [air, unspecified]: 3.259e-14 kg
  Energy use and operation emissions
- Toluene [air, unspecified]: 6.5422e-8 kg
  Energy use and operation emissions
- Ammonia [air, unspecified]: 3.259e-8 kg
  Energy use and operation emissions
- Iron [soil, unspecified]: 2.8132e-5 kg
  Energy use and operation emissions
- Chromium [air, unspecified]: 8.1837e-11 kg
  Energy use and operation emissions
- Copper [air, unspecified]: 2.7762e-9 kg
  Energy use and operation emissions

## Sampling procedure
International railway statistics

## Extrapolations
This dataset has been extrapolated from year 2008 to the year of the calculation (2021). The uncertainty has been adjusted accordingly.

## Review by Carl Vadenbo 2012-06-29
In preparation for the release of ecoinvent v3.0, the datasets 'operation, average train IT' and 'transport, average train IT' in ecoinvent v2.2 were merged into the dataset 'transport, passenger train, IT 2008'. The amounts of the exchanges were reviewed and were found to correspond to the disaggregated datasets. The field Included Activities End and the uncertainty information need to be revised before subsequent releases of the database. Despite this shortcoming, the new dataset was accepted for inclusion into the ecoinvent database on 2012.07.04.

## Review by Christian Bauer 2010-02-07
passed

## Review by Roland Hischier 2011-09-28
Transfer of documentation done.
--> CHECK comments of exchanges ...
