# heat and power co-generation, natural gas, 500kW electrical, lean burn

Dataset: EcoSpold 2, unit process
Geography: CH
Time period: 2000-01-01 to 2021-12-31
Technology level: current
Classification: ISIC rev.4 ecoinvent: 3530:Steam and air conditioning supply
Classification: EcoSpold01Categories: natural gas/cogeneration
Tags: ConvertedDataset; with true value
Scenario: Business-as-Usual
System model: Allocation, cut-off by classification
Generated by: [System]
Published in: Heck, T. 2007
Database: ecoinvent
isCopyrightProtected: true
accessRestrictedTo: 1

## General comment
The multioutput-process 'natural gas, burned in cogen 500kWe lean burn, allocation exergy' delivers the coproducts 'heat, at cogen 500kWe lean burn, allocation exergy' and 'electricity, at cogen 500kWe lean burn, allocation exergy'. The exergy allocation is the allocation scheme suggested to be used within ecoinvent (e.g. in electricity mixes).
[This dataset was already contained in the ecoinvent database version 2. It was not individually updated during the transfer to ecoinvent version 3. Life Cycle Impact Assessment results may still have changed, as they are affected by changes in the supply chain, i.e. in other datasets. This dataset was generated following the ecoinvent quality guidelines for version 2. It may have been subject to central changes described in the ecoinvent version 3 change report (http://www.ecoinvent.org/database/ecoinvent-version-3/reports-of-changes/), and the results of the central updates were reviewed extensively. The changes added e.g. consistent water flows and other information throughout the database. The documentation of this dataset can be found in the ecoinvent reports of version 2, which are still available via the ecoinvent website. The change report linked above covers all central changes that were made during the conversion process.]

## Included activities end
The module includes fuel input, infrastructure, emissions to air, and substances needed for operation.

## Geography
Emissions and efficiencies adjusted to Swiss emission regulation (LRV, Luftreinhalteverordnung) valid in year 2000.

## Technology
Average technology available on market.

## Parameters
- scaling factor: 2.17391 dimensionless; name scaling_factor

## Reference product
- heat, district or industrial, natural gas: 1 MJ; = 0.46 * scaling_factor; CPC 17300: Steam and hot water; By-product classification allocatable product
  EcoSpold01Location=CH
  Amount was scaled to 1.
  production volume 3.9e8 MJ; name apv_heat
    Literature value/extrapolation.
    A relation of 1:1000 between the CH and the GLO dataset is assumed for extrapolation of the value to the global dataset.
  property true value relation 0.169678; name true_value_relation
    property to calculate "true value" from
  property Corresponding fuel use 1.9806 MJ; name fuel_use; = 0.025641*35.532/0.46
    Lower heating value of the fuel input related to the heat/electricity output
  property exergy 0.169678 MJ; name exergy
    allocation factor for electricity (=1) vs. heat, where heat is calculated as the termodynamic mean temperature Tm = (Tfeed-Treturn)/ln(Tfeed/Treturn), relative to the application temperature (Tu, typically = 293 K), i.e. (Tm-Tu)/Tm
  property price 0.0106 EUR2005
    Average European district heat price from Ecoheatcool and Euroheat 2005-2006, Ecoheat Work package 1: The European heat market. Final report. 10.6 EUR/GJ i s the price of district heat. http://www.solarthermalworld.org/files/Ecoheatcool%20WP1%20Web.pdf?download
  property true value 0.00567307
    allocation property applied in "true value" allocation // value calculated from true value relation
  properties: heating value, net 1 MJ, EcoSpold01Allocation_undefined_17 100, EcoSpold01Allocation_undefined_11 18, EcoSpold01Allocation_undefined_7 18, EcoSpold01Allocation_undefined_6 18, EcoSpold01Allocation_undefined_12 18, EcoSpold01Allocation_undefined_13 18, EcoSpold01Allocation_undefined_4 100, EcoSpold01Allocation_undefined_10 18, EcoSpold01Allocation_undefined_8 18, EcoSpold01Allocation_undefined_3 0, EcoSpold01Allocation_undefined_9 18, EcoSpold01Allocation_undefined_5 18, EcoSpold01Allocation_undefined_2 18, EcoSpold01Allocation_undefined_14 18, EcoSpold01Allocation_undefined_1 18, EcoSpold01Allocation_undefined_15 18

## By-products
- electricity, high voltage: 0 kWh; name electricity; By-product classification allocatable product; CPC 17100: Electrical energy
  Amount was scaled to the amount of reference product.
  EcoSpold01Location=CH
  production volume 8.47826e7 kWh; = apv_heat*electricity
    Calculated value
  property true value relation 3.6; name electricity_true_value_relation
    property to calculate "true value" from
  property price 0.0977 EUR2005; name electricity_price_EUR2005
    Temporary price data. Calculated as 90% of purchasers price based on: 94% of the average price (to account for a 6% loss in transformation and transmission) for electricity for industrial consumersin 2005 (excluded taxes). From IEA.
  property exergy 3.6 MJ; name electricity_exergy
    (same comment as for heat, district or industrial, natural gas)
  property true value 0.0261661; name electricity_true_value
    (same comment as for heat, district or industrial, natural gas)
  properties: EcoSpold01Allocation_undefined_4 0, EcoSpold01Allocation_undefined_14 82, EcoSpold01Allocation_undefined_1 82, EcoSpold01Allocation_undefined_9 82, EcoSpold01Allocation_undefined_5 82, EcoSpold01Allocation_undefined_6 82, EcoSpold01Allocation_undefined_3 100, EcoSpold01Allocation_undefined_13 82, EcoSpold01Allocation_undefined_10 82, EcoSpold01Allocation_undefined_2 82, EcoSpold01Allocation_undefined_15 82, EcoSpold01Allocation_undefined_8 82, EcoSpold01Allocation_undefined_11 82, EcoSpold01Allocation_undefined_7 82, EcoSpold01Allocation_undefined_16 100, EcoSpold01Allocation_undefined_12 82

## Inputs from technosphere
- lubricating oil: 1.16204e-5 kg; = 3E-05 * scaling_factor; lognormal variance with pedigree 0.05, pedigree (1,1,5,1,1)
  EcoSpold01Location=RER
  vender information
  Amount was scaled to the amount of reference product.
  properties: wet mass 1 kg, carbon content, fossil 0.75, dry mass 1 kg, heating value, net 40.2 MJ
  note on carbon content, fossil: Lubricating oil is produced from diesel. C-content/dry mass of fats and oils considered 75%, from: ecoinvent v2.2 report, n 15a, pg 40
  note on heating value, net: Literature value, Source: IPCC 2006, 2006 IPCC Guidelines for National Greenhouse Gas Inventories, Prepared by the National Greenhouse Gas Inventories Programme, Eggleston H.S., Buendia L., Miwa K., Ngara T. and Tanabe K. (eds). Published: IGES, Japan
- natural gas, low pressure: 0.00993195 m3; = 0.0256410256410256 * scaling_factor; lognormal variance with pedigree 0.04, pedigree (1,1,5,1,1)
  Amount was scaled to the amount of reference product.
  EcoSpold01Location=CH
  properties: carbon content, fossil 0.695187, heating value, gross 39 MJ, dry mass 1 kg, wet mass 1 kg, heating value, net 39 MJ
  note on carbon content, fossil: C content considered the same as in high pressure (consumption mix)
  note on heating value, net: Literature value, Source: United Nations Statistics Division (2018) International Recommendations for Energy Statistics (IRES). Available at: http://unstats.un.org/unsd/statcom/doc11/BG-IRES.pdf.
- heat and power co-generation unit, 500kW electrical, components for heat only: 7.74692e-10 unit; = 2E-09 * scaling_factor; lognormal variance with pedigree 0.04, pedigree (1,1,5,1,1)
  Amount was scaled to the amount of reference product.
  EcoSpold01Location=RER
- heat and power co-generation unit, 500kW electrical, components for electricity only: 7.74692e-10 unit; = 2E-09 * scaling_factor; lognormal variance with pedigree 0.04, pedigree (1,1,5,1,1)
  Amount was scaled to the amount of reference product.
  EcoSpold01Location=RER
- heat and power co-generation unit, 500kW electrical, common components for heat+electricity: 7.74692e-10 unit; = 2E-09 * scaling_factor; lognormal variance with pedigree 0.04, pedigree (1,1,5,1,1)
  EcoSpold01Location=RER
  Amount was scaled to the amount of reference product.
- waste mineral oil: -1.16204e-5 kg; name waste_min_oil; = (3E-05 * scaling_factor)*-1; lognormal variance with pedigree 0.16, pedigree (1,1,5,1,1)
  EcoSpold01Location=CH
  rough estimate
  Amount was scaled to the amount of reference product.
  production volume 25434.8 kg; = apv_heat*waste_min_oil
    Calculated value
  property price 0 EUR2005; name waste_min_oil_price_EUR2005
  properties: dry mass 0.9 kg, wet mass 1 kg, water content 0.111111, carbon content, fossil 0.864444, heating value, net 34.7 MJ
  note on carbon content, fossil: Tab A.6, ecoinvent v2.2 report 13_I. C content has been calculated after data in the tables, and then referred to 1 kg DM
  note on heating value, net: Value taken from the general comment of the treatment dataset.

## Emissions to nature
- NMVOC, non-methane volatile organic compounds, unspecified origin [air, urban air close to ground]: 3.87346e-6 kg; = 1E-05 * scaling_factor; lognormal variance with pedigree 1.12, pedigree (1,1,5,1,1)
  estimate based on different references
  Amount was scaled to the amount of reference product.
- Carbon monoxide, fossil [air, urban air close to ground]: 6.19753e-5 kg; = 0.00016 * scaling_factor; lognormal variance with pedigree 0.07, pedigree (1,1,5,1,1)
  (same comment as for NMVOC, non-methane volatile organic compounds, unspecified origin)
- Dinitrogen monoxide [air, urban air close to ground]: 1.93673e-6 kg; = 5E-06 * scaling_factor; lognormal variance with pedigree 0.34, pedigree (1,1,5,1,1)
  rough estimate
  Amount was scaled to the amount of reference product.
- Particulates, < 2.5 um [air, urban air close to ground]: 5.81019e-8 kg; = 1.5E-07 * scaling_factor; lognormal variance with pedigree 0.16, pedigree (1,1,5,1,1)
  (same comment as for NMVOC, non-methane volatile organic compounds, unspecified origin)
- Nitrogen oxides [air, urban air close to ground]: 2.71142e-5 kg; = 7E-05 * scaling_factor; lognormal variance with pedigree 0.06, pedigree (1,1,5,1,1)
  (same comment as for NMVOC, non-methane volatile organic compounds, unspecified origin)
- Carbon dioxide, fossil [air, urban air close to ground]: 0.0216914 kg; = 0.056 * scaling_factor; lognormal variance with pedigree 0.04, pedigree (1,1,5,1,1)
  composition of natural gas
  Amount was scaled to the amount of reference product.
- Sulfur dioxide [air, urban air close to ground]: 2.1304e-7 kg; = 5.5E-07 * scaling_factor; lognormal variance with pedigree 0.04, pedigree (1,1,5,1,1)
  composition of natural gas
  Amount was scaled to the amount of reference product.
- Methane, fossil [air, urban air close to ground]: 3.09877e-5 kg; = 8E-05 * scaling_factor; lognormal variance with pedigree 0.52, pedigree (1,1,5,1,1)
  (same comment as for NMVOC, non-methane volatile organic compounds, unspecified origin)

## Sampling procedure
Literature. Manufacturer information.

## Review by Emilia Moreno Ruiz 2012-04-16
calculation of fuel use property.

## Review by Gerald Rebitzer (obsolete) 2003-07-03
passed
