# styrene production

Dataset: EcoSpold 2, unit process
Geography: RER
Time period: 2015-01-01 to 2021-12-31
Technology level: current
Classification: ISIC rev.4 ecoinvent: 2011:Manufacture of basic chemicals
Synonyms: Styrol; Benzene, ethenyl-; Ethenylbenzene; Vinylbenzene; STYRENE; Phenylethylene
Scenario: Business-as-Usual
System model: Allocation, cut-off by classification
Generated by: Lucia Valsasina
Database: ecoinvent
isCopyrightProtected: true
accessRestrictedTo: 1

## General comment
This activity produces 1 kg of styrene. Styrene is an unsaturated aromatic monomer. Styrene is used in the production of polymers. Styrene is used in the following production processes in approximately the following shares: 60% for polystyrene production, 18% styrene – acrylonitrile copolymer (SAN) and terpolymers of acrylonitrile, butadiene, and styrene (ABS), 5% for styrene – butadiene rubber elastomers (SBR), 6% styrene – butadiene latexes, 5 % to producer unsaturated polyester resins (James and Castor 2011). Global production of styrene for the year 2008 was of 26 million tonnes (James and Castor 2011).
Reference(s):
Gendorf (2016) Umwelterklärung 2015, Werk Gendorf Industriepark, www.gendorf.de
James, D.H. and Castor, W.M. 2011. Styrene. In Ullmann's Encyclopedia of Industrial Chemistry, Electronic Release, Vol.34, pp.529-544. Wiley-VCH, Weinheim.
Welch, V.A. et al. 2005. Ethylbenzene. In Ullmann's Encyclopedia of Industrial Chemistry, Electronic Release, Vol.13, pp.451-464. Wiley-VCH, Weinheim.
Certain data points from a company survey by PlasticsEurope (three companies and four production sites).

## Included activities start
The activity starts when the raw materials enter the process.

## Included activities end
Materials entering the process are included as well as energy uses, infrastructure and emissions.

## Geography
The inputs to the process are based on a company survey of PlasticsEurope and literature data, they are therefore considered to be valid for the chosen geography. The inputs of water, factory and nitrogen are mostly taken as average of industry data. Industry data values are a 5-year average of data (2011 - 2015) published by the Gendorf factory (Gendorf, 2016, Umwelterklärung, www.gendorf.de), (Gendorf, 2015, Umwelterklärung, www.gendorf.de), (Gendorf, 2014, Umwelterklärung, www.gendorf.de). The Gendorf factory is based in Germany, it produces a wide range of chemical substances. The factory produced 1657400 tonnes of chemical substances in the year 2015 (Gendorf, 2016, Umwelterklärung, www.gendorf.de) and 740000 tonnes of intermediate products. As, according to Cefic Report of the chemical industry (Cefic 2016. Facts and figures 2016 of the European chemical industry. Accessible at: http://www.cefic.org/Facts-and-Figures/Chemicals-Industry-Profile/, accessed 30/06/2017), Germany covers 28.5% of EU chemical generated sales in 2015, we assumed these values to be representative of the RER geography.

## Technology
Styrene is mainly produced by the dehydrogenation of ethylbenzene (EBS process) and via ethylbenzene hydroperoxide (POSM process) with propylene oxide as a by-product (James and Castor 2011). This dataset reflects only the dehydrogenation of ethylbenzene (EBS). Close to the entire production of ethylbenzene is produced via the alkylation of ethylene and benzene (Welch et al. 2005). This production route has been used since the mid-nineties (James and Castor 2011).
Chemical reaction:
C6H6 + C2H4 -> C8H10
C8H10 -> C8H8 + H2
The reaction from ethylbenzene to styrene is reversible. The reaction is endothermic with a heat delta of 600 degrees Celcius and 124.0 kJ/mol (James and Castor 2011). The production of styrene is mostly performed (ca. 75% of production), by running ethylbenzene (the input includes recycled ethylbenzene) through subsequent reactors / reactors beds. Steam is used to dehydrogenate the input product. Steam has been found to ensure a high yield, provide the necessary conditions for the reaction to happen and at the same time cleaning the used catalyst (James and Castor 2011).
The use of a catalyst boosts the efficiency of the reaction, otherwise low temperature and low pressure are enough to ensure the reaction but with lower yield. Usual reaction conditions are 620 degrees Celsius combined with very low pressure, this ensures a yield between 88 and 95% (James and Castor 2011). According to James and Castor (2011) one of the most used catalyst for this reaction is composed by 84.3% iron (Fe2O3), 2.4% chromium (Cr2O3), and 13.3% potassium (K2CO3) (James and Castor 2011). The average lifespan of catalysts for this reaction is assumed to be 2 years (James and Castor 2011). The catalyst in not consider significant in terms of emissions for the reaction and it is therefore not included in this dataset and it is assumed to be taken into consideration in the input of chemical factory.
The main source of information for the values for water (process and cooling), nitrogen and chemical factory is industry data from Gendorf. The values are a 5-year average of data (2011 - 2015) published by the Gendorf factory (Gendorf, 2016, Umwelterklärung, www.gendorf.de), (Gendorf, 2015, Umwelterklärung, www.gendorf.de), (Gendorf, 2014, Umwelterklärung, www.gendorf.de). The Gendorf factory is based in Germany, it produces a wide range of chemical substances. The factory produced 1657400 tonnes of chemical substances in the year 2015 (Gendorf, 2016, Umwelterklärung, www.gendorf.de) and 740000 tonnes of intermediate products.
Reference(s):
Hischier, R. (2005) Establishing Life Cycle Inventories of Chemicals Based on Differing Data Availability (9 pp). The International Journal of Life Cycle Assessment, Volume 10, Issue 1, pp 59–67. 10.1065/lca2004.10.181.7
Gendorf (2016) Umwelterklärung 2015, Werk Gendorf Industriepark, www.gendorf.de
James, D.H. and Castor, W.M. 2011. Styrene. In Ullmann's Encyclopedia of Industrial Chemistry, Electronic Release, Vol.34, pp.529-544. Wiley-VCH, Weinheim.
Welch, V.A. et al. 2005. Ethylbenzene. In Ullmann's Encyclopedia of Industrial Chemistry, Electronic Release, Vol.13, pp.451-464. Wiley-VCH, Weinheim.
Certain data points from a company survey by PlasticsEurope (three companies and four production sites).

## Time period
The activity is based on a company survey from PlasticsEurope and literature data, it is therefore considered not to change significantly over time in terms of inputs. The inputs of water, factory and nitrogen are mostly taken as average of industry data. Industry data values are a 5-year average of data (2011 - 2015) published by the Gendorf factory (Gendorf, 2016, Umwelterklärung, www.gendorf.de), (Gendorf, 2015, Umwelterklärung, www.gendorf.de), (Gendorf, 2014, Umwelterklärung, www.gendorf.de). The Gendorf factory is based in Germany, it produces a wide range of chemical substances. The factory produced 1657400 tonnes of chemical substances in the year 2015 (Gendorf, 2016, Umwelterklärung, www.gendorf.de) and 740000 tonnes of intermediate products. The time period is therefore set based on the years from Gendorf reference.

## Reference product
- styrene: 1 kg; name RP; By-product classification allocatable product; CPC 34720: Polymers of styrene, in primary forms; CAS 100-42-5
  Styrene is an unsaturated aromatic monomer. Styrene is used in the production of polymers. Styrene is used in the following production processes in approximately the following shares: 60% for polystyrene production, 18% styrene – acrylonitrile copolymer (SAN) and terpolymers of acrylonitrile, butadiene, and styrene (ABS), 5% for styrene – butadiene rubber elastomers (SBR), 6% styrene – butadiene latexes, 5 % to producer unsaturated polyester resins (James and Castor 2011). Global production of styrene for the year 2008 was of 26 million tonnes (James and Castor 2011). Reference(s): Gendorf (2016) Umwelterklärung 2015, Werk Gendorf Industriepark, www.gendorf.de James, D.H. and Castor, W.M. 2011. Styrene. In Ullmann's Encyclopedia of Industrial Chemistry, Electronic Release, Vol.34, pp.529-544. Wiley-VCH, Weinheim. Welch, V.A. et al. 2005. Ethylbenzene. In Ullmann's Encyclopedia of Industrial Chemistry, Electronic Release, Vol.13, pp.451-464. Wiley-VCH, Weinheim.
  production volume 3.555e9 kg; name RP_PV
    Literature value. According to the European Chemicals Bureau (2002) Reports a volume of production between 2.2 and 4.9 million tons in Europe in 1995. The average is assumed in this dataset. Reference(s): European Chemicals Bureau (2002) Styrene. Part I - environment. European Union Risk Assessment. Retrieved from: https://echa.europa.eu/documents/10162/a05e9fc2-eaf7-448e-b9b2-d224d28173c0, acessed 19 July 2017
  property price 1.29 EUR2005; name RP_price_EUR2005
    Calculated from EU prices by use of exchange rates.
  property heating value, net 37.26 MJ
    LHV is calculated based on the elemental composition of the substance. Based on the name of the substance, the chemical formula of the substance is assumed to be: C8H8
  property carbon content 0.923077
    carbon content on a dry matter basis (reserved; not for manual entry)
  properties: carbon content, non-fossil 0, carbon content, fossil 0.923077, dry mass 1 kg, wet mass 1 kg, water content 0, water in wet mass 0 kg, carbon allocation 0.923077 kg

## Inputs from technosphere
- chemical factory, organics: 4e-10 unit; lognormal variance with pedigree 0.309425, pedigree (2,3,2,2,3)
  Calculated based on literature data published by the industry. For this activity, no information was readily available concerning infrastructure and land-use. Therefore, the infrastructure is estimated based on data from two chemical factories, the BASF site of Ludwigshafen and the chemical factory in Gendorf (which are both located in Germany), which produce a wide range of chemical substances. Based on this data, the following assumptions are made: the built area amounts to about 4.2 ha, the plant has an average output of 50'000 t/a and a lifespan of fifty years. The estimated infrastructure amount is therefore 4.00 E-10 units per kg of produced chemical. References: Althaus H.-J., Chudacoff M., Hischier R., Jungbluth N., Osses M. and Primas A. (2007) Life Cycle Inventories of Chemicals. ecoinvent report No. 8, v2.0. EMPA Dübendorf, Swiss Centre for Life Cycle Inventories, Dübendorf, CH. Gendorf (2000) Umwelterklärung 2000, Werk Gendorf. Werk Gendorf, Burgkirchen.
- wastewater, average: 0 m3; name BP_wastewater_average; pedigree (1,1,1,1,1)
  Calculated based on literature data published by the industry. This value is a 5-year average of data (2011 - 2015) published by the Gendorf factory (Gendorf, 2016, Umwelterklärung, www.gendorf.de), (Gendorf, 2015, Umwelterklärung, www.gendorf.de), (Gendorf, 2014, Umwelterklärung, www.gendorf.de). The amount of wastewater (which is later on treated in the municipal WWTP) per kg of chemical substance produced is calculated using literature data published by the Gendorf factory based in Germany, which produces a wide range of chemical substances. The factory produced 1657400 tonnes of chemical substances in the year 2015 (Gendorf, 2016, Umwelterklärung, www.gendorf.de) and 740000 tonnes of intermediate products. The amount of wastewater which is later on treated in the municipal WWTP in the year 2015 was 1200 tonnes (Gendorf, 2016, Umwelterklärung, www.gendorf.de). The resulting amount of wastewater is 2.7E-06 m3/kg of chemical product produced.
  production volume 0 m3
    Calculated from the production volume of the reference product in proportion to the respective output amounts.
  property price 0 EUR2005; name BP_wastewater_average_price_EUR2005
  properties: dry mass 0.346837 kg, carbon content, non-fossil 0.194039, wet mass 1000 kg, water content 2882.2
  note on carbon content, non-fossil: 0.0673 kg TOC/m3 (Tab A.17, ecoinvent v2.2 report 13_I). TOC was considered as Total Carbon.
- heat, district or industrial, other than natural gas: 1.7 MJ; lognormal variance with pedigree 0.0009, pedigree (1,2,2,1,1)
  Value based on a company survey by PlasticsEurope (three companies and four production sites). Heat from incineration of unreacted materials, residues and byproducts.
  properties: heating value, net 1 MJ
- heat, from steam, in chemical industry: 6.8 MJ; lognormal variance with pedigree 0.0009, pedigree (1,2,2,1,1)
  Value based on a company survey by PlasticsEurope (three companies and four production sites).
  properties: heating value, net 1 MJ
- tap water: 0.052 kg; lognormal variance with pedigree 0.010025, pedigree (2,3,2,2,3)
  Calculated value based on stoichiometric calculations and literature data. 18.01528g/mol is the molar mass of tap water (H2O). 106.1674g/mol is the molar mass of styrene (C8H10). Styrene is mainly produced by the dehydrogenation of ethylbenzene (James and Castor 2011). Close to the entire production of ethylbenzene is produced via the alkylation of ethylene and benzene (Welch et al. 2005). This production route has been used since the mid-nineties (James and Castor 2011). Chemical reaction: C6H6 + C2H4 -> C8H10 C8H10 -> C8H8 + H2
  properties: carbon content, fossil 0.00178991, water content 2962.17, wet mass 1 kg, dry mass 0.000337476 kg
  note on carbon content, fossil: Bicarbonate content is 2.93 mol/m3. CO2 content is 0.1 mol/m3 (ecoinvent v2.2 report 8, Tab 93.1).
- nitrogen, liquid: 0.038 kg; lognormal variance with pedigree 0.0912, pedigree (4,4,5,4,4)
  Estimated value. Expert judgement. The expert judgement is made starting from Industry data (see details about Gendorf in the paragraph below) and adjusted based on the modelled activity. The values are a 5-year average of data (2011 - 2015) published by the Gendorf factory (Gendorf, 2016, Umwelterklärung, www.gendorf.de), (Gendorf, 2015, Umwelterklärung, www.gendorf.de), (Gendorf, 2014, Umwelterklärung, www.gendorf.de). The Gendorf factory is based in Germany, it produces a wide range of chemical substances. The factory produced 1657400 tonnes of chemical substances in the year 2015 (Gendorf, 2016, Umwelterklärung, www.gendorf.de) and 740000 tonnes of intermediate products. Reference(s): Gendorf (2016) Umwelterklärung 2015, Werk Gendorf Industriepark, www.gendorf.de
  properties: dry mass 1 kg, wet mass 1 kg
- ethylene: 0.281 kg; lognormal variance with pedigree 0.0009, pedigree (1,2,2,1,1)
  (same comment as for heat, from steam, in chemical industry)
  properties: heating value, net 43.22 MJ, dry mass 1 kg, wet mass 1 kg, carbon content, fossil 0.857143
- benzene: 0.779 kg; lognormal variance with pedigree 0.0009, pedigree (1,2,2,1,1)
  (same comment as for heat, from steam, in chemical industry)
  properties: dry mass 1 kg, wet mass 1 kg, heating value, net 42.5 MJ, carbon content, fossil 0.923077
- electricity, medium voltage: 0.134 kWh; lognormal variance with pedigree 0.0009, pedigree (1,2,2,1,1)
  (same comment as for heat, from steam, in chemical industry)
- heat, district or industrial, natural gas: 1.5 MJ; lognormal variance with pedigree 0.0009, pedigree (1,2,2,1,1)
  (same comment as for heat, from steam, in chemical industry)
  properties: heating value, net 1 MJ
- wastewater, average: -2.43642e-6, -2.63575e-7 m3 (2 entries); lognormal variance with pedigree 0.010025, pedigree (2,3,2,2,3)
  (same comment as for wastewater, average)
  production volume 9598.5 m3

## Inputs from nature
- Water, river [natural resource, in water]: 0.00172 m3; lognormal variance with pedigree 0.0912, pedigree (4,4,5,4,4)
  (same comment as for nitrogen, liquid)
- Water, well, in ground [natural resource, in water]: 0.00166 m3; lognormal variance with pedigree 0.0912, pedigree (4,4,5,4,4)
  (same comment as for nitrogen, liquid)
- Water, cooling, unspecified natural origin [natural resource, in water]: 0.0328 m3; lognormal variance with pedigree 0.0912, pedigree (4,4,5,4,4)
  (same comment as for nitrogen, liquid)

## Emissions to nature
- Water [water, unspecified]: 0.0334 m3; lognormal variance with pedigree 0.0912, pedigree (4,4,5,4,4)
  (same comment as for nitrogen, liquid)
- Water [air, unspecified]: 0.0028 m3; lognormal variance with pedigree 0.0912, pedigree (4,4,5,4,4)
  (same comment as for nitrogen, liquid)
- Nitrogen [air, unspecified]: 0.038 kg; lognormal variance with pedigree 0.0912, pedigree (4,4,5,4,4)
  (same comment as for nitrogen, liquid)
- Benzene [air, unspecified]: 1.9588e-7 kg; lognormal variance with pedigree 0.0009, pedigree (1,2,2,1,1)
  (same comment as for heat, from steam, in chemical industry)
- Carbon dioxide, fossil [air, unspecified]: 0.01 kg; lognormal variance with pedigree 0.0106, pedigree (2,3,2,4,3)
  Value based on a company survey by PlasticsEurope (three companies and four production sites). The carbon dioxide emissions emerge from the regeneration of the catalyst of the ethylene benzene dehydrogenation with water.

## Sampling procedure
Literature data and company survey by Plastics Europe (three companies and four production sites).

## Extrapolations
This dataset has been extrapolated from year 2020 to the year of the calculation (2021). The uncertainty has been adjusted accordingly.

## Review by Emilia Moreno Ruiz 2017-08-10
This dataset was additionally reviewed in a separate review process by Eric Johnson of Atlantic Consulting as well as Emilia Moreno Ruiz and Gregor Wernet of ecoinvent.
