# packing, fibre cement product

Dataset: EcoSpold 2, unit process
Geography: RoW
Time period: 2000-01-01 to 2021-12-31
Technology level: current
Classification: ISIC rev.4 ecoinvent: 8292:Packaging activities
Classification: EcoSpold01Categories: construction materials/others
Tags: ConvertedDataset
Scenario: Business-as-Usual
System model: Allocation, cut-off by classification
Generated by: Daniel Kellenberger (obsolete)
Published in: Kellenberger D. 2007
Database: ecoinvent
isCopyrightProtected: true
accessRestrictedTo: 1

## General comment
The production amount used for normalization is 20'000t/a. This module is assumed to be valid also for plants up to 100'000t/a. The lifespan of the infrastructure and the land occupation are assumed to be 50 years.
[This dataset was already contained in the ecoinvent database version 2. It was not individually updated during the transfer to ecoinvent version 3. Life Cycle Impact Assessment results may still have changed, as they are affected by changes in the supply chain, i.e. in other datasets. This dataset was generated following the ecoinvent quality guidelines for version 2. It may have been subject to central changes described in the ecoinvent version 3 change report (http://www.ecoinvent.org/database/ecoinvent-version-3/reports-of-changes/), and the results of the central updates were reviewed extensively. The changes added e.g. consistent water flows and other information throughout the database. The documentation of this dataset can be found in the ecoinvent reports of version 2, which are still available via the ecoinvent website. The change report linked above covers all central changes that were made during the conversion process.]

## Included activities end
Includes the process of packing, transportation, and loading of the bags on paletts. The machines, the waste treatment after use by the end-user of the fibre cement products and the transports of the packing materials are included.

## Geography
Data from a company producing lime products in Switzerland are adjusted

## Technology
Assumed that packaging is the same as for lime products

## Reference product
- packing, fibre cement product: 1 kg; CPC 85400: Packaging services; By-product classification allocatable product
  EcoSpold01Location=CH
  production volume 3.96633 kg
    This is a placeholder value that does not reflect real-world production volumes. This dataset does not currently require a real-world production volume to work in the database framework, and no actual data were collected yet. This has no negative effect on the results of the ecoinvent database.
  property price 0.00662933 EUR2005
    Calculated based on inputs: The price of the product has been calculated as a sum of the values of the material and energy inputs for this product. This value is therefore a rough estimation. It may underestimate the real price since there are additional expenses when producing any product. These expences can include for example labour costs, treatment of waste materials and profit for the producer. Please consider carefully whether this level of data quality is acceptable for your application.

## Inputs from technosphere
- kraft paper: 0.00787 kg; lognormal variance with pedigree 0.054, pedigree (1,4,5,5,1)
  EcoSpold01Location=RER
  properties: dry mass 0.945 kg, wet mass 1 kg, heating value, net 14.11 MJ, carbon content, non-fossil 0.41662, water content 0.0582011, carbon content, fossil 0.0020219
  note on carbon content, non-fossil: Biogenic C content was calculated after biogenic C contents of chemicals used in the production of the paper (in Tab 9.4 ecoinvent v2.2 report 11_III, part 9). The cellulose content in 1 kg of paper (on a wet mas basis) was estimated as (1-chemical content), C content of cellulose was considered 0.44 kgC/kg dry mass (ecoinvent v2.2 report, n 15a, pg 40)
  note on carbon content, fossil: Fossil C content was calculated after fossil C contents of chemicals used in the production of the paper (in Tab 9.4 ecoinvent v2.2 report 11_III, part 9).
- industrial machine, heavy, unspecified: 6e-5 kg; lognormal variance with pedigree 0.5, pedigree (5,5,5,5,5)
  EcoSpold01Location=RER
- EUR-flat pallet: 0.0001 unit; lognormal variance with pedigree 0.096, pedigree (4,5,5,5,3)
  EcoSpold01Location=RER
  properties: carbon content, fossil 0.0311351, carbon content, non-fossil 0.58833, water content 0.2, wet mass 22 kg, dry mass 18.3333 kg, heating value, net 335.11 MJ
  note on carbon content, fossil: C content in components of the pallet (ecoinvent v2.2 report 7_part XVIII)
- waste wood, untreated: 0 kg; pedigree (1,1,1,1,1)
  EcoSpold01Location=CH
  production volume 0 kg
    Calculated from the production volume of packing, fibre cement product in proportion to the respective output amounts.
  properties: water content 0.25, wet mass 1 kg, carbon content, non-fossil 0.48632, dry mass 0.8 kg, heating value, net 13.99 MJ
  note on carbon content, non-fossil: Tab A.4, ecoinvent v2.2 report 13_I. C content has been referred to 1 kg DM,
  note on heating value, net: Value taken from the general comment of the treatment dataset.
- conveyor belt: 2.5e-8 m; lognormal variance with pedigree 0.5, pedigree (5,5,5,5,5)
  EcoSpold01Location=RER
- waste graphical paper: 0 kg; pedigree (1,1,1,1,1)
  EcoSpold01Location=CH
  production volume 0 kg
    (same comment as for waste wood, untreated)
  properties: heating value, net 14.12 MJ, carbon content, non-fossil 0.454955, water content 0.126126, dry mass 0.888 kg, wet mass 1 kg
- electricity, medium voltage: 0 kWh; pedigree (1,1,1,1,1)
  EcoSpold01Location=CH
- packaging film, low density polyethylene: 9.84e-5 kg; lognormal variance with pedigree 0.1786, pedigree (4,5,5,5,5)
  EcoSpold01Location=RER
  properties: heating value, net 42.47 MJ, carbon content, fossil 0.857143, dry mass 1 kg, wet mass 1 kg
  note on carbon content, fossil: Polyethylene is formed out of a huge amount of ethylene monomers (C2H4) (ecoinvent v2.2 report 11_II). MW=28 g/mol
- section bar rolling, steel: 0.0011 kg; lognormal variance with pedigree 0.0526, pedigree (2,1,5,5,1)
  EcoSpold01Location=RER
- waste polyethylene: 0 kg; pedigree (1,1,1,1,1)
  EcoSpold01Location=CH
  production volume 0 kg
    (same comment as for waste wood, untreated)
  properties: heating value, net 42.47 MJ, wet mass 1 kg, carbon content, fossil 0.825301, dry mass 0.996 kg, water content 0.00401606
  note on carbon content, fossil: C content in 1 kg DM was calculated using data in Tab A.1, ecoinvent v2.2 report 13_I
- steel, low-alloyed, hot rolled: 0.0011 kg; lognormal variance with pedigree 0.0526, pedigree (2,1,5,5,1)
  EcoSpold01Location=RER
  properties: dry mass 1 kg, wet mass 1 kg, carbon content, fossil 0.005
  note on carbon content, fossil: Low alloyed steel composition given in Tab. 3.2 ecoinvent v2.2 report 10_partII. Steel assumed to have a C content of 0.5%
- waste wood, untreated: -0.000177923, -2.20918e-5, -1.61516e-6, -6.20493e-5, -9.37416e-6, -1.48198e-5, -0.000277029, -0.0023605 kg (8 entries); lognormal variance with pedigree 0.096, pedigree (4,5,5,5,3)
  EcoSpold01Location=CH
  production volume 0.0087762 kg
- waste graphical paper: -0.000344264, -5.25707e-5, -4.59683e-6, -0.00018996, -1.85227e-5, -3.42874e-5, -0.000830539, -0.00639526 kg (8 entries); lognormal variance with pedigree 0.054, pedigree (1,4,5,5,1)
  EcoSpold01Location=CH
  production volume 0.02361 kg
- electricity, medium voltage: 3.14302e-5, 6.02696e-6, 0.000138388, 0.00045818, 0.00010118, 0.00147157, 0.000207419, 0.000675802 kWh (8 entries); lognormal variance with pedigree 0.0421, pedigree (1,2,5,5,1)
  EcoSpold01Location=CH
- waste polyethylene: -1.36827e-5, -9.14229e-7, -6.91416e-8, -3.77609e-7, -1.5255e-7, -3.58575e-7, -1.16583e-5, -9.57868e-5 kg (8 entries); lognormal variance with pedigree 0.1786, pedigree (4,5,5,5,5)
  EcoSpold01Location=CH
  production volume 0.000369 kg

## Sampling procedure
Assumption

## Extrapolations
See geography This dataset has been copied from an original dataset covering the geography CH. The uncertainty has been adjusted accordingly.

## Review by Roberto Dones 2005-07-19
passed
