# printed wiring board production, for through-hole mounting, Pb containing surface

Dataset: EcoSpold 2, unit process
Geography: GLO
Time period: 2003-01-01 to 2021-12-31
Technology level: current
Classification: ISIC rev.4 ecoinvent: 2610:Manufacture of electronic components and boards
Classification: EcoSpold01Categories: electronics/module
Tags: ConvertedDataset
Scenario: Business-as-Usual
System model: Allocation, cut-off by classification
Generated by: Roland Hischier
Published in: Hischier R. 2007
Database: ecoinvent
isCopyrightProtected: true
accessRestrictedTo: 1

## General comment
This dataset represents the assembly of 1 m2 of a 2-layer FR-4 printed wiring board. It is based on a 1.6 mm thick 2-layer PWB with a hot air solder leveling (HAL) surface finishing with a tin-lead-mixture 6.79 g Sn and 3.99 g Pb per m2 PWB, a weight of 3.08 kg, soldermask, for through-hole mount applications, without mounted components used in industry electronics and simple ICT applications. Main data are taken from environmental reports of 2 German PWB producers, plus from literature.

## Included activities start
From reception of raw materials at the factory gate.

## Included activities end
This dataset includes (raw) materials, infrastructure, energy consumption, emissions to air and water and waste. Not included into this dataset is the mounting of the PWB.

## Geography
This module is based on information from European producers that are seen as representative for the global situation.

## Technology
Average PWB production composed of: substrate preparation, imaging, exposure, etching, sandwiching, via opening, desmearing, activation and accelaration steps as well as via filling, second imaging, exposure, copper plating, cleaning, oxidification, dry vacuum lamination, micro etching, hot air leveling.

## Parameters
- fraction, process water, to air: 0.061 dimensionless; name fraction_PW_to_air; lognormal variance with pedigree 0.092025, pedigree (4,4,3,2,4)
  Literature value (Statistics Canada, 2007 & Shaffer, K.H., 2008, Consumptive water use in the Great Lakes Basin, USGS) (Vionnet, S., Quantis Water Database - Technical Report, 2012).
- fraction, water, ultrapure, to air: 0.061 dimensionless; name fraction_WUP_to_air; = fraction_PW_to_air; lognormal variance with pedigree 0.092025, pedigree (4,4,3,2,4)
  Calculated value. See comment in the other parametres present in this dataset. Ultrapure water is considered to be always used as process water, thus process water fractions to air are applied to all ultrapure water input flows to calculate the amount of water consumed in the processes.
- fraction, tap water, to air: 0.061 dimensionless; name fraction_TW_to_air; = fraction_PW_to_air; lognormal variance with pedigree 0.092025, pedigree (4,4,3,2,4)
  Calculated value. See comment in the other parametres present in this dataset. Tap water is considered to be always used as process water, thus process water fractions to air are applied to all tap water input flows to calculate the amount of water consumed in the processes.

## Reference product
- printed wiring board, for through-hole mounting, Pb containing surface: 1 m2; By-product classification allocatable product; CPC 47130: Printed circuits
  Typically, a printed wiring board (PWB) consists of a number of electric current conducting and non-conducting layers which are sandwiched together. Printed wiring boards are the interconnective electrical framework and physical structure that hold together the various electronic components.
  EcoSpold01Location=GLO
  production volume 1 m2
    $ 18.9315 Billion in 1998 (includes all rigid PWB)
    Dummy value to be replaced by measured, estimated or calculated value
  property price 28.8536 EUR2005
    Calculated based on inputs: The price of the product has been calculated as a sum of the values of the material and energy inputs for this product. This value is therefore a rough estimation. It may underestimate the real price since there are additional expenses when producing any product. These expences can include for example labour costs, treatment of waste materials and profit for the producer. Please consider carefully whether this level of data quality is acceptable for your application.
  property carbon content, fossil 0.203154
    C content was calculated as the addition of C content in the PWB components, and then referred to 1 kg DM
  property carbon content 0.203154
    carbon content on a dry matter basis (reserved; not for manual entry)
  properties: water content 0, dry mass 3.08 kg, water in wet mass 0 kg, wet mass 3.08 kg, carbon content, non-fossil 0, carbon allocation 0.625715 kg

## Inputs from technosphere
- hydrogen peroxide, without water, in 50% solution state: 0 kg; source AT&S AG  2006; pedigree (1,1,1,1,1)
  Estimation, based on literature and own assumptions.
  EcoSpold01Location=RER
  properties: dry mass 1 kg, wet mass 1 kg, heating value, net 7.13 MJ
- hazardous waste, for incineration: 0 kg; source AT&S AG  2006; pedigree (1,1,1,1,1)
  Proxy with literature value, due to a lack of more specific information, to represent harmful waste, hazardous waste is used.
  EcoSpold01Location=CH
  production volume 0 kg
    Calculated from the production volume of printed wiring board, for through-hole mounting, Pb containing surface in proportion to the respective output amounts.
  properties: water content 0.333333, carbon content, fossil 0.554667, dry mass 0.75 kg, wet mass 1 kg, heating value, net 17 MJ
  note on carbon content, fossil: Tab A.6, ecoinvent v2.2 report 13_I. C content has been calculated after data in the tables, and then referred to 1 kg DM
  note on heating value, net: Value taken from the general comment of the treatment dataset.
- waste plastic, mixture: 0 kg; source AT&S AG  2006; pedigree (1,1,1,1,1)
  EcoSpold01Location=CH
  Literature Value
  production volume 0 kg
    (same comment as for hazardous waste, for incineration)
  properties: wet mass 1 kg, dry mass 0.847 kg, water content 0.180638, carbon content, fossil 0.747344, heating value, net 30.79 MJ
  note on carbon content, fossil: C content in 1 kg DM was calculated using data in Tab A.2, ecoinvent v2.2 report 13_I
- tap water: 308 kg; name tap_water_input; source AT&S AG  2006; lognormal variance with pedigree 0.05, pedigree (1,1,5,1,1)
  EcoSpold01Location=RER
  Estimation, based on literature.
  properties: dry mass 0.000337476 kg, water content 2962.17, carbon content, fossil 0.00178991, wet mass 1 kg
  note on carbon content, fossil: Bicarbonate content is 2.93 mol/m3. CO2 content is 0.1 mol/m3 (ecoinvent v2.2 report 8, Tab 93.1).
- potassium carbonate: 3.7827 kg; source AT&S AG  2006; lognormal variance with pedigree 0.07, pedigree (1,1,5,1,1)
  Estimation, based on literature and own assumptions.
  EcoSpold01Location=GLO
  properties: dry mass 1 kg, carbon content, fossil 0.0869565, wet mass 1 kg, heating value, net 2.63 MJ
- sodium persulfate: 0.6538 kg; source AT&S AG  2006; lognormal variance with pedigree 0.07, pedigree (1,1,5,1,1)
  EcoSpold01Location=GLO
  Estimation, based on literature and own assumptions.
  properties: dry mass 1 kg, wet mass 1 kg
- electricity, medium voltage: 94.6 kWh; source AT&S AG  2006; lognormal variance with pedigree 0.04, pedigree (1,1,5,1,1)
  Estimation, based on literature, average data over 3 years from 3 European PWB producer.
  Further references:
  hmp (2006) Umweltbericht 2005. Heidenhain-Microprint GmbH (hmp), Berlin (Germany), Online-Version under: www.hmp-heidenhain.de <http://www.hmp-heidenhain.de>.
  SEAG (2006) Umweltbericht 2006 - Zusammenfassung. Schweizer Electronic AG (SEAG), Schramberg (Germany), Online-Version under: www.schweizerelectronic.ag <http://www.schweizerelectronic.ag>.
  EcoSpold01Location=UCTE
- municipal solid waste: 0 kg; source AT&S AG  2006; pedigree (1,1,1,1,1)
  EcoSpold01Location=CH
  Proxy with literature value, due to a lack of more specific information, to represent garbage, municipal waste to municipal incineration is used.
  production volume 0 kg
    (same comment as for hazardous waste, for incineration)
  properties: carbon content, non-fossil 0.261655, carbon content, fossil 0.171549, water content 0.297017, wet mass 1 kg, dry mass 0.771 kg, heating value, net 11.74 MJ
  note on carbon content, non-fossil: MSW composition in tab 4.1, ecoinvent v2.2 report 13_I. C content referred to 1 kg DM
- water, ultrapure: 0 kg; name water_ultrapure_input; source AT&S AG  2006; pedigree (1,1,1,1,1)
  Estimation, based on literature.
  EcoSpold01Location=GLO
  properties: wet mass 1 kg
- electronic component factory: 2e-8 unit; lognormal variance with pedigree 0.5761, pedigree (4,5,5,3,5)
  EcoSpold01Location=GLO
  Proxy, Due to a lack of specific information, electronic component plant is used.
  Uncertainty: rough assumption
- spent solvent mixture: 0 kg; source AT&S AG  2006; pedigree (1,1,1,1,1)
  EcoSpold01Location=CH
  Proxy with literature value, due to a lack of more specific information, to represent organic solvents / resins / paints, spent solvent mixture is used.
  production volume 0 kg
    (same comment as for hazardous waste, for incineration)
  properties: heating value, net 21.7 MJ, water content 0.197605, carbon content, fossil 0.571257, dry mass 0.835 kg, wet mass 1 kg
  note on carbon content, fossil: Tab A.7, ecoinvent v2.2 report 13_I. C content has been calculated after data in the tables, and then referred to 1 kg DM
- heat, district or industrial, other than natural gas: 0.755 MJ; source AT&S AG  2006; lognormal variance with pedigree 0.05, pedigree (1,1,5,1,1)
  EcoSpold01Location=RER
  Estimation, based on literature, average data over 3 years from 3 European PWB producer.
  Further references:
  hmp (2006) Umweltbericht 2005. Heidenhain-Microprint GmbH (hmp), Berlin (Germany), Online-Version under: www.hmp-heidenhain.de <http://www.hmp-heidenhain.de>.
  SEAG (2006) Umweltbericht 2006 - Zusammenfassung. Schweizer Electronic AG (SEAG), Schramberg (Germany), Online-Version under: www.schweizerelectronic.ag <http://www.schweizerelectronic.ag>.
  properties: heating value, net 1 MJ
- acrylic varnish, without water, in 87.5% solution state: 0 kg; source AT&S AG  2006; pedigree (1,1,1,1,1)
  EcoSpold01Location=RER
  Estimation, based on literature and own assumptions.
  properties: carbon content, fossil 0.674725, dry mass 1 kg, wet mass 1 kg, heating value, net 20.44 MJ
  note on carbon content, fossil: Isobornyl acrylate (C13H20O2) has been used as a representative example of acrylic varnish (Turpentines, Ullmann).The formulation of this specific varnish includes 50% acrylic binder
- nickel, class 1: 0.0042 kg; source ZVEI 2006; lognormal variance with pedigree 0.05, pedigree (1,1,5,1,1)
  Calculated value, based on literature assuming a yield of 91.6% and square weight of 3.08 kg.
  Further references:
  AT&S AG (2006) Environmental Report 2006. Austria Technologie & Systemtechnik Aktiengesellschaft (AT&S AG), Fehring, Leoben (Austria), Online-Version under: www.ats.net <http://www.ats.net>.
  EcoSpold01Location=GLO
  properties: dry mass 1 kg, wet mass 1 kg
- hydrochloric acid, without water, in 30% solution state: 0 kg; source AT&S AG  2006; pedigree (1,1,1,1,1)
  Estimation, based on literature and own assumptions.
  EcoSpold01Location=RER
  properties: heating value, net 3.32 MJ, wet mass 1 kg, dry mass 1 kg
- ethanol, without water, in 99.7% solution state, from ethylene: 0 kg; source AT&S AG  2006; pedigree (1,1,1,1,1)
  EcoSpold01Location=RER
  Estimation, based on literature and own assumptions.
  properties: carbon content, fossil 0.521739, dry mass 1 kg, wet mass 1 kg, heating value, net 31.58 MJ
- iron (III) chloride, without water, in 40% solution state: 0.183 kg; source AT&S AG  2006; lognormal variance with pedigree 0.05, pedigree (1,1,5,1,1)
  Estimation, based on literature and own assumptions.
  EcoSpold01Location=CH
  properties: wet mass 1 kg, dry mass 1 kg
- tin: 0.0071474 kg; source ZVEI 2006; lognormal variance with pedigree 0.05, pedigree (1,1,5,1,1)
  EcoSpold01Location=RER
  Calculated value, based on literature assuming a yield of 91.6% and square weight of 3.08 kg.
  Further references:
  AT&S AG (2006) Environmental Report 2006. Austria Technologie & Systemtechnik Aktiengesellschaft (AT&S AG), Fehring, Leoben (Austria), Online-Version under: www.ats.net <http://www.ats.net>.
  properties: wet mass 1 kg, dry mass 1 kg
- isopropanol: 0 kg; source AT&S AG  2006; pedigree (1,1,1,1,1)
  EcoSpold01Location=RER
  Estimation, based on literature and own assumptions.
  properties: dry mass 1 kg, wet mass 1 kg, heating value, net 34.3 MJ, carbon content, fossil 0.6
- glass fibre reinforced plastic, polyester resin, hand lay-up: 2.9916 kg; source ZVEI 2006; lognormal variance with pedigree 0.05, pedigree (1,1,5,1,1)
  Proxy with calculated value, to represent cores, glass fibre is used. Calculation is based on literature assuming a yield of 91.6% and square weight of 3.08 kg.
  Further references:
  AT&S AG (2006) Environmental Report 2006. Austria Technologie & Systemtechnik Aktiengesellschaft (AT&S AG), Fehring, Leoben (Austria), Online-Version under: www.ats.net <http://www.ats.net>.
  EcoSpold01Location=RER
  properties: wet mass 1 kg, dry mass 1 kg, carbon content, fossil 0.246639
  note on carbon content, fossil: C content was calculated as an addition of C content in the product components (60% glass fibre, 40% polyester resin)
- sulfuric acid: 0 kg; source AT&S AG  2006; pedigree (1,1,1,1,1)
  EcoSpold01Location=RER
  Estimation, based on literature and own assumptions.
  properties: wet mass 1 kg, dry mass 1 kg
- sheet rolling, copper: 1.8167 kg; source ZVEI 2006; lognormal variance with pedigree 0.05, pedigree (1,1,5,1,1)
  (same comment as for tin)
- copper, cathode: 0.75245 kg; source ZVEI 2006; lognormal variance with pedigree 0.07, pedigree (1,1,5,1,1)
  Calculated value, based on literature assuming a yield of 91.6% and square weight of 3.08 kg.
  Further references:
  AT&S AG (2006) Environmental Report 2006. Austria Technologie & Systemtechnik Aktiengesellschaft (AT&S AG), Fehring, Leoben (Austria), Online-Version under: www.ats.net <http://www.ats.net>.
  EcoSpold01Location=RER
  properties: dry mass 1 kg, wet mass 1 kg
- sodium hydroxide, without water, in 50% solution state: 0.434 kg; source AT&S AG  2006; lognormal variance with pedigree 0.05, pedigree (1,1,5,1,1)
  Estimation, based on literature and own assumptions.
  EcoSpold01Location=RER
  properties: dry mass 1 kg, wet mass 1 kg, heating value, net 3.03 MJ
- polyethylene, linear low density, granulate: 0.02335 kg; source ZVEI 2006; lognormal variance with pedigree 0.07, pedigree (1,1,5,1,1)
  (same comment as for tin)
  properties: wet mass 1 kg, heating value, net 42.47 MJ, carbon content, fossil 0.857143, dry mass 1 kg
  note on carbon content, fossil: Polyethylene is formed out of a huge amount of ethylene monomers (C2H4) (ecoinvent v2.2 report 11_II). MW=28 g/mol
- sodium chloride, powder: 0.327 kg; source ZVEI 2006; lognormal variance with pedigree 0.05, pedigree (1,1,5,1,1)
  (same comment as for tin)
  properties: dry mass 1 kg, wet mass 1 kg
- ammonium chloride: 1.868 kg; source AT&S AG  2006; lognormal variance with pedigree 0.07, pedigree (1,1,5,1,1)
  EcoSpold01Location=GLO
  Estimation, based on literature and own assumptions.
  properties: wet mass 1 kg, dry mass 1 kg
- phenolic resin: 0 kg; source ZVEI 2006; pedigree (1,1,1,1,1)
  EcoSpold01Location=RER
  Proxy with calculated value, to represent soldermask finishing, phenolic resin is used. Calculation is based on literature assuming a yield of 91.6% and square weight of 3.08 kg.
  Further references:
  AT&S AG (2006) Environmental Report 2006. Austria Technologie & Systemtechnik Aktiengesellschaft (AT&S AG), Fehring, Leoben (Austria), Online-Version under: www.ats.net <http://www.ats.net>.
  properties: heating value, net 33.57 MJ, carbon content, fossil 0.772277, dry mass 1 kg, wet mass 1 kg
  note on carbon content, fossil: (C6H5OH)-CH2-(C6H5OH) was considered to be the basic structure in phenolic resin (ecoinvent v2.2 report 8-part 61). C13H14O2, MW=202 g/mol
- dipropylene glycol monomethyl ether: 0 kg; source AT&S AG  2006; pedigree (1,1,1,1,1)
  EcoSpold01Location=RER
  Estimation, based on literature and own assumptions.
  properties: carbon content, fossil 0.567568, wet mass 1 kg, dry mass 1 kg, heating value, net 30.27 MJ
- sludge from steel rolling: -0.743 kg; source AT&S AG  2006; lognormal variance with pedigree 0.05, pedigree (1,1,5,1,1)
  Proxy with literature value, due to a lack of more specific information, to represent sludge from WWTP, sluge from steel rolling is used.
  EcoSpold01Location=CH
  production volume 0.743 kg
    (same comment as for hazardous waste, for incineration)
  properties: water content 0.25, wet mass 1 kg, dry mass 0.8 kg, carbon content, fossil 0.0123943
- heat, district or industrial, natural gas: 126 MJ; source AT&S AG  2006; lognormal variance with pedigree 0.04, pedigree (1,1,5,1,1)
  Estimation, based on literature, average data over 3 years from 3 European PWB producer.
  Further references:
  hmp (2006) Umweltbericht 2005. Heidenhain-Microprint GmbH (hmp), Berlin (Germany), Online-Version under: www.hmp-heidenhain.de <http://www.hmp-heidenhain.de>.
  SEAG (2006) Umweltbericht 2006 - Zusammenfassung. Schweizer Electronic AG (SEAG), Schramberg (Germany), Online-Version under: www.schweizerelectronic.ag <http://www.schweizerelectronic.ag>.
  EcoSpold01Location=RER
  properties: heating value, net 1 MJ
- hydrogen peroxide, without water, in 50% solution state: 0.041586, 0.197414 kg (2 entries); source AT&S AG  2006; lognormal variance with pedigree 0.05, pedigree (1,1,5,1,1)
  Estimation, based on literature and own assumptions.
  EcoSpold01Location=RER
- hazardous waste, for incineration: -0.63112, -0.0164971, -1.31238 kg (3 entries); source AT&S AG  2006; lognormal variance with pedigree 0.05, pedigree (1,1,5,1,1)
  (same comment as for hazardous waste, for incineration)
  production volume 1.96 kg
- waste plastic, mixture: -0.0218498, -0.00168449, -0.000695756, -0.000660685, -0.0252109, -0.000281077, -0.000127395, -0.17649 kg (8 entries); source AT&S AG  2006; lognormal variance with pedigree 0.05, pedigree (1,1,5,1,1)
  EcoSpold01Location=CH
  Literature Value
  production volume 0.227 kg
- municipal solid waste: -0.00720505, -4.41618e-5, -3.09027e-5, -0.000122642, -0.0867372 kg (5 entries); source AT&S AG  2006; lognormal variance with pedigree 0.05, pedigree (1,1,5,1,1)
  (same comment as for municipal solid waste)
  production volume 0.09414 kg
- water, ultrapure: 0.0482359, 0.0894802, 0.0672839 kg (3 entries); source AT&S AG  2006; lognormal variance with pedigree 0.04, pedigree (1,1,5,1,1)
  Estimation, based on literature.
  EcoSpold01Location=GLO
- spent solvent mixture: -0.0304239, -0.000712785, -0.0778633 kg (3 entries); source AT&S AG  2006; lognormal variance with pedigree 0.05, pedigree (1,1,5,1,1)
  (same comment as for spent solvent mixture)
  production volume 0.109 kg
- acrylic varnish, without water, in 87.5% solution state: 0.0452912, 0.0917088 kg (2 entries); source AT&S AG  2006; lognormal variance with pedigree 0.06, pedigree (1,1,5,1,1)
  EcoSpold01Location=RER
  Estimation, based on literature and own assumptions.
- hydrochloric acid, without water, in 30% solution state: 0.294182, 1.31582 kg (2 entries); source AT&S AG  2006; lognormal variance with pedigree 0.05, pedigree (1,1,5,1,1)
  Estimation, based on literature and own assumptions.
  EcoSpold01Location=RER
- ethanol, without water, in 99.7% solution state, from ethylene: 0.00723652, 0.0161135 kg (2 entries); source AT&S AG  2006; lognormal variance with pedigree 0.07, pedigree (1,1,5,1,1)
  EcoSpold01Location=RER
  Estimation, based on literature and own assumptions.
- isopropanol: 0.023838, 0.113162 kg (2 entries); source AT&S AG  2006; lognormal variance with pedigree 0.06, pedigree (1,1,5,1,1)
  EcoSpold01Location=RER
  Estimation, based on literature and own assumptions.
- sulfuric acid: 0.0276491, 0.211351 kg (2 entries); source AT&S AG  2006; lognormal variance with pedigree 0.05, pedigree (1,1,5,1,1)
  EcoSpold01Location=RER
  Estimation, based on literature and own assumptions.
- phenolic resin: 0.0107861, 0.0512029 kg (2 entries); source ZVEI 2006; lognormal variance with pedigree 0.05, pedigree (1,1,5,1,1)
  (same comment as for phenolic resin)
- dipropylene glycol monomethyl ether: 0.0095004, 0.0450996 kg (2 entries); source AT&S AG  2006; lognormal variance with pedigree 0.05, pedigree (1,1,5,1,1)
  EcoSpold01Location=RER
  Estimation, based on literature and own assumptions.

## Emissions to nature
- Lead [water, surface water]: 9.33e-9 kg; source AT&S AG  2006; lognormal variance with pedigree 0.69, pedigree (1,1,5,1,1)
  Estimation, based on literature.
- Water [water, unspecified]: 0.289404 m3; name water_to_water_unspecified; = (tap_water_input/1000)*(1-fraction_TW_to_air)+(water_ultrapure_input/1000)*(1-fraction_WUP_to_air); lognormal variance with pedigree 0.0807, pedigree (2,2,5,1,1)
  Calculated value based on literature values and expert opinion. See comments in the parametres' comment field.
  property fraction, origin: fresh water 1; name fraction_origin_fresh_water_Ww
  property fraction, origin: unspecified 0; name fraction_origin_unspecified_Ww
  property fraction, origin: salt water 0; name fraction_origin_salt_water_Ww
  property carbon content, non-fossil 0; name C_content_non_fossil
  property wet mass 1000 kg; name WM
  property water in wet mass 1000 kg; name WWM
  property carbon content, fossil 0; name C_content_fossil
  property dry mass 0 kg; name DM
- Hydrogen chloride [air, urban air close to ground]: 0.002944 kg; source AT&S AG  2006; lognormal variance with pedigree 0.17, pedigree (1,1,5,1,1)
  Estimation, based on literature.
- NMVOC, non-methane volatile organic compounds, unspecified origin [air, urban air close to ground]: 0.00852 kg; source AT&S AG  2006; lognormal variance with pedigree 0.17, pedigree (1,1,5,1,1)
  Proxy with literature value, to represent organic carbon, NMVOC is used.
- Water [air, unspecified]: 0.0188005 m3; name water_to_air_unspecified; = (tap_water_input/1000*fraction_TW_to_air)+(water_ultrapure_input/1000*fraction_WUP_to_air); lognormal variance with pedigree 0.0807, pedigree (2,2,5,1,1)
  (same comment as for Water)
  property fraction, origin: fresh water 1; name fraction_origin_fresh_water
  property fraction, origin: salt water 0; name fraction_origin_salt_water
  property fraction, origin: unspecified 0; name fraction_origin_unspecified
- Copper, ion [water, surface water]: 2.07e-8 kg; source AT&S AG  2006; lognormal variance with pedigree 0.69, pedigree (1,1,5,1,1)
  Estimation, based on literature.
- Fluoride [water, surface water]: 0.00037574 kg; source AT&S AG  2006; lognormal variance with pedigree 0.1, pedigree (1,1,5,1,1)
  Estimation, based on literature.
- Mercury [water, surface water]: 6.0922e-7 kg; source AT&S AG  2006; lognormal variance with pedigree 0.7, pedigree (1,1,5,1,1)
  Estimation, based on literature.
- Lead [air, urban air close to ground]: 0.00155 kg; source US EPA 1995; lognormal variance with pedigree 0.35, pedigree (1,1,5,1,1)
  Calculated Value, based literature and on an annual PWB yield of 292’000 m2 and a Pb release to air of 1000 lb/year.
- Nickel, ion [water, surface water]: 8e-9 kg; source AT&S AG  2006; lognormal variance with pedigree 0.69, pedigree (1,1,5,1,1)
  Estimation, based on literature.
- COD, Chemical Oxygen Demand [water, surface water]: 8.4e-5 kg; source AT&S AG  2006; lognormal variance with pedigree 0.09, pedigree (1,1,5,1,1)
  Estimation, based on literature.
- Copper [air, urban air close to ground]: 0.00498 kg; source US EPA 1995; lognormal variance with pedigree 0.35, pedigree (1,1,5,1,1)
  Calculated Value, based literature and on an annual PWB yield of 292’000 m2 and a Cu release to air of 3205 lb/year.
- Sulfuric acid [air, urban air close to ground]: 0.000414 kg; source AT&S AG  2006; lognormal variance with pedigree 0.17, pedigree (1,1,5,1,1)
  Estimation, based on literature.
- Hydrogen peroxide [air, urban air close to ground]: 0.000414 kg; source AT&S AG  2006; lognormal variance with pedigree 0.17, pedigree (1,1,5,1,1)
  Estimation, based on literature.
- TOC, Total Organic Carbon [water, surface water]: 3.11111e-5 kg; source AT&S AG  2006; lognormal variance with pedigree 0.09, pedigree (1,1,5,1,1)
  Calculated Value, by default as TOC (gC) = COD/2.7 (COD measured in g O2). Should more correctly be calculated from the carbon content of the specified emissions to water.
- Chromium, ion [water, surface water]: 5.2166e-5 kg; source AT&S AG  2006; lognormal variance with pedigree 0.7, pedigree (1,1,5,1,1)
  Estimation, based on literature.
- Sodium hydroxide [air, urban air close to ground]: 0.000782 kg; source AT&S AG  2006; lognormal variance with pedigree 0.17, pedigree (1,1,5,1,1)
  Estimation, based on literature.
- Zinc, ion [water, surface water]: 8.33e-9 kg; source AT&S AG  2006; lognormal variance with pedigree 0.69, pedigree (1,1,5,1,1)
  Estimation, based on literature.
- Cadmium, ion [water, surface water]: 1.8422e-5 kg; source AT&S AG  2006; lognormal variance with pedigree 0.7, pedigree (1,1,5,1,1)
  Estimation, based on literature.
- BOD5, Biological Oxygen Demand [water, surface water]: 8.4e-5 kg; source AT&S AG  2006; lognormal variance with pedigree 0.09, pedigree (1,1,5,1,1)
  Estimation, based on literature.
- Arsenic, ion [water, surface water]: 2.1779e-6 kg; source AT&S AG  2006; lognormal variance with pedigree 0.7, pedigree (1,1,5,1,1)
  Estimation, based on literature.
- DOC, Dissolved Organic Carbon [water, surface water]: 3.11111e-5 kg; source AT&S AG  2006; lognormal variance with pedigree 0.09, pedigree (1,1,5,1,1)
  Calculated Value, as equal to TOC.
- AOX, Adsorbable Organic Halogen as Cl [water, surface water]: 0.00013352 kg; source AT&S AG  2006; lognormal variance with pedigree 0.1, pedigree (1,1,5,1,1)
  Estimation, based on literature.

## Sampling procedure
literature

## Extrapolations
This dataset has been extrapolated from year 2006 to the year of the calculation (2021). The uncertainty has been adjusted accordingly.

## Review by Rolf Frischknecht 2007-11-08
passed.
