# sugar beet production

Dataset: EcoSpold 2, unit process
Geography: DE
Time period: 2009-01-01 to 2021-12-31
Technology level: current
Classification: ISIC rev.4 ecoinvent: 0113:Growing of vegetables and melons, roots and tubers
Tags: WFLDB
Scenario: Business-as-Usual
System model: Allocation, cut-off by classification
Generated by: Tuija Waldvogel
Published in: Nemecek T. 2015
Database: ecoinvent
isCopyrightProtected: true
accessRestrictedTo: 1

## General comment
This dataset represents the production of 1 kg of sugar beet. The average yield from 2009 - 2012 is 68.8 t/ha. The data are representative for sugar beet production in Germany used for the export market. Mineral NPK fertiliser input is 150-50-180 kg/ha. Organic fertilisers applied amount to 13 m3/ha of liquid manure and 9 t/ha of solid manure. Total active ingredients (a.i.) applied as pesticides amount to 6.96 kg a.i./ha.
The dataset was modelled within the project 'World Food LCA database (WFLDB)'. The aim of this project was to provide inventories of a broad variety of agricultural products and processes and to cover for each product at least 50% of the global export market. The share of sugar beet produced in Germany amounts to 10% of the global production (tonnage exported in 2010). The production system regarded in this dataset aimed at representing sugar beet produced in Germany for the export market.
PEF-Quality: data quality rating (DQR) = 1.2 (i.e. excellent quality). This dataset refers to an average situation; for specific situations exchanges might differ substantially due to site specific parameters

## Included activities start
This activity starts with soil cultivation after the harvest of the previous crop.

## Included activities end
This activity ends with the harvest of sugar beet at farm gate. The dataset includes all machine operations, corresponding infrastructure, fuel use and sheds. Machine operations are: soil cultivation, sowing, fertilisation, pesticide application, harvesting, and on-farm transport. Further, direct field emissions and land use change are included. Heavy metal uptake by the crop is considered. The inputs of seeds, fertilisers and pesticides as well as packaging of fertilisers and pesticides are considered. The dataset doesn't include emissions from manure storage because these are within the system boundary of animal production.

## Technology
Conventional production

## Parameters
- LUC_crop_specific: 1 dimensionless
  This parameter allows to switch between a 'crop specific' and a 'country specific' approach when calculating the LUC of a crop. By default, the chosen approach is 'crop specific', so the value of the parameter is 1. If you want to apply a 'country specific' approach, turn the parameter to 0.
- heavyMetalUptakeSwitch: 1 dimensionless

## Reference product
- sugar beet: 1 kg; CPC 01801: Sugar beet; By-product classification allocatable product
  Reference flow: Yield = 68769 kg/ha
  production volume 2.66538e10 kg
    Source: FAOSTAT. Average, 2009-2012
  property price 0.0444 EUR2005
    Calculated based on literature data. The import quantity of sugar beet in 2005 is 803011 ton. The import value is 43094000 USD. The resulting price is (import value/import quantity*0.827=) 0.044 EUR/kg.
  property carbon content 0.433043
    carbon content on a dry matter basis (reserved; not for manual entry)
  properties: water in wet mass 0.77 kg, carbon content, non-fossil 0.433043, wet mass 1 kg, dry mass 0.23 kg, water content 3.34783, carbon content, fossil 0, carbon allocation 0.0996 kg

## Inputs from technosphere
- urea: 0.000701413 kg; source Norbert Gondolf 2015; lognormal variance with pedigree 0.124177, pedigree (2,1,4,1,1)
  The exchange has been updated from 'urea, as N' into 'urea' and therefore its amount has been scaled (multiplied) from 0.0003 kg by 2.1438 kg of 'urea' per kg of 'urea, as N'. Original comment of the exchange is: Calculated based on literature values or expert estimation: The total amount of nutrient (Personal written communication, Norbert Gondolf, Yara, 2015) multiplied by the share of fertiliser type (Personal written communication, Norbert Gondolf, Yara, 2015). See supporting documentation 'WFLDB-Documentation.pdf' chapter 'Fertiliser application' for L3 and L4 data (https://ecoquery.ecoinvent.org/File/Reports).
  Corresponds to 22.5 kg/ha
  properties: carbon content, fossil 0.2, dry mass 1 kg, wet mass 1 kg
- urea ammonium nitrate mix: 0.00218122 kg
  The exchange has been updated from 'inorganic nitrogen fertiliser, as N' into 'urea ammonium nitrate' and therefore its amount has been scaled (multiplied) from 0.0007 kg by 3.3333 kg of 'urea ammonium nitrate' per kg of 'inorganic nitrogen fertiliser, as N'. Original comment of the exchange is: Calculated based on literature values or expert estimation: The total amount of nutrient (Personal written communication, Norbert Gondolf, Yara, 2015) multiplied by the share of fertiliser type (Personal written communication, Norbert Gondolf, Yara, 2015). See supporting documentation 'WFLDB-Documentation.pdf' chapter 'Fertiliser application' for L3 and L4 data (https://ecoquery.ecoinvent.org/File/Reports).
  Corresponds to 4.5 kg/ha
  properties: hydrogen content 0.095042, carbon content, fossil 0.0879977, water content 0.333333, dry mass 0.75 kg, wet mass 1 kg, oxygen content 0.749063, nitrogen content 0.401231
  note on hydrogen content: Hydrogen content (on a dry matter basis) of urea ammonium nitrate mix is calculated from the molecular formula of the substance (CH6N4O4).
  note on carbon content, fossil: Carbon content, fossil is calculated based on the chemical formula of the substance.
  note on oxygen content: Oxygen content (on a dry matter basis) of urea ammonium nitrate mix is calculated from the molecular formula of the substance (CH6N4O4).
  note on nitrogen content: Nitrogen content (on a dry matter basis) of urea ammonium nitrate mix is calculated from the molecular formula of the substance (CH6N4O4).
- inorganic phosphorus fertiliser, as P2O5: 0, 0, 0.000319912, 0.000174497 kg (4 entries)
  Calculated based on literature values or expert estimation: The total amount of nutrient (Personal written communication, Norbert Gondolf, Yara, 2015) multiplied by the share of fertiliser type (Personal written communication, Norbert Gondolf, Yara, 2015). See supporting documentation 'WFLDB-Documentation.pdf' chapter 'Fertiliser application' for L3 and L4 data (https://ecoquery.ecoinvent.org/File/Reports).
  Corresponds to 22.0 kg/ha
  properties: dry mass 1 kg, wet mass 1 kg
- transport, freight, lorry, unspecified: 0.000382668 metric ton*km
  This represent the transport of fertilizers that are directly linked to their supplying activities, to better represent the fertilizer mix of the activity. Transport distance based on US BTS Commodity Flow Surveys 1993, 1997, 2002, 2007, US Dep. Of Transportation, Bureau of Transportation Statistics. Of the total road transport, 6% is assumed to be by delivery van for goods with a large share of retail sale, and 3% for goods that are mainly sold via wholesale.
- inorganic phosphorus fertiliser, as P2O5: 0, 5.38033e-6, 0.000170426 kg (3 entries)
  (same comment as for inorganic phosphorus fertiliser, as P2O5)
  properties: wet mass 1 kg, dry mass 1 kg
- potassium chloride: 0.00372885 kg; source Norbert Gondolf 2015; lognormal variance with pedigree 0.124177, pedigree (2,1,4,1,1)
  The exchange has been updated from 'potassium chloride, as K2O' into 'potassium chloride' and therefore its amount has been scaled (multiplied) from 0.0024 kg by 1.5829 kg of 'potassium chloride' per kg of 'potassium chloride, as K2O'. Original comment of the exchange is: Calculated based on literature values or expert estimation: The total amount of nutrient (Personal written communication, Norbert Gondolf, Yara, 2015) multiplied by the share of fertiliser type (Personal written communication, Norbert Gondolf, Yara, 2015). See supporting documentation 'WFLDB-Documentation.pdf' chapter 'Fertiliser application' for L3 and L4 data (https://ecoquery.ecoinvent.org/File/Reports).
  Corresponds to 162.0 kg/ha
  properties: wet mass 1 kg, dry mass 1 kg
- triple superphosphate: 0.000103055 kg
  The exchange has been updated from 'triple superphosphate' into 'triple superphosphate' and therefore its amount has been scaled (multiplied) from 0 kg by 2.1739 kg of 'triple superphosphate' per kg of 'triple superphosphate'. Original comment of the exchange is: Calculated based on literature values or expert estimation: The total amount of nutrient (Personal written communication, Norbert Gondolf, Yara, 2015) multiplied by the share of fertiliser type (Personal written communication, Norbert Gondolf, Yara, 2015). See supporting documentation 'WFLDB-Documentation.pdf' chapter 'Fertiliser application' for L3 and L4 data (https://ecoquery.ecoinvent.org/File/Reports).
  Corresponds to 22.0 kg/ha
  properties: dry mass 1 kg, wet mass 1 kg, phosphorus content 0.200754
  note on phosphorus content: Phosphorus content (on a dry matter basis) of triple superphosphate is calculated from the molecular formula of the nutrient present in the substance.
- inorganic nitrogen fertiliser, as N: 0, 0, 6.54365e-5, 2.18122e-5 kg (4 entries)
  Calculated based on literature values or expert estimation: The total amount of nutrient (Personal written communication, Norbert Gondolf, Yara, 2015) multiplied by the share of fertiliser type (Personal written communication, Norbert Gondolf, Yara, 2015). See supporting documentation 'WFLDB-Documentation.pdf' chapter 'Fertiliser application' for L3 and L4 data (https://ecoquery.ecoinvent.org/File/Reports).
  Corresponds to 4.5 kg/ha
  properties: dry mass 1 kg, wet mass 1 kg
- potassium sulfate: 0.00048422 kg; source Norbert Gondolf 2015; lognormal variance with pedigree 0.124177, pedigree (2,1,4,1,1)
  The exchange has been updated from 'potassium sulfate, as K2O' into 'potassium sulfate' and therefore its amount has been scaled (multiplied) from 0.0003 kg by 1.85 kg of 'potassium sulfate' per kg of 'potassium sulfate, as K2O'. Original comment of the exchange is: Calculated based on literature values or expert estimation: The total amount of nutrient (Personal written communication, Norbert Gondolf, Yara, 2015) multiplied by the share of fertiliser type (Personal written communication, Norbert Gondolf, Yara, 2015). See supporting documentation 'WFLDB-Documentation.pdf' chapter 'Fertiliser application' for L3 and L4 data (https://ecoquery.ecoinvent.org/File/Reports).
  Corresponds to 18.0 kg/ha
  properties: wet mass 1 kg, dry mass 1 kg
- single superphosphate: 2.49282e-5 kg
  The exchange has been updated from 'single superphosphate' into 'single superphosphate' and therefore its amount has been scaled (multiplied) from 0 kg by 4.7619 kg of 'single superphosphate' per kg of 'single superphosphate'. Original comment of the exchange is: Calculated based on literature values or expert estimation: The total amount of nutrient (Personal written communication, Norbert Gondolf, Yara, 2015) multiplied by the share of fertiliser type (Personal written communication, Norbert Gondolf, Yara, 2015). See supporting documentation 'WFLDB-Documentation.pdf' chapter 'Fertiliser application' for L3 and L4 data (https://ecoquery.ecoinvent.org/File/Reports).
  Corresponds to 22.0 kg/ha
  properties: wet mass 1 kg, dry mass 1 kg, phosphorus content 0.0916484
- manure, liquid, cattle: 0.134943 kg; source Norbert Gondolf 2015; lognormal variance with pedigree 0.124177, pedigree (2,1,4,1,1)
  Calculated based on literature values: The total amount of manure (Personal written communication, Norbert Gondolf, Yara, 2015) multiplied by the country-share of manure per animal category (FAOSTAT 2015). See supporting documentation 'WFLDB-Documentation.pdf' chapter 'Fertiliser application' (https://ecoquery.ecoinvent.org/File/Reports).
  Corresponds to 9.28 m3/ha
  properties: water content 12.333, dry mass 0.075 kg, wet mass 1 kg, carbon content, non-fossil 0.68
- inorganic nitrogen fertiliser, as N: 0, 2.18122e-5 kg (2 entries)
  (same comment as for inorganic nitrogen fertiliser, as N)
  properties: wet mass 1 kg, dry mass 1 kg
- manure, liquid, swine: 0.0524899 kg; source Norbert Gondolf 2015; lognormal variance with pedigree 0.124177, pedigree (2,1,4,1,1)
  Calculated based on literature values: The total amount of manure (Personal written communication, Norbert Gondolf, Yara, 2015) multiplied by the country-share of manure per animal category (FAOSTAT 2015). See supporting documentation 'WFLDB-Documentation.pdf' chapter 'Fertiliser application' (https://ecoquery.ecoinvent.org/File/Reports).
  properties: dry mass 0.05 kg, wet mass 1 kg, water content 19, carbon content, non-fossil 0.64
- poultry manure, fresh: 0.000802729 kg; source Norbert Gondolf 2015; lognormal variance with pedigree 0.124177, pedigree (2,1,4,1,1)
  Calculated based on literature values: The total amount of manure (Personal written communication, Norbert Gondolf, Yara, 2015) multiplied by the country-share of manure per animal category (FAOSTAT 2015). See supporting documentation 'WFLDB-Documentation.pdf' chapter 'Fertiliser application' (https://ecoquery.ecoinvent.org/File/Reports).
  Corresponds to 0.11 m3/ha
  properties: dry mass 0.38 kg, wet mass 1 kg, carbon content, non-fossil 0.33389, water content 1.63158
- packaging, for pesticides: 0.000202344 kg; lognormal variance with pedigree 0.0592, pedigree (4,3,4,5,4)
  Total amount of active substance/s of pesticides needed for the production of sugar beet is calculated to be circa 1.01E-04 kg. Pesticide/s used in this dataset is/are: '[thio]carbamate-compound', 'benzimidazole-compound', 'cyclic N-compound', 'glyphosate', 'phenoxy-compound', 'triazine-compound, unspecified'. The total amount of active substance/s is doubled in order to account for the packaging of the dilluted product of pesticide/s that is/are applied. Therefore, 2.02E-04 kg of packaging for pesticides is justified with this exchange.
  properties: dry mass 1 kg, wet mass 1 kg, price 0.0642 EUR2005, heating value, net 25.97 MJ, carbon content, fossil 0.85714
- calcium ammonium nitrate: 0.00403929 kg
  The exchange has been updated from 'calcium ammonium nitrate' into 'calcium ammonium nitrate' and therefore its amount has been scaled (multiplied) from 0.0011 kg by 3.7037 kg of 'calcium ammonium nitrate' per kg of 'calcium ammonium nitrate'. Original comment of the exchange is: Calculated based on literature values or expert estimation: The total amount of nutrient (Personal written communication, Norbert Gondolf, Yara, 2015) multiplied by the share of fertiliser type (Personal written communication, Norbert Gondolf, Yara, 2015). See supporting documentation 'WFLDB-Documentation.pdf' chapter 'Fertiliser application' for L3 and L4 data (https://ecoquery.ecoinvent.org/File/Reports).
  Corresponds to 4.5 kg/ha
  properties: hydrogen content 0.0335628, oxygen content 0.399581, dry mass 1 kg, wet mass 1 kg, calcium content 0.333646, nitrogen content 0.233209
  note on hydrogen content: Hydrogen content (on a dry matter basis) of calcium ammonium nitrate is calculated from the molecular formula of the substance (CH4CaN2O6).
  note on oxygen content: Oxygen content (on a dry matter basis) of calcium ammonium nitrate is calculated from the molecular formula of the substance (CH4CaN2O6).
  note on calcium content: Calcium content (on a dry matter basis) of calcium ammonium nitrate is calculated from the molecular formula of the substance (CH4CaN2O6).
  note on nitrogen content: Nitrogen content (on a dry matter basis) of calcium ammonium nitrate is calculated from the molecular formula of the substance (CH4CaN2O6).
- manure, solid, cattle: 0.0964639 kg; source Norbert Gondolf 2015; lognormal variance with pedigree 0.124177, pedigree (2,1,4,1,1)
  Calculated based on literature values: The total amount of manure (Personal written communication, Norbert Gondolf, Yara, 2015) multiplied by the country-share of manure per animal category (FAOSTAT 2015). See supporting documentation 'WFLDB-Documentation.pdf' chapter 'Fertiliser application' (https://ecoquery.ecoinvent.org/File/Reports).
  Corresponds to 6630.0 kg/ha
  properties: dry mass 0.22 kg, wet mass 1 kg, water content 3.5454, carbon content, non-fossil 0.441
- poultry manure, dried: 0.034409 kg; source Norbert Gondolf 2015; lognormal variance with pedigree 0.124177, pedigree (2,1,4,1,1)
  Calculated based on literature values: The total amount of manure (Personal written communication, Norbert Gondolf, Yara, 2015) multiplied by the country-share of manure per animal category (FAOSTAT 2015). See supporting documentation 'WFLDB-Documentation.pdf' chapter 'Fertiliser application' (https://ecoquery.ecoinvent.org/File/Reports).
  Corresponds to 2370.0 kg/ha
  properties: lead content 2.92e-6, cadmium content 2.92e-7, mercury content 2e-7, phosphorus content 0.0167, copper content 4.38e-5, water content 0.156069, zinc content 0.000349, carbon content, non-fossil 0.33389, wet mass 1 kg, nickel content 4e-5, nitrogen content 0.532, dry mass 0.865 kg, potassium content 0.024
- transport, freight, inland waterways, barge: 0.000120083 metric ton*km
  This represent the transport of fertilizers that are directly linked to their supplying activities, to better represent the fertilizer mix of the activity. Transport distance based on US BTS Commodity Flow Surveys 1993, 1997, 2002, 2007, US Dep. Of Transportation, Bureau of Transportation Statistics.
- [thio]carbamate-compound: 6.14687e-6 kg; source Norbert Gondolf 2015; lognormal variance with pedigree 0.124664, pedigree (2,2,4,1,1)
  Literature value or expert estimation (Personal written communication, Norbert Gondolf, Yara, 2015).
  properties: dry mass 1 kg, wet mass 1 kg, carbon content, fossil 0.626349
- fertilising, by broadcaster: 2.90829e-5 ha; source Norbert Gondolf 2015; lognormal variance with pedigree 0.124177, pedigree (2,1,4,1,1)
  (same comment as for [thio]carbamate-compound)
- transport, tractor and trailer, agricultural: 0.000538033 metric ton*km; source Norbert Gondolf 2015; lognormal variance with pedigree 0.162439, pedigree (4,1,4,1,1)
  On-farm transport: Yield (in tonnes) multiplied by the average distance from field to farm. The distance was obtained from literature or expert estimation (Personal written communication, Norbert Gondolf, Yara, 2015). Corresponds to 37tkm/ha.
- tillage, ploughing: 1.45414e-5 ha; source Norbert Gondolf 2015; lognormal variance with pedigree 0.124177, pedigree (2,1,4,1,1)
  (same comment as for [thio]carbamate-compound)
- benzimidazole-compound: 4.3492e-6 kg; source Norbert Gondolf 2015; lognormal variance with pedigree 0.124664, pedigree (2,2,4,1,1)
  (same comment as for [thio]carbamate-compound)
  properties: dry mass 1 kg, carbon content, fossil 0.529668, wet mass 1 kg
- tillage, harrowing, by spring tine harrow: 1.45414e-5 ha; source Norbert Gondolf 2015; lognormal variance with pedigree 0.124177, pedigree (2,1,4,1,1)
  (same comment as for [thio]carbamate-compound)
- phosphate rock, beneficiated: 1.31782e-5 kg; source Norbert Gondolf 2015; lognormal variance with pedigree 0.124177, pedigree (2,1,4,1,1)
  The exchange has been updated from 'phosphate rock, as P2O5, beneficiated, dry' into 'phosphate rock, beneficiated' and therefore its amount has been scaled (multiplied) from 0 kg by 3.125 kg of 'phosphate rock, beneficiated' per kg of 'phosphate rock, as P2O5, beneficiated, dry'. Original comment of the exchange is: Calculated based on literature values or expert estimation: The total amount of nutrient (Personal written communication, Norbert Gondolf, Yara, 2015) multiplied by the share of fertiliser type (Personal written communication, Norbert Gondolf, Yara, 2015). See supporting documentation 'WFLDB-Documentation.pdf' chapter 'Fertiliser application' for L3 and L4 data (https://ecoquery.ecoinvent.org/File/Reports).
  Corresponds to 0.29 kg/ha
  properties: dry mass 1 kg, wet mass 1 kg
- cyclic N-compound: 1.31636e-5 kg; source Norbert Gondolf 2015; lognormal variance with pedigree 0.124664, pedigree (2,2,4,1,1)
  (same comment as for [thio]carbamate-compound)
  properties: carbon content, fossil 0.641962, dry mass 1 kg, wet mass 1 kg
- solid manure loading and spreading, by hydraulic loader and spreader: 0.130873 kg; lognormal variance with pedigree 0.124177, pedigree (2,1,4,1,1)
  This amount corresponds the input of solid manure.
- phenoxy-compound: 9.66489e-7 kg; source Norbert Gondolf 2015; lognormal variance with pedigree 0.124664, pedigree (2,2,4,1,1)
  (same comment as for [thio]carbamate-compound)
  properties: dry mass 1 kg, carbon content, fossil 0.532559, wet mass 1 kg
- liquid manure spreading, by vacuum tanker: 0.000189039 m3; lognormal variance with pedigree 0.124177, pedigree (2,1,4,1,1)
  This amount corresponds to the input of liquid manure.
- transport, freight train: 0.00071019 metric ton*km
  (same comment as for transport, freight, inland waterways, barge)
- triazine-compound, unspecified: 4.8711e-5 kg; source Norbert Gondolf 2015; lognormal variance with pedigree 0.124664, pedigree (2,2,4,1,1)
  (same comment as for [thio]carbamate-compound)
  properties: carbon content, fossil 0.475616, wet mass 1 kg, dry mass 1 kg
- sowing: 1.45414e-5 ha; lognormal variance with pedigree 0.124177, pedigree (2,1,4,1,1)
  Estimation based on a modified MEXALCA-approach (Roches et al. 2010; Nemecek et al. 2012): See supporting documentation 'WFLDB-Documentation.pdf' chapter 'Machinery processes' for L2 data (https://ecoquery.ecoinvent.org/File/Reports).
- glyphosate: 2.78349e-5 kg; source Norbert Gondolf 2015; lognormal variance with pedigree 0.124664, pedigree (2,2,4,1,1)
  (same comment as for [thio]carbamate-compound)
  properties: dry mass 1 kg, carbon content, fossil 0.214286, wet mass 1 kg
- harvesting, by complete harvester, beets: 1.45414e-5 ha; source Norbert Gondolf 2015; lognormal variance with pedigree 0.124177, pedigree (2,1,4,1,1)
  (same comment as for [thio]carbamate-compound)
- sugar beet seed, for sowing: 4.36243e-5 kg; source Norbert Gondolf 2015; lognormal variance with pedigree 0.124177, pedigree (2,1,4,1,1)
  Literature value or expert estimation (Personal written communication, Norbert Gondolf, Yara, 2015). Sowing density: 3kg/ha.
  properties: wet mass 1 kg, dry mass 0.9 kg, water content 0.111111, carbon content, non-fossil 0.38182
- application of plant protection product, by field sprayer: 8.72486e-5 ha; source Norbert Gondolf 2015; lognormal variance with pedigree 0.124664, pedigree (2,2,4,1,1)
  (same comment as for [thio]carbamate-compound)
- irrigation: 0.00290829 m3; source Norbert Gondolf 2015; lognormal variance with pedigree 0.124177, pedigree (2,1,4,1,1)
  Calculated value: The total amount of water used for irrigation (Personal written communication, Norbert Gondolf, Yara, 2015) multiplied by the country-share of irrigation technique (Personal written communication, Norbert Gondolf, Yara, 2015). See supporting documentation 'WFLDB-Documentation.pdf' chapter 'Water use for irrigation' (https://ecoquery.ecoinvent.org/File/Reports).
  properties: water content 9089.91, dry mass 0.11 kg, wet mass 1000 kg
- packaging, for fertilisers: 0.0110515 kg; lognormal variance with pedigree 0.0592, pedigree (4,3,4,5,4)
  Total amount of active substance/s of fertilisers needed for the production of 'sugar beet' is calculated to be circa 5.53E-03 kg. Fertiliser/s used in this dataset is/are: 'nitrogen fertiliser, as N', 'nitrogen fertiliser, as N', 'nitrogen fertiliser, as N', 'nitrogen fertiliser, as N', 'nitrogen fertiliser, as N', 'phosphate fertiliser, as P2O5', 'phosphate fertiliser, as P2O5', 'phosphate fertiliser, as P2O5', 'phosphate fertiliser, as P2O5', 'phosphate fertiliser, as P2O5', 'phosphate fertiliser, as P2O5', 'phosphate rock, as P2O5, beneficiated, dry', 'potassium chloride, as K2O', 'potassium sulfate, as K2O', 'urea, as N'. The total amount of active substance/s is doubled in order to account for the packaging of the dilluted product of fertiliser/s that is/are applied. Therefore, 1.11E-02 kg of packaging for fertilisers is justified with this exchange.
  properties: dry mass 1 kg, heating value, net 25.01 MJ, wet mass 1 kg, carbon content, fossil 0.825301, price 0.0642 EUR2005
  note on carbon content, fossil: Considering a chemical formula (C2H4)n for polyethylene, carbon content-fossil is calculated to be 0.856286 kg of Carbon per kg of dry mass.

## Inputs from nature
- Transformation, from arable land, unspecified use [natural resource, land]: 0.145414 m2; lognormal variance with pedigree 0.0442144, pedigree (2,1,4,1,1)
  10000 m2 divided by the life time of the crop.
- Occupation, annual crop [natural resource, land]: 0.0685236 m2*year; lognormal variance with pedigree 0.0200616, pedigree (2,1,4,1,1)
  Related to the duration from harvest date of previous crop to harvest date of main crop: 172 days.
- Energy, gross calorific value, in biomass [natural resource, biotic]: 3.77976 MJ; lognormal variance with pedigree 0.0138498, pedigree (2,2,4,1,1)
  Gross energy content is related to MJ/kg dry matter of product. Source: ecoinvent data.
- Transformation, to arable land, unspecified use [natural resource, land]: 0.145414 m2; lognormal variance with pedigree 0.0442144, pedigree (2,1,4,1,1)
  10000 m2 divided by the life time of the crop.
- Carbon dioxide, in air [natural resource, in air]: 0.321686 kg; lognormal variance with pedigree 0.0138498, pedigree (2,2,4,1,1)
  CO2 uptake by biomass

## Emissions to nature
- Chromium, ion [water, surface water]: 6.94993e-8 kg; source Freiermuth R.  2006; lognormal variance with pedigree 0.356938, pedigree (2,2,4,1,1)
  Calculated value - Freiermuth (2006). See 'WFLDB-Guidelines.pdf', available at https://ecoquery.ecoinvent.org/File/Reports.
- Cadmium [soil, agricultural]: -4.00355e-8 kg; = 5.19652750513e-08 + ( - 9.20007561547e-08)*heavyMetalUptakeSwitch; source Freiermuth R.  2006
  Comment on mathematicalRelation:
  5.19652750513e-08 from Calculated value - Freiermuth (2006). See 'WFLDB-Guidelines.pdf', available at https://ecoquery.ecoinvent.org/File/Reports.
  -9.20007561547e-08 from Sugar beet, heavy metals uptake model
  Heavy metal uptake can be excluded by setting the parameter heavyMetalUptakeSwitch to zero.
- Desmedipham [soil, agricultural]: 2.6175e-6 kg; lognormal variance with pedigree 0.124664, pedigree (2,2,4,1,1)
  Calculated value - 100% emission in soil. See 'WFLDB-Guidelines.pdf', available at https://ecoquery.ecoinvent.org/File/Reports.
- Copper, ion [water, surface water]: 6.06829e-8 kg; source Freiermuth R.  2006; lognormal variance with pedigree 0.356938, pedigree (2,2,4,1,1)
  (same comment as for Chromium, ion)
- Ethofumesate [soil, agricultural]: 4.26766e-6 kg; lognormal variance with pedigree 0.124664, pedigree (2,2,4,1,1)
  (same comment as for Desmedipham)
- Lead [water, surface water]: 2.38291e-8 kg; source Freiermuth R.  2006; lognormal variance with pedigree 0.356938, pedigree (2,2,4,1,1)
  (same comment as for Chromium, ion)
- Fenoxaprop-P ethyl ester [soil, agricultural]: 9.48369e-7 kg; lognormal variance with pedigree 0.124664, pedigree (2,2,4,1,1)
  (same comment as for Desmedipham)
- Mercury [water, surface water]: 2.16377e-10 kg; source Freiermuth R.  2006; lognormal variance with pedigree 0.356938, pedigree (2,2,4,1,1)
  (same comment as for Chromium, ion)
- Glyphosate [soil, agricultural]: 2.7313e-5 kg; lognormal variance with pedigree 0.124664, pedigree (2,2,4,1,1)
  (same comment as for Desmedipham)
- Nickel, ion [water, surface water]: 5.76568e-8 kg; source Freiermuth R.  2006; lognormal variance with pedigree 0.356938, pedigree (2,2,4,1,1)
  (same comment as for Chromium, ion)
- Water [water, ground-]: 0.000148904 m3; lognormal variance with pedigree 0.124177, pedigree (2,1,4,1,1)
  Calculated value - Emission calculated from water balance. See 'WFLDB-Guidelines.pdf', available at https://ecoquery.ecoinvent.org/File/Reports.
- Lead [water, ground-]: 1.63475e-9 kg; source Freiermuth R.  2006; lognormal variance with pedigree 0.356938, pedigree (2,2,4,1,1)
  (same comment as for Chromium, ion)
- Lenacil [soil, agricultural]: 1.53636e-6 kg; lognormal variance with pedigree 0.124664, pedigree (2,2,4,1,1)
  (same comment as for Desmedipham)
- Zinc, ion [water, surface water]: 1.36948e-7 kg; source Freiermuth R.  2006; lognormal variance with pedigree 0.356938, pedigree (2,2,4,1,1)
  (same comment as for Chromium, ion)
- Metamitron [soil, agricultural]: 4.77978e-5 kg; lognormal variance with pedigree 0.124664, pedigree (2,2,4,1,1)
  (same comment as for Desmedipham)
- Cadmium, ion [water, ground-]: 2.87324e-10 kg; source Freiermuth R.  2006; lognormal variance with pedigree 0.356938, pedigree (2,2,4,1,1)
  (same comment as for Chromium, ion)
- Phenmedipham [soil, agricultural]: 3.41413e-6 kg; lognormal variance with pedigree 0.124664, pedigree (2,2,4,1,1)
  (same comment as for Desmedipham)
- Chromium, ion [water, ground-]: 1.36307e-7 kg; source Freiermuth R.  2006; lognormal variance with pedigree 0.356938, pedigree (2,2,4,1,1)
  (same comment as for Chromium, ion)
- Carbon dioxide, fossil [air, non-urban air or from high stacks]: 0.00102735 kg; lognormal variance with pedigree 0.0138498, pedigree (2,2,4,1,1)
  Calculated value - CO2 emissions from urea and lime. See 'WFLDB-Guidelines.pdf', available at https://ecoquery.ecoinvent.org/File/Reports.
- Copper, ion [water, ground-]: 2.42362e-8 kg; source Freiermuth R.  2006; lognormal variance with pedigree 0.356938, pedigree (2,2,4,1,1)
  (same comment as for Chromium, ion)
- Ammonia [air, non-urban air or from high stacks]: 0.00306693 kg; source EEA 2013; lognormal variance with pedigree 0.0447216, pedigree (2,2,4,1,1)
  Calculated value - EMEP/EEA (2013). See 'WFLDB-Guidelines.pdf', available at https://ecoquery.ecoinvent.org/File/Reports.
- Nitrogen oxides [air, non-urban air or from high stacks]: 0.00011224 kg; source EEA 2013; lognormal variance with pedigree 0.124664, pedigree (2,2,4,1,1)
  Calculated value - EEA/EMEP (2013). See 'WFLDB-Guidelines.pdf', available at https://ecoquery.ecoinvent.org/File/Reports.
- Dinitrogen monoxide [air, non-urban air or from high stacks]: 9.36853e-5 kg; source IPCC 2006; lognormal variance with pedigree 0.124664, pedigree (2,2,4,1,1)
  Calculated value - IPCC (2006). See 'WFLDB-Guidelines.pdf', available at https://ecoquery.ecoinvent.org/File/Reports.
- Nickel [soil, agricultural]: 4.63092e-8 kg; = 2.94711279792e-07 + ( - 2.48402041618e-07)*heavyMetalUptakeSwitch; source Freiermuth R.  2006
  Comment on mathematicalRelation:
  2.94711279792e-07 from Calculated value - Freiermuth (2006). See 'WFLDB-Guidelines.pdf', available at https://ecoquery.ecoinvent.org/File/Reports.
  -2.48402041618e-07 from Sugar beet, heavy metals uptake model
  Heavy metal uptake can be excluded by setting the parameter heavyMetalUptakeSwitch to zero.
- Chromium [soil, agricultural]: 1.93195e-7 kg; = 6.01448327008e-07 + ( - 4.08253355436e-07)*heavyMetalUptakeSwitch; source Freiermuth R.  2006
  Comment on mathematicalRelation:
  6.01448327008e-07 from Calculated value - Freiermuth (2006). See 'WFLDB-Guidelines.pdf', available at https://ecoquery.ecoinvent.org/File/Reports.
  -4.08253355436e-07 from Sugar beet, heavy metals uptake model
  Heavy metal uptake can be excluded by setting the parameter heavyMetalUptakeSwitch to zero.
- Copper [soil, agricultural]: -8.99301e-7 kg; = 1.8607221277e-06 + ( - 2.76002268464e-06)*heavyMetalUptakeSwitch; source Freiermuth R.  2006
  Comment on mathematicalRelation:
  1.8607221277e-06 from Calculated value - Freiermuth (2006). See 'WFLDB-Guidelines.pdf', available at https://ecoquery.ecoinvent.org/File/Reports.
  -2.76002268464e-06 from Sugar beet, heavy metals uptake model
  Heavy metal uptake can be excluded by setting the parameter heavyMetalUptakeSwitch to zero.
- Phosphate [water, surface water]: 4.63392e-6 kg; source Prasuhn V.  2006; lognormal variance with pedigree 0.175866, pedigree (2,2,4,1,1)
  Calculated value - Prasuhn (2006). See 'WFLDB-Guidelines.pdf', available at https://ecoquery.ecoinvent.org/File/Reports.
- Lead [soil, agricultural]: -1.12765e-7 kg; = 1.54037429656e-07 + ( - 2.66802192849e-07)*heavyMetalUptakeSwitch; source Freiermuth R.  2006
  Comment on mathematicalRelation:
  1.54037429656e-07 from Calculated value - Freiermuth (2006). See 'WFLDB-Guidelines.pdf', available at https://ecoquery.ecoinvent.org/File/Reports.
  -2.66802192849e-07 from Sugar beet, heavy metals uptake model
  Heavy metal uptake can be excluded by setting the parameter heavyMetalUptakeSwitch to zero.
- Mercury [soil, agricultural]: -2.33703e-9 kg; = 1.95131527287e-08 + ( - 2.18501795867e-08)*heavyMetalUptakeSwitch; source Freiermuth R.  2006
  Comment on mathematicalRelation:
  1.95131527287e-08 from Calculated value - Freiermuth (2006). See 'WFLDB-Guidelines.pdf', available at https://ecoquery.ecoinvent.org/File/Reports.
  -2.18501795867e-08 from Sugar beet, heavy metals uptake model
  Heavy metal uptake can be excluded by setting the parameter heavyMetalUptakeSwitch to zero.
- Water [water, surface water]: 0.000595617 m3; lognormal variance with pedigree 0.124177, pedigree (2,1,4,1,1)
  (same comment as for Water)
- Water [air, non-urban air or from high stacks]: 0.00216377 m3; lognormal variance with pedigree 0.124177, pedigree (2,1,4,1,1)
  (same comment as for Water)
- Zinc [soil, agricultural]: 2.90932e-6 kg; = 1.12813913246e-05 + ( - 8.37206881007e-06)*heavyMetalUptakeSwitch; source Freiermuth R.  2006
  Comment on mathematicalRelation:
  1.12813913246e-05 from Calculated value - Freiermuth (2006). See 'WFLDB-Guidelines.pdf', available at https://ecoquery.ecoinvent.org/File/Reports.
  -8.37206881007e-06 from Sugar beet, heavy metals uptake model
  Heavy metal uptake can be excluded by setting the parameter heavyMetalUptakeSwitch to zero.
- Difenoconazole [soil, agricultural]: 1.51739e-6 kg; lognormal variance with pedigree 0.0447216, pedigree (2,2,4,1,1)
  (same comment as for Desmedipham)
- Phosphorus [water, surface water]: 1.12674e-6 kg; source Prasuhn V.  2006; lognormal variance with pedigree 0.175866, pedigree (2,2,4,1,1)
  Calculated value - Prasuhn (2006) and SQCB-Erosion. See 'WFLDB-Guidelines.pdf', available at https://ecoquery.ecoinvent.org/File/Reports.
- Mercury [water, ground-]: 1.03644e-11 kg; source Freiermuth R.  2006; lognormal variance with pedigree 0.356938, pedigree (2,2,4,1,1)
  (same comment as for Chromium, ion)
- Epoxiconazole [soil, agricultural]: 1.89674e-6 kg; lognormal variance with pedigree 0.0447216, pedigree (2,2,4,1,1)
  (same comment as for Desmedipham)
- Nitrate [water, ground-]: 0.00254312 kg; source Richner W. 2014; lognormal variance with pedigree 0.175866, pedigree (2,2,4,1,1)
- Nickel, ion [water, ground-]: 1.54517e-12 kg; source Freiermuth R.  2006; lognormal variance with pedigree 0.356938, pedigree (2,2,4,1,1)
  (same comment as for Chromium, ion)
- Zinc, ion [water, ground-]: 2.03144e-7 kg; source Freiermuth R.  2006; lognormal variance with pedigree 0.356938, pedigree (2,2,4,1,1)
  (same comment as for Chromium, ion)
- Fenpropidin [soil, agricultural]: 5.69022e-6 kg; lognormal variance with pedigree 0.0447216, pedigree (2,2,4,1,1)
  (same comment as for Desmedipham)
- Phosphate [water, ground-]: 1.4921e-6 kg; source Prasuhn V.  2006; lognormal variance with pedigree 0.175866, pedigree (2,2,4,1,1)
  (same comment as for Phosphate)
- Fenpropimorph [soil, agricultural]: 2.27609e-6 kg; lognormal variance with pedigree 0.0447216, pedigree (2,2,4,1,1)
  (same comment as for Desmedipham)
- Cadmium, ion [water, surface water]: 6.18491e-10 kg; source Freiermuth R.  2006; lognormal variance with pedigree 0.356938, pedigree (2,2,4,1,1)
  (same comment as for Chromium, ion)
- Kresoxim-methyl [soil, agricultural]: 1.89674e-6 kg; lognormal variance with pedigree 0.0447216, pedigree (2,2,4,1,1)
  (same comment as for Desmedipham)

## Sampling procedure
WFLDB Methodological Guidelines for the Life Cycle Inventory of Agricultural Products in the latest version, available at: (Report section: https://v30.ecoquery.ecoinvent.org/File/Reports). Data sources: Data were categorised from level 0 (L0) to level (L4) as follows: L0 = estimate, proxy; L1 = statistical data (e.g. FAOSTAT); L2 = L1 adapted to crop and country;L3 = literature data or L1 resp. L2 data approved by experts; medium detailing (i.e. kg of total N-fertiliser); L4 = L3 data of high detailing (i.e. portion N-fertiliser types).In this dataset data were obtained for yield: L3; Fertilisers: L4; Pesticides: L4; Machinery: L4; Irrigation: L3. For information regarding the calculation of individual exchanges see supporting documentation WFLDB-Documentation.pdf.

## Extrapolations
This dataset has been extrapolated from year 2012 to the year of the calculation (2021). The uncertainty has been adjusted accordingly.

## Review by Assumpció ANTON 2016-05-30
Be aware that the use of statistics in input calculations could provide some specific inputs not common for specific crops, this should be corrected if better information is available and better reflexed in DQR . Currently, I would dissent for some of good marks provided, being a revision of criteria applied advisable.

Pesticides will need to be amended periodically checking for update of pesticides' ban.
