# fluorescent whitening agent production, distyrylbiphenyl type

Dataset: EcoSpold 2, unit process
Geography: RER
Time period: 1999-01-01 to 2021-12-31
Technology level: current
Classification: ISIC rev.4 ecoinvent: 2011:Manufacture of basic chemicals
Classification: EcoSpold01Categories: washing agents/auxiliary agents
Synonyms: DSBP
Tags: ConvertedDataset
Scenario: Business-as-Usual
System model: Allocation, cut-off by classification
Share of production covered: 98 %
Generated by: Rainer Zah
Published in: Zah R. 2004
Database: ecoinvent
isCopyrightProtected: true
accessRestrictedTo: 1

## General comment
The dataset represents the production of 1 kg of fluorescent whitening agent distyrylbiphenyl type from byphenyl, 2-chlorotoluene and trimethyl phosphite.
Material and energy inputs as well as production of waste and emissions are from literature resources. Infrastructure and transport are estimation based on a large chemical plant.
Flow diagram of the production of the fluorescent white agent DSBP (distyrylbiphenyl type):
[This dataset was already contained in the ecoinvent database version 2. It was not individually updated during the transfer to ecoinvent version 3. Life Cycle Impact Assessment results may still have changed, as they are affected by changes in the supply chain, i.e. in other datasets. This dataset was generated following the ecoinvent quality guidelines for version 2. It may have been subject to central changes described in the ecoinvent version 3 change report (http://www.ecoinvent.org/database/ecoinvent-version-3/reports-of-changes/), and the results of the central updates were reviewed extensively. The changes added e.g. consistent water flows and other information throughout the database. The documentation of this dataset can be found in the ecoinvent reports of version 2, which are still available via the ecoinvent website. The change report linked above covers all central changes that were made during the conversion process.]

## Included activities start
From reception of precursors calcite, stylvite, and sodium chlorid at the factory gate.

## Included activities end
This module contains material and energy input, production of waste and emissions for the production of the mentioned FWA (fluorescent whitening agent). Transport and infrastructure have been estimated.

## Geography
data from European main producer, used as European average

## Technology
The production of distyrylbiphenyl fluorescent whitening agent starts with biphenyl, that is produced along with other aromatic compounds during the refinining of crude oil. Reacting it with chlorine and formaldehyde pro-duces the intermediate 4,4'-bis(chloromethyl)biphenyl, which reacts with trimethylphosphite to give 4,4'-bis(dimethoxyphosphonomethyl)biphenyl. This symmetrical biphenylphosphonate is reacted with two molecules of an aromatic aldehyde. In the case of the DSBP under consideration, benzaldehyde-2-sulphonic acid is used, a compound which is produced form 2-chlor-benzaldehyde and sodium sulphite. The two sulphonic acid groups thus introduced give the final product DSBP the desired affinity to adsorb onto cellulose fibres. The commercial product contains 83% active substance.

## Time period
year of reported data

## Parameters
- fraction, process water, to air: 0.4 dimensionless; name fraction_PW_to_air; lognormal variance with pedigree 0.092025, pedigree (4,4,3,2,4)
  Literature value (Statistics Canada, 2007 & Shaffer, K.H., 2008, Consumptive water use in the Great Lakes Basin, USGS) (Vionnet, S., Quantis Water Database - Technical Report, 2012).

## Reference product
- fluorescent whitening agent, distyrylbiphenyl type: 1 kg; name FWagent_RP; source Häussinger P. 2000; CPC 34310: Synthetic organic colouring matter and preparations based thereon; synthetic organic products of a kind used a[…]; By-product classification allocatable product; CAS 27344-41-8
  EcoSpold01Location=RER
  Fluorescent whitening agents (FWA) are colorless organic substances that are able to absorb ultraviolet radiance and to re-emit the absorbed energy as blue fluorescent light (400 - 500 nm). FWAs are used as additives in detergents. By coating the textile fibres during the washing process, they compensate the natural (but continuosly increasing) yellow touch of the textiles resulting in a high grade of whiteness.
  production volume 1.32237 kg; name FWagent_RP_PV
    This is a placeholder value that does not reflect real-world production volumes. This dataset does not currently require a real-world production volume to work in the database framework, and no actual data were collected yet. This has no negative effect on the results of the ecoinvent database. The placeholder value of this activity was scaled according to the nominal GDP of 2005 (source: United Nations, http://data.un.org/Glossary.aspx?q=GDP+%28current+US%24%29, accessed 20130726) to reflect an appropriate share of the global production volume, which is also a placeholder value.
  property carbon content, fossil 0.596803
    MW of Distyrylbiphenyl sulfonate is 563. It contains 28 C atoms (BgVV Health assessment of certain stilbene derivatives. Health assessment of specific stilbene derivatives used as textile auxiliaries or in detergents, 2001)
  property carbon content, non-fossil 0
    (same comment as for fluorescent whitening agent, distyrylbiphenyl type)
  property heating value, net 22.42 MJ
    LHV is calculated based on the elemental composition of the substance. Based on the CAS number of the substance (027344-41-8), the chemical formula of the substance is found to be: C28H20Na2O6S2, (PubChem 2020).
    Reference: Kim, S., Chen, J., Cheng, T., Gindulyte, A., He, J., He, S., Li, Q., Shoemaker, B. A., Thiessen, P. A., Yu, B., Zaslavsky, L., Zhang, J., & Bolton, E. E. (2019). PubChem 2019 update: improved access to chemical data. Nucleic acids research, 47(D1), D1102–D1109. https://doi.org/10.1093/nar/gky1033
  property carbon content 0.596803
    carbon content on a dry matter basis (reserved; not for manual entry)
  properties: wet mass 1 kg, water in wet mass 0 kg, dry mass 1 kg, price 1.57 EUR2005, water content 0, carbon allocation 0.596803 kg

## Inputs from technosphere
- chemical factory, organics: 1.2e-9 unit; source Frischknecht R. 2007; lognormal variance with pedigree 0.351225, pedigree (2,3,5,2,1)
  Estimation: estimation based on a large chemical plant. Standard value has been multiplied by 3, due to the many aggregated processes.
  EcoSpold01Location=RER
  Uncertainty: ;
- inert waste, for final disposal: -0.233 kg; name ByP_03; source Dall'Acqua S. 1995; lognormal variance with pedigree 0.051225, pedigree (2,3,5,2,1)
  Literature value.
  EcoSpold01Location=CH
  Uncertainty: ;
  production volume 0.308112 kg; = ByP_03/ FWagent_RP* FWagent_RP_PV
    Calculated from the production volume of fluorescent whitening agent, distyrylbiphenyl type in proportion to the respective output amounts.
  property price 0 EUR2005; name ByP_03_price_EUR2005
  properties: wet mass 1 kg, dry mass 0.995 kg, water content 0.00502513
- hazardous waste, for incineration: 0 kg; name ByP_02; source Dall'Acqua S. 1995; pedigree (1,1,1,1,1)
  Literature value.
  EcoSpold01Location=CH
  Uncertainty: ;
  production volume 0 kg
    (same comment as for inert waste, for final disposal)
  property price 0 EUR2005; name ByP_02_price_EUR2005
  properties: carbon content, fossil 0.554667, wet mass 1 kg, dry mass 0.75 kg, water content 0.333333, heating value, net 17 MJ
  note on carbon content, fossil: Tab A.6, ecoinvent v2.2 report 13_I. C content has been calculated after data in the tables, and then referred to 1 kg DM
  note on heating value, net: Value taken from the general comment of the treatment dataset.
- average incineration residue: -0.0441 kg; name ByP_04; source Dall'Acqua S. 1995; lognormal variance with pedigree 0.051225, pedigree (2,3,5,2,1)
  EcoSpold01Location=CH
  Literature value.
  Uncertainty: ;
  production volume 0.0583165 kg; = ByP_04/ FWagent_RP* FWagent_RP_PV
    (same comment as for inert waste, for final disposal)
  property price 0 EUR2005; name ByP_04_price_EUR2005
  properties: carbon content, fossil 0.0325466, dry mass 1 kg, wet mass 1 kg, carbon content, non-fossil 0.0511208
  note on carbon content, fossil: Tab A.1, ecoinvent v2.2 report 13_I. It is considered that 61.1% of the C has a biogenic origin
- municipal solid waste: -0.523 kg; name ByP_01; source Dall'Acqua S. 1995; lognormal variance with pedigree 0.051225, pedigree (2,3,5,2,1)
  EcoSpold01Location=CH
  Literature value.
  Uncertainty: ;
  production volume 0.691599 kg; = ByP_01/ FWagent_RP* FWagent_RP_PV
    (same comment as for inert waste, for final disposal)
  properties: heating value, net 11.74 MJ, water content 0.297017, carbon content, fossil 0.171549, dry mass 0.771 kg, carbon content, non-fossil 0.261655, wet mass 1 kg
  note on carbon content, fossil: MSW composition in tab 4.1, ecoinvent v2.2 report 13_I. C content referred to 1 kg DM
- hazardous waste, for incineration: -5.4476e-9, -1.42397e-10 kg (2 entries); source Dall'Acqua S. 1995; lognormal variance with pedigree 0.051225, pedigree (2,3,5,2,1)
  Literature value.
  EcoSpold01Location=CH
  Uncertainty: ;
  production volume 7.39204e-9 kg

## Inputs from nature
- Coal, brown, in ground [natural resource, in ground]: 1.31 kg; source Dall'Acqua S. 1995; lognormal variance with pedigree 0.051225, pedigree (2,3,5,2,1)
  Literature value.
  Uncertainty: ;
- Energy, potential (in hydropower reservoir), converted [natural resource, in water]: 32.6 MJ
- Antimony, in ground [natural resource, in ground]: 0.00106 kg; source Dall'Acqua S. 1995; lognormal variance with pedigree 0.051225, pedigree (2,3,5,2,1)
  Literature value.
  Uncertainty: ;
- Fluorspar, in ground [natural resource, in ground]: 1.94e-5 kg; source Dall'Acqua S. 1995; lognormal variance with pedigree 0.051225, pedigree (2,3,5,2,1)
  92% CaF2 in ore; Literature value.
  Uncertainty: ;
- Diatomite, in ground [natural resource, in ground]: 0.0102 kg; source Dall'Acqua S. 1995; lognormal variance with pedigree 0.051225, pedigree (2,3,5,2,1)
  Literature value.
  Uncertainty: ;
- Sand, unspecified, in ground [natural resource, in ground]: 0.0549 kg; source Dall'Acqua S. 1995; lognormal variance with pedigree 0.051225, pedigree (2,3,5,2,1)
  Literature value.
  Uncertainty: ;
- Uranium, in ground [natural resource, in ground]: 0.000115 kg; source Dall'Acqua S. 1995; lognormal variance with pedigree 0.051225, pedigree (2,3,5,2,1)
  Literature value.
  Uncertainty: ;
- Oil, crude, in ground [natural resource, in ground]: 2.79 kg; source Dall'Acqua S. 1995; lognormal variance with pedigree 0.051225, pedigree (2,3,5,2,1)
  Literature value.
  Uncertainty: ;
- Iron, in ground [natural resource, in ground]: 0.00697 kg; source Dall'Acqua S. 1995; lognormal variance with pedigree 0.051225, pedigree (2,3,5,2,1)
  46% Fe in siderite; 25% Fe in ore; Literature value.
  Uncertainty: ;
- Sodium chloride, in ground [natural resource, in ground]: 3.35 kg; source Dall'Acqua S. 1995; lognormal variance with pedigree 0.051225, pedigree (2,3,5,2,1)
  Literature value.
  Uncertainty: ;
- Magnesite, in ground [natural resource, in ground]: 8.86e-9 kg; source Dall'Acqua S. 1995; lognormal variance with pedigree 0.051225, pedigree (2,3,5,2,1)
  60% Magnesite in ore; Literature value.
  Uncertainty: ;
- Coal, hard, unspecified, in ground [natural resource, in ground]: 2.09 kg; source Dall'Acqua S. 1995; lognormal variance with pedigree 0.051225, pedigree (2,3,5,2,1)
  Literature value.
  Uncertainty: ;
- Gas, natural, in ground [natural resource, in ground]: 4.86 m3; source Dall'Acqua S. 1995; lognormal variance with pedigree 0.051225, pedigree (2,3,5,2,1)
  Literature value.
  Uncertainty: ;
- Wood, unspecified, standing [natural resource, biotic]: 2.01e-5 m3; source Dall'Acqua S. 1995; lognormal variance with pedigree 0.051225, pedigree (2,3,5,2,1)
  Literature value.
  Uncertainty: ;
- Calcite, in ground [natural resource, in ground]: 0.0798 kg; source Dall'Acqua S. 1995; lognormal variance with pedigree 0.051225, pedigree (2,3,5,2,1)
  Literature value.
  Uncertainty: ;
- Aluminium, in ground [natural resource, in ground]: 0.00155 kg; source Dall'Acqua S. 1995; lognormal variance with pedigree 0.051225, pedigree (2,3,5,2,1)
  24% Al in bauxite; 11% Al in ore; Literature value.
  Uncertainty: ;
- Sylvite, in ground [natural resource, in ground]: 1.25e-7 kg; source Dall'Acqua S. 1995; lognormal variance with pedigree 0.051225, pedigree (2,3,5,2,1)
  25% Sylvite in sylvinite; Literature value.
  Uncertainty: ;
- Phosphorus, in ground [natural resource, in ground]: 1.94 kg; source Dall'Acqua S. 1995; lognormal variance with pedigree 0.051225, pedigree (2,3,5,2,1)
  18% P in apatite; 12% in ore; Literature value.
  Uncertainty: ;
- Water, unspecified natural origin [natural resource, in water]: 6.7 m3; name water_UNO_input; source EMPA - Swiss Federal Laboratories for Ma 1999; lognormal variance with pedigree 0.052625, pedigree (3,3,5,2,1)
  Calculated based on literature, (Vionnet, S., Quantis Water Database - Technical Report, 2012). Technology: via 4.4-bis (chloromethyl)-bi-phenyl and trimethylphosphite, via the 4.4 - bis (dimethoxyphos-phonomethyl)-sulphonic acid.
  property carbon content, fossil 0.0104329; name C_content_fossil
  property wet mass 1000 kg; name WM
  property water content 9081.65; name water_content
  property carbon content, non-fossil 0; name C_content_non_fossil
  property water in wet mass 999.89 kg; name WWM
  property dry mass 0.1101 kg; name DM

## Emissions to nature
- Hydrocarbons, unspecified [water, surface water]: 0.00174 kg; source Dall'Acqua S. 1995; lognormal variance with pedigree 0.351225, pedigree (2,3,5,2,1)
  Literature value.
  Uncertainty: ;
- Water [air, unspecified]: 2.68 m3; name water_to_air_unspecified; = (water_UNO_input*fraction_PW_to_air); lognormal variance with pedigree 0.0807, pedigree (2,2,5,1,1)
  Calculated value based on literature values and expert opinion. See comments in the parametres' comment field.
  property fraction, origin: unspecified 1; name fraction_origin_unspecified
  property fraction, origin: salt water 0; name fraction_origin_salt_water
  property fraction, origin: fresh water 0; name fraction_origin_fresh_water
- Particulates, > 10 um [air, urban air close to ground]: 0.005696 kg; source Dall'Acqua S. 1995; lognormal variance with pedigree 0.091225, pedigree (2,3,5,2,1)
  Literature value.
  Uncertainty: ;
- Sulfide [water, surface water]: 0.00211 kg; source Dall'Acqua S. 1995; lognormal variance with pedigree 0.091225, pedigree (2,3,5,2,1)
  Literature value.
  Uncertainty: ;
- TOC, Total Organic Carbon [water, surface water]: 0.0206 kg; source Dall'Acqua S. 1995; lognormal variance with pedigree 0.091225, pedigree (2,3,5,2,1)
  Literature value.
  Uncertainty: ;
- Cadmium, ion [water, surface water]: 2.27e-7 kg; source Dall'Acqua S. 1995; lognormal variance with pedigree 0.701225, pedigree (2,3,5,2,1)
  Literature value.
  Uncertainty: ;
- Chromium, ion [water, surface water]: 3.17e-5 kg; source Dall'Acqua S. 1995; lognormal variance with pedigree 0.701225, pedigree (2,3,5,2,1)
  Literature value.
  Uncertainty: ;
- Hydrogen chloride [air, urban air close to ground]: 0.0017 kg; source Dall'Acqua S. 1995; lognormal variance with pedigree 0.171225, pedigree (2,3,5,2,1)
  Literature value.
  Uncertainty: ;
- Barium [water, surface water]: 0.000391 kg; source Dall'Acqua S. 1995; lognormal variance with pedigree 0.701225, pedigree (2,3,5,2,1)
  Literature value.
  Uncertainty: ;
- Radioactive species, Nuclides, unspecified [water, surface water]: 90.4 kBq; source Dall'Acqua S. 1995; lognormal variance with pedigree 0.351225, pedigree (2,3,5,2,1)
  Literature value.
  Uncertainty: ;
- NMVOC, non-methane volatile organic compounds, unspecified origin [air, urban air close to ground]: 0.0329 kg; source Dall'Acqua S. 1995; lognormal variance with pedigree 0.171225, pedigree (2,3,5,2,1)
  Literature value.
  Uncertainty: ;
- BOD5, Biological Oxygen Demand [water, surface water]: 3.28e-5 kg; source Dall'Acqua S. 1995; lognormal variance with pedigree 0.091225, pedigree (2,3,5,2,1)
  Literature value.
  Uncertainty: ;
- Zinc [air, urban air close to ground]: 1.27e-5 kg; source Dall'Acqua S. 1995; lognormal variance with pedigree 0.701225, pedigree (2,3,5,2,1)
  Literature value.
  Uncertainty: ;
- Lead [water, surface water]: 1.76e-5 kg; source Dall'Acqua S. 1995; lognormal variance with pedigree 0.701225, pedigree (2,3,5,2,1)
  Literature value.
  Uncertainty: ;
- COD, Chemical Oxygen Demand [water, surface water]: 0.00018 kg; source Dall'Acqua S. 1995; lognormal variance with pedigree 0.091225, pedigree (2,3,5,2,1)
  Literature value.
  Uncertainty: ;
- Dinitrogen monoxide [air, urban air close to ground]: 0.000608 kg; source Dall'Acqua S. 1995; lognormal variance with pedigree 0.091225, pedigree (2,3,5,2,1)
  Literature value.
  Uncertainty: ;
- Hydrogen [air, urban air close to ground]: 0.0025 kg; source Dall'Acqua S. 1995; lognormal variance with pedigree 0.091225, pedigree (2,3,5,2,1)
  Literature value.
  Uncertainty: ;
- Manganese [air, urban air close to ground]: 6.27e-7 kg; source Dall'Acqua S. 1995; lognormal variance with pedigree 0.091225, pedigree (2,3,5,2,1)
  Literature value.
  Uncertainty: ;
- Radioactive species, other beta emitters [air, urban air close to ground]: 9870 kBq; source Dall'Acqua S. 1995; lognormal variance with pedigree 0.351225, pedigree (2,3,5,2,1)
  Literature value.
  Uncertainty: ;
- DOC, Dissolved Organic Carbon [water, surface water]: 0.0143 kg; source Dall'Acqua S. 1995; lognormal variance with pedigree 0.091225, pedigree (2,3,5,2,1)
  Literature value.
  Uncertainty: ;
- Nickel [air, urban air close to ground]: 2.19e-5 kg; source Dall'Acqua S. 1995; lognormal variance with pedigree 0.701225, pedigree (2,3,5,2,1)
  Literature value.
  Uncertainty: ;
- Mercury [air, urban air close to ground]: 3.43e-7 kg; source Dall'Acqua S. 1995; lognormal variance with pedigree 0.701225, pedigree (2,3,5,2,1)
  Literature value.
  Uncertainty: ;
- Cadmium [air, urban air close to ground]: 8.79e-7 kg; source Dall'Acqua S. 1995; lognormal variance with pedigree 0.701225, pedigree (2,3,5,2,1)
  Literature value.
  Uncertainty: ;
- Nitrogen [water, surface water]: 0.000799 kg; source Dall'Acqua S. 1995; lognormal variance with pedigree 0.091225, pedigree (2,3,5,2,1)
  Literature value.
  Uncertainty: ;
- Methane, bromotrifluoro-, Halon 1301 [air, urban air close to ground]: 2.75e-7 kg; source Dall'Acqua S. 1995; lognormal variance with pedigree 0.171225, pedigree (2,3,5,2,1)
  Literature value.
  Uncertainty: ;
- Particulates, > 2.5 um, and < 10um [air, urban air close to ground]: 0.007654 kg; source Dall'Acqua S. 1995; lognormal variance with pedigree 0.091225, pedigree (2,3,5,2,1)
  Literature value.
  Uncertainty: ;
- Zinc, ion [water, surface water]: 0.000171 kg; source Dall'Acqua S. 1995; lognormal variance with pedigree 0.701225, pedigree (2,3,5,2,1)
  Literature value.
  Uncertainty: ;
- PAH, polycyclic aromatic hydrocarbons [air, urban air close to ground]: 1.06e-6 kg; source Dall'Acqua S. 1995; lognormal variance with pedigree 0.171225, pedigree (2,3,5,2,1)
  Literature value.
  Uncertainty: ;
- Phenol [water, surface water]: 9.87e-6 kg; source Dall'Acqua S. 1995; lognormal variance with pedigree 0.351225, pedigree (2,3,5,2,1)
  Literature value.
  Uncertainty: ;
- Chlorinated solvents, unspecified [water, surface water]: 9.64e-8 kg; source Dall'Acqua S. 1995; lognormal variance with pedigree 0.351225, pedigree (2,3,5,2,1)
  Literature value.
  Uncertainty: ;
- Ammonia [air, urban air close to ground]: 9.3e-5 kg; source Dall'Acqua S. 1995; lognormal variance with pedigree 0.091225, pedigree (2,3,5,2,1)
  Literature value.
  Uncertainty: ;
- Iron, ion [water, surface water]: 0.00585 kg; source Dall'Acqua S. 1995; lognormal variance with pedigree 0.701225, pedigree (2,3,5,2,1)
  Literature value.
  Uncertainty: ;
- Cyanide [water, surface water]: 1.2e-6 kg; source Dall'Acqua S. 1995; lognormal variance with pedigree 0.091225, pedigree (2,3,5,2,1)
  Literature value.
  Uncertainty: ;
- Chloride [water, surface water]: 0.48 kg; source Dall'Acqua S. 1995; lognormal variance with pedigree 0.091225, pedigree (2,3,5,2,1)
  Literature value.
  Uncertainty: ;
- Nitrate [water, surface water]: 0.0108 kg; source Dall'Acqua S. 1995; lognormal variance with pedigree 0.091225, pedigree (2,3,5,2,1)
  Literature value.
  Uncertainty: ;
- Particulates, < 2.5 um [air, urban air close to ground]: 0.00445 kg; source Dall'Acqua S. 1995; lognormal variance with pedigree 0.091225, pedigree (2,3,5,2,1)
  Literature value.
  Uncertainty: ;
- Nickel, ion [water, surface water]: 1.52e-5 kg; source Dall'Acqua S. 1995; lognormal variance with pedigree 0.701225, pedigree (2,3,5,2,1)
  Literature value.
  Uncertainty: ;
- Methane, fossil [air, urban air close to ground]: 0.035 kg; source Dall'Acqua S. 1995; lognormal variance with pedigree 0.091225, pedigree (2,3,5,2,1)
  Literature value.
  Uncertainty: ;
- Benzene [air, urban air close to ground]: 6.69e-5 kg; source Dall'Acqua S. 1995; lognormal variance with pedigree 0.351225, pedigree (2,3,5,2,1)
  Literature value.
  Uncertainty: ;
- Arsenic, ion [water, surface water]: 6.25e-6 kg; source Dall'Acqua S. 1995; lognormal variance with pedigree 0.701225, pedigree (2,3,5,2,1)
  Literature value.
  Uncertainty: ;
- Mercury [water, surface water]: 1.28e-8 kg; source Dall'Acqua S. 1995; lognormal variance with pedigree 0.701225, pedigree (2,3,5,2,1)
  Literature value.
  Uncertainty: ;
- Copper, ion [water, surface water]: 2.26e-5 kg; source Dall'Acqua S. 1995; lognormal variance with pedigree 0.701225, pedigree (2,3,5,2,1)
  Literature value.
  Uncertainty: ;
- Toluene [water, surface water]: 7.34e-6 kg; source Dall'Acqua S. 1995; lognormal variance with pedigree 0.351225, pedigree (2,3,5,2,1)
  Literature value.
  Uncertainty: ;
- Aluminium [water, surface water]: 0.00387 kg; source Dall'Acqua S. 1995; lognormal variance with pedigree 0.701225, pedigree (2,3,5,2,1)
  Literature value.
  Uncertainty: ;
- Chlorine [air, urban air close to ground]: 6e-10 kg; source Dall'Acqua S. 1995; lognormal variance with pedigree 0.091225, pedigree (2,3,5,2,1)
  Literature value.
  Uncertainty: ;
- Ammonium, ion [water, surface water]: 0.0039 kg; source Dall'Acqua S. 1995; lognormal variance with pedigree 0.091225, pedigree (2,3,5,2,1)
  Literature value.
  Uncertainty: ;
- Hydrocarbons, aromatic [air, urban air close to ground]: 0.000157 kg; source Dall'Acqua S. 1995; lognormal variance with pedigree 0.351225, pedigree (2,3,5,2,1)
  Literature value.
  Uncertainty: ;
- Phosphate [water, surface water]: 0.00232 kg; source Dall'Acqua S. 1995; lognormal variance with pedigree 0.091225, pedigree (2,3,5,2,1)
  Literature value.
  Uncertainty: ;
- Hydrocarbons, chlorinated [air, urban air close to ground]: 4.47e-5 kg; source Dall'Acqua S. 1995; lognormal variance with pedigree 0.171225, pedigree (2,3,5,2,1)
  Literature value.
  Uncertainty: ;
- Sulfur dioxide [air, urban air close to ground]: 0.0952 kg; source Dall'Acqua S. 1995; lognormal variance with pedigree 0.051225, pedigree (2,3,5,2,1)
  Literature value.
  Uncertainty: ;
- Carbon monoxide, fossil [air, urban air close to ground]: 0.0106 kg; source Dall'Acqua S. 1995; lognormal variance with pedigree 0.701225, pedigree (2,3,5,2,1)
  Literature value.
  Uncertainty: ;
- Nitrogen, organic bound [water, surface water]: 8.48e-6 kg; source Dall'Acqua S. 1995; lognormal variance with pedigree 0.091225, pedigree (2,3,5,2,1)
  Literature value.
  Uncertainty: ;
- Antimony [water, surface water]: 6.92e-5 kg; source Dall'Acqua S. 1995; lognormal variance with pedigree 0.701225, pedigree (2,3,5,2,1)
  Literature value.
  Uncertainty: ;
- Hydrocarbons, aromatic [water, surface water]: 5.45e-5 kg; source Dall'Acqua S. 1995; lognormal variance with pedigree 0.351225, pedigree (2,3,5,2,1)
  Literature value.
  Uncertainty: ;
- Nitrogen oxides [air, urban air close to ground]: 0.0584 kg; source Dall'Acqua S. 1995; lognormal variance with pedigree 0.091225, pedigree (2,3,5,2,1)
  Literature value.
  Uncertainty: ;
- Carbon dioxide, fossil [air, urban air close to ground]: 20.7 kg; source Dall'Acqua S. 1995; lognormal variance with pedigree 0.051225, pedigree (2,3,5,2,1)
  Literature value.
  Uncertainty: ;
- PAH, polycyclic aromatic hydrocarbons [water, surface water]: 7.71e-7 kg; source Dall'Acqua S. 1995; lognormal variance with pedigree 0.351225, pedigree (2,3,5,2,1)
  Literature value.
  Uncertainty: ;
- Fluoride [water, surface water]: 1.58e-5 kg; source Dall'Acqua S. 1995; lognormal variance with pedigree 0.091225, pedigree (2,3,5,2,1)
  Literature value.
  Uncertainty: ;
- Lead [air, urban air close to ground]: 4.29e-6 kg; source Dall'Acqua S. 1995; lognormal variance with pedigree 0.701225, pedigree (2,3,5,2,1)
  Literature value.
  Uncertainty: ;
- Hydrogen fluoride [air, urban air close to ground]: 8.54e-5 kg; source Dall'Acqua S. 1995; lognormal variance with pedigree 0.091225, pedigree (2,3,5,2,1)
  Literature value.
  Uncertainty: ;
- Solids, inorganic [water, surface water]: 0.0506 kg; source Dall'Acqua S. 1995; lognormal variance with pedigree 0.091225, pedigree (2,3,5,2,1)
  Literature value.
  Uncertainty: ;
- Water [water, unspecified]: 4.02 m3; name water_to_water_unspecified; = water_UNO_input*(1-fraction_PW_to_air); lognormal variance with pedigree 0.0807, pedigree (2,2,5,1,1)
  (same comment as for Water)
  property fraction, origin: salt water 0; name fraction_origin_salt_water_Ww
  property fraction, origin: fresh water 0; name fraction_origin_fresh_water_Ww
  property fraction, origin: unspecified 1; name fraction_origin_unspecified_Ww
- Sulfate [water, surface water]: 0.224 kg; source Dall'Acqua S. 1995; lognormal variance with pedigree 0.091225, pedigree (2,3,5,2,1)
  Literature value.
  Uncertainty: ;

## Sampling procedure
aggregated data, calculated by the producing company itself

## Extrapolations
This dataset has been extrapolated from year 1999 to the year of the calculation (2021). The uncertainty has been adjusted accordingly.

## Review by Heiko Kunst 2007-11-15
passed.

## Review by Roland Hischier 2011-11-15
Transfer of documentation done.
