# electricity production, hydro, run-of-river, renewable energy products

Dataset: EcoSpold 2, unit process
Geography: CH
Time period: 1945-01-01 to 2021-12-31
Technology level: modern
Classification: EcoSpold01Categories: hydro power/power plants
Classification: ISIC rev.4 ecoinvent: 3510:Electric power generation, transmission and distribution
Tags: certified electricity; hydro power
Scenario: Business-as-Usual
System model: Allocation, cut-off by classification
Generated by: Christian Bauer
Published in: Bolliger, R. 2007
Database: ecoinvent
isCopyrightProtected: true
accessRestrictedTo: 1

## General comment
This dataset represents the production of 1 kWh of certified high-voltage electricity in a run-of-river power plant unit. For this, a representative sample of various types of power plants in Switzerland and Austria is taken into account. The calculations are based on the information and data of the following run-of-river power plants: Rupperswil-Auenstein (Baumann 1949), Wildegg-Brugg (NOK 1956), Birsfelden (Aegerter et al. 1954), Donaukraftwerk Greifenstein (Brux 1983; max. Leistung 237 MW) and Rheinkraftwerk Albbruck-Dogern (Radag 1979) as well as the new construction of the power plant Ruppoldingen. The determined specific data was then related to the entire power plant park of Switzerland with an annual net electricity output of 15484 GWh/a (BEW 2001a). Lifetime is assumed to be 80 years for the structural part (including cement, reinforcing steel, diesel, electricity, transportation and explosives) and 40 years for the rest of materials. The data refers to plant construction of a mix of types of dams built between 1945 and the beginning of the 1980s; therefore they might not be representative for more modern construction, for an individual type and for small-scale and smallest-scale plants.
[This dataset was already contained in the ecoinvent database version 2. It was not individually updated during the transfer to ecoinvent version 3. Life Cycle Impact Assessment results may still have changed, as they are affected by changes in the supply chain, i.e. in other datasets. This dataset was generated following the ecoinvent quality guidelines for version 2. It may have been subject to central changes described in the ecoinvent version 3 change report (http://www.ecoinvent.org/database/ecoinvent-version-3/reports-of-changes/), and the results of the central updates were reviewed extensively. The changes added e.g. consistent water flows and other information throughout the database. The documentation of this dataset can be found in the ecoinvent reports of version 2, which are still available via the ecoinvent website. The change report linked above covers all central changes that were made during the conversion process.]

## Included activities start
From (potential) energy in water, entering the power plant.

## Included activities end
The activity ends with 1 kWh of produced electricity at the power plant. The datasets includes the use of lucricant oil and the mass of water assing through the turbines. The dataset doesn´t include detailed specifications about land use due to methodical issues. This information is only included via transformation and occuption of land and calculated with an simplified approach.

## Geography
Inventory represents Swiss data for label-certified electricity.

## Technology
Run-of-river power plants are hydro power plants without important reservoirs. Depending on the net head of the power plant, high-pressure, medium-pressure and low-pressure systems can be distinguished. Low-pressure power plants including river power stations and canal power plants are very common; therefore these two types of run-of-river power stations are covered in the dataset. To some extent, high-pressure as well as medium-pressure run-of-river systems can be considered as reservoir power stations, e.g. as unit in plant groups that are dominated by storage power plants, but also include alpine run power stations.

The technology used in the dataset has an overall efficiency of 82%, more modern technologies show an overall efficiency of about 88%. The overall efficiency (current: 0,82; modern: 0,88) is composed of the efficiency of the works water channel (current: 1,00; modern: 1,00), the turbine (current: 0,87; modern: 0,91), the generator (current: 0,96; modern: 0,98) and the transformer (current: 0,98; modern: 0,99). For the calculation of the works water channel of run-of-river plants an efficiency of 100% is assumed.

The efficiency losses in turbines depend on the turbine type (Kaplan, Francis, Pelton, etc.), the turbine output and on the ratio between turbined water amount and the rated water amount. In König, examples for curve progressions of the relationship between these variables are shown. For current power plants an efficiency of 87% is assumed, more modern turbines show an efficiency of about 91%.

The efficiency of generators depends on the output, the rotation speed of the generator and the cooling system. For today’s power plants an efficiency of approximately 96% is assumed, modern generators show an efficiency of about 98%. The efficiency of transformers amounts to 98%, respectively 99%.
References:
König F., von (1985) Bau von Wasserkraftanlagen. C.F. Müller, Karlsruhe.

## Parameters
- lifetime: 80 year; lognormal variance with pedigree 0.0014, pedigree (2,2,1,3,1)
  Estimation based on experiences.

## Reference product
- electricity, high voltage, renewable energy products: 1 kWh; By-product classification allocatable product; CPC 17100: Electrical energy
  production volume 3.021e9 kWh; name apv_el
    Literature value/statistics. Net production of grid-connected certified electricity in 2011 with this technology in Switzerland.
  property price 0.101 EUR2005
    Temporary price data. Calculated as 90% of purchasers price based on: 94% of the average price (to account for a 6% loss in transformation and transmission) for electricity for industrial consumersin 2005 (excluded taxes). From IEA. In addition, regarding label-certified electricity, the Swiss government has a market instrument for renewable energy which is calculated as the difference between the market price and the production price. This was started in 2009 and is 0.45 Rp/kWh. Therefore, the production price of label certified energy is assumed to be the supplyer price plus the 0.45Rp/kWh (http://www.bfe.admin.ch/themen/00612/02073/index.html?lang=de).The unit conversion from CH to EUR is based on the ecoinvent unit conversion file (1 CHF2005 = 0.644 EUR2005). As an approximation, this is also used for global electricity production

## Inputs from technosphere
- waste mineral oil: -7.56e-6 kg; name waste_min_oil; = (lubricating_oil)*-1; lognormal variance with pedigree 0.132, pedigree (1,1,5,5,1)
  Estimation. The lubricating oil is in a closed loop system (i.e. cannot get into the turbined water system) and is disposed annualy as waste oil in a hazardous waste treatment plant. The information given is based on own assumptions.
  EcoSpold01Location=CH
  Uncertainty: Data from a dataset for the time period 1945-1970 but still valid today.
  production volume 22838.8 kg; = apv_el*waste_min_oil
    Calculated from the production volume of electricity, high voltage, hydro, run-of-river in proportion to the respective output amounts.
  property price 0 EUR2005; name waste_min_oil_price_EUR2005
  properties: wet mass 1 kg, carbon content, fossil 0.864444, water content 0.111111, dry mass 0.9 kg, heating value, net 34.7 MJ
  note on carbon content, fossil: Tab A.6, ecoinvent v2.2 report 13_I. C content has been calculated after data in the tables, and then referred to 1 kg DM
  note on heating value, net: Value taken from the general comment of the treatment dataset.
- lubricating oil: 7.56e-6 kg; name lubricating_oil; = 0.000009*0.84; source Vögtlin H. J. 2002; lognormal variance with pedigree 0.25, pedigree (1,1,5,1,5)
  EcoSpold01Location=RER
  Estimation. A consumption of lubricating oil for turbines of 9 liters per GWh is estimated. With an oil density of 0.84 kg/l this amounts to 0.007 g/kWh. The lubricating oil is in a closed loop system (i.e. cannot get into the turbined water system) and is disposed annualy as waste oil in a hazardous waste treatment plant.
  properties: dry mass 1 kg, wet mass 1 kg, heating value, net 40.2 MJ, carbon content, fossil 0.75
  note on heating value, net: Literature value, Source: IPCC 2006, 2006 IPCC Guidelines for National Greenhouse Gas Inventories, Prepared by the National Greenhouse Gas Inventories Programme, Eggleston H.S., Buendia L., Miwa K., Ngara T. and Tanabe K. (eds). Published: IGES, Japan
  note on carbon content, fossil: Lubricating oil is produced from diesel. C-content/dry mass of fats and oils considered 75%, from: ecoinvent v2.2 report, n 15a, pg 40
- hydropower plant, run-of-river: 8.07285e-13 unit; = 1/(lifetime*15484*1000000); lognormal variance with pedigree 0.044, pedigree (1,1,3,5,1)
  EcoSpold01Location=CH
  Estimation. Lifetime is assumed to be 80 years (p. 29ff); net production is assumed to be 15484 GWh/a (Tab. 1.1 p. 3).

## Inputs from nature
- Transformation, from shrub land, sclerophyllous [natural resource, land]: 2.81e-5 m2; name transformation_shrub; lognormal variance with pedigree 0.162, pedigree (1,1,5,5,1)
  Estimation. Data are adopted from the Swiss power plant sample as it stands, therefore uncertainty is increased.
  To estimate the area of the water courses (i.e. the section between the water inlet and the weir) the length and average width according to the map is multiplied. As a result an index (approximate value) is calculated where the facts that hydropower plants affect natural habitats and disturb ground water are accounted for. Averaged over the investigated sample and distributed over life time the specific land use amounts to 4,5 10^-3 m2a/kWh, the transformation of land amounts to 5,6 10^-3 m2a/kWh. Thereby major rivers show lower values than small ones.
  Due to the fact that the calculated value represents an index value, it is not a hundred per cent comparable with other information relating to areas. In Switzerland the area before operation of the run-of-river plant is defined as "transformation from pasture" and "transformation from shrub land". This is because of cultivated land reclamation reasons flood protection and drainage measures have been implemented in the past. Due to the fact that it is not allowed fertilizing the area bordering the river, this land is assumed to be shrub land. Thereby, a ratio of 50 % for shrub land and 50 % for pasture is estimated.
  The area after commissioning of the run-of-river plant is defined as "transformation to river, artificial". Land use for the weir and the power station is defined as "transformation to industrial area" at which 1 % of the value is defined for the water course. Land use for access roads can be neglected because most of the power plants are built on developed land.
  It has to be pointed out that run-of-river power plants do not necessarily have a negative impact on the ecological situation (e.g. new construction of the power plant Ruppoldingen).
  Uncertainty: Data from a dataset for the time period 1945-1970 but still valid today.
- Transformation, to industrial area [natural resource, land]: 5.63e-7 m2; lognormal variance with pedigree 0.162, pedigree (1,1,5,5,1)
  Estimation. To estimate the area of the water courses (i.e. the section between the water inlet and the weir) the length and average width according to the map is multiplied. As a result an index (approximate value) is calculated where the facts that hydropower plants affect natural habitats and disturb ground water are accounted for. Averaged over the investigated sample and distributed over life time the specific land use amounts to 4,5 10^-3 m2a/kWh, the transformation of land amounts to 5,6 10^-3 m2a/kWh. Thereby major rivers show lower values than small ones.
  Due to the fact that the calculated value represents an index value, it is not a hundred per cent comparable with other information relating to areas. In Switzerland the area before operation of the run-of-river plant is defined as "transformation from pasture" and "transformation from shrub land". This is because of cultivated land reclamation reasons flood protection and drainage measures have been implemented in the past. Due to the fact that it is not allowed fertilizing the area bordering the river, this land is assumed to be shrub land. Thereby, a ratio of 50 % for shrub land and 50 % for pasture is estimated.
  The area after commissioning of the run-of-river plant is defined as "transformation to river, artificial". Land use for the weir and the power station is defined as "transformation to industrial area" at which 1 % of the value is defined for the water course. Land use for access roads can be neglected because most of the power plants are built on developed land.
  It has to be pointed out that run-of-river power plants do not necessarily have a negative impact on the ecological situation (e.g. new construction of the power plant Ruppoldingen).
  Uncertainty: Data from a dataset for the time period 1945-1970 but still valid today.
- Transformation, to river, artificial [natural resource, land]: 5.57e-5 m2; lognormal variance with pedigree 0.162, pedigree (1,1,5,5,1)
  (same comment as for Transformation, to industrial area)
- Transformation, from pasture, man made [natural resource, land]: 2.81e-5 m2; name transformation_pasture; lognormal variance with pedigree 0.124, pedigree (1,1,3,5,1)
  Estimation. To estimate the area of the water courses (i.e. the section between the water inlet and the weir) the length and average width according to the map is multiplied. As a result an index (approximate value) is calculated where the facts that hydropower plants affect natural habitats and disturb ground water are accounted for. Averaged over the investigated sample and distributed over life time the specific land use amounts to 4,5 10^-3 m2a/kWh, the transformation of land amounts to 5,6 10^-3 m2a/kWh. Thereby major rivers show lower values than small ones.
  Due to the fact that the calculated value represents an index value, it is not a hundred per cent comparable with other information relating to areas. In Switzerland the area before operation of the run-of-river plant is defined as "transformation from pasture" and "transformation from shrub land". This is because of cultivated land reclamation reasons flood protection and drainage measures have been implemented in the past. Due to the fact that it is not allowed fertilizing the area bordering the river, this land is assumed to be shrub land. Thereby, a ratio of 50 % for shrub land and 50 % for pasture is estimated.
  The area after commissioning of the run-of-river plant is defined as "transformation to river, artificial". Land use for the weir and the power station is defined as "transformation to industrial area" at which 1 % of the value is defined for the water course. Land use for access roads can be neglected because most of the power plants are built on developed land.
  It has to be pointed out that run-of-river power plants do not necessarily have a negative impact on the ecological situation (e.g. new construction of the power plant Ruppoldingen).
- Water, turbine use, unspecified natural origin [natural resource, in water]: 45 m3; name water_turbine_use_UNO_input; lognormal variance with pedigree 0.0426, pedigree (1,1,5,5,1)
  Calculated value. With respect to the ecological importance the following has to be considered: the turbined amount of water is via physical laws related to the produced amount of electricity, i.e. the turbined amount of water does not provide independent, ecological relevant information. The specific turbined amount of water (in m3/kWh) represents a value that is inversely proportional to the average net head. However, the turbined amount of water is an ecological relevant measurement in terms of representing the water amount that is in parts detracted from the natural water cycle. With an average ned head of 10 metres the specific turbined water amount accounts for 45 m3/kWh. If this value is extrapolated to the production volumes of the run-of-river power plants in Switzerland, the overall turbined water amount would be 747x10^9 m3/a. Taking the total runoff of 53,5 10^9 m3/a of Switzerland into account the water is turbined 14 times before leaving the land.
  Standard values for resources are assumed.
  Uncertainty: Data from a dataset for the time period 1945-1970 but still valid today.
- Occupation, river, artificial [natural resource, land]: 0.004496 m2*year; = (transformation_pasture+ transformation_shrub)*lifetime; lognormal variance with pedigree 0.082, pedigree (1,1,5,5,1)
  Estimation. Standard values for land use are assumed.
  Uncertainty: Data from a dataset for the time period 1945-1970 but still valid today.
- Energy, potential (in hydropower reservoir), converted [natural resource, in water]: 3.79 MJ
  Reflects range average to best performance.

## Emissions to nature
- Water [water, unspecified]: 45 m3; name water_to_water_unspecified; = water_turbine_use_UNO_input; lognormal variance with pedigree 0.130025, pedigree (4,4,5,2,4)
  Calculated value based on literature values and expert opinion. It has been estimated that there is no emission to air. All the turbine water which enters the activity is released back to water.
  property fraction, origin: unspecified 0; name fraction_origin_unspecified
  property fraction, origin: salt water 0; name fraction_origin_salt_water
  property fraction, origin: fresh water 1; name fraction_origin_fresh_water

## Sampling procedure
Sampling procedure based on literature. Some information regarding the results is given without source notes or detailed, comprehensible derivation due to the guaranteed confidential treatment of data.

## Extrapolations
This dataset has been extrapolated from year 2015 to the year of the calculation (2021). The uncertainty has been adjusted accordingly.

## Review by Carl Vadenbo 2015-05-22
The update of the whole electricity sector for the ecoinvent v3.2 database consist of hundreds of datasets. All these datasets have passed through a streamlined review processes where the underlying modelling of production volumes, technology shares and efficiencies was reviewed in detail prior to the datasets being submitted to the database.
