# vacuum cleaner production

Dataset: EcoSpold 2, unit process
Geography: GLO
Time period: 2016-01-01 to 2021-12-31
Technology level: current
Classification: ISIC rev.4 ecoinvent: 2750:Manufacture of domestic appliances
Synonyms: dry vacuum cleaner; hoover; bagless vacuum cleaner
Scenario: Business-as-Usual
System model: Allocation, cut-off by classification
Generated by: Viachaslau Filimonau
Published in: Gallego-Schmid, A. 2016
Database: ecoinvent
isCopyrightProtected: true
accessRestrictedTo: 1

## General comment
This activity represents the production and disposal of an average vacuum cleaner which is approximately 4.45 kg in mass and has a rating of 1400 W. This vacuum cleaner has the envisaged lifetime of 8 years and is manufactured in China. The figures on material inputs from technosphere and energy required to produce an average vaccum cleaner are taken from Gallego-Schmid et al. 2016. The figure on the annual production volume (130000000 units) is calculated from Markets Insider 2017.

## Included activities start
This activity starts with the reception of materials at the factory.

## Included activities end
The activity includes the processes of material and energy use in manufacturing an average vacuum cleaner. The inventory additionally accounts for disposal of all materials. Packaging is not included.

## Geography
Geography GLO was chosen because the dataset aims to represent the production of an average vacuum cleaner. The literature sources used refer to manufacturing in China.

## Time period
The literature sources used refer to the underpinning technology as being current.

## Reference product
- vacuum cleaner: 1 unit; name RP_amount_1; source Markets Insider 2017; CPC 88744: Consumer electronics manufacturing services; By-product classification allocatable product
  production volume 1.05e8 unit; name RP_PV_1
    Estimate from Markets Insider 2017 which is based on the forecast number of sales in 2024 (130000000 units) and assumed average growth in sales by 3% per year. This gives 6 years * 3 = 18% leading to circa 105000000 units sold in 2018. Source: Markets Insider 2017. Household vacuum cleaner market - 130 million unit shipments by 2014. Available from: http://markets.businessinsider.com/news/stocks/Household-Vacuum-Cleaner-Market-130-million-unit-shipments-by-2024-1011243349 Accessed 07 January 2018.
  property weight 4.45 kg; name weight
    Source: Gallego-Schmid et al. 2016, 2016, Gallego-Schmid, A., Mendoza, J.M.F., Jeswani, H.K., and Azapagic, A., Life cycle environmental impacts of vacuum cleaners and the effects of European legislation, Science of the Total Environment, 559, 192-203, 1 - Article, Gallego-Schmid, A., Mendoza, J.M.F., Jeswani, H.K., and Azapagic, A., 2016. Life cycle environmental impacts of vacuum cleaners and the effects of European legislation. Science of the Total Environment, 559, 192-203.
  property lifetime 8 year
    (same comment as for vacuum cleaner)
  property lifetime capacity [h] 400 hour; = 50*8
    Literature source, considers "use of the vacuum cleaner for
    50 h/year over a period of eight years (product lifetime) to clean a typical
    European household (87 m2)". Source: Gallego-Schmid et al. 2016, 2016, Gallego-Schmid, A., Mendoza, J.M.F., Jeswani, H.K., and Azapagic, A., Life cycle environmental impacts of vacuum cleaners and the effects of European legislation, Science of the Total Environment, 559, 192-203, 1 - Article, Gallego-Schmid, A., Mendoza, J.M.F., Jeswani, H.K., and Azapagic, A., 2016. Life cycle environmental impacts of vacuum cleaners and the effects of European legislation. Science of the Total Environment, 559, 192-203.
  property price 100 EUR2005; name RP_amount_1_price_EUR2005
    Estimated value. The price is taken from MediaWorld, a shop for electronics, website (retrieved from: https://www.mediaworld.it/mw/SearchDisplay?searchTerm=aspirapolvere&categoryId=&search=WCS&storeId=20000&catalogId=20000&langId=-4&pageSize=25&beginIndex=0&sType=SimpleSearch&resultCatEntryType=2&showResultsPage=true&searchSource=Q&pageView=, accessed 13Feb2018). The range of prices varies greatly from 60 to 600 euros. A representative price of 100 was chosen. The price is chosen based on the most common price for an average appliance, and accounting for profit margins. According to an article from Blokhin "What profit margin is average for a company in the electronics sector?" (Source: Investopedia, retrieved from: https://www.investopedia.com/ask/answers/051215/what-profit-margin-average-company-electronics-sector.asp, 13Feb2018) the average profit margin made in the electronics sector in 2015 was of 9%.

## Inputs from technosphere
- electricity, high voltage: 14.25 kWh; lognormal variance with pedigree 0.004, pedigree (1,4,2,4,2)
  Data from Gallego-Schmid et al. 2016.
- waste paperboard: 0 kg; name BP_amount_5; pedigree (1,1,1,1,1)
  The amount is set equal to the input amount for the respective material. Data from Gallego-Schmid et al. 2016.
  production volume 0 kg
    Calculated from production volume of reference product using the relative outputs.
  property price 0 EUR2005; name BP_amount_5_price_EUR2005
  properties: wet mass 1 kg, water content 0.243781, carbon content, non-fossil 0.483259, heating value, net 15.92 MJ, dry mass 0.804 kg
  note on carbon content, non-fossil: C content was calculated for 1 kg DM, using data in Tab A.3, ecoinvent v2.2 report 13_I.
  note on heating value, net: Value taken from the general comment of the treatment dataset.
- polyvinylchloride, bulk polymerised: 0.342 kg; name PVC; lognormal variance with pedigree 0.004, pedigree (1,4,2,4,2)
  Data from Gallego-Schmid et al. 2016.
  properties: dry mass 1 kg, carbon content, fossil 0.387097, wet mass 1 kg, heating value, net 21.5 MJ
  note on carbon content, fossil: Monomer is vynyl chloride, C2H3Cl (ecoinvent v2.2 report 11_II). MW=62 g/mol
- steel, low-alloyed, hot rolled: 0.642 kg; name steel; lognormal variance with pedigree 0.004, pedigree (1,4,2,4,2)
  Contains galvanised steel and stainless steel. Data from Gallego-Schmid et al. 2016.
  properties: dry mass 1 kg, carbon content, fossil 0.005, wet mass 1 kg
  note on carbon content, fossil: Low alloyed steel composition given in Tab. 3.2 ecoinvent v2.2 report 10_partII. Steel assumed to have a C content of 0.5%
- vinyl acetate: 0.415 kg; name vinyl_acetate; lognormal variance with pedigree 0.004, pedigree (1,4,2,4,2)
  Data from Gallego-Schmid et al. 2016.
  properties: wet mass 1 kg, carbon content, fossil 0.55814, heating value, net 25.35 MJ, dry mass 1 kg
- waste polyvinylchloride: 0 kg; name BP_amount_2; pedigree (1,1,1,1,1)
  Data from Gallego-Schmid et al. 2016. The amount is set equal to the input amount for the respective material.
  production volume 0 kg
    Calculated from production volume of reference product using the relative outputs.
  property price 0 EUR2005; name BP_amount_2_price_EUR2005
  properties: wet mass 1 kg, heating value, net 21.51 MJ, water content 0.00200401, carbon content, fossil 0.440882, dry mass 0.998 kg
- scrap steel: 0 kg; name BP_amount_9; pedigree (1,1,1,1,1)
  Contains galvanised steel and stainless steel. Data from Gallego-Schmid et al. 2016. The amount is set equal to the input amount for the respective material.
  production volume 0 kg
    Calculated from production volume of reference product using the relative outputs.
  property price 0 EUR2005; name BP_amount_9_price_EUR2005
  properties: dry mass 1 kg, wet mass 1 kg
- aluminium, cast alloy: 0.376 kg; name aluminium; lognormal variance with pedigree 0.004, pedigree (1,4,2,4,2)
  Data from Gallego-Schmid et al. 2016.
  properties: wet mass 1 kg, dry mass 1 kg
- polypropylene, granulate: 1.107 kg; name PP; lognormal variance with pedigree 0.004, pedigree (1,4,2,4,2)
  Data from Gallego-Schmid et al. 2016.
  properties: wet mass 1 kg, dry mass 1 kg, carbon content, fossil 0.857143, heating value, net 32.78 MJ
  note on heating value, net: Value extracted from "treatment of waste polypropylene, open burning"
- formaldehyde: 0 kg; pedigree (1,1,1,1,1)
  Used here in place of polyoxymethylene. In terms of outputs, assumed to have gone to wastewater. Data from Gallego-Schmid et al. 2016.
  properties: wet mass 1 kg, carbon content, fossil 0.4, dry mass 1 kg, heating value, net 20.19 MJ
- scrap aluminium: 0 kg; name BP_amount_6; pedigree (1,1,1,1,1)
  (same comment as for waste polyvinylchloride)
  production volume 0 kg
    Calculated from production volume of reference product using the relative outputs.
  property price 0 EUR2005; name BP_amount_6_price_EUR2005
  properties: wet mass 1 kg, dry mass 1 kg
- waste polypropylene: 0 kg; name BP_amount_3; pedigree (1,1,1,1,1)
  (same comment as for waste polyvinylchloride)
  production volume 0 kg
    Calculated from production volume of reference product using the relative outputs.
  property price 0 EUR2005; name BP_amount_3_price_EUR2005
  properties: dry mass 0.841 kg, wet mass 1 kg, water content 0.189061, carbon content, fossil 0.825208, heating value, net 32.78 MJ
  note on heating value, net: Value assumed for all polypropylene products. Source: Phyllis2, database for (treated) biomass, algae, feedstocks for biogas production and biochar, https://phyllis.nl/Biomass/View/1186, ECN.TNO
- polyethylene, low density, granulate: 0.026 kg; name PE_low; lognormal variance with pedigree 0.004, pedigree (1,4,2,4,2)
  Used here in place of polyethylene bags. Data from Gallego-Schmid et al. 2016.
  properties: carbon content, fossil 0.857143, dry mass 1 kg, wet mass 1 kg, heating value, net 42.47 MJ
- copper, cathode: 0.177 kg; name copper; lognormal variance with pedigree 0.004, pedigree (1,4,2,4,2)
  Data from Gallego-Schmid et al. 2016.
  properties: wet mass 1 kg, dry mass 1 kg
- wastewater, average: 0 m3; name BP_amount_4; pedigree (1,1,1,1,1)
  Converted from liters. Data from Gallego-Schmid et al. 2016. The amount is set equal to the input amount for the respective material.
  production volume 0 m3
    Calculated from production volume of reference product using the relative outputs.
  property price 0 EUR2005; name BP_amount_4_price_EUR2005
  properties: carbon content, non-fossil 0.194039, dry mass 0.346837 kg, water content 2882.2, wet mass 1000 kg
  note on carbon content, non-fossil: 0.0673 kg TOC/m3 (Tab A.17, ecoinvent v2.2 report 13_I). TOC was considered as Total Carbon.
- polyethylene, high density, granulate: 0.252 kg; name PE_high; lognormal variance with pedigree 0.004, pedigree (1,4,2,4,2)
  Data from Gallego-Schmid et al. 2016.
  properties: wet mass 1 kg, carbon content, fossil 0.857143, dry mass 1 kg, heating value, net 42.47 MJ
  note on carbon content, fossil: Polyethylene is formed out of a huge amount of ethylene monomers (C2H4) (ecoinvent v2.2 report 11_II). MW=28 g/mol
- scrap copper: 0 kg; name BP_amount_7; pedigree (1,1,1,1,1)
  Includes scrap copper and scrap brass. Data from Gallego-Schmid et al. 2016. The amount is set equal to the input amount for the respective material.
  production volume 0 kg
    Calculated from production volume of reference product using the relative outputs.
  property price 0 EUR2005; name BP_amount_7_price_EUR2005
  properties: wet mass 1 kg, dry mass 1 kg
- tap water: 13 kg; name tap_water; lognormal variance with pedigree 0.004, pedigree (1,4,2,4,2)
  Converted from kg. Data from Gallego-Schmid et al. 2016.
  properties: dry mass 0.000337476 kg, wet mass 1 kg, carbon content, fossil 0.00178991, water content 2962.17
  note on carbon content, fossil: Bicarbonate content is 2.93 mol/m3. CO2 content is 0.1 mol/m3 (ecoinvent v2.2 report 8, Tab 93.1).
- plastic processing factory: 3.2963e-9 unit; = 1/303370787; lognormal variance with pedigree 0.3034, pedigree (1,4,2,4,2)
  Used here in place of infrastructure based on the amount of the largest contributor to the final product mass (plastics). This is an estimated value. According to the technology comment of the dataset 'Plastic processing factory construction, GLO' [accessed 19.01.2018], the life time of the tanks is assumed to be 50 years and the annual production is 27000 t/a. Thus, the estimated lifetime output of the factory is 27000 x 50 = 1350000. As the vacuum cleaner mass is 4.45 kg, then the number of vacuum cleaners produced during the lifetime of the factory is 1350000 / 0.00445 = 303370787 units. The calculation of the infrastructure is therefore 1/life time capacity = 1/303370787 unit.
- waste polystyrene: 0 kg; name BP_amount_1; pedigree (1,1,1,1,1)
  (same comment as for waste polyvinylchloride)
  production volume 0 kg
    Calculated from production volume of reference product using the relative outputs.
  property price 0 EUR2005; name BP_amount_1_price_EUR2005
  properties: carbon content, fossil 0.922579, heating value, net 38.67 MJ, wet mass 1 kg, dry mass 0.998 kg, water content 0.00200401
- brass: 0 kg; pedigree (1,1,1,1,1)
  Data from Gallego-Schmid et al. 2016.
  properties: wet mass 1 kg, dry mass 1 kg
- heat, central or small-scale, natural gas: 17.2 MJ; lognormal variance with pedigree 0.004, pedigree (1,4,2,4,2)
  Data from Gallego-Schmid et al. 2016.
  properties: heating value, net 1 MJ
- corrugated board box: 0 kg; name board_box; pedigree (1,1,1,1,1)
  Includes all materials from packaging i.e. folding box, cardboard trays and protective cardboard. Data from Gallego-Schmid et al. 2016.
  properties: heating value, net 12.86 MJ, water content 0.0582011, dry mass 0.945 kg, carbon content, fossil 0.00365437, carbon content, non-fossil 0.450248, wet mass 1 kg
- polystyrene, general purpose: 1.112 kg; name PS; lognormal variance with pedigree 0.004, pedigree (1,4,2,4,2)
  Data from Gallego-Schmid et al. 2016.
  properties: wet mass 1 kg, carbon content, fossil 0.923077, dry mass 1 kg, heating value, net 38.67 MJ
- waste polyethylene: 0 kg; name BP_amount_8; pedigree (1,1,1,1,1)
  Contains waste from high density polyethylene, polyethylene bags and ethylene vinyl acetate. Data from Gallego-Schmid et al. 2016. The amount is set equal to the input amount for the respective material.
  production volume 0 kg
    Calculated from production volume of reference product using the relative outputs.
  property price 0 EUR2005; name BP_amount_8_price_EUR2005
  properties: carbon content, fossil 0.825301, wet mass 1 kg, water content 0.00401606, dry mass 0.996 kg, heating value, net 42.47 MJ
  note on carbon content, fossil: C content in 1 kg DM was calculated using data in Tab A.1, ecoinvent v2.2 report 13_I
- waste paperboard: -0.0954307, -0.00593384, -0.0214415, -0.00387014, -0.0388583, -0.00209072, -0.00051886, -0.721856 kg (8 entries); lognormal variance with pedigree 0.004, pedigree (1,4,2,4,2)
  (same comment as for waste paperboard)
  production volume 9.345e7 kg
- waste polyvinylchloride: -0.0329191, -0.00253787, -0.00104823, -0.000995393, -0.0379829, -0.000423473, -0.000191935, -0.265901 kg (8 entries); lognormal variance with pedigree 0.004, pedigree (1,4,2,4,2)
  (same comment as for waste polyvinylchloride)
  production volume 3.591e7 kg
- scrap steel: -0.156324, -0.000198057, -0.485478 kg (3 entries); lognormal variance with pedigree 0.004, pedigree (1,4,2,4,2)
  (same comment as for scrap steel)
  production volume 6.741e7 kg
- formaldehyde: 0.00443922, 0.0185608 kg (2 entries); lognormal variance with pedigree 0.004, pedigree (1,4,2,4,2)
  (same comment as for formaldehyde)
- scrap aluminium: -0.11927, -0.00559588, -0.251134 kg (3 entries); lognormal variance with pedigree 0.004, pedigree (1,4,2,4,2)
  (same comment as for waste polyvinylchloride)
  production volume 3.948e7 kg
- waste polypropylene: -0.106554, -0.00821468, -0.00339296, -0.00322193, -0.122945, -0.00137072, -0.000621263, -0.86068 kg (8 entries); lognormal variance with pedigree 0.004, pedigree (1,4,2,4,2)
  (same comment as for waste polyvinylchloride)
  production volume 1.16235e8 kg
- wastewater, average: -0.004062, -0.000439432, -0.00849857 m3 (3 entries); lognormal variance with pedigree 0.004, pedigree (1,4,2,4,2)
  (same comment as for wastewater, average)
  production volume 1.365e6 m3
- scrap copper: -0.0624899, -0.00293189, -0.131578 kg (3 entries); lognormal variance with pedigree 0.004, pedigree (1,4,2,4,2)
  (same comment as for scrap copper)
  production volume 2.0685e7 kg
- waste polystyrene: -0.107035, -0.00825179, -0.00340828, -0.00323648, -0.1235, -0.00137691, -0.000624069, -0.864567 kg (8 entries); lognormal variance with pedigree 0.004, pedigree (1,4,2,4,2)
  (same comment as for waste polyvinylchloride)
  production volume 1.1676e8 kg
- brass: 0.0001, 0.0199 kg (2 entries); lognormal variance with pedigree 0.004, pedigree (1,4,2,4,2)
  Data from Gallego-Schmid et al. 2016.
- corrugated board box: 0.183769, 0.00821643, 0.698015 kg (3 entries); lognormal variance with pedigree 0.004, pedigree (1,4,2,4,2)
  (same comment as for corrugated board box)
- waste polyethylene: -0.0667045, -0.00514252, -0.00212405, -0.00201698, -0.0769653, -0.000858091, -0.000388921, -0.5388 kg (8 entries); lognormal variance with pedigree 0.004, pedigree (1,4,2,4,2)
  (same comment as for waste polyethylene)
  production volume 7.2765e7 kg

## Sampling procedure
Manufacturing data are taken from Gallego-Schmid et al. 2016. Data on the annual production volume are assumed to be equal to the annual volume of unit sales and taken from Markets Insider 2017. Sources: Gallego-Schmid, A., Mendoza, J.M.F., Jeswani, H.K., and Azapagic, A., 2016. Life cycle environmental impacts of vacuum cleaners and the effects of European legislation. Science of the Total Environment, 559, 192-203. Markets Insider 2017. Household vacuum cleaner market - 130 million unit shipments by 2014. Available from: http://markets.businessinsider.com/news/stocks/Household-Vacuum-Cleaner-Market-130-million-unit-shipments-by-2024-1011243349 (Accessed 07 January 2018).

## Extrapolations
This dataset has been extrapolated from year 2018 to the year of the calculation (2021). The uncertainty has been adjusted accordingly.
