# treatment of wastewater from particleboard production, capacity 5E9l/year

Dataset: EcoSpold 2, unit process
Geography: RoW
Time period: 2012-01-01 to 2021-12-31
Technology level: current
Classification: ISIC rev.4 ecoinvent: 3700:Sewerage
Classification: EcoSpold01Categories: waste management/wastewater treatment
Tags: Treatment
Scenario: Business-as-Usual
System model: Allocation, cut-off by classification
Generated by: Frank Werner
Database: ecoinvent
isCopyrightProtected: true
accessRestrictedTo: 1

## General comment
Wastewater purified in a medium size municipal wastewater treatment plant (capacity class 3), with an average capacity size of 24900 per-captia-equivalents PCE.
The treated waste water has the following composition (see sampling procedure for source):
Wastewater contains (in kg/m3): COD: 0.00044 (GSD=122.5%); BOD: 0.0000616 (GSD=122.5%);
[This dataset is meant to replace the following datasets:
- treatment of wastewater from particle board production, capacity 5E9l/year, GLO, 1994 - 2000]

## Included activities end
Infrastructure materials for municipal wastewater treatment plant, transports, dismantling. Land use burdens.

## Geography
Specific to the technology mix encountered in Switzerland in 2000. Well applicable to modern treatment practices in Europe, North America or Japan.

## Technology
Three stage wastewater treatment (mechanical, biological, chemical) including sludge digestion (fermentation) according to the average technology in Switzerland

## Parameters
- fraction, process water, to air: 0.1 dimensionless; lognormal variance with pedigree 0.092025, pedigree (4,4,3,2,4)

## Reference product
- wastewater from particleboard production: -1 m3; By-product classification Waste; CPC 39920: Sewage sludge
  EcoSpold01Location=CH
  production volume 4.33e6 m3; name p_board
    calculated from GLO production volume times waste water/m3
  property price 0 EUR2005
    Waste products are assigned a price of zero as they are assumed to require further treatment.
  property carbon content, non-fossil 0.377131
    BOD= 0.196 kg/m3 (Tab A.17, ecoinvent v2.2 report 13_I). BOD was converted to TOC, using conversion factors in Tab 4.10 (ecoinvent v2.2 report 13_IV). TOC was considered as Total Carbon.
  property carbon content 0.377131
    carbon content on a dry matter basis (reserved; not for manual entry)
  properties: dry mass 0.337476 kg, carbon content, fossil 0, wet mass 1000 kg, water in wet mass 999.663 kg, water content 2962.17, carbon allocation 0.127273 kg

## Inputs from technosphere
- process-specific burdens, slag landfill: 3.73e-7 kg; lognormal variance with pedigree 0.04, pedigree (1,1,4,5,1)
  EcoSpold01Location=CH
  burden from sludge incineration. Uncertainty calculated from wastewater composition and treatment model
- wastewater treatment facility, capacity 5E9l/year: 5.6882e-9 unit; lognormal variance with pedigree 0.01, pedigree (1,1,4,5,1)
  uncertainty heeded in exchanges of the module
  EcoSpold01Location=CH
- hydrochloric acid, without water, in 30% solution state: 1.93e-12 kg; lognormal variance with pedigree 0.12, pedigree (1,1,4,5,1)
  EcoSpold01Location=RER
  burden from sludge incineration. Uncertainty calculated from wastewater composition and treatment model
  properties: heating value, net 3.32 MJ, dry mass 1 kg, wet mass 1 kg
- process-specific burdens, residual material landfill: 1.72e-7 kg; lognormal variance with pedigree 0.04, pedigree (1,1,4,5,1)
  (same comment as for process-specific burdens, slag landfill)
- municipal waste incineration facility: 5.654e-14 unit; lognormal variance with pedigree 0.02, pedigree (1,1,4,5,1)
  (same comment as for process-specific burdens, slag landfill)
- waste graphical paper: 0 kg; name w_paper; pedigree (1,1,1,1,1)
  EcoSpold01Location=CH
  direct wastewater treatment plant burden. Uncertainty calculated from wastewater composition and treatment model
  production volume 0 kg
    Calculated from the production volume of wastewater from particle board production in proportion to the respective output amounts.
  property price 0 EUR2005; name w_paper_price_EUR2005
  properties: water content 0.126126, dry mass 0.888 kg, carbon content, non-fossil 0.454955, heating value, net 14.12 MJ, wet mass 1 kg
  note on heating value, net: Value taken from the general comment of the treatment dataset.
- process-specific burdens, municipal waste incineration: 0.0002261 kg; lognormal variance with pedigree 0.02, pedigree (1,1,4,5,1)
  burden from sludge incineration. Uncertainty calculated from wastewater composition and treatment model
  EcoSpold01Location=CH
- slag landfill: 0 unit; pedigree (1,1,1,1,1)
  (same comment as for process-specific burdens, municipal waste incineration)
- cement, unspecified: 0 kg; pedigree (1,1,1,1,1)
  (same comment as for process-specific burdens, slag landfill)
  properties: dry mass 1 kg, wet mass 1 kg
- waste cement, hydrated: -1.73e-7 kg; name w_cement; lognormal variance with pedigree 0.05, pedigree (1,1,4,5,1)
  (same comment as for process-specific burdens, municipal waste incineration)
  production volume 0.74909 kg; = p_board*w_cement
    (same comment as for waste graphical paper)
  property price 0 EUR2005; name w_cement_price_EUR2005
  properties: dry mass 1 kg, wet mass 1 kg
- electricity, for reuse in municipal waste incineration only: 0 kWh; pedigree (1,1,1,1,1)
- heat, district or industrial, other than natural gas: 0 MJ; pedigree (1,1,1,1,1)
  (same comment as for process-specific burdens, slag landfill)
  properties: heating value, net 1 MJ
- waste plastic, mixture: 0 kg; name w_plastic; pedigree (1,1,1,1,1)
  direct wastewater treatment plant burden. Uncertainty calculated from wastewater composition and treatment model
  EcoSpold01Location=CH
  production volume 0 kg
    (same comment as for waste graphical paper)
  property price 0 EUR2005; name w_plastic_price_EUR2005
  properties: wet mass 1 kg, dry mass 0.847 kg, carbon content, fossil 0.747344, water content 0.180638, heating value, net 30.79 MJ
  note on carbon content, fossil: C content in 1 kg DM was calculated using data in Tab A.2, ecoinvent v2.2 report 13_I
- electricity, low voltage: 0 kWh; pedigree (1,1,1,1,1)
  (same comment as for waste plastic, mixture)
- heat, district or industrial, natural gas: 0 MJ; pedigree (1,1,1,1,1)
  properties: heating value, net 1 MJ
- chemical, inorganic: 3.21e-12 kg; lognormal variance with pedigree 0.12, pedigree (1,1,4,5,1)
  burden from sludge incineration. Uncertainty calculated from wastewater composition and treatment model
  EcoSpold01Location=GLO
  properties: wet mass 1 kg, dry mass 1 kg, carbon content, fossil 0.003
  note on carbon content, fossil: This dataset is an unweighted average of 20 inorganic substances (listed in Tab 88.1, ecoinvent v2.2 report 8, part II), being part of the top100 chemicals included in this database. The C-content has also been calculated as an unweighted average of the C content of the substances composing this dataset.
- sewer grid, 5E9l/year, 110 km: 2.17e-7 km; lognormal variance with pedigree 0.01, pedigree (1,1,4,5,1)
  EcoSpold01Location=CH
  uncertainty heeded in exchanges of the module
- residual material landfill: 0 unit; pedigree (1,1,1,1,1)
  (same comment as for process-specific burdens, slag landfill)
- heat, for reuse in municipal waste incineration only: 0 MJ; pedigree (1,1,1,1,1)
- waste graphical paper: -0.000758025, -0.000115754, -1.01216e-5, -0.000418268, -4.07846e-5, -7.54965e-5, -0.0140816 kg (7 entries); lognormal variance with pedigree 0.008, pedigree (1,1,4,1,1)
  (same comment as for waste graphical paper)
  production volume 67115 kg
- cement, unspecified: 2.41942e-9, 1.77206e-10, 5.05094e-10, 1.14229e-8, 3.36208e-10, 3.69256e-9, 4.46759e-10, 4.98999e-8 kg (8 entries); lognormal variance with pedigree 0.05, pedigree (1,1,4,5,1)
  (same comment as for process-specific burdens, slag landfill)
- electricity, for reuse in municipal waste incineration only: 1.10702e-6, 2.65917e-8, 1.17648e-8, 4.41101e-7, 3.09135e-5 kWh (5 entries); lognormal variance with pedigree 0.035, pedigree (1,1,4,5,1)
- heat, district or industrial, other than natural gas: 5.09924e-6, 0.0125749 MJ (2 entries); lognormal variance with pedigree 0.02, pedigree (1,1,4,5,1)
  (same comment as for process-specific burdens, slag landfill)
- waste plastic, mixture: -0.00190479, -0.000127271, -9.62528e-6, -5.25674e-5, -2.12366e-5, -4.99177e-5, -0.0133346 kg (7 entries); lognormal variance with pedigree 0.01, pedigree (1,1,4,5,1)
  (same comment as for waste plastic, mixture)
  production volume 67115 kg
- electricity, low voltage: 0.000360849, 6.57038e-5, 0.00105791, 0.0162423, 0.00262772, 0.00754547 kWh (6 entries); lognormal variance with pedigree 0.13, pedigree (1,1,4,5,1)
  (same comment as for waste plastic, mixture)
- heat, district or industrial, natural gas: 0.000257725, 0.0167223 MJ (2 entries); lognormal variance with pedigree 0.0431, pedigree (4,2,4,5,1)
- heat, for reuse in municipal waste incineration only: 5.0015e-6, 1.20141e-7, 5.31533e-8, 1.99288e-6, 0.000181832 MJ (5 entries); lognormal variance with pedigree 0.035, pedigree (1,1,4,5,1)

## Emissions to nature
- NMVOC, non-methane volatile organic compounds, unspecified origin [air, urban air close to ground]: 6.591e-9 kg; lognormal variance with pedigree 0.3, pedigree (1,1,4,5,1)
  direct digester gas emission. Uncertainty calculated from wastewater composition and treatment model
- TOC, Total Organic Carbon [water, ground-, long-term]: 4.88e-7 kg; lognormal variance with pedigree 0.16, pedigree (1,1,4,5,1)
  emission from sludge incineration. Uncertainty calculated from wastewater composition and treatment model
- Carbon monoxide, non-fossil [air, urban air close to ground]: 4.732e-7 kg; lognormal variance with pedigree 0.2, pedigree (1,1,4,5,1)
  direct digester gas emission plus emission from sludge incineration. Uncertainty calculated from wastewater composition and treatment model
- Water [water, unspecified]: 0.9 m3; lognormal variance with pedigree 0.0507, pedigree (2,2,4,5,1)
  Calculated value based on water balance.
  property water in wet mass 1000 kg; name WWM
  property wet mass 1000 kg; name WM
  property dry mass 0 kg; name DM
  property carbon content, non-fossil 0; name C_content_non_fossil
  property carbon content, fossil 0; name C_content_fossil
- BOD5, Biological Oxygen Demand [water, surface water]: 5.843e-6 kg; lognormal variance with pedigree 0.1, pedigree (1,1,4,5,1)
  sewer overload discharge plus direct wastewater treatment plant emission plus emission from sludge incineration. Uncertainty calculated from wastewater composition and treatment model
- Water [air, unspecified]: 0.1 m3; lognormal variance with pedigree 0.0507, pedigree (2,2,4,5,1)
  Calculated value based on water balance.
- COD, Chemical Oxygen Demand [water, ground-, long-term]: 1.233e-6 kg; lognormal variance with pedigree 0.16, pedigree (1,1,4,5,1)
  (same comment as for TOC, Total Organic Carbon)
- TOC, Total Organic Carbon [water, surface water]: 4.88e-7 kg; lognormal variance with pedigree 0.09, pedigree (1,1,4,5,1)
  (same comment as for BOD5, Biological Oxygen Demand)
- Carbon dioxide, non-fossil [air, urban air close to ground]: 0.00059 kg; lognormal variance with pedigree 0.07, pedigree (1,1,4,5,1)
  direct wastewater treatment plant emission plus direct digester gas emission plus emission from sludge incineration. Uncertainty calculated from wastewater composition and treatment model
- DOC, Dissolved Organic Carbon [water, ground-, long-term]: 4.87e-7 kg; lognormal variance with pedigree 0.16, pedigree (1,1,4,5,1)
  (same comment as for TOC, Total Organic Carbon)
- BOD5, Biological Oxygen Demand [water, ground-, long-term]: 4.033e-7 kg; lognormal variance with pedigree 0.16, pedigree (1,1,4,5,1)
  (same comment as for TOC, Total Organic Carbon)
- COD, Chemical Oxygen Demand [water, surface water]: 8.526e-5 kg; lognormal variance with pedigree 0.01, pedigree (1,1,4,5,1)
  (same comment as for BOD5, Biological Oxygen Demand)
- DOC, Dissolved Organic Carbon [water, surface water]: 2.13e-5 kg; lognormal variance with pedigree 0.01, pedigree (1,1,4,5,1)
  (same comment as for BOD5, Biological Oxygen Demand)
- Methane, non-fossil [air, urban air close to ground]: 1.451e-6 kg; lognormal variance with pedigree 0.18, pedigree (1,1,4,5,1)
  (same comment as for Carbon monoxide, non-fossil)

## Sampling procedure
Survey among member companies of the European Panel Federation; generation of dataset with ecoinvent 2.0 tool for treatment of wastewater
