# tram track construction

Dataset: EcoSpold 2, unit process
Geography: CH
Time period: 1990-01-01 to 2021-12-31
Technology level: current
Classification: EcoSpold01Categories: transport systems/road
Classification: ISIC rev.4 ecoinvent: 4210:Construction of roads and railways
Scenario: Business-as-Usual
System model: Allocation, cut-off by classification
Generated by: Michael Spielmann (obsolete)
Published in: Spielmann M. 2004
Database: ecoinvent
isCopyrightProtected: true
accessRestrictedTo: 1

## General comment
The dataset represents a tram track construction and its disposal. A double track concrete stretch (width=6.5m) and a bitumen layer of 3 cm on top are accounted. The life span is estimated at 15 years. The dataset of energy use and combustion emissions represents the operation and maintenance of one tram track. The dataset is limited to the energy consumption and land use.

## Included activities start
The datasets starts with the material consumption (concrete, bitumen and gravel). The dataset of energy use and combustion emissions starts with the electricity consumption for signals.

## Included activities end
The dataset ends with a tram track construction and its disposal. The dataset includes the material consumption (concrete, bitumen and gravel), diesel consumption, the construction process (excavation), the steel and the reinforcing steel consumption and until and including the NMVOC emissions. The dataset of energy use and combustion emissions ends with the operation and maintenance of one tram track. The dataset includes the electricity consumption and until and including the land use (land occupation and transformation). The dataset does not include the material consumption for the operation and maintenance.

## Geography
Data refers to average conditions in Switzerland. The data of the energy use and combustion emissions refers to average conditions in Switzerland. For de icing activities, a recent Austrian has been applied.

## Technology
The module track construction and renewal accounts for double track concrete stretch (width = 6.5m) and a bitumen layer of 3 cm on top Maibach et al. (1999). In addition, steel expenditures for railway tracks and bracing are included. Alternative constructions of tram-infrastructure (e.g. green stretches) are not accounted for. The life span is estimated at 15 years. The inventory of the energy use and combustion emissions for operation and maintenance of tram infrastructure is limited to the energy consumption for signals (79.5 kWh/m*a) and land use. For the operation of signals a electricity consumption of 79.5 kWh/m*a is accounted for Maibach et al. (1999).
References:
Maibach M., Peter D. and Seiler B. (1999) Ökoinventar Transporte: Grundlagen für den ökologischen Vergleich von Transportsystemen und den Einbezug von Transportsystemen in Ökobilanzen. Technischer Schlussbericht. In: Schweizerischer Nationalfonds zur Förderung der wissenschaftlichen Forschung (ed. SPP Umwelt M.). 2nd Edition.
Maibach M., Peter D. and Seiler B. (1999) Ökoinventar Transporte: Grundlagen für den ökologischen Vergleich von Transportsystemen und den Einbezug von Transportsystemen in Ökobilanzen. Technischer Schlussbericht. In: Schweizerischer Nationalfonds zur Förderung der wissenschaftlichen Forschung (ed. SPP Umwelt M.). 2nd Edition.

## Time period
Tramway length is based on current statistical data (2000). The material consumption represents a situation in the early 1990ties. For the energy use and combustion emissions, the tram track length is based on current statistical data (2000).

## Reference product
- tram track: 1 m*year; name RP_amount_1; By-product classification allocatable product; CPC 53212: Railways
  EcoSpold01Location=CH
  production volume 0.0336675 m*year; name RP_PV_1
    This is a placeholder value that does not reflect real-world production volumes. This dataset does not currently require a real-world production volume to work in the database framework, and no actual data were collected yet. This has no negative effect on the results of the ecoinvent database. The placeholder value of this activity was scaled according to the nominal GDP of 2005 (source: United Nations, http://data.un.org/Glossary.aspx?q=GDP+%28current+US%24%29, accessed 20130726) to reflect an appropriate share of the global production volume, which is also a placeholder value.
  property price 43.6837 EUR2005
    Calculated based on inputs: The price of the product has been calculated as a sum of the values of the material and energy inputs for this product. This value is therefore a rough estimation. It may underestimate the real price since there are additional expenses when producing any product. These expences can include for example labour costs, treatment of waste materials and profit for the producer. Please consider carefully whether this level of data quality is acceptable for your application.

## Inputs from technosphere
- steel, low-alloyed, hot rolled: 12.1 kg; lognormal variance with pedigree 0.0526, pedigree (3,3,5,1,1)
  Estimated value based on literature studies.
  EcoSpold01Location=RER
  Uncertainty: literature studies
  properties: carbon content, fossil 0.005, wet mass 1 kg, dry mass 1 kg
  note on carbon content, fossil: Low alloyed steel composition given in Tab. 3.2 ecoinvent v2.2 report 10_partII. Steel assumed to have a C content of 0.5%
- concrete, for de-icing salt contact: 0.111 m3; source Maibach M. 1999; lognormal variance with pedigree 0.0526, pedigree (3,3,5,1,1)
  EcoSpold01Location=CH
  Estimated value based on literature studies.
  Uncertainty: literature studies
  properties: water content 0.0650759, dry mass 2305 kg, wet mass 2455 kg
- electricity, medium voltage: 79.5 kWh; source Maibach M. 1999; lognormal variance with pedigree 0.0526, pedigree (3,3,5,1,1)
  Literature value. Energy use and combustion emissions
  Uncertainty: literature studies
  property water content 0; name water_content
  property water in wet mass 0 kg; name WWM
  property wet mass 0 kg; name WM
  property carbon content, non-fossil 0; name C_content_non_fossil
  property carbon content, fossil 0; name C_content_fossil
  property dry mass 0 kg; name DM
- excavation, skid-steer loader: 0.3 m3; lognormal variance with pedigree 0.1726, pedigree (3,3,5,1,1)
  EcoSpold01Location=RER
  Estimated value based on literature studies.;activityLink introduced to establish a direct link to the corresponding regional supply of this product
  Uncertainty: literature studies
- pitch: 1.2 kg; source Maibach M. 1999; lognormal variance with pedigree 0.0526, pedigree (3,3,5,1,1)
  Estimated value based on literature studies.
  EcoSpold01Location=CH
  Uncertainty: literature studies
  properties: carbon content, fossil 0.83, wet mass 1 kg, dry mass 1 kg, heating value, net 28 MJ
- reinforcing steel: 0.0858 kg; lognormal variance with pedigree 0.0526, pedigree (3,3,5,1,1)
  EcoSpold01Location=RER
  Estimated value based on literature studies.
  Uncertainty: literature studies
  properties: wet mass 1 kg, dry mass 1 kg, carbon content, fossil 0.004
- gravel, crushed: 23.5 kg; source Maibach M. 1999; lognormal variance with pedigree 0.0526, pedigree (3,3,5,1,1)
  (same comment as for pitch)
  properties: dry mass 1 kg, wet mass 1 kg
- decommissioned tram track: -1 m*year; name BP_amount_1; lognormal variance with pedigree 0.042, pedigree (3,1,5,1,1)
  Uncertainty: own calculations
  production volume 0.0336675 m*year; = RP_PV_1 * (BP_amount_1 / RP_amount_1)
    Calculated from production volume of reference product using the relative outputs.
  property price 0 EUR2005; name BP_amount_1_price_EUR2005
  properties: carbon content, fossil 0.0034202, dry mass 309 kg, wet mass 309 kg
- diesel, burned in building machine: 390 MJ; lognormal variance with pedigree 0.0526, pedigree (3,3,5,1,1)
  Estimated value based on literature studies.
  EcoSpold01Location=GLO
  Uncertainty: literature studies
  properties: heating value, net 1 MJ

## Inputs from nature
- Transformation, from unspecified [natural resource, land]: 0.0065 m2; lognormal variance with pedigree 0.2507, pedigree (2,2,5,1,5)
  Estimated value based on literature studies. Energy use and combustion emissions
  Uncertainty: literature studies
- Occupation, traffic area, road network [natural resource, land]: 6.5 m2*year; lognormal variance with pedigree 0.1707, pedigree (2,2,5,1,5)
  (same comment as for Transformation, from unspecified)
- Transformation, to traffic area, road network [natural resource, land]: 0.0065 m2; lognormal variance with pedigree 0.2507, pedigree (2,2,5,1,5)
  (same comment as for Transformation, from unspecified)

## Emissions to nature
- NMVOC, non-methane volatile organic compounds, unspecified origin [air, unspecified]: 1.24 kg; lognormal variance with pedigree 0.1086, pedigree (4,3,5,1,1)
  Estimated value based on literature studies.
  Uncertainty: literature studies

## Sampling procedure
national statistics and literature

## Extrapolations
This dataset has been extrapolated from year 2000 to the year of the calculation (2021). The uncertainty has been adjusted accordingly.

## Review by Emilia Moreno Ruiz 2012-03-20
trainee DS, ok, Liliane Klemann

## Review by Carl Vadenbo 2012-06-29
In preparation for the release of ecoinvent v3.0, exchanges for electricity use, land use and decommisioned tram track was moved from the dataset 'transport, tram, CH' to 'tram track construction, CH 1990-2000' The amounts and the uncertainty information of the exchanges were reviewed and were found to correspond to the disaggregated datasets, and the dataset was accepted for inclusion into the ecoinvent database on 2012.07.04.
