# petroleum refinery construction

Dataset: EcoSpold 2, unit process
Geography: RER
Time period: 1993-01-01 to 2021-12-31
Technology level: current
Classification: ISIC rev.4 ecoinvent: 4290:Construction of other civil engineering projects
Classification: EcoSpold01Categories: oil/fuels
Tags: ConvertedDataset
Scenario: Business-as-Usual
System model: Allocation, cut-off by classification
Share of production covered: 1 %
Generated by: Niels Jungbluth
Published in: Jungbluth, N. 2007
Database: ecoinvent
isCopyrightProtected: true
accessRestrictedTo: 1

## General comment
The inventory describes the use of materials for the refinery equipment and the land use for a refinery with an annual capacity of 1 mio. tonnes crude oil throughput and a life time of 30 years.
[This dataset was already contained in the ecoinvent database version 2. It was not individually updated during the transfer to ecoinvent version 3. Life Cycle Impact Assessment results may still have changed, as they are affected by changes in the supply chain, i.e. in other datasets. This dataset was generated following the ecoinvent quality guidelines for version 2. It may have been subject to central changes described in the ecoinvent version 3 change report (http://www.ecoinvent.org/database/ecoinvent-version-3/reports-of-changes/), and the results of the central updates were reviewed extensively. The changes added e.g. consistent water flows and other information throughout the database. The documentation of this dataset can be found in the ecoinvent reports of version 2, which are still available via the ecoinvent website. The change report linked above covers all central changes that were made during the conversion process.]

## Included activities end
Infrastructure for chemical processing and land use. No data for construction, storage facilities and office buildings.

## Geography
Estimation for a refinery in Europe.

## Technology
Data for a distillation unit have been estimated to assess the use of materials.

## Time period
Time of publications and information in the literature

## Parameters
- fraction, process water, to air: 0.15 dimensionless; name fraction_PW_to_air; lognormal variance with pedigree 0.092025, pedigree (4,4,3,2,4)
  Literature value. In case when no industry/process specific data are available, default evaporation fraction value is used. This value is 15% and is based on literature (Statistics Canada, 2007 & Shaffer, K.H., 2008, Consumptive water use in the Great Lakes Basin, USGS & Shiklomanov, 2003, World Water Resources at the Beginning of the 21st Century) and has been approved by an expert.

## Reference product
- petroleum refinery: 1 unit; CPC 53290: Other civil engineering works; By-product classification allocatable product
  EcoSpold01Location=RER
  production volume 1.32237 unit
    This is a placeholder value that does not reflect real-world production volumes. This dataset does not currently require a real-world production volume to work in the database framework, and no actual data were collected yet. This has no negative effect on the results of the ecoinvent database. The placeholder value of this activity was scaled according to the nominal GDP of 2005 (source: United Nations, http://data.un.org/Glossary.aspx?q=GDP+%28current+US%24%29, accessed 20130726) to reflect an appropriate share of the global production volume, which is also a placeholder value.
  property price 8.49953e6 EUR2005
    Calculated based on inputs: The price of the product has been calculated as a sum of the values of the material and energy inputs for this product. This value is therefore a rough estimation. It may underestimate the real price since there are additional expenses when producing any product. These expences can include for example labour costs, treatment of waste materials and profit for the producer. Please consider carefully whether this level of data quality is acceptable for your application.

## Inputs from technosphere
- sulfuric acid: 192000 kg; lognormal variance with pedigree 0.1501, pedigree (3,5,5,3,4)
  EcoSpold01Location=RER
  Literature
  Uncertainty: Literature
  properties: dry mass 1 kg, wet mass 1 kg
- heat, district or industrial, other than natural gas: 1.596e7 MJ; lognormal variance with pedigree 0.1501, pedigree (3,5,5,3,4)
  Literature
  EcoSpold01Location=CH
  Uncertainty: Literature
  properties: heating value, net 1 MJ
- steel, chromium steel 18/8, hot rolled: 320000 kg; lognormal variance with pedigree 0.1501, pedigree (3,5,5,3,4)
  EcoSpold01Location=RER
  Literature
  Uncertainty: Literature
  properties: dry mass 1 kg, carbon content, fossil 0.0008, wet mass 1 kg
  note on carbon content, fossil: Stainless steel model is the grade 304 steel (18/8 stainless, 18% chromium 8% nickel; max. 0.08% C)
- electricity, medium voltage: 4e6 kWh; lognormal variance with pedigree 0.1501, pedigree (3,5,5,3,4)
  EcoSpold01Location=UCTE
  Literature
  Uncertainty: Literature
- stone wool, packed: 30000 kg; lognormal variance with pedigree 0.1501, pedigree (3,5,5,3,4)
  EcoSpold01Location=CH
  Literature
  Uncertainty: Literature
  properties: wet mass 1 kg, dry mass 1 kg, carbon content, fossil 0.015401
  note on carbon content, fossil: The chemical composition of the glass fibres used in the rock wool production is similar to the composition of naturally cooled volcano basalt and has a composition listed in Tab. 3.1 and 3.2 in ecoinvent v2.2 report 16, part XIV. Rock wool contains: a minimum of 96% mineral fibres,between 0.5 and 3.0 weight percent of phenolic resin depending on the specific product characteristics, and about 0.2 percent mineral oil (ecoinvent v2.2 report 16, part XIV). An average composition of 1.8% phenolic resin, 0.2% mineral oil, and 98% mineral fibres has been assumed and used to calculate C content of the rock wool
- concrete, normal: 454 m3; lognormal variance with pedigree 0.1501, pedigree (3,5,5,3,4)
  EcoSpold01Location=CH
  Literature
  Uncertainty: Literature
  properties: wet mass 2380 kg, dry mass 2190 kg, water content 0.086758
- polyethylene, high density, granulate: 48000 kg; lognormal variance with pedigree 0.1501, pedigree (3,5,5,3,4)
  EcoSpold01Location=RER
  Literature
  Uncertainty: Literature
  properties: wet mass 1 kg, dry mass 1 kg, heating value, net 42.47 MJ, carbon content, fossil 0.857143
  note on carbon content, fossil: Polyethylene is formed out of a huge amount of ethylene monomers (C2H4) (ecoinvent v2.2 report 11_II). MW=28 g/mol
- waste mineral wool: 0 kg; pedigree (1,1,1,1,1)
  Literature
  EcoSpold01Location=CH
  Uncertainty: Literature
  production volume 0 kg
    Calculated from the production volume of refinery in proportion to the respective output amounts.
  properties: dry mass 1 kg, wet mass 1 kg
- waste cement in concrete and mortar: 0 kg; pedigree (1,1,1,1,1)
  Literature
  EcoSpold01Location=CH
  Uncertainty: Literature
  production volume 0 kg
    (same comment as for waste mineral wool)
  properties: water content 0.00502513, wet mass 1 kg, dry mass 0.995 kg
- brazing solder, cadmium free: 168000 kg; lognormal variance with pedigree 0.1501, pedigree (3,5,5,3,4)
  EcoSpold01Location=RER
  Literature
  Uncertainty: Literature
  properties: wet mass 1 kg, dry mass 1 kg
- waste plastic, mixture: -48000 kg; lognormal variance with pedigree 0.1501, pedigree (3,5,5,3,4)
  Literature
  EcoSpold01Location=CH
  Uncertainty: Literature
  production volume 48000 kg
    (same comment as for waste mineral wool)
  properties: heating value, net 30.79 MJ, water content 0.180638, dry mass 0.847 kg, wet mass 1 kg, carbon content, fossil 0.747344
  note on heating value, net: Value taken from the general comment of the treatment dataset.
  note on carbon content, fossil: C content in 1 kg DM was calculated using data in Tab A.2, ecoinvent v2.2 report 13_I
- steel, unalloyed: 4.16e6 kg; lognormal variance with pedigree 0.1501, pedigree (3,5,5,3,4)
  EcoSpold01Location=RER
  Literature
  Uncertainty: Literature
  properties: wet mass 1 kg, carbon content, fossil 0.0025, dry mass 1 kg
  note on carbon content, fossil: Unalloyed steels or carbon steels are those in which the level of an individual element in no case reaches or exceeds the limiting concentration given in Tab. 3.1 ecoinvent v2.2 report 10_partII. Assumed to have a C content of 0.25%
- waste mineral wool: -29661.5, -338.46 kg (2 entries); lognormal variance with pedigree 0.1501, pedigree (3,5,5,3,4)
  Literature
  EcoSpold01Location=CH
  Uncertainty: Literature
  production volume 30000 kg
- waste cement in concrete and mortar: -970867, -29133.2 kg (2 entries); lognormal variance with pedigree 0.1501, pedigree (3,5,5,3,4)
  Literature
  EcoSpold01Location=CH
  Uncertainty: Literature
  production volume 1e6 kg

## Inputs from nature
- Water, unspecified natural origin [natural resource, in water]: 168 m3; name water_UNO_input; lognormal variance with pedigree 0.1501, pedigree (3,5,5,3,4)
  Literature
  Uncertainty: Literature
- Occupation, industrial area [natural resource, land]: 4.71e6 m2*year; lognormal variance with pedigree 0.0813, pedigree (2,3,5,3,1)
  Plant data
  Uncertainty: Plant data
- Transformation, to industrial area [natural resource, land]: 156900 m2; lognormal variance with pedigree 0.1613, pedigree (2,3,5,3,1)
  Plant data
  Uncertainty: Plant data
- Transformation, from unspecified [natural resource, land]: 157000 m2; lognormal variance with pedigree 0.1613, pedigree (2,3,5,3,1)
  Plant data
  Uncertainty: Plant data

## Emissions to nature
- Water [air, unspecified]: 25.2 m3; name water_to_air_unspecified; = (water_UNO_input*fraction_PW_to_air); lognormal variance with pedigree 0.0807, pedigree (2,2,5,1,1)
  Calculated value based on literature values and expert opinion. See comments in the parametres' comment field.
  property fraction, origin: fresh water 0; name fraction_origin_fresh_water
  property fraction, origin: unspecified 1; name fraction_origin_unspecified
  property fraction, origin: salt water 0; name fraction_origin_salt_water
- Water [water, unspecified]: 142.8 m3; name water_to_water_unspecified; = water_UNO_input*(1-fraction_PW_to_air); lognormal variance with pedigree 0.0807, pedigree (2,2,5,1,1)
  (same comment as for Water)
  property fraction, origin: fresh water 0; name fraction_origin_fresh_water_Ww
  property fraction, origin: salt water 0; name fraction_origin_salt_water_Ww
  property fraction, origin: unspecified 1; name fraction_origin_unspecified_Ww
  property carbon content, fossil 0; name C_content_fossil
  property carbon content, non-fossil 0; name C_content_non_fossil
  property wet mass 1000 kg; name WM
  property dry mass 0 kg; name DM
  property water in wet mass 1000 kg; name WWM

## Sampling procedure
Literature survey.

## Extrapolations
This dataset has been extrapolated from year 2002 to the year of the calculation (2021). The uncertainty has been adjusted accordingly.

## Review by Michael Spielmann (obsolete) 2003-07-04
passed.
