# paper machine production

Dataset: EcoSpold 2, unit process
Geography: RoW
Time period: 2000-01-01 to 2021-12-31
Technology level: current
Classification: EcoSpold01Categories: paper & cardboard/graphic paper
Classification: ISIC rev.4 ecoinvent: 2829:Manufacture of other special-purpose machinery
Tags: ConvertedDataset
Scenario: Business-as-Usual
System model: Allocation, cut-off by classification
Generated by: Roland Hischier
Published in: Hischier R. 2007
Database: ecoinvent
isCopyrightProtected: true
accessRestrictedTo: 1

## General comment
The dataset represents a big offset paper machine, used e.g. for newsprint production.
[This dataset was already contained in the ecoinvent database version 2. It was not individually updated during the transfer to ecoinvent version 3. Life Cycle Impact Assessment results may still have changed, as they are affected by changes in the supply chain, i.e. in other datasets. This dataset was generated following the ecoinvent quality guidelines for version 2. It may have been subject to central changes described in the ecoinvent version 3 change report (http://www.ecoinvent.org/database/ecoinvent-version-3/reports-of-changes/), and the results of the central updates were reviewed extensively. The changes added e.g. consistent water flows and other information throughout the database. The documentation of this dataset can be found in the ecoinvent reports of version 2, which are still available via the ecoinvent website. The change report linked above covers all central changes that were made during the conversion process.]

## Included activities end
This module includes the production of the paper machine, its transport to the paper mill and the material amount for the foundation of the machine. Also included is the final disposal of the machine.

## Geography
Data about one newsprint paper machine, installed in Sweden. Data valable for whole Europe.

## Technology
rough estimation based on few information about one single paper machine

## Reference product
- paper machine: 1 unit; CPC 44913: Machinery for making pulp of fibrous cellulosic material or for making or finishing paper or paperboard; machi[…]; By-product classification allocatable product
  production volume 2.67763 unit
    This is a placeholder value that does not reflect real-world production volumes. This dataset does not currently require a real-world production volume to work in the database framework, and no actual data were collected yet. This has no negative effect on the results of the ecoinvent database.
  property price 2.71114e7 EUR2005
    Convert from EU 27 price to the world by currency exchange rate.

## Inputs from technosphere
- electricity, medium voltage: 0 kWh; pedigree (1,1,1,1,1)
  Rough estimation, based on literature
  Uncertainty: r
- waste polyvinylchloride: 0 kg; pedigree (1,1,1,1,1)
  Calculated, based on input
  Uncertainty: C
  production volume 0 kg
    Calculated from the production volume of paper machine in proportion to the respective output amounts.
  properties: wet mass 1 kg, heating value, net 21.51 MJ, water content 0.00200401, dry mass 0.998 kg, carbon content, fossil 0.440882
  note on heating value, net: Value taken from the general comment of the treatment dataset.
  note on carbon content, fossil: C content in 1 kg DM was calculated using data in Tab A.1, ecoinvent v2.2 report 13_I
- polyethylene, high density, granulate: 67500 kg; lognormal variance with pedigree 0.158, pedigree (4,5,5,5,4)
  Estimation
  Uncertainty: E
  properties: heating value, net 42.47 MJ, dry mass 1 kg, wet mass 1 kg, carbon content, fossil 0.857143
  note on carbon content, fossil: Polyethylene is formed out of a huge amount of ethylene monomers (C2H4) (ecoinvent v2.2 report 11_II). MW=28 g/mol
- waste polyethylene: 0 kg; pedigree (1,1,1,1,1)
  Calculated, based on input
  Uncertainty: C
  production volume 0 kg
    (same comment as for waste polyvinylchloride)
  properties: heating value, net 42.47 MJ, wet mass 1 kg, water content 0.00401606, dry mass 0.996 kg, carbon content, fossil 0.825301
- heat, district or industrial, natural gas: 0 MJ; pedigree (1,1,1,1,1)
  Rough estimation, based on literature
  Uncertainty: r
  properties: heating value, net 1 MJ
- steel, chromium steel 18/8, hot rolled: 3.6e6 kg; lognormal variance with pedigree 0.062, pedigree (4,4,5,5,1)
  Expert information about 1 machine
  Uncertainty: E
  properties: dry mass 1 kg, carbon content, fossil 0.0008, wet mass 1 kg
  note on carbon content, fossil: Stainless steel model is the grade 304 steel (18/8 stainless, 18% chromium 8% nickel; max. 0.08% C)
- concrete, normal: 0 m3; pedigree (1,1,1,1,1)
  Estimation
  Uncertainty: E
  properties: wet mass 2380 kg, dry mass 2190 kg, water content 0.086758
- polyvinylchloride, suspension polymerised: 19627.7 kg; lognormal variance with pedigree 0.158, pedigree (4,5,5,5,4)
  Estimation
  Uncertainty: E
  properties: heating value, net 21.5 MJ, dry mass 1 kg, carbon content, fossil 0.387097, wet mass 1 kg
  note on carbon content, fossil: Monomer is vynyl chloride, C2H3Cl (ecoinvent v2.2 report 11_II). MW=62 g/mol
- polyvinylchloride, emulsion polymerised: 2872.35 kg; lognormal variance with pedigree 0.158, pedigree (4,5,5,5,4)
  Estimation
  Uncertainty: E
  properties: heating value, net 21.5 MJ, wet mass 1 kg, dry mass 1 kg, carbon content, fossil 0.387097
- electronics, for control units: 90000 kg; lognormal variance with pedigree 0.158, pedigree (4,5,5,5,4)
  Estimation
  Uncertainty: E
  properties: dry mass 1 kg, carbon content, fossil 0.337146, carbon content, non-fossil 0.00013442, wet mass 1 kg
  note on carbon content, fossil: The control unit has a composition of 46% steel (housing), 32% plastics, 14% printed wiring boards and 8% cables (various types).;
- electronics scrap from control units: -90000 kg; lognormal variance with pedigree 0.158, pedigree (4,5,5,5,4)
  Calculated, based on input
  Uncertainty: C
  production volume 270000 kg
    (same comment as for waste polyvinylchloride)
  properties: wet mass 1 kg, dry mass 1 kg, carbon content, non-fossil 0.00013442, carbon content, fossil 0.337146
- heat, district or industrial, other than natural gas: 0 MJ; pedigree (1,1,1,1,1)
  Rough estimation, based on literature
  Uncertainty: r
  properties: heating value, net 1 MJ
- waste concrete: -2.54e6 kg; lognormal variance with pedigree 0.158, pedigree (4,5,5,5,4)
  Calculated, based on input
  Uncertainty: C
  production volume 7.62e6 kg
    (same comment as for waste polyvinylchloride)
  properties: water content 1, wet mass 1 kg, dry mass 0.5 kg
- steel, low-alloyed, hot rolled: 720000 kg; lognormal variance with pedigree 0.158, pedigree (4,5,5,5,4)
  Estimation
  Uncertainty: E
  properties: wet mass 1 kg, carbon content, fossil 0.005, dry mass 1 kg
  note on carbon content, fossil: Low alloyed steel composition given in Tab. 3.2 ecoinvent v2.2 report 10_partII. Steel assumed to have a C content of 0.5%
- electricity, medium voltage: 57353.6, 10998, 184633, 2.68532e6, 378497, 1.2332e6 kWh (6 entries); lognormal variance with pedigree 0.158, pedigree (4,5,5,5,4)
  Rough estimation, based on literature
  Uncertainty: r
- waste polyvinylchloride: -2765.02, -184.748, -13.9722, -76.3075, -30.8274, -72.4611, -19356.7 kg (7 entries); lognormal variance with pedigree 0.158, pedigree (4,5,5,5,4)
  Calculated, based on input
  Uncertainty: C
  production volume 67500 kg
- waste polyethylene: -8295.06, -554.244, -41.9166, -228.923, -92.4821, -217.383, -58070 kg (7 entries); lognormal variance with pedigree 0.158, pedigree (4,5,5,5,4)
  Calculated, based on input
  Uncertainty: C
  production volume 202500 kg
- heat, district or industrial, natural gas: 331947, 2.15381e7 MJ (2 entries); lognormal variance with pedigree 0.158, pedigree (4,5,5,5,4)
  Rough estimation, based on literature
  Uncertainty: r
- concrete, normal: 44.3295, 4.61907, 37.3947, 21.0345, 89.0752, 3.00445, 1760.54 m3 (7 entries); lognormal variance with pedigree 0.158, pedigree (4,5,5,5,4)
  Estimation
  Uncertainty: E
- heat, district or industrial, other than natural gas: 9357.39, 2.30756e7 MJ (2 entries); lognormal variance with pedigree 0.158, pedigree (4,5,5,5,4)
  Rough estimation, based on literature
  Uncertainty: r

## Sampling procedure
literature

## Extrapolations
Based on information from Voith Paper Heidenheim about the total weight and the amount of chromium steel, the other parts of the machine were estimated and verified with experts. The energy amount for the production is a rough estimation, based on information from Literature. The transport is estimated based on a production place in the southern part of Germany This dataset has been copied from an original dataset covering the geography RER. The uncertainty has been adjusted accordingly.

## Review by Hans-Jörg Althaus 2003-07-02
passed
