# transmission network construction, electricity, medium voltage

Dataset: EcoSpold 2, unit process
Geography: CH
Time period: 1988-01-01 to 2021-12-31
Technology level: current
Classification: EcoSpold01Categories: electricity/distribution
Classification: ISIC rev.4 ecoinvent: 4220:Construction of utility projects
Tags: ConvertedDataset
Scenario: Business-as-Usual
System model: Allocation, cut-off by classification
Share of production covered: 100 %
Generated by: Mireille Faist Emmenegger (obsolete)
Published in: Dones R. 2007
Database: ecoinvent
isCopyrightProtected: true
accessRestrictedTo: 1

## General comment
This dataset describes the infrastructure (poles, cables etc.) of the electricity transmission network. It includes the high-to-medium voltage switching stations.
[This dataset was already contained in the ecoinvent database version 2. It was not individually updated during the transfer to ecoinvent version 3. Life Cycle Impact Assessment results may still have changed, as they are affected by changes in the supply chain, i.e. in other datasets. This dataset was generated following the ecoinvent quality guidelines for version 2. It may have been subject to central changes described in the ecoinvent version 3 change report (http://www.ecoinvent.org/database/ecoinvent-version-3/reports-of-changes/), and the results of the central updates were reviewed extensively. The changes added e.g. consistent water flows and other information throughout the database. The documentation of this dataset can be found in the ecoinvent reports of version 2, which are still available via the ecoinvent website. The change report linked above covers all central changes that were made during the conversion process.]

## Geography
The calculations are based on Swiss data

## Technology
Switching stations use SF6.

## Reference product
- transmission network, electricity, medium voltage: 1 km; name trans_net_RP; CPC 53252: Local cables and related works; By-product classification allocatable product
  production volume 110900 km; name trans_net_RP_PV; = 335459.807073955*0.33059
    Estimated. The european production volume is extrapolated from the global production volume using the nominal GDP of 2005 (source: United Nations, http://data.un.org/Glossary.aspx?q=GDP+%28current+US%24%29, accessed 20130726 and 20130312).
    Gross domestic product (GDP) at current prices is GDP at prices of the current reporting period. Also known as nominal GDP.
  property price 929713 EUR2005
    The production volume of this product is small compared to other products supplied by the activities within the same ISIC 3 category. Calculated from Aluminium consumption. According to activity '_80 Infrastructure, excluding buildings, EU27' in the EU & DK IO database (Simapro, (0.0000404 (Al, after first processing) + 0.000615 (Al basic, virgin)) kg Al per EURO.. Ecoinvent: 614 kg Al per km (dataset 'transmission network construction, electricity, medium voltage').

## Inputs from technosphere
- waste concrete: -7720 kg; name waste_concrete_byP; lognormal variance with pedigree 0.438, pedigree (5,5,5,1,1)
  Estimates
  Estimates
  production volume 8.56145e8 kg; = waste_concrete_byP/ trans_net_RP* trans_net_RP_PV
    Calculated from the production volume of transmission network, electricity, medium voltage in proportion to the respective output amounts.
  property price 0 EUR2005; name waste_concrete_byP_price_EUR2005
  properties: water content 1, wet mass 1 kg, dry mass 0.5 kg
- building, hall, steel construction: 0.158 m2; lognormal variance with pedigree 0.138, pedigree (5,5,5,1,1)
  Estimates
  This exchange has an activity link directly to the producing activity because the product is primarily consumed in the same geographical area where it is produced.
- excavation, hydraulic digger: 245 m3; lognormal variance with pedigree 0.0761, pedigree (4,2,5,1,3)
  Estimates
  Estimates
- waste wood pole, chrome preserved: -1460 kg; name waste_wood_byP; lognormal variance with pedigree 0.438, pedigree (5,5,5,1,1)
  Estimates
  Estimates
  production volume 1.61914e8 kg; = waste_wood_byP/ trans_net_RP* trans_net_RP_PV
    (same comment as for waste concrete)
  property price 0 EUR2005; name waste_wood_byP_price_EUR2005
  properties: heating value, net 13.99 MJ, dry mass 0.8 kg, wet mass 1 kg, carbon content, non-fossil 0.483676, water content 0.25
  note on heating value, net: Value taken from the general comment of the treatment dataset.
  note on carbon content, non-fossil: Tab A.4, ecoinvent v2.2 report 13_I. C content has been referred to 1 kg DM,
- building, multi-storey: 6.13 m3; lognormal variance with pedigree 0.138, pedigree (5,5,5,1,1)
  Estimates
  Estimates
- wood preservation, oscillating pressure method, inorganic salt, containing Cr, outdoor use, ground contact: 48.3 kg
  Literature and estimations
- light fuel oil: 313 kg; lognormal variance with pedigree 0.0601, pedigree (3,2,5,1,3)
  Literature and estimations
  Literature and estimations
  properties: wet mass 1 kg, dry mass 1 kg, carbon content, fossil 0.862, heating value, net 42.6 MJ
- waste mineral oil: -313 kg; name waste_min_oil_byP; lognormal variance with pedigree 0.438, pedigree (5,5,5,1,1)
  Estimates
  Estimates
  production volume 3.47116e7 kg; = waste_min_oil_byP/ trans_net_RP* trans_net_RP_PV
    (same comment as for waste concrete)
  property price 0 EUR2005; name waste_min_oil_byP_price_EUR2005
  properties: wet mass 1 kg, dry mass 0.9 kg, water content 0.111111, carbon content, fossil 0.864444, heating value, net 34.7 MJ
  note on carbon content, fossil: Tab A.6, ecoinvent v2.2 report 13_I. C content has been calculated after data in the tables, and then referred to 1 kg DM
- sulfur hexafluoride, liquid: 4.42 kg; lognormal variance with pedigree 0.05, pedigree (1,1,5,1,1)
  Swiss SFA study, 1999
  Swiss SFA study, 1999
  properties: wet mass 1 kg, dry mass 1 kg
- concrete, normal: 3.51 m3; lognormal variance with pedigree 0.0601, pedigree (3,2,5,1,3)
  Literature and estimations
  Literature and estimations
  properties: water content 0.086758, dry mass 2190 kg, wet mass 2380 kg
- polyvinylchloride, suspension polymerised: 118.638 kg; lognormal variance with pedigree 0.0601, pedigree (3,2,5,1,3)
  Literature and estimations
  Literature and estimations
  properties: dry mass 1 kg, heating value, net 21.5 MJ, carbon content, fossil 0.387097, wet mass 1 kg
  note on carbon content, fossil: Monomer is vynyl chloride, C2H3Cl (ecoinvent v2.2 report 11_II). MW=62 g/mol
- lead: 363 kg; lognormal variance with pedigree 0.0601, pedigree (3,2,5,1,3)
  Literature and estimations
  Literature and estimations
  properties: wet mass 1 kg, dry mass 1 kg
- copper, cathode: 2020 kg; lognormal variance with pedigree 0.0601, pedigree (3,2,5,1,3)
  Literature and estimations
  Literature and estimations
  properties: dry mass 1 kg, wet mass 1 kg
- sawlog and veneer log, softwood, debarked, measured as solid wood: 2.71 m3; lognormal variance with pedigree 0.0601, pedigree (3,2,5,1,3)
  Literature and estimations
  Literature and estimations
  properties: heating value, net 5962.7 MJ, dry mass 450 kg, water content 0.7, wet mass 765 kg, carbon content, non-fossil 0.494
  note on carbon content, non-fossil: C content of dry mass is 0.494 kgC/kg dry wood (ecoinvent v2.2 report 9)
- waste polyethylene: -45.4 kg; name waste_PE_byP; lognormal variance with pedigree 0.438, pedigree (5,5,5,1,1)
  Estimates
  Estimates
  production volume 5.03484e6 kg; = waste_PE_byP* trans_net_RP* trans_net_RP_PV
    (same comment as for waste concrete)
  property price 0 EUR2005; name waste_PE_byP_price_EUR2005
  properties: wet mass 1 kg, heating value, net 42.47 MJ, carbon content, fossil 0.825301, water content 0.00401606, dry mass 0.996 kg
  note on carbon content, fossil: C content in 1 kg DM was calculated using data in Tab A.1, ecoinvent v2.2 report 13_I
- steel, unalloyed: 1100 kg; lognormal variance with pedigree 0.0601, pedigree (3,2,5,1,3)
  Literature and estimations
  Literature and estimations
  properties: wet mass 1 kg, carbon content, fossil 0.0025, dry mass 1 kg
  note on carbon content, fossil: Unalloyed steels or carbon steels are those in which the level of an individual element in no case reaches or exceeds the limiting concentration given in Tab. 3.1 ecoinvent v2.2 report 10_partII. Assumed to have a C content of 0.25%
- polyvinylchloride, emulsion polymerised: 17.3618 kg; lognormal variance with pedigree 0.0601, pedigree (3,2,5,1,3)
  Literature and estimations
  Literature and estimations
  properties: wet mass 1 kg, dry mass 1 kg, carbon content, fossil 0.387097, heating value, net 21.5 MJ
- waste polyvinylchloride: -136 kg; name waste_PVC_byP; lognormal variance with pedigree 0.438, pedigree (5,5,5,1,1)
  Estimates
  Estimates
  production volume 1.50824e7 kg; = waste_PVC_byP/ trans_net_RP* trans_net_RP_PV
    (same comment as for waste concrete)
  property price 0 EUR2005; name waste_PVC_byP_price_EUR2005
  properties: wet mass 1 kg, water content 0.00200401, heating value, net 21.51 MJ, carbon content, fossil 0.440882, dry mass 0.998 kg
- packaging film, low density polyethylene: 45.4 kg; lognormal variance with pedigree 0.0601, pedigree (3,2,5,1,3)
  Literature and estimations
  Literature and estimations
  properties: carbon content, fossil 0.857143, wet mass 1 kg, dry mass 1 kg, heating value, net 42.47 MJ
  note on carbon content, fossil: Polyethylene is formed out of a huge amount of ethylene monomers (C2H4) (ecoinvent v2.2 report 11_II). MW=28 g/mol
- aluminium, wrought alloy: 614 kg; lognormal variance with pedigree 0.0601, pedigree (3,2,5,1,3)
  Literature and estimations
  Literature and estimations
  properties: wet mass 1 kg, dry mass 1 kg

## Inputs from nature
- Transformation, from forest, unspecified [natural resource, land]: 1.96 m2; lognormal variance with pedigree 0.138, pedigree (5,5,5,1,1)
  Estimates
- Transformation, to industrial area [natural resource, land]: 4.425 m2; lognormal variance with pedigree 0.138, pedigree (5,5,5,1,1)
  Estimates
- Transformation, from annual crop [natural resource, land]: 2.46 m2; lognormal variance with pedigree 0.178, pedigree (5,5,5,1,1)
  Estimates
- Occupation, industrial area [natural resource, land]: 133.1 m2*year; lognormal variance with pedigree 0.258, pedigree (5,5,5,1,1)
  Estimates

## Emissions to nature
- Boron [soil, unspecified]: 1.01 kg; lognormal variance with pedigree 0.0926, pedigree (3,3,5,1,1)
  Information from LCA on wooden poles
- Fluoride [soil, unspecified]: 3.86 kg; lognormal variance with pedigree 0.0926, pedigree (3,3,5,1,1)
  Information from LCA on wooden poles
- Copper [soil, unspecified]: 3.56 kg; lognormal variance with pedigree 0.0926, pedigree (3,3,5,1,1)
  Information from LCA on wooden poles
- Chromium VI [soil, unspecified]: 5.7 kg; lognormal variance with pedigree 0.0926, pedigree (3,3,5,1,1)
  Information from LCA on wooden poles
- Sulfur hexafluoride [air, unspecified]: 0.0867 kg; lognormal variance with pedigree 0.08, pedigree (1,1,5,1,1)
  Statistics

## Sampling procedure
statistics

## Extrapolations
This dataset has been extrapolated from year 2000 to the year of the calculation (2021). The uncertainty has been adjusted accordingly.

## Review by Gerald Rebitzer (obsolete) 2003-08-10
passed

## Review by Emilia Moreno Ruiz 2014-05-26
updated to fit to the new wood preservation data
