# stibnite mine operation, 70% stibnite

Dataset: EcoSpold 2, unit process
Geography: CN
Time period: 1994-01-01 to 2021-12-31
Technology level: current
Classification: ISIC rev.4 ecoinvent: 0729:Mining of other non-ferrous metal ores
Tags: ConvertedDataset
Scenario: Business-as-Usual
System model: Allocation, cut-off by classification
Generated by: Hans-Jörg Althaus
Published in: Classen M. 2008
Database: ecoinvent
isCopyrightProtected: true
accessRestrictedTo: 1

## General comment
The model represents mining and beneficiation of Stibnite in China. China produces more than 80% of the global Antimony.
[This dataset was already contained in the ecoinvent database version 2. It was not individually updated during the transfer to ecoinvent version 3. Life Cycle Impact Assessment results may still have changed, as they are affected by changes in the supply chain, i.e. in other datasets. This dataset was generated following the ecoinvent quality guidelines for version 2. It may have been subject to central changes described in the ecoinvent version 3 change report (http://www.ecoinvent.org/database/ecoinvent-version-3/reports-of-changes/), and the results of the central updates were reviewed extensively. The changes added e.g. consistent water flows and other information throughout the database. The documentation of this dataset can be found in the ecoinvent reports of version 2, which are still available via the ecoinvent website. The change report linked above covers all central changes that were made during the conversion process.]

## Included activities end
The module includes the mining and the beneficiation step with the mining infrastructure and disposal of overburden and tailings (see part 'Auxiliary Processes').

## Geography
The model represents mining and beneficiation of Antimony in China. China produces more than 80% of the global Antimony.

## Technology
This module is approximated with values from molybdenum mining and beneficiation (coupled with copper mining)

## Parameters
- fraction, process water, to air: 0.2 dimensionless; name fraction_PW_to_air; lognormal variance with pedigree 0.092025, pedigree (4,4,3,2,4)
  Literature value (Statistics Canada, 2007 & Shaffer, K.H., 2008, Consumptive water use in the Great Lakes Basin, USGS) (Vionnet, S., Quantis Water Database - Technical Report, 2012).

## Reference product
- stibnite ore, 70% stibnite: 1 kg; name RP_amount; By-product classification allocatable product; CPC 14290: Other non-ferrous metal ores and concentrates (other than uranium or thorium ores and concentrates)
  production volume 6.66522e6 kg; name RP_PV; = 1.35E+08*0.049372
    Estimated. The european production volume is extrapolated from the global production volume using the nominal GDP of 2005 (source: United Nations, http://data.un.org/Glossary.aspx?q=GDP+%28current+US%24%29, accessed 20130726 and 20130312).
    Gross domestic product (GDP) at current prices is GDP at prices of the current reporting period. Also known as nominal GDP.
  property price 0.92 EUR2005
    Calculated value based on data from United Nations Commodity Trade Statistics Database (comtrade.un.org). UN comtrade category: 261710 Antimony ores and concentrates. Year 2005. Using exchange rate of 1EURO = 1.209 USD. Average of price of import into 5 main markets (EU, US, JP, IN and CN).
  property carbon content 0
    carbon content on a dry matter basis (reserved; not for manual entry)
  properties: wet mass 1 kg, carbon content, non-fossil 0, water content 0, carbon content, fossil 0, water in wet mass 0 kg, dry mass 1 kg, carbon allocation 0 kg

## Inputs from technosphere
- mine infrastructure, underground, non-ferrous metal: 7.5328e-10 unit; lognormal variance with pedigree 0.446, pedigree (5,5,5,1,3)
- electricity, medium voltage: 3.9825 kWh; lognormal variance with pedigree 0.0412, pedigree (2,3,5,1,1)
- diesel, burned in building machine: 0.0079416 MJ; lognormal variance with pedigree 0.0407, pedigree (2,2,5,1,1)
  properties: heating value, net 1 MJ
- sulfidic tailings, generic: -269.78 kg; name sulfidic_tailings; lognormal variance with pedigree 0.0407, pedigree (2,2,5,1,1)
  production volume 1.79814e9 kg; = RP_PV * sulfidic_tailings / abs(RP_amount)
    Calculated from the production volume of stibnite ore, 70% stibnite in proportion to the respective output amounts.
  properties: silicon content 0.053273, oxygen content 0.89157, iron content 0.015374, magnesium content 0.0022359, aluminium content 0.014738, sodium content 0.0014472, calcium content 0.0045972, potassium content 0.0025181, carbon content, fossil 0.0087785, wet mass 1 kg, water content 0.428571, dry mass 0.7 kg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
- aluminium hydroxide factory: 1.3197e-9 unit; lognormal variance with pedigree 0.3601, pedigree (3,2,5,1,3)
- chemical, organic: 0.035445 kg; lognormal variance with pedigree 0.16, pedigree (1,1,5,1,1)
  reported values
  properties: carbon content, fossil 0.628, dry mass 1 kg, wet mass 1 kg, heating value, net 19.03 MJ
  note on carbon content, fossil: This dataset is an unweighted average of 20 organic substances (listed in Tab 88.1, ecoinvent v2.2 report 8, part II), being part of the top100 chemicals included in this database. The C-content has also been calculated as an unweighted average of the C content of the substances composing this dataset.
- blasting: 0.15708 kg; lognormal variance with pedigree 0.0407, pedigree (2,2,5,1,1)
- chemical, inorganic: 0.12088 kg; lognormal variance with pedigree 0.16, pedigree (1,1,5,1,1)
  reported values
  properties: dry mass 1 kg, carbon content, fossil 0.003, wet mass 1 kg
  note on carbon content, fossil: This dataset is an unweighted average of 20 inorganic substances (listed in Tab 88.1, ecoinvent v2.2 report 8, part II), being part of the top100 chemicals included in this database. The C-content has also been calculated as an unweighted average of the C content of the substances composing this dataset.
- mine infrastructure, open cast, non-ferrous metal: 1.7285e-9 unit; lognormal variance with pedigree 0.446, pedigree (5,5,5,1,3)
- lime, packed: 0.19796 kg; lognormal variance with pedigree 0.04, pedigree (1,1,5,1,1)
  reported values
  properties: dry mass 0.998 kg, water content 0.00200401, carbon content, fossil 0.117492, wet mass 1 kg
  note on carbon content, fossil: Table 3.1, ecoinvent v2.2 report 7, part VII, pg 3. MW CaCO3=100, MW MgCO3=84
- sodium cyanide: 0.0054949 kg; lognormal variance with pedigree 0.16, pedigree (1,1,5,1,1)
  reported values
  properties: wet mass 1 kg, dry mass 1 kg, heating value, net 7.43 MJ, carbon content, fossil 0.244898
- conveyor belt: 1.1912e-5 m; lognormal variance with pedigree 0.446, pedigree (5,5,5,1,3)
- steel, chromium steel 18/8, hot rolled: 0.11679 kg; lognormal variance with pedigree 0.05, pedigree (1,1,5,1,1)
  reported values
  properties: carbon content, fossil 0.0008, dry mass 1 kg, wet mass 1 kg
  note on carbon content, fossil: Stainless steel model is the grade 304 steel (18/8 stainless, 18% chromium 8% nickel; max. 0.08% C)

## Inputs from nature
- Occupation, mineral extraction site [natural resource, land]: 0.0081752 m2*year; lognormal variance with pedigree 0.0807, pedigree (2,2,5,1,1)
- Water, river [natural resource, in water]: 0.23182 m3; name water_river_input; lognormal variance with pedigree 0.0407, pedigree (2,2,5,1,1)
- Transformation, to mineral extraction site [natural resource, land]: 0.00027328 m2; lognormal variance with pedigree 0.1607, pedigree (2,2,5,1,1)
- Antimony, in ground [natural resource, in ground]: 0.7 kg; lognormal variance with pedigree 0.0407, pedigree (2,2,5,1,1)
- Transformation, from unspecified [natural resource, land]: 0.00027328 m2; lognormal variance with pedigree 0.1607, pedigree (2,2,5,1,1)

## Emissions to nature
- Nitrogen, organic bound [water, surface water]: 0.0052788 kg; lognormal variance with pedigree 1.37, pedigree (1,1,5,1,1)
  reported values
- Water [water, unspecified]: 0.185456 m3; name water_to_water_unspecified; = water_river_input*(1-fraction_PW_to_air); lognormal variance with pedigree 0.0807, pedigree (2,2,5,1,1)
  Calculated value based on literature values and expert opinion. See comments in the parametres' comment field.
  property fraction, origin: fresh water 1; name fraction_origin_fresh_water_Ww
  property fraction, origin: unspecified 0; name fraction_origin_unspecified_Ww
  property carbon content, fossil 0; name C_content_fossil
  property dry mass 0 kg; name DM
  property fraction, origin: salt water 0; name fraction_origin_salt_water_Ww
  property carbon content, non-fossil 0; name C_content_non_fossil
  property water in wet mass 1000 kg; name WWM
  property wet mass 1000 kg; name WM
- Mercury [water, surface water]: 8.7591e-9 kg; lognormal variance with pedigree 1.37, pedigree (1,1,5,1,1)
  reported values
- Dissolved solids [water, surface water]: 0.0011971 kg; lognormal variance with pedigree 1.37, pedigree (1,1,5,1,1)
  reported values
- Water [air, unspecified]: 0.046364 m3; name water_to_air_unspecified; = (water_river_input*fraction_PW_to_air); lognormal variance with pedigree 0.0807, pedigree (2,2,5,1,1)
  (same comment as for Water)
  property fraction, origin: fresh water 1; name fraction_origin_fresh_water
  property fraction, origin: unspecified 0; name fraction_origin_unspecified
  property fraction, origin: salt water 0; name fraction_origin_salt_water
- Copper [air, non-urban air or from high stacks]: 3.6146e-6 kg; lognormal variance with pedigree 0.1001, pedigree (3,2,5,1,3)
- Nickel, ion [water, surface water]: 5.6467e-6 kg; lognormal variance with pedigree 1.37, pedigree (1,1,5,1,1)
  reported values
- Cobalt [air, non-urban air or from high stacks]: 1.4423e-6 kg; lognormal variance with pedigree 0.1001, pedigree (3,2,5,1,3)
- Mercury [air, non-urban air or from high stacks]: 3.6146e-9 kg; lognormal variance with pedigree 0.1001, pedigree (3,2,5,1,3)
- Selenium [air, non-urban air or from high stacks]: 3.6146e-9 kg; lognormal variance with pedigree 0.1001, pedigree (3,2,5,1,3)
- Cadmium [air, non-urban air or from high stacks]: 7.9416e-9 kg; lognormal variance with pedigree 0.1001, pedigree (3,2,5,1,3)
- Manganese [air, non-urban air or from high stacks]: 6.8905e-5 kg; lognormal variance with pedigree 0.1001, pedigree (3,2,5,1,3)
- Boron [air, non-urban air or from high stacks]: 7.2409e-7 kg; lognormal variance with pedigree 0.1001, pedigree (3,2,5,1,3)
- COD, Chemical Oxygen Demand [water, surface water]: 0.0024175 kg; lognormal variance with pedigree 1.37, pedigree (1,1,5,1,1)
  reported values
- Zinc, ion [water, surface water]: 1.7577e-5 kg; lognormal variance with pedigree 1.37, pedigree (1,1,5,1,1)
  reported values
- Arsenic [air, non-urban air or from high stacks]: 1.0861e-7 kg; lognormal variance with pedigree 0.1001, pedigree (3,2,5,1,3)
- Lead [air, non-urban air or from high stacks]: 1.0102e-6 kg; lognormal variance with pedigree 0.1001, pedigree (3,2,5,1,3)
- Sulfate [water, surface water]: 0.54657 kg; lognormal variance with pedigree 1.37, pedigree (1,1,5,1,1)
  reported values
- Chromium [air, non-urban air or from high stacks]: 7.2409e-6 kg; lognormal variance with pedigree 0.1001, pedigree (3,2,5,1,3)
- Arsenic, ion [water, surface water]: 6.8321e-7 kg; lognormal variance with pedigree 1.37, pedigree (1,1,5,1,1)
  reported values
- Cyanide [water, surface water]: 0.0006073 kg; lognormal variance with pedigree 0.1682, pedigree (4,2,5,3,4)
- Particulates, > 2.5 um, and < 10um [air, non-urban air or from high stacks]: 0.031942 kg; lognormal variance with pedigree 0.5521, pedigree (3,2,5,1,5)
- Beryllium [air, non-urban air or from high stacks]: 1.8803e-7 kg; lognormal variance with pedigree 0.1001, pedigree (3,2,5,1,3)
- Fluorine [air, non-urban air or from high stacks]: 6.8905e-5 kg; lognormal variance with pedigree 0.1001, pedigree (3,2,5,1,3)
- Particulates, < 2.5 um [air, non-urban air or from high stacks]: 0.03673 kg; lognormal variance with pedigree 0.3721, pedigree (3,2,5,1,5)
- TOC, Total Organic Carbon [water, surface water]: 0.00094599 kg; lognormal variance with pedigree 1.37, pedigree (1,1,5,1,1)
  reported values
- DOC, Dissolved Organic Carbon [water, surface water]: 0.00094599 kg; lognormal variance with pedigree 1.37, pedigree (1,1,5,1,1)
  reported values
- Cadmium, ion [water, surface water]: 7.3577e-8 kg; lognormal variance with pedigree 1.37, pedigree (1,1,5,1,1)
  reported values
- Lead [water, surface water]: 6.4818e-7 kg; lognormal variance with pedigree 1.37, pedigree (1,1,5,1,1)
  reported values
- Particulates, > 10 um [air, non-urban air or from high stacks]: 0.0035504 kg; lognormal variance with pedigree 0.3721, pedigree (3,2,5,1,5)
- Carbon disulfide [air, non-urban air or from high stacks]: 0.015708 kg; lognormal variance with pedigree 0.2501, pedigree (4,2,5,5,4)
- Aluminium [water, surface water]: 2.0029e-5 kg; lognormal variance with pedigree 1.37, pedigree (1,1,5,1,1)
  reported values
- Carbon dioxide, fossil [air, non-urban air or from high stacks]: 0.087007 kg; lognormal variance with pedigree 0.3326, pedigree (5,3,5,5,5)
- Zinc [air, non-urban air or from high stacks]: 1.3723e-5 kg; lognormal variance with pedigree 0.1001, pedigree (3,2,5,1,3)
- Iron, ion [water, surface water]: 6.7153e-5 kg; lognormal variance with pedigree 1.37, pedigree (1,1,5,1,1)
  reported values
- Nickel [air, non-urban air or from high stacks]: 5.781e-6 kg; lognormal variance with pedigree 0.1001, pedigree (3,2,5,1,3)
- Cobalt [water, surface water]: 1.8102e-7 kg; lognormal variance with pedigree 1.37, pedigree (1,1,5,1,1)
  reported values
- Copper, ion [water, surface water]: 1.8336e-6 kg; lognormal variance with pedigree 1.37, pedigree (1,1,5,1,1)
  reported values
- Antimony [air, non-urban air or from high stacks]: 1.4423e-8 kg; lognormal variance with pedigree 0.1001, pedigree (3,2,5,1,3)
- Chromium, ion [water, surface water]: 1.2672e-7 kg; lognormal variance with pedigree 1.37, pedigree (1,1,5,1,1)
  reported values
- Calcium, ion [water, surface water]: 0.15883 kg; lognormal variance with pedigree 1.37, pedigree (1,1,5,1,1)
  reported values
- BOD5, Biological Oxygen Demand [water, surface water]: 0.0024175 kg; lognormal variance with pedigree 1.37, pedigree (1,1,5,1,1)
  reported values
- Manganese [water, surface water]: 5.7226e-6 kg; lognormal variance with pedigree 1.37, pedigree (1,1,5,1,1)
  reported values

## Sampling procedure
literature

## Extrapolations
This dataset has been extrapolated from year 2003 to the year of the calculation (2021). The uncertainty has been adjusted accordingly.
