# light commercial vehicle production

Dataset: EcoSpold 2, unit process
Geography: RoW
Time period: 1990-01-01 to 2021-12-31
Technology level: current
Classification: ISIC rev.4 ecoinvent: 2910:Manufacture of motor vehicles
Classification: EcoSpold01Categories: transport systems/road
Scenario: Business-as-Usual
System model: Allocation, cut-off by classification
Generated by: Michael Spielmann (obsolete)
Published in: Spielmann M. 2007
Database: ecoinvent
isCopyrightProtected: true
accessRestrictedTo: 1

## General comment
Based on "light commercial vehicle production, RER 2000". The values refer to the production of one average van. Environmental interventions in the vehicle production are derived from the production of the Golf A4. Disposal is included too.

## Included activities end
The inventory includes processes of material, energy and water use in vehicle manufacturing. Rail and road transport of materials is accounted for. Plant infrastructure is included, addressing issues such as land use, building, road and parking construction. The disposal of the vehicle is as well accounted for.

## Geography
Extrapolated from "light commercial vehicle production, RER 2000". Vehicle production data are taken from an LCI analysis of the Golf A4. Data for the vehicle disposal reflect the Swiss situation.

## Technology
Current production technology, environmental issues have been addressed in the past.

## Time period
The material consumption reflect a modern vehicle. For vehicle manufacturing data for the manufacturing of a passenger car has been employed as an first estimate.

## Parameters
- fraction, process water, to air: 0.15 dimensionless; name fraction_PW_to_air; lognormal variance with pedigree 0.092025, pedigree (4,4,3,2,4)
  Literature value. In case when no industry/process specific data are available, default evaporation fraction value is used. This value is 15% and is based on literature (Statistics Canada, 2007 & Shaffer, K.H., 2008, Consumptive water use in the Great Lakes Basin, USGS & Shiklomanov, 2003, World Water Resources at the Beginning of the 21st Century) and has been approved by an expert.
- fraction, tap water, to air: 0.15 dimensionless; name fraction_TW_to_air; = fraction_PW_to_air; lognormal variance with pedigree 0.092025, pedigree (4,4,3,2,4)
  Calculated value. See comment in the other parametres present in this dataset. Tap water is considered to be always used as process water, thus process water fractions to air are applied to all tap water input flows to calculate the amount of water consumed in the processes.

## Reference product
- light commercial vehicle: 1 unit; name RP_amount_1; CPC 49114: Motor vehicles n.e.c. for the transport of goods; By-product classification allocatable product
  EcoSpold01Location=RER
  production volume 2.67763 unit; name RP_PV_1
    This is a placeholder value that does not reflect real-world production volumes. This dataset does not currently require a real-world production volume to work in the database framework, and no actual data were collected yet. This has no negative effect on the results of the ecoinvent database.
  property price 14413 EUR2005
    Calculated based on literature value (UN Commodity Trade Statistics Database) using data on trade value and net weight (kg) for 5 reference countries/regions (RER, USA, JP, CN and IN) which average is assumed to be a good approximation of the global price. The UN classification; 8703 Motor cars and other motor vehicles principally designed for the transport of persons, including station wagons and racing cars. The weight of the car is estimated to be 1.3 tonnes.
  property carbon content 0
    carbon content on a dry matter basis (reserved; not for manual entry)
  properties: water in wet mass 0 kg, dry mass 0 kg, wet mass 0 kg, carbon content, non-fossil 0, carbon content, fossil 0, water content 0, carbon allocation 0 kg

## Inputs from technosphere
- aluminium, wrought alloy: 57.12 kg; = 0.68*84; lognormal variance with pedigree 0.0532, pedigree (2,3,5,5,1)
  84 kg aluminium, production mix.
  0.68: part of aluminium, wrought alloy in aluminium, production mix. Based on the aluminium, production mix in ecoinvent v2.2.
  Uncertainty: literature study
  properties: wet mass 1 kg, dry mass 1 kg
- heat, district or industrial, other than natural gas: 0 MJ; pedigree (1,1,1,1,1)
  EcoSpold01Location=RER
  Uncertainty: LCI of one passenger car
  properties: heating value, net 1 MJ
- chromium: 2.4 kg; lognormal variance with pedigree 0.0532, pedigree (2,3,5,5,1)
  EcoSpold01Location=RER
  Uncertainty: LCI of one passenger car
  properties: dry mass 1 kg, wet mass 1 kg
- polyvinylchloride, suspension polymerised: 13.9574 kg; lognormal variance with pedigree 0.0532, pedigree (2,3,5,5,1)
  EcoSpold01Location=RER
  Literature value. The original value in this dataset (1.78 kg) was replaced by a new value (13.957kg) from the regional (RER) dataset.
  Uncertainty: LCI of one passenger car
  properties: heating value, net 21.5 MJ, wet mass 1 kg, dry mass 1 kg, carbon content, fossil 0.387097
  note on carbon content, fossil: Monomer is vynyl chloride, C2H3Cl (ecoinvent v2.2 report 11_II). MW=62 g/mol
- nickel, class 1: 1.4 kg; lognormal variance with pedigree 0.0532, pedigree (2,3,5,5,1)
  EcoSpold01Location=GLO
  Uncertainty: literature study
  properties: wet mass 1 kg, dry mass 1 kg
- ethylene glycol: 4.8 kg; lognormal variance with pedigree 0.0552, pedigree (2,4,5,5,2)
  EcoSpold01Location=RER
  Uncertainty: LCI of one passenger car
  properties: heating value, net 23.44 MJ, dry mass 1 kg, wet mass 1 kg, carbon content, fossil 0.387097
- copper, cathode: 27 kg; lognormal variance with pedigree 0.0532, pedigree (2,3,5,5,1)
  EcoSpold01Location=RER
  Uncertainty: literature study
  properties: wet mass 1 kg, dry mass 1 kg
- wire drawing, copper: 1220 kg; lognormal variance with pedigree 0.052, pedigree (1,1,5,5,1)
  literature study
  EcoSpold01Location=RER
- synthetic rubber: 72 kg; lognormal variance with pedigree 0.0532, pedigree (2,3,5,5,1)
  EcoSpold01Location=RER
  Uncertainty: literature study
  properties: dry mass 1 kg, wet mass 1 kg, carbon content, fossil 0.871949, heating value, net 26.42 MJ
  note on carbon content, fossil: EPDM (Ethylene-propene-diene terpolymer) rubber is a terpolymer of ethylene, propene, and a diene with the residual unsaturated portion of the diene in the side chain (ecoinvent v2.2 report 7-part XX & Ullmann). Chemical formula (deduced from Evidences of Solvent-Induced Miscibility in Polychloroprene-co-Ethylene-Propene Diene Terpolymer Blends, Dubey et al., Journal of Applied Polymer Science, 2009, 111:1884–1891): C20H35
- steel, low-alloyed, hot rolled: 1040 kg; lognormal variance with pedigree 0.052, pedigree (1,1,5,5,1)
  EcoSpold01Location=RER
  literatur study
  properties: wet mass 1 kg, dry mass 1 kg, carbon content, fossil 0.005
  note on carbon content, fossil: Low alloyed steel composition given in Tab. 3.2 ecoinvent v2.2 report 10_partII. Steel assumed to have a C content of 0.5%
- ethylene: 0 kg; pedigree (1,1,1,1,1)
  EcoSpold01Location=RER
  Uncertainty: LCI of one passenger car
  properties: wet mass 1 kg, carbon content, fossil 0.857143, dry mass 1 kg, heating value, net 43.22 MJ
- road vehicle factory: 2.91e-7 unit; lognormal variance with pedigree 0.424, pedigree (5,4,5,5,1)
  EcoSpold01Location=RER
  Uncertainty: environmental report and own calculations
- polyvinylchloride, emulsion polymerised: 2.04256 kg
  Literature value. This exchange was added during the update of the dataset in order to reflex the changes in the regional dataset.
  properties: carbon content, fossil 0.387097, wet mass 1 kg, heating value, net 21.5 MJ, dry mass 1 kg
- flat glass, uncoated: 45 kg; lognormal variance with pedigree 0.0532, pedigree (2,3,5,5,1)
  EcoSpold01Location=RER
  Uncertainty: literature study
  properties: wet mass 1 kg, dry mass 1 kg
- used light commercial vehicle: -1 unit; name BP_amount_1; lognormal variance with pedigree 0.344, pedigree (3,1,5,5,1)
  Uncertainty: own calculations
  production volume 2.67763 unit; = RP_PV_1 * (BP_amount_1 / RP_amount_1)
    Calculated from production volume of reference product using the relative outputs.
  property price 0 EUR2005; name BP_amount_1_price_EUR2005
  property carbon content, fossil 0.104049; name C_content_fossil
  property dry mass 2500 kg; name DM
  property carbon content, non-fossil 0.00156582; name C_content_non_fossil
  property wet mass 2500 kg; name WM
  property water in wet mass 0 kg; name WWM
  property water content 0; name water_content
- polypropylene, granulate: 49 kg; lognormal variance with pedigree 0.0532, pedigree (2,3,5,5,1)
  EcoSpold01Location=RER
  Uncertainty: LCI of one passenger car
  properties: carbon content, fossil 0.857143, wet mass 1 kg, dry mass 1 kg, heating value, net 32.78 MJ
  note on carbon content, fossil: Polypropylene is formed by the polymerisation of propylene, C3H6 (ecoinvent v2.2 report 11_II)
  note on heating value, net: Value extracted from "treatment of waste polypropylene, open burning"
- reinforcing steel: 117 kg; lognormal variance with pedigree 0.052, pedigree (1,1,5,5,1)
  EcoSpold01Location=RER
  literature study
  properties: dry mass 1 kg, carbon content, fossil 0.004, wet mass 1 kg
- tap water: 0 kg; name tap_water_input; pedigree (1,1,1,1,1)
  EcoSpold01Location=RER
  Uncertainty: LCI of one passenger car
  properties: water content 2962.17, carbon content, fossil 0.00178991, wet mass 1 kg, dry mass 0.000337476 kg
  note on carbon content, fossil: Bicarbonate content is 2.93 mol/m3. CO2 content is 0.1 mol/m3 (ecoinvent v2.2 report 8, Tab 93.1).
- sulfuric acid: 0.8 kg; lognormal variance with pedigree 0.0552, pedigree (2,4,5,5,2)
  EcoSpold01Location=RER
  Uncertainty: LCI of one passenger car
  properties: dry mass 1 kg, wet mass 1 kg
- heat, district or industrial, natural gas: 0 MJ; pedigree (1,1,1,1,1)
  EcoSpold01Location=RER
  Uncertainty: LCI of one passenger car
  properties: heating value, net 1 MJ
- electricity, medium voltage: 0 kWh; pedigree (1,1,1,1,1)
  EcoSpold01Location=UCTE
  Uncertainty: LCI of one passenger car
- lead: 13 kg; lognormal variance with pedigree 0.0552, pedigree (2,4,5,5,2)
  EcoSpold01Location=RER
  Uncertainty: LCI of one passenger car
  properties: wet mass 1 kg, dry mass 1 kg
- alkyd paint, white, without solvent, in 60% solution state: 12 kg; lognormal variance with pedigree 0.0532, pedigree (2,3,5,5,1)
  EcoSpold01Location=RER
  Uncertainty: literature study
  properties: heating value, net 10.3 MJ, carbon content, fossil 0.140367, carbon content, non-fossil 0.199629, wet mass 1 kg, dry mass 1 kg
  note on carbon content, fossil: C content was calculated as an addition of C content in the raw materials.
- polyethylene, high density, granulate: 27 kg; lognormal variance with pedigree 0.0532, pedigree (2,3,5,5,1)
  EcoSpold01Location=RER
  Uncertainty: literature study
  properties: dry mass 1 kg, carbon content, fossil 0.857143, wet mass 1 kg, heating value, net 42.47 MJ
  note on carbon content, fossil: Polyethylene is formed out of a huge amount of ethylene monomers (C2H4) (ecoinvent v2.2 report 11_II). MW=28 g/mol
- section bar rolling, steel: 347 kg; lognormal variance with pedigree 0.052, pedigree (1,1,5,5,1)
  EcoSpold01Location=RER
  literature study
- sheet rolling, steel: 810 kg; lognormal variance with pedigree 0.052, pedigree (1,1,5,5,1)
  literature study
  EcoSpold01Location=RER
- aluminium, cast alloy: 26.88 kg; = 0.32*84; lognormal variance with pedigree 0.0532, pedigree (2,3,5,5,1)
  84 kg aluminium, production mix.
  0.32: part of aluminium cast alloy in aluminium, production mix. Based on the aluminium, production mix in ecoinvent v2.2.
  Uncertainty: literature study
  properties: dry mass 1 kg, wet mass 1 kg
- heat, district or industrial, other than natural gas: 0.0242599, 59.8257 MJ (2 entries); lognormal variance with pedigree 0.0552, pedigree (2,4,5,5,2)
  EcoSpold01Location=RER
  Uncertainty: LCI of one passenger car
- ethylene: 0.292141, 18.2079 kg (2 entries); lognormal variance with pedigree 0.0552, pedigree (2,4,5,5,2)
  EcoSpold01Location=RER
  Uncertainty: LCI of one passenger car
- tap water: 50.1226, 6.03341, 9.97121, 251.434, 6.541, 18.6058, 2877.29 kg (7 entries); lognormal variance with pedigree 0.0552, pedigree (2,4,5,5,2)
  EcoSpold01Location=RER
  Uncertainty: LCI of one passenger car
- heat, district or industrial, natural gas: 33.6956, 2186.3 MJ (2 entries); lognormal variance with pedigree 0.0552, pedigree (2,4,5,5,2)
  EcoSpold01Location=RER
  Uncertainty: LCI of one passenger car
- electricity, medium voltage: 26.9751, 5.17266, 86.8383, 1262.99, 178.018, 580.011 kWh (6 entries); lognormal variance with pedigree 0.0552, pedigree (2,4,5,5,2)
  EcoSpold01Location=UCTE
  Uncertainty: LCI of one passenger car

## Emissions to nature
- TOC, Total Organic Carbon [water, surface water]: 0.0714815 kg; lognormal variance with pedigree 0.0946, pedigree (2,4,5,5,1)
  Calculated by default as TOC (gC) = COD/2.7 (COD measured in g O2). Should more correctly be calculated from the carbon content of the specified emissions to water.
  Uncertainty: LCI of one passenger car
- Water [air, unspecified]: 0.483 m3; name water_to_air_unspecified; = (tap_water_input/1000*fraction_TW_to_air); lognormal variance with pedigree 1.21, pedigree (5,5,5,5,5)
  Calculated value based on literature values and expert opinion. See comments in the parametres' comment field.
  Exchange added in order to reflect changes in the regional (RER) dataset.
  Calculated value based on literature values and expert opinion. See comments in the parametres' comment field.
  Exchange added in order to reflect changes in the regional (RER) dataset.
  property fraction, origin: unspecified 0; name fraction_origin_unspecified
  property fraction, origin: salt water 0; name fraction_origin_salt_water
  property fraction, origin: fresh water 1; name fraction_origin_fresh_water
- Water [water, unspecified]: 2.737 m3; name water_to_water_unspecified; = (tap_water_input/1000)*(1-fraction_TW_to_air); lognormal variance with pedigree 1.21, pedigree (5,5,5,5,5)
  (same comment as for Water)
  property fraction, origin: unspecified 0; name fraction_origin_unspecified_Ww
  property fraction, origin: salt water 0; name fraction_origin_salt_water_Ww
  property fraction, origin: fresh water 1; name fraction_origin_fresh_water_Ww
- NMVOC, non-methane volatile organic compounds, unspecified origin [air, unspecified]: 4.8 kg; lognormal variance with pedigree 0.0946, pedigree (2,4,5,5,1)
  Uncertainty: LCI of one passenger car
- BOD5, Biological Oxygen Demand [water, surface water]: 0.026 kg; lognormal variance with pedigree 0.0946, pedigree (2,4,5,5,1)
  Uncertainty: LCI of one passenger car
- COD, Chemical Oxygen Demand [water, surface water]: 0.193 kg; lognormal variance with pedigree 0.0946, pedigree (2,4,5,5,1)
  Uncertainty: LCI of one passenger car
- DOC, Dissolved Organic Carbon [water, surface water]: 0.0714815 kg; lognormal variance with pedigree 0.0946, pedigree (2,4,5,5,1)
  Calculated as equal to TOC.
  Uncertainty: LCI of one passenger car
- Phosphate [water, surface water]: 0.001 kg; lognormal variance with pedigree 0.0946, pedigree (2,4,5,5,1)
  Uncertainty: LCI of one passenger car

## Sampling procedure
Data for material consumption is based on expert estimates. Manufacturing data is based on an LCI study of one passenger car.

## Extrapolations
Production data for one German passenger car type is used as an first estimate for Europe This dataset has been copied from an original dataset covering the geography RER. The uncertainty has been adjusted accordingly.

## Review by Carl Vadenbo 2012-06-28
In preparation for the release of ecoinvent v3.0, the output of used light commercial vehicle was removed from the 'transport, van <3.5t' datasets and added to 'production, van <3.5t RER' in ecoinvent v2.2 which was renamed and extrapolated to 'light commercial vehicle production, GLO 1990-2000'. The added exchange of by-product/waste was reviewed and the new dataset was accepted for inclusion into the ecoinvent database on 2012.07.05.

## Review by Niels Jungbluth 2003-08-27
passed.
