# Sohio process

Dataset: EcoSpold 2, unit process
Geography: RER
Time period: 1989-01-01 to 2021-12-31
Technology level: current
Classification: ISIC rev.4 ecoinvent: 2011:Manufacture of basic chemicals
Classification: EcoSpold01Categories: chemicals/organics
Tags: ConvertedDataset
Scenario: Business-as-Usual
System model: Allocation, cut-off by classification
Share of production covered: 100 %
Generated by: Jürgen Sutter
Published in: Sutter, J. 2007
Database: ecoinvent
isCopyrightProtected: true
accessRestrictedTo: 1

## General comment
This dataset represents the multioutput-process "Sohio propylene ammoxidation." The process delivers the co-products acrylonitrile, hydrogen cyanide, and acetonitrile from 1 kg of propylene. The raw materials and energy consumptions are modelled with literature data. The emissions are estimated. Infrastructure is included with a default value.
[This dataset was already contained in the ecoinvent database version 2. It was not individually updated during the transfer to ecoinvent version 3. Life Cycle Impact Assessment results may still have changed, as they are affected by changes in the supply chain, i.e. in other datasets. This dataset was generated following the ecoinvent quality guidelines for version 2. It may have been subject to central changes described in the ecoinvent version 3 change report (http://www.ecoinvent.org/database/ecoinvent-version-3/reports-of-changes/), and the results of the central updates were reviewed extensively. The changes added e.g. consistent water flows and other information throughout the database. The documentation of this dataset can be found in the ecoinvent reports of version 2, which are still available via the ecoinvent website. The change report linked above covers all central changes that were made during the conversion process.]

## Included activities start
From the reception of propylene at the factory gate.

## Included activities end
This activity ends with the production of acrylonitrile, hydrogen cyanide and acetonitrile based off of the ammoxidation of 1 kg of propylene. This dataset includes the input materials, energy uses, infrastructure and emissions.

## Geography
The inventory is modelled for Europe.

## Technology
In the Sohio process propene, oxygen (as air), and ammonia are catalytically converted directly to acrylonitrile using a fluidized-bed reactor operated at temperatures of 400 – 500 °C and gauge pressures of 30 – 200 kPa (0.3 – 2 bar):
Approximately stoichometric amounts of the starting materials are passed through the reactor with residence times of a few seconds. The process is highly selective, requiring no recycling to produce high acrylonitrile yields of approximately 0.8 – 0.9 kg from 1 kg of propene. Acetonitrile (0.02 – 0.11 kg) and hydrogen cyanide (HCN, 0.15 – 0.20 kg) are the principal byproducts (from 1 kg propene). The heat of reaction can be recovered as high-pressure steam.
The catalyst used in the early Sohio process was a bismuth – phosphomolybdate combination. Since that time there has been a continuous search for alternatives and for superior performance, resulting in patents by more than 30 companies. Sohio introduced Catalyst 21 (antimony – uranium) in 1967, Catalyst 41 (ferrobismuth – phosphomolybdate) in 1972, and Catalyst 49 (undisclosed) in 1978. All of these changes were aimed at improved efficiency and reduction in byproducts.
Simplified diagram of the Sohio acrylonitrile process. a) Fluidized-bed reactor; b) Absorber column; c) Extractive distillation column; d) Acetonitrile stripping column; e) Lights fractionation column; f) Product column
The reactor effluent is cooled and scrubbed with water in a countercurrent absorber. The off-gas, consisting primarily of nitrogen, is vented. The reaction products remain in the aqueous phase. Acetonitrile is removed by extractive distillation. Crude acrylonitrile and hydrogen cyanide are distilled overhead while water and acetonitrile are removed from the bottom of the columns. In subsequent distillations, hydrogen cyanide is separated from wet acrylonitrile, the water content of the product is then reduced, and finally, nonvolatile impurities are removed.
Unused ammonia can be recovered as ammonium sulfate and then disposed of, but it commonly is vented to the atmosphere. Aqueous wastes containing cyanides, sulfates, and various organic byproducts must be disposed of by incineration or deepwell injection or be pretreated for subsequent biological waste treatment
Reference:
Lollak, P., Romeder, G., Hagedorn, F., Gelbke, H.: Nitriles. In: Ullmann's Ency-clopedia of Industrial Chemistry, Seventh Edition, 2004 Electronic Release (ed. Fiedler E., Grossmann G., Kersebohm D., Weiss G. and Witte C.). 7 th Electronic Release Edition. Wiley InterScience, New York, Online-Version under: http://www.mrw.interscience.wiley.com/ueic/articles/

## Time period
Time of publications.

## Parameters
- fraction, process water, to air: 0.205 dimensionless; name fraction_PW_to_air; lognormal variance with pedigree 0.092025, pedigree (4,4,3,2,4)
  Literature value (Statistics Canada, 2007 & Shaffer, K.H., 2008, Consumptive water use in the Great Lakes Basin, USGS) (Vionnet, S., Quantis Water Database - Technical Report, 2012).
- fraction, cooling water, once-through system, to air: 0.004 dimensionless; name fraction_CW_OT_to_air; lognormal variance with pedigree 0.0413, pedigree (2,3,1,3,1)
  Calculated based on literature value (Scown, C.D., 2011, Water Footprint of U.S. Transportation Fuels and supplying information of the article) (Vionnet, S., Quantis Water Database - Technical Report, 2012).
- fraction, cooling water, to air: 0.3875 dimensionless; name fraction_CW_to_air; = (0.5*fraction_CW_OT_to_air)+(0.5*fraction_CW_R_to_air); lognormal variance with pedigree 0.092025, pedigree (4,4,3,2,4)
  Calculated value based on literature value (see comments of the other parametres present in this dataset) and expert opinion. In the case when no industry/literature data are available about the type of cooling or directly fraction, cooling water, to air specific for the process a default assumption is applied. It is assumed that the once-through cooling system is used in 50% of all cases and recirculating system is used in another 50% of all cases.
- fraction, water, deionised, to air: 0.205 dimensionless; name fraction_WDI_to_air; = fraction_PW_to_air; lognormal variance with pedigree 0.092025, pedigree (4,4,3,2,4)
  Calculated value. See comment in the other parametres present in this dataset. Deionised water is considered to be always used as process water, thus process water fractions to air are applied to all deionised water input flows to calculate the amount of water consumed in the processes.
- fraction, cooling water, recirculating system, to air: 0.771 dimensionless; name fraction_CW_R_to_air; lognormal variance with pedigree 0.0413, pedigree (2,3,1,3,1)
  (same comment as for fraction, cooling water, once-through system, to air)
- fraction, cooling water, cooling pond system, to air: 0.032 dimensionless; name fraction_CW_CP_to_air; lognormal variance with pedigree 0.0413, pedigree (2,3,1,3,1)
  (same comment as for fraction, cooling water, once-through system, to air)

## Reference product
- acrylonitrile: 0 kg; By-product classification allocatable product; CPC 34150: Amine-function compounds; oxygen-function amino-compounds, except lysine and its esters and salts thereof and […]; CAS 107-13-1
  EcoSpold01Location=RER
  Acrylonitrile s a colorless liquid with a slightly pungent odor. It is miscible with numerous organic solvents, including acetone, benzene, carbon tetrachloride, diethyl ether, ethyl acetate, ethylene cyanohydrin, petroleum ether, toluene, some kerosenes,
  Acrylic textile fibers are by far the largest end-use product for acrylonitrile. Acrylic fibers find use primarily in wearing apparel and in home furnishings such as carpets and draperies.
  production volume 1.2e9 kg
    Na
    Estimated from PCI Acrylonitrile Supply Demand Report 2009 B.pdf
  property heating value, net 27.43 MJ
    LHV is calculated based on the elemental composition of the substance. Based on the CAS number of the substance (000107-13-1), the chemical formula of the substance is found to be: C3H3N, (PubChem 2020).
    Reference: Kim, S., Chen, J., Cheng, T., Gindulyte, A., He, J., He, S., Li, Q., Shoemaker, B. A., Thiessen, P. A., Yu, B., Zaslavsky, L., Zhang, J., & Bolton, E. E. (2019). PubChem 2019 update: improved access to chemical data. Nucleic acids research, 47(D1), D1102–D1109. https://doi.org/10.1093/nar/gky1033
  property price 0.714 EUR2005
    Temporary price data. Calculated as 90% of purchasers price based on: 2004 import and export prices (total trades (USD) divided by total weight (kg) in EU27, USA, China, Japan and India) from UN Commodity Trade Statistics Database (http://data.un.org/Explorer.aspxDatabase [Accessed 2 July 2010]). Commodity: Acrylonitrile
  property carbon content 0.679245
    carbon content on a dry matter basis (reserved; not for manual entry)
  property true value 0.604865
    allocation property applied in "true value" allocation // value calculated from revenue
  properties: EcoSpold01Allocation_undefined_25 77.51, EcoSpold01Allocation_undefined_26 77.51, carbon content, fossil 0.679245, water in wet mass 0 kg, carbon content, non-fossil 0, wet mass 1 kg, water content 0, dry mass 1 kg, EcoSpold01Allocation_undefined_22 77.51, EcoSpold01Allocation_undefined_5 77.51, EcoSpold01Allocation_undefined_6 77.51, EcoSpold01Allocation_undefined_7 77.51, EcoSpold01Allocation_undefined_21 77.51, EcoSpold01Allocation_undefined_2 77.51, EcoSpold01Allocation_undefined_23 100, EcoSpold01Allocation_undefined_18 77.51, EcoSpold01Allocation_undefined_14 77.51, EcoSpold01Allocation_undefined_15 77.51, EcoSpold01Allocation_undefined_3 77.51, EcoSpold01Allocation_undefined_4 77.51, EcoSpold01Allocation_undefined_10 77.51, EcoSpold01Allocation_undefined_12 77.51, EcoSpold01Allocation_undefined_19 77.51, EcoSpold01Allocation_undefined_9 77.51, EcoSpold01Allocation_undefined_8 77.51, EcoSpold01Allocation_undefined_13 77.51, EcoSpold01Allocation_undefined_16 77.51, EcoSpold01Allocation_undefined_20 77.51, EcoSpold01Allocation_undefined_17 77.51, EcoSpold01Allocation_undefined_11 77.51, carbon allocation 0.679245 kg
- hydrogen cyanide: 1 kg; CPC 341: Basic organic chemicals; By-product classification allocatable product; CAS 74-90-8
  EcoSpold01Location=RER
  production volume 2.04e8 kg
    Na
    Calculated relative to main output (acrylonitrile)
  property heating value, net 17.95 MJ
    LHV is calculated based on the elemental composition of the substance. Based on the CAS number of the substance (000074-90-8), the chemical formula of the substance is found to be: CHN, (PubChem 2020).
    Reference: Kim, S., Chen, J., Cheng, T., Gindulyte, A., He, J., He, S., Li, Q., Shoemaker, B. A., Thiessen, P. A., Yu, B., Zaslavsky, L., Zhang, J., & Bolton, E. E. (2019). PubChem 2019 update: improved access to chemical data. Nucleic acids research, 47(D1), D1102–D1109. https://doi.org/10.1093/nar/gky1033
  property price 0.73 EUR2005
    Temporary price data. Calculated as 90% of purchasers price based on: 2004 import and export prices (total trades (USD) divided by total weight (kg) in EU27, USA, China, Japan and India) from UN Commodity Trade Statistics Database (http://data.un.org/Explorer.aspxDatabase [Accessed 2 July 2010]). Commodity: 'Cyanides and cyanide oxides of sodium'
  property carbon content 0.444444
    carbon content on a dry matter basis (reserved; not for manual entry)
  property true value 0.1052
    allocation property applied in "true value" allocation // value calculated from revenue
  properties: EcoSpold01Allocation_undefined_21 13.19, EcoSpold01Allocation_undefined_3 13.19, EcoSpold01Allocation_undefined_13 13.19, EcoSpold01Allocation_undefined_20 13.19, EcoSpold01Allocation_undefined_7 13.19, EcoSpold01Allocation_undefined_22 13.19, EcoSpold01Allocation_undefined_11 13.19, EcoSpold01Allocation_undefined_24 100, EcoSpold01Allocation_undefined_18 13.19, EcoSpold01Allocation_undefined_17 13.19, EcoSpold01Allocation_undefined_10 13.19, EcoSpold01Allocation_undefined_19 13.19, EcoSpold01Allocation_undefined_4 13.19, EcoSpold01Allocation_undefined_8 13.19, EcoSpold01Allocation_undefined_6 13.19, EcoSpold01Allocation_undefined_5 13.19, EcoSpold01Allocation_undefined_9 13.19, EcoSpold01Allocation_undefined_14 13.19, EcoSpold01Allocation_undefined_2 13.19, EcoSpold01Allocation_undefined_16 13.19, EcoSpold01Allocation_undefined_12 13.19, EcoSpold01Allocation_undefined_26 13.1849, EcoSpold01Allocation_undefined_25 13.1849, carbon content, non-fossil 0, carbon content, fossil 0.444444, water content 0, water in wet mass 0 kg, dry mass 1 kg, wet mass 1 kg, EcoSpold01Allocation_undefined_15 13.19, carbon allocation 0.444444 kg

## By-products
- acetonitrile: 0 kg; CPC 34150: Amine-function compounds; oxygen-function amino-compounds, except lysine and its esters and salts thereof and […]; By-product classification allocatable product; CAS 75-05-8
  EcoSpold01Location=RER
  Acetonitrile is a colourless liquid miscible with water, ethanol and many organic solvents but immiscible with many saturated hydrocarbons (e. g., petroleum fractions).
  In 1986 the comsumption of acetonitrile amounted to ca. 13 000 t in the United States, Western Europe, and Japan. Along with N-methylpyrrolidone and N,N-dimethylformamide, acetonitrile represents one of the major solvents for extraction of butadiene from crude C4 streams. Acetonitrile is also a valuable reaction solvent, especially in the synthesis of antibiotics. Highly purified acetonitrile finds application as a solvent in high-performance liquid chromatography.
  The major use of acetonitrile in organic synthesis is in the production of malononitrile through reaction with cyanogen chloride.
  Other applications include the synthesis of trimethyl orthoacetate and acetamidine hydrochloride. The former is used in the synthesis of 3-(2,2-dichlorovinyl)-2,2-dimethylcyclopropanecarboxylic acid (also known as DV-acid) which is a key precursor for pyrethroides. The latter yields N-containing heterocycles such as 4-amino-5-cyano-2-methylpyrimidine used in the synthesis of thiamine.
  production volume 1.44e8 kg
    Na
    Calculated relative to main output (acrylonitrile)
  property heating value, net 26.59 MJ
    LHV is calculated based on the elemental composition of the substance. Based on the CAS number of the substance (000075-05-8), the chemical formula of the substance is found to be: C2H3N, (PubChem 2020).
    Reference: Kim, S., Chen, J., Cheng, T., Gindulyte, A., He, J., He, S., Li, Q., Shoemaker, B. A., Thiessen, P. A., Yu, B., Zaslavsky, L., Zhang, J., & Bolton, E. E. (2019). PubChem 2019 update: improved access to chemical data. Nucleic acids research, 47(D1), D1102–D1109. https://doi.org/10.1093/nar/gky1033
  property price 0.968 EUR2005
    Temporary price data. Calculated as 90% of purchasers price based on: Source: 28 August 2006 issue of Chemical Market Reporter (ICIS)
  property carbon content 0.585366
    carbon content on a dry matter basis (reserved; not for manual entry)
  property true value 0.0984456
    allocation property applied in "true value" allocation // value calculated from revenue
  properties: EcoSpold01Allocation_undefined_4 9.305, EcoSpold01Allocation_undefined_18 9.305, EcoSpold01Allocation_undefined_22 9.305, EcoSpold01Allocation_undefined_17 9.305, EcoSpold01Allocation_undefined_19 9.305, EcoSpold01Allocation_undefined_6 9.305, EcoSpold01Allocation_undefined_15 9.305, EcoSpold01Allocation_undefined_8 9.305, EcoSpold01Allocation_undefined_5 9.305, EcoSpold01Allocation_undefined_26 9.30505, EcoSpold01Allocation_undefined_25 9.30505, water content 0, carbon content, non-fossil 0, water in wet mass 0 kg, dry mass 1 kg, carbon content, fossil 0.585366, wet mass 1 kg, EcoSpold01Allocation_undefined_20 9.305, EcoSpold01Allocation_undefined_16 9.305, EcoSpold01Allocation_undefined_12 9.305, EcoSpold01Allocation_undefined_3 9.305, EcoSpold01Allocation_undefined_9 9.305, EcoSpold01Allocation_undefined_13 9.305, EcoSpold01Allocation_undefined_10 9.305, EcoSpold01Allocation_undefined_1 100, EcoSpold01Allocation_undefined_21 9.305, EcoSpold01Allocation_undefined_7 9.305, EcoSpold01Allocation_undefined_11 9.305, EcoSpold01Allocation_undefined_14 9.305, EcoSpold01Allocation_undefined_2 9.305, carbon allocation 0.585366 kg

## Inputs from technosphere
- heat, district or industrial, natural gas: 1.59809 MJ; source Chauvel, A. 1989; lognormal variance with pedigree 0.0507, pedigree (1,3,5,3,1)
  Literature value.
  Uncertainty: Chauvel 1989
  properties: heating value, net 1 MJ
- electricity, medium voltage: 0.223591 kWh; source Chauvel, A. 1989; lognormal variance with pedigree 0.0507, pedigree (1,3,5,3,1)
  Literature value.
  EcoSpold01Location=UCTE
  Uncertainty: Chauvel 1989
- heat, district or industrial, other than natural gas: 0.891987 MJ; source Chauvel, A. 1989; lognormal variance with pedigree 0.0507, pedigree (1,3,5,3,1)
  Literature value.
  Uncertainty: Chauvel 1989
  properties: heating value, net 1 MJ
- chemical factory, organics: 3.94727e-10 unit; lognormal variance with pedigree 0.448, pedigree (4,5,5,5,5)
  EcoSpold01Location=RER
  Estimation. Data was estimated based on the dataset "chemical plant, organics". This module assumes a built area of about 4.2 ha, an average output of 50'000 t/a, and plant life of fifty years. The estimated value is 4.00 E-10 units per kg of produced chemical.
  Uncertainty: Estimation
- sulfuric acid: 0.0382899 kg; source Chauvel, A. 1989; lognormal variance with pedigree 0.0507, pedigree (1,3,5,3,1)
  EcoSpold01Location=RER
  Literature value.
  Uncertainty: Chauvel 1989
  properties: wet mass 1 kg, dry mass 1 kg
- ammonia, anhydrous, liquid: 0.382629 kg; source Chauvel, A. 1989; lognormal variance with pedigree 0.0507, pedigree (1,3,5,3,1)
  EcoSpold01Location=RER
  Literature value.
  Uncertainty: Chauvel 1989
  properties: dry mass 1 kg, wet mass 1 kg
- water, deionised: 0 kg; name water_deionised_input; source Chauvel, A. 1989; pedigree (1,1,1,1,1)
  Literature value.
  EcoSpold01Location=CH
  Uncertainty: Chauvel 1989
  properties: wet mass 1 kg
- propylene: 0.902894 kg; source Chauvel, A. 1989; lognormal variance with pedigree 0.0507, pedigree (1,3,5,3,1)
  EcoSpold01Location=RER
  Literature value.
  Uncertainty: Chauvel 1989
  properties: carbon content, fossil 0.857143, wet mass 1 kg, dry mass 1 kg, heating value, net 43.22 MJ
- water, deionised: 3.81526, 0.013734 kg (2 entries); source Chauvel, A. 1989; lognormal variance with pedigree 0.0507, pedigree (1,3,5,3,1)
  Literature value.
  EcoSpold01Location=CH
  Uncertainty: Chauvel 1989

## Inputs from nature
- Water, cooling, unspecified natural origin [natural resource, in water]: 0.0306045 m3; name water_cooling_UNO_input; source Chauvel, A. 1989; lognormal variance with pedigree 0.0507, pedigree (1,3,5,3,1)
  Literature value.
  Uncertainty: Chauvel 1989

## Emissions to nature
- Propene [water, surface water]: 0.0133267 kg; lognormal variance with pedigree 0.448, pedigree (4,5,5,5,5)
  Estimation. The remaining amount of unreacted ammonia and propylene was assumed to leave the production process with the waste water.
  It is assumed that the manufacturing plants are located in an urban/industrial area and consequently the emissions are categorized as emanating in a high population density area. The emissions into water are assumed to be emitted into rivers.
  Uncertainty: Estimation
- Propene [air, urban air close to ground]: 3.33168e-5 kg; lognormal variance with pedigree 0.188, pedigree (4,5,5,5,5)
  Estimation. Air emissions occurring from the purge vent, the distillation vent and fugitive emission sources were estimated as 20% of the unreacted ammonia and 20% of the unreacted propylene. The propylene emissions are incinerated with a assumed destruction efficiency of 99,9 %.
  It is assumed that the manufacturing plants are located in an urban/industrial area and consequently the emissions are categorised as emanating in a high population density area.
  Uncertainty: Estimation
- Water [water, unspecified]: 0.0217893 m3; name water_to_water_unspecified; = (water_deionised_input/1000)*(1-fraction_WDI_to_air)+water_cooling_UNO_input*(1-fraction_CW_to_air); lognormal variance with pedigree 0.0807, pedigree (2,2,5,1,1)
  Calculated value based on literature values and expert opinion. See comments in the parametres' comment field.
  property dry mass 0 kg; name DM
  property carbon content, non-fossil 0; name C_content_non_fossil
  property water in wet mass 1000 kg; name WWM
  property wet mass 1000 kg; name WM
  property carbon content, fossil 0; name C_content_fossil
  property fraction, origin: unspecified 0.860296; name fraction_origin_unspecified_Ww
  property fraction, origin: fresh water 0.139704; name fraction_origin_fresh_water_Ww
  property fraction, origin: salt water 0; name fraction_origin_salt_water_Ww
- Water [air, unspecified]: 0.0126442 m3; name water_to_air_unspecified; = (water_deionised_input/1000*fraction_WDI_to_air)+(water_cooling_UNO_input*fraction_CW_to_air); lognormal variance with pedigree 0.0807, pedigree (2,2,5,1,1)
  (same comment as for Water)
  property fraction, origin: fresh water 0.0620794; name fraction_origin_fresh_water
  property fraction, origin: salt water 0; name fraction_origin_salt_water
  property fraction, origin: unspecified 0.937921; name fraction_origin_unspecified
- Carbon dioxide, fossil [air, urban air close to ground]: 0.481568 kg; lognormal variance with pedigree 0.1786, pedigree (4,5,5,5,5)
  Estimation. Air emissions occurring from the purge vent, the distillation vent and fugitive emission sources were estimated to 20% of the raw material input. The propylene emissions are incinerated with an assumed destruction efficiency of 99.9% and are account for as CO2 emissions.
  The carbon contained in the removed propylene during waste water treatment was accounted as CO2 emissions to air.
  It is assumed that the manufacturing plants are located in an urban/industrial area and consequently the emissions are categorised as emanating in a high population density area.
  Uncertainty: Calculated from the water treatment
- Ammonia [air, urban air close to ground]: 0.0034579 kg; source INECE 2005; lognormal variance with pedigree 0.218, pedigree (4,5,5,5,5)
  Estimation. Air emissions occurring from the purge vent, the distillation vent and fugitive emission sources were estimated as 20% of the unreacted ammonia and 20% of the unreacted propylene.
  It is assumed that the manufacturing plants are located in an urban/industrial area and consequently the emissions are categorised as emanating in a high population density area.
  Uncertainty: Estimation
- TOC, Total Organic Carbon [water, surface water]: 0.0118279 kg; lognormal variance with pedigree 0.188, pedigree (4,5,5,5,5)
  Calculation. This data was calculated from the amount of ammonia and propylene in the treated waste water assuming a carbon conversion of 96% for COD and the worst case scenario: TOC=DOC.
  It is assumed that the manufacturing plants are located in an urban/industrial area and consequently the emissions are categorized as emanating in a high population density area. The emissions into water are assumed to be emitted into rivers.
  Uncertainty: Calculated from the water emissions
- COD, Chemical Oxygen Demand [water, surface water]: 0.0394565 kg; lognormal variance with pedigree 0.188, pedigree (4,5,5,5,5)
  Calculation. This data was calculated from the amount of ammonia and propylene in the treated waste water assuming a carbon conversion of 96% for COD and the worst case scenario: BOD=COD.
  It is assumed that the manufacturing plants are located in an urban/industrial area and consequently the emissions are categorized as emanating in a high population density area. The emissions into water are assumed to be emitted into rivers.
  Uncertainty: Calculated from the water emissions
- BOD5, Biological Oxygen Demand [water, surface water]: 0.0394565 kg; lognormal variance with pedigree 0.188, pedigree (4,5,5,5,5)
  Calculation. This data was calculated from the amount of unreacted ammonia and propylene in the treated waste water assuming a carbon conversion of 96% for COD and the worst case scenario: BOD=COD.
  It is assumed that the manufacturing plants are located in an urban/industrial area and consequently the emissions are categorized as emanating in a high population density area. The emissions into water are assumed to be emitted into rivers.
  Uncertainty: Calculated from the water emissions
- Sulfate [water, surface water]: 0.0375089 kg; lognormal variance with pedigree 0.188, pedigree (4,5,5,5,5)
  Estimation. The input of sulfuric acid was assumed to leave the system with the waste water as sulfates.
  It is assumed that the manufacturing plants are located in an urban/industrial area and consequently the emissions are categorized as emanating in a high population density area. The emissions into water are assumed to be emitted into rivers.
  Uncertainty: Estimation
- DOC, Dissolved Organic Carbon [water, surface water]: 0.0118279 kg; lognormal variance with pedigree 0.188, pedigree (4,5,5,5,5)
  (same comment as for TOC, Total Organic Carbon)
- Ammonium, ion [water, surface water]: 0.0138314 kg; lognormal variance with pedigree 0.188, pedigree (4,5,5,5,5)
  Estimation.
  It is assumed that the manufacturing plants are located in an urban/industrial area and consequently the emissions are categorized as emanating in a high population density area. The emissions into water are assumed to be emitted into rivers.
  Uncertainty: Estimation

## Sampling procedure
Literature data

## Extrapolations
Transports and emissions are modelled with standard methods.

## Review by Roland Hischier 2010-02-07
passed.
none

## Review by Roland Hischier 2011-09-28
Transfer of documentation done.
