# butane-1,4-diol production

Dataset: EcoSpold 2, unit process
Geography: RER
Time period: 1989-01-01 to 2021-12-31
Technology level: current
Classification: EcoSpold01Categories: chemicals/organics
Classification: ISIC rev.4 ecoinvent: 2011:Manufacture of basic chemicals
Synonyms: 1,4-butanediol; butylene glycol
Tags: ConvertedDataset
Scenario: Business-as-Usual
System model: Allocation, cut-off by classification
Share of production covered: 100 %
Generated by: Jürgen Sutter
Published in: Sutter, J. 2007
Database: ecoinvent
isCopyrightProtected: true
accessRestrictedTo: 1

## General comment
This data represents the production of 1 kg of pure butane-1,4-diol via the hydrogenation of 2-butyne-1,4-diol from acetylene. Raw materials, Energy consumptions and emissions are modelled with literature data. Infrastructure is included with a default value.
[This dataset was already contained in the ecoinvent database version 2. It was not individually updated during the transfer to ecoinvent version 3. Life Cycle Impact Assessment results may still have changed, as they are affected by changes in the supply chain, i.e. in other datasets. This dataset was generated following the ecoinvent quality guidelines for version 2. It may have been subject to central changes described in the ecoinvent version 3 change report (http://www.ecoinvent.org/database/ecoinvent-version-3/reports-of-changes/), and the results of the central updates were reviewed extensively. The changes added e.g. consistent water flows and other information throughout the database. The documentation of this dataset can be found in the ecoinvent reports of version 2, which are still available via the ecoinvent website. The change report linked above covers all central changes that were made during the conversion process.]

## Included activities start
From the reception of acetylene at the factory gate.

## Included activities end
This activity ends with the production of 1 kg of 1,4-butanediol, 100% at the factory gate. The dataset includes the input materials, energy uses, infrastructure and emissions.

## Geography
The inventory is modelled for Europe.

## Technology
Butane-1,4-diol is usually produced by hydrogenation of 2-butyne-1,4-diol. The synthesis of 2-butyne-1,4-diol, based on the work of Reppe and his coworkers, is carried out by reaction under pressure of acetylene and an aqueous solution of formaldehyde, catalyzed by copper acetylide. In 1984 over 95 % of the world production of butane-1,4-diol was based on the Reppe synthesis 1,4-Butanediol is made on a large industrial scale by continuous hydrogenation of the 2-butyne-1,4-diol over modified nickel catalysts. The one-stage flow process is carried out at 80 – 160 °C and 300 bar according to .
An aqueous solution of 2-butyne-1,4-diol (30 – 50 %), together with carbon monoxide-free hydrogen and recycled reaction mixture, which acts as medium for dissipation of heat, is lead over a reduced nickel – copper – manganese catalysts on silica gel strands. The initial temperature in the reactor is 80 °C; the temperature must not exceed 170 °C. In order to obtain a better distribution of the liquid, hydrogen is also circulated.
The raw product contains methanol, propanol, and butanol as byproducts as well as traces of 2-methyl-butane-1,4-diol, hydroxybutyraldehyde, acetals, and triols. The reactor effluent is worked up to pure butane-1,4-diol by fractional distillation.
a)Piston pump; b) Preheater; c) Hydrogenation reactor; d) Gas – liquid separator; e) Recycle compressor; f) Canned motor pump; g) Hydrogen compressor; h) Air cooler
Reference:
Gräfje, H., Körnig, W., Weitz, H.-M., Reiß, W.: Butanediols, Butenediol, and Butynediol, Chapter 1. In: Ullmann's Encyclopedia of Industrial Chemistry, Sev-enth Edition, 2004 Electronic Release (ed. Fiedler E., Grossmann G., Kersebohm D., Weiss G. and Witte C.). 7 th Electronic Release Edition. WileyInterScience, New York, Online-Version under: http://www.mrw.interscience.wiley.com/ueic/articles/a04_455/frame.html

## Time period
Time of publications

## Parameters
- fraction, cooling water, recirculating system, to air: 0.771 dimensionless; name fraction_CW_R_to_air; lognormal variance with pedigree 0.0413, pedigree (2,3,1,3,1)
  Calculated based on literature value (Scown, C.D., 2011, Water Footprint of U.S. Transportation Fuels and supplying information of the article) (Vionnet, S., Quantis Water Database - Technical Report, 2012).
- fraction, cooling water, to air: 0.3875 dimensionless; name fraction_CW_to_air; = (0.5*fraction_CW_OT_to_air)+(0.5*fraction_CW_R_to_air); lognormal variance with pedigree 0.092025, pedigree (4,4,3,2,4)
  Calculated value based on literature value (see comments of the other parametres present in this dataset) and expert opinion. In the case when no industry/literature data are available about the type of cooling or directly fraction, cooling water, to air specific for the process a default assumption is applied. It is assumed that the once-through cooling system is used in 50% of all cases and recirculating system is used in another 50% of all cases.
- fraction, cooling water, cooling pond system, to air: 0.032 dimensionless; name fraction_CW_CP_to_air; lognormal variance with pedigree 0.0413, pedigree (2,3,1,3,1)
  (same comment as for fraction, cooling water, recirculating system, to air)
- fraction, process water, to air: 0.205 dimensionless; name fraction_PW_to_air; lognormal variance with pedigree 0.092025, pedigree (4,4,3,2,4)
  Literature value (Statistics Canada, 2007 & Shaffer, K.H., 2008, Consumptive water use in the Great Lakes Basin, USGS) (Vionnet, S., Quantis Water Database - Technical Report, 2012).
- fraction, water, deionised, to air: 0.205 dimensionless; name fraction_WDI_to_air; = fraction_PW_to_air; lognormal variance with pedigree 0.092025, pedigree (4,4,3,2,4)
  Calculated value. See comment in the other parametres present in this dataset. Deionised water is considered to be always used as process water, thus process water fractions to air are applied to all deionised water input flows to calculate the amount of water consumed in the processes.
- fraction, cooling water, once-through system, to air: 0.004 dimensionless; name fraction_CW_OT_to_air; lognormal variance with pedigree 0.0413, pedigree (2,3,1,3,1)
  (same comment as for fraction, cooling water, recirculating system, to air)

## Reference product
- butane-1,4-diol: 1 kg; CPC 341: Basic organic chemicals; By-product classification allocatable product; CAS 110-63-4
  Butane-1,4-diol is a colorless, almost odorless, hygroscopic liquid, readily soluble in water, alcohols, ketones, glycol ethers, and glycol ether acetates, less soluble in diethyl ether and esters, and not miscible with aliphatic and aromatic hydrocarbons and chlorinated hydrocarbons.
  1,4-Butanediol is a starting material for the production of tetrahydrofuran which can be made directly from butadiene according to a process developed by Chevron: 1,2-epoxy-3-butene is made from butadiene and a peroxide and subsequent isomerization yields 2,5-dihydrofuran, which is hydrogenated to tetrahydrofuran.
  An other products derived from butane-1,4-diol is butyrolactone. In addition, both butane-1,4-diol and its derivatives are used in the textile, leather, photographic, food, and pharmaceutical industries.
  EcoSpold01Location=RER
  production volume 1.32237 kg
    This is a placeholder value that does not reflect real-world production volumes. This dataset does not currently require a real-world production volume to work in the database framework, and no actual data were collected yet. This has no negative effect on the results of the ecoinvent database. The placeholder value of this activity was scaled according to the nominal GDP of 2005 (source: United Nations, http://data.un.org/Glossary.aspx?q=GDP+%28current+US%24%29, accessed 20130726) to reflect an appropriate share of the global production volume, which is also a placeholder value.
  property price 1.23759 EUR2005
    Calculated based on inputs: The price of the product has been calculated as a sum of the values of the material and energy inputs for this product. This value is therefore a rough estimation. It may underestimate the real price since there are additional expenses when producing any product. These expences can include for example labour costs, treatment of waste materials and profit for the producer. Please consider carefully whether this level of data quality is acceptable for your application.
  property heating value, net 29.6 MJ
    LHV is calculated based on the elemental composition of the substance. Based on the CAS number of the substance (000110-63-4), the chemical formula of the substance is found to be: C4H10O2, (PubChem 2020).
    Reference: Kim, S., Chen, J., Cheng, T., Gindulyte, A., He, J., He, S., Li, Q., Shoemaker, B. A., Thiessen, P. A., Yu, B., Zaslavsky, L., Zhang, J., & Bolton, E. E. (2019). PubChem 2019 update: improved access to chemical data. Nucleic acids research, 47(D1), D1102–D1109. https://doi.org/10.1093/nar/gky1033
  property carbon content 0.533333
    carbon content on a dry matter basis (reserved; not for manual entry)
  properties: carbon content, non-fossil 0, carbon content, fossil 0.533333, water content 0, water in wet mass 0 kg, dry mass 1 kg, wet mass 1 kg, carbon allocation 0.533333 kg

## Inputs from technosphere
- heat, district or industrial, natural gas: 18.81 MJ; source Chauvel, A. 1989; lognormal variance with pedigree 0.0707, pedigree (1,3,5,3,1)
  Literature value.
  Uncertainty: Chauvel 1989
  properties: heating value, net 1 MJ
- chemical factory, organics: 4e-10 unit; lognormal variance with pedigree 0.448, pedigree (4,5,5,5,5)
  Estimation. This module assumes a built area of about 4.2 ha, an average output of 50'000 t/a, and plant life of fifty years.
  EcoSpold01Location=RER
  Uncertainty: Estimation
- nitrogen, liquid: 0.03125 kg; source Chauvel, A. 1989; lognormal variance with pedigree 0.0707, pedigree (1,3,5,3,1)
  EcoSpold01Location=RER
  Literature value.
  Uncertainty: Chauvel 1989
  properties: dry mass 1 kg, wet mass 1 kg
- heat, district or industrial, other than natural gas: 10.499 MJ; source Chauvel, A. 1989; lognormal variance with pedigree 0.0707, pedigree (1,3,5,3,1)
  Literature value.
  Uncertainty: Chauvel 1989
  properties: heating value, net 1 MJ
- electricity, medium voltage: 0.37998 kWh; source Chauvel, A. 1989; lognormal variance with pedigree 0.0707, pedigree (1,3,5,3,1)
  EcoSpold01Location=UCTE
  Literature value.
  Uncertainty: Chauvel 1989
- hydrogen, liquid: 0.054 kg; source Chauvel, A. 1989; lognormal variance with pedigree 0.0707, pedigree (1,3,5,3,1)
  Literature value.
  EcoSpold01Location=RER
  Uncertainty: Chauvel 1989
  properties: wet mass 1 kg, dry mass 1 kg, heating value, net 120.21 MJ
- water, deionised: 0 kg; name water_deionised_input; source Chauvel, A. 1989; pedigree (1,1,1,1,1)
  Literature value.
  EcoSpold01Location=CH
  Uncertainty: Chauvel 1989
  properties: wet mass 1 kg
- acetylene: 0.32 kg; source Chauvel, A. 1989; lognormal variance with pedigree 0.0707, pedigree (1,3,5,3,1)
  Literature value.
  EcoSpold01Location=CH
  Uncertainty: Chauvel 1989
  properties: carbon content, fossil 0.923077, dry mass 1 kg, wet mass 1 kg, heating value, net 51.2 MJ
  note on carbon content, fossil: C2H2. ecoinvent v2.2 report n 8. Produced from partial oxidation of natural gas
  note on heating value, net: Based on literature, page 25 (Value may refer to HHV), Althaus H.-J., Chudacoff M., Hischier R., Jungbluth N., Osses M. and Primas A. (2007) Life Cycle Inventories of Chemicals. Final report ecoinvent data v2.0 No. 8. EMPA, Swiss Centre for Life Cycle Inventories, Dübendorf, CH, Online-Version under: www.ecoinvent.org.
- formaldehyde: 0.7326 kg; source Chauvel, A. 1989; lognormal variance with pedigree 0.0707, pedigree (1,3,5,3,1)
  Literature value.
  EcoSpold01Location=RER
  Uncertainty: Chauvel 1989
  properties: dry mass 1 kg, heating value, net 20.19 MJ, carbon content, fossil 0.4, wet mass 1 kg
- nickel, class 1: 0.000214 kg; source Cooper, J. Smith 2001; lognormal variance with pedigree 0.0406, pedigree (1,3,5,1,1)
  EcoSpold01Location=GLO
  Literature value.
  Uncertainty: Cooper 2001
  properties: dry mass 1 kg, wet mass 1 kg
- copper, cathode: 0.000204 kg; source Cooper, J. Smith 2001; lognormal variance with pedigree 0.0406, pedigree (1,3,5,1,1)
  EcoSpold01Location=RER
  Literature value.
  Uncertainty: Cooper 2001
  properties: dry mass 1 kg, wet mass 1 kg
- sodium hydroxide, without water, in 50% solution state: 0.003 kg; source Chauvel, A. 1989; lognormal variance with pedigree 0.0707, pedigree (1,3,5,3,1)
  Literature value.
  EcoSpold01Location=RER
  Uncertainty: Chauvel 1989
  properties: dry mass 1 kg, wet mass 1 kg, heating value, net 3.03 MJ
- water, deionised: 0.996413, 0.00358684 kg (2 entries); source Chauvel, A. 1989; lognormal variance with pedigree 0.0707, pedigree (1,3,5,3,1)
  Literature value.
  EcoSpold01Location=CH
  Uncertainty: Chauvel 1989

## Inputs from nature
- Water, cooling, unspecified natural origin [natural resource, in water]: 0.49 m3; name water_cooling_UNO_input; source Cooper, J. Smith 2001; lognormal variance with pedigree 0.0406, pedigree (1,3,5,1,1)
  Literature value.
  Uncertainty: Cooper 2001

## Emissions to nature
- Formaldehyde [water, surface water]: 2.98e-5 kg; source Cooper, J. Smith 2001; lognormal variance with pedigree 0.3406, pedigree (1,3,5,1,1)
  Literature value. It is assumed that the manufacturing plants are located in an urban/industrial area and consequently the emissions are categorised as emanating in a high population density area. The emissions into water are assumed to be emitted into rivers.
  Uncertainty: Cooper 2001
- Nickel, ion [water, surface water]: 7.7e-7 kg; source Cooper, J. Smith 2001; lognormal variance with pedigree 0.6906, pedigree (1,3,5,1,1)
  (same comment as for Formaldehyde)
- Nickel [air, urban air close to ground]: 1.11e-8 kg; source Cooper, J. Smith 2001; lognormal variance with pedigree 0.6906, pedigree (1,3,5,1,1)
  Literature value. It is assumed that the manufacturing plants are located in an urban/industrial area and consequently the emissions are categorised as emanating in a high population density area.
  Uncertainty: Cooper 2001
- BOD5, Biological Oxygen Demand [water, surface water]: 5.78e-5 kg; lognormal variance with pedigree 0.188, pedigree (4,5,5,5,5)
  Calculation. Calculated from the amount formaldehyde and butanol in the treated waste water assuming a carbon conversion of 96% for COD. The worst case scenario BOD=COD was used.
  It is assumed that the manufacturing plants are located in an urban/industrial area and consequently the emissions are categorised as emanating in a high population density area.
  Water emissions are assumed to be emitted into rivers
  Uncertainty: Calculated from the water emissions
- Butanol [air, urban air close to ground]: 3.1e-5 kg; source Cooper, J. Smith 2001; lognormal variance with pedigree 0.0406, pedigree (1,3,5,1,1)
  (same comment as for Nickel)
- COD, Chemical Oxygen Demand [water, surface water]: 5.78e-5 kg; lognormal variance with pedigree 0.188, pedigree (4,5,5,5,5)
  Calculation. This data was calculated from the amount of formaldehyde and butanol in the treated waste water assuming a carbon conversion of 96% for COD. The worst case scenario BOD=COD was used.
  It is assumed that the manufacturing plants are located in an urban/industrial area and consequently the emissions are categorised as emanating in a high population density area.
  Water emissions are assumed to be emitted into rivers.
  Uncertainty: Calculated from the water emissions
- Formaldehyde [air, urban air close to ground]: 5.7e-5 kg; source Cooper, J. Smith 2001; lognormal variance with pedigree 0.0806, pedigree (1,3,5,1,1)
  (same comment as for Nickel)
- Copper [air, urban air close to ground]: 2.26e-6 kg; source Cooper, J. Smith 2001; lognormal variance with pedigree 0.6906, pedigree (1,3,5,1,1)
  (same comment as for Nickel)
- Water [air, unspecified]: 0.19008 m3; name water_to_air_unspecified; = (water_deionised_input/1000*fraction_WDI_to_air)+(water_cooling_UNO_input*fraction_CW_to_air); lognormal variance with pedigree 0.0807, pedigree (2,2,5,1,1)
  Calculated value based on literature values and expert opinion. See comments in the parametres' comment field.
  property fraction, origin: salt water 0; name fraction_origin_salt_water
  property fraction, origin: fresh water 0.00107849; name fraction_origin_fresh_water
  property fraction, origin: unspecified 0.998922; name fraction_origin_unspecified
- NMVOC, non-methane volatile organic compounds, unspecified origin [air, urban air close to ground]: 0.00129 kg; source Cooper, J. Smith 2001; lognormal variance with pedigree 0.0806, pedigree (1,3,5,1,1)
  (same comment as for Nickel)
- Water [water, unspecified]: 0.30092 m3; name water_to_water_unspecified; = (water_deionised_input/1000)*(1-fraction_WDI_to_air)+water_cooling_UNO_input*(1-fraction_CW_to_air); lognormal variance with pedigree 0.0807, pedigree (2,2,5,1,1)
  (same comment as for Water)
  property fraction, origin: unspecified 0.997358; name fraction_origin_unspecified_Ww
  property fraction, origin: fresh water 0.0026419; name fraction_origin_fresh_water_Ww
  property wet mass 1000 kg; name WM
  property dry mass 0 kg; name DM
  property water in wet mass 1000 kg; name WWM
  property carbon content, fossil 0; name C_content_fossil
  property carbon content, non-fossil 0; name C_content_non_fossil
  property fraction, origin: salt water 0; name fraction_origin_salt_water_Ww
- TOC, Total Organic Carbon [water, surface water]: 1.91e-5 kg; lognormal variance with pedigree 0.188, pedigree (4,5,5,5,5)
  Calculation. This data was calculated from the amount of formaldehyde and butanol in the treated waste water assuming a carbon conversion of 96% for COD. The worst case scenario TOC=DOC was used.
  It is assumed that the manufacturing plants are located in an urban/industrial area and consequently the emissions are categorised as emanating in a high population density area.
  Water emissions are assumed to be emitted into rivers.
  Uncertainty: Calculated from the water emissions
- Butanol [water, surface water]: 1.1e-5 kg; source Cooper, J. Smith 2001; lognormal variance with pedigree 0.0406, pedigree (1,3,5,1,1)
  Literature value.
  Uncertainty: Cooper 2001
- DOC, Dissolved Organic Carbon [water, surface water]: 1.91e-5 kg; lognormal variance with pedigree 0.188, pedigree (4,5,5,5,5)
  (same comment as for TOC, Total Organic Carbon)
- Ethyne [air, urban air close to ground]: 4.61e-5 kg; source Cooper, J. Smith 2001; lognormal variance with pedigree 0.0806, pedigree (1,3,5,1,1)
  (same comment as for Nickel)
- Copper, ion [water, surface water]: 1.34e-6 kg; source Cooper, J. Smith 2001; lognormal variance with pedigree 0.3406, pedigree (1,3,5,1,1)
  (same comment as for Formaldehyde)

## Sampling procedure
Literature data

## Extrapolations
This dataset has been extrapolated from year 2006 to the year of the calculation (2021). The uncertainty has been adjusted accordingly.

## Review by Roland Hischier 2007-09-01
passed.

## Review by Roland Hischier 2011-09-22
Transfer of documentation done.
