# electricity, high voltage, production mix

Dataset: EcoSpold 2, unit process, production mix
Geography: BR
Time period: 2021-01-01 to 2021-12-31
Scenario: Business-as-Usual
System model: Allocation, cut-off by classification
Generated by: [System]
Database: ecoinvent
isCopyrightProtected: false
accessRestrictedTo: 1

## Reference product
- electricity, high voltage: 1 kWh; By-product classification allocatable product; CPC 17100: Electrical energy
  production volume 5.83939e11 kWh
  properties: true value 0.0858877

## Inputs from technosphere
- electricity, high voltage: 0.0346683 kWh
  production volume 1.88405e10 kWh
  properties: price 0.0977 EUR2005
- electricity, high voltage: 0.00792336 kWh
  production volume 4.30596e9 kWh
- electricity, high voltage: 0.00764743 kWh
  production volume 4.156e9 kWh
  properties: exergy 3.6 MJ, price 0.0977 EUR2005
  note on exergy: This exergy property is based on the exergy content of the product.
- electricity, high voltage: 0.00210691 kWh
  production volume 1.145e9 kWh
  properties: price 0.0977 EUR2005, exergy 3.6 MJ
- electricity, high voltage: 0 kWh; pedigree (1,1,1,1,1)
  Calculated value/estimation.
  This value compensates for the losses during transmission on the high voltage level and transformation within the high voltage level. The calculation is made based on total electricity losses between net electricity available at the busbar and the use of electricity calculated based on the Matrizes Elétricas Estaduais: Ano Referência 2015 (page 7 - Southern), (PD) (MME, 2016). These total losses over the whole chain are then allocated to the different voltage levels as well as transformation and transmission losses based on supplementary material information in Itten et al. 2014. For details please see the documentation available on ecoQuery.
  equation: PD (MME, 2016) x Losses high voltage (Treyer et. al., 2014; page 1262)
  PD = Perdas de Distribuição = BR Distribution Losses
  MME (2016). Matrizes Elétricas Estaduais: Ano Referência 2015. Edição de 23 de novembro de 2016. Ministério De Minas E Energia - MME. Secretaria De Planejamento E Desenvolvimento Energético. Núcleo De Estudos Estratégicos De Energia. Available in: <http://www.mme.gov.br/documents/10584/3580498/03+-+Matrizes+El%C3%A9tricas+Estaduais+2016+-+ano+ref.+2015+%28PDF%29/ddfaad8c-a436-4aa8-b619-f95dd2cf689c?version=1.0> Access in: 12/2017.
  Treyer, Karin & Bauer, Christian. (2014). Life cycle inventories of electricity generation and power supply in version 3 of the ecoinvent database?Part II: Electricity markets. The International Journal of Life Cycle Assessment. 21. 10.1007/s11367-013-0694-x.
- electricity, high voltage: 0.0118616 kWh
  production volume 6.44618e9 kWh
- electricity, high voltage: 0.258573 kWh
  production volume 1.40522e11 kWh
- electricity, high voltage: 0.00591551 kWh
  production volume 3.21479e9 kWh
- electricity, high voltage: 0.00295795 kWh
  production volume 1.6075e9 kWh
- electricity, high voltage: 0.00594415 kWh
  production volume 3.23035e9 kWh
- electricity, high voltage: 0.00721059 kWh
  production volume 3.9186e9 kWh
- electricity, high voltage: 0.113003 kWh
  production volume 6.14118e10 kWh
- electricity, high voltage: 0.0500595 kWh
  production volume 2.72049e10 kWh
- electricity, high voltage: 0.0306819 kWh
  production volume 1.66741e10 kWh
- electricity, high voltage: 0.0260756 kWh
  production volume 1.41708e10 kWh
- electricity, high voltage: 0.00576732 kWh
  production volume 3.13426e9 kWh
- electricity, high voltage: 0.0183952 kWh
  production volume 9.99689e9 kWh
- electricity, high voltage: 0.0178612 kWh
  production volume 9.70667e9 kWh
- electricity, high voltage: 0.0488223 kWh
  production volume 2.65325e10 kWh
- electricity, high voltage: 0.0142848 kWh
  production volume 7.76306e9 kWh
- electricity, high voltage: 0.0148679 kWh
  production volume 8.07995e9 kWh
- electricity, high voltage: 0.0226744 kWh
  production volume 1.23224e10 kWh
- electricity, high voltage: 0.0309151 kWh
  production volume 1.68008e10 kWh
- electricity, high voltage: 0.0110965 kWh
  production volume 6.03038e9 kWh
- electricity, high voltage: 0.0825778 kWh
  production volume 4.4877e10 kWh
- electricity, high voltage: 0.00590109 kWh
  production volume 3.20695e9 kWh
- electricity, high voltage: 0.00665954 kWh
  production volume 3.61913e9 kWh
- electricity, high voltage: 0.00228098 kWh
  production volume 1.2396e9 kWh
- electricity, high voltage: 0.00765503 kWh
  production volume 4.16013e9 kWh
- electricity, high voltage: 0.125105 kWh
  production volume 6.79883e10 kWh
- electricity, high voltage: 0.00732376 kWh
  production volume 3.9801e9 kWh
- electricity, high voltage: 0.0131827 kWh
  production volume 7.16417e9 kWh
