# esterification of palm oil

Dataset: EcoSpold 2, unit process
Geography: MY
Time period: 1996-01-01 to 2021-12-31
Technology level: current
Classification: EcoSpold01Categories: biomass/fuels
Classification: ISIC rev.4 ecoinvent: 1920:Manufacture of refined petroleum products
Tags: ConvertedDataset
Scenario: Business-as-Usual
System model: Allocation, cut-off by classification
Share of production covered: 0 %
Generated by: Edgard Gnansounou
Published in: Jungbluth N. 2007
Database: ecoinvent
isCopyrightProtected: true
accessRestrictedTo: 1

## General comment
Inventory refers to the production of 1 kg palm methyl ester (PME), respectively glycerine, from palm oil. The multioutput-process 'palm oil, in esterification plant' delivers the co-products 'palm methyl ester, at esterification plant' and 'glycerine, from palm oil, at esterification plant'. Economic allocation with allocation factor of 87.1% to rape oil and 12.9% to glycerine. Allocation of CO2 emissions is done according to carbon balance.
[This dataset was already contained in the ecoinvent database version 2. It was not individually updated during the transfer to ecoinvent version 3. Life Cycle Impact Assessment results may still have changed, as they are affected by changes in the supply chain, i.e. in other datasets. This dataset was generated following the ecoinvent quality guidelines for version 2. It may have been subject to central changes described in the ecoinvent version 3 change report (http://www.ecoinvent.org/database/ecoinvent-version-3/reports-of-changes/), and the results of the central updates were reviewed extensively. The changes added e.g. consistent water flows and other information throughout the database. The documentation of this dataset can be found in the ecoinvent reports of version 2, which are still available via the ecoinvent website. The change report linked above covers all central changes that were made during the conversion process.]

## Included activities end
This process includes the esterification process of palm oil to methyl ester and glycerine, intermediate storage of the oil and products, treatment of specific wastewater effluents. System boundary is at the esterification plant.

## Geography
Data from different plants worldwide (incl. literature data)

## Technology
Typical vegetable oil esterification plant designed for the production of methyl ester (for use in the vehicle fuels market), global context. Base-catalyzed transesterification.

## Time period
Data from 1996 to 2003, current technology for large scale biodiesel plants worldwide

## Parameters
- fraction, cooling water, recirculating system, to air: 0.771 dimensionless; name fraction_CW_R_to_air; lognormal variance with pedigree 0.0413, pedigree (2,3,1,3,1)
  Calculated based on literature value (Scown, C.D., 2011, Water Footprint of U.S. Transportation Fuels and supplying information of the article) (Vionnet, S., Quantis Water Database - Technical Report, 2012).
- fraction, cooling water, to air: 0.3875 dimensionless; name fraction_CW_to_air; = (0.5*fraction_CW_OT_to_air)+(0.5*fraction_CW_R_to_air); lognormal variance with pedigree 0.092025, pedigree (4,4,3,2,4)
  Calculated value based on literature value (see comments of the other parametres present in this dataset) and expert opinion. In the case when no industry/literature data are available about the type of cooling or directly fraction, cooling water, to air specific for the process a default assumption is applied. It is assumed that the once-through cooling system is used in 50% of all cases and recirculating system is used in another 50% of all cases.
- fraction, process water, to air: 0.205 dimensionless; name fraction_PW_to_air; lognormal variance with pedigree 0.092025, pedigree (4,4,3,2,4)
  Literature value (Statistics Canada, 2007 & Shaffer, K.H., 2008, Consumptive water use in the Great Lakes Basin, USGS) (Vionnet, S., Quantis Water Database - Technical Report, 2012).
- fraction, cooling water, cooling pond system, to air: 0.032 dimensionless; name fraction_CW_CP_to_air; lognormal variance with pedigree 0.0413, pedigree (2,3,1,3,1)
  (same comment as for fraction, cooling water, recirculating system, to air)
- fraction, tap water, to air: 0.205 dimensionless; name fraction_TW_to_air; = fraction_PW_to_air; lognormal variance with pedigree 0.092025, pedigree (4,4,3,2,4)
  Calculated value. See comment in the other parametres present in this dataset. Tap water is considered to be always used as process water, thus process water fractions to air are applied to all tap water input flows to calculate the amount of water consumed in the processes.
  Calculated value. See comment in the other parametres present in this dataset. Tap water is considered to be always used as process water, thus process water fractions to air are applied to all tap water input flows to calculate the amount of water consumed in the processes.
- fraction, cooling water, once-through system, to air: 0.004 dimensionless; name fraction_CW_OT_to_air; lognormal variance with pedigree 0.0413, pedigree (2,3,1,3,1)
  (same comment as for fraction, cooling water, recirculating system, to air)

## Reference product
- fatty acid methyl ester: 1 kg; By-product classification allocatable product; CPC 35491: Biodiesel
  production volume 0 kg
    Production of palm methyl ester was marginal in 2005 in MY
    No production in 2005. Production in Malaysia started in 2007.
  property price 0.817 EUR2005
    Temporary price data. Calculated as 90% of purchasers price based on: 2004 import and export prices (total trades (USD) divided by total weight (kg) in EU27, USA, China, Japan and India) from UN Commodity Trade Statistics Database (http://data.un.org/Explorer.aspxDatabase [Accessed 2 July 2010]). Commodity: 'Veg fats, oils or fractions hydrogenated, esterified'.
  property heating value, net 37.2 MJ
    Based on literature, report 17, page 439. Jungbluth, N., Chudacoff, M., Dauriat, A., Dinkel, F., Doka, G., Faist Emmenegger, M., Gnansounou, E., Kljun, N., Schleiss, K., Spielmann, M., Stettler, C., Sutter, J. 2007: Life Cycle Inventories of Bioenergy. ecoinvent report No. 17, Swiss Centre for Life Cycle Inventories, Dübendorf, CH.
  property carbon content 0.76
    carbon content on a dry matter basis (reserved; not for manual entry)
  property true value 0.794696
    allocation property applied in "true value" allocation // value calculated from revenue
  properties: carbon content, fossil 0.045, water in wet mass 0 kg, carbon content, non-fossil 0.715, dry mass 1 kg, water content 0, wet mass 1 kg, carbon allocation 0.76 kg

## By-products
- glycerine: 0 kg; CPC 34570: Glycerol; By-product classification allocatable product; CAS 56-81-5
  EcoSpold01Location=MY
  production volume 0 kg
    Production of palm methyl ester was marginal in 2005 in MY
    Calculated from the production volume of palm methyl ester in proportion to the respective output amounts.
  property heating value, net 22.38 MJ
    LHV is calculated based on the elemental composition of the substance. Based on the CAS number of the substance (000056-81-5), the chemical formula of the substance is found to be: C3H8O3, (PubChem 2020).
    Reference: Kim, S., Chen, J., Cheng, T., Gindulyte, A., He, J., He, S., Li, Q., Shoemaker, B. A., Thiessen, P. A., Yu, B., Zaslavsky, L., Zhang, J., & Bolton, E. E. (2019). PubChem 2019 update: improved access to chemical data. Nucleic acids research, 47(D1), D1102–D1109. https://doi.org/10.1093/nar/gky1033
  property carbon content, non-fossil 0.391304
    In Tab 17.4, ecoinvent v2.2 report n 17
    C3H8O3. From palm oil
  property price 0.792 EUR2005
    Temporary price data. Calculated as 90% of purchasers price based on: 2004 import and export prices (total trades (USD) divided by total weight (kg) in EU27, USA, China, Japan and India) from UN data - Glycerol (glycerine), nes including synthetic glycerol (http://data.un.org/Data.aspx?q=glycerine&d=ComTrade&f=_l1Code%3a16%3bcmdCode%3a152090; accessed 1 July 10)
  property carbon content, fossil 0
    In Tab 17.4, ecoinvent v2.2 report n 17
    C3H8O3. From palm oil
  property carbon content 0.391304
    carbon content on a dry matter basis (reserved; not for manual entry)
  property true value 0.0840312
    allocation property applied in "true value" allocation // value calculated from revenue
  properties: dry mass 1 kg, water content 0, wet mass 1 kg, water in wet mass 0 kg, carbon allocation 0.391304 kg

## Inputs from technosphere
- tap water: 0.015117 kg; name tap_water_input; source Sheenhan, J. 1998; lognormal variance with pedigree 0.052625, pedigree (3,3,5,2,1)
  Literature, environmental report
  Calculated based on literature (Sheenhan, J., 18, An Overview of Biodiesel and Petroleum Diesel Life Cycles; Omni Tech International, 2010, Life Cycle Impact of Soybean Production and Soy Industrial Products), (Vionnet, S., Quantis Water Database - Technical Report, 2012). Assumed to have the same water use as "soybean methyl ester, at esterification plant". The process starts when refined oil enters the plant. It includes the processes: prepurification, deacidification, transesterification, destilation, etc. It is assumed that 95% of water use is allocated to cooling water and 5% of water is allocated as process water.
  Literature, environmental report
  Calculated based on literature (Sheenhan, J., 18, An Overview of Biodiesel and Petroleum Diesel Life Cycles; Omni Tech International, 2010, Life Cycle Impact of Soybean Production and Soy Industrial Products), (Vionnet, S., Quantis Water Database - Technical Report, 2012). Assumed to have the same water use as "soybean methyl ester, at esterification plant". The process starts when refined oil enters the plant. It includes the processes: prepurification, deacidification, transesterification, destilation, etc. It is assumed that 95% of water use is allocated to cooling water and 5% of water is allocated as process water.
  EcoSpold01Location=RER
  Uncertainty: Literature, environmental report
  properties: wet mass 1 kg, water content 2962.17, dry mass 0.000337476 kg, carbon content, fossil 0.00178991
  note on carbon content, fossil: In Tab 17.4, ecoinvent v2.2 report n 17 Bicarbonate content is 2.93 mol/m3. CO2 content is 0.1 mol/m3 (ecoinvent v2.2 report 8, Tab 93.1).
- palm oil, crude: 0.929754 kg; lognormal variance with pedigree 0.0501, pedigree (1,2,5,1,1)
  EcoSpold01Location=MY
  Literature data & biodiesel producer
  Uncertainty: Literature data & biodiesel producer
  properties: heating value, net 37 MJ, dry mass 1 kg, wet mass 1 kg, carbon content, non-fossil 0.752881
  note on heating value, net: Literature value, Source: Biograce, Condensed list of standard values, version 2 - Public. Available at: https://biograce.net/app/webroot/files/file/BioGrace_condensed_list_of_standard_values_-_version_2_-_Public.doc
  note on carbon content, non-fossil: In Tab 17.4, ecoinvent v2.2 report n 17 C49H97O6. Palm oil (tab 17.4, ecoinvent v2.2 report 17-part 17)
- vegetable oil esterification facility: 8.4523e-10 unit; lognormal variance with pedigree 0.3521, pedigree (1,4,5,3,1)
  EcoSpold01Location=CH
  Calculation, according to feed capacity and lifetime of the plant
  Uncertainty: Calculation, according to feed capacity and lifetime of the plant
- wastewater, from residence: -5.65514e-5 m3; name wastewater_output; lognormal variance with pedigree 0.128025, pedigree (5,5,5,2,1)
  Calculation, to close mass balance of process
  EcoSpold01Location=CH
  Uncertainty: Calculation, to close mass balance of process
  production volume 0 m3
    Calculated from the production volume of palm methyl ester in proportion to the respective output amounts.
  property price 0 EUR2005; name wastewater_output_price_EUR2005
  properties: wet mass 1000 kg, dry mass 0.337476 kg, carbon content, non-fossil 0.199421, water content 2962.17
  note on carbon content, non-fossil: In Tab 17.4, ecoinvent v2.2 report n 17 0.0673 kg TOC/m3 (Tab A.17, ecoinvent v2.2 report 13_I). TOC was considered as Total Carbon.
- methanol: 0.102738 kg; lognormal variance with pedigree 0.040025, pedigree (1,1,5,2,1)
  Literature data & biodiesel producer
  EcoSpold01Location=GLO
  Uncertainty: Literature data & biodiesel producer
  properties: carbon content, fossil 0.375, wet mass 1 kg, dry mass 1 kg, heating value, net 26.49 MJ
- phosphoric acid, industrial grade, without water, in 85% solution state: 0.00416232 kg; lognormal variance with pedigree 0.040725, pedigree (2,2,5,2,1)
  Literature data & biodiesel producer
  EcoSpold01Location=RER
  Uncertainty: Literature data & biodiesel producer
  properties: wet mass 1 kg, dry mass 1 kg
- potassium hydroxide: 0.0102701 kg; lognormal variance with pedigree 0.040725, pedigree (2,2,5,2,1)
  (same comment as for phosphoric acid, industrial grade, without water, in 85% solution stat)
  properties: water content 0.168224, dry mass 0.856 kg, wet mass 1 kg
- electricity, medium voltage: 0.038251 kWh; lognormal variance with pedigree 0.040025, pedigree (1,1,5,2,1)
  Literature data & biodiesel producer
  EcoSpold01Location=NL
  Uncertainty: Literature data & biodiesel producer
- heat, district or industrial, natural gas: 0.83544 MJ; lognormal variance with pedigree 0.040025, pedigree (1,1,5,2,1)
  EcoSpold01Location=RER
  Literature data & biodiesel producer
  Uncertainty: Literature data & biodiesel producer
  properties: heating value, net 1 MJ

## Inputs from nature
- Carbon dioxide, in air [natural resource, in air]: 0.200362 kg; lognormal variance with pedigree 0.040025, pedigree (1,1,5,2,1)
  Calculation, to close carbon balance
  Uncertainty: Calculation, to close carbon balance
- Water, cooling, unspecified natural origin [natural resource, in water]: 0.000287224 m3; name water_cooling_UNO_input; source Sheenhan, J. 1998; lognormal variance with pedigree 0.0593, pedigree (2,3,5,3,3)
  Calculated based on literature (Sheenhan, J., 18, An Overview of Biodiesel and Petroleum Diesel Life Cycles; Omni Tech International, 2010, Life Cycle Impact of Soybean Production and Soy Industrial Products), (Vionnet, S., Quantis Water Database - Technical Report, 2012). Assumed to have the same water use as "soybean methyl ester, at esterification plant". The process starts when refined oil enters the plant. It includes the processes: prepurification, deacidification, transesterification, destilation, etc. The process ends when methyl ester leaves the plant. It is assumed that 95% of water use is allocated to cooling water and 5% of water is allocated as process water.
  property carbon content, fossil 0.0104329; name C_content_fossil
  property dry mass 0.1101 kg; name DM
  property water in wet mass 999.89 kg; name WWM
  property carbon content, non-fossil 0; name C_content_non_fossil
  property water content 9081.65; name water_content
  property wet mass 1000 kg; name WM

## Emissions to nature
- Carbon dioxide, non-fossil [air, urban air close to ground]: 0.274659 kg; lognormal variance with pedigree 0.04, pedigree (1,1,5,1,1)
  Calculation, to close carbon balance
  Uncertainty: Calculation, to close carbon balance
- Water [air, unspecified]: 0.000114398 m3; name water_to_air_unspecified; = (tap_water_input/1000*fraction_TW_to_air)+(water_cooling_UNO_input*fraction_CW_to_air); lognormal variance with pedigree 0.0807, pedigree (2,2,5,1,1)
  Calculated value based on literature values and expert opinion. See comments in the parametres' comment field.
  property fraction, origin: salt water 0; name fraction_origin_salt_water
  property fraction, origin: unspecified 0.97291; name fraction_origin_unspecified
  property fraction, origin: fresh water 0.0270895; name fraction_origin_fresh_water
- Water [water, unspecified]: 0.000131391 m3; name water_to_water_unspecified; = (tap_water_input/1000)*(1-fraction_TW_to_air)+water_cooling_UNO_input*(1-fraction_CW_to_air)-6.0824E-05; lognormal variance with pedigree 0.0807, pedigree (2,2,5,1,1)
  (same comment as for Water)
  property fraction, origin: unspecified 0.936055; name fraction_origin_unspecified_Ww
  property fraction, origin: fresh water 0.0639453; name fraction_origin_fresh_water_Ww
  property fraction, origin: salt water 0; name fraction_origin_salt_water_Ww

## Sampling procedure
Cross-checking of various literature sources from 1998 to 2006

## Extrapolations
The dataset "electricity, medium voltage, production NL" is used as a proxy for electricity supply in MY, because it is the mix, closest to the electricity mix in MY.

## Review by Emilia Moreno Ruiz 2012-03-19
name change from "palm methyl ester" to "vegetable oil methyl ester"

## Review by Niels Jungbluth 2006-08-15
Passed.
none
