# treatment of wastewater from particleboard production, capacity 5E9l/year

Dataset: EcoSpold 2, unit process
Geography: RER
Time period: 2012-01-01 to 2021-12-31
Technology level: current
Classification: ISIC rev.4 ecoinvent: 3700:Sewerage
Classification: EcoSpold01Categories: waste management/wastewater treatment
Tags: Treatment
Scenario: Business-as-Usual
System model: Allocation, cut-off by classification
Generated by: Frank Werner
Database: ecoinvent
isCopyrightProtected: true
accessRestrictedTo: 1

## General comment
Wastewater purified in a medium size municipal wastewater treatment plant (capacity class 3), with an average capacity size of 24900 per-captia-equivalents PCE.
The treated waste water has the following composition (see sampling procedure for source):
Wastewater contains (in kg/m3): COD: 0.00044 (GSD=122.5%); BOD: 0.0000616 (GSD=122.5%);
[This dataset is meant to replace the following datasets:
- treatment of wastewater from particle board production, capacity 5E9l/year, CH, 1994 - 2000]

## Included activities end
Infrastructure materials for municipal wastewater treatment plant, transports, dismantling. Land use burdens.

## Geography
Specific to the technology mix encountered in Switzerland in 2000. Well applicable to modern treatment practices in Europe, North America or Japan.

## Technology
Three stage wastewater treatment (mechanical, biological, chemical) including sludge digestion (fermentation) according to the average technology in Switzerland

## Parameters
- fraction, process water, to air: 0.1 dimensionless; lognormal variance with pedigree 0.092025, pedigree (4,4,3,2,4)

## Reference product
- wastewater from particleboard production: -1 m3; By-product classification Waste; CPC 39920: Sewage sludge
  EcoSpold01Location=CH
  production volume 2.66e6 m3; name p_board
    calculated from RER production volume times waste water/m3
  property carbon content, non-fossil 0.377131
    BOD= 0.196 kg/m3 (Tab A.17, ecoinvent v2.2 report 13_I). BOD was converted to TOC, using conversion factors in Tab 4.10 (ecoinvent v2.2 report 13_IV). TOC was considered as Total Carbon.
  property price 0 EUR2005
    Waste products are assigned a price of zero as they are assumed to require further treatment.
  property carbon content 0.377131
    carbon content on a dry matter basis (reserved; not for manual entry)
  properties: water in wet mass 999.663 kg, dry mass 0.337476 kg, wet mass 1000 kg, water content 2962.17, carbon content, fossil 0, carbon allocation 0.127273 kg

## Inputs from technosphere
- waste graphical paper: -0.0155 kg; name w_paper; lognormal variance with pedigree 0.008, pedigree (1,1,4,1,1)
  EcoSpold01Location=CH
  direct wastewater treatment plant burden. Uncertainty calculated from wastewater composition and treatment model
  production volume 41230 kg; = p_board*w_paper
    Calculated from the production volume of wastewater from particle board production in proportion to the respective output amounts.
  property price 0 EUR2005; name w_paper_price_EUR2005
  properties: wet mass 1 kg, dry mass 0.888 kg, carbon content, non-fossil 0.454955, water content 0.126126, heating value, net 14.12 MJ
  note on heating value, net: Value taken from the general comment of the treatment dataset.
- process-specific burdens, municipal waste incineration: 0 kg; pedigree (1,1,1,1,1)
  burden from sludge incineration. Uncertainty calculated from wastewater composition and treatment model
  EcoSpold01Location=CH
- cement, unspecified: 0 kg; pedigree (1,1,1,1,1)
  (same comment as for process-specific burdens, municipal waste incineration)
  properties: dry mass 1 kg, wet mass 1 kg
- electricity, for reuse in municipal waste incineration only: 0 kWh; pedigree (1,1,1,1,1)
- waste cement, hydrated: 0 kg; name w_cement; pedigree (1,1,1,1,1)
  (same comment as for process-specific burdens, municipal waste incineration)
  production volume 0 kg
    (same comment as for waste graphical paper)
  property price 0 EUR2005; name w_cement_price_EUR2005
  properties: dry mass 1 kg, wet mass 1 kg
- waste plastic, mixture: -0.0155 kg; name w_plastic; lognormal variance with pedigree 0.008, pedigree (1,1,4,1,1)
  (same comment as for waste graphical paper)
  production volume 41230 kg; = p_board*w_plastic
    (same comment as for waste graphical paper)
  property price 0 EUR2005; name w_plastic_price_EUR2005
  properties: carbon content, fossil 0.747344, water content 0.180638, dry mass 0.847 kg, heating value, net 30.79 MJ, wet mass 1 kg
  note on carbon content, fossil: C content in 1 kg DM was calculated using data in Tab A.2, ecoinvent v2.2 report 13_I
- chemical, inorganic: 3.21e-12 kg; lognormal variance with pedigree 0.118, pedigree (1,1,4,1,1)
  EcoSpold01Location=GLO
  burden from sludge incineration. Uncertainty calculated from wastewater composition and treatment model
  properties: carbon content, fossil 0.003, dry mass 1 kg, wet mass 1 kg
  note on carbon content, fossil: This dataset is an unweighted average of 20 inorganic substances (listed in Tab 88.1, ecoinvent v2.2 report 8, part II), being part of the top100 chemicals included in this database. The C-content has also been calculated as an unweighted average of the C content of the substances composing this dataset.
- electricity, low voltage: 0.0279 kWh; lognormal variance with pedigree 0.128, pedigree (1,1,4,1,1)
  direct wastewater treatment plant burden. Uncertainty calculated from wastewater composition and treatment model
  EcoSpold01Location=CH
- wastewater treatment facility, capacity 5E9l/year: 5.6882e-9 unit; lognormal variance with pedigree 0.008, pedigree (1,1,4,1,1)
  EcoSpold01Location=CH
  uncertainty heeded in exchanges of the module
- heat, for reuse in municipal waste incineration only: 0 MJ; pedigree (1,1,1,1,1)
- process-specific burdens, slag landfill: 0 kg; pedigree (1,1,1,1,1)
  (same comment as for process-specific burdens, municipal waste incineration)
- heat, district or industrial, natural gas: 0.01698 MJ; lognormal variance with pedigree 0.0411, pedigree (4,2,4,1,1)
  properties: heating value, net 1 MJ
- slag landfill: 0 unit; pedigree (1,1,1,1,1)
  EcoSpold01Location=CH
  burden from sludge incineration. Uncertainty calculated from wastewater composition and treatment model
- residual material landfill: 0 unit; pedigree (1,1,1,1,1)
  (same comment as for slag landfill)
- municipal waste incineration facility: 5.654e-14 unit; lognormal variance with pedigree 0.018, pedigree (1,1,4,1,1)
  (same comment as for process-specific burdens, municipal waste incineration)
- sewer grid, 5E9l/year, 110 km: 2.17e-7 km; lognormal variance with pedigree 0.008, pedigree (1,1,4,1,1)
  uncertainty heeded in exchanges of the module
  EcoSpold01Location=CH
- process-specific burdens, residual material landfill: 0 kg; pedigree (1,1,1,1,1)
  (same comment as for process-specific burdens, municipal waste incineration)
- hydrochloric acid, without water, in 30% solution state: 1.93e-12 kg; lognormal variance with pedigree 0.118, pedigree (1,1,4,1,1)
  burden from sludge incineration. Uncertainty calculated from wastewater composition and treatment model
  EcoSpold01Location=RER
  properties: dry mass 1 kg, wet mass 1 kg, heating value, net 3.32 MJ
- heat, district or industrial, other than natural gas: 0.01258 MJ; lognormal variance with pedigree 0.018, pedigree (1,1,4,1,1)
  (same comment as for process-specific burdens, municipal waste incineration)
  properties: heating value, net 1 MJ
- process-specific burdens, municipal waste incineration: 0.000219513, 6.58702e-6 kg (2 entries); lognormal variance with pedigree 0.018, pedigree (1,1,4,1,1)
  (same comment as for process-specific burdens, municipal waste incineration)
- cement, unspecified: 6.77318e-8, 1.16823e-9 kg (2 entries); lognormal variance with pedigree 0.048, pedigree (1,1,4,1,1)
  (same comment as for process-specific burdens, municipal waste incineration)
- electricity, for reuse in municipal waste incineration only: 3.57205e-8, 2.44941e-7, 6.66443e-7, 8.63927e-6, 1.42882e-8, 2.10241e-6, 1.48087e-6, 1.19409e-7, 3.44856e-6, 1.94932e-7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 kWh (20 entries); lognormal variance with pedigree 0.033, pedigree (1,1,4,1,1)
- waste cement, hydrated: -1.6796e-7, -5.04004e-9 kg (2 entries); lognormal variance with pedigree 0.05, pedigree (1,1,4,5,1)
  (same comment as for process-specific burdens, municipal waste incineration)
  production volume 0.46018 kg
- heat, for reuse in municipal waste incineration only: 1.06713e-7, 7.31744e-7, 1.99095e-6, 2.58092e-5, 9.00168e-5, 6.2808e-6, 4.424e-6, 3.56725e-7, 1.03023e-5, 5.82346e-7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 MJ (20 entries); lognormal variance with pedigree 0.033, pedigree (1,1,4,1,1)
- process-specific burdens, slag landfill: 3.62133e-7, 1.08667e-8 kg (2 entries); lognormal variance with pedigree 0.038, pedigree (1,1,4,1,1)
  (same comment as for process-specific burdens, municipal waste incineration)
- process-specific burdens, residual material landfill: 1.66989e-7, 5.01091e-9 kg (2 entries); lognormal variance with pedigree 0.038, pedigree (1,1,4,1,1)
  (same comment as for process-specific burdens, municipal waste incineration)

## Emissions to nature
- BOD5, Biological Oxygen Demand [water, surface water]: 5.843e-6 kg; lognormal variance with pedigree 0.098, pedigree (1,1,4,1,1)
  sewer overload discharge plus direct wastewater treatment plant emission plus emission from sludge incineration. Uncertainty calculated from wastewater composition and treatment model
- Water [air, unspecified]: 0.1 m3; lognormal variance with pedigree 0.0487, pedigree (2,2,4,1,1)
  Calculated value based on water balance.
- TOC, Total Organic Carbon [water, surface water]: 4.88e-7 kg; lognormal variance with pedigree 0.088, pedigree (1,1,4,1,1)
  (same comment as for BOD5, Biological Oxygen Demand)
- COD, Chemical Oxygen Demand [water, ground-, long-term]: 1.233e-6 kg; lognormal variance with pedigree 0.158, pedigree (1,1,4,1,1)
  emission from sludge incineration. Uncertainty calculated from wastewater composition and treatment model
- Carbon dioxide, non-fossil [air, urban air close to ground]: 0.00059 kg; lognormal variance with pedigree 0.068, pedigree (1,1,4,1,1)
  direct wastewater treatment plant emission plus direct digester gas emission plus emission from sludge incineration. Uncertainty calculated from wastewater composition and treatment model
- DOC, Dissolved Organic Carbon [water, ground-, long-term]: 4.87e-7 kg; lognormal variance with pedigree 0.158, pedigree (1,1,4,1,1)
  (same comment as for COD, Chemical Oxygen Demand)
- DOC, Dissolved Organic Carbon [water, surface water]: 2.13e-5 kg; lognormal variance with pedigree 0.008, pedigree (1,1,4,1,1)
  (same comment as for BOD5, Biological Oxygen Demand)
- COD, Chemical Oxygen Demand [water, surface water]: 8.526e-5 kg; lognormal variance with pedigree 0.008, pedigree (1,1,4,1,1)
  (same comment as for BOD5, Biological Oxygen Demand)
- BOD5, Biological Oxygen Demand [water, ground-, long-term]: 4.033e-7 kg; lognormal variance with pedigree 0.158, pedigree (1,1,4,1,1)
  (same comment as for COD, Chemical Oxygen Demand)
- TOC, Total Organic Carbon [water, ground-, long-term]: 4.88e-7 kg; lognormal variance with pedigree 0.158, pedigree (1,1,4,1,1)
  (same comment as for COD, Chemical Oxygen Demand)
- NMVOC, non-methane volatile organic compounds, unspecified origin [air, urban air close to ground]: 6.591e-9 kg; lognormal variance with pedigree 0.298, pedigree (1,1,4,1,1)
  direct digester gas emission. Uncertainty calculated from wastewater composition and treatment model
- Methane, non-fossil [air, urban air close to ground]: 1.451e-6 kg; lognormal variance with pedigree 0.178, pedigree (1,1,4,1,1)
  direct digester gas emission plus emission from sludge incineration. Uncertainty calculated from wastewater composition and treatment model
- Carbon monoxide, non-fossil [air, urban air close to ground]: 4.732e-7 kg; lognormal variance with pedigree 0.198, pedigree (1,1,4,1,1)
  (same comment as for Methane, non-fossil)
- Water [water, unspecified]: 0.9 m3; lognormal variance with pedigree 0.0487, pedigree (2,2,4,1,1)
  Calculated value based on water balance.
  property carbon content, fossil 0; name C_content_fossil
  property carbon content, non-fossil 0; name C_content_non_fossil
  property water in wet mass 1000 kg; name WWM
  property wet mass 1000 kg; name WM
  property dry mass 0 kg; name DM

## Sampling procedure
Survey among member companies of the European Panel Federation; generation of dataset with ecoinvent 2.0 tool for treatment of wastewater

## Extrapolations
This dataset has been extrapolated from year 2012 to the year of the calculation (2021). The uncertainty has been adjusted accordingly.
