# hard coal coke factory construction

Dataset: EcoSpold 2, unit process
Geography: RoW
Time period: 1990-01-01 to 2021-12-31
Technology level: current
Classification: EcoSpold01Categories: hard coal/production
Classification: ISIC rev.4 ecoinvent: 4290:Construction of other civil engineering projects
Tags: ConvertedDataset
Scenario: Business-as-Usual
System model: Allocation, cut-off by classification
Generated by: Christian Bauer
Published in: Röder, A. 2007
Database: ecoinvent
isCopyrightProtected: true
accessRestrictedTo: 1

## General comment
The material input has been roughly estimated on the basis of the total cost of a modern German coke plant using the energy intensity of the construction sector. Due to total lack of information on the energy use for construction, 50 percent of the grey energy of input materials is used as first guess. The lifetime is assumed to be 30 years.
[This dataset was already contained in the ecoinvent database version 2. It was not individually updated during the transfer to ecoinvent version 3. Life Cycle Impact Assessment results may still have changed, as they are affected by changes in the supply chain, i.e. in other datasets. This dataset was generated following the ecoinvent quality guidelines for version 2. It may have been subject to central changes described in the ecoinvent version 3 change report (http://www.ecoinvent.org/database/ecoinvent-version-3/reports-of-changes/), and the results of the central updates were reviewed extensively. The changes added e.g. consistent water flows and other information throughout the database. The documentation of this dataset can be found in the ecoinvent reports of version 2, which are still available via the ecoinvent website. The change report linked above covers all central changes that were made during the conversion process.]

## Included activities end
Includes the most important construction materials for the plant and their disposal. Also included is the landuse of the plant and the energy needed for the construction.

## Geography
German condition, but with very poor base data.

## Technology
No specific information available.

## Reference product
- hard coal coke factory: 1 unit; CPC 53269: Other constructions for manufacturing; By-product classification allocatable product
  EcoSpold01Location=RER
  production volume 2.67763 unit
    This is a placeholder value that does not reflect real-world production volumes. This dataset does not currently require a real-world production volume to work in the database framework, and no actual data were collected yet. This has no negative effect on the results of the ecoinvent database.
  property price 1.43924e8 EUR2005
    Calculated based on inputs: The price of the product has been calculated as a sum of the values of the material and energy inputs for this product. This value is therefore a rough estimation. It may underestimate the real price since there are additional expenses when producing any product. These expences can include for example labour costs, treatment of waste materials and profit for the producer. Please consider carefully whether this level of data quality is acceptable for your application.

## Inputs from technosphere
- waste polyethylene/polypropylene product: -1.5e6 kg; lognormal variance with pedigree 0.342, pedigree (1,1,5,5,1)
  EcoSpold01Location=CH
  own assumption
  production volume 4.5e6 kg
    Calculated from the production volume of hard coal coke factory in proportion to the respective output amounts.
  properties: heating value, net 42.47 MJ, carbon content, fossil 0.748045, water content 0.180638, dry mass 0.847 kg, wet mass 1 kg
  note on carbon content, fossil: Mixed various plastics was used to estimate the C content of this waste (Tab A.2, ecoinvent v2.2 report 13_I)
- stone wool: 7.5e6 kg; lognormal variance with pedigree 0.342, pedigree (1,1,5,5,1)
  EcoSpold01Location=CH
  own assumption
  properties: carbon content, fossil 0.015401, wet mass 1 kg, dry mass 1 kg
  note on carbon content, fossil: The chemical composition of the glass fibres used in the rock wool production is similar to the composition of naturally cooled volcano basalt and has a composition listed in Tab. 3.1 and 3.2 in ecoinvent v2.2 report 16, part XIV. Rock wool contains: a minimum of 96% mineral fibres,between 0.5 and 3.0 weight percent of phenolic resin depending on the specific product characteristics, and about 0.2 percent mineral oil (ecoinvent v2.2 report 16, part XIV). An average composition of 1.8% phenolic resin, 0.2% mineral oil, and 98% mineral fibres has been assumed and used to calculate C content of the rock wool
- waste reinforced concrete: -4e8 kg; lognormal variance with pedigree 0.342, pedigree (1,1,5,5,1)
  EcoSpold01Location=CH
  own assumption
  production volume 1.2e9 kg
    (same comment as for waste polyethylene/polypropylene product)
  properties: water content 0.00585407, dry mass 0.99418 kg, wet mass 1 kg
- steel, chromium steel 18/8, hot rolled: 1.35e6 kg; lognormal variance with pedigree 0.342, pedigree (1,1,5,5,1)
  own assumption
  EcoSpold01Location=RER
  properties: carbon content, fossil 0.0008, dry mass 1 kg, wet mass 1 kg
  note on carbon content, fossil: Stainless steel model is the grade 304 steel (18/8 stainless, 18% chromium 8% nickel; max. 0.08% C)
- steel, low-alloyed, hot rolled: 1.35e7 kg; lognormal variance with pedigree 0.342, pedigree (1,1,5,5,1)
  EcoSpold01Location=RER
  own assumption
  properties: dry mass 1 kg, carbon content, fossil 0.005, wet mass 1 kg
  note on carbon content, fossil: Low alloyed steel composition given in Tab. 3.2 ecoinvent v2.2 report 10_partII. Steel assumed to have a C content of 0.5%
- waste mineral wool: -7.5e6 kg; lognormal variance with pedigree 0.342, pedigree (1,1,5,5,1)
  EcoSpold01Location=CH
  own assumption
  production volume 2.25e7 kg
    (same comment as for waste polyethylene/polypropylene product)
  properties: dry mass 1 kg, wet mass 1 kg
- heat, district or industrial, other than natural gas: 0 MJ; pedigree (1,1,1,1,1)
  own assumption
  EcoSpold01Location=RER
  properties: heating value, net 1 MJ
- diesel, burned in building machine: 7.5e8 MJ; lognormal variance with pedigree 0.342, pedigree (1,1,5,5,1)
  EcoSpold01Location=GLO
  own assumption
  properties: heating value, net 1 MJ
- reinforcing steel: 1.35e8 kg; lognormal variance with pedigree 0.342, pedigree (1,1,5,5,1)
  own assumption
  EcoSpold01Location=RER
  properties: dry mass 1 kg, carbon content, fossil 0.004, wet mass 1 kg
- concrete, normal: 0 m3; pedigree (1,1,1,1,1)
  EcoSpold01Location=CH
  own assumption
  properties: water content 0.086758, wet mass 2380 kg, dry mass 2190 kg
- electricity, medium voltage: 0 kWh; pedigree (1,1,1,1,1)
  own assumption
  EcoSpold01Location=UCTE
- polyethylene, high density, granulate: 1.5e6 kg; lognormal variance with pedigree 0.342, pedigree (1,1,5,5,1)
  EcoSpold01Location=RER
  own assumption
  properties: wet mass 1 kg, heating value, net 42.47 MJ, carbon content, fossil 0.857143, dry mass 1 kg
  note on carbon content, fossil: Polyethylene is formed out of a huge amount of ethylene monomers (C2H4) (ecoinvent v2.2 report 11_II). MW=28 g/mol
- heat, district or industrial, other than natural gas: 304009, 7.49696e8 MJ (2 entries); lognormal variance with pedigree 0.342, pedigree (1,1,5,5,1)
  own assumption
  EcoSpold01Location=RER
- concrete, normal: 3912.76, 407.704, 3300.65, 1856.62, 7862.25, 265.189, 155395 m3 (7 entries); lognormal variance with pedigree 0.342, pedigree (1,1,5,5,1)
  EcoSpold01Location=CH
  own assumption
- electricity, medium voltage: 656730, 125933, 2.11415e6, 3.07484e7, 4.334e6, 1.41208e7 kWh (6 entries); lognormal variance with pedigree 0.342, pedigree (1,1,5,5,1)
  own assumption
  EcoSpold01Location=UCTE

## Inputs from nature
- Occupation, industrial area [natural resource, land]: 6e6 m2*year; lognormal variance with pedigree 0.342, pedigree (1,1,5,5,1)
  own assumption
- Transformation, to industrial area [natural resource, land]: 200000 m2; lognormal variance with pedigree 0.342, pedigree (1,1,5,5,1)
  own assumption
- Transformation, from unspecified [natural resource, land]: 200000 m2; lognormal variance with pedigree 0.342, pedigree (1,1,5,5,1)
  own assumption

## Sampling procedure
literature

## Extrapolations
see Geography/Text This dataset has been copied from an original dataset covering the geography RER. The uncertainty has been adjusted accordingly.

## Review by Hans-Jörg Althaus 2003-07-04
passed
