# treatment of copper in car shredder residue, municipal incineration

Dataset: EcoSpold 2, unit process
Geography: RoW
Time period: 2006-01-01 to 2021-12-31
Technology level: current
Classification: ISIC rev.4 ecoinvent: 3821:Treatment and disposal of non-hazardous waste
Synonyms: Kehrichtverbrennung; municipal waste incineration; Siedlungsabfallverbrennung
Scenario: Business-as-Usual
System model: Allocation, cut-off by classification
Share of production covered: 1.8 %
Generated by: Gabor Doka
Published in: Doka G. 2013
Database: ecoinvent
isCopyrightProtected: true
accessRestrictedTo: 1

## General comment
This dataset represents the activity of waste disposal of copper in car shredder residue in a municipal solid waste incinerator (MSWI) // Recommended use of this dataset: For disposal of rather fine or dusty copper, which goes to incineration as part of Automotive Shredder Residue (ASR). Due to fine grain size of the particles, 50% burnability is assumed, therefore not suited for less fine copper parts in waste. Pure, isolated copper fractions will not be disposed in incinerators, but rather go to recycling. // Inventoried waste contains 50% Cu in ASR burnable; 50% Cu in ASR inert; . // Waste composition (wet, in ppm): H2O n.a.; O n.a.; H n.a.; C n.a.; S 0.0000028372; N n.a.; P n.a.; B n.a.; Cl n.a.; Br n.a.; F n.a.; I n.a.; Ag 489.05; As n.a.; Ba n.a.; Cd n.a.; Co n.a.; Cr 2.7346; Cu 924870; Hg n.a.; Mn 1483.2; Mo n.a.; Ni 4062.3; Pb 0.0044823; Sb 3438.1; Se n.a.; Sn 8733.9; V 0.00002178; Zn 1075.5; Be n.a.; Sc n.a.; Sr n.a.; Ti n.a.; Tl n.a.; W n.a.; Si 6428.2; Fe 9181.1; Ca n.a.; Al 40233; K n.a.; Mg n.a.; Na n.a.; // Share of carbon in waste that is biogenic 60.4%. // Share of metals in waste not oxidised and bulk-recyclable (exclude very small or thin parts) Iron: 0%; Alu: 0%; Copper: 50%. // One kg of this waste produces 1.135 kg of slag and 0.07842 kg of residues, which are landfilled. Additional solidification with 0.03137 kg of cement. // Net energy production: 0MJ/kg electric energy and 0MJ/kg thermal energy. // Recovery of metal scrap to recycling: 0g iron scrap, 0g aluminium scrap, 135.4g copper scrap.

## Included activities start
waste incineration from waste reception gate and delivery into waste bunker at incinerator plant site (without transports to the incinerator)

## Included activities end
Waste-specific short-term emissions to water from leachate. Long-term emissions from landfill to ground water.

## Geography
Specific to the technology mix encountered in Switzerland in 2010. Well applicable to modern incineration practices in Europe, North America or Japan.

## Technology
average Swiss MSWI plants in 2010 (grate incinerators) with electrostatic precipitator for fly ash (ESP), wet flue gas scrubber and 25% SNCR , 42.77% SCR-high dust , 32.68% SCR-low dust -DeNOx facilities and 0% without Denox (weighted according to mass of burnt waste, representing Swiss average). Efficiency of iron scrap separation from slag : 58%. Efficiency of non-ferrous scrap separation from slag : 31%. Gross electric efficiency technology mix 15.84% and Gross thermal efficiency technology mix 28.51%

## Time period
Waste composition as given in literature reference, theoretical data or other source. Transfer coefficients for modern MSWI.

## Reference product
- copper in car shredder residue: -1 kg; By-product classification Waste; CPC 39361: Waste and scrap of copper; CAS 7440-50-8
  Main reference product of this activity (supply of disposal service).
  production volume 6.257e7 kg
    based on estimate on MSW in WTE globally and share of copper metal from shredder residue composition in Swiss MSW
  property price 0 EUR2005
    Waste products are assigned a price of zero as they are assumed to require further treatment.
  property carbon content 0
    carbon content on a dry matter basis (reserved; not for manual entry)
  properties: wet mass 1 kg, carbon content, fossil 0, water in wet mass 0 kg, carbon content, non-fossil 0, water content 0, dry mass 1 kg, carbon allocation 0 kg

## By-products
- copper scrap, sorted, pressed: 0 kg; CPC 39361: Waste and scrap of copper; By-product classification Recyclable; pedigree (1,1,1,1,1)
  Copper scrap recovered from this waste.
  Uncertainty: uncertainty calculated from uncertainty in waste composition, uncertainty of share of recyclable metal, uncertainty of transfer coefficient to bottom ash, uncertainty of the efficiency of scrap removal in MSWI plant.
  production volume 0 kg
    calculated in proportion to reference product waste input to incinerator
  property price 2.84 EUR2005
    Temporary price data. Calculated as 90% of purchasers price based on: Source: USGS Mineral Yearbook 2007, Table 1 in <http://minerals.usgs.gov/minerals/pubs/commodity/recycle/myb1-2007-recyc.pdf>
  property carbon content 0
    carbon content on a dry matter basis (reserved; not for manual entry)
  properties: water in wet mass 0 kg, carbon content, non-fossil 0, carbon content, fossil 0, wet mass 1 kg, dry mass 1 kg, water content 0, carbon allocation 0 kg

## Inputs from technosphere
- waste cement, hydrated: 0 kg; pedigree (1,1,1,1,1)
  Hydrated cement output for solidification of landfilled residual material.
  Uncertainty: Uncertainty calculated from uncertainty of the waste composition of this waste and transfer coefficients in the incinerator and of the solidification recipe.
  production volume 0 kg
    calculated in proportion to reference product waste input to incinerator
  properties: wet mass 1 kg, dry mass 1 kg
- titanium dioxide: 3.2122e-6 kg; lognormal variance with pedigree 0.5583, pedigree (1,1,4,1,1)
  Input to DeNOx stage (TiO2 catalyst carrier)
  Uncertainty: uncertainty calculated from uncertainty in average DeNOx input, uncertainty in the share of thermal NOx, uncertainty of nitrogen content in average municipal waste and the uncertainty in nitrogen content in *this* waste.
  properties: wet mass 1 kg, dry mass 1 kg
- slag landfill: 2.0178e-9 unit; lognormal variance with pedigree 0.0121197, pedigree (1,1,4,1,1)
  Landfill infrastructure required for landfilling of bottom ash.
  Uncertainty: uncertainty is calculated from uncertainties in waste composition and transfer coefficients in incinerator
- residual material landfill: 1.6338e-10 unit; lognormal variance with pedigree 0.0111965, pedigree (1,1,4,1,1)
  Landfill infrastructure required for landfilling of incineration residues.
  Uncertainty: uncertainty is calculated from uncertainties in waste composition and transfer coefficients in incinerator
- process-specific burdens, residual material landfill: 0 kg; pedigree (1,1,1,1,1)
  Mass-specific expenditures required for landfilling of incineration residues.
  Uncertainty: uncertainty is calculated from uncertainties in waste composition and transfer coefficients in incinerator
- municipal waste incineration facility: 2.5e-10 unit
  Demands per kilogram waste.
- chemical, inorganic: 2.2249e-5 kg; lognormal variance with pedigree 0.027278, pedigree (1,1,4,1,1)
  Auxilliary inputs for the wastewater treatment stage of the incinerator plant. Proxy for Polyelectrolyte.
  Uncertainty: uncertainty calculated from uncertainty in average Polyelectrolyte input, of transfer coefficients in the incinerator, and the uncertainty of the waste composition of this waste
  properties: wet mass 1 kg, carbon content, fossil 0.003, dry mass 1 kg
- transport, freight, lorry, unspecified: 0 metric ton*km; pedigree (1,1,1,1,1)
  Transport services to transport incineration residues to landfills.
  Uncertainty: uncertainty calculated from uncertainty of the waste composition of this waste, uncertainty of transfer coefficients and the uncertainty in generic transportation distances
- iron (III) chloride, without water, in 40% solution state: 0.0010536 kg; lognormal variance with pedigree 0.028885, pedigree (1,1,4,1,1)
  Auxilliary inputs for the wastewater treatment stage of the incinerator plant.
  Uncertainty: uncertainty calculated from uncertainty in average FeCl3 input, of transfer coefficients in the incinerator, and the uncertainty of the waste composition of this waste
  properties: dry mass 1 kg, wet mass 1 kg
- hydrochloric acid, without water, in 30% solution state: 5.848e-6 kg; lognormal variance with pedigree 0.027278, pedigree (1,1,4,1,1)
  Auxilliary inputs for the wastewater treatment stage of the incinerator plant.
  Uncertainty: uncertainty calculated from uncertainty in average HCl input, of transfer coefficients in the incinerator, and the uncertainty of the waste composition of this waste
  properties: heating value, net 3.32 MJ, wet mass 1 kg, dry mass 1 kg
- heat, for reuse in municipal waste incineration only: 0 MJ; name E_th_prod_MSWI; pedigree (1,1,1,1,1)
  Net heat required to incinerate this waste (subsidiesed from high-calorific waste fractions).
  Uncertainty: uncertainty is calculated from uncertainties in waste composition and uncertainties in energy efficiency and the uncertainty in internal energy demand
- ammonia, anhydrous, liquid: 0 kg; pedigree (1,1,1,1,1)
  Input to DeNOx stage (100% NH3).
  Uncertainty: uncertainty calculated from uncertainty in average DeNOx input, uncertainty in the share of thermal NOx, uncertainty of nitrogen content in average municipal waste and the uncertainty in nitrogen content in *this* waste.
  properties: dry mass 1 kg, wet mass 1 kg
- chromium oxide, flakes: 6.5555e-8 kg; lognormal variance with pedigree 0.5583, pedigree (1,1,4,1,1)
  Input to DeNOx stage.
  Uncertainty: uncertainty calculated from uncertainty in average DeNOx input, uncertainty in the share of thermal NOx, uncertainty of nitrogen content in average municipal waste and the uncertainty in nitrogen content in *this* waste.
  properties: wet mass 1 kg, dry mass 1 kg
- water, decarbonised: 0 kg; pedigree (1,1,1,1,1)
  Incinerator process water used in flue gas scrubber stage.
  Uncertainty: uncertainty calculated from uncertainty in average water input, and the uncertainty of the waste composition of this waste
  properties: wet mass 1 kg
- heat, district or industrial, natural gas: 0 MJ; pedigree (1,1,1,1,1)
  Input to DeNOx stage, to heat up flue gas in low-dust SCR.
  Uncertainty: uncertainty calculated from uncertainty in average DeNOx input, uncertainty in the share of thermal NOx, uncertainty of nitrogen content in average municipal waste and the uncertainty in nitrogen content in *this* waste.
  properties: heating value, net 1 MJ
- electricity, for reuse in municipal waste incineration only: 0 kWh; name E_el_prod_MSWI; pedigree (1,1,1,1,1)
  Net electricity required to incinerate this waste (subsidiesed from high-calorific waste fractions).
  Uncertainty: uncertainty is calculated from uncertainties in waste composition and uncertainties in energy efficiency and the uncertainty in internal energy demand
- process-specific burdens, slag landfill: 0 kg; pedigree (1,1,1,1,1)
  Mass-specific expenditures required for landfilling of bottom ash.
  Uncertainty: uncertainty is calculated from uncertainties in waste composition and transfer coefficients in incinerator
- cement, unspecified: 0 kg; pedigree (1,1,1,1,1)
  Cement required for solidification of landfilled residual material.
  Uncertainty: Uncertainty calculated from uncertainty of the waste composition of this waste, of transfer coefficients in the incinerator and of the solidification recipe.
  properties: wet mass 1 kg, dry mass 1 kg
- sodium hydroxide, without water, in 50% solution state: 4.9031e-13 kg; lognormal variance with pedigree 1.3962, pedigree (1,1,4,1,1)
  Auxilliary inputs for the flue gas treatment stage of the incinerator plant.
  Uncertainty: uncertainty calculated from uncertainty in average NaOH input, of transfer coefficients in the incinerator, and the uncertainty of the waste composition of this waste
  properties: heating value, net 3.03 MJ, dry mass 1 kg, wet mass 1 kg
- copper scrap, sorted, pressed: -0.1354 kg; lognormal variance with pedigree 0.018156, pedigree (1,1,4,1,1)
  (same comment as for copper scrap, sorted, pressed)
  production volume 8.4719e6 kg
  properties: price 2.84 EUR2005, wet mass 1 kg, dry mass 1 kg
- waste cement, hydrated: -0.0221844, -0.0562406 kg (2 entries); lognormal variance with pedigree 0.02028, pedigree (1,1,4,1,1)
  (same comment as for waste cement, hydrated)
  production volume 4.907e6 kg
- process-specific burdens, residual material landfill: 0.0221844, 0.0562406 kg (2 entries); lognormal variance with pedigree 0.0111965, pedigree (1,1,4,1,1)
  (same comment as for process-specific burdens, residual material landfill)
- transport, freight, lorry, unspecified: 0.00555473, 0.000869666, 0.0421136 metric ton*km (3 entries); lognormal variance with pedigree 0.0116188, pedigree (1,1,4,1,1)
  (same comment as for transport, freight, lorry, unspecified)
- heat, for reuse in municipal waste incineration only: 0.000145216, 0.000287319, 0.00656564, 4.22527e-6, 0.00188247, 0.000391171, 0.000322678, 9.8738e-5, 0.000751432, 0.000588203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 MJ (25 entries); lognormal variance with pedigree 0.00859512, pedigree (1,1,4,1,1)
  (same comment as for heat, for reuse in municipal waste incineration only)
- ammonia, anhydrous, liquid: 1.07469e-5, 9.23821e-7, 1.43723e-6, 2.84766e-6, 2.78995e-6, 2.92417e-7, 1.30721e-6, 3.09248e-5 kg (8 entries); lognormal variance with pedigree 0.18537, pedigree (1,1,4,1,1)
  (same comment as for ammonia, anhydrous, liquid)
- water, decarbonised: 0.00237829, 0.00618832, 0.0249589, 0.00609484, 0.00122869, 0.00404017, 0.000223041, 0.00317829, 0.00740354, 0.0464404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 kg (12 entries); lognormal variance with pedigree 0.028885, pedigree (1,1,4,1,1)
  (same comment as for water, decarbonised)
- heat, district or industrial, natural gas: 0.000145519, 0.00944188 MJ (2 entries); lognormal variance with pedigree 0.18537, pedigree (1,1,4,1,1)
  (same comment as for heat, district or industrial, natural gas)
- electricity, for reuse in municipal waste incineration only: 0.000152941, 0.000302603, 3.27898e-6, 4.45005e-6, 0.00198261, 0.000411981, 0.000339843, 0.000103991, 0.000791406, 0.000619493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 kWh (25 entries); lognormal variance with pedigree 0.00859512, pedigree (1,1,4,1,1)
  (same comment as for electricity, for reuse in municipal waste incineration only)
- process-specific burdens, slag landfill: 0.321062, 0.813938 kg (2 entries); lognormal variance with pedigree 0.0121197, pedigree (1,1,4,1,1)
  (same comment as for process-specific burdens, slag landfill)
- cement, unspecified: 0.00452969, 0.000942495, 6.90313e-5, 0.000196762, 0.00444983, 0.000130972, 0.00143846, 0.000174037, 0.0194387 kg (9 entries); lognormal variance with pedigree 0.02028, pedigree (1,1,4,1,1)
  (same comment as for cement, unspecified)

## Inputs from nature
- Oxygen [natural resource, in air]: 0.15778 kg; lognormal variance with pedigree 0.008, pedigree (1,1,4,1,1)
  Oxygen from ambient air needed to combust and oxidise this waste. Net demand, i.e. without O2 leaving the plant in flue gas uncombusted.
  Uncertainty: uncertainty is calculated from uncertainties in waste composition and transfer coefficients to flue gas and soild residues in incinerator

## Emissions to nature
- Benzene, hexachloro- [air, urban air close to ground]: 1.0055e-10 kg; lognormal variance with pedigree 0.11508, pedigree (1,1,4,1,1)
  Incomplete combustion product emitted to air.
  Uncertainty: uncertainty calculated from uncertainty in average operation emissions, and the uncertainty of the flue gas volume from this waste.
- Dioxins, measured as 2,3,7,8-tetrachlorodibenzo-p-dioxin [air, urban air close to ground]: 9.617e-14 kg; lognormal variance with pedigree 0.46202, pedigree (1,1,4,1,1)
  (same comment as for Benzene, hexachloro-)
- Antimony [water, ground-, long-term]: 0.001342 kg; lognormal variance with pedigree 0.45907, pedigree (1,1,4,1,1)
  Long-term emissions from landfilling of incineration residues.
  Uncertainty: uncertainty is calculated from uncertainties in waste composition and transfer coefficients in incinerator and landfills.
- Lead [water, ground-, long-term]: 3.3247e-9 kg; lognormal variance with pedigree 3.2626, pedigree (1,1,4,1,1)
  (same comment as for Antimony)
- Sulfate [water, ground-, long-term]: 7.3813e-12 kg; lognormal variance with pedigree 1.6464, pedigree (1,1,4,1,1)
  (same comment as for Antimony)
- Nickel, ion [water, surface water]: 2.6438e-6 kg; lognormal variance with pedigree 1.1285, pedigree (1,1,4,1,1)
  Emissions to water from waste composition and transfer coefficients in incinerator and landfills.
  Uncertainty: uncertainty is calculated from uncertainties in waste composition and transfer coefficients in incinerator and landfills
- Vanadium, ion [water, ground-, long-term]: 6.1409e-12 kg; lognormal variance with pedigree 1.9538, pedigree (1,1,4,1,1)
  (same comment as for Antimony)
- Copper, ion [water, surface water]: 7.1276e-5 kg; lognormal variance with pedigree 0.39137, pedigree (1,1,4,1,1)
  (same comment as for Nickel, ion)
- Benzene [air, urban air close to ground]: 4.8088e-8 kg; lognormal variance with pedigree 0.11508, pedigree (1,1,4,1,1)
  (same comment as for Benzene, hexachloro-)
- NMVOC, non-methane volatile organic compounds, unspecified origin [air, urban air close to ground]: 2.1885e-6 kg; lognormal variance with pedigree 0.11508, pedigree (1,1,4,1,1)
  (same comment as for Benzene, hexachloro-)
- Heat, waste [air, urban air close to ground]: 0.15968 MJ; lognormal variance with pedigree 0.00898726, pedigree (1,1,4,1,1)
  Waste heat generated from heating value of this waste plus any electricity required to process it.
  Uncertainty: uncertainty is calculated from uncertainties in waste composition and uncertainties in energy efficiency and the uncertainty in internal energy demand
- Lead [air, urban air close to ground]: 1.8464e-13 kg; lognormal variance with pedigree 1.9713, pedigree (1,1,4,1,1)
  Emission to air from waste composition and transfer coefficients.
  Uncertainty: uncertainty is calculated from uncertainties in waste composition and transfer coefficients in incinerator
- Methane, non-fossil [air, urban air close to ground]: 4.3575e-7 kg; lognormal variance with pedigree 0.11508, pedigree (1,1,4,1,1)
  (same comment as for Benzene, hexachloro-)
- Copper [air, urban air close to ground]: 4.2355e-5 kg; lognormal variance with pedigree 0.047542, pedigree (1,1,4,1,1)
  (same comment as for Lead)
- Silver, ion [water, surface water]: 9.1594e-7 kg; lognormal variance with pedigree 0.73998, pedigree (1,1,4,1,1)
  (same comment as for Nickel, ion)
- Benzo(a)pyrene [air, urban air close to ground]: 1.0701e-12 kg; lognormal variance with pedigree 0.46202, pedigree (1,1,4,1,1)
  (same comment as for Benzene, hexachloro-)
- Iron [air, urban air close to ground]: 8.227e-9 kg; lognormal variance with pedigree 0.454, pedigree (1,1,4,1,1)
  (same comment as for Lead)
- Aluminium [water, surface water]: 2.4413e-6 kg; lognormal variance with pedigree 0.65023, pedigree (1,1,4,1,1)
  (same comment as for Nickel, ion)
- Manganese [air, urban air close to ground]: 1.4163e-7 kg; lognormal variance with pedigree 0.65121, pedigree (1,1,4,1,1)
  (same comment as for Lead)
- Benzene, pentachloro- [air, urban air close to ground]: 2.5407e-10 kg; lognormal variance with pedigree 0.11508, pedigree (1,1,4,1,1)
  (same comment as for Benzene, hexachloro-)
- Iron, ion [water, ground-, long-term]: 0.0047039 kg; lognormal variance with pedigree 0.50942, pedigree (1,1,4,1,1)
  (same comment as for Antimony)
- Nickel, ion [water, ground-, long-term]: 0.0039796 kg; lognormal variance with pedigree 0.47729, pedigree (1,1,4,1,1)
  (same comment as for Antimony)
- Silicon [air, urban air close to ground]: 5.0061e-9 kg; lognormal variance with pedigree 0.50235, pedigree (1,1,4,1,1)
  (same comment as for Lead)
- Chromium, ion [water, surface water]: 1.0617e-10 kg; lognormal variance with pedigree 1.4871, pedigree (1,1,4,1,1)
  (same comment as for Nickel, ion)
- Manganese [water, surface water]: 1.5339e-7 kg; lognormal variance with pedigree 0.84496, pedigree (1,1,4,1,1)
  (same comment as for Nickel, ion)
- Tin [air, urban air close to ground]: 2.8525e-9 kg; lognormal variance with pedigree 0.47462, pedigree (1,1,4,1,1)
  (same comment as for Lead)
- Water [air, urban air close to ground]: 0.0007878 m3; lognormal variance with pedigree 0.20009, pedigree (1,1,4,1,1)
  Water vapour from waste humidity, hydrogen oxidation and part of the process water.
  Uncertainty: Uncertainty calculated from uncertainty in waste composition, process water input and the uncertainty of fraction to air.
- Tin, ion [water, surface water]: 1.8538e-7 kg; lognormal variance with pedigree 1.037, pedigree (1,1,4,1,1)
  (same comment as for Nickel, ion)
- Carbon monoxide, fossil [air, urban air close to ground]: 3.2363e-5 kg; lognormal variance with pedigree 0.87146, pedigree (1,1,4,1,1)
  (same comment as for Benzene, hexachloro-)
- Vanadium [air, urban air close to ground]: 2.3097e-13 kg; lognormal variance with pedigree 1.9367, pedigree (1,1,4,1,1)
  (same comment as for Lead)
- Zinc, ion [water, ground-, long-term]: 0.00070125 kg; lognormal variance with pedigree 1.089, pedigree (1,1,4,1,1)
  (same comment as for Antimony)
- Sulfate [water, surface water]: 1.1078e-12 kg; lognormal variance with pedigree 1.3346, pedigree (1,1,4,1,1)
  (same comment as for Nickel, ion)
- Heat, waste [water, surface water]: 0.036509 MJ; lognormal variance with pedigree 0.00898726, pedigree (1,1,4,1,1)
  (same comment as for Heat, waste)
- Particulates, < 2.5 um [air, urban air close to ground]: 5.7414e-6 kg; lognormal variance with pedigree 0.46202, pedigree (1,1,4,1,1)
  (same comment as for Benzene, hexachloro-)
- Copper, ion [water, ground-, long-term]: 0.74009 kg; lognormal variance with pedigree 0.0095141, pedigree (1,1,4,1,1)
  (same comment as for Antimony)
- Ammonia [air, urban air close to ground]: 6.028e-8 kg; lognormal variance with pedigree 0.23591, pedigree (1,1,4,1,1)
  Nitrogen species emitted to air after DeNOx stage.
  Uncertainty: uncertainty calculated from uncertainty in average N-emissions and uncertainty in the share of thermal NOx and the uncertainty in nitrogen content in *this* waste.
- Particulates, > 2.5 um, and < 10um [air, urban air close to ground]: 2.8851e-8 kg; lognormal variance with pedigree 0.22992, pedigree (1,1,4,1,1)
  (same comment as for Benzene, hexachloro-)
- Silicon [water, surface water]: 9.0662e-7 kg; lognormal variance with pedigree 0.66604, pedigree (1,1,4,1,1)
  (same comment as for Nickel, ion)
- Antimony [air, urban air close to ground]: 1.3771e-9 kg; lognormal variance with pedigree 0.58683, pedigree (1,1,4,1,1)
  (same comment as for Lead)
- Sulfur dioxide [air, urban air close to ground]: 1.5086e-14 kg; lognormal variance with pedigree 1.9448, pedigree (1,1,4,1,1)
  (same comment as for Lead)
- Zinc, ion [water, surface water]: 6.4523e-8 kg; lognormal variance with pedigree 0.7729, pedigree (1,1,4,1,1)
  (same comment as for Nickel, ion)
- Chromium VI [water, ground-, long-term]: 1.3437e-7 kg; lognormal variance with pedigree 2.962, pedigree (1,1,4,1,1)
  (same comment as for Antimony)
- Aluminium [water, ground-, long-term]: 0.03098 kg; lognormal variance with pedigree 0.21358, pedigree (1,1,4,1,1)
  (same comment as for Antimony)
- Methane, fossil [air, urban air close to ground]: 2.8557e-7 kg; lognormal variance with pedigree 0.11508, pedigree (1,1,4,1,1)
  (same comment as for Benzene, hexachloro-)
- Silver, ion [water, ground-, long-term]: 0.00040355 kg; lognormal variance with pedigree 0.74021, pedigree (1,1,4,1,1)
  (same comment as for Antimony)
- Antimony [water, surface water]: 0.00059366 kg; lognormal variance with pedigree 0.51758, pedigree (1,1,4,1,1)
  (same comment as for Nickel, ion)
- Toluene [air, urban air close to ground]: 9.6177e-8 kg; lognormal variance with pedigree 0.11508, pedigree (1,1,4,1,1)
  (same comment as for Benzene, hexachloro-)
- Carbon monoxide, non-fossil [air, urban air close to ground]: 4.9382e-5 kg; lognormal variance with pedigree 0.87146, pedigree (1,1,4,1,1)
  (same comment as for Benzene, hexachloro-)
- Nickel [air, urban air close to ground]: 2.5516e-6 kg; lognormal variance with pedigree 0.50931, pedigree (1,1,4,1,1)
  (same comment as for Lead)
- Water [water, surface water]: 0.00041103 m3; lognormal variance with pedigree 0.18893, pedigree (1,1,4,1,1)
  Process water released to surface water.
  Uncertainty: uncertainty calculated from uncertainty in process water input and the uncertainty of fraction to surface water.
- Tin, ion [water, ground-, long-term]: 0.0060139 kg; lognormal variance with pedigree 0.5124, pedigree (1,1,4,1,1)
  (same comment as for Antimony)
- Aluminium [air, urban air close to ground]: 1.6401e-8 kg; lognormal variance with pedigree 0.29583, pedigree (1,1,4,1,1)
  (same comment as for Lead)
- Nitrogen oxides [air, urban air close to ground]: 1.9089e-5 kg; lognormal variance with pedigree 0.23591, pedigree (1,1,4,1,1)
  Sum of fuel-Nox and thermal-NOx emitted to air after DeNOx stage.
  Uncertainty: uncertainty calculated from uncertainty in average N-emissions and uncertainty in the share of thermal NOx and the uncertainty in nitrogen content in *this* waste.
- Silicon [water, ground-, long-term]: 0.00035212 kg; lognormal variance with pedigree 5.557, pedigree (1,1,4,1,1)
  (same comment as for Antimony)
- Lead [water, surface water]: 2.5529e-13 kg; lognormal variance with pedigree 1.7626, pedigree (1,1,4,1,1)
  (same comment as for Nickel, ion)
- Chromium VI [water, surface water]: 3.8252e-8 kg; lognormal variance with pedigree 1.5094, pedigree (1,1,4,1,1)
  (same comment as for Nickel, ion)
- Chromium [air, urban air close to ground]: 1.1939e-9 kg; lognormal variance with pedigree 1.4696, pedigree (1,1,4,1,1)
  (same comment as for Lead)
- Phenol, pentachloro- [air, urban air close to ground]: 2.0942e-11 kg; lognormal variance with pedigree 0.11508, pedigree (1,1,4,1,1)
  (same comment as for Benzene, hexachloro-)
- Iron, ion [water, surface water]: 1.5909e-7 kg; lognormal variance with pedigree 1.0132, pedigree (1,1,4,1,1)
  (same comment as for Nickel, ion)
- Manganese [water, ground-, long-term]: 0.001199 kg; lognormal variance with pedigree 0.85842, pedigree (1,1,4,1,1)
  (same comment as for Antimony)
- Vanadium, ion [water, surface water]: 2.2219e-14 kg; lognormal variance with pedigree 1.7342, pedigree (1,1,4,1,1)
  (same comment as for Nickel, ion)
- Zinc [air, urban air close to ground]: 3.6043e-7 kg; lognormal variance with pedigree 0.68004, pedigree (1,1,4,1,1)
  (same comment as for Lead)
