# uranium production, centrifuge, enriched 3.8%

Dataset: EcoSpold 2, unit process
Geography: DE
Time period: 1993-01-01 to 2021-12-31
Technology level: current
Classification: ISIC rev.4 ecoinvent: 2011:Manufacture of basic chemicals
Classification: EcoSpold01Categories: nuclear power/production
Tags: ConvertedDataset
Scenario: Business-as-Usual
System model: Allocation, cut-off by classification
Generated by: [System]
Published in: Dones, R. 2007
Database: ecoinvent
isCopyrightProtected: true
accessRestrictedTo: 1

## General comment
This module uses a mix of data, some specific for the URENCO facilities in Germany, the Netherlands, and the United Kingdom taken from environmental reports, some from literature. The plants consume 40 kWh/SWU and the electricity is assumed to be supplied by the local high voltage electricity grid. The factor for the infrastructure requirement is calculated with annual throughput of 1500 t SWU for 30 years operation.
[This dataset was already contained in the ecoinvent database version 2. It was not individually updated during the transfer to ecoinvent version 3. Life Cycle Impact Assessment results may still have changed, as they are affected by changes in the supply chain, i.e. in other datasets. This dataset was generated following the ecoinvent quality guidelines for version 2. It may have been subject to central changes described in the ecoinvent version 3 change report (http://www.ecoinvent.org/database/ecoinvent-version-3/reports-of-changes/), and the results of the central updates were reviewed extensively. The changes added e.g. consistent water flows and other information throughout the database. The documentation of this dataset can be found in the ecoinvent reports of version 2, which are still available via the ecoinvent website. The change report linked above covers all central changes that were made during the conversion process.]
[This dataset is meant to replace the following datasets:
- uranium production, centrifuge, enriched 3.8%, RER, 1993 - 2000]

## Included activities end
The module includes: input of UF6; electricity, diesel, and natural gas used for operation; also taken into account is the material for replacement of centrifuge; water use, lubricant oil, and wastewater treatment; concrete assumed to be used for conditioning of contaminated scrap from decommissioning; transport requirements of operation materials, industrial wastes, and contaminated waste from decommissioning (25% of the reinforced concrete and the great part of metals according to the reference). Radioactive and non-radioactive emissions to air and to water from the operation are also included. The infrastructure requirements are accounted for, though construction and operation data partially refer to different plants rather than to one single unit.

## Geography
US and Western European data.

## Technology
Current technology for uranium enrichment with centrifuge process. There exist datasets for five different enrichment grades: 3.0%, 3.8%, 3.9%, 4.2% and 4.0%

## Parameters
- fraction, cooling water, recirculating system, to air: 0.771 dimensionless; name fraction_CW_R_to_air; lognormal variance with pedigree 0.0413, pedigree (2,3,1,3,1)
  Calculated based on literature value (Scown, C.D., 2011, Water Footprint of U.S. Transportation Fuels and supplying information of the article) (Vionnet, S., Quantis Water Database - Technical Report, 2012).
- fraction, cooling water, to air: 0.3875 dimensionless; name fraction_CW_to_air; = (0.5*fraction_CW_OT_to_air)+(0.5*fraction_CW_R_to_air); lognormal variance with pedigree 0.092025, pedigree (4,4,3,2,4)
  Calculated value based on literature value (see comments of the other parametres present in this dataset) and expert opinion. In the case when no industry/literature data are available about the type of cooling or directly fraction, cooling water, to air specific for the process a default assumption is applied. It is assumed that the once-through cooling system is used in 50% of all cases and recirculating system is used in another 50% of all cases.
- fraction, cooling water, cooling pond system, to air: 0.032 dimensionless; name fraction_CW_CP_to_air; lognormal variance with pedigree 0.0413, pedigree (2,3,1,3,1)
  (same comment as for fraction, cooling water, recirculating system, to air)
- fraction, cooling water, once-through system, to air: 0.004 dimensionless; name fraction_CW_OT_to_air; lognormal variance with pedigree 0.0413, pedigree (2,3,1,3,1)
  (same comment as for fraction, cooling water, recirculating system, to air)
- fraction, water, decarbonised, to air: 0.3875 dimensionless; name fraction_WDC_to_air; = fraction_CW_to_air; lognormal variance with pedigree 0.092025, pedigree (4,4,3,2,4)
  Calculated value. See comments in the other parametres present in this dataset. Decarbonised water is considered to be always used as cooling water, thus cooling water fractions to air are applied to all carbonised water input flows to calculate the amount of water consumed in the processes.

## Reference product
- uranium, enriched 3.8%, per separative work unit: 1 unit; By-product classification allocatable product; CPC 33620: Uranium enriched in U235 and its compounds; plutonium and its compounds; alloys, dispersions, ceramic products[…]
  EcoSpold01Location=RER
  production volume 820000 unit; name uranium_enriched
    Production volume approximated with the installed uranium entichment capacity of 4100000 SWU/year. No data for capacity utilization was available. The capacity utilization is likely to vary between geographies and overestimate the production volume. 5 uranium enrichment activities are available in DE. The total installed capacity is split equally over these activities.
  property price 295.911 EUR2005
    Calculated based on inputs: The price of the product has been calculated as a sum of the values of the material and energy inputs for this product. This value is therefore a rough estimation. It may underestimate the real price since there are additional expenses when producing any product. These expences can include for example labour costs, treatment of waste materials and profit for the producer. Please consider carefully whether this level of data quality is acceptable for your application.
  property carbon content 0
    carbon content on a dry matter basis (reserved; not for manual entry)
  properties: water content 0, water in wet mass 0 kg, wet mass 1 kg, dry mass 1 kg, carbon content, non-fossil 0, carbon content, fossil 0, carbon allocation 0 kg

## Inputs from technosphere
- electricity, medium voltage: 40 kWh; lognormal variance with pedigree 0.05, pedigree (1,1,5,1,1)
  range of data
  EcoSpold01Location=UCTE
- polyvinylchloride, bulk polymerised: 0.00087 kg; lognormal variance with pedigree 0.04, pedigree (1,1,5,1,1)
  environmental report
  EcoSpold01Location=RER
  properties: carbon content, fossil 0.387097, dry mass 1 kg, wet mass 1 kg, heating value, net 21.5 MJ
  note on carbon content, fossil: Monomer is vynyl chloride, C2H3Cl (ecoinvent v2.2 report 11_II). MW=62 g/mol
- steel, low-alloyed, hot rolled: 0.15 kg; lognormal variance with pedigree 0.08, pedigree (1,1,5,1,1)
  EcoSpold01Location=RER
  own estimation
  properties: wet mass 1 kg, dry mass 1 kg, carbon content, fossil 0.005
  note on carbon content, fossil: Low alloyed steel composition given in Tab. 3.2 ecoinvent v2.2 report 10_partII. Steel assumed to have a C content of 0.5%
- heat, district or industrial, natural gas: 13.68 MJ; lognormal variance with pedigree 0.04, pedigree (1,1,5,1,1)
  EcoSpold01Location=RER
  environmental report
  properties: heating value, net 1 MJ
- spent anion exchange resin from potable water production: -0.058 kg; name spent_anion_exchange_resin; lognormal variance with pedigree 0.04, pedigree (1,1,5,1,1)
  EcoSpold01Location=CH
  environmental report
  production volume 47560 kg; = uranium_enriched*spent_anion_exchange_resin
    Calculated from the production volume of uranium, enriched 3.8%, per separative work unit in proportion to the respective output amounts.
  property price 0 EUR2005; name spent_anion_exchange_resin_price_EUR2005
  properties: wet mass 1 kg, carbon content, fossil 0.654, water content 1, dry mass 0.5 kg, heating value, net 6.08 MJ
  note on carbon content, fossil: Tab A.12, ecoinvent v2.2 report 13_I, c content is referred to 1 kg DM
  note on heating value, net: Value taken from the general comment of the treatment dataset.
- sodium hydroxide, without water, in 50% solution state: 0.0028 kg; lognormal variance with pedigree 0.04, pedigree (1,1,5,1,1)
  environmental report
  EcoSpold01Location=RER
  properties: dry mass 1 kg, wet mass 1 kg, heating value, net 3.03 MJ
- phosphoric acid, fertiliser grade, without water, in 70% solution state: 0.00012 kg; lognormal variance with pedigree 0.04, pedigree (1,1,5,1,1)
  environmental report
  EcoSpold01Location=GLO
  properties: wet mass 1 kg, dry mass 1 kg
- diesel, burned in diesel-electric generating set, 10MW: 1.28 MJ; lognormal variance with pedigree 0.04, pedigree (1,1,5,1,1)
  environmental report
  EcoSpold01Location=GLO
  properties: heating value, net 1 MJ
- methanol: 0.00032 kg; lognormal variance with pedigree 0.04, pedigree (1,1,5,1,1)
  environmental report
  EcoSpold01Location=CH
  properties: heating value, net 26.49 MJ, carbon content, fossil 0.375, dry mass 1 kg, wet mass 1 kg
- lubricating oil: 0.0092 kg; lognormal variance with pedigree 0.04, pedigree (1,1,5,1,1)
  environmental report
  EcoSpold01Location=RER
  properties: heating value, net 40.2 MJ, dry mass 1 kg, wet mass 1 kg, carbon content, fossil 0.75
  note on heating value, net: Literature value, Source: IPCC 2006, 2006 IPCC Guidelines for National Greenhouse Gas Inventories, Prepared by the National Greenhouse Gas Inventories Programme, Eggleston H.S., Buendia L., Miwa K., Ngara T. and Tanabe K. (eds). Published: IGES, Japan
  note on carbon content, fossil: Lubricating oil is produced from diesel. C-content/dry mass of fats and oils considered 75%, from: ecoinvent v2.2 report, n 15a, pg 40
- brass: 0.0018 kg; lognormal variance with pedigree 0.16, pedigree (1,1,5,1,1)
  EcoSpold01Location=CH
  own assumption
  properties: dry mass 1 kg, wet mass 1 kg
- argon, liquid: 0.0018 kg; lognormal variance with pedigree 0.04, pedigree (1,1,5,1,1)
  environmental report
  EcoSpold01Location=RER
  properties: dry mass 1 kg, wet mass 1 kg
- municipal solid waste: -0.235 kg; name municipal_solid_waste; lognormal variance with pedigree 0.04, pedigree (1,1,5,1,1)
  EcoSpold01Location=CH
  environmental report
  production volume 192700 kg; = uranium_enriched* municipal_solid_waste
    (same comment as for spent anion exchange resin from potable water production)
  properties: water content 0.297017, carbon content, fossil 0.171549, dry mass 0.771 kg, wet mass 1 kg, carbon content, non-fossil 0.261655, heating value, net 11.74 MJ
  note on carbon content, fossil: MSW composition in tab 4.1, ecoinvent v2.2 report 13_I. C content referred to 1 kg DM
- uranium hexafluoride: 1.48 kg; lognormal variance with pedigree 0.04, pedigree (1,1,5,1,1)
  EcoSpold01Location=US
  calculated
  properties: wet mass 1 kg, dry mass 1 kg
- hydrochloric acid, without water, in 30% solution state: 0.0002 kg; lognormal variance with pedigree 0.04, pedigree (1,1,5,1,1)
  environmental report
  EcoSpold01Location=RER
  properties: wet mass 1 kg, dry mass 1 kg, heating value, net 3.32 MJ
- uranium enrichment centrifuge facility: 2.22e-8 unit; lognormal variance with pedigree 0.08, pedigree (1,1,5,1,1)
  own estimation
  EcoSpold01Location=GLO
- waste mineral oil: -0.0024 kg; name waste_min_oil; lognormal variance with pedigree 0.04, pedigree (1,1,5,1,1)
  environmental report
  EcoSpold01Location=CH
  production volume 1968 kg; = uranium_enriched* waste_min_oil
    (same comment as for spent anion exchange resin from potable water production)
  property price 0 EUR2005; name waste_min_oil_price_EUR2005
  properties: heating value, net 34.7 MJ, carbon content, fossil 0.864444, dry mass 0.9 kg, wet mass 1 kg, water content 0.111111
  note on carbon content, fossil: Tab A.6, ecoinvent v2.2 report 13_I. C content has been calculated after data in the tables, and then referred to 1 kg DM
- chemical, organic: 0.00082 kg; lognormal variance with pedigree 0.04, pedigree (1,1,5,1,1)
  EcoSpold01Location=GLO
  environmental report
  properties: dry mass 1 kg, carbon content, fossil 0.628, wet mass 1 kg, heating value, net 19.03 MJ
  note on carbon content, fossil: This dataset is an unweighted average of 20 organic substances (listed in Tab 88.1, ecoinvent v2.2 report 8, part II), being part of the top100 chemicals included in this database. The C-content has also been calculated as an unweighted average of the C content of the substances composing this dataset.
- aluminium, wrought alloy: 0.05 kg; lognormal variance with pedigree 0.16, pedigree (1,1,5,1,1)
  EcoSpold01Location=RER
  own estimation
  properties: dry mass 1 kg, wet mass 1 kg
- water, decarbonised: 4 kg; name water_decarbonised_input; lognormal variance with pedigree 0.04, pedigree (1,1,5,1,1)
  EcoSpold01Location=RER
  environmental report
  properties: wet mass 1 kg
- soap: 0.00088 kg; lognormal variance with pedigree 0.04, pedigree (1,1,5,1,1)
  EcoSpold01Location=RER
  environmental report
  properties: dry mass 0.87 kg, carbon content, non-fossil 0.692237, water content 0.149425, wet mass 1 kg, heating value, net 17.93 MJ
  note on carbon content, non-fossil: Soap (CnH2n+1 COO Na) is produced by a combined saponification and neutralisation process performed on a blend of oleochemical feedstocks comprised of short chain (C12-14, derived from coconut or palm kernel oil) and long chain (C16-18, from tallow or palm oil) esters.The ratio of short to long fatty acid chains is 20:80 (ecoinvent v2.2 report 12). Short fatty acid has been estimated as C12.5H(2*12.5+1); MW R=176 g/mol. Long fatty acid has been estimated as C16H(2*16+1); MW R=225 g/mol. MW of COONa=67 g/mol
- oxygen, liquid: 3.6e-5 kg; lognormal variance with pedigree 0.04, pedigree (1,1,5,1,1)
  EcoSpold01Location=RER
  environmental report
  properties: dry mass 1 kg, wet mass 1 kg
- acetylene: 2.5e-5 kg; lognormal variance with pedigree 0.04, pedigree (1,1,5,1,1)
  EcoSpold01Location=CH
  environmental report
  properties: heating value, net 51.2 MJ, wet mass 1 kg, dry mass 1 kg, carbon content, fossil 0.923077
  note on heating value, net: Based on literature, page 25 (Value may refer to HHV), Althaus H.-J., Chudacoff M., Hischier R., Jungbluth N., Osses M. and Primas A. (2007) Life Cycle Inventories of Chemicals. Final report ecoinvent data v2.0 No. 8. EMPA, Swiss Centre for Life Cycle Inventories, Dübendorf, CH, Online-Version under: www.ecoinvent.org.
  note on carbon content, fossil: C2H2. ecoinvent v2.2 report n 8. Produced from partial oxidation of natural gas
- low level radioactive waste: -0.00063 m3; name low_level_radioactive_waste; lognormal variance with pedigree 0.04, pedigree (1,1,5,1,1)
  EcoSpold01Location=CH
  environmental report
  production volume 516.6 m3; = uranium_enriched* low_level_radioactive_waste
    (same comment as for spent anion exchange resin from potable water production)
  property price 0 EUR2005; name low_level_radioactive_wast_price_EUR2005
  properties: dry mass 2500 kg, wet mass 2500 kg
- concrete, normal: 0.00029 m3; lognormal variance with pedigree 0.16, pedigree (1,1,5,1,1)
  own estimation
  EcoSpold01Location=CH
  properties: water content 0.086758, wet mass 2380 kg, dry mass 2190 kg
- hydrogen, liquid: 1.1e-5 kg; lognormal variance with pedigree 0.04, pedigree (1,1,5,1,1)
  EcoSpold01Location=RER
  environmental report
  properties: heating value, net 120.21 MJ, wet mass 1 kg, dry mass 1 kg
- nitrogen, liquid: 0.00039 kg; lognormal variance with pedigree 0.04, pedigree (1,1,5,1,1)
  EcoSpold01Location=RER
  environmental report
  properties: dry mass 1 kg, wet mass 1 kg
- nitric acid, without water, in 50% solution state: 0.0015 kg; lognormal variance with pedigree 0.04, pedigree (1,1,5,1,1)
  environmental report
  EcoSpold01Location=RER
  properties: dry mass 1 kg, wet mass 1 kg
- hydrogen peroxide, without water, in 50% solution state: 0.00068 kg; lognormal variance with pedigree 0.04, pedigree (1,1,5,1,1)
  EcoSpold01Location=RER
  environmental report
  properties: heating value, net 7.13 MJ, dry mass 1 kg, wet mass 1 kg
- chemical, inorganic: 0.0311 kg; lognormal variance with pedigree 0.04, pedigree (1,1,5,1,1)
  environmental report
  EcoSpold01Location=GLO
  properties: dry mass 1 kg, carbon content, fossil 0.003, wet mass 1 kg
  note on carbon content, fossil: This dataset is an unweighted average of 20 inorganic substances (listed in Tab 88.1, ecoinvent v2.2 report 8, part II), being part of the top100 chemicals included in this database. The C-content has also been calculated as an unweighted average of the C content of the substances composing this dataset.

## Emissions to nature
- Zinc, ion [water, surface water]: 3.8e-5 kg; lognormal variance with pedigree 0.04, pedigree (1,1,5,1,1)
  environmental report
- Aluminium [water, surface water]: 0.0011 kg; lognormal variance with pedigree 0.04, pedigree (1,1,5,1,1)
  environmental report
- Ethane, 1,1,1,2-tetrafluoro-, HFC-134a [air, non-urban air or from high stacks]: 0.00026 kg; lognormal variance with pedigree 0.06, pedigree (1,1,5,1,1)
  extrapolated from environmental report
- Fluoride [water, surface water]: 0.00011 kg; lognormal variance with pedigree 0.04, pedigree (1,1,5,1,1)
  environmental report
- Water [water, unspecified]: 0.00245 m3; name water_to_water_unspecified; = (water_decarbonised_input/1000)*(1-fraction_WDC_to_air); lognormal variance with pedigree 0.130025, pedigree (4,4,5,2,4)
  Calculated value based on literature values and expert opinion. See comments in the parametres' comment field.
  property fraction, origin: unspecified 0; name fraction_origin_unspecified_Ww
  property fraction, origin: salt water 0; name fraction_origin_salt_water_Ww
  property fraction, origin: fresh water 1; name fraction_origin_fresh_water_Ww
- Nitrate [water, surface water]: 0.0025 kg; lognormal variance with pedigree 0.04, pedigree (1,1,5,1,1)
  environmental report
- Thorium-234 [air, non-urban air or from high stacks]: 0.00029 kBq; lognormal variance with pedigree 0.08, pedigree (1,1,5,1,1)
  emission from environmental report, but isotpes not given
- Copper, ion [water, surface water]: 1.3e-6 kg; lognormal variance with pedigree 0.04, pedigree (1,1,5,1,1)
  environmental report
- Hydrogen fluoride [air, non-urban air or from high stacks]: 3.7e-8 kg; lognormal variance with pedigree 0.04, pedigree (1,1,5,1,1)
  environmental report
- Hydrocarbons, unspecified [water, surface water]: 6.1e-5 kg; lognormal variance with pedigree 0.04, pedigree (1,1,5,1,1)
  environmental report
- Water [air, unspecified]: 0.00155 m3; name water_to_air_unspecified; = (water_decarbonised_input/1000)*fraction_WDC_to_air; lognormal variance with pedigree 0.130025, pedigree (4,4,5,2,4)
  (same comment as for Water)
  property fraction, origin: unspecified 0; name fraction_origin_unspecified
  property fraction, origin: salt water 0; name fraction_origin_salt_water
  property fraction, origin: fresh water 1; name fraction_origin_fresh_water
- Chromium, ion [water, surface water]: 3.8e-6 kg; lognormal variance with pedigree 0.04, pedigree (1,1,5,1,1)
  environmental report
- Uranium alpha [water, surface water]: 8.2e-6 kBq; lognormal variance with pedigree 0.04, pedigree (1,1,5,1,1)
  environmental report
- Ethanol [air, non-urban air or from high stacks]: 0.0013 kg; lognormal variance with pedigree 0.04, pedigree (1,1,5,1,1)
  environmental report
- Uranium alpha [air, non-urban air or from high stacks]: 5.8e-5 kBq; lognormal variance with pedigree 0.04, pedigree (1,1,5,1,1)
  environmental report
- Phosphate [water, surface water]: 0.00034 kg; lognormal variance with pedigree 0.04, pedigree (1,1,5,1,1)
  environmental report
- Thorium-234 [water, surface water]: 0.0031 kBq; lognormal variance with pedigree 0.04, pedigree (1,1,5,1,1)
  environmental report

## Sampling procedure
Literature

## Extrapolations
This dataset has been extrapolated from year 2000 to the year of the calculation (2021). The uncertainty has been adjusted accordingly.
