# treatment of used desktop computer, manual dismantling

Dataset: EcoSpold 2, unit process
Geography: CH
Time period: 2005-01-01 to 2021-12-31
Technology level: current
Classification: ISIC rev.4 ecoinvent: 3830:Materials recovery
Classification: EcoSpold01Categories: waste management/recycling
Tags: ConvertedDataset; Treatment
Scenario: Business-as-Usual
System model: Allocation, cut-off by classification
Share of production covered: 100 %
Generated by: Roland Hischier
Published in: Hischier R. 2007
Database: ecoinvent
isCopyrightProtected: true
accessRestrictedTo: 1

## General comment
manual dismantling in various fractions based on common transfer coefficients for this type of treatment. Data from own experiences in Switzerland.
[This dataset was already contained in the ecoinvent database version 2. It was not individually updated during the transfer to ecoinvent version 3. Life Cycle Impact Assessment results may still have changed, as they are affected by changes in the supply chain, i.e. in other datasets. This dataset was generated following the ecoinvent quality guidelines for version 2. It may have been subject to central changes described in the ecoinvent version 3 change report (http://www.ecoinvent.org/database/ecoinvent-version-3/reports-of-changes/), and the results of the central updates were reviewed extensively. The changes added e.g. consistent water flows and other information throughout the database. The documentation of this dataset can be found in the ecoinvent reports of version 2, which are still available via the ecoinvent website. The change report linked above covers all central changes that were made during the conversion process.]

## Included activities end
This dataset represents the manual dismantling of a WEEE devices in Switzerland.

## Geography
data of situation in Switzerland

## Technology
current manual dismantling activities in Switzerland.

## Reference product
- used desktop computer: -1 kg; By-product classification Waste; CPC 39990: Other wastes n.e.c.
  EcoSpold01Location=CH
  production volume 141201 kg; = 0.23*1.304E+08*(2.66E+11/5.65E+13)
    Calculated based on literature value (http://www.etforecasts.com/products/ES_pcww1203.htm). 1.304E+08 is a number of computers (desktop, units) sold in 2005 in the whole world. The proportion between manual and mechanical dismantling of 23%/77%; source: Hischier 2005; value to be replaced by value to be calculated from the demand for this treatment activity. The swiss production volume is extrapolated from the global one using GDP (IMF, 2012, http://www.imf.org/external/pubs/ft/weo/2010/01/weodata/index.aspx). GDP (PPP) world = 5.65E+13 USD in 2005, GDP (PPP) Switzerland = 2.66E+11 USD in 2005.
  property carbon content, fossil 0.0877555
    Composition data from desktop computer, divided by ist weight 11.3 kg (Tab 4.15, ecoinvent v2.2 report 18_V)
  property price 0 EUR2005
    Waste products are assigned a price of zero as they are assumed to require further treatment.
  property carbon content, non-fossil 0.000485011
    (same comment as for used desktop computer)
  property carbon content 0.0882405
    carbon content on a dry matter basis (reserved; not for manual entry)
  properties: water content 0, water in wet mass 0 kg, wet mass 1 kg, dry mass 1 kg, carbon allocation 0.0882405 kg

## Inputs from technosphere
- manual treatment facility, waste electric and electronic equipment: 1.6e-8 unit; lognormal variance with pedigree 0.5761, pedigree (4,5,5,3,5)
  EcoSpold01Location=GLO
  Rough estimation of infrastructure
  Uncertainty: rough estimation of infrastructure
- used capacitor: -0.00972 kg; lognormal variance with pedigree 0.054, pedigree (3,4,5,1,1)
  EcoSpold01Location=CH
  Calculated - based on composition data
  Uncertainty: calculated - based on composition data
  production volume 0.0022356 kg
    Calculated from the production volume of used desktop computer in proportion to the respective output amounts.
  properties: dry mass 1 kg, carbon content, fossil 0.179153, carbon content, non-fossil 0.0306706, wet mass 1 kg
  note on carbon content, fossil: Mix of different types of capacitor (ecoinvent v2.2 report 18_V, pg 113 for details)
- used Ni-metal hydride battery: -0.000126482 kg; lognormal variance with pedigree 0.054, pedigree (3,4,5,1,1)
  EcoSpold01Location=GLO
  Calculated - based on composition data
  Uncertainty: calculated - based on composition data
  production volume 1.30932e-5 kg
    (same comment as for used capacitor)
  properties: dry mass 1 kg, carbon content, fossil 0.328011, wet mass 1 kg
- shredder fraction after manual dismantling of used electronic product: -0.272 kg; lognormal variance with pedigree 0.054, pedigree (3,4,5,1,1)
  Calculated - based on composition data
  EcoSpold01Location=GLO
  Uncertainty: calculated - based on composition data
  production volume 0.06256 kg
    (same comment as for used capacitor)
  properties: carbon content, fossil 0.287536, wet mass 1 kg, dry mass 1 kg, heating value, net 8.71 MJ
  note on carbon content, fossil: C content calculated out of (input) shredder fraction composition in Tab 4.47 (ecoinvent v2.2 report 18_V). Carbon content in plastic was calculated using data in Tab A.2, ecoinvent v2.2 report 13_I. Others was also considered plastic, and calculated the same way (from pg 70, ecoinvent v2.2 report 18_V). Ferro was assumed to have a C content of 0.012 kg C/ kg (C content of steel, calculated out of emission factors published in Commission Decision of 18 July 2007 establishing guidelines for the monitoring and reporting of greenhouse gas emissions pursuant to Directive 2003/87/EC of the European Parliament and of the Council (notified under document number C(2007) 3416)). The other component of the fraction were considered to content no C.
- waste plastic, consumer electronics: -0.021 kg; lognormal variance with pedigree 0.054, pedigree (3,4,5,1,1)
  Calculated - based on composition data
  EcoSpold01Location=CH
  Uncertainty: calculated - based on composition data
  production volume 0.00483 kg
    (same comment as for used capacitor)
  properties: dry mass 0.847 kg, heating value, net 34.78 MJ, carbon content, fossil 0.830215, wet mass 1 kg, water content 0.180638
  note on heating value, net: Assumed equal to "waste plastic, consumer electronics, sorted".
  note on carbon content, fossil: C content in 1 kg DM was calculated using data in Tab A.2, ecoinvent v2.2 report 13_I

## Sampling procedure
own experiences

## Extrapolations
This dataset has been extrapolated from year 2005 to the year of the calculation (2021). The uncertainty has been adjusted accordingly.

## Review by Jürgen Sutter 2007-08-31
passed.
