# treatment of wastewater from PV cell production, capacity 5E9l/year

Dataset: EcoSpold 2, unit process
Geography: CH
Time period: 1994-01-01 to 2021-12-31
Technology level: current
Classification: ISIC rev.4 ecoinvent: 3700:Sewerage
Classification: EcoSpold01Categories: waste management/wastewater treatment
Tags: Treatment; ConvertedDataset
Scenario: Business-as-Usual
System model: Allocation, cut-off by classification
Share of production covered: 1 %
Generated by: Niels Jungbluth
Published in: Jungbluth, N. 2009
Database: ecoinvent
isCopyrightProtected: true
accessRestrictedTo: 1

## General comment
Wastewater purified in a medium size municipal wastewater treatment plant (capacity class 3), with an average capacity size of 24900 per-captia-equivalents PCE.
Wastewater contains (in kg/m3): TOC: 0.2699 (GSD=122.5%); NH4-N: 0.03101 (GSD=122.5%); NO3-N: 0.1227 (GSD=122.5%); PO4-P: 0.03531 (GSD=122.5%); Cl: 0.273 (GSD=226.6%); F: 0.1736 (GSD=226.6%); Ti: 0.000003914 (GSD=226.6%); Si: 0.3497 (GSD=226.6%); Ca: 0.03
[This dataset was already contained in the ecoinvent database version 2. It was not individually updated during the transfer to ecoinvent version 3. Life Cycle Impact Assessment results may still have changed, as they are affected by changes in the supply chain, i.e. in other datasets. This dataset was generated following the ecoinvent quality guidelines for version 2. It may have been subject to central changes described in the ecoinvent version 3 change report (http://www.ecoinvent.org/database/ecoinvent-version-3/reports-of-changes/), and the results of the central updates were reviewed extensively. The changes added e.g. consistent water flows and other information throughout the database. The documentation of this dataset can be found in the ecoinvent reports of version 2, which are still available via the ecoinvent website. The change report linked above covers all central changes that were made during the conversion process.]

## Included activities end
Infrastructure materials for municipal wastewater treatment plant, transports, dismantling. Land use burdens.

## Geography
Specific to the technology mix encountered in Switzerland in 2000. Well applicable to modern treatment practices in Europe, North America or Japan.

## Technology
Three stage wastewater treatment (mechanical, biological, chemical) including sludge digestion (fermentation) according to the average technology in Switzerland

## Parameters
- fraction, process water, to air: 0.1 dimensionless; name fraction_PW_to_air; lognormal variance with pedigree 0.092025, pedigree (4,4,3,2,4)
  Literature value (Statistics Canada, 2007 & Shaffer, K.H., 2008, Consumptive water use in the Great Lakes Basin, USGS) (Vionnet, S., Quantis Water Database - Technical Report, 2012).

## Reference product
- wastewater from PV cell production: -1 m3; name RP_amount_1; CPC 39920: Sewage sludge; By-product classification Waste
  production volume 0.0336675 m3; name RP_PV_1
    This is a placeholder value that does not reflect real-world production volumes. This dataset does not currently require a real-world production volume to work in the database framework, and no actual data were collected yet. This has no negative effect on the results of the ecoinvent database. The placeholder value of this activity was scaled according to the nominal GDP of 2005 (source: United Nations, http://data.un.org/Glossary.aspx?q=GDP+%28current+US%24%29, accessed 20130726) to reflect an appropriate share of the global production volume, which is also a placeholder value.
  property price 0 EUR2005; name RP_amount_1_price_EUR2005
    Waste products are assigned a price of zero as they are assumed to require further treatment.
  property carbon content, fossil 0.121726
    TOC = 0.27 kg/m3 (Tab 7.3, ecoinvent v2.2 report 6_XII). TOC was considered as Total Carbon.
  property carbon content 0.121726
    carbon content on a dry matter basis (reserved; not for manual entry)
  properties: wet mass 1000 kg, carbon content, non-fossil 0, water content 449.836, water in wet mass 997.782 kg, dry mass 2.2181 kg, carbon allocation 0.27 kg

## Inputs from technosphere
- residual material landfill: 9.3843e-11 unit; lognormal variance with pedigree 0.07, pedigree (1,1,5,1,1)
  burden from sludge incineration. Uncertainty calculated from wastewater composition and treatment model
- titanium dioxide: 2.1086e-6 kg; lognormal variance with pedigree 0.55, pedigree (1,1,5,1,1)
  (same comment as for residual material landfill)
  properties: dry mass 1 kg, wet mass 1 kg
- process-specific burdens, slag landfill: 0.46738 kg; lognormal variance with pedigree 0.07, pedigree (1,1,5,1,1)
  burden from sludge incineration. Uncertainty calculated from wastewater composition and treatment model;activityLink introduced to establish a direct link to the corresponding regional supply of this product
- ammonia, anhydrous, liquid: 7.3665e-5 kg; lognormal variance with pedigree 0.22, pedigree (1,1,5,1,1)
  (same comment as for residual material landfill)
  properties: dry mass 1 kg, wet mass 1 kg
- heat, district or industrial, natural gas: 0.0064656 MJ; lognormal variance with pedigree 0.22, pedigree (1,1,5,1,1)
  (same comment as for residual material landfill)
  properties: heating value, net 1 MJ
- iron (III) chloride, without water, in 40% solution state: 0.22891 kg; lognormal variance with pedigree 0.1, pedigree (1,1,5,1,1)
  direct wastewater treatment plant burden plus burden from sludge incineration. Uncertainty calculated from wastewater composition and treatment model
  properties: wet mass 1 kg, dry mass 1 kg
- chromium oxide, flakes: 4.3034e-8 kg; lognormal variance with pedigree 0.55, pedigree (1,1,5,1,1)
  (same comment as for residual material landfill)
  properties: dry mass 1 kg, wet mass 1 kg
- sewer grid, 5E9l/year, 110 km: 2.1782e-7 km; lognormal variance with pedigree 0.04, pedigree (1,1,5,1,1)
  uncertainty heeded in exchanges of the module
- sodium hydroxide, without water, in 50% solution state: 3.3512e-5 kg; lognormal variance with pedigree 0.12, pedigree (1,1,5,1,1)
  (same comment as for residual material landfill)
  properties: dry mass 1 kg, wet mass 1 kg, heating value, net 3.03 MJ
- hydrochloric acid, without water, in 30% solution state: 1.0238e-6 kg; lognormal variance with pedigree 0.11, pedigree (1,1,5,1,1)
  (same comment as for residual material landfill)
  properties: wet mass 1 kg, dry mass 1 kg, heating value, net 3.32 MJ
- process-specific burdens, municipal waste incineration: 1.3817 kg; lognormal variance with pedigree 0.1, pedigree (1,1,5,1,1)
  (same comment as for process-specific burdens, slag landfill)
- liquid manure spreading, by vacuum tanker: 0.0042172 m3; lognormal variance with pedigree 0.04, pedigree (1,1,5,1,1)
  burden from sludge spreading. Uncertainty calculated from wastewater composition and treatment model
  This exchange has an activity link directly to the producing activity because the product is primarily consumed in the same geographical area where it is produced.
- electricity, high voltage: 0.19865 kWh; lognormal variance with pedigree 0.55, pedigree (1,1,5,1,1)
  (same comment as for residual material landfill)
- electricity, low voltage: 0.72447 kWh; lognormal variance with pedigree 0.21, pedigree (1,1,5,1,1)
  direct wastewater treatment plant burden. Uncertainty calculated from wastewater composition and treatment model
- quicklime, milled, packed: 6.0757e-6 kg; lognormal variance with pedigree 0.12, pedigree (1,1,5,1,1)
  (same comment as for residual material landfill)
  properties: water content 0.010101, dry mass 0.99 kg, wet mass 1 kg
- aluminium sulfate, powder: 0.04525 kg; lognormal variance with pedigree 0.1, pedigree (1,1,5,1,1)
  (same comment as for electricity, low voltage)
  properties: dry mass 1 kg, wet mass 1 kg
- waste plastic, mixture: -0.0155 kg; name BP_amount_1; lognormal variance with pedigree 0.04, pedigree (1,1,5,1,1)
  (same comment as for electricity, low voltage)
  production volume 0.000521847 kg; = BP_amount_1* RP_PV_1/ABS( RP_amount_1)
    Calculated from the production volume of wastewater from PV cell production in proportion to the respective output amounts.
  property price 0 EUR2005; name BP_amount_1_price_EUR2005
  properties: carbon content, fossil 0.747344, water content 0.180638, wet mass 1 kg, dry mass 0.847 kg, heating value, net 30.79 MJ
  note on carbon content, fossil: C content in 1 kg DM was calculated using data in Tab A.2, ecoinvent v2.2 report 13_I
  note on heating value, net: Value taken from the general comment of the treatment dataset.
- municipal waste incineration facility: 3.4543e-10 unit; lognormal variance with pedigree 0.1, pedigree (1,1,5,1,1)
  (same comment as for residual material landfill)
- waste cement, hydrated: -0.045044 kg; name BP_amount_2; lognormal variance with pedigree 0.08, pedigree (1,1,5,1,1)
  (same comment as for residual material landfill)
  production volume 0.00151652 kg; = BP_amount_2* RP_PV_1/ABS( RP_amount_1)
    (same comment as for waste plastic, mixture)
  property price 0 EUR2005; name BP_amount_2_price_EUR2005
  properties: dry mass 1 kg, wet mass 1 kg
- slag landfill: 8.309e-10 unit; lognormal variance with pedigree 0.07, pedigree (1,1,5,1,1)
  (same comment as for residual material landfill)
- waste graphical paper: -0.0155 kg; name BP_amount_3; lognormal variance with pedigree 0.04, pedigree (1,1,5,1,1)
  (same comment as for electricity, low voltage)
  production volume 0.000521847 kg; = BP_amount_3* RP_PV_1/ABS( RP_amount_1)
    (same comment as for waste plastic, mixture)
  property price 0 EUR2005; name BP_amount_3_price_EUR2005
  properties: wet mass 1 kg, water content 0.126126, heating value, net 14.12 MJ, carbon content, non-fossil 0.454955, dry mass 0.888 kg
- heat, district or industrial, other than natural gas: 1.1588 MJ; lognormal variance with pedigree 0.1, pedigree (1,1,5,1,1)
  (same comment as for residual material landfill)
  properties: heating value, net 1 MJ
- iron sulfate: 0.16743 kg; lognormal variance with pedigree 0.1, pedigree (1,1,5,1,1)
  (same comment as for electricity, low voltage)
  properties: dry mass 1 kg, wet mass 1 kg
- chemical, inorganic: 1.7063e-6 kg; lognormal variance with pedigree 0.11, pedigree (1,1,5,1,1)
  (same comment as for residual material landfill)
  properties: dry mass 1 kg, carbon content, fossil 0.003, wet mass 1 kg
  note on carbon content, fossil: This dataset is an unweighted average of 20 inorganic substances (listed in Tab 88.1, ecoinvent v2.2 report 8, part II), being part of the top100 chemicals included in this database. The C-content has also been calculated as an unweighted average of the C content of the substances composing this dataset.
- cement, unspecified: 0.018018 kg; lognormal variance with pedigree 0.08, pedigree (1,1,5,1,1)
  (same comment as for residual material landfill)
  properties: wet mass 1 kg, dry mass 1 kg
- wastewater treatment facility, capacity 5E9l/year: 5.6882e-9 unit; lognormal variance with pedigree 0.04, pedigree (1,1,5,1,1)
  uncertainty heeded in exchanges of the module
- process-specific burdens, residual material landfill: 0.045044 kg; lognormal variance with pedigree 0.07, pedigree (1,1,5,1,1)
  (same comment as for process-specific burdens, slag landfill)

## Emissions to nature
- Silicon [water, surface water]: 0.02101 kg; lognormal variance with pedigree 0.59, pedigree (1,1,5,1,1)
  sewer overload discharge plus direct wastewater treatment plant emission plus emission from sludge incineration. Uncertainty calculated from wastewater composition and treatment model
- TOC, Total Organic Carbon [water, surface water]: 0.032363 kg; lognormal variance with pedigree 0.04, pedigree (1,1,5,1,1)
  (same comment as for Silicon)
- Sulfate [water, surface water]: 0.14395 kg; lognormal variance with pedigree 0.1, pedigree (1,1,5,1,1)
  (same comment as for Silicon)
- Ammonium, ion [water, surface water]: 0.012765 kg; lognormal variance with pedigree 0.08, pedigree (1,1,5,1,1)
  direct wastewater treatment plant emission. Uncertainty calculated from wastewater composition and treatment model
- COD, Chemical Oxygen Demand [water, ground-, long-term]: 0.00090945 kg; lognormal variance with pedigree 0.07, pedigree (1,1,5,1,1)
  emission from sludge incineration. Uncertainty calculated from wastewater composition and treatment model
- BOD5, Biological Oxygen Demand [water, ground-, long-term]: 0.00029748 kg; lognormal variance with pedigree 0.07, pedigree (1,1,5,1,1)
  (same comment as for COD, Chemical Oxygen Demand)
- DOC, Dissolved Organic Carbon [water, ground-, long-term]: 0.00035987 kg; lognormal variance with pedigree 0.07, pedigree (1,1,5,1,1)
  (same comment as for COD, Chemical Oxygen Demand)
- Calcium [soil, agricultural]: 0.0016589 kg; lognormal variance with pedigree 0.73, pedigree (1,1,5,1,1)
  emission from sludge spreading. Uncertainty calculated from wastewater composition and treatment model
- Methane, fossil [air, urban air close to ground]: 0.0020183 kg; lognormal variance with pedigree 0.1, pedigree (1,1,5,1,1)
  (same comment as for COD, Chemical Oxygen Demand)
- Nitrogen [water, surface water]: 0.001294 kg; lognormal variance with pedigree 0.07, pedigree (1,1,5,1,1)
  (same comment as for Ammonium, ion)
- Calcium, ion [water, ground-, long-term]: 0.0016374 kg; lognormal variance with pedigree 0.73, pedigree (1,1,5,1,1)
  (same comment as for COD, Chemical Oxygen Demand)
- TOC, Total Organic Carbon [water, ground-, long-term]: 0.00035987 kg; lognormal variance with pedigree 0.07, pedigree (1,1,5,1,1)
  (same comment as for COD, Chemical Oxygen Demand)
- Ammonia [air, urban air close to ground]: 0.00049038 kg; lognormal variance with pedigree 0.29, pedigree (1,1,5,1,1)
  direct digester gas emission plus emission from sludge incineration plus emission from sludge spreading. Uncertainty calculated from wastewater composition and treatment model
- Nitrogen oxides [air, urban air close to ground]: 0.00081854 kg; lognormal variance with pedigree 0.09, pedigree (1,1,5,1,1)
  direct digester gas emission plus emission from sludge incineration. Uncertainty calculated from wastewater composition and treatment model
- Cyanide [air, urban air close to ground]: 1.3141e-6 kg; lognormal variance with pedigree 0.25, pedigree (1,1,5,1,1)
  (same comment as for COD, Chemical Oxygen Demand)
- NMVOC, non-methane volatile organic compounds, unspecified origin [air, urban air close to ground]: 9.1489e-6 kg; lognormal variance with pedigree 0.21, pedigree (1,1,5,1,1)
  direct digester gas emission. Uncertainty calculated from wastewater composition and treatment model
- Aluminium [soil, agricultural]: 0.0033477 kg; lognormal variance with pedigree 0.1, pedigree (1,1,5,1,1)
  (same comment as for Calcium)
- Water [air, unspecified]: 0.1 m3; name water_to_air_unspecified; lognormal variance with pedigree 0.0807, pedigree (2,2,5,1,1)
  Calculated value based on water balance.
  property fraction, origin: salt water 0; name fraction_origin_salt_water
  property fraction, origin: fresh water 0; name fraction_origin_fresh_water
  property fraction, origin: unspecified 1; name fraction_origin_unspecified
- BOD5, Biological Oxygen Demand [water, surface water]: 0.039669 kg; lognormal variance with pedigree 0.05, pedigree (1,1,5,1,1)
  (same comment as for Silicon)
- Phosphorus [air, urban air close to ground]: 1.1908e-5 kg; lognormal variance with pedigree 0.12, pedigree (1,1,5,1,1)
  (same comment as for Nitrogen oxides)
- Silicon [soil, agricultural]: 0.15403 kg; lognormal variance with pedigree 0.73, pedigree (1,1,5,1,1)
  (same comment as for Calcium)
- Carbon dioxide, fossil [air, urban air close to ground]: 0.75155 kg; lognormal variance with pedigree 0.05, pedigree (1,1,5,1,1)
  (same comment as for COD, Chemical Oxygen Demand)
- Potassium, ion [water, surface water]: 0.007339 kg; lognormal variance with pedigree 0.69, pedigree (1,1,5,1,1)
  (same comment as for Silicon)
- Titanium [air, urban air close to ground]: 1.0244e-9 kg; lognormal variance with pedigree 0.75, pedigree (1,1,5,1,1)
  (same comment as for Nitrogen oxides)
- Calcium, ion [water, surface water]: 0.032557 kg; lognormal variance with pedigree 0.69, pedigree (1,1,5,1,1)
  (same comment as for Silicon)
- Phosphate [water, surface water]: 0.038734 kg; lognormal variance with pedigree 0.08, pedigree (1,1,5,1,1)
  sewer overload discharge plus direct wastewater treatment plant emission plus emission from sludge incineration plus emission from sludge spreading. Uncertainty calculated from wastewater composition and treatment model
- Phosphate [water, ground-]: 0.00018338 kg; lognormal variance with pedigree 0.15, pedigree (1,1,5,1,1)
  (same comment as for Calcium)
- Nitrate [water, surface water]: 0.51765 kg; lognormal variance with pedigree 0.07, pedigree (1,1,5,1,1)
  (same comment as for Silicon)
- Silicon [air, urban air close to ground]: 0.00040671 kg; lognormal variance with pedigree 0.75, pedigree (1,1,5,1,1)
  (same comment as for Nitrogen oxides)
- Titanium, ion [water, ground-, long-term]: 3.0696e-7 kg; lognormal variance with pedigree 1.09, pedigree (1,1,5,1,1)
  (same comment as for COD, Chemical Oxygen Demand)
- Aluminium [water, surface water]: 3.1595e-7 kg; lognormal variance with pedigree 0.71, pedigree (1,1,5,1,1)
  (same comment as for Silicon)
- COD, Chemical Oxygen Demand [water, surface water]: 0.12079 kg; lognormal variance with pedigree 0.04, pedigree (1,1,5,1,1)
  (same comment as for Silicon)
- Aluminium [water, ground-, long-term]: 0.00281 kg; lognormal variance with pedigree 0.11, pedigree (1,1,5,1,1)
  (same comment as for COD, Chemical Oxygen Demand)
- Iron, ion [water, surface water]: 2.5534e-5 kg; lognormal variance with pedigree 0.13, pedigree (1,1,5,1,1)
  (same comment as for Silicon)
- Carbon monoxide, fossil [air, urban air close to ground]: 0.00080601 kg; lognormal variance with pedigree 0.17, pedigree (1,1,5,1,1)
  (same comment as for COD, Chemical Oxygen Demand)
- Iron [air, urban air close to ground]: 2.491e-6 kg; lognormal variance with pedigree 0.14, pedigree (1,1,5,1,1)
  (same comment as for Nitrogen oxides)
- Water [water, unspecified]: 0.9 m3; name water_to_water_unspecified; lognormal variance with pedigree 0.0807, pedigree (2,2,5,1,1)
  Calculated value based on water balance.
  property wet mass 1000 kg; name WM
  property carbon content, non-fossil 0; name C_content_non_fossil
  property fraction, origin: fresh water 1; name fraction_origin_fresh_water_Ww
  property fraction, origin: unspecified 0; name fraction_origin_unspecified_Ww
  property carbon content, fossil 0; name C_content_fossil
  property fraction, origin: salt water 0; name fraction_origin_salt_water_Ww
  property water in wet mass 1000 kg; name WWM
  property dry mass 0 kg; name DM
- Dinitrogen monoxide [air, urban air close to ground]: 0.00043262 kg; lognormal variance with pedigree 0.07, pedigree (1,1,5,1,1)
  direct wastewater treatment plant emission plus direct digester gas emission plus emission from sludge incineration plus emission from sludge spreading. Uncertainty calculated from wastewater composition and treatment model
- Iron, ion [water, ground-, long-term]: 0.03495 kg; lognormal variance with pedigree 0.93, pedigree (1,1,5,1,1)
  (same comment as for COD, Chemical Oxygen Demand)
- Iron [soil, agricultural]: 0.065785 kg; lognormal variance with pedigree 0.1, pedigree (1,1,5,1,1)
  (same comment as for Calcium)
- Fluoride [water, surface water]: 0.1736 kg; lognormal variance with pedigree 0.69, pedigree (1,1,5,1,1)
  (same comment as for Silicon)
- Chloride [water, surface water]: 0.42309 kg; lognormal variance with pedigree 0.42, pedigree (1,1,5,1,1)
  (same comment as for Silicon)
- Titanium, ion [water, surface water]: 1.9864e-6 kg; lognormal variance with pedigree 0.68, pedigree (1,1,5,1,1)
  (same comment as for Silicon)
- Nitrate [water, ground-, long-term]: 5.2453e-5 kg; lognormal variance with pedigree 0.09, pedigree (1,1,5,1,1)
  (same comment as for COD, Chemical Oxygen Demand)
- Sodium, ion [water, surface water]: 0.4153 kg; lognormal variance with pedigree 0.69, pedigree (1,1,5,1,1)
  (same comment as for Silicon)
- Silicon [water, ground-, long-term]: 0.01517 kg; lognormal variance with pedigree 5.47, pedigree (1,1,5,1,1)
  (same comment as for COD, Chemical Oxygen Demand)
- Aluminium [air, urban air close to ground]: 5.9317e-6 kg; lognormal variance with pedigree 0.12, pedigree (1,1,5,1,1)
  (same comment as for Nitrogen oxides)
- Phosphate [water, ground-, long-term]: 0.0013946 kg; lognormal variance with pedigree 4.27, pedigree (1,1,5,1,1)
  (same comment as for COD, Chemical Oxygen Demand)
- Titanium [soil, agricultural]: 9.032e-7 kg; lognormal variance with pedigree 0.73, pedigree (1,1,5,1,1)
  (same comment as for Calcium)
- Calcium [air, urban air close to ground]: 3.1366e-6 kg; lognormal variance with pedigree 0.74, pedigree (1,1,5,1,1)
  (same comment as for Nitrogen oxides)
- DOC, Dissolved Organic Carbon [water, surface water]: 0.030229 kg; lognormal variance with pedigree 0.04, pedigree (1,1,5,1,1)
  (same comment as for Silicon)
- Carbon [soil, agricultural]: 0.032492 kg; lognormal variance with pedigree 0.06, pedigree (1,1,5,1,1)
  (same comment as for Calcium)

## Sampling procedure
literature

## Extrapolations
This dataset has been extrapolated from year 2000 to the year of the calculation (2021). The uncertainty has been adjusted accordingly.

## Review by Roberto Dones 2009-02-07
passed.
