# wind turbine network connection construction, 4.5MW, onshore

Dataset: EcoSpold 2, unit process
Geography: GLO
Time period: 2008-01-01 to 2021-12-31
Technology level: modern
Classification: ISIC rev.4 ecoinvent: 2811:Manufacture of engines and turbines, except aircraft, vehicle and cycle eng
Synonyms: grid connection
Tags: wind power; infrastructure
Scenario: Business-as-Usual
System model: Allocation, cut-off by classification
Generated by: Christian Bauer
Published in: Chataignere A. 2003
Database: ecoinvent
isCopyrightProtected: true
accessRestrictedTo: 1

## General comment
This dataset represents the construction of the network connection for a wind turbine with 4.5MW capacity. This connection connects one turbine to the electricity network.
The main components of a network connection of a wind turbine are the cables, the transformer and the sub-station with the circuit breaker and the electricity meter inside it. According to (European Communities 2001), electricity produced with wind turbines is connected to medium voltage or high voltage systems, depending on the size of the windfarm.

(Chataignere & Le Boulch 2003) do not provide any specification of the network connection (type and length of cables, voltage). Data are directly used as first approximation.

Sources:
European Communities. 2001. Wind Turbine Grid Connection and Interaction. Deutsches Windenergie-Institut /Tech-wise A/S /DM Energy, p. 7 Tab.2.1

## Included activities start
From the transformation of pasture land to industrial site, and from the reception and treatment of building materials at construction site.

## Included activities end
This activity ends with the decommissioning of the network connection and the treatment of the resulting materials at the end of the lifetime.

This dataset includes
- all main materials for the construcion of the network connection and their treatment
- excavation of the cable trench
- land transformation and use
- It is assumed that all parts will hold for the lifetime of 20 years and don't have to be replaced.

This dataset doesn't include
- neither the energy use for assembly of the different wind turbine parts nor their transportation from manufacture to the construction site
- auxiliary materials such as packaging materials or vacuum fleece.
- any losses of materials (waste) during the processing of the different wind turbine parts

## Technology
Image: Cable trench and characteristics of the onshore cable used for the connection of the offshore wind park [Ilskov H. (2003) Offshore work on the 150 kV substation and the submarine cable. In proceedings from: Eltra Day, October 22nd, 2003, Billund, Denmark]
(Chataignere & Le Boulch 2003) do not provide any specification of the network connection (type and length of cables, voltage), therefore it is not possible to take into account any details on the possible layout of the wind park. Data are directly used as first approximation.

## Parameters
- Percentage of onshore wind power plant class capacity on total: 0.106 dimensionless; name percentage_onshore_class_gt3; lognormal variance with pedigree 0.009325, pedigree (2,2,1,2,2)
  Percentages onshore 2008 of the three wind power plant classes (average from 41 countries worldwide): <1MW 19.7%; 1-3MW 69.6%; >3MW 10.7% [compilation out of "The Wind Power Database, 2011"]. These percentages are taken to calculate the number of new wind power plants per class with the assumption of average capacity values (0.8MW, 2MW, 4.5MW) .
  Source:
  The Wind Power. 2011. Wind power and wind farms database. www.thewindpower.net
- Installed capacity: 26911 MW; name capacity_installed_new; lognormal variance with pedigree 0.0018, pedigree (2,1,1,1,2)
  Literature value/statistics. New installed capacity of wind power in the world, onshore, 2008. Calculated from the total new installed capacity (27261 MW) minus new capacity offshore (350 MW). [WWEA, 2009. World Wind Energy Report 2008. World Wind Energy Association, Bonn. Table p.12f and chapter "offshore wind energy", p.8]
- extrapolation factor: 3 dimensionless; name extrapolation_factor; = 4.5/1.5; lognormal variance with pedigree 0.0227, pedigree (4,4,3,3,2)
  Calculated value. Amounts for the nacelle and blade parts are extrapolated from a network connection for a 1.5MW wind turbine with a capacity factor of 4.5MW / 1.5MW.
  [Chataignere A. and Le Boulch D. (2003) Wind Turbine Systems. Final report ECLIPSE. EDF R&D, Clamart Cedex, France.]
  Uncertainty: estimated variance. This factor is somewhat arbitrary and has a high uncertainty.

## Reference product
- wind turbine network connection, 4.5MW, onshore: 1 unit; name network_connection; CPC 462: Electricity distribution and control apparatus, and parts thereof; By-product classification allocatable product
  production volume 633.904 unit; name apv_networkconn4_5MW; = capacity_installed_new* percentage_onshore_class_gt3/ network_connection_capacity_MW
    Calculated value. See parameters for a closer look at the values used.
  property capacity [MW] 4.5 MW; name network_connection_capacity_MW
    Literature value.
  property price 1.22859e6 EUR2005; name network_connection_price_EUR2005
    Data from the report by PSI entitled "Ganzheitliche Betrachtung von Energiesystemen" dated 2005 (http://gabe.web.psi.ch/pdfs/PSI_Report/PSI-Bericht_05-04sc.pdf). The reports presents in Fig 5.7 (pg 146) the weight of the different system components in the wind power plant system. The network connection accounts for 14% of the total price while the the wind turbine itself represents 71% of the costs. The price of the wind turbine has already been calculated in ecoinvent (refer to product wind turbine, 4.5MW, onshore). Based on the ratio and the price of the wind turbine, the network connection is calculated.

## By-products
- iron scrap, unsorted: 0 kg; CPC 39310: Slag, dross, scalings and other waste from the manufacture of iron or steel; By-product classification Recyclable
  production volume 0 kg; = apv_networkconn4_5MW * (scrap_iron / network_connection)
    Calculated from production volume of reference product using the relative outputs.
  property price 0.149 EUR2005; name scrap_iron_price_EUR2005
    Temporary price data. Calculated as 90% of purchasers price based on: estimated at 85% of sorted scrap
  property lifetime 20 year; name scrap_iron_lifetime
    Literature value.
  property carbon content 0
    carbon content on a dry matter basis (reserved; not for manual entry)
  properties: carbon content, fossil 0, water in wet mass 0 kg, water content 0, dry mass 1 kg, carbon content, non-fossil 0, wet mass 1 kg, carbon allocation 0 kg

## Inputs from technosphere
- electronics scrap from control units: -7044 kg; name scrap_electronics; = (electronics)*-1
  Estimation
  production volume 4.46522e6 kg; = apv_networkconn4_5MW * scrap_electronics
    Calculated from production volume of reference product using the relative outputs.
  property lifetime 20 year; name waste_electronics_lifetime
  property price 0 EUR2005; name scrap_electronics_price_EUR2005
  properties: wet mass 1 kg, carbon content, fossil 0.337146, carbon content, non-fossil 0.00013442, dry mass 1 kg
- steel, low-alloyed: 8904 kg; name steel_lowalloyed; = steel_lowalloyed_calc_prop_kg* extrapolation_factor; source Chataignere A. 2003, p. 46f; lognormal variance with pedigree 0.041325, pedigree (2,2,5,2,2)
  Literature value. Sum of steel sheet (1300 kg), construction steel (741 kg) and low-alloyed steel (927 kg) extrapolated with a capacity factor 4.5MW/1.5MW from a 1.5MW wind turbine network connection.
  Uncertainty: estimated variance. According to Chataignère&Le Boulch, data quality is very high for the Enercon 1500kW dataset.
  property calculation property, kg 2968 kg; name steel_lowalloyed_calc_prop_kg; = 1300+927+741
  properties: carbon content, fossil 0.005, dry mass 1 kg, wet mass 1 kg
  note on carbon content, fossil: Low alloyed steel composition given in Tab. 3.2 ecoinvent v2.2 report 10_partII. Steel assumed to have a C content of 0.5%
  note on calculation property, kg: Mass of materials in the 1.5MW network connection. For use in mathematical relations.
- scrap copper: 0 kg; name scrap_copper
  production volume 0 kg
    Calculated from production volume of reference product using the relative outputs.
  property price 0 EUR2005; name scrap_copper_price_EUR2005
  property lifetime 20 year; name scrap_copper_lifetime
  properties: dry mass 1 kg, wet mass 1 kg
- wire drawing, steel: 5004 kg; = steel_lowalloyed- sheet_rolling_steel
  Estimation.
- polyvinylchloride, suspension polymerised: 1954.91 kg; name pvc_suspension; = 0.87234* ( pvc_suspension_calc_prop_kg* extrapolation_factor); source Chataignere A. 2003, p. 46f; lognormal variance with pedigree 0.0966, pedigree (4,4,5,4,4)
  Literature value/calculated value. The shares of "polyvinylchloride, emulsion polymersied" and "polyvinylchloride, suspension polymerised" in the cancelled ecoinvent v2 "aluminium production mix" dataset amounted to 12.8% (emulsion) and 87.2% (suspension) respectively. These shares have been overtaken to distribute the original amount of 2241 kg polyvinylchloride.These shares correspond to the European distribution of the different PVC types.
  The value for a network connection for a 1.5MW turbine has been extrapolated (747 kg * 4.5/1.5).
  Uncertainty: estimated variance. higher basic uncertainty because of the extrapolation and the age of the data. slightly higher technological score because of the split of the pvc use in the two pvc types.
  property calculation property, kg 747 kg; name pvc_suspension_calc_prop_kg
  properties: heating value, net 21.5 MJ, dry mass 1 kg, carbon content, fossil 0.387097, wet mass 1 kg
  note on carbon content, fossil: Monomer is vynyl chloride, C2H3Cl (ecoinvent v2.2 report 11_II). MW=62 g/mol
- excavation, hydraulic digger: 1400 m3; = 1*1.4*1000; lognormal variance with pedigree 0.216, pedigree (5,5,5,5,5)
  Estimation. The cable trench is assumed to have a width of 1m, a depth of 1.4m and a length of 1000m.
  Uncertainty: Estimated value, high uncertainty
- waste mineral oil: 0 kg; name waste_mineraloil
  Estimation
  production volume 0 kg
    Calculated from production volume of reference product using the relative outputs.
  property price 0 EUR2005; name waste_mineraloil_price_EUR2005
  property lifetime 20 year; name waste_mineraloil_lifetime
  properties: heating value, net 34.7 MJ, water content 0.111111, carbon content, fossil 0.864444, dry mass 0.9 kg, wet mass 1 kg
  note on heating value, net: Value taken from the general comment of the treatment dataset.
  note on carbon content, fossil: Tab A.6, ecoinvent v2.2 report 13_I. C content has been calculated after data in the tables, and then referred to 1 kg DM
- wire drawing, copper: 18357 kg; = copper
  Literature value. The conductor of the cable is made of copper with a diameter of 6.4 mm, which gives a conductor cross-section of 32.2 mm2 and a weight of 0.25 kg/m.
- concrete, normal: 15 m3; name concrete; = ( concrete_calc_prop_kg* extrapolation_factor)/2400; source Chataignere A. 2003, p. 46f; lognormal variance with pedigree 0.041325, pedigree (2,2,5,2,2)
  Literature value. Light weight concrete (12000 kg) extrapolated with a capacity factor 4.5MW/1.5MW from a 1.5MW wind turbine network connection. For conversion to m3, the normal density of 2400 kg/m3 given in the source is assumed; there is no light weight concrete exchange available in the database and normal concrete is used as proxy. There are no comments on the density of the light weight concrete in the given source. As the density range of light weight concrete varies in a large band and normal conrete is used as proxy, no new assumption was made.
  Uncertainty: estimated variance. According to Chataignère&Le Boulch, data quality is very high for the Enercon 1500kW dataset.
  property calculation property, kg 12000 kg; name concrete_calc_prop_kg
  properties: wet mass 2380 kg, dry mass 2190 kg, water content 0.086758
- steel, chromium steel 18/8: 4035 kg; name steel_chromium; = steel_chromium_calc_prop_kg* extrapolation_factor; source Chataignere A. 2003, p. 46f; lognormal variance with pedigree 0.041325, pedigree (2,2,5,2,2)
  Literature value. Sum of galvanized steel (715 kg), and high-alloyed steel (630 kg) extrapolated with a capacity factor 4.5MW/1.5MW from a 1.5MW wind turbine network connection.
  Uncertainty: estimated variance. According to Chataignère&Le Boulch, data quality is very high for the Enercon 1500kW dataset.
  property calculation property, kg 1345 kg; name steel_chromium_calc_prop_kg; = 630+715
  properties: carbon content, fossil 0.0008, wet mass 1 kg, dry mass 1 kg
  note on carbon content, fossil: Stainless steel model is the grade 304 steel (18/8 stainless, 18% chromium 8% nickel; max. 0.08% C)
- polyvinylchloride, emulsion polymerised: 286.086 kg; name pvc_emulsion; = 0.12766*( pvc_emulsion_calc_prop_kg* extrapolation_factor); source Chataignere A. 2003, p. 46f; lognormal variance with pedigree 0.0966, pedigree (4,4,5,4,4)
  (same comment as for polyvinylchloride, suspension polymerised)
  property calculation property, kg 747 kg; name pvc_emulsion_calc_prop_kg
  properties: heating value, net 21.5 MJ, carbon content, fossil 0.387097, wet mass 1 kg, dry mass 1 kg
- scrap steel: 0 kg; name scrap_steel
  production volume 0 kg
    Calculated from production volume of reference product using the relative outputs.
  property price 0 EUR2005; name scrap_steel_price_EUR2005
  property lifetime 20 year; name scrap_steel_lifetime
  properties: dry mass 1 kg, wet mass 1 kg
- sheet rolling, steel: 3900 kg; name sheet_rolling_steel
  Literature value
- waste polyvinylchloride: 0 kg; name waste_pvc
  Calculated value
  production volume 0 kg
    Calculated from production volume of reference product using the relative outputs.
  property price 0 EUR2005; name waste_pvc_price_EUR2005
  property lifetime 20 year; name lifetime
  properties: heating value, net 21.51 MJ, carbon content, fossil 0.440882, water content 0.00200401, dry mass 0.998 kg, wet mass 1 kg
  note on carbon content, fossil: C content in 1 kg DM was calculated using data in Tab A.1, ecoinvent v2.2 report 13_I
- sheet rolling, chromium steel: 4035 kg; = steel_chromium
  Literature value
- waste concrete, not reinforced: 0 kg; name waste_concrete
  Calculated value. A density of 2400kg/m3 is assumed for the concrete.
  production volume 0 kg
    Calculated from production volume of reference product using the relative outputs.
  property price 0 EUR2005; name waste_concrete_price_EUR2005
  property lifetime 20 year; name waste_concrete_lifetime
  properties: dry mass 1 kg, wet mass 1 kg
- cast iron: 3126 kg; name cast_iron; = cast_iron_calc_prop_kg* extrapolation_factor; source Chataignere A. 2003, p. 46f; lognormal variance with pedigree 0.0641, pedigree (4,4,5,3,3)
  Literature value. Iron value (1042 kg) extrapolated with a capacity factor 4.5MW/1.5MW from a 1.5MW wind turbine network connection.
  Uncertainty: estimated variance. higher basic uncertainty because of the extrapolation and the age of the data.
  property calculation property, kg 1042 kg; name cast_iron_calc_prop_kg
  properties: carbon content, fossil 0.04, wet mass 1 kg, dry mass 1 kg
  note on carbon content, fossil: Cast iron is made by remelting pig iron in small furnaces (e.g. cupola furnaces or electric arc furnaces) and poured into moulds to make castings. It usually contains 2% to 6% carbon (ecoinvent v2.2 report 10_partII). An average content of 4% was considered
- copper, cathode: 18357 kg; name copper; = copper_calc_prop_kg* extrapolation_factor; source Chataignere A. 2003, p. 46f; lognormal variance with pedigree 0.041325, pedigree (2,2,5,2,2)
  Literature value. Used in the cables. Copper amount of 6119 kg is extrapolated with a capacity factor 4.5MW/1.5MW from a 1.5MW wind turbine network connection.
  Uncertainty: estimated variance. According to Chataignère&Le Boulch, data quality is very high for the Enercon 1500kW dataset.
  property calculation property, kg 6119 kg; name copper_calc_prop_kg
  properties: wet mass 1 kg, dry mass 1 kg
- lubricating oil: 0 kg; name lubricating_oil; source Chataignere A. 2003, p. 46f; pedigree (1,1,1,1,1)
  Literature value. Lubricating oil use of 940 kg is extrapolated with a capacity factor 4.5MW/1.5MW from a 1.5MW wind turbine network connection.
  Uncertainty: estimated variance. higher basic uncertainty because of the extrapolation and the age of the data.
  property calculation property, kg 940 kg; name lubricating_oil_calc_prop_kg
  properties: carbon content, fossil 0.75, dry mass 1 kg, wet mass 1 kg, heating value, net 40.2 MJ
  note on carbon content, fossil: Lubricating oil is produced from diesel. C-content/dry mass of fats and oils considered 75%, from: ecoinvent v2.2 report, n 15a, pg 40
  note on heating value, net: Literature value, Source: IPCC 2006, 2006 IPCC Guidelines for National Greenhouse Gas Inventories, Prepared by the National Greenhouse Gas Inventories Programme, Eggleston H.S., Buendia L., Miwa K., Ngara T. and Tanabe K. (eds). Published: IGES, Japan
- electronics, for control units: 7044 kg; name electronics; = electronics_calc_prop_kg* extrapolation_factor; source Chataignere A. 2003, p. 46f; lognormal variance with pedigree 0.0641, pedigree (4,4,5,3,3)
  Literature value. Sum of "electronics" (1283 kg), and "rest of electrics" (1065 kg) extrapolated with a capacity factor 4.5MW/1.5MW from a 1.5MW wind turbine network connection.
  Uncertainty: estimated variance. higher basic uncertainty because of the extrapolation and the age of the data.
  property calculation property, kg 2348 kg; name electronics_calc_prop_kg; = 1283+1065
  properties: carbon content, fossil 0.337146, carbon content, non-fossil 0.00013442, dry mass 1 kg, wet mass 1 kg
  note on carbon content, fossil: The control unit has a composition of 46% steel (housing), 32% plastics, 14% printed wiring boards and 8% cables (various types).;
- iron scrap, unsorted: -3126 kg
  production volume 1.98158e6 kg
  properties: dry mass 1 kg, wet mass 1 kg
- scrap copper: -5822.98, -273.202, -12260.8 kg (3 entries)
  production volume 1.16366e7 kg
  properties: dry mass 1 kg, wet mass 1 kg, lifetime 20 year
- waste mineral oil: -774.065, -19.1628, -2026.77 kg (3 entries)
  Estimation
  production volume 1.78761e6 kg
  properties: heating value, net 34.7 MJ, water content 0.111111, carbon content, fossil 0.864444, dry mass 0.9 kg, wet mass 1 kg, lifetime 20 year
- scrap steel: -3150.58, -3.99168, -9784.42 kg (3 entries)
  production volume 8.20208e6 kg
  properties: dry mass 1 kg, wet mass 1 kg, lifetime 20 year
- waste polyvinylchloride: -215.707, -16.6297, -6.86867, -6.52244, -248.888, -2.77486, -1.25768, -1742.35 kg (8 entries)
  Calculated value
  production volume 1.42058e6 kg
  properties: heating value, net 21.51 MJ, carbon content, fossil 0.440882, water content 0.00200401, dry mass 0.998 kg, wet mass 1 kg, lifetime 20 year
- waste concrete, not reinforced: -2355.66, -24.96, -33619.4 kg (3 entries)
  Calculated value. A density of 2400kg/m3 is assumed for the concrete.
  production volume 2.28205e7 kg
  properties: dry mass 1 kg, wet mass 1 kg, lifetime 20 year
- lubricating oil: 490.68, 2329.32 kg (2 entries); source Chataignere A. 2003, p. 46f; lognormal variance with pedigree 0.0641, pedigree (4,4,5,3,3)
  (same comment as for lubricating oil)
  properties: carbon content, fossil 0.75, dry mass 1 kg, wet mass 1 kg, calculation property, kg 940 kg, heating value, net 40.2 MJ

## Inputs from nature
- Transformation, to industrial area [natural resource, land]: 1000 m2; = land_from; source Chataignere A. 2003
  Literature value
- Occupation, industrial area [natural resource, land]: 20000 m2*year; name occu_area; = land_from*lifetime
  Literature value
- Transformation, from pasture, man made [natural resource, land]: 1000 m2; name land_from; = 1*1000; lognormal variance with pedigree 0.216, pedigree (5,5,5,5,5)
  (same comment as for excavation, hydraulic digger)

## Sampling procedure
Literature, estimations, expert knowledge

## Extrapolations
This dataset has been extrapolated from year 2008 to the year of the calculation (2021). The uncertainty has been adjusted accordingly.

## Review by Carl Vadenbo 2012-02-23
The dataset were found to meet the quality guidelines for the ecoinvent database on 2012.04.06.

Improvements in the following areas/aspects are recommended for future revisions in order to strenghen the overall quality of the dataset:
-energy use and emissions arising during the manufacturing process of the components and during the final assembly;
-material losses during manufacturing;
-packaging materials;
-transport of components between the location of the manufacturing processes and the site of the installation.

## Review by Bo Weidema 2012-02-23
This dataset has only been reviewed by two editors.
