# wheat production

Dataset: EcoSpold 2, unit process
Geography: ZA
Time period: 2016-01-01 to 2021-12-31
Technology level: current
Classification: ISIC rev.4 ecoinvent: 0111:Growing of cereals (except rice), leguminous crops and oil seeds
Scenario: Business-as-Usual
System model: Allocation, cut-off by classification
Generated by: Ilhaam Patel
Published in: Russo, V 2017
Database: ecoinvent
isCopyrightProtected: true
accessRestrictedTo: 1

## General comment
This dataset represents the production of 1 kg of wheat grain (wet mass) in South Africa.The dataset is representative of the 2016-2017 growing season, which produced 1.92 million tonnes at an overall yield of 3.8 tonnes/ha. The datasets is modelled with 62% of wheat grown under dryland conditions and 38% is irrigated, with the percentage of wheat grown under dryland conditons and that grown under irrigated conditions is extrapolated from the 2006 growing season (the latest for which this information is available) and average yields of 3 tonnes/ha and 5.1 tonnes/ha respectively for dryland and irrigated wheat, respectively. Inputs for dryland and irrigated wheat cultivation are obtained prmarily from farm budgets, the Department of Agriculture and Fisheries Wheat production guideline and the FAO. Emissions are calculated from fertilser and pesticide inputs.

## Included activities start
This activity starts with soil cultivation after the harvest of the previous crop.

## Included activities end
This activity ends after harvest of grains at the farm gate.
The dataset includes the inputs of seeds, mineral fertilisers, pesticides and all machine operations and corresponding machine infrastructure. Machine operations are: soil cultivation, sowing, fertilisation, irrigation, weed control, pest and pathogen control, and combine-harvesting. Direct field emissions are also included. The use of car, van or pick-up for servicing people, e.g. from farm to field, is not included in the activities.

## Geography
The inventory is modelled for the region of South Africa

## Technology
The data are intended to reflect current equipment and processes in South Africa.

## Time period
The production volumes represent production figures for the 2016/2017 growing season reported in 2017 Abstract of Agricultural Statistics. References: DAFF (2017) Abstract of Agricultural Statistics 2017, Department of Agriculture, Forestry and Fisheries of South Africa, Available at: http://www.daff.gov.za/Daffweb3/Portals/0/Statistics%20and%20Economic%20Analysis/Statistical%20Information/Abstract%202017.pdf. (Accessed September 2017).

## Parameters
- fraction, irrigation water, to air: 0.72 dimensionless; name fraction_IW_to_air; lognormal variance with pedigree 0.0409, pedigree (2,2,2,1,1)
  Literature value (Siebert, 2010) (Vionnet, S., Quantis Water Database - Technical Report, 2012).
- fraction, irrigation water, to ground water: 0.8 dimensionless; name fraction_IW_to_ground_water; lognormal variance with pedigree 0.0886, pedigree (4,3,1,1,4)
  Literature value (Doll, 2011) cross referenced with expert opinion.
- water content at harvest: 0.18 kg/kg; name harvest_wc; lognormal variance with pedigree 0.01, pedigree (1,1,1,1,1)
  Grain water content at harvest (wet mass basis). See supporting documentation '01 crop production - Québec.pdf' available on ecoinvent reports web page (https://ecoquery.ecoinvent.org/File/Reports).
- fraction, irrigation water to surface water: 0.2 dimensionless; name fraction_IW_to_surface_water; lognormal variance with pedigree 0.0886, pedigree (4,3,1,1,4)
  Literature value (Doll, 2011) cross referenced with expert opinion.

## Reference product
- wheat grain: 0 kg; name REF_PRODUCT; CPC 01112: Wheat, other; By-product classification allocatable product
  production volume 1.918e9 kg; name REF_PRODUCT_PV
    Wheat grain production for 2016/2017 season reported in 2017 Abstract of Agricultural Statistics. References: DAFF (2017) Abstract of Agricultural Statistics 2017, Department of Agriculture, Forestry and Fisheries of South Africa, Available at: http://www.daff.gov.za/Daffweb3/Portals/0/Statistics%20and%20Economic%20Analysis/Statistical%20Information/Abstract%202017.pdf. (Accessed September 2017).
  property dry mass 0.855 kg; name REF_PRODUCT_DM; = REF_PRODUCT_WM- REF_PRODUCT_WWM
  property carbon content, non-fossil 0.464601; name REF_PRODUCT_C_content_non_fossil
    Estimate not geography specific. Value and comment from "wheat production, GLO": biogene carbon content on a dry matter basis
    Composition data obtained from Wheat, soft red winter, in (http://www.nal.usda.gov/fnic/foodcomp/search/). First, composition data were refered to 1 kg dry mass. Then, C-contents were calculated considering a C-content/dry mass of 46% in carbohydrates (including fibres), 53% in proteins and 75% in fats. All data from 'Evolutionary and Biochemical Aspects', A.D. Kay and T. Vrede (in Global Ecology, 2010, Elsevier B.V., S.E. Jørgensen Ed.).
  property wet mass 1 kg; name REF_PRODUCT_WM
  property price 0.22 EUR2005; name REF_PRODUCT_price_EUR2005
    Literature value. Based on SAFEX price of R 3,727 per tonne, source: SAGIS, 2018. Retrieved from: http://www.sagis.org.za/safex_historic.html, accessed 28May2018
  property water content 0.169591; name REF_PRODUCT_water_content; = REF_PRODUCT_WWM/ REF_PRODUCT_DM
  property water in wet mass 0.145 kg; name REF_PRODUCT_WWM
  property carbon content 0.464601
    carbon content on a dry matter basis (reserved; not for manual entry)
  property true value 0.22; name REF_PRODUCT_true_value
    allocation property applied in "true value" allocation // value calculated from revenue
  properties: carbon content, fossil 0, carbon allocation 0.397234 kg
- straw: 1 kg; name BY_PRODUCT; CPC 01913: Cereal straw, husks, unprepared, ground, pressed, or in the form of pellets; By-product classification allocatable product; pedigree (1,1,1,1,1)
  Estimated straw yield adjusted for residue left in the field for erosion control and soil conditioning. Average residue yield is roughly equal to grain yield, but the residue required to be left in the field to protect against soil erosion and to maintain soil organic carbon varies significanty with wheat growing area (ranging from 7% to 84%). Current residue use for cattle feed also varies significantly with area (ranging from 1% to 88%). The estimated value applied is the average sustainable straw yield across 29 wheat growing areas in South Afica. Reference: Batidzirai, B., Valk, M., Wicke, B., Junginger, M., Daioglou, V., Euler, W. and Faaij, A.P.C. (2016) Current and future technical, economic and environmental feasibility of maize and wheat residues supply for biomass energy application: Illustrated for South Africa, Biomass and Bioenergy, 92, pp. 106-129
  production volume 1.76456e9 kg; = REF_PRODUCT_PV*BY_PRODUCT/REF_PRODUCT
    Calculated from production volume of reference product using the relative product yields.
  property price 0.012 EUR2005; name BY_PRODUCT_price_EUR2005
    Temporary price data. Calculated as 90% of purchasers price based on: Based on price allocation ratio from EcoInvent v2 report number 17, page 118.
  property carbon content, non-fossil 0.437377; name BY_PRODUCT_C_content_non_fossil
  property dry mass 0.85 kg; name BY_PRODUCT_DM
  property heating value, net 14.25 MJ
    Literature value, Source: Phyllis2, database for (treated) biomass, algae, feedstocks for biogas production and biochar, https://phyllis.nl/Biomass/View/1271, ECN.TNO
  property carbon content 0.437377
    carbon content on a dry matter basis (reserved; not for manual entry)
  property true value 0.01104; name BY_PRODUCT_true_value
    allocation property applied in "true value" allocation // value calculated from revenue
  properties: water in wet mass 0.15 kg, water content 0.176471, wet mass 1 kg, carbon content, fossil 0, carbon allocation 0.37177 kg

## Inputs from technosphere
- captan: 2.06198e-6 kg; lognormal variance with pedigree 0.0098, pedigree (2,3,4,1,1)
  This figure represents the mass of the active ingredient for the pesticide Captan, N-trichtoromethylthio~cyclohexene-1,2-dicarboximide (phthalimide class of fungicides). Average application rates for pesticides were extracted from commercial enterprise budgets (combuds) for selected dryland wheat farms (GreenCape, 2015). The pesticide application rates for dryland wheat were assumed to be representative for the average South African wheat farm. Reference(s): GreenCape (2015) Regional Resource Flow Model: Grain Sector Report, Available at: https://www.greencape.co.za/assets/Bioeconomy/RRFM-Grain-Sector-Report-Mar-2015-Final-Website-2017.pdf. (Accessed September 2017).
  properties: dry mass 1 kg, wet mass 1 kg, carbon content, fossil 0.358804
- inorganic phosphorus fertiliser, as P2O5: 0.000326697 kg; lognormal variance with pedigree 0.0098, pedigree (2,3,4,1,1)
  This figure represents P2O5 from MAP (11% N, 52% P2O5), DAP (18% N, 46% P2O5), and SSP. Total amount of P as P2O5 determined from the calculated nitrogen application rates and the typical mineral ratio of nutrients N:P:K annually consumed by wheat in the region (FAO, 2005). MAP and DAP as P2O5 calculated based on N application rates (MAP, DAP). SSP application was assumed to make up the remainder. See details for disaggregation in supporting documentation. Reference(s): FAO (2005) Fertiliser Use by Crop in South Africa, Food and Agriculture Organisation ofo the United Nations, Available at: ftp://ftp.fao.org/agl/agll/docs/fertusesouthafrica.pdf. (Accessed August 2017).
  properties: wet mass 1 kg, dry mass 1 kg
- [sulfonyl]urea-compound: 7.53116e-8 kg; lognormal variance with pedigree 0.0098, pedigree (2,3,4,1,1)
  This figure represents the mass of one of the active ingredients of the pesticide Finesse (Flucarbazone-sodium). Average application rates for pesticides were extracted from commercial enterprise budgets (combuds) for selected dryland wheat farms (GreenCape, 2015). The pesticide application rates for dryland wheat were assumed to be representative for the average South African wheat farm. Reference(s): GreenCape (2015) Regional Resource Flow Model: Grain Sector Report, Available at: https://www.greencape.co.za/assets/Bioeconomy/RRFM-Grain-Sector-Report-Mar-2015-Final-Website-2017.pdf. (Accessed September 2017).
  properties: dry mass 1 kg, carbon content, fossil 0.540853, wet mass 1 kg
- ammonia, anhydrous, liquid: 8.10249e-5 kg; lognormal variance with pedigree 0.0098, pedigree (2,3,4,1,1)
  This figure represents the consumption of anhydrous ammonia (ammonia gas). Based on average application rate of nitrogen [kg N/ha] and a breakdown of the mineral nutrient by fertiliser type based on that of a conventional irrigated wheat operation (FAO, 2015). A weighted average was estimated based the an average application rate of 28kg N/ha for dryland wheat and 97kg N/ha for irrigated wheat extracted from commercial enterprise budgets (Combuds) for selected farms in the Western Cape region (GreenCape, 2015). See details for disaggregation in supporting documentation. Reference(s): FAO (2005) Fertiliser Use by Crop in South Africa, Food and Agriculture Organisation ofo the United Nations, Available at: ftp://ftp.fao.org/agl/agll/docs/fertusesouthafrica.pdf. (Accessed August 2017); FAO (2015) Online Database: Global Database of GHG Emissions Related to Feed Crop, Food and Agriculture Organisation of the United Nations, Available at: http://www.fao.org/partnerships/leap/database/ghg-crops/en/. (Accessed September 2017); Stats SA (2007) Census of Commercial Agriculture, 2007: Financial and Production Statistics, Available at: http://www.nda.agric.za/docs/statsinfo/Censcoagric2007.pdf. (Accessed September 2017).
  properties: wet mass 1 kg, dry mass 1 kg
- nitrile-compound: 1.54778e-6 kg; lognormal variance with pedigree 0.0098, pedigree (2,3,4,1,1)
  This figure represents the mass of the active ingredient for the pesticide Bucktril DS, bromoxynil (heptanoate and octanoate esters). Average application rates for pesticides were extracted from commercial enterprise budgets (combuds) for selected dryland wheat farms (GreenCape, 2015). The pesticide application rates for dryland wheat were assumed to be representative for the average South African wheat farm. Reference(s): GreenCape (2015) Regional Resource Flow Model: Grain Sector Report, Available at: https://www.greencape.co.za/assets/Bioeconomy/RRFM-Grain-Sector-Report-Mar-2015-Final-Website-2017.pdf. (Accessed September 2017).
  properties: wet mass 1 kg, carbon content, fossil 0.344995, dry mass 1 kg
- lime: 0.0066482 kg; name LIME_CaCO3; lognormal variance with pedigree 0.0098, pedigree (2,3,4,1,1)
  Estimate is a weighted average of lime consumption [kg/tonne] for irrigated and dryland wheat, and the estimated breakdown of irrigated versus dryland wheat production. Lime consumption figures calculated based on the total fertiliser and lime consumption [t/ha] of selected irrigated and dryland wheat farms reported in Western Cape commercial enterprise budgets (Combuds) (GreenCape, 2015), the total nutrient consumption from synthetic fertilisers irrigated and dryland wheat (GreenCape, 2015, FAO, 2005) and an assumed average concentration of the synthetic fertilisers of 30%. Reference(s): FAO (2005) Fertiliser Use by Crop in South Africa, Food and Agriculture Organisation ofo the United Nations, Available at: ftp://ftp.fao.org/agl/agll/docs/fertusesouthafrica.pdf. (Accessed August 2017); GreenCape (2015) Regional Resource Flow Model: Grain Sector Report, Available at: https://www.greencape.co.za/assets/Bioeconomy/RRFM-Grain-Sector-Report-Mar-2015-Final-Website-2017.pdf. (Accessed September 2017).
  properties: carbon content, fossil 0.120005, dry mass 1 kg, wet mass 1 kg
- chemical, inorganic: 2.19183e-6 kg; lognormal variance with pedigree 0.0098, pedigree (2,3,4,1,1)
  This figure represents the dry mass of zinc oxide. Average application rates for pesticides were extracted from commercial enterprise budgets (combuds) for selected dryland wheat farms (GreenCape, 2015). The pesticide application rates for dryland wheat were assumed to be representative for the average South African wheat farm. Reference(s): GreenCape (2015) Regional Resource Flow Model: Grain Sector Report, Available at: https://www.greencape.co.za/assets/Bioeconomy/RRFM-Grain-Sector-Report-Mar-2015-Final-Website-2017.pdf. (Accessed September 2017).
  properties: wet mass 1 kg, carbon content, fossil 0.003, dry mass 1 kg
  note on carbon content, fossil: This dataset is an unweighted average of 20 inorganic substances (listed in Tab 88.1, ecoinvent v2.2 report 8, part II), being part of the top100 chemicals included in this database. The C-content has also been calculated as an unweighted average of the C content of the substances composing this dataset.
- tillage, rotary cultivator: 1.37639e-5 ha; lognormal variance with pedigree 0.0098, pedigree (2,3,4,1,1)
  Estimated using annual frequency of 1 and 100% mechanical operation. Based on field work process data for conventional irrigated wheat in South Africa, namely number of applications, and the % of the process which is performed mechanically versus manually (FAO, 2015). Using this data and the correlating ecoinvent datasets, the total diesel consumption [kg/ha] was determined, which correlated well with the total diesel consumption reported in the commercial enterprise budgets (combuds) for selected irrigated and dryland wheat farms in the North West and Western Cape Provinces of South Africa, respectively (GreenCape, 2015). Reference(s): FAO (2015) Online Database: Global Database of GHG Emissions Related to Feed Crop, Food and Agriculture Organisation of the United Nations, Available at: http://www.fao.org/partnerships/leap/database/ghg-crops/en/. (Accessed September 2017); GreenCape (2015) Regional Resource Flow Model: Grain Sector Report, Available at: https://www.greencape.co.za/assets/Bioeconomy/RRFM-Grain-Sector-Report-Mar-2015-Final-Website-2017.pdf. (Accessed September 2017).
- phenoxy-compound: 1.48026e-6 kg; lognormal variance with pedigree 0.0098, pedigree (2,3,4,1,1)
  This figure represents the mass of the active ingredient for the pesticide Hoelon, methyl 2-[4-(2,4-dichlorophenoxy) phenoxy]propanoate. Average application rates for pesticides were extracted from commercial enterprise budgets (combuds) for selected dryland wheat farms (GreenCape, 2015). The pesticide application rates for dryland wheat were assumed to be representative for the average South African wheat farm. Reference(s): GreenCape (2015) Regional Resource Flow Model: Grain Sector Report, Available at: https://www.greencape.co.za/assets/Bioeconomy/RRFM-Grain-Sector-Report-Mar-2015-Final-Website-2017.pdf. (Accessed September 2017).
  properties: wet mass 1 kg, carbon content, fossil 0.532559, dry mass 1 kg
- urea: 0.000448728 kg; name UREA_N; lognormal variance with pedigree 0.0098, pedigree (2,3,4,1,1)
  The exchange has been updated from 'urea, as N' into 'urea' and therefore its amount has been scaled (multiplied) from 0.004 kg by 2.1438 kg of 'urea' per kg of 'urea, as N'. Original comment of the exchange is: Based on average application rate of nitrogen [kg N/ha] and a breakdown of the mineral nutrient by fertiliser type based on that of a conventional irrigated wheat operation (FAO, 2015). A weighted average was estimated based the an average application rate of 28kg N/ha for dryland wheat and 97kg N/ha for irrigated wheat extracted from commercial enterprise budgets (Combuds) for selected farms in the Western Cape region (GreenCape, 2015). See details for disaggregation in supporting documentation. Reference(s): FAO (2005) Fertiliser Use by Crop in South Africa, Food and Agriculture Organisation ofo the United Nations, Available at: ftp://ftp.fao.org/agl/agll/docs/fertusesouthafrica.pdf. (Accessed August 2017); FAO (2015) Online Database: Global Database of GHG Emissions Related to Feed Crop, Food and Agriculture Organisation of the United Nations, Available at: http://www.fao.org/partnerships/leap/database/ghg-crops/en/. (Accessed September 2017); Stats SA (2007) Census of Commercial Agriculture, 2007: Financial and Production Statistics, Available at: http://www.nda.agric.za/docs/statsinfo/Censcoagric2007.pdf. (Accessed September 2017).
  properties: wet mass 1 kg, carbon content, fossil 0.2, dry mass 1 kg
- pesticide, unspecified: 3.70325e-7 kg; lognormal variance with pedigree 0.0098, pedigree (2,3,4,1,1)
  This figure represents the mass of the active ingredient(s) for the pesticides Finesse (Chlorsulfuron) and Topik 240 EC (clodinafop-propargyl and cloquintocet-mexyl). Average application rates for pesticides were extracted from commercial enterprise budgets (combuds) for selected dryland wheat farms (GreenCape, 2015). The pesticide application rates for dryland wheat were assumed to be representative for the average South African wheat farm. Reference(s): GreenCape (2015) Regional Resource Flow Model: Grain Sector Report, Available at: https://www.greencape.co.za/assets/Bioeconomy/RRFM-Grain-Sector-Report-Mar-2015-Final-Website-2017.pdf. (Accessed September 2017).
  properties: wet mass 1 kg, carbon content, fossil 0.486978, dry mass 1 kg
- ammonium nitrate: 0.000173636 kg; lognormal variance with pedigree 0.0098, pedigree (2,3,4,1,1)
  The exchange has been updated from 'ammonium nitrate, as N' into 'ammonium nitrate' and therefore its amount has been scaled (multiplied) from 0.0012 kg by 2.8573 kg of 'ammonium nitrate' per kg of 'ammonium nitrate, as N'. Original comment of the exchange is: Based on average application rate of nitrogen [kg N/ha] and a breakdown of the mineral nutrient by fertiliser type based on that of a conventional irrigated wheat operation (FAO, 2015). A weighted average was estimated based the an average application rate of 28kg N/ha for dryland wheat and 97kg N/ha for irrigated wheat extracted from commercial enterprise budgets (Combuds) for selected farms in the Western Cape region (GreenCape, 2015). See details for disaggregation in supporting documentation. Reference(s): FAO (2005) Fertiliser Use by Crop in South Africa, Food and Agriculture Organisation ofo the United Nations, Available at: ftp://ftp.fao.org/agl/agll/docs/fertusesouthafrica.pdf. (Accessed August 2017); FAO (2015) Online Database: Global Database of GHG Emissions Related to Feed Crop, Food and Agriculture Organisation of the United Nations, Available at: http://www.fao.org/partnerships/leap/database/ghg-crops/en/. (Accessed September 2017); Stats SA (2007) Census of Commercial Agriculture, 2007: Financial and Production Statistics, Available at: http://www.nda.agric.za/docs/statsinfo/Censcoagric2007.pdf. (Accessed September 2017).
  properties: wet mass 1 kg, dry mass 1 kg
- glyphosate: 4.84072e-6 kg; lognormal variance with pedigree 0.0098, pedigree (2,3,4,1,1)
  This figure represents the mass of the active ingredient for the pesticide Roundup of the same name (i.e. glyphosate). Average application rates for pesticides were extracted from commercial enterprise budgets (combuds) for selected dryland wheat farms (GreenCape, 2015). The pesticide application rates for dryland wheat were assumed to be representative for the average South African wheat farm. Reference(s): GreenCape (2015) Regional Resource Flow Model: Grain Sector Report, Available at: https://www.greencape.co.za/assets/Bioeconomy/RRFM-Grain-Sector-Report-Mar-2015-Final-Website-2017.pdf. (Accessed September 2017).
  properties: dry mass 1 kg, carbon content, fossil 0.214286, wet mass 1 kg
- fertilising, by broadcaster: 1.37639e-5 ha; lognormal variance with pedigree 0.0098, pedigree (2,3,4,1,1)
  (same comment as for tillage, rotary cultivator)
- packaging, for pesticides: 3.39349e-5 kg; lognormal variance with pedigree 0.0532, pedigree (4,3,3,5,4)
  Total amount of active substance/s of pesticides needed for the production of wheat grain is calculated to be circa 3.27E-04 kg. Pesticide/s used in this dataset is/are: '[sulfonyl]urea-compound', 'captan', 'chemical, inorganic', 'glyphosate', 'magnesium sulfate', 'nitrile-compound', 'organophosphorus-compound, unspecified', 'pesticide, unspecified', 'phenoxy-compound'. The total amount of active substance/s is doubled in order to account for the packaging of the dilluted product of pesticide/s that is/are applied. Therefore, 6.53E-04 kg of packaging for pesticides is justified with this exchange.
  properties: carbon content, fossil 0.85714, dry mass 1 kg, price 0.0642 EUR2005, heating value, net 25.97 MJ, wet mass 1 kg
- combine harvesting: 1.37639e-5 ha; lognormal variance with pedigree 0.0098, pedigree (2,3,4,1,1)
  (same comment as for tillage, rotary cultivator)
- potassium chloride: 1.28254e-5 kg; lognormal variance with pedigree 0.0098, pedigree (2,3,4,1,1)
  The exchange has been updated from 'potassium chloride, as K2O' into 'potassium chloride' and therefore its amount has been scaled (multiplied) from 0.0002 kg by 1.5829 kg of 'potassium chloride' per kg of 'potassium chloride, as K2O'. Original comment of the exchange is: This figure represents K2O from KCl. Total amount of K as K2O determined from the calculated nitrogen application rates and the typical mineral ratio of nutrients N:P:K annually consumed by wheat in the region (FAO, 2005). K2O based fertilisers are all imported, with the bulk of imports being KCl. See details for disaggregation in supporting documentation. Reference(s): FAO (2005) Fertiliser Use by Crop in South Africa, Food and Agriculture Organisation ofo the United Nations, Available at: ftp://ftp.fao.org/agl/agll/docs/fertusesouthafrica.pdf. (Accessed August 2017).
  properties: wet mass 1 kg, dry mass 1 kg
- drying of feed grain: 0.00221691 l; name EVAP_WATER; = REF_PRODUCT * (REF_PRODUCT_WWM - harvest_wc) / (harvest_wc - 1); lognormal variance with pedigree 0.002, pedigree (1,1,3,1,1)
  Estimate is not geography specific. Assumed to be the same as in case of wheat production/GLO. Calculated from average moisture content of grains at harvest (see Exchange Properties and Parameters).
- sowing: 6.85596e-6 ha; lognormal variance with pedigree 0.0098, pedigree (2,3,4,1,1)
  Estimated using annual frequency of 1 and 50% mechanical operation. Based on field work process data for conventional irrigated wheat in South Africa, namely number of applications, and the % of the process which is performed mechanically versus manually (FAO, 2015). Using this data and the correlating ecoinvent datasets, the total diesel consumption [kg/ha] was determined, which correlated well with the total diesel consumption reported in the commercial enterprise budgets (combuds) for selected irrigated and dryland wheat farms in the North West and Western Cape Provinces of South Africa, respectively (GreenCape, 2015). Reference(s): FAO (2015) Online Database: Global Database of GHG Emissions Related to Feed Crop, Food and Agriculture Organisation of the United Nations, Available at: http://www.fao.org/partnerships/leap/database/ghg-crops/en/. (Accessed September 2017); GreenCape (2015) Regional Resource Flow Model: Grain Sector Report, Available at: https://www.greencape.co.za/assets/Bioeconomy/RRFM-Grain-Sector-Report-Mar-2015-Final-Website-2017.pdf. (Accessed September 2017).
- irrigation: 0.011946 m3; name water_irrigation_input; lognormal variance with pedigree 0.0092, pedigree (2,1,4,1,1)
  Centre pivot irrigation. Calculated from the blue water use for wheat production per province from the Water Footprint Network (in m3/tonne) (WFN, 2011) and the irrigated provincial tonnages according to the AgriCensus. This gives an average water use per irrigated tonne of wheat produced of 614 m3/tonne. In this dataset, 38% of wheat is grown under irrigation. References: WFN (2011) Product Water Footprint Statistics: Water footprints of crops and derived crop products (1996-2005), Water Footprint Network, Available at: http://waterfootprint.org/en/resources/water-footprint-statistics/. (Accessed September 2017); Stats SA (2007) Census of Commercial Agriculture, 2007: Financial and Production Statistics, Available at: http://www.nda.agric.za/docs/statsinfo/Censcoagric2007.pdf. (Accessed September 2017).
  properties: dry mass 0.11 kg, water content 9089.91, wet mass 1000 kg
- packaging, for fertilisers: 0.015464 kg; lognormal variance with pedigree 0.0532, pedigree (4,3,3,5,4)
  Total amount of active substance/s of fertilisers needed for the production of 'wheat grain' is calculated to be circa 1.49E-01 kg. Fertiliser/s used in this dataset is/are: 'ammonia, liquid', 'ammonium nitrate, as N', 'ammonium sulfate, as N', 'lime', 'nitrogen fertiliser, as N', 'phosphate fertiliser, as P2O5', 'potassium chloride, as K2O', 'potassium sulfate, as K2O', 'urea, as N'. The total amount of active substance/s is doubled in order to account for the packaging of the dilluted product of fertiliser/s that is/are applied. Therefore, 2.98E-01 kg of packaging for fertilisers is justified with this exchange.
  properties: dry mass 1 kg, price 0.0642 EUR2005, carbon content, fossil 0.825301, heating value, net 25.01 MJ, wet mass 1 kg
  note on carbon content, fossil: Considering a chemical formula (C2H4)n for polyethylene, carbon content-fossil is calculated to be 0.856286 kg of Carbon per kg of dry mass.
- potassium sulfate: 0.00013548 kg; lognormal variance with pedigree 0.0098, pedigree (2,3,4,1,1)
  The exchange has been updated from 'potassium sulfate, as K2O' into 'potassium sulfate' and therefore its amount has been scaled (multiplied) from 0.0014 kg by 1.85 kg of 'potassium sulfate' per kg of 'potassium sulfate, as K2O'. Original comment of the exchange is: This figure represents K2O from potassium sulphate. Total amount of K as K2O determined from the calculated nitrogen application rates and the typical mineral ratio of nutrients N:P:K annually consumed by wheat in the region (FAO, 2005). K2O based fertilisers are all imported, with the bulk of imports being KCl. See details for disaggregation in supporting documentation. Reference(s): FAO (2005) Fertiliser Use by Crop in South Africa, Food and Agriculture Organisation ofo the United Nations, Available at: ftp://ftp.fao.org/agl/agll/docs/fertusesouthafrica.pdf. (Accessed August 2017).
  properties: dry mass 1 kg, wet mass 1 kg
- inorganic nitrogen fertiliser, as N: 0.000290859 kg; lognormal variance with pedigree 0.0098, pedigree (2,3,4,1,1)
  This figure represents N from MAP, CAN, DAP, and CN. Based on average application rate of nitrogen [kg N/ha] and a breakdown of the mineral nutrient by fertiliser type based on that of a conventional irrigated wheat operation (FAO, 2015). A weighted average was estimated based the an average application rate of 28kg N/ha for dryland wheat and 97kg N/ha for irrigated wheat extracted from commercial enterprise budgets (Combuds) for selected farms in the Western Cape region (GreenCape, 2015). See details for disaggregation in supporting documentation. Reference(s): FAO (2005) Fertiliser Use by Crop in South Africa, Food and Agriculture Organisation ofo the United Nations, Available at: ftp://ftp.fao.org/agl/agll/docs/fertusesouthafrica.pdf. (Accessed August 2017); FAO (2015) Online Database: Global Database of GHG Emissions Related to Feed Crop, Food and Agriculture Organisation of the United Nations, Available at: http://www.fao.org/partnerships/leap/database/ghg-crops/en/. (Accessed September 2017); Stats SA (2007) Census of Commercial Agriculture, 2007: Financial and Production Statistics, Available at: http://www.nda.agric.za/docs/statsinfo/Censcoagric2007.pdf. (Accessed September 2017).
  properties: dry mass 1 kg, wet mass 1 kg
- application of plant protection product, by field sprayer: 1.37639e-5 ha; lognormal variance with pedigree 0.1292, pedigree (2,3,4,1,1)
  (same comment as for tillage, rotary cultivator)
- wheat seed, for sowing: 0.000649238 kg; name SEED; lognormal variance with pedigree 0.0098, pedigree (2,3,4,1,1)
  Based on recommended seeding rates for dryland and irrigated wheat in South Africa (20-25kg/ha and 90-120kg/ha, respectively. Value in dataset calculated from the middle of the given range and percentage of wheat grown under irrigation. Reference: DAFF (2016) Production Guideline for Wheat,Department of Agriculture, Forestry and Fisheries of South Africa, Available at: http://www.daff.gov.za/Daffweb3/Portals/0/Brochures%20and%20Production%20guidelines/Wheat%20-%20Production%20Guideline.pdf (accessed September 2017).
  property water in wet mass 0.145 kg; name SEED_WWM; = REF_PRODUCT_WWM
  property dry mass 0.855 kg; name SEED_DM; = SEED_WM-SEED_WWM
  property wet mass 1 kg; name SEED_WM
  property water content 0.169591; name SEED_water_content; = SEED_WWM/SEED_DM
  property carbon content, non-fossil 0.464601; name SEED_C_content_non_fossil; = REF_PRODUCT_C_content_non_fossil
- organophosphorus-compound, unspecified: 3.30332e-6 kg; lognormal variance with pedigree 0.0098, pedigree (2,3,4,1,1)
  This figure represents the mass of the active ingredient for the pesticide Rogor, dimethoate. Average application rates for pesticides were extracted from commercial enterprise budgets (combuds) for selected dryland wheat farms (GreenCape, 2015). The pesticide application rates for dryland wheat were assumed to be representative for the average South African wheat farm. Reference(s): GreenCape (2015) Regional Resource Flow Model: Grain Sector Report, Available at: https://www.greencape.co.za/assets/Bioeconomy/RRFM-Grain-Sector-Report-Mar-2015-Final-Website-2017.pdf. (Accessed September 2017).
  properties: wet mass 1 kg, dry mass 1 kg, carbon content, fossil 0.260898
- ammonium sulfate: 3.38123e-5 kg; lognormal variance with pedigree 0.0098, pedigree (2,3,4,1,1)
  Based on average application rate of nitrogen [kg N/ha] and a breakdown of the mineral nutrient by fertiliser type based on that of a conventional irrigated wheat operation (FAO, 2015). A weighted average was estimated based the an average application rate of 28kg N/ha for dryland wheat and 97kg N/ha for irrigated wheat extracted from commercial enterprise budgets (Combuds) for selected farms in the Western Cape region (GreenCape, 2015). See details for disaggregation in supporting documentation. Reference(s): FAO (2005) Fertiliser Use by Crop in South Africa, Food and Agriculture Organisation ofo the United Nations, Available at: ftp://ftp.fao.org/agl/agll/docs/fertusesouthafrica.pdf. (Accessed August 2017); FAO (2015) Online Database: Global Database of GHG Emissions Related to Feed Crop, Food and Agriculture Organisation of the United Nations, Available at: http://www.fao.org/partnerships/leap/database/ghg-crops/en/. (Accessed September 2017); Stats SA (2007) Census of Commercial Agriculture, 2007: Financial and Production Statistics, Available at: http://www.nda.agric.za/docs/statsinfo/Censcoagric2007.pdf. (Accessed September 2017).
  properties: wet mass 1 kg, dry mass 1 kg
- magnesium sulfate: 1.09591e-6 kg; lognormal variance with pedigree 0.0098, pedigree (2,3,4,1,1)
  This figure represents the dry mass of the magnesium sulphate in agricultural grade magnesium sulphate. Average application rates for pesticides were extracted from commercial enterprise budgets (combuds) for selected dryland wheat farms (GreenCape, 2015). The pesticide application rates for dryland wheat were assumed to be representative for the average South African wheat farm. Reference(s): GreenCape (2015) Regional Resource Flow Model: Grain Sector Report, Available at: https://www.greencape.co.za/assets/Bioeconomy/RRFM-Grain-Sector-Report-Mar-2015-Final-Website-2017.pdf. (Accessed September 2017).
  properties: wet mass 1 kg, dry mass 1 kg
- tillage, ploughing: 1.37639e-5 ha; lognormal variance with pedigree 0.0098, pedigree (2,3,4,1,1)
  (same comment as for tillage, rotary cultivator)

## Inputs from nature
- Transformation, to annual crop, irrigated [natural resource, land]: 0.0514197 m2; lognormal variance with pedigree 0.0106, pedigree (2,1,3,1,1)
  Overall yield for 2016/2017 growing season of 3.8 tonnes/hectare equates to a land use per tonne of 0.26 hectares (DAFF, 2017). This overall land use is split into irrigated and non-irrigated land use using data from the 2007 AgriCensus, adjusted to account for increased yield between 2006 and 2016. Applied values are as follows: irrigated yield 5.1 tonnes/hectare, non-irrigated yield 3.0 tonnes/hectare, percentage irrigated 38%, and % non-irrigated 62%. Reference(s): DAFF (2017) Abstract of Agricultural Statistics 2017, Department of Agriculture, Forestry and Fisheries of South Africa, Available at: http://www.daff.gov.za/Daffweb3/Portals/0/Statistics%20and%20Economic%20Analysis/Statistical%20Information/Abstract%202017.pdf. (Accessed September 2017); Stats SA (2007) Census of Commercial Agriculture, 2007: Financial and Production Statistics, Available at: http://www.nda.agric.za/docs/statsinfo/Censcoagric2007.pdf. (Accessed September 2017).
- Occupation, annual crop, non-irrigated [natural resource, land]: 0.0856994 m2*year; lognormal variance with pedigree 0.0046, pedigree (2,1,3,1,1)
  Land occupation per growing season is taken to be 12 months, because where crop rotation is practiced, it is on an annual basis (short-term rotation) or every 5 years (long-term rotation) (Grain SA, 2015). Overall yield for 2016/2017 growing season of 3.8 tonnes/hectare equates to a land use per tonne of 0.26 hectares (DAFF, 2017). This overall land use is split into irrigated and non-irrigated land use using data from the 2007 AgriCensus, adjusted to account for increased yield between 2006 and 2016. Applied values are as follows: irrigated yield 5.1 tonnes/hectare, non-irrigated yield 3.0 tonnes/hectare, percentage irrigated 38%, and % non-irrigated 62%. Reference(s): DAFF (2017) Abstract of Agricultural Statistics 2017, Department of Agriculture, Forestry and Fisheries of South Africa, Available at: http://www.daff.gov.za/Daffweb3/Portals/0/Statistics%20and%20Economic%20Analysis/Statistical%20Information/Abstract%202017.pdf. (Accessed September 2017); Stats SA (2007) Census of Commercial Agriculture, 2007: Financial and Production Statistics, Available at: http://www.nda.agric.za/docs/statsinfo/Censcoagric2007.pdf. (Accessed September 2017).Reference(s): FAO (2015) Online Database: Global Database of GHG Emissions Related to Feed Crop, Food and Agriculture Organisation of the United Nations, Available at: http://www.fao.org/partnerships/leap/database/ghg-crops/en/. (Accessed September 2017); GreenCape (2015) Regional Resource Flow Model: Grain Sector Report, Available at: https://www.greencape.co.za/assets/Bioeconomy/RRFM-Grain-Sector-Report-Mar-2015-Final-Website-2017.pdf. (Accessed September 2017); DAFF (2017) Abstract of Agricultural Statistics 2017, Department of Agriculture, Forestry and Fisheries of South Africa, Available at: http://www.daff.gov.za/Daffweb3/Portals/0/Statistics%20and%20Economic%20Analysis/Statistical%20Information/Abstract%202017.pdf. (Accessed September 2017); Grain SA (2015) Improve Your Wheat Yield with Crop Rotation, Available at: http://www.grainsa.co.za/improve-your-wheat-yield-with-crop-rotation. (Accessed September 2017).; DAFF (undated) Production Guideline for Wheat. Available at: http://www.daff.gov.za/Daffweb3/Portals/0/Brochures%20and%20Production%20guidelines/Wheat%20-%20Production%20Guideline.pdf (Accessed September 2017).
- Occupation, annual crop, irrigated [natural resource, land]: 0.0514197 m2*year; lognormal variance with pedigree 0.0046, pedigree (2,1,3,1,1)
  Land occupation per growing season is taken to be 12 months, because where crop rotation is practiced, it is on an annual basis (short-term rotation) or every 5 years (long-term rotation) (Grain SA, 2015). Where crop rotation is not practiced, soil preparation is recommended to begin two weeks after harvesting (DAFF, 2016). Overall yield for 2016/2017 growing season of 3.8 tonnes/hectare equates to a land use per tonne of 0.26 hectares (DAFF, 2017). This overall land use is split into irrigated and non-irrigated land use using data from the 2007 AgriCensus, adjusted to account for increased yield between 2006 and 2016. Applied values are as follows: irrigated yield 5.1 tonnes/hectare, non-irrigated yield 3.0 tonnes/hectare, percentage irrigated 38%, and % non-irrigated 62%. Reference(s): DAFF (2017) Abstract of Agricultural Statistics 2017, Department of Agriculture, Forestry and Fisheries of South Africa, Available at: http://www.daff.gov.za/Daffweb3/Portals/0/Statistics%20and%20Economic%20Analysis/Statistical%20Information/Abstract%202017.pdf. (Accessed September 2017); Stats SA (2007) Census of Commercial Agriculture, 2007: Financial and Production Statistics, Available at: http://www.nda.agric.za/docs/statsinfo/Censcoagric2007.pdf. (Accessed September 2017); Grain SA (2015) Improve Your Wheat Yield with Crop Rotation, Available at: http://www.grainsa.co.za/improve-your-wheat-yield-with-crop-rotation. (Accessed September 2017).; DAFF (2016) Production Guideline for Wheat. Available at: http://www.daff.gov.za/Daffweb3/Portals/0/Brochures%20and%20Production%20guidelines/Wheat%20-%20Production%20Guideline.pdf (Accessed September 2017).
- Transformation, to annual crop, non-irrigated [natural resource, land]: 0.0856994 m2; lognormal variance with pedigree 0.0106, pedigree (2,1,3,1,1)
  (same comment as for Transformation, to annual crop, irrigated)
- Energy, gross calorific value, in biomass [natural resource, biotic]: 0.808224 MJ; = 18.2*REF_PRODUCT_DM; lognormal variance with pedigree 0.1253, pedigree (3,3,3,3,5)
  Gross energy content is related to MJ/kg dry matter of product, wheat grain. Based on Feedipedia (2013), wheat grain has a Gross energy content of 18.2 MJ/kg DM at a dry matter content of 87% as fed. Reference(s): Feedipedia (2013) Animal feed resources information system, Available at: https://www.feedipedia.org/node/223. (Accessed November 2017).
- Carbon dioxide, in air [natural resource, in air]: 0.139842 kg; = 44/12 * (REF_PRODUCT_C_content_non_fossil * REF_PRODUCT * REF_PRODUCT_DM + BY_PRODUCT_C_content_non_fossil*BY_PRODUCT* BY_PRODUCT_DM - SEED_C_content_non_fossil * SEED * SEED_DM); lognormal variance with pedigree 0.002, pedigree (1,1,3,1,1)
  Modelled value, see chapter 'CO2 binding' in '01 crop production-direct field emissions natural resources v1.2.pdf' available on ecoinvent reports web page (https://ecoquery.ecoinvent.org/File/Reports). The 44/12 ratio is the stoichiometric mass ratio of carbon dioxide to carbon.
- Transformation, from annual crop, irrigated [natural resource, land]: 0.0514197 m2; lognormal variance with pedigree 0.0106, pedigree (2,1,3,1,1)
  (same comment as for Transformation, to annual crop, irrigated)
- Transformation, from annual crop, non-irrigated [natural resource, land]: 0.0856994 m2; lognormal variance with pedigree 0.0106, pedigree (2,1,3,1,1)
  (same comment as for Transformation, to annual crop, irrigated)

## Emissions to nature
- Carbon dioxide, fossil [air, non-urban air or from high stacks]: 0.00325404 kg; = UREA_N*0.466461632733939*1.571 +LIME_CaCO3*0.44; lognormal variance with pedigree 0.0092, pedigree (2,3,4,1,1)
  Calculated value. Based on CO2 emissions from limestone and urea application calculated from C content (IPCC, 2006). Emission factors are EF=1.57 kg CO2/kg N for urea, and EF=0.44 kg CO2/kg CaCO3 for limestone. See supporting documentation.
- Cadmium [soil, agricultural]: 4.98096e-10 kg; lognormal variance with pedigree 0.0492, pedigree (2,3,4,1,1)
  Emissions of heavy metals to soil and surface water estimated based on recommended method in Nemecek and Schnetzer (2011). Reference(s): Nemecek and Schnetzer (2011) Methods of Assessment of Direct Field Emissions for LCIs of Agricultural Production Systems, Life cycle inventories of Swiss and European agricultural production systems.
- Dinitrogen monoxide [air, non-urban air or from high stacks]: 1.77632e-5 kg; name N2O; source Rochette, P. 2008; lognormal variance with pedigree 0.0392, pedigree (2,3,4,1,1)
  Modelled according to the 2006 IPCC Guidelines for National Greenhouse Gas Inventories. See supporting documentation for further details.
- Phosphate [water, ground-]: 2.95014e-6 kg; lognormal variance with pedigree 0.0492, pedigree (2,3,4,1,1)
  Modelled using the SALCA-P model as recommended by Nemecek and Schnetzer (2012). See supporting documentation for further details. Reference(s): Nemecek T., Bengoa X., Lansche J., Mouron P., Riedener E., Rossi V. & Humbert S. (2015) Methodological Guidelines for the Life Cycle Inventory of Agricultural Products. Version 3.0, July 2015. World Food LCA Database (WFLDB). Quantis and Agroscope, Lausanne and Zurich, Switzerland.
- Zinc [soil, agricultural]: 1.25693e-7 kg; lognormal variance with pedigree 0.0492, pedigree (2,3,4,1,1)
  (same comment as for Cadmium)
- Lead [soil, agricultural]: 2.16586e-9 kg; lognormal variance with pedigree 0.0492, pedigree (2,3,4,1,1)
  (same comment as for Cadmium)
- Captan [soil, agricultural]: 2.06198e-6 kg; lognormal variance with pedigree 0.0422, pedigree (2,3,4,1,1)
  Assumed that all pesticides end up in the soil.
- Nitrate [water, ground-]: 0.000382791 kg; lognormal variance with pedigree 0.0492, pedigree (2,3,4,1,1)
  Modelled according to the 2006 IPCC Guidelines for National Greenhouse Gas Inventories. Default emission factor of 0.3 kg N input emitted as NO3 (kg NO3-N) applied to production under irrigation, which accounts for 38% of total production in South Africa. An emission factor of zero was assumed for dryland wheat production, as prescribed. See supporting documentation for further details.
- Nitrogen oxides [air, non-urban air or from high stacks]: 3.72403e-6 kg; lognormal variance with pedigree 0.0172, pedigree (2,3,4,1,1)
  (same comment as for Dinitrogen monoxide)
  property emission ratio 0.21 kg/kg; name NOx_to_N2O
- Pesticides, unspecified [soil, agricultural]: 1.00762e-5 kg; lognormal variance with pedigree 0.0422, pedigree (2,3,4,1,1)
  Assumed that all pesticides end up in the soil. This represents all pesticides other than Captan and glyphosate.
- Water [air, unspecified]: 0.00860111 m3; name water_to_air_unspecified; = water_irrigation_input*fraction_IW_to_air; lognormal variance with pedigree 0.0092, pedigree (2,3,4,1,1)
  Calculated value based on literature values and expert opinion. See comments in the parameters' comment field.
- Water [water, surface water]: 0.000668975 m3; name water_to_water_surface; = water_irrigation_input*(1-fraction_IW_to_air)*fraction_IW_to_surface_water; lognormal variance with pedigree 0.0092, pedigree (2,3,4,1,1)
  Calculated value. See the parameters and their comments to understand the calculation.
- Ammonia [air, non-urban air or from high stacks]: 0.00023009 kg; lognormal variance with pedigree 0.0172, pedigree (2,3,4,1,1)
  (same comment as for Dinitrogen monoxide)
- Glyphosate [soil, agricultural]: 4.84072e-6 kg; lognormal variance with pedigree 0.0422, pedigree (2,3,4,1,1)
  Assumed that all pesticides end up in the soil.
- Copper, ion [water, surface water]: -2.9813e-7 kg; normal variance with pedigree 0.0992, pedigree (2,3,4,1,1)
  (same comment as for Cadmium)
- Mercury [soil, agricultural]: 1.34522e-12 kg; lognormal variance with pedigree 0.0492, pedigree (2,3,4,1,1)
  (same comment as for Cadmium)
- Water [water, ground-]: 0.0026759 m3; name water_to_water_ground; = water_irrigation_input*(1-fraction_IW_to_air)*fraction_IW_to_ground_water; lognormal variance with pedigree 0.0092, pedigree (2,3,4,1,1)
  Calculated value. See the parameters and their comments to understand the calculation.
- Lead [water, surface water]: 7.32341e-8 kg; lognormal variance with pedigree 0.0992, pedigree (2,3,4,1,1)
  (same comment as for Cadmium)
- Mercury [water, surface water]: -4.66413e-10 kg; normal variance with pedigree 0.0422, pedigree (2,3,4,1,1)
  (same comment as for Cadmium)
- Chromium, ion [water, surface water]: 3.36565e-9 kg; lognormal variance with pedigree 0.0992, pedigree (2,3,4,1,1)
  (same comment as for Cadmium)
- Phosphorus [water, surface water]: 1.21537e-5 kg; source Michaud, A.R. 2008; lognormal variance with pedigree 0.0501, pedigree (3,2,4,1,1)
  Modelled using the SALCA-P model as recommended by Nemecek and Schnetzer (2011). See supporting documentation for further details. Reference(s): Nemecek and Schnetzer (2011) Methods of Assessment of Direct Field Emissions for LCIs of Agricultural Production Systems, Life cycle inventories of Swiss and European agricultural production systems.
- Zinc, ion [water, surface water]: -3.25139e-7 kg; normal variance with pedigree 0.0992, pedigree (2,3,4,1,1)
  (same comment as for Cadmium)
- Phosphate [water, surface water]: 7.37535e-6 kg; source Michaud, A.R. 2008; lognormal variance with pedigree 0.0432, pedigree (2,3,3,1,1)
  (same comment as for Phosphorus)
  property water in wet mass 0 kg; name WWM
  property carbon content, non-fossil 0; name C_content_non_fossil
  property wet mass 1 kg; name WM
  property dry mass 1 kg; name DM
  property carbon content, fossil 0; name C_content_fossil
  property water content 0; name water_content
- Chromium [soil, agricultural]: 2.44633e-7 kg; lognormal variance with pedigree 0.0492, pedigree (2,3,4,1,1)
  (same comment as for Cadmium)
- Nickel, ion [water, surface water]: 3.76558e-9 kg; lognormal variance with pedigree 0.0992, pedigree (2,3,4,1,1)
  (same comment as for Cadmium)
- Copper [soil, agricultural]: 3.41759e-8 kg; lognormal variance with pedigree 0.0492, pedigree (2,3,4,1,1)
  (same comment as for Cadmium)

## Sampling procedure
Energy and material inputs, as well as land use and production (yield) are from commercial enterprise budgets (Combuds) for wheat farms in South Africa (three dryland and one irrigated), as well as a LEAP/FAO (2015) dataset on irrigated wheat in South Africa. The Department of Agriculture, Forestry and Fisheries's Wheat Production Guideline (DAFF 2016), Grain SA publications and academic publications provided a further source of inputs, planting schedules etc. References are provided in the comment fields). A breakdown in the kind of fertilsers used is obtained from the FAO (2005). Wheat production volumes and areas are obtained from government agricultural statistics
DAFF (2017). References: FAO (2005) Fertiliser Use by Crop in South Africa, Food and Agriculture Organisation ofo the United Nations, Available at: ftp://ftp.fao.org/agl/agll/docs/fertusesouthafrica.pdf. (Accessed August 2017); FAO (2015) Online Database: Global Database of GHG Emissions Related to Feed Crop, Food and Agriculture Organisation of the United Nations, Available at: http://www.fao.org/partnerships/leap/database/ghg-crops/en/. (Accessed September 2017); DAFF (2016) Production Guideline for Wheat,Department of Agriculture, Forestry and Fisheries of South Africa, Available at: http://www.daff.gov.za/Daffweb3/Portals/0/Brochures%20and%20Production%20guidelines/Wheat%20-%20Production%20Guideline.pdf (accessed September 2017); DAFF (2017) Abstract of Agricultural Statistics 2017, Department of Agriculture, Forestry and Fisheries of South Africa, Available at: http://www.daff.gov.za/Daffweb3/Portals/0/Statistics%20and%20Economic%20Analysis/Statistical%20Information/Abstract%202017.pdf. (Accessed September 2017).

## Review by Assumpció ANTON 2017-11-21
Please,be aware to consider further flow updates as far as better information or emission models are available.

It could be advisable to have a specific report, similar to Ecoinvent report n.º 15 or WFLDB guidelines but specific for South African crops, where specific parameters, scaling factors used to build and calculate emissions are explained. That would help further parctitioners to validate datasets or change what they may consider.
