# treatment of copper scrap by electrolytic refining

Dataset: EcoSpold 2, unit process
Geography: RER
Time period: 1994-01-01 to 2021-12-31
Technology level: current
Classification: ISIC rev.4 ecoinvent: 2420:Manufacture of basic precious and other non-ferrous metals
Tags: ConvertedDataset
Scenario: Business-as-Usual
System model: Allocation, cut-off by classification
Share of production covered: 15.3 %
Generated by: Mischa Classen
Published in: Althaus H.-J. 2000
Database: ecoinvent
isCopyrightProtected: true
accessRestrictedTo: 1

## General comment
This dataset represents the production of 1 kg of copper cathodes, by electrolyti refining, in 2003. It is designed for the use of the metal as part of the consumption mix 'copper, at regional storage'. It is not to be used if the impact of the secondary copper is considerable. In such cases, a more detailed analysis has to be conducted.

## Included activities start
From the reception of copper & scrap, at the factory gate.

## Included activities end
This activity ends with the electrolysis of copper anodes. The dataset includes the collection and handling of the copper scrap, the smelting of scrap in the blast furnace, the conversion of black copper in the converter, the refining of converted copper in an anode furnace, and the hydrometallurgical treatment of scrap.

## Geography
This module is valid for one single very big plant, which is taken as proxy for the RER.

## Technology
Secondary copper consists of various types of scrap. Prompt scrap is directly reused in foundries and is not further processed. Old scrap has to be treated in a secondary copper smelter, where a variety of metal values are recuperated. Depending on the chemical composition, the raw materials of a secondary copper smelter are processed in different types of furnaces, including: - blast furnaces (up to 30% of Cu in the average charge), - converters (about 75% Cu), and - anode furnaces (about 95% Cu).
A scheme of the process considered is given in Fig 1. The blast furnace metal (“black copper”) is treated in a converter; then, the converter metal is refined in an anode furnace. In each step additional raw material with corresponding copper content is added. In the blast furnace, a mixture of raw materials, iron scrap, limestone and sand as well as coke is charged at the top. Air that can be enriched with oxygen is blown through the tuyeres. The coke is burnt and the charge materials are smelted under reducing conditions. Black copper and slag are discharged from tapholes.
The converters used in primary copper smelting, working on mattes containing iron sulphide, generate surplus heat and additions of scrap copper are often used to control the temperature. The converter provides a convenient and cheap form of scrap treatment, but often with only moderately efficient gas cleaning. Alternatively, hydrometallurgical treatment of scrap, using ammonia leaching, yields to solutions which can be reduced by hydrogen to obtain copper powder. Alternatively, these solutions can be treated by solvent extraction to produce feed to a copper-winning cell.
Converter copper is charged together with copper raw materials in anode furnace operation. For smelting the charge, oil or coal dust is used, mainly in reverberatory furnaces. After smelting, air is blown on the bath to oxidise the remaining impurities. Leaded brasses, containing as much as 3% of lead, are widely used in various applications and recycling of their scrap waste is an important activity. Such scrap contains usually much swarf and turnings coated with lubricant and cutting oils. Copper-containing cables and motors contain plastic or rubber insulants, varnishes, and lacquers. In such cases, scrap needs pre-treatment to remove these non-metallic materials. The smaller sizes of scrap can be pre-treated thermally in a rotary kiln provided with an after-burner to consume smoke and oil vapours (so-called Intal process).
Emissions and waste: Elevated levels of halogenated organic compounds may arise, such as TCDD. Slags are usually used in construction. Waste water is led to a communal treatment plant.
References:
EEA, 1999.

## Parameters
- fraction, tap water, to air: 0.15 dimensionless; name fraction_TW_to_air; = fraction_PW_to_air; lognormal variance with pedigree 0.092025, pedigree (4,4,3,2,4)
- fraction, process water, to air: 0.15 dimensionless; name fraction_PW_to_air; lognormal variance with pedigree 0.092025, pedigree (4,4,3,2,4)
  Literature value. In case when no industry/process specific data are available, default evaporation fraction value is used. This value is 15% and is based on literature (Statistics Canada, 2007 & Shaffer, K.H., 2008, Consumptive water use in the Great Lakes Basin, USGS & Shiklomanov, 2003, World Water Resources at the Beginning of the 21st Century) and has been approved by an expert.

## Reference product
- copper scrap, sorted, pressed: 0 kg; source Rentz O. 1999; CPC 39361: Waste and scrap of copper; By-product classification Recyclable
  Proxy: 'copper scrap, sorted, pressed' is used as a proxy for the following inputs, with correspondent contribution: copper scrap (7.39E-01 kg/t), copper alloy scrap (1.99E-01 kg/t), Ext. intermediate materials (2.27E-01 kg/t), copper-iron material (1.42E-01 kg/t).
  production volume 0 kg; name RP_PV; = ABS(RP_amount/copper_amount)*copper_PV
    Calculated from the production volume of copper in proportion to the respective output amounts.
  property price 2.84 EUR2005
    Temporary price data. Calculated as 90% of purchasers price based on: Source: USGS Mineral Yearbook 2007, Table 1 in <http://minerals.usgs.gov/minerals/pubs/commodity/recycle/myb1-2007-recyc.pdf>
  property carbon content 0
    carbon content on a dry matter basis (reserved; not for manual entry)
  properties: dry mass 1 kg, carbon content, non-fossil 0, water content 0, water in wet mass 0 kg, carbon content, fossil 0, wet mass 1 kg, carbon allocation 0 kg
- copper, cathode: 1 kg; name copper_amount; source Rentz O. 1999; By-product classification allocatable product; CPC 41413: Refined copper and copper alloys, unwrought; master alloys of copper; CAS 7440-50-8
  Literature value. Copper uses: Before end-use copper is manufactured into semi fabricated products, such as shapes and ingots (known as 'semis'). These manufacturing processes are subdivided into hot working, cold working and, if necessary, process annealing. Few of the semis are ready for use as such. They more typically travel to first-stage manufacturers, who make metal rods, wire, and casting, and then to component manufacturers who produce such things as motors, valves, and insulated cables The components in turn are incorporated by final-stage manufacturers into a variety of finished products - automobiles, commercial buildings, residential housing, and so forth. These uses account for about 79% of the world-wide consumption of copper.
  production volume 8.04823e8 kg; name copper_PV
  properties: carbon content, fossil 0, carbon content, non-fossil 0, dry mass 1 kg, wet mass 1 kg, price 3.57105 EUR2005, water in wet mass 0 kg, water content 0, carbon content 0, carbon allocation 0 kg

## By-products
- copper, cathode: 0 kg; source Rentz O. 1999; By-product classification allocatable product; CPC 41413: Refined copper and copper alloys, unwrought; master alloys of copper; CAS 7440-50-8
  (same comment as for copper, cathode)
  production volume 0 kg; name copper_PV
    Source: USGS Minerals Yearbook 2015. Available from: https://www.usgs.gov/centers/nmic/copper-statistics-and-information (downloaded 21 June 2019), Table 22. Data for Austria, Belgium, Bulgaria, Finland, Germany, Italy, Norway, Poland, Serbia, Spain, Sweden (minus PV of copper from 'treatment by metal part of electronics scrap, in blister copper, by electrolytic refining [SE]') and Ukraine (grand total, secondary). the PV of copper from 'treatment of used cables' in RER was assumed to be 6% of this value; this amount of subtracted from the PV of copper from 'treatment of copper scrap by electroytic refining [RER]'
  property price 3.57105 EUR2005
    Price calculated as 5-year market average (2015-2019; USD/kg; USGS [2020]) and converted to EUR2005 (USD2019/EUR2005 exchange rate: 0.62; Official Data Foundation [2020] and Macrotrends [2020]).
    References:
    Official Data Foundation (2020). Inflation Calculator [Online]. Available from: https://www.officialdata.org/us/inflation/2005?endYear=2019&amount=1 [Accessed 28/07/2020]
    USGS (2020). Mineral Commodity Summaries 2020 [Online]. Available from: https://pubs.usgs.gov/periodicals/mcs2020/mcs2020.pdf [Accessed 28/07/2020]
    Macrotrends (2020). Euro Dollar Exchange Rate (EUR USD) - Historical Chart [Online]. Available from: https://www.macrotrends.net/2548/euro-dollar-exchange-rate-historical-chart [Accessed 28/07/2020]
  property carbon content 0
    carbon content on a dry matter basis (reserved; not for manual entry)
  properties: carbon content, fossil 0, carbon content, non-fossil 0, dry mass 1 kg, wet mass 1 kg, water in wet mass 0 kg, water content 0, carbon allocation 0 kg

## Inputs from technosphere
- lime, packed: 0 kg; source Rentz O. 1999; pedigree (1,1,1,1,1)
  LIterature value.
  properties: carbon content, fossil 0.117492, dry mass 0.998 kg, water content 0.00200401, wet mass 1 kg
  note on carbon content, fossil: Table 3.1, ecoinvent v2.2 report 7, part VII, pg 3. MW CaCO3=100, MW MgCO3=84
- silica sand: 0.0625 kg; source Rentz O. 1999; lognormal variance with pedigree 0.0427, pedigree (2,4,5,3,1)
  Literature value.
  properties: water content 0.010101, dry mass 0.99 kg, wet mass 1 kg
- tap water: 1.17647 kg; name tap_water_input; lognormal variance with pedigree 0.090625, pedigree (4,4,5,2,4)
  Estimated value. Amount of tap water on the input is equal to the amount of wastewater plus losses (water to air).
  properties: water content 2962.17, dry mass 0.000337476 kg, wet mass 1 kg, carbon content, fossil 0.00178991
  note on carbon content, fossil: Bicarbonate content is 2.93 mol/m3. CO2 content is 0.1 mol/m3 (ecoinvent v2.2 report 8, Tab 93.1).
- wastewater, unpolluted: -0.001 m3; name wastewater_amount; source Bruch K. H. 1995; lognormal variance with pedigree 0.0427, pedigree (2,4,5,3,1)
  Literature value.
  production volume 804823 m3; = ABS(wastewater_amount/copper_amount)*copper_PV
    (same comment as for copper scrap, sorted, pressed)
  property price 0 EUR2005; name wastewater_amount_price_EUR2005
  properties: dry mass 0.337476 kg, carbon content, non-fossil 0.00178991, carbon content, fossil 0.00178991, wet mass 1000 kg, water content 2962.17
  note on carbon content, fossil: Assumed to be like in tap water. Bicarbonate content is 2.93 mol/m3. CO2 content is 0.1 mol/m3 (ecoinvent v2.2 report 8, Tab 93.1).
- non-ferrous metal smelter: 9.57e-12 unit; lognormal variance with pedigree 0.3601, pedigree (3,2,5,1,3)
  Estimation from dataset author.
- electricity, high voltage: 1.1 kWh; source Bruch K. H. 1995; lognormal variance with pedigree 0.0427, pedigree (2,4,5,3,1)
  Calculated value: 11.34 GJ / t Cu primary energy in electricity, effectiveness 0.35 = 110 KWh / t Cu.
- heat, district or industrial, other than natural gas: 7.675 MJ; source Rentz O. 1999; lognormal variance with pedigree 0.0427, pedigree (2,4,5,3,1)
  Calculated value: Heating value of coke is 28.6 MJ/kg --> 4063 MJ / t Cu; Heating value of coal is 28.9 MJ/kg --> 2463 MJ / t Cu; Heating value of oil is 41.2 MJ/kg --> 2575 MJ / t Cu.
  properties: heating value, net 1 MJ
- chemical factory, organics: 4e-10 unit; lognormal variance with pedigree 0.3601, pedigree (3,2,5,1,3)
  Estimation from dataset author.
- copper, anode: 0.114 kg; source Rentz O. 1999; lognormal variance with pedigree 0.0427, pedigree (2,4,5,3,1)
  Literature value.
  properties: dry mass 1 kg, wet mass 1 kg, copper content 0.997
- copper scrap, sorted, pressed: 1.31 kg; source Rentz O. 1999
  (same comment as for copper scrap, sorted, pressed)
  production volume 1.05432e9 kg
  properties: dry mass 1 kg, price 2.84 EUR2005, wet mass 1 kg
- lime, packed: 0.0720652, 0.00183478 kg (2 entries); source Rentz O. 1999; lognormal variance with pedigree 0.0427, pedigree (2,4,5,3,1)
  LIterature value.

## Emissions to nature
- Antimony [air, non-urban air or from high stacks]: 3e-6 kg; source EEA 1999; lognormal variance with pedigree 0.6927, pedigree (2,4,5,3,1)
  Literature value.
- Nitrogen oxides [air, non-urban air or from high stacks]: 0.001 kg; source Rentz O. 1999; lognormal variance with pedigree 0.0427, pedigree (2,4,5,3,1)
  Literature value.
- Sulfur dioxide [air, non-urban air or from high stacks]: 0.003 kg; source Rentz O. 1999; lognormal variance with pedigree 0.0427, pedigree (2,4,5,3,1)
  Literature value.
- Lead [air, non-urban air or from high stacks]: 9e-5 kg; source EEA 1999; lognormal variance with pedigree 0.6927, pedigree (2,4,5,3,1)
  Literature value. Further references: Rentz O., Krippner M., Hähre S. and Schultmann F. (1999) Report on Best Available Techniques (BAT) in Copper Production. Deutsch-Französisches Institut für Umweltforschung (DFIU) and University of Karlsruhe (TH).
- Arsenic, ion [water, surface water]: 1e-7 kg; source Rentz O. 1999; lognormal variance with pedigree 0.6927, pedigree (2,4,5,3,1)
  Literature value.
- Cadmium, ion [water, surface water]: 1e-8 kg; source Rentz O. 1999; lognormal variance with pedigree 0.6927, pedigree (2,4,5,3,1)
  Literature value.
- Copper, ion [water, surface water]: 1e-6 kg; source Rentz O. 1999; lognormal variance with pedigree 0.6927, pedigree (2,4,5,3,1)
  Literature value.
- Arsenic [air, non-urban air or from high stacks]: 2e-6 kg; source EEA 1999; lognormal variance with pedigree 0.6927, pedigree (2,4,5,3,1)
  (same comment as for Lead)
- Zinc, ion [water, surface water]: 2e-7 kg; source Rentz O. 1999; lognormal variance with pedigree 0.6927, pedigree (2,4,5,3,1)
  Literature value.
- Particulates, > 10 um [air, non-urban air or from high stacks]: 9.4e-5 kg; source Rentz O. 1999; lognormal variance with pedigree 0.0827, pedigree (2,4,5,3,1)
  Literature value.
- Water [air, unspecified]: 0.000176471 m3; name water_to_air_unspecified; = (tap_water_input/1000)*fraction_TW_to_air; lognormal variance with pedigree 0.130025, pedigree (4,4,5,2,4)
  Calculated value based on literature values and expert opinion. See comments in the parametres' comment field.
  property fraction, origin: salt water 0; name fraction_origin_salt_water
  property fraction, origin: fresh water 1; name fraction_origin_fresh_water
  property fraction, origin: unspecified 0; name fraction_origin_unspecified
- Nickel [air, non-urban air or from high stacks]: 1e-6 kg; source EEA 1999; lognormal variance with pedigree 0.6927, pedigree (2,4,5,3,1)
  Literature value.
- Zinc [air, non-urban air or from high stacks]: 0.000375 kg; source EEA 1999; lognormal variance with pedigree 0.6927, pedigree (2,4,5,3,1)
  (same comment as for Lead)
- Dioxins, measured as 2,3,7,8-tetrachlorodibenzo-p-dioxin [air, non-urban air or from high stacks]: 5e-11 kg; source EC 2002; lognormal variance with pedigree 1.3627, pedigree (2,4,5,3,1)
  Literature value.
- Particulates, > 2.5 um, and < 10um [air, non-urban air or from high stacks]: 9.4e-5 kg; source Rentz O. 1999; lognormal variance with pedigree 0.1627, pedigree (2,4,5,3,1)
  Literature value.
- Carbon monoxide, fossil [air, non-urban air or from high stacks]: 0.002 kg; source Rentz O. 1999; lognormal variance with pedigree 0.6927, pedigree (2,4,5,3,1)
  Literature value.
- Nickel, ion [water, surface water]: 3e-7 kg; source Rentz O. 1999; lognormal variance with pedigree 0.6927, pedigree (2,4,5,3,1)
  Literature value.
- Particulates, < 2.5 um [air, non-urban air or from high stacks]: 0.000282 kg; source Rentz O. 1999; lognormal variance with pedigree 0.3527, pedigree (2,4,5,3,1)
  Literature value.
- Cadmium [air, non-urban air or from high stacks]: 3e-6 kg; source EEA 1999; lognormal variance with pedigree 0.6927, pedigree (2,4,5,3,1)
  Literature value.
- Copper [air, non-urban air or from high stacks]: 8.5e-5 kg; source EEA 1999; lognormal variance with pedigree 0.6927, pedigree (2,4,5,3,1)
  (same comment as for Lead)
- Lead [water, surface water]: 5e-7 kg; source Rentz O. 1999; lognormal variance with pedigree 0.6927, pedigree (2,4,5,3,1)
  Literature value.

## Sampling procedure
literature

## Extrapolations
This dataset has been extrapolated from year 2003 to the year of the calculation (2021). The uncertainty has been adjusted accordingly.
