# 4-methyl-2-pentanone production

Dataset: EcoSpold 2, unit process
Geography: RER
Time period: 1998-01-01 to 2021-12-31
Technology level: current
Classification: EcoSpold01Categories: chemicals/organics
Classification: ISIC rev.4 ecoinvent: 2011:Manufacture of basic chemicals
Synonyms: methyl isobutyl ketone
Scenario: Business-as-Usual
System model: Allocation, cut-off by classification
Share of production covered: 100 %
Generated by: Jürgen Sutter
Published in: Sutter, J. 2007
Database: ecoinvent
isCopyrightProtected: true
accessRestrictedTo: 1

## General comment
This data represents the production of 1 kg of 4-methyl-2-pentanone via one-step hydrogenation of acetone. Raw materials, auxilliaries, energy consumptions and emissions are modelled with data from US-production. Infrastructure is included with a default value.

## Included activities start
From the reception of acetone at the factory gate.

## Included activities end
The activity ends with 1 kg of 4-methyl-2-pentanone, 100% at the factory gate. The dataset includes the input materials, energy uses, infrastructure and emissions.

## Geography
The inventory is modelled for Europe.

## Technology
4-Methyl-2-pentanone is produced in one step from acetone and hydrogen.
For this process, a combination of a cation exchanger with palladium is generally used as a catalyst. The acetone is fed with hydrogen over the palladium-charged catalyst at 130 °C and 0.5 – 5.0 MPa. A selectivity of > 95 % at a conversion of < 50 % is thereby attained.
Reference:
Siegel, H., Eggersdörfer, M.: Ketons. In: Ullmann's Encyclopedia of Industrial Chemistry, Seventh Edition, 2004 Electronic Release (ed. Fiedler E., Grossmann G., Kersebohm D., Weiss G. and Witte C.). 7 th Electronic Release Edition. Wiley InterScience, New York, Online-Version under: http://www.mrw.interscience.wiley.com/ueic/articles/

## Time period
Time of publications

## Parameters
- fraction, cooling water, recirculating system, to air: 0.771 dimensionless; name fraction_CW_R_to_air; lognormal variance with pedigree 0.0413, pedigree (2,3,1,3,1)
  Calculated based on literature value (Scown, C.D., 2011, Water Footprint of U.S. Transportation Fuels and supplying information of the article) (Vionnet, S., Quantis Water Database - Technical Report, 2012).
- fraction, cooling water, cooling pond system, to air: 0.032 dimensionless; name fraction_CW_CP_to_air; lognormal variance with pedigree 0.0413, pedigree (2,3,1,3,1)
  (same comment as for fraction, cooling water, recirculating system, to air)
- fraction, water, deionised, to air: 0.205 dimensionless; name fraction_WDI_to_air; = fraction_PW_to_air; lognormal variance with pedigree 0.092025, pedigree (4,4,3,2,4)
  Calculated value. See comment in the other parametres present in this dataset. Deionised water is considered to be always used as process water, thus process water fractions to air are applied to all deionised water input flows to calculate the amount of water consumed in the processes.
- fraction, cooling water, once-through system, to air: 0.004 dimensionless; name fraction_CW_OT_to_air; lognormal variance with pedigree 0.0413, pedigree (2,3,1,3,1)
  (same comment as for fraction, cooling water, recirculating system, to air)
- fraction, process water, to air: 0.205 dimensionless; name fraction_PW_to_air; lognormal variance with pedigree 0.092025, pedigree (4,4,3,2,4)
  Literature value (Statistics Canada, 2007 & Shaffer, K.H., 2008, Consumptive water use in the Great Lakes Basin, USGS) (Vionnet, S., Quantis Water Database - Technical Report, 2012).
- fraction, cooling water, to air: 0.3875 dimensionless; name fraction_CW_to_air; = (0.5*fraction_CW_OT_to_air)+(0.5*fraction_CW_R_to_air); lognormal variance with pedigree 0.092025, pedigree (4,4,3,2,4)
  Calculated value based on literature value (see comments of the other parametres present in this dataset) and expert opinion. In the case when no industry/literature data are available about the type of cooling or directly fraction, cooling water, to air specific for the process a default assumption is applied. It is assumed that the once-through cooling system is used in 50% of all cases and recirculating system is used in another 50% of all cases.

## Reference product
- 4-methyl-2-pentanone: 1 kg; By-product classification allocatable product; CPC 34170: Ethers, alcohol peroxides, ether peroxides, epoxides, acetals and hemiacetals, and their halogenated, sulphona[…]; CAS 108-10-1
  4-Methyl-2-pentanone is a colorless liquid with a less pronounced ketone-like odor. The major application of 4-methyl-2-pentanone is as a solvent for vinyl, epoxy, and acrylic resins, for natural resins, and for nitrocellulose. A further use is as a solvent for dyes in the printing industry.
  4-Methyl-2-pentanone is also a versatile extracting agent, e.g., for the production of antibiotics, or the removal of paraffins from mineral oil for the production of lubricating oils. The importance of 4-methyl-2-pentanone as an intermediate for synthesis is relatively low. The most important product is 4-methyl-2-pentanol, obtained by hydrogenation of the ketone. 4-Methyl-2-pentanone peroxide has some importance as a polymerization initiator for ethylene and for the hardening of unsaturated polyester resins.
  EcoSpold01Location=RER
  production volume 1.32237 kg
    This is a placeholder value that does not reflect real-world production volumes. This dataset does not currently require a real-world production volume to work in the database framework, and no actual data were collected yet. This has no negative effect on the results of the ecoinvent database. The placeholder value of this activity was scaled according to the nominal GDP of 2005 (source: United Nations, http://data.un.org/Glossary.aspx?q=GDP+%28current+US%24%29, accessed 20130726) to reflect an appropriate share of the global production volume, which is also a placeholder value.
  property heating value, net 36.32 MJ
    LHV is calculated based on the elemental composition of the substance. Based on the CAS number of the substance (000108-10-1), the chemical formula of the substance is found to be: C6H12O, (PubChem 2020).
    Reference: Kim, S., Chen, J., Cheng, T., Gindulyte, A., He, J., He, S., Li, Q., Shoemaker, B. A., Thiessen, P. A., Yu, B., Zaslavsky, L., Zhang, J., & Bolton, E. E. (2019). PubChem 2019 update: improved access to chemical data. Nucleic acids research, 47(D1), D1102–D1109. https://doi.org/10.1093/nar/gky1033
  property price 1.15 EUR2005
    Calculated value based on data from United Nations Commodity Trade Statistics Database (comtrade.un.org). UN comtrade category: 291413 4-methylpentan-2-one(methyl isobutyl ketone). Year 2005. Using exchange rate of 1EURO = 1.209 USD. Average of price of import into 5 main markets (EU, US, JP, IN and CN).
  property carbon content 0.72
    carbon content on a dry matter basis (reserved; not for manual entry)
  properties: water in wet mass 0 kg, dry mass 1 kg, carbon content, fossil 0.72, carbon content, non-fossil 0, water content 0, wet mass 1 kg, carbon allocation 0.72 kg

## Inputs from technosphere
- acetone, liquid: 1.4229 kg; lognormal variance with pedigree 0.0401, pedigree (1,2,5,1,1)
  Literature value.
  EcoSpold01Location=RER
  Uncertainty: Overcash 1998 - 2004
  properties: dry mass 1 kg, carbon content, fossil 0.62069, wet mass 1 kg, heating value, net 31.32 MJ
- heat, central or small-scale, other than natural gas: 1.20061 MJ; lognormal variance with pedigree 0.0401, pedigree (1,2,5,1,1)
  Literature value.
  Uncertainty: Overcash 1998 - 2004
  properties: heating value, net 1 MJ
- heat, district or industrial, other than natural gas: 0.68708 MJ; lognormal variance with pedigree 0.0401, pedigree (1,2,5,1,1)
  Literature value.
  Uncertainty: Overcash 1998 - 2004
  properties: heating value, net 1 MJ
- water, deionised: 0 kg; name water_deionised_input; pedigree (1,1,1,1,1)
  Literature value.
  EcoSpold01Location=CH
  Uncertainty: Overcash 1998 - 2004
  properties: wet mass 1 kg
- chemical factory, organics: 4e-10 unit; lognormal variance with pedigree 0.448, pedigree (4,5,5,5,5)
  EcoSpold01Location=RER
  Estimation. Infrastructure is estimated based on the dataset "chemical plant, organics". This dataset assumes a built area of about 4.2 ha, an average output of 50'000 t/a, and plant life of fifty years. The estimated value is 4.00 E-10 units per kg of produced chemical.
  Uncertainty: Estimation
- heat, district or industrial, natural gas: 3.382 MJ; lognormal variance with pedigree 0.0401, pedigree (1,2,5,1,1)
  Literature value.
  Uncertainty: Overcash 1998 - 2004
  properties: heating value, net 1 MJ
- electricity, medium voltage: 0.760956 kWh; lognormal variance with pedigree 0.0401, pedigree (1,2,5,1,1)
  EcoSpold01Location=UCTE
  Literature value.
  Uncertainty: Overcash 1998 - 2004
- hydrogen, liquid: 0.001026 kg; lognormal variance with pedigree 0.0401, pedigree (1,2,5,1,1)
  EcoSpold01Location=RER
  Literature value.
  Uncertainty: Overcash 1998 - 2004
  properties: dry mass 1 kg, wet mass 1 kg, heating value, net 120.21 MJ
- water, deionised: 0.211319, 0.000760697 kg (2 entries); lognormal variance with pedigree 0.0401, pedigree (1,2,5,1,1)
  Literature value.
  EcoSpold01Location=CH
  Uncertainty: Overcash 1998 - 2004

## Inputs from nature
- Water, cooling, unspecified natural origin [natural resource, in water]: 0.063392 m3; name water_cooling_UNO_input; lognormal variance with pedigree 0.0401, pedigree (1,2,5,1,1)
  Literature value.
  Uncertainty: Overcash 1998 - 2004

## Emissions to nature
- BOD5, Biological Oxygen Demand [water, surface water]: 0.551 kg; lognormal variance with pedigree 0.0801, pedigree (1,2,5,1,1)
  Calculation. This data was calculated from the amount of emissions in the treated waste water assuming a carbon conversion of 96% for COD and the worst case scenario: BOD=COD.
  It is assumed that the manufacturing plants are located in an urban/industrial area and consequently the emissions are categorized as emanating in a high population density area. The emissions into water are assumed to be emitted into rivers.
  Uncertainty: Calculated from the water emissions
- 2-Propanol [water, surface water]: 0.00114 kg; lognormal variance with pedigree 0.0401, pedigree (1,2,5,1,1)
  Literature value. It is assumed that the manufacturing plants are located in an urban/industrial area and consequently the emissions are categorised as emanating in a high population density area.
  The emissions into water are assumed to be emitted into rivers.
  Uncertainty: Overcash 1998 - 2004
- Water [air, unspecified]: 0.0246079 m3; name water_to_air_unspecified; = (water_deionised_input/1000*fraction_WDI_to_air)+(water_cooling_UNO_input*fraction_CW_to_air); lognormal variance with pedigree 0.0807, pedigree (2,2,5,1,1)
  Calculated value based on literature values and expert opinion. See comments in the parametres' comment field.
  property fraction, origin: salt water 0; name fraction_origin_salt_water
  property fraction, origin: fresh water 0.00176677; name fraction_origin_fresh_water
  property fraction, origin: unspecified 0.998233; name fraction_origin_unspecified
- Acetone [air, urban air close to ground]: 0.07578 kg; lognormal variance with pedigree 0.0801, pedigree (1,2,5,1,1)
  Literature value. It is assumed that the manufacturing plants are located in an urban/industrial area and consequently the emissions are categorised as emanating in a high population density area.
  Uncertainty: Overcash 1998 - 2004
- Water [water, unspecified]: 0.0389962 m3; name water_to_water_unspecified; = (water_deionised_input/1000)*(1-fraction_WDI_to_air)+water_cooling_UNO_input*(1-fraction_CW_to_air); lognormal variance with pedigree 0.0807, pedigree (2,2,5,1,1)
  (same comment as for Water)
  property fraction, origin: salt water 0; name fraction_origin_salt_water_Ww
  property fraction, origin: fresh water 0.00432359; name fraction_origin_fresh_water_Ww
  property fraction, origin: unspecified 0.995676; name fraction_origin_unspecified_Ww
  property carbon content, non-fossil 0; name C_content_non_fossil
  property carbon content, fossil 0; name C_content_fossil
  property water in wet mass 1000 kg; name WWM
  property wet mass 1000 kg; name WM
  property dry mass 0 kg; name DM
- 4-Methyl-2-pentanone [air, urban air close to ground]: 0.01074 kg; lognormal variance with pedigree 0.0401, pedigree (1,2,5,1,1)
  (same comment as for Acetone)
- Methyl pentane [water, surface water]: 0.00455 kg; lognormal variance with pedigree 0.0401, pedigree (1,2,5,1,1)
  (same comment as for 2-Propanol)
- 2-Propanol [air, urban air close to ground]: 1e-5 kg; lognormal variance with pedigree 0.0401, pedigree (1,2,5,1,1)
  (same comment as for Acetone)
- Hydrogen [air, urban air close to ground]: 0.00025 kg; lognormal variance with pedigree 0.0801, pedigree (1,2,5,1,1)
  (same comment as for Acetone)
- 4-Methyl-2-pentanone [water, surface water]: 0.07368 kg; lognormal variance with pedigree 0.0401, pedigree (1,2,5,1,1)
  (same comment as for 2-Propanol)
- 4-Methyl-2-pentanol [water, surface water]: 0.00038 kg; lognormal variance with pedigree 0.0401, pedigree (1,2,5,1,1)
  (same comment as for 2-Propanol)
- COD, Chemical Oxygen Demand [water, surface water]: 0.551 kg; lognormal variance with pedigree 0.0801, pedigree (1,2,5,1,1)
  (same comment as for BOD5, Biological Oxygen Demand)
- 2-Methyl pentane [air, urban air close to ground]: 5e-5 kg; lognormal variance with pedigree 0.0401, pedigree (1,2,5,1,1)
  (same comment as for Acetone)
- Diisobutyl ketone [water, surface water]: 0.02462 kg; lognormal variance with pedigree 0.0401, pedigree (1,2,5,1,1)
  (same comment as for 2-Propanol)
- TOC, Total Organic Carbon [water, surface water]: 0.156 kg; lognormal variance with pedigree 0.0801, pedigree (1,2,5,1,1)
  Calculation. This data was calculated from the amount of emissions in the treated waste water assuming a carbon conversion of 96% for COD and the worst case scenario: TOC=DOC.
  It is assumed that the manufacturing plants are located in an urban/industrial area and consequently the emissions are categorized as emanating in a high population density area. The emissions into water are assumed to be emitted into rivers.
  Uncertainty: Calculated from the water emissions
- Acetone [water, surface water]: 0.12807 kg; lognormal variance with pedigree 0.3401, pedigree (1,2,5,1,1)
  (same comment as for 2-Propanol)
- DOC, Dissolved Organic Carbon [water, surface water]: 0.156 kg; lognormal variance with pedigree 0.0801, pedigree (1,2,5,1,1)
  (same comment as for TOC, Total Organic Carbon)

## Sampling procedure
Literature data

## Extrapolations
This dataset has been extrapolated from year 2006 to the year of the calculation (2021). The uncertainty has been adjusted accordingly.

## Review by Roland Hischier 2011-09-22
Transfer of documentation done.
Exchange comments with "literature value": source information missing!

## Review by Roland Hischier 2007-09-01
passed.
