# electricity, high voltage, hydro, run-of-river, import from France, renewable energy products

Dataset: EcoSpold 2, unit process
Geography: CH
Time period: 2010-01-01 to 2021-12-31
Technology level: current
Classification: ISIC rev.4 ecoinvent: 3510:Electric power generation, transmission and distribution
Scenario: Business-as-Usual
System model: Allocation, cut-off by classification
Generated by: Johannes Müller
Database: ecoinvent
isCopyrightProtected: true
accessRestrictedTo: 1

## General comment
This dataset represents imported electricity from hydro power, run-of-river, from France to CH to the market fo rrenewable energy products CH. The import value includes all electricity imports, independently whether used within the importing country, or re-exported. For a discussion of different ways of modeling electricity trade in LCI, please refer to (Itten & Frischknecht 2012).

## Included activities start
This activity represents the point of "handing over" the electricity from one country to the other at the border.

## Included activities end
This dataset doesn't include any electricity losses or transmission infrastructure as these are accounted for in the market datasets.

## Reference product
- electricity, high voltage, renewable energy products: 1 kWh; By-product classification allocatable product; CPC 17100: Electrical energy
  production volume 6.896e9 kWh
    Literature data/calculated data. Based on Tab. 3.7 in Stolz, P., Frischnkecht, R. 2015. Umweltbilanz Strommix Schweiz 2011. Issued by treeze Ltd. for the Federal Office for the Environment, Switzerland.
  property price 0.101 EUR2005
    Temporary price data. Calculated as 90% of purchasers price based on: 94% of the average price (to account for a 6% loss in transformation and transmission) for electricity for industrial consumersin 2005 (excluded taxes). From IEA. In addition, regarding label-certified electricity, the Swiss government has a market instrument for renewable energy which is calculated as the difference between the market price and the production price. This was started in 2009 and is 0.45 Rp/kWh. Therefore, the production price of label certified energy is assumed to be the supplyer price plus the 0.45Rp/kWh (http://www.bfe.admin.ch/themen/00612/02073/index.html?lang=de).The unit conversion from CH to EUR is based on the ecoinvent unit conversion file (1 CHF2005 = 0.644 EUR2005). As an approximation, this is also used for global electricity production

## Inputs from technosphere
- electricity, high voltage: 1 kWh
  activityLink added to better reflect the reality of the supply chain

## Extrapolations
This dataset has been extrapolated from year 2010 to the year of the calculation (2021). The uncertainty has been adjusted accordingly.
