# weaving of synthetic fibre, for industrial use

Dataset: EcoSpold 2, unit process
Geography: GLO
Time period: 2018-01-01 to 2021-12-31
Technology level: current
Classification: ISIC rev.4 ecoinvent: 1312:Weaving of textiles
Scenario: Business-as-Usual
System model: Allocation, cut-off by classification
Generated by: Avraam Symeonidis
Database: ecoinvent
isCopyrightProtected: true
accessRestrictedTo: 1

## General comment
Inventory refers to the service of weaving a synthetic fibre. The dataset can be used with nylon, polypropylene and other types of thermoplastic fibres. The service should be used along with the raw material. The material to be used with this service should be 101.5% of the final product; for instance, for 1 kg of weaved synthetic fibre, a user should use 1.015 kg of raw material, be it nylon, polypropylene or other thermoplastic. The dataset is an estimation of the respective process. Waste polypropylene is chosen here to be an approximation of the waste generated by this activity, which depends on the raw material the user will choose. If this waste fraction is deemed irrelevant by the user, a modification is recommended.

## Included activities start
The service has no actual input of the synthetic fibre, thus it starts with other necessary input materials and services.

## Included activities end
The inventories includes energy consumption and infrastructure requirements for the service of weaving a synthetic fibre.

## Reference product
- weaving, synthetic fibre: 1 kg; name RP_amount; CPC 38450: Fishing rods and other line fishing tackle; fish landing nets, butterfly nets and similar nets; decoy "birds" […]; By-product classification allocatable product
  production volume 1.25967e7 kg; name RP_PV; = 12410583.13*1.015
    Calculated production volume based on the amount required by all relevant datasets in the database.
  property price 0.0716569 EUR2005; name RP_amount_price_EUR2005
    Calculated based on inputs: The price of the product has been calculated as a sum of the values of the material and energy inputs for this product. This value is therefore a rough estimation. It may underestimate the real price since there are additional expenses when producing any product. These expences can include for example labour costs, treatment of waste materials and profit for the producer. Please consider carefully whether this level of data quality is acceptable for your application.

## Inputs from technosphere
- electricity, high voltage: 0.733438 kWh; lognormal variance with pedigree 0.0087, pedigree (2,2,4,1,1)
  The amount of electricity input is based on expert judgement.
  EcoSpold01Location=UCTE
  Uncertainty: Expert Interview, S.K. Dokania, General Manager of Jute Mill 'The Hooghly Mills co. LTD' (2003). Normally the elecricity is produced by diesel engines.
- chemical factory, organics: 3.94089e-10 unit; lognormal variance with pedigree 0.0087, pedigree (2,2,4,1,1)
  No information was readily available about infrastructure and land-use of a relevant plants. Therefore, in this study, the infrastructure is estimated based on the module "chemical plant, organics". This module assumes a built area of about 4.2 ha, an average output of 50'000 t/a, and plant life of fifty years. For this study, the estimated value is 4.00 E-10 units per kg of produced woven synthetic fibre.
- waste polypropylene: 0 kg; name BP
  It is consider that during the process 1.5% of the raw material is eventually not passing the quality control and hence discarted as waste polypropylene. Waste polypropylene is considered here as an approximation. The waste farction generated in this dataset depends on the input material a user will choose to couple this service with.
  production volume 0 kg
    Calculated from production volume of reference product using the relative outputs.
  property price 0 EUR2005; name BP_price_EUR2005
  properties: water content 0.189061, heating value, net 32.78 MJ, wet mass 1 kg, carbon content, fossil 0.856286, dry mass 0.841 kg
  note on heating value, net: Value assumed for all polypropylene products. Source: Phyllis2, database for (treated) biomass, algae, feedstocks for biogas production and biochar, https://phyllis.nl/Biomass/View/1186, ECN.TNO
  note on carbon content, fossil: Considering a chemical formula for polypropylene to be (C3H6)n it is calculated that the carbon content, fossil in polypropylene is equal to 0.856286 kg of C per kg of DM of polypropylene. It is also assumed that this property is similar for waste polypropylene.
- waste polypropylene: -0.00142248, -0.000109665, -4.52956e-5, -4.30124e-5, -0.0016413, -1.82989e-5, -8.29379e-6, -0.01149 kg (8 entries)
  (same comment as for waste polypropylene)
  production volume 186159 kg

## Extrapolations
This dataset has been extrapolated from year 2019 to the year of the calculation (2021). The uncertainty has been adjusted accordingly.
