# particleboard production, uncoated, from virgin wood

Dataset: EcoSpold 2, unit process
Geography: BR
Time period: 2011-01-01 to 2021-12-31
Technology level: current
Classification: EcoSpold01Categories: wooden materials/extraction
Classification: ISIC rev.4 ecoinvent: 1621:Manufacture of veneer sheets and wood-based panels
Synonyms: Medium density particleboard (MDP) production; Particleboard
Scenario: Business-as-Usual
System model: Allocation, cut-off by classification
Generated by: Diogo Aparecido Lopes Silva
Published in: Diogo Aparecido Lopes Silva 2012
Database: ecoinvent
isCopyrightProtected: false
accessRestrictedTo: 1

## General comment
This dataset represents particleboard production (uncoated, with average density of 680kg/m³, and 8% moisture content), for indoor use (furniture industry), from virgin wood (eucalyptus species).

## Included activities start
From reception of raw materials at the factory gate. Includes the inputs to the production processes and the main process emissions.

## Included activities end
Until and including loading of the product on lorries. Capital goods, such as industrial machinery, as well as personnel activities, for instance, transport of workers to and from the workplace, were not included within the system boundary.

## Geography
Data for Brazil used for Center-South Region

## Technology
Particleboard production is characterized by the use of wood coming from dedicated eucalyptus plantations. The main activities included in the industrial production are: reception and storage of wood logs; production, drying and classification of particles; blending; mat forming and pressing; and finishing. Stored wood logs are debarked and chips and flakes are produced using choppers and ring flakers. The wood particles are then dried and classified. The larger particles form the internal layer of the panel, while the smaller ones are incorporated in the external layers. Bark and other wood residues from the manufacturing process as well as heavy fuel oil are burned to produce hot gas for particle drying and hot pressing processes. The dried particles are then blended with the synthetic adhesive and a mat of glued particles is made using feeding machines which form the three layers of the panel. The next steps are the pre-pressing and hot pressing (160-200ºC) of the mat to consolidate the panel. Afterwards, the panel is cut to the final dimensions and sanded.

## Parameters
- fraction, cooling water, once-through system, to air: 0.004 dimensionless; name fraction_CW_OT_to_air; lognormal variance with pedigree 0.0413, pedigree (2,3,1,3,1)
  Calculated based on literature value (Scown, C.D., 2011, Water Footprint of U.S. Transportation Fuels and supplying information of the article) (Vionnet, S., Quantis Water Database - Technical Report, 2012).
- fraction, cooling water, to air: 0.3875 dimensionless; name fraction_CW_to_air; = (0.5*fraction_CW_OT_to_air)+(0.5*fraction_CW_R_to_air); lognormal variance with pedigree 0.092025, pedigree (4,4,3,2,4)
  Calculated value based on literature value (see comments of the other parametres present in this dataset) and expert opinion. In the case when no industry/literature data are available about the type of cooling or directly fraction, cooling water, to air specific for the process a default assumption is applied. It is assumed that the once-through cooling system is used in 50% of all cases and recirculating system is used in another 50% of all cases.
- fraction, cooling water, recirculating system, to air: 0.771 dimensionless; name fraction_CW_R_to_air; lognormal variance with pedigree 0.0413, pedigree (2,3,1,3,1)
  (same comment as for fraction, cooling water, once-through system, to air)

## Reference product
- particleboard, uncoated: 1 m3; name RP_amount_1; CPC 31431: Particle board; By-product classification allocatable product
  Reference flow.
  production volume 1.66225e6 m3; name RP_PV_1; = 1749739*0.95
    Literature value based on the Brazilian Association of the Wood Panels Industry (ABIPA) statistics - http://www.abipa.org.br/numeros_I.php, accssed 2013/07/03 (1,749,739 m3). Also, 95 % of the particleboard production is used in the furniture industry (http://www.abipa.org.br/produtosMDP_I.php, accssed 2013/07/03).
  property water in wet mass 50.4 kg; name particle_board_RP_WWM
  property price 217 EUR2005
    Export prices for the World+ according to: http://faostat.fao.org/site/626/DesktopDefault.aspx?PageID=626#ancor downloaded 28 April 2009; calculated as export value divided by export volume.
  property dry mass 630 kg; name particle_board_RP_DM
  property heating value, net 8749.71 MJ
    LHV is calculated based on the Carbon content of the product. More details can be found on the respective documentation.The property is based on a value of 13.74MJ/kg
  property water content 0.08; = particle_board_RP_WWM/ particle_board_RP_DM
  property carbon content 0.493291
    carbon content on a dry matter basis (reserved; not for manual entry)
  properties: wet mass 680.4 kg, carbon content, non-fossil 0.446121, carbon content, fossil 0.0471697, carbon allocation 310.773 kg

## Inputs from technosphere
- electricity, medium voltage: 140.83 kWh; source Diogo Aparecido Lopes Silva 2013; lognormal variance with pedigree 0.0087, pedigree (1,2,4,1,1)
  Based on data from Silva et al. (2013). This amount was calculated from on-site measurements and internal company documents such as records of raw material consumption.
  EcoSpold01Location=UCTE
- sawlog and veneer log, eucalyptus ssp., measured as solid wood under bark: 1.305 m3; name roundwood_eucalyptus_input; source Diogo Aparecido Lopes Silva 2013; lognormal variance with pedigree 0.0087, pedigree (1,2,4,1,1)
  Based on data from Silva et al. (2013). This amount was calculated from on-site on-site measurements and internal company documents such as records of raw material consumption. Wood (as logs)with average density of 474 kg/m3 (oven dry). The average productivity of eucalyptus was assumed at 45 m3/ha year (290 m3/ha after 6.5 years of growth).
  property water content 0.4114; name U_eucalyptus
  property water in wet mass 229.416 kg; name WWM_eucalyptus; = U_eucalyptus*DM_eucalyptus
  property wet mass 787.063 kg; name WM_eucalyptus; = DM_eucalyptus+WWM_eucalyptus
  property bark 0.1; name roundwood_eucalyptus_input_bark
  property dry mass 557.647 kg; name DM_eucalyptus
  properties: carbon content, non-fossil 0.494, heating value, net 11336.5 MJ
  note on bark: The bark of eucalyptus is app. 10% (68.72kg) of the eucalyptus wood, under bark. This amount represents wood with a dry mass of 1.
- bark chips, wet, measured as dry mass: 19.25 kg; name bark_input; = 38.5/2; source Diogo Aparecido Lopes Silva 2013; lognormal variance with pedigree 0.0087, pedigree (1,2,4,1,1)
  Based on data from Silva et al. (2013). This amount was calculated from on-site measurements and internal company documents such as records of raw material consumption. It corresponds to about 38.5 kg of wood fuel. Most part are from barks and other wood residues, and they are used during steam production in industrial boilers. This amount has been splitted evenly between bark chips and wood residues (slab and siding).
  property water in wet mass 1.4 kg; name bark_input_WWM
  properties: heating value, net 4.81 MJ, wet mass 2.4 kg, carbon content, non-fossil 0.494, water content 1.4, dry mass 1 kg
- wastewater from particleboard production: -0.006 m3; name wastewater_output; source Diogo Aparecido Lopes Silva 2013; lognormal variance with pedigree 0.0513, pedigree (3,3,5,3,3)
  Calculated value based on Silva et al. (2013). This amount was calculated from waste management inventories from MDP manufacturing companies.
  production volume 9973.51 m3; = RP_PV_1 * (wastewater_output / RP_amount_1)
    Calculated from production volume of reference product using the relative outputs.
  property price 0 EUR2005; name wastewater_output_price_EUR2005
  properties: water content 2962.17, wet mass 1000 kg, carbon content, non-fossil 0.377131, dry mass 0.337476 kg
- ammonium sulfate: 1.38 kg; source Diogo Aparecido Lopes Silva 2013; lognormal variance with pedigree 0.0087, pedigree (1,2,4,1,1)
  Based on data from Silva et al. (2013). This amount was calculated from on-site on-site measurements and internal company
  documents such as records of raw material consumption. It is a catalyst used as an additive with urea-formaldehyde resin.
  properties: wet mass 1 kg, dry mass 1 kg
- urea formaldehyde resin: 71.7 kg; source Diogo Aparecido Lopes Silva 2013; lognormal variance with pedigree 0.0087, pedigree (1,2,4,1,1)
  Based on data from Silva et al. (2013). This amount was calculated from on-site measurements and internal company documents such as records of raw material consumption. It is the binding agent, which agglutinate wood particles. In general, it is applied 9 - 12 % of the wood particles (dry base), with solid content of 67 % and molar ratio formaldehyde/resin of 1.38.
  EcoSpold01Location=RER
  property water content 0.492537; name urea_WC; = urea_WWM/ urea_DM
  property water in wet mass 0.33 kg; name urea_WWM; = urea_WM- urea_DM
  property wet mass 1 kg; name urea_WM
  property dry mass 0.67 kg; name urea_DM
  properties: carbon content, fossil 0.408958, heating value, net 12.39 MJ
  note on carbon content, fossil: Chemical formula of the urea formaldehide monomer was assumed to be C3H8N2O
- slab and siding, softwood, wet, measured as dry mass: 19.25 kg; name slab_input; = 38.5/2; source Diogo Aparecido Lopes Silva 2013; lognormal variance with pedigree 0.0087, pedigree (1,2,4,1,1)
  (same comment as for bark chips, wet, measured as dry mass)
  property water in wet mass 0.7 kg; name slab_input_WWM
  properties: wet mass 1.7 kg, water content 0.7, dry mass 1 kg, carbon content, non-fossil 0.494, heating value, net 7.79 MJ
- wooden board factory, organic bonded boards: 3.33e-8 unit; lognormal variance with pedigree 0.51, pedigree (5,5,5,5,5)
  Estimated value; assumed to be the same as in case of the global activity.
- heavy fuel oil: 13.7 kg; source Diogo Aparecido Lopes Silva 2013; lognormal variance with pedigree 0.0087, pedigree (1,2,4,1,1)
  Based on data from Silva et al. (2013). This amount was calculated from on-site measurements and internal company documents such as records of raw material consumption. It shows about 5 % of sulphur, and is used during steam production in industrial boilers.
  properties: heating value, net 41.2 MJ, wet mass 1 kg, carbon content, fossil 0.849, dry mass 1 kg
- waste wood, untreated: -97.2 kg; name BP_amount_2; source Tromborg, Erik 2013; lognormal variance with pedigree 0.0087, pedigree (1,2,4,1,1)
  Calculated value based on Silva et al. (2013). Since the fuel for the furnace is included in the input, The corresponding amount inventoried with the energy module is subtracted. Since the volume of the chips is bulked, it is higher than the difference of the in- and output volume.
  production volume 1.61571e8 kg; = RP_PV_1 * (BP_amount_2 / RP_amount_1)
    Calculated from production volume of reference product using the relative outputs.
  property price 0 EUR2005; name BP_amount_2_price_EUR2005
  properties: water content 0.25, dry mass 0.8 kg, carbon content, non-fossil 0.48632, wet mass 1 kg, heating value, net 13.99 MJ
  note on heating value, net: Value taken from the general comment of the treatment dataset.
- diesel: 1.72 kg; source Diogo Aparecido Lopes Silva 2013; lognormal variance with pedigree 0.0087, pedigree (1,2,4,1,1)
  Based on data from Silva et al. (2013). This amount was calculated from on-site measurements and internal company documents such as records of raw material consumption. It is used during the internal transportation, with density of 837.53 kg/m3 and 2000 ppm of sulphur.
  properties: dry mass 1 kg, wet mass 1 kg, carbon content, fossil 0.865, heating value, net 42.8 MJ
  note on carbon content, fossil: C-content of diesel is 86.5% (ecoinvent v2.2 report 6_IV, Tab 3.14)
- lubricating oil: 0.018 kg; source Diogo Aparecido Lopes Silva 2013; lognormal variance with pedigree 0.0087, pedigree (1,2,4,1,1)
  Based on data from Silva et al. (2013).This amount was calculated from on-site on-site measurements and internal company documents such as records of raw material consumption.
  properties: heating value, net 40.2 MJ, wet mass 1 kg, carbon content, fossil 0.75, dry mass 1 kg
  note on heating value, net: Literature value, Source: IPCC 2006, 2006 IPCC Guidelines for National Greenhouse Gas Inventories, Prepared by the National Greenhouse Gas Inventories Programme, Eggleston H.S., Buendia L., Miwa K., Ngara T. and Tanabe K. (eds). Published: IGES, Japan
  note on carbon content, fossil: Lubricating oil is produced from diesel. C-content/dry mass of fats and oils considered 75%, from: ecoinvent v2.2 report, n 15a, pg 40
- paraffin: 5.47 kg; source Diogo Aparecido Lopes Silva 2013; lognormal variance with pedigree 0.0087, pedigree (1,2,4,1,1)
  Based on data from Silva et al. (2013). This amount was calculated from on-site measurements and internal company documents such as records of raw material consumption. It is a additive used with urea-formaldehyde (UF) resin, which improves the hygroscopic properties of the panel. In general, it is applied up tol 1 % of the UF resin weight (dry base), with solid content of 60 %.
  EcoSpold01Location=RER
  property water in wet mass 0.4 kg; name paraffin_WWM; = paraffin_WM- paraffin_DM
  property dry mass 0.6 kg; name paraffin_DM
  property wet mass 1 kg; name paraffin_WM
  properties: water content 0.666667, heating value, net 41.5 MJ, carbon content, fossil 0.847059
  note on heating value, net: Indicative value. Reference: Fuels - Higher and Lower Calorific Values, available at: https://www.engineeringtoolbox.com/fuels-higher-calorific-values-d_169.html
  note on carbon content, fossil: An average composition of C12H26 (molecular weight of 170 g/mol) was assumed for n-parafins, after ecoinvent v2.2 report 8, part II, pg 398
- wood ash mixture, pure: -0.39 kg; name BP_amount_1; source Diogo Aparecido Lopes Silva 2013; lognormal variance with pedigree 0.0141, pedigree (1,2,4,1,1)
  In this paper, this amount was calculated using GaBi software and databases version 4.4 Professional.It is related to the consumption of wood residues in industrial boilers. It corresponds about 1 % of wood fuel consumed.
  production volume 648278 kg; = BP_amount_1/ RP_amount_1* RP_PV_1
    Calculated from production volume of reference product using the relative outputs.
  property price 0 EUR2005; name BP_amount_1_price_EUR2005
  properties: carbon content, non-fossil 0.012, dry mass 1 kg, wet mass 1 kg

## Inputs from nature
- Water, cooling, unspecified natural origin [natural resource, in water]: 0.0904 m3; name water_cooling_UNO_input; source Diogo Aparecido Lopes Silva 2013; lognormal variance with pedigree 0.0087, pedigree (1,2,4,1,1)
  Based on data from Silva et al. (2013).This amount was calculated from on-site on-site measurements and internal company documents such as records of raw material consumption. It is mainly used in industrial boilers (steam production) and during blending process (urea formaldehyde resin preparation).

## Emissions to nature
- Suspended solids, unspecified [water, unspecified]: 0.0244 kg; source Diogo Aparecido Lopes Silva 2013; lognormal variance with pedigree 0.0582, pedigree (3,2,4,3,3)
  Based on data from Silva et al. (2013). This amount was calculated from waste management inventories from MDP manufacturing companies.
- Water [air, unspecified]: 0.340862 m3; name water_to_air_unspecified; = (water_cooling_UNO_input*fraction_CW_to_air)+(slab_input* slab_input_WWM/1000*0.9)+(bark_input* bark_input_WWM/1000*0.9)+(roundwood_eucalyptus_input* WWM_eucalyptus/1000*0.9); lognormal variance with pedigree 0.25, pedigree (5,5,5,5,5)
  Calculated value based on literature values and expert opinion. See comments in the parametres' comment field.
  It is estimated, that 90% of the water which is present in the wood which enters the activity is dried up (evaporates to air).
- Sulfur dioxide [air, urban air close to ground]: 1.31 kg; source Diogo Aparecido Lopes Silva 2013; lognormal variance with pedigree 0.0107, pedigree (3,2,4,1,1)
  Based on data from Silva et al. (2013). This amount was calculated using GaBi software and databases version 4.4 Professional.It is related to the consumption of diesel (internal transport) and heavy fuel oil in industrial boilers.
- Nitrogen oxides [air, unspecified]: 0.18 kg; source Diogo Aparecido Lopes Silva 2013; lognormal variance with pedigree 0.0501, pedigree (3,2,4,1,1)
  Based on data from Silva et al. (2013).This amount was calculated using GaBi software and databases version 4.4 Professional.It is related to the consumption of nonrenewable energy resources (diesel, heavy fuel oil) and wood fuel.
- Methane, fossil [air, urban air close to ground]: 0.00169 kg; source Diogo Aparecido Lopes Silva 2013; lognormal variance with pedigree 0.0501, pedigree (3,2,4,1,1)
  Based on data from Silva et al. (2013). This amount was calculated using GaBi software and databases version 4.4 Professional. It is related to the consumption of nonrenewable energy resources (heavy fuel oil).
- Carbon dioxide, fossil [air, unspecified]: 48.088 kg; lognormal variance with pedigree 0.0087, pedigree (1,2,4,1,1)
  Estimate based on expert opinion; 0.2% of the carbon present in diesel is emitted as carbon monoxide, while 99.8% is emitted as carbon dioxide; 0.01% of the carbon present in heavy fuel oil is emitted as carbon monoxide, while 99.99% is emitted as carbon dioxide.
- Carbon monoxide, non-fossil [air, unspecified]: 1.83 kg; lognormal variance with pedigree 0.6581, pedigree (1,2,4,1,1)
  Estimate based on expert opinion; 2% of the carbon present in the wood is emitted as carbon monoxide, while 98% is emitted as carbon dioxide.
- NMVOC, non-methane volatile organic compounds, unspecified origin [air, unspecified]: 0.36 kg; source Wilson, J.B. 2009; lognormal variance with pedigree 0.0501, pedigree (3,2,4,1,1)
  Based on data from Wilson et al. (2009), who studied lifecyle inventory of particleboard/MDP production in the USA. It is related to the drying process (VOCs emissions from wood particles) and the hot pressing process of the mat (cure of the resin during the pressing cycle).
- Formaldehyde [air, unspecified]: 0.15 kg; source Chipanski, E. R. 2006; lognormal variance with pedigree 0.0801, pedigree (1,2,5,1,1)
  Based on data from Chipanski (2006), who studied particleboard/MDP production in Brazil and classified the panels according to their emissions of free formaldehyde. Free formaldehyde air emissions are related to urea-formaldehyde (UF) resin use during the manufacture phase of particleboards.
- Particulates, > 10 um [air, unspecified]: 0.08 kg; source Diogo Aparecido Lopes Silva 2013; lognormal variance with pedigree 0.0501, pedigree (3,2,4,1,1)
  Based on data from Silva et al. (2013). This amount was calculated using GaBi software and databases version 4.4 Professional.It is related to the consumption of nonrenewable energy resources (heavy fuel oil).
- Oils, unspecified [soil, industrial]: 0.0159 kg; source Diogo Aparecido Lopes Silva 2013; lognormal variance with pedigree 0.0481, pedigree (1,2,4,1,1)
  (same comment as for Suspended solids, unspecified)
- Particulates, < 2.5 um [air, unspecified]: 0.02 kg; source Diogo Aparecido Lopes Silva 2013; lognormal variance with pedigree 0.3101, pedigree (3,2,4,1,1)
  Based on data from Silva et al. (2013). This amount was calculated using GaBi software and databases version 4.4 Professional.It is related to the consumption of nonrenewable energy resources (diesel).
- Particulates, > 2.5 um, and < 10um [air, unspecified]: 0.08 kg; source Diogo Aparecido Lopes Silva 2013; lognormal variance with pedigree 0.3101, pedigree (3,2,4,1,1)
  Based on data from Silva et al. (2013). This amount was calculated using GaBi software and databases version 4.4 Professional.It is related to the consumption of wood fuel.
- Hydrocarbons, aliphatic, alkanes, unspecified [air, unspecified]: 0.00164 kg; source Diogo Aparecido Lopes Silva 2013; lognormal variance with pedigree 0.0501, pedigree (3,2,4,1,1)
  (same comment as for Methane, fossil)
- Sulfur trioxide [air, unspecified]: 0.0171 kg; source Diogo Aparecido Lopes Silva 2013; lognormal variance with pedigree 0.0107, pedigree (3,2,4,1,1)
  Based on data from Silva et al. (2013). This amount was calculated using GaBi software and databases version 4.4 Professional.It is related to the consumption of heavy fuel oil in industrial boilers.
- Formaldehyde [water, unspecified]: 7.3e-5 kg; source Chipanski, E. R. 2006; lognormal variance with pedigree 0.0481, pedigree (1,2,4,1,1)
  (same comment as for Formaldehyde)
- Carbon monoxide, fossil [air, unspecified]: 0.009657 kg; lognormal variance with pedigree 0.6581, pedigree (1,2,4,1,1)
  (same comment as for Carbon dioxide, fossil)
- Water [water, unspecified]: 0.04937 m3; name water_to_water_unspecified; = water_cooling_UNO_input*(1-fraction_CW_to_air)-(wastewater_output*-1); lognormal variance with pedigree 0.25, pedigree (5,5,5,5,5)
  (same comment as for Water)
- Carbon dioxide, non-fossil [air, unspecified]: 140.95 kg; lognormal variance with pedigree 0.0087, pedigree (1,2,4,1,1)
  (same comment as for Carbon monoxide, non-fossil)

## Sampling procedure
Inventory data for the industrial production consisted of average data obtained from particleboard manufacturing companies in Brazil. Data for three companies, located in the States of São Paulo and Minas Gerais, representing 57.0% of the Brazilian particleboard production, for furniture application, was collected. Average values representing one year of particleboard production were obtained from on-site measurements and internal company documents such as records of raw material consumption, emissions and waste management inventories, during 2011 and 2012. When process input/output data was not avaiable, secondary data were used from literature.

## Extrapolations
This dataset has been extrapolated from year 2012 to the year of the calculation (2021). The uncertainty has been adjusted accordingly.

## Review by Dominic Notter 2013-07-22
o.k.

## Review by Emilia Moreno Ruiz 2014-06-20
wood fuel, softwood, wet, measured as solid wood under bark input replaced
