# treatment of waste wood pole, chrome preserved, municipal incineration

Dataset: EcoSpold 2, unit process
Geography: RoW
Time period: 2006-01-01 to 2021-12-31
Technology level: current
Classification: ISIC rev.4 ecoinvent: 3821:Treatment and disposal of non-hazardous waste
Synonyms: municipal waste incineration; Siedlungsabfallverbrennung; Kehrichtverbrennung
Scenario: Business-as-Usual
System model: Allocation, cut-off by classification
Share of production covered: 1.8 %
Generated by: Gabor Doka
Published in: Doka G. 2013
Database: ecoinvent
isCopyrightProtected: true
accessRestrictedTo: 1

## General comment
This dataset represents the activity of waste disposal of waste wood pole, chrome preserved in a municipal solid waste incinerator (MSWI) // Recommended use of this dataset: For disposal of bulk or small parts of chrome preserved wood poles as used for electricity grids. Please note there is another, slightly different chrome preserved wood for genereal building products. // // Waste composition (wet, in ppm): upper heating value 15.36 MJ/kg; lower heating value 13.99 MJ/kg; H2O 173450; O 370840; H 49982; C 400020; S 288.79; N 983.43; P 108.57; B 58.919; Cl 329.76; Br n.a.; F 21.03; I n.a.; Ag n.a.; As 0.42061; Ba n.a.; Cd 0.19979; Co 0.086459; Cr 2281.5; Cu 786.37; Hg 0.31861; Mn 52.927; Mo 0.82721; Ni 0.5538; Pb 27.767; Sb n.a.; Se n.a.; Sn n.a.; V n.a.; Zn 17.743; Be n.a.; Sc n.a.; Sr n.a.; Ti n.a.; Tl n.a.; W n.a.; Si n.a.; Fe 15.423; Ca 130.42; Al 6.3093; K 65.176; Mg 196.85; Na 334.08; // Share of carbon in waste that is biogenic 100%. // Share of metals in waste not oxidised and bulk-recyclable (exclude very small or thin parts) Iron: 0%; Alu: 0%; Copper: 0%. // One kg of this waste produces 0.01088 kg of slag and 0.004415 kg of residues, which are landfilled. Additional solidification with 0.001766 kg of cement. // Net energy production: 1.74MJ/kg electric energy and 3.49MJ/kg thermal energy. // Recovery of metal scrap to recycling: 0g iron scrap, 0g aluminium scrap, 0g copper scrap.

## Included activities start
waste incineration from waste reception gate and delivery into waste bunker at incinerator plant site (without transports to the incinerator)

## Included activities end
Waste-specific short-term emissions to water from leachate. Long-term emissions from landfill to ground water.

## Geography
Specific to the technology mix encountered in Switzerland in 2010. Well applicable to modern incineration practices in Europe, North America or Japan.

## Technology
average Swiss MSWI plants in 2010 (grate incinerators) with electrostatic precipitator for fly ash (ESP), wet flue gas scrubber and 25% SNCR , 42.77% SCR-high dust , 32.68% SCR-low dust -DeNOx facilities and 0% without Denox (weighted according to mass of burnt waste, representing Swiss average). Efficiency of iron scrap separation from slag : 58%. Efficiency of non-ferrous scrap separation from slag : 31%. Gross electric efficiency technology mix 15.84% and Gross thermal efficiency technology mix 28.51%

## Time period
Waste composition as given in literature reference, theoretical data or other source. Transfer coefficients for modern MSWI.

## Reference product
- waste wood pole, chrome preserved: -1 kg; CPC 3928: Sawdust and wood waste and scrap; By-product classification Waste
  Main reference product of this activity (supply of disposal service).
  production volume 6.7594e8 kg
    based on estimate on MSW in WTE globally and estimated share of wood poles in Swiss MSW from Swiss electricity transmission networks inventory (Frischknecht et al. 2007-XVI, p.100+98). Annually in CH 12 Mio kg waste wood poles are produced; 0.338w% of annual Swiss MSW.
  property price 0 EUR2005
    Waste products are assigned a price of zero as they are assumed to require further treatment.
  property heating value, net 13.99 MJ
    Value taken from the general comment of the treatment dataset.
  property carbon content 0.483676
    carbon content on a dry matter basis (reserved; not for manual entry)
  properties: wet mass 1 kg, carbon content, fossil 0, carbon content, non-fossil 0.483676, water in wet mass 0.2 kg, dry mass 0.8 kg, water content 0.25, carbon allocation 0.386941 kg

## By-products
- electricity, for reuse in municipal waste incineration only: 0 kWh; name E_el_prod_MSWI; CPC 17100: Electrical energy; By-product classification allocatable product; pedigree (1,1,1,1,1)
  Net electricity generated from this waste and used in internal MSWI plant energy redistribution.
  Uncertainty: uncertainty is calculated from uncertainties in waste composition and uncertainties in energy efficiency and the uncertainty in internal energy demand
  production volume 3.2631e8 kWh
    calculated in proportion to reference product waste input to incinerator
  property price 0.1 EUR2005; name E_el_prod_MSWI_price_EUR2005
    Estimated to be the same price as in case of electricity, medium voltage.
  property exergy 3.6 MJ; name E_el_prod_MSWI_exergy
    This exergy property is based on the exergy content of the product.
  property true value relation 3.6; name E_el_prod_MSWI_true_value_relation
    property to calculate "true value" from
- heat, for reuse in municipal waste incineration only: 0 MJ; name E_th_prod_MSWI; By-product classification allocatable product; CPC 17300: Steam and hot water; pedigree (1,1,1,1,1)
  (same comment as for electricity, for reuse in municipal waste incineration only)
  production volume 2.3608e9 MJ
    calculated in proportion to reference product waste input to incinerator
  property exergy 0.1842 MJ; name E_th_prod_MSWI_exergy
    This exergy property is based on the exergy content of the product.
  property true value relation 0.1842; name E_th_prod_MSWI_true_value_relation
    property to calculate "true value" from
  property price 0.0106 EUR2005; name E_th_prod_MSWI_price_EUR2005
    Average European district heat price from Ecoheatcool and Euroheat 2005-2006, Ecoheat Work package 1: The European heat market. Final report. 10.6 EUR/GJ i s the price of district heat. http://www.solarthermalworld.org/files/Ecoheatcool%20WP1%20Web.pdf?download

## Inputs from technosphere
- chromium oxide, flakes: 5.9341e-7 kg; lognormal variance with pedigree 0.68325, pedigree (1,1,4,1,1)
  Input to DeNOx stage.
  Uncertainty: uncertainty calculated from uncertainty in average DeNOx input, uncertainty in the share of thermal NOx, uncertainty of nitrogen content in average municipal waste and the uncertainty in nitrogen content in *this* waste.
  properties: dry mass 1 kg, wet mass 1 kg
- water, decarbonised: 0 kg; pedigree (1,1,1,1,1)
  Incinerator process water used in flue gas scrubber stage.
  Uncertainty: uncertainty calculated from uncertainty in average water input, and the uncertainty of the waste composition of this waste
  properties: wet mass 1 kg
- iron (III) chloride, without water, in 40% solution state: 7.0319e-6 kg; lognormal variance with pedigree 0.22282, pedigree (1,1,4,1,1)
  Auxilliary inputs for the wastewater treatment stage of the incinerator plant.
  Uncertainty: uncertainty calculated from uncertainty in average FeCl3 input, of transfer coefficients in the incinerator, and the uncertainty of the waste composition of this waste
  properties: wet mass 1 kg, dry mass 1 kg
- ammonia, anhydrous, liquid: 0 kg; pedigree (1,1,1,1,1)
  Input to DeNOx stage (100% NH3).
  Uncertainty: uncertainty calculated from uncertainty in average DeNOx input, uncertainty in the share of thermal NOx, uncertainty of nitrogen content in average municipal waste and the uncertainty in nitrogen content in *this* waste.
  properties: wet mass 1 kg, dry mass 1 kg
- waste cement, hydrated: 0 kg; pedigree (1,1,1,1,1)
  Hydrated cement output for solidification of landfilled residual material.
  Uncertainty: Uncertainty calculated from uncertainty of the waste composition of this waste and transfer coefficients in the incinerator and of the solidification recipe.
  production volume 0 kg
    calculated in proportion to reference product waste input to incinerator
  properties: wet mass 1 kg, dry mass 1 kg
- municipal waste incineration facility: 2.5e-10 unit
  Demands per kilogram waste.
- heat, district or industrial, natural gas: 0 MJ; pedigree (1,1,1,1,1)
  Input to DeNOx stage, to heat up flue gas in low-dust SCR.
  Uncertainty: uncertainty calculated from uncertainty in average DeNOx input, uncertainty in the share of thermal NOx, uncertainty of nitrogen content in average municipal waste and the uncertainty in nitrogen content in *this* waste.
  properties: heating value, net 1 MJ
- residual material landfill: 9.1972e-12 unit; lognormal variance with pedigree 0.062778, pedigree (1,1,4,1,1)
  Landfill infrastructure required for landfilling of incineration residues.
  Uncertainty: uncertainty is calculated from uncertainties in waste composition and transfer coefficients in incinerator
- titanium dioxide: 2.9077e-5 kg; lognormal variance with pedigree 0.68325, pedigree (1,1,4,1,1)
  Input to DeNOx stage (TiO2 catalyst carrier)
  Uncertainty: uncertainty calculated from uncertainty in average DeNOx input, uncertainty in the share of thermal NOx, uncertainty of nitrogen content in average municipal waste and the uncertainty in nitrogen content in *this* waste.
  properties: wet mass 1 kg, dry mass 1 kg
- slag landfill: 1.7908e-11 unit; lognormal variance with pedigree 0.041384, pedigree (1,1,4,1,1)
  Landfill infrastructure required for landfilling of bottom ash.
  Uncertainty: uncertainty is calculated from uncertainties in waste composition and transfer coefficients in incinerator
- chemical, inorganic: 2.9987e-5 kg; lognormal variance with pedigree 0.102931, pedigree (1,1,4,1,1)
  Auxilliary inputs for the wastewater treatment stage of the incinerator plant. Proxy for Polyelectrolyte.
  Uncertainty: uncertainty calculated from uncertainty in average Polyelectrolyte input, of transfer coefficients in the incinerator, and the uncertainty of the waste composition of this waste
  properties: carbon content, fossil 0.003, wet mass 1 kg, dry mass 1 kg
- sodium hydroxide, without water, in 50% solution state: 0.00013455 kg; lognormal variance with pedigree 0.36484, pedigree (1,1,4,1,1)
  Auxilliary inputs for the flue gas treatment stage of the incinerator plant.
  Uncertainty: uncertainty calculated from uncertainty in average NaOH input, of transfer coefficients in the incinerator, and the uncertainty of the waste composition of this waste
  properties: wet mass 1 kg, dry mass 1 kg, heating value, net 3.03 MJ
- hydrochloric acid, without water, in 30% solution state: 7.8819e-6 kg; lognormal variance with pedigree 0.102931, pedigree (1,1,4,1,1)
  Auxilliary inputs for the wastewater treatment stage of the incinerator plant.
  Uncertainty: uncertainty calculated from uncertainty in average HCl input, of transfer coefficients in the incinerator, and the uncertainty of the waste composition of this waste
  properties: heating value, net 3.32 MJ, wet mass 1 kg, dry mass 1 kg
- process-specific burdens, slag landfill: 0 kg; pedigree (1,1,1,1,1)
  Mass-specific expenditures required for landfilling of bottom ash.
  Uncertainty: uncertainty is calculated from uncertainties in waste composition and transfer coefficients in incinerator
- transport, freight, lorry, unspecified: 0 metric ton*km; pedigree (1,1,1,1,1)
  Transport services to transport incineration residues to landfills.
  Uncertainty: uncertainty calculated from uncertainty of the waste composition of this waste, uncertainty of transfer coefficients and the uncertainty in generic transportation distances
- chemical, organic: 5.3265e-6 kg; lognormal variance with pedigree 1.7079, pedigree (1,1,4,1,1)
  Auxilliary inputs for the wastewater treatment stage of the incinerator plant. Proxy for (pure) Trisodium-trimercapto-s-triazine (CAS 17766-26-6), used as 15% diluted solution, aka TMT15.
  Uncertainty: uncertainty calculated from uncertainty in average TMT15 input, of transfer coefficients in the incinerator, and the uncertainty of the waste composition of this waste
  properties: wet mass 1 kg, carbon content, fossil 0.628, dry mass 1 kg, heating value, net 19.03 MJ
- process-specific burdens, residual material landfill: 0 kg; pedigree (1,1,1,1,1)
  Mass-specific expenditures required for landfilling of incineration residues.
  Uncertainty: uncertainty is calculated from uncertainties in waste composition and transfer coefficients in incinerator
- quicklime, milled, packed: 0.0001817 kg; lognormal variance with pedigree 0.77456, pedigree (1,1,4,1,1)
  Auxilliary inputs for the flue gas treatment stage of the incinerator plant.
  Uncertainty: uncertainty calculated from uncertainty in average CaO input, of transfer coefficients in the incinerator, and the uncertainty of the waste composition of this waste
  properties: dry mass 0.99 kg, wet mass 1 kg, water content 0.010101
- cement, unspecified: 0 kg; pedigree (1,1,1,1,1)
  Cement required for solidification of landfilled residual material.
  Uncertainty: Uncertainty calculated from uncertainty of the waste composition of this waste, of transfer coefficients in the incinerator and of the solidification recipe.
  properties: wet mass 1 kg, dry mass 1 kg
- water, decarbonised: 0.00320548, 0.00834066, 0.0336398, 0.00821467, 0.00165604, 0.00544537, 0.000300617, 0.00428372, 0.00997855, 0.0625927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 kg (12 entries); lognormal variance with pedigree 0.22282, pedigree (1,1,4,1,1)
  (same comment as for water, decarbonised)
- ammonia, anhydrous, liquid: 9.72814e-5, 8.3625e-6, 1.30099e-5, 2.57772e-5, 2.52549e-5, 2.64698e-6, 1.1833e-5, 0.000279934 kg (8 entries); lognormal variance with pedigree 0.38104, pedigree (1,1,4,1,1)
  (same comment as for ammonia, anhydrous, liquid)
- waste cement, hydrated: -0.00124881, -0.00316589 kg (2 entries); lognormal variance with pedigree 0.071862, pedigree (1,1,4,1,1)
  (same comment as for waste cement, hydrated)
  production volume 2.984e6 kg
- heat, district or industrial, natural gas: 0.000965953, 0.0231461, 0.0626749 MJ (3 entries); lognormal variance with pedigree 0.38104, pedigree (1,1,4,1,1)
  (same comment as for heat, district or industrial, natural gas)
- process-specific burdens, slag landfill: 0.00284939, 0.00722361 kg (2 entries); lognormal variance with pedigree 0.041384, pedigree (1,1,4,1,1)
  (same comment as for process-specific burdens, slag landfill)
- transport, freight, lorry, unspecified: 6.63207e-5, 1.03834e-5, 0.000502816 metric ton*km (3 entries); lognormal variance with pedigree 0.02938, pedigree (1,1,4,1,1)
  (same comment as for transport, freight, lorry, unspecified)
- process-specific burdens, residual material landfill: 0.00124881, 0.00316589 kg (2 entries); lognormal variance with pedigree 0.062778, pedigree (1,1,4,1,1)
  (same comment as for process-specific burdens, residual material landfill)
- cement, unspecified: 0.000254988, 5.30555e-5, 3.88595e-6, 1.10762e-5, 0.000250493, 7.37273e-6, 8.09744e-5, 9.797e-6, 0.00109426 kg (9 entries); lognormal variance with pedigree 0.071862, pedigree (1,1,4,1,1)
  (same comment as for cement, unspecified)

## Inputs from nature
- Oxygen [natural resource, in air]: 1.4692 kg; lognormal variance with pedigree 0.036604, pedigree (1,1,4,1,1)
  Oxygen from ambient air needed to combust and oxidise this waste. Net demand, i.e. without O2 leaving the plant in flue gas uncombusted.
  Uncertainty: uncertainty is calculated from uncertainties in waste composition and transfer coefficients to flue gas and soild residues in incinerator

## Emissions to nature
- Boron [water, surface water]: 4.6164e-7 kg; lognormal variance with pedigree 1.2739, pedigree (1,1,4,1,1)
  Emissions to water from waste composition and transfer coefficients in incinerator and landfills.
  Uncertainty: uncertainty is calculated from uncertainties in waste composition and transfer coefficients in incinerator and landfills
- Zinc, ion [water, ground-, long-term]: 5.3956e-6 kg; lognormal variance with pedigree 3.3134, pedigree (1,1,4,1,1)
  Long-term emissions from landfilling of incineration residues.
  Uncertainty: uncertainty is calculated from uncertainties in waste composition and transfer coefficients in incinerator and landfills.
- COD, Chemical Oxygen Demand [water, ground-, long-term]: 0.003004 kg; lognormal variance with pedigree 0.03264, pedigree (1,1,4,1,1)
  (same comment as for Zinc, ion)
- Aluminium [air, urban air close to ground]: 5.1441e-12 kg; lognormal variance with pedigree 1.4117, pedigree (1,1,4,1,1)
  Emission to air from waste composition and transfer coefficients.
  Uncertainty: uncertainty is calculated from uncertainties in waste composition and transfer coefficients in incinerator
- BOD5, Biological Oxygen Demand [water, ground-, long-term]: 0.00098261 kg; lognormal variance with pedigree 0.03264, pedigree (1,1,4,1,1)
  (same comment as for Zinc, ion)
- Fluoride [water, surface water]: 1.6081e-6 kg; lognormal variance with pedigree 0.75635, pedigree (1,1,4,1,1)
  (same comment as for Boron)
- Nickel, ion [water, ground-, long-term]: 5.3159e-7 kg; lognormal variance with pedigree 1.6208, pedigree (1,1,4,1,1)
  (same comment as for Zinc, ion)
- Phosphate [water, ground-, long-term]: 1.4548e-5 kg; lognormal variance with pedigree 5.0872, pedigree (1,1,4,1,1)
  (same comment as for Zinc, ion)
- Dioxins, measured as 2,3,7,8-tetrachlorodibenzo-p-dioxin [air, urban air close to ground]: 6.7445e-14 kg; lognormal variance with pedigree 0.43319, pedigree (1,1,4,1,1)
  Incomplete combustion product emitted to air.
  Uncertainty: uncertainty calculated from uncertainty in average operation emissions, and the uncertainty of the flue gas volume from this waste.
- COD, Chemical Oxygen Demand [water, surface water]: 0.00046794 kg; lognormal variance with pedigree 0.053457, pedigree (1,1,4,1,1)
  (same comment as for Boron)
- Iron [air, urban air close to ground]: 2.764e-11 kg; lognormal variance with pedigree 1.2808, pedigree (1,1,4,1,1)
  (same comment as for Aluminium)
- BOD5, Biological Oxygen Demand [water, surface water]: 0.00046193 kg; lognormal variance with pedigree 0.054699, pedigree (1,1,4,1,1)
  (same comment as for Boron)
- Mercury [water, surface water]: 3.4602e-10 kg; lognormal variance with pedigree 1.2333, pedigree (1,1,4,1,1)
  (same comment as for Boron)
- Chromium VI [water, ground-, long-term]: 0.00020929 kg; lognormal variance with pedigree 1.0703, pedigree (1,1,4,1,1)
  (same comment as for Zinc, ion)
- Heat, waste [air, urban air close to ground]: 11.215 MJ; lognormal variance with pedigree 0.060388, pedigree (1,1,4,1,1)
  Waste heat generated from heating value of this waste plus any electricity required to process it.
  Uncertainty: uncertainty is calculated from uncertainties in waste composition and uncertainties in energy efficiency and the uncertainty in internal energy demand
- Nitrate [water, surface water]: 1.2536e-5 kg; lognormal variance with pedigree 0.46852, pedigree (1,1,4,1,1)
  (same comment as for Boron)
- Chromium VI [water, surface water]: 6.3763e-5 kg; lognormal variance with pedigree 0.67095, pedigree (1,1,4,1,1)
  (same comment as for Boron)
- Cadmium [air, urban air close to ground]: 1.0183e-10 kg; lognormal variance with pedigree 1.8113, pedigree (1,1,4,1,1)
  (same comment as for Aluminium)
- Hydrogen chloride [air, urban air close to ground]: 1.8818e-7 kg; lognormal variance with pedigree 0.83483, pedigree (1,1,4,1,1)
  (same comment as for Aluminium)
- Particulates, < 2.5 um [air, urban air close to ground]: 4.0265e-6 kg; lognormal variance with pedigree 0.43319, pedigree (1,1,4,1,1)
  (same comment as for Dioxins, measured as 2,3,7,8-tetrachlorodibenzo-p-dioxin)
- Arsenic [air, urban air close to ground]: 3.2947e-9 kg; lognormal variance with pedigree 1.6985, pedigree (1,1,4,1,1)
  (same comment as for Aluminium)
- Sodium, ion [water, ground-, long-term]: 0.00024057 kg; lognormal variance with pedigree 0.42584, pedigree (1,1,4,1,1)
  (same comment as for Zinc, ion)
- Toluene [air, urban air close to ground]: 6.7449e-8 kg; lognormal variance with pedigree 0.101325, pedigree (1,1,4,1,1)
  (same comment as for Dioxins, measured as 2,3,7,8-tetrachlorodibenzo-p-dioxin)
- TOC, Total Organic Carbon [water, surface water]: 0.00020435 kg; lognormal variance with pedigree 0.053614, pedigree (1,1,4,1,1)
  (same comment as for Boron)
- Arsenic, ion [water, surface water]: 2.9136e-7 kg; lognormal variance with pedigree 1.5692, pedigree (1,1,4,1,1)
  (same comment as for Boron)
- NMVOC, non-methane volatile organic compounds, unspecified origin [air, urban air close to ground]: 1.5348e-6 kg; lognormal variance with pedigree 0.101325, pedigree (1,1,4,1,1)
  (same comment as for Dioxins, measured as 2,3,7,8-tetrachlorodibenzo-p-dioxin)
- Magnesium [air, urban air close to ground]: 2.0763e-7 kg; lognormal variance with pedigree 0.89896, pedigree (1,1,4,1,1)
  (same comment as for Aluminium)
- Benzene [air, urban air close to ground]: 3.3725e-8 kg; lognormal variance with pedigree 0.101325, pedigree (1,1,4,1,1)
  (same comment as for Dioxins, measured as 2,3,7,8-tetrachlorodibenzo-p-dioxin)
- Particulates, > 2.5 um, and < 10um [air, urban air close to ground]: 2.0233e-8 kg; lognormal variance with pedigree 0.2099, pedigree (1,1,4,1,1)
  (same comment as for Dioxins, measured as 2,3,7,8-tetrachlorodibenzo-p-dioxin)
- Lead [water, surface water]: 2.6561e-9 kg; lognormal variance with pedigree 0.95893, pedigree (1,1,4,1,1)
  (same comment as for Boron)
- Hydrogen fluoride [air, urban air close to ground]: 1.4189e-7 kg; lognormal variance with pedigree 1.1885, pedigree (1,1,4,1,1)
  (same comment as for Aluminium)
- Cadmium, ion [water, ground-, long-term]: 1.4579e-8 kg; lognormal variance with pedigree 7.237, pedigree (1,1,4,1,1)
  (same comment as for Zinc, ion)
- Carbon monoxide, non-fossil [air, urban air close to ground]: 5.7328e-5 kg; lognormal variance with pedigree 0.83152, pedigree (1,1,4,1,1)
  (same comment as for Dioxins, measured as 2,3,7,8-tetrachlorodibenzo-p-dioxin)
- Chloride [water, surface water]: 0.00025316 kg; lognormal variance with pedigree 0.67262, pedigree (1,1,4,1,1)
  (same comment as for Boron)
- Sodium [air, urban air close to ground]: 2.7429e-6 kg; lognormal variance with pedigree 0.81829, pedigree (1,1,4,1,1)
  (same comment as for Aluminium)
- DOC, Dissolved Organic Carbon [water, surface water]: 0.00020435 kg; lognormal variance with pedigree 0.053614, pedigree (1,1,4,1,1)
  (same comment as for Boron)
- Aluminium [water, ground-, long-term]: 4.5626e-6 kg; lognormal variance with pedigree 1.2389, pedigree (1,1,4,1,1)
  (same comment as for Zinc, ion)
- Lead [water, ground-, long-term]: 1.3425e-5 kg; lognormal variance with pedigree 4.2803, pedigree (1,1,4,1,1)
  (same comment as for Zinc, ion)
- Nitrogen oxides [air, urban air close to ground]: 0.00017279 kg; lognormal variance with pedigree 0.42475, pedigree (1,1,4,1,1)
  Sum of fuel-Nox and thermal-NOx emitted to air after DeNOx stage.
  Uncertainty: uncertainty calculated from uncertainty in average N-emissions and uncertainty in the share of thermal NOx and the uncertainty in nitrogen content in *this* waste.
- Phosphorus [air, urban air close to ground]: 1.1034e-7 kg; lognormal variance with pedigree 0.97983, pedigree (1,1,4,1,1)
  (same comment as for Aluminium)
- Water [air, urban air close to ground]: 0.0014855 m3; lognormal variance with pedigree 0.60729, pedigree (1,1,4,1,1)
  Water vapour from waste humidity, hydrogen oxidation and part of the process water.
  Uncertainty: Uncertainty calculated from uncertainty in waste composition, process water input and the uncertainty of fraction to air.
- Water [water, surface water]: 0.00047594 m3; lognormal variance with pedigree 0.96466, pedigree (1,1,4,1,1)
  Process water released to surface water.
  Uncertainty: uncertainty calculated from uncertainty in process water input and the uncertainty of fraction to surface water.
- Magnesium [water, surface water]: 9.1848e-7 kg; lognormal variance with pedigree 1.011, pedigree (1,1,4,1,1)
  (same comment as for Boron)
- Sodium, ion [water, surface water]: 9.0772e-5 kg; lognormal variance with pedigree 0.42687, pedigree (1,1,4,1,1)
  (same comment as for Boron)
- Cobalt [air, urban air close to ground]: 1.5724e-10 kg; lognormal variance with pedigree 1.9437, pedigree (1,1,4,1,1)
  (same comment as for Aluminium)
- Calcium [air, urban air close to ground]: 1.0264e-6 kg; lognormal variance with pedigree 0.94306, pedigree (1,1,4,1,1)
  (same comment as for Aluminium)
- Iron, ion [water, ground-, long-term]: 7.7806e-6 kg; lognormal variance with pedigree 1.387, pedigree (1,1,4,1,1)
  (same comment as for Zinc, ion)
- Cyanide [air, urban air close to ground]: 3.1512e-6 kg; lognormal variance with pedigree 1.4418, pedigree (1,1,4,1,1)
  Nitrogen species emitted to air after DeNOx stage.
  Uncertainty: uncertainty calculated from uncertainty in average N-emissions and uncertainty in the share of thermal NOx and the uncertainty in nitrogen content in *this* waste.
- Chromium, ion [water, surface water]: 1.7715e-7 kg; lognormal variance with pedigree 0.59476, pedigree (1,1,4,1,1)
  (same comment as for Boron)
- Nickel, ion [water, surface water]: 3.721e-10 kg; lognormal variance with pedigree 2.1942, pedigree (1,1,4,1,1)
  (same comment as for Boron)
- Phenol, pentachloro- [air, urban air close to ground]: 1.4687e-11 kg; lognormal variance with pedigree 0.101325, pedigree (1,1,4,1,1)
  (same comment as for Dioxins, measured as 2,3,7,8-tetrachlorodibenzo-p-dioxin)
- Cobalt [water, ground-, long-term]: 7.043e-8 kg; lognormal variance with pedigree 1.8373, pedigree (1,1,4,1,1)
  (same comment as for Zinc, ion)
- Manganese [water, ground-, long-term]: 3.2652e-5 kg; lognormal variance with pedigree 2.0362, pedigree (1,1,4,1,1)
  (same comment as for Zinc, ion)
- Boron [water, ground-, long-term]: 5.0104e-5 kg; lognormal variance with pedigree 0.89317, pedigree (1,1,4,1,1)
  (same comment as for Zinc, ion)
- Calcium, ion [water, surface water]: 1.4438e-6 kg; lognormal variance with pedigree 0.70946, pedigree (1,1,4,1,1)
  (same comment as for Boron)
- Nickel [air, urban air close to ground]: 6.957e-10 kg; lognormal variance with pedigree 1.6701, pedigree (1,1,4,1,1)
  (same comment as for Aluminium)
- Lead [air, urban air close to ground]: 2.2876e-9 kg; lognormal variance with pedigree 1.1783, pedigree (1,1,4,1,1)
  (same comment as for Aluminium)
- Magnesium [water, ground-, long-term]: 0.00017432 kg; lognormal variance with pedigree 0.85235, pedigree (1,1,4,1,1)
  (same comment as for Zinc, ion)
- Copper [air, urban air close to ground]: 7.2024e-8 kg; lognormal variance with pedigree 0.73076, pedigree (1,1,4,1,1)
  (same comment as for Aluminium)
- Copper, ion [water, ground-, long-term]: 0.00070241 kg; lognormal variance with pedigree 0.68373, pedigree (1,1,4,1,1)
  (same comment as for Zinc, ion)
- Calcium, ion [water, ground-, long-term]: 9.7142e-5 kg; lognormal variance with pedigree 0.87717, pedigree (1,1,4,1,1)
  (same comment as for Zinc, ion)
- Sulfur dioxide [air, urban air close to ground]: 3.0712e-6 kg; lognormal variance with pedigree 0.84098, pedigree (1,1,4,1,1)
  (same comment as for Aluminium)
- TOC, Total Organic Carbon [water, ground-, long-term]: 0.0011887 kg; lognormal variance with pedigree 0.03264, pedigree (1,1,4,1,1)
  (same comment as for Zinc, ion)
- Benzene, hexachloro- [air, urban air close to ground]: 7.0517e-11 kg; lognormal variance with pedigree 0.101325, pedigree (1,1,4,1,1)
  (same comment as for Dioxins, measured as 2,3,7,8-tetrachlorodibenzo-p-dioxin)
- Copper, ion [water, surface water]: 1.019e-7 kg; lognormal variance with pedigree 0.67877, pedigree (1,1,4,1,1)
  (same comment as for Boron)
- Methane, non-fossil [air, urban air close to ground]: 5.0587e-7 kg; lognormal variance with pedigree 0.101325, pedigree (1,1,4,1,1)
  (same comment as for Dioxins, measured as 2,3,7,8-tetrachlorodibenzo-p-dioxin)
- Benzene, pentachloro- [air, urban air close to ground]: 1.7818e-10 kg; lognormal variance with pedigree 0.101325, pedigree (1,1,4,1,1)
  (same comment as for Dioxins, measured as 2,3,7,8-tetrachlorodibenzo-p-dioxin)
- Molybdenum [water, surface water]: 2.2593e-7 kg; lognormal variance with pedigree 1.1389, pedigree (1,1,4,1,1)
  (same comment as for Boron)
- Cadmium, ion [water, surface water]: 1.9149e-11 kg; lognormal variance with pedigree 1.482, pedigree (1,1,4,1,1)
  (same comment as for Boron)
- Chloride [water, ground-, long-term]: 7.6414e-5 kg; lognormal variance with pedigree 0.80693, pedigree (1,1,4,1,1)
  (same comment as for Zinc, ion)
- Zinc, ion [water, surface water]: 1.6008e-9 kg; lognormal variance with pedigree 0.97923, pedigree (1,1,4,1,1)
  (same comment as for Boron)
- Potassium [air, urban air close to ground]: 3.22e-7 kg; lognormal variance with pedigree 1.0387, pedigree (1,1,4,1,1)
  (same comment as for Aluminium)
- Sulfate [water, surface water]: 0.00014651 kg; lognormal variance with pedigree 0.40586, pedigree (1,1,4,1,1)
  (same comment as for Boron)
- Molybdenum [air, urban air close to ground]: 1.0884e-9 kg; lognormal variance with pedigree 1.6203, pedigree (1,1,4,1,1)
  (same comment as for Aluminium)
- Molybdenum [water, ground-, long-term]: 6.0018e-7 kg; lognormal variance with pedigree 1.6001, pedigree (1,1,4,1,1)
  (same comment as for Zinc, ion)
- Nitrate [water, ground-, long-term]: 3.5371e-5 kg; lognormal variance with pedigree 0.67322, pedigree (1,1,4,1,1)
  (same comment as for Zinc, ion)
- Manganese [water, surface water]: 8.2387e-9 kg; lognormal variance with pedigree 0.90831, pedigree (1,1,4,1,1)
  (same comment as for Boron)
- Potassium, ion [water, surface water]: 1.4188e-5 kg; lognormal variance with pedigree 0.63655, pedigree (1,1,4,1,1)
  (same comment as for Boron)
- Arsenic, ion [water, ground-, long-term]: 1.2595e-7 kg; lognormal variance with pedigree 1.6898, pedigree (1,1,4,1,1)
  (same comment as for Zinc, ion)
- Potassium, ion [water, ground-, long-term]: 5.0667e-5 kg; lognormal variance with pedigree 0.57839, pedigree (1,1,4,1,1)
  (same comment as for Zinc, ion)
- Heat, waste [water, surface water]: 2.8842 MJ; lognormal variance with pedigree 0.060388, pedigree (1,1,4,1,1)
  (same comment as for Heat, waste)
- Cobalt [water, surface water]: 1.5664e-11 kg; lognormal variance with pedigree 2.1852, pedigree (1,1,4,1,1)
  (same comment as for Boron)
- Carbon dioxide, non-fossil [air, urban air close to ground]: 1.4578 kg; lognormal variance with pedigree 0.031534, pedigree (1,1,4,1,1)
  (same comment as for Aluminium)
- Iron, ion [water, surface water]: 4.0545e-10 kg; lognormal variance with pedigree 1.3886, pedigree (1,1,4,1,1)
  (same comment as for Boron)
- Benzo(a)pyrene [air, urban air close to ground]: 7.5048e-13 kg; lognormal variance with pedigree 0.43319, pedigree (1,1,4,1,1)
  (same comment as for Dioxins, measured as 2,3,7,8-tetrachlorodibenzo-p-dioxin)
- Dinitrogen monoxide [air, urban air close to ground]: 1.4667e-5 kg; lognormal variance with pedigree 1.4418, pedigree (1,1,4,1,1)
  (same comment as for Cyanide)
- Sulfate [water, ground-, long-term]: 0.00071527 kg; lognormal variance with pedigree 0.49483, pedigree (1,1,4,1,1)
  (same comment as for Zinc, ion)
- Fluoride [water, ground-, long-term]: 1.8855e-5 kg; lognormal variance with pedigree 0.70054, pedigree (1,1,4,1,1)
  (same comment as for Zinc, ion)
- Phosphate [water, surface water]: 6.1041e-8 kg; lognormal variance with pedigree 0.6907, pedigree (1,1,4,1,1)
  (same comment as for Boron)
- Mercury [air, urban air close to ground]: 9.0338e-9 kg; lognormal variance with pedigree 1.7339, pedigree (1,1,4,1,1)
  (same comment as for Aluminium)
- Manganese [air, urban air close to ground]: 1.0108e-8 kg; lognormal variance with pedigree 1.0828, pedigree (1,1,4,1,1)
  (same comment as for Aluminium)
- Chromium [air, urban air close to ground]: 1.9922e-6 kg; lognormal variance with pedigree 0.57972, pedigree (1,1,4,1,1)
  (same comment as for Aluminium)
- Ammonia [air, urban air close to ground]: 5.4567e-7 kg; lognormal variance with pedigree 0.42475, pedigree (1,1,4,1,1)
  (same comment as for Cyanide)
- Zinc [air, urban air close to ground]: 1.1892e-8 kg; lognormal variance with pedigree 1.2223, pedigree (1,1,4,1,1)
  (same comment as for Aluminium)
- DOC, Dissolved Organic Carbon [water, ground-, long-term]: 0.0011887 kg; lognormal variance with pedigree 0.03264, pedigree (1,1,4,1,1)
  (same comment as for Zinc, ion)
- Aluminium [water, surface water]: 6.828e-10 kg; lognormal variance with pedigree 1.4582, pedigree (1,1,4,1,1)
  (same comment as for Boron)
- Mercury [water, ground-, long-term]: 2.0293e-8 kg; lognormal variance with pedigree 3.2602, pedigree (1,1,4,1,1)
  (same comment as for Zinc, ion)
