# treatment of average incineration residue, residual material landfill

Dataset: EcoSpold 2, unit process
Geography: CH
Time period: 1994-01-01 to 2021-12-31
Technology level: current
Classification: ISIC rev.4 ecoinvent: 3822:Treatment and disposal of hazardous waste
Classification: EcoSpold01Categories: waste management/residual material landfill
Tags: ConvertedDataset; Treatment
Scenario: Business-as-Usual
System model: Allocation, cut-off by classification
Generated by: Gabor Doka (obsolete)
Published in: Doka G. 2009
Database: ecoinvent
isCopyrightProtected: true
accessRestrictedTo: 1

## General comment
Inventoried waste contains 100% average residual materials from MSWI; .
waste composition (wet, in ppm): H2O n.a.; O 344280; H n.a.; C 83667; S 28664; N n.a.; P 7811.4; B 182.67; Cl 8536.7; Br 884.81; F 1359.7; I 0.017273; Ag 20.159; As 20.658; Ba 296.43; Cd 846.91; Co 14.82; Cr 2208.9; Cu 9684.8; Hg 85.069; Mn 2666.7; Mo 18.809; Ni 395.45; Pb 20800; Sb 1017.4; Se 15.513; Sn 2075.6; V 74.442; Zn 71908; Be n.a.; Sc n.a.; Sr n.a.; Ti n.a.; Tl n.a.; W n.a.; Si 90527; Fe 61649; Ca 88366; Al 81225; K 49566; Mg 14927; Na 26199;
Share of carbon in waste that is biogenic 61.1%.
Additional solidification with 0.4 kg of cement.
[This dataset was already contained in the ecoinvent database version 2. It was not individually updated during the transfer to ecoinvent version 3. Life Cycle Impact Assessment results may still have changed, as they are affected by changes in the supply chain, i.e. in other datasets. This dataset was generated following the ecoinvent quality guidelines for version 2. It may have been subject to central changes described in the ecoinvent version 3 change report (http://www.ecoinvent.org/database/ecoinvent-version-3/reports-of-changes/), and the results of the central updates were reviewed extensively. The changes added e.g. consistent water flows and other information throughout the database. The documentation of this dataset can be found in the ecoinvent reports of version 2, which are still available via the ecoinvent website. The change report linked above covers all central changes that were made during the conversion process.]

## Included activities end
Waste-specific short-term emissions to water from leachate. Long-term emissions from landfill to ground water. Expenditures for solidificalion with cement (user-specified option)

## Geography
Technology encountered in Switzerland in 2000. Landfill includes base seal and leachate collection system.

## Technology
Swiss residual material landfill for polluted, inorganic waste. With base seal and leachate collection system. Recultivation after closure.

## Time period
Waste composition as given in literature reference, theoretical data or other source. Transfer coefficients from prospective model.

## Reference product
- average incineration residue: -1 kg; By-product classification Waste; CPC 39990: Other wastes n.e.c.
  EcoSpold01Location=CH
  production volume 0.0336675 kg
    This is a placeholder value that does not reflect real-world production volumes. This dataset does not currently require a real-world production volume to work in the database framework, and no actual data were collected yet. This has no negative effect on the results of the ecoinvent database. The placeholder value of this activity was scaled according to the nominal GDP of 2005 (source: United Nations, http://data.un.org/Glossary.aspx?q=GDP+%28current+US%24%29, accessed 20130726) to reflect an appropriate share of the global production volume, which is also a placeholder value.
  property price 0 EUR2005
    Waste products are assigned a price of zero as they are assumed to require further treatment.
  property carbon content, fossil 0.0325466
    Tab A.1, ecoinvent v2.2 report 13_I. It is considered that 61.1% of the C has a biogenic origin
  property carbon content, non-fossil 0.0511208
    (same comment as for average incineration residue)
  property carbon content 0.0836674
    carbon content on a dry matter basis (reserved; not for manual entry)
  properties: water content 0, dry mass 1 kg, water in wet mass 0 kg, wet mass 1 kg, heating value, net 0 MJ, carbon allocation 0.0836674 kg

## Inputs from technosphere
- residual material landfill: 2.0833e-9 unit; lognormal variance with pedigree 0.04, pedigree (1,1,5,1,1)
  demands per kilogram waste. uncertainty is heeded in the module
  EcoSpold01Location=CH
- cement, unspecified: 0.4 kg; lognormal variance with pedigree 0.05, pedigree (1,1,5,1,1)
  EcoSpold01Location=CH
  Cement for solidification of residual material waste. Uncertainty in mass from solidification recipe.
  properties: dry mass 1 kg, wet mass 1 kg
- process-specific burdens, residual material landfill: 1 kg; lognormal variance with pedigree 0.04, pedigree (1,1,5,1,1)
  EcoSpold01Location=CH
  demands per kilogram waste. uncertainty is heeded in the module;activityLink introduced to establish a direct link to the corresponding regional supply of this product
- waste cement, hydrated: -1 kg; lognormal variance with pedigree 0.05, pedigree (1,1,5,1,1)
  EcoSpold01Location=CH
  Hydrated cement for solidification of residual material waste. Uncertainty in mass from solidification recipe.
  production volume 1 kg
    Calculated from the production volume of average incineration residue, 0% water in proportion to the respective output amounts.
  properties: wet mass 1 kg, dry mass 1 kg

## Emissions to nature
- Fluoride [water, surface water]: 7.3684e-5 kg; lognormal variance with pedigree 0.84, pedigree (1,1,5,1,1)
  uncertainty is calculated from uncertainties in waste composition and transfer coefficients in residual landfill
- Zinc, ion [water, surface water]: 1.4713e-6 kg; lognormal variance with pedigree 1.36, pedigree (1,1,5,1,1)
  (same comment as for Fluoride)
- Phosphate [water, surface water]: 8.9331e-6 kg; lognormal variance with pedigree 1.22, pedigree (1,1,5,1,1)
  (same comment as for Fluoride)
- COD, Chemical Oxygen Demand [water, ground-, long-term]: 0.13664 kg; lognormal variance with pedigree 0.22, pedigree (1,1,5,1,1)
  uncertainty is calculated from uncertainties in waste composition and transfer coefficients in incinerator and landfills.
- Chloride [water, ground-, long-term]: 0.0060951 kg; lognormal variance with pedigree 0.43, pedigree (1,1,5,1,1)
  (same comment as for COD, Chemical Oxygen Demand)
- Mercury [water, surface water]: 6.7035e-9 kg; lognormal variance with pedigree 2.01, pedigree (1,1,5,1,1)
  (same comment as for Fluoride)
- Iron, ion [water, ground-, long-term]: 0.00030898 kg; lognormal variance with pedigree 7.22, pedigree (1,1,5,1,1)
  (same comment as for COD, Chemical Oxygen Demand)
- Chloride [water, surface water]: 0.0024416 kg; lognormal variance with pedigree 0.47, pedigree (1,1,5,1,1)
  (same comment as for Fluoride)
- Copper, ion [water, ground-, long-term]: 0.00037281 kg; lognormal variance with pedigree 3.06, pedigree (1,1,5,1,1)
  (same comment as for COD, Chemical Oxygen Demand)
- Iron, ion [water, surface water]: 5.1583e-7 kg; lognormal variance with pedigree 1.49, pedigree (1,1,5,1,1)
  (same comment as for Fluoride)
- Vanadium, ion [water, surface water]: 1.827e-7 kg; lognormal variance with pedigree 1.58, pedigree (1,1,5,1,1)
  (same comment as for Fluoride)
- Tin, ion [water, ground-, long-term]: 3.9332e-5 kg; lognormal variance with pedigree 4.54, pedigree (1,1,5,1,1)
  (same comment as for COD, Chemical Oxygen Demand)
- Iodide [water, ground-, long-term]: 1.7273e-15 kg; lognormal variance with pedigree 1.99, pedigree (1,1,5,1,1)
  (same comment as for COD, Chemical Oxygen Demand)
- Silver, ion [water, surface water]: 1.2955e-9 kg; lognormal variance with pedigree 2.23, pedigree (1,1,5,1,1)
  (same comment as for Fluoride)
- Nickel, ion [water, ground-, long-term]: 0.00014317 kg; lognormal variance with pedigree 1.08, pedigree (1,1,5,1,1)
  (same comment as for COD, Chemical Oxygen Demand)
- Boron [water, surface water]: 1.4312e-6 kg; lognormal variance with pedigree 1.32, pedigree (1,1,5,1,1)
  (same comment as for Fluoride)
- COD, Chemical Oxygen Demand [water, surface water]: 0.00022812 kg; lognormal variance with pedigree 0.82, pedigree (1,1,5,1,1)
  (same comment as for Fluoride)
- BOD5, Biological Oxygen Demand [water, surface water]: 7.4617e-5 kg; lognormal variance with pedigree 0.82, pedigree (1,1,5,1,1)
  (same comment as for Fluoride)
- Aluminium [water, ground-, long-term]: 0.024112 kg; lognormal variance with pedigree 0.55, pedigree (1,1,5,1,1)
  (same comment as for COD, Chemical Oxygen Demand)
- Antimony [water, ground-, long-term]: 0.00065864 kg; lognormal variance with pedigree 0.7, pedigree (1,1,5,1,1)
  (same comment as for COD, Chemical Oxygen Demand)
- Calcium, ion [water, ground-, long-term]: 0.0079846 kg; lognormal variance with pedigree 1.62, pedigree (1,1,5,1,1)
  (same comment as for COD, Chemical Oxygen Demand)
- Selenium [water, surface water]: 5.4708e-6 kg; lognormal variance with pedigree 1.28, pedigree (1,1,5,1,1)
  (same comment as for Fluoride)
- Potassium, ion [water, surface water]: 0.013972 kg; lognormal variance with pedigree 0.27, pedigree (1,1,5,1,1)
  (same comment as for Fluoride)
- Potassium, ion [water, ground-, long-term]: 0.035594 kg; lognormal variance with pedigree 0.23, pedigree (1,1,5,1,1)
  (same comment as for COD, Chemical Oxygen Demand)
- Arsenic, ion [water, ground-, long-term]: 2.0658e-14 kg; lognormal variance with pedigree 1.24, pedigree (1,1,5,1,1)
  (same comment as for COD, Chemical Oxygen Demand)
- Bromine [water, surface water]: 0.00071077 kg; lognormal variance with pedigree 0.71, pedigree (1,1,5,1,1)
  (same comment as for Fluoride)
- Silicon [water, surface water]: 0.00020359 kg; lognormal variance with pedigree 0.72, pedigree (1,1,5,1,1)
  (same comment as for Fluoride)
- Arsenic, ion [water, surface water]: 2.0658e-5 kg; lognormal variance with pedigree 1.21, pedigree (1,1,5,1,1)
  (same comment as for Fluoride)
- Iodide [water, surface water]: 1.7273e-8 kg; lognormal variance with pedigree 1.96, pedigree (1,1,5,1,1)
  (same comment as for Fluoride)
- Cadmium, ion [water, surface water]: 9.5986e-9 kg; lognormal variance with pedigree 1.96, pedigree (1,1,5,1,1)
  (same comment as for Fluoride)
- BOD5, Biological Oxygen Demand [water, ground-, long-term]: 0.044696 kg; lognormal variance with pedigree 0.22, pedigree (1,1,5,1,1)
  (same comment as for COD, Chemical Oxygen Demand)
- DOC, Dissolved Organic Carbon [water, surface water]: 9.0268e-5 kg; lognormal variance with pedigree 0.82, pedigree (1,1,5,1,1)
  (same comment as for Fluoride)
- Barium [water, surface water]: 4.0878e-9 kg; lognormal variance with pedigree 2.07, pedigree (1,1,5,1,1)
  (same comment as for Fluoride)
- Vanadium, ion [water, ground-, long-term]: 5.7217e-5 kg; lognormal variance with pedigree 1.06, pedigree (1,1,5,1,1)
  (same comment as for COD, Chemical Oxygen Demand)
- Chromium VI [water, surface water]: 0.00013278 kg; lognormal variance with pedigree 0.76, pedigree (1,1,5,1,1)
  (same comment as for Fluoride)
- Nickel, ion [water, surface water]: 2.3901e-7 kg; lognormal variance with pedigree 1.54, pedigree (1,1,5,1,1)
  (same comment as for Fluoride)
- Aluminium [water, surface water]: 4.0254e-5 kg; lognormal variance with pedigree 0.92, pedigree (1,1,5,1,1)
  (same comment as for Fluoride)
- Chromium VI [water, ground-, long-term]: 0.00041943 kg; lognormal variance with pedigree 0.6, pedigree (1,1,5,1,1)
  (same comment as for COD, Chemical Oxygen Demand)
- Cobalt [water, ground-, long-term]: 2.5337e-6 kg; lognormal variance with pedigree 2.04, pedigree (1,1,5,1,1)
  (same comment as for COD, Chemical Oxygen Demand)
- Sulfate [water, ground-, long-term]: 0.076767 kg; lognormal variance with pedigree 0.29, pedigree (1,1,5,1,1)
  (same comment as for COD, Chemical Oxygen Demand)
- Antimony [water, surface water]: 0.00035881 kg; lognormal variance with pedigree 0.72, pedigree (1,1,5,1,1)
  (same comment as for Fluoride)
- Bromine [water, ground-, long-term]: 0.00017404 kg; lognormal variance with pedigree 0.73, pedigree (1,1,5,1,1)
  (same comment as for COD, Chemical Oxygen Demand)
- Sulfate [water, surface water]: 0.009226 kg; lognormal variance with pedigree 0.4, pedigree (1,1,5,1,1)
  (same comment as for Fluoride)
- Molybdenum [water, surface water]: 1.8723e-5 kg; lognormal variance with pedigree 1.22, pedigree (1,1,5,1,1)
  (same comment as for Fluoride)
- DOC, Dissolved Organic Carbon [water, ground-, long-term]: 0.05407 kg; lognormal variance with pedigree 0.22, pedigree (1,1,5,1,1)
  (same comment as for COD, Chemical Oxygen Demand)
- Selenium [water, ground-, long-term]: 1.0042e-5 kg; lognormal variance with pedigree 1.26, pedigree (1,1,5,1,1)
  (same comment as for COD, Chemical Oxygen Demand)
- Manganese [water, surface water]: 3.6774e-8 kg; lognormal variance with pedigree 1.79, pedigree (1,1,5,1,1)
  (same comment as for Fluoride)
- Boron [water, ground-, long-term]: 0.00017961 kg; lognormal variance with pedigree 0.92, pedigree (1,1,5,1,1)
  (same comment as for COD, Chemical Oxygen Demand)
- Sodium, ion [water, ground-, long-term]: 0.016367 kg; lognormal variance with pedigree 0.3, pedigree (1,1,5,1,1)
  (same comment as for COD, Chemical Oxygen Demand)
- Fluoride [water, ground-, long-term]: 0.001286 kg; lognormal variance with pedigree 0.66, pedigree (1,1,5,1,1)
  (same comment as for COD, Chemical Oxygen Demand)
- Manganese [water, ground-, long-term]: 2.2028e-5 kg; lognormal variance with pedigree 6.32, pedigree (1,1,5,1,1)
  (same comment as for COD, Chemical Oxygen Demand)
- Mercury [water, ground-, long-term]: 4.0154e-6 kg; lognormal variance with pedigree 3.35, pedigree (1,1,5,1,1)
  (same comment as for COD, Chemical Oxygen Demand)
- Sodium, ion [water, surface water]: 0.0098318 kg; lognormal variance with pedigree 0.32, pedigree (1,1,5,1,1)
  (same comment as for Fluoride)
- Silicon [water, ground-, long-term]: 0.090324 kg; lognormal variance with pedigree 0.17, pedigree (1,1,5,1,1)
  (same comment as for COD, Chemical Oxygen Demand)
- Copper, ion [water, surface water]: 6.2239e-7 kg; lognormal variance with pedigree 1.43, pedigree (1,1,5,1,1)
  (same comment as for Fluoride)
- Barium [water, ground-, long-term]: 2.4486e-6 kg; lognormal variance with pedigree 6.61, pedigree (1,1,5,1,1)
  (same comment as for COD, Chemical Oxygen Demand)
- Tin, ion [water, surface water]: 6.5662e-8 kg; lognormal variance with pedigree 1.71, pedigree (1,1,5,1,1)
  (same comment as for Fluoride)
- Calcium, ion [water, surface water]: 1.333e-5 kg; lognormal variance with pedigree 1.07, pedigree (1,1,5,1,1)
  (same comment as for Fluoride)
- Lead [water, ground-, long-term]: 0.00010789 kg; lognormal variance with pedigree 7.24, pedigree (1,1,5,1,1)
  (same comment as for COD, Chemical Oxygen Demand)
- Lead [water, surface water]: 1.8012e-7 kg; lognormal variance with pedigree 1.6, pedigree (1,1,5,1,1)
  (same comment as for Fluoride)
- TOC, Total Organic Carbon [water, ground-, long-term]: 0.05407 kg; lognormal variance with pedigree 0.22, pedigree (1,1,5,1,1)
  (same comment as for COD, Chemical Oxygen Demand)
- Cadmium, ion [water, ground-, long-term]: 5.7496e-6 kg; lognormal variance with pedigree 6.95, pedigree (1,1,5,1,1)
  (same comment as for COD, Chemical Oxygen Demand)
- Cobalt [water, surface water]: 4.2298e-9 kg; lognormal variance with pedigree 2.07, pedigree (1,1,5,1,1)
  (same comment as for Fluoride)
- TOC, Total Organic Carbon [water, surface water]: 9.0268e-5 kg; lognormal variance with pedigree 0.82, pedigree (1,1,5,1,1)
  (same comment as for Fluoride)
- Magnesium [water, surface water]: 2.8314e-6 kg; lognormal variance with pedigree 1.23, pedigree (1,1,5,1,1)
  (same comment as for Fluoride)
- Zinc, ion [water, ground-, long-term]: 0.00088131 kg; lognormal variance with pedigree 5.04, pedigree (1,1,5,1,1)
  (same comment as for COD, Chemical Oxygen Demand)
- Magnesium [water, ground-, long-term]: 0.001696 kg; lognormal variance with pedigree 1.54, pedigree (1,1,5,1,1)
  (same comment as for COD, Chemical Oxygen Demand)
- Silver, ion [water, ground-, long-term]: 7.76e-7 kg; lognormal variance with pedigree 3.87, pedigree (1,1,5,1,1)
  (same comment as for COD, Chemical Oxygen Demand)
- Molybdenum [water, ground-, long-term]: 8.6355e-8 kg; lognormal variance with pedigree 1.25, pedigree (1,1,5,1,1)
  (same comment as for COD, Chemical Oxygen Demand)
- Phosphate [water, ground-, long-term]: 0.0053509 kg; lognormal variance with pedigree 1, pedigree (1,1,5,1,1)
  (same comment as for COD, Chemical Oxygen Demand)

## Sampling procedure
Landfill model based on observed leachate concentrations in literature. Extrapolated to 60'000 years heeding chemical characteristics. Initial waste composition from various literature sources.

## Extrapolations
This dataset has been extrapolated from year 2000 to the year of the calculation (2021). The uncertainty has been adjusted accordingly.

## Review by Niels Jungbluth 2009-02-15
passed.
