# methylchloride production

Dataset: EcoSpold 2, unit process
Geography: WEU
Time period: 1997-01-01 to 2021-12-31
Technology level: current
Classification: ISIC rev.4 ecoinvent: 2011:Manufacture of basic chemicals
Classification: EcoSpold01Categories: chemicals/organics
Synonyms: chloromethane; monochloromethane
Tags: ConvertedDataset
Scenario: Business-as-Usual
System model: Allocation, cut-off by classification
Share of production covered: 78 %
Generated by: Alex Primas
Published in: Althaus H.-J. 2007
Database: ecoinvent
isCopyrightProtected: true
accessRestrictedTo: 1

## General comment
The data source for this process is a system inventory from Boustead. Due to the cumulated form of this data only the ressources and emissions included in the data source were considered. No land occupation and land use is included in this dataset. Further it was not possible to implement an uncertainity assessment with this data.
[This dataset was already contained in the ecoinvent database version 2. It was not individually updated during the transfer to ecoinvent version 3. Life Cycle Impact Assessment results may still have changed, as they are affected by changes in the supply chain, i.e. in other datasets. This dataset was generated following the ecoinvent quality guidelines for version 2. It may have been subject to central changes described in the ecoinvent version 3 change report (http://www.ecoinvent.org/database/ecoinvent-version-3/reports-of-changes/), and the results of the central updates were reviewed extensively. The changes added e.g. consistent water flows and other information throughout the database. The documentation of this dataset can be found in the ecoinvent reports of version 2, which are still available via the ecoinvent website. The change report linked above covers all central changes that were made during the conversion process.]

## Included activities end
Raw materials, processing energy, emissions to air and water from process, energy services and transports, infrastructure only partly included, no infrastructure of main process included, no land use data included.

## Geography
Data from various plants within Europe.

## Technology
Data refers to actual technology used in the companies included. This leads in total to an average value including all important production routes for this chemical

## Time period
Time of literature publication. Measurements took place before this period.

## Parameters
- fraction, process water, to air: 0.205 dimensionless; name fraction_PW_to_air; lognormal variance with pedigree 0.092025, pedigree (4,4,3,2,4)
  Literature value (Statistics Canada, 2007 & Shaffer, K.H., 2008, Consumptive water use in the Great Lakes Basin, USGS) (Vionnet, S., Quantis Water Database - Technical Report, 2012).
- fraction, cooling water, recirculating system, to air: 0.771 dimensionless; name fraction_CW_R_to_air; lognormal variance with pedigree 0.0413, pedigree (2,3,1,3,1)
  Calculated based on literature value (Scown, C.D., 2011, Water Footprint of U.S. Transportation Fuels and supplying information of the article) (Vionnet, S., Quantis Water Database - Technical Report, 2012).
- fraction, cooling water, to air: 0.3875 dimensionless; name fraction_CW_to_air; = (0.5*fraction_CW_OT_to_air)+(0.5*fraction_CW_R_to_air); lognormal variance with pedigree 0.092025, pedigree (4,4,3,2,4)
  Calculated value based on literature value (see comments of the other parametres present in this dataset) and expert opinion. In the case when no industry/literature data are available about the type of cooling or directly fraction, cooling water, to air specific for the process a default assumption is applied. It is assumed that the once-through cooling system is used in 50% of all cases and recirculating system is used in another 50% of all cases.
- fraction, cooling water, cooling pond system, to air: 0.032 dimensionless; name fraction_CW_CP_to_air; lognormal variance with pedigree 0.0413, pedigree (2,3,1,3,1)
  (same comment as for fraction, cooling water, recirculating system, to air)
- fraction, cooling water, once-through system, to air: 0.004 dimensionless; name fraction_CW_OT_to_air; lognormal variance with pedigree 0.0413, pedigree (2,3,1,3,1)
  (same comment as for fraction, cooling water, recirculating system, to air)

## Reference product
- methylchloride: 1 kg; By-product classification allocatable product; CPC 34110: Hydrocarbons and their halogenated, sulphonated, nitrated or nitrosated derivatives; CAS 74-87-3
  EcoSpold01Location=WEU
  production volume 0.582248 kg
    This is a placeholder value that does not reflect real-world production volumes. This dataset does not currently require a real-world production volume to work in the database framework, and no actual data were collected yet. This has no negative effect on the results of the ecoinvent database. The placeholder value of this activity was scaled according to the nominal GDP of 2005 (source: United Nations, http://data.un.org/Glossary.aspx?q=GDP+%28current+US%24%29, accessed 20130726) to reflect an appropriate share of the global production volume, which is also a placeholder value.
  property heating value, net 14.41 MJ
    LHV is calculated based on the elemental composition of the substance. Based on the CAS number of the substance (000074-87-3), the chemical formula of the substance is found to be: CH3Cl, (PubChem 2020).
    Reference: Kim, S., Chen, J., Cheng, T., Gindulyte, A., He, J., He, S., Li, Q., Shoemaker, B. A., Thiessen, P. A., Yu, B., Zaslavsky, L., Zhang, J., & Bolton, E. E. (2019). PubChem 2019 update: improved access to chemical data. Nucleic acids research, 47(D1), D1102–D1109. https://doi.org/10.1093/nar/gky1033
  property carbon content 0.24
    carbon content on a dry matter basis (reserved; not for manual entry)
  properties: price 1.12 EUR2005, water content 0, water in wet mass 0 kg, dry mass 1 kg, wet mass 1 kg, carbon content, non-fossil 0, carbon content, fossil 0.24, carbon allocation 0.24 kg

## Inputs from technosphere
- decommissioned chemical production facilities: -1.1e-5 kg; lognormal variance with pedigree 0.04, pedigree (1,1,5,1,1)
  EcoSpold01Location=RER
  production volume 1.1e-5 kg
    Calculated from the production volume of methylchloride in proportion to the respective output amounts.
  properties: carbon content, fossil 0.0169382, wet mass 1 kg, carbon content, non-fossil 5.78006e-6, dry mass 1 kg
  note on carbon content, fossil: Calculated from C content in input materials in the infrastructure
- municipal solid waste: 0 kg; pedigree (1,1,1,1,1)
  EcoSpold01Location=CH
  production volume 0 kg
    (same comment as for decommissioned chemical production facilities)
  properties: dry mass 0.771 kg, heating value, net 11.74 MJ, water content 0.297017, carbon content, fossil 0.171549, wet mass 1 kg, carbon content, non-fossil 0.261655
  note on heating value, net: Value taken from the general comment of the treatment dataset.
  note on carbon content, fossil: MSW composition in tab 4.1, ecoinvent v2.2 report 13_I. C content referred to 1 kg DM
- waste wood, untreated: 0 kg; pedigree (1,1,1,1,1)
  EcoSpold01Location=CH
  production volume 0 kg
    (same comment as for decommissioned chemical production facilities)
  properties: heating value, net 13.99 MJ, water content 0.25, wet mass 1 kg, dry mass 0.8 kg, carbon content, non-fossil 0.48632
  note on carbon content, non-fossil: Tab A.4, ecoinvent v2.2 report 13_I. C content has been referred to 1 kg DM,
- waste plastic, mixture: 0 kg; pedigree (1,1,1,1,1)
  EcoSpold01Location=CH
  production volume 0 kg
    (same comment as for decommissioned chemical production facilities)
  properties: carbon content, fossil 0.747344, water content 0.180638, wet mass 1 kg, dry mass 0.847 kg, heating value, net 30.79 MJ
  note on carbon content, fossil: C content in 1 kg DM was calculated using data in Tab A.2, ecoinvent v2.2 report 13_I
- average incineration residue: -0.0201 kg; lognormal variance with pedigree 0.04, pedigree (1,1,5,1,1)
  EcoSpold01Location=CH
  production volume 0.0201 kg
    (same comment as for decommissioned chemical production facilities)
  properties: carbon content, fossil 0.0325466, dry mass 1 kg, carbon content, non-fossil 0.0511208, wet mass 1 kg
  note on carbon content, fossil: Tab A.1, ecoinvent v2.2 report 13_I. It is considered that 61.1% of the C has a biogenic origin
- hazardous waste, for incineration: -0.0008 kg; lognormal variance with pedigree 0.04, pedigree (1,1,5,1,1)
  EcoSpold01Location=CH
  production volume 0.0008 kg
    (same comment as for decommissioned chemical production facilities)
  properties: dry mass 0.75 kg, carbon content, fossil 0.554667, wet mass 1 kg, heating value, net 17 MJ, water content 0.333333
  note on carbon content, fossil: Tab A.6, ecoinvent v2.2 report 13_I. C content has been calculated after data in the tables, and then referred to 1 kg DM
- spoil from hard coal mining: -0.071 kg; lognormal variance with pedigree 0.04, pedigree (1,1,5,1,1)
  EcoSpold01Location=GLO
  production volume 0.071 kg
    (same comment as for decommissioned chemical production facilities)
  properties: carbon content, fossil 0.007879, dry mass 1 kg, wet mass 1 kg
  note on carbon content, fossil: Composition of coal spoil is adopted by proxy from lignite spoil (pg 19, Doka G. (2009) Life Cycle Inventory of the disposal of lignite spoil, coal spoil and coal tailings. Doka Life Cycle Assessments, Zurich. Commissioned by the Swiss Centre for Life Cycle Inventories ecoinvent Centre)
- municipal solid waste: -6.94636e-5, -0.000557853, -0.000670871, -5.96875e-6, -7.51157e-5, -8.89307e-5, -0.000136298 kg (7 entries); lognormal variance with pedigree 0.04, pedigree (1,1,5,1,1)
  EcoSpold01Location=CH
  production volume 0.0016045 kg
- waste wood, untreated: -2.12184e-8, -2.16494e-7, -1.70785e-7, -2.40116e-9, -1.97788e-8, -2.01556e-8, -4.91667e-8 kg (7 entries); lognormal variance with pedigree 0.04, pedigree (1,1,5,1,1)
  EcoSpold01Location=CH
  production volume 5e-7 kg
- waste plastic, mixture: -1.91634e-8, -2.42332e-7, -1.26539e-7, -2.74308e-9, -8.12886e-9, -2.44515e-8, -7.66422e-8 kg (7 entries); lognormal variance with pedigree 0.04, pedigree (1,1,5,1,1)
  EcoSpold01Location=CH
  production volume 5e-7 kg

## Inputs from nature
- Oil, crude, in ground [natural resource, in ground]: 0.077 kg; lognormal variance with pedigree 0.04, pedigree (1,1,5,1,1)
- Wood, unspecified, standing [natural resource, biotic]: 6.08e-9 m3; lognormal variance with pedigree 0.04, pedigree (1,1,5,1,1)
- Sulfur, in ground [natural resource, in ground]: 0.0042 kg; lognormal variance with pedigree 0.04, pedigree (1,1,5,1,1)
- Uranium, in ground [natural resource, in ground]: 1.03e-5 kg; lognormal variance with pedigree 0.04, pedigree (1,1,5,1,1)
- Lead, in ground [natural resource, in ground]: 1e-6 kg; lognormal variance with pedigree 0.04, pedigree (1,1,5,1,1)
  5.0% Pb in sulfide; 3.0% Pb in ore
- Energy, potential (in hydropower reservoir), converted [natural resource, in water]: 0.18 MJ
- Iron, in ground [natural resource, in ground]: 0.00021 kg; lognormal variance with pedigree 0.04, pedigree (1,1,5,1,1)
  46% Fe in siderite; 25% Fe in ore
- Sand, unspecified, in ground [natural resource, in ground]: 0.00033 kg; lognormal variance with pedigree 0.04, pedigree (1,1,5,1,1)
- Fluorspar, in ground [natural resource, in ground]: 2e-6 kg; lognormal variance with pedigree 0.04, pedigree (1,1,5,1,1)
  92% CaF2 in ore
- Aluminium, in ground [natural resource, in ground]: 1.48e-5 kg; lognormal variance with pedigree 0.04, pedigree (1,1,5,1,1)
  24% Al in bauxite; 11% Al in ore
- Water, unspecified natural origin [natural resource, in water]: 0.00391 m3; name water_UNO_input; lognormal variance with pedigree 0.04, pedigree (1,1,5,1,1)
- Water, well, in ground [natural resource, in water]: 0.00019 m3; name water_well_in_ground_input; lognormal variance with pedigree 0.04, pedigree (1,1,5,1,1)
- Coal, brown, in ground [natural resource, in ground]: 0.048 kg; lognormal variance with pedigree 0.04, pedigree (1,1,5,1,1)
- Water, cooling, unspecified natural origin [natural resource, in water]: 0.02 m3; name water_cooling_UNO_input; lognormal variance with pedigree 0.04, pedigree (1,1,5,1,1)
- Gas, natural, in ground [natural resource, in ground]: 0.838 m3; lognormal variance with pedigree 0.04, pedigree (1,1,5,1,1)
- Sodium chloride, in ground [natural resource, in ground]: 0.99 kg; lognormal variance with pedigree 0.04, pedigree (1,1,5,1,1)
- Water, river [natural resource, in water]: 3.9e-6 m3; name water_river_input; lognormal variance with pedigree 0.04, pedigree (1,1,5,1,1)
- Water, salt, ocean [natural resource, in water]: 2.3e-7 m3; name water_salt_ocean_input; lognormal variance with pedigree 0.04, pedigree (1,1,5,1,1)
- Calcite, in ground [natural resource, in ground]: 0.055 kg; lognormal variance with pedigree 0.04, pedigree (1,1,5,1,1)
- Olivine, in ground [natural resource, in ground]: 2e-6 kg; lognormal variance with pedigree 0.04, pedigree (1,1,5,1,1)
- Dolomite, in ground [natural resource, in ground]: 3e-6 kg; lognormal variance with pedigree 0.04, pedigree (1,1,5,1,1)
- Barium, in ground [natural resource, in ground]: 6.5e-5 kg; lognormal variance with pedigree 0.04, pedigree (1,1,5,1,1)
  15% BaSO4 in ore
- Coal, hard, unspecified, in ground [natural resource, in ground]: 0.27 kg; lognormal variance with pedigree 0.04, pedigree (1,1,5,1,1)

## Emissions to nature
- Chloride [water, surface water]: 0.19 kg; lognormal variance with pedigree 0.04, pedigree (1,1,5,1,1)
- Particulates, > 2.5 um, and < 10um [air, urban air close to ground]: 0.00215 kg; lognormal variance with pedigree 0.04, pedigree (1,1,5,1,1)
- Nitrogen [water, surface water]: 1e-6 kg; lognormal variance with pedigree 0.04, pedigree (1,1,5,1,1)
- Ethene, chloro- [water, surface water]: 5e-7 kg; lognormal variance with pedigree 0.04, pedigree (1,1,5,1,1)
- Carbon dioxide, fossil [air, urban air close to ground]: 2.4 kg; lognormal variance with pedigree 0.04, pedigree (1,1,5,1,1)
- Calcium, ion [water, surface water]: 0.016 kg; lognormal variance with pedigree 0.04, pedigree (1,1,5,1,1)
- Sulfate [water, surface water]: 0.0014 kg; lognormal variance with pedigree 0.04, pedigree (1,1,5,1,1)
- Fluoride [water, surface water]: 5e-7 kg; lognormal variance with pedigree 0.04, pedigree (1,1,5,1,1)
- Methane, fossil [air, urban air close to ground]: 0.02 kg; lognormal variance with pedigree 0.04, pedigree (1,1,5,1,1)
- Sulfide [water, surface water]: 1.8e-5 kg; lognormal variance with pedigree 0.04, pedigree (1,1,5,1,1)
- Aldehydes, unspecified [air, urban air close to ground]: 5e-7 kg; lognormal variance with pedigree 0.04, pedigree (1,1,5,1,1)
- TOC, Total Organic Carbon [water, surface water]: 2.2e-5 kg; lognormal variance with pedigree 0.04, pedigree (1,1,5,1,1)
- Particulates, < 2.5 um [air, urban air close to ground]: 0.00125 kg; lognormal variance with pedigree 0.04, pedigree (1,1,5,1,1)
- Copper, ion [water, surface water]: 5e-7 kg; lognormal variance with pedigree 0.04, pedigree (1,1,5,1,1)
- Hydrogen chloride [air, urban air close to ground]: 0.00022 kg; lognormal variance with pedigree 0.04, pedigree (1,1,5,1,1)
- Nitrate [water, surface water]: 5e-7 kg; lognormal variance with pedigree 0.04, pedigree (1,1,5,1,1)
- Hydrogen sulfide [air, urban air close to ground]: 5e-7 kg; lognormal variance with pedigree 0.04, pedigree (1,1,5,1,1)
- Acidity, unspecified [water, surface water]: 3.3e-5 kg; lognormal variance with pedigree 0.04, pedigree (1,1,5,1,1)
- Ethene, chloro- [air, urban air close to ground]: 6e-6 kg; lognormal variance with pedigree 0.04, pedigree (1,1,5,1,1)
- Suspended solids, unspecified [water, surface water]: 0.00052 kg; lognormal variance with pedigree 0.04, pedigree (1,1,5,1,1)
- Ammonium, ion [water, surface water]: 1e-6 kg; lognormal variance with pedigree 0.04, pedigree (1,1,5,1,1)
- NMVOC, non-methane volatile organic compounds, unspecified origin [air, urban air close to ground]: 0.00173 kg; lognormal variance with pedigree 0.04, pedigree (1,1,5,1,1)
- BOD5, Biological Oxygen Demand [water, surface water]: 1.3e-5 kg; lognormal variance with pedigree 0.04, pedigree (1,1,5,1,1)
- Hydrocarbons, aromatic [air, urban air close to ground]: 5e-7 kg; lognormal variance with pedigree 0.04, pedigree (1,1,5,1,1)
- Carbonate [water, surface water]: 2e-6 kg; lognormal variance with pedigree 0.04, pedigree (1,1,5,1,1)
- Chlorine [air, urban air close to ground]: 5e-7 kg; lognormal variance with pedigree 0.04, pedigree (1,1,5,1,1)
- AOX, Adsorbable Organic Halogen as Cl [water, surface water]: 5e-7 kg; lognormal variance with pedigree 0.04, pedigree (1,1,5,1,1)
- Particulates, > 10 um [air, urban air close to ground]: 0.0016 kg; lognormal variance with pedigree 0.04, pedigree (1,1,5,1,1)
- Mercury [air, urban air close to ground]: 5e-7 kg; lognormal variance with pedigree 0.04, pedigree (1,1,5,1,1)
- Dinitrogen monoxide [air, urban air close to ground]: 5e-7 kg; lognormal variance with pedigree 0.04, pedigree (1,1,5,1,1)
- COD, Chemical Oxygen Demand [water, surface water]: 0.00019 kg; lognormal variance with pedigree 0.04, pedigree (1,1,5,1,1)
- Potassium, ion [water, surface water]: 5e-7 kg; lognormal variance with pedigree 0.04, pedigree (1,1,5,1,1)
- Nickel, ion [water, surface water]: 5e-7 kg; lognormal variance with pedigree 0.04, pedigree (1,1,5,1,1)
- Phosphorus [water, surface water]: 8.8e-7 kg; lognormal variance with pedigree 0.04, pedigree (1,1,5,1,1)
- Chlorinated solvents, unspecified [water, surface water]: 3e-5 kg; lognormal variance with pedigree 0.04, pedigree (1,1,5,1,1)
- Bromate [water, surface water]: 5e-7 kg; lognormal variance with pedigree 0.04, pedigree (1,1,5,1,1)
- Iron, ion [water, surface water]: 3.8e-5 kg; lognormal variance with pedigree 0.04, pedigree (1,1,5,1,1)
- Methane, dichlorodifluoro-, CFC-12 [air, urban air close to ground]: 1.2e-5 kg; lognormal variance with pedigree 0.04, pedigree (1,1,5,1,1)
- Aluminium [water, surface water]: 5e-7 kg; lognormal variance with pedigree 0.04, pedigree (1,1,5,1,1)
- Ethane, 1,2-dichloro- [water, surface water]: 5e-7 kg; lognormal variance with pedigree 0.04, pedigree (1,1,5,1,1)
- Chlorate [water, surface water]: 5e-7 kg; lognormal variance with pedigree 0.04, pedigree (1,1,5,1,1)
- Ammonia [air, urban air close to ground]: 5e-7 kg; lognormal variance with pedigree 0.04, pedigree (1,1,5,1,1)
- Ethane, 1,2-dichloro- [air, urban air close to ground]: 6e-6 kg; lognormal variance with pedigree 0.04, pedigree (1,1,5,1,1)
- Phenol [water, surface water]: 5e-7 kg; lognormal variance with pedigree 0.04, pedigree (1,1,5,1,1)
- Water [air, unspecified]: 0.00859135 m3; name water_to_air_unspecified; = (water_cooling_UNO_input*fraction_CW_to_air)+(water_river_input*fraction_PW_to_air)+(water_salt_ocean_input*fraction_PW_to_air)+(water_UNO_input*fraction_PW_to_air)+(water_well_in_ground_input*fraction_PW_to_air); lognormal variance with pedigree 0.0807, pedigree (2,2,5,1,1)
  Calculated value based on literature values and expert opinion. See comments in the parametres' comment field.
  property fraction, origin: unspecified 0.995368; name fraction_origin_unspecified
  property fraction, origin: fresh water 0.00462669; name fraction_origin_fresh_water
  property fraction, origin: salt water 5.48808e-6; name fraction_origin_salt_water
- Fluorine [air, urban air close to ground]: 5e-7 kg; lognormal variance with pedigree 0.04, pedigree (1,1,5,1,1)
- Water [water, unspecified]: 0.0155128 m3; name water_to_water_unspecified; = water_cooling_UNO_input*(1-fraction_CW_to_air)+water_river_input*(1-fraction_PW_to_air)+water_salt_ocean_input*(1-fraction_PW_to_air)+water_UNO_input*(1-fraction_PW_to_air)+water_well_in_ground_input*(1-fraction_PW_to_air); lognormal variance with pedigree 0.0807, pedigree (2,2,5,1,1)
  (same comment as for Water)
  property wet mass 1000 kg; name WM
  property carbon content, fossil 0; name C_content_fossil
  property water in wet mass 1000 kg; name WWM
  property dry mass 0 kg; name DM
  property fraction, origin: fresh water 0.009937; name fraction_origin_fresh_water_Ww
  property fraction, origin: unspecified 0.990051; name fraction_origin_unspecified_Ww
  property fraction, origin: salt water 1.17871e-5; name fraction_origin_salt_water_Ww
  property carbon content, non-fossil 0; name C_content_non_fossil
- Magnesium [water, surface water]: 6e-6 kg; lognormal variance with pedigree 0.04, pedigree (1,1,5,1,1)
- Hydrogen [air, urban air close to ground]: 0.0022 kg; lognormal variance with pedigree 0.04, pedigree (1,1,5,1,1)
- Carbon monoxide, fossil [air, urban air close to ground]: 0.0012 kg; lognormal variance with pedigree 0.04, pedigree (1,1,5,1,1)
- Hydrocarbons, unspecified [water, surface water]: 8.85e-5 kg; lognormal variance with pedigree 0.04, pedigree (1,1,5,1,1)
- Cyanide [water, surface water]: 5e-7 kg; lognormal variance with pedigree 0.04, pedigree (1,1,5,1,1)
- Lead [air, urban air close to ground]: 5e-7 kg; lognormal variance with pedigree 0.04, pedigree (1,1,5,1,1)
- Chlorine [water, surface water]: 5e-7 kg; lognormal variance with pedigree 0.04, pedigree (1,1,5,1,1)
- Oils, unspecified [water, surface water]: 5e-7 kg; lognormal variance with pedigree 0.04, pedigree (1,1,5,1,1)
- Dissolved solids [water, surface water]: 2.8e-5 kg; lognormal variance with pedigree 0.04, pedigree (1,1,5,1,1)
- Sulfate [air, urban air close to ground]: 4.9e-6 kg; lognormal variance with pedigree 0.04, pedigree (1,1,5,1,1)
- Hydrogen fluoride [air, urban air close to ground]: 7e-6 kg; lognormal variance with pedigree 0.04, pedigree (1,1,5,1,1)
- Nitrogen oxides [air, urban air close to ground]: 0.013 kg; lognormal variance with pedigree 0.04, pedigree (1,1,5,1,1)
- Sodium, ion [water, surface water]: 0.1 kg; lognormal variance with pedigree 0.04, pedigree (1,1,5,1,1)
- Mercury [water, surface water]: 5e-7 kg; lognormal variance with pedigree 0.04, pedigree (1,1,5,1,1)
- DOC, Dissolved Organic Carbon [water, surface water]: 2.2e-5 kg; lognormal variance with pedigree 0.04, pedigree (1,1,5,1,1)
  Calculated as equal to TOC.
- Zinc, ion [water, surface water]: 5e-7 kg; lognormal variance with pedigree 0.04, pedigree (1,1,5,1,1)
- Hydrocarbons, chlorinated [air, urban air close to ground]: 0.00078 kg; lognormal variance with pedigree 0.04, pedigree (1,1,5,1,1)
- Sulfur dioxide [air, urban air close to ground]: 0.012 kg; lognormal variance with pedigree 0.04, pedigree (1,1,5,1,1)

## Sampling procedure
Data represent a large share of the European production. Due to the cummulated data source for the product system invetory there are important parameters as land use or soil emissions missing in this dataset. Considered are only emissions stated in the original source of Boustead.

## Extrapolations
This dataset has been extrapolated from year 1997 to the year of the calculation (2021). The uncertainty has been adjusted accordingly.

## Review by Roland Hischier 2010-04-06
passed.
