# battery module packaging production, Li-ion

Dataset: EcoSpold 2, unit process
Geography: RoW
Time period: 2018-01-01 to 2021-12-31
Technology level: current
Classification: ISIC rev.4 ecoinvent: 2720:Manufacture of batteries and accumulators
Scenario: Business-as-Usual
System model: Allocation, cut-off by classification
Generated by: Eleonora Crenna
Published in: Dai, Q. 2019
Database: ecoinvent
isCopyrightProtected: true
accessRestrictedTo: 1

## General comment
This dataset represents 1 kg of Li-ion battery module packaging, including the external enclosure, internal spacers, terminals and electronic components. Li-ion cells are not included in this dataset. This dataset is a copy of the corresponding regional dataset. Production volume was adjusted.
- Source: Dai, Q., Kelly, J. C., Gaines, L., & Wang, M. (2019). Life cycle analysis of lithium-ion batteries for automotive applications. Batteries, 5(2), 48.

## Included activities start
The activity starts with the material entering the system.

## Included activities end
The activity ends with the production of the Li-ion battery module packaging.

## Geography
This dataset is considered representative of the global situation. It is based on data from the geography China, which is the leader in Li-ion battery components production.

## Technology
The module is based on an aluminium casing sealed by double seaming, a process that is common in the container industry, in order to provide an additional barrier to the loss of electrolyte solvent from the cells and the entrance of water vapor. The cells are placed in the module and the terminals of adjacent cells are connected either mechanically or by laser welding. The top and bottom of the module is left open to allow air to flow between the cells to cool them.
Reference:
Nelson, P. A., Gallagher, K. G., Bloom, I. D., & Dees, D. W. (2012). Modeling the performance and cost of lithium-ion batteries for electric-drive vehicles (No. ANL-12/55). Argonne National Lab.(ANL), Argonne, IL (United States).

## Time period
The time period is from 2018 (year of the publication of data) and 2020 (year of the dataset)

## Reference product
- battery module packaging, Li-ion: 1 kg; name RefProd; CPC 88752: Battery and accumulator manufacturing services; By-product classification allocatable product
  production volume 1.79e7 kg
    Approximation. UN Comtrade (comtrade.un.org/data/) reports 1317479226 kg Li-ion batteries traded worldwide. Module packaging represents approximately 5% in weight of a Li-ion battery.
  property carbon content, fossil 0.061671; name RefProd_C_content_fossil
    fossil carbon content on a dry matter basis
  property dry mass 1 kg; name RefProd_DM
  property wet mass 1 kg; name RefProd_WM
  property carbon content, non-fossil 0.0005633; name RefProd_C_content_non_fossil
    biogene carbon content on a dry matter basis
  property water in wet mass 0 kg; name RefProd_WWM
  property water content 0; name RefProd_water_content
  property price 6.45845 EUR2005; name RefProd_price_EUR2005
    Calculated based on inputs: The price of the product has been calculated as a sum of the values of the material and energy inputs for this product. This value is therefore a rough estimation. It may underestimate the real price since there are additional expenses when producing any product. These expences can include for example labour costs, treatment of waste materials and profit for the producer. Please consider carefully whether this level of data quality is acceptable for your application.
  property carbon content 0.0622343
    carbon content on a dry matter basis (reserved; not for manual entry)
  properties: carbon allocation 0.0622343 kg

## Inputs from technosphere
- aluminium, wrought alloy: 0.796909 kg; = alu_enclosure + alu_plate; lognormal variance with pedigree 0.0068, pedigree (3,4,2,5,1)
  Calculated Value. Aluminium for module enclosure (0.36 kg) and heat conductor plate (0.44 kg)
  properties: dry mass 1 kg, wet mass 1 kg
- sheet rolling, aluminium: 0.437086 kg; name alu_plate; lognormal variance with pedigree 0.0068, pedigree (3,4,2,5,1)
  Proxy for the production of heat conductor plate from aluminium wrought alloy
- electronic component, passive, unspecified: 0.12362 kg; lognormal variance with pedigree 0.0068, pedigree (3,4,2,5,1)
  Literature. Electronic components inside the module performs cell monitoring for malfunctions and for state-of-charge.
  properties: carbon content, non-fossil 0.0045566, wet mass 1 kg, carbon content, fossil 0.317311, dry mass 1 kg
- glass fibre reinforced plastic, polyamide, injection moulded: 0.0121413 kg; lognormal variance with pedigree 0.0068, pedigree (3,4,2,5,1)
  Literature. Module terminal are made of a plastic insulation layer (20%) and copper (80%)
  properties: wet mass 1 kg, carbon content, fossil 0.446018, dry mass 1 kg
- metal working factory: 4.58e-10 unit; lognormal variance with pedigree 0.0606, pedigree (5,5,3,5,3)
  Literature value.The module packaging is assumed to be produced in a metal working factory, Default amount for metal working factory (Steiner, 2007).
  Reference:
  Steiner, R., Frischknecht R. (2007) Metals Processing and Compressed Air Supply. ecoinvent report No. 23. Swiss Centre for Life Cycle Inventories, Dübendorf, 2007
- extrusion, plastic film: 0.0198675 kg; = polyethylene; lognormal variance with pedigree 0.0068, pedigree (3,4,2,5,1)
  Proxy for the production of spacer for gas release from polyethylene granulate
- sheet rolling, copper: 0.0474614 kg; = copper; lognormal variance with pedigree 0.0068, pedigree (3,4,2,5,1)
  Proxy for the production of the copper component of module terminals, which are made of a plastic insulation layer (20%) and copper (80%).
- copper, anode: 0.0474614 kg; name copper; lognormal variance with pedigree 0.0114, pedigree (4,3,2,5,1)
  Literature. Copper contained in module terminals, which are made of a plastic insulation layer (20%) and copper (80%).
  properties: wet mass 1 kg, dry mass 1 kg, copper content 0.997
- polyethylene, high density, granulate: 0.0198675 kg; name polyethylene; lognormal variance with pedigree 0.0068, pedigree (3,4,2,5,1)
  Literature. Spacer for gas release is made of polyethylene.
  properties: dry mass 1 kg, carbon content, fossil 0.857143, wet mass 1 kg, heating value, net 42.47 MJ
  note on carbon content, fossil: Polyethylene is formed out of a huge amount of ethylene monomers (C2H4) (ecoinvent v2.2 report 11_II). MW=28 g/mol
- impact extrusion of aluminium, 1 stroke: 0.359823 kg; name alu_enclosure; lognormal variance with pedigree 0.0068, pedigree (3,4,2,5,1)
  Proxy for the production of module enclosure from aluminium wrought alloy

## Sampling procedure
From literature.

## Extrapolations
The dataset is extrapolated from CN data; the uncertainty has been adjusted accordingly.
