# receiver system construction, solar tower power plant, 20 MW

Dataset: EcoSpold 2, unit process
Geography: ZA
Time period: 2010-01-01 to 2021-01-01
Technology level: current
Classification: ISIC rev.4 ecoinvent: 4220:Construction of utility projects
Tags: CSP; Concentrated Solar Power
Scenario: Business-as-Usual
System model: Allocation, cut-off by classification
Generated by: Karin Treyer
Published in: Telsnig, Thomas 2015
Database: ecoinvent
isCopyrightProtected: true
accessRestrictedTo: 1

## General comment
The activity represents the construction of the receiver tower for a concentrated solar tower plant in Upington, South Africa. The sunlight transferred from the heliostats strikes the top of the tower. It is here that temperatures rises up close to 1000°C. The present modelling of the receiver system includes pumps, which promote the cold salt melt to the receiver. The receiver component itself consists largely of a nickel-chromium alloy in order to be able to withstand the high temperatures during operation.
This dataset is entirely based on the detailed life cycle inventory as presented in the dissertation report by
Telsnig, Thomas. 2015. Standortabhängige Analyse und Bewertung solarthermischer Kraftwerke am Beispiel Südafrikas. Forschungsbericht. Band 123. ISSN 0938-1228. Institut für Energiewirtschaft und Rationelle Energieanwendung, Universität Stuttgart, Germany.

## Included activities start
The activity begins with the construction of the tower and its absorbers, pumps for using molten salts for heat transfer.
Total land use for the CSP plant is accounted for in the dataset concentrated solar power plant construction, solar tower, 20 MW".

## Included activities end
The activity concludes with the completion of operation of the receiver systems and is then sent disposal

## Geography
The CSP plant represented in this dataset has been modelled specifically for South African conditions (see Telsnig 2015).

## Technology
Cold Salt Pump (Extended shaft turbine, 4 stage, 6,000gpm, 1584 lb/sec, 1260 ft total developed head, 4500bhp motor variable speed drive

Heat Transport Fluid Pumps-Horizontal, multi-stage 17000 gpm, 715 ft tdh, 3500 bhp electric motor, Variable speed drive, CS impeller and bowl

Nitrate Salt Reciever: 910 MWt, external Cylinder, nickel alloy steel tubes and headers, 20m dia x 25m absorber height, 2 flow circuits, 12 passes per circuit, includes inlet and outlet vessels, piping, valves, insulation, heat tracing, installation and checkout
.

## Reference product
- receiver system, solar tower power plant, 20 MW: 1 unit; name RP_amount_1; By-product classification allocatable product; CPC 53262: Power plants; pedigree (1,1,1,1,1)
  Reference product unit for construction of receiver system in solar tower, 20 mega watt plant
  production volume 1 unit; name RP_PV_1
    Assumption
  property price 3.4e7 EUR2005; name RP_amount_1_price_EUR2005
    Telsnig 2015: Investment cost for the receiver system of a 20MW CSP solar tower plant in South Africa (EUR2010) with limited storage capacity (see Table 4-4 in Telsnig, 2015).
    Reference(s): Telsnig, Thomas. 2015. Standortabhängige Analyse und Bewertung solarthermischer Kraftwerke am Beispiel Südafrikas. Forschungsbericht. Band 123. ISSN 0938-1228. Institut für Energiewirtschaft und Rationelle Energieanwendung, Universität Stuttgart, Germany.
  property lifetime 30 year
    The economic lifetime of the plant is assumed to be 30 years.

## Inputs from technosphere
- welding, arc, steel: 3647 m; lognormal variance with pedigree 0.0197, pedigree (4,4,4,3,2)
  Part of the reinforced steel is used for welding through arc welding process
- waste reinforcement steel: -1.08602e6 kg; name BP_amount_6; = ((castiron+chromesteel+alloy+steel+lowsteel)*0.65)*-1
  All steel types are assumed to be treated as reinforcing steel due to lack of other appropriate datasets in ecoinvent.
  For the time period 2003-2012, average steel recycling rate in South Africa amounted to 35% fo the total steel mass according to Telsnig 2015. The remaining steel is assumed to be sent to final disposal.
  production volume 1.08602e6 kg; = RP_PV_1 * (BP_amount_6 / RP_amount_1)
    Calculated from production volume of reference product using the relative outputs.
  property price 0 EUR2005; name BP_amount_6_price_EUR2005
  properties: dry mass 1 kg, wet mass 1 kg
- waste reinforcement steel: -584779 kg; name BP_amount_5; = ((castiron+chromesteel+alloy+steel+lowsteel)*0.35)*-1
  (same comment as for waste reinforcement steel)
  production volume 584779 kg; = RP_PV_1 * (BP_amount_5 / RP_amount_1)
    Calculated from production volume of reference product using the relative outputs.
  property price 0 EUR2005; name BP_amount_5_price_EUR2005
- waste concrete: -6.15242e6 kg; name BP_amount_2; = ((concrete*2200)+expandedperilite)*-1; lognormal variance with pedigree 0.0197, pedigree (4,4,4,3,2)
  Disposal of concrete. The density is assumed to be 2200kg/m3.
  production volume 6.15242e6 kg; = RP_PV_1 * (BP_amount_2 / RP_amount_1)
    Calculated from production volume of reference product using the relative outputs.
  property price 0 EUR2005; name BP_amount_2_price_EUR2005
  properties: dry mass 0.5 kg, water content 1, wet mass 1 kg
- metal working, average for metal product manufacturing: 42548 kg; lognormal variance with pedigree 0.0197, pedigree (4,4,4,3,2)
  Part of the iron nickel chromium alloy is being used to set up the nitrate salt receiver.
- cast iron: 26540 kg; name castiron; lognormal variance with pedigree 0.0197, pedigree (4,4,4,3,2)
  Material component in pumps and valves
  properties: wet mass 1 kg, carbon content, fossil 0.04, dry mass 1 kg
  note on carbon content, fossil: Cast iron is made by remelting pig iron in small furnaces (e.g. cupola furnaces or electric arc furnaces) and poured into moulds to make castings. It usually contains 2% to 6% carbon (ecoinvent v2.2 report 10_partII). An average content of 4% was considered
- concrete, normal: 2528 m3; name concrete; lognormal variance with pedigree 0.0197, pedigree (4,4,4,3,2)
  Concrete used for tower foundation and to embed metals
  properties: wet mass 2380 kg, dry mass 2190 kg, water content 0.086758
- excavation, hydraulic digger: 1664 m3; lognormal variance with pedigree 0.0197, pedigree (4,4,4,3,2)
  Excavation and backfilling. The digger is a removable unit. All the soil dislocated for initial construction is put back. Hence no end of life calculation is needed.
- steel, low-alloyed: 5999 kg; name lowsteel; lognormal variance with pedigree 0.0197, pedigree (4,4,4,3,2)
  Material component in structural steel
  properties: carbon content, fossil 0.005, wet mass 1 kg, dry mass 1 kg
- copper, cathode: 427 kg; name copper; lognormal variance with pedigree 0.0197, pedigree (4,4,4,3,2)
  Copper supplied for field wiring purposes
  properties: dry mass 1 kg, wet mass 1 kg
- silicone product: 1148 kg; name silicone_product; lognormal variance with pedigree 0.0197, pedigree (4,4,4,3,2)
  Used in pumps for prevention of mositure entry
  properties: wet mass 1 kg, heating value, net 9.83 MJ, dry mass 1 kg, carbon content, fossil 0.324324
- drawing of pipe, steel: 876802 kg; lognormal variance with pedigree 0.0197, pedigree (4,4,4,3,2)
  Process done to draw pipes made of steel
- tap water: 13283 kg; name water; lognormal variance with pedigree 0.0197, pedigree (4,4,4,3,2)
  Used in the manufacturing process of pumps.
  properties: water content 2962.17, carbon content, fossil 0.00178991, wet mass 1 kg, dry mass 0.000337476 kg
  note on carbon content, fossil: Bicarbonate content is 2.93 mol/m3. CO2 content is 0.1 mol/m3 (ecoinvent v2.2 report 8, Tab 93.1).
- wire drawing, copper: 427 kg; lognormal variance with pedigree 0.0197, pedigree (4,4,4,3,2)
  Parts of the copper input are used to draw wires for field wiring, cables etc from available copper
- tin plated chromium steel sheet, 2 mm: 17 m2; lognormal variance with pedigree 0.0197, pedigree (4,4,4,3,2)
  Construction of deck plate as part of structural steel
  properties: wet mass 15.6365 kg, dry mass 15.6365 kg
- reinforcing steel: 1.36208e6 kg; name steel; lognormal variance with pedigree 0.0197, pedigree (4,4,4,3,2)
  Key material component used for drawing of pipes, structural steel etc
  properties: dry mass 1 kg, wet mass 1 kg, carbon content, fossil 0.004
- transformer, high voltage use: 1132 kg; lognormal variance with pedigree 0.0197, pedigree (4,4,4,3,2)
  Transformer setup including substations and primary power distribution sources.
  properties: wet mass 1 kg, dry mass 1 kg, carbon content, fossil 0.262798
- expanded perlite: 590821 kg; name expandedperilite; lognormal variance with pedigree 0.0197, pedigree (4,4,4,3,2)
  Insulation in pipes
  properties: dry mass 1 kg, wet mass 1 kg
- scrap copper: -427 kg; name BP_amount_3; = (copper)*-1; lognormal variance with pedigree 0.0197, pedigree (4,4,4,3,2)
  Copper disposed by municipal incineration
  production volume 427 kg; = RP_PV_1 * (BP_amount_3 / RP_amount_1)
    Calculated from production volume of reference product using the relative outputs.
  property price 0 EUR2005; name BP_amount_3_price_EUR2005
  properties: wet mass 1 kg, dry mass 1 kg
- steel, chromium steel 18/8, hot rolled: 2116 kg; name chromesteel; lognormal variance with pedigree 0.0197, pedigree (4,4,4,3,2)
  Material component in pumps
  properties: dry mass 1 kg, carbon content, fossil 0.0008, wet mass 1 kg
  note on carbon content, fossil: Stainless steel model is the grade 304 steel (18/8 stainless, 18% chromium 8% nickel; max. 0.08% C)
- particleboard, cement bonded: 145 m3; lognormal variance with pedigree 0.0197, pedigree (4,4,4,3,2)
  Used in pumps to prevent leakage
  properties: heating value, net 5765.37 MJ, wet mass 1200 kg, water content 0.0197355, dry mass 1176.78 kg, carbon content, non-fossil 0.139276, carbon content, fossil 0.0240148
- iron-nickel-chromium alloy: 274057 kg; name alloy; lognormal variance with pedigree 0.0197, pedigree (4,4,4,3,2)
  Main component for construction of the tower including all electrical applications
  properties: dry mass 1 kg, wet mass 1 kg
- wastewater, unpolluted: -13.283 m3; name BP_amount_1; = (water/1000)*-1; lognormal variance with pedigree 0.0197, pedigree (4,4,4,3,2)
  The amount of tap water input stems from the water consumption reported in the EPDs of the modelled pumps (Sulzer EPDs). It is stated in the EPDs that the water is used for testing purposes. Therefore, it is assumed to be discharged to the sewer system without pollution. Sulzer EPDs: https://www.sulzer.com/en/shared/about-us/2017/08/10/13/22/environmental-product-declarations (accessed May 2019)
  production volume 13.283 m3; = RP_PV_1 * (BP_amount_1 / RP_amount_1)
    Calculated from production volume of reference product using the relative outputs.
  property price 0 EUR2005; name BP_amount_1_price_EUR2005
  properties: dry mass 0.337476 kg, carbon content, non-fossil 0.00178991, water content 2962.17, carbon content, fossil 0.00178991, wet mass 1000 kg
  note on carbon content, fossil: Assumed to be like in tap water. Bicarbonate content is 2.93 mol/m3. CO2 content is 0.1 mol/m3 (ecoinvent v2.2 report 8, Tab 93.1).
- hazardous waste, for incineration: -1148 kg; name BP_amount_4; = (silicone_product)*-1; lognormal variance with pedigree 0.0197, pedigree (4,4,4,3,2)
  Disposal of the oil used for the initial filling and during operation of the pumps and transformers. Calculated based on the environmental product declarations for pumps as provided by Sulzer and for transformers as provided by ABB.
  Sulzer EPDs: https://www.sulzer.com/en/shared/about-us/2017/08/10/13/22/environmental-product-declarations (accessed May 2019)
  ABB library: https://library.abb.com/en/ (accessed May 2019)
  production volume 1148 kg; = RP_PV_1 * (BP_amount_4 / RP_amount_1)
    Calculated from production volume of reference product using the relative outputs.
  property price 0 EUR2005; name BP_amount_4_price_EUR2005
  properties: water content 0.333333, carbon content, fossil 0.554667, wet mass 1 kg, dry mass 0.75 kg, heating value, net 17 MJ
  note on carbon content, fossil: Tab A.6, ecoinvent v2.2 report 13_I. C content has been calculated after data in the tables, and then referred to 1 kg DM
  note on heating value, net: Value taken from the general comment of the treatment dataset.

## Sampling procedure
This dataset is entirely based on the detailed life cycle inventory as presented in the dissertation report by
Telsnig, Thomas. 2015. Standortabhängige Analyse und Bewertung solarthermischer Kraftwerke am Beispiel Südafrikas. Forschungsbericht. Band 123. ISSN 0938-1228. Institut für Energiewirtschaft und Rationelle Energieanwendung, Universität Stuttgart, Germany.

Further, data in Telsnig 2015 are not shown explicitely for the downscaled 20 MW solar tower power plant. This gap is filled in the ecoinvent report.

## Extrapolations
This dataset has been extrapolated from year 2020 to the year of the calculation (2021). The uncertainty has been adjusted accordingly.

## Review by Christopher Oberschelp 2017-03-13
Very detailed, structured and well-documented datasets. Main exchanges have been checked and make sense.
