# ammonia production, partial oxidation, liquid

Dataset: EcoSpold 2, unit process
Geography: RoW
Time period: 2011-01-01 to 2021-12-31
Technology level: current
Classification: ISIC rev.4 ecoinvent: 2012:Manufacture of fertilizers and nitrogen compounds
Synonyms: Hydrogen nitride; Trihydridonitrogen; Nitrogen trihydride
Scenario: Business-as-Usual
System model: Allocation, cut-off by classification
Generated by: Anna Kounina
Database: ecoinvent
isCopyrightProtected: true
accessRestrictedTo: 1

## General comment
This dataset represents the production of 1 kg of liquid ammonia (100% NH3) using the partial oxidation process. About 15% of the world ammonia production is using this technology. Ammonia is a colourless gas with a penetrating, pungent suffocating odour. It is liquid when under pressure. It is hygroscopic and soluble in water (89.9 g/L at 0°C).
The most important use for ammonia is as a supply of vital agricultural nitrogen for crops. It is either applied as a fertiliser directly or it is used as a feedstock in the manufacture of urea, ammonium nitrate or nitric acid. The industrial use of ammonia as a nitrogen source has consumed an increasingly greater share of total ammonia production, amounting now to about 20% of world output. Virtually all nitrogen used in the chemical industry enters the process as ammonia. The major uses of industrial ammonia-nitrogen , in part after conversion into nitric acid, are the manufacture of plastics and fibres. Other important applications are the manufacture of explosives, hydrazine, amines, amides, nitriles, and other organic nitrogen compounds serving as intermediates for dyes and pharmaceuticals. The most important products manufactured from ammonia are nitric acid, urea, sodium cyanide and sodium carbonate.
Ammonia is used in the area of environmental protection to remove SO2 and NOx from steam boiler flue gases. The resulting ammonium sulphate (and sometimes ammonium nitrate) is marketed as a fertiliser product. Liquid ammonia has a considerable importance as a solvent. Ammonia is also used in the nitriding of steel. It is also still used as a refrigerant in industrial and commercial refrigeration and air-conditioning installations.
Ammonia is an inexpensive and easily managed starting material for manufacturing protective gas mixtures for chemical products and for metal-working processes. It is also used for manufacturing hydrogen and is even proposed for use in energy-related applications.
The process generates 2.8 kg of CO2 per kg of NH3. Ammonia production takes the full burden of this CO2 as an emission to the environment. In certain regions urea plants are located adjacent to ammonia plants where part of this CO2 is fed into the urea production. Therefore, urea production takes the relevant CO2 credit in the form of a negative CO2 emission. The process assumes 1% of this CO2 as by-product in ammonia.
The main data sources for this dataset are Fertilizers Europe (2014, 2016). Additional data sources are listed as follows.
References:
Fertilizers Europe (2000): Best Available Techniques for Pollution Prevention and Control in the European Fertilizer Industry. Booklet No. 1 of 8: Production of Ammonia. Fertilizers Europe, Brussels.
Kongshaug G. (1998): Energy Consumption and Greenhouse Gas Emissions in Fertilizer Production. IFA 20th July 1998
Davies J., Haglund C. (1999): Life Cycle Inventory of Fertiliser Production. SIK-Report No 654 1999. Chalmers University of Technology, Sweden.
Fertilizers Europe (2014): Average Emissions Year 2011. Fertilizers Europe Environmental report (internal).
Fertilizers Europe (2016): Carbon Footprint Calculator for Fertilizer Production. Specification. Version 2.1
Fertilizers Europe (2016): Average Emissions Year 2014. Fertilizers Europe Environmental report (internal). Used for updated energy and GHG emission in Carbon Footprint Calculator
Phillip Townsend Associates Inc. (2016): Ammonia Plant Energy Efficiency and CO2 Emissions Benchmarking 2013-2014. Internal report for Fertilizers Europe.
Integer Research (2016): Regional N2O and CO2emissions from ammonia and nitric acid production 2014. Internal report for Fertilizers Europe.
Althaus H.-J., Chudacoff M., Hischier R., Jungbluth N., Osses M. and Primas A. (2007) Life Cycle Inventories of Chemicals. ecoinvent report No. 8, v2.0. EMPA Dübendorf, Swiss Centre for Life Cycle Inventories, Dübendorf, CH.
[This dataset is meant to replace the following datasets:
- ammonia production, partial oxidation, liquid, GLO, 2000 - 2014]

## Included activities start
The activity includes all the raw and processed materials necessary to produce this product. Coal as feedstock and fuel, water, heat and electricity are included. Direct emissions include nitrogen to water, nitrogen oxides to air and carbon dioxide to air. It is assumed, that all carbon dioxide is emitted to air, except if ammonia is later used for urea production. In this case, state-of-the-art industrial practice is that carbon dioxide originating from ammonia production is directly used as feedstock for urea production.

## Included activities end
The activity ends with the final product being ready for transportation at the production site.

## Technology
This datasets corresponds to the technology used in Chinese ammonia plants with partial oxidation process with coal based fuel and feedstock. This technology is used for the gasification of heavy feedstocks such as residual oils and coal. The partial oxidation gasification is a non-catalytic process taking place at high pressure (>50bar) and temperatures around 1,400°C.

## Time period
Primary data were collected on fertiliser production for the year 2013-2014. These data were based on annual average data based on different production plants.

## Reference product
- ammonia, anhydrous, liquid: 1 kg; CPC 34651: Ammonia, anhydrous; By-product classification allocatable product; CAS 7664-41-7
  This flow is weighted averages using the exchanges in the corresponding regional data.
  production volume 8.17559e9 kg
    Value in kg/y. International Fertilizers Association (2014). For China it has been assumed that 87 % of ammonia is produced by partial oxidation based on IFA (2009). For the rest of the world, it has been assumed that 10% of ammonia is produced by partial oxidation based on Appl (2011).
    Reference:
    Appl, M., 2011. Ammonia, 1. Introduction, in: Ullmann’s Encyclopedia of Industrial Chemistry. Wiley-VCH Verlag GmbH & Co. KGaA, Weinheim, Germany. https://doi.org/10.1002/14356007.a02_143.pub3
    IFA ,2009. Fertilizers, Climate change and enhancing agricultural productivity sustainably.
  property hydrogen content 0.177547
    Hydrogen content (on a dry matter basis) of ammonia, anhydrous, liquid is calculated from the molecular formula of the substance (H3N).
  property carbon content, fossil 0
    Carbon content, fossil is calculated based on the chemical formula of the substance.
  property nitrogen content 0.822453
    Nitrogen content (on a dry matter basis) of ammonia, anhydrous, liquid is calculated from the molecular formula of the substance (H3N).
  property price 0.333 EUR2005
    Data related to the price of nitric acid were provided by Yara International (https://www.yara.com/)
  property carbon content 0
    carbon content on a dry matter basis (reserved; not for manual entry)
  property true value 0.333
    allocation property applied in "true value" allocation // value calculated from revenue
  properties: water in wet mass 0 kg, carbon content, non-fossil 0, dry mass 1 kg, water content 0, wet mass 1 kg, carbon allocation 0 kg

## By-products
- carbon dioxide, in chemical industry: 0 kg; By-product classification allocatable product; CPC 34210: Hydrogen, nitrogen, oxygen, carbon dioxide and rare gases; inorganic oxygen compounds of non-metals n.e.c.; CAS 124-38-9; pedigree (1,1,1,1,1)
  Amount of CO2 that is captured and can be further utilised in the chemical industry. It is assumed that this BP has a zero price and it is here for traceability reasons of carbon.
  production volume 0 kg
    Calculated based on the production volume of the reference product.
  property carbon content, fossil 0.272912
    Carbon content (on a dry matter basis) of carbon dioxide, in chemical industry is calculated from the molecular formula of the substance (CO2).
  property oxygen content 0.727088
    Oxygen content (on a dry matter basis) of carbon dioxide, in chemical industry is calculated from the molecular formula of the substance (CO2).
  property heating value, net 8.27 MJ
    LHV is calculated based on the elemental composition of the substance. Based on the name of the substance, the formula is found manually.
  property carbon content 0.272912
    carbon content on a dry matter basis (reserved; not for manual entry)
  property true value 0
    allocation property applied in "true value" allocation // value calculated from revenue
  properties: price 0 EUR2005, water in wet mass 0 kg, carbon content, non-fossil 0, water content 0, dry mass 1 kg, wet mass 1 kg, carbon allocation 0.272912 kg

## Inputs from technosphere
- chemical factory, organics: 4e-10 unit; lognormal variance with pedigree 0.346, pedigree (3,4,5,5,1)
  This flow is weighted averages using the exchanges in the corresponding regional data.
- nickel, class 1: 0.00035 kg; lognormal variance with pedigree 0.0466, pedigree (3,4,5,5,1)
  This flow is weighted averages using the exchanges in the corresponding regional data.
  properties: wet mass 1 kg, dry mass 1 kg
- hard coal: 0 kg; pedigree (1,1,1,1,1)
  This flow is weighted averages using the exchanges in the corresponding regional data.
  properties: heating value, net 27.91 MJ, wet mass 1 kg, water content 0.0638298, carbon content, fossil 0.845, dry mass 0.94 kg
  note on heating value, net: Based on the Characterization factor of Hard coal in the CED method
  note on carbon content, fossil: C content 75-94% (specified in Tab 1.1, report 6, part VI). A mean content of 0.845 kg C/ kg dry hard coal was considered
- solvent, organic: 3e-5 kg; lognormal variance with pedigree 0.0466, pedigree (3,4,5,5,1)
  This flow is weighted averages using the exchanges in the corresponding regional data.
  properties: wet mass 1 kg, heating value, net 19.11 MJ, dry mass 1 kg, carbon content, fossil 0.63072
- tap water: 0 kg; pedigree (1,1,1,1,1)
  This flow is weighted averages using the exchanges in the corresponding regional data.
  properties: dry mass 0.000337476 kg, wet mass 1 kg, carbon content, fossil 0.00178991, water content 2962.17
  note on carbon content, fossil: Bicarbonate content is 2.93 mol/m3. CO2 content is 0.1 mol/m3 (ecoinvent v2.2 report 8, Tab 93.1).
- heat, district or industrial, other than natural gas: 0 MJ; pedigree (1,1,1,1,1)
  This flow is weighted averages using the exchanges in the corresponding regional data.
  properties: heating value, net 1 MJ
- municipal solid waste: 0 kg; pedigree (1,1,1,1,1)
  This flow is weighted averages using the exchanges in the corresponding regional data.
  production volume 0 kg
    Calculated based on the production volume of the reference product.
  properties: heating value, net 11.74 MJ, carbon content, fossil 0.171549, carbon content, non-fossil 0.261655, dry mass 0.771 kg, wet mass 1 kg, water content 0.297017
  note on heating value, net: Value taken from the general comment of the treatment dataset.
  note on carbon content, fossil: MSW composition in tab 4.1, ecoinvent v2.2 report 13_I. C content referred to 1 kg DM
- hard coal: 0.110189, 0.0666934, 0.107978, 0.179469, 0.0256225, 0.160983, 0.0840706, 0.0468592, 0.238134 kg (9 entries); lognormal variance with pedigree 0.0466, pedigree (3,4,5,5,1)
  This flow is weighted averages using the exchanges in the corresponding regional data.
- tap water: 0.0145061, 0.00174615, 0.00288579, 0.0727683, 0.00189305, 0.00538475, 0.621816 kg (7 entries); lognormal variance with pedigree 0.0466, pedigree (3,4,5,5,1)
  This flow is weighted averages using the exchanges in the corresponding regional data.
- heat, district or industrial, other than natural gas: 0.00526175, 0.319096, 12.9756 MJ (3 entries); lognormal variance with pedigree 0.0466, pedigree (3,4,5,5,1)
  This flow is weighted averages using the exchanges in the corresponding regional data.
- municipal solid waste: -3.31341e-6, -8.34897e-7, -1.19312e-6, -0.000194659 kg (4 entries); lognormal variance with pedigree 0.0466, pedigree (3,4,5,5,1)
  This flow is weighted averages using the exchanges in the corresponding regional data.

## Inputs from nature
- Water, cooling, unspecified natural origin [natural resource, in water]: 0.14 m3; lognormal variance with pedigree 0.0466, pedigree (3,4,5,5,1)
  This flow is weighted averages using the exchanges in the corresponding regional data.

## Emissions to nature
- Nitrogen oxides [air, urban air close to ground]: 0.0007 kg; lognormal variance with pedigree 0.086, pedigree (3,4,5,5,1)
  This flow is weighted averages using the exchanges in the corresponding regional data.
- Water [water, surface water]: 0.0864655 m3; lognormal variance with pedigree 0.086, pedigree (3,4,5,5,1)
  This flow is weighted averages using the exchanges in the corresponding regional data.
- Water [air, unspecified]: 0.0544 m3; lognormal variance with pedigree 0.086, pedigree (3,4,5,5,1)
  This flow is weighted averages using the exchanges in the corresponding regional data.
- Carbon dioxide, fossil [air, urban air close to ground]: 2.8 kg; lognormal variance with pedigree 0.0466, pedigree (3,4,5,5,1)
  Amount of CO2 that is not captured and subsequently emitted to air.
- Nitrogen [water, surface water]: 0.00012 kg; lognormal variance with pedigree 0.086, pedigree (3,4,5,5,1)
  This flow is weighted averages using the exchanges in the corresponding regional data.

## Extrapolations
Data have been extrapolated from the region of Europe. Uncertainty has been adjusted accordingly.
