# concrete production 25-30MPa

Dataset: EcoSpold 2, unit process
Geography: RoW
Time period: 2014-04-01 to 2021-12-31
Technology level: current
Classification: EcoSpold01Categories: construction materials/concrete
Classification: ISIC rev.4 ecoinvent: 2395:Manufacture of articles of concrete, cement and plaster
Synonyms: ready mixed concrete; ready-mix concrete
Scenario: Business-as-Usual
System model: Allocation, cut-off by classification
Generated by: Parag Mundada
Published in: Kiran Ananth P. V. 2017
Database: ecoinvent
isCopyrightProtected: true
accessRestrictedTo: 1

## General comment
Ready Mixed concrete will be made from a mix of cement, aggregates and water. Aggregates make up the majority of the concrete’s volume and the cement provides resistance. Additives will be incorporated into the mix to ensure particular properties such as improved durability or shortened hardening times.

In the designation of concrete mix M refers to the mix and the number to the specified compressive strength of 150 mm size cube at 28 days, expressed in N/mm2.

The determination of the proportion of cement, aggregate and water to attain the required strength shall be made as follows:
(a) By designing the concrete mix: such concrete shall be called ‘Design mix concrete’, for details reference may be made to RCC Chapter.
(b) By adopting nominal concrete mix: such concrete shall be called ‘Nominal mix concrete’.

Design mix concrete is preferred to nominal mix. If design mix concrete cannot be used for any reason on the work for grades of M20 or lower, nominal mixes may be used with the permission of Engineer-in-Charge, which, however, is likely to involve a higher cement content.

## Included activities start
From reception of raw materials at the ready-mix plant gate.

## Included activities end
This activity ends before the delivery of concrete at the construction site.
The dataset includes the whole manufacturing processes to produce ready-mixed concrete, internal processes (material handling and mixing) and infrastructure.

## Geography
Data represents for Indian Geography.

## Technology
In RMC Unit, cement, aggregates (coarse & fine), admixtures and water will be fed for homogeneous mixing of concrete in high efficiency pan mixers or twin shaft vibro-mixers in fully automated mixing & batching plant.

Inert raw materials namely fine aggregates and coarse aggregates will be stored in bins, whereas cement will be stored in air-tight silos. Water and admixtures will be stored in tanks.

Inert raw materials namely fine aggregates and coarse aggregates will be stored in bins, whereas cement will be stored in air-tight silos. Water and admixtures will be stored in tanks. Inert raw materials will be fed to the batching plant mixer by means of an aggregate belt conveyor. The required quantity of cement will be extracted from the silo by a screw conveyor and fed into the mixer. Water and admixtures will be pumped into the mixer through a flow meter. After the mixing in the mixer completely, the ready mixed concrete will be discharged into the transmit mixer which can be then transported the concrete to the construction site. All these above operations will be controlled by a computer housed in the control room of the batching plant.

## Time period
Data represents for above mentioned period

## Parameters
- fraction, process water, to air: 0.15 dimensionless; name fraction_PW_to_air; lognormal variance with pedigree 0.0226, pedigree (4,4,3,5,3)
  Rough estimation to represent water evaporation of process water. Source: 2007, Kellenberger D et al. (ecoinvent "Concrete production, normal" dataset)
- fraction: 0 dimensionless
- fraction_02: 0.2 dimensionless; name fraction_acetic_acid; lognormal variance with pedigree 0.0427, pedigree (3,1,1,3,4)
  Literature value. Superplastisizer assumed to be 20% acetic acid. Extrapolated from 20 MPa mix admixtures. Source: Athena and morrison Hershfield (2012): Life Cycle Assessment of Precast Concrete Commerical Buildings Cradle-to-Grave
- superplastisizer: 1e-50 kg
  Source: Athena institute (unpublished data). Value of zero.
- fraction_01: 0.8 dimensionless; name fraction_ethylene_oxide; lognormal variance with pedigree 0.0427, pedigree (3,1,1,3,4)
  Literature value. Superplastisizer assumed to be 80% ehtlyne oxide. Extrapolated from 20 MPa mix admixtures. Source: Athena and morrison Hershfield (2012): Life Cycle Assessment of Precast Concrete Commerical Buildings Cradle-to-Grave

## Reference product
- concrete, 25-30MPa: 1 m3; name ref; By-product classification allocatable product; CPC 3733: Refractory cements, mortars, concretes and similar compositions n.e.c.
  production volume 1.25926e9 m3; name PV_ref
    The global production volume was calculated as follows:
    1) The total production volume of each country was calculated
    2) The production volume was scaled based construction output (*)
    3) The average of the results was assumed to be the GLO PV
    4) The share of each different technology per country was calculated
    5) The weighted average of the shares for each country was used to split the GLO PV into different technologies
    (*)
    Construction output assumed per country
    Country Share
    ZA 0.50%
    BR 2.01%
    CH 0.36%
    CO 0.58%
    IN 9.67%
    PE 0.31%
    CA-QC 0.37%
    RNA without CA-QC 9.03%
    Source:
    OECD. 2018. Input-Output Tables. http://www.oecd.org/trade/input-outputtables.htm.
    United Nations Statistics Division. 2019. UN data. A world of information. http://data.un.org/.
    Timmer, M.P., E. Dietzenbacher, B. Los, R. Stehrer, and G.J. de Vries. 2015. An Illustrated User Guide to the World Input-Output Database: the Case of Global Automotive Production. Review of International Economics 23(3): 575-605. http://doi.wiley.com/10.1111/roie.12178.
    The data was adjusted based on PPP, data from:
    The World Bank. 2019. World Bank Open Data. https://data.worldbank.org/
  property price 185 EUR2005; name ref_price_EUR2005
    Calculated value based on data from United Nations Commodity Trade Statistics Database (comtrade.un.org). UN comtrade category: 681019 Tiles & flagstones of cement, concrete, artificial ston. Year 2005. Using exchange rate of 1EURO = 1.209 USD. Average of price of import into 5 main markets (EU, US, JP, IN and CN).
  property carbon content, fossil 1e-51; name ref_C_content_fossil
  property gravel content 1180 kg; name gravel
  property dry mass 2273 kg; name ref_DM; = sand+gravel+cement
  property sand content 787 kg; name sand
  property cement content 306 kg; name cement
  property water content 0.0725913; name ref_water_content; = ref_WWM/ref_DM
  property wet mass 2438 kg; name ref_WM; = ref_WWM+Ref_DM
  property water in wet mass 165 kg; name ref_WWM
  property carbon content 1e-51
    carbon content on a dry matter basis (reserved; not for manual entry)
  properties: carbon allocation 2.273e-48 kg

## Inputs from technosphere
- wastewater from concrete production: -0.0348 m3; name WWater; lognormal variance with pedigree 0.0146, pedigree (2,1,3,5,1)
  Referred from ecoinvent dataset "concrete production 25 MPa, RNA only, GLO" Extrapolated for specific geography.
  production volume 4.38223e7 m3; = PV_ref*WWater/ref
    Calculated in proportion to the reference product.
  property price 0 EUR2005; name WWater_price_EUR2005
  properties: wet mass 1000 kg, water content 2225.48, carbon content, fossil 0.027074, dry mass 0.449139 kg
- electricity, medium voltage: 0 kWh; source Marceau, M.L. 2007; pedigree (1,1,1,1,1)
  EcoSpold01Location=CH
  Referred from ecoinvent dataset "concrete production 25 MPa, RNA only, GLO" (accessed 20170823). Extrapolated for specific geography.
- lubricating oil: 0.0119 kg; lognormal variance with pedigree 0.0146, pedigree (2,1,3,5,1)
  Referred from ecoinvent dataset "concrete production 25 MPa, RNA only, GLO" (accessed 20170823). Extrapolated for specific geography.
  properties: carbon content, fossil 0.75, wet mass 1 kg, dry mass 1 kg, heating value, net 40.2 MJ
  note on carbon content, fossil: Lubricating oil is produced from diesel. C-content/dry mass of fats and oils considered 75%, from: ecoinvent v2.2 report, n 15a, pg 40
  note on heating value, net: Literature value, Source: IPCC 2006, 2006 IPCC Guidelines for National Greenhouse Gas Inventories, Prepared by the National Greenhouse Gas Inventories Programme, Eggleston H.S., Buendia L., Miwa K., Ngara T. and Tanabe K. (eds). Published: IGES, Japan
- steel, low-alloyed, hot rolled: 0.0238 kg; source Kellenberger D. 2007; lognormal variance with pedigree 0.0146, pedigree (2,1,3,5,1)
  Referred from ecoinvent dataset "concrete production 25 MPa, RNA only, GLO" (accessed 20170823). Extrapolated for specific geography.
  EcoSpold01Location=RER
  properties: carbon content, fossil 0.005, dry mass 1 kg, wet mass 1 kg
  note on carbon content, fossil: Low alloyed steel composition given in Tab. 3.2 ecoinvent v2.2 report 10_partII. Steel assumed to have a C content of 0.5%
- diesel, burned in building machine: 15.6427 MJ; lognormal variance with pedigree 0.0132, pedigree (4,3,3,5,1)
  (same comment as for lubricating oil)
  properties: heating value, net 1 MJ
- concrete mixing factory: 4.57e-7 unit; source Kellenberger D. 2007; lognormal variance with pedigree 0.3246, pedigree (2,1,3,5,1)
  Referred from ecoinvent dataset "concrete production 25 MPa, RNA only, GLO" (accessed 20170823). Extrapolated for specific geography.
  EcoSpold01Location=CH
- heat, district or industrial, natural gas: 0 MJ; pedigree (1,1,1,1,1)
  (same comment as for lubricating oil)
  properties: heating value, net 1 MJ
- sand: 0 kg; pedigree (1,1,1,1,1)
  Industrial Expert Views.
  properties: dry mass 1 kg, wet mass 1 kg
- tap water: 0 kg; pedigree (1,1,1,1,1)
  EcoSpold01Location=CH
  Industrial Expert Views. Water use in ready-mix plant,
  property non-process water, net 40.9412 kg; name non_process_water; = (WWater*-1)*1000/(1-fraction_PW_to_air)
  property batch water 165 kg; name batch_water
  properties: dry mass 0.000337476 kg, wet mass 1 kg, carbon content, fossil 0.00178991, water content 2962.17
  note on non-process water, net: The average water consumption (not including batch water) is 65 L/m3 of ready mixed concrete. The average amount of water disposed is 34,8 L/m3. Water not discarded is recycled back into the process or into other products. Source: Athena (2005):Cement and Structural Concrete: LCI Update 2005 An amount of 15% water evaporated to air was assumed, in order to calculate to non-process water input.
  note on carbon content, fossil: Bicarbonate content is 2.93 mol/m3. CO2 content is 0.1 mol/m3 (ecoinvent v2.2 report 8, Tab 93.1).
- gravel, round: 0 kg; pedigree (1,1,1,1,1)
  Industrial Expert Views.
  EcoSpold01Location=CH
  properties: dry mass 1 kg, wet mass 1 kg
- acetic acid, without water, in 98% solution state: 0 kg; = fraction_acetic_acid*superplastisizer; source Athena and morrison Hershfield 2012; pedigree (1,1,1,1,1)
  (same comment as for lubricating oil)
  property carbon content, fossil 0.400016; name AA_C_content_fossil
  properties: dry mass 1 kg, wet mass 1 kg, heating value, net 14.6 MJ
  note on heating value, net: Based on literature, page 10, Althaus H.-J., Chudacoff M., Hischier R., Jungbluth N., Osses M. and Primas A. (2007) Life Cycle Inventories of Chemicals. Final report ecoinvent data v2.0 No. 8. EMPA, Swiss Centre for Life Cycle Inventories, Dübendorf, CH, Online-Version under: www.ecoinvent.org.
- synthetic rubber: 0.00713 kg; source Kellenberger D. 2007; lognormal variance with pedigree 0.0221, pedigree (4,2,3,5,1)
  (same comment as for steel, low-alloyed, hot rolled)
  properties: wet mass 1 kg, carbon content, fossil 0.871949, dry mass 1 kg, heating value, net 26.42 MJ
  note on carbon content, fossil: EPDM (Ethylene-propene-diene terpolymer) rubber is a terpolymer of ethylene, propene, and a diene with the residual unsaturated portion of the diene in the side chain (ecoinvent v2.2 report 7-part XX & Ullmann). Chemical formula (deduced from Evidences of Solvent-Induced Miscibility in Polychloroprene-co-Ethylene-Propene Diene Terpolymer Blends, Dubey et al., Journal of Applied Polymer Science, 2009, 111:1884–1891): C20H35
- chemical, organic: 1.247 kg; lognormal variance with pedigree 0.0072, pedigree (3,3,3,5,1)
  Estimated value. Water reducing admixture (usually based on lignosulphonate. Provided by Athena Institute (personal communication). Extrapolated for specific geography. Referred from ecoinvent dataset "concrete production 25 MPa, RNA only, GLO"
  properties: dry mass 1 kg, carbon content, fossil 0.628, heating value, net 19.03 MJ, wet mass 1 kg
  note on carbon content, fossil: This dataset is an unweighted average of 20 organic substances (listed in Tab 88.1, ecoinvent v2.2 report 8, part II), being part of the top100 chemicals included in this database. The C-content has also been calculated as an unweighted average of the C content of the substances composing this dataset.
- cement, Portland: 0 kg; pedigree (1,1,1,1,1)
  Industrial Expert Views.
  EcoSpold01Location=CH
  properties: wet mass 1 kg, dry mass 1 kg
- ethylene oxide: 0 kg; = fraction_ethylene_oxide*superplastisizer; source Athena and morrison Hershfield 2012; pedigree (1,1,1,1,1)
  (same comment as for lubricating oil)
  properties: carbon content, fossil 0.545455, dry mass 1 kg, wet mass 1 kg, heating value, net 27.53 MJ
- electricity, medium voltage: 0.0794877, 0.0152423, 0.349988, 0.255887, 1.17971, 0.524568, 1.70912 kWh (7 entries); source Marceau, M.L. 2007; lognormal variance with pedigree 0.022, pedigree (4,1,3,5,1)
  (same comment as for electricity, medium voltage)
- heat, district or industrial, natural gas: 0.425597, 10.2067 MJ (2 entries); lognormal variance with pedigree 0.0132, pedigree (4,3,3,5,1)
  (same comment as for lubricating oil)
- sand: 11.9084, 0.142582, 774.949 kg (3 entries); lognormal variance with pedigree 0.0186, pedigree (4,3,3,5,1)
  Industrial Expert Views.
- tap water: 1.61619, 0.194546, 0.321519, 0.210913, 0.599939, 69.2793, 92.7776 kg (7 entries); lognormal variance with pedigree 0.0181, pedigree (4,2,3,5,1)
  EcoSpold01Location=CH
  Industrial Expert Views. Water use in ready-mix plant,
  properties: dry mass 0.000337476 kg, wet mass 1 kg, non-process water, net 40.9412 kg, carbon content, fossil 0.00178991, water content 2962.17, batch water 165 kg
- gravel, round: 0.3068, 1179.69 kg (2 entries); lognormal variance with pedigree 0.0181, pedigree (4,2,3,5,1)
  Industrial Expert Views.
  EcoSpold01Location=CH
- cement, Portland: 1.11395, 1.62688, 0.400738, 33.3773, 1.93059, 38.6507, 1.58365, 227.316 kg (8 entries); lognormal variance with pedigree 0.0181, pedigree (4,2,3,5,1)
  Industrial Expert Views.
  EcoSpold01Location=CH

## Emissions to nature
All rows: lognormal variance with pedigree 0.0052, pedigree (2,1,3,5,1)
- Copper, ion [water, unspecified]: 1.55e-8 kg
  (same comment as for lubricating oil)
- Water [air, unspecified]: 0.00614118 m3; = non_process_water/1000*fraction_PW_to_air
  (same comment as for lubricating oil)
- Suspended solids, unspecified [water, unspecified]: 4.64e-7 kg
  (same comment as for wastewater from concrete production)
- Oils, unspecified [water, unspecified]: 2.32e-7 kg
  (same comment as for wastewater from concrete production)
- Iron, ion [water, unspecified]: 1.55e-8 kg
  (same comment as for wastewater from concrete production)
- Chlorides, unspecified [water, unspecified]: 3.09e-9 kg
  (same comment as for lubricating oil)

## Sampling procedure
Data represents for concrete production facility (1 unit)

## Extrapolations
Extrapolated from the IN activity. This activity represents a Indian concrete production. Some flows have been kept as in the original ecoinvent dataset "concrete production 25 MPa, RNA only, GLO" (infrastructure, lubricant, rubber, and steel) (accessed 20170823). The uncertainty has been adjusted accordingly.
