# treatment of waste polypropylene, sanitary landfill

Dataset: EcoSpold 2, unit process
Geography: RoW
Time period: 1994-01-01 to 2021-12-31
Technology level: current
Classification: ISIC rev.4 ecoinvent: 3821:Treatment and disposal of non-hazardous waste
Classification: EcoSpold01Categories: waste management/sanitary landfill
Synonyms: PP
Tags: ConvertedDataset; Treatment
Scenario: Business-as-Usual
System model: Allocation, cut-off by classification
Generated by: Gabor Doka (obsolete)
Published in: Doka G. 2007
Database: ecoinvent
isCopyrightProtected: true
accessRestrictedTo: 1

## General comment
Inventoried waste contains 100% PP; .
waste composition (wet, in ppm): upper heating value 36.16 MJ/kg; lower heating value 32.78 MJ/kg; H2O 159000; O 32454; H 103430; C 694120; S 360.46; N 1095.3; P n.a.; B n.a.; Cl 1234.1; Br 8.0972; F 12.146; I n.a.; Ag n.a.; As 1.5385; Ba 202.43; Cd 28.663; Co 1.417; Cr 10.526; Cu 34.93; Hg 0.040486; Mn 25.371; Mo n.a.; Ni 0.80972; Pb 19.079; Sb 8.5021; Se 1.7004; Sn 3.2205; V 1862.4; Zn 288.78; Be 0.40486; Sc n.a.; Sr 71.661; Ti 809.72; Tl 0.32389; W n.a.; Si n.a.; Fe 1295.6; Ca 2186.3; Al 161.94; K n.a.; Mg 80.972; Na 1186.6;
Share of carbon in waste that is biogenic 0%.
Overall degradability of waste during 100 years: 1%.
[This dataset was already contained in the ecoinvent database version 2. It was not individually updated during the transfer to ecoinvent version 3. Life Cycle Impact Assessment results may still have changed, as they are affected by changes in the supply chain, i.e. in other datasets. This dataset was generated following the ecoinvent quality guidelines for version 2. It may have been subject to central changes described in the ecoinvent version 3 change report (http://www.ecoinvent.org/database/ecoinvent-version-3/reports-of-changes/), and the results of the central updates were reviewed extensively. The changes added e.g. consistent water flows and other information throughout the database. The documentation of this dataset can be found in the ecoinvent reports of version 2, which are still available via the ecoinvent website. The change report linked above covers all central changes that were made during the conversion process.]

## Included activities end
Waste-specific short-term emissions to air via landfill gas incineration and landfill leachate. Burdens from treatment of short-term leachate (0-100a) in wastewater treatment plant (including WWTP sludge disposal in municipal incinerator). Long-term emissions from landfill to groundwater (after base lining failure).

## Geography
Technology encountered in Switzerland in 2000. Landfill includes base seal, leachate collection system, treatment of leachate in municipal wastewater treatment plant.

## Technology
Swiss municipal sanitary landfill for biogenic or untreated municipal waste ('reactive organic landfill'). Landfill gas and leachate collection system. Recultivation and monitoring for 150 years after closure.

## Reference product
- waste polypropylene: -1 kg; name waste_PP_RP; CPC 39270: Waste, parings and scrap of plastics; By-product classification Waste; CAS 9003-07-0
  EcoSpold01Location=CH
  production volume 3.06666e10 kg; name waste_PP_RP_PV; = 3407400000*(0.9/0.1)
    Estimated. Based on literature (UNSTATS, http://unstats.un.org/unsd/environment/wastetreatment.htm, accessed 20140620) it is estimated, that 90% of waste polypropylene is landfilled.
  property price 0 EUR2005; name waste_PP_RP_price_EUR2005
    Waste products are assigned a price of zero as they are assumed to require further treatment.
  property carbon content, fossil 0.825208
    C content in 1 kg DM was calculated using data in Tab A.1, ecoinvent v2.2 report 13_I
  property heating value, net 32.78 MJ
    Value assumed for all polypropylene products. Source: Phyllis2, database for (treated) biomass, algae, feedstocks for biogas production and biochar, https://phyllis.nl/Biomass/View/1186, ECN.TNO
  property carbon content 0.825208
    carbon content on a dry matter basis (reserved; not for manual entry)
  properties: water in wet mass 0.159 kg, dry mass 0.841 kg, carbon content, non-fossil 0, water content 0.189061, wet mass 1 kg, carbon allocation 0.694 kg

## Inputs from technosphere
- chromium oxide, flakes: 2.25e-11 kg; lognormal variance with pedigree 1.13, pedigree (5,5,5,5,5)
  EcoSpold01Location=RER
  burden from incineration of sludge from wastewater treatment of the short-term leachate (0-100a). Proxy for vanadium pentoxide V2O5 in SCR catalyst, uncertainty calculated from uncertainty in average DeNOx input, uncertainty in the share of thermal NOx, uncertainty of nitrogen content in average municipal waste and the unertainty in nitrogen content in *this* waste and uncertainty of waste decomposition and short-term leaching in sanitary landfill
  Uncertainty: . Proxy for vanadium pentoxide V2O5 in SCR catalyst, uncertainty calculated from uncertainty in average DeNOx input, uncertainty in the share of thermal NOx, uncertainty of nitrogen content in average municipal waste and the unertainty in nitrogen content in *this* waste and uncertainty of waste decomposition and short-term leaching in sanitary landfill
  properties: dry mass 1 kg, wet mass 1 kg
- sewer grid, 5E9l/year, 110 km: 5.45e-10 km; lognormal variance with pedigree 0.2106, pedigree (5,5,5,5,5)
  EcoSpold01Location=CH
  burden from wastewater treatment of the short-term leachate (0-100a). Uncertainty calculated from unertainty of the waste composition of this waste, uncertainty in waste decomposition and short-term leaching in sanitary landfill
  Uncertainty: . Uncertainty calculated from unertainty of the waste composition of this waste, uncertainty in waste decomposition and short-term leaching in sanitary landfill
- chemical, organic: 7.72e-8 kg; lognormal variance with pedigree 1.772, pedigree (1,1,5,5,1)
  burden from incineration of sludge from wastewater treatment of the short-term leachate (0-100a). uncertainty is calculated from uncertainties in waste composition and transfer coefficients in incinerator and uncertainty of waste decomposition and short-term leaching in sanitary landfill
  EcoSpold01Location=GLO
  properties: dry mass 1 kg, wet mass 1 kg, carbon content, fossil 0.628, heating value, net 19.03 MJ
  note on carbon content, fossil: This dataset is an unweighted average of 20 organic substances (listed in Tab 88.1, ecoinvent v2.2 report 8, part II), being part of the top100 chemicals included in this database. The C-content has also been calculated as an unweighted average of the C content of the substances composing this dataset.
- cement, unspecified: 0 kg; pedigree (1,1,1,1,1)
  burden from incineration of sludge from wastewater treatment of the short-term leachate (0-100a). uncertainty is calculated from uncertainties in waste composition and transfer coefficients in incinerator and uncertainty of waste decomposition and short-term leaching in sanitary landfill
  EcoSpold01Location=CH
  properties: dry mass 1 kg, wet mass 1 kg
- waste graphical paper: 0 kg; name waste_paper_ByP
  EcoSpold01Location=CH
  burden from wastewater treatment of the short-term leachate (0-100a). Uncertainty calculated from unertainty of the waste composition of this waste, uncertainty in waste decomposition and short-term leaching in sanitary landfill
  production volume 0 kg
    Calculated from the production volume of waste polypropylene, 15.9% water in proportion to the respective output amounts.
  property price 0 EUR2005; name waste_paper_ByP_price_EUR2005
  properties: wet mass 1 kg, water content 0.126126, carbon content, non-fossil 0.454955, dry mass 0.888 kg, heating value, net 14.12 MJ
  note on heating value, net: Value taken from the general comment of the treatment dataset.
- electricity, low voltage: 0 kWh; pedigree (1,1,1,1,1)
  burden from wastewater treatment of the short-term leachate (0-100a). Uncertainty calculated from unertainty of the waste composition of this waste, uncertainty in waste decomposition and short-term leaching in sanitary landfill
  EcoSpold01Location=CH
  Uncertainty: . Uncertainty calculated from unertainty of the waste composition of this waste, uncertainty in waste decomposition and short-term leaching in sanitary landfill
- process-specific burdens, municipal waste incineration: 0 kg; pedigree (1,1,1,1,1)
  Burden from incineration of sludge from wastewater treatment of the short-term leachate (0-100a).
  EcoSpold01Location=CH
- electricity, high voltage: 0 kWh; pedigree (1,1,1,1,1)
  (same comment as for cement, unspecified)
- process-specific burdens, residual material landfill: 0 kg; pedigree (1,1,1,1,1)
  EcoSpold01Location=CH
  burden from incineration of sludge from wastewater treatment of the short-term leachate (0-100a). uncertainty is calculated from uncertainties in waste composition and transfer coefficients in incinerator and uncertainty of waste decomposition and short-term leaching in sanitary landfill
- sanitary landfill facility: 5.56e-10 unit; lognormal variance with pedigree 0.042, pedigree (1,1,5,5,1)
  demands per kilogram waste. uncertainty is heeded in the module
  EcoSpold01Location=CH
- chemical, inorganic: 1.49e-10 kg; lognormal variance with pedigree 0.852, pedigree (1,1,5,5,1)
  EcoSpold01Location=GLO
  burden from incineration of sludge from wastewater treatment of the short-term leachate (0-100a). uncertainty is calculated from uncertainties in waste composition and transfer coefficients in incinerator and uncertainty of waste decomposition and short-term leaching in sanitary landfill
  properties: wet mass 1 kg, dry mass 1 kg, carbon content, fossil 0.003
  note on carbon content, fossil: This dataset is an unweighted average of 20 inorganic substances (listed in Tab 88.1, ecoinvent v2.2 report 8, part II), being part of the top100 chemicals included in this database. The C-content has also been calculated as an unweighted average of the C content of the substances composing this dataset.
- wastewater treatment facility, capacity 5E9l/year: 1.42e-11 unit; lognormal variance with pedigree 0.2106, pedigree (5,5,5,5,5)
  (same comment as for sewer grid, 5E9l/year, 110 km)
- waste cement, hydrated: 0 kg; name waste_cement_ByP
  (same comment as for cement, unspecified)
  production volume 0 kg
    (same comment as for waste graphical paper)
  property price 0 EUR2005; name waste_cement_ByP_price_EUR2005
  properties: wet mass 1 kg, dry mass 1 kg
- sodium hydroxide, without water, in 50% solution state: 1.91e-9 kg; lognormal variance with pedigree 0.672, pedigree (1,1,5,5,1)
  EcoSpold01Location=RER
  burden from incineration of sludge from wastewater treatment of the short-term leachate (0-100a). uncertainty is calculated from uncertainties in waste composition and transfer coefficients in incinerator and uncertainty of waste decomposition and short-term leaching in sanitary landfill
  properties: heating value, net 3.03 MJ, dry mass 1 kg, wet mass 1 kg
- municipal waste incineration facility: 3.12e-14 unit; lognormal variance with pedigree 0.722, pedigree (1,1,5,5,1)
  EcoSpold01Location=CH
  Burden from incineration of sludge from wastewater treatment of the short-term leachate (0-100a).
- residual material landfill: 1.82e-15 unit; lognormal variance with pedigree 0.442, pedigree (1,1,5,5,1)
  (same comment as for process-specific burdens, residual material landfill)
- heat, central or small-scale, other than natural gas: 0 MJ; pedigree (1,1,1,1,1)
  (same comment as for electricity, low voltage)
  properties: heating value, net 1 MJ
- process-specific burdens, sanitary landfill: 1 kg; lognormal variance with pedigree 0.042, pedigree (1,1,5,5,1)
  demands per kilogram waste. uncertainty is heeded in the module
  EcoSpold01Location=CH
- hydrochloric acid, without water, in 30% solution state: 8.92e-11 kg; lognormal variance with pedigree 0.852, pedigree (1,1,5,5,1)
  burden from incineration of sludge from wastewater treatment of the short-term leachate (0-100a). uncertainty is calculated from uncertainties in waste composition and transfer coefficients in incinerator and uncertainty of waste decomposition and short-term leaching in sanitary landfill
  EcoSpold01Location=RER
  properties: wet mass 1 kg, dry mass 1 kg, heating value, net 3.32 MJ
- ammonia, anhydrous, liquid: 0 kg; pedigree (1,1,1,1,1)
  (same comment as for cement, unspecified)
  properties: dry mass 1 kg, wet mass 1 kg
- titanium dioxide: 1.1e-9 kg; lognormal variance with pedigree 1.012, pedigree (1,1,5,5,1)
  (same comment as for hydrochloric acid, without water, in 30% solution state)
  properties: wet mass 1 kg, dry mass 1 kg
- waste plastic, mixture: 0 kg; name waste_plastic_ByP
  burden from wastewater treatment of the short-term leachate (0-100a). Uncertainty calculated from unertainty of the waste composition of this waste, uncertainty in waste decomposition and short-term leaching in sanitary landfill
  EcoSpold01Location=CH
  production volume 0 kg
    (same comment as for waste graphical paper)
  property price 0 EUR2005; name waste_plastic_ByP_price_EUR2005
  properties: heating value, net 30.79 MJ, wet mass 1 kg, dry mass 0.847 kg, carbon content, fossil 0.747344, water content 0.180638
  note on carbon content, fossil: C content in 1 kg DM was calculated using data in Tab A.2, ecoinvent v2.2 report 13_I
- heat, district or industrial, natural gas: 0 MJ; pedigree (1,1,1,1,1)
  (same comment as for hydrochloric acid, without water, in 30% solution state)
  properties: heating value, net 1 MJ
- process-specific burdens, slag landfill: 0 kg; pedigree (1,1,1,1,1)
  (same comment as for cement, unspecified)
- quicklime, milled, packed: 3.47e-10 kg; lognormal variance with pedigree 0.672, pedigree (1,1,5,5,1)
  (same comment as for process-specific burdens, residual material landfill)
  properties: wet mass 1 kg, dry mass 0.99 kg, water content 0.010101
- iron (III) chloride, without water, in 40% solution state: 2.59e-8 kg; lognormal variance with pedigree 0.892, pedigree (1,1,5,5,1)
  (same comment as for process-specific burdens, residual material landfill)
  properties: wet mass 1 kg, dry mass 1 kg
- slag landfill: 9.14e-15 unit; lognormal variance with pedigree 0.562, pedigree (1,1,5,5,1)
  (same comment as for cement, unspecified)
- heat, district or industrial, other than natural gas: 0 MJ; pedigree (1,1,1,1,1)
  (same comment as for process-specific burdens, residual material landfill)
  properties: heating value, net 1 MJ
- cement, unspecified: 5.03941e-8, 1.04855e-8, 7.67992e-10, 2.18903e-9, 4.95056e-8, 1.45709e-9, 1.60032e-8, 1.93621e-9, 2.16261e-7 kg (9 entries); lognormal variance with pedigree 0.442, pedigree (1,1,5,5,1)
  (same comment as for cement, unspecified)
- waste graphical paper: -1.69726e-6, -2.59179e-7, -2.26629e-8, -9.36524e-7, -9.13189e-8, -1.69041e-7, -4.09465e-6, -3.15294e-5 kg (8 entries)
  (same comment as for waste graphical paper)
  production volume 1.18986e6 kg
- electricity, low voltage: 3.34071e-6, 6.08279e-7, 1.37312e-5, 4.79735e-5, 9.79405e-6, 0.00015037, 2.43272e-5, 6.98552e-5 kWh (8 entries); lognormal variance with pedigree 0.55, pedigree (5,5,5,5,5)
  (same comment as for electricity, low voltage)
- process-specific burdens, municipal waste incineration: 3.53593e-5, 8.96407e-5 kg (2 entries); lognormal variance with pedigree 0.722, pedigree (1,1,5,5,1)
  (same comment as for process-specific burdens, municipal waste incineration)
- electricity, high voltage: 2.13059e-7, 4.08454e-8, 9.40817e-7, 6.92533e-7, 9.97221e-6, 1.5815e-6, 4.55903e-6 kWh (7 entries); lognormal variance with pedigree 1.112, pedigree (1,1,5,5,1)
  (same comment as for cement, unspecified)
- process-specific burdens, residual material landfill: 2.46384e-7, 6.24616e-7 kg (2 entries); lognormal variance with pedigree 0.442, pedigree (1,1,5,5,1)
  (same comment as for process-specific burdens, residual material landfill)
- waste cement, hydrated: -2.46384e-7, -6.24616e-7 kg (2 entries)
  (same comment as for cement, unspecified)
  production volume 26710.6 kg
- heat, central or small-scale, other than natural gas: 4.82673e-7, 3.51433e-5 MJ (2 entries); lognormal variance with pedigree 0.21, pedigree (5,5,5,5,5)
  (same comment as for electricity, low voltage)
- ammonia, anhydrous, liquid: 8.0701e-9, 6.93722e-10, 1.07925e-9, 2.13838e-9, 2.09505e-9, 2.19584e-10, 9.81621e-10, 2.32223e-8 kg (8 entries); lognormal variance with pedigree 0.762, pedigree (1,1,5,5,1)
  (same comment as for cement, unspecified)
- waste plastic, mixture: -4.31618e-6, -2.88391e-7, -2.18105e-8, -1.19116e-7, -4.81214e-8, -1.13112e-7, -3.67759e-6, -3.02157e-5 kg (8 entries)
  (same comment as for waste plastic, mixture)
  production volume 1.18986e6 kg
- heat, district or industrial, natural gas: 5.83565e-7, 1.39834e-5, 3.78641e-5 MJ (3 entries); lognormal variance with pedigree 0.762, pedigree (1,1,5,5,1)
  (same comment as for hydrochloric acid, without water, in 30% solution state)
- process-specific burdens, slag landfill: 1.45397e-6, 3.68603e-6 kg (2 entries); lognormal variance with pedigree 0.562, pedigree (1,1,5,5,1)
  (same comment as for cement, unspecified)
- heat, district or industrial, other than natural gas: 4.25612e-8, 0.000104957 MJ (2 entries); lognormal variance with pedigree 0.722, pedigree (1,1,5,5,1)
  (same comment as for process-specific burdens, residual material landfill)

## Emissions to nature
- Arsenic [air, non-urban air or from high stacks]: 3.87e-11 kg; lognormal variance with pedigree 2.692, pedigree (1,1,5,5,1)
  burden from direct release or incineration of landfill biogas. Uncertainty calculated from unertainty of the waste composition of this waste, uncertainty in waste decomposition and short-term leaching in sanitary landfill
- Beryllium [air, non-urban air or from high stacks]: 5.88e-14 kg; lognormal variance with pedigree 3.532, pedigree (1,1,5,5,1)
  (same comment as for Arsenic)
- Chloride [water, surface water]: 3.11e-5 kg; lognormal variance with pedigree 0.932, pedigree (1,1,5,5,1)
  Emissions from short-term leachate treatment. Uncertainty calculated depending on waste input and uncertainty of transfer coefficents in landfill and wastewater treatment.
- Sulfate [water, surface water]: 4.1e-6 kg; lognormal variance with pedigree 1.322, pedigree (1,1,5,5,1)
  (same comment as for Chloride)
- NMVOC, non-methane volatile organic compounds, unspecified origin [air, non-urban air or from high stacks]: 1.86e-8 kg; lognormal variance with pedigree 0.462, pedigree (1,1,5,5,1)
  (same comment as for Arsenic)
- COD, Chemical Oxygen Demand [water, surface water]: 0.000127 kg; lognormal variance with pedigree 0.862, pedigree (1,1,5,5,1)
  Emissions from short-term leachate treatment and incineration of resulting sludge. Uncertainty calculated depending on waste input and uncertainty of transfer coefficents in landfill, wastewater treatment and incineration model.
- Sodium, ion [water, surface water]: 4.91e-5 kg; lognormal variance with pedigree 0.882, pedigree (1,1,5,5,1)
  (same comment as for Chloride)
- Vanadium, ion [water, ground-, long-term]: 0.000542 kg; lognormal variance with pedigree 1.002, pedigree (1,1,5,5,1)
  Emissions from long-term leachate (>100a) directly from MSW landfill and indirectly via incineration of treatement sludge from leachate treatement. Uncertainty calculated depending on waste input and uncertainty of long-term transfer coefficents in landfill.
- Bromine [water, surface water]: 2.04e-7 kg; lognormal variance with pedigree 1.592, pedigree (1,1,5,5,1)
  (same comment as for Chloride)
- Particulates, < 2.5 um [air, non-urban air or from high stacks]: 3.31e-7 kg; lognormal variance with pedigree 0.722, pedigree (1,1,5,5,1)
  (same comment as for Arsenic)
- Antimony [air, urban air close to ground]: 4.42e-13 kg; lognormal variance with pedigree 2.622, pedigree (1,1,5,5,1)
  (same comment as for COD, Chemical Oxygen Demand)
- Ammonium, ion [water, ground-, long-term]: 0.000435 kg; lognormal variance with pedigree 0.692, pedigree (1,1,5,5,1)
  (same comment as for Vanadium, ion)
- NMVOC, non-methane volatile organic compounds, unspecified origin [air, urban air close to ground]: 5.16e-9 kg; lognormal variance with pedigree 1.032, pedigree (1,1,5,5,1)
  (same comment as for COD, Chemical Oxygen Demand)
- Vanadium [air, urban air close to ground]: 9.67e-11 kg; lognormal variance with pedigree 1.322, pedigree (1,1,5,5,1)
  (same comment as for COD, Chemical Oxygen Demand)
- Copper [air, non-urban air or from high stacks]: 4.89e-13 kg; lognormal variance with pedigree 3.242, pedigree (1,1,5,5,1)
  (same comment as for Arsenic)
- TOC, Total Organic Carbon [water, ground-, long-term]: 0.176 kg; lognormal variance with pedigree 0.512, pedigree (1,1,5,5,1)
  (same comment as for Vanadium, ion)
- Selenium [air, non-urban air or from high stacks]: 4.48e-13 kg; lognormal variance with pedigree 3.272, pedigree (1,1,5,5,1)
  (same comment as for Arsenic)
- Carbon dioxide, fossil [air, urban air close to ground]: 0.00058 kg; lognormal variance with pedigree 0.862, pedigree (1,1,5,5,1)
  (same comment as for COD, Chemical Oxygen Demand)
- Cobalt [water, surface water]: 2.31e-9 kg; lognormal variance with pedigree 2.072, pedigree (1,1,5,5,1)
  (same comment as for COD, Chemical Oxygen Demand)
- Aluminium [air, non-urban air or from high stacks]: 2.02e-11 kg; lognormal variance with pedigree 2.762, pedigree (1,1,5,5,1)
  (same comment as for Arsenic)
- Antimony [air, non-urban air or from high stacks]: 2.24e-12 kg; lognormal variance with pedigree 3.062, pedigree (1,1,5,5,1)
  (same comment as for Arsenic)
- Mercury [air, urban air close to ground]: 0 kg; pedigree (1,1,1,1,1)
  (same comment as for COD, Chemical Oxygen Demand)
- Bromine [air, non-urban air or from high stacks]: 2.86e-9 kg; lognormal variance with pedigree 2.132, pedigree (1,1,5,5,1)
  (same comment as for Arsenic)
- Calcium [air, non-urban air or from high stacks]: 7.12e-10 kg; lognormal variance with pedigree 2.302, pedigree (1,1,5,5,1)
  (same comment as for Arsenic)
- Beryllium [water, ground-, long-term]: 4.05e-7 kg; lognormal variance with pedigree 1.722, pedigree (1,1,5,5,1)
  (same comment as for Vanadium, ion)
- Chromium, ion [water, surface water]: 1.88e-12 kg; lognormal variance with pedigree 2.282, pedigree (1,1,5,5,1)
  (same comment as for COD, Chemical Oxygen Demand)
- Hydrogen fluoride [air, non-urban air or from high stacks]: 4.84e-8 kg; lognormal variance with pedigree 1.762, pedigree (1,1,5,5,1)
  (same comment as for Arsenic)
- Nitrate [water, surface water]: 4.83e-5 kg; lognormal variance with pedigree 0.632, pedigree (1,1,5,5,1)
  (same comment as for COD, Chemical Oxygen Demand)
- Tin, ion [water, surface water]: 7.94e-11 kg; lognormal variance with pedigree 2.482, pedigree (1,1,5,5,1)
  (same comment as for COD, Chemical Oxygen Demand)
- Iron, ion [water, surface water]: 9.03e-8 kg; lognormal variance with pedigree 1.582, pedigree (1,1,5,5,1)
  (same comment as for COD, Chemical Oxygen Demand)
- Magnesium [water, surface water]: 4.51e-7 kg; lognormal variance with pedigree 1.462, pedigree (1,1,5,5,1)
  (same comment as for COD, Chemical Oxygen Demand)
- Barium [air, non-urban air or from high stacks]: 5.8e-10 kg; lognormal variance with pedigree 2.342, pedigree (1,1,5,5,1)
  (same comment as for Arsenic)
- Methane, fossil [air, non-urban air or from high stacks]: 0.00266 kg; lognormal variance with pedigree 0.462, pedigree (1,1,5,5,1)
  (same comment as for Arsenic)
- Cobalt [air, non-urban air or from high stacks]: 1.14e-12 kg; lognormal variance with pedigree 3.152, pedigree (1,1,5,5,1)
  (same comment as for Arsenic)
- Aluminium [air, urban air close to ground]: 1.19e-10 kg; lognormal variance with pedigree 1.722, pedigree (1,1,5,5,1)
  (same comment as for COD, Chemical Oxygen Demand)
- Cobalt [air, urban air close to ground]: 0 kg; pedigree (1,1,1,1,1)
  (same comment as for COD, Chemical Oxygen Demand)
- Nickel, ion [water, ground-, long-term]: 8.09e-7 kg; lognormal variance with pedigree 1.632, pedigree (1,1,5,5,1)
  (same comment as for Vanadium, ion)
- Strontium [water, surface water]: 2.12e-8 kg; lognormal variance with pedigree 1.772, pedigree (1,1,5,5,1)
  (same comment as for COD, Chemical Oxygen Demand)
- Chromium [air, urban air close to ground]: 0 kg; pedigree (1,1,1,1,1)
  (same comment as for COD, Chemical Oxygen Demand)
- Hydrogen chloride [air, non-urban air or from high stacks]: 4.48e-7 kg; lognormal variance with pedigree 1.462, pedigree (1,1,5,5,1)
  (same comment as for Arsenic)
- Strontium [air, non-urban air or from high stacks]: 1.04e-11 kg; lognormal variance with pedigree 2.852, pedigree (1,1,5,5,1)
  (same comment as for Arsenic)
- Antimony [water, ground-, long-term]: 8.55e-7 kg; lognormal variance with pedigree 2.652, pedigree (1,1,5,5,1)
  (same comment as for Vanadium, ion)
- Vanadium [air, non-urban air or from high stacks]: 4.91e-10 kg; lognormal variance with pedigree 2.352, pedigree (1,1,5,5,1)
  (same comment as for Arsenic)
- Mercury [water, surface water]: 8.78e-12 kg; lognormal variance with pedigree 2.662, pedigree (1,1,5,5,1)
  (same comment as for COD, Chemical Oxygen Demand)
- Lead [water, ground-, long-term]: 1.91e-5 kg; lognormal variance with pedigree 1.222, pedigree (1,1,5,5,1)
  (same comment as for Vanadium, ion)
- Chromium VI [water, ground-, long-term]: 4.77e-8 kg; lognormal variance with pedigree 8.592, pedigree (1,1,5,5,1)
  (same comment as for Vanadium, ion)
- Carbon monoxide, fossil [air, urban air close to ground]: 3.74e-7 kg; lognormal variance with pedigree 0.922, pedigree (1,1,5,5,1)
  (same comment as for COD, Chemical Oxygen Demand)
- Tin [air, urban air close to ground]: 1.46e-13 kg; lognormal variance with pedigree 2.522, pedigree (1,1,5,5,1)
  (same comment as for COD, Chemical Oxygen Demand)
- Tin [air, non-urban air or from high stacks]: 4.74e-14 kg; lognormal variance with pedigree 3.552, pedigree (1,1,5,5,1)
  (same comment as for Arsenic)
- Copper, ion [water, ground-, long-term]: 3.49e-5 kg; lognormal variance with pedigree 1.142, pedigree (1,1,5,5,1)
  (same comment as for Vanadium, ion)
- Sulfate [water, ground-, long-term]: 0.001 kg; lognormal variance with pedigree 0.832, pedigree (1,1,5,5,1)
  (same comment as for Vanadium, ion)
- Selenium [water, ground-, long-term]: 4.8e-7 kg; lognormal variance with pedigree 1.942, pedigree (1,1,5,5,1)
  (same comment as for Vanadium, ion)
- Magnesium [air, non-urban air or from high stacks]: 1.25e-10 kg; lognormal variance with pedigree 2.532, pedigree (1,1,5,5,1)
  (same comment as for Arsenic)
- Nitrogen [water, surface water]: 3.59e-7 kg; lognormal variance with pedigree 0.642, pedigree (1,1,5,5,1)
  (same comment as for COD, Chemical Oxygen Demand)
- Copper, ion [water, surface water]: 4.44e-10 kg; lognormal variance with pedigree 2.192, pedigree (1,1,5,5,1)
  (same comment as for COD, Chemical Oxygen Demand)
- Chromium [air, non-urban air or from high stacks]: 3e-13 kg; lognormal variance with pedigree 3.312, pedigree (1,1,5,5,1)
  (same comment as for Arsenic)
- Nickel [air, urban air close to ground]: 0 kg; pedigree (1,1,1,1,1)
  (same comment as for COD, Chemical Oxygen Demand)
- Bromine [water, ground-, long-term]: 7.89e-6 kg; lognormal variance with pedigree 1.342, pedigree (1,1,5,5,1)
  (same comment as for Vanadium, ion)
- Methane, fossil [air, urban air close to ground]: 1.14e-6 kg; lognormal variance with pedigree 0.912, pedigree (1,1,5,5,1)
  (same comment as for COD, Chemical Oxygen Demand)
- Magnesium [air, urban air close to ground]: 6.75e-11 kg; lognormal variance with pedigree 1.492, pedigree (1,1,5,5,1)
  (same comment as for COD, Chemical Oxygen Demand)
- Nickel [air, non-urban air or from high stacks]: 1.18e-13 kg; lognormal variance with pedigree 3.442, pedigree (1,1,5,5,1)
  (same comment as for Arsenic)
- Nitrite [water, ground-, long-term]: 2.37e-5 kg; lognormal variance with pedigree 0.692, pedigree (1,1,5,5,1)
  (same comment as for Vanadium, ion)
- Nitrite [water, surface water]: 2.78e-7 kg; lognormal variance with pedigree 0.952, pedigree (1,1,5,5,1)
  (same comment as for COD, Chemical Oxygen Demand)
- Lead [water, surface water]: 1.24e-10 kg; lognormal variance with pedigree 2.252, pedigree (1,1,5,5,1)
  (same comment as for COD, Chemical Oxygen Demand)
- COD, Chemical Oxygen Demand [water, ground-, long-term]: 0.193 kg; lognormal variance with pedigree 0.512, pedigree (1,1,5,5,1)
  (same comment as for Vanadium, ion)
- Antimony [water, surface water]: 6.08e-9 kg; lognormal variance with pedigree 1.982, pedigree (1,1,5,5,1)
  (same comment as for COD, Chemical Oxygen Demand)
- Vanadium, ion [water, surface water]: 9.97e-7 kg; lognormal variance with pedigree 1.272, pedigree (1,1,5,5,1)
  (same comment as for COD, Chemical Oxygen Demand)
- Nitrate [water, ground-, long-term]: 4.58e-5 kg; lognormal variance with pedigree 0.682, pedigree (1,1,5,5,1)
  (same comment as for Vanadium, ion)
- Iron, ion [water, ground-, long-term]: 9.08e-5 kg; lognormal variance with pedigree 2.432, pedigree (1,1,5,5,1)
  (same comment as for Vanadium, ion)
- Cadmium [air, urban air close to ground]: 1.38e-12 kg; lognormal variance with pedigree 1.812, pedigree (1,1,5,5,1)
  (same comment as for COD, Chemical Oxygen Demand)
- Nickel, ion [water, surface water]: 2.86e-10 kg; lognormal variance with pedigree 2.362, pedigree (1,1,5,5,1)
  (same comment as for COD, Chemical Oxygen Demand)
- Iron [air, non-urban air or from high stacks]: 4.45e-11 kg; lognormal variance with pedigree 2.652, pedigree (1,1,5,5,1)
  (same comment as for Arsenic)
- Aluminium [water, surface water]: 4.86e-9 kg; lognormal variance with pedigree 1.682, pedigree (1,1,5,5,1)
  (same comment as for COD, Chemical Oxygen Demand)
- Mercury [water, ground-, long-term]: 4.04e-8 kg; lognormal variance with pedigree 1.962, pedigree (1,1,5,5,1)
  (same comment as for Vanadium, ion)
- Sodium, ion [water, ground-, long-term]: 0.00114 kg; lognormal variance with pedigree 0.682, pedigree (1,1,5,5,1)
  (same comment as for Vanadium, ion)
- Strontium [air, urban air close to ground]: 2.05e-12 kg; lognormal variance with pedigree 1.822, pedigree (1,1,5,5,1)
  (same comment as for COD, Chemical Oxygen Demand)
- Cobalt [water, ground-, long-term]: 1.41e-6 kg; lognormal variance with pedigree 1.562, pedigree (1,1,5,5,1)
  (same comment as for Vanadium, ion)
- Mercury [air, non-urban air or from high stacks]: 1.11e-11 kg; lognormal variance with pedigree 2.792, pedigree (1,1,5,5,1)
  (same comment as for Arsenic)
- Calcium [air, urban air close to ground]: 4.66e-10 kg; lognormal variance with pedigree 1.252, pedigree (1,1,5,5,1)
  (same comment as for COD, Chemical Oxygen Demand)
- Barium [water, ground-, long-term]: 0.000202 kg; lognormal variance with pedigree 0.892, pedigree (1,1,5,5,1)
  (same comment as for Vanadium, ion)
- Sodium [air, non-urban air or from high stacks]: 1.23e-8 kg; lognormal variance with pedigree 1.932, pedigree (1,1,5,5,1)
  (same comment as for Arsenic)
- Zinc [air, non-urban air or from high stacks]: 3.04e-11 kg; lognormal variance with pedigree 2.712, pedigree (1,1,5,5,1)
  (same comment as for Arsenic)
- TOC, Total Organic Carbon [water, surface water]: 3.23e-5 kg; lognormal variance with pedigree 0.862, pedigree (1,1,5,5,1)
  (same comment as for COD, Chemical Oxygen Demand)
- Zinc [air, urban air close to ground]: 1.54e-12 kg; lognormal variance with pedigree 1.672, pedigree (1,1,5,5,1)
  (same comment as for COD, Chemical Oxygen Demand)
- Thallium [air, urban air close to ground]: 9.27e-14 kg; lognormal variance with pedigree 2.522, pedigree (1,1,5,5,1)
  (same comment as for COD, Chemical Oxygen Demand)
- Ammonia [air, urban air close to ground]: 2.44e-8 kg; lognormal variance with pedigree 0.672, pedigree (1,1,5,5,1)
  (same comment as for COD, Chemical Oxygen Demand)
- Hydrogen sulfide [water, ground-, long-term]: 2.61e-5 kg; lognormal variance with pedigree 0.832, pedigree (1,1,5,5,1)
  (same comment as for Vanadium, ion)
- Manganese [air, urban air close to ground]: 0 kg; pedigree (1,1,1,1,1)
  (same comment as for COD, Chemical Oxygen Demand)
- Magnesium [water, ground-, long-term]: 8.05e-5 kg; lognormal variance with pedigree 1.032, pedigree (1,1,5,5,1)
  (same comment as for Vanadium, ion)
- Cadmium, ion [water, surface water]: 2.56e-8 kg; lognormal variance with pedigree 1.752, pedigree (1,1,5,5,1)
  (same comment as for COD, Chemical Oxygen Demand)
- Zinc, ion [water, ground-, long-term]: 0.000238 kg; lognormal variance with pedigree 0.872, pedigree (1,1,5,5,1)
  (same comment as for Vanadium, ion)
- Cadmium, ion [water, ground-, long-term]: 2.86e-5 kg; lognormal variance with pedigree 1.172, pedigree (1,1,5,5,1)
  (same comment as for Vanadium, ion)
- Arsenic, ion [water, ground-, long-term]: 1.54e-6 kg; lognormal variance with pedigree 1.552, pedigree (1,1,5,5,1)
  (same comment as for Vanadium, ion)
- Calcium, ion [water, ground-, long-term]: 0.00218 kg; lognormal variance with pedigree 0.602, pedigree (1,1,5,5,1)
  (same comment as for Vanadium, ion)
- Thallium [air, non-urban air or from high stacks]: 4.71e-14 kg; lognormal variance with pedigree 3.562, pedigree (1,1,5,5,1)
  (same comment as for Arsenic)
- Lead [air, urban air close to ground]: 3.72e-14 kg; lognormal variance with pedigree 2.312, pedigree (1,1,5,5,1)
  (same comment as for COD, Chemical Oxygen Demand)
- Beryllium [air, urban air close to ground]: 1.16e-13 kg; lognormal variance with pedigree 2.492, pedigree (1,1,5,5,1)
  (same comment as for COD, Chemical Oxygen Demand)
- Cyanide [air, urban air close to ground]: 6.86e-10 kg; lognormal variance with pedigree 0.772, pedigree (1,1,5,5,1)
  (same comment as for COD, Chemical Oxygen Demand)
- Arsenic, ion [water, surface water]: 2.44e-9 kg; lognormal variance with pedigree 2.132, pedigree (1,1,5,5,1)
  (same comment as for COD, Chemical Oxygen Demand)
- Sulfur dioxide [air, non-urban air or from high stacks]: 4.7e-7 kg; lognormal variance with pedigree 1.542, pedigree (1,1,5,5,1)
  (same comment as for Arsenic)
- Ammonium, ion [water, surface water]: 1.32e-5 kg; lognormal variance with pedigree 0.702, pedigree (1,1,5,5,1)
  (same comment as for COD, Chemical Oxygen Demand)
- Barium [air, urban air close to ground]: 2.18e-9 kg; lognormal variance with pedigree 1.302, pedigree (1,1,5,5,1)
  (same comment as for COD, Chemical Oxygen Demand)
- Thallium [water, surface water]: 9.56e-11 kg; lognormal variance with pedigree 2.482, pedigree (1,1,5,5,1)
  (same comment as for COD, Chemical Oxygen Demand)
- Titanium, ion [water, ground-, long-term]: 0.000809 kg; lognormal variance with pedigree 0.732, pedigree (1,1,5,5,1)
  (same comment as for Vanadium, ion)
- Titanium, ion [water, surface water]: 2.05e-7 kg; lognormal variance with pedigree 1.472, pedigree (1,1,5,5,1)
  (same comment as for COD, Chemical Oxygen Demand)
- DOC, Dissolved Organic Carbon [water, ground-, long-term]: 0.176 kg; lognormal variance with pedigree 0.512, pedigree (1,1,5,5,1)
  (same comment as for Vanadium, ion)
- Fluoride [water, surface water]: 8.92e-9 kg; lognormal variance with pedigree 1.982, pedigree (1,1,5,5,1)
  (same comment as for Chloride)
- Arsenic [air, urban air close to ground]: 7.78e-13 kg; lognormal variance with pedigree 2.182, pedigree (1,1,5,5,1)
  (same comment as for COD, Chemical Oxygen Demand)
- Selenium [air, urban air close to ground]: 0 kg; pedigree (1,1,1,1,1)
  (same comment as for COD, Chemical Oxygen Demand)
- Calcium, ion [water, surface water]: 2.57e-6 kg; lognormal variance with pedigree 1.212, pedigree (1,1,5,5,1)
  (same comment as for COD, Chemical Oxygen Demand)
- Selenium [water, surface water]: 1.2e-9 kg; lognormal variance with pedigree 2.192, pedigree (1,1,5,5,1)
  (same comment as for COD, Chemical Oxygen Demand)
- Lead [air, non-urban air or from high stacks]: 3.75e-13 kg; lognormal variance with pedigree 3.282, pedigree (1,1,5,5,1)
  (same comment as for Arsenic)
- Dinitrogen monoxide [air, urban air close to ground]: 6.73e-8 kg; lognormal variance with pedigree 0.602, pedigree (1,1,5,5,1)
  (same comment as for COD, Chemical Oxygen Demand)
- Thallium [water, ground-, long-term]: 3.24e-7 kg; lognormal variance with pedigree 1.752, pedigree (1,1,5,5,1)
  (same comment as for Vanadium, ion)
- DOC, Dissolved Organic Carbon [water, surface water]: 3.1e-5 kg; lognormal variance with pedigree 0.862, pedigree (1,1,5,5,1)
  (same comment as for COD, Chemical Oxygen Demand)
- Fluoride [water, ground-, long-term]: 1.21e-5 kg; lognormal variance with pedigree 1.282, pedigree (1,1,5,5,1)
  (same comment as for Vanadium, ion)
- Tin, ion [water, ground-, long-term]: 3.22e-6 kg; lognormal variance with pedigree 1.462, pedigree (1,1,5,5,1)
  (same comment as for Vanadium, ion)
- Cadmium [air, non-urban air or from high stacks]: 3.36e-10 kg; lognormal variance with pedigree 2.412, pedigree (1,1,5,5,1)
  (same comment as for Arsenic)
- Chromium VI [water, surface water]: 6.28e-10 kg; lognormal variance with pedigree 2.242, pedigree (1,1,5,5,1)
  (same comment as for COD, Chemical Oxygen Demand)
- Titanium [air, non-urban air or from high stacks]: 1.01e-10 kg; lognormal variance with pedigree 2.552, pedigree (1,1,5,5,1)
  (same comment as for Arsenic)
- Nitrogen oxides [air, urban air close to ground]: 2.39e-7 kg; lognormal variance with pedigree 0.662, pedigree (1,1,5,5,1)
  (same comment as for COD, Chemical Oxygen Demand)
- Nitrogen, organic bound [water, ground-, long-term]: 0.000712 kg; lognormal variance with pedigree 0.692, pedigree (1,1,5,5,1)
  (same comment as for Vanadium, ion)
- BOD5, Biological Oxygen Demand [water, ground-, long-term]: 0.0456 kg; lognormal variance with pedigree 0.512, pedigree (1,1,5,5,1)
  (same comment as for Vanadium, ion)
- Barium [water, surface water]: 1.39e-7 kg; lognormal variance with pedigree 1.282, pedigree (1,1,5,5,1)
  (same comment as for COD, Chemical Oxygen Demand)
- Carbon monoxide, fossil [air, non-urban air or from high stacks]: 9.85e-7 kg; lognormal variance with pedigree 1.062, pedigree (1,1,5,5,1)
  (same comment as for Arsenic)
- Carbon dioxide, fossil [air, non-urban air or from high stacks]: 0.0174 kg; lognormal variance with pedigree 0.422, pedigree (1,1,5,5,1)
  (same comment as for Arsenic)
- Manganese [water, ground-, long-term]: 2.47e-5 kg; lognormal variance with pedigree 1.182, pedigree (1,1,5,5,1)
  (same comment as for Vanadium, ion)
- Manganese [water, surface water]: 1.47e-7 kg; lognormal variance with pedigree 1.532, pedigree (1,1,5,5,1)
  (same comment as for COD, Chemical Oxygen Demand)
- Chloride [water, ground-, long-term]: 0.0012 kg; lognormal variance with pedigree 0.672, pedigree (1,1,5,5,1)
  (same comment as for Vanadium, ion)
- Strontium [water, ground-, long-term]: 7.16e-5 kg; lognormal variance with pedigree 1.052, pedigree (1,1,5,5,1)
  (same comment as for Vanadium, ion)
- Aluminium [water, ground-, long-term]: 0.000162 kg; lognormal variance with pedigree 0.942, pedigree (1,1,5,5,1)
  (same comment as for Vanadium, ion)
- Nitrogen oxides [air, non-urban air or from high stacks]: 7.06e-9 kg; lognormal variance with pedigree 1.322, pedigree (1,1,5,5,1)
  (same comment as for Arsenic)
- BOD5, Biological Oxygen Demand [water, surface water]: 4.01e-5 kg; lognormal variance with pedigree 0.862, pedigree (1,1,5,5,1)
  (same comment as for COD, Chemical Oxygen Demand)
- Manganese [air, non-urban air or from high stacks]: 7.26e-11 kg; lognormal variance with pedigree 2.612, pedigree (1,1,5,5,1)
  (same comment as for Arsenic)
- Iron [air, urban air close to ground]: 2.93e-12 kg; lognormal variance with pedigree 1.632, pedigree (1,1,5,5,1)
  (same comment as for COD, Chemical Oxygen Demand)
- Beryllium [water, surface water]: 1.2e-10 kg; lognormal variance with pedigree 2.452, pedigree (1,1,5,5,1)
  (same comment as for COD, Chemical Oxygen Demand)
- Zinc, ion [water, surface water]: 4.23e-8 kg; lognormal variance with pedigree 1.612, pedigree (1,1,5,5,1)
  (same comment as for COD, Chemical Oxygen Demand)
- Copper [air, urban air close to ground]: 9.35e-15 kg; lognormal variance with pedigree 2.272, pedigree (1,1,5,5,1)
  (same comment as for COD, Chemical Oxygen Demand)
- Titanium [air, urban air close to ground]: 1.99e-10 kg; lognormal variance with pedigree 1.512, pedigree (1,1,5,5,1)
  (same comment as for COD, Chemical Oxygen Demand)

## Sampling procedure
Landfill model based on observed leachate concentrations in literature. Extrapolated to 60'000 years heeding chemical characteristics. Initial waste composition from various literature sources.

## Extrapolations
This dataset has been copied from an original dataset covering the geography CH. The uncertainty has been adjusted accordingly.

## Review by Niels Jungbluth 2003-07-21
Passed. Calculation for standard deviation 95 of, i.e., infrastructure,
land occupation, transport services or other services can differ from
standard Pedigree approach used in this project and figures obtained by
this procedure.
