# treatment of metal part of electronics scrap, in copper, anode, by electrolytic refining

Dataset: EcoSpold 2, unit process
Geography: SE
Time period: 2000-01-01 to 2021-12-31
Technology level: current
Classification: ISIC rev.4 ecoinvent: 2420:Manufacture of basic precious and other non-ferrous metals
Classification: EcoSpold01Categories: metals/extraction
Tags: ConvertedDataset
Scenario: Business-as-Usual
System model: Allocation, cut-off by classification
Generated by: Mischa Classen
Published in: Classen M. 2009
Database: ecoinvent
isCopyrightProtected: true
accessRestrictedTo: 1

## General comment
The multi-output-process "secondary copper refining" delivers the co-products "precious metals from electric waste, in anode slime, at refinery", "copper, secondary, from electronic and electric scrap recycling, at refinery" and "nickel, secondary, from electronic and electric scrap recycling, at refinery". The product "precious metals from electric waste, …" is an intermediary in the production of secondary gold from electric scrap and is not to be used by the LCA practitioner. The flows "copper, …" and "nickel, …" are by-products of this process that receive part of the burdens allocated. They must not be used.
[This dataset was already contained in the ecoinvent database version 2. It was not individually updated during the transfer to ecoinvent version 3. Life Cycle Impact Assessment results may still have changed, as they are affected by changes in the supply chain, i.e. in other datasets. This dataset was generated following the ecoinvent quality guidelines for version 2. It may have been subject to central changes described in the ecoinvent version 3 change report (http://www.ecoinvent.org/database/ecoinvent-version-3/reports-of-changes/), and the results of the central updates were reviewed extensively. The changes added e.g. consistent water flows and other information throughout the database. The documentation of this dataset can be found in the ecoinvent reports of version 2, which are still available via the ecoinvent website. The change report linked above covers all central changes that were made during the conversion process.]

## Included activities end
Includes the refining of the copper anode to cathode copper.

## Geography
Data describes a Swedish plant that is singular in the region and ranges worldwide among the big producer. It may be taken as approximation for the global situation

## Technology
Production of cathode copper by electrolytic refining.

## Parameters
- fraction, water, completely softened, to air: 0.15 dimensionless; name fraction_WCS_to_air; = fraction_PW_to_air; lognormal variance with pedigree 0.092025, pedigree (4,4,3,2,4)
  Calculated value. See comment in the other parametres present in this dataset. Water, completely softened is considered to be always used as process water, thus process water fractions to air are applied to all water, completely softened input flows to calculate the amount of water consumed in the processes.
- fraction, process water, to air: 0.15 dimensionless; name fraction_PW_to_air; lognormal variance with pedigree 0.092025, pedigree (4,4,3,2,4)
  Literature value. In case when no industry/process specific data are available, default evaporation fraction value is used. This value is 15% and is based on literature (Statistics Canada, 2007 & Shaffer, K.H., 2008, Consumptive water use in the Great Lakes Basin, USGS & Shiklomanov, 2003, World Water Resources at the Beginning of the 21st Century) and has been approved by an expert.

## Reference product
- metal part of electronics scrap, in copper, anode: 0 kg; By-product classification allocatable product; CPC 393: Metal wastes or scraps
  EcoSpold01Location=SE
  production volume 0 kg; = ABS( RP/ ByP_01* ByP_01_PV)
    Calculated relative to precious metals output.
  property price 53.8 EUR2005
    Temporary price data. Calculated as 90% of purchasers price based on: Price of amount of electronics scrap required (2.7244 kg/kg metal) plus copper treatment costs (23%)
  property carbon content 0
    carbon content on a dry matter basis (reserved; not for manual entry)
  properties: carbon content, non-fossil 0, carbon content, fossil 0, water in wet mass 0 kg, wet mass 1 kg, water content 0, dry mass 1 kg, carbon allocation 0 kg
- nickel, class 1: 1 kg; name ByP_03; By-product classification allocatable product; CPC 41422: Unwrought nickel; CAS 7440-02-0
  EcoSpold01Location=SE
  production volume 7420.24 kg; = ByP_03/ ByP_01* ByP_01_PV
  property true value 66.328; name ByP_03_true_value
  properties: carbon content, non-fossil 0, water in wet mass 0 kg, carbon content, fossil 0, wet mass 1 kg, dry mass 1 kg, price 12.0741 EUR2005, water content 0, carbon content 0, carbon allocation 0 kg

## By-products
- nickel, class 1: 0 kg; By-product classification allocatable product; CPC 41422: Unwrought nickel; CAS 7440-02-0
  EcoSpold01Location=SE
  production volume 0 kg; = ByP_03/ ByP_01* ByP_01_PV
    Calculated relative to precious metals output.
  property price 12.0741 EUR2005
    Price calculated as 5-year market average (2015-2019; USD/kg; USGS [2020]) and converted to EUR2005 (USD2019/EUR2005 exchange rate: 0.62; Official Data Foundation [2020] and Macrotrends [2020]).
  property carbon content 0
    carbon content on a dry matter basis (reserved; not for manual entry)
  properties: carbon content, non-fossil 0, water in wet mass 0 kg, carbon content, fossil 0, wet mass 1 kg, dry mass 1 kg, water content 0, carbon allocation 0 kg
- precious metal from electronics scrap, in anode slime: 0 kg; name ByP_01; CPC 3933: Waste and scrap of precious metal; By-product classification allocatable product
  Activity link introduced to the activity with the corresponding output in SE.
  EcoSpold01Location=SE
  production volume 1350.76 kg; name ByP_01_PV
    Calculated from the "treatment of precious metal from electronics scrap, in anode slime, precious metal extraction"/SE.
  property price 897 EUR2005
    Temporary price data. Calculated as 90% of purchasers price based on: Price is from Ecoinvent report no 10, fig 5.15, page 94. Same price assumed for all considereed years and parts of the world.
  property carbon content 0
    carbon content on a dry matter basis (reserved; not for manual entry)
  property true value 897; name ByP_01_true_value
    allocation property applied in "true value" allocation // value calculated from revenue
  properties: water in wet mass 0 kg, water content 0, dry mass 1 kg, carbon content, non-fossil 0, carbon content, fossil 0, wet mass 1 kg, carbon allocation 0 kg
- copper, cathode: 0 kg; name ByP_02; By-product classification allocatable product; CPC 41413: Refined copper and copper alloys, unwrought; master alloys of copper; CAS 7440-50-8
  EcoSpold01Location=SE
  production volume 52657.9 kg; = ByP_02/ ByP_01* ByP_01_PV
    Calculated relative to precious metals output.
  property price 3.57105 EUR2005
    Price calculated as 5-year market average (2015-2019; USD/kg; USGS [2020]) and converted to EUR2005 (USD2019/EUR2005 exchange rate: 0.62; Official Data Foundation [2020] and Macrotrends [2020]).
    References:
    Official Data Foundation (2020). Inflation Calculator [Online]. Available from: https://www.officialdata.org/us/inflation/2005?endYear=2019&amount=1 [Accessed 28/07/2020]
    USGS (2020). Mineral Commodity Summaries 2020 [Online]. Available from: https://pubs.usgs.gov/periodicals/mcs2020/mcs2020.pdf [Accessed 28/07/2020]
    Macrotrends (2020). Euro Dollar Exchange Rate (EUR USD) - Historical Chart [Online]. Available from: https://www.macrotrends.net/2548/euro-dollar-exchange-rate-historical-chart [Accessed 28/07/2020]
  property carbon content 0
    carbon content on a dry matter basis (reserved; not for manual entry)
  property true value 139.214; name ByP_02_true_value
    allocation property applied in "true value" allocation // value calculated from revenue
  properties: dry mass 1 kg, water content 0, wet mass 1 kg, water in wet mass 0 kg, carbon content, non-fossil 0, carbon content, fossil 0, carbon allocation 0 kg

## Inputs from technosphere
- anode refinery: 6.1872e-11 unit; lognormal variance with pedigree 0.3426, pedigree (3,3,5,1,1)
  activityLink introduced to establish a direct link to the corresponding regional supply of this product
  EcoSpold01Location=SE
- water, completely softened: 0.085383 kg; name water_softened_input; lognormal variance with pedigree 0.38, pedigree (5,5,5,5,5)
  EcoSpold01Location=RER
  properties: wet mass 1 kg
- sulfuric acid: 0.0153689 kg; lognormal variance with pedigree 0.38, pedigree (5,5,5,5,5)
  EcoSpold01Location=RER
  properties: wet mass 1 kg, dry mass 1 kg
- heat, district or industrial, natural gas: 0.0160796 MJ; lognormal variance with pedigree 0.084, pedigree (4,5,5,1,3)
  EcoSpold01Location=RER
  properties: heating value, net 1 MJ
- electricity, high voltage: 0.136616 kWh
  (300 to 400 kWh / t cath Cu)
  EcoSpold01Location=UCTE
- metal part of electronics scrap, in copper, anode: 0.661035 kg
  EcoSpold01Location=SE
  production volume 81534.3 kg
  properties: price 53.8 EUR2005, wet mass 1 kg, dry mass 1 kg

## Emissions to nature
- Water [air, unspecified]: 1.28075e-5 m3; name water_to_air_unspecified; = (water_softened_input/1000*fraction_WCS_to_air); lognormal variance with pedigree 0.0807, pedigree (2,2,5,1,1)
  Calculated value based on literature values and expert opinion. See comments in the parametres' comment field.
  property fraction, origin: salt water 0; name fraction_origin_salt_water
  property fraction, origin: fresh water 1; name fraction_origin_fresh_water
  property fraction, origin: unspecified 0; name fraction_origin_unspecified
- Arsenic [air, non-urban air or from high stacks]: 2.68019e-8 kg; lognormal variance with pedigree 0.192, pedigree (4,4,5,5,5)
- Particulates, > 2.5 um, and < 10um [air, non-urban air or from high stacks]: 8.29585e-7 kg; lognormal variance with pedigree 0.3702, pedigree (1,2,5,3,5)
- Copper, ion [water, surface water]: 5.95963e-7 kg; lognormal variance with pedigree 0.792, pedigree (4,4,5,5,5)
- Particulates, > 10 um [air, non-urban air or from high stacks]: 4.14787e-7 kg; lognormal variance with pedigree 0.2902, pedigree (1,2,5,3,5)
- Copper [air, non-urban air or from high stacks]: 4.59457e-8 kg; lognormal variance with pedigree 0.192, pedigree (4,4,5,5,5)
- Nickel, ion [water, surface water]: 5.49442e-8 kg; lognormal variance with pedigree 0.792, pedigree (4,4,5,5,5)
- Nickel [air, non-urban air or from high stacks]: 1.72295e-8 kg; lognormal variance with pedigree 0.192, pedigree (4,4,5,5,5)
- Cadmium, ion [water, surface water]: 1.35926e-8 kg; lognormal variance with pedigree 0.792, pedigree (4,4,5,5,5)
- Particulates, < 2.5 um [air, non-urban air or from high stacks]: 1.24438e-6 kg; lognormal variance with pedigree 0.5502, pedigree (1,2,5,3,5)
- Mercury [water, surface water]: 1.72295e-10 kg; lognormal variance with pedigree 0.792, pedigree (4,4,5,5,5)
- Zinc, ion [water, surface water]: 3.21625e-8 kg; lognormal variance with pedigree 0.792, pedigree (4,4,5,5,5)
- Water [water, unspecified]: 7.25756e-5 m3; name water_to_water_unspecified; = (water_softened_input/1000)*(1-fraction_WCS_to_air); lognormal variance with pedigree 0.0807, pedigree (2,2,5,1,1)
  (same comment as for Water)
  property carbon content, non-fossil 0; name C_content_non_fossil
  property fraction, origin: unspecified 0; name fraction_origin_unspecified_Ww
  property carbon content, fossil 0; name C_content_fossil
  property wet mass 1000 kg; name WM
  property dry mass 0 kg; name DM
  property fraction, origin: salt water 0; name fraction_origin_salt_water_Ww
  property fraction, origin: fresh water 1; name fraction_origin_fresh_water_Ww
  property water in wet mass 1000 kg; name WWM
- Arsenic, ion [water, surface water]: 1.53919e-8 kg; lognormal variance with pedigree 0.792, pedigree (4,4,5,5,5)
- Lead [air, non-urban air or from high stacks]: 1.01464e-7 kg; lognormal variance with pedigree 0.192, pedigree (4,4,5,5,5)
- Lead [water, surface water]: 3.21625e-8 kg; lognormal variance with pedigree 0.792, pedigree (4,4,5,5,5)

## Sampling procedure
Literature

## Extrapolations
see Geography and Technology

## Review by Emilia Moreno Ruiz 2015-10-22
PV adjusted

## Review by Emilia Moreno Ruiz 2018-03-22
Treatment chain linked with activity links to proper suppliers.

## Review by Roberto Dones 2007-08-22
Passed
