# transport, freight, small lorry with refrigeration machine, EURO4, CO2 refrigerant, freezing to generic market

Dataset: EcoSpold 2, unit process
Geography: GLO
Time period: 2010-01-01 to 2021-12-31
Technology level: modern
Classification: ISIC rev.4 ecoinvent: 4923:Freight transport by road
Classification: EcoSpold01Categories: transport systems/road
Tags: linking activity
Scenario: Business-as-Usual
System model: Allocation, cut-off by classification
Generated by: Tereza Levova
Database: ecoinvent
isCopyrightProtected: true
accessRestrictedTo: 1

## General comment
This is a linking activity which transfers part of the production volume of the transport, freight, lorry with refrigeration machine, 3.5-7.5 ton and 7.5-16 ton, EURO4, carbon dioxide, liquid refrigerant, freezing to the generic market for transport, freight, lorry with refrigeration machine, cooling.

## Technology
The technology level of the linking activity is set to be the same as in case of the activity supplying the specific product.

## Parameters
- fraction, to generic market: 0.5 dimensionless; name fraction_to_generic_market; lognormal variance with pedigree 0.1386, pedigree (4,5,1,5,5)
  Estimated value; 50% of the production volume goes to the generic markets for transport, freight, lorry. Meaning, that 50% of people do not care or do not know what is the size or EURO class of the lorries with refrigeration machine.

## Reference product
- transport, freight, lorry with refrigeration machine, freezing: 1 metric ton*km; name transport_RP; CPC 65111: Road transport services of freight by refrigerator vehicles; By-product classification allocatable product
  production volume 2.38756e8 metric ton*km; name transport_RP_PV; = (44983000000*0.1*0.1* fraction_to_generic_market*0.46)+(58824000000*0.1*0.1* fraction_to_generic_market*0.46)
    Calculated value.
    The production volumes of each of the specific EURO classes for the transport, lorry 3.5-7.5 metric tons are;
    EURO3 -> 69204000000 tkm
    EURO4 -> 44983000000 tkm
    EURO5 -> 14533000000 tkm
    EURO6 -> 3460200000 tkm
    It is estimated, that the transport with lorries with refrigeration machine represents 10% of all the transport with lorries.
    Further it is estimated, that 10% of these lorries use carbon dioxide, liquid as refrigerant and remaining 90% use R134a as refrigerant.
    According to literature (Drawry, 2008, published in http://www.hamburg-sued.com/group/media/sharedmedia/dokumente/brochures/Reefer_guide.pdf, accessed 20141216) the type of food transported in reefers is following;
    31% fresh fruits and vegetables (excl. bananas)
    20% bananas
    24% meat and poultry
    19% fish and seafood
    6% various (medicine, flowers, etc.)
    The fruits and vegetables (54%) in general need to be cooled during its storage and transport and the meat and seafood (46%) need to be frozen. The various is divided half/half between cooling and freezing. While this literature source refers to transport in reefers it is assumed, that the ratio between cooling/freezing (0.54/0.46) is the same as for the transport in small lorries.
    It is also estimated, that 50% of this production volume goes to the generic markets for transport, freight, lorry. Meaning, that 50% of people do not care or do not know what is the EURO classification or the sizes of the lorries.
  property price 0.0789054 EUR2005; name transport_RP_price_EUR2005
    Calculated based on inputs: The price of the product has been calculated as a sum of the values of the material and energy inputs for this product. This value is therefore a rough estimation. It may underestimate the real price since there are additional expenses when producing any product. These expences can include for example labour costs, treatment of waste materials and profit for the producer. Please consider carefully whether this level of data quality is acceptable for your application.

## Inputs from technosphere
- transport, freight, lorry with refrigeration machine, 7.5-16 ton, EURO4, carbon dioxide, liquid refrigerant, freezing: 0.566667 metric ton*km; name trans_02; = transport_RP- trans_01; lognormal variance with pedigree 0.0026, pedigree (1,1,3,1,1)
  Calculated value.
- transport, freight, lorry with refrigeration machine, 3.5-7.5 ton, EURO4, carbon dioxide, liquid refrigerant, freezing: 0.433333 metric ton*km; name trans_01; = (44983000000*0.1*0.1* fraction_to_generic_market*0.46)/ transport_RP_PV; lognormal variance with pedigree 0.0026, pedigree (1,1,3,1,1)
  Calculated value.

## Extrapolations
This dataset has been extrapolated from year 2015 to the year of the calculation (2021). The uncertainty has been adjusted accordingly.
