# heat production, at heat pump 30kW, allocation exergy

Dataset: EcoSpold 2, unit process
Geography: CH
Time period: 1990-01-01 to 2021-12-31
Technology level: current
Classification: EcoSpold01Categories: heat pumps/heating systems
Classification: ISIC rev.4 ecoinvent: 3530:Steam and air conditioning supply
Tags: ConvertedDataset
Scenario: Business-as-Usual
System model: Allocation, cut-off by classification
Share of production covered: 0 %
Generated by: Thomas Heck
Published in: Heck, T. 2007
Database: ecoinvent
isCopyrightProtected: true
accessRestrictedTo: 1

## General comment
Heat from 30 kW heat pump installed at 160kW cogeneration unit.
[This dataset was already contained in the ecoinvent database version 2. It was not individually updated during the transfer to ecoinvent version 3. Life Cycle Impact Assessment results may still have changed, as they are affected by changes in the supply chain, i.e. in other datasets. This dataset was generated following the ecoinvent quality guidelines for version 2. It may have been subject to central changes described in the ecoinvent version 3 change report (http://www.ecoinvent.org/database/ecoinvent-version-3/reports-of-changes/), and the results of the central updates were reviewed extensively. The changes added e.g. consistent water flows and other information throughout the database. The documentation of this dataset can be found in the ecoinvent reports of version 2, which are still available via the ecoinvent website. The change report linked above covers all central changes that were made during the conversion process.]

## Included activities end
Includes heat pump infrastructure, electricity from cogeneration unit, and refrigerant R134a emissions during operation.

## Geography
Could be used for European conditions.

## Reference product
- heat, central or small-scale, other than natural gas: 1 MJ; CPC 17300: Steam and hot water; By-product classification allocatable product
  EcoSpold01Location=CH
  production volume 9.02412e9 MJ
    Literature value / calculation.
    Data taken from BFE (2012).
    Total energy input to heat pumps in 2009 in Switzerland amounts to 13200 TJ. Out of it, only a certain share is turned into heat due to efficiencies lower than 1. These efficiencies could be calculated with data present for the year 2012, which were taken over for calculating the heat output for 2009 resulting to 9024 TJ.
    BFE. 2012. Schweizerische Gesamtenergiestatistik 2012. Bundesamt für Energie, Bern, Switzerland.
  property price 0.0106 EUR2005
    Average European district heat price from Ecoheatcool and Euroheat 2005-2006, Ecoheat Work package 1: The European heat market. Final report. 10.6 EUR/GJ i s the price of district heat. http://www.solarthermalworld.org/files/Ecoheatcool%20WP1%20Web.pdf?download
  properties: heating value, net 1 MJ

## Inputs from technosphere
- electricity, low voltage: 0.0617 kWh; lognormal variance with pedigree 0.05, pedigree (1,1,5,1,1)
  EcoSpold01Location=CH
  Seasonal Performance Factor, data from operators; uncertainty from range of Coefficient of Performance.
- heat pump, 30kW: 3.47e-8 unit; lognormal variance with pedigree 0.08, pedigree (1,1,5,1,1)
  uncertainty of life time
  EcoSpold01Location=RER

## Emissions to nature
- Ethane, 1,1,1,2-tetrafluoro-, HFC-134a [air, urban air close to ground]: 3.93e-7 kg; lognormal variance with pedigree 0.11, pedigree (1,1,5,1,1)
  estimated from range of values in literature

## Sampling procedure
Literature, manufacturer information

## Extrapolations
This dataset has been extrapolated from year 2000 to the year of the calculation (2021). The uncertainty has been adjusted accordingly.

## Review by Emilia Moreno Ruiz 2013-07-25
PV adjusted

## Review by Gerald Rebitzer (obsolete) 2004-04-02
prepared
