# aluminium collector foil production, for Li-ion battery

Dataset: EcoSpold 2, unit process
Geography: GLO
Time period: 2010-01-01 to 2021-12-31
Technology level: current
Classification: ISIC rev.4 ecoinvent: 2790:Manufacture of other electrical equipment
Scenario: Business-as-Usual
System model: Allocation, cut-off by classification
Generated by: Eleonora Crenna
Published in: Notter, D. A. 2010
Database: ecoinvent
isCopyrightProtected: true
accessRestrictedTo: 1

## General comment
The dataset represents the production of 1 kg aluminium foil to be used as current collector for the positive electrode (cathode) in Lithium-ion battery. Input materials for pre-treatment, infrastructure and waste are included.
The dataset has been partly extrapolated from Notter et al. (2010).

Reference: Notter, D. A., Gauch, M., Widmer, R., Wager, P., Stamp, A., Zah, R., & Althaus, H. J. (2010). Contribution of Li-ion batteries to the environmental impact of electric vehicles.

## Included activities start
The activity starts with aluminium alloy and chemicals entering the factory.

## Included activities end
The activity ends with the production of aluminium current collector foil at the factory gate.

## Geography
The specific geography of aluminium foil production is unknown. This dataset is assumed to be valid for global conditions.

## Technology
This dataset includes the pre-treatment process of aluminium foil. The alkaline cleaning is performed by using sodium hydroxide (NaOH) in order to remove grains and impurities, and form a protection layer against corrosion.

## Time period
The time period is from 2010 (year of the publication) and 2020 (year of the dataset)

## Reference product
- aluminium collector foil, for Li-ion battery: 1 kg; name RefProd; By-product classification allocatable product; CPC 46430: Parts of primary cells, primary batteries and electric accumulators (including separators)
  production volume 4.5e7 kg; name PV_RP
    Approximation. UN Comtrade (comtrade.un.org/data/) reports approximately 2.05E+09 kg Li-ion batteries traded worldwide. Aluminim current collector foil represents approximately 2% of a Li-ion battery.
  property price 1.6378 EUR2005
    Calculated based on inputs: The price of the product has been calculated as a sum of the values of the material and energy inputs for this product. This value is therefore a rough estimation. It may underestimate the real price since there are additional expenses when producing any product. These expences can include for example labour costs, treatment of waste materials and profit for the producer. Please consider carefully whether this level of data quality is acceptable for your application.
  property carbon content 0
    carbon content on a dry matter basis (reserved; not for manual entry)
  properties: water content 0, carbon content, non-fossil 0, wet mass 1 kg, carbon content, fossil 0, water in wet mass 0 kg, aluminium content 1, dry mass 1 kg, carbon allocation 0 kg

## Inputs from technosphere
- spent solvent mixture: 0 kg; name BP_mixture; pedigree (1,1,1,1,1)
  Calculated value to obtain mass balance. Disposal of NaOH and H2SO4 used in the pretreatment of the aluminium foil.
  production volume 0 kg
    Calculated from production volume of reference product using the relative outputs.
  property heating value, net 21.7 MJ; name BP_mixture_Net_Heat_Value
  property price 0 EUR2005; name BP_mixture_price_EUR2005
  properties: dry mass 1 kg, wet mass 1 kg
  note on heating value, net: Value taken from the general comment of the treatment dataset.
- sodium hydroxide, without water, in 50% solution state: 0.333333 kg; name NaOH_input; = 0.13/0.39; lognormal variance with pedigree 0.0926, pedigree (3,5,5,5,4)
  Sodium hydroxide is use to pre-treat the aluminium foil. This is a calculated value, based on Notter et al. 2010. Calculation considers 0.13 kg NaOH needed to pre-treat and cover 0.39 kg aluminium.
  properties: heating value, net 3.03 MJ, wet mass 1 kg, dry mass 1 kg
- aluminium, wrought alloy: 1 kg; lognormal variance with pedigree 0.0926, pedigree (3,5,5,5,4)
  Unprocessed material entering the system. This is rolled in order to produce the aluminium foil
  properties: dry mass 1 kg, wet mass 1 kg
- sulfuric acid: 0 kg; name sulfuric_acid; pedigree (1,1,1,1,1)
  Alkaline cleaning processes are based on sodium hydroxide (NaOH) solutions. Some oxide particles and intermetallics, which are insoluble in the alkaline solution, form a ‘smut layer’ which loosely attaches to the aluminium surfaces. As a result, alkaline cleaning must be followed by an acid de-smutting step.
  This is a calculated value, representing the amount of H2SO4 necessary to neutralize NaOH used for the pre-treatment of aluminium foil. Based on stoichiometric calculation, following the reaction 2NaOH + H2SO4 = Na2SO4 + H2O. Therefore 1 kg NaOH is neutralized with 0.62 kg H2SO4. NaOH = 39.99 g/mol; H2SO4 = 99.036 g/mol
  properties: dry mass 1 kg, wet mass 1 kg
- sheet rolling, aluminium: 1 kg; lognormal variance with pedigree 0.0926, pedigree (3,5,5,5,4)
  Proxy for the process of aluminium foil production, starting from aluminium wrought alloy
- aluminium casting facility: 1.5e-10 unit; source Ellingsen, L.A.W. 2014; lognormal variance with pedigree 0.392, pedigree (3,5,5,5,4)
  Proxy for factory. The amount has been taken from Classen et al. (2009) assuming a lifetime of 50 years and a annual production capacity of 130'000'000 kg.
  Classen M., Althaus H.-J., Blaser S., Tuchschmid M., Jungbluth N., Doka G., Faist Emmenegger M. and Scharnhorst W. (2009) Life Cycle Inventories of Metals. Final report ecoinvent data v2.1, No 10. EMPA Dübendorf, Swiss Centre for Life Cycle Inventories, Dübendorf, CH
- spent solvent mixture: -0.150724, -0.00353123, -0.385745 kg (3 entries); lognormal variance with pedigree 0.0926, pedigree (3,5,5,5,4)
  (same comment as for spent solvent mixture)
  production volume 2.43e7 kg
  properties: heating value, net 21.7 MJ, dry mass 1 kg, wet mass 1 kg
- sulfuric acid: 0.0239086, 0.182758 kg (2 entries); lognormal variance with pedigree 0.0926, pedigree (3,5,5,5,4)
  (same comment as for sulfuric acid)

## Extrapolations
This dataset has been extrapolated from year 2020 to the year of the calculation (2021). The uncertainty has been adjusted accordingly.
