# long liner maintenance, steel

Dataset: EcoSpold 2, unit process
Geography: RoW
Time period: 2009-01-01 to 2021-12-31
Technology level: current
Classification: ISIC rev.4 ecoinvent: 0311:Marine fishing
Scenario: Business-as-Usual
System model: Allocation, cut-off by classification
Generated by: Avraam Symeonidis
Published in: Vázquez-Rowe, I. 2011
Database: ecoinvent
isCopyrightProtected: true
accessRestrictedTo: 1

## General comment
This dataset represents the maintenance of steel trawlers, per 1000 kg of light ship weight. Vessel dimensions: 28 - 38 m length.
System boundaries and relation between activities

## Included activities start
Maintenance of vessels, including provision of all materials and work

## Included activities end
End of life of replaced materials. Batteries are excluded, as they do not exist in the database. Long lining gear was excluded due to the minimal contribution in total vessel weight.

## Geography
Global average based on data from Spain.

## Reference product
- long liner maintenance, steel: 1 kg; = steel+copper+engine+paint; source Vázquez-Rowe, I. 2011; By-product classification allocatable product
  Maintenance of a steel long liner, per 1000 kg of light ship weight (LSW) over its lifetime. Regressions based on mainly primary data were created to relate the weight of each inventory item to a purse seiner's LSW, adjusted for long liner's gear. The list of inventory items (granularity) contribute >95% of environmental impacts, as described in the reference publication.
  production volume 0.708041 kg; name prodVol; = 0.2892*1/0.29
    Calculated production volume (PV) based on knowledge of the regional production volumes. The PV of the global activity has been extrapolated using the nominal Gross domestic product (GDP) of 2010 (source: United Nations, http://data.un.org/Glossary.aspx?q=GDP+%28current+US%24%29, accessed 20130726 and 20130312). Based on that information, Europe accounted for 29% of the global GDP in 2010.
  property price 2.08371 EUR2005
    Calculated based on inputs: The price of the product has been calculated as a sum of the values of the material and energy inputs for this product. This value is therefore a rough estimation. It may underestimate the real price since there are additional expenses when producing any product. These expences can include for example labour costs, treatment of waste materials and profit for the producer. Please consider carefully whether this level of data quality is acceptable for your application.

## By-products
- copper scrap, sorted, pressed: 0 kg; source Angel Avadí 2017; CPC 39361: Waste and scrap of copper; By-product classification Recyclable
  Waste copper wire
  production volume 0 kg
    Calculated from production volume of reference product using the relative outputs.
  property price 2.84 EUR2005
    Temporary price data. Calculated as 90% of purchasers price based on: Source: USGS Mineral Yearbook 2007, Table 1 in <http://minerals.usgs.gov/minerals/pubs/commodity/recycle/myb1-2007-recyc.pdf>
  property carbon content 0
    carbon content on a dry matter basis (reserved; not for manual entry)
  properties: water in wet mass 0 kg, carbon content, non-fossil 0, dry mass 1 kg, wet mass 1 kg, carbon content, fossil 0, water content 0, carbon allocation 0 kg

## Inputs from technosphere
All rows: source Angel Avadí 2017
- waste paint on metal: -0.141545 kg; = (paint*1/3)*-1
  Waste paint, 2/3 of solids emitted to ocean
  production volume 0 kg
    Calculated from production volume of reference product using the relative outputs.
  properties: carbon content, non-fossil 0.199629, carbon content, fossil 0.140367, dry mass 1 kg, wet mass 1 kg, heating value, net 19.7 MJ
- copper, cathode: 0.0665883 kg; = copper
  Copper wire for electric circuit construction, 50% recycled
  properties: wet mass 1 kg, dry mass 1 kg
- marine engine: 0.000149322 unit; name engine; triangular min 0.000149322, mostLikely 0.000149322, max 0.000149322, pedigree (3,3,4,5,1)
  Marine diesel engine maintenance, 1 replacement over the lifespan
  Uncertainty: Data from 54 vessels, assumptions on replacement/maintenance
  property lifetime capacity [h] 8000 hour; name engine_lifetime_capacity_PMH
  property lifetime 15 year; name engine_lifetime
- wire drawing, copper: 0.0665883 kg; name copper; triangular min 0.0665883, mostLikely 0.0665883, max 0.0665883, pedigree (3,3,4,5,1)
  Manufacture of copper wire, 1.5 replacements over lifetime
  Uncertainty: Assumptions on replacement rates
- steel, low-alloyed, hot rolled: 0.508628 kg; name steel; triangular min 0.508628, mostLikely 0.508628, max 0.508628, pedigree (2,3,4,5,1)
  Steel hull, sheets, 12% replacement every 2 years; transmission, structural elements
  Uncertainty: Data from 9 vessels
  property carbon content, non-fossil 0; name steel_C_content_non_fossil
  properties: carbon content, fossil 0.005, dry mass 1 kg, wet mass 1 kg
  note on carbon content, non-fossil: Low alloyed steel composition given in Tab. 3.2 ecoinvent v2.2 report 10_partII.
  note on carbon content, fossil: Low alloyed steel composition given in Tab. 3.2 ecoinvent v2.2 report 10_partII. Steel assumed to have a C content of 0.5%
- alkyd paint, white, without solvent, in 60% solution state: 0.424634 kg; name paint; triangular min 0.424634, mostLikely 0.424634, max 0.424634, pedigree (1,3,4,5,1)
  Hull and deck paint, including antifouling, maintenance, every 2 years
  Uncertainty: Data from 9 vessels
  property carbon content, non-fossil 0.199629; name paint_CCNF
  property carbon content, fossil 0.140367; name paint_CCF
  properties: dry mass 1 kg, wet mass 1 kg, heating value, net 10.3 MJ
  note on carbon content, non-fossil: C content was calculated as an addition of C content in the raw materials.
- copper scrap, sorted, pressed: -0.0665883 kg
  Waste copper wire
  properties: price 2.84 EUR2005, dry mass 1 kg, wet mass 1 kg

## Emissions to nature
- Solids, inorganic [water, ocean]: 0.28309 kg; = paint*2/3; source Avadí, A. 2018
  Waste paint, 2/3 of solids emitted to ocean

## Sampling procedure
A sample of 12 vessels of a population of 49 was modelled based on European geography.

## Extrapolations
The activity is extrapolated from the respective European activity.
