# elevator production, hydraulic

Dataset: EcoSpold 2, unit process
Geography: GLO
Time period: 2010-01-25 to 2021-12-31
Technology level: current
Classification: ISIC rev.4 ecoinvent: 2816:Manufacture of lifting and handling equipment
Synonyms: hydraulic elevator; non-residential building elevator
Scenario: Business-as-Usual
System model: Allocation, cut-off by classification
Generated by: Viachaslau Filimonau
Published in: Miljogiraff 2015
Database: ecoinvent
isCopyrightProtected: true
accessRestrictedTo: 1

## General comment
This activity represents the production and disposal of an average hydraulic elevator used in buildings.The elevator is 2490 kg in mass where 1864 kg accounts for the elevator car and the remaining weight is attributed to the material required to manufacture the elevator shaft and movable parts. The elevator has the nominal load of 1000 kg. It has the envisaged lifetime of 80 years (where the actual service life of the elevator car is 20 years) and is manufactured in Europe. The figures on material inputs from technosphere and energy required to produce an average hydraulic elevator are taken from Miljogiraff 2015. The figure on the annual production volume (803000 units) is assumed to be equal to the annual world sales and is from PRNewswire 2016.

## Included activities start
This activity starts with the reception of materials at the factory.

## Included activities end
The activity includes the processes of material and energy use in manufacturing of an average hydraulic elevator. Energy required to install an elevator in a building is excluded The inventory additionally accounts for disposal of all materials. Packaging is not included.

## Geography
Geography GLO was chosen because the dataset aims to represent the production of an average hydraulic elevator. The literature sources used refer to manufacturing in Europe.

## Time period
The literature sources used refer to the underpinning technology as being current.

## Reference product
- elevator, hydraulic: 1 unit; name RP_amount_1; CPC 88766: Lifting and handling equipment manufacturing services; By-product classification allocatable product
  production volume 803000 unit; name RP_PV_1
    Annual global production is assumed to equate to annual global sales. The figure on annual global sales is representative of 2015 as estimated by PRNewswire 2016. Source: PRNewswire 2016. Global and China Elevator Industry Report, 2016-2020. Available from: https://www.prnewswire.com/news-releases/global-and-china-elevator-industry-report-2016-2020-300310552.html Accessed 11 January 2018.
  property lifetime 80 year
    Soure: Miljogiraff 2015, 2015, Miljogiraff , LCA of elevator lifting service in property, 3 - SeparatePublication, Miljogiraff 2015. LCA of elevator lifting service in property. Report ordered by Hydroware, Number 70. Available from: https://www.researchgate.net/profile/Marcus_Wendin/publication/301295772_Elevators_towards_a_circular_economy/links/5717790f08ae2679a8c772db/Elevators-towards-a-circular-economy.pdf Accessed 11 January 2018.
  property lifetime capacity [unit] 2.19e7 unit; = 750*365*80
    Estimated based on literature. The source reports different usage categories from 50 to 750 trips per day. We here assume the maximum usage of 750 trips per day for a lifetime of 80 years. Soure: Miljogiraff 2015, 2015, Miljogiraff , LCA of elevator lifting service in property, 3 - SeparatePublication, Miljogiraff 2015. LCA of elevator lifting service in property. Report ordered by Hydroware, Number 70. Available from: https://www.researchgate.net/profile/Marcus_Wendin/publication/301295772_Elevators_towards_a_circular_economy/links/5717790f08ae2679a8c772db/Elevators-towards-a-circular-economy.pdf Accessed 11 January 2018.
  property price 9900 EUR2005; name RP_amount_1_price_EUR2005
    Estimated value. The price is taken from FIXr "Fixr.com provides cost guides, comparisons, and term cheatsheets for hundreds of remodeling, installation and repair projects." (source retrieved from: https://www.fixr.com/costs/elevator-installation, accessed 13Feb 2018). 10% profit margin was accounted for.
  property weight 2490 kg; name weight
    (same comment as for elevator, hydraulic)

## By-products
- iron scrap, unsorted: 0 kg; CPC 39310: Slag, dross, scalings and other waste from the manufacture of iron or steel; By-product classification Recyclable; pedigree (1,1,1,1,1)
  The amount is set equal to the input amount for the respective material. Data are from Miljogiraff 2015.
  production volume 0 kg; = RP_PV_1 * (BP_amount_9 / RP_amount_1)
    Calculated from production volume of reference product using the relative outputs.
  property price 0.149 EUR2005; name BP_amount_9_price_EUR2005
    Temporary price data. Calculated as 90% of purchasers price based on: estimated at 85% of sorted scrap
  property carbon content 0
    carbon content on a dry matter basis (reserved; not for manual entry)
  properties: water in wet mass 0 kg, wet mass 1 kg, water content 0, dry mass 1 kg, carbon content, non-fossil 0, carbon content, fossil 0, carbon allocation 0 kg

## Inputs from technosphere
- steel, low-alloyed: 2095.5 kg; name steel; lognormal variance with pedigree 0.0064, pedigree (2,4,3,4,2)
  Contains regular steel and stainless steel. Data are from Miljogiraff 2015.
  properties: wet mass 1 kg, dry mass 1 kg, carbon content, fossil 0.005
- electricity, medium voltage: 342.6 kWh; lognormal variance with pedigree 0.0064, pedigree (2,4,3,4,2)
  Used here in place of the ambigious category 'energy' used in the original literature source. Data are from Miljogiraff 2015.
- energy and auxilliary inputs, metal working factory: 0 kg; pedigree (1,1,1,1,1)
  Estimated value.The input of infrastructure is approximated with the exchange 'metal working factory', this was chosen as metal is the main material constituting the final product. The general comment for the activity 'metal working faculty, GLO' [accessed 19.01.2018] specifies: '4.58E-10 units of this process are needed to produce 1 kg of final product. Additionally, the dataset for 'metal working factory' needs to be used together with the 'energy and auxilliary inputs, metal working factory', 1 kg of this exchange is required per 1 kg of final product.
- used printed wiring boards: -2.1 kg; name BP_amount_5; = (PWB)*-1; lognormal variance with pedigree 0.0064, pedigree (2,4,3,4,2)
  (same comment as for iron scrap, unsorted)
  production volume 1.6863e6 kg; = RP_PV_1 * (BP_amount_5 / RP_amount_1)
    Calculated from production volume of reference product using the relative outputs.
  property price 0 EUR2005; name BP_amount_5_price_EUR2005
  properties: carbon content, fossil 0.193742, carbon content, non-fossil 0.000960142, dry mass 1 kg, wet mass 1 kg
- printed wiring board, surface mounted, unspecified, Pb free: 2.1 kg; name PWB; lognormal variance with pedigree 0.0064, pedigree (2,4,3,4,2)
  Data are from Miljogiraff 2015.
  properties: dry mass 1 kg, carbon content, fossil 0.132522, wet mass 1 kg
- electronic component, passive, unspecified: 16.1 kg; name electronic_comp; lognormal variance with pedigree 0.0064, pedigree (2,4,3,4,2)
  Data are from Miljogiraff 2015.
  properties: wet mass 1 kg, carbon content, fossil 0.317311, dry mass 1 kg, carbon content, non-fossil 0.0045566
- waste rubber, unspecified: 0 kg; name BP_amount_2; pedigree (1,1,1,1,1)
  The amount is set equal to the input amount for the respective material. Data are from Miljogiraff 2015. Excludes <1% of mass allocated to undefined electrical equipment.
  production volume 0 kg
    Calculated from production volume of reference product using the relative outputs.
  property price 0 EUR2005; name BP_amount_2_price_EUR2005
  properties: wet mass 1 kg, dry mass 1 kg, heating value, net 27.19 MJ, carbon content, fossil 0.853
  note on heating value, net: Value taken from the general comment of the treatment dataset.
- cable, unspecified: 4.7 kg; name cable; lognormal variance with pedigree 0.0064, pedigree (2,4,3,4,2)
  This product represents average, unspecified cable. Data are from Miljogiraff 2015.
  properties: dry mass 1 kg, wet mass 1 kg, carbon content, fossil 0.28196, heating value, net 8.54 MJ
- waste mineral oil: 0 kg; name BP_amount_4; pedigree (1,1,1,1,1)
  Used here in place of wasted hydraulic oil. The amount is set equal to the input amount for the respective material. Data are from Miljogiraff 2015.
  production volume 0 kg
    Calculated from production volume of reference product using the relative outputs.
  property price 0 EUR2005; name BP_amount_4_price_EUR2005
  properties: dry mass 0.9 kg, wet mass 1 kg, carbon content, fossil 0.864444, water content 0.111111, heating value, net 34.7 MJ
  note on carbon content, fossil: Tab A.6, ecoinvent v2.2 report 13_I. C content has been calculated after data in the tables, and then referred to 1 kg DM
- waste wood, untreated: 0 kg; name BP_amount_3; pedigree (1,1,1,1,1)
  Used here in place of waste from medium density fibreboard. The amount is set equal to the input amount for the respective material. Data are from Miljogiraff 2015.
  production volume 0 kg
    Calculated from production volume of reference product using the relative outputs.
  property price 0 EUR2005; name BP_amount_3_price_EUR2005
  properties: water content 0.25, dry mass 0.8 kg, wet mass 1 kg, carbon content, non-fossil 0.48632, heating value, net 13.99 MJ
- glass fibre: 22 kg; name glass_fibre; lognormal variance with pedigree 0.0064, pedigree (2,4,3,4,2)
  Data are from Miljogiraff 2015.
  properties: dry mass 1 kg, wet mass 1 kg
- waste polyvinylchloride: 0 kg; name BP_amount_12; pedigree (1,1,1,1,1)
  Used here in place of the material category defined in the original literature source as 'plastics'. The amount is set equal to the input amount for the respective material. Data are from Miljogiraff 2015.
  production volume 0 kg
    Calculated from production volume of reference product using the relative outputs.
  property price 0 EUR2005; name BP_amount_12_price_EUR2005
  properties: carbon content, fossil 0.440882, heating value, net 21.51 MJ, dry mass 0.998 kg, water content 0.00200401, wet mass 1 kg
- metal working factory: 1.14042e-6 unit; = 4.58E-10*2490; lognormal variance with pedigree 0.3058, pedigree (2,4,3,4,2)
  (same comment as for energy and auxilliary inputs, metal working factory)
- scrap steel: 0 kg; name BP_amount_8; pedigree (1,1,1,1,1)
  Contains regular steel and stainless steel. The amount is set equal to the input amount for the respective material. Data are from Miljogiraff 2015.
  production volume 0 kg
    Calculated from production volume of reference product using the relative outputs.
  property price 0 EUR2005; name BP_amount_8_price_EUR2005
  properties: dry mass 1 kg, wet mass 1 kg
- waste electric and electronic equipment: -16.1 kg; name BP_amount_7; = (electronic_comp)*-1; lognormal variance with pedigree 0.0064, pedigree (2,4,3,4,2)
  (same comment as for iron scrap, unsorted)
  production volume 1.29283e7 kg; = RP_PV_1 * (BP_amount_7 / RP_amount_1)
    Calculated from production volume of reference product using the relative outputs.
  property price 0 EUR2005; name BP_amount_7_price_EUR2005
  properties: carbon content, non-fossil 0.000485011, dry mass 1 kg, wet mass 1 kg, carbon content, fossil 0.0877555
- copper, cathode: 23.9 kg; name copper; lognormal variance with pedigree 0.0064, pedigree (2,4,3,4,2)
  Data are from Miljogiraff 2015.
  properties: wet mass 1 kg, dry mass 1 kg
- used cable: -4.7 kg; name BP_amount_6; = (cable)*-1; lognormal variance with pedigree 0.0064, pedigree (2,4,3,4,2)
  (same comment as for iron scrap, unsorted)
  production volume 3.7741e6 kg; = RP_PV_1 * (BP_amount_6 / RP_amount_1)
    Calculated from production volume of reference product using the relative outputs.
  property price 0 EUR2005; name BP_amount_6_price_EUR2005
  properties: wet mass 1 kg, carbon content, fossil 0.27472, dry mass 1 kg
  note on carbon content, fossil: According to the European company, 1 kg cable is split up into 0.66 kg of copper and 0.34 kg of plastics (ecoinvent v2.2 report 18_V, pg 97). Plastic C content (0.808) was calculated using data in Tab A.2, ecoinvent v2.2 report 13_I.
- aluminium, cast alloy: 21.9 kg; name aluminium; lognormal variance with pedigree 0.0064, pedigree (2,4,3,4,2)
  Data are from Miljogiraff 2015.
  properties: wet mass 1 kg, dry mass 1 kg
- waste glass: 0 kg; name BP_amount_1; pedigree (1,1,1,1,1)
  (same comment as for iron scrap, unsorted)
  production volume 0 kg
    Calculated from production volume of reference product using the relative outputs.
  property price 0 EUR2005; name BP_amount_1_price_EUR2005
  properties: dry mass 1 kg, wet mass 1 kg, heating value, net 0.05 MJ
  note on heating value, net: Value extracted from "treatment of waste glass, open dump, very wet infiltration class (1000mm)"
- scrap copper: 0 kg; name BP_amount_11; pedigree (1,1,1,1,1)
  (same comment as for iron scrap, unsorted)
  production volume 0 kg
    Calculated from production volume of reference product using the relative outputs.
  property price 0 EUR2005; name BP_amount_11_price_EUR2005
  properties: wet mass 1 kg, dry mass 1 kg
- medium density fibreboard: 0 m3; name fibreboard; pedigree (1,1,1,1,1)
  In terms of outputs, assumed to have gone to waste wood, unsorted. Data are from Miljogiraff 2015.
  property wet mass 780 kg; name MDF_WM
  properties: carbon content, fossil 0.0558423, dry mass 709.091 kg, heating value, net 10890.3 MJ, carbon content, non-fossil 0.443561, water content 0.1
  note on heating value, net: Assumed equal to "fiberboard, hard".The property is based on a value of 13.96MJ/kg
- lubricating oil: 0 kg; name oil; pedigree (1,1,1,1,1)
  Used here in place of hydraulic oil. Data are from Miljogiraff 2015.
  properties: wet mass 1 kg, carbon content, fossil 0.75, heating value, net 40.2 MJ, dry mass 1 kg
  note on carbon content, fossil: Lubricating oil is produced from diesel. C-content/dry mass of fats and oils considered 75%, from: ecoinvent v2.2 report, n 15a, pg 40
  note on heating value, net: Literature value, Source: IPCC 2006, 2006 IPCC Guidelines for National Greenhouse Gas Inventories, Prepared by the National Greenhouse Gas Inventories Programme, Eggleston H.S., Buendia L., Miwa K., Ngara T. and Tanabe K. (eds). Published: IGES, Japan
- cast iron: 14.9 kg; name iron; lognormal variance with pedigree 0.0064, pedigree (2,4,3,4,2)
  Data are from Miljogiraff 2015.
  properties: carbon content, fossil 0.04, dry mass 1 kg, wet mass 1 kg
  note on carbon content, fossil: Cast iron is made by remelting pig iron in small furnaces (e.g. cupola furnaces or electric arc furnaces) and poured into moulds to make castings. It usually contains 2% to 6% carbon (ecoinvent v2.2 report 10_partII). An average content of 4% was considered
- seal, natural rubber based: 8.9 kg; name seal; lognormal variance with pedigree 0.0064, pedigree (2,4,3,4,2)
  Data are from Miljogiraff 2015.
  properties: heating value, net 26.71 MJ, carbon content, non-fossil 0.881625, dry mass 1 kg, wet mass 1 kg
- scrap aluminium: 0 kg; name BP_amount_10; pedigree (1,1,1,1,1)
  (same comment as for iron scrap, unsorted)
  production volume 0 kg
    Calculated from production volume of reference product using the relative outputs.
  property price 0 EUR2005; name BP_amount_10_price_EUR2005
  properties: dry mass 1 kg, wet mass 1 kg
- polyvinylchloride, bulk polymerised: 49.9 kg; name PVC; lognormal variance with pedigree 0.0064, pedigree (2,4,3,4,2)
  Used here in place of the material category defined in the original literature source as 'plastics'. Data are from Miljogiraff 2015.
  properties: heating value, net 21.5 MJ, dry mass 1 kg, wet mass 1 kg, carbon content, fossil 0.387097
  note on carbon content, fossil: Monomer is vynyl chloride, C2H3Cl (ecoinvent v2.2 report 11_II). MW=62 g/mol
- iron scrap, unsorted: -14.9 kg; lognormal variance with pedigree 0.0064, pedigree (2,4,3,4,2)
  (same comment as for iron scrap, unsorted)
  production volume 1.19647e7 kg
  properties: wet mass 1 kg, dry mass 1 kg
- energy and auxilliary inputs, metal working factory: 2.07941e-7, 9.32479e-7 kg (2 entries); lognormal variance with pedigree 0.0064, pedigree (2,4,3,4,2)
  (same comment as for energy and auxilliary inputs, metal working factory)
- waste rubber, unspecified: -4.35852, -0.18297, -4.35852 kg (3 entries); lognormal variance with pedigree 0.0064, pedigree (2,4,3,4,2)
  (same comment as for waste rubber, unspecified)
  production volume 7.1467e6 kg
- waste mineral oil: -36.2328, -0.896981, -94.8702 kg (3 entries); lognormal variance with pedigree 0.0064, pedigree (2,4,3,4,2)
  (same comment as for waste mineral oil)
  production volume 1.05996e8 kg
- waste wood, untreated: -0.0120441, -0.000947588, -0.00266149, -0.000635666, -0.00763168, -0.000402087, -6.92794e-5, -0.101249 kg (8 entries); lognormal variance with pedigree 0.0064, pedigree (2,4,3,4,2)
  (same comment as for waste wood, untreated)
  production volume 100890 kg
- waste polyvinylchloride: -4.80311, -0.370291, -0.152944, -0.145234, -5.54195, -0.0617875, -0.0280045, -38.7967 kg (8 entries); lognormal variance with pedigree 0.0064, pedigree (2,4,3,4,2)
  (same comment as for waste polyvinylchloride)
  production volume 4.00697e7 kg
- scrap steel: -510.244, -0.646461, -1584.61 kg (3 entries); lognormal variance with pedigree 0.0064, pedigree (2,4,3,4,2)
  (same comment as for scrap steel)
  production volume 1.68269e9 kg
- waste glass: -3.34905, -0.162501, -0.0151611, -0.0678402, -1.76309, -0.0230229, -0.00368659, -16.6156 kg (8 entries); lognormal variance with pedigree 0.0064, pedigree (2,4,3,4,2)
  (same comment as for iron scrap, unsorted)
  production volume 1.7666e7 kg
- scrap copper: -7.58127, -0.355696, -15.963 kg (3 entries); lognormal variance with pedigree 0.0064, pedigree (2,4,3,4,2)
  (same comment as for iron scrap, unsorted)
  production volume 1.91917e7 kg
- medium density fibreboard: 0.0169683, 0.108673 m3 (2 entries); lognormal variance with pedigree 0.0064, pedigree (2,4,3,4,2)
  (same comment as for medium density fibreboard)
  properties: carbon content, fossil 0.0558423, dry mass 709.091 kg, wet mass 780 kg, heating value, net 10890.3 MJ, carbon content, non-fossil 0.443561, water content 0.1
- lubricating oil: 22.968, 109.032 kg (2 entries); lognormal variance with pedigree 0.0064, pedigree (2,4,3,4,2)
  Used here in place of hydraulic oil. Data are from Miljogiraff 2015.
- scrap aluminium: -6.94685, -0.32593, -14.6272 kg (3 entries); lognormal variance with pedigree 0.0064, pedigree (2,4,3,4,2)
  (same comment as for iron scrap, unsorted)
  production volume 1.75857e7 kg

## Sampling procedure
Manufacturing data are taken from Miljogiraff 2015. Data on the annual production volume are assumed to be equal to the annual volume of unit sales and taken from PRNewswire 2016. Sources: Miljogiraff 2015. LCA of elevator lifting service in property. Report ordered by Hydroware, Number 70. Available from: https://www.researchgate.net/profile/Marcus_Wendin/publication/301295772_Elevators_towards_a_circular_economy/links/5717790f08ae2679a8c772db/Elevators-towards-a-circular-economy.pdf (Accessed 11 January 2018). PRNewswire 2016. Global and China Elevator Industry Report, 2016-2020. Available from: https://www.prnewswire.com/news-releases/global-and-china-elevator-industry-report-2016-2020-300310552.html (Accessed 11 January 2018).

## Extrapolations
This dataset has been extrapolated from year 2018 to the year of the calculation (2021). The uncertainty has been adjusted accordingly.
