# glyphosate production

Dataset: EcoSpold 2, unit process
Geography: RER
Time period: 2000-01-01 to 2021-12-31
Technology level: current
Classification: EcoSpold01Categories: agricultural means of production/pesticides
Classification: ISIC rev.4 ecoinvent: 2021:Manufacture of pesticides and other agrochemical products
Synonyms: Agrichem Glyphosate 360 SL; Brex; Glyphoroc; Solado Gold; Renofluid Royal; Toxer 10; Mioplant; Alce; Glyfos; Glifonex; Gesal concentrate; Glyphomed; Unkrautvertilger D7 flüssig; Tomahawk; Well Kill; Vulkan; Gesal spray; D7 liquid; Glyper; Gesal Spray; MON 79545; Soft; Mas Kill; Erbex plus; Deserpan fluid; Roundup; Radi>proXX; Touchdown System 4; Capito; Stop; Soft Unkrautvertilger; Oscar; Banyo; Glyphogan 480 SL; Glyphosate; Potomac
Tags: ConvertedDataset
Scenario: Business-as-Usual
System model: Allocation, cut-off by classification
Share of production covered: 100 %
Generated by: Jürgen Sutter
Published in: Nemecek, T. 2007
Database: ecoinvent
isCopyrightProtected: true
accessRestrictedTo: 1

## General comment
This dataset represents the production of glyphosate (1 kg of active ingredient). Raw materials are modelled with a stoichiometric calculation. Energy consumption is modelled with data from a similar process. The emissions are estimated. Infrastructure is included with a default value.
[This dataset was already contained in the ecoinvent database version 2. It was not individually updated during the transfer to ecoinvent version 3. Life Cycle Impact Assessment results may still have changed, as they are affected by changes in the supply chain, i.e. in other datasets. This dataset was generated following the ecoinvent quality guidelines for version 2. It may have been subject to central changes described in the ecoinvent version 3 change report (http://www.ecoinvent.org/database/ecoinvent-version-3/reports-of-changes/), and the results of the central updates were reviewed extensively. The changes added e.g. consistent water flows and other information throughout the database. The documentation of this dataset can be found in the ecoinvent reports of version 2, which are still available via the ecoinvent website. The change report linked above covers all central changes that were made during the conversion process.]

## Included activities start
From reception of precursors (acetic anhydride, ammonia, chlorine, fornaldehyde, phosphorous chloride, sodium hydroxide, and water decarbonised) at the factory gate.

## Included activities end
This activity ends with glyphosate at the factory gate. The dataset includes the input materials, energy uses, infrastructure and emissions. The dataset doesn't include emulsives, additives etc.

## Geography
The inventory is modelled for Europe.

## Technology
Glyphosate is a pesticide produced in three steps from phosphorus trichloride:
PCl3 + 2 CH2O → CH2Cl3OP
CH2Cl3OP + H2O → CH4ClO3P + 2 HCl
CH4ClO3P + C2H5NO2 → C3H8NO5P + HCl
A precursor that is used for the glyphosate production is glycine (C2H5NO2).
Glycine (C2H5NO2) is produced in two steps from acetic acid:
C2H4O2 + Cl2 → C2H3ClO2 + HCl
C2H3ClO2 + NH3 → C2H5NO2 + HCl

## Time period
Time of publications

## Parameters
- fraction, cooling water, to air: 0.3875 dimensionless; name fraction_CW_to_air; = (0.5*fraction_CW_OT_to_air)+(0.5*fraction_CW_R_to_air); lognormal variance with pedigree 0.092025, pedigree (4,4,3,2,4)
  Calculated value based on literature value (see comments of the other parametres present in this dataset) and expert opinion. In the case when no industry/literature data are available about the type of cooling or directly fraction, cooling water, to air specific for the process a default assumption is applied. It is assumed that the once-through cooling system is used in 50% of all cases and recirculating system is used in another 50% of all cases.
- fraction, cooling water, cooling pond system, to air: 0.032 dimensionless; name fraction_CW_CP_to_air; lognormal variance with pedigree 0.0413, pedigree (2,3,1,3,1)
  Calculated based on literature value (Scown, C.D., 2011, Water Footprint of U.S. Transportation Fuels and supplying information of the article) (Vionnet, S., Quantis Water Database - Technical Report, 2012).
- fraction, cooling water, once-through system, to air: 0.004 dimensionless; name fraction_CW_OT_to_air; lognormal variance with pedigree 0.0413, pedigree (2,3,1,3,1)
  (same comment as for fraction, cooling water, cooling pond system, to air)
- fraction, cooling water, recirculating system, to air: 0.771 dimensionless; name fraction_CW_R_to_air; lognormal variance with pedigree 0.0413, pedigree (2,3,1,3,1)
  (same comment as for fraction, cooling water, cooling pond system, to air)
- fraction, water, decarbonised, to air: 0.3875 dimensionless; name fraction_WDC_to_air; = fraction_CW_to_air; lognormal variance with pedigree 0.092025, pedigree (4,4,3,2,4)
  Calculated value. See comments in the other parametres present in this dataset. Decarbonised water is considered to be always used as cooling water, thus cooling water fractions to air are applied to all carbonised water input flows to calculate the amount of water consumed in the processes.

## Reference product
- glyphosate: 1 kg; CPC 34663: Herbicides, anti-sprouting products and plant-growth regulators; By-product classification allocatable product; CAS 1071-83-6
  EcoSpold01Location=RER
  Glyphosate forms colourless crystals which are fairly soluble in water and are insoluble in common organic solvents.
  Glyphosate inhibits enolpyruvylshikimi-3-phosphate synthase and is a nonselective herbicide used pre-harvest, post-planting/pre-emergence to control annual and perennial grasses and broad-leaved weeds in stubble, cereals, peas, beans, oilseed rape, flax, mustard, etc.
  production volume 7.34371e7 kg
    Unknown
    The consumption volume in the US in 2002 (from USGS, 2002 Pesticide use Maps) of glyphosate (Sutter, 2010) has been used to estimate the production volumes of this type of pesticide in the Europe. For that, it has been extrapolated to a Global production mix using the ha of Arable land and Permanent crops of US versus the ha of Arable land and Permanent crops in the Europe in 2002 (299/179 million ha; FAOSTAT).
  property price 4.2 EUR2005
    Calculated after Alibaba. Source: http://www.alibaba.com/product-detail/Manufacturer-agrochemical-herbicide-glyphosate-95-_60215600617.html?spm=a2700.7724857.29.12.Hmjn6L&s=p
  property carbon content 0.214286
    carbon content on a dry matter basis (reserved; not for manual entry)
  properties: dry mass 1 kg, wet mass 1 kg, water content 0, water in wet mass 0 kg, carbon content, fossil 0.214286, carbon content, non-fossil 0, carbon allocation 0.214286 kg

## Inputs from technosphere
- sodium hydroxide, without water, in 50% solution state: 1.2464 kg; source Unger T A 1996; lognormal variance with pedigree 0.044, pedigree (4,5,4,1,1)
  EcoSpold01Location=RER
  Stoichiometric calculation, assuming an efficiency of 100%.
  Uncertainty: Stoechiometric calculation
  properties: wet mass 1 kg, dry mass 1 kg, heating value, net 3.03 MJ
- heat, district or industrial, other than natural gas: 4.17527 MJ; source Gendorf 2000; lognormal variance with pedigree 0.044, pedigree (4,5,4,1,1)
  Estimation, assuming a default value, originated from calculation of avarage consumption of electricity and heat per kg of product (3.2 MJ kg-1), and a resulting amount of heat of 2 MJ for every reaction step per kg reaction product, considering that the demand is made up of a mix that inlcudes 12% steam from external energy sources. Additionally, reaction steps are approximated with energy consumption data, assuming that inventory flows can be estimated using process data for basic operation steps, available for specific organic chemicals.
  Further references:
  Kim S., Overcash M.: Energy in chemical manufacturing processes: gate-to-gate information for life cycle assessment. In: Journal of Chemical Technology & Biotechnology vol. 78, no. 9: 995-1005(11). 2003
  Uncertainty: Estimation
  properties: heating value, net 1 MJ
- formaldehyde: 0.41409 kg; source Unger T A 1996; lognormal variance with pedigree 0.044, pedigree (4,5,4,1,1)
  EcoSpold01Location=RER
  Stoichiometric calculation, assuming an efficiency of 95% per reaction step.
  Uncertainty: Stoechiometric calculation
  properties: wet mass 1 kg, dry mass 1 kg, heating value, net 20.19 MJ, carbon content, fossil 0.4
- phosphorous chloride: 0.9386 kg; source Unger T A 1996; lognormal variance with pedigree 0.044, pedigree (4,5,4,1,1)
  (same comment as for formaldehyde)
  properties: dry mass 1 kg, wet mass 1 kg
- ammonia, anhydrous, liquid: 0.11146 kg; source Unger T A 1996; lognormal variance with pedigree 0.044, pedigree (4,5,4,1,1)
  (same comment as for formaldehyde)
  properties: wet mass 1 kg, dry mass 1 kg
- heat, district or industrial, natural gas: 7.48045 MJ; source Gendorf 2000; lognormal variance with pedigree 0.044, pedigree (4,5,4,1,1)
  Estimation, assuming a default value, originated from calculation of avarage consumption of electricity and heat per kg of product (3.2 MJ kg-1), and a resulting amount of heat of 2 MJ for every reaction step per kg reaction product, considering that the demand is made up of a mix that includes 50% natural gas. Additionally, reaction steps are approximated with energy consumption data, assuming that inventory flows can be estimated using process data for basic operation steps, available for specific organic chemicals.
  Further references:
  Kim S., Overcash M.: Energy in chemical manufacturing processes: gate-to-gate information for life cycle assessment. In: Journal of Chemical Technology & Biotechnology vol. 78, no. 9: 995-1005(11). 2003
  Uncertainty: Estimation
  properties: heating value, net 1 MJ
- electricity, medium voltage: 1.20063 kWh; source Gendorf 2000; lognormal variance with pedigree 0.044, pedigree (4,5,4,1,1)
  EcoSpold01Location=UCTE
  Estimation, assuming a default value, originated from calculation of avarage consumption of electricity and heat per kg of product (3.2 MJ kg-1), and a resulting amount of electricity of 0,333 kW for every reaction step per kg reaction product, considering that the demand is made up of a mix that inlcudes 38% electricity. Additionally, reaction steps are approximated with energy consumption data, assuming that inventory flows can be estimated using process data for basic operation steps, available for specific organic chemicals.
  Further references:
  Kim S., Overcash M.: Energy in chemical manufacturing processes: gate-to-gate information for life cycle assessment. In: Journal of Chemical Technology & Biotechnology vol. 78, no. 9: 995-1005(11). 2003
  Uncertainty: Estimation
- chemical factory, organics: 1.5926e-9 unit; lognormal variance with pedigree 0.448, pedigree (4,5,5,5,5)
  EcoSpold01Location=RER
  Estimation, based on a production capacity of 50,000 t per year and a plant life time of 50 years, therefore an amount of 4X10-10 units per kg of produced chemical is aded to the unit process of the respective chemical. The amount is accounted for each production step. This might be an overestimation in some multistep syntheses.
  Uncertainty: Estimation
- acetic anhydride: 0.63494 kg; source Unger T A 1996; lognormal variance with pedigree 0.044, pedigree (4,5,4,1,1)
  (same comment as for formaldehyde)
  properties: carbon content, fossil 0.470588, dry mass 1 kg, wet mass 1 kg, heating value, net 21.38 MJ
- water, decarbonised: 0 kg; name water_decarbonised_input; source Unger T A 1996; pedigree (1,1,1,1,1)
  (same comment as for sodium hydroxide, without water, in 50% solution state)
  properties: wet mass 1 kg
- chlorine, liquid: 0.55467 kg; source Unger T A 1996; lognormal variance with pedigree 0.044, pedigree (4,5,4,1,1)
  Stoichiometric calculation, assuming an efficiency of 95% per reaction step.
  EcoSpold01Location=RER
  Uncertainty: Stoechiometric calculation
  properties: dry mass 1 kg, wet mass 1 kg
- water, decarbonised: 0.06206, 0.012511, 0.0411385, 3.94062e-5, 0.00227109 kg (5 entries); source Unger T A 1996; lognormal variance with pedigree 0.044, pedigree (4,5,4,1,1)
  (same comment as for sodium hydroxide, without water, in 50% solution state)

## Inputs from nature
- Water, cooling, unspecified natural origin [natural resource, in water]: 0.095557 m3; name water_cooling_UNO_input; source Gendorf 2000; lognormal variance with pedigree 0.044, pedigree (4,5,4,1,1)
  Estimation (24 kg cooling water per kg produced chemical per step).
  Uncertainty: Estimation

## Emissions to nature
- Carbon dioxide, fossil [air, urban air close to ground]: 0.39677 kg; lognormal variance with pedigree 0.1786, pedigree (4,5,5,5,5)
  Estimation, based on the assumption that 0.2% of volatile input materials is emitted to air occurring from the purge vent, the destillation vent and fugitive emission sources. Remaining gases like CH4 or CO are oxidated to CO2. The carbon contained in the removed carbon compounds from wastewater treatment was accounted as CO2 emissions to air (assuming a removal efficiency of 90%).
  Uncertainty: Estimation
- Formaldehyde [air, urban air close to ground]: 0.00082818 kg; lognormal variance with pedigree 0.188, pedigree (4,5,5,5,5)
  Estimation, based on the assumption that 0.2% of volatile input materials is emitted to air occurring from the purge vent, the destillation vent and fugitive emission sources.
  Uncertainty: Estimation
- Formaldehyde [water, surface water]: 0.0019876 kg; lognormal variance with pedigree 0.448, pedigree (4,5,5,5,5)
  Estimation, assuming that the remaining amount of unreacted input materials leave the production process with the wastewater, wich is further treated in an internal wastewater plant.
  Uncertainty: Estimation
- Chlorine [air, urban air close to ground]: 0.0011093 kg; lognormal variance with pedigree 0.188, pedigree (4,5,5,5,5)
  (same comment as for Formaldehyde)
- Acetic acid [water, surface water]: 0.0030477 kg; lognormal variance with pedigree 0.448, pedigree (4,5,5,5,5)
  (same comment as for Formaldehyde)
- Ammonia [air, urban air close to ground]: 0.00022292 kg; lognormal variance with pedigree 0.218, pedigree (4,5,5,5,5)
  (same comment as for Formaldehyde)
- Water [water, unspecified]: 0.0586009 m3; name water_to_water_unspecified; = (water_decarbonised_input/1000)*(1-fraction_WDC_to_air)+water_cooling_UNO_input*(1-fraction_CW_to_air); lognormal variance with pedigree 0.0487, pedigree (2,2,4,1,1)
  Calculated value based on literature values and expert opinion. See comments in the parametres' comment field.
  property fraction, origin: fresh water 0.00123355; name fraction_origin_fresh_water_Ww
  property fraction, origin: unspecified 0.998766; name fraction_origin_unspecified_Ww
  property fraction, origin: salt water 0; name fraction_origin_salt_water_Ww
  property dry mass 0 kg; name DM
  property carbon content, fossil 0; name C_content_fossil
  property wet mass 1000 kg; name WM
  property carbon content, non-fossil 0; name C_content_non_fossil
  property water in wet mass 1000 kg; name WWM
- Chloroacetic acid [water, surface water]: 0.0030815 kg; lognormal variance with pedigree 0.448, pedigree (4,5,5,5,5)
  (same comment as for Formaldehyde)
- Chloroacetic acid [air, urban air close to ground]: 0.0012326 kg; lognormal variance with pedigree 0.188, pedigree (4,5,5,5,5)
  (same comment as for Formaldehyde)
- Water [air, unspecified]: 0.0370741 m3; name water_to_air_unspecified; = (water_decarbonised_input/1000*fraction_WDC_to_air)+(water_cooling_UNO_input*fraction_CW_to_air); lognormal variance with pedigree 0.0487, pedigree (2,2,4,1,1)
  (same comment as for Water)
  property fraction, origin: salt water 0; name fraction_origin_salt_water
  property fraction, origin: unspecified 0.998766; name fraction_origin_unspecified
  property fraction, origin: fresh water 0.00123355; name fraction_origin_fresh_water
- Sodium, ion [water, surface water]: 0.71666 kg; lognormal variance with pedigree 0.798, pedigree (4,5,5,5,5)
  (same comment as for Formaldehyde)
- Chloride [water, surface water]: 1.269 kg; lognormal variance with pedigree 0.448, pedigree (4,5,5,5,5)
  (same comment as for Formaldehyde)
- Acetic acid [air, urban air close to ground]: 0.0012699 kg; lognormal variance with pedigree 0.188, pedigree (4,5,5,5,5)
  (same comment as for Formaldehyde)
- Phosphorus [water, surface water]: 0.010697 kg; lognormal variance with pedigree 0.188, pedigree (4,5,5,5,5)
  (same comment as for Formaldehyde)
- Ammonium, ion [water, surface water]: 0.0027865 kg; lognormal variance with pedigree 0.188, pedigree (4,5,5,5,5)
  Estimation, assuming that the remaining amount of unreacted input materials leave the production process with the wastewater, wich is further treated in an internal wastewater plant. For the nitrogen containing compounds within the wastewater a removal efficiency of 50% was assumed. The nitrogen emitted to air (N2) is neglected.
  Uncertainty: Estimation

## Sampling procedure
Literature data

## Extrapolations
This dataset has been extrapolated from year 2010 to the year of the calculation (2021). The uncertainty has been adjusted accordingly.

## Review by Thomas Nemecek 2010-03-11
Passed.
none

## Review by Roland Hischier 2011-11-18
Transfer of documentation done.
