# diesel, burned in diesel-electric generating set, 10MW

Dataset: EcoSpold 2, unit process
Geography: GLO
Time period: 1985-01-01 to 2021-12-31
Technology level: current
Classification: EcoSpold01Categories: oil/fuels
Classification: ISIC rev.4 ecoinvent: 3510:Electric power generation, transmission and distribution
Tags: ConvertedDataset
Scenario: Business-as-Usual
System model: Allocation, cut-off by classification
Generated by: Niels Jungbluth
Published in: Jungbluth, N. 2007
Database: ecoinvent
isCopyrightProtected: true
accessRestrictedTo: 1

## General comment
Generic module to estimate emissions due to the use of diesel during crude oil exploration.
[This dataset was already contained in the ecoinvent database version 2. It was not individually updated during the transfer to ecoinvent version 3. Life Cycle Impact Assessment results may still have changed, as they are affected by changes in the supply chain, i.e. in other datasets. This dataset was generated following the ecoinvent quality guidelines for version 2. It may have been subject to central changes described in the ecoinvent version 3 change report (http://www.ecoinvent.org/database/ecoinvent-version-3/reports-of-changes/), and the results of the central updates were reviewed extensively. The changes added e.g. consistent water flows and other information throughout the database. The documentation of this dataset can be found in the ecoinvent reports of version 2, which are still available via the ecoinvent website. The change report linked above covers all central changes that were made during the conversion process.]

## Included activities end
Diesel consumption, emissions and infrastructure for the use of diesel in electric generating sets. Transport to site not included.

## Geography
Data for NO and US.

## Technology
On site generation of electricity in diesel motor generators.

## Time period
Time of publications.

## Reference product
- diesel, burned in diesel-electric generating set, 10MW: 1 MJ; CPC 17100: Electrical energy; By-product classification allocatable product
  EcoSpold01Location=GLO
  production volume 1 MJ
    Not known.
    Dummy value to be replaced by measured, estimated or calculated value
  property price 0.0188 EUR2005
    The production volume of this product is small compared to other products supplied by the activities within the same ISIC 3 category. Therefore, an average price of products supplied by the activities in the same ISIC 3 code has been applied.This price is obtained as '_75 Electricity, steam and hot water, EU27' in the 'EU & DK Input Output Database' (available in SimaPro, 0.068 EUR2003 per kWh). The price is assumed to be valid for both RER2005, world 2005. Conversion of energy unit: 1 kWh = 3.6 MJ
  properties: heating value, net 1 MJ

## Inputs from technosphere
- waste mineral oil: 0 kg; pedigree (1,1,1,1,1)
  EcoSpold01Location=CH
  Rough estimation
  Uncertainty: Rough estimation
  production volume 0 kg
    Calculated from the production volume of diesel, burned in diesel-electric generating set in proportion to the respective output amounts.
  properties: wet mass 1 kg, heating value, net 34.7 MJ, carbon content, fossil 0.864444, water content 0.111111, dry mass 0.9 kg
  note on heating value, net: Value taken from the general comment of the treatment dataset.
  note on carbon content, fossil: Tab A.6, ecoinvent v2.2 report 13_I. C content has been calculated after data in the tables, and then referred to 1 kg DM
- diesel: 0.0234 kg; lognormal variance with pedigree 0.0527, pedigree (3,3,5,3,1)
  Calculation
  EcoSpold01Location=RER
  Uncertainty: Calculation
  properties: dry mass 1 kg, wet mass 1 kg, heating value, net 42.8 MJ, carbon content, fossil 0.865
  note on carbon content, fossil: C-content of diesel is 86.5% (ecoinvent v2.2 report 6_IV, Tab 3.14)
- diesel-electric generating set, 10MW: 1.85e-10 unit; lognormal variance with pedigree 0.3881, pedigree (3,5,5,3,3)
  Estimation
  EcoSpold01Location=RER
  Uncertainty: Estimation
- lubricating oil: 0 kg; pedigree (1,1,1,1,1)
  Rough estimation with data for cogen 200kWe
  EcoSpold01Location=RER
  Uncertainty: Rough estimation with data for cogen 200kWe
  properties: carbon content, fossil 0.75, dry mass 1 kg, wet mass 1 kg, heating value, net 40.2 MJ
  note on carbon content, fossil: Lubricating oil is produced from diesel. C-content/dry mass of fats and oils considered 75%, from: ecoinvent v2.2 report, n 15a, pg 40
  note on heating value, net: Literature value, Source: IPCC 2006, 2006 IPCC Guidelines for National Greenhouse Gas Inventories, Prepared by the National Greenhouse Gas Inventories Programme, Eggleston H.S., Buendia L., Miwa K., Ngara T. and Tanabe K. (eds). Published: IGES, Japan
- waste mineral oil: -1.83909e-5, -4.55286e-7, -4.81538e-5 kg (3 entries); lognormal variance with pedigree 0.2701, pedigree (3,5,5,3,5)
  EcoSpold01Location=CH
  Rough estimation
  Uncertainty: Rough estimation
  production volume 6.7e-5 kg
- lubricating oil: 1.1658e-5, 5.5342e-5 kg (2 entries); lognormal variance with pedigree 0.2701, pedigree (3,5,5,3,5)
  (same comment as for lubricating oil)

## Emissions to nature
- NMVOC, non-methane volatile organic compounds, unspecified origin [air, non-urban air or from high stacks]: 9.24e-5 kg; lognormal variance with pedigree 0.16, pedigree (1,1,5,1,1)
  Environmental report
- Chromium [air, non-urban air or from high stacks]: 1.17e-9 kg; lognormal variance with pedigree 0.6992, pedigree (2,3,5,1,3)
  Literature for automobile emissions
  Uncertainty: Literature for automobile emissions
- Dinitrogen monoxide [air, non-urban air or from high stacks]: 6e-6 kg; lognormal variance with pedigree 0.0927, pedigree (3,3,5,3,1)
  Literature
  Uncertainty: Literature
- Zinc [air, non-urban air or from high stacks]: 2.34e-8 kg; lognormal variance with pedigree 0.6992, pedigree (2,3,5,1,3)
  Literature for automobile emissions
  Uncertainty: Literature for automobile emissions
- Carbon monoxide, fossil [air, non-urban air or from high stacks]: 0.00068 kg; lognormal variance with pedigree 0.7027, pedigree (3,3,5,3,1)
  Literature
  Uncertainty: Literature
- Cadmium [air, non-urban air or from high stacks]: 2.34e-10 kg; lognormal variance with pedigree 0.6992, pedigree (2,3,5,1,3)
  Literature for automobile emissions
  Uncertainty: Literature for automobile emissions
- Nickel [air, non-urban air or from high stacks]: 1.64e-9 kg; lognormal variance with pedigree 0.6992, pedigree (2,3,5,1,3)
  Literature for automobile emissions
  Uncertainty: Literature for automobile emissions
- Copper [air, non-urban air or from high stacks]: 3.97e-8 kg; lognormal variance with pedigree 0.6992, pedigree (2,3,5,1,3)
  Literature for automobile emissions
  Uncertainty: Literature for automobile emissions
- Mercury [air, non-urban air or from high stacks]: 4.67e-10 kg; lognormal variance with pedigree 0.7207, pedigree (3,3,5,3,3)
  Literature on content in diesel
  Uncertainty: Literature on content in diesel
- Benzo(a)pyrene [air, non-urban air or from high stacks]: 1e-10 kg; lognormal variance with pedigree 0.16, pedigree (1,1,5,1,1)
  Extrapolation
- Benzene [air, non-urban air or from high stacks]: 2e-8 kg; lognormal variance with pedigree 0.16, pedigree (1,1,5,1,1)
  Extrapolation
- Chromium VI [air, non-urban air or from high stacks]: 2.34e-12 kg; lognormal variance with pedigree 1.3792, pedigree (2,3,5,1,3)
  Literature for automobile emissions, 0.2% share of Cr VI, basic uncertainity estimated = 10
  Uncertainty: Literature for automobile emissions, 0.2% share of Cr VI, basic uncertainity estimated = 10
- Particulates, < 2.5 um [air, non-urban air or from high stacks]: 0.00017 kg; lognormal variance with pedigree 0.1727, pedigree (3,3,5,3,1)
  Literature
  Uncertainty: Literature
- Carbon dioxide, fossil [air, non-urban air or from high stacks]: 0.073 kg; lognormal variance with pedigree 0.0413, pedigree (2,3,5,3,1)
  Literature
  Uncertainty: Literature
- Nitrogen oxides [air, non-urban air or from high stacks]: 0.00138 kg; lognormal variance with pedigree 0.69, pedigree (1,1,5,1,1)
  Environmental report
- Sulfur dioxide [air, non-urban air or from high stacks]: 6.01e-5 kg; lognormal variance with pedigree 0.16, pedigree (1,1,5,1,1)
  Environmental report
- Selenium [air, non-urban air or from high stacks]: 2.34e-10 kg; lognormal variance with pedigree 0.6992, pedigree (2,3,5,1,3)
  Literature for automobile emissions
  Uncertainty: Literature for automobile emissions
- Methane, fossil [air, non-urban air or from high stacks]: 1.67e-7 kg; lognormal variance with pedigree 1.37, pedigree (1,1,5,1,1)
  Environmental report

## Sampling procedure
Literature.

## Extrapolations
This dataset has been extrapolated from year 2000 to the year of the calculation (2021). The uncertainty has been adjusted accordingly.

## Review by Michael Spielmann (obsolete) 2003-08-19
Passed.
