# grass production, permanent grassland, Swiss integrated production, intensive

Dataset: EcoSpold 2, unit process
Geography: CH
Time period: 2000-01-01 to 2021-12-31
Technology level: current
Classification: ISIC rev.4 ecoinvent: 0119:Growing of other non-perennial crops
Scenario: Business-as-Usual
System model: Allocation, cut-off by classification
Share of production covered: 0 %
Generated by: Fredy Dinkel
Published in: Jungbluth N. 2007
Database: ecoinvent
isCopyrightProtected: true
accessRestrictedTo: 1

## General comment
This dataset represents the production of 1 kg of grass (dry matter). The dry matter yield is 13500 kg/ha. Moisture content at harvest is 85%.
[This dataset was already contained in the ecoinvent database version 2. It was not individually updated during the transfer to ecoinvent version 3. Life Cycle Impact Assessment results may still have changed, as they are affected by changes in the supply chain, i.e. in other datasets. This dataset was generated following the ecoinvent quality guidelines for version 2. It may have been subject to central changes described in the ecoinvent version 3 change report (http://www.ecoinvent.org/database/ecoinvent-version-3/reports-of-changes/), and the results of the central updates were reviewed extensively. The changes added e.g. consistent water flows and other information throughout the database. The documentation of this dataset can be found in the ecoinvent reports of version 2, which are still available via the ecoinvent website. The change report linked above covers all central changes that were made during the conversion process.]

## Included activities start
This activity assumes grass production on a permanent natural meadow with a lifetime of 20 years and represents one year of cultivation on an established meadow. The inputs of mineral fertilisers and pesticides are included. Farm manure as an organic fertiliser is only accounted for in terms of direct field emissions; all pre-processes are included in the animal production systems.

## Included activities end
The dataset includes all machine operations and corresponding machine infrastructure and sheds. Machine operations are: weed control (pesticides against Rumex), fertilisation, mowing and loading for transport. This activity ends after loading of the grass at the farm gate.

## Geography
Refers to a production in the Swiss plateau (lowlands <700m).

## Technology
Intensive IP production.

## Parameters
- fraction, irrigation water, to ground water: 0.8 dimensionless; name fraction_IW_to_ground_water; lognormal variance with pedigree 0.0886, pedigree (4,3,1,1,4)
  Literature value (Döll, 2011) cross referenced with expert opinion.
- fraction, irrigation water, to air: 0.3353 dimensionless; name fraction_IW_to_air; lognormal variance with pedigree 0.0409, pedigree (2,2,2,1,1)
  Literature value (Siebert, 2010) (Vionnet, S., Quantis Water Database - Technical Report, 2012).
- fraction, irrigation water to surface water: 0.2 dimensionless; name fraction_IW_to_surface_water; lognormal variance with pedigree 0.0886, pedigree (4,3,1,1,4)
  Literature value (Döll, 2011) cross referenced with expert opinion.

## Reference product
- grass, Swiss integrated production: 1 kg; name REF_PRODUCT; CPC 01919: Forage products, n.e.c.; By-product classification allocatable product
  production volume 1.35089e8 kg
    Source: ecoinvent 2; 5% integrated production
  property price 0.645 EUR2005; name REF_PRODUCT_price_EUR2005
    Temporary price data. Calculated as 90% of purchasers price based on: Source: Ecoinvent report nr. 17, table 12.46
  property energy content 17.9 MJ; name REF_PRODUCT_energy_content
    Approximation by values for hay. See chapter 'Product Properties' in '01_crop production - yields & inputs CH & Europe_v1.0.pdf', section 'AGRICULTURAL PRODUCTION IN SWITZERLAND' - pdf-document on the dedicated talk page of ecoinvent (www.ecoinvent.org/documentation).
  property carbon content, non-fossil 0.443857; name REF_PRODUCT_C_content_non_fossil
    biogene carbon content on a dry matter basis
    Composition data obtained from the average composition of Fescue Fresh, Orchardgrass Fresh, and Timothy Fresh in (http://beefmagazine.com/images/2009%20feed%20table.pdf). First, composition data were refered to 1 kg dry mass. Then, C-contents were calculated considering a C-content/dry mass of 46% in carbohydrates (including fibres), 53% in proteins and 75% in fats. All data from 'Evolutionary and Biochemical Aspects', A.D. Kay and T. Vrede (in Global Ecology, 2010, Elsevier B.V., S.E. Jørgensen Ed.).
  property dry mass 1 kg; name REF_PRODUCT_DM
  property carbon content 0.443857
    carbon content on a dry matter basis (reserved; not for manual entry)
  properties: water content 5.66667, water in wet mass 5.66667 kg, wet mass 6.66667 kg, carbon content, fossil 0, carbon allocation 0.443857 kg

## Inputs from technosphere
- packaging, for fertilisers: 0.0044444 kg; lognormal variance with pedigree 0.0912, pedigree (4,3,5,5,4)
  Total amount of active substance/s of fertilisers needed for the production of 'grass, Swiss integrated production' is calculated to be circa 2.22E-03 kg. Fertiliser/s used in this dataset is/are: 'ammonium nitrate, as N'. The total amount of active substance/s is doubled in order to account for the packaging of the dilluted product of fertiliser/s that is/are applied. Therefore, 4.44E-03 kg of packaging for fertilisers is justified with this exchange.
  properties: price 0.0642 EUR2005, wet mass 1 kg, heating value, net 25.01 MJ, dry mass 1 kg, carbon content, fossil 0.825301
  note on carbon content, fossil: Considering a chemical formula (C2H4)n for polyethylene, carbon content-fossil is calculated to be 0.856286 kg of Carbon per kg of dry mass.
- fertilising, by broadcaster: 7.4074e-5 ha; source Nemecek, T. 2004; lognormal variance with pedigree 0.0587, pedigree (2,2,5,1,3)
  One application of mineral fertilizer per year as for hay in Nemecek et al. (2004)
  This exchange has an activity link directly to the producing activity because the product is primarily consumed in the same geographical area where it is produced.
- fodder loading, by self-loading trailer: 0.056 m3; lognormal variance with pedigree 0.0688, pedigree (2,2,5,3,3)
  Calculation with 120 kg/m3 and moisture of about 10-15% (=0.056 m3 / kg DM)
  This exchange has an activity link directly to the producing activity because the product is primarily consumed in the same geographical area where it is produced.
- [thio]carbamate-compound: 1.4815e-5 kg; source Nemecek, T. 2004; lognormal variance with pedigree 0.0987, pedigree (2,2,5,1,3)
  Application of Asulam as for hey in ecoinvent report 15 (Nemecek et al. 2004). 0.5 l/gha of solution containing 0.4 kg igredient per liter.
  properties: wet mass 1 kg, carbon content, fossil 0.626349, dry mass 1 kg
  note on carbon content, fossil: Approximated as an unweighted average of the C-content of the [thio]carbamate-compounds (Tab 2.25 Sutter, 2010) carbofuran,orbencarb, prosulfocarb
- liquid manure spreading, by vacuum tanker: 0.0059259 m3; source LBL 2004; lognormal variance with pedigree 0.0587, pedigree (2,2,5,1,3)
  Portion of slurry and mineral fertzilizer as for hey in ecoinvent report 15 (Nemecek et al. 2004). Total amount of N corresponds to the recommendations in LBL (2004)
  This exchange has an activity link directly to the producing activity because the product is primarily consumed in the same geographical area where it is produced.
- packaging, for pesticides: 2.963e-5 kg; lognormal variance with pedigree 0.0912, pedigree (4,3,5,5,4)
  Total amount of active substance/s of pesticides needed for the production of grass, Swiss integrated production is calculated to be circa 1.48E-05 kg. Pesticide/s used in this dataset is/are: '[thio]carbamate-compound'. The total amount of active substance/s is doubled in order to account for the packaging of the dilluted product of pesticide/s that is/are applied. Therefore, 2.96E-05 kg of packaging for pesticides is justified with this exchange.
  properties: wet mass 1 kg, dry mass 1 kg, carbon content, fossil 0.85714, price 0.0642 EUR2005, heating value, net 25.97 MJ
- irrigation: 0.000114458 m3; name water_irrigation_input; source Siebert, S. 2010; lognormal variance with pedigree 0.0427, pedigree (2,2,5,1,1)
  Calculated based on literature values (Döll, 2010) and partially modelled at ETH (Pfister, S.).
  property dry mass 0.11 kg; name DM
  property carbon content, fossil 0; name C_content_fossil
  property water content 9089.91; name water_content
  property water in wet mass 999.89 kg; name WWM
  property wet mass 1000 kg; name WM
  property carbon content, non-fossil 0; name C_content_non_fossil
- mowing, by rotary mower: 0.00037037 ha; source LBL 2004; lognormal variance with pedigree 0.0587, pedigree (2,2,5,1,3)
  5 harvests assumed, the average for intenisve meadows are 4 - 6 harvests, LBL (2004)
  This exchange has an activity link directly to the producing activity because the product is primarily consumed in the same geographical area where it is produced.
- ammonium nitrate: 0.00634953 kg; source LBL 2004; lognormal variance with pedigree 0.0587, pedigree (2,2,5,1,3)
  The exchange has been updated from 'ammonium nitrate, as N' into 'ammonium nitrate' and therefore its amount has been scaled (multiplied) from 0.0022 kg by 2.8573 kg of 'ammonium nitrate' per kg of 'ammonium nitrate, as N'. Original comment of the exchange is: Portion of mineral fertzilizer as for hey in ecoinvent report 15 (Nemecek et al. 2004). Total amount of N corresponds to the recommendations in LBL (2004)
  properties: wet mass 1 kg, dry mass 1 kg

## Inputs from nature
- Energy, gross calorific value, in biomass [natural resource, biotic]: 17.9 MJ; lognormal variance with pedigree 0.0418844, pedigree (2,1,5,3,1)
  Calculation with 17.9 MJ/kg DM (Nemecek et al. 2004, Tab. 4.7))
- Transformation, to pasture, man made, intensive [natural resource, land]: 0.037037 m2; lognormal variance with pedigree 0.1607, pedigree (2,2,5,1,1)
  Modelled, see chapter 'Land use' in '01_crop production_direct field emissions and natural resources_v1.0.pdf' - pdf-document on the dedicated talk page of ecoinvent (www.ecoinvent.org/documentation)
- Transformation, from pasture, man made, intensive [natural resource, land]: 0.037037 m2; lognormal variance with pedigree 0.1607, pedigree (2,2,5,1,1)
  (same comment as for Transformation, to pasture, man made, intensive)
- Occupation, pasture, man made, intensive [natural resource, land]: 0.74074 m2*year; lognormal variance with pedigree 0.08, pedigree (1,1,5,1,1)
  (same comment as for Transformation, to pasture, man made, intensive)
- Carbon dioxide, in air [natural resource, in air]: 1.62747 kg; = 44/12 * (REF_PRODUCT_C_content_non_fossil * REF_PRODUCT * REF_PRODUCT_DM ); lognormal variance with pedigree 0.0407, pedigree (2,1,5,3,1)
  Modelled,see chapter 'CO2 binding' in '01_crop production_direct field emissions and natural resources_v1.0.pdf' - pdf-document on the dedicated talk page of ecoinvent (www.ecoinvent.org/documentation)

## Emissions to nature
- Cadmium [soil, agricultural]: -8.2193e-8 kg; source Nemecek, T. 2004
  Calculation input - output balance using data about metal content of grass, seed and fertilizers summarized in Nemecek et al. (2004)
- Mercury [soil, agricultural]: -4.3333e-8 kg; source Nemecek, T. 2004
  (same comment as for Cadmium)
- Ammonia [air, non-urban air or from high stacks]: 0.00382608 kg; lognormal variance with pedigree 0.1207, pedigree (2,1,5,3,4)
  Modelled with the 'AGRAMMON model' described in '01_crop production_direct field emissions and natural resources_v1.0.pdf' - pdf-document on the dedicated talk page of ecoinvent (www.ecoinvent.org/documentation)
- Nitrate [water, ground-]: 0 kg
  Modelled with the 'SALCA-NO3 model' described in '01_crop production_direct field emissions and natural resources_v1.0.pdf' - pdf-document on the dedicated talk page of ecoinvent (www.ecoinvent.org/documentation)
- Asulam [soil, agricultural]: 1.4815e-5 kg; source Nemecek, T. 2004; lognormal variance with pedigree 0.0681, pedigree (4,2,5,1,1)
  Calculation input - output balance
- Water [water, ground-]: 6.08644e-5 m3; name water_to_water_ground; = water_irrigation_input*(1-fraction_IW_to_air)*fraction_IW_to_ground_water; lognormal variance with pedigree 0.1286, pedigree (4,3,5,1,4)
  Calculated value. See the parameters and their comments to understand the calculation.
  property fraction, origin: salt water 0; name fraction_origin_salt_water_Wgw
  property fraction, origin: fresh water 1; name fraction_origin_fresh_water_Wgw
  property fraction, origin: unspecified 0; name fraction_origin_unspecified_Wgw
- Phosphate [water, surface water]: 7.2315e-5 kg; source Nemecek, T. 2004; lognormal variance with pedigree 0.1608, pedigree (2,2,5,3,4)
  Formula as in ecoinvent report No. 15, chapter 4.4 (Nemecek et al. 2004)
- Zinc [soil, agricultural]: 3.6637e-6 kg; source Nemecek, T. 2004; lognormal variance with pedigree 0.1087, pedigree (2,1,5,3,3)
  (same comment as for Cadmium)
- Nickel [soil, agricultural]: -4.2822e-7 kg; source Nemecek, T. 2004
  (same comment as for Cadmium)
- Phosphate [water, ground-]: 1.2011e-5 kg; source Nemecek, T. 2004; lognormal variance with pedigree 0.1608, pedigree (2,2,5,3,4)
  Formula as in ecoinvent report No. 15, chapter 4.4 (Nemecek et al. 2004)
- Lead [soil, agricultural]: -2.2802e-6 kg; source Nemecek, T. 2004
  (same comment as for Cadmium)
- Dinitrogen monoxide [air, non-urban air or from high stacks]: 0.000258 kg; name N2O; lognormal variance with pedigree 0.1607, pedigree (2,1,5,3,4)
  Modelled, see chapter 'Emissions of N2O to the air' in '01_crop production_direct field emissions and natural resources_v1.0.pdf' - pdf-document on the dedicated talk page of ecoinvent (www.ecoinvent.org/documentation)
- Copper [soil, agricultural]: 1.353e-6 kg; source Nemecek, T. 2004; lognormal variance with pedigree 0.1087, pedigree (2,1,5,3,3)
  (same comment as for Cadmium)
- Chromium [soil, agricultural]: -1.7778e-8 kg; source Nemecek, T. 2004
  (same comment as for Cadmium)
- Water [water, surface water]: 1.52161e-5 m3; name water_to_water_surface; = water_irrigation_input*(1-fraction_IW_to_air)*fraction_IW_to_surface_water; lognormal variance with pedigree 0.1286, pedigree (4,3,5,1,4)
  Calculated value. See the parameters and their comments to understand the calculation.
  property fraction, origin: fresh water 1; name fraction_origin_fresh_water_Wsw
  property fraction, origin: salt water 0; name fraction_origin_salt_water_Wsw
- Nitrogen oxides [air, non-urban air or from high stacks]: 5.418e-5 kg; = 0.21 * N2O; lognormal variance with pedigree 0.1607, pedigree (2,1,5,3,4)
  Modelled, see chapter 'Emissions of NOx to the air' in '01_crop production_direct field emissions and natural resources_v1.0.pdf' - pdf-document on the dedicated talk page of ecoinvent (www.ecoinvent.org/documentation)
- Water [air, unspecified]: 3.83779e-5 m3; name water_to_air_unspecified; = (water_irrigation_input*fraction_IW_to_air); lognormal variance with pedigree 0.0807, pedigree (2,2,5,1,1)
  Calculated value based on literature values and expert opinion. See comments in the parametres' comment field.
  property fraction, origin: salt water 0; name fraction_origin_salt_water
  property fraction, origin: fresh water 1; name fraction_origin_fresh_water
  property fraction, origin: unspecified 0; name fraction_origin_unspecified
- Phosphorus [water, surface water]: 3.414e-7 kg; source Nemecek, T. 2004; lognormal variance with pedigree 0.1608, pedigree (2,2,5,3,4)
  Formula as in ecoinvent report No. 15, chapter 4.4 (Nemecek et al. 2004)

## Sampling procedure
Data were compiled from statistics, fertilising recommendations, documents from extension services and expert knowledge.

## Extrapolations
This dataset has been extrapolated from year 2005 to the year of the calculation (2021). The uncertainty has been adjusted accordingly.

## Review by Niels Jungbluth 2005-12-02
Passed.
