# natural gas, high pressure, import from RU

Dataset: EcoSpold 2, unit process
Geography: GB
Time period: 2012-01-01 to 2021-12-31
Technology level: current
Classification: ISIC rev.4 ecoinvent: 4930:Transport via pipeline
Scenario: Business-as-Usual
System model: Allocation, cut-off by classification
Share of production covered: 100 %
Generated by: Florentine Brunner
Published in: Faist Emmenegger, M. 2007
Database: ecoinvent
isCopyrightProtected: true
accessRestrictedTo: 1

## General comment
This dataset describes the transport needed for the export of Russian natural gas to Great Britain(expressed in tkm).
An average distance of 7000 km is estimated for the export, of which are 235 km offshore pipeline.

## Included activities start
'Exit gate' of natural gas field

## Included activities end
'Entry gate' of national market.

## Geography
The average weighted export distance is based on the trade movements 2012.

## Technology
The distance to the different countries is based on rough estimates using maps of natural gas pipeline infrastructure.

## Reference product
- natural gas, high pressure: 1 m3; CPC 12020: Natural gas, liquefied or in the gaseous state; By-product classification allocatable product; CAS 14493-06-2
  production volume 1.59e9 m3
    m3 imported in 2012 from RU to GB according to BP Statistical Review of World Energy, June 2014. The share of import to the category 'other Europe' is 3.86% from Netherlands, 38.4% from Norway, 0.008% from United Kingdom, 48.2% from Russian Federation, 9.6% from Algeria based on the import mix to 'other Europe' as described by BP 2014. Scaled form BP standard heating value (37.8MJ/m3) to LHV of ecoinvent v3 (39MJ/m3).
    Refrence(s): BP (2014). Statistical Review of World Energy, June 2014. Retrieved online from http://www.bp.com/content/dam/bp/excel/energy-economics/statistical-review-2015/bp-statistical-review-of-world-energy-2015-workbook.xlsx, 30 August, 2017
  properties: price 0.166 EUR2005, carbon content, fossil 0.602381, carbon content, non-fossil 0, water content 0, dry mass 0.84 kg, heating value, gross 0 MJ, water in wet mass 0 kg, wet mass 0.84 kg, heating value, net 39 MJ, carbon content 0.602381, carbon allocation 0.506 kg

## Inputs from technosphere
- natural gas, burned in gas motor, for storage: 0.0546 MJ; source Faist Emmenegger, M. 2007; lognormal variance with pedigree 0.036, pedigree (4,1,4,5,3)
  Data from german industrial expert for 2001, standard technology
  Uncertainty: D
  properties: heating value, net 1 MJ
- transport, pipeline, long distance, natural gas: 3.358 metric ton*km; = 4600*0.73/1000; lognormal variance with pedigree 0.1286, pedigree (2,1,4,1,1)
  Average distance from producer to Russian border multiplied by density of the natural gas.
  Uncertainty: A
- transport, pipeline, long distance, natural gas: 1.58045 metric ton*km; = (6765-4600)*0.73/1000; lognormal variance with pedigree 0.1286, pedigree (2,1,4,1,1)
  Average distance from Russian border to importing country multiplied by density of the natural gas.
- transport, pipeline, offshore, long distance, natural gas: 0.1786 metric ton*km; = 235*0.76/1000
  An average distance of 235 km is estimated for off-shore pipeline transport based on the length of the interconnector pipelines between Great Britain and Belgium/the Netherlands.
- natural gas, high pressure: 1.0001 m3; source Faist Emmenegger, M. 2007; lognormal variance with pedigree 0.026, pedigree (4,1,4,1,1)
  average losses
  Uncertainty: a
  properties: carbon content, fossil 0.602381, dry mass 0.84 kg, wet mass 0.84 kg, heating value, net 39 MJ
  note on carbon content, fossil: An average C content of 0.506 kg C/ m3 has been assumed (this average has been calculated using data in Tab 3.5, ecoinvent v2.2 report 6_V
  note on heating value, net: Literature value, Source: United Nations Statistics Division (2018) International Recommendations for Energy Statistics (IRES). Available at: http://unstats.un.org/unsd/statcom/doc11/BG-IRES.pdf.

## Emissions to nature
All rows: source Faist Emmenegger, M. 2007
- Propane [air, non-urban air or from high stacks]: 2e-7 kg; lognormal variance with pedigree 0.1286, pedigree (2,1,4,1,1)
  calculated based on average losses and russian gas composition
  Uncertainty: c
- Mercury [air, non-urban air or from high stacks]: 1e-12 kg; lognormal variance with pedigree 0.0486, pedigree (2,1,4,1,1)
  calculated based on average losses and russian gas composition
  Uncertainty: c
- Carbon dioxide, fossil [air, non-urban air or from high stacks]: 1e-7 kg; lognormal variance with pedigree 0.0086, pedigree (2,1,4,1,1)
  calculated based on average losses and russian gas composition
  Uncertainty: c
- Methane, fossil [air, non-urban air or from high stacks]: 7.16e-5 kg; lognormal variance with pedigree 0.1286, pedigree (2,1,4,1,1)
  calculated based on average losses and russian gas composition
  Uncertainty: c
- NMVOC, non-methane volatile organic compounds, unspecified origin [air, non-urban air or from high stacks]: 1e-7 kg; lognormal variance with pedigree 0.1286, pedigree (2,1,4,1,1)
  calculated based on average losses and russian gas composition
  Uncertainty: c
- Ethane [air, non-urban air or from high stacks]: 6e-7 kg; lognormal variance with pedigree 0.1286, pedigree (2,1,4,1,1)
  calculated based on average losses and russian gas composition
  Uncertainty: c
- Butane [air, non-urban air or from high stacks]: 1e-7 kg; lognormal variance with pedigree 0.1286, pedigree (2,1,4,1,1)
  calculated based on average losses and russian gas composition
  Uncertainty: c

## Sampling procedure
statistics

## Extrapolations
This dataset has been extrapolated from year 2012 to the year of the calculation (2021). The uncertainty has been adjusted accordingly.
