# treatment of used train, passenger, regional

Dataset: EcoSpold 2, unit process
Geography: RoW
Time period: 1993-01-01 to 2021-12-31
Technology level: current
Classification: ISIC rev.4 ecoinvent: 3830:Materials recovery
Classification: EcoSpold01Categories: transport systems/train
Tags: ConvertedDataset; Treatment
Scenario: Business-as-Usual
System model: Allocation, cut-off by classification
Generated by: Michael Spielmann (obsolete)
Published in: Spielmann M. 2004
Database: ecoinvent
isCopyrightProtected: true
accessRestrictedTo: 1

## General comment
The data is based on the bulk material composition of the Kolibri, the most important Swiss train composition in regional traffic. The life span of the lis assumed to be 40 years resulting in a life time performance of 6 Mio. vkm
[This dataset was already contained in the ecoinvent database version 2. It was not individually updated during the transfer to ecoinvent version 3. Life Cycle Impact Assessment results may still have changed, as they are affected by changes in the supply chain, i.e. in other datasets. This dataset was generated following the ecoinvent quality guidelines for version 2. It may have been subject to central changes described in the ecoinvent version 3 change report (http://www.ecoinvent.org/database/ecoinvent-version-3/reports-of-changes/), and the results of the central updates were reviewed extensively. The changes added e.g. consistent water flows and other information throughout the database. The documentation of this dataset can be found in the ecoinvent reports of version 2, which are still available via the ecoinvent website. The change report linked above covers all central changes that were made during the conversion process.]

## Included activities end
The inventory includes waste treatment processes for non metal components of a Kolibri train composition. For the transport of disposed materials standard distances have been applied.

## Geography
Data represents Swiss disposal conditions

## Technology
no technologies are specified

## Reference product
- used train, passenger, regional: -1 unit; By-product classification Waste; CPC 39990: Other wastes n.e.c.
  EcoSpold01Location=CH
  production volume 3.96633 unit
    This is a placeholder value that does not reflect real-world production volumes. This dataset does not currently require a real-world production volume to work in the database framework, and no actual data were collected yet. This has no negative effect on the results of the ecoinvent database.
  property price 0 EUR2005
    Waste products are assigned a price of zero as they are assumed to require further treatment.
  property carbon content, fossil 0.0691852
    Calculated from C content in input materials in the infrastructure
  property carbon content, non-fossil 0.0107248
    Calculated from C content in input materials in the infrastructure
  property carbon content 0.07991
    carbon content on a dry matter basis (reserved; not for manual entry)
  properties: water content 0, wet mass 171000 kg, dry mass 171000 kg, water in wet mass 0 kg, carbon allocation 13664.6 kg

## Inputs from technosphere
- waste plastic, mixture: 0 kg; pedigree (1,1,1,1,1)
  Material composition train composition
  EcoSpold01Location=CH
  Uncertainty: material composition train composition
  production volume 0 kg
    Calculated from the production volume of used train, passenger, regional in proportion to the respective output amounts.
  properties: water content 0.180638, dry mass 0.847 kg, wet mass 1 kg, heating value, net 30.79 MJ, carbon content, fossil 0.747344
  note on heating value, net: Value taken from the general comment of the treatment dataset.
  note on carbon content, fossil: C content in 1 kg DM was calculated using data in Tab A.2, ecoinvent v2.2 report 13_I
- waste wood, untreated: 0 kg; pedigree (1,1,1,1,1)
  EcoSpold01Location=CH
  Material composition train composition
  Uncertainty: material composition train composition
  production volume 0 kg
    (same comment as for waste plastic, mixture)
  properties: carbon content, non-fossil 0.48632, water content 0.25, dry mass 0.8 kg, wet mass 1 kg, heating value, net 13.99 MJ
  note on carbon content, non-fossil: Tab A.4, ecoinvent v2.2 report 13_I. C content has been referred to 1 kg DM,
- waste emulsion paint: 0 kg; pedigree (1,1,1,1,1)
  (same comment as for waste wood, untreated)
  production volume 0 kg
    (same comment as for waste plastic, mixture)
  properties: carbon content, fossil 0.27, heating value, net 8.18 MJ, dry mass 1 kg, wet mass 1 kg
  note on carbon content, fossil: Tab A.4, ecoinvent v2.2 report 13_I. C content has been calculated after data in the tables, and then referred to 1 kg DM
- waste glass: 0 kg; pedigree (1,1,1,1,1)
  (same comment as for waste plastic, mixture)
  production volume 0 kg
    (same comment as for waste plastic, mixture)
  properties: dry mass 1 kg, wet mass 1 kg, heating value, net 0.05 MJ
  note on heating value, net: Value extracted from "treatment of waste glass, open dump, very wet infiltration class (1000mm)"
- waste plastic, mixture: -1446.14, -96.6258, -7.30765, -39.9099, -16.1231, -37.8982, -1232.18, -10123.8 kg (8 entries); lognormal variance with pedigree 0.054, pedigree (3,1,5,5,1)
  (same comment as for waste plastic, mixture)
  production volume 39000 kg
- waste wood, untreated: -377.085, -46.8208, -3.42312, -131.505, -19.8673, -31.4085, -587.126, -5002.76 kg (8 entries); lognormal variance with pedigree 0.054, pedigree (3,1,5,5,1)
  (same comment as for waste wood, untreated)
  production volume 18600 kg
- waste emulsion paint: -0.479822, -5.09018 kg (2 entries); lognormal variance with pedigree 0.054, pedigree (3,1,5,5,1)
  (same comment as for waste wood, untreated)
  production volume 16.71 kg
- waste glass: -580.295, -53.4846, -1.21338, -4.99003, -7.57764, -22.3286, -1091.32, -5468.79 kg (8 entries); lognormal variance with pedigree 0.054, pedigree (3,1,5,5,1)
  (same comment as for waste plastic, mixture)
  production volume 21690 kg

## Sampling procedure
Data based on the material composition of an IC 2000.

## Extrapolations
This dataset has been copied from an original dataset covering the geography CH. The uncertainty has been adjusted accordingly.

## Review by Michael Spielmann (obsolete) 2004-04-05
passed.
