# biomethane pressure reduction from high to low pressure

Dataset: EcoSpold 2, unit process
Geography: CH
Time period: 2000-01-01 to 2021-12-31
Technology level: current
Classification: ISIC rev.4 ecoinvent: 3520:Manufacture of gas; distribution of gaseous fuels through mains
Synonyms: Kompogas, Naturgas
Tags: ConvertedDataset
Scenario: Business-as-Usual
System model: Allocation, cut-off by classification
Share of production covered: 100 %
Generated by: Mireille Faist Emmenegger (obsolete)
Published in: Jungbluth N. 2007
Database: ecoinvent
isCopyrightProtected: true
accessRestrictedTo: 1

## General comment
Total network losses are based on published data, repartition of losses on high and low pressure network on calculations with data for other countries.
[This dataset was already contained in the ecoinvent database version 2. It was not individually updated during the transfer to ecoinvent version 3. Life Cycle Impact Assessment results may still have changed, as they are affected by changes in the supply chain, i.e. in other datasets. This dataset was generated following the ecoinvent quality guidelines for version 2. It may have been subject to central changes described in the ecoinvent version 3 change report (http://www.ecoinvent.org/database/ecoinvent-version-3/reports-of-changes/), and the results of the central updates were reviewed extensively. The changes added e.g. consistent water flows and other information throughout the database. The documentation of this dataset can be found in the ecoinvent reports of version 2, which are still available via the ecoinvent website. The change report linked above covers all central changes that were made during the conversion process.]

## Included activities end
This dataset describes the energy requirement and the emissions of the low pressure distribution network in Switzerland.

## Geography
Energy requirements is based on environmental report of Italian company. Total leakages are specific for CH, HD-leakages are calculated out of the total with German data.

## Technology
The quantity of gas delivered in the low pressure network is estimated. Households and half of commercial and of others are assumed to be connected to the low pressure network

## Reference product
- biomethane, low pressure: 1 MJ; CPC 17200: Coal gas, water gas, producer gas and similar gases, other than petroleum gases and other gaseous hydrocarbons; By-product classification allocatable product; CAS 74-82-8
  production volume 0.0336675 MJ
    This is a placeholder value that does not reflect real-world production volumes. This dataset does not currently require a real-world production volume to work in the database framework, and no actual data were collected yet. This has no negative effect on the results of the ecoinvent database. The placeholder value of this activity was scaled according to the nominal GDP of 2005 (source: United Nations, http://data.un.org/Glossary.aspx?q=GDP+%28current+US%24%29, accessed 20130726) to reflect an appropriate share of the global production volume, which is also a placeholder value.
  property price 0.144 EUR2005
    Temporary price data. Calculated as 90% of purchasers price based on: Same prices per energy output as natural gas, based on the proportional heating value (55.5 MJ/kg for methane; 54.8 MJ/kg for natural gas)
  property carbon content, non-fossil 0.695496
    C content is 0.7 kg C/kg methane 96%vol (tab 19.1, ecoinvent v2.2 report 17, part 19). This can be obtained from the composition of the gas, 96% (in vol) methane, 2% (in vol) CO2. The composition in %vol was converted in % weight using density data of the different gases from tab 19.1, ecoinvent v2.2 report 17, part 19.
  property carbon content 0.695496
    carbon content on a dry matter basis (reserved; not for manual entry)
  properties: wet mass 0.0218341 kg, water in wet mass 0 kg, water content 0, carbon content, fossil 0, dry mass 0.0218341 kg, carbon allocation 0.0151855 kg

## Inputs from technosphere
- pipeline, natural gas, low pressure distribution network: 2.8149e-9 km; lognormal variance with pedigree 0.3406, pedigree (2,1,5,1,1)
  Based on statistics
  Uncertainty: b
- heat, central or small-scale, natural gas: 0.0002 MJ; lognormal variance with pedigree 0.0407, pedigree (1,3,5,3,1)
  Gas statistics
  Uncertainty: g
  properties: heating value, net 1 MJ
- biomethane, high pressure: 0.0292366 m3; lognormal variance with pedigree 0.0407, pedigree (1,3,5,3,1)
  Based on heating value, incl. leakage, 'biomethane, high pressure' has a lower heating value of circa 34.45 MJ/m3
  Uncertainty: b
  properties: wet mass 0.752 kg, dry mass 0.752 kg, carbon content, non-fossil 0.695496, heating value, net 34.97 MJ
  note on heating value, net: Literature value, Source: United Nations Statistics Division (2018) International Recommendations for Energy Statistics (IRES). Available at: http://unstats.un.org/unsd/statcom/doc11/BG-IRES.pdf.

## Emissions to nature
- Methane, non-fossil [air, urban air close to ground]: 0.00014331 kg; lognormal variance with pedigree 0.162, pedigree (3,1,5,1,1)
  Calculation based on gas composition and leakages
  Uncertainty: c
- Hydrogen sulfide [air, urban air close to ground]: 3.1703e-9 kg; lognormal variance with pedigree 0.082, pedigree (3,1,5,1,1)
  Calculation based on gas composition and leakages
  Uncertainty: c
- Carbon dioxide, non-fossil [air, urban air close to ground]: 8.2047e-6 kg; lognormal variance with pedigree 0.042, pedigree (3,1,5,1,1)
  Calculation based on gas composition and leakages
  Uncertainty: c

## Sampling procedure
statistics

## Extrapolations
This dataset has been extrapolated from year 2000 to the year of the calculation (2021). The uncertainty has been adjusted accordingly.
