# textile production, jute, weaving

Dataset: EcoSpold 2, unit process
Geography: BD
Time period: 2017-01-01 to 2021-12-31
Technology level: current
Classification: ISIC rev.4 ecoinvent: 1312:Weaving of textiles
Scenario: Business-as-Usual
System model: Allocation, cut-off by classification
Generated by: Mireille Faist Emmenegger
Published in: Faist Emmenegger, M. 2018
Database: ecoinvent
isCopyrightProtected: true
accessRestrictedTo: 1

## General comment
Inventory refers to 1 kg woven fabric from jute in Bangladesh. The process involves winding, beaming, weaving, and calendaring. Cut pieces and threads are produced as byproducts, however, in a negligible amount. The inventory is mainly based on the industry data and is supplemented, where necessary, with secondary processing energy data from machinery manufacturers.
The packaging of the produced good - jute textile - is made of jute textile (0.0167 kg textile/kg textile produced) itself. Very little (0.0067 kg) cast iron is also used. Since ecoinvent considers only unpackaged product, these are considered out of the inventory.

## Included activities start
The activity starts with reception of Jute yarn.

## Included activities end
This activity ends with 1 kg jute textile as the final product of the weaving process.

## Geography
Bangladesh

## Reference product
- textile, jute: 1 kg; CPC 26570: Woven fabrics of jute and other textile bast fibres (except flax, true hemp and ramie); By-product classification allocatable product
  production volume 9.5e8 kg
    The annual production volume is valid for the year 2014/15 according to the Bangladesh Jute Mills Corporation.
  property price 1.05 EUR2005
    Average 2005 prices for EU27, USA, China, Japan and India from Import/Export data (US$ and tonnes) in UN Commodity Trade Statistics Database; Commodity: Fabrics, woven of jute or other textile bast fibres of heading 2640
  property heating value, net 14.87 MJ
    LHV is calculated based on the Carbon content of the product. More details can be found on the respective documentation.
  property carbon content 0.490909
    carbon content on a dry matter basis (reserved; not for manual entry)
  properties: carbon content, fossil 0, water in wet mass 0 kg, dry mass 1 kg, water content 0, wet mass 1 kg, carbon content, non-fossil 0.490909, carbon allocation 0.490909 kg

## Inputs from technosphere
- electricity, medium voltage: 0.14 kWh; lognormal variance with pedigree 0.0106, pedigree (4,1,3,1,1)
  Industry data. The electricity data from the industry is available for a combined process of yarn and jute fabric production. Thus, the value is seperated using the ratio of the electricity consumption of the specific machinaries from the article Sharif et al 2016.
- yarn, jute: 1 kg; lognormal variance with pedigree 0.0026, pedigree (1,1,3,1,1)
  Industry data. The data are available from expert interview with production manager, Amin Jute mill, Bangladesh.
  properties: dry mass 1 kg, wet mass 1 kg, heating value, net 14.87 MJ, carbon content, non-fossil 0.490909
- building, hall: 8.89e-5 m2; lognormal variance with pedigree 0.016, pedigree (4,1,3,1,1)
  Industry data.

## Sampling procedure
Data were collected from the Amin Jute Mill which is a public enterprise of Bangladesh Jute Mill Corporation (BJMC) under the Ministry of Textile and Jute. Its average production is 11100 MT per year. Statistical report of BJMC represents that production of Hessian, Sacking and Carpet Backing Cloth were 11260 MT, 26272 MT and 3822 MT respectively under the mills of BJMC in fiscal year 2014-2015 where Amin Jute Mill produced 1061.62 MT, 2463.16 MT and 701.70 MT of Hessian, Sacking and Carpet Backing Cloth respectively in the same fiscal year. It indicates that from total production of BJMC mills, 9.43%, 9.38% and 18.36% of Hessian, Sacking and Carpet Backing Cloth came from Amin Jute mill for the fiscal year 2014-2015. In the fiscal year 2015-2016, production turns into 1277.32 MT and 2662.51 MT for Hessian and Sacking bag respectively which shows even higher growth of production from Amin Jute Mill. Average export quantity of jute goods from BJMC mills was 1,31,085 MT according to the information provided by Bangladesh Jute Spinners Association (BJSA) in the fiscal year 2014-2015. In case of Amin jute Mill, almost 90% of jute goods produced in the mill are being exported in several countries ensured by respective authorities. Export takes place in 30 countries including Sudan Iran, japan, Indonesia, India etc. where Sudan is the largest buyer. Considering above factors, we took Amin Jute Mill as the representetative of overall jute processing and manufacturing practices for the whole country - Bangladesh.

## Extrapolations
This dataset has been extrapolated from year 2017 to the year of the calculation (2021). The uncertainty has been adjusted accordingly.
