# maintenance, light commercial vehicle

Dataset: EcoSpold 2, unit process
Geography: RoW
Time period: 1990-01-01 to 2021-12-31
Technology level: current
Classification: ISIC rev.4 ecoinvent: 4520:Maintenance and repair of motor vehicles
Classification: EcoSpold01Categories: transport systems/road
Tags: ConvertedDataset
Scenario: Business-as-Usual
System model: Allocation, cut-off by classification
Generated by: Michael Spielmann (obsolete)
Published in: Spielmann M. 2007
Database: ecoinvent
isCopyrightProtected: true
accessRestrictedTo: 1

## General comment
Data are merely rough estimates based on expert estimates.
[This dataset was already contained in the ecoinvent database version 2. It was not individually updated during the transfer to ecoinvent version 3. Life Cycle Impact Assessment results may still have changed, as they are affected by changes in the supply chain, i.e. in other datasets. This dataset was generated following the ecoinvent quality guidelines for version 2. It may have been subject to central changes described in the ecoinvent version 3 change report (http://www.ecoinvent.org/database/ecoinvent-version-3/reports-of-changes/), and the results of the central updates were reviewed extensively. The changes added e.g. consistent water flows and other information throughout the database. The documentation of this dataset can be found in the ecoinvent reports of version 2, which are still available via the ecoinvent website. The change report linked above covers all central changes that were made during the conversion process.]

## Included activities end
The inventory includes materials used for alteration parts and energy consumption of garages. Rail and road transport of materials is accounted for

## Geography
Data represent Swiss conditions

## Technology
no technologies are specified

## Time period
Data represents conditions of the early 1990ties

## Reference product
- maintenance, light commercial vehicle: 1 unit; CPC 87141: Maintenance and repair services of motor vehicles; By-product classification allocatable product
  EcoSpold01Location=RER
  production volume 2.67763 unit
    This is a placeholder value that does not reflect real-world production volumes. This dataset does not currently require a real-world production volume to work in the database framework, and no actual data were collected yet. This has no negative effect on the results of the ecoinvent database.
  property price 1331.45 EUR2005
    Calculated based on inputs: The price of the product has been calculated as a sum of the values of the material and energy inputs for this product. This value is therefore a rough estimation. It may underestimate the real price since there are additional expenses when producing any product. These expences can include for example labour costs, treatment of waste materials and profit for the producer. Please consider carefully whether this level of data quality is acceptable for your application.

## Inputs from technosphere
- polypropylene, granulate: 12 kg; lognormal variance with pedigree 0.148, pedigree (4,5,5,5,1)
  Oral communication and own calculations
  EcoSpold01Location=RER
  Uncertainty: oral communication and own calculations
  properties: heating value, net 32.78 MJ, dry mass 1 kg, carbon content, fossil 0.857143, wet mass 1 kg
  note on heating value, net: Value extracted from "treatment of waste polypropylene, open burning"
  note on carbon content, fossil: Polypropylene is formed by the polymerisation of propylene, C3H6 (ecoinvent v2.2 report 11_II)
- ethylene glycol: 2 kg; lognormal variance with pedigree 0.148, pedigree (4,5,5,5,1)
  EcoSpold01Location=RER
  LCI of one passenger car
  Uncertainty: LCI of one passenger car
  properties: heating value, net 23.44 MJ, carbon content, fossil 0.387097, wet mass 1 kg, dry mass 1 kg
- synthetic rubber: 233 kg; lognormal variance with pedigree 0.148, pedigree (4,5,5,5,1)
  EcoSpold01Location=RER
  Oral communication and own calculations
  Uncertainty: oral communication and own calculations
  properties: heating value, net 26.42 MJ, carbon content, fossil 0.871949, wet mass 1 kg, dry mass 1 kg
  note on carbon content, fossil: EPDM (Ethylene-propene-diene terpolymer) rubber is a terpolymer of ethylene, propene, and a diene with the residual unsaturated portion of the diene in the side chain (ecoinvent v2.2 report 7-part XX & Ullmann). Chemical formula (deduced from Evidences of Solvent-Induced Miscibility in Polychloroprene-co-Ethylene-Propene Diene Terpolymer Blends, Dubey et al., Journal of Applied Polymer Science, 2009, 111:1884–1891): C20H35
- lead: 13 kg; lognormal variance with pedigree 0.148, pedigree (4,5,5,5,1)
  (same comment as for polypropylene, granulate)
  properties: wet mass 1 kg, dry mass 1 kg
- ethylene: 0 kg; pedigree (1,1,1,1,1)
  EcoSpold01Location=RER
  LCI of one passenger car
  Uncertainty: LCI of one passenger car
  properties: heating value, net 43.22 MJ, wet mass 1 kg, dry mass 1 kg, carbon content, fossil 0.857143
- polyethylene, high density, granulate: 10 kg; lognormal variance with pedigree 0.148, pedigree (4,5,5,5,1)
  (same comment as for polypropylene, granulate)
  properties: heating value, net 42.47 MJ, dry mass 1 kg, carbon content, fossil 0.857143, wet mass 1 kg
  note on carbon content, fossil: Polyethylene is formed out of a huge amount of ethylene monomers (C2H4) (ecoinvent v2.2 report 11_II). MW=28 g/mol
- electricity, low voltage: 0 kWh; pedigree (1,1,1,1,1)
  EcoSpold01Location=UCTE
  Oral communication and own calculations
  Uncertainty: oral communication and own calculations
- steel, low-alloyed, hot rolled: 22 kg; lognormal variance with pedigree 0.0466, pedigree (3,4,5,5,1)
  (same comment as for synthetic rubber)
  properties: carbon content, fossil 0.005, wet mass 1 kg, dry mass 1 kg
  note on carbon content, fossil: Low alloyed steel composition given in Tab. 3.2 ecoinvent v2.2 report 10_partII. Steel assumed to have a C content of 0.5%
- copper, cathode: 0.3 kg; lognormal variance with pedigree 0.148, pedigree (4,5,5,5,1)
  LCI of one passenger car
  EcoSpold01Location=RER
  Uncertainty: LCI of one passenger car
  properties: wet mass 1 kg, dry mass 1 kg
- sulfuric acid: 1.4 kg; lognormal variance with pedigree 0.148, pedigree (4,5,5,5,1)
  EcoSpold01Location=RER
  LCI of one passenger car
  Uncertainty: LCI of one passenger car
  properties: dry mass 1 kg, wet mass 1 kg
- ethylene: 0.600073, 37.3999 kg (2 entries); lognormal variance with pedigree 0.148, pedigree (4,5,5,5,1)
  EcoSpold01Location=RER
  LCI of one passenger car
  Uncertainty: LCI of one passenger car
- electricity, low voltage: 109.548, 19.9466, 321.166, 4930.92, 797.736, 2290.69 kWh (6 entries); lognormal variance with pedigree 0.148, pedigree (4,5,5,5,1)
  (same comment as for electricity, low voltage)

## Sampling procedure
Data partly based on expert estimates and partly on an LCI study of a German passenger car.

## Extrapolations
Data for Switzerland and Germany is used as an first estimate for Europe This dataset has been copied from an original dataset covering the geography RER. The uncertainty has been adjusted accordingly.

## Review by Niels Jungbluth 2004-06-11
passed.
