# deep well drilling, for deep geothermal power

Dataset: EcoSpold 2, unit process
Geography: IT
Time period: 2015-01-01 to 2021-12-31
Technology level: current
Classification: ISIC rev.4 ecoinvent: 0990:Support activities for other mining and quarrying
Synonyms: deep borehole drilling
Tags: geothermal power; Infrastructure
Scenario: Business-as-Usual
System model: Allocation, cut-off by classification
Generated by: Karin Treyer
Published in: S Hirchberg, S Wiemer, P Burgherr 2015
Database: ecoinvent
isCopyrightProtected: true
accessRestrictedTo: 1

## General comment
This activity represents the exchanges associated with 1 meter of drilling of a borehole for deep geothermal power generation. The inventory reflects the conditions for a well with a depth of 5000m (exchanges do not scale linealry with depth). Geothermal drilling profits from the experience gained in onshore oil and natural gas drilling. This data set is based on a data set comprised in the book 'Energy from the earth'. (see field 'published source' for more details). The life cycle inventories established for this dataset on geothermal power is based on the literature information provided in the book (see published source). Data are representative for geologic conditions in Switzerland and as first approximation used for this activity. Uncertainties are adjusted accordingly. If this activity is used for drilling at remote locations, diesel should be used as energy source for drilling instead of electricity.

## Included activities start
This is an onshore (rotatory drilling service station) service starting with the reciept of chemicals, reinforcing materials and energy for the drilling. The energy source is electricity from the grid. Diesel is only used as a stand by and for activities on or related to the drill site.

## Included activities end
Deep onshore borehole ready for use. Borehole casing (steel, cement) remains in the ground after end of life of the geothermal plant (no waste treatment).

## Geography
Represents installation of a deep geothermal power plant in Switzerland, extrapolated to this geography. The inventory reflects the conditions for a 5000 m well.

## Technology
Onshore drilling with a rig capacity of 6.75 MWel. The diameter of the borehole at the top is 10 inches.

## Reference product
- deep well, drilled, for geothermal power: 1 m; source S Hirchberg, S Wiemer, P Burgherr 2015; CPC 86219: Support services to other mining; By-product classification allocatable product
  production volume 1.7888e8 m; = 32000*5590
    scaled up according to proportion of GLO vs CH geothermal electricity generation
  property price 657.604 EUR2005
    Calculated based on inputs: The price of the product has been calculated as a sum of the values of the material and energy inputs for this product. This value is therefore a rough estimation. It may underestimate the real price since there are additional expenses when producing any product. These expences can include for example labour costs, treatment of waste materials and profit for the producer. Please consider carefully whether this level of data quality is acceptable for your application.

## Inputs from technosphere
- sodium hydroxide, without water, in 50% solution state: 1 kg; source S Hirchberg, S Wiemer, P Burgherr 2015; lognormal variance with pedigree 0.1433, pedigree (2,2,5,5,2)
  Assumption. Amounts for the drilling fluid components are rough estimations. They further represent an average mix over the whole drilling time and not specific drilling fluid compositions for the different stages during the drilling process.
  Source: Kaiser, M., and Fäs, M. (2004). Umweltverträglichkeitsbericht (Hauptuntersuchung) Deep Heat Mining, Basel, Switzerland. Gruner AG Ingenieure und Planer, Geohermal Explorers Ltd./ Sonderegger, M. (2013). Personal Communication with M. Sonderegger, Sankt Galler Stadtwerke, Switzerland.
  This item belongs to the drilling fluid category of the LCI.
  properties: heating value, net 3.03 MJ, dry mass 1 kg, wet mass 1 kg
- wastewater, average: -0.6 m3; lognormal variance with pedigree 0.1433, pedigree (2,2,5,5,2)
  Assumption. It is assumed that the total volume of water used for the drilling fluid is treated (not considering any losses). An additional amount of meteoric water is estimated. The wastewater from the drilling place is partly first stored at place and used for laboratory testing. All wastewater goes to the public wastewater treatment plant.
  COD is estimated to be 3kg, DOC 0.3kg, Potassium ions in the water 0.9kg, sodium ions in the water 6kg. These values could not be modelled in this inventory.
  production volume 1.07328e8 m3
    Calculated from production volume of reference product using the relative outputs.
  properties: water content 2882.2, carbon content, non-fossil 0.194039, dry mass 0.346837 kg, wet mass 1000 kg
  note on carbon content, non-fossil: 0.0673 kg TOC/m3 (Tab A.17, ecoinvent v2.2 report 13_I). TOC was considered as Total Carbon.
- cement, Portland: 211 kg; source S Hirchberg, S Wiemer, P Burgherr 2015; lognormal variance with pedigree 0.1433, pedigree (2,2,5,5,2)
  Calculated value. This item belongs to the casing activity during the drilling process. Cement use for the casing calculated for a given well design (length of well sections, borehole and pipe diameters and well depth). A loss factor of 1.5 is assumed.
  Geothermal cements should tie well casing to the rock formation, be impermeable, hydraulically isolate the well from geological strata other than those related to production and injection, and resist attack b substances present in geothermal reservoirs. It is normally a cement of low density, mainly Portland cement class G with a density of around 1800 kg/m3.
  No dataset for class G cement exists in ecoinvent, so that this
  dataset is taken as a proxy. No data for special additives were
  available.
  properties: wet mass 1 kg, dry mass 1 kg
- sodium chloride, powder: 6 kg; source S Hirchberg, S Wiemer, P Burgherr 2015; lognormal variance with pedigree 0.1433, pedigree (2,2,5,5,2)
  (same comment as for sodium hydroxide, without water, in 50% solution state)
  properties: dry mass 1 kg, wet mass 1 kg
- chemical, organic: 20 kg; source S Hirchberg, S Wiemer, P Burgherr 2015; lognormal variance with pedigree 0.1433, pedigree (2,2,5,5,2)
  (same comment as for sodium hydroxide, without water, in 50% solution state)
  properties: heating value, net 19.03 MJ, carbon content, fossil 0.628, wet mass 1 kg, dry mass 1 kg
  note on carbon content, fossil: This dataset is an unweighted average of 20 organic substances (listed in Tab 88.1, ecoinvent v2.2 report 8, part II), being part of the top100 chemicals included in this database. The C-content has also been calculated as an unweighted average of the C content of the substances composing this dataset.
- drilling waste: -466 kg; source S Hirchberg, S Wiemer, P Burgherr 2015; lognormal variance with pedigree 0.1438, pedigree (2,3,5,5,2)
  Calculated from the volume of the borehole.
  This item belongs to the drilling cuttings.
  production volume 8.33581e10 kg
    Calculated from production volume of reference product using the relative outputs.
  properties: dry mass 0.285 kg, wet mass 1 kg, carbon content, fossil 0.105263, water content 2.50877
- bentonite: 20 kg; source S Hirchberg, S Wiemer, P Burgherr 2015; lognormal variance with pedigree 0.1433, pedigree (2,2,5,5,2)
  (same comment as for sodium hydroxide, without water, in 50% solution state)
  properties: wet mass 1 kg, dry mass 1 kg
- potassium carbonate: 15 kg; source S Hirchberg, S Wiemer, P Burgherr 2015; lognormal variance with pedigree 0.1433, pedigree (2,2,5,5,2)
  (same comment as for sodium hydroxide, without water, in 50% solution state)
  properties: wet mass 1 kg, carbon content, fossil 0.0869565, dry mass 1 kg, heating value, net 2.63 MJ
- electricity, medium voltage: 3934 kWh; source S Hirchberg, S Wiemer, P Burgherr 2015; lognormal variance with pedigree 0.1433, pedigree (2,2,5,5,2)
  Calculated value/estimation. Electricity use for the drilling process (including tripping time) calculated as a function of well depth, well design, well volume and installed rig capacity necessary for the well and geological conditions.
  Energy use for the drilling process does not show a linear behaviour. This exchange value is therefore only correct for the specific conditions as specified in the report 'Energy from the Earth' (see source field).
- cellulose fibre: 17.5 kg; source S Hirchberg, S Wiemer, P Burgherr 2015; lognormal variance with pedigree 0.1433, pedigree (2,2,5,5,2)
  (same comment as for sodium hydroxide, without water, in 50% solution state)
  properties: dry mass 1 kg, wet mass 1 kg, carbon content, non-fossil 0.46
- steel, low-alloyed: 0.5 kg; source S Hirchberg, S Wiemer, P Burgherr 2015; lognormal variance with pedigree 0.1433, pedigree (2,2,5,5,2)
  Estimation for the material use of the drilling rig (could also be made of brass instead of steel).
  This item belongs to the infrastructure category in the LCI.
  properties: carbon content, fossil 0.005, wet mass 1 kg, dry mass 1 kg
- barite: 20 kg; source S Hirchberg, S Wiemer, P Burgherr 2015; lognormal variance with pedigree 0.1433, pedigree (2,2,5,5,2)
  (same comment as for sodium hydroxide, without water, in 50% solution state)
  properties: dry mass 1 kg, wet mass 1 kg
- reinforcing steel: 309 kg; source S Hirchberg, S Wiemer, P Burgherr 2015; lognormal variance with pedigree 0.1433, pedigree (2,2,5,5,2)
  Calculated value. This item belongs to the casing activity during the drilling process. Steel use for the casing calculated for a given well design (length of well sections, borehole and pipe diameters and well depth).
  properties: carbon content, fossil 0.004, wet mass 1 kg, dry mass 1 kg
- diesel, burned in diesel-electric generating set, 10MW: 111 MJ; source S Hirchberg, S Wiemer, P Burgherr 2015; lognormal variance with pedigree 0.1433, pedigree (2,2,5,5,2)
  Assumption. Rather pessimistic assumption of diesel use for
  - different applications at the drilling site (i.e. staplers), based on St. Gallen
  - backup in case of electrical power outage, based on Basel.
  Source: Haering, M. (2003). Deep Heat Mining Basel. Voruntersuchung und Pflichtenheft für die Umweltverträglichkeits-Prüfung. : Geothermal Explorers Ltd., Basel, Schweiz./ Sonderegger, M. (2013). Personal Communication with M. Sonderegger, Sankt Galler Stadtwerke,
  Switzerland.
  properties: heating value, net 1 MJ

## Inputs from nature
- Water, well, in ground [natural resource, in water]: 0.5 m3; source S Hirchberg, S Wiemer, P Burgherr 2015; lognormal variance with pedigree 0.1433, pedigree (2,2,5,5,2)
  Assumption. The amount for the use of water per m in the drilling fluid is a rather rough estimation.
  This item belongs to the Drilling fluid category of the LCI.
- Transformation, from unspecified, natural (non-use) [natural resource, land]: 0.6 m2; name transformation_land_from; lognormal variance with pedigree 0.1433, pedigree (2,2,5,5,2)
  Assumption. A drill site area of 18’000m2 is assumed, including the actual
  drilling rig area, storage area, etc.
  This item belongs to the Infrastructure category of the LCI.
- Occupation, industrial area [natural resource, land]: 6e-5 m2*year; = (6/12)/(5000)* transformation_land_from; source S Hirchberg, S Wiemer, P Burgherr 2015; lognormal variance with pedigree 0.1438, pedigree (2,3,5,5,2)
  Assumption. It is assumed that the actual drilling time amounts to 6 months for 5000 m, and that the preparation and closing time of the drill site amounts to 4 months.
  This item belongs to the Infrastructure category of the LCI.
- Transformation, to industrial area [natural resource, land]: 0.6 m2; = transformation_land_from; source S Hirchberg, S Wiemer, P Burgherr 2015; lognormal variance with pedigree 0.1438, pedigree (2,3,5,5,2)
  (same comment as for Transformation, from unspecified, natural (non-use))

## Sampling procedure
Literature

## Extrapolations
This dataset has been extrapolated from year 2015 to the year of the calculation (2021). The uncertainty has been adjusted accordingly.

## Review by Carl Vadenbo 2015-07-06
The update of the whole electricity sector for the ecoinvent v3.2 database consist of hundreds of datasets. All these datasets have passed through a streamlined review processes where the underlying modelling of production volumes, technology shares and efficiencies was reviewed in detail prior to the datasets being submitted to the database.
