# silicon carbide production

Dataset: EcoSpold 2, unit process
Geography: RoW
Time period: 2000-01-01 to 2021-12-31
Technology level: current
Classification: ISIC rev.4 ecoinvent: 2391:Manufacture of refractory products
Synonyms: silicon monocarbide; carbolon; SILICON CARBIDE; 409-21-2; Tokawhisker; Silicon monocarbide; Carborundeum; carborundum; Carborundum
Scenario: Business-as-Usual
System model: Allocation, cut-off by classification
Share of production covered: 10 %
Generated by: Mariska J. de Wild-Scholten
Published in: Jungbluth, N. 2007
Database: ecoinvent
isCopyrightProtected: true
accessRestrictedTo: 1

## General comment
This dataset represents the production of 1 kg of silicon carbide. Silicon carbide (SiC) is a ceramic compound of silicon and carbon that is manufactured on a large scale for use mainly as an abrasive but also occurs in nature as the extremely rare mineral moissanite. Silicon carbide is used during wafer sawing. Other possible uses are:
- Abrasive for grinding, cutting and polishing
- Ceramic and refractory products
- Filler in metals, plastics and building material
This dataset is based on data from literature.
References:
Jungbluth N., Stucki M, and Frischknecht R. (2009) Photovoltaics. In Dones, R. (Ed.) et al., Sachbilanzen von Energiesystemen: Grundlagen für den ökologischen Vergleich von Energiesystemen und den Einbezug von Energiesystemen in Ökobilanzen für die Schweiz. ecoinvent report No. 6-XII, Swiss Centre for Life Cycle Inventories, Dübendorf, CH, 2009.
Liethschmidt, K. and Garbes, J. 2008. Silicon Carbide. Ullmann's Encyclopedia of Industrial Chemistry.
Gendorf (2016) Umwelterklärung 2015, Werk Gendorf Industriepark, www.gendorf.de.

## Included activities start
The activity starts when the raw materials enter the process.

## Included activities end
This activity ends with the production of silicon carbide. The dataset includes raw materials and electricity use, as well as some emissions to air from the process.

## Geography
Estimation for Europe, assumed to be representative of the global production. Emissions data from a plant in NL. Some values are based on data from a large chemical factory located in Germany. These are assumed to be valid for this geography.

## Technology
Silicon carbide is manufactured through reaction of silicon dioxide and carbon, yielding silicon carbide and carbon monoxide. This dataset represents the average technology used by 4 companies.
Reference:
Liethschmidt, K. and Garbes, J. 2008. Silicon Carbide. Ullmann's Encyclopedia of Industrial Chemistry.

## Time period
Time of publication. Some values are based on data published by the Gendorf factory that were collected between 2011 and 2015. The time period has been adjusted accordingly. For more details, see the comments of the exchanges.

## Reference product
- silicon carbide: 1 kg; name RP; CPC 373: Refractory products and structural non-refractory clay products; By-product classification allocatable product; CAS 409-21-2
  Silicon carbide (SiC) is a ceramic compound of silicon and carbon that is manufactured on a large scale for use mainly as an abrasive but also occurs in nature as the extremely rare mineral moissanite. Silicon carbide is used during wafer sawing. Other possible uses are:
  - Abrasive for grinding, cutting and polishing
  - Ceramic and refractory products
  - Filler in metals, plastics and building material
  References:
  Jungbluth N., Stucki M, and Frischknecht R. (2009) Photovoltaics. In Dones, R. (Ed.) et al., Sachbilanzen von Energiesystemen: Grundlagen für den ökologischen Vergleich von Energiesystemen und den Einbezug von Energiesystemen in Ökobilanzen für die Schweiz. ecoinvent report No. 6-XII, Swiss Centre for Life Cycle Inventories, Dübendorf, CH, 2009.
  Liethschmidt, K. and Garbes, J. 2008. Silicon Carbide. Ullmann's Encyclopedia of Industrial Chemistry.
  production volume 5.1e8 kg; name RP_PV
    http://minerals.usgs.gov/minerals/pubs/commodity/abrasives/myb1-2007-abras.xls ; consumption of US multiplied by GDP
  property heating value, net 9.08 MJ
    LHV is calculated based on the elemental composition of the substance. Based on the CAS number of the substance (000409-21-2), the chemical formula of the substance is found to be: CSi, (PubChem 2020).
    Reference: Kim, S., Chen, J., Cheng, T., Gindulyte, A., He, J., He, S., Li, Q., Shoemaker, B. A., Thiessen, P. A., Yu, B., Zaslavsky, L., Zhang, J., & Bolton, E. E. (2019). PubChem 2019 update: improved access to chemical data. Nucleic acids research, 47(D1), D1102–D1109. https://doi.org/10.1093/nar/gky1033
  property price 0.685 EUR2005
    Temporary price data. Calculated as 90% of purchasers price based on: 2005 import and export prices (total trades (USD) divided by total weight (kg) in biggest economies of the world: EU27, USA, Brasil, China, India, Japan and Russia) from UN Commodity Trade Statistics Database (http://data.un.org/Explorer.aspxDatabase [Accessed 2011.06.21]). Commodity: Silicon carbide
  property carbon content 0.3
    carbon content on a dry matter basis (reserved; not for manual entry)
  properties: carbon content, fossil 0.3, carbon content, non-fossil 0, dry mass 1 kg, water in wet mass 0 kg, wet mass 1 kg, water content 0, carbon allocation 0.3 kg

## Inputs from technosphere
- waste, from silicon wafer production, inorganic: -0.2 kg; name BP_waste_from_silicon_wafer_production; lognormal variance with pedigree 0.0223, pedigree (3,2,2,5,3)
  Rough estimation
  Uncertainty: R
  production volume 1.02e8 kg; = RP_PV*BP_waste_from_silicon_wafer_production/ABS(RP)
    Calculated from the production volume of silicon carbide in proportion to the respective output amounts.
  property price 0 EUR2005; name BP_waste_from_silicon_wafe_price_EUR2005
  properties: wet mass 1 kg, water content 0.103753, dry mass 0.906 kg, carbon content, fossil 0.0347572
- petroleum coke: 1.09 kg; lognormal variance with pedigree 0.0029, pedigree (2,2,2,5,1)
  De Wild 2007, Internet
  Uncertainty: d
  properties: heating value, net 35 MJ, wet mass 1 kg, carbon content, fossil 0.885, dry mass 1 kg
- silicone factory: 1e-11 unit; lognormal variance with pedigree 0.3203, pedigree (1,2,2,5,3)
  Estimation
  Uncertainty: E
- nitrogen, liquid: 0.019 kg; lognormal variance with pedigree 0.0106, pedigree (2,3,2,4,3)
  Calculated based on literature data published by the industry. This value is a 5-year average of data (2011 - 2015) published by the Gendorf factory (Gendorf, 2016, Umwelterklärung, www.gendorf.de), (Gendorf, 2015, Umwelterklärung, www.gendorf.de), (Gendorf, 2014, Umwelterklärung, www.gendorf.de). The amount of nitrogen used per kg of chemical substance produced is calculated using literature data published by the Gendorf factory based in Germany, which produces a wide range of chemical substances. The factory produced 1657400 tonnes of chemical substances in the year 2015 (Gendorf, 2016, Umwelterklärung, www.gendorf.de) and 740000 tonnes of intermediate products. The reported amount of nitrogen used in 2015 was 33512400 Nm3 (Gendorf, 2016, Umwelterklärung, www.gendorf.de). One Nm3 of nitrogen is equal to 1.2506 kg. The resulting amount of nitrogen - the 5-year average (2011 - 2015, weighted by production volume) is 0.019 kg/kg. Nitrogen is mainly used during the production of chemicals for 'blanketing', which is the process of applying gas to the vapour space of a container or vessel in order to control its composition.
  properties: dry mass 1 kg, wet mass 1 kg
- sodium chloride, powder: 0.007 kg; lognormal variance with pedigree 0.0029, pedigree (2,2,2,5,1)
  De Wild 2007, Internet
  Uncertainty: d
  properties: wet mass 1 kg, dry mass 1 kg
- electricity, medium voltage: 0 kWh; pedigree (1,1,1,1,1)
  Liethschmidt 2002
  Uncertainty: L
- silica sand: 1.77 kg; lognormal variance with pedigree 0.0029, pedigree (2,2,2,5,1)
  De Wild 2007, Internet
  Uncertainty: d
  properties: dry mass 0.99 kg, water content 0.010101, wet mass 1 kg
- wood chips, wet, measured as dry mass: 0 kg; pedigree (1,1,1,1,1)
  De Wild 2007, Internet
  Uncertainty: d
  properties: heating value, net 10.84 MJ, dry mass 1 kg, water content 1.4, wet mass 2.4 kg, carbon content, non-fossil 0.494
  note on heating value, net: Value based on the dataset 'softwood forestry, mixed species, sustainable forest management'
  note on carbon content, non-fossil: C content of dry mass is 0.494 kgC/kg dry wood (ecoinvent v2.2 report 9).
- electricity, medium voltage: 0.108405, 0.0207873, 0.348976, 5.07555, 0.715401, 2.33088 kWh (6 entries); lognormal variance with pedigree 0.0203, pedigree (1,2,2,5,3)
  Liethschmidt 2002
  Uncertainty: L
- wood chips, wet, measured as dry mass: 7.25893e-5, 0.0320374 kg (2 entries); lognormal variance with pedigree 0.0029, pedigree (2,2,2,5,1)
  De Wild 2007, Internet
  Uncertainty: d

## Emissions to nature
- Nitrogen [air, unspecified]: 0.019 kg; lognormal variance with pedigree 0.0106, pedigree (2,3,2,4,3)
  Calculated value. The amount of nitrogen released to air is equal to the amount of nitrogen entering the activity.
- Carbon dioxide, fossil [air, urban air close to ground]: 1.896 kg; lognormal variance with pedigree 0.0029, pedigree (2,2,2,5,1)
  Calculation for burning of petroleum coke not including carbon in the product
  Uncertainty: C
- Nitrogen oxides [air, urban air close to ground]: 0.0014359 kg; lognormal variance with pedigree 0.0429, pedigree (2,2,2,5,1)
  Kollo silicon 2004, environmental report
  Uncertainty: K
- Ammonia [air, urban air close to ground]: 0.00020215 kg; lognormal variance with pedigree 0.0129, pedigree (2,2,2,5,1)
  Kollo silicon 2004, environmental report
  Uncertainty: K
- Carbon monoxide, fossil [air, urban air close to ground]: 0.0084344 kg; lognormal variance with pedigree 0.6529, pedigree (2,2,2,5,1)
  Kollo silicon 2004, environmental report
  Uncertainty: K
- Sulfur dioxide [air, urban air close to ground]: 0.0070961 kg; lognormal variance with pedigree 0.0029, pedigree (2,2,2,5,1)
  Kollo silicon 2004, environmental report
  Uncertainty: K
- Carbon dioxide, non-fossil [air, urban air close to ground]: 0.064904 kg; lognormal variance with pedigree 0.0029, pedigree (2,2,2,5,1)
  Calculation for wood chips
  Uncertainty: C

## Sampling procedure
Data from literature and the internet. Average data from 4 companies. Some values are calculated based on data from a large chemical factory located in Germany. For more details, see the comments of the exchanges.

## Extrapolations
Emission data extrapolated with total CO2 emissions. This dataset has been copied from an original dataset covering the geography RER. The uncertainty has been adjusted accordingly.

## Review by Gregor Wernet 2017-08-04
This dataset was additionally reviewed in a separate review process by Eric Johnson of Atlantic Consulting as well as Emilia Moreno Ruiz and Gregor Wernet of ecoinvent.
