# venting of argon, crude, liquid

Dataset: EcoSpold 2, unit process
Geography: GLO
Time period: 2008-01-01 to 2021-12-31
Technology level: current
Classification: ISIC rev.4 ecoinvent: 2011:Manufacture of basic chemicals
Classification: EcoSpold01Categories: chemicals/inorganics
Tags: service
Scenario: Business-as-Usual
System model: Allocation, cut-off by classification
Generated by: Tereza Levova
Database: ecoinvent
isCopyrightProtected: true
accessRestrictedTo: 1

## General comment
This activity describes service of venting of argon into the atmosphere as an emission to air.

Argon is produced mainly as a by-product in air separation, cryogenic activity, where oxygen, liquid is produced as a reference product. Argon is afterwards either vented directly into the atmosphere or transformed into marketable product and sold.

## Included activities end
This activity describes venting of argon as an emission to air.

## Reference product
- venting of argon, crude, liquid: 1 kg; By-product classification allocatable product; CPC 94339: Other non-hazardous waste treatment and disposal services; CAS 7440-37-1
  production volume 4.09e9 kg; = 4.84E9-7.5E8
    Calculated value based on literature. Argon is produced as a by-product in air separation, cryogenic. In the same activity oxygen, liquid is produced as a reference product. For every 1kg of oxygen produced 0.06 kg of argon is produced.
    The production volume of oxygen. liquid produced in air separation, cryogenic is calculated based on literature (Emsley, 2001) and estimate. 100 million tonnes of oxygen is being produced annually in the whole world. Out of two different production technologies air separation is the preferred one (Emsley, 2001). Based on this information it is estimated that 80% of the total production volume of oxygen is produced using this technology. The annual production volume of oxygen, liquide produced via air separation, cryogenic is (1E+10*0.8=) 8E+10 kg/year.
    The annual production volume of argon produced in that activity is thus (0.06/1*8E+10=) 4.84E+9 kg/year.
    Based on literature (http://www.lenntech.com/periodic/elements/ar.htm, accessed 20120628 and Ullmann's Encyclopedia) the real amount of argon used by industry is 7.5E+08 kg/year. The difference between the amount of argon produced and argon actually used is the amount of argon vented (4.84E+9-7.5E+08=) 4.09E+9 kg/year.
  property price 0.37 EUR2005
    Calculated based on inputs: The price of the product has been calculated as a sum of the values of the material and energy inputs for this product. This value is therefore a rough estimation. It may underestimate the real price since there are additional expenses when producing any product. These expences can include for example labour costs, treatment of waste materials and profit for the producer. Please consider carefully whether this level of data quality is acceptable for your application.
  property carbon content 0
    carbon content on a dry matter basis (reserved; not for manual entry)
  properties: water content 0, carbon content, non-fossil 0, carbon content, fossil 0, dry mass 1 kg, wet mass 1 kg, water in wet mass 0 kg, carbon allocation 0 kg

## Inputs from technosphere
- argon, crude, liquid: 1 kg; lognormal variance with pedigree 0.0086, pedigree (1,1,4,1,1)
  property carbon content, non-fossil 0; name C_content_non_fossil
  property water in wet mass 0 kg; name WWM
  property water content 0; name water_content
  property carbon content, fossil 0; name C_content_fossil
  property dry mass 1 kg; name DM
  property wet mass 1 kg; name WM

## Emissions to nature
- Argon-40 [air, unspecified]: 1 kg; lognormal variance with pedigree 0.048, pedigree (1,1,4,1,1)

## Extrapolations
This dataset has been extrapolated from year 2012 to the year of the calculation (2021). The uncertainty has been adjusted accordingly.

## Review by Bo Weidema 2012-08-28
passed
