# sodium silicate production, spray powder, 80%

Dataset: EcoSpold 2, unit process
Geography: RER
Time period: 1995-01-01 to 2021-12-31
Technology level: current
Classification: ISIC rev.4 ecoinvent: 2011:Manufacture of basic chemicals
Synonyms: Sodium polysilicate; Sodium siliconate; SODIUM SILICATE; Sodium sesquisilicate; Sodium metasilicate; Waterglass
Scenario: Business-as-Usual
System model: Allocation, cut-off by classification
Generated by: Roland Hischier
Published in: Zah R. 2007
Database: ecoinvent
isCopyrightProtected: true
accessRestrictedTo: 1

## General comment
This dataset represents the production of 1 kg of sodium silicate powder (80%) from sodium silicate (48% in water) by the hydrothermal process. There are currently three principal areas of use for sodium silicates: as a raw material in detergents, as a starting material for the chemical industry, and as an adhesive in various fields. In detergents, sodium silicates serve as builder, corrosion inhibitor and additive. Material and energy inputs as well as waste production and emission to air and water are based on literature sources. The infrastructure is estimated based on a large chemical plant.
References:
Zah R., Hischier R. (2007) Life Cycle Inventories of Detergents. ecoinvent report No. 12. Swiss Centre for Life Cycle Inventories, Dübendorf, 2007.

## Included activities start
From reception of sodium silicate (hydrothermal liquor, 48 % in water) at the factory gate.

## Included activities end
This activity ends with the production of 1 kg of sodium silicate powder (80%). The dataset includes material and energy input, production of waste, emissions and infrastructure.

## Geography
Average data from 6 European producers.

## Technology
The hydrothermal process is one of the two main processes used to produce sodium silicate, the other one being the furnace process.
In the hydrothermal process, sand is dissolved in sodium hydroxide. This process is carried out under high temperature and pressure in an autoclave. After filtration sodium silicate is obtained in a 48% solution. Spray-drying of the hydrothermal 48% sodium silicate solution obtained after filtration produces a powder of 80%. The sodium silicate solution can be reacted again with sodium hydroxide. Metasilicate crystallises out and can be used in its solid form.
This represents an average technology in Europe.
References:
Zah R., Hischier R. (2007) Life Cycle Inventories of Detergents. ecoinvent report No. 12. Swiss Centre for Life Cycle Inventories, Dübendorf, 2007.

## Time period
Producer information for the year 1995.

## Parameters
- fraction, process water, to air: 0.998255 dimensionless; name fraction_PW_to_air; lognormal variance with pedigree 0.092025, pedigree (4,4,3,2,4)
  Literature value (IPPC, 2007) (Vionnet, S., Quantis Water Database - Technical Report, 2012).
- fraction, cooling water, once-through system, to air: 0.004 dimensionless; name fraction_CW_OT_to_air; lognormal variance with pedigree 0.0413, pedigree (2,3,1,3,1)
  Calculated based on literature value (Scown, C.D., 2011, Water Footprint of U.S. Transportation Fuels and supplying information of the article) (Vionnet, S., Quantis Water Database - Technical Report, 2012).
- fraction, cooling water, cooling pond system, to air: 0.032 dimensionless; name fraction_CW_CP_to_air; lognormal variance with pedigree 0.0413, pedigree (2,3,1,3,1)
  (same comment as for fraction, cooling water, once-through system, to air)
- fraction, cooling water, recirculating system, to air: 0.771 dimensionless; name fraction_CW_R_to_air; lognormal variance with pedigree 0.0413, pedigree (2,3,1,3,1)
  (same comment as for fraction, cooling water, once-through system, to air)
- fraction, cooling water, to air: 0.3875 dimensionless; name fraction_CW_to_air; = (0.5*fraction_CW_OT_to_air)+(0.5*fraction_CW_R_to_air); lognormal variance with pedigree 0.092025, pedigree (4,4,3,2,4)
  Calculated value based on literature value (see comments of the other parametres present in this dataset) and expert opinion. In the case when no industry/literature data are available about the type of cooling or directly fraction, cooling water, to air specific for the process a default assumption is applied. It is assumed that the once-through cooling system is used in 50% of all cases and recirculating system is used in another 50% of all cases.

## Reference product
- sodium silicate, spray powder, 80%: 1 kg; name RP; source Fawer M. 1997; CPC 34270: Cyanides, cyanide oxides and complex cyanides; fulminates, cyanates and thiocyanates; silicates; borates; perb[…]; By-product classification allocatable product; CAS 6834-92-0
  The solid portions of the surface of the Earth consist predominantly of silicon and oxygen atoms in the form of silica and silicates. The use of Earth’s silica and silicate resources is thus the oldest technology on the planet. Nowadays, the range of application of silica and silicates is mainly in the following three fields: detergents, chemicals, adhesives. As a detergent ingredient or wash alkali, sodium silicates raise the pH value and dirt and textile fibres become more strongly negatively charged increasing their mutual electrostatic repulsion. Apart from this, the hardness components of the water are eliminated by complex formation.
  production volume 6.09e8 kg; name RP_PV
    Estimated value. The European production volume is extrapolated from the global production volume based on reports from Cefic (European Chemical Industry Council), and the American Chemistry Council.
    According to Cefic (2016) the global sales of chemicals in the year 2015 was 3 534 billion euros. The reported share of sales per region are: EU28 14.7%; Other Europe (Switzerland, Norway, Turkey, Russia and Ukraine) 2.7%; NAFTA (US, Canada and Mexico) 16.5%; Latin America 3.8%; China 39.9%; Japan 3.9%; Republic of Korea 3.2%; India 2.2%; Rest of Asia 11.9%; Rest of the World 1.3%. Cefic also reports the US total sales, which amount to 518.7 billion euros out of the global 3 534 billion euros (14.7%). The same share is reported by the American Chemistry Council (2016), according to which the USA sales account for 15% of global sales for the year 2016.
    According to the OECD the global production volume is approximately 3-4 million metric tonnes. For the sake of simplicity, it is assumed here that the global production volume equals to 3.5 million metric tonnes. Since no data were found for the European production this value was scaled accordingly.
    Reference(s):
    Cefic 2016. Facts and figures 2016 of the European chemical industry. Accessible at: http://www.cefic.org/Facts-and-Figures/Chemicals-Industry-Profile/
    American Chemistry Council 2016. Outlook: U.S. Chemical Industry Continues to Outpace Industrial Output; Accounts for More Than One-Half of Construction Spending by Manufacturing Sector. Accessible at: https://www.americanchemistry.com/Media/PressReleasesTranscripts/ACC-news-releases/US-Chemical-Industry-Continues-to-Outpace-Industrial-Output.html
    OECD. 2004. Screening Information Dataset, Initial Assessment Profile for Soluble silicates. Retrieved from: http://webnet.oecd.org/hpv/ui/handler.axd?id=ceb8dc04-f1e0-419b-898b-98c093e44063, 15 June 2017.
  property price 0.22 EUR2005
    Calculated value based on data from United Nations Commodity Trade Statistics Database (comtrade.un.org). UN comtrade category: 283919 Silicates of sodium other than metasilicates. Year 2005. Using exchange rate of 1EURO = 1.209 USD. Average of price of import into 5 main markets (EU, US, JP, IN and CN).
  property carbon content 0
    carbon content on a dry matter basis (reserved; not for manual entry)
  properties: wet mass 1 kg, dry mass 1 kg, water in wet mass 0 kg, water content 0, carbon content, non-fossil 0, carbon content, fossil 0, carbon allocation 0 kg

## Inputs from technosphere
- heat, district or industrial, other than natural gas: 0.0624 MJ; source Fawer M. 1997; lognormal variance with pedigree 0.0407, pedigree (2,2,5,1,1)
  Calculated value: calculation based on literature value. The data reported in the literature refer to a 48% solution of sodium silicate. All chemicals in the dataset use a functional unit referring to 100% of sodium silicate, thus the literature values has been multiplied with a factor of 2.08.
  Uncertainty: A
  properties: heating value, net 1 MJ
- inert waste, for final disposal: -0.00271 kg; name BP_inert_waste_for_final_disposal; source Fawer M. 1997; lognormal variance with pedigree 0.0407, pedigree (2,2,5,1,1)
  (same comment as for heat, district or industrial, other than natural gas)
  production volume 1.65039e6 kg; = RP_PV*BP_inert_waste_for_final_disposal/ABS(RP)
    Calculated from the production volume of sodium silicate, spray powder, 80% in proportion to the respective output amounts.
  property price 0 EUR2005; name BP_inert_waste_for_final_d_price_EUR2005
  properties: water content 0.00502513, wet mass 1 kg, dry mass 0.995 kg
- electricity, medium voltage: 0.187 kWh; source Fawer M. 1997; lognormal variance with pedigree 0.0407, pedigree (2,2,5,1,1)
  (same comment as for heat, district or industrial, other than natural gas)
- steam, in chemical industry: 0.709 kg; source Fawer M. 1997; lognormal variance with pedigree 0.0407, pedigree (2,2,5,1,1)
  (same comment as for heat, district or industrial, other than natural gas)
  properties: water content 9999, wet mass 1 kg, dry mass 0.0001 kg
- heat, district or industrial, natural gas: 6.26 MJ; source Fawer M. 1997; lognormal variance with pedigree 0.0407, pedigree (2,2,5,1,1)
  (same comment as for heat, district or industrial, other than natural gas)
  properties: heating value, net 1 MJ
- sodium silicate, without water, in 48% solution state: 1.04 kg; source Fawer M. 1997; lognormal variance with pedigree 0.0407, pedigree (2,2,5,1,1)
  (same comment as for heat, district or industrial, other than natural gas)
  properties: wet mass 1 kg, dry mass 1 kg
- chemical factory, organics: 4e-10 unit; lognormal variance with pedigree 0.349225, pedigree (2,3,5,2,3)
  Calculated based on literature data published by the industry. For this activity, no information was readily available concerning infrastructure and land-use. Therefore, the infrastructure is estimated based on data from two chemical factories, the BASF site of Ludwigshafen and the chemical factory in Gendorf (which are both located in Germany), which produce a wide range of chemical substances. Based on this data, the following assumptions are made: the built area amounts to about 4.2 ha, the plant has an average output of 50'000 t/a and a lifespan of fifty years. The estimated infrastructure amount is therefore 4.00 E-10 units per kg of produced chemical.
  References:
  Althaus H.-J., Chudacoff M., Hischier R., Jungbluth N., Osses M. and Primas A. (2007) Life Cycle Inventories of Chemicals. ecoinvent report No. 8, v2.0. EMPA Dübendorf, Swiss Centre for Life Cycle Inventories, Dübendorf, CH.
  Gendorf (2000) Umwelterklärung 2000, Werk Gendorf. Werk Gendorf, Burgkirchen.

## Inputs from nature
- Water, cooling, unspecified natural origin [natural resource, in water]: 0.0012192 m3; name water_cooling_UNO_input; source IPPC - Integrated Pollution Prevention a 2007; lognormal variance with pedigree 0.0507, pedigree (2,2,5,1,1)
  Calculated based on literature, (Vionnet, S., Quantis Water Database - Technical Report, 2012). The process boundaries are given by the boundaries of the plant.
  property wet mass 1000 kg; name WM
  property dry mass 0.1101 kg; name DM
  property water content 9081.65; name water_content
  property water in wet mass 999.89 kg; name WWM
  property carbon content, fossil 0.0104329; name C_content_fossil
  property carbon content, non-fossil 0; name C_content_non_fossil
- Water, unspecified natural origin [natural resource, in water]: 0.000460804 m3; name water_UNO_input; source IPPC - Integrated Pollution Prevention a 2007; lognormal variance with pedigree 0.052625, pedigree (3,3,5,2,1)
  Calculated value: calculation based on literature value. The data reported in the literature refer to a 48% solution of sodium silicate. All chemicals in the dataset use a functional unit referring to 100% of sodium silicate, thus the literature values has been multiplied with a factor of 2.08.
  Calculated based on literature, (Vionnet, S., Quantis Water Database - Technical Report, 2012).
  Uncertainty: A

## Emissions to nature
- Water [air, unspecified]: 0.000932438 m3; = (water_cooling_UNO_input*fraction_CW_to_air)+(water_UNO_input*fraction_PW_to_air); lognormal variance with pedigree 0.0807, pedigree (2,2,5,1,1)
  Calculated as a fraction of the input of water. For more details, refer to the mathematical relation and the parameters.
  property fraction, origin: salt water 0; name fraction_origin_salt_water
  property fraction, origin: unspecified 1; name fraction_origin_unspecified
  property fraction, origin: fresh water 0; name fraction_origin_fresh_water
- Water [water, unspecified]: 0.000747562 m3; = water_cooling_UNO_input*(1-fraction_CW_to_air)+water_UNO_input*(1-fraction_PW_to_air); lognormal variance with pedigree 0.0807, pedigree (2,2,5,1,1)
  (same comment as for Water)
  property fraction, origin: unspecified 1; name fraction_origin_unspecified_Ww
  property fraction, origin: salt water 0; name fraction_origin_salt_water_Ww
  property fraction, origin: fresh water 0; name fraction_origin_fresh_water_Ww
- Silicon [water, surface water]: 0.0176 kg; source Fawer M. 1997; lognormal variance with pedigree 0.0807, pedigree (2,2,5,1,1)
  (same comment as for heat, district or industrial, other than natural gas)

## Sampling procedure
Data based on questionnaires and literature.

## Extrapolations
This dataset has been extrapolated from year 1995 to the year of the calculation (2021). The uncertainty has been adjusted accordingly.

## Review by Emilia Moreno Ruiz 2017-08-08
This dataset was additionally reviewed in a separate review process by Eric Johnson of Atlantic Consulting as well as Emilia Moreno Ruiz and Gregor Wernet of ecoinvent.
