# sodium metasilicate pentahydrate production, 58% active substance, powder

Dataset: EcoSpold 2, unit process
Geography: RER
Time period: 1995-01-01 to 2021-12-31
Technology level: current
Classification: ISIC rev.4 ecoinvent: 2023:Manufacture of soap and detergents, cleaning and polishing preparations, pe
Classification: EcoSpold01Categories: washing agents/builders
Tags: ConvertedDataset
Scenario: Business-as-Usual
System model: Allocation, cut-off by classification
Generated by: Roland Hischier
Published in: Zah R. 2007
Database: ecoinvent
isCopyrightProtected: true
accessRestrictedTo: 1

## General comment
This dataset represents the production of 1 kg of sodium metasilicate pentahydrate solution (58%) from hydrothermal process.
Material and energy inputs as well as waste production and emission to air and water are based on literature sources. Transport and infrastructure are estimation based on a large chemical plant.
[This dataset was already contained in the ecoinvent database version 2. It was not individually updated during the transfer to ecoinvent version 3. Life Cycle Impact Assessment results may still have changed, as they are affected by changes in the supply chain, i.e. in other datasets. This dataset was generated following the ecoinvent quality guidelines for version 2. It may have been subject to central changes described in the ecoinvent version 3 change report (http://www.ecoinvent.org/database/ecoinvent-version-3/reports-of-changes/), and the results of the central updates were reviewed extensively. The changes added e.g. consistent water flows and other information throughout the database. The documentation of this dataset can be found in the ecoinvent reports of version 2, which are still available via the ecoinvent website. The change report linked above covers all central changes that were made during the conversion process.]

## Included activities start
From reception of sodium hydroxide, silica sand, and general chemicals at the factory gate

## Included activities end
This activity ends with the production of 1 kg of sodium silicate solution (58%). The dataset includes material and energy input, production of waste and emissions for the production of sodium phosphate out of phosphoric acid, transport, infrastructure.

## Geography
data representing European conditions

## Technology
The hydrothermal process is one of the two main processes used to produce sodium silicate. The other one is the furnace process.
In the hydrothermal process, sand is dissolved in sodium hydroxide. This process is carried out under high temperature and pressure in an autoclave. After filtration sodium silicate is obtained in a 48% solution. The sodium silicate solution is reacted again with sodium hydroxide. Metasilicate crystallises out and its solid form is mixed to forma an aqueous solution (58%).
This represents an average technology in Europe.

## Time period
producer information for production year 1995

## Parameters
- fraction, cooling water, once-through system, to air: 0.004 dimensionless; name fraction_CW_OT_to_air; lognormal variance with pedigree 0.0413, pedigree (2,3,1,3,1)
  Calculated based on literature value (Scown, C.D., 2011, Water Footprint of U.S. Transportation Fuels and supplying information of the article) (Vionnet, S., Quantis Water Database - Technical Report, 2012).
- fraction, cooling water, recirculating system, to air: 0.771 dimensionless; name fraction_CW_R_to_air; lognormal variance with pedigree 0.0413, pedigree (2,3,1,3,1)
  (same comment as for fraction, cooling water, once-through system, to air)
- fraction, cooling water, cooling pond system, to air: 0.032 dimensionless; name fraction_CW_CP_to_air; lognormal variance with pedigree 0.0413, pedigree (2,3,1,3,1)
  (same comment as for fraction, cooling water, once-through system, to air)
- fraction, process water, to air: 0.4 dimensionless; name fraction_PW_to_air; lognormal variance with pedigree 0.092025, pedigree (4,4,3,2,4)
  Literature value (Statistics Canada, 2007 & Shaffer, K.H., 2008, Consumptive water use in the Great Lakes Basin, USGS) (Vionnet, S., Quantis Water Database - Technical Report, 2012).
- fraction, cooling water, to air: 0.3875 dimensionless; name fraction_CW_to_air; = (0.5*fraction_CW_OT_to_air)+(0.5*fraction_CW_R_to_air); lognormal variance with pedigree 0.092025, pedigree (4,4,3,2,4)
  Calculated value based on literature value (see comments of the other parametres present in this dataset) and expert opinion. In the case when no industry/literature data are available about the type of cooling or directly fraction, cooling water, to air specific for the process a default assumption is applied. It is assumed that the once-through cooling system is used in 50% of all cases and recirculating system is used in another 50% of all cases.

## Reference product
- sodium metasilicate pentahydrate, 58% active substance, powder: 1 kg; source Fawer M. 1997; CPC 353: Soap, cleaning preparations, perfumes and toilet preparations; By-product classification allocatable product; CAS 10213-79-3
  EcoSpold01Location=RER
  The solid portions of the surface of the Earth consist predominantly of silicon and oxygen atoms in the form of silica and silicates. The use of Earth’s silica and silicate resources is thus the oldest technology on the planet. Nowadays, the range of application of silica and silicates is mainly in the following three fields: detergents, chemicals, adhesives. As a detergent ingredient or wash alkali, sodium silicates raise the pH value and dirt and textile fibres become more strongly negatively charged increasing their mutual electrostatic repulsion. Apart from this, the hardness components of the water are eliminated by complex formation.
  production volume 1.32237 kg
    This is a placeholder value that does not reflect real-world production volumes. This dataset does not currently require a real-world production volume to work in the database framework, and no actual data were collected yet. This has no negative effect on the results of the ecoinvent database. The placeholder value of this activity was scaled according to the nominal GDP of 2005 (source: United Nations, http://data.un.org/Glossary.aspx?q=GDP+%28current+US%24%29, accessed 20130726) to reflect an appropriate share of the global production volume, which is also a placeholder value.
  property heating value, net 5.71 MJ
    LHV is calculated based on the elemental composition of the substance. Based on the CAS number of the substance (010213-79-3), the chemical formula of the substance is found to be: H10Na2SiO8, (PubChem 2020).
    Reference: Kim, S., Chen, J., Cheng, T., Gindulyte, A., He, J., He, S., Li, Q., Shoemaker, B. A., Thiessen, P. A., Yu, B., Zaslavsky, L., Zhang, J., & Bolton, E. E. (2019). PubChem 2019 update: improved access to chemical data. Nucleic acids research, 47(D1), D1102–D1109. https://doi.org/10.1093/nar/gky1033
  property price 0.658003 EUR2005
    Calculated based on inputs: The price of the product has been calculated as a sum of the values of the material and energy inputs for this product. This value is therefore a rough estimation. It may underestimate the real price since there are additional expenses when producing any product. These expences can include for example labour costs, treatment of waste materials and profit for the producer. Please consider carefully whether this level of data quality is acceptable for your application.
  property carbon content 0
    carbon content on a dry matter basis (reserved; not for manual entry)
  properties: water content 0, dry mass 1 kg, water in wet mass 0 kg, carbon content, fossil 0, carbon content, non-fossil 0, wet mass 1 kg, carbon allocation 0 kg

## Inputs from technosphere
- steam, in chemical industry: 0.384 kg; source Fawer M. 1997; lognormal variance with pedigree 0.0407, pedigree (2,2,5,1,1)
  EcoSpold01Location=RER
  Calculated value: calculation based on literature value. The data reported in the literature refer to a 48% solution of sodium silicate. All chemicals in the dataset use a functional unit referring to 100% of sodium silicate, thus the literature values has been multiplied with a factor of 2.08.
  Uncertainty: Average data from 6 European producers
  properties: wet mass 1 kg
- sodium hydroxide, without water, in 50% solution state: 0.331 kg; source Fawer M. 1997; lognormal variance with pedigree 0.0407, pedigree (2,2,5,1,1)
  (same comment as for steam, in chemical industry)
  properties: dry mass 1 kg, wet mass 1 kg, heating value, net 3.03 MJ
- inert waste, for final disposal: -0.00112 kg; source Fawer M. 1997; lognormal variance with pedigree 0.0407, pedigree (2,2,5,1,1)
  EcoSpold01Location=CH
  Calculated value: calculation based on literature value. The data reported in the literature refer to a 48% solution of sodium silicate. All chemicals in the dataset use a functional unit referring to 100% of sodium silicate, thus the literature values has been multiplied with a factor of 2.08.
  Uncertainty: Average data from 6 European producers
  production volume 0.00112 kg
    Calculated from the production volume of sodium metasilicate pentahydrate, 58% active substance, powder in proportion to the respective output amounts.
  properties: water content 0.00502513, dry mass 0.995 kg, wet mass 1 kg
- heat, district or industrial, natural gas: 1.03 MJ; source Fawer M. 1997; lognormal variance with pedigree 0.0407, pedigree (2,2,5,1,1)
  (same comment as for steam, in chemical industry)
  properties: heating value, net 1 MJ
- electricity, medium voltage: 0.135 kWh; source Fawer M. 1997; lognormal variance with pedigree 0.0407, pedigree (2,2,5,1,1)
  EcoSpold01Location=UCTE
  Calculated value: calculation based on literature value. The data reported in the literature refer to a 48% solution of sodium silicate. All chemicals in the dataset use a functional unit referring to 100% of sodium silicate, thus the literature values has been multiplied with a factor of 2.08.
  Uncertainty: Average data from 6 European producers
- chemical, organic: 8.62e-5 kg; source Fawer M. 1997; lognormal variance with pedigree 0.0407, pedigree (2,2,5,1,1)
  Calculated value: calculation based on literature value. The data reported in the literature refer to a 48% solution of sodium silicate. All chemicals in the dataset use a functional unit referring to 100% of sodium silicate, thus the literature values has been multiplied with a factor of 2.08.
  EcoSpold01Location=GLO
  Uncertainty: Average data from 6 European producers
  properties: carbon content, fossil 0.628, wet mass 1 kg, dry mass 1 kg, heating value, net 19.03 MJ
  note on carbon content, fossil: This dataset is an unweighted average of 20 organic substances (listed in Tab 88.1, ecoinvent v2.2 report 8, part II), being part of the top100 chemicals included in this database. The C-content has also been calculated as an unweighted average of the C content of the substances composing this dataset.
- chemical factory, organics: 4e-10 unit; lognormal variance with pedigree 0.5861, pedigree (4,5,5,3,5)
  Estimation: estimation based on a large chemical plant.
  EcoSpold01Location=RER
  Uncertainty: estimation
- sodium silicate, without water, in 48% solution state: 0.75 kg; source Fawer M. 1997; lognormal variance with pedigree 0.0407, pedigree (2,2,5,1,1)
  (same comment as for steam, in chemical industry)
  properties: dry mass 1 kg, wet mass 1 kg

## Inputs from nature
- Water, unspecified natural origin [natural resource, in water]: 0.00102 m3; name water_UNO_input; source Fawer M. 1997; lognormal variance with pedigree 0.0407, pedigree (2,2,5,1,1)
  Calculated value: calculation based on literature value. The data reported in the literature refer to a 48% solution of sodium silicate. All chemicals in the dataset use a functional unit referring to 100% of sodium silicate, thus the literature values has been multiplied with a factor of 2.08.
  Uncertainty: Average data from 6 European producers
- Water, cooling, unspecified natural origin [natural resource, in water]: 5.17e-5 m3; name water_cooling_UNO_input; source Fawer M. 1997; lognormal variance with pedigree 0.0407, pedigree (2,2,5,1,1)
  (same comment as for Water, unspecified natural origin)

## Emissions to nature
- Water [water, unspecified]: 0.000643666 m3; name water_to_water_unspecified; = water_cooling_UNO_input*(1-fraction_CW_to_air)+water_UNO_input*(1-fraction_PW_to_air); lognormal variance with pedigree 0.0807, pedigree (2,2,5,1,1)
  Calculated value based on literature values and expert opinion. See comments in the parametres' comment field.
  property dry mass 0 kg; name DM
  property fraction, origin: fresh water 0; name fraction_origin_fresh_water_Ww
  property fraction, origin: unspecified 1; name fraction_origin_unspecified_Ww
  property fraction, origin: salt water 0; name fraction_origin_salt_water_Ww
  property carbon content, fossil 0; name C_content_fossil
  property carbon content, non-fossil 0; name C_content_non_fossil
  property water in wet mass 1000 kg; name WWM
  property wet mass 1000 kg; name WM
- Particulates, < 2.5 um [air, urban air close to ground]: 0.00586 kg; source Fawer M. 1997; lognormal variance with pedigree 2.9407, pedigree (2,2,5,1,1)
  (same comment as for Water, unspecified natural origin)
- Suspended solids, unspecified [water, surface water]: 0.00448 kg; source Fawer M. 1997; lognormal variance with pedigree 0.0807, pedigree (2,2,5,1,1)
  (same comment as for Water, unspecified natural origin)
- Silicon [water, surface water]: 0.000612 kg; source Fawer M. 1997; lognormal variance with pedigree 0.0807, pedigree (2,2,5,1,1)
  (same comment as for Water, unspecified natural origin)
- Water [air, unspecified]: 0.000428034 m3; name water_to_air_unspecified; = (water_cooling_UNO_input*fraction_CW_to_air)+(water_UNO_input*fraction_PW_to_air); lognormal variance with pedigree 0.0807, pedigree (2,2,5,1,1)
  (same comment as for Water)
  property fraction, origin: salt water 0; name fraction_origin_salt_water
  property fraction, origin: fresh water 0; name fraction_origin_fresh_water
  property fraction, origin: unspecified 1; name fraction_origin_unspecified

## Sampling procedure
sampling of questionnaires

## Extrapolations
This dataset has been extrapolated from year 1995 to the year of the calculation (2021). The uncertainty has been adjusted accordingly.

## Review by Roland Hischier 2011-11-15
Transfer of documentation done.

## Review by Heiko Kunst 2003-07-04
Passed.
