# fibre cement corrugated slab production

Dataset: EcoSpold 2, unit process
Geography: CH
Time period: 1991-01-01 to 2021-12-31
Technology level: current
Classification: EcoSpold01Categories: construction materials/coverings
Classification: ISIC rev.4 ecoinvent: 2395:Manufacture of articles of concrete, cement and plaster
Tags: ConvertedDataset
Scenario: Business-as-Usual
System model: Allocation, cut-off by classification
Generated by: Daniel Kellenberger (obsolete)
Published in: Kellenberger D. 2004
Database: ecoinvent
isCopyrightProtected: true
accessRestrictedTo: 1

## General comment
This dataset represents the production of 1 kg of fibre cement corrugated slabs. The amounts of raw materials are calculated based on the composition of fibre cement roof slate. As there are filters in the productions, air emission data are lacking but emissions from the boilers are imported via the relevant modules. Moreover, a certain amount of CO2 produced by the boiler is bound in the waste water, which is inventoried with a negative value as an avoided emission. The total yearly production is assumed to be 20'000 tonnes.
[This dataset was already contained in the ecoinvent database version 2. It was not individually updated during the transfer to ecoinvent version 3. Life Cycle Impact Assessment results may still have changed, as they are affected by changes in the supply chain, i.e. in other datasets. This dataset was generated following the ecoinvent quality guidelines for version 2. It may have been subject to central changes described in the ecoinvent version 3 change report (http://www.ecoinvent.org/database/ecoinvent-version-3/reports-of-changes/), and the results of the central updates were reviewed extensively. The changes added e.g. consistent water flows and other information throughout the database. The documentation of this dataset can be found in the ecoinvent reports of version 2, which are still available via the ecoinvent website. The change report linked above covers all central changes that were made during the conversion process.]

## Included activities start
From the extraction of raw materials.

## Included activities end
The activity ends with the corrugated slabs produced and the wastes treated. The dataset includes the whole manufacturing process to produce fibre cement products (raw material provision, raw material mixing, forming, post curing process coating process, and storage), transports to plant processes, and infrastructure. The dataset doesn't include dust emissions from the production process as they are collected in filters and reused in the process, and doesn't include emissions from fuel combustion processes, acid for neutralisation of the wastewater and energy requirements for administration.

## Geography
Data is based on a Swiss company.

## Technology
The dataset is based on the current Swiss technology. The raw materials are mixed with water to a homogeneous paste. Rotating sieving cylinders dip in this fibre cement mush which drain to the inside. Therefore the sieve surface gets covered with a layer of fleece of about 1mm which is transported with a conveyor belt. The produced endless mat is winded up on a format-cylinder until the demanded thickness is reached. With that process the fibres of the neighbour layers are interconnecting. After cutting up the mat cylinder the mat is detached from the format-cylinder and by punching and pressing automatically formed to small format slates, even and corrugated slabs.

## Parameters
- fraction, tap water, to air: 0.15 dimensionless; name fraction_TW_to_air; = fraction_PW_to_air; lognormal variance with pedigree 0.092025, pedigree (4,4,3,2,4)
  Calculated value. See comment in the other parametres present in this dataset. Tap water is considered to be always used as process water, thus process water fractions to air are applied to all tap water input flows to calculate the amount of water consumed in the processes.
- fraction, process water, to air: 0.15 dimensionless; name fraction_PW_to_air; lognormal variance with pedigree 0.092025, pedigree (4,4,3,2,4)
  Literature value. In case when no industry/process specific data are available, default evaporation fraction value is used. This value is 15% and is based on literature (Statistics Canada, 2007 & Shaffer, K.H., 2008, Consumptive water use in the Great Lakes Basin, USGS & Shiklomanov, 2003, World Water Resources at the Beginning of the 21st Century) and has been approved by an expert.

## Reference product
- fibre cement corrugated slab: 1 kg; CPC 37570: Articles of asbestos-cement, cellulose fibre-cement or the like; By-product classification allocatable product
  Corrugated slabs are large-size fibre cement slabs with wave profile for roof covering
  The technical specifications are:
  Bulk density rho [kg/m3]: 1700
  Thermal conductivity lamda [W/mK]: about 0.5
  Weight per area [kg/m2]: 17.8 - 20.1 (used: 19)
  Thickness [cm]: 1.12
  Maximum size [mm]: No information
  Further references:
  Weibel T. and Stritz A. (1995) Ökoinventare und Wirkungsbilanzen von Baumaterialien; Grundlagen für den ökologischen Vergleich von Hochbaukonstruktionen. In: ESU-Reihe Nr. 1/95. Laboratorium für Energiesysteme, Eidg. Technische Hochschule (ETH), Zürich.
  Starzner S. and Wurmer-Weiss P. (2000) ECOBIS 2000, ökologisches Baustoffinformationssystem.
  SIA building materials declaration:
  http://www.sia.ch/cf/oekoinfoliste.cfm?ID=2943702&Lang=d&Mfg=72&Grp=0&Produkt=, access date: Mai 2003
  Corrugated slabs are large-size fibre cement slabs with wave profile for roof covering
  The technical specifications are:
  Bulk density rho [kg/m3]: 1700
  Thermal conductivity lamda [W/mK]: about 0.5
  Weight per area [kg/m2]: 17.8 - 20.1 (used: 19)
  Thickness [cm]: 1.12
  Maximum size [mm]: No information
  Further references:
  Weibel T. and Stritz A. (1995) Ökoinventare und Wirkungsbilanzen von Baumaterialien; Grundlagen für den ökologischen Vergleich von Hochbaukonstruktionen. In: ESU-Reihe Nr. 1/95. Laboratorium für Energiesysteme, Eidg. Technische Hochschule (ETH), Zürich.
  Starzner S. and Wurmer-Weiss P. (2000) ECOBIS 2000, ökologisches Baustoffinformationssystem.
  SIA building materials declaration:
  http://www.sia.ch/cf/oekoinfoliste.cfm?ID=2943702&Lang=d&Mfg=72&Grp=0&Produkt=, access date: Mai 2003
  production volume 0.0336675 kg
    This is a placeholder value that does not reflect real-world production volumes. This dataset does not currently require a real-world production volume to work in the database framework, and no actual data were collected yet. This has no negative effect on the results of the ecoinvent database. The placeholder value of this activity was scaled according to the nominal GDP of 2005 (source: United Nations, http://data.un.org/Glossary.aspx?q=GDP+%28current+US%24%29, accessed 20130726) to reflect an appropriate share of the global production volume, which is also a placeholder value.
  property price 0.0465 EUR2005
    Calculated from import data in UN trade database. (Prices= USD/kg). Categories included: 'Portland cement, white or white artificially coloured' and 'Portland cement, other than white cement'.
  property carbon content, non-fossil 0.01656
    Tab 5.1, ecoinvent v2.2 report 7, part IX. Fibres (pulp) 3.6%. Fibres (polyvinyl alcohol) 1.8%. C-content/dry mass of natural fibres was considered 46% (from 'Evolutionary and Biochemical Aspects', A.D. Kay and T. Vrede (in Global Ecology, 2010, Elsevier B.V., S.E. Jørgensen Ed.)). C-content/dry mass of polyvinyl alcohol ((C2H4O)x) was considered =24/44.
  property carbon content, fossil 0.00981818
    (same comment as for fibre cement corrugated slab)
  property carbon content 0.0263782
    carbon content on a dry matter basis (reserved; not for manual entry)
  properties: water in wet mass 0 kg, water content 0, dry mass 1 kg, wet mass 1 kg, carbon allocation 0.0263782 kg

## Inputs from technosphere
- decarbonising waste: -0.00196 kg; source Weibel T. and Stritz A. 1995; lognormal variance with pedigree 0.0506, pedigree (2,1,5,1,1)
  Stoichometric calculation, based on literature values. The produced amount of CaCO3 is included.
  The wastewater from the production process is usually very alkaline because of a high amount of calcium oxide (quicklime) from the cement, and has to be neutralised before being released to the public sewage system. The alkaline wastewater with pH 13.5 is corrected to pH 8.5. To neutralise the wastewater, an unspecified amount of acid is added, then CO2 emissions from combustion are scrubbed through the wastewater. Since no data concerning the type and amount of acid is available it is not included in the inventory.
  The CO2 binds with the calcium oxide to give lime (CaCO3) as shown in the following stoichiometric equation:.
  CaO + CO2 -> CaCO3
  56 Mol 44 Mol 100 Mol
  0.91 kg 0.72 kg 1.63 kg per m3 wastewater
  Stoichometric calculation, based on literature values. The produced amount of CaCO3 is included.
  The wastewater from the production process is usually very alkaline because of a high amount of calcium oxide (quicklime) from the cement, and has to be neutralised before being released to the public sewage system. The alkaline wastewater with pH 13.5 is corrected to pH 8.5. To neutralise the wastewater, an unspecified amount of acid is added, then CO2 emissions from combustion are scrubbed through the wastewater. Since no data concerning the type and amount of acid is available it is not included in the inventory.
  The CO2 binds with the calcium oxide to give lime (CaCO3) as shown in the following stoichiometric equation:.
  CaO + CO2 -> CaCO3
  56 Mol 44 Mol 100 Mol
  0.91 kg 0.72 kg 1.63 kg per m3 wastewater
  production volume 0.00196 kg
    Calculated from the production volume of fibre cement corrugated slab in proportion to the respective output amounts.
  properties: dry mass 0.7 kg, water content 0.428571, wet mass 1 kg
- wastewater, unpolluted: -0.00115 m3; source Weibel T. and Stritz A. 1995; lognormal variance with pedigree 0.0506, pedigree (2,1,5,1,1)
  Literature value.
  production volume 0.00115 m3
    (same comment as for decarbonising waste)
  properties: carbon content, fossil 0.00178991, dry mass 0.337476 kg, water content 2962.17, carbon content, non-fossil 0.00178991, wet mass 1000 kg
  note on carbon content, fossil: Assumed to be like in tap water. Bicarbonate content is 2.93 mol/m3. CO2 content is 0.1 mol/m3 (ecoinvent v2.2 report 8, Tab 93.1).
- cement, alternative constituents 21-35%: 0.724 kg; lognormal variance with pedigree 0.04, pedigree (1,1,5,1,1)
  Estimation, based on legal requirements. It is used as a raw material and losses are neglected as they are assumed to be internally reused.
  Legal requirements:
  SIA building product declaration
  http://www.sia.ch/cf/oekoinfoliste.cfm?ID=2943702&Lang=d&Mfg=72&Grp=0&Produkt=, access date: Mai 2003
  property water content 0; name ceme_water_content
  property carbon content, non-fossil 0; name ceme_C_content_non_fossil
  property water in wet mass 0 kg; name ceme_WWM
  property carbon content, fossil 0; name ceme_C_content_fossil
  property wet mass 1 kg; name ceme_WM
  property dry mass 1 kg; name ceme_DM
- electricity, medium voltage: 0.267 kWh; lognormal variance with pedigree 0.0406, pedigree (2,1,5,1,1)
  (same comment as for cement, alternative constituents 21-35%)
- lime, packed: 0.111 kg; lognormal variance with pedigree 0.04, pedigree (1,1,5,1,1)
  (same comment as for cement, alternative constituents 21-35%)
  properties: wet mass 1 kg, dry mass 0.998 kg, carbon content, fossil 0.117492, water content 0.00200401
  note on carbon content, fossil: Table 3.1, ecoinvent v2.2 report 7, part VII, pg 3. MW CaCO3=100, MW MgCO3=84
- sulfate pulp, unbleached: 0.018 kg; lognormal variance with pedigree 0.04, pedigree (1,1,5,1,1)
  (same comment as for cement, alternative constituents 21-35%)
  properties: wet mass 1 kg, water content 0.111111, dry mass 0.9 kg, heating value, net 13.23 MJ, price 0.355 EUR2005, carbon content, non-fossil 0.494
  note on carbon content, non-fossil: C content of dry mass of sulfate pulp is 0.494 kgC/kg dry wood (ecoinvent v2.2 report 6_IX & ecoinvent v2.2 report 9). No other C containing products in the formulation of the pulp.
- heat, district or industrial, other than natural gas: 0.2356 MJ; lognormal variance with pedigree 0.0406, pedigree (2,1,5,1,1)
  (same comment as for cement, alternative constituents 21-35%)
  properties: heating value, net 1 MJ
- waste mineral oil: -0.000779 kg; source Weibel T. and Stritz A. 1995; lognormal variance with pedigree 0.0506, pedigree (2,1,5,1,1)
  Literature value.
  production volume 0.000779 kg
    (same comment as for decarbonising waste)
  properties: heating value, net 34.7 MJ, water content 0.111111, wet mass 1 kg, carbon content, fossil 0.864444, dry mass 0.9 kg
  note on heating value, net: Value taken from the general comment of the treatment dataset.
  note on carbon content, fossil: Tab A.6, ecoinvent v2.2 report 13_I. C content has been calculated after data in the tables, and then referred to 1 kg DM
- lubricating oil: 0.000779 kg; source Weibel T. and Stritz A. 1995; lognormal variance with pedigree 0.0506, pedigree (2,1,5,1,1)
  Literature value.
  properties: carbon content, fossil 0.75, dry mass 1 kg, heating value, net 40.2 MJ, wet mass 1 kg
  note on carbon content, fossil: Lubricating oil is produced from diesel. C-content/dry mass of fats and oils considered 75%, from: ecoinvent v2.2 report, n 15a, pg 40
  note on heating value, net: Literature value, Source: IPCC 2006, 2006 IPCC Guidelines for National Greenhouse Gas Inventories, Prepared by the National Greenhouse Gas Inventories Programme, Eggleston H.S., Buendia L., Miwa K., Ngara T. and Tanabe K. (eds). Published: IGES, Japan
- tap water: 2.41 kg; name tap_water_input; source Weibel T. and Stritz A. 1995; lognormal variance with pedigree 0.0406, pedigree (2,1,5,1,1)
  Literature value.
  properties: dry mass 0.000337476 kg, water content 2962.17, carbon content, fossil 0.00178991, wet mass 1 kg
  note on carbon content, fossil: Bicarbonate content is 2.93 mol/m3. CO2 content is 0.1 mol/m3 (ecoinvent v2.2 report 8, Tab 93.1).
- conveyor belt: 2.5e-7 m; lognormal variance with pedigree 0.48, pedigree (5,1,5,1,4)
  Estimation. The conveyor belt is assumed to have a length of 100m and a lifespan of 20 years. A yearly production of 20.000t is considered.
- heat, central or small-scale, other than natural gas: 0.01269 MJ; lognormal variance with pedigree 0.0406, pedigree (2,1,5,1,1)
  (same comment as for cement, alternative constituents 21-35%)
  properties: heating value, net 1 MJ
- acrylic varnish, without water, in 87.5% solution state: 0.0052 kg; source Weibel T. and Stritz A. 1995; lognormal variance with pedigree 0.0406, pedigree (2,1,5,1,1)
  Literature value.
  properties: wet mass 1 kg, heating value, net 20.44 MJ, carbon content, fossil 0.674725, dry mass 1 kg
  note on carbon content, fossil: Isobornyl acrylate (C13H20O2) has been used as a representative example of acrylic varnish (Turpentines, Ullmann).The formulation of this specific varnish includes 50% acrylic binder
- vinyl acetate: 0.018 kg; lognormal variance with pedigree 0.04, pedigree (1,1,5,1,1)
  (same comment as for cement, alternative constituents 21-35%)
  properties: dry mass 1 kg, carbon content, fossil 0.55814, heating value, net 25.35 MJ, wet mass 1 kg
  note on carbon content, fossil: Vinyl acetate (CH3CO2CH=CH2) (ecoinvent v2.2 report 11_II), C4H6O2. MW=86 g/mol
- wastewater from concrete production: -1.1e-5 m3; name wastewater_output; source Weibel T. and Stritz A. 1995; lognormal variance with pedigree 0.0506, pedigree (2,1,5,1,1)
  Proxy, based on literature value.
  production volume 1.1e-5 m3
    (same comment as for decarbonising waste)
  property price 0 EUR2005; name wastewater_output_price_EUR2005
  properties: water content 2225.48, wet mass 1000 kg, dry mass 0.449139 kg, carbon content, fossil 0.027074
  note on carbon content, fossil: TOC =0.01216 kg/m3 (Tab A.20, ecoinvent v2.2 report 13_I). TOC was considered as Total Carbon.
- waste paper, unsorted: 0 kg
  For modelling reasons the value is set to 0.
  Estimation, based on legal requirements. It is used as a raw material and losses are neglected as they are assumed to be internally reused.
  Legal requirements:
  SIA building product declaration
  http://www.sia.ch/cf/oekoinfoliste.cfm?ID=2943702&Lang=d&Mfg=72&Grp=0&Produkt=, access date: Mai 2003
  properties: heating value, net 14.11 MJ
- packing, fibre cement product: 1 kg; lognormal variance with pedigree 0.078, pedigree (3,5,5,1,3)
  Estimation.
- stone wool factory: 4.44e-10 unit; lognormal variance with pedigree 0.49, pedigree (5,1,5,1,4)
  Proxy. Rockwool plant is used as proxy as no data about fibre cement plant was available.
  This exchange has an activity link directly to the producing activity because the product is primarily consumed in the same geographical area where it is produced.
- waste emulsion paint: -0.000508 kg; source Weibel T. and Stritz A. 1995; lognormal variance with pedigree 0.0506, pedigree (2,1,5,1,1)
  Literature value.
  production volume 0.000508 kg
    (same comment as for decarbonising waste)
  properties: heating value, net 8.18 MJ, dry mass 1 kg, carbon content, fossil 0.27, wet mass 1 kg
  note on carbon content, fossil: Tab A.4, ecoinvent v2.2 report 13_I. C content has been calculated after data in the tables, and then referred to 1 kg DM

## Emissions to nature
- NMVOC, non-methane volatile organic compounds, unspecified origin [air, unspecified]: 0.000252 kg; lognormal variance with pedigree 0.0806, pedigree (2,1,5,1,1)
  Calculation. The total amount of solvent emissions indicated in the SIA building materials declaration is assumed to be 90% NMVOC and 10% halogenated hydrocarbons.
  Further reference:
  SIA building materials declaration. http://www.sia.ch/cf/oekoinfoliste.cfm?ID=2943702&Lang=d&Mfg=72&Grp=0&Produkt=, access date: Mai 2003
- Water [air, unspecified]: 0.0003615 m3; name water_to_air_unspecified; = (tap_water_input/1000*fraction_TW_to_air); lognormal variance with pedigree 0.0807, pedigree (2,2,5,1,1)
  Calculated value based on literature values and expert opinion. See comments in the parametres' comment field.
  property fraction, origin: salt water 0; name fraction_origin_salt_water
  property fraction, origin: unspecified 0; name fraction_origin_unspecified
  property fraction, origin: fresh water 1; name fraction_origin_fresh_water
- Water [water, unspecified]: 0.0008875 m3; name water_to_water_unspecified; = (tap_water_input/1000)*(1-fraction_TW_to_air)-0.00115-1.1E-5; lognormal variance with pedigree 0.0807, pedigree (2,2,5,1,1)
  (same comment as for Water)
  property wet mass 1000 kg; name WM
  property fraction, origin: fresh water 1; name fraction_origin_fresh_water_Ww
  property carbon content, non-fossil 0; name C_content_non_fossil
  property dry mass 0 kg; name DM
  property fraction, origin: salt water 0; name fraction_origin_salt_water_Ww
  property water in wet mass 1000 kg; name WWM
  property fraction, origin: unspecified 0; name fraction_origin_unspecified_Ww
  property carbon content, fossil 0; name C_content_fossil
- Hydrocarbons, chlorinated [air, unspecified]: 2.8e-5 kg; lognormal variance with pedigree 0.0806, pedigree (2,1,5,1,1)
  (same comment as for NMVOC, non-methane volatile organic compounds, unspecified origin)
- Carbon dioxide, fossil [air, unspecified]: -0.000828 kg; source Weibel T. and Stritz A. 1995
  Stoichometric calculation, based on literature values. The CO2 emissions from combustion included in the upstream processes must be corrected to take into account CO2 binding. The amount of CO2 bound in the wastewater is 0.72 kg/m3 and is included as a negative emission to compensate the emission inventoried in the energy production module. The amount is very small because the amount of wastewater is very small (0.068 kg/kg fibre cement roof slate).
  The wastewater from the production process is usually very alkaline because of a high amount of calcium oxide (quicklime) from the cement, and has to be neutralised before being released to the public sewage system. The alkaline wastewater with pH 13.5 is corrected to pH 8.5. To neutralise the wastewater, an unspecified amount of acid is added, then CO2 emissions from combustion are scrubbed through the wastewater. Since no data concerning the type and amount of acid is available it is not included in the inventory.
  The CO2 binds with the calcium oxide to give lime (CaCO3) as shown in the following stoichiometric equation:.
  CaO + CO2 -> CaCO3
  56 Mol 44 Mol 100 Mol
  0.91 kg 0.72 kg 1.63 kg per m3 wastewater

## Sampling procedure
Literature and 'ecological building material declaration' (a sort of environmental report)

## Extrapolations
This dataset has been extrapolated from year 2001 to the year of the calculation (2021). The uncertainty has been adjusted accordingly.

## Review by Roland Hischier 2011-09-22
Transfer of documentation done.

## Review by Roberto Dones 2004-04-14
passed
