# sodium hydroxide to generic market for neutralising agent

Dataset: EcoSpold 2, unit process
Geography: GLO
Time period: 2000-01-01 to 2021-12-31
Technology level: current
Classification: EcoSpold01Categories: chemicals/inorganics
Classification: ISIC rev.4 ecoinvent: 2011:Manufacture of basic chemicals
Synonyms: caustic; caustic soda
Scenario: Business-as-Usual
System model: Allocation, cut-off by classification
Generated by: Sofia Parada Tur
Database: ecoinvent
isCopyrightProtected: true
accessRestrictedTo: 1

## General comment
This activity links the output of the market for sodium hydroxide to the generic market for neutralising agent.

## Included activities start
Activity starting with the input of sodium hydroxide

## Included activities end
Activity ends with the proper conversion of soda ash to neutralising agent in NaOH-equivalents.

## Geography
based on geographical validity of datasets producing sodium hydroxide in chlor-alkali electrolysis.

## Technology
based on techmology validity of datasets producing sodium hydroxide in chlor-alkali electrolysis.

## Time period
based on temporal validity of datasets producing sodium hydroxide in chlor-alkali electrolysis.

## Reference product
- neutralising agent, sodium hydroxide-equivalent: 1 kg; name neutralising_agent_output; By-product classification allocatable product; CPC 342: Basic inorganic chemicals n.e.c.
  production volume 1.38e10 kg; = (0.18*6.0E10)+ (0.05*6.0E10)/ sodium_hydroxide_input
    based on annual production volume of sodium hydroxide, namely 5.96E10 kg in 2004 (Ullmann). The same production volume is assumed in 2005, rounded to 6.0E10 kg.
    The amount of sodium hydroxide used as neutralising agent is based on statistics of the DOW chemical company on its uses in 2002. 18% of NaOH is used in the paper and pulp industries. 5% is used in water treatment. It is assumed that all neutralising agent applications are in these 2 sectors. This assumption is based on a market research by Marianne Wesnæs and Bo Weidema, 2.-0 LCA consultants, www.lca-net.com, 2006-10-19. URL: http://www.lca-net.com/files/naoh.pdf Retrieved 13.02.2012
  property price 0.376 EUR2005; name neutralising_agent_output_price_EUR2005
    Calculated value based on data from United Nations Commodity Trade Statistics Database (comtrade.un.org). UN comtrade category: 281511 Sodium hydroxide (caustic soda) solid. Year 2005. Using exchange rate of 1EURO = 1.209 USD. Average of price of import into 5 main markets (EU, US, JP, IN and CN).
  property carbon content 0
    carbon content on a dry matter basis (reserved; not for manual entry)
  properties: carbon content, non-fossil 0, carbon content, fossil 0, water content 0, wet mass 1 kg, water in wet mass 0 kg, dry mass 1 kg, carbon allocation 0 kg

## Inputs from technosphere
- sodium hydroxide, without water, in 50% solution state: 1 kg; name sodium_hydroxide_input
  properties: wet mass 1 kg, heating value, net 3.03 MJ, dry mass 1 kg

## Extrapolations
This dataset has been extrapolated from year 2000 to the year of the calculation (2021). The uncertainty has been adjusted accordingly.
