# electricity production, oil

Dataset: EcoSpold 2, unit process
Geography: PE
Time period: 2012-01-01 to 2021-12-31
Technology level: current
Classification: ISIC rev.4 ecoinvent: 3510:Electric power generation, transmission and distribution
Classification: EcoSpold01Categories: oil/power plants
Synonyms: heavy fuel oil; petroleum
Tags: fossil fuels; oil power
Scenario: Business-as-Usual
System model: Allocation, cut-off by classification
Generated by: Alfredo Pro Castaneyra
Published in: Suppen, N 2017
Database: ecoinvent
isCopyrightProtected: true
accessRestrictedTo: 1

## General comment
This dataset represents the production of high voltage electricity at a grid-connected oil power plant in Peru. This dataset is based on PE dataset, "electricity production, oil, GLO" (accessed October 2014), with adjustments to the peruvian context in year 2014. The efficiency and net electricity production parameters were updated using 2014 data. The data was obtained from nineteen power plants, these are: Mollendo (5.1%), Santa Rosa (0:5%), C.T. RF Talara (20.3%), Chilina (6.4%), GD Chiclayo Oeste (0.6%), Piura (1%), TG Chimbote (0.8%), CT Dolorespata (1.8%), CTE Cachimayo (13%), Tumber MAK1 MAK2 (3.2%), CTE Tamburco (2.0%), CTE Uripipata (1.2%), Ilo Catkato (0.5%), Ilo TG (8.9%), Ilo TVs (24.7%), CT RF Planta Ilo(5.9%), Taparachi(0.4%), San Nicolás TVs (3.5%), Bellavista (0.05%). Production using oil power plants accounts only to 0.21% of the total in the country. Data was obtained from the Committee of Economic Operations of the National Interconnected System (COES), the national peruvian entity that regulates the dispatch and generation of energy from the electricity sector (COES, 2014 and MINEM, 2014). The COES publishes the statistics of operations of the National Interconnected System (SEIN) in an annual basis. In addition, public access information was requested from the General Directorate of Environmental Energy Affairs (DGAAE) of the Ministry of Energy and Mines on Environmental Impact Studies (EIA) of the plants in operation in 2014.
For water exchanges the dataset "electricity production, oil, PE, 1980-2015" (accessed October 2014), was used as reference
Comments:
- sulfur content of the oil is not adapted to local/average conditions.
- CO2 emissions are presented for the combustion and for the flue gas treatment
Production volume: 87515814kWh
The efficiency of these plants has an average value of 33.15
The production represent only the 0,206 % of total energy produced in Peru
Sources:
COES, 2014. Sub Dirección de Gestión de la Información. RA-SGI-0115. ESTADISTICA RELEVANTE DEL SISTEMA ELÉCTRICO INTERCONECTADO NACIONAL, (2014). Cap. 06 PRODUCCIÓN TERMOELÉCTRICA Y CONSUMO DE COMBUSTIBLE. Retrieved online from http://www.coes.org.pe/Portal/Publicaciones/Estadisticas/ 2014/PDF/06_PRODUCCION TERMOELECTRICA Y CONSUMO DE COMBUSTIBLE, CUADRO N° 6.3 CONSUMO DE COMBUSTIBLE EN LAS CENTRALES TERMOELÉCTRICAS 2014,CUADRO N° 6.2 RENDIMIENTO PROMEDIO ANUAL - 2014. November 14, 2017.
MINEM, 2014. Ministerio de Energía y Minas (2014). Anuario Ejecutivo de Electricidad 2014. Dirección General de Electricidad. Retrieved online from http://www.minem.gob.pe/_estadisticaSector.php?idSector=6, 24 august 2017.
OSINERGMIN, 2015. Oganismo Supervisor de la Energía y Mineria. La industria de los hidrocarburos líquidos en el Perú: 20 años de aporte al desarrollo del país, pp.36 (2015 )http://www.osinergmin.gob.pe/seccion/centro_documental/Institucional/Estudios_Economicos/Libros/anexo-industria-hidrocarburos-liquidos-Peru.pdf. Retrieved online 24 august 2017.
EPA, 1999. US Environmental Protection Agency (1999). AP 42 -Compilation of Air Pollutant Emission Factors, Volume 1: Stationary Point and Area Sources Compilation of Air Pollutant Emission Factors, AP-42, AP 42, Fifth Edition. Fuel Oil Combustion, Final Section - Supplement E September 1999, corrected May 2010. Background Document - September 1998. https://www3.epa.gov/ttn/chief/ap42/ch01/index.html. Retrieved online 24 august 2017.

## Included activities start
From the constructed power plant ready to produce electricity and from the fuel ready to be used.

## Included activities end
This activity ends with 1kWh of high voltage electricity produced at the power plant and arrived at the busbar.

This dataset includes all energy use, use of chemicals, emissions to air and water including treatment of flue gasses and effluents. In an oil power plant, water is needed for cooling, feed water for the steam circuit, for the flue gas treatment, or other cleaning. This dataset only considers water use (evaporation) for cooling and steam circuit.

## Geography
In Peru, the Economic Operation Committee of the National Interconnected System (COES) is divided in three operation areas, north, central and south. The power plants considered in this dataset are located in the three areas.

## Technology
Electricity production in a conventional oil power plant with a capacity of 500 MWe.

## Time period
The Annual Production Volume is valid for the year 2014.

## Parameters
- losses from gross electricity production: 0.07 dimensionless; name losses_gross_net; lognormal variance with pedigree 0.017225, pedigree (4,3,1,2,3)
  Literature value as considered in "electricity production, oil, PE, 2008-2008" (accessed October 2014). Own use of electricity plants in this country in 2012. The default loss as described by the IEA in the electricity statistic is applied, which is 0.07 (IEA electricity information 2014: The difference between gross and net electricity production is generally observed to be about 7% for conventional thermal stations, 1% for hydro stations and 6% for nuclear.)
  IEA. 2014. Electricity Information 2014. ISBN 978-92-64-21692-1. International Energy Agency (IEA), Paris Cedex (FR).
  nan
  Uncertainty: generic IEA value used
- relation between the global and the country's efficiency of oil power plants: 1.09133 dimensionless; name relation_global_country; = efficiency_oil_global/ efficiency_oil_country; undefined min 1, max 1, standardDeviation95 0, pedigree (1,1,1,1,1)
  This factor brings the amounts of the exchanges in the global dataset into relation with the amounts in the country datasets.
- fraction, process water, to air: 0.15 dimensionless; name fraction_PW_to_air; lognormal variance with pedigree 0.092025, pedigree (4,4,3,2,4)
  Literature value as reported in "electricity production, oil, PE, 2008-2008" (accessed October 2014). In case when no industry/process specific data are available, default evaporation fraction value is used. This value is 15% and is based on literature (Statistics Canada, 2007 & Shaffer, K.H., 2008, Consumptive water use in the Great Lakes Basin, USGS & Shiklomanov, 2003, World Water Resources at the Beginning of the 21st Century) and has been approved by an expert.
  nan
- fraction, cooling water, to air: 0.0159178 dimensionless; name fraction_CW_to_air; = (WConsumption_EP_oil_recirculatingCS*recirculating_CS_fraction_from_allCS+WConsumption_EP_oil_onceT_andCP_CS*once_through_andCP_CS_fractio_from_allCS)/(WWithdrawal_EP_oil_recirculating_CS*recirculating_CS_fraction_from_allCS+WWithdrawal_EP_oil_onceT_andCP_CS*once_through_andCP_CS_fractio_from_allCS); lognormal variance with pedigree 0.092025, pedigree (4,4,3,2,4)
  Calculated value as per "electricity production, oil, PE, 2008-2008" (accessed October 2014),
- water consumption, electricity production from oil, once-T and coolingP CS: 0.0005 m3/kWh; name WConsumption_EP_oil_onceT_andCP_CS; lognormal variance with pedigree 0.092025, pedigree (4,4,3,2,4)
  Estimated as per "electricity production, oil, PE, 2008-2008" (accessed October 2014), based on literature (Scown, 2011, Water Footprint of U.S. Transportation Fuels, SI).
- water withdrawal, electricity production from oil, once-T and coolingP CS: 0.098 m3/kWh; name WWithdrawal_EP_oil_onceT_andCP_CS; lognormal variance with pedigree 0.092025, pedigree (4,4,3,2,4)
  (same comment as for water consumption, electricity production from oil, once-T and cooling)
- water withdrawal, electricity production from oil, recirculating CS: 0.0021 m3/kWh; name WWithdrawal_EP_oil_recirculating_CS; lognormal variance with pedigree 0.092025, pedigree (4,4,3,2,4)
  (same comment as for water consumption, electricity production from oil, once-T and cooling)
- once-through and cooling pond cooling systems as a fraction of all cooling syste: 0.625 dimensionless; name once_through_andCP_CS_fractio_from_allCS; lognormal variance with pedigree 0.092025, pedigree (4,4,3,2,4)
  Calculated as per "electricity production, oil, PE, 2008-2008" (accessed October 2014); as an average of data available for Europe (Floerke, 2008, Future changes of freshwater needs in the electricity production sector) and USA (NERL, 2011, Estimating freshwater needs to meet future thermoelectric generation requirements).
  nan
- gross electricity production: 9.4103e7 kWh; name gross_electricity; lognormal variance with pedigree 0.0012, pedigree (2,1,1,1,1)
  Calculated value.
  Annual production volume (Net production) (kWh) and the amount of losses (gross to net). The production values as reported in COES, 2014. Sub Dirección de Gestión de la Información. RA-SGI-0115. ESTADISTICA RELEVANTE DEL SISTEMA ELÉCTRICO INTERCONECTADO NACIONAL, (2014). Cap. 06 PRODUCCIÓN TERMOELÉCTRICA Y CONSUMO DE COMBUSTIBLE. Retrieved online from http://www.coes.org.pe/Portal/Publicaciones/Estadisticas/ 2014/PDF/06_PRODUCCION TERMOELECTRICA Y CONSUMO DE COMBUSTIBLE, ,CUADRO N° 6.2 RENDIMIENTO PROMEDIO ANUAL - 2014. November 14, 2017.
- recirculating cooling system as a fraction of all cooling systems: 0.375 dimensionless; name recirculating_CS_fraction_from_allCS; lognormal variance with pedigree 0.092025, pedigree (4,4,3,2,4)
  Calculated as per "electricity production, oil, PE, 2008-2008" (accessed October 2014), as an average of data available for Europe (Floerke, 2008, Future changes of freshwater needs in the electricity production sector) and USA (NERL, 2011, Estimating freshwater needs to meet future thermoelectric generation requirements).
  nan
- average efficiency of oil power plants, global: 0.37 dimensionless; name efficiency_oil_global; lognormal variance with pedigree 0.003325, pedigree (3,2,1,2,2)
  Literature value/calculated value. Net electrical efficiency based on the lower heating value (LHV), as in the dataset, "electricity production, oil, PE, 2008-2008" (accessed October 2014), which documents the following:
  For all OECD countries, the IEA Electricity information 2014 provides data for the year 2012 on fuel input (TJ, Net calorific value NCV) and gross electricity production (GWh) as well as heat production (TJ) in tables 8 and 9 for each country for electricity only and Combined Heat and Power (CHP) plants each. Together with the information on own use (see parameter 'losses'), the net electrical efficiency based on the NCV is calculated.
  For all non-OECD countries, data from the IEA Energy balances of non-OECD countries 2014 have been used. These tables do not always provide information on how much of the electricity has been produced in electricity only and in CHP plants, but often give the total value only.
  IEA. 2014. Electricity Information 2014. ISBN 978-92-64-21692-1. International Energy Agency (IEA), Paris Cedex (FR).
  IEA/OECD. 2014. Energy balances of non-OECD countries 2014. International Energy Agency (IEA), Paris Cedex (FR).
  nan
- fraction, water, completely softened, to air: 0.15 dimensionless; name fraction_WCS_to_air; = fraction_PW_to_air; lognormal variance with pedigree 0.092025, pedigree (4,4,3,2,4)
  Calculated value as per "electricity production, oil, PE, 2008-2008" (accessed October 2014), See comment in the other parametres present in this dataset. Water, completely softened is considered to be always used as process water, thus process water fractions to air are applied to all water, completely softened input flows to calculate the amount of water consumed in the processes.
  nan
- water consumption, electricity production from oil, recirculating CS: 0.0018 m3/kWh; name WConsumption_EP_oil_recirculatingCS; lognormal variance with pedigree 0.092025, pedigree (4,4,3,2,4)
  (same comment as for water consumption, electricity production from oil, once-T and cooling)
- fraction, water, decarbonised, to air: 0.0159178 dimensionless; name fraction_WDC_to_air; = fraction_CW_to_air; lognormal variance with pedigree 0.092025, pedigree (4,4,3,2,4)
  Calculated value as reported in "electricity production, oil, PE, 2008-2008" (accessed October 2014). See comments in the other parametres present in this dataset. Decarbonised water is considered to be always used as cooling water, thus cooling water fractions to air are applied to all carbonised water input flows to calculate the amount of water consumed in the processes.
  nan
- average efficiency of oil power plants, country: 0.339034 dimensionless; name efficiency_oil_country; = (87515814*3.6)/(6716531*3.78541*0.85*43); lognormal variance with pedigree 0.003325, pedigree (3,2,1,2,2)
  Literature value/calculated value.
  Net production divided by oil consumption.
  Power plant Net electricity production (kWh) Diesel (gal)
  Mollendo 4484117 302093
  Santa Rosa 455770 40010
  C.T. RF Talara 17804729 1575408
  Chilina 5619827 425393
  GD Chiclayo Oeste 518370 40703
  Piura 857796 15758
  TG Chimbote 664693 77838
  C.T. Dolorespata 1572148 139353
  C.T.E. Cachimayo 11341880 796000
  Tumbes MAK1, MAK2 2799455 178602
  C.T.E. Tamburco 1781839 132218
  C.T.E. Urpipata 1052092 77187
  Ilo Catkato 398423 26442
  Ilo TG 7826907 692292
  Ilo TVs 21653543 1394658
  C.T. RF PLANTA ILO 5199538 477301
  Taparachi 342308 3785
  San Nicolás TVs 3100000 289149
  Bellavista 42378 32341
  Source:
  COES, 2014. Sub Dirección de Gestión de la Información. RA-SGI-0115. ESTADISTICA RELEVANTE DEL SISTEMA ELÉCTRICO INTERCONECTADO NACIONAL, (2014). Cap. 06 PRODUCCIÓN TERMOELÉCTRICA Y CONSUMO DE COMBUSTIBLE. Retrieved online from http://www.coes.org.pe/Portal/Publicaciones/Estadisticas/ 2014/PDF/06_PRODUCCION TERMOELECTRICA Y CONSUMO DE COMBUSTIBLE, CUADRO N° 6.3 CONSUMO DE COMBUSTIBLE EN LAS CENTRALES TERMOELÉCTRICAS 2014,CUADRO N° 6.2 RENDIMIENTO PROMEDIO ANUAL - 2014. accessed on November 14, 2017.
  Low heating value of diesel 43 MJ/kg
  Source: <http://www.antoniolima.web.br.com/arquivos/podercalorifico.htm> accessed on November 14, 2017.
  Density of diesel: 0.85 kg/L
  Source: <http://www.antoniolima.web.br.com/arquivos/podercalorifico.htm> accessed on November 14, 2017.
- factor: input of MJ for the production of 1 kWh: 9.72973 MJ/kWh; name factor_MJ_kWh; = 1*3.6/efficiency_oil_global; lognormal variance with pedigree 0.0006, pedigree (1,1,1,1,1)
  Calculated value. 3.6 MJ = 1kWh.

## Reference product
- electricity, high voltage: 1 kWh; name electricity; By-product classification allocatable product; CPC 17100: Electrical energy
  production volume 8.75158e7 kWh; name apv_electricity; = gross_electricity* (1-losses_gross_net)
    The production was calculated from statistical reports from the following plants in Peru (Mollendo, Santa Rosa, RF Talara, Chilina, GD Chiclayo Oeste, Piura, TG Chimbote, Dolores Pata, Cachimayo, Tubes MAK1, MAK2, Tamburco, Urpipata, Ilo Catkato, Ilo TG, ILo TVs, RF Planta ILOTaparachi, San Nicolas TVs, Bellavista, ) . (COES, 2014)
    Source: COES, 2014. Sub Dirección de Gestión de la Información. RA-SGI-0115. ESTADISTICA RELEVANTE DEL SISTEMA ELÉCTRICO INTERCONECTADO NACIONAL, (2014). Cap. 06 PRODUCCIÓN TERMOELÉCTRICA Y CONSUMO DE COMBUSTIBLE. Retrieved online from http://www.coes.org.pe/Portal/Publicaciones/Estadisticas/ 2014/PDF/06_PRODUCCION TERMOELECTRICA Y CONSUMO DE COMBUSTIBLE, CUADRO N° 6.3 CONSUMO DE COMBUSTIBLE EN LAS CENTRALES TERMOELÉCTRICAS 2014,CUADRO N° 6.2 RENDIMIENTO PROMEDIO ANUAL - 2014. November 14, 2017.
  property price 0.0977 EUR2005
    Temporary price data. Calculated as 90% of purchasers price based on: 94% of the average price (to account for a 6% loss in transformation and transmission) for electricity for industrial consumersin 2005 (excluded taxes). From IEA.

## Inputs from technosphere
- bilge oil: -2.41628e-5 kg; name bilge_oil; = (2.21405798675039E-05 * relation_global_country)*-1; source Jungbluth, N. 2007; lognormal variance with pedigree 0.0438, pedigree (2,3,5,5,1)
  Average of literature data
  production volume 2114.63 kg; = apv_electricity * bilge_oil
    Calculated from the production volume of electricity produced in proportion to the respective output amounts.
  property price 0 EUR2005; name bilge_oil_price_EUR2005
  properties: carbon content, fossil 0.84, water content 9, wet mass 1 kg, dry mass 0.1 kg, heating value, net 1.92 MJ
  note on carbon content, fossil: Tab A.6, ecoinvent v2.2 report 13_I. C content has been calculated after data in the tables, and then referred to 1 kg DM
  note on heating value, net: Value taken from the general comment of the treatment dataset.
- diesel: 0.246943 kg; = 0.246939360494432*efficiency_oil_country/0.33903
  Weighted average based on the fuel consumption and net electricity production of four oil plants in Peru (COES, 2014).
  Power plant Net electricity production (kWh) Diesel (gal)
  Mollendo 4484117 302093
  Santa Rosa 455770 40010
  C.T. RF Talara 17804729 1575408
  Chilina 5619827 425393
  GD Chiclayo Oeste 518370 40703
  Piura 857796 15758
  TG Chimbote 664693 77838
  C.T. Dolorespata 1572148 139353
  C.T.E. Cachimayo 11341880 796000
  Tumbes MAK1, MAK2 2799455 178602
  C.T.E. Tamburco 1781839 132218
  C.T.E. Urpipata 1052092 77187
  Ilo Catkato 398423 26442
  Ilo TG 7826907 692292
  Ilo TVs 21653543 1394658
  C.T. RF PLANTA ILO 5199538 477301
  Taparachi 342308 3785
  San Nicolás TVs 3100000 289149
  Bellavista 42378 32341
  Source:
  COES, 2014. Sub Dirección de Gestión de la Información. RA-SGI-0115. ESTADISTICA RELEVANTE DEL SISTEMA ELÉCTRICO INTERCONECTADO NACIONAL, (2014). Cap. 06 PRODUCCIÓN TERMOELÉCTRICA Y CONSUMO DE COMBUSTIBLE. Retrieved online from http://www.coes.org.pe/Portal/Publicaciones/Estadisticas/ 2014/PDF/06_PRODUCCION TERMOELECTRICA Y CONSUMO DE COMBUSTIBLE, CUADRO N° 6.3 CONSUMO DE COMBUSTIBLE EN LAS CENTRALES TERMOELÉCTRICAS 2014,CUADRO N° 6.2 RENDIMIENTO PROMEDIO ANUAL - 2014. accessed on November 14, 2017.
  Low heating value of diesel 43 MJ/kg
  Source: <http://www.antoniolima.web.br.com/arquivos/podercalorifico.htm> accessed on November 14, 2017.
  Density of diesel: 0.85 kg/L
  Source: <http://www.antoniolima.web.br.com/arquivos/podercalorifico.htm> accessed on November 14, 2017.
  properties: carbon content, fossil 0.865, wet mass 1 kg, dry mass 1 kg, heating value, net 42.8 MJ
  note on carbon content, fossil: C-content of diesel is 86.5% (ecoinvent v2.2 report 6_IV, Tab 3.14)
- waste mineral oil: -0.000619261 kg; name waste_oil; = (0.000567434011587811 * relation_global_country)*-1; source Jungbluth, N. 2007; lognormal variance with pedigree 0.0438, pedigree (2,3,5,5,1)
  Average of literature data
  production volume 54195.1 kg; = apv_electricity *waste_oil
    (same comment as for bilge oil)
  property price 0 EUR2005; name waste_oil_price_EUR2005
  properties: wet mass 1 kg, dry mass 0.9 kg, water content 0.111111, carbon content, fossil 0.864444, heating value, net 34.7 MJ
- oil power plant, 500MW: 1.39663e-11 unit; = 1.27974335560263E-11 * relation_global_country; source Jungbluth, N. 2007; lognormal variance with pedigree 0.3506, pedigree (2,5,5,5,1)
  Estimation based on case study
- municipal solid waste: -0.000170134 kg; name municipal_waste; = (0.000155895267385992 * relation_global_country)*-1; source Jungbluth, N. 2007; lognormal variance with pedigree 0.0058, pedigree (2,3,3,5,1)
  Average of literature data
  production volume 14889.4 kg; = apv_electricity * municipal_waste
    (same comment as for bilge oil)
  property price 0 EUR2005; name municipal_waste_price_EUR2005
  properties: heating value, net 11.74 MJ, wet mass 1 kg, dry mass 0.771 kg, carbon content, fossil 0.171549, carbon content, non-fossil 0.261655, water content 0.297017
  note on carbon content, fossil: MSW composition in tab 4.1, ecoinvent v2.2 report 13_I. C content referred to 1 kg DM
- water, completely softened: 0.00129334 kg; name water_softened_input; = 0.00118510 * relation_global_country; source Jungbluth, N. 2007, p. Tab. 12.10 p. 228; lognormal variance with pedigree 0.0439, pedigree (2,2,5,5,2)
  Literature value/calculated value. Value taken from the PE dataset, ""electricity production, oil, PE, 2008-2008" (accessed October 2014)" with adjustments to the peruvian context in year 2014 (nineteen power plants). (Subdirección de Gestión de la Información. COES, 2014). Sources: COES, 2014. Sub Dirección de Gestión de la Información. RA-SGI-0115. ESTADISTICA RELEVANTE DEL SISTEMA ELÉCTRICO INTERCONECTADO NACIONAL, (2014). Cap. 06 PRODUCCIÓN TERMOELÉCTRICA Y CONSUMO DE COMBUSTIBLE. Retrieved online from http://www.coes.org.pe/Portal/Publicaciones/Estadisticas/ 2014/PDF/06_PRODUCCION TERMOELECTRICA Y CONSUMO DE COMBUSTIBLE, CUADRO N° 6.3 CONSUMO DE COMBUSTIBLE EN LAS CENTRALES TERMOELÉCTRICAS 2014,CUADRO N° 6.2 RENDIMIENTO PROMEDIO ANUAL - 2014. November 14, 2017.
  properties: wet mass 1 kg
- lignite ash: -0.000641625 kg; name lignite_ash; = (0.000587926601413295 * relation_global_country)*-1; source Jungbluth, N. 2007; lognormal variance with pedigree 0.0438, pedigree (2,3,5,5,1)
  Average of literature data
  production volume 56152.3 kg; = apv_electricity * lignite_ash
    (same comment as for bilge oil)
  property price 0 EUR2005; name lignite_ash_price_EUR2005
  properties: wet mass 1 kg, dry mass 1 kg
- limestone, crushed, washed: 0.0155517 kg; = 0.0142502047575074 * relation_global_country; source Jungbluth, N. 2007, p. Tab. 12.11 p. 228; lognormal variance with pedigree 0.0226, pedigree (2,4,4,5,1)
  Literature value for flue gas treatment.
  IPPC (2001b) Integrated Pollution Prevention and Control (IPPC): Draft Reference Document on Best Available Techniques for Large Combustion Plants. European Commission Directorate- eneral JRC, Joint Research Centre, Seville, Spain, retrieved from: http://eippcb.jrc.es.
  properties: dry mass 0.998 kg, carbon content, fossil 0.117257, wet mass 1 kg, water content 0.00200401
  note on carbon content, fossil: Table 3.1, ecoinvent v2.2 report 7, part VII, pg 3. MW CaCO3=100, MW MgCO3=84. C content of limestone is 0.117257 kg/kg DM
- residue from cooling tower: -0.000153689 kg; name cooling_tower; = (0.000140826964829544 * relation_global_country)*-1; source Jungbluth, N. 2007, p. Tab. 12.27, p. 238; lognormal variance with pedigree 0.0438, pedigree (2,3,5,5,1)
  Average of literature data
  production volume 13450.3 kg; = apv_electricity * cooling_tower
    (same comment as for bilge oil)
  property price 0 EUR2005; name cooling_tower_price_EUR2005
  properties: wet mass 1 kg, dry mass 0.7 kg, water content 0.428571, carbon content, fossil 0.0544233
- water, decarbonised: 0.00644239 kg; name water_decarbonised_input; = 0.00590322 * relation_global_country; source Jungbluth, N. 2007, p. Tab. 12.10 p. 228; lognormal variance with pedigree 0.0439, pedigree (2,2,5,5,2)
  Literature value/calculated value. Value taken from the PE dataset"electricity production, oil, PE, 2008-2008" (accessed October 2014), with adjustments to the peruvian context in year 2014 (nineteen power plants). (Subdirección de Gestión de la Información. COES, 2014). Sources: COES, 2014. Sub Dirección de Gestión de la Información. RA-SGI-0115. ESTADISTICA RELEVANTE DEL SISTEMA ELÉCTRICO INTERCONECTADO NACIONAL, (2014). Cap. 06 PRODUCCIÓN TERMOELÉCTRICA Y CONSUMO DE COMBUSTIBLE. Retrieved online from http://www.coes.org.pe/Portal/Publicaciones/Estadisticas/ 2014/PDF/06_PRODUCCION TERMOELECTRICA Y CONSUMO DE COMBUSTIBLE, CUADRO N° 6.3 CONSUMO DE COMBUSTIBLE EN LAS CENTRALES TERMOELÉCTRICAS 2014,CUADRO N° 6.2 RENDIMIENTO PROMEDIO ANUAL - 2014. November 14, 2017.
  properties: wet mass 1 kg
- ammonia, anhydrous, liquid: 0.000714259 kg; = 0.000654482227803382 * relation_global_country; source Jungbluth, N. 2007, p. Tab. 12.11 p. 228; lognormal variance with pedigree 0.0226, pedigree (2,4,4,5,1)
  (same comment as for limestone, crushed, washed)
  properties: wet mass 1 kg, dry mass 1 kg
- fly ash and scrubber sludge: -2.98984e-5 kg; name fly_ash; = (2.73962181380553E-05 * relation_global_country)*-1; source Jungbluth, N. 2007, p. Tab. 12.27, p. 238; lognormal variance with pedigree 0.0433, pedigree (2,2,5,5,1)
  Average of literature data
  production volume 2616.59 kg; = apv_electricity * fly_ash
    (same comment as for bilge oil)
  property price 0 EUR2005; name fly_ash_price_EUR2005
  properties: wet mass 1 kg, carbon content, fossil 0.167, water content 9, dry mass 0.1 kg

## Inputs from nature
- Water, cooling, unspecified natural origin [natural resource, in water]: 0.0676531 m3; name water_cooling_UNO_input; = ((recirculating_CS_fraction_from_allCS*WWithdrawal_EP_oil_recirculating_CS)+(once_through_andCP_CS_fractio_from_allCS*WWithdrawal_EP_oil_onceT_andCP_CS))/9.737*(1/efficiency_oil_country*3.6); source Jungbluth, N. 2007, p. Tab. 12.10 p. 228; lognormal variance with pedigree 0.3432, pedigree (2,3,5,5,1)
  Literature value/estimation. Estimation based on several literature sources:
  Frischknecht R., Bollens U., Bosshart S., Ciot M., Ciseri L., Doka G., Dones R., Gantner U., Hischier R. and Martin A. (1996) Ökoinventare von Energiesystemen: Grundlagen für den ökologischen Vergleich von Energiesystemen und den Einbezug von Energiesystemen in Ökobilanzen für die Schweiz. 3. Gruppe Energie - Stoffe - Umwelt (ESU), Eidgenössische Technische Hochschule Zürich und Sektion Ganzheitliche Systemanalysen, Paul Scherrer Institut, Villigen, Bundesamt für Energie (Hrsg.), Bern, CH, retrieved from: www.energieforschung.ch.
  Powergen (2001) Environment Report 2000. Powergen UK, Coventry, UK, retrieved from: www.pgen.com
  ESB (1997) Environmental Review 1997. Electricity Supply Board, Dublin, IE, retrieved from: www.esb.ie
  EDP (2001) Environmental Report 2000. Electricidade de Portugal, S.A., Lisboa, PT, retrieved from: www.edp.pt
  IPPC (2001b) Integrated Pollution Prevention and Control (IPPC): Draft Reference Document on Best Available Techniques for Large Combustion Plants. European Commission Directorate-General JRC, Joint Research Centre, Seville, Spain, retrieved from: http://eippcb.jrc.es.

## Emissions to nature
- Lead [air, urban air close to ground]: 3.93609e-7 kg; = 3.60667186373267E-07 * relation_global_country; source Jungbluth, N. 2007; lognormal variance with pedigree 1.2433, pedigree (2,2,5,5,2)
  Calculation based on particle emission. Deviation calculated from ranges
- Copper [air, urban air close to ground]: 5.40643e-7 kg; = 4.95396522447329E-07 * relation_global_country; source Jungbluth, N. 2007, p. Tab. 12.23, Tab. 12.24; lognormal variance with pedigree 1.3433, pedigree (2,2,5,5,2)
  Literature data, calculation, estimation. See tab 12.23 with element concentrations in dust (Pacyna 1982, Pacyna 1991); and tab. 12.24 with emission factors of heavy metals in fuel oil S (Richardson 1999, Powergen 2001).
  J.M. Pacyna, 'Estimation of Emission Factors of Trace Metals from Oil-Fired Power Plants', Norvegian Institute for Air Research (NILU), Lillestrøm 1982
  J. Pacyna, 'Trace Element Emissions from Coal-, and Oil- power Plants in Europe. Methodology of Calculations', Norvegian Institute for Air Research (NILU), Lillestrøm 1982
  J.M. Pacyna, 'Emission Factors of Atmospheric Cd, Pb and Zn for Major Source Categories in Europe in 1950 through 1985', Norvegian Institute for Air Research (NILU), Lillestrøm 1991
  Richardson S. (1999) Atmospheric Emission Inventory Guidebook. Second Edition. EMEP: Co-operative Programme for Monitoring and Evaluation of the Long Range Transmission of Air Pollutants in Europe, CORINAIR: The Core Inventory of Air Emissions in Europe, EEA: European Environment Agency, Copenhagen, DK.
  Powergen (2001) Environment Report 2000. Powergen UK, Coventry, UK, retrieved from: www.pgen.com.
- Lead [water, surface water]: 5.56856e-8 kg; = 5.10252130314862E-08 * relation_global_country; source Jungbluth, N. 2007, p. Tab. 12.26, p. 238; lognormal variance with pedigree 0.5333, pedigree (2,2,5,5,2)
  Literature data/estimations. See Tab. 12.26 for details: concentration of pollutants in the wastewater of oil power plants and of flue gas treatment as well as in the condensate and feed water preparation. Mean of values for Europe, range of concentrations.
  Slovenské elektrárne (2002) Environment Report 2001, Bratislave, SK, retrieved from: www.seas.sk.
  EDP (2001) Environmental Report 2000. Electricidade de Portugal, S.A., Lisboa, PT, retrieved from: www.edp.pt.
  IPPC (2001b) Integrated Pollution Prevention and Control (IPPC): Draft Reference Document on Best Available Techniques for Large Combustion Plants. European Commission Directorate- General JRC, Joint Research Centre, Seville, Spain, retrieved from: http://eippcb.jrc.es.
- Molybdenum [air, urban air close to ground]: 9.09642e-8 kg; = 8.33512865956363E-08 * relation_global_country; source Jungbluth, N. 2007; lognormal variance with pedigree 1.2433, pedigree (2,2,5,5,2)
  Calculation based on particle emission. Deviation calculated from ranges
- Nitrogen [water, surface water]: 9.11499e-5 kg; = 8.3521456053517E-05 * relation_global_country; source Jungbluth, N. 2007, p. Tab. 12.26, p. 238; lognormal variance with pedigree 0.0633, pedigree (2,2,5,5,2)
  (same comment as for Lead)
- Particulates, > 2.5 um, and < 10um [air, urban air close to ground]: 0.000107376 kg; = 0.000107375044280873*efficiency_oil_country/0.33903; source Jungbluth, N. 2007, p. Tab. 12.17 / Tab. 12.18; lognormal variance with pedigree 0.1387, pedigree (2,2,4,5,3)
  Calculated emissions when producing 1kWh of electricity by burning diesel. Weighted average based on the fuel consumption and net electricity production of nineteen oil power plants in Peru (COES, 2014) and emission factor from (EPA, 1999)
  Power plant Net electricity production (kWh) Diesel (gal)
  Mollendo 4484117 302093
  Santa Rosa 455770 40010
  C.T. RF Talara 17804729 1575408
  Chilina 5619827 425393
  GD Chiclayo Oeste 518370 40703
  Piura 857796 15758
  TG Chimbote 664693 77838
  C.T. Dolorespata 1572148 139353
  C.T.E. Cachimayo 11341880 796000
  Tumbes MAK1, MAK2 2799455 178602
  C.T.E. Tamburco 1781839 132218
  C.T.E. Urpipata 1052092 77187
  Ilo Catkato 398423 26442
  Ilo TG 7826907 692292
  Ilo TVs 21653543 1394658
  C.T. RF PLANTA ILO 5199538 477301
  Taparachi 342308 3785
  San Nicolás TVs 3100000 289149
  Bellavista 42378 32341
  Source:
  COES, 2014. Sub Dirección de Gestión de la Información. RA-SGI-0115. ESTADISTICA RELEVANTE DEL SISTEMA ELÉCTRICO INTERCONECTADO NACIONAL, (2014). Cap. 06 PRODUCCIÓN TERMOELÉCTRICA Y CONSUMO DE COMBUSTIBLE. Retrieved online from http://www.coes.org.pe/Portal/Publicaciones/Estadisticas/ 2014/PDF/06_PRODUCCION TERMOELECTRICA Y CONSUMO DE COMBUSTIBLE, CUADRO N° 6.3 CONSUMO DE COMBUSTIBLE EN LAS CENTRALES TERMOELÉCTRICAS 2014,CUADRO N° 6.2 RENDIMIENTO PROMEDIO ANUAL - 2014. accessed on November 14, 2017.
  Low heating value of diesel 43 MJ/kg
  Source: <http://www.antoniolima.web.br.com/arquivos/podercalorifico.htm> accessed on November 14, 2017.
  Density of diesel: 0.85 kg/L
  Source: <http://www.antoniolima.web.br.com/arquivos/podercalorifico.htm> accessed on November 14, 2017.
  Substance Emission factor (lb/1000 gal)
  PM>2.5<10 3.08
  Source:
  EPA, 1999. US Environmental Protection Agency (1999). AP 42 -Compilation of Air Pollutant Emission Factors, Volume 1: Stationary Point and Area Sources Compilation of Air Pollutant Emission Factors, AP-42, AP 42, Fifth Edition. Fuel Oil Combustion, Final Section - Supplement E September 1999, corrected May 2010. Background Document - September 1998. https://www3.epa.gov/ttn/chief/ap42/ch01/index.html. Retrieved online 24 august 2017.
- Particulates, > 10 um [air, urban air close to ground]: 5.82203e-5 kg; = 0.000058219585697746*efficiency_oil_country/0.33903; source Jungbluth, N. 2007, p. Tab. 12.17 / Tab. 12.18; lognormal variance with pedigree 0.0587, pedigree (2,2,4,5,3)
  Calculated emissions when producing 1kWh of electricity by burning diesel. Weighted average based on the fuel consumption and net electricity production of nineteen oil power plants in Peru (COES, 2014) and emission factor from (EPA, 1999)
  Power plant Net electricity production (kWh) Diesel (gal)
  Mollendo 4484117 302093
  Santa Rosa 455770 40010
  C.T. RF Talara 17804729 1575408
  Chilina 5619827 425393
  GD Chiclayo Oeste 518370 40703
  Piura 857796 15758
  TG Chimbote 664693 77838
  C.T. Dolorespata 1572148 139353
  C.T.E. Cachimayo 11341880 796000
  Tumbes MAK1, MAK2 2799455 178602
  C.T.E. Tamburco 1781839 132218
  C.T.E. Urpipata 1052092 77187
  Ilo Catkato 398423 26442
  Ilo TG 7826907 692292
  Ilo TVs 21653543 1394658
  C.T. RF PLANTA ILO 5199538 477301
  Taparachi 342308 3785
  San Nicolás TVs 3100000 289149
  Bellavista 42378 32341
  Source:
  COES, 2014. Sub Dirección de Gestión de la Información. RA-SGI-0115. ESTADISTICA RELEVANTE DEL SISTEMA ELÉCTRICO INTERCONECTADO NACIONAL, (2014). Cap. 06 PRODUCCIÓN TERMOELÉCTRICA Y CONSUMO DE COMBUSTIBLE. Retrieved online from http://www.coes.org.pe/Portal/Publicaciones/Estadisticas/ 2014/PDF/06_PRODUCCION TERMOELECTRICA Y CONSUMO DE COMBUSTIBLE, CUADRO N° 6.3 CONSUMO DE COMBUSTIBLE EN LAS CENTRALES TERMOELÉCTRICAS 2014,CUADRO N° 6.2 RENDIMIENTO PROMEDIO ANUAL - 2014. accessed on November 14, 2017.
  Low heating value of diesel 43 MJ/kg
  Source: <http://www.antoniolima.web.br.com/arquivos/podercalorifico.htm> accessed on November 14, 2017.
  Density of diesel: 0.85 kg/L
  Source: <http://www.antoniolima.web.br.com/arquivos/podercalorifico.htm> accessed on November 14, 2017.
  Substance Emission factor (lb/1000 gal)
  PM>10 1.67
  Source:
  EPA, 1999. US Environmental Protection Agency (1999). AP 42 -Compilation of Air Pollutant Emission Factors, Volume 1: Stationary Point and Area Sources Compilation of Air Pollutant Emission Factors, AP-42, AP 42, Fifth Edition. Fuel Oil Combustion, Final Section - Supplement E September 1999, corrected May 2010. Background Document - September 1998. https://www3.epa.gov/ttn/chief/ap42/ch01/index.html. Retrieved online 24 august 2017.
- Hydrocarbons, unspecified [water, surface water]: 4.14136e-7 kg; = 3.79476313314415E-07 * relation_global_country; source Jungbluth, N. 2007, p. Tab. 12.26, p. 238; lognormal variance with pedigree 0.0733, pedigree (2,2,5,5,2)
  (same comment as for Lead)
- Acetone [air, urban air close to ground]: 2.86036e-6 kg; = 2.62096973868199E-06 * relation_global_country; source Jungbluth, N. 2007; lognormal variance with pedigree 0.132, pedigree (1,1,5,5,1)
  Calculation based on VOC emission. Deviation calculated from ranges
- Zinc, ion [water, surface water]: 7.04975e-8 kg; = 6.4597469671174E-08 * relation_global_country; source Jungbluth, N. 2007, p. Tab. 12.26, p. 238; lognormal variance with pedigree 0.2933, pedigree (2,2,5,5,2)
  (same comment as for Lead)
- Acetic acid [air, urban air close to ground]: 1.16795e-5 kg; = 1.07020073585515E-05 * relation_global_country; source Jungbluth, N. 2007; lognormal variance with pedigree 0.132, pedigree (1,1,5,5,1)
  Calculation based on VOC emission. Deviation calculated from ranges
- PAH, polycyclic aromatic hydrocarbons [air, urban air close to ground]: 2.00392e-8 kg; = 1.83620897840367E-08 * relation_global_country; source Jungbluth, N. 2007, p. Tab. 12.21, p. 235; lognormal variance with pedigree 0.3306, pedigree (2,4,4,5,3)
  Literature value/estimation. Compilation of different emissions from Masclet et al. 1987- see Tab. 12.21 for details.
  P. Masclet, M.A. Bresson, G. Mouvier, 'Polycyclic Aromatic Hydrocarbons Emitted by Power Stations, and the Influence of Combustion Conditions', in Fuel Vol. 66, Nr. 4, S. 556-562
- Hydrocarbons, aliphatic, unsaturated [air, urban air close to ground]: 5.83984e-7 kg; = 5.35109739033632E-07 * relation_global_country; source Jungbluth, N. 2007; lognormal variance with pedigree 0.1233, pedigree (2,2,5,5,2)
  Calculation based on VOC emission. Deviation calculated from ranges
- Hydrogen chloride [air, urban air close to ground]: 5.09652e-7 kg; = 4.6699915314895E-07 * relation_global_country; source Jungbluth, N. 2007, p. Tab. 12.25; lognormal variance with pedigree 0.0912, pedigree (2,3,5,5,3)
  Literature data/calculation. See Tab. 12.25 for details.
- Hypochlorite [water, ocean]: 3.90598e-6 kg; = 3.57908785086596E-06 * relation_global_country; source Jungbluth, N. 2007; lognormal variance with pedigree 0.062, pedigree (3,4,4,5,3)
  Literature
- Mercury [air, urban air close to ground]: 1.69507e-9 kg; = 1.55321226102755E-09 * relation_global_country; source Jungbluth, N. 2007; lognormal variance with pedigree 1.6633, pedigree (2,2,5,5,2)
  Calculation from ranges
- Hypochlorite [water, surface water]: 4.00437e-6 kg; = 3.66923603392927E-06 * relation_global_country; source Jungbluth, N. 2007; lognormal variance with pedigree 0.072, pedigree (3,4,4,5,3)
  Literature
- Mercury [water, surface water]: 1.39995e-9 kg; = 1.28278935719047E-09 * relation_global_country; source Jungbluth, N. 2007, p. Tab. 12.26, p. 238; lognormal variance with pedigree 0.5933, pedigree (2,2,5,5,2)
  (same comment as for Lead)
- Acetaldehyde [air, urban air close to ground]: 2.86036e-6 kg; = 2.62096973868199E-06 * relation_global_country; source Jungbluth, N. 2007; lognormal variance with pedigree 0.132, pedigree (1,1,5,5,1)
  Calculation based on VOC emission. Deviation calculated from ranges
- Particulates, < 2.5 um [air, urban air close to ground]: 2.30092e-5 kg; = 2.30089380601871E-05*efficiency_oil_country/0.33903; source Jungbluth, N. 2007, p. Tab. 12.17 / Tab. 12.18; lognormal variance with pedigree 0.3187, pedigree (2,2,4,5,3)
  Calculated emissions when producing 1kWh of electricity by burning diesel. Weighted average based on the fuel consumption and net electricity production of nineteen oil power plants in Peru (COES, 2014) and emission factor from (EPA, 1999)
  Power plant Net electricity production (kWh) Diesel (gal)
  Mollendo 4484117 302093
  Santa Rosa 455770 40010
  C.T. RF Talara 17804729 1575408
  Chilina 5619827 425393
  GD Chiclayo Oeste 518370 40703
  Piura 857796 15758
  TG Chimbote 664693 77838
  C.T. Dolorespata 1572148 139353
  C.T.E. Cachimayo 11341880 796000
  Tumbes MAK1, MAK2 2799455 178602
  C.T.E. Tamburco 1781839 132218
  C.T.E. Urpipata 1052092 77187
  Ilo Catkato 398423 26442
  Ilo TG 7826907 692292
  Ilo TVs 21653543 1394658
  C.T. RF PLANTA ILO 5199538 477301
  Taparachi 342308 3785
  San Nicolás TVs 3100000 289149
  Bellavista 42378 32341
  Source:
  COES, 2014. Sub Dirección de Gestión de la Información. RA-SGI-0115. ESTADISTICA RELEVANTE DEL SISTEMA ELÉCTRICO INTERCONECTADO NACIONAL, (2014). Cap. 06 PRODUCCIÓN TERMOELÉCTRICA Y CONSUMO DE COMBUSTIBLE. Retrieved online from http://www.coes.org.pe/Portal/Publicaciones/Estadisticas/ 2014/PDF/06_PRODUCCION TERMOELECTRICA Y CONSUMO DE COMBUSTIBLE, CUADRO N° 6.3 CONSUMO DE COMBUSTIBLE EN LAS CENTRALES TERMOELÉCTRICAS 2014,CUADRO N° 6.2 RENDIMIENTO PROMEDIO ANUAL - 2014. accessed on November 14, 2017.
  Low heating value of diesel 43 MJ/kg
  Source: <http://www.antoniolima.web.br.com/arquivos/podercalorifico.htm> accessed on November 14, 2017.
  Density of diesel: 0.85 kg/L
  Source: <http://www.antoniolima.web.br.com/arquivos/podercalorifico.htm> accessed on November 14, 2017.
  Substance Emission factor (lb/1000 gal)
  PM<2.5 0.66
  Source:
  EPA, 1999. US Environmental Protection Agency (1999). AP 42 -Compilation of Air Pollutant Emission Factors, Volume 1: Stationary Point and Area Sources Compilation of Air Pollutant Emission Factors, AP-42, AP 42, Fifth Edition. Fuel Oil Combustion, Final Section - Supplement E September 1999, corrected May 2010. Background Document - September 1998. https://www3.epa.gov/ttn/chief/ap42/ch01/index.html. Retrieved online 24 august 2017.
- Nitrogen oxides [air, urban air close to ground]: 0.00191744 kg; = 0.00191741150501559*efficiency_oil_country/0.33903; source Jungbluth, N. 2007, p. Tab. 12.15 p. 231; lognormal variance with pedigree 0.0507, pedigree (2,2,4,5,1)
  Calculated emissions when producing 1kWh of electricity by burning diesel. Weighted average based on the fuel consumption and net electricity production of nineteen oil power plants in Peru (COES, 2014) and emission factor from (EPA, 1999)
  Power plant Net electricity production (kWh) Diesel (gal)
  Mollendo 4484117 302093
  Santa Rosa 455770 40010
  C.T. RF Talara 17804729 1575408
  Chilina 5619827 425393
  GD Chiclayo Oeste 518370 40703
  Piura 857796 15758
  TG Chimbote 664693 77838
  C.T. Dolorespata 1572148 139353
  C.T.E. Cachimayo 11341880 796000
  Tumbes MAK1, MAK2 2799455 178602
  C.T.E. Tamburco 1781839 132218
  C.T.E. Urpipata 1052092 77187
  Ilo Catkato 398423 26442
  Ilo TG 7826907 692292
  Ilo TVs 21653543 1394658
  C.T. RF PLANTA ILO 5199538 477301
  Taparachi 342308 3785
  San Nicolás TVs 3100000 289149
  Bellavista 42378 32341
  Source:
  COES, 2014. Sub Dirección de Gestión de la Información. RA-SGI-0115. ESTADISTICA RELEVANTE DEL SISTEMA ELÉCTRICO INTERCONECTADO NACIONAL, (2014). Cap. 06 PRODUCCIÓN TERMOELÉCTRICA Y CONSUMO DE COMBUSTIBLE. Retrieved online from http://www.coes.org.pe/Portal/Publicaciones/Estadisticas/ 2014/PDF/06_PRODUCCION TERMOELECTRICA Y CONSUMO DE COMBUSTIBLE, CUADRO N° 6.3 CONSUMO DE COMBUSTIBLE EN LAS CENTRALES TERMOELÉCTRICAS 2014,CUADRO N° 6.2 RENDIMIENTO PROMEDIO ANUAL - 2014. accessed on November 14, 2017.
  Low heating value of diesel 43 MJ/kg
  Source: <http://www.antoniolima.web.br.com/arquivos/podercalorifico.htm> accessed on November 14, 2017.
  Density of diesel: 0.85 kg/L
  Source: <http://www.antoniolima.web.br.com/arquivos/podercalorifico.htm> accessed on November 14, 2017.
  Substance Emission factor (lb/1000 gal)
  NOx 55
  Source:
  EPA, 1999. US Environmental Protection Agency (1999). AP 42 -Compilation of Air Pollutant Emission Factors, Volume 1: Stationary Point and Area Sources Compilation of Air Pollutant Emission Factors, AP-42, AP 42, Fifth Edition. Fuel Oil Combustion, Final Section - Supplement E September 1999, corrected May 2010. Background Document - September 1998. https://www3.epa.gov/ttn/chief/ap42/ch01/index.html. Retrieved online 24 august 2017.
- Sulfur dioxide [air, urban air close to ground]: 0.00547341 kg; = 0.00547333829613541*efficiency_oil_country/0.33903; source Jungbluth, N. 2007, p. Tab. 12.14 p. 230; lognormal variance with pedigree 0.0439, pedigree (2,2,5,5,2)
  Calculated emissions when producing 1kWh of electricity by burning diesel. Weighted average based on the fuel consumption and net electricity production of nineteen oil power plants in Peru (COES, 2014) and emission factor from (EPA, 1999)
  Power plant Net electricity production (kWh) Diesel (gal)
  Mollendo 4484117 302093
  Santa Rosa 455770 40010
  C.T. RF Talara 17804729 1575408
  Chilina 5619827 425393
  GD Chiclayo Oeste 518370 40703
  Piura 857796 15758
  TG Chimbote 664693 77838
  C.T. Dolorespata 1572148 139353
  C.T.E. Cachimayo 11341880 796000
  Tumbes MAK1, MAK2 2799455 178602
  C.T.E. Tamburco 1781839 132218
  C.T.E. Urpipata 1052092 77187
  Ilo Catkato 398423 26442
  Ilo TG 7826907 692292
  Ilo TVs 21653543 1394658
  C.T. RF PLANTA ILO 5199538 477301
  Taparachi 342308 3785
  San Nicolás TVs 3100000 289149
  Bellavista 42378 32341
  Source:
  COES, 2014. Sub Dirección de Gestión de la Información. RA-SGI-0115. ESTADISTICA RELEVANTE DEL SISTEMA ELÉCTRICO INTERCONECTADO NACIONAL, (2014). Cap. 06 PRODUCCIÓN TERMOELÉCTRICA Y CONSUMO DE COMBUSTIBLE. Retrieved online from http://www.coes.org.pe/Portal/Publicaciones/Estadisticas/ 2014/PDF/06_PRODUCCION TERMOELECTRICA Y CONSUMO DE COMBUSTIBLE, CUADRO N° 6.3 CONSUMO DE COMBUSTIBLE EN LAS CENTRALES TERMOELÉCTRICAS 2014,CUADRO N° 6.2 RENDIMIENTO PROMEDIO ANUAL - 2014. accessed on November 14, 2017.
- Chromium [air, urban air close to ground]: 1.36501e-7 kg; = 1.25077099991164E-07 * relation_global_country; source Jungbluth, N. 2007, p. Tab. 12.23, Tab. 12.24; lognormal variance with pedigree 1.4553, pedigree (2,2,3,5,2)
  (same comment as for Copper)
- Ethanol [air, urban air close to ground]: 5.83984e-6 kg; = 5.35109739033632E-06 * relation_global_country; source Jungbluth, N. 2007; lognormal variance with pedigree 0.1233, pedigree (2,2,5,5,2)
  Calculation based on VOC emission. Deviation calculated from ranges
- Ammonia [air, urban air close to ground]: 1.22862e-6 kg; = 1.12579399262229E-06 * relation_global_country; source Jungbluth, N. 2007, p. p.232; lognormal variance with pedigree 1.0433, pedigree (2,2,5,5,2)
  Literature value/estimation. Compilation from different sources
- Formaldehyde [air, urban air close to ground]: 8.75981e-6 kg; = 8.02669478279528E-06 * relation_global_country; source Jungbluth, N. 2007, p. Tab. 12.19, Tab. 12.20; lognormal variance with pedigree 0.1233, pedigree (2,2,5,5,2)
  Literature/calculation/estimation. Calculation based on VOC emissions in Tab. 12.19 (compilation of different sources) and Veldt 1991.
  C. Veldt, 'Default Emission Factors (VOC Profiles), Draft Report, Corinair Inventory Part 7, Commission of the European Community, September 1991
- Arsenic [air, urban air close to ground]: 7.8995e-8 kg; = 7.23838706169984E-08 * relation_global_country; source Jungbluth, N. 2007, p. Tab. 12.23, Tab. 12.24; lognormal variance with pedigree 1.1933, pedigree (2,2,5,5,2)
  (same comment as for Copper)
- Zinc [air, urban air close to ground]: 2.87255e-7 kg; = 2.63213980145308E-07 * relation_global_country; source Jungbluth, N. 2007; lognormal variance with pedigree 1.2433, pedigree (2,2,5,5,2)
  Calculation based on particle emission. Deviation calculated from ranges
- Phosphorus [water, surface water]: 2.06655e-7 kg; = 1.8936030125843E-07 * relation_global_country; source Jungbluth, N. 2007, p. Tab. 12.26, p. 238; lognormal variance with pedigree 0.0439, pedigree (2,2,5,5,2)
  (same comment as for Lead)
- Cadmium [air, urban air close to ground]: 3.78218e-8 kg; = 3.46564315860632E-08 * relation_global_country; source Jungbluth, N. 2007, p. Tab. 12.23, Tab. 12.24; lognormal variance with pedigree 1.2433, pedigree (2,2,5,5,2)
  (same comment as for Copper)
- Tin, ion [water, surface water]: 1.3332e-9 kg; = 1.22162689595615E-09 * relation_global_country; source Jungbluth, N. 2007, p. Tab. 12.26, p. 238; lognormal variance with pedigree 0.0439, pedigree (2,2,5,5,2)
  (same comment as for Lead)
- Hydrogen fluoride [air, urban air close to ground]: 3.40145e-7 kg; = 3.11677927046195E-07 * relation_global_country; source Jungbluth, N. 2007, p. Tab. 12.25; lognormal variance with pedigree 0.0912, pedigree (2,3,5,5,3)
  Literature data/calculation. See Tab. 12.25 for details.
- AOX, Adsorbable Organic Halogen as Cl [water, surface water]: 7.10349e-8 kg; = 6.50899387734297E-08 * relation_global_country; source Jungbluth, N. 2007, p. Tab. 12.26, p. 238; lognormal variance with pedigree 0.0439, pedigree (2,2,5,5,2)
  (same comment as for Lead)
- Water [air, unspecified]: 0.00107719 m3; name water_to_air_unspecified; = (water_softened_input/1000)*fraction_WCS_to_air+(water_decarbonised_input/1000)*fraction_WDC_to_air+water_cooling_UNO_input*fraction_CW_to_air; lognormal variance with pedigree 0.098025, pedigree (4,4,4,2,4)
  Calculated value based on literature values and expert opinion. See comments in the parametres' comment field.
  property fraction, origin: fresh water 0.0259209; name fraction_origin_fresh_water
  property fraction, origin: unspecified 0.974079; name fraction_origin_unspecified
  property fraction, origin: salt water 0; name fraction_origin_salt_water
- Iron, ion [water, surface water]: 1.40205e-6 kg; = 1.28470679989333E-06 * relation_global_country; source Jungbluth, N. 2007, p. Tab. 12.26, p. 238; lognormal variance with pedigree 0.2733, pedigree (2,2,5,5,2)
  (same comment as for Lead)
- Water [water, unspecified]: 0.0665837 m3; name water_to_water_unspecified; = (water_softened_input/1000)*(1-fraction_WCS_to_air)+(water_decarbonised_input/1000)*(1-fraction_WDC_to_air)+water_cooling_UNO_input*(1-fraction_CW_to_air); lognormal variance with pedigree 0.098025, pedigree (4,4,4,2,4)
  (same comment as for Water)
  property fraction, origin: salt water 0; name fraction_origin_salt_water_Ww
  property fraction, origin: fresh water 0.0106825; name fraction_origin_fresh_water_Ww
  property fraction, origin: unspecified 0.989318; name fraction_origin_unspecified_Ww
- Dioxins, measured as 2,3,7,8-tetrachlorodibenzo-p-dioxin [air, urban air close to ground]: 1.15426e-13 kg; = 1.05766153371863E-13 * relation_global_country; source Jungbluth, N. 2007, p. Tab. 12.22 p. 235; lognormal variance with pedigree 0.3452, pedigree (2,4,5,5,2)
  Measurement made in Great Britain (Powergen 2001) and estimation (see Tab. 12.22)
  Powergen (2001) Environment Report 2000. Powergen UK, Coventry, UK, retrieved from: www.pgen.com.
- Sulfide [water, surface water]: 5.99964e-7 kg; = 5.49752460070304E-07 * relation_global_country; source Jungbluth, N. 2007, p. Tab. 12.26, p. 238; lognormal variance with pedigree 0.3033, pedigree (2,2,5,5,2)
  (same comment as for Lead)
- Cobalt [air, urban air close to ground]: 4.18913e-7 kg; = 3.83853480105306E-07 * relation_global_country; source Jungbluth, N. 2007, p. Tab. 12.23, Tab. 12.24; lognormal variance with pedigree 1.2433, pedigree (2,2,5,5,2)
  (same comment as for Copper)
- Cadmium, ion [water, surface water]: 3.24427e-9 kg; = 2.97275399353465E-09 * relation_global_country; source Jungbluth, N. 2007, p. Tab. 12.26, p. 238; lognormal variance with pedigree 0.4533, pedigree (2,2,5,5,2)
  (same comment as for Lead)
- Cobalt [water, surface water]: 2.66652e-9 kg; = 2.44335526523885E-09 * relation_global_country; source Jungbluth, N. 2007, p. Tab. 12.26, p. 238; lognormal variance with pedigree 0.0439, pedigree (2,2,5,5,2)
  (same comment as for Lead)
- Propane [air, urban air close to ground]: 5.83984e-7 kg; = 5.35109739033632E-07 * relation_global_country; source Jungbluth, N. 2007, p. Tab. 12.19, Tab. 12.20; lognormal variance with pedigree 0.1233, pedigree (2,2,5,5,2)
  (same comment as for Formaldehyde)
- Hydrocarbons, aliphatic, alkanes, unspecified [air, urban air close to ground]: 1.16795e-5 kg; = 1.07020073585515E-05 * relation_global_country; source Jungbluth, N. 2007; lognormal variance with pedigree 0.1233, pedigree (2,2,5,5,2)
  Calculation based on VOC emission. Deviation calculated from ranges
- Vanadium [air, urban air close to ground]: 1.1693e-5 kg; = 1.07144316567474E-05 * relation_global_country; source Jungbluth, N. 2007; lognormal variance with pedigree 1.4233, pedigree (2,2,5,5,2)
  Calculation based on particle emission. Deviation calculated from ranges
- Vanadium, ion [water, surface water]: 4.06149e-7 kg; = 3.72158241611466E-07 * relation_global_country; source Jungbluth, N. 2007, p. Tab. 12.26, p. 238; lognormal variance with pedigree 0.7033, pedigree (2,2,5,5,2)
  (same comment as for Lead)
- Nickel, ion [water, surface water]: 1.98126e-7 kg; = 1.81544893999945E-07 * relation_global_country; source Jungbluth, N. 2007, p. Tab. 12.26, p. 238; lognormal variance with pedigree 0.3733, pedigree (2,2,5,5,2)
  (same comment as for Lead)
- DOC, Dissolved Organic Carbon [water, surface water]: 1.10695e-6 kg; = 1.01430469569203E-06 * relation_global_country; source Jungbluth, N. 2007; lognormal variance with pedigree 0.0439, pedigree (2,2,5,5,2)
  Calculated as equal to TOC.
- Carbon monoxide, fossil [air, urban air close to ground]: 0.000174312 kg; = 0.000174310136819599*efficiency_oil_country/0.33903; source Jungbluth, N. 2007, p. Tab. 12.13, p. 229; lognormal variance with pedigree 0.1933, pedigree (2,2,5,5,2)
  Calculated emissions when producing 1kWh of electricity by burning diesel. Weighted average based on the fuel consumption and net electricity production of nineteen oil power plants in Peru (COES, 2014) and emission factor from (EPA, 1999)
  Power plant Net electricity production (kWh) Diesel (gal)
  Mollendo 4484117 302093
  Santa Rosa 455770 40010
  C.T. RF Talara 17804729 1575408
  Chilina 5619827 425393
  GD Chiclayo Oeste 518370 40703
  Piura 857796 15758
  TG Chimbote 664693 77838
  C.T. Dolorespata 1572148 139353
  C.T.E. Cachimayo 11341880 796000
  Tumbes MAK1, MAK2 2799455 178602
  C.T.E. Tamburco 1781839 132218
  C.T.E. Urpipata 1052092 77187
  Ilo Catkato 398423 26442
  Ilo TG 7826907 692292
  Ilo TVs 21653543 1394658
  C.T. RF PLANTA ILO 5199538 477301
  Taparachi 342308 3785
  San Nicolás TVs 3100000 289149
  Bellavista 42378 32341
  Source:
  COES, 2014. Sub Dirección de Gestión de la Información. RA-SGI-0115. ESTADISTICA RELEVANTE DEL SISTEMA ELÉCTRICO INTERCONECTADO NACIONAL, (2014). Cap. 06 PRODUCCIÓN TERMOELÉCTRICA Y CONSUMO DE COMBUSTIBLE. Retrieved online from http://www.coes.org.pe/Portal/Publicaciones/Estadisticas/ 2014/PDF/06_PRODUCCION TERMOELECTRICA Y CONSUMO DE COMBUSTIBLE, CUADRO N° 6.3 CONSUMO DE COMBUSTIBLE EN LAS CENTRALES TERMOELÉCTRICAS 2014,CUADRO N° 6.2 RENDIMIENTO PROMEDIO ANUAL - 2014. accessed on November 14, 2017.
  Low heating value of diesel 43 MJ/kg
  Source: <http://www.antoniolima.web.br.com/arquivos/podercalorifico.htm> accessed on November 14, 2017.
  Density of diesel: 0.85 kg/L
  Source: <http://www.antoniolima.web.br.com/arquivos/podercalorifico.htm> accessed on November 14, 2017.
  Substance Emission factor (lb/1000 gal)
  CO 5
  Source:
  EPA, 1999. US Environmental Protection Agency (1999). AP 42 -Compilation of Air Pollutant Emission Factors, Volume 1: Stationary Point and Area Sources Compilation of Air Pollutant Emission Factors, AP-42, AP 42, Fifth Edition. Fuel Oil Combustion, Final Section - Supplement E September 1999, corrected May 2010. Background Document - September 1998. https://www3.epa.gov/ttn/chief/ap42/ch01/index.html. Retrieved online 24 august 2017.
- Arsenic, ion [water, surface water]: 1.3332e-9 kg; = 1.22162689595615E-09 * relation_global_country; source Jungbluth, N. 2007, p. Tab. 12.26, p. 238; lognormal variance with pedigree 0.0439, pedigree (2,2,5,5,2)
  (same comment as for Lead)
- Chromium VI [air, urban air close to ground]: 3.51683e-9 kg; = 3.22250125169589E-09 * relation_global_country; source Jungbluth, N. 2007, p. Tab. 12.23, Tab. 12.24; lognormal variance with pedigree 2.2526, pedigree (3,3,4,5,1)
  (same comment as for Copper)
- Methane, fossil [air, urban air close to ground]: 3.48625e-5 kg; = 0.0000348620273639198*efficiency_oil_country/0.33903; source Jungbluth, N. 2007, p. Tab. 12.19, Tab. 12.20; lognormal variance with pedigree 0.1233, pedigree (2,2,5,5,2)
  Calculated emissions when producing 1kWh of electricity by burning diesel. Weighted average based on the fuel consumption and net electricity production of nineteen oil power plants in Peru (COES, 2014) and emission factor from (EPA, 1999)
  Power plant Net electricity production (kWh) Diesel (gal)
  Mollendo 4484117 302093
  Santa Rosa 455770 40010
  C.T. RF Talara 17804729 1575408
  Chilina 5619827 425393
  GD Chiclayo Oeste 518370 40703
  Piura 857796 15758
  TG Chimbote 664693 77838
  C.T. Dolorespata 1572148 139353
  C.T.E. Cachimayo 11341880 796000
  Tumbes MAK1, MAK2 2799455 178602
  C.T.E. Tamburco 1781839 132218
  C.T.E. Urpipata 1052092 77187
  Ilo Catkato 398423 26442
  Ilo TG 7826907 692292
  Ilo TVs 21653543 1394658
  C.T. RF PLANTA ILO 5199538 477301
  Taparachi 342308 3785
  San Nicolás TVs 3100000 289149
  Bellavista 42378 32341
  Source:
  COES, 2014. Sub Dirección de Gestión de la Información. RA-SGI-0115. ESTADISTICA RELEVANTE DEL SISTEMA ELÉCTRICO INTERCONECTADO NACIONAL, (2014). Cap. 06 PRODUCCIÓN TERMOELÉCTRICA Y CONSUMO DE COMBUSTIBLE. Retrieved online from http://www.coes.org.pe/Portal/Publicaciones/Estadisticas/ 2014/PDF/06_PRODUCCION TERMOELECTRICA Y CONSUMO DE COMBUSTIBLE, CUADRO N° 6.3 CONSUMO DE COMBUSTIBLE EN LAS CENTRALES TERMOELÉCTRICAS 2014,CUADRO N° 6.2 RENDIMIENTO PROMEDIO ANUAL - 2014. accessed on November 14, 2017.
  Low heating value of diesel 43 MJ/kg
  Source: <http://www.antoniolima.web.br.com/arquivos/podercalorifico.htm> accessed on November 14, 2017.
  Density of diesel: 0.85 kg/L
  Source: <http://www.antoniolima.web.br.com/arquivos/podercalorifico.htm> accessed on November 14, 2017.
  Substance Emission factor (lb/1000 gal)
  CH4 1
  Source:
  EPA, 1999. US Environmental Protection Agency (1999). AP 42 -Compilation of Air Pollutant Emission Factors, Volume 1: Stationary Point and Area Sources Compilation of Air Pollutant Emission Factors, AP-42, AP 42, Fifth Edition. Fuel Oil Combustion, Final Section - Supplement E September 1999, corrected May 2010. Background Document - September 1998. https://www3.epa.gov/ttn/chief/ap42/ch01/index.html. Retrieved online 24 august 2017.
- TOC, Total Organic Carbon [water, surface water]: 1.14657e-5 kg; = 1.05061549900062E-05 * relation_global_country; source Jungbluth, N. 2007, p. Tab. 12.26, p. 238; lognormal variance with pedigree 0.0439, pedigree (2,2,5,5,2)
  (same comment as for Lead)
- Benzene [air, urban air close to ground]: 5.83984e-7 kg; = 5.35109739033632E-07 * relation_global_country; source Jungbluth, N. 2007; lognormal variance with pedigree 0.1233, pedigree (2,2,5,5,2)
  Calculation based on VOC emission. Deviation calculated from ranges
- Copper, ion [water, surface water]: 2.81913e-8 kg; = 2.58319599150767E-08 * relation_global_country; source Jungbluth, N. 2007, p. Tab. 12.26, p. 238; lognormal variance with pedigree 0.7533, pedigree (2,2,5,5,2)
  (same comment as for Lead)
- Oils, unspecified [water, surface water]: 6.32486e-7 kg; = 5.79552688181026E-07 * relation_global_country; source Jungbluth, N. 2007, p. Tab. 12.26, p. 238; lognormal variance with pedigree 0.0633, pedigree (2,2,5,5,2)
  (same comment as for Lead)
- Beryllium [air, urban air close to ground]: 6.30251e-10 kg; = 5.77505028146857E-10 * relation_global_country; source Jungbluth, N. 2007; lognormal variance with pedigree 0.6626, pedigree (3,3,4,5,1)
  Literature
- Fluoride [water, surface water]: 2.26658e-6 kg; = 2.07688744963416E-06 * relation_global_country; source Jungbluth, N. 2007, p. Tab. 12.26, p. 238; lognormal variance with pedigree 0.7933, pedigree (2,2,5,5,2)
  (same comment as for Lead)
- Sulfite [water, surface water]: 2.0132e-5 kg; = 1.84471359144431E-05 * relation_global_country; source Jungbluth, N. 2007, p. Tab. 12.26, p. 238; lognormal variance with pedigree 0.0633, pedigree (2,2,5,5,2)
  (same comment as for Lead)
- Dinitrogen monoxide [air, urban air close to ground]: 4.55564e-5 kg; = 4.17437183887658E-05 * relation_global_country; source Jungbluth, N. 2007, p. Tab. 12.16 p. 232; lognormal variance with pedigree 0.3833, pedigree (2,2,5,5,2)
  Literature value/estimation. Compilation from different sources - see Tab. 12.16 for details.
- COD, Chemical Oxygen Demand [water, surface water]: 2.14453e-5 kg; = 1.96505045960835E-05 * relation_global_country; source Jungbluth, N. 2007, p. Tab. 12.26, p. 238; lognormal variance with pedigree 0.5133, pedigree (2,2,5,5,2)
  (same comment as for Lead)
- Hydrocarbons, aromatic [air, urban air close to ground]: 1.16795e-7 kg; = 1.07020073585515E-07 * relation_global_country; source Jungbluth, N. 2007; lognormal variance with pedigree 0.1233, pedigree (2,2,5,5,2)
  Calculation based on VOC emission. Deviation calculated from ranges
- Chloride [water, surface water]: 0.00027278 kg; = 0.000249950716155834 * relation_global_country; source Jungbluth, N. 2007, p. Tab. 12.26, p. 238; lognormal variance with pedigree 0.9233, pedigree (2,2,5,5,2)
  (same comment as for Lead)
- Nickel [air, urban air close to ground]: 3.23106e-6 kg; = 2.96065189134384E-06 * relation_global_country; source Jungbluth, N. 2007; lognormal variance with pedigree 1.2433, pedigree (2,2,5,5,2)
  Calculation based on particle emission. Deviation calculated from ranges
- Chromium, ion [water, surface water]: 3.40119e-8 kg; = 3.11653979581671E-08 * relation_global_country; source Jungbluth, N. 2007, p. Tab. 12.26, p. 238; lognormal variance with pedigree 0.6633, pedigree (2,2,5,5,2)
  (same comment as for Lead)
- Iron [air, urban air close to ground]: 7.91035e-7 kg; = 7.24832388479523E-07 * relation_global_country; source Jungbluth, N. 2007; lognormal variance with pedigree 0.6806, pedigree (3,3,4,5,3)
  Literature
- Carbon dioxide, fossil [air, urban air close to ground]: 0.871562 kg; = 0.871550684097995*efficiency_oil_country/0.33903; source Jungbluth, N. 2007, p. Tab. 12.12, p. 229; lognormal variance with pedigree 0.0433, pedigree (2,2,5,5,1)
  Calculated emissions when producing 1kWh of electricity by burning diesel. Weighted average based on the fuel consumption and net electricity production of nineteen oil power plants in Peru (COES, 2014) and emission factor from (EPA, 1999)
  Power plant Net electricity production (kWh) Diesel (gal)
  Mollendo 4484117 302093
  Santa Rosa 455770 40010
  C.T. RF Talara 17804729 1575408
  Chilina 5619827 425393
  GD Chiclayo Oeste 518370 40703
  Piura 857796 15758
  TG Chimbote 664693 77838
  C.T. Dolorespata 1572148 139353
  C.T.E. Cachimayo 11341880 796000
  Tumbes MAK1, MAK2 2799455 178602
  C.T.E. Tamburco 1781839 132218
  C.T.E. Urpipata 1052092 77187
  Ilo Catkato 398423 26442
  Ilo TG 7826907 692292
  Ilo TVs 21653543 1394658
  C.T. RF PLANTA ILO 5199538 477301
  Taparachi 342308 3785
  San Nicolás TVs 3100000 289149
  Bellavista 42378 32341
  Source:
  COES, 2014. Sub Dirección de Gestión de la Información. RA-SGI-0115. ESTADISTICA RELEVANTE DEL SISTEMA ELÉCTRICO INTERCONECTADO NACIONAL, (2014). Cap. 06 PRODUCCIÓN TERMOELÉCTRICA Y CONSUMO DE COMBUSTIBLE. Retrieved online from http://www.coes.org.pe/Portal/Publicaciones/Estadisticas/ 2014/PDF/06_PRODUCCION TERMOELECTRICA Y CONSUMO DE COMBUSTIBLE, CUADRO N° 6.3 CONSUMO DE COMBUSTIBLE EN LAS CENTRALES TERMOELÉCTRICAS 2014,CUADRO N° 6.2 RENDIMIENTO PROMEDIO ANUAL - 2014. accessed on November 14, 2017.
  Low heating value of diesel 43 MJ/kg
  Source: <http://www.antoniolima.web.br.com/arquivos/podercalorifico.htm> accessed on November 14, 2017.
  Density of diesel: 0.85 kg/L
  Source: <http://www.antoniolima.web.br.com/arquivos/podercalorifico.htm> accessed on November 14, 2017.
  Substance Emission factor (lb/1000 gal)
  CO2 25000
  Source:
  EPA, 1999. US Environmental Protection Agency (1999). AP 42 -Compilation of Air Pollutant Emission Factors, Volume 1: Stationary Point and Area Sources Compilation of Air Pollutant Emission Factors, AP-42, AP 42, Fifth Edition. Fuel Oil Combustion, Final Section - Supplement E September 1999, corrected May 2010. Background Document - September 1998. https://www3.epa.gov/ttn/chief/ap42/ch01/index.html. Retrieved online 24 august 2017.
- Calcium [air, urban air close to ground]: 3.39015e-7 kg; = 3.1064245220551E-07 * relation_global_country; source Jungbluth, N. 2007, p. Tab. 12.25; lognormal variance with pedigree 0.0606, pedigree (3,3,4,5,3)
  Literature data/calculation. See Tab. 12.25 for details.
- Methanol [air, urban air close to ground]: 5.83984e-6 kg; = 5.35109739033632E-06 * relation_global_country; source Jungbluth, N. 2007; lognormal variance with pedigree 0.1233, pedigree (2,2,5,5,2)
  Calculation based on VOC emission. Deviation calculated from ranges
- Benzo(a)pyrene [air, urban air close to ground]: 1.69507e-10 kg; = 1.55321226102755E-10 * relation_global_country; source Jungbluth, N. 2007; lognormal variance with pedigree 0.3726, pedigree (3,3,5,5,3)
  Literature
- BOD5, Biological Oxygen Demand [water, surface water]: 1.96071e-5 kg; = 1.79661764796503E-05 * relation_global_country; source Jungbluth, N. 2007, p. Tab. 12.26, p. 238; lognormal variance with pedigree 0.3233, pedigree (2,2,5,5,2)
  (same comment as for Lead)
- Manganese [air, urban air close to ground]: 1.31658e-7 kg; = 1.20639782314836E-07 * relation_global_country; source Jungbluth, N. 2007, p. Tab. 12.23, Tab. 12.24; lognormal variance with pedigree 1.2433, pedigree (2,2,5,5,2)
  (same comment as for Copper)
- Thallium [water, surface water]: 4.13311e-8 kg; = 3.78720561033709E-08 * relation_global_country; source Jungbluth, N. 2007, p. Tab. 12.26, p. 238; lognormal variance with pedigree 0.0439, pedigree (2,2,5,5,2)
  (same comment as for Lead)
- Manganese [water, surface water]: 3.99972e-8 kg; = 3.66498257602651E-08 * relation_global_country; source Jungbluth, N. 2007, p. Tab. 12.26, p. 238; lognormal variance with pedigree 0.0439, pedigree (2,2,5,5,2)
  (same comment as for Lead)
- Sulfate [water, surface water]: 0.00222986 kg; = 0.0020432380627013 * relation_global_country; source Jungbluth, N. 2007, p. Tab. 12.26, p. 238; lognormal variance with pedigree 0.0533, pedigree (2,2,5,5,2)
  (same comment as for Lead)
- Suspended solids, unspecified [water, surface water]: 2.45957e-5 kg; = 2.25373034350681E-05 * relation_global_country; source Jungbluth, N. 2007, p. Tab. 12.26, p. 238; lognormal variance with pedigree 0.0833, pedigree (2,2,5,5,2)
  (same comment as for Lead)
- Sodium [air, urban air close to ground]: 3.39015e-6 kg; = 3.1064245220551E-06 * relation_global_country; source Jungbluth, N. 2007, p. Tab. 12.25; lognormal variance with pedigree 0.0706, pedigree (3,3,4,5,3)
  Literature data/calculation. See Tab. 12.25 for details.
- Selenium [air, urban air close to ground]: 5.98448e-8 kg; = 5.48363096904992E-08 * relation_global_country; source Jungbluth, N. 2007; lognormal variance with pedigree 1.2433, pedigree (2,2,5,5,2)
  Calculation based on particle emission. Deviation calculated from ranges

## Sampling procedure
Literature, environmental reports and statistical data for nineteen power plants.

## Extrapolations
This dataset has been extrapolated from year 2017 to the year of the calculation (2021). The uncertainty has been adjusted accordingly.

## Review by Christopher Oberschelp 2018-01-16
Documentation, key values and data format seem reasonable. Individual deviations may be spotted by comparison with reference datasets. Uncertainties might have to be adjusted later (as agreed upon with ecoinvent).
