# petroleum and gas production, on-shore

Dataset: EcoSpold 2, unit process
Geography: NG
Time period: 1999-01-01 to 2021-12-31
Technology level: current
Classification: ISIC rev.4 ecoinvent: 0610:Extraction of crude petroleum
Classification: EcoSpold01Categories: oil/production
Tags: Combined Production; combined production
Scenario: Business-as-Usual
System model: Allocation, cut-off by classification
Share of production covered: 57 %
Generated by: Niels Jungbluth
Published in: Jungbluth, N. 2007
Database: ecoinvent
isCopyrightProtected: true
accessRestrictedTo: 1

## General comment
The multioutput-process "combined gas and oil production" delivers the co-products crude oil and natural gas. Allocation for co-products is based on heating value.

## Included activities end
Production of oil and gas including energy use, infrastructure and emissions.

## Geography
Data are valid for two companies in NG.

## Technology
Mainly onshore production in the Niger delta and a small part of offshore production.

## Time period
Most data could be found for 1999-2000.

## Reference product
- petroleum: 1 kg; CPC 12010: Petroleum oils and oils obtained from bituminous minerals, crude; By-product classification allocatable product; CAS 8002-05-9
  production volume 1.19939e10 kg; name petroleum_PV
    kg of petroleum produced in NG in 2012, amounts to 857265316 barrels according to DEPARTMENT OF PETROLEUM RESOURCES (DPR)(2012 ANNUAL STATISTICAL BULLETIN online: https://dpr.gov.ng/index/wp-content/uploads/2014/10/2012-INDUSTRY-STATISTICAL-BULLETIN.pdf, retrieved 31 August 2017)Almost all petroleum and natural gas extracted in NG comes from around the delta of the Niger River.
  property carbon content, fossil 0.85
    C-content of crude oil is 83-87% (ecoinven report 6_IV, Tab 3.2). An average C-content of 0.85 kg C/kg crude oil was considered
  property price 0.192 EUR2005
    Temporary price data. Calculated as 90% of purchasers price based on: Crude oil prices from U.S. energy information administration_Independent statistics and analysis: Weekly All Countries Spot Price FOB Weighted by Estimated Export Volume (Dollars per Barrel) (http://tonto.eia.doe.gov/dnav/pet/pet_pri_wco_k_w.htm; accessed 06072010). Conversion factors - 0.159 m3/barrel with crude oil density of 853 kg/m3
  property amount in multioutput activity_kg 1.07e11 kg; name petroleum_amount_MO_kg
  property carbon content 0.85
    carbon content on a dry matter basis (reserved; not for manual entry)
  properties: water in wet mass 0 kg, wet mass 1 kg, dry mass 1 kg, water content 0, heating value, net 43.2 MJ, carbon content, non-fossil 0, carbon allocation 0.85 kg
- natural gas, high pressure: 0 m3; name natural_gas; CPC 12020: Natural gas, liquefied or in the gaseous state; By-product classification allocatable product; CAS 14493-06-2
  production volume 0 m3; name natural_gas_PV
    m3 of natural gas produced on-shore in co-production with petroleum in NG in 2012 (BP, 2014). Value converted from BP LHV (1 cubic meter natural gas in (BP, 2014) corresponds to 0.9 kg oil equivalent. 1 kg oil equivalent corresponds to 42 MJ) to ecoinvent standard LHV of 39MJ/m3. (The source does not specify if the cubic meters are standard or norm cubic meters. See 2015, Faist Emmenegger, Mireille, Del Duce, Andrea; Zah, Rainer, Update and extension of the inventory data for energy gases, 3 - SeparatePublication.) It is further estimated that all natural gas is producedin activities where both natural gas and petroleum are produced and that all combined oil and gas production is on-shore (almost all in the delta of the Niger River). Refrence(s): BP (2014). Statistical Review of World Energy, June 2014. Retrieved online from http://www.bp.com/content/dam/bp/excel/energy-economics/statistical-review-2015/bp-statistical-review-of-world-energy-2015-workbook.xlsx, 30 August, 2017
  property carbon content, fossil 0.602381
    An average C content of 0.506 kg C/ m3 has been assumed (this average has been calculated using data in Tab 3.5, ecoinvent v2.2 report 6_V
  property price 0.166 EUR2005; name natural_gas_price_EUR2005
    Temporary price data. Calculated as 90% of purchasers price based on: 2005 price for Europe-27 Import (US$ and kg) in UN Commodity Trade Statistics Database - Natural gas in gaseous state (http://data.un.org/Data.aspx?q=natural+gas&d=ComTrade&f=_l1Code%3a28%3bcmdCode%3a271121; accessed 4 January 2011), using density of natural gas of 0.8 kg/m3 for unit conversion.
  property heating value, net 39 MJ
    Literature value, Source: United Nations Statistics Division (2018) International Recommendations for Energy Statistics (IRES). Available at: http://unstats.un.org/unsd/statcom/doc11/BG-IRES.pdf.
  property amount in multioutput activity_m3 1.35e10 m3; name natural_gas_amount_MO_m3
  property carbon content 0.602381
    carbon content on a dry matter basis (reserved; not for manual entry)
  properties: heating value, gross 0 MJ, dry mass 0.84 kg, carbon content, non-fossil 0, wet mass 0.84 kg, water in wet mass 0 kg, water content 0, carbon allocation 0.506 kg

## Inputs from technosphere
- municipal solid waste: -0.000362515 kg; name MSW; = (MSW_amount_MO_kg*(0.5* petroleum +0.5*natural_gas *0.84)/(0.5* 107000000000 +0.5*13500000000 *0.84))*-1; lognormal variance with pedigree 0.0401, pedigree (1,2,5,1,1)
  Environmental report
  Uncertainty: E
  production volume 1.71237e7 kg; = MSW_amount_MO_kg*(0.5* petroleum_PV +0.5*natural_gas_PV *0.84)/(0.5* 107000000000 +0.5*13500000000 *0.84)
    Calculated from the production volume of reference porducts
  property amount in multioutput activity_kg 4.29e7 kg; name MSW_amount_MO_kg
  properties: dry mass 0.771 kg, carbon content, fossil 0.171549, carbon content, non-fossil 0.261655, heating value, net 11.74 MJ, water content 0.297017, wet mass 1 kg
  note on carbon content, fossil: MSW composition in tab 4.1, ecoinvent v2.2 report 13_I. C content referred to 1 kg DM
  note on heating value, net: Value taken from the general comment of the treatment dataset.
- water discharge from petroleum/natural gas extraction, onshore: -0.424299 kg; name water_discharge; = (water_discharge_amount_MO_kg*(1* petroleum +0*natural_gas *0.84)/(1* 107000000000 +0*13500000000 *0.84))*-1; lognormal variance with pedigree 0.0401, pedigree (1,2,5,1,1)
  Environmental report
  Uncertainty: E
  production volume 5.08899e9 kg; = water_discharge_amount_MO_kg*(1* petroleum_PV +0*natural_gas_PV *0.84)/(1* 107000000000 +0*13500000000 *0.84)
    Calculated from the production volume of reference products
  property price 0 EUR2005; name water_discharge_price_EUR2005
  property amount in multioutput activity_kg 4.54e10 kg; name water_discharge_amount_MO_kg
  properties: carbon content, fossil 0.00168491, water content 10.784, carbon content, non-fossil 0.00101223, dry mass 0.0848608 kg, wet mass 1 kg
- onshore petroleum field infrastructure: 1.24218e-10 unit; name onshore_petr_field; = onshore_petr_field_amount_MO_unit*(0.5* petroleum +0.5*natural_gas *0.84)/(0.5* 107000000000 +0.5*13500000000 *0.84); lognormal variance with pedigree 0.3406, pedigree (1,3,5,1,1)
  Questionnaire
  Uncertainty: Q
  property amount in multioutput activity_unit 14.7 unit; name onshore_petr_field_amount_MO_unit
- offshore platform, petroleum: 4.14906e-11 unit; name offshore_plattform; = offshore_plattform_amount_MO_unit*(0.5* petroleum +0.5*natural_gas *0.84)/(0.5* 107000000000 +0.5*13500000000 *0.84); lognormal variance with pedigree 0.3406, pedigree (1,3,5,1,1)
  Questionnaire
  Uncertainty: Q
  property amount in multioutput activity_unit 4.91 unit; name offshore_plattform_amount_MO_unit
- pipeline, petroleum: 6.94609e-9 km; name pipeline; = pipeline_amount_MO_km*(0.5* petroleum +0.5*natural_gas *0.84)/(0.5* 107000000000 +0.5*13500000000 *0.84); lognormal variance with pedigree 0.3401, pedigree (1,2,5,1,1)
  Environmental report
  Uncertainty: E
  property amount in multioutput activity_km 822 km; name pipeline_amount_MO_km
- onshore well, oil/gas: 4.07301e-6 m; name onshore_well; = onshore_well_amount_MO_m*(0.5* petroleum +0.5*natural_gas *0.84)/(0.5* 107000000000 +0.5*13500000000 *0.84); lognormal variance with pedigree 0.3401, pedigree (1,2,5,1,1)
  Environmental report
  Uncertainty: E
  property amount in multioutput activity_m 482000 m; name onshore_well_amount_MO_m
- chemical, inorganic: 1.19993e-6 kg; name chem_inorg; = chem_inorg_amount_MO_kg*(0.5* petroleum +0.5*natural_gas *0.84)/(0.5* 107000000000 +0.5*13500000000 *0.84); lognormal variance with pedigree 0.34, pedigree (1,1,5,1,1)
  Generic value
  property amount in multioutput activity_kg 142000 kg; name chem_inorg_amount_MO_kg
  properties: dry mass 1 kg, carbon content, fossil 0.003, wet mass 1 kg
  note on carbon content, fossil: This dataset is an unweighted average of 20 inorganic substances (listed in Tab 88.1, ecoinvent v2.2 report 8, part II), being part of the top100 chemicals included in this database. The C-content has also been calculated as an unweighted average of the C content of the substances composing this dataset.
- low level radioactive waste: -1.99425e-9 m3; name low_level_waste; = (low_level_waste_amount_MO_m3*(0.5* petroleum +0.5*natural_gas *0.84)/(0.5* 107000000000 +0.5*13500000000 *0.84))*-1; lognormal variance with pedigree 0.3621, pedigree (3,4,5,3,3)
  Generic value, basic uncertainty estimated = 3
  Uncertainty: G
  production volume 94.2002 m3; = low_level_waste_amount_MO_m3*(0.5* petroleum_PV +0.5*natural_gas_PV *0.84)/(0.5* 107000000000 +0.5*13500000000 *0.84)
    Calculated from the production volume of reference products
  property amount in multioutput activity_m3 236 m3; name low_level_waste_amount_MO_m3
  property price 0 EUR2005; name low_level_waste_price_EUR2005
  properties: dry mass 2500 kg, wet mass 2500 kg
- sweet gas, burned in gas turbine: 1.36049 MJ; name sweet_gas_burned; = sweet_gas_burned_amount_MO_MJ*(0.5* petroleum +0.5*natural_gas *0.84)/(0.5* 107000000000 +0.5*13500000000 *0.84); lognormal variance with pedigree 0.1101, pedigree (5,2,5,1,1)
  Environmental report + questionnaire
  Uncertainty: E
  property amount in multioutput activity_MJ 1.61e11 MJ; name sweet_gas_burned_amount_MO_MJ
  properties: heating value, net 1 MJ, carbon content, fossil 0.589286, wet mass 0.0247059 kg, dry mass 0.0247059 kg
- chemical, organic: 8.95724e-7 kg; name chem_org; = chem_org_amount_MO_kg*(0.5* petroleum +0.5*natural_gas *0.84)/(0.5* 107000000000 +0.5*13500000000 *0.84); lognormal variance with pedigree 0.34, pedigree (1,1,5,1,1)
  Generic value
  property amount in multioutput activity_kg 106000 kg; name chem_org_amount_MO_kg
  properties: dry mass 1 kg, carbon content, fossil 0.628, wet mass 1 kg, heating value, net 19.03 MJ
  note on carbon content, fossil: This dataset is an unweighted average of 20 organic substances (listed in Tab 88.1, ecoinvent v2.2 report 8, part II), being part of the top100 chemicals included in this database. The C-content has also been calculated as an unweighted average of the C content of the substances composing this dataset.
- waste natural gas, sweet: -4.63073 MJ; name waste_NG_sweet; = (waste_NG_sweet_amount_MO_MJ*(0.5* petroleum +0.5*natural_gas *0.84)/(0.5* 107000000000 +0.5*13500000000 *0.84))*-1; lognormal variance with pedigree 0.1101, pedigree (5,2,5,1,1)
  Environmental report + questionnaire
  Uncertainty: E
  production volume 2.18736e11 MJ; = waste_NG_sweet_amount_MO_MJ*(0.5* petroleum_PV +0.5*natural_gas_PV *0.84)/(0.5* 107000000000 +0.5*13500000000 *0.84)
    Calculated from the production volume of reference products
  property amount in multioutput activity_MJ 5.48e11 MJ; name waste_NG_sweet_amount_MO_MJ
  property price 0 EUR2005; name waste_NG_sweet_price_EUR2005
  properties: wet mass 0.0247059 kg, carbon content, fossil 0.589286, dry mass 0.0247059 kg
- natural gas, vented: 0.0219706 m3; name nat_gas_vented; = nat_gas_vented_amount_MO_m3*(0.5* petroleum +0.5*natural_gas *0.84)/(0.5* 107000000000 +0.5*13500000000 *0.84); lognormal variance with pedigree 0.4106, pedigree (5,3,5,1,1)
  Environmental report + questionnaire, basic uncertainity estimated = 3
  Uncertainty: E
  property amount in multioutput activity_m3 2.6e9 m3; name nat_gas_vented_amount_MO_m3
  properties: carbon content, fossil 0.602381, wet mass 0.84 kg, dry mass 0.84 kg, heating value, net 39 MJ
  note on carbon content, fossil: An average C content of 0.506 kg C/ m3 has been assumed (this average has been calculated using data in Tab 3.5, ecoinvent v2.2 report 6_V
  note on heating value, net: Literature value, Source: United Nations Statistics Division (2018) International Recommendations for Energy Statistics (IRES). Available at: http://unstats.un.org/unsd/statcom/doc11/BG-IRES.pdf.

## Inputs from nature
- Oil, crude, in ground [natural resource, in ground]: 1 kg; name oil_ground; = oil_ground_amount_MO_kg*(1* petroleum +0*natural_gas *0.84)/(1* 107000000000 +0*13500000000 *0.84); lognormal variance with pedigree 0.04, pedigree (1,1,5,1,1)
  Statistic
  Uncertainty: S
  property amount in multioutput activity_kg 1.07e11 kg; name oil_ground_amount_MO_kg
- Gas, natural, in ground [natural resource, in ground]: 0 m3; name gas_ground; = gas_ground_amount_MO_m3*(0* petroleum +1*natural_gas *0.84)/(0* 107000000000 +1*13500000000 *0.84); pedigree (1,1,1,1,1)
  Production
  Uncertainty: P
  property amount in multioutput activity_m3 1.35e10 m3; name gas_ground_amount_MO_m3

## Emissions to nature
- Methane, bromotrifluoro-, Halon 1301 [air, non-urban air or from high stacks]: 5.81376e-8 kg; name halon; = halon_amount_MO_kg*(0.5* petroleum +0.5*natural_gas *0.84)/(0.5* 107000000000 +0.5*13500000000 *0.84); lognormal variance with pedigree 0.6901, pedigree (1,2,5,1,1)
  Environmental report
  Uncertainty: E
  property amount in multioutput activity_kg 6880 kg; name halon_amount_MO_kg
- COD, Chemical Oxygen Demand [water, surface water]: 0.000201115 kg; name COD; = COD_amount_MO_kg*(0.5* petroleum +0.5*natural_gas *0.84)/(0.5* 107000000000 +0.5*13500000000 *0.84); lognormal variance with pedigree 0.0901, pedigree (3,5,5,3,1)
  Extrapolation for sum parameter
  Uncertainty: E
  property amount in multioutput activity_kg 2.38e7 kg; name COD_amount_MO_kg
- Sulfur [water, surface water]: 1.7154e-7 kg; name S2; = S2_amount_MO_kg*(0.5* petroleum +0.5*natural_gas *0.84)/(0.5* 107000000000 +0.5*13500000000 *0.84); lognormal variance with pedigree 0.0901, pedigree (3,5,5,3,1)
  Extrapolation for sum parameter
  Uncertainty: E
  property amount in multioutput activity_kg 20300 kg; name S2_amount_MO_kg
- Nitrogen [water, surface water]: 4.93493e-8 kg; name N2; = N2_amount_MO_kg*(0.5* petroleum +0.5*natural_gas *0.84)/(0.5* 107000000000 +0.5*13500000000 *0.84); lognormal variance with pedigree 0.0901, pedigree (3,5,5,3,1)
  Extrapolation for sum parameter
  Uncertainty: E
  property amount in multioutput activity_kg 5840 kg; name N2_amount_MO_kg
- TOC, Total Organic Carbon [water, surface water]: 5.52645e-5 kg; name TOC; = TOC_amount_MO_kg*(0.5* petroleum +0.5*natural_gas *0.84)/(0.5* 107000000000 +0.5*13500000000 *0.84); lognormal variance with pedigree 0.0901, pedigree (3,5,5,3,1)
  Extrapolation for sum parameter
  Uncertainty: E
  property amount in multioutput activity_kg 6.54e6 kg; name TOC_amount_MO_kg
- BOD5, Biological Oxygen Demand [water, surface water]: 0.000201115 kg; name BOD; = BOD_amount_MO_kg*(0.5* petroleum +0.5*natural_gas *0.84)/(0.5* 107000000000 +0.5*13500000000 *0.84); lognormal variance with pedigree 0.0901, pedigree (3,5,5,3,1)
  Extrapolation for sum parameter
  Uncertainty: E
  property amount in multioutput activity_kg 2.38e7 kg; name BOD_amount_MO_kg
- DOC, Dissolved Organic Carbon [water, surface water]: 5.52645e-5 kg; name DOC; = DOC_amount_MO_kg*(0.5* petroleum +0.5*natural_gas *0.84)/(0.5* 107000000000 +0.5*13500000000 *0.84); lognormal variance with pedigree 0.0901, pedigree (3,5,5,3,1)
  Extrapolation for sum parameter
  Uncertainty: E
  property amount in multioutput activity_kg 6.54e6 kg; name DOC_amount_MO_kg
- Oils, unspecified [water, surface water]: 6.38837e-5 kg; name oils; = oils_amount_MO_kg*(0.5* petroleum +0.5*natural_gas *0.84)/(0.5* 107000000000 +0.5*13500000000 *0.84); lognormal variance with pedigree 0.3401, pedigree (1,2,5,1,1)
  Environmental report
  Uncertainty: E
  property amount in multioutput activity_kg 7.56e6 kg; name oils_amount_MO_kg
- AOX, Adsorbable Organic Halogen as Cl [water, surface water]: 6.58273e-10 kg; name AOX; = AOX_amount_MO_kg*(0.5* petroleum +0.5*natural_gas *0.84)/(0.5* 107000000000 +0.5*13500000000 *0.84); lognormal variance with pedigree 0.0901, pedigree (3,5,5,3,1)
  Extrapolation for sum parameter
  Uncertainty: E
  property amount in multioutput activity_kg 77.9 kg; name AOX_amount_MO_kg

## Sampling procedure
Environmental report and questionnaire.

## Extrapolations
Emission data are calculated with generic assumptions. Generic assumptions also applied for chemical uses and some other exchanges.

## Review by Emilia Moreno Ruiz 2017-09-06
PV adjusted

## Review by Michael Spielmann (obsolete) 2003-08-14
Passed.
