# treatment of wastewater from liquid crystal display production, capacity 1.1E10l/year

Dataset: EcoSpold 2, unit process
Geography: CH
Time period: 1994-01-01 to 2021-12-31
Technology level: current
Classification: EcoSpold01Categories: waste management/wastewater treatment
Classification: ISIC rev.4 ecoinvent: 3700:Sewerage
Tags: Treatment; ConvertedDataset
Scenario: Business-as-Usual
System model: Allocation, cut-off by classification
Generated by: Roland Hischier
Published in: Hischier R. 2007
Database: ecoinvent
isCopyrightProtected: true
accessRestrictedTo: 1

## General comment
Wastewater purified in a moderatly large municipal wastewater treatment plant (capacity class 2), with an average capacity size of 71100 per-captia-equivalents PCE.
Wastewater contains (in kg/m3): COD: 2.6 (GSD=122.5%); BOD: 3.37 (GSD=122.5%); Ntot.: 0.773 (GSD=122.5%); F: 0.016 (GSD=224.1%);
[This dataset was already contained in the ecoinvent database version 2. It was not individually updated during the transfer to ecoinvent version 3. Life Cycle Impact Assessment results may still have changed, as they are affected by changes in the supply chain, i.e. in other datasets. This dataset was generated following the ecoinvent quality guidelines for version 2. It may have been subject to central changes described in the ecoinvent version 3 change report (http://www.ecoinvent.org/database/ecoinvent-version-3/reports-of-changes/), and the results of the central updates were reviewed extensively. The changes added e.g. consistent water flows and other information throughout the database. The documentation of this dataset can be found in the ecoinvent reports of version 2, which are still available via the ecoinvent website. The change report linked above covers all central changes that were made during the conversion process.]

## Included activities end
Infrastructure materials for municipal wastewater treatment plant, transports, dismantling. Land use burdens.

## Geography
Specific to the technology mix encountered in Switzerland in 2000. Well applicable to modern treatment practices in Europe, North America or Japan.

## Technology
Three stage wastewater treatment (mechanical, biological, chemical) including sludge digestion (fermentation) according to the average technology in Switzerland

## Parameters
- fraction, process water, to air: 0.1 dimensionless; name fraction_PW_to_air; lognormal variance with pedigree 0.092025, pedigree (4,4,3,2,4)
  Literature value (Statistics Canada, 2007 & Shaffer, K.H., 2008, Consumptive water use in the Great Lakes Basin, USGS) (Vionnet, S., Quantis Water Database - Technical Report, 2012).

## Reference product
- wastewater from liquid crystal display production: -1 m3; name RP_amount_1; CPC 39920: Sewage sludge; By-product classification Waste
  production volume 0.0336675 m3; name RP_PV_1
    This is a placeholder value that does not reflect real-world production volumes. This dataset does not currently require a real-world production volume to work in the database framework, and no actual data were collected yet. This has no negative effect on the results of the ecoinvent database. The placeholder value of this activity was scaled according to the nominal GDP of 2005 (source: United Nations, http://data.un.org/Glossary.aspx?q=GDP+%28current+US%24%29, accessed 20130726) to reflect an appropriate share of the global production volume, which is also a placeholder value.
  property price 0 EUR2005; name RP_amount_1_price_EUR2005
    Waste products are assigned a price of zero as they are assumed to require further treatment.
  property carbon content, fossil 0.734985
    BOD is 3.37e-3 kg/kg (Tab 12.12, ecoinvent v2.2 report 18_III). BOD was converted to TOC, using conversion factors in Tab 4.10 (ecoinvent v2.2 report 13_IV). TOC was considered as Total Carbon.
  property carbon content 0.734985
    carbon content on a dry matter basis (reserved; not for manual entry)
  properties: dry mass 2.97736 kg, wet mass 1000 kg, water in wet mass 997.023 kg, water content 334.868, carbon content, non-fossil 0, carbon allocation 2.18831 kg

## Inputs from technosphere
- heat, district or industrial, other than natural gas: 1.5122 MJ; lognormal variance with pedigree 0.04, pedigree (1,1,5,1,1)
  burden from sludge incineration. Uncertainty calculated from wastewater composition and treatment model
  properties: heating value, net 1 MJ
- electricity, low voltage: 4.0522 kWh; lognormal variance with pedigree 0.07, pedigree (1,1,5,1,1)
  direct wastewater treatment plant burden. Uncertainty calculated from wastewater composition and treatment model
- quicklime, milled, packed: 1.7877e-5 kg; lognormal variance with pedigree 0.11, pedigree (1,1,5,1,1)
  (same comment as for heat, district or industrial, other than natural gas)
  properties: dry mass 0.99 kg, water content 0.010101, wet mass 1 kg
- chromium oxide, flakes: 1.1592e-6 kg; lognormal variance with pedigree 0.54, pedigree (1,1,5,1,1)
  (same comment as for heat, district or industrial, other than natural gas)
  properties: wet mass 1 kg, dry mass 1 kg
- slag landfill: 7.8367e-12 unit; lognormal variance with pedigree 0.07, pedigree (1,1,5,1,1)
  (same comment as for heat, district or industrial, other than natural gas)
- sodium hydroxide, without water, in 50% solution state: 9.8603e-5 kg; lognormal variance with pedigree 0.1, pedigree (1,1,5,1,1)
  (same comment as for heat, district or industrial, other than natural gas)
  properties: heating value, net 3.03 MJ, dry mass 1 kg, wet mass 1 kg
- titanium dioxide: 5.6801e-5 kg; lognormal variance with pedigree 0.54, pedigree (1,1,5,1,1)
  (same comment as for heat, district or industrial, other than natural gas)
  properties: dry mass 1 kg, wet mass 1 kg
- chemical, inorganic: 1.48e-7 kg; lognormal variance with pedigree 0.09, pedigree (1,1,5,1,1)
  (same comment as for heat, district or industrial, other than natural gas)
  properties: wet mass 1 kg, carbon content, fossil 0.003, dry mass 1 kg
  note on carbon content, fossil: This dataset is an unweighted average of 20 inorganic substances (listed in Tab 88.1, ecoinvent v2.2 report 8, part II), being part of the top100 chemicals included in this database. The C-content has also been calculated as an unweighted average of the C content of the substances composing this dataset.
- process-specific burdens, residual material landfill: 0.0012383 kg; lognormal variance with pedigree 0.07, pedigree (1,1,5,1,1)
  burden from sludge incineration. Uncertainty calculated from wastewater composition and treatment model;activityLink introduced to establish a direct link to the corresponding regional supply of this product
- ammonia, anhydrous, liquid: 0.0019843 kg; lognormal variance with pedigree 0.22, pedigree (1,1,5,1,1)
  (same comment as for heat, district or industrial, other than natural gas)
  properties: wet mass 1 kg, dry mass 1 kg
- hydrochloric acid, without water, in 30% solution state: 8.8797e-8 kg; lognormal variance with pedigree 0.09, pedigree (1,1,5,1,1)
  (same comment as for heat, district or industrial, other than natural gas)
  properties: dry mass 1 kg, wet mass 1 kg, heating value, net 3.32 MJ
- wastewater treatment facility, capacity 1.1E10l/year: 1.9883e-9 unit; lognormal variance with pedigree 0.04, pedigree (1,1,5,1,1)
  uncertainty heeded in exchanges of the module
  This exchange has an activity link directly to the producing activity because the product is primarily consumed in the same geographical area where it is produced.
- sewer grid, 1.1E10l/year, 242 km: 1.6832e-7 km; lognormal variance with pedigree 0.04, pedigree (1,1,5,1,1)
  (same comment as for wastewater treatment facility, capacity 1.1E10l/year)
- heat, district or industrial, natural gas: 0.174168 MJ; lognormal variance with pedigree 0.22, pedigree (1,1,5,1,1)
  (same comment as for heat, district or industrial, other than natural gas)
  properties: heating value, net 1 MJ
- municipal waste incineration facility: 4.5077e-10 unit; lognormal variance with pedigree 0.04, pedigree (1,1,5,1,1)
  (same comment as for heat, district or industrial, other than natural gas)
- residual material landfill: 2.5799e-12 unit; lognormal variance with pedigree 0.07, pedigree (1,1,5,1,1)
  (same comment as for heat, district or industrial, other than natural gas)
- waste cement, hydrated: -0.0012383 kg; name BP_amount_1; lognormal variance with pedigree 0.08, pedigree (1,1,5,1,1)
  (same comment as for heat, district or industrial, other than natural gas)
  production volume 4.16905e-5 kg; = BP_amount_1* RP_PV_1/ABS( RP_amount_1)
    Calculated from the production volume of wastewater from liquid crystal display production in proportion to the respective output amounts.
  property price 0 EUR2005; name BP_amount_1_price_EUR2005
  properties: wet mass 1 kg, dry mass 1 kg
- cement, unspecified: 0.00049534 kg; lognormal variance with pedigree 0.08, pedigree (1,1,5,1,1)
  (same comment as for heat, district or industrial, other than natural gas)
  properties: dry mass 1 kg, wet mass 1 kg
- electricity, high voltage: 0.25923 kWh; lognormal variance with pedigree 0.49, pedigree (1,1,5,1,1)
  (same comment as for heat, district or industrial, other than natural gas)
- waste plastic, mixture: -0.0155 kg; name BP_amount_2; lognormal variance with pedigree 0.04, pedigree (1,1,5,1,1)
  (same comment as for electricity, low voltage)
  production volume 0.000521847 kg; = BP_amount_2* RP_PV_1/ABS( RP_amount_1)
    (same comment as for waste cement, hydrated)
  property price 0 EUR2005; name BP_amount_2_price_EUR2005
  properties: water content 0.180638, carbon content, fossil 0.747344, dry mass 0.847 kg, heating value, net 30.79 MJ, wet mass 1 kg
  note on carbon content, fossil: C content in 1 kg DM was calculated using data in Tab A.2, ecoinvent v2.2 report 13_I
  note on heating value, net: Value taken from the general comment of the treatment dataset.
- liquid manure spreading, by vacuum tanker: 0.005854 m3; lognormal variance with pedigree 0.04, pedigree (1,1,5,1,1)
  burden from sludge spreading. Uncertainty calculated from wastewater composition and treatment model
  This exchange has an activity link directly to the producing activity because the product is primarily consumed in the same geographical area where it is produced.
- process-specific burdens, slag landfill: 0.0044082 kg; lognormal variance with pedigree 0.07, pedigree (1,1,5,1,1)
  (same comment as for process-specific burdens, residual material landfill)
- process-specific burdens, municipal waste incineration: 1.8031 kg; lognormal variance with pedigree 0.04, pedigree (1,1,5,1,1)
  (same comment as for process-specific burdens, residual material landfill)
- waste graphical paper: -0.0155 kg; name BP_amount_3; lognormal variance with pedigree 0.04, pedigree (1,1,5,1,1)
  (same comment as for electricity, low voltage)
  production volume 0.000521847 kg; = BP_amount_3* RP_PV_1/ABS( RP_amount_1)
    (same comment as for waste cement, hydrated)
  property price 0 EUR2005; name BP_amount_3_price_EUR2005
  properties: carbon content, non-fossil 0.454955, dry mass 0.888 kg, water content 0.126126, wet mass 1 kg, heating value, net 14.12 MJ

## Emissions to nature
- Methane, fossil [air, urban air close to ground]: 0.016997 kg; lognormal variance with pedigree 0.14, pedigree (1,1,5,1,1)
  emission from sludge incineration. Uncertainty calculated from wastewater composition and treatment model
- Nitrogen oxides [air, urban air close to ground]: 0.019275 kg; lognormal variance with pedigree 0.08, pedigree (1,1,5,1,1)
  direct digester gas emission plus emission from sludge incineration. Uncertainty calculated from wastewater composition and treatment model
- Water [water, unspecified]: 0.9 m3; name water_to_water_unspecified; lognormal variance with pedigree 0.0807, pedigree (2,2,5,1,1)
  Calculated value based on water balance.
  property wet mass 1000 kg; name WM
  property dry mass 0 kg; name DM
  property fraction, origin: salt water 0; name fraction_origin_salt_water_Ww
  property fraction, origin: fresh water 1; name fraction_origin_fresh_water_Ww
  property carbon content, fossil 0; name C_content_fossil
  property fraction, origin: unspecified 0; name fraction_origin_unspecified_Ww
  property carbon content, non-fossil 0; name C_content_non_fossil
  property water in wet mass 1000 kg; name WWM
- Nitrate [water, ground-, long-term]: 0.0014129 kg; lognormal variance with pedigree 0.08, pedigree (1,1,5,1,1)
  (same comment as for Methane, fossil)
- Ammonia [air, urban air close to ground]: 0.0098071 kg; lognormal variance with pedigree 0.28, pedigree (1,1,5,1,1)
  direct digester gas emission plus emission from sludge incineration plus emission from sludge spreading. Uncertainty calculated from wastewater composition and treatment model
- Water [air, unspecified]: 0.1 m3; name water_to_air_unspecified; lognormal variance with pedigree 0.0807, pedigree (2,2,5,1,1)
  Calculated value based on water balance.
  property fraction, origin: salt water 0; name fraction_origin_salt_water
  property fraction, origin: unspecified 1; name fraction_origin_unspecified
  property fraction, origin: fresh water 0; name fraction_origin_fresh_water
- TOC, Total Organic Carbon [water, ground-, long-term]: 0.0035052 kg; lognormal variance with pedigree 0.11, pedigree (1,1,5,1,1)
  (same comment as for Methane, fossil)
- Nitrite [water, surface water]: 0.017734 kg; lognormal variance with pedigree 0.08, pedigree (1,1,5,1,1)
  direct wastewater treatment plant emission. Uncertainty calculated from wastewater composition and treatment model
- Carbon monoxide, fossil [air, urban air close to ground]: 0.0054259 kg; lognormal variance with pedigree 0.16, pedigree (1,1,5,1,1)
  (same comment as for Methane, fossil)
- Fluoride [water, surface water]: 0.016 kg; lognormal variance with pedigree 0.67, pedigree (1,1,5,1,1)
  sewer overload discharge plus direct wastewater treatment plant emission plus emission from sludge incineration. Uncertainty calculated from wastewater composition and treatment model
- DOC, Dissolved Organic Carbon [water, surface water]: 0.24376 kg; lognormal variance with pedigree 0.08, pedigree (1,1,5,1,1)
  (same comment as for Fluoride)
- NMVOC, non-methane volatile organic compounds, unspecified origin [air, urban air close to ground]: 7.7225e-5 kg; lognormal variance with pedigree 0.26, pedigree (1,1,5,1,1)
  direct digester gas emission. Uncertainty calculated from wastewater composition and treatment model
- Nitrate [water, surface water]: 1.3302 kg; lognormal variance with pedigree 0.06, pedigree (1,1,5,1,1)
  (same comment as for Fluoride)
- Cyanide [air, urban air close to ground]: 3.5399e-5 kg; lognormal variance with pedigree 0.24, pedigree (1,1,5,1,1)
  (same comment as for Methane, fossil)
- Ammonium, ion [water, surface water]: 0.30365 kg; lognormal variance with pedigree 0.06, pedigree (1,1,5,1,1)
  (same comment as for Nitrite)
- Dinitrogen monoxide [air, urban air close to ground]: 0.0028538 kg; lognormal variance with pedigree 0.07, pedigree (1,1,5,1,1)
  direct wastewater treatment plant emission plus direct digester gas emission plus emission from sludge incineration plus emission from sludge spreading. Uncertainty calculated from wastewater composition and treatment model
- DOC, Dissolved Organic Carbon [water, ground-, long-term]: 0.0035052 kg; lognormal variance with pedigree 0.11, pedigree (1,1,5,1,1)
  (same comment as for Methane, fossil)
- BOD5, Biological Oxygen Demand [water, surface water]: 0.31953 kg; lognormal variance with pedigree 0.07, pedigree (1,1,5,1,1)
  (same comment as for Fluoride)
- BOD5, Biological Oxygen Demand [water, ground-, long-term]: 0.0028975 kg; lognormal variance with pedigree 0.11, pedigree (1,1,5,1,1)
  (same comment as for Methane, fossil)
- COD, Chemical Oxygen Demand [water, ground-, long-term]: 0.0088583 kg; lognormal variance with pedigree 0.11, pedigree (1,1,5,1,1)
  (same comment as for Methane, fossil)
- Carbon [soil, agricultural]: 0.22637 kg; lognormal variance with pedigree 0.11, pedigree (1,1,5,1,1)
  emission from sludge spreading. Uncertainty calculated from wastewater composition and treatment model
- Nitrogen [water, surface water]: 0.013494 kg; lognormal variance with pedigree 0.08, pedigree (1,1,5,1,1)
  (same comment as for Nitrite)
- Carbon dioxide, fossil [air, urban air close to ground]: 6.2311 kg; lognormal variance with pedigree 0.06, pedigree (1,1,5,1,1)
  (same comment as for Methane, fossil)
- TOC, Total Organic Carbon [water, surface water]: 0.26035 kg; lognormal variance with pedigree 0.07, pedigree (1,1,5,1,1)
  (same comment as for Fluoride)
- COD, Chemical Oxygen Demand [water, surface water]: 0.50384 kg; lognormal variance with pedigree 0.08, pedigree (1,1,5,1,1)
  (same comment as for Fluoride)

## Extrapolations
This dataset has been extrapolated from year 2000 to the year of the calculation (2021). The uncertainty has been adjusted accordingly.

## Review by Jürgen Sutter 2009-02-07
passed.
