# transistor production, auxilliaries and energy use

Dataset: EcoSpold 2, unit process
Geography: GLO
Time period: 1998-01-01 to 2021-12-31
Technology level: current
Classification: ISIC rev.4 ecoinvent: 2610:Manufacture of electronic components and boards
Classification: EcoSpold01Categories: electronics/component
Tags: ConvertedDataset
Scenario: Business-as-Usual
System model: Allocation, cut-off by classification
Generated by: Roland Hischier
Published in: Hischier R. 2007
Database: ecoinvent
isCopyrightProtected: true
accessRestrictedTo: 1

## General comment
This dataset represents the average production efforts of 1 kg of transistors over all types of transistors. There is no distinction between the different types of transisitors produced. Data for auxillaries, energy, emissions and waste are taken from a dataset out of an international LCI database. Infrastructure efforts are based on own assumptions. As the raw material input is taken into account in the respective transistor datasets this dataset here has no input of raw materials.

## Included activities start
From reception of electronic components, raw materials and auxiliares at the factory gate.

## Included activities end
This module includes auxillary and energy consumption, emissions (air, water) and waste amounts, as well as an estimation of the efforts for transportation and of the infrastructure for the production of transistors.

## Geography
Data from literature – here representing the global situation.

## Technology
average production technology comprising Si-crystal die bonding; wire bonding; encapsulation; plating; triming; forming and marking.
Besides the use of millions of individual or discrete transistors, the vast majority of transistors are fabricated into integrated circuits today together with diodes, resistors, capacitors and other electronic components in order to establish a complete electronic circuit.

## Parameters
- fraction, cooling water, cooling pond system, to air: 0.032 dimensionless; name fraction_CW_CP_to_air; lognormal variance with pedigree 0.0413, pedigree (2,3,1,3,1)
  Calculated based on literature value (Scown, C.D., 2011, Water Footprint of U.S. Transportation Fuels and supplying information of the article) (Vionnet, S., Quantis Water Database - Technical Report, 2012).
- fraction, cooling water, recirculating system, to air: 0.771 dimensionless; name fraction_CW_R_to_air; lognormal variance with pedigree 0.0413, pedigree (2,3,1,3,1)
  (same comment as for fraction, cooling water, cooling pond system, to air)
- fraction, process water, to air: 0.061 dimensionless; name fraction_PW_to_air; lognormal variance with pedigree 0.092025, pedigree (4,4,3,2,4)
  Literature value (Statistics Canada, 2007 & Shaffer, K.H., 2008, Consumptive water use in the Great Lakes Basin, USGS) (Vionnet, S., Quantis Water Database - Technical Report, 2012).
- fraction, cooling water, to air: 0.3875 dimensionless; name fraction_CW_to_air; = (0.5*fraction_CW_OT_to_air)+(0.5*fraction_CW_R_to_air); lognormal variance with pedigree 0.092025, pedigree (4,4,3,2,4)
  Calculated value based on literature value (see comments of the other parametres present in this dataset) and expert opinion. In the case when no industry/literature data are available about the type of cooling or directly fraction, cooling water, to air specific for the process a default assumption is applied. It is assumed that the once-through cooling system is used in 50% of all cases and recirculating system is used in another 50% of all cases.
- fraction, cooling water, once-through system, to air: 0.004 dimensionless; name fraction_CW_OT_to_air; lognormal variance with pedigree 0.0413, pedigree (2,3,1,3,1)
  (same comment as for fraction, cooling water, cooling pond system, to air)

## Reference product
- transistor, auxilliaries and energy use: 1 kg; CPC 47150: Diodes, transistors and similar semi-conductor devices; photosensitive semi-conductor devices; light emitting […]; By-product classification allocatable product
  EcoSpold01Location=GLO
  A transistor “is a semiconductor device, the most common type of which acts as a current amplifier. There do however exist less common types of transistor - FETs (field effect transistors) - which act as voltage controlled resistors.”
  Hence a transistor is a fundamental building block of all the circuitries that govern the operation of computers, cellular phones, and all other modern electronics. Due to their fast response and accuracy, a transistor may be used in a wide variety of digital and analogue functions, including amplification, switching, voltage regulation, signal modulation, and oscillators. Transistors may be packaged individually or as part of an integrated circuit chip, which may hold thousands of transistors in a very small area.
  Low cost, flexibility and reliability have made out of transistors a universal device for non-mechanical tasks, such as digital computing. Transistorized circuits have replaced electromechanical devices for the control of appliances and machinery as well. It is often less expensive and more effective to use a standard microcontroller and write a computer program to carry out a control function than to design an equivalent mechanical control function (Wikipedia, 2007).
  production volume 1 kg
    Dummy value to be replaced by measured, estimated or calculated value
  property price 26.2682 EUR2005
    Calculated based on inputs: The price of the product has been calculated as a sum of the values of the material and energy inputs for this product. This value is therefore a rough estimation. It may underestimate the real price since there are additional expenses when producing any product. These expences can include for example labour costs, treatment of waste materials and profit for the producer. Please consider carefully whether this level of data quality is acceptable for your application.

## Inputs from technosphere
- scrap tin sheet: 0 kg; source CPM 2006; pedigree (1,1,1,1,1)
  Estimation, an average of 4.8 kg of non-used raw materials per kg of transistors is taken from literature. The waste amount split was based on literature and own assumption.
  Further references:
  exact (1998) Simplified LCA für Elektronikbauteile. International Exchange of Electronic Component Technology and Test Data, IG exact Schweiz, Arbeitsgruppe Umweltfragen
  EcoSpold01Location=CH
  Uncertainty: estimation, based on total waste amount from 1 literature source
  production volume 0 kg
    Calculated from the production volume of transistor, auxilliaries and energy use in proportion to the respective output amounts.
  properties: dry mass 1 kg, wet mass 1 kg
- electricity, medium voltage: 200 kWh; source CPM 2006; lognormal variance with pedigree 0.0527, pedigree (2,4,5,3,1)
  EcoSpold01Location=UCTE
  Calculated, average value.
  Further references:
  exact (1998) Simplified LCA für Elektronikbauteile. International Exchange of Electronic Component Technology and Test Data, IG exact Schweiz, Arbeitsgruppe Umweltfragen
  Uncertainty: value from 1 literature source
- electronic component factory: 1e-12 unit; lognormal variance with pedigree 0.5761, pedigree (4,5,5,3,5)
  EcoSpold01Location=GLO
  Expert assumption. Original value of 2E-08 was based a a wafer fabrication facility. It is assumed a factory produces more components than this in its lifetime.
  Uncertainty: rough assumption
- wastewater, average: 0 m3; pedigree (1,1,1,1,1)
  EcoSpold01Location=CH
  Estimation, due to a lack of respective emission information.
  Uncertainty: estimation, based on total waste amount from 1 literature source
  production volume 0 m3
    (same comment as for scrap tin sheet)
  properties: water content 2882.2, dry mass 0.346837 kg, carbon content, non-fossil 0.194039, wet mass 1000 kg
  note on carbon content, non-fossil: 0.0673 kg TOC/m3 (Tab A.17, ecoinvent v2.2 report 13_I). TOC was considered as Total Carbon.
- nitrogen, liquid: 0 kg; source CPM 2006; pedigree (1,1,1,1,1)
  EcoSpold01Location=RER
  Estimation, average input based on literature.
  Further references:
  exact (1998) Simplified LCA für Elektronikbauteile. International Exchange of Electronic Component Technology and Test Data, IG exact Schweiz, Arbeitsgruppe Umweltfragen
  Uncertainty: value from 1 literature source
  properties: dry mass 1 kg, wet mass 1 kg
- waste plastic, mixture: 0 kg; source CPM 2006; pedigree (1,1,1,1,1)
  Estimation, an average of 4.8 kg of non-used raw materials per kg of transistors is taken from literature. The waste amount split was based on literature and own assumption.
  Further references:
  exact (1998) Simplified LCA für Elektronikbauteile. International Exchange of Electronic Component Technology and Test Data, IG exact Schweiz, Arbeitsgruppe Umweltfragen
  EcoSpold01Location=CH
  Uncertainty: calculated from input of auxillaries
  production volume 0 kg
    (same comment as for scrap tin sheet)
  properties: dry mass 0.847 kg, water content 0.180638, heating value, net 30.79 MJ, wet mass 1 kg, carbon content, fossil 0.747344
  note on heating value, net: Value taken from the general comment of the treatment dataset.
  note on carbon content, fossil: C content in 1 kg DM was calculated using data in Tab A.2, ecoinvent v2.2 report 13_I
- chemical, organic: 0.38 kg; source CPM 2006; lognormal variance with pedigree 0.0527, pedigree (2,4,5,3,1)
  EcoSpold01Location=GLO
  Estimation, average input based on literature.
  Further references:
  exact (1998) Simplified LCA für Elektronikbauteile. International Exchange of Electronic Component Technology and Test Data, IG exact Schweiz, Arbeitsgruppe Umweltfragen
  Uncertainty: value from 1 literature source
  properties: heating value, net 19.03 MJ, dry mass 1 kg, wet mass 1 kg, carbon content, fossil 0.628
  note on carbon content, fossil: This dataset is an unweighted average of 20 organic substances (listed in Tab 88.1, ecoinvent v2.2 report 8, part II), being part of the top100 chemicals included in this database. The C-content has also been calculated as an unweighted average of the C content of the substances composing this dataset.
- waste, from silicon wafer production, inorganic: -0.01 kg; source CPM 2006; lognormal variance with pedigree 0.0527, pedigree (2,4,5,3,1)
  Estimation, an average of 4.8 kg of non-used raw materials per kg of transistors is taken from literature. The split has been done based on literature and own assumption.
  Further references:
  exact (1998) Simplified LCA für Elektronikbauteile. International Exchange of Electronic Component Technology and Test Data, IG exact Schweiz, Arbeitsgruppe Umweltfragen
  EcoSpold01Location=CH
  Uncertainty: estimation, based on total waste amount from 1 literature source
  production volume 0.01 kg
    (same comment as for scrap tin sheet)
  properties: dry mass 0.906 kg, carbon content, fossil 0.0347572, water content 0.103753, wet mass 1 kg
- scrap tin sheet: -0.010269, -0.679731 kg (2 entries); source CPM 2006; lognormal variance with pedigree 0.0527, pedigree (2,4,5,3,1)
  (same comment as for scrap tin sheet)
  production volume 0.69 kg
- wastewater, average: -0.00182477, -0.000197406, -0.00381782 m3 (3 entries); lognormal variance with pedigree 0.0527, pedigree (2,4,5,3,1)
  (same comment as for wastewater, average)
  production volume 0.00584 m3
- nitrogen, liquid: 1.78761, 6.51239 kg (2 entries); source CPM 2006; lognormal variance with pedigree 0.0527, pedigree (2,4,5,3,1)
  (same comment as for nitrogen, liquid)
- waste plastic, mixture: -0.232936, -0.017958, -0.00741731, -0.00704343, -0.268768, -0.00299651, -0.00135814, -1.88152 kg (8 entries); source CPM 2006; lognormal variance with pedigree 0.0527, pedigree (2,4,5,3,1)
  (same comment as for waste plastic, mixture)
  production volume 2.42 kg

## Inputs from nature
- Water, cooling, unspecified natural origin [natural resource, in water]: 0.00146 m3; name water_cooling_UNO_input; source CPM 2006; lognormal variance with pedigree 0.0527, pedigree (2,4,5,3,1)
  Estimation. an average water consumption of 7.3 kg per kg of transistors is considered. 20% is assumed to be used as cooling water.
  Further references:
  exact (1998) Simplified LCA für Elektronikbauteile. International Exchange of Electronic Component Technology and Test Data, IG exact Schweiz, Arbeitsgruppe Umweltfragen
  Estimation. an average water consumption of 7.3 kg per kg of transistors is considered. 20% is assumed to be used as cooling water.
  Further references:
  exact (1998) Simplified LCA für Elektronikbauteile. International Exchange of Electronic Component Technology and Test Data, IG exact Schweiz, Arbeitsgruppe Umweltfragen
  Uncertainty: estimation, based on total water amount from 1 literature source
- Water, unspecified natural origin [natural resource, in water]: 0.00584 m3; name water_UNO_input; source CPM 2006; lognormal variance with pedigree 0.0527, pedigree (2,4,5,3,1)
  Estimation. an average water consumption of 7.3 kg per kg of transistors is considered. 80% is assumed to be used as process water.
  Further references:
  exact (1998) Simplified LCA für Elektronikbauteile. International Exchange of Electronic Component Technology and Test Data, IG exact Schweiz, Arbeitsgruppe Umweltfragen
  Estimation. an average water consumption of 7.3 kg per kg of transistors is considered. 80% is assumed to be used as process water.
  Further references:
  exact (1998) Simplified LCA für Elektronikbauteile. International Exchange of Electronic Component Technology and Test Data, IG exact Schweiz, Arbeitsgruppe Umweltfragen
  Uncertainty: estimation, based on total water amount from 1 literature source

## Emissions to nature
- NMVOC, non-methane volatile organic compounds, unspecified origin [air, urban air close to ground]: 0.38 kg; source CPM 2006; lognormal variance with pedigree 0.1727, pedigree (2,4,5,3,1)
  Estimation, chemicals are all emitted into air.
  Uncertainty: calculated from input of auxillaries
- Water [water, unspecified]: 0.00053801 m3; name water_to_water_unspecified; = water_cooling_UNO_input*(1-fraction_CW_to_air)+water_UNO_input*(1-fraction_PW_to_air)-0.00584; lognormal variance with pedigree 0.0807, pedigree (2,2,5,1,1)
  Calculated value based on literature values and expert opinion. See comments in the parametres' comment field.
  property water in wet mass 1000 kg; name WWM
  property fraction, origin: unspecified 1; name fraction_origin_unspecified_Ww
  property fraction, origin: fresh water 0; name fraction_origin_fresh_water_Ww
  property fraction, origin: salt water 0; name fraction_origin_salt_water_Ww
  property wet mass 1000 kg; name WM
  property dry mass 0 kg; name DM
  property carbon content, fossil 0; name C_content_fossil
  property carbon content, non-fossil 0; name C_content_non_fossil
- Water [air, unspecified]: 0.00092199 m3; name water_to_air_unspecified; = (water_cooling_UNO_input*fraction_CW_to_air)+(water_UNO_input*fraction_PW_to_air); lognormal variance with pedigree 0.0807, pedigree (2,2,5,1,1)
  (same comment as for Water)
  property fraction, origin: salt water 0; name fraction_origin_salt_water
  property fraction, origin: unspecified 1; name fraction_origin_unspecified
  property fraction, origin: fresh water 0; name fraction_origin_fresh_water

## Sampling procedure
estimation - based on literature

## Extrapolations
This dataset has been extrapolated from year 2005 to the year of the calculation (2021). The uncertainty has been adjusted accordingly.

## Review by Rolf Frischknecht 2007-11-08
passed.

## Review by Roland Hischier 2011-09-20
Transfer of documentation done.
