# hot rolling, steel

Dataset: EcoSpold 2, unit process
Geography: AT
Time period: 2017-01-01 to 2021-12-31
Technology level: current
Classification: EcoSpold01Categories: metals/processing
Classification: ISIC rev.4 ecoinvent: 2410:Manufacture of basic iron and steel
Synonyms: Hot forming
Scenario: Business-as-Usual
System model: Allocation, cut-off by classification
Share of production covered: 0 %
Generated by: Alexander Passer
Published in: Truger Barbara 2020
Database: ecoinvent
isCopyrightProtected: true
accessRestrictedTo: 1

## General comment
This dataset describes the hot rolling of steel in Austria. The data are based on an Austrian company which produces reinforcing steel including the hot rolling process. Since the steel billets are produced on site, they are generally still hot when entering the hot rolling process, only a small share of the billets have to be reheated. This increases the energy efficiency of the hot rolling. The steel production is not included in this dataset.
There are two co-products that are used in other industries: Scale (material formed through oxidation of the cooling billet) can be used in steel production, cement production, and refractory production. Heat is used in the communal district heating grid.

## Included activities start
This process starts with the arrival of steel billets.

## Included activities end
Hot rolling steel into rebars or coils. Bending is not included in this dataset.

## Geography
Data-set is representative for European Union

## Technology
The hot rolling process descibes the production of rebars and coils for reinforcing steel from steel billets. Rebars have a diameter of 8-40mm and a length of 6-30m. Coils have a diameter of 8-16mm and weigh 1.7, 3.0 or 5.0. The average steel grade is B550 or B500 (550 or 500 MPa).

## Time period
The process is expected to be valid for the next 10 years. The energy efficiency and emissions may improve in the next years.

## Parameters
- fraction, cooling water, recirculating system, to air: 0.771 dimensionless; name fraction_CW_R_to_air; lognormal variance with pedigree 0.0413, pedigree (2,3,1,3,1)
  Calculated based on literature value (Scown, C.D., 2011, Water Footprint of U.S. Transportation Fuels and supplying information of the article) (Vionnet, S., Quantis Water Database - Technical Report, 2012).
- fraction, cooling water, to air: 0.3875 dimensionless; name fraction_CW_to_air; = (0.5*fraction_CW_OT_to_air)+(0.5*fraction_CW_R_to_air); lognormal variance with pedigree 0.092025, pedigree (4,4,3,2,4)
  Calculated value based on literature value (see comments of the other parametres present in this dataset) and expert opinion. In the case when no industry/literature data are available about the type of cooling or directly fraction, cooling water, to air specific for the process a default assumption is applied. It is assumed that the once-through cooling system is used in 50% of all cases and recirculating system is used in another 50% of all cases.
- fraction, process water, to air: 0.095 dimensionless; name fraction_PW_to_air; lognormal variance with pedigree 0.092025, pedigree (4,4,3,2,4)
  Literature value (Statistics Canada, 2007 & Shaffer, K.H., 2008, Consumptive water use in the Great Lakes Basin, USGS) (Vionnet, S., Quantis Water Database - Technical Report, 2012).
- fraction, cooling water, cooling pond system, to air: 0.032 dimensionless; name fraction_CW_CP_to_air; lognormal variance with pedigree 0.0413, pedigree (2,3,1,3,1)
  (same comment as for fraction, cooling water, recirculating system, to air)
- fraction, cooling water, once-through system, to air: 0.004 dimensionless; name fraction_CW_OT_to_air; lognormal variance with pedigree 0.0413, pedigree (2,3,1,3,1)
  (same comment as for fraction, cooling water, recirculating system, to air)

## Reference product
- hot rolling, steel: 0 kg; name RP; CPC 88601: Basic iron and steel manufacturing services; By-product classification allocatable product; pedigree (1,1,1,1,1)
  EcoSpold01Location=RER
  production volume 4.08473e8 kg; name hotrolling_prod
    Production volume in the factory in 2017
  property price 0.0689 EUR2005
    The prices of metal processing processes were calculated by using the monetary flows (deducted the price of metal inputs) from the following metal processing activities in EU & DK IO database: 61, 62, 63 and 64. Monetary supply: (1.6E11 EUR). Value of metal input to activities: 1.2E11 EUR. 4.4E10 (=(1.6-1.2) E11) was then considered as the price of the metal processing. The monetary flow was distributed over the Ecoinvent metal processing processes. 'Chipless shaping' and 'Chipping' acounted for 86.5 % of the production volumes and 86.5% of the monetary flow was therefore ascribed to these processe. The rest of the monetary flow was ascribed to the remaining metal processing processes. Within the last categories the money flow was ditributed between the different processes on basis of their respective electricity consumption, because many of the processes not had mass units.
  property true value 0.0689; name RP_true_value
    allocation property applied in "true value" allocation // value calculated from revenue
- heat, district or industrial, other than natural gas: 1 MJ; = heat_prod/hotrolling_prod; By-product classification allocatable product; CPC 17300: Steam and hot water; pedigree (1,1,1,1,1)
  Measured Value. Heat (low temperature) is used in the communal district heating grid.
  production volume 1.04908e8 MJ; name heat_prod
    Production volume in the factory in 2017
  property price 0.0106 EUR2005
    Average European district heat price from Ecoheatcool and Euroheat 2005-2006, Ecoheat Work package 1: The European heat market. Final report. 10.6 EUR/GJ i s the price of district heat. http://www.solarthermalworld.org/files/Ecoheatcool%20WP1%20Web.pdf?download
  property corresponding fuel use, propane, furnace >100kW 1.05263 MJ; = 1/0.95
    Lower heating value of the fuel input related to the heat/electricity output, taken directly from ecoinvent v3.0 dataset "heat production, natural gas, at industrial furnace >100kW, GLO 2000".
  property true value 0.00272238
    allocation property applied in "true value" allocation // value calculated from revenue
  properties: heating value, net 1 MJ

## By-products
- iron scrap, unsorted: 0 kg; CPC 39310: Slag, dross, scalings and other waste from the manufacture of iron or steel; By-product classification Recyclable; pedigree (1,1,1,1,1)
  Measured Value. During the cooling of the steel, there is a material loss through oxidation at the surface. This material loss is called scale. Scale is first stored and then sold. It can be used in steel production, cement production, and refractory production.
  production volume 0 kg; name scale_prod
    Production volume in the factory in 2017
  property price 0.149 EUR2005
    Temporary price data. Calculated as 90% of purchasers price based on: estimated at 85% of sorted scrap
  property carbon content 5.1e-6
    carbon content on a dry matter basis (reserved; not for manual entry)
  properties: carbon content, non-fossil 0, wet mass 1 kg, dry mass 0.8394 kg, water in wet mass 0.1606 kg, water content 0.1913, carbon content, fossil 5.1e-6, carbon allocation 4.28094e-6 kg

## Inputs from technosphere
- wastewater, average: -4.7151e-6 m3; name wastewater; lognormal variance with pedigree 0.0426, pedigree (2,1,3,1,1)
  Calculated value based on measured values
  production volume 13013.6 m3; = hotrolling_prod * wastewater/abs( RP)
    Calculated from production volume of reference product using the relative outputs.
  property price 0 EUR2005; name wastewater_price_EUR2005
  properties: wet mass 1000 kg, dry mass 0.346837 kg, carbon content, non-fossil 0.194039, water content 2882.2
  note on carbon content, non-fossil: 0.0673 kg TOC/m3 (Tab A.17, ecoinvent v2.2 report 13_I). TOC was considered as Total Carbon.
- chemical, inorganic: 2.14598e-9 kg; lognormal variance with pedigree 0.1226, pedigree (2,1,3,1,1)
  EcoSpold01Location=GLO
  Extrapolated value from dataset "hot rolling, steel [RER]"
  properties: dry mass 1 kg, wet mass 1 kg, carbon content, fossil 0.003
  note on carbon content, fossil: This dataset is an unweighted average of 20 inorganic substances (listed in Tab 88.1, ecoinvent v2.2 report 8, part II), being part of the top100 chemicals included in this database. The C-content has also been calculated as an unweighted average of the C content of the substances composing this dataset.
- lubricating oil: 0.000597914 kg; lognormal variance with pedigree 0.272, pedigree (1,1,3,1,1)
  EcoSpold01Location=RER
  Extrapolated value from dataset "hot rolling, steel [RER]"
  properties: wet mass 1 kg, dry mass 1 kg, heating value, net 40.2 MJ, carbon content, fossil 0.75
  note on heating value, net: Literature value, Source: IPCC 2006, 2006 IPCC Guidelines for National Greenhouse Gas Inventories, Prepared by the National Greenhouse Gas Inventories Programme, Eggleston H.S., Buendia L., Miwa K., Ngara T. and Tanabe K. (eds). Published: IGES, Japan
  note on carbon content, fossil: Lubricating oil is produced from diesel. C-content/dry mass of fats and oils considered 75%, from: ecoinvent v2.2 report, n 15a, pg 40
- electricity, high voltage: 0.0198347 kWh; lognormal variance with pedigree 0.0026, pedigree (1,1,3,1,1)
  Measured value
- rolling mill: 2.39757e-10 unit; lognormal variance with pedigree 0.306, pedigree (3,4,3,1,1)
  EcoSpold01Location=RER
  Extrapolated value from dataset "hot rolling, steel [RER]" . activityLink introduced to establish a direct link to the corresponding regional supply of this product
- steel, low-alloyed: 0.00241273 kg; lognormal variance with pedigree 0.0026, pedigree (1,1,3,1,1)
  Measured value. There should be an activity link to "steel, low-alloyed, AT"
  properties: carbon content, fossil 0.005, wet mass 1 kg, dry mass 1 kg
- heat, district or industrial, natural gas: 0.0902328 MJ; lognormal variance with pedigree 0.0032, pedigree (2,1,3,1,1)
  Calculated value, based on natural gas input and "heat production, natural gas, at industrial furnace low-NOx >100kW"
  EcoSpold01Location=RER
  properties: heating value, net 1 MJ
- iron scrap, unsorted: -0.00167392 kg; lognormal variance with pedigree 0.0032, pedigree (2,1,3,1,1)
  (same comment as for iron scrap, unsorted)
  production volume 4.62e6 kg
  properties: price 0.149 EUR2005, wet mass 1 kg, dry mass 0.8394 kg, water content 0.1913, carbon content, fossil 5.1e-6

## Inputs from nature
- Water, cooling, unspecified natural origin [natural resource, in water]: 7.74039e-5 m3; name water_input; source Byers, W. 2003; lognormal variance with pedigree 0.0426, pedigree (2,1,3,1,1)
  Measured Value
  property water content 9081.65; name water_content
  property wet mass 1000 kg; name WM
  property dry mass 0.1101 kg; name DM
  property carbon content, fossil 0.0104329; name C_content_fossil
  property carbon content, non-fossil 0; name C_content_non_fossil
  property water in wet mass 999.89 kg; name WWM

## Emissions to nature
- Copper, ion [water, unspecified]: 8.01567e-11 kg; lognormal variance with pedigree 0.6526, pedigree (2,1,3,1,1)
  Measured value
- Nickel, ion [water, unspecified]: 1.79174e-10 kg; lognormal variance with pedigree 0.6526, pedigree (2,1,3,1,1)
  Measured value
- Zinc, ion [water, unspecified]: 2.21751e-10 kg; lognormal variance with pedigree 0.6526, pedigree (2,1,3,1,1)
  Measured value
- Sulfate [water, unspecified]: 1.34852e-6 kg; lognormal variance with pedigree 0.0426, pedigree (2,1,3,1,1)
  Measured Value
- Phosphorus [water, unspecified]: 5.18662e-10 kg; lognormal variance with pedigree 0.0426, pedigree (2,1,3,1,1)
  Measured Value
- Water [air, unspecified]: 7.26888e-5 m3; name water_to_air_unspecified; = water_input-(wastewater*-1); lognormal variance with pedigree 0.0426, pedigree (2,1,3,1,1)
  Calculated value based on measured values
  property fraction, origin: salt water 0; name fraction_origin_salt_water
  property fraction, origin: unspecified 1; name fraction_origin_unspecified
  property fraction, origin: fresh water 0; name fraction_origin_fresh_water

## Sampling procedure
The data was provided directly by the steel production company. For the year 2017, the input material flows were given in absolute numbers and per ton of produced steel.

## Extrapolations
In case the company did not provide accurate data, data from the dataset "hot rolling, steel [RER]" were used.
