# plastic granulate production, unspecified, recycled, formal sector

Dataset: EcoSpold 2, unit process
Geography: IN
Time period: 2017-01-01 to 2021-12-31
Technology level: current
Classification: ISIC rev.4 ecoinvent: 3830:Materials recovery
Scenario: Business-as-Usual
System model: Allocation, cut-off by classification
Share of production covered: 1 %
Generated by: Prasad Gangane
Published in: Gangane, P. 2017
Database: ecoinvent
isCopyrightProtected: true
accessRestrictedTo: 1

## General comment
The formal plastic recycling sector in India contributes to a comparatively smaller percentage of the overall plastic recycling of the country in comparison with the informal sector. Once the received plastics are segregated, cleaned and sorted, the plastics are ground into smaller flakes. The grinding phase generally comprises of shredders that reduce bulk plastics into smaller flakes. The formal sector in India uses extrusion machines for pelletization, and separate moulding machines for moulding and colouring of plastics from e-waste. Visited formal recyclers were from different parts of the country based out of Pune, Bangalore, Hyderabad. Electricity is obtained from the grid. Data collection questionnaire was circulated amongst the recyclers and on-site visits were carried out. Information provided was verified and actual readings were taken related to electrical energy consumption the formal sector. The dataset is representation of production of plastic pelletes through the process of extrusion.

## Included activities start
This dataset include activities that occur after the shredded or ground plastic material is received for pelletization.

## Included activities end
This dataset includes activities until the received shredded or ground waste plastics is pelletized, moulded and/or coloured.

## Geography
The geography included for the formal sector includes the leading formal plastic recyclers spread across the country.

## Technology
The technology that is used in the formal sector is standard and is uniformly adopted by all the formal recyclers. The equipment is maintained and is not of very old technology.

## Time period
The recycling sector has been following this method for several years. There is no anticipated change in the next few years in their method of working. However, with the new e-waste rules in the country, bringing in more focus on sustainable recycling, certain changes are expected to occur over a period of time.

## Reference product
- plastic granulate, unspecified, recycled: 1 kg; name Granule; CPC 347: Plastics in primary forms; By-product classification allocatable product
  Recyled plastic granules produced from the extrusion process
  production volume 1.5e6 kg; name RP_PV_1
    Plastic waste generated in India https://www.epa.gov/sites/production/files/2014-05/documents/india.pdf
  property price 0.7 EUR2005; name Granule_price_EUR2005
    Temporary from https://www.alibaba.com/trade/search?fsb=y&IndexArea=product_en&CatId=&SearchText=pet+granulate
  property wet mass 1 kg; name Granule_WM
  property carbon content 0.83022
    carbon content on a dry matter basis (reserved; not for manual entry)
  properties: heating value, net 34.78 MJ, concentration, lead 5.66e-7 kg/kg, total polycyclic aromatic hydrocarbon content 0.0010858, concentration, cadmium 1.05e-7 kg/kg, carbon content, fossil 0.83022, concentration, chromium 9.1e-7 kg/kg, dry mass 1 kg, concentration, zinc 6.517e-5 kg/kg, concentration, copper 6.2e-7 kg/kg, concentration, nickel 1.225e-6 kg/kg, carbon allocation 0.83022 kg

## Inputs from technosphere
- waste plastic, consumer electronics: -0.027958 kg; name BP_amount_1; = (Flakes-Granule)*-1; lognormal variance with pedigree 0.051225, pedigree (2,5,3,2,2)
  Plastic waste rejected and reused for low grade applcation
  production volume 41937 kg; = RP_PV_1 * (BP_amount_1 / Granule)
    Calculated from production volume of reference product using the relative outputs.
  property price 0 EUR2005; name BP_amount_1_price_EUR2005
  properties: wet mass 1 kg, heating value, net 34.78 MJ, water content 0.180638, dry mass 0.847 kg, carbon content, fossil 0.830215
  note on heating value, net: Assumed equal to "waste plastic, consumer electronics, sorted".
- plastic flake, consumer electronics, for recycling: 1.02796 kg; name Flakes; lognormal variance with pedigree 0.051225, pedigree (2,5,3,2,2)
  plastic flakes produced from the grinding operations.
  properties: wet mass 1 kg, dry mass 1 kg, concentration, lead 5.66e-7 kg/kg, concentration, copper 6.2e-7 kg/kg, concentration, nickel 1.225e-6 kg/kg, concentration, zinc 6.517e-5 kg/kg, carbon content, fossil 0.83022, heating value, net 34.78 MJ, total polycyclic aromatic hydrocarbon content 0.0010858, concentration, cadmium 1.05e-7 kg/kg, concentration, chromium 9.1e-7 kg/kg
- electricity, low voltage: 0.2482 kWh; lognormal variance with pedigree 0.131225, pedigree (2,5,3,2,2)
  Electricity consumed for extrusion process. The value is calculated based on specific energy numbers of some of the imported machine (350 - 500 kWh/ton) and locally manufactured extruder machines (150 - 200 kWh/ton), and on the actual measurements. Weighted average of the numbers has been worked out. The weighted averages are calculated assuming 30% weightage on actual measurement, 30% weightage of extruders are basic, locally manufactured while 40% are imported ones. The value was calculated as a weighted average due to lack of information. The value is based on discussions with experts and recyclers as well as literature.

## Inputs from nature
- Water, well, in ground [natural resource, in water]: 0.000144784 m3; lognormal variance with pedigree 0.051225, pedigree (2,5,3,2,2)
  water used for cooling molten plastic

## Emissions to nature
- Methane, tetrachloro-, R-10 [air, urban air close to ground]: 1.23571e-10 kg; lognormal variance with pedigree 0.0441, pedigree (1,4,3,3,1)
  VOC emissions emitted during the extrusion process. The results are obtained by conducting VOC emisison sampling by activated sorbet method by SGS India Pvt Ltd Laboratory.
- Water [water, unspecified]: 0.000144784 m3; lognormal variance with pedigree 0.051225, pedigree (2,5,3,2,2)
  Water discharged to common ETP
- Chloroform [air, urban air close to ground]: 8.5725e-13 kg; lognormal variance with pedigree 0.0441, pedigree (1,4,3,3,1)
  (same comment as for Methane, tetrachloro-, R-10)
- Benzene [air, urban air close to ground]: 3.85714e-12 kg; lognormal variance with pedigree 0.0441, pedigree (1,4,3,3,1)
  (same comment as for Methane, tetrachloro-, R-10)
- Toluene [air, urban air close to ground]: 1.28571e-12 kg; lognormal variance with pedigree 0.0441, pedigree (1,4,3,3,1)
  (same comment as for Methane, tetrachloro-, R-10)
- Benzene, dichloro [air, urban air close to ground]: 6.42857e-12 kg; lognormal variance with pedigree 0.0441, pedigree (1,4,3,3,1)
  (same comment as for Methane, tetrachloro-, R-10)

## Sampling procedure
An initial data collection questionnaire was circulated amongst the recyclers. On-site visits were carried out and data were collected from leading recyclers in the formal recycling sector. Information provided was verified and readings were taken for information that is unavailable with the formal sector.These recyclers were engaged into recycling of plastics mainly Polycarbonate (PC), High Impact Polystyrene (HIPS), Acrylonitrile Butadiene Styrene (ABS), Poly Propylene (PP) etc.Data collected from different recyclers was compiled in the excel sheets and analysed. All the data were aggregated to per 1000 kgs of production of plastic granules/pellets.

## Extrapolations
This dataset has been extrapolated from year 2017 to the year of the calculation (2021). The uncertainty has been adjusted accordingly.
