# treatment of waste graphical paper, municipal incineration with fly ash extraction

Dataset: EcoSpold 2, unit process
Geography: CH
Time period: 2006-01-01 to 2021-12-31
Technology level: current
Classification: ISIC rev.4 ecoinvent: 3821:Treatment and disposal of non-hazardous waste
Synonyms: municipal waste incineration
Scenario: Business-as-Usual
System model: Allocation, cut-off by classification
Share of production covered: 1.8 %
Generated by: Gabor Doka
Published in: Doka G. 2015
Database: ecoinvent
isCopyrightProtected: true
accessRestrictedTo: 1

## General comment
This dataset represents the activity of waste disposal of waste graphical paper in a municipal solid waste incinerator (MSWI) // Recommended use of this dataset: For paper, which goes to disposal as part of communal waste mixture. Larger amounts of separated paper will likely not be disposed in incinerators or landfills, but rather go to recycling. // // Waste composition (wet, in ppm): upper heating value 16.61 MJ/kg; lower heating value 14.12 MJ/kg; H2O 110830; O 378670; H 53852; C 404000; S 1406.7; N 3756.6; P 112.95; B 17.19; Cl 1837.5; Br n.a.; F 19.468; I n.a.; Ag 0.047733; As 2.0485; Ba 114.24; Cd 1.6629; Co 0.7359; Cr 14.461; Cu 60.893; Hg 0.13902; Mn 40.221; Mo 4.2976; Ni 9.4431; Pb 80.374; Sb 0.70911; Se 2.5786; Sn n.a.; V n.a.; Zn 124.8; Be 0.97413; Sc n.a.; Sr 58.276; Ti 171.9; Tl 1.719; W n.a.; Si 21255; Fe 1188.4; Ca 3438.1; Al 12391; K 1327.5; Mg 4297.6; Na 918.83; // Share of carbon in waste that is biogenic 100%. // Share of metals in waste not oxidised and bulk-recyclable (exclude very small or thin parts) Iron: 0%; Alu: 0%; Copper: 0%. // Recovery of metal scrap from bottom ash to recycling: 0g iron scrap, 0g aluminium scrap, 0g copper scrap. From this waste, the FLUWA process in the technology mix recovers 0.000465kg (DM) of a hydroxide sludge to be recycled in zinc furnaces. // Ultimately one kg of this waste produces 0.1036 kg of bottom ash (can include some washed ash) and 0.008949 kg of residues, which are landfilled (technology mix). Additional solidification of residues with 0.003579 kg of cement.Net energy production: 1.74MJ/kg electric energy and 3.5MJ/kg thermal energy. //

## Included activities start
waste incineration from waste reception gate and delivery into waste bunker at incinerator plant site (without transports to the incinerator)

## Included activities end
Waste-specific short-term emissions to water from leachate. Long-term emissions from landfill to ground water.

## Geography
Specific to the technology mix encountered in Switzerland in 2012.

## Technology
average Swiss MSWI plants in 2010 (grate incinerators) with electrostatic precipitator for fly ash (ESP), wet flue gas scrubber and 25% SNCR , 42.77% SCR-high dust , 32.68% SCR-low dust -DeNOx facilities and 0% without Denox (weighted according to mass of burnt waste, representing Swiss average). Efficiency of iron scrap separation from slag : 58%. Efficiency of non-ferrous scrap separation from slag : 31%. The technology mix for this dataset includes a filter ash treatment (FLUWA) of a share of 46.22%. Gross electric efficiency technology mix 15.84% and Gross thermal efficiency technology mix 28.51%

## Time period
Waste composition as given in literature reference, theoretical data or other source. Transfer coefficients for modern MSWI.

## Reference product
- waste graphical paper: -1 kg; name RP_amount_1; By-product classification Waste; CPC 39990: Other wastes n.e.c.
  Main reference product of this activity (supply of disposal service).
  production volume 5.829e8 kg; name RP_PV_1
    based on corresponding global production volume of MSW fraction in conventional MSWI (wo fly ash extraction) and scaled down to annual Swiss incinerated MSW mass of 3.02 mio. tonnes.
  property heating value, net 14.12 MJ
    Value taken from the general comment of the treatment dataset.
  property price 0 EUR2005; name RP_amount_1_price_EUR2005
    Waste products are assigned a price of zero as they are assumed to require further treatment.
  property carbon content 0.45435
    carbon content on a dry matter basis (reserved; not for manual entry)
  properties: cobalt content 8.2762e-7, beryllium content 1.0955e-6, calcium content 0.0038666, zinc content 0.00014036, nickel content 1.062e-5, manganese content 4.5234e-5, thallium content 1.9333e-6, silicon content 0.023904, selenium content 2.9e-6, potassium content 0.0014929, titanium content 0.00019333, aluminium content 0.013935, iron content 0.0013366, magnesium content 0.0048333, wet mass 1 kg, water content 0.12464, dry mass 0.88917 kg, sodium content 0.0010334, strontium content 6.5539e-5, carbon content, non-fossil 0.45435, water in wet mass 0.11083 kg, arsenic content 2.3039e-6, sulfur content 0.001582, nitrogen content 0.0042248, hydrogen content 0.060564, cadmium content 1.8702e-6, fluorine content 2.1895e-5, oxygen content 0.42587, lead content 9.0392e-5, silver content 5.3682e-8, barium content 0.00012848, boron content 1.9333e-5, mercury content 1.5635e-7, chlorine content 0.0020665, phosphorus content 0.00012703, copper content 6.8483e-5, chromium content 1.6263e-5, molybdenum content 4.8333e-6, antimony content 7.9749e-7, carbon allocation 0.403994 kg

## By-products
- electricity, for reuse in municipal waste incineration only: 0 kWh; name E_el_prod_MSWI; CPC 17100: Electrical energy; By-product classification allocatable product; pedigree (1,1,1,1,1)
  Net electricity generated from this waste and used in internal MSWI plant energy redistribution.
  Uncertainty: uncertainty is calculated from uncertainties in waste composition and uncertainties in energy efficiency and the uncertainty in internal energy demand
  production volume 2.8251e8 kWh
    calculated in proportion to reference product waste input to incinerator
  property true value relation 3.6; name E_el_prod_MSWI_true_value_relation
    property to calculate "true value" from
  property price 0.1 EUR2005; name E_el_prod_MSWI_price_EUR2005
    Estimated to be the same price as in case of electricity, medium voltage.
  property exergy 3.6 MJ; name E_el_prod_MSWI_exergy
    This exergy property is based on the exergy content of the product.
- metalliferous hydroxide sludge: 0 kg; By-product classification Recyclable; CPC 1429: Other non-ferrous metal ores and concentrates (other than uranium or thorium ores and concentrates); pedigree (1,1,1,1,1)
  Metalliferous hydroxide sludge from filter ash leaching (FLUWA).
  Uncertainty: uncertainty is calculated from uncertainties in waste composition and transfer coefficients to filter ash in incinerator and the uncertainty of the transfer coefficients of the FLUWA process.
  production volume 0 kg
    calculated in proportion to reference product waste input to incinerator
  property price 0.0042 EUR2005
    World market value of manure, deflated with barley world market price and consumer price index, based on [http://www.gov.pe.ca/photos/original/af_NM_manconv.pdf].
  property heating value, net 0 MJ
    Non combustible products are assumed to have an LHV equal to zero (0).
  property carbon content 0.045207
    carbon content on a dry matter basis (reserved; not for manual entry)
  properties: barium content 6.9172e-5, fluorine content 0.00061099, boron content 0.00061761, oxygen content 0.48639, chlorine content 0.095306, silver content 1.3981e-7, phosphorus content 0.00477, chromium content 0.00014912, copper content 5.443e-5, cobalt content 3.9056e-5, nickel content 1.891e-5, arsenic content 4.0831e-5, sulfur content 0.18611, manganese content 8.8432e-5, titanium content 3.0329e-5, lead content 0.0031217, thallium content 3.7374e-5, zinc content 0.047355, mercury content 5.4498e-7, antimony content 1.6554e-5, cadmium content 0.001219, strontium content 1.4299e-6, molybdenum content 0.00056664, selenium content 5.8915e-5, beryllium content 3.1317e-5, silicon content 0.0024225, calcium content 0.074612, aluminium content 0.0018394, potassium content 0.018167, dry mass 0.25 kg, water content 3, magnesium content 0.014524, carbon content, non-fossil 0.045207, water in wet mass 0.75 kg, sodium content 0.016237, iron content 0.00028212, wet mass 1 kg, carbon allocation 0.0113017 kg
- heat, for reuse in municipal waste incineration only: 0 MJ; name E_th_prod_MSWI; By-product classification allocatable product; CPC 17300: Steam and hot water; pedigree (1,1,1,1,1)
  Net useful heat generated from this waste and used in internal MSWI plant energy redistribution.
  Uncertainty: uncertainty is calculated from uncertainties in waste composition and uncertainties in energy efficiency and the uncertainty in internal energy demand
  production volume 2.0403e9 MJ
    calculated in proportion to reference product waste input to incinerator
  property exergy 0.1842 MJ; name E_th_prod_MSWI_exergy
    This exergy property is based on the exergy content of the product.
  property true value relation 0.1842; name E_th_prod_MSWI_true_value_relation
    property to calculate "true value" from
  property price 0.0106 EUR2005; name E_th_prod_MSWI_price_EUR2005
    Average European district heat price from Ecoheatcool and Euroheat 2005-2006, Ecoheat Work package 1: The European heat market. Final report. 10.6 EUR/GJ i s the price of district heat. http://www.solarthermalworld.org/files/Ecoheatcool%20WP1%20Web.pdf?download

## Inputs from technosphere
- quicklime, milled, packed: 0.00064615 kg; lognormal variance with pedigree 0.88819, pedigree (1,1,4,1,1)
  Auxilliary inputs for the flue gas treatment stage of the incinerator plant.
  Uncertainty: uncertainty calculated from uncertainty in average CaO input, of transfer coefficients in the incinerator, and the uncertainty of the waste composition of this waste
  properties: water content 0.010101, dry mass 0.99 kg, wet mass 1 kg
- slag landfill: 1.8425e-10 unit; lognormal variance with pedigree 0.036828, pedigree (1,1,4,1,1)
  Landfill infrastructure required for landfilling of bottom ash.
  Uncertainty: uncertainty is calculated from uncertainties in waste composition and transfer coefficients in incinerator
- ammonia, anhydrous, liquid: 0.00078785 kg; lognormal variance with pedigree 0.68695, pedigree (1,1,4,1,1)
  Input to DeNOx stage (100% NH3).
  Uncertainty: uncertainty calculated from uncertainty in average DeNOx input, uncertainty in the share of thermal NOx, uncertainty of nitrogen content in average municipal waste and the uncertainty in nitrogen content in *this* waste.
  properties: wet mass 1 kg, dry mass 1 kg
- hydrochloric acid, without water, in 30% solution state: 0.00025345 kg; lognormal variance with pedigree 0.0293, pedigree (1,1,4,1,1)
  Auxilliary inputs for the wastewater treatment stage of the incinerator plant.
  Uncertainty: uncertainty calculated from uncertainty in average HCl input, of transfer coefficients in the incinerator, and the uncertainty of the waste composition of this waste
  properties: dry mass 1 kg, wet mass 1 kg, heating value, net 3.32 MJ
- process-specific burdens, slag landfill: 0.10364 kg; lognormal variance with pedigree 0.036828, pedigree (1,1,4,1,1)
  Mass-specific expenditures required for landfilling of bottom ash.;activityLink introduced to establish a direct link to the corresponding regional supply of this product
  Uncertainty: uncertainty is calculated from uncertainties in waste composition and transfer coefficients in incinerator
- heat, district or industrial, natural gas: 0.14733 MJ; lognormal variance with pedigree 0.68695, pedigree (1,1,4,1,1)
  Input to DeNOx stage, to heat up flue gas in low-dust SCR.
  Uncertainty: uncertainty calculated from uncertainty in average DeNOx input, uncertainty in the share of thermal NOx, uncertainty of nitrogen content in average municipal waste and the uncertainty in nitrogen content in *this* waste.
  properties: heating value, net 1 MJ
- cationic resin: 7.0458e-7 kg; lognormal variance with pedigree 1.8289, pedigree (1,1,4,1,1)
  Auxilliary input for mercury removal in filter ash treatment (FLUWA).
  Uncertainty: uncertainty calculated from uncertainty in of transfer coefficients in the incinerator, and the uncertainty of the waste composition of this waste
  properties: wet mass 1 kg, carbon content, fossil 0.521606, dry mass 0.5 kg, water content 1, heating value, net 6.68 MJ
- iron (III) chloride, without water, in 40% solution state: 9.7876e-6 kg; lognormal variance with pedigree 0.41254, pedigree (1,1,4,1,1)
  Auxilliary inputs for the wastewater treatment stage of the incinerator plant.
  Uncertainty: uncertainty calculated from uncertainty in average FeCl3 input, of transfer coefficients in the incinerator, and the uncertainty of the waste composition of this waste
  properties: wet mass 1 kg, dry mass 1 kg
- municipal waste incineration facility: 2.5e-10 unit
  Demands per kilogram waste.
- residual material landfill: 3.7169e-11 unit; lognormal variance with pedigree 0.025933, pedigree (1,1,4,1,1)
  Landfill infrastructure required for landfilling of incineration residues.
  Uncertainty: uncertainty is calculated from uncertainties in waste composition and transfer coefficients in incinerator
- chemical, organic: 1.4731e-6 kg; lognormal variance with pedigree 1.5987, pedigree (1,1,4,1,1)
  Auxilliary inputs for the wastewater treatment stage of the incinerator plant. Proxy for (pure) Trisodium-trimercapto-s-triazine (CAS 17766-26-6), used as 15% diluted solution, aka TMT15.
  Uncertainty: uncertainty calculated from uncertainty in average TMT15 input, of transfer coefficients in the incinerator, and the uncertainty of the waste composition of this waste
  properties: wet mass 1 kg, heating value, net 19.03 MJ, dry mass 1 kg, carbon content, fossil 0.628
- process-specific burdens, residual material landfill: 0.017841 kg; lognormal variance with pedigree 0.025933, pedigree (1,1,4,1,1)
  Mass-specific expenditures required for landfilling of incineration residues.;activityLink introduced to establish a direct link to the corresponding regional supply of this product
  Uncertainty: uncertainty is calculated from uncertainties in waste composition and transfer coefficients in incinerator
- chemical, inorganic: 4.6286e-5 kg; lognormal variance with pedigree 0.2385, pedigree (1,1,4,1,1)
  Auxilliary inputs for the wastewater treatment stage of the incinerator plant. Proxy for Polyelectrolyte.
  Uncertainty: uncertainty calculated from uncertainty in average Polyelectrolyte input, of transfer coefficients in the incinerator, and the uncertainty of the waste composition of this waste
  properties: carbon content, fossil 0.003, wet mass 1 kg, dry mass 1 kg
- hydrogen peroxide, without water, in 50% solution state: 0.00061412 kg; lognormal variance with pedigree 0.030928, pedigree (1,1,4,1,1)
  Auxilliary oxidising agent for filter ash treatment (FLUWA).
  Uncertainty: uncertainty calculated from uncertainty in of transfer coefficients in the incinerator, and the uncertainty of the waste composition of this waste
  properties: wet mass 1 kg, dry mass 1 kg, heating value, net 7.13 MJ
- spent activated carbon with mercury: -7.4167e-7 kg; name BP_amount_1; lognormal variance with pedigree 1.8289, pedigree (1,1,4,1,1)
  Spent ion exchanger charged with mercury, from FLUWA filter ash treatment, approximated here with Spent activated carbon with mercury, deposited undergound in a polyethylene Big Bag.
  Uncertainty: uncertainty calculated from uncertainty in of transfer coefficients in the incinerator, and the uncertainty of the waste composition of this waste.
  production volume 432.319 kg; = ABS(RP_PV_1 * (BP_amount_1 / RP_amount_1))
    Calculated from production volume of reference product using the relative outputs.
  property price 0 EUR2005; name BP_amount_1_price_EUR2005
  properties: heating value, net 18.18 MJ, dry mass 1 kg, carbon content, fossil 0.6, wet mass 1 kg
- cement, unspecified: 0.0035794 kg; lognormal variance with pedigree 0.035017, pedigree (1,1,4,1,1)
  Cement required for solidification of landfilled residual material.
  Uncertainty: Uncertainty calculated from uncertainty of the waste composition of this waste, of transfer coefficients in the incinerator and of the solidification recipe.
  properties: dry mass 1 kg, wet mass 1 kg
- titanium dioxide: 4.936e-5 kg; lognormal variance with pedigree 1.0319, pedigree (1,1,4,1,1)
  Input to DeNOx stage (TiO2 catalyst carrier)
  Uncertainty: uncertainty calculated from uncertainty in average DeNOx input, uncertainty in the share of thermal NOx, uncertainty of nitrogen content in average municipal waste and the uncertainty in nitrogen content in *this* waste.
  properties: wet mass 1 kg, dry mass 1 kg
- waste cement, hydrated: -0.0089486 kg; lognormal variance with pedigree 0.035017, pedigree (1,1,4,1,1)
  Hydrated cement output for solidification of landfilled residual material.
  Uncertainty: Uncertainty calculated from uncertainty of the waste composition of this waste and transfer coefficients in the incinerator and of the solidification recipe.
  production volume 5.2161e6 kg
    calculated in proportion to reference product waste input to incinerator
  properties: wet mass 1 kg, dry mass 1 kg
- sodium hydroxide, without water, in 50% solution state: 0.00085042 kg; lognormal variance with pedigree 0.18485, pedigree (1,1,4,1,1)
  Auxilliary inputs for the flue gas treatment stage of the incinerator plant, and partially in the filter ash treatment (FLUWA).
  Uncertainty: uncertainty calculated from uncertainty in average NaOH input, of transfer coefficients in the incinerator, and the uncertainty of the waste composition of this waste
  properties: heating value, net 3.03 MJ, dry mass 1 kg, wet mass 1 kg
- water, decarbonised: 0.54871 kg; lognormal variance with pedigree 0.41254, pedigree (1,1,4,1,1)
  Incinerator process water used in flue gas scrubber stage.
  Uncertainty: uncertainty calculated from uncertainty in average water input, and the uncertainty of the waste composition of this waste
  properties: wet mass 1 kg
- chromium oxide, flakes: 1.0074e-6 kg; lognormal variance with pedigree 1.0319, pedigree (1,1,4,1,1)
  Input to DeNOx stage. Active component in SCR catalyst (vanadium pentoxide, V2O5), here approximated with the available chromium trioxide.
  Uncertainty: uncertainty calculated from uncertainty in average DeNOx input, uncertainty in the share of thermal NOx, uncertainty of nitrogen content in average municipal waste and the uncertainty in nitrogen content in *this* waste.
  properties: dry mass 1 kg, wet mass 1 kg
- transport, freight, lorry, unspecified: 0.0046975 metric ton*km; lognormal variance with pedigree 0.030686, pedigree (1,1,4,1,1)
  Transport services to transport incineration residues to landfills and filter ash to external treatments (FLUWA).
  Uncertainty: uncertainty calculated from uncertainty of the waste composition of this waste, uncertainty of transfer coefficients and the uncertainty in generic transportation distances
- metalliferous hydroxide sludge: -0.0018592 kg; lognormal variance with pedigree 0.045229, pedigree (1,1,4,1,1)
  (same comment as for metalliferous hydroxide sludge)
  production volume 1.0837e6 kg
  properties: oxygen content 0.48639, chlorine content 0.095306, sulfur content 0.18611, zinc content 0.047355, calcium content 0.074612, potassium content 0.018167, dry mass 0.25 kg, water content 3, magnesium content 0.014524, carbon content, non-fossil 0.045207, sodium content 0.016237, wet mass 1 kg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

## Inputs from nature
- Oxygen [natural resource, in air]: 1.1643 kg; lognormal variance with pedigree 0.035003, pedigree (1,1,4,1,1)
  Oxygen from ambient air needed to combust and oxidise this waste. Net demand, i.e. without O2 leaving the plant in flue gas uncombusted.
  Uncertainty: uncertainty is calculated from uncertainties in waste composition and transfer coefficients to flue gas and soild residues in incinerator

## Emissions to nature
- Strontium [air, urban air close to ground]: 5.8276e-9 kg; lognormal variance with pedigree 1.0755, pedigree (1,1,4,1,1)
  Emission to air from waste composition and transfer coefficients.
  Uncertainty: uncertainty is calculated from uncertainties in waste composition and transfer coefficients in incinerator
- Particulates, < 2.5 um [air, urban air close to ground]: 3.9371e-6 kg; lognormal variance with pedigree 0.43344, pedigree (1,1,4,1,1)
  Incomplete combustion product emitted to air.
  Uncertainty: uncertainty calculated from uncertainty in average operation emissions, and the uncertainty of the flue gas volume from this waste.
- BOD5, Biological Oxygen Demand [water, ground-, long-term]: 0.00097925 kg; lognormal variance with pedigree 0.034808, pedigree (1,1,4,1,1)
  Long-term emissions from landfilling of incineration residues.
  Uncertainty: uncertainty is calculated from uncertainties in waste composition and transfer coefficients in incinerator and landfills.
- Titanium [air, urban air close to ground]: 1.4262e-7 kg; lognormal variance with pedigree 0.921, pedigree (1,1,4,1,1)
  (same comment as for Strontium)
- Particulates, > 2.5 um, and < 10um [air, urban air close to ground]: 1.9785e-8 kg; lognormal variance with pedigree 0.21007, pedigree (1,1,4,1,1)
  (same comment as for Particulates, < 2.5 um)
- TOC, Total Organic Carbon [water, ground-, long-term]: 0.0011846 kg; lognormal variance with pedigree 0.034808, pedigree (1,1,4,1,1)
  (same comment as for BOD5, Biological Oxygen Demand)
- Thallium [air, urban air close to ground]: 1.719e-9 kg; lognormal variance with pedigree 1.5272, pedigree (1,1,4,1,1)
  (same comment as for Strontium)
- Dioxins, measured as 2,3,7,8-tetrachlorodibenzo-p-dioxin [air, urban air close to ground]: 6.5948e-14 kg; lognormal variance with pedigree 0.43344, pedigree (1,1,4,1,1)
  (same comment as for Particulates, < 2.5 um)
- COD, Chemical Oxygen Demand [water, ground-, long-term]: 0.0029938 kg; lognormal variance with pedigree 0.034808, pedigree (1,1,4,1,1)
  (same comment as for BOD5, Biological Oxygen Demand)
- Iron [air, urban air close to ground]: 2.1299e-9 kg; lognormal variance with pedigree 0.70898, pedigree (1,1,4,1,1)
  (same comment as for Strontium)
- Benzene [air, urban air close to ground]: 3.2976e-8 kg; lognormal variance with pedigree 0.101442, pedigree (1,1,4,1,1)
  (same comment as for Particulates, < 2.5 um)
- DOC, Dissolved Organic Carbon [water, ground-, long-term]: 0.0011846 kg; lognormal variance with pedigree 0.034808, pedigree (1,1,4,1,1)
  (same comment as for BOD5, Biological Oxygen Demand)
- Silicon [air, urban air close to ground]: 3.3104e-8 kg; lognormal variance with pedigree 0.35349, pedigree (1,1,4,1,1)
  (same comment as for Strontium)
- Toluene [air, urban air close to ground]: 6.5953e-8 kg; lognormal variance with pedigree 0.101442, pedigree (1,1,4,1,1)
  (same comment as for Particulates, < 2.5 um)
- Nitrate [water, ground-, long-term]: 0.00013474 kg; lognormal variance with pedigree 0.50455, pedigree (1,1,4,1,1)
  (same comment as for BOD5, Biological Oxygen Demand)
- Calcium [air, urban air close to ground]: 2.7057e-5 kg; lognormal variance with pedigree 0.5163, pedigree (1,1,4,1,1)
  (same comment as for Strontium)
- Benzene, pentachloro- [air, urban air close to ground]: 1.7423e-10 kg; lognormal variance with pedigree 0.101442, pedigree (1,1,4,1,1)
  (same comment as for Particulates, < 2.5 um)
- Sulfate [water, ground-, long-term]: 0.0033633 kg; lognormal variance with pedigree 0.4505, pedigree (1,1,4,1,1)
  (same comment as for BOD5, Biological Oxygen Demand)
- Potassium [air, urban air close to ground]: 6.5585e-6 kg; lognormal variance with pedigree 0.64402, pedigree (1,1,4,1,1)
  (same comment as for Strontium)
- Benzene, hexachloro- [air, urban air close to ground]: 6.8952e-11 kg; lognormal variance with pedigree 0.101442, pedigree (1,1,4,1,1)
  (same comment as for Particulates, < 2.5 um)
- Phosphate [water, ground-, long-term]: 1.0159e-5 kg; lognormal variance with pedigree 5.3337, pedigree (1,1,4,1,1)
  (same comment as for BOD5, Biological Oxygen Demand)
- Aluminium [air, urban air close to ground]: 1.0102e-8 kg; lognormal variance with pedigree 0.41998, pedigree (1,1,4,1,1)
  (same comment as for Strontium)
- Phenol, pentachloro- [air, urban air close to ground]: 1.4361e-11 kg; lognormal variance with pedigree 0.101442, pedigree (1,1,4,1,1)
  (same comment as for Particulates, < 2.5 um)
- Boron [water, ground-, long-term]: 1.4196e-5 kg; lognormal variance with pedigree 1.1194, pedigree (1,1,4,1,1)
  (same comment as for BOD5, Biological Oxygen Demand)
- BOD5, Biological Oxygen Demand [water, surface water]: 0.00030055 kg; lognormal variance with pedigree 0.041091, pedigree (1,1,4,1,1)
  Emissions to water from waste composition and transfer coefficients in incinerator and landfills.
  Uncertainty: uncertainty is calculated from uncertainties in waste composition and transfer coefficients in incinerator and landfills
- Heat, waste [air, urban air close to ground]: 12.317 MJ; lognormal variance with pedigree 0.05957, pedigree (1,1,4,1,1)
  Waste heat generated from heating value of this waste plus any electricity required to process it.
  Uncertainty: uncertainty is calculated from uncertainties in waste composition and uncertainties in energy efficiency and the uncertainty in internal energy demand
- Chloride [water, ground-, long-term]: 0.00023145 kg; lognormal variance with pedigree 0.57479, pedigree (1,1,4,1,1)
  (same comment as for BOD5, Biological Oxygen Demand)
- Magnesium [air, urban air close to ground]: 4.533e-6 kg; lognormal variance with pedigree 0.49539, pedigree (1,1,4,1,1)
  (same comment as for Strontium)
- Benzo(a)pyrene [air, urban air close to ground]: 7.3383e-13 kg; lognormal variance with pedigree 0.43344, pedigree (1,1,4,1,1)
  (same comment as for Particulates, < 2.5 um)
- Fluoride [water, ground-, long-term]: 1.2989e-5 kg; lognormal variance with pedigree 0.75826, pedigree (1,1,4,1,1)
  (same comment as for BOD5, Biological Oxygen Demand)
- COD, Chemical Oxygen Demand [water, surface water]: 0.00030713 kg; lognormal variance with pedigree 0.040151, pedigree (1,1,4,1,1)
  (same comment as for BOD5, Biological Oxygen Demand)
- Heat, waste [water, surface water]: 3.0408 MJ; lognormal variance with pedigree 0.05957, pedigree (1,1,4,1,1)
  (same comment as for Heat, waste)
- Silver, ion [water, ground-, long-term]: 3.869e-8 kg; lognormal variance with pedigree 1.8884, pedigree (1,1,4,1,1)
  (same comment as for BOD5, Biological Oxygen Demand)
- Sodium [air, urban air close to ground]: 7.5438e-6 kg; lognormal variance with pedigree 0.68727, pedigree (1,1,4,1,1)
  (same comment as for Strontium)
- Water [water, surface water]: 0.000184654 m3; lognormal variance with pedigree 1.7236, pedigree (1,1,4,1,1)
  Process water released to surface water.
  Uncertainty: uncertainty calculated from uncertainty in process water input and the uncertainty of fraction to surface water.
- Arsenic, ion [water, ground-, long-term]: 1.2489e-6 kg; lognormal variance with pedigree 1.4849, pedigree (1,1,4,1,1)
  (same comment as for BOD5, Biological Oxygen Demand)
- DOC, Dissolved Organic Carbon [water, surface water]: 0.00013396 kg; lognormal variance with pedigree 0.040231, pedigree (1,1,4,1,1)
  (same comment as for BOD5, Biological Oxygen Demand)
- Barium [water, ground-, long-term]: 8.3462e-5 kg; lognormal variance with pedigree 1.2977, pedigree (1,1,4,1,1)
  (same comment as for BOD5, Biological Oxygen Demand)
- TOC, Total Organic Carbon [water, surface water]: 0.00013396 kg; lognormal variance with pedigree 0.040231, pedigree (1,1,4,1,1)
  (same comment as for BOD5, Biological Oxygen Demand)
- Water [air, urban air close to ground]: 0.000895562 m3; lognormal variance with pedigree 1.3573, pedigree (1,1,4,1,1)
  Water vapour from waste humidity, hydrogen oxidation and part of the process water.
  Uncertainty: Uncertainty calculated from uncertainty in waste composition, process water input and the uncertainty of fraction to air.
- Cobalt [water, ground-, long-term]: 6.4657e-7 kg; lognormal variance with pedigree 1.5642, pedigree (1,1,4,1,1)
  (same comment as for BOD5, Biological Oxygen Demand)
- Sulfate [water, surface water]: 0.00057484 kg; lognormal variance with pedigree 0.31354, pedigree (1,1,4,1,1)
  (same comment as for BOD5, Biological Oxygen Demand)
- Carbon monoxide, non-fossil [air, urban air close to ground]: 5.6056e-5 kg; lognormal variance with pedigree 0.83186, pedigree (1,1,4,1,1)
  (same comment as for Particulates, < 2.5 um)
- Cadmium, ion [water, ground-, long-term]: 2.6662e-7 kg; lognormal variance with pedigree 5.5113, pedigree (1,1,4,1,1)
  (same comment as for BOD5, Biological Oxygen Demand)
- Nitrate [water, surface water]: 4.8263e-5 kg; lognormal variance with pedigree 0.33287, pedigree (1,1,4,1,1)
  (same comment as for BOD5, Biological Oxygen Demand)
- Carbon dioxide, non-fossil [air, urban air close to ground]: 1.4723 kg; lognormal variance with pedigree 0.031065, pedigree (1,1,4,1,1)
  (same comment as for Strontium)
- Chromium VI [water, ground-, long-term]: 7.7879e-7 kg; lognormal variance with pedigree 2.6028, pedigree (1,1,4,1,1)
  (same comment as for BOD5, Biological Oxygen Demand)
- Phosphate [water, surface water]: 1.6818e-7 kg; lognormal variance with pedigree 0.47456, pedigree (1,1,4,1,1)
  (same comment as for BOD5, Biological Oxygen Demand)
- Methane, non-fossil [air, urban air close to ground]: 4.9465e-7 kg; lognormal variance with pedigree 0.101442, pedigree (1,1,4,1,1)
  (same comment as for Particulates, < 2.5 um)
- Copper, ion [water, ground-, long-term]: 5.7369e-5 kg; lognormal variance with pedigree 1.0254, pedigree (1,1,4,1,1)
  (same comment as for BOD5, Biological Oxygen Demand)
- Boron [water, surface water]: 1.7805e-7 kg; lognormal variance with pedigree 1.1985, pedigree (1,1,4,1,1)
  (same comment as for BOD5, Biological Oxygen Demand)
- Sulfur dioxide [air, urban air close to ground]: 1.496e-5 kg; lognormal variance with pedigree 0.63314, pedigree (1,1,4,1,1)
  (same comment as for Strontium)
- Mercury [water, ground-, long-term]: 2.9199e-8 kg; lognormal variance with pedigree 1.8311, pedigree (1,1,4,1,1)
  (same comment as for BOD5, Biological Oxygen Demand)
- Chloride [water, surface water]: 0.0015607 kg; lognormal variance with pedigree 0.23456, pedigree (1,1,4,1,1)
  (same comment as for BOD5, Biological Oxygen Demand)
- Nitrogen oxides [air, urban air close to ground]: 0.00029333 kg; lognormal variance with pedigree 0.74012, pedigree (1,1,4,1,1)
  Sum of fuel-Nox and thermal-NOx emitted to air after DeNOx stage.
  Uncertainty: uncertainty calculated from uncertainty in average N-emissions and uncertainty in the share of thermal NOx and the uncertainty in nitrogen content in *this* waste.
- Manganese [water, ground-, long-term]: 3.1892e-5 kg; lognormal variance with pedigree 1.3805, pedigree (1,1,4,1,1)
  (same comment as for BOD5, Biological Oxygen Demand)
- Fluoride [water, surface water]: 5.6661e-6 kg; lognormal variance with pedigree 0.79529, pedigree (1,1,4,1,1)
  (same comment as for BOD5, Biological Oxygen Demand)
- Manganese [water, surface water]: 4.9204e-9 kg; lognormal variance with pedigree 1.1054, pedigree (1,1,4,1,1)
  (same comment as for BOD5, Biological Oxygen Demand)
- Ammonia [air, urban air close to ground]: 9.2631e-7 kg; lognormal variance with pedigree 0.74012, pedigree (1,1,4,1,1)
  Nitrogen species emitted to air after DeNOx stage.
  Uncertainty: uncertainty calculated from uncertainty in average N-emissions and uncertainty in the share of thermal NOx and the uncertainty in nitrogen content in *this* waste.
- Molybdenum [water, ground-, long-term]: 3.3134e-6 kg; lognormal variance with pedigree 1.3864, pedigree (1,1,4,1,1)
  (same comment as for BOD5, Biological Oxygen Demand)
- Silver, ion [water, surface water]: 9.616e-11 kg; lognormal variance with pedigree 1.885, pedigree (1,1,4,1,1)
  (same comment as for BOD5, Biological Oxygen Demand)
- Molybdenum [water, surface water]: 7.151e-7 kg; lognormal variance with pedigree 0.87925, pedigree (1,1,4,1,1)
  (same comment as for BOD5, Biological Oxygen Demand)
- Dinitrogen monoxide [air, urban air close to ground]: 5.6028e-5 kg; lognormal variance with pedigree 1.2698, pedigree (1,1,4,1,1)
  (same comment as for Ammonia)
- Nickel, ion [water, ground-, long-term]: 9.2552e-6 kg; lognormal variance with pedigree 1.2628, pedigree (1,1,4,1,1)
  (same comment as for BOD5, Biological Oxygen Demand)
- Arsenic, ion [water, surface water]: 7.9818e-7 kg; lognormal variance with pedigree 1.3673, pedigree (1,1,4,1,1)
  (same comment as for BOD5, Biological Oxygen Demand)
- Nickel, ion [water, surface water]: 6.2883e-9 kg; lognormal variance with pedigree 1.8869, pedigree (1,1,4,1,1)
  (same comment as for BOD5, Biological Oxygen Demand)
- Cyanide [air, urban air close to ground]: 1.2037e-5 kg; lognormal variance with pedigree 1.2698, pedigree (1,1,4,1,1)
  (same comment as for Ammonia)
- Lead [water, ground-, long-term]: 5.6591e-5 kg; lognormal variance with pedigree 2.5331, pedigree (1,1,4,1,1)
  (same comment as for BOD5, Biological Oxygen Demand)
- Barium [water, surface water]: 4.8472e-8 kg; lognormal variance with pedigree 0.76008, pedigree (1,1,4,1,1)
  (same comment as for BOD5, Biological Oxygen Demand)
- Lead [water, surface water]: 5.4735e-9 kg; lognormal variance with pedigree 0.82897, pedigree (1,1,4,1,1)
  (same comment as for BOD5, Biological Oxygen Demand)
- Phosphorus [air, urban air close to ground]: 1.1479e-7 kg; lognormal variance with pedigree 0.97248, pedigree (1,1,4,1,1)
  (same comment as for Strontium)
- Antimony [water, ground-, long-term]: 2.8828e-7 kg; lognormal variance with pedigree 1.3749, pedigree (1,1,4,1,1)
  (same comment as for BOD5, Biological Oxygen Demand)
- Cadmium, ion [water, surface water]: 2.9558e-10 kg; lognormal variance with pedigree 1.4268, pedigree (1,1,4,1,1)
  (same comment as for BOD5, Biological Oxygen Demand)
- Antimony [water, surface water]: 1.3966e-7 kg; lognormal variance with pedigree 1.527, pedigree (1,1,4,1,1)
  (same comment as for BOD5, Biological Oxygen Demand)
- Hydrogen chloride [air, urban air close to ground]: 1.0486e-6 kg; lognormal variance with pedigree 0.61006, pedigree (1,1,4,1,1)
  (same comment as for Strontium)
- Selenium [water, ground-, long-term]: 1.9788e-6 kg; lognormal variance with pedigree 0.93358, pedigree (1,1,4,1,1)
  (same comment as for BOD5, Biological Oxygen Demand)
- Cobalt [water, surface water]: 1.259e-10 kg; lognormal variance with pedigree 2.0737, pedigree (1,1,4,1,1)
  (same comment as for BOD5, Biological Oxygen Demand)
- Selenium [water, surface water]: 5.1375e-7 kg; lognormal variance with pedigree 1.0237, pedigree (1,1,4,1,1)
  (same comment as for BOD5, Biological Oxygen Demand)
- Hydrogen fluoride [air, urban air close to ground]: 1.3135e-7 kg; lognormal variance with pedigree 1.1988, pedigree (1,1,4,1,1)
  (same comment as for Strontium)
- Tin, ion [water, ground-, long-term]: 2.4167e-10 kg; lognormal variance with pedigree 3.9403, pedigree (1,1,4,1,1)
  (same comment as for BOD5, Biological Oxygen Demand)
- Chromium VI [water, surface water]: 2.2455e-7 kg; lognormal variance with pedigree 1.2982, pedigree (1,1,4,1,1)
  (same comment as for BOD5, Biological Oxygen Demand)
- Tin, ion [water, surface water]: 4.0346e-13 kg; lognormal variance with pedigree 1.1159, pedigree (1,1,4,1,1)
  (same comment as for BOD5, Biological Oxygen Demand)
- Arsenic [air, urban air close to ground]: 1.6047e-8 kg; lognormal variance with pedigree 1.4912, pedigree (1,1,4,1,1)
  (same comment as for Strontium)
- Vanadium, ion [water, ground-, long-term]: 1.7059e-7 kg; lognormal variance with pedigree 0.02524, pedigree (1,1,4,1,1)
  (same comment as for BOD5, Biological Oxygen Demand)
- Copper, ion [water, surface water]: 5.2704e-9 kg; lognormal variance with pedigree 1.1753, pedigree (1,1,4,1,1)
  (same comment as for BOD5, Biological Oxygen Demand)
- Vanadium, ion [water, surface water]: 5.4468e-10 kg; lognormal variance with pedigree 0.54562, pedigree (1,1,4,1,1)
  (same comment as for BOD5, Biological Oxygen Demand)
- Barium [air, urban air close to ground]: 4.484e-7 kg; lognormal variance with pedigree 0.96512, pedigree (1,1,4,1,1)
  (same comment as for Strontium)
- Zinc, ion [water, ground-, long-term]: 5.604e-5 kg; lognormal variance with pedigree 1.7555, pedigree (1,1,4,1,1)
  (same comment as for BOD5, Biological Oxygen Demand)
- Mercury [water, surface water]: 7.3974e-10 kg; lognormal variance with pedigree 1.9955, pedigree (1,1,4,1,1)
  (same comment as for BOD5, Biological Oxygen Demand)
- Zinc, ion [water, surface water]: 7.6267e-9 kg; lognormal variance with pedigree 0.80588, pedigree (1,1,4,1,1)
  (same comment as for BOD5, Biological Oxygen Demand)
- Cadmium [air, urban air close to ground]: 8.4762e-10 kg; lognormal variance with pedigree 1.5344, pedigree (1,1,4,1,1)
  (same comment as for Strontium)
- Beryllium [water, ground-, long-term]: 9.142e-7 kg; lognormal variance with pedigree 1.5393, pedigree (1,1,4,1,1)
  (same comment as for BOD5, Biological Oxygen Demand)
- Beryllium [water, surface water]: 6.0623e-10 kg; lognormal variance with pedigree 2.1805, pedigree (1,1,4,1,1)
  (same comment as for BOD5, Biological Oxygen Demand)
- Cobalt [air, urban air close to ground]: 1.3384e-9 kg; lognormal variance with pedigree 1.6346, pedigree (1,1,4,1,1)
  (same comment as for Strontium)
- Strontium [water, ground-, long-term]: 5.8213e-5 kg; lognormal variance with pedigree 1.0417, pedigree (1,1,4,1,1)
  (same comment as for BOD5, Biological Oxygen Demand)
- Strontium [water, surface water]: 3.8099e-8 kg; lognormal variance with pedigree 1.7104, pedigree (1,1,4,1,1)
  (same comment as for BOD5, Biological Oxygen Demand)
- Chromium [air, urban air close to ground]: 1.2628e-8 kg; lognormal variance with pedigree 1.2442, pedigree (1,1,4,1,1)
  (same comment as for Strontium)
- Titanium, ion [water, ground-, long-term]: 5.1445e-5 kg; lognormal variance with pedigree 1.1192, pedigree (1,1,4,1,1)
  (same comment as for BOD5, Biological Oxygen Demand)
- Titanium, ion [water, surface water]: 3.4997e-8 kg; lognormal variance with pedigree 0.6592, pedigree (1,1,4,1,1)
  (same comment as for BOD5, Biological Oxygen Demand)
- Copper [air, urban air close to ground]: 5.5772e-9 kg; lognormal variance with pedigree 1.0681, pedigree (1,1,4,1,1)
  (same comment as for Strontium)
- Thallium [water, ground-, long-term]: 1.3158e-6 kg; lognormal variance with pedigree 1.2541, pedigree (1,1,4,1,1)
  (same comment as for BOD5, Biological Oxygen Demand)
- Thallium [water, surface water]: 1.2177e-9 kg; lognormal variance with pedigree 1.5482, pedigree (1,1,4,1,1)
  (same comment as for BOD5, Biological Oxygen Demand)
- Mercury [air, urban air close to ground]: 3.9418e-9 kg; lognormal variance with pedigree 1.8393, pedigree (1,1,4,1,1)
  (same comment as for Strontium)
- Silicon [water, ground-, long-term]: 0.0016065 kg; lognormal variance with pedigree 5.1981, pedigree (1,1,4,1,1)
  (same comment as for BOD5, Biological Oxygen Demand)
- Silicon [water, surface water]: 5.1203e-6 kg; lognormal variance with pedigree 0.4391, pedigree (1,1,4,1,1)
  (same comment as for BOD5, Biological Oxygen Demand)
- Manganese [air, urban air close to ground]: 7.6813e-9 kg; lognormal variance with pedigree 1.1196, pedigree (1,1,4,1,1)
  (same comment as for Strontium)
- Iron, ion [water, ground-, long-term]: 0.00060853 kg; lognormal variance with pedigree 1.2058, pedigree (1,1,4,1,1)
  (same comment as for BOD5, Biological Oxygen Demand)
- Iron, ion [water, surface water]: 2.3398e-8 kg; lognormal variance with pedigree 1.1112, pedigree (1,1,4,1,1)
  (same comment as for BOD5, Biological Oxygen Demand)
- Molybdenum [air, urban air close to ground]: 5.6548e-9 kg; lognormal variance with pedigree 1.4045, pedigree (1,1,4,1,1)
  (same comment as for Strontium)
- Calcium, ion [water, ground-, long-term]: 0.0030305 kg; lognormal variance with pedigree 0.45935, pedigree (1,1,4,1,1)
  (same comment as for BOD5, Biological Oxygen Demand)
- Calcium, ion [water, surface water]: 6.1982e-5 kg; lognormal variance with pedigree 0.22206, pedigree (1,1,4,1,1)
  (same comment as for BOD5, Biological Oxygen Demand)
- Nickel [air, urban air close to ground]: 1.1863e-8 kg; lognormal variance with pedigree 1.3027, pedigree (1,1,4,1,1)
  (same comment as for Strontium)
- Aluminium [water, ground-, long-term]: 0.0095291 kg; lognormal variance with pedigree 0.33443, pedigree (1,1,4,1,1)
  (same comment as for BOD5, Biological Oxygen Demand)
- Aluminium [water, surface water]: 8.5997e-7 kg; lognormal variance with pedigree 0.72915, pedigree (1,1,4,1,1)
  (same comment as for BOD5, Biological Oxygen Demand)
- Lead [air, urban air close to ground]: 6.6216e-9 kg; lognormal variance with pedigree 1.0313, pedigree (1,1,4,1,1)
  (same comment as for Strontium)
- Potassium, ion [water, ground-, long-term]: 0.00095252 kg; lognormal variance with pedigree 0.40173, pedigree (1,1,4,1,1)
  (same comment as for BOD5, Biological Oxygen Demand)
- Potassium, ion [water, surface water]: 0.00035997 kg; lognormal variance with pedigree 0.23215, pedigree (1,1,4,1,1)
  (same comment as for BOD5, Biological Oxygen Demand)
- Antimony [air, urban air close to ground]: 5.6804e-13 kg; lognormal variance with pedigree 1.6914, pedigree (1,1,4,1,1)
  (same comment as for Strontium)
- Magnesium [water, ground-, long-term]: 0.0040026 kg; lognormal variance with pedigree 0.46924, pedigree (1,1,4,1,1)
  (same comment as for BOD5, Biological Oxygen Demand)
- Magnesium [water, surface water]: 3.2538e-5 kg; lognormal variance with pedigree 0.44131, pedigree (1,1,4,1,1)
  (same comment as for BOD5, Biological Oxygen Demand)
- Selenium [air, urban air close to ground]: 3.0762e-8 kg; lognormal variance with pedigree 1.4624, pedigree (1,1,4,1,1)
  (same comment as for Strontium)
- Sodium, ion [water, ground-, long-term]: 0.00060136 kg; lognormal variance with pedigree 0.44723, pedigree (1,1,4,1,1)
  (same comment as for BOD5, Biological Oxygen Demand)
- Sodium, ion [water, surface water]: 0.00030238 kg; lognormal variance with pedigree 0.21577, pedigree (1,1,4,1,1)
  (same comment as for BOD5, Biological Oxygen Demand)
- Zinc [air, urban air close to ground]: 8.365e-8 kg; lognormal variance with pedigree 0.96512, pedigree (1,1,4,1,1)
  (same comment as for Strontium)
- NMVOC, non-methane volatile organic compounds, unspecified origin [air, urban air close to ground]: 1.5007e-6 kg; lognormal variance with pedigree 0.101442, pedigree (1,1,4,1,1)
  (same comment as for Particulates, < 2.5 um)
- Chromium, ion [water, surface water]: 1.8774e-9 kg; lognormal variance with pedigree 0.81415, pedigree (1,1,4,1,1)
  (same comment as for BOD5, Biological Oxygen Demand)

## Extrapolations
This dataset has been extrapolated from year 2012 to the year of the calculation (2021). The uncertainty has been adjusted accordingly.
