# natural gas, high pressure, import from NL

Dataset: EcoSpold 2, unit process
Geography: CH
Time period: 2012-01-01 to 2021-12-31
Technology level: current
Classification: ISIC rev.4 ecoinvent: 4930:Transport via pipeline
Scenario: Business-as-Usual
System model: Allocation, cut-off by classification
Share of production covered: 100 %
Generated by: Mireille Faist Emmenegger
Published in: Faist Emmenegger, Mireille 2015
Database: ecoinvent
isCopyrightProtected: true
accessRestrictedTo: 1

## General comment
This dataset describes the transport needed for an average export of Dutch natural gas (expressed in tkm). It takes into account the parts of on- (71.6%) and offshore (28.4%) production. Gas losses and emissions during seasonal storage are included. An average distance of 900 km is estimated for the export to Switzerland.
Characteristics are based on the ecoinvent report v2 'Erdgas' from 2007: HV; 38.41 MJ/m-3; density, 0.82 kg/m-3, 0.67 kg CH4/m-3, 0.008 kg CO2/m-3

## Included activities start
Export natural gas field

## Included activities end
Distribution market of country

## Geography
The average weighted export distance is based on the trade movements 2012.

## Technology
The distance to the different countries is based on rough estimates.

## Reference product
- natural gas, high pressure: 1 m3; source BP 2014; CPC 12020: Natural gas, liquefied or in the gaseous state; By-product classification allocatable product; CAS 14493-06-2
  production volume 1.20268e9 m3
    m3 imported from NL to CH in 2012. from BP Statistical Review of World Energy, June 2014 and VSG (Verband der Schweizerischen Gasindustrie (VSG)) statistics for the year 2012 (VSG Statistik 2013).Scaled to LHV of ecoinvent v3 (39MJ/m3). Refrence(s): BP (2014). Statistical Review of World Energy, June 2014. Retrieved online from http://www.bp.com/content/dam/bp-country/de_de/PDFs/brochures/BP-statistical-review-of-world-energy-2014-full-report.pdf, 30 August, 2017. VSG (2015). Erdgas in der Schweiz. Ausgabe 2015. VSG-Jahresstatistik. Retrieved online from file:///C:/Users/FlorentineBrunner/Downloads/VSG-Jahresstatistik_2015.pdf, 30 August, 2017.
  properties: water in wet mass 0 kg, wet mass 0.84 kg, heating value, net 39 MJ, price 0.166 EUR2005, carbon content, fossil 0.602381, dry mass 0.84 kg, heating value, gross 0 MJ, water content 0, carbon content, non-fossil 0, carbon content 0.602381, carbon allocation 0.506 kg

## Inputs from technosphere
- natural gas, high pressure: 0 m3; source Faist Emmenegger, M. 2007; pedigree (1,1,1,1,1)
  incl. storage losses
  Uncertainty: a
  properties: carbon content, fossil 0.602381, heating value, net 39 MJ, dry mass 0.84 kg, wet mass 0.84 kg
  note on carbon content, fossil: An average C content of 0.506 kg C/ m3 has been assumed (this average has been calculated using data in Tab 3.5, ecoinvent v2.2 report 6_V
  note on heating value, net: Literature value, Source: United Nations Statistics Division (2018) International Recommendations for Energy Statistics (IRES). Available at: http://unstats.un.org/unsd/statcom/doc11/BG-IRES.pdf.
- transport, pipeline, long distance, natural gas: 0.738 metric ton*km; = 900*0.82/1000; lognormal variance with pedigree 0.1286, pedigree (2,1,4,1,1)
  Average distance multiplied by density of the natural gas.
  Uncertainty: A
- natural gas, high pressure: 0 m3; source Faist Emmenegger, M. 2007; pedigree (1,1,1,1,1)
  incl. storage losses
  Uncertainty: a
  properties: heating value, net 39 MJ, dry mass 0.84 kg, carbon content, fossil 0.602381, wet mass 0.84 kg
- natural gas, burned in gas motor, for storage: 0.0524 MJ; source Faist Emmenegger, M. 2007; lognormal variance with pedigree 0.0341, pedigree (4,1,4,3,3)
  Data from german industrial expert for 2001, standard technology
  Uncertainty: D
  properties: heating value, net 1 MJ
- natural gas, high pressure: 0.284028 m3; source Faist Emmenegger, M. 2007; lognormal variance with pedigree 0.0261, pedigree (4,1,4,3,1)
  incl. storage losses
  Uncertainty: a
- natural gas, high pressure: 0.716072 m3; source Faist Emmenegger, M. 2007; lognormal variance with pedigree 0.0261, pedigree (4,1,4,3,1)
  incl. storage losses
  Uncertainty: a

## Emissions to nature
All rows: source Faist Emmenegger, M. 2007
- Ethane [air, non-urban air or from high stacks]: 2.3e-6 kg; lognormal variance with pedigree 0.1286, pedigree (2,1,4,1,1)
  calculated based on average losses for storage (0.01%) and dutch gas composition
  Uncertainty: c
- Mercury [air, non-urban air or from high stacks]: 1e-12 kg; lognormal variance with pedigree 0.0486, pedigree (2,1,4,1,1)
  (same comment as for Ethane)
- Carbon dioxide, fossil [air, non-urban air or from high stacks]: 8e-7 kg; lognormal variance with pedigree 0.0086, pedigree (2,1,4,1,1)
  (same comment as for Ethane)
- Propane [air, non-urban air or from high stacks]: 3e-7 kg; lognormal variance with pedigree 0.1286, pedigree (2,1,4,1,1)
  (same comment as for Ethane)
- Methane, fossil [air, non-urban air or from high stacks]: 6.71e-5 kg; lognormal variance with pedigree 0.1286, pedigree (2,1,4,1,1)
  (same comment as for Ethane)
- Butane [air, non-urban air or from high stacks]: 1e-7 kg; lognormal variance with pedigree 0.1286, pedigree (2,1,4,1,1)
  (same comment as for Ethane)

## Sampling procedure
statistics

## Extrapolations
This dataset has been extrapolated from year 2012 to the year of the calculation (2021). The uncertainty has been adjusted accordingly.
