# treatment of waste wood pole, chrome preserved, municipal incineration

Dataset: EcoSpold 2, unit process
Geography: CH
Time period: 1994-01-01 to 2021-12-31
Technology level: outdated
Classification: ISIC rev.4 ecoinvent: 3821:Treatment and disposal of non-hazardous waste
Classification: EcoSpold01Categories: waste management/municipal incineration
Synonyms: old wood poles preserved with copper-chrome salts; CCP wood
Tags: ConvertedDataset; Treatment
Scenario: Business-as-Usual
System model: Allocation, cut-off by classification
Generated by: Gabor Doka (obsolete)
Published in: Doka G. 2007
Database: ecoinvent
isCopyrightProtected: true
accessRestrictedTo: 1

## General comment
Inventoried waste contains 100% chrome-preserved wood electricity pole; .
waste composition (wet, in ppm): upper heating value 15.36 MJ/kg; lower heating value 13.99 MJ/kg; H2O 173450; O 370840; H 49982; C 400020; S 288.79; N 983.43; P 108.57; B 58.919; Cl 329.76; Br n.a.; F 21.03; I n.a.; Ag n.a.; As 0.42061; Ba n.a.; Cd 0.19979; Co 0.086459; Cr 2281.5; Cu 786.37; Hg 0.31861; Mn 52.927; Mo 0.82721; Ni 0.5538; Pb 27.767; Sb n.a.; Se n.a.; Sn n.a.; V n.a.; Zn 17.743; Be n.a.; Sc n.a.; Sr n.a.; Ti n.a.; Tl n.a.; W n.a.; Si n.a.; Fe 15.423; Ca 130.42; Al 6.3093; K 65.176; Mg 196.85; Na 334.08;
Share of carbon in waste that is biogenic 100%.
Share of iron in waste that is metallic/recyclable 0%.
Net energy produced in MSWI: 1.3MJ/kg waste electric energy and 2.74MJ/kg waste thermal energy
Allocation of energy production: no substitution or expansion. Total burden allocated to waste disposal function of MSWI.
One kg of this waste produces 0.006974 kg of slag and 0.004072 kg of residues, which are landfilled. Additional solidification with 0.001629 kg of cement.
[This dataset was already contained in the ecoinvent database version 2. It was not individually updated during the transfer to ecoinvent version 3. Life Cycle Impact Assessment results may still have changed, as they are affected by changes in the supply chain, i.e. in other datasets. This dataset was generated following the ecoinvent quality guidelines for version 2. It may have been subject to central changes described in the ecoinvent version 3 change report (http://www.ecoinvent.org/database/ecoinvent-version-3/reports-of-changes/), and the results of the central updates were reviewed extensively. The changes added e.g. consistent water flows and other information throughout the database. The documentation of this dataset can be found in the ecoinvent reports of version 2, which are still available via the ecoinvent website. The change report linked above covers all central changes that were made during the conversion process.]

## Included activities end
waste-specific air and water emisions from incineration, auxiliary material consumption for flue gas cleaning. Short-term emissions to river water and long-term emisisons to ground water from slag compartment (from bottom slag) and residual material landfill (from solidified fly ashes and scrubber slugde). Process energy demands for MSWI.

## Geography
Specific to the technology mix encountered in Switzerland in 2000. Well applicable to modern incineration practices in Europe, North America or Japan.

## Technology
replaced by newer incineration technology with fly ash extraction. Average Swiss MSWI plants in 2000 (grate incinerators) with electrostatic precipitator for fly ash (ESP), wet flue gas scrubber and 29.4% SNCR , 32.2% SCR-high dust , 24.6% SCR-low dust -DeNOx facilities and 13.8% without Denox (by burnt waste, according to Swiss average). Share of waste incinerated in plants with magnetic scrap separation from slag : 50%. Gross electric efficiency technology mix 12.997% and Gross thermal efficiency technology mix 25.57%

## Time period
Waste composition as given in literature reference, theoretical data or other source. Transfer coefficients for modern Swiss MSWI. Emission speciation based on early 90ies data.

## Reference product
- waste wood pole, chrome preserved: -1 kg; name RP_amount_1; CPC 3928: Sawdust and wood waste and scrap; By-product classification Waste
  EcoSpold01Location=CH
  production volume 0 kg; name RP_PV_1
    outdated. Replaced by newer incineration technology with fly ash extraction.
  property price 0 EUR2005; name RP_amount_1_price_EUR2005
    Waste products are assigned a price of zero as they are assumed to require further treatment.
  property carbon content, non-fossil 0.483676
    Tab A.4, ecoinvent v2.2 report 13_I. C content has been referred to 1 kg DM,
  property heating value, net 13.99 MJ
    Value taken from the general comment of the treatment dataset.
  property carbon content 0.483676
    carbon content on a dry matter basis (reserved; not for manual entry)
  properties: carbon content, fossil 0, water content 0.25, water in wet mass 0.2 kg, wet mass 1 kg, dry mass 0.8 kg, carbon allocation 0.386941 kg

## Inputs from technosphere
- municipal waste incineration facility: 2.5e-10 unit; lognormal variance with pedigree 0.04, pedigree (1,1,5,1,1)
  EcoSpold01Location=CH
  demands per kilogram waste. uncertainty is heeded in the module
- chromium oxide, flakes: 2.9e-8 kg; lognormal variance with pedigree 2.33, pedigree (1,1,5,1,1)
  EcoSpold01Location=RER
  Proxy for vanadium pentoxide V2O5 in SCR catalyst, uncertainty calculated from uncertainty in average DeNOx input, uncertainty in the share of thermal NOx, uncertainty of nitrogen content in average municipal waste and the unertainty in nitrogen content in *this* waste.
  properties: dry mass 1 kg, wet mass 1 kg
- process-specific burdens, municipal waste incineration: 1 kg; lognormal variance with pedigree 0.04, pedigree (1,1,5,1,1)
  EcoSpold01Location=CH
  demands per kilogram waste. uncertainty is heeded in the module;activityLink introduced to establish a direct link to the corresponding regional supply of this product
- waste cement, hydrated: -0.00407 kg; name BP_amount_1; lognormal variance with pedigree 0.11, pedigree (1,1,5,1,1)
  EcoSpold01Location=CH
  Hydrated cement for solidification of landfilled residual material. Uncertainty calculated from unertainty of the waste composition of this waste and transfer coefficients in the incinerator and of the solidification recipe.
  production volume 0 kg; = ABS( BP_amount_1/ RP_amount_1* RP_PV_1)
    Calculated from the production volume of waste wood pole, chrome preserved, 20% water in proportion to the respective output amounts.
  property price 0 EUR2005; name BP_amount_1_price_EUR2005
  properties: dry mass 1 kg, wet mass 1 kg
- sodium hydroxide, without water, in 50% solution state: 0.000433 kg; lognormal variance with pedigree 0.61, pedigree (1,1,5,1,1)
  EcoSpold01Location=RER
  uncertainty calculated from uncertainty in average auxiliary material input, and the unertainty of the waste composition of this waste
  properties: wet mass 1 kg, dry mass 1 kg, heating value, net 3.03 MJ
- titanium dioxide: 1.42e-6 kg; lognormal variance with pedigree 2.33, pedigree (1,1,5,1,1)
  EcoSpold01Location=RER
  uncertainty calculated from uncertainty in average DeNOx input, uncertainty in the share of thermal NOx, uncertainty of nitrogen content in average municipal waste and the unertainty in nitrogen content in *this* waste.
  properties: dry mass 1 kg, wet mass 1 kg
- slag landfill: 1.24e-11 unit; lognormal variance with pedigree 0.08, pedigree (1,1,5,1,1)
  EcoSpold01Location=CH
  uncertainty is calculated from uncertainties in waste composition and transfer coefficients in incinerator
- ammonia, anhydrous, liquid: 4.96e-5 kg; lognormal variance with pedigree 1.61, pedigree (1,1,5,1,1)
  EcoSpold01Location=CH
  uncertainty calculated from uncertainty in average DeNOx input, uncertainty in the share of thermal NOx, uncertainty of nitrogen content in average municipal waste and the unertainty in nitrogen content in *this* waste.
  properties: wet mass 1 kg, dry mass 1 kg
- process-specific burdens, residual material landfill: 0.00407 kg; lognormal variance with pedigree 0.1, pedigree (1,1,5,1,1)
  EcoSpold01Location=CH
  uncertainty is calculated from uncertainties in waste composition and transfer coefficients in incinerator;activityLink introduced to establish a direct link to the corresponding regional supply of this product
- cement, unspecified: 0.00163 kg; lognormal variance with pedigree 0.11, pedigree (1,1,5,1,1)
  Cement for solidification of landfilled residual material. Uncertainty calculated from unertainty of the waste composition of this waste, of transfer coefficients in the incinerator and of the solidification recipe.
  EcoSpold01Location=CH
  properties: wet mass 1 kg, dry mass 1 kg
- quicklime, milled, packed: 5.79e-5 kg; lognormal variance with pedigree 0.83, pedigree (1,1,5,1,1)
  EcoSpold01Location=CH
  uncertainty calculated from uncertainty in average auxiliary material input, and the unertainty of the waste composition of this waste
  properties: dry mass 0.99 kg, water content 0.010101, wet mass 1 kg
- residual material landfill: 8.48e-12 unit; lognormal variance with pedigree 0.1, pedigree (1,1,5,1,1)
  (same comment as for slag landfill)
- process-specific burdens, slag landfill: 0.00697 kg; lognormal variance with pedigree 0.08, pedigree (1,1,5,1,1)
  uncertainty is calculated from uncertainties in waste composition and transfer coefficients in incinerator;activityLink introduced to establish a direct link to the corresponding regional supply of this product
  EcoSpold01Location=CH
- heat, district or industrial, natural gas: 0.004356 MJ; lognormal variance with pedigree 1.61, pedigree (1,1,5,1,1)
  (same comment as for titanium dioxide)
  properties: heating value, net 1 MJ
- chemical, inorganic: 2.93e-6 kg; lognormal variance with pedigree 0.24, pedigree (1,1,5,1,1)
  Proxy for Polyelectrolyte. uncertainty calculated from uncertainty in average auxiliary material input, and the unertainty of the waste composition of this waste
  EcoSpold01Location=GLO
  properties: carbon content, fossil 0.003, dry mass 1 kg, wet mass 1 kg
  note on carbon content, fossil: This dataset is an unweighted average of 20 inorganic substances (listed in Tab 88.1, ecoinvent v2.2 report 8, part II), being part of the top100 chemicals included in this database. The C-content has also been calculated as an unweighted average of the C content of the substances composing this dataset.
- chemical, organic: 1.5e-6 kg; lognormal variance with pedigree 1.26, pedigree (1,1,5,1,1)
  EcoSpold01Location=GLO
  Proxy for TMT15. uncertainty calculated from uncertainty in average auxiliary material input, and the unertainty of the waste composition of this waste
  properties: carbon content, fossil 0.628, dry mass 1 kg, wet mass 1 kg, heating value, net 19.03 MJ
  note on carbon content, fossil: This dataset is an unweighted average of 20 organic substances (listed in Tab 88.1, ecoinvent v2.2 report 8, part II), being part of the top100 chemicals included in this database. The C-content has also been calculated as an unweighted average of the C content of the substances composing this dataset.
- hydrochloric acid, without water, in 30% solution state: 1.76e-6 kg; lognormal variance with pedigree 0.24, pedigree (1,1,5,1,1)
  uncertainty calculated from uncertainty in average auxiliary material input, and the unertainty of the waste composition of this waste
  EcoSpold01Location=RER
  properties: wet mass 1 kg, dry mass 1 kg, heating value, net 3.32 MJ
- iron (III) chloride, without water, in 40% solution state: 9.9e-5 kg; lognormal variance with pedigree 0.47, pedigree (1,1,5,1,1)
  uncertainty calculated from uncertainty in average auxiliary material input, and the unertainty of the waste composition of this waste
  EcoSpold01Location=CH
  properties: wet mass 1 kg, dry mass 1 kg

## Emissions to nature
- Cobalt [water, surface water]: 1.48e-11 kg; lognormal variance with pedigree 2.37, pedigree (1,1,5,1,1)
  uncertainty is calculated from uncertainties in waste composition and transfer coefficients in incinerator and landfills
- Carbon monoxide, non-fossil [air, urban air close to ground]: 0.000223 kg; lognormal variance with pedigree 0.690625, pedigree (1,3,5,2,1)
  Literature data from switzerland and germany adapted to plant age distribution in switzerland
  Uncertainty: & basic uncertainty of 5; literature data from switzerland and germany adapted to plant age distribution in switzerland
- Carbon dioxide, non-fossil [air, urban air close to ground]: 1.45 kg; lognormal variance with pedigree 0.06, pedigree (1,1,5,1,1)
  uncertainty is calculated from uncertainties in waste composition and transfer coefficients in incinerator
- Molybdenum [air, urban air close to ground]: 1.65e-9 kg; lognormal variance with pedigree 1.65, pedigree (1,1,5,1,1)
  (same comment as for Carbon dioxide, non-fossil)
- Boron [air, urban air close to ground]: 7.07e-6 kg; lognormal variance with pedigree 1.08, pedigree (1,1,5,1,1)
  (same comment as for Carbon dioxide, non-fossil)
- Cadmium, ion [water, ground-, long-term]: 2e-9 kg; lognormal variance with pedigree 7.5, pedigree (1,1,5,1,1)
  Long-term emissions from landfilling of incineration residues. uncertainty is calculated from uncertainties in waste composition and transfer coefficients in incinerator and landfills.
- Mercury [water, ground-, long-term]: 1.66e-8 kg; lognormal variance with pedigree 3.51, pedigree (1,1,5,1,1)
  (same comment as for Cadmium, ion)
- Aluminium [air, urban air close to ground]: 9.86e-9 kg; lognormal variance with pedigree 1.39, pedigree (1,1,5,1,1)
  (same comment as for Carbon dioxide, non-fossil)
- Fluoride [water, ground-, long-term]: 1.88e-5 kg; lognormal variance with pedigree 0.83, pedigree (1,1,5,1,1)
  (same comment as for Cadmium, ion)
- TOC, Total Organic Carbon [water, ground-, long-term]: 0.00391 kg; lognormal variance with pedigree 0.06, pedigree (1,1,5,1,1)
  (same comment as for Cadmium, ion)
- Cyanide [air, urban air close to ground]: 8.85e-7 kg; lognormal variance with pedigree 1.72, pedigree (1,1,5,1,1)
  uncertainty calculated from uncertainty in average N-emissions, uncertainty in the share of thermal NOx, uncertainty of nitrogen content in average municipal waste and the unertainty in nitrogen content in *this* waste.
- Nitrogen oxides [air, urban air close to ground]: 3.13e-5 kg; lognormal variance with pedigree 1.72, pedigree (1,1,5,1,1)
  (same comment as for Cyanide)
- Potassium, ion [water, ground-, long-term]: 5.37e-5 kg; lognormal variance with pedigree 0.75, pedigree (1,1,5,1,1)
  (same comment as for Cadmium, ion)
- Arsenic [air, urban air close to ground]: 4.29e-15 kg; lognormal variance with pedigree 1.84, pedigree (1,1,5,1,1)
  (same comment as for Carbon dioxide, non-fossil)
- Ammonia [air, urban air close to ground]: 7.79e-7 kg; lognormal variance with pedigree 1.72, pedigree (1,1,5,1,1)
  (same comment as for Cyanide)
- Aluminium [water, surface water]: 5.25e-10 kg; lognormal variance with pedigree 1.56, pedigree (1,1,5,1,1)
  (same comment as for Cobalt)
- Chromium, ion [water, surface water]: 7.27e-6 kg; lognormal variance with pedigree 0.61, pedigree (1,1,5,1,1)
  (same comment as for Cobalt)
- Sulfate [water, ground-, long-term]: 0.000724 kg; lognormal variance with pedigree 0.52, pedigree (1,1,5,1,1)
  (same comment as for Cadmium, ion)
- Boron [water, ground-, long-term]: 3.88e-5 kg; lognormal variance with pedigree 0.58, pedigree (1,1,5,1,1)
  (same comment as for Cadmium, ion)
- Sodium [air, urban air close to ground]: 3.14e-6 kg; lognormal variance with pedigree 0.85, pedigree (1,1,5,1,1)
  (same comment as for Carbon dioxide, non-fossil)
- Magnesium [water, ground-, long-term]: 0.000182 kg; lognormal variance with pedigree 0.89, pedigree (1,1,5,1,1)
  (same comment as for Cadmium, ion)
- Lead [air, urban air close to ground]: 1.03e-9 kg; lognormal variance with pedigree 1.21, pedigree (1,1,5,1,1)
  (same comment as for Carbon dioxide, non-fossil)
- Sodium, ion [water, surface water]: 7.22e-5 kg; lognormal variance with pedigree 0.46, pedigree (1,1,5,1,1)
  (same comment as for Cobalt)
- Boron [water, surface water]: 9.21e-6 kg; lognormal variance with pedigree 1.02, pedigree (1,1,5,1,1)
  (same comment as for Cobalt)
- Iron, ion [water, ground-, long-term]: 7.22e-6 kg; lognormal variance with pedigree 1.97, pedigree (1,1,5,1,1)
  (same comment as for Cadmium, ion)
- Hydrogen chloride [air, urban air close to ground]: 3.66e-9 kg; lognormal variance with pedigree 0.89, pedigree (1,1,5,1,1)
  (same comment as for Carbon dioxide, non-fossil)
- Potassium, ion [water, surface water]: 1.13e-5 kg; lognormal variance with pedigree 0.67, pedigree (1,1,5,1,1)
  (same comment as for Cobalt)
- Cobalt [air, urban air close to ground]: 2.75e-15 kg; lognormal variance with pedigree 2.06, pedigree (1,1,5,1,1)
  (same comment as for Carbon dioxide, non-fossil)
- Chromium [air, urban air close to ground]: 1.69e-10 kg; lognormal variance with pedigree 0.68, pedigree (1,1,5,1,1)
  (same comment as for Carbon dioxide, non-fossil)
- Nickel [air, urban air close to ground]: 2.39e-14 kg; lognormal variance with pedigree 1.79, pedigree (1,1,5,1,1)
  (same comment as for Carbon dioxide, non-fossil)
- Nitrate [water, ground-, long-term]: 3.53e-5 kg; lognormal variance with pedigree 0.71, pedigree (1,1,5,1,1)
  (same comment as for Cadmium, ion)
- COD, Chemical Oxygen Demand [water, ground-, long-term]: 0.00987 kg; lognormal variance with pedigree 0.06, pedigree (1,1,5,1,1)
  (same comment as for Cadmium, ion)
- BOD5, Biological Oxygen Demand [water, surface water]: 1.5e-5 kg; lognormal variance with pedigree 0.17, pedigree (1,1,5,1,1)
  (same comment as for Cobalt)
- Magnesium [air, urban air close to ground]: 2.71e-7 kg; lognormal variance with pedigree 0.93, pedigree (1,1,5,1,1)
  (same comment as for Carbon dioxide, non-fossil)
- Phosphate [water, ground-, long-term]: 1.27e-5 kg; lognormal variance with pedigree 5.21, pedigree (1,1,5,1,1)
  (same comment as for Cadmium, ion)
- Lead [water, ground-, long-term]: 1.98e-6 kg; lognormal variance with pedigree 7.23, pedigree (1,1,5,1,1)
  (same comment as for Cadmium, ion)
- Dinitrogen monoxide [air, urban air close to ground]: 4.15e-6 kg; lognormal variance with pedigree 1.72, pedigree (1,1,5,1,1)
  (same comment as for Cyanide)
- Methane, non-fossil [air, urban air close to ground]: 6.38e-6 kg; lognormal variance with pedigree 0.091225, pedigree (2,3,5,2,1)
  Confidential data from 5 plants in Switzerland and Germany
  Uncertainty: & basic uncertainty of 1.5; confidential data from 5 plants in Switzerland and Germany
- Cadmium [air, urban air close to ground]: 1.1e-11 kg; lognormal variance with pedigree 1.86, pedigree (1,1,5,1,1)
  (same comment as for Carbon dioxide, non-fossil)
- DOC, Dissolved Organic Carbon [water, surface water]: 1.1e-5 kg; lognormal variance with pedigree 0.28, pedigree (1,1,5,1,1)
  (same comment as for Cobalt)
- Nickel, ion [water, ground-, long-term]: 5.19e-7 kg; lognormal variance with pedigree 1.63, pedigree (1,1,5,1,1)
  (same comment as for Cadmium, ion)
- Potassium [air, urban air close to ground]: 1.97e-7 kg; lognormal variance with pedigree 1.07, pedigree (1,1,5,1,1)
  (same comment as for Carbon dioxide, non-fossil)
- COD, Chemical Oxygen Demand [water, surface water]: 2.67e-5 kg; lognormal variance with pedigree 0.3, pedigree (1,1,5,1,1)
  (same comment as for Cobalt)
- Sodium, ion [water, ground-, long-term]: 0.000259 kg; lognormal variance with pedigree 0.57, pedigree (1,1,5,1,1)
  (same comment as for Cadmium, ion)
- DOC, Dissolved Organic Carbon [water, ground-, long-term]: 0.00391 kg; lognormal variance with pedigree 0.06, pedigree (1,1,5,1,1)
  (same comment as for Cadmium, ion)
- Cadmium, ion [water, surface water]: 9.06e-11 kg; lognormal variance with pedigree 1.77, pedigree (1,1,5,1,1)
  (same comment as for Cobalt)
- Phosphate [water, surface water]: 2.12e-8 kg; lognormal variance with pedigree 1.25, pedigree (1,1,5,1,1)
  (same comment as for Cobalt)
- Chromium VI [water, ground-, long-term]: 0.000242 kg; lognormal variance with pedigree 0.87, pedigree (1,1,5,1,1)
  (same comment as for Cadmium, ion)
- Calcium, ion [water, surface water]: 4.93e-7 kg; lognormal variance with pedigree 1.42, pedigree (1,1,5,1,1)
  (same comment as for Cobalt)
- Manganese [air, urban air close to ground]: 2.88e-13 kg; lognormal variance with pedigree 1.21, pedigree (1,1,5,1,1)
  (same comment as for Carbon dioxide, non-fossil)
- TOC, Total Organic Carbon [water, surface water]: 1.1e-5 kg; lognormal variance with pedigree 0.28, pedigree (1,1,5,1,1)
  (same comment as for Cobalt)
- Mercury [air, urban air close to ground]: 1.1e-14 kg; lognormal variance with pedigree 1.86, pedigree (1,1,5,1,1)
  (same comment as for Carbon dioxide, non-fossil)
- Zinc, ion [water, ground-, long-term]: 2.75e-7 kg; lognormal variance with pedigree 5.79, pedigree (1,1,5,1,1)
  (same comment as for Cadmium, ion)
- Mercury [water, surface water]: 3.41e-9 kg; lognormal variance with pedigree 1.72, pedigree (1,1,5,1,1)
  (same comment as for Cobalt)
- Molybdenum [water, ground-, long-term]: 6.84e-7 kg; lognormal variance with pedigree 1.63, pedigree (1,1,5,1,1)
  (same comment as for Cadmium, ion)
- Manganese [water, ground-, long-term]: 4.56e-5 kg; lognormal variance with pedigree 1.17, pedigree (1,1,5,1,1)
  (same comment as for Cadmium, ion)
- Manganese [water, surface water]: 2.96e-9 kg; lognormal variance with pedigree 1.85, pedigree (1,1,5,1,1)
  (same comment as for Cobalt)
- Chromium VI [water, surface water]: 7.43e-5 kg; lognormal variance with pedigree 0.62, pedigree (1,1,5,1,1)
  (same comment as for Cobalt)
- Zinc, ion [water, surface water]: 3.26e-9 kg; lognormal variance with pedigree 1.09, pedigree (1,1,5,1,1)
  (same comment as for Cobalt)
- Copper, ion [water, ground-, long-term]: 0.000636 kg; lognormal variance with pedigree 0.71, pedigree (1,1,5,1,1)
  (same comment as for Cadmium, ion)
- Calcium [air, urban air close to ground]: 2.17e-7 kg; lognormal variance with pedigree 0.98, pedigree (1,1,5,1,1)
  (same comment as for Carbon dioxide, non-fossil)
- Sulfate [water, surface water]: 0.00014 kg; lognormal variance with pedigree 0.43, pedigree (1,1,5,1,1)
  (same comment as for Cobalt)
- Nitrate [water, surface water]: 1.26e-5 kg; lognormal variance with pedigree 0.5, pedigree (1,1,5,1,1)
  (same comment as for Cobalt)
- Calcium, ion [water, ground-, long-term]: 0.000113 kg; lognormal variance with pedigree 0.94, pedigree (1,1,5,1,1)
  (same comment as for Cadmium, ion)
- Arsenic, ion [water, ground-, long-term]: 2.31e-7 kg; lognormal variance with pedigree 1.72, pedigree (1,1,5,1,1)
  (same comment as for Cadmium, ion)
- Hydrogen fluoride [air, urban air close to ground]: 1.11e-8 kg; lognormal variance with pedigree 1.23, pedigree (1,1,5,1,1)
  (same comment as for Carbon dioxide, non-fossil)
- Fluoride [water, surface water]: 1.62e-6 kg; lognormal variance with pedigree 0.87, pedigree (1,1,5,1,1)
  (same comment as for Cobalt)
- Copper [air, urban air close to ground]: 5.8e-9 kg; lognormal variance with pedigree 0.79, pedigree (1,1,5,1,1)
  (same comment as for Carbon dioxide, non-fossil)
- Iron [air, urban air close to ground]: 5.15e-10 kg; lognormal variance with pedigree 1.29, pedigree (1,1,5,1,1)
  (same comment as for Carbon dioxide, non-fossil)
- Cobalt [water, ground-, long-term]: 7.57e-8 kg; lognormal variance with pedigree 1.9, pedigree (1,1,5,1,1)
  (same comment as for Cadmium, ion)
- Aluminium [water, ground-, long-term]: 4.67e-6 kg; lognormal variance with pedigree 1.29, pedigree (1,1,5,1,1)
  (same comment as for Cadmium, ion)
- BOD5, Biological Oxygen Demand [water, ground-, long-term]: 0.00323 kg; lognormal variance with pedigree 0.06, pedigree (1,1,5,1,1)
  (same comment as for Cadmium, ion)
- Phosphorus [air, urban air close to ground]: 1.09e-7 kg; lognormal variance with pedigree 1.01, pedigree (1,1,5,1,1)
  (same comment as for Carbon dioxide, non-fossil)
- Molybdenum [water, surface water]: 1.41e-7 kg; lognormal variance with pedigree 1.1, pedigree (1,1,5,1,1)
  (same comment as for Cobalt)
- Copper, ion [water, surface water]: 3.19e-8 kg; lognormal variance with pedigree 1.38, pedigree (1,1,5,1,1)
  (same comment as for Cobalt)
- Lead [water, surface water]: 7.73e-10 kg; lognormal variance with pedigree 1.18, pedigree (1,1,5,1,1)
  (same comment as for Cobalt)
- Iron, ion [water, surface water]: 5.28e-9 kg; lognormal variance with pedigree 1.22, pedigree (1,1,5,1,1)
  (same comment as for Cobalt)
- Chloride [water, ground-, long-term]: 7.78e-6 kg; lognormal variance with pedigree 0.43, pedigree (1,1,5,1,1)
  (same comment as for Cadmium, ion)
- Arsenic, ion [water, surface water]: 1.9e-7 kg; lognormal variance with pedigree 1.47, pedigree (1,1,5,1,1)
  (same comment as for Cobalt)
- Sulfur dioxide [air, urban air close to ground]: 1.23e-6 kg; lognormal variance with pedigree 0.88, pedigree (1,1,5,1,1)
  (same comment as for Carbon dioxide, non-fossil)
- Nickel, ion [water, surface water]: 3.47e-10 kg; lognormal variance with pedigree 2.26, pedigree (1,1,5,1,1)
  (same comment as for Cobalt)
- Zinc [air, urban air close to ground]: 2.9e-10 kg; lognormal variance with pedigree 1.28, pedigree (1,1,5,1,1)
  (same comment as for Carbon dioxide, non-fossil)
- Chloride [water, surface water]: 0.000322 kg; lognormal variance with pedigree 0.77, pedigree (1,1,5,1,1)
  (same comment as for Cobalt)
- Magnesium [water, surface water]: 6.89e-7 kg; lognormal variance with pedigree 1.39, pedigree (1,1,5,1,1)
  (same comment as for Cobalt)

## Sampling procedure
waste-specific calculation based on literature data

## Extrapolations
This dataset has been extrapolated from year 2000 to the year of the calculation (2021). The uncertainty has been adjusted accordingly.

## Review by Niels Jungbluth 2003-08-06
Passed. Calculation for standard deviation 95 of infrastructure, land occupation, transport services and other services can differ from standard Pedigree approach used in this project and figures obtained by this procedure.
