# electricity production, cobalt industry

Dataset: EcoSpold 2, unit process
Geography: GLO
Time period: 2012-01-01 to 2021-12-31
Technology level: current
Classification: ISIC rev.4 ecoinvent: 3510:Electric power generation, transmission and distribution
Scenario: Business-as-Usual
System model: Allocation, cut-off by classification
Generated by: Andy Whiting
Database: ecoinvent
isCopyrightProtected: true
accessRestrictedTo: 1

## General comment
The purpose of this dataset is to model the electricity mix that is used by the cobalt industry. The production volume represents the total amount of electricity that is produced for the cobalt industry. Note: Large proportion of Apline hydropower is due to limited availablity of country-specific electricity emission factors at the time the cobalt industry was first assessed (2012) and has been maintained in order to be consistent with the reference sources ("The Environmental Performance of Refined Cobalt - Life Cycle Inventory and Life Cycle Assessment of Refined Cobalt - Summary Report", CDI & ERM, Novermber 2016.). Future iterations will improve this.
Details on the electricity generation with each technology can be found in the datasets that supply the inputs to this dataset.

## Included activities start
This dataset does not represent a real transformation activity. Conceptually, the activity can be said to start with the production of electricity.

## Included activities end
This dataset does not represent a real transformation activity. Conceptually, the activity can be said to end with a given amount of high voltage electricity that is supplied specifically to the cobalt industry.

## Reference product
- electricity, high voltage, cobalt industry: 1 kWh; By-product classification allocatable product; CPC 17100: Electrical energy
  production volume 2.22578e11 kWh; = 2728.47052802951*77900000*1.04719180370939
    Calculated based on the amount of "electricity, medium voltage, cobalt industry" consumed in the dataset "cobalt production" (GLO). 2728.47 kWh of electricity is required per kg of cobalt. Additionally, the production volume is scaled to take into account the electricity losses in the datasets "market for electricity, high voltage, cobalt industry", "electricity voltage transformation from high to medium voltage, cobalt industry" and "market for electricity, medium voltage, cobalt industry".
  property price 0.0977 EUR2005
    Temporary price data. Calculated as 90% of purchasers price based on: 94% of the average price (to account for a 6% loss in transformation and transmission) for electricity for industrial consumersin 2005 (excluded taxes). From IEA.

## Inputs from technosphere
- electricity, high voltage: 0.000311, 0.004168, 0.006763, 0.00094, 2e-6, 1e-6, 0.01577, 0.014417, 0.000512, 0.891613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 kWh (24 suppliers, which the file names only by identifier); sum of these 1 kWh; lognormal variance with pedigree 0.041925, pedigree (2,2,5,2,2)
  Value obtained from the industry. The amount reflects the split of electricity generating technologies seen in the geographic regions covered by the sample, relative to the amount of cobalt metal produced in the regions included in the sample.

## Sampling procedure
Grid electricity for each country where electricity use is reported was represented by datasets from ecoinvent (v3.1). Where country-specific datasets for electricity generation were not available in ecoinvent, national or regional grid electricity was modelled based on power generation by fuel type from ecoinvent (v3.1) and national statistics on electricity mixes from the International Energy Agency (IEA 2011).

## Extrapolations
This dataset has been extrapolated from year 2012 to the year of the calculation (2021). The uncertainty has been adjusted accordingly.
