# dried roughage store construction, air dried, solar

Dataset: EcoSpold 2, unit process
Geography: RoW
Time period: 1994-01-01 to 2021-12-31
Technology level: current
Classification: EcoSpold01Categories: agricultural means of production/buildings
Classification: ISIC rev.4 ecoinvent: 4100:Construction of buildings
Tags: ConvertedDataset
Scenario: Business-as-Usual
System model: Allocation, cut-off by classification
Generated by: Dunja Dux
Published in: Nemecek, T. 2007
Database: ecoinvent
isCopyrightProtected: true
accessRestrictedTo: 1

## General comment
The module includes the installations for the dried roughage store (ventilator, impeller blower with telescopic spreader, ventilation rust) and the part of the building around the store (floor, walls and roof). Also included is a double roof structure for to warm the air by sun. Size: 830 m3. Lifetime of the building is 50 years.
[This dataset was already contained in the ecoinvent database version 2. It was not individually updated during the transfer to ecoinvent version 3. Life Cycle Impact Assessment results may still have changed, as they are affected by changes in the supply chain, i.e. in other datasets. This dataset was generated following the ecoinvent quality guidelines for version 2. It may have been subject to central changes described in the ecoinvent version 3 change report (http://www.ecoinvent.org/database/ecoinvent-version-3/reports-of-changes/), and the results of the central updates were reviewed extensively. The changes added e.g. consistent water flows and other information throughout the database. The documentation of this dataset can be found in the ecoinvent reports of version 2, which are still available via the ecoinvent website. The change report linked above covers all central changes that were made during the conversion process.]

## Included activities end
The inventory takes into account the use of construction materials and building machines for construction, repair and replacement including waste disposal and the transportation of the materials to the building site. Not taken into account were direct emission of the construction, disposal of production waste and the use of resources during utilization phase.

## Geography
The inventory applies for Swiss agricultural buildings only, because of the solid method of construction.

## Technology
The data of the inventory are based on one example of a typical agricultural building.

## Reference product
- dried roughage store, air dried, solar: 1 m3; CPC 53121: Industrial buildings; By-product classification allocatable product
  EcoSpold01Location=CH
  production volume 3.96633 m3
    This is a placeholder value that does not reflect real-world production volumes. This dataset does not currently require a real-world production volume to work in the database framework, and no actual data were collected yet. This has no negative effect on the results of the ecoinvent database.
  property price 55.9833 EUR2005
    Calculated based on inputs: The price of the product has been calculated as a sum of the values of the material and energy inputs for this product. This value is therefore a rough estimation. It may underestimate the real price since there are additional expenses when producing any product. These expences can include for example labour costs, treatment of waste materials and profit for the producer. Please consider carefully whether this level of data quality is acceptable for your application.

## Inputs from technosphere
- steel, low-alloyed, hot rolled: 1.32 kg; lognormal variance with pedigree 0.0421, pedigree (1,2,5,5,1)
  EcoSpold01Location=RER
  properties: carbon content, fossil 0.005, dry mass 1 kg, wet mass 1 kg
  note on carbon content, fossil: Low alloyed steel composition given in Tab. 3.2 ecoinvent v2.2 report 10_partII. Steel assumed to have a C content of 0.5%
- excavation, hydraulic digger: 0.098 m3; lognormal variance with pedigree 0.0421, pedigree (1,2,5,5,1)
  EcoSpold01Location=RER
- sheet rolling, steel: 1.32 kg; lognormal variance with pedigree 0.0421, pedigree (1,2,5,5,1)
  EcoSpold01Location=RER
- waste concrete, not reinforced: 0 kg; pedigree (1,1,1,1,1)
  EcoSpold01Location=CH
  production volume 0 kg
    Calculated from the production volume of dried roughage store, air dried, solar in proportion to the respective output amounts.
  properties: wet mass 1 kg, dry mass 1 kg
- fibre cement facing tile: 10.4 kg; lognormal variance with pedigree 0.0421, pedigree (1,2,5,5,1)
  EcoSpold01Location=CH
  properties: carbon content, fossil 0.0201818, carbon content, non-fossil 0.0115, wet mass 1 kg, dry mass 1 kg
  note on carbon content, fossil: Tab 5.1, ecoinvent v2.2 report 7, part IX. Fibres (pulp) 2.5%. Fibres (polyvinyl alcohol) 3.7%. C-content/dry mass of natural fibres was considered 46% (from "Evolutionary and Biochemical Aspects", A.D. Kay and T. Vrede (in Global Ecology, 2010, Elsevier B.V., S.E. Jørgensen Ed.)). C-content/dry mass of polyvinyl alcohol ((C2H4O)x) was considered =24/44.
- polyethylene, high density, granulate: 0.00631 kg; lognormal variance with pedigree 0.0421, pedigree (1,2,5,5,1)
  EcoSpold01Location=RER
  properties: dry mass 1 kg, carbon content, fossil 0.857143, wet mass 1 kg, heating value, net 42.47 MJ
  note on carbon content, fossil: Polyethylene is formed out of a huge amount of ethylene monomers (C2H4) (ecoinvent v2.2 report 11_II). MW=28 g/mol
- waste building wood, chrome preserved: -6.3 kg; lognormal variance with pedigree 0.0421, pedigree (1,2,5,5,1)
  EcoSpold01Location=CH
  production volume 18.9 kg
    (same comment as for waste concrete, not reinforced)
  properties: heating value, net 11.63 MJ, wet mass 1 kg, dry mass 0.8 kg, carbon content, non-fossil 0.484262, water content 0.25
  note on carbon content, non-fossil: C content per kg DM was calculated using information in Tab A.4, ecoinvent v2.2 report 13_I
- lean concrete: 0.00119 m3; lognormal variance with pedigree 0.0421, pedigree (1,2,5,5,1)
  EcoSpold01Location=CH
  properties: water content 0.0528846, dry mass 2080 kg, wet mass 2190 kg
- gravel, round: 85.6 kg; lognormal variance with pedigree 0.0421, pedigree (1,2,5,5,1)
  EcoSpold01Location=CH
  properties: wet mass 1 kg, dry mass 1 kg
- excavation, skid-steer loader: 0.00178 m3; lognormal variance with pedigree 0.0421, pedigree (1,2,5,5,1)
  EcoSpold01Location=RER
- cast iron: 2.79 kg; lognormal variance with pedigree 0.0421, pedigree (1,2,5,5,1)
  EcoSpold01Location=RER
  properties: carbon content, fossil 0.04, dry mass 1 kg, wet mass 1 kg
  note on carbon content, fossil: Cast iron is made by remelting pig iron in small furnaces (e.g. cupola furnaces or electric arc furnaces) and poured into moulds to make castings. It usually contains 2% to 6% carbon (ecoinvent v2.2 report 10_partII). An average content of 4% was considered
- particleboard, uncoated: 0.0556 m3; lognormal variance with pedigree 0.0421, pedigree (1,2,5,5,1)
  EcoSpold01Location=RER
  properties: heating value, net 8749.71 MJ, carbon content, fossil 0.045339, carbon content, non-fossil 0.4416, water content 0.0629067, wet mass 637 kg, dry mass 599.3 kg
- waste brick: 0 kg; pedigree (1,1,1,1,1)
  EcoSpold01Location=CH
  production volume 0 kg
    (same comment as for waste concrete, not reinforced)
  properties: wet mass 1 kg, dry mass 1 kg
- glued laminated timber, average glue mix: 0 m3; pedigree (1,1,1,1,1)
  EcoSpold01Location=RER
  properties: carbon content, fossil 0.01791, dry mass 404.4 kg, price 298 EUR2005, carbon content, non-fossil 0.441932, wet mass 444 kg, heating value, net 5537.41 MJ, water content 0.0979228
- copper, cathode: 1.4 kg; lognormal variance with pedigree 0.0421, pedigree (1,2,5,5,1)
  EcoSpold01Location=RER
  properties: wet mass 1 kg, dry mass 1 kg
- extrusion, plastic film: 0.00631 kg; lognormal variance with pedigree 0.0421, pedigree (1,2,5,5,1)
  EcoSpold01Location=RER
- sawnwood, softwood, dried (u=20%), planed: 0.0781 m3; lognormal variance with pedigree 0.0421, pedigree (1,2,5,5,1)
  EcoSpold01Location=RER
  properties: water content 0.2, carbon content, non-fossil 0.494, dry mass 450 kg, wet mass 540 kg, heating value, net 6514.84 MJ
  note on carbon content, non-fossil: C content of dry mass is 0.494 kgC/kg dry wood (ecoinvent v2.2 report 9)
- zinc coat, coils: 0.281 m2; lognormal variance with pedigree 0.0421, pedigree (1,2,5,5,1)
  EcoSpold01Location=RER
- concrete, normal: 0 m3; pedigree (1,1,1,1,1)
  EcoSpold01Location=CH
  properties: water content 0.086758, dry mass 2190 kg, wet mass 2380 kg
- fibre cement corrugated slab: 1.82 kg; lognormal variance with pedigree 0.0421, pedigree (1,2,5,5,1)
  EcoSpold01Location=CH
  properties: wet mass 1 kg, dry mass 1 kg, carbon content, non-fossil 0.01656, carbon content, fossil 0.00981818
  note on carbon content, non-fossil: Tab 5.1, ecoinvent v2.2 report 7, part IX. Fibres (pulp) 3.6%. Fibres (polyvinyl alcohol) 1.8%. C-content/dry mass of natural fibres was considered 46% (from "Evolutionary and Biochemical Aspects", A.D. Kay and T. Vrede (in Global Ecology, 2010, Elsevier B.V., S.E. Jørgensen Ed.)). C-content/dry mass of polyvinyl alcohol ((C2H4O)x) was considered =24/44.
- waste bulk iron, excluding reinforcement: 0 kg; pedigree (1,1,1,1,1)
  EcoSpold01Location=CH
  production volume 0 kg
    (same comment as for waste concrete, not reinforced)
  properties: wet mass 1 kg, dry mass 1 kg
- electricity, low voltage: 0 kWh; pedigree (1,1,1,1,1)
  EcoSpold01Location=CH
- aluminium, cast alloy: 0.07456 kg; lognormal variance with pedigree 0.0421, pedigree (1,2,5,5,1)
  EcoSpold01Location=RER
  properties: wet mass 1 kg, dry mass 1 kg
- reinforcing steel: 1.86 kg; lognormal variance with pedigree 0.0421, pedigree (1,2,5,5,1)
  EcoSpold01Location=RER
  properties: wet mass 1 kg, carbon content, fossil 0.004, dry mass 1 kg
- aluminium, wrought alloy: 0.15844 kg; lognormal variance with pedigree 0.0421, pedigree (1,2,5,5,1)
  EcoSpold01Location=RER
  properties: wet mass 1 kg, dry mass 1 kg
- zinc coat, pieces: 0.00429 m2; lognormal variance with pedigree 0.0421, pedigree (1,2,5,5,1)
  EcoSpold01Location=RER
- waste polyethylene/polypropylene product: 0 kg; pedigree (1,1,1,1,1)
  EcoSpold01Location=CH
  production volume 0 kg
    (same comment as for waste concrete, not reinforced)
  properties: wet mass 1 kg, water content 0.180638, dry mass 0.847 kg, carbon content, fossil 0.748045, heating value, net 42.47 MJ
  note on carbon content, fossil: Mixed various plastics was used to estimate the C content of this waste (Tab A.2, ecoinvent v2.2 report 13_I)
- waste wood, untreated: 0 kg; pedigree (1,1,1,1,1)
  EcoSpold01Location=CH
  production volume 0 kg
    (same comment as for waste concrete, not reinforced)
  properties: carbon content, non-fossil 0.48632, wet mass 1 kg, dry mass 0.8 kg, heating value, net 13.99 MJ, water content 0.25
  note on carbon content, non-fossil: Tab A.4, ecoinvent v2.2 report 13_I. C content has been referred to 1 kg DM,
  note on heating value, net: Value taken from the general comment of the treatment dataset.
- waste fibreboard: -36.1 kg; lognormal variance with pedigree 0.0421, pedigree (1,2,5,5,1)
  EcoSpold01Location=CH
  production volume 108.3 kg
    (same comment as for waste concrete, not reinforced)
  properties: dry mass 0.84245 kg, wet mass 1 kg, carbon content, fossil 0.0731794, water content 0.187014, carbon content, non-fossil 0.439195, heating value, net 12.69 MJ
  note on carbon content, fossil: The waste contains 0.925kg untreated wood (Tab A.4 for details) and 0.075kg polyurethane (Tab A.1 for details), (ecoinvent v2.2 report 13_I)
- waste reinforced concrete: 0 kg; pedigree (1,1,1,1,1)
  EcoSpold01Location=CH
  production volume 0 kg
    (same comment as for waste concrete, not reinforced)
  properties: water content 0.00585407, dry mass 0.99418 kg, wet mass 1 kg
- waste concrete, not reinforced: -0.171559, -2.44844 kg (2 entries); lognormal variance with pedigree 0.0421, pedigree (1,2,5,5,1)
  EcoSpold01Location=CH
  production volume 7.86 kg
- waste brick: -0.158556, -12.0414 kg (2 entries); lognormal variance with pedigree 0.0421, pedigree (1,2,5,5,1)
  EcoSpold01Location=CH
  production volume 36.6 kg
- glued laminated timber, average glue mix: 0.0028822, 0.0062578 m3 (2 entries); lognormal variance with pedigree 0.0421, pedigree (1,2,5,5,1)
  EcoSpold01Location=RER
- concrete, normal: 0.00153344, 0.000159782, 0.00129355, 0.000727622, 0.00308127, 0.00010393, 0.0609004 m3 (7 entries); lognormal variance with pedigree 0.0421, pedigree (1,2,5,5,1)
  EcoSpold01Location=CH
- waste bulk iron, excluding reinforcement: -1.79253, -3.72747 kg (2 entries); lognormal variance with pedigree 0.0421, pedigree (1,2,5,5,1)
  EcoSpold01Location=CH
  production volume 16.56 kg
- electricity, low voltage: 0.00894683, 0.00162905, 0.0367738, 0.128479, 0.0262297, 0.402709, 0.0651513, 0.187081 kWh (8 entries); lognormal variance with pedigree 0.0421, pedigree (1,2,5,5,1)
  EcoSpold01Location=CH
- waste polyethylene/polypropylene product: -0.00178494, -0.00452506 kg (2 entries); lognormal variance with pedigree 0.0421, pedigree (1,2,5,5,1)
  EcoSpold01Location=CH
  production volume 0.01893 kg
- waste wood, untreated: -2.25034, -0.279414, -0.0204283, -0.78479, -0.118563, -0.187438, -3.50381, -29.8552 kg (8 entries); lognormal variance with pedigree 0.0421, pedigree (1,2,5,5,1)
  EcoSpold01Location=CH
  production volume 111 kg
- waste reinforced concrete: -9.88754, -141.112 kg (2 entries); lognormal variance with pedigree 0.0421, pedigree (1,2,5,5,1)
  EcoSpold01Location=CH
  production volume 453 kg

## Inputs from nature
- Occupation, urban, discontinuously built [natural resource, land]: 15.8 m2*year; lognormal variance with pedigree 0.0821, pedigree (1,2,5,5,1)
- Transformation, from pasture, man made [natural resource, land]: 0.316 m2; lognormal variance with pedigree 0.1621, pedigree (1,2,5,5,1)
- Transformation, to urban, discontinuously built [natural resource, land]: 0.316 m2; lognormal variance with pedigree 0.1621, pedigree (1,2,5,5,1)
- Occupation, construction site [natural resource, land]: 0.316 m2*year; lognormal variance with pedigree 0.0821, pedigree (1,2,5,5,1)

## Sampling procedure
The inventory is calculated based on a solid database of agricultural buildings.

## Extrapolations
This dataset has been copied from an original dataset covering the geography CH. The uncertainty has been adjusted accordingly.

## Review by Roland Hischier 2003-08-06
Passed.
