# gold-silver mine operation with refinery

Dataset: EcoSpold 2, unit process
Geography: PG
Time period: 2000-01-01 to 2021-12-31
Technology level: current
Classification: ISIC rev.4 ecoinvent: 0729:Mining of other non-ferrous metal ores
Tags: ConvertedDataset
Scenario: Business-as-Usual
System model: Allocation, cut-off by classification
Generated by: Matthias Tuchschmid (obsolete)
Published in: Classen M. 2009
Database: ecoinvent
isCopyrightProtected: true
accessRestrictedTo: 1

## General comment
This dataset describes the joint production of 23570 kg of gold and 24000 kg of silver, at refinery. Data was taken from the environmental report of Placer Dome Inc. and Barrick for the Misima Mine and the Porgera Mine, respectively - both open pit mines -. Data for reference flows, by products and most exchanges was calculated by adding the corresponding inputs or outputs of each mine. For the Misima Mine data from 2000 is used, when the Misima Mine was still producing. For the Porgera Mine data from 2006 is used where available, the consumption of some material requirements is scaled with the weight of processed gold and data from the year 2002.
[This dataset was already contained in the ecoinvent database version 2. It was not individually updated during the transfer to ecoinvent version 3. Life Cycle Impact Assessment results may still have changed, as they are affected by changes in the supply chain, i.e. in other datasets. This dataset was generated following the ecoinvent quality guidelines for version 2. It may have been subject to central changes described in the ecoinvent version 3 change report (http://www.ecoinvent.org/database/ecoinvent-version-3/reports-of-changes/), and the results of the central updates were reviewed extensively. The changes added e.g. consistent water flows and other information throughout the database. The documentation of this dataset can be found in the ecoinvent reports of version 2, which are still available via the ecoinvent website. The change report linked above covers all central changes that were made during the conversion process.]

## Included activities start
From the transport of raw materials to the mine.

## Included activities end
This activity ends with the refining of gold and silver by means of Wohlwill and Möbius electrolysis, respectively.

This data set includes the mining and beneficiation of the metals, the smelting, the energy, materials and land consumption, and the air and water emissions.

The dataset does not include the emissions from the refining step.

## Geography
Material requirements are estimated with Australian data, Air emissions are estimated with Swedish data.

## Technology
OPEN PIT MINING:
The ore is mined in four steps: drilling, blasting, loading and hauling. In the case of a surface mine, a pattern of holes is drilled in the pit and filled with explosives. The explosives are detonated in order to break up the ground so large shovels or front-end loaders can load it into haul trucks.
ORE AND WASTE HAULAGE:
The haul trucks transport the ore to various areas for processing. The grade and type of ore determine the processing method used. Higher-grade ores are taken to a mill. Lower grade ores are taken to leach pads. Some ores may be stockpiled for later processing.
HEAP LEACHING:
The recovery processes of the Misima Mine are cyanide leach and carbon in pulp (CIP). The ore is crushed or placed directly on lined leach pads where a dilute cyanide solution is applied to the surface of the heap. The solution percolates down through the ore, where it leaches the gold and flows to a central collection location. The solution is recovered in this closed system. The pregnant leach solution is fed to electrowinning cells and undergoes the same steps as described below from Electro-winning.
ORE PROCESSING:
Milling: The ore is fed into a series of grinding mills where steel balls grind the ore to a fine slurry or powder.
Oxidization and leaching: The recovery process in the Porgera Mine is pressure oxidation and cyanide leach. The slurry is pressure-oxidized in an autoclave before going to the leaching tanks or a dry powder is fed through a roaster in which it is oxidized using heat before being sent to the leaching tanks as a slurry. The slurry is thickened and runs through a series of leaching tanks. The gold in the slurry adheres to carbon in the tanks.
Stripping: The carbon is then moved into a stripping vessel where the gold is removed from the carbon by pumping a hot caustic solution through the carbon. The carbon is later recycled.
Electro-winning: The gold-bearing solution is pumped through electro-winning cells or through a zinc precipitation circuit where the gold is recovered from the solution.
Smelting: The gold is then melted in a furnace at about 1’064°C and poured into moulds, creating doré bars. Doré bars are unrefined gold bullion bars containing between 60% and 95% gold.
WATER SUPPLY:
For Misima Mine, process water is supplied from pit dewatering bores and in-pit water. Potable water is sourced from boreholes in the coastal limestone.
For Porgera Mine, the main water supply of the mine is the Waile Creek Dam, located approximately 7 kilometres from the mine. The reservoir has a capacity of approximately 717, 000 m3 of water. Water for the grinding circuit is also extracted from Kogai Creek, which is located adjacent to the grinding circuit. The mine operates four water treatment plants for potable water and five sewage treatment plants.
ENERGY SUPPLY:
For Misima Mine, electricity is produced by the mine on site or with own power generators, from diesel and heavy fuel oil.
For Porgera Mine, electricity is produced by the mine on site. Assumed with Mobius / Wohlwill electrolysis. Porgera's principal source of power is supplied by a 73-kilometre transmission line from the gas fired and PJV-owned Hides Power Station. The station has a total output of 62 megawatts (“MW”). A back up diesel power station is located at the mine and has an output of 13MW. The average power requirement of the mine is about 60 MW.
For both Misima and Porgera Mines, an 18 MW diesel fired power station supplies electrical power. Diesel was used in the station due to the unavailability of previously supplied heavy fuel oil.

## Time period
Period of two public environmental report

## Parameters
- fraction, process water, to air: 0.15 dimensionless; name fraction_PW_to_air; lognormal variance with pedigree 0.092025, pedigree (4,4,3,2,4)
  Literature value. In case when no industry/process specific data are available, default evaporation fraction value is used. This value is 15% and is based on literature (Statistics Canada, 2007 & Shaffer, K.H., 2008, Consumptive water use in the Great Lakes Basin, USGS & Shiklomanov, 2003, World Water Resources at the Beginning of the 21st Century) and has been approved by an expert.

## Reference product
- gold: 0 kg; By-product classification allocatable product; CPC 41320: Gold (including gold plated with platinum), unwrought or in semi-manufactured forms, or in powder form; CAS 7440-57-5
  Gold is considered a precious metal because of its rarity and corrosion resistance. Gold is often mined together with silver in polymetallic mines. Apart from copper, Gold is the only metallic element with a color different from a grey tone. It is a soft yellow metal with a moderately high melting point (1064°C) and a high electrical and thermal conductivity exceeded only among the elements by silver and copper. It is the most malleable and ductile of the metals. One ounce of gold can be beaten in to foil some 300 square feet in area.
  Uses: Gold is used mainly for jewellery, electronics and other industrial and decorative appliances. In electric/electronic devices, it is mostly used as connector or as solder paste (Goosey & Kellner, 2002). The latter one is typically a gold alloy incorporating Si (98%Au, 2%Si), Ge (87.5%Au, 12.5%Ge), In (82%Au, 18%In) or Sn (80%Au, 20%Sn).
  production volume 23600 kg
    23.57 t gold and 24 t silver per year
    Limited to open pit mines in Papua New Guinea. Not total production of gold in Papua New Guinea.
  property price 25128.4 EUR2005
    Price calculated as 5-year market average (2015-2019; USD/kg; USGS [2020]) and converted to EUR2005 (USD2019/EUR2005 exchange rate: 0.62; Official Data Foundation [2020] and Macrotrends [2020]).
    References:
    Official Data Foundation (2020). Inflation Calculator [Online]. Available from: https://www.officialdata.org/us/inflation/2005?endYear=2019&amount=1 [Accessed 28/07/2020]
    USGS (2020). Mineral Commodity Summaries 2020 [Online]. Available from: https://pubs.usgs.gov/periodicals/mcs2020/mcs2020.pdf [Accessed 28/07/2020]
    Macrotrends (2020). Euro Dollar Exchange Rate (EUR USD) - Historical Chart [Online]. Available from: https://www.macrotrends.net/2548/euro-dollar-exchange-rate-historical-chart [Accessed 28/07/2020]
  property carbon content 0
    carbon content on a dry matter basis (reserved; not for manual entry)
  property true value 5.92276e8
    allocation property applied in "true value" allocation // value calculated from revenue
  properties: dry mass 1 kg, carbon content, non-fossil 0, water content 0, carbon content, fossil 0, wet mass 1 kg, water in wet mass 0 kg, carbon allocation 0 kg
- silver: 1 kg; CPC 41310: Silver (including silver plated with gold or platinum), unwrought or in semi-manufactured forms, or in powder […]; By-product classification allocatable product; CAS 7440-22-4
  Silver is considered a precious metal because of its rarity and corrosion resistance. Silver is often mined together with gold in polymetallic mines. Silver has a moderately high melting point (961.9°C) and the highest electrical and thermal conductivity of all metals. When in the metallic form, silver is unaffected by water or oxygen, but is altered by ozone with the formation of silver oxide, and by sulphur and other sulphur compounds with the formation of silver sulphide (Gasparrini, 1993).
  Uses: The principal users of silver are industrial applications, photography and jewellery.
  production volume 24030.5 kg
    23.57 t gold and 24 t silver per year
    Limited to open pit mines in Papua New Guinea. Not total production of silver in Papua New Guinea.
  property price 324.357 EUR2005
    (same comment as for gold)
  property carbon content 0
    carbon content on a dry matter basis (reserved; not for manual entry)
  property true value 7.78458e6
    allocation property applied in "true value" allocation // value calculated from revenue
  properties: dry mass 1 kg, carbon content, fossil 0, water in wet mass 0 kg, water content 0, carbon content, non-fossil 0, wet mass 1 kg, carbon allocation 0 kg

## Inputs from technosphere
- zinc: 0.0368789 kg; source Barrick  2006; lognormal variance with pedigree 0.0432, pedigree (2,3,5,5,1)
  Calculated value: Data for both mines was obtained from Australian mining, scaled by processed gold.
  Further references:
  Placer Dome Inc. (2001) Misima Mine - Sustainability Report 2000. Place Dome Inc, Papua New Guinea.
  Stewart M. (1999) Environmental Life Cycle Considerations for Design-Related Decision Making in Minerals Processing. PhD Thesis. University of Cape Town, Cape Town.
  Uncertainty: C
  properties: wet mass 1 kg, dry mass 1 kg
- precious metal refinery: 4.2327e-9 unit; source Barrick  2006; lognormal variance with pedigree 0.448, pedigree (4,5,5,5,5)
  Proxy: Refinery infrastructure is approximated with 'precious metal refinery'.
  Uncertainty: E
- sulfidic tailings, from gold mine operation: -4349.95 kg; source Placer Dome Inc. 2002; lognormal variance with pedigree 0.1786, pedigree (4,5,5,5,5)
  Calculated value.
  Uncertainty: E
  production volume 8.05764e9 kg
    Calculated from the production volume of gold in proportion to the respective output amounts.
  properties: sodium content 0.0014916, oxygen content 0.88758, dry mass 0.7 kg, wet mass 1 kg, aluminium content 0.017079, silicon content 0.056714, potassium content 0.0031243, iron content 0.014628, magnesium content 0.0020127, calcium content 0.0037589, water content 0.428571, carbon content, fossil 0.0087785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
- lime, packed: 15.9135 kg; source Placer Dome Inc. 2001; lognormal variance with pedigree 0.0427, pedigree (2,4,5,3,1)
  Calculated value: Value for Porgera Mine was scaled from consumption in 2003 by processed gold.
  Further references:
  Placer Dome Inc. (2003b) Porgera Mine - Sustainability Report. Place Dome Inc, Papua New Guinea.
  Uncertainty: E
  properties: carbon content, fossil 0.117492, water content 0.00200401, wet mass 1 kg, dry mass 0.998 kg
  note on carbon content, fossil: Table 3.1, ecoinvent v2.2 report 7, part VII, pg 3. MW CaCO3=100, MW MgCO3=84
- hydrochloric acid, without water, in 30% solution state: 0.166141 kg; source Placer Dome Inc. 2003; lognormal variance with pedigree 0.0413, pedigree (2,3,5,3,1)
  Calculated value: Value for Porgera Mine was scaled from consumption in 2003 by processed gold.
  Uncertainty: E
  properties: dry mass 1 kg, wet mass 1 kg, heating value, net 3.32 MJ
- sulfuric acid: 0.0472216 kg; source Barrick  2006; lognormal variance with pedigree 0.0432, pedigree (2,3,5,5,1)
  (same comment as for zinc)
  properties: wet mass 1 kg, dry mass 1 kg
- acetylene: 0.00150492 kg; source Placer Dome Inc. 2001; lognormal variance with pedigree 0.0427, pedigree (2,4,5,3,1)
  Calculated value: Amount represents a consumption of 2.69E03 m3 of acetylene, converted into acetylene kilograms by use of a factor of 1.095 kg / m3, at 15 C.
  Uncertainty: E
  properties: heating value, net 51.2 MJ, dry mass 1 kg, carbon content, fossil 0.923077, wet mass 1 kg
  note on heating value, net: Based on literature, page 25 (Value may refer to HHV), Althaus H.-J., Chudacoff M., Hischier R., Jungbluth N., Osses M. and Primas A. (2007) Life Cycle Inventories of Chemicals. Final report ecoinvent data v2.0 No. 8. EMPA, Swiss Centre for Life Cycle Inventories, Dübendorf, CH, Online-Version under: www.ecoinvent.org.
  note on carbon content, fossil: C2H2. ecoinvent v2.2 report n 8. Produced from partial oxidation of natural gas
- sodium cyanide: 1.60811 kg; source Placer Dome Inc. 2001; lognormal variance with pedigree 0.0427, pedigree (2,4,5,3,1)
  Calculated value.
  Proxy: Cyanide is approximated with 'sodium cyanide'.
  Further references:
  Barrick (2006b) Environment: Performance Tables from
  <http://www.barrick.com/Default.aspx?SectionID=8906c4bd-4ee4-4f15-bf1b-565e357c01e1&LanguageId=1>
  Uncertainty: E
  properties: dry mass 1 kg, wet mass 1 kg, carbon content, fossil 0.244898, heating value, net 7.43 MJ
- chemical, organic: 0.379168 kg; source Barrick  2006; lognormal variance with pedigree 0.0432, pedigree (2,3,5,5,1)
  Calculated value.
  Proxy: Both flocculant and flotation chemicals are approximated with 'chemical, organic'.
  Further references:
  Placer Dome Inc. (2001) Misima Mine - Sustainability Report 2000. Place Dome Inc, Papua New Guinea.
  Uncertainty: E
  properties: heating value, net 19.03 MJ, carbon content, fossil 0.628, dry mass 1 kg, wet mass 1 kg
  note on carbon content, fossil: This dataset is an unweighted average of 20 organic substances (listed in Tab 88.1, ecoinvent v2.2 report 8, part II), being part of the top100 chemicals included in this database. The C-content has also been calculated as an unweighted average of the C content of the substances composing this dataset.
- diesel, burned in diesel-electric generating set, 10MW: 15.2665 MJ; source Placer Dome Inc. 2001; lognormal variance with pedigree 0.0427, pedigree (2,4,5,3,1)
  Proxy: Diesel for generators is approximated with 'diesel, burned in building machine'.
  Uncertainty: E
  properties: heating value, net 1 MJ
- charcoal: 0.426335 kg; source Barrick  2006; lognormal variance with pedigree 0.0432, pedigree (2,3,5,5,1)
  Calculated value: Data for both mines was obtained from Australian mining, scaled by processed gold.
  Proxy: Carbon is approximated with 'charcoal'.
  Further references:
  Placer Dome Inc. (2001) Misima Mine - Sustainability Report 2000. Place Dome Inc, Papua New Guinea.
  Stewart M. (1999) Environmental Life Cycle Considerations for Design-Related Decision Making in Minerals Processing. PhD Thesis. University of Cape Town, Cape Town.
  Uncertainty: C
  properties: heating value, net 28.4 MJ, dry mass 1 kg, carbon content, non-fossil 0.8, wet mass 1 kg
  note on heating value, net: Indicative value. Reference: Fuels - Higher and Lower Calorific Values, available at: https://www.engineeringtoolbox.com/fuels-higher-calorific-values-d_169.html
- sodium hydroxide, without water, in 50% solution state: 0.148362 kg; source Barrick  2006; lognormal variance with pedigree 0.0432, pedigree (2,3,5,5,1)
  Calculated value: Data for both mines was obtained from Australian mining, scaled by processed gold.
  Proxy: Caustic is approximated with 'sodium hydroxide, without water, in 50% solution state'.
  Further references:
  Placer Dome Inc. (2001) Misima Mine - Sustainability Report 2000. Place Dome Inc, Papua New Guinea.
  Stewart M. (1999) Environmental Life Cycle Considerations for Design-Related Decision Making in Minerals Processing. PhD Thesis. University of Cape Town, Cape Town.
  Uncertainty: C
  properties: wet mass 1 kg, dry mass 1 kg, heating value, net 3.03 MJ
- diesel, burned in building machine: 1986.81 MJ; source Barrick  2006; lognormal variance with pedigree 0.0427, pedigree (2,4,5,3,1)
  Calculated value.
  Further references:
  Placer Dome Inc. (2001) Misima Mine - Sustainability Report 2000. Place Dome Inc, Papua New Guinea.
  Uncertainty: E
  properties: heating value, net 1 MJ
- blasting: 2.69892 kg; source Barrick  2006; lognormal variance with pedigree 0.0413, pedigree (2,3,5,3,1)
  Calculated value.
  Estimation: This exchange consists partly of ANFO explosives.
  Further references:
  Placer Dome Inc. (2003b) Porgera Mine - Sustainability Report. Place Dome Inc, Papua New Guinea.
  Uncertainty: E
- steel, chromium steel 18/8: 3.67287 kg; source Placer Dome Inc. 2003; lognormal variance with pedigree 0.0413, pedigree (2,3,5,3,1)
  Calculated value: Value for Porgera Mine was scaled from consumption in 2003 by processed gold.
  Proxy: Steel grinding media is approximated with 'steel, chromium steel 18/8'.
  Further references:
  Placer Dome Inc. (2001) Misima Mine - Sustainability Report 2000. Place Dome Inc, Papua New Guinea.
  Uncertainty: E
  properties: dry mass 1 kg, carbon content, fossil 0.0008, wet mass 1 kg
  note on carbon content, fossil: Stainless steel model is the grade 304 steel (18/8 stainless, 18% chromium 8% nickel; max. 0.08% C)
- heat, district or industrial, natural gas: 2736.77 MJ; source Barrick  2006; lognormal variance with pedigree 0.0427, pedigree (2,4,5,3,1)
  (same comment as for diesel, burned in building machine)
  properties: heating value, net 1 MJ
- mine infrastructure, gold and silver: 1.08108e-8 unit; source Barrick  2006; lognormal variance with pedigree 0.3413, pedigree (2,3,5,3,1)
  Literature value.;activityLink introduced to establish a direct link to the corresponding regional supply of this product
  Uncertainty: E
- heat, district or industrial, other than natural gas: 506.838 MJ; source Placer Dome Inc. 2001; lognormal variance with pedigree 0.0427, pedigree (2,4,5,3,1)
  Literature value.
  Uncertainty: E
  property corresponding fuel use, propane, furnace >100kW 0 MJ; name fuel_use
  properties: heating value, net 1 MJ
  note on corresponding fuel use, propane, furnace >100kW: Lower heating value of the fuel input related to the heat/electricity output, taken directly from ecoinvent v3.0 dataset 'heat production, natural gas, at industrial furnace >100kW, GLO 2000'.

## Inputs from nature
- Water, well, in ground [natural resource, in water]: 15.4054 m3; name water_well_in_ground_input; source Barrick  2006; lognormal variance with pedigree 0.0427, pedigree (2,4,5,3,1)
  Literature value.
  Uncertainty: E
- Water, unspecified natural origin [natural resource, in water]: 1.78378 m3; name water_UNO_input; source Placer Dome Inc. 2001; lognormal variance with pedigree 0.0427, pedigree (2,4,5,3,1)
  Estimation: Process water is supplied from pit dewatering bores and in-pit water. Potable water is sourced from boreholes in the coastal limestone. The figure in the environmental report is 3.33E+12 l. However, as the discharge in 2002 is about 7.0E+9 l, the value in the report is assumed to be 1000 times too high and is corrected by the dataset author to 3.33E+09 l.
  Proxy: Water from bore fields is approximated with 'Water, unspecified natural origin'.
  Estimation: Process water is supplied from pit dewatering bores and in-pit water. Potable water is sourced from boreholes in the coastal limestone. The figure in the environmental report is 3.33E+12 l. However, as the discharge in 2002 is about 7.0E+9 l, the value in the report is assumed to be 1000 times too high and is corrected by the dataset author to 3.33E+09 l.
  Proxy: Water from bore fields is approximated with 'Water, unspecified natural origin'.
  Uncertainty: E
- Silver, in ground [natural resource, in ground]: 0.0144146 kg; source Barrick  2006; lognormal variance with pedigree 0.0427, pedigree (2,4,5,3,1)
  2.1 ppm Ag and 2.1 ppm Au in ore; Calculated value: The recovery rate (proportion of valuable material physically recovered in the processing of ore) is taken into account in order to define the resource extraction. The average concentration (head grade, expressed in kg metal per kg ore) of metals in ore for Papua New Guinea is calculated with the quantity of ore milled and the corresponding production rate.
  Further references:
  Placer Dome Inc. (2001) Misima Mine - Sustainability Report 2000. Placer Dome Inc, Papua New Guinea.
  Uncertainty: E
- Gold, in ground [natural resource, in ground]: 0.0141562 kg; source Barrick  2006; lognormal variance with pedigree 0.0427, pedigree (2,4,5,3,1)
  2.1 ppm Au and 2.1 ppm Ag in ore; Calculated value: The recovery rate (proportion of valuable material physically recovered in the processing of ore) is taken into account in order to define the resource extraction. The average concentration (head grade, expressed in kg metal per kg ore) of metals in ore for Papua New Guinea is calculated with the quantity of ore milled and the corresponding production rate.
  Further references:
  Placer Dome Inc. (2001) Misima Mine - Sustainability Report 2000. Placer Dome Inc, Papua New Guinea.
  Uncertainty: E

## Emissions to nature
- Lead [water, ocean]: 0.000152973 kg; source Placer Dome Inc. 2001; lognormal variance with pedigree 0.6927, pedigree (2,4,5,3,1)
  Literature value.
  Uncertainty: E
- Zinc, ion [water, surface water]: 0.454611 kg; source Placer Dome Inc. 2003; lognormal variance with pedigree 0.6927, pedigree (2,4,5,3,1)
  Calculated value: Amount was scaled from emission in 2003 by milled ore.
  Uncertainty: E
- Copper [air, non-urban air or from high stacks]: 4.89444e-6 kg; source Boliden 2006; lognormal variance with pedigree 0.6927, pedigree (2,4,5,3,1)
  Calculated value: As Swedish data stem from a combined process, air emissions were allocated to gold and silver for Sweden and scaled by the milled ore for Papua New Guinea.
  Further references:
  Classen M. et al. (2009) Life cycle inventories of metals, Part IX: Gold and Silver. Ecoinvent centre, Dubendorf.
  Uncertainty: C
- Water [water, unspecified]: 14.6108 m3; name water_to_water_unspecified; = water_UNO_input*(1-fraction_PW_to_air)+water_well_in_ground_input*(1-fraction_PW_to_air); lognormal variance with pedigree 0.0807, pedigree (2,2,5,1,1)
  Calculated value based on literature values and expert opinion. See comments in the parametres' comment field.
  property fraction, origin: salt water 0; name fraction_origin_salt_water_Ww
  property carbon content, non-fossil 0; name C_content_non_fossil
  property dry mass 0 kg; name DM
  property fraction, origin: unspecified 0.103774; name fraction_origin_unspecified_Ww
  property carbon content, fossil 0; name C_content_fossil
  property wet mass 1000 kg; name WM
  property water in wet mass 1000 kg; name WWM
  property fraction, origin: fresh water 0.896226; name fraction_origin_fresh_water_Ww
- Nickel, ion [water, surface water]: 0.0168168 kg; source Placer Dome Inc. 2003; lognormal variance with pedigree 0.6927, pedigree (2,4,5,3,1)
  Calculated value: Amount was scaled from emission in 2003 by milled ore.
  Uncertainty: E
- Cadmium, ion [water, surface water]: 0.00124314 kg; source Placer Dome Inc. 2003; lognormal variance with pedigree 0.3527, pedigree (2,4,5,3,1)
  Calculated value: Amount was scaled from emission in 2003 by milled ore.
  Uncertainty: E
- Zinc [air, non-urban air or from high stacks]: 1.35124e-6 kg; source Boliden 2006; lognormal variance with pedigree 0.6927, pedigree (2,4,5,3,1)
  (same comment as for Copper)
- Cyanide [water, surface water]: 0.0247016 kg; source Placer Dome Inc. 2003; lognormal variance with pedigree 0.3527, pedigree (2,4,5,3,1)
  Calculated value: Amount was scaled from emission in 2003 by milled ore.
  Uncertainty: E
- Copper, ion [water, ocean]: 0.0527568 kg; source Placer Dome Inc. 2001; lognormal variance with pedigree 0.3527, pedigree (2,4,5,3,1)
  Literature value.
  Uncertainty: E
- Arsenic, ion [water, ocean]: 1.2973e-5 kg; source Placer Dome Inc. 2001; lognormal variance with pedigree 0.6927, pedigree (2,4,5,3,1)
  Estimation: Arsenic emissions to water from Misima Mine were corrected by the author: The figure in the environmental report from 2000 (used as source for this exchange) was 0.24 kg. However, for the period 2001 - 2003, the values are 23-47 kg, so the figure for 2000 is assumed to be 100 times too small and is corrected to 24 kg.
  Uncertainty: E
- Cadmium, ion [water, ocean]: 5.13514e-5 kg; source Placer Dome Inc. 2001; lognormal variance with pedigree 0.3527, pedigree (2,4,5,3,1)
  Literature value.
  Uncertainty: E
- Water [air, unspecified]: 2.57838 m3; name water_to_air_unspecified; = (water_UNO_input*fraction_PW_to_air)+(water_well_in_ground_input*fraction_PW_to_air); lognormal variance with pedigree 0.0807, pedigree (2,2,5,1,1)
  (same comment as for Water)
  property fraction, origin: fresh water 0.896226; name fraction_origin_fresh_water
  property fraction, origin: salt water 0; name fraction_origin_salt_water
  property fraction, origin: unspecified 0.103774; name fraction_origin_unspecified
- Lead [water, surface water]: 3.66103e-5 kg; source Placer Dome Inc. 2003; lognormal variance with pedigree 0.6927, pedigree (2,4,5,3,1)
  Calculated value: Amount was scaled from emission in 2003 by milled ore.
  Uncertainty: E
- Nickel, ion [water, ocean]: 0.000360541 kg; source Placer Dome Inc. 2001; lognormal variance with pedigree 0.6927, pedigree (2,4,5,3,1)
  Literature value.
  Uncertainty: E
- Lead [air, non-urban air or from high stacks]: 1.59146e-6 kg; source Boliden 2006; lognormal variance with pedigree 0.6927, pedigree (2,4,5,3,1)
  (same comment as for Copper)
- Carbon dioxide, fossil [air, non-urban air or from high stacks]: 0.431827 kg; source Newmont 2005; lognormal variance with pedigree 0.0427, pedigree (2,4,5,3,1)
  Calculated value: For each mine, carbon dioxide emissions from explosives are calculated with the factor of the mines of Newmont (0.16 kg CO2 per kg explosive).
  Uncertainty: E
- Copper, ion [water, surface water]: 0.0190292 kg; source Placer Dome Inc. 2003; lognormal variance with pedigree 0.3527, pedigree (2,4,5,3,1)
  Calculated value: Amount was scaled from emission in 2003 by milled ore.
  Uncertainty: E
- Mercury [water, surface water]: 2.93687e-6 kg; source Placer Dome Inc. 2003; lognormal variance with pedigree 0.6927, pedigree (2,4,5,3,1)
  Calculated value: Amount was scaled from emission in 2003 by milled ore.
  Uncertainty: E
- Arsenic, ion [water, surface water]: 0.000263514 kg; source Placer Dome Inc. 2003; lognormal variance with pedigree 0.6927, pedigree (2,4,5,3,1)
  Literature value.
  Uncertainty: E
- Zinc, ion [water, ocean]: 0.00343784 kg; source Placer Dome Inc. 2001; lognormal variance with pedigree 0.6927, pedigree (2,4,5,3,1)
  Literature value.
  Uncertainty: E
- Cyanide [water, ocean]: 0.0918919 kg; source Placer Dome Inc. 2001; lognormal variance with pedigree 0.3527, pedigree (2,4,5,3,1)
  Literature value.
  Uncertainty: E

## Sampling procedure
environmental report of one mine in the year 2000 and one mine in 2006

## Extrapolations
Emissions to water are calculated with older data of one mine
