# aluminium ingot, primary, to aluminium, cast alloy market

Dataset: EcoSpold 2, unit process
Geography: GLO
Time period: 2015-01-01 to 2021-12-31
Technology level: current
Classification: ISIC rev.4 ecoinvent: 2420:Manufacture of basic precious and other non-ferrous metals
Scenario: Business-as-Usual
System model: Allocation, cut-off by classification
Share of production covered: 100 %
Generated by: Linlin Wu
Database: ecoinvent
isCopyrightProtected: true
accessRestrictedTo: 1

## General comment
Re-labelling activity to account for the fraction of globally produced primary aluminium used as cast alloy.

## Reference product
- aluminium, cast alloy: 1 kg; CPC 41431: Unwrought aluminium; By-product classification allocatable product
  production volume 9.569e9 kg
    Based on International Aluminium Institute data on the relative share of primary aluminium in wrought alloy, the toal amount of wrought alloy produced globally, and the total amount of primary aluminium ingots produced globally.
  property price 1.3 EUR2005
    Temporary price data. Calculated as 90% of purchasers price based on: Source: London Metal Exchange, Aluminium alloy price for 2005
  property carbon content 0
    carbon content on a dry matter basis (reserved; not for manual entry)
  properties: wet mass 1 kg, water in wet mass 0 kg, carbon content, fossil 0, dry mass 1 kg, carbon content, non-fossil 0, water content 0, carbon allocation 0 kg

## Inputs from technosphere
- aluminium, primary, ingot: 0, 0.776995, 0.0819209, 0.141084 kg (4 entries)
  properties: wet mass 1 kg, dry mass 1 kg

## Sampling procedure
Literature

## Extrapolations
This dataset has been extrapolated from year 2015 to the year of the calculation (2021). The uncertainty has been adjusted accordingly.
