# maize chop to generic market for energy feed

Dataset: EcoSpold 2, unit process
Geography: RoW
Time period: 2016-01-01 to 2021-12-31
Technology level: current
Classification: ISIC rev.4 ecoinvent: 1080:Manufacture of prepared animal feeds
Scenario: Business-as-Usual
System model: Allocation, cut-off by classification
Generated by: Avraam Symeonidis
Database: ecoinvent
isCopyrightProtected: true
accessRestrictedTo: 1

## General comment
This activity is a linking activity, i.e. it connects maize chop with generic protein feed market. Maize chop is used partially as a feed for animals, thus traded on generic feed market with other protein - containing products.

## Included activities start
The activity starts with the reception of maize chop.

## Included activities end
This linking activity has the maize chop as an input (negative reference product) and protein and energy feed as outputs.

## Geography
Data represent a Global situation.

## Technology
The data are intended to reflect current equipment and processes on a Global level.

## Parameters
- fraction_to_generic_market: 0.9 % (obsolete); lognormal variance with pedigree 0.108, pedigree (4,1,1,1,1)
  It is assumed that 90% of maize grain is traded on generic protein feed market, i.e. its buyers do not care what type of protein feed they are buying. Remaining 10% of the production volume (PV) is assumed to be used for uses, where specific type of protein feed is required and cannot be substituted by any other protein feed.

## Reference product
- energy feed, gross: 1 MJ; name RP_amount_1; = maize_chop_inpu_gross_E_feed_per_kg_DM_0* maize_chop_input* maize_chop_input_DM; CPC 23319: Preparations used in animal feeding n.e.c.; By-product classification allocatable product
  Calculated based on literature value for "hominy feed" (Feedipedia, 2015), which reports a crude protein content of 15.2% of dry matter; while gross energy content equates to 18.7 MJ/kg dry matter of fed. Dry matter content equates 89.3% of fed. Reference(s): Feedipedia (2015) Hominy Feed, Animal Feed Resources Information System, Available at: https://www.feedipedia.org/node/12290 (Accessed November 2017).
  production volume 4.82919e11 MJ; name RP_PV_1; = 33524400000*fraction_to_generic_market* maize_chop_input_DM* maize_chop_inpu_gross_E_feed_per_kg_DM_0
    Calculated based on the amount of maize chop produced in the database.
  property price 0.0108 EUR2005
    Based on energy feed, gross content in soybean meal and prices per kg of soybean meal. Assumed soybean meal is the most used feed. Soybean meal 2004 prices for World import/export data (tonnes and US$) from FaoStat statistics (http://faostat.fao.org/site/535/default.aspx#ancor, TRADE)- [Accessed 24 May 2010]. See calculations for protein /energy content
  property carbon content 0
    carbon content on a dry matter basis (reserved; not for manual entry)
  property true value 0.18035; name RP_amount_1_true_value
    allocation property applied in "true value" allocation // value calculated from revenue
  properties: water content 0, water in wet mass 0 kg, dry mass 1 kg, carbon content, fossil 0, wet mass 1 kg, carbon content, non-fossil 0, carbon allocation 0 kg

## By-products
- protein feed, 100% crude: 0 kg; name BP_amount_1; CPC 23319: Preparations used in animal feeding n.e.c.; By-product classification allocatable product; pedigree (1,1,1,1,1)
  (same comment as for energy feed, gross)
  production volume 3.92533e9 kg; = BP_amount_1/ RP_amount_1* RP_PV_1
    Calculated based on the amount of maize chop produced in the database.
  property price 0.424 EUR2005
    Based on protein content and energy feed, gross content in soybean meal and prices per kg of soybean meal. Assumed soybean meal is the most used feed. Soybean meal 2004 prices for World import/export data (tonnes and US$) from FaoStat statistics (http://faostat.fao.org/site/535/default.aspx#ancor, TRADE)- [Accessed 24 May 2010]. See calculations for protein /energy content
  property carbon content 0.53
    carbon content on a dry matter basis (reserved; not for manual entry)
  property true value 0.0575521; name BP_amount_1_true_value
    allocation property applied in "true value" allocation // value calculated from revenue
  properties: wet mass 1 kg, carbon content, fossil 0, water in wet mass 0 kg, water content 0, carbon content, non-fossil 0.53, dry mass 1 kg, carbon allocation 0.53 kg

## Inputs from technosphere
- maize chop: 0.0453968 kg; name maize_chop_input; lognormal variance with pedigree 0.0113, pedigree (4,3,3,3,1)
  (same comment as for energy feed, gross)
  property carbon content, fossil 0; name maize_chop_input_C_content_fossil
  property water content 0.119821; name maize_chop_input_water_content
  property wet mass 1 kg; name maize_chop_input_WM
  property dry mass 0.893 kg; name maize_chop_input_DM
  property gross energy, feed per kg of dry mass 18.7 MJ/kg; name maize_chop_inpu_gross_E_feed_per_kg_DM_0
  property carbon content, non-fossil 0.46957; name maize_chop_input_C_content_non_fossil
  property water in wet mass 0.107 kg; name maize_chop_input_WWM
  property protein feed, 100% crude per kg of dry mass 0.152 kg/kg; name maize_chop_inpu_protein_feed_per_kg_DM_0
  note on gross energy, feed per kg of dry mass: A gross energy content of 18.7 MJ/kg dry matter (DM) applied in this dataset, based on properties of "hominy feed" (Feedipedia, 2015). Reference(s): Feedipedia (2015) Animal Feed Resources Information System: Maize Bran and Hominy Feed, Available at: https://www.feedipedia.org/node/712. (Accessed October 2017).
  note on protein feed, 100% crude per kg of dry mass: A crude protein content of 15.2% of dry matter fed was applied in this dataset, based on properties of "hominy feed" (Feedipedia, 2015). Reference(s): Feedipedia (2015) Animal Feed Resources Information System: Maize Bran and Hominy Feed, Available at: https://www.feedipedia.org/node/712. (Accessed October 2017).
