# debarking, softwood, in forest

Dataset: EcoSpold 2, unit process
Geography: RoW
Time period: 1994-01-01 to 2021-12-31
Technology level: current
Classification: ISIC rev.4 ecoinvent: 0220:Logging
Classification: EcoSpold01Categories: wooden materials/extraction
Synonyms: Fichte; Spruce
Tags: ConvertedDataset
Scenario: Business-as-Usual
System model: Allocation, cut-off by classification
Generated by: Hans-Jörg Althaus
Published in: Werner F. 2007
Database: ecoinvent
isCopyrightProtected: true
accessRestrictedTo: 1

## General comment
This dataset represents the service of debarking softwood in forest with an output of one m3. The volume is excluding bark.

Debarking is one process step in the technical wood production with the main function of removing bark, bast, and dirt. The process data reflects Germany/Europe standards.

The data is mainly based on literature values.
[This dataset was already contained in the ecoinvent database version 2. It was not individually updated during the transfer to ecoinvent version 3. Life Cycle Impact Assessment results may still have changed, as they are affected by changes in the supply chain, i.e. in other datasets. This dataset was generated following the ecoinvent quality guidelines for version 2. It may have been subject to central changes described in the ecoinvent version 3 change report (http://www.ecoinvent.org/database/ecoinvent-version-3/reports-of-changes/), and the results of the central updates were reviewed extensively. The changes added e.g. consistent water flows and other information throughout the database. The documentation of this dataset can be found in the ecoinvent reports of version 2, which are still available via the ecoinvent website. The change report linked above covers all central changes that were made during the conversion process.]

## Included activities start
Debarking process starts from spruce stems in forest, with bark.

## Included activities end
This activity ends with debarked spruce stems, at forest road.
The dataset includes tractor driven debarking.
The dataset does not include dust emissions due to a high water content in the wood nor the natural growth process of the trees. Furthermore, the dataset does not include the environmental consequences of soil compression due to the use of heavy machines due to a lack of data

## Geography
Data for Germany used for central Europe

## Technology
The process refers to a tractor driven process, i.e. a mechanical and mobile debarking process. Softwood is usually debarked in the forest with movable disbarkers.

The amount of bark, based on the total volume of the stem with bark is about 8 to 15% for spruce (Kollmann et al., 1975 and Sell, 1997).
References:
Kollmann F. F. P., Kuenzi E. W. and Stamm A. J. (1975) Principles of Wood Science and Technology. Springer-Verl., Berlin, Heidelberg, New York.

Sell J. (1997) Eigenschaften und Kenngrössen von Holzarten. 4. überarbeitete und erweiterte Aufl. Edition. Lig-num, Baufachverl. AG Zürich, Dietikon.

## Reference product
- bark chips, wet, measured as dry mass: 1 kg; name bark_chips; CPC 31230: Wood in chips or particles; By-product classification allocatable product
  EcoSpold01Location=RER
  production volume 2.14173e9 kg; = sawlog_apv*bark_chips
    Assumed 10% debarked in forest, the rest debarked at sawmill ; 0.171 m3 bark chips per 1.71 m3 wood output
  property price 0.034 EUR2005
    Expert judgement (Urs Luginbühl, Swiss Sawmilling industry, personal communication in June 2014). Cross-reference; FAOSTAT database; http://faostat.fao.org/site/626/DesktopDefault.aspx?PageID=626#ancor; Average import/export prices of EU for 'chips and particles'. Price: 48.76 Euro/m3. The density of the wood chips is 650 kg/m3. The price is calculated to be 0.075 EUR/kg.
  property carbon content, non-fossil 0.494
    C content of dry mass is 0.494 kgC/kg dry wood (ecoinvent v2.2 report 9)
  property heating value, net 4.81 MJ
    LHV is calculated based on the Carbon content of the product. More details can be found on the respective documentation.
  property carbon content 0.494
    carbon content on a dry matter basis (reserved; not for manual entry)
  property true value 1.53; name bark_chips_true_value
    allocation property applied in "true value" allocation // value calculated from revenue
  properties: dry mass 1 kg, carbon content, fossil 0, wet mass 2.4 kg, water content 1.4, water in wet mass 1.4 kg, carbon allocation 0.494 kg
- sawlog and veneer log, softwood, debarked, measured as solid wood: 0 m3; By-product classification allocatable product; CPC 031: Wood in the rough
  EcoSpold01Location=RER
  production volume 4.75941e7 m3; name sawlog_apv
    Assumed 10% debarked in forest, the rest debarked at sawmill
  property price 80 EUR2005
    Expert judgement (Urs Luginbühl, Swiss Sawmilling industry, personal communication in June 2014). Cross-reference; Calculated as 90% of purchasers price based on: 2004 prices for World Import/Export data (USD/m3) from UN Commodity Trade Statistics Database (http://data.un.org/Data.aspx?d=ComTrade&f=_l1Code%3a45, [accessed 10th June 2010]) Commodity: 'Logs, poles, coniferous not treated or painted'.
  property heating value, net 5962.7 MJ
    LHV is calculated based on the Carbon content of the product. More details can be found on the respective documentation.The property is based on a value of 7.79MJ/kg
  property carbon content, non-fossil 0.494
    C content of dry mass is 0.494 kgC/kg dry wood (ecoinvent v2.2 report 9)
  property carbon content 0.494
    carbon content on a dry matter basis (reserved; not for manual entry)
  property true value 80
    allocation property applied in "true value" allocation // value calculated from revenue
  properties: dry mass 450 kg, carbon content, fossil 0, water in wet mass 315 kg, water content 0.7, wet mass 765 kg, carbon allocation 222.3 kg

## Inputs from technosphere
- lubricating oil: 1.0509e-5 kg; lognormal variance with pedigree 0.0432, pedigree (2,3,5,5,1)
  EcoSpold01Location=RER
  properties: heating value, net 40.2 MJ, carbon content, fossil 0.75, dry mass 1 kg, wet mass 1 kg
  note on heating value, net: Literature value, Source: IPCC 2006, 2006 IPCC Guidelines for National Greenhouse Gas Inventories, Prepared by the National Greenhouse Gas Inventories Programme, Eggleston H.S., Buendia L., Miwa K., Ngara T. and Tanabe K. (eds). Published: IGES, Japan
  note on carbon content, fossil: Lubricating oil is produced from diesel. C-content/dry mass of fats and oils considered 75%, from: ecoinvent v2.2 report, n 15a, pg 40
- sawlog and veneer log, softwood, measured as solid wood under bark: 0 m3; pedigree (1,1,1,1,1)
  EcoSpold01Location=RER
  properties: water content 0.7, wet mass 869.318 kg, carbon content, non-fossil 0.494, heating value, net 4483.78 MJ, dry mass 511.364 kg
  note on carbon content, non-fossil: C content of dry mass is 0.494 kgC/kg dry wood (ecoinvent v2.2 report 9)
  note on heating value, net: Value based on the dataset "softwood forestry, mixed species, sustainable forest management"The property is based on a value of 11.58MJ/kg
- diesel, burned in building machine: 0.0118435 MJ; lognormal variance with pedigree 0.1632, pedigree (2,3,5,5,1)
  EcoSpold01Location=GLO
  properties: heating value, net 1 MJ
- sawlog and veneer log, softwood, measured as solid wood under bark: 1.98681e-6, 0.000415038 m3 (2 entries); lognormal variance with pedigree 0.0726, pedigree (1,3,5,5,1)
  EcoSpold01Location=RER

## Inputs from nature
- Carbon dioxide, non-fossil, resource correction [natural resource, in air]: 1.48494 kg; pedigree (1,1,1,1,1)
  This exchange has been added after economic allocation in order to re-balance the non-fossil carbon dioxide resource extraction.

## Sampling procedure
Literature

## Extrapolations
see Geography and Technology This dataset has been copied from an original dataset covering the geography RER. The uncertainty has been adjusted accordingly.

## Review by Roberto Dones 2003-09-12
passed
