# treatment of waste wood, untreated, municipal incineration

Dataset: EcoSpold 2, unit process
Geography: CH
Time period: 1994-01-01 to 2021-12-31
Technology level: outdated
Classification: EcoSpold01Categories: waste management/municipal incineration
Classification: ISIC rev.4 ecoinvent: 3821:Treatment and disposal of non-hazardous waste
Tags: Treatment; ConvertedDataset
Scenario: Business-as-Usual
System model: Allocation, cut-off by classification
Generated by: Gabor Doka (obsolete)
Published in: Doka G. 2007
Database: ecoinvent
isCopyrightProtected: true
accessRestrictedTo: 1

## General comment
Inventoried waste contains 100% natural wood; .
waste composition (wet, in ppm): upper heating value 15.36 MJ/kg; lower heating value 13.99 MJ/kg; H2O 174080; O 372180; H 50163; C 401470; S 125.51; N 986.98; P 108.97; B 2.1107; Cl 330.95; Br n.a.; F 21.106; I n.a.; Ag n.a.; As 0.42213; Ba n.a.; Cd 0.20051; Co 0.086772; Cr 0.65782; Cu 4.1482; Hg 0.31976; Mn 53.118; Mo 0.8302; Ni 0.55581; Pb 27.868; Sb n.a.; Se n.a.; Sn n.a.; V n.a.; Zn 17.807; Be n.a.; Sc n.a.; Sr n.a.; Ti n.a.; Tl n.a.; W n.a.; Si n.a.; Fe 15.479; Ca 130.89; Al 6.3322; K 65.412; Mg 197.56; Na 14.071;
Share of carbon in waste that is biogenic 100%.
Share of iron in waste that is metallic/recyclable 0%.
Net energy produced in MSWI: 1.3MJ/kg waste electric energy and 2.74MJ/kg waste thermal energy
Allocation of energy production: no substitution or expansion. Total burden allocated to waste disposal function of MSWI.
One kg of this waste produces 0.004126 kg of slag and 0.001698 kg of residues, which are landfilled. Additional solidification with 0.0006793 kg of cement.
[This dataset was already contained in the ecoinvent database version 2. It was not individually updated during the transfer to ecoinvent version 3. Life Cycle Impact Assessment results may still have changed, as they are affected by changes in the supply chain, i.e. in other datasets. This dataset was generated following the ecoinvent quality guidelines for version 2. It may have been subject to central changes described in the ecoinvent version 3 change report (http://www.ecoinvent.org/database/ecoinvent-version-3/reports-of-changes/), and the results of the central updates were reviewed extensively. The changes added e.g. consistent water flows and other information throughout the database. The documentation of this dataset can be found in the ecoinvent reports of version 2, which are still available via the ecoinvent website. The change report linked above covers all central changes that were made during the conversion process.]

## Included activities end
waste-specific air and water emisions from incineration, auxiliary material consumption for flue gas cleaning. Short-term emissions to river water and long-term emisisons to ground water from slag compartment (from bottom slag) and residual material landfill (from solidified fly ashes and scrubber slugde). Process energy demands for MSWI.

## Geography
Specific to the technology mix encountered in Switzerland in 2000. Well applicable to modern incineration practices in Europe, North America or Japan.

## Technology
replaced by newer incineration technology with fly ash extraction. Average Swiss MSWI plants in 2000 with electrostatic precipitator for fly ash (ESP), wet flue gas scrubber and 29.4% SNCR , 32.2% SCR-high dust , 24.6% SCR-low dust -DeNOx facilities and 13.8% without Denox (by burnt waste, according to Swiss average). Share of waste incinerated in plants with magnetic scrap separation from slag : 50%. Gross electric efficiency technology mix 12.997% and Gross thermal efficiency technology mix 25.57%

## Time period
Waste composition as given in literature reference, theoretical data or other source. Transfer coefficients for modern Swiss MSWI. Emission speciation based on early 90ies data.

## Reference product
- waste wood, untreated: -1 kg; CPC 3928: Sawdust and wood waste and scrap; By-product classification Waste
  EcoSpold01Location=CH
  production volume 0 kg; name RP_PV_1
    outdated. Replaced by newer incineration technology with fly ash extraction.
  property price 0 EUR2005
    Waste products are assigned a price of zero as they are assumed to require further treatment.
  property carbon content, non-fossil 0.48632
    Tab A.4, ecoinvent v2.2 report 13_I. C content has been referred to 1 kg DM,
  property heating value, net 13.99 MJ
    Value taken from the general comment of the treatment dataset.
  property carbon content 0.48632
    carbon content on a dry matter basis (reserved; not for manual entry)
  properties: dry mass 0.8 kg, water content 0.25, carbon content, fossil 0, water in wet mass 0.2 kg, wet mass 1 kg, carbon allocation 0.389056 kg

## Inputs from technosphere
- hydrochloric acid, without water, in 30% solution state: 1.37e-6 kg; lognormal variance with pedigree 0.33, pedigree (1,1,5,1,1)
  uncertainty calculated from uncertainty in average auxiliary material input, and the unertainty of the waste composition of this waste
  EcoSpold01Location=RER
  properties: wet mass 1 kg, dry mass 1 kg, heating value, net 3.32 MJ
- sodium hydroxide, without water, in 50% solution state: 0.000374 kg; lognormal variance with pedigree 0.71, pedigree (1,1,5,1,1)
  EcoSpold01Location=RER
  uncertainty calculated from uncertainty in average auxiliary material input, and the unertainty of the waste composition of this waste
  properties: wet mass 1 kg, dry mass 1 kg, heating value, net 3.03 MJ
- heat, district or industrial, natural gas: 0.004374 MJ; lognormal variance with pedigree 1.61, pedigree (1,1,5,1,1)
  EcoSpold01Location=RER
  uncertainty calculated from uncertainty in average DeNOx input, uncertainty in the share of thermal NOx, uncertainty of nitrogen content in average municipal waste and the unertainty in nitrogen content in *this* waste.
  properties: heating value, net 1 MJ
- waste cement, hydrated: -0.0017 kg; name BP_amount_1; lognormal variance with pedigree 0.08, pedigree (1,1,5,1,1)
  EcoSpold01Location=CH
  Hydrated cement for solidification of landfilled residual material. Uncertainty calculated from unertainty of the waste composition of this waste and transfer coefficients in the incinerator and of the solidification recipe.
  production volume 0 kg; = RP_PV_1* BP_amount_1
    Calculated from the production volume of waste wood, untreated, 20% water in proportion to the respective output amounts.
  property price 0 EUR2005; name BP_amount_1_price_EUR2005
  properties: wet mass 1 kg, dry mass 1 kg
- quicklime, milled, packed: 5.81e-5 kg; lognormal variance with pedigree 0.83, pedigree (1,1,5,1,1)
  uncertainty calculated from uncertainty in average auxiliary material input, and the unertainty of the waste composition of this waste
  EcoSpold01Location=CH
  properties: dry mass 0.99 kg, water content 0.010101, wet mass 1 kg
- iron (III) chloride, without water, in 40% solution state: 3.81e-6 kg; lognormal variance with pedigree 0.65, pedigree (1,1,5,1,1)
  EcoSpold01Location=CH
  uncertainty calculated from uncertainty in average auxiliary material input, and the unertainty of the waste composition of this waste
  properties: dry mass 1 kg, wet mass 1 kg
- process-specific burdens, residual material landfill: 0.0017 kg; lognormal variance with pedigree 0.07, pedigree (1,1,5,1,1)
  uncertainty is calculated from uncertainties in waste composition and transfer coefficients in incinerator;activityLink introduced to establish a direct link to the corresponding regional supply of this product
  EcoSpold01Location=CH
- chromium oxide, flakes: 2.91e-8 kg; lognormal variance with pedigree 2.32, pedigree (1,1,5,1,1)
  Proxy for vanadium pentoxide V2O5 in SCR catalyst, uncertainty calculated from uncertainty in average DeNOx input, uncertainty in the share of thermal NOx, uncertainty of nitrogen content in average municipal waste and the unertainty in nitrogen content in *this* waste.
  EcoSpold01Location=RER
  properties: dry mass 1 kg, wet mass 1 kg
- municipal waste incineration facility: 2.5e-10 unit; lognormal variance with pedigree 0.04, pedigree (1,1,5,1,1)
  EcoSpold01Location=CH
  demands per kilogram waste. uncertainty is heeded in the module
- process-specific burdens, municipal waste incineration: 1 kg; lognormal variance with pedigree 0.04, pedigree (1,1,5,1,1)
  EcoSpold01Location=CH
  demands per kilogram waste. uncertainty is heeded in the module;activityLink introduced to establish a direct link to the corresponding regional supply of this product
- slag landfill: 7.34e-12 unit; lognormal variance with pedigree 0.07, pedigree (1,1,5,1,1)
  EcoSpold01Location=CH
  uncertainty is calculated from uncertainties in waste composition and transfer coefficients in incinerator
- residual material landfill: 3.54e-12 unit; lognormal variance with pedigree 0.07, pedigree (1,1,5,1,1)
  (same comment as for slag landfill)
- process-specific burdens, slag landfill: 0.00413 kg; lognormal variance with pedigree 0.07, pedigree (1,1,5,1,1)
  EcoSpold01Location=CH
  uncertainty is calculated from uncertainties in waste composition and transfer coefficients in incinerator;activityLink introduced to establish a direct link to the corresponding regional supply of this product
- titanium dioxide: 1.43e-6 kg; lognormal variance with pedigree 2.32, pedigree (1,1,5,1,1)
  uncertainty calculated from uncertainty in average DeNOx input, uncertainty in the share of thermal NOx, uncertainty of nitrogen content in average municipal waste and the unertainty in nitrogen content in *this* waste.
  EcoSpold01Location=RER
  properties: dry mass 1 kg, wet mass 1 kg
- chemical, organic: 1.51e-6 kg; lognormal variance with pedigree 1.26, pedigree (1,1,5,1,1)
  EcoSpold01Location=GLO
  Proxy for TMT15. uncertainty calculated from uncertainty in average auxiliary material input, and the unertainty of the waste composition of this waste
  properties: heating value, net 19.03 MJ, dry mass 1 kg, carbon content, fossil 0.628, wet mass 1 kg
  note on carbon content, fossil: This dataset is an unweighted average of 20 organic substances (listed in Tab 88.1, ecoinvent v2.2 report 8, part II), being part of the top100 chemicals included in this database. The C-content has also been calculated as an unweighted average of the C content of the substances composing this dataset.
- ammonia, anhydrous, liquid: 4.98e-5 kg; lognormal variance with pedigree 1.61, pedigree (1,1,5,1,1)
  uncertainty calculated from uncertainty in average DeNOx input, uncertainty in the share of thermal NOx, uncertainty of nitrogen content in average municipal waste and the unertainty in nitrogen content in *this* waste.
  EcoSpold01Location=CH
  properties: dry mass 1 kg, wet mass 1 kg
- cement, unspecified: 0.000679 kg; lognormal variance with pedigree 0.08, pedigree (1,1,5,1,1)
  Cement for solidification of landfilled residual material. Uncertainty calculated from unertainty of the waste composition of this waste, of transfer coefficients in the incinerator and of the solidification recipe.
  EcoSpold01Location=CH
  properties: wet mass 1 kg, dry mass 1 kg
- chemical, inorganic: 2.29e-6 kg; lognormal variance with pedigree 0.33, pedigree (1,1,5,1,1)
  EcoSpold01Location=GLO
  Proxy for Polyelectrolyte. uncertainty calculated from uncertainty in average auxiliary material input, and the unertainty of the waste composition of this waste
  properties: carbon content, fossil 0.003, dry mass 1 kg, wet mass 1 kg
  note on carbon content, fossil: This dataset is an unweighted average of 20 inorganic substances (listed in Tab 88.1, ecoinvent v2.2 report 8, part II), being part of the top100 chemicals included in this database. The C-content has also been calculated as an unweighted average of the C content of the substances composing this dataset.

## Emissions to nature
- Methane, non-fossil [air, urban air close to ground]: 6.38e-6 kg; lognormal variance with pedigree 0.091225, pedigree (2,3,5,2,1)
  Confidential data from 5 plants in Switzerland and Germany
  Uncertainty: & basic uncertainty of 1.5; confidential data from 5 plants in Switzerland and Germany
- Zinc, ion [water, ground-, long-term]: 2.76e-7 kg; lognormal variance with pedigree 5.79, pedigree (1,1,5,1,1)
  Long-term emissions from landfilling of incineration residues. uncertainty is calculated from uncertainties in waste composition and transfer coefficients in incinerator and landfills.
- Iron, ion [water, surface water]: 5.3e-9 kg; lognormal variance with pedigree 1.22, pedigree (1,1,5,1,1)
  uncertainty is calculated from uncertainties in waste composition and transfer coefficients in incinerator and landfills
- Molybdenum [water, surface water]: 1.42e-7 kg; lognormal variance with pedigree 1.1, pedigree (1,1,5,1,1)
  (same comment as for Iron, ion)
- Phosphate [water, surface water]: 2.13e-8 kg; lognormal variance with pedigree 1.25, pedigree (1,1,5,1,1)
  (same comment as for Iron, ion)
- Boron [air, urban air close to ground]: 2.53e-7 kg; lognormal variance with pedigree 1.52, pedigree (1,1,5,1,1)
  uncertainty is calculated from uncertainties in waste composition and transfer coefficients in incinerator
- Carbon monoxide, non-fossil [air, urban air close to ground]: 0.000223 kg; lognormal variance with pedigree 0.690625, pedigree (1,3,5,2,1)
  Literature data from switzerland and germany adapted to plant age distribution in switzerland
  Uncertainty: & basic uncertainty of 5; literature data from switzerland and germany adapted to plant age distribution in switzerland
- BOD5, Biological Oxygen Demand [water, ground-, long-term]: 0.00324 kg; lognormal variance with pedigree 0.06, pedigree (1,1,5,1,1)
  (same comment as for Zinc, ion)
- Fluoride [water, surface water]: 1.62e-6 kg; lognormal variance with pedigree 0.87, pedigree (1,1,5,1,1)
  (same comment as for Iron, ion)
- Iron, ion [water, ground-, long-term]: 7.25e-6 kg; lognormal variance with pedigree 1.97, pedigree (1,1,5,1,1)
  (same comment as for Zinc, ion)
- Chromium VI [water, surface water]: 2.14e-8 kg; lognormal variance with pedigree 1.55, pedigree (1,1,5,1,1)
  (same comment as for Iron, ion)
- Mercury [water, surface water]: 3.42e-9 kg; lognormal variance with pedigree 1.72, pedigree (1,1,5,1,1)
  (same comment as for Iron, ion)
- Ammonia [air, urban air close to ground]: 7.82e-7 kg; lognormal variance with pedigree 1.72, pedigree (1,1,5,1,1)
  uncertainty calculated from uncertainty in average N-emissions, uncertainty in the share of thermal NOx, uncertainty of nitrogen content in average municipal waste and the unertainty in nitrogen content in *this* waste.
- Copper, ion [water, surface water]: 1.68e-10 kg; lognormal variance with pedigree 2.01, pedigree (1,1,5,1,1)
  (same comment as for Iron, ion)
- COD, Chemical Oxygen Demand [water, ground-, long-term]: 0.00991 kg; lognormal variance with pedigree 0.06, pedigree (1,1,5,1,1)
  (same comment as for Zinc, ion)
- Zinc, ion [water, surface water]: 3.27e-9 kg; lognormal variance with pedigree 1.09, pedigree (1,1,5,1,1)
  (same comment as for Iron, ion)
- Lead [water, ground-, long-term]: 1.99e-6 kg; lognormal variance with pedigree 7.23, pedigree (1,1,5,1,1)
  (same comment as for Zinc, ion)
- Magnesium [air, urban air close to ground]: 2.72e-7 kg; lognormal variance with pedigree 0.93, pedigree (1,1,5,1,1)
  (same comment as for Boron)
- Cobalt [water, surface water]: 1.48e-11 kg; lognormal variance with pedigree 2.37, pedigree (1,1,5,1,1)
  (same comment as for Iron, ion)
- Dinitrogen monoxide [air, urban air close to ground]: 4.17e-6 kg; lognormal variance with pedigree 1.72, pedigree (1,1,5,1,1)
  (same comment as for Ammonia)
- Potassium, ion [water, ground-, long-term]: 5.39e-5 kg; lognormal variance with pedigree 0.75, pedigree (1,1,5,1,1)
  (same comment as for Zinc, ion)
- Chromium VI [water, ground-, long-term]: 6.96e-8 kg; lognormal variance with pedigree 1.86, pedigree (1,1,5,1,1)
  (same comment as for Zinc, ion)
- Mercury [water, ground-, long-term]: 1.66e-8 kg; lognormal variance with pedigree 3.51, pedigree (1,1,5,1,1)
  (same comment as for Zinc, ion)
- Boron [water, surface water]: 3.3e-7 kg; lognormal variance with pedigree 1.46, pedigree (1,1,5,1,1)
  (same comment as for Iron, ion)
- Sodium, ion [water, ground-, long-term]: 1.09e-5 kg; lognormal variance with pedigree 0.91, pedigree (1,1,5,1,1)
  (same comment as for Zinc, ion)
- Aluminium [air, urban air close to ground]: 9.89e-9 kg; lognormal variance with pedigree 1.39, pedigree (1,1,5,1,1)
  (same comment as for Boron)
- Nickel [air, urban air close to ground]: 2.4e-14 kg; lognormal variance with pedigree 1.79, pedigree (1,1,5,1,1)
  (same comment as for Boron)
- Calcium [air, urban air close to ground]: 2.18e-7 kg; lognormal variance with pedigree 0.98, pedigree (1,1,5,1,1)
  (same comment as for Boron)
- Chloride [water, ground-, long-term]: 7.81e-6 kg; lognormal variance with pedigree 0.43, pedigree (1,1,5,1,1)
  (same comment as for Zinc, ion)
- Manganese [air, urban air close to ground]: 2.89e-13 kg; lognormal variance with pedigree 1.21, pedigree (1,1,5,1,1)
  (same comment as for Boron)
- Lead [water, surface water]: 7.76e-10 kg; lognormal variance with pedigree 1.18, pedigree (1,1,5,1,1)
  (same comment as for Iron, ion)
- Copper, ion [water, ground-, long-term]: 3.35e-6 kg; lognormal variance with pedigree 1.39, pedigree (1,1,5,1,1)
  (same comment as for Zinc, ion)
- BOD5, Biological Oxygen Demand [water, surface water]: 1.5e-5 kg; lognormal variance with pedigree 0.17, pedigree (1,1,5,1,1)
  (same comment as for Iron, ion)
- Hydrogen fluoride [air, urban air close to ground]: 1.11e-8 kg; lognormal variance with pedigree 1.23, pedigree (1,1,5,1,1)
  (same comment as for Boron)
- Zinc [air, urban air close to ground]: 2.91e-10 kg; lognormal variance with pedigree 1.28, pedigree (1,1,5,1,1)
  (same comment as for Boron)
- Calcium, ion [water, ground-, long-term]: 0.000114 kg; lognormal variance with pedigree 0.94, pedigree (1,1,5,1,1)
  (same comment as for Zinc, ion)
- Molybdenum [water, ground-, long-term]: 6.87e-7 kg; lognormal variance with pedigree 1.63, pedigree (1,1,5,1,1)
  (same comment as for Zinc, ion)
- Carbon dioxide, non-fossil [air, urban air close to ground]: 1.46 kg; lognormal variance with pedigree 0.06, pedigree (1,1,5,1,1)
  (same comment as for Boron)
- Chromium [air, urban air close to ground]: 4.86e-14 kg; lognormal variance with pedigree 1.76, pedigree (1,1,5,1,1)
  (same comment as for Boron)
- Arsenic, ion [water, ground-, long-term]: 2.32e-7 kg; lognormal variance with pedigree 1.72, pedigree (1,1,5,1,1)
  (same comment as for Zinc, ion)
- TOC, Total Organic Carbon [water, ground-, long-term]: 0.00392 kg; lognormal variance with pedigree 0.06, pedigree (1,1,5,1,1)
  (same comment as for Zinc, ion)
- Sulfate [water, surface water]: 6.09e-5 kg; lognormal variance with pedigree 0.49, pedigree (1,1,5,1,1)
  (same comment as for Iron, ion)
- Aluminium [water, ground-, long-term]: 4.69e-6 kg; lognormal variance with pedigree 1.29, pedigree (1,1,5,1,1)
  (same comment as for Zinc, ion)
- DOC, Dissolved Organic Carbon [water, surface water]: 1.1e-5 kg; lognormal variance with pedigree 0.28, pedigree (1,1,5,1,1)
  (same comment as for Iron, ion)
- Sulfur dioxide [air, urban air close to ground]: 5.35e-7 kg; lognormal variance with pedigree 0.99, pedigree (1,1,5,1,1)
  (same comment as for Boron)
- Calcium, ion [water, surface water]: 4.95e-7 kg; lognormal variance with pedigree 1.42, pedigree (1,1,5,1,1)
  (same comment as for Iron, ion)
- Lead [air, urban air close to ground]: 1.03e-9 kg; lognormal variance with pedigree 1.21, pedigree (1,1,5,1,1)
  (same comment as for Boron)
- Phosphate [water, ground-, long-term]: 1.28e-5 kg; lognormal variance with pedigree 5.21, pedigree (1,1,5,1,1)
  (same comment as for Zinc, ion)
- Cyanide [air, urban air close to ground]: 8.88e-7 kg; lognormal variance with pedigree 1.72, pedigree (1,1,5,1,1)
  (same comment as for Ammonia)
- Sodium [air, urban air close to ground]: 1.32e-7 kg; lognormal variance with pedigree 1.27, pedigree (1,1,5,1,1)
  (same comment as for Boron)
- Nickel, ion [water, ground-, long-term]: 5.2e-7 kg; lognormal variance with pedigree 1.62, pedigree (1,1,5,1,1)
  (same comment as for Zinc, ion)
- Cadmium, ion [water, surface water]: 9.09e-11 kg; lognormal variance with pedigree 1.77, pedigree (1,1,5,1,1)
  (same comment as for Iron, ion)
- Nitrate [water, surface water]: 1.26e-5 kg; lognormal variance with pedigree 0.5, pedigree (1,1,5,1,1)
  (same comment as for Iron, ion)
- Arsenic, ion [water, surface water]: 1.9e-7 kg; lognormal variance with pedigree 1.47, pedigree (1,1,5,1,1)
  (same comment as for Iron, ion)
- Arsenic [air, urban air close to ground]: 4.31e-15 kg; lognormal variance with pedigree 1.84, pedigree (1,1,5,1,1)
  (same comment as for Boron)
- Sulfate [water, ground-, long-term]: 0.000315 kg; lognormal variance with pedigree 0.6, pedigree (1,1,5,1,1)
  (same comment as for Zinc, ion)
- Cadmium, ion [water, ground-, long-term]: 2.01e-9 kg; lognormal variance with pedigree 7.5, pedigree (1,1,5,1,1)
  (same comment as for Zinc, ion)
- Chromium, ion [water, surface water]: 2.1e-9 kg; lognormal variance with pedigree 1.67, pedigree (1,1,5,1,1)
  (same comment as for Iron, ion)
- Nitrogen oxides [air, urban air close to ground]: 3.14e-5 kg; lognormal variance with pedigree 1.72, pedigree (1,1,5,1,1)
  (same comment as for Ammonia)
- Magnesium [water, ground-, long-term]: 0.000182 kg; lognormal variance with pedigree 0.89, pedigree (1,1,5,1,1)
  (same comment as for Zinc, ion)
- Potassium [air, urban air close to ground]: 1.97e-7 kg; lognormal variance with pedigree 1.07, pedigree (1,1,5,1,1)
  (same comment as for Boron)
- Fluoride [water, ground-, long-term]: 1.88e-5 kg; lognormal variance with pedigree 0.83, pedigree (1,1,5,1,1)
  (same comment as for Zinc, ion)
- Boron [water, ground-, long-term]: 1.39e-6 kg; lognormal variance with pedigree 0.9, pedigree (1,1,5,1,1)
  (same comment as for Zinc, ion)
- Nitrate [water, ground-, long-term]: 3.55e-5 kg; lognormal variance with pedigree 0.71, pedigree (1,1,5,1,1)
  (same comment as for Zinc, ion)
- Phosphorus [air, urban air close to ground]: 1.09e-7 kg; lognormal variance with pedigree 1.01, pedigree (1,1,5,1,1)
  (same comment as for Boron)
- Chloride [water, surface water]: 0.000323 kg; lognormal variance with pedigree 0.77, pedigree (1,1,5,1,1)
  (same comment as for Iron, ion)
- Aluminium [water, surface water]: 5.27e-10 kg; lognormal variance with pedigree 1.56, pedigree (1,1,5,1,1)
  (same comment as for Iron, ion)
- DOC, Dissolved Organic Carbon [water, ground-, long-term]: 0.00392 kg; lognormal variance with pedigree 0.06, pedigree (1,1,5,1,1)
  (same comment as for Zinc, ion)
- Iron [air, urban air close to ground]: 5.17e-10 kg; lognormal variance with pedigree 1.29, pedigree (1,1,5,1,1)
  (same comment as for Boron)
- TOC, Total Organic Carbon [water, surface water]: 1.1e-5 kg; lognormal variance with pedigree 0.28, pedigree (1,1,5,1,1)
  (same comment as for Iron, ion)
- Cobalt [water, ground-, long-term]: 7.6e-8 kg; lognormal variance with pedigree 1.9, pedigree (1,1,5,1,1)
  (same comment as for Zinc, ion)
- Potassium, ion [water, surface water]: 1.13e-5 kg; lognormal variance with pedigree 0.67, pedigree (1,1,5,1,1)
  (same comment as for Iron, ion)
- Nickel, ion [water, surface water]: 3.49e-10 kg; lognormal variance with pedigree 2.25, pedigree (1,1,5,1,1)
  (same comment as for Iron, ion)
- Manganese [water, surface water]: 2.97e-9 kg; lognormal variance with pedigree 1.85, pedigree (1,1,5,1,1)
  (same comment as for Iron, ion)
- Sodium, ion [water, surface water]: 3.04e-6 kg; lognormal variance with pedigree 0.74, pedigree (1,1,5,1,1)
  (same comment as for Iron, ion)
- Manganese [water, ground-, long-term]: 4.57e-5 kg; lognormal variance with pedigree 1.17, pedigree (1,1,5,1,1)
  (same comment as for Zinc, ion)
- Mercury [air, urban air close to ground]: 1.1e-14 kg; lognormal variance with pedigree 1.86, pedigree (1,1,5,1,1)
  (same comment as for Boron)
- Copper [air, urban air close to ground]: 3.06e-11 kg; lognormal variance with pedigree 1.48, pedigree (1,1,5,1,1)
  (same comment as for Boron)
- Cobalt [air, urban air close to ground]: 2.76e-15 kg; lognormal variance with pedigree 2.06, pedigree (1,1,5,1,1)
  (same comment as for Boron)
- Hydrogen chloride [air, urban air close to ground]: 3.67e-9 kg; lognormal variance with pedigree 0.89, pedigree (1,1,5,1,1)
  (same comment as for Boron)
- COD, Chemical Oxygen Demand [water, surface water]: 2.68e-5 kg; lognormal variance with pedigree 0.3, pedigree (1,1,5,1,1)
  (same comment as for Iron, ion)
- Magnesium [water, surface water]: 6.92e-7 kg; lognormal variance with pedigree 1.39, pedigree (1,1,5,1,1)
  (same comment as for Iron, ion)
- Molybdenum [air, urban air close to ground]: 1.66e-9 kg; lognormal variance with pedigree 1.65, pedigree (1,1,5,1,1)
  (same comment as for Boron)
- Cadmium [air, urban air close to ground]: 1.1e-11 kg; lognormal variance with pedigree 1.86, pedigree (1,1,5,1,1)
  (same comment as for Boron)

## Sampling procedure
waste-specific calculation based on literature data

## Extrapolations
This dataset has been extrapolated from year 2000 to the year of the calculation (2021). The uncertainty has been adjusted accordingly.

## Review by Niels Jungbluth 2003-07-15
Passed. Calculation for standard deviation 95 of, i.e., infrastructure,
land occupation, transport services or other services can differ from
standard Pedigree approach used in this project and figures obtained by
this procedure.
