# mustard production

Dataset: EcoSpold 2, unit process
Geography: RoW
Time period: 2015-01-01 to 2021-12-31
Technology level: current
Classification: ISIC rev.4 ecoinvent: 0111:Growing of cereals (except rice), leguminous crops and oil seeds
Scenario: Business-as-Usual
System model: Allocation, cut-off by classification
Generated by: Sanjeevan Bajaj
Database: ecoinvent
isCopyrightProtected: true
accessRestrictedTo: 1

## General comment
This dataset represents the production of 1 kg of Mustard during October, 2016-March, 2017 at a farm located in village Balahri Kalan, District Fatehgarh Sahib of Punjab. In this area, fields are irrigated with ground water using electric pump for surface irrigation. The farm has a yield of 2,500 kg fresh matter per ha for this crop cycle. Sowing date for the crop is 19-October, 2016 and harvesting date is 15-March, 2017. Mineral NP fertilizer input is 148.75-86.25 kg/ha. Machinery is used only for soil cultivation with fuel consumption of 12.48 kg/ha using plough, planking and rotary cultivator for soil tillage

## Included activities start
This activity starts about six weeks after the harvest of the previous crop. The soil is prepared for cultivation in first week of October and sowing of seeds started about two weeks after soil preparation. Thereafter the crop is mature for harvesting in about 5 months.

## Included activities end
The activity ends with the harvesting of the mature mustard from the Mustard plant

## Technology
Cultivation of Mustard follows conventional production standards

## Time period
Soil cultivating date for the main crop: 05-October, 2016; Harvesting date main crop: 15-March, 2017. The soil cultivation, sowing and harvesting dates are taken as the middle date of the week or fortnight told to the data collector by the farmer. Total time from date of sowing to date of harvesting comes to 148 days. The data is collected for one crop cycle. The cycle of one year is considered for entry in ecoeditor.

## Reference product
- mustard: 1 kg; CPC 01442: Mustard seed; By-product classification allocatable product
  production volume 6.27345e10 kg; = (699038+68855446)*1000
    http://www.fao.org/faostat/en/#data/QC 2016 data for mustard seed
  property price 0.277065 EUR2005
    Literature value. Price from FAOSTAT data Producer Prices - Annual (retrieved from: http://www.fao.org/faostat/en/#data/PP, accessed 15Feb2018). Data from 2005.
  property carbon content, non-fossil 0.475
    Carbon content on a dry mass basis derived from faostat.
    Reference: http://www.fao.org/forestry/17111/en"
  property carbon content 0.475
    carbon content on a dry matter basis (reserved; not for manual entry)
  properties: dry mass 0.947 kg, carbon content, fossil 0, wet mass 1 kg, water content 0.0559662, water in wet mass 0.053 kg, carbon allocation 0.449825 kg

## Inputs from technosphere
- urea: 0 kg; pedigree (1,1,1,1,1)
  The exchange has been updated from 'urea, as N' into 'urea' and therefore its amount has been scaled (multiplied) from 0.0458 kg by 2.1438 kg of 'urea' per kg of 'urea, as N'. Original comment of the exchange is: The data was collected for a hectare area through interview
  properties: carbon content, fossil 0.2, wet mass 1 kg, dry mass 1 kg
- inorganic phosphorus fertiliser, as P2O5: 0 kg; pedigree (1,1,1,1,1)
  The data was collected for a hectare area through interview
  properties: dry mass 1 kg, wet mass 1 kg
- tillage, ploughing: 6.31172e-5 ha; lognormal variance with pedigree 0.006, pedigree (3,3,2,5,2)
  The data was collected for a hectare area through interview
- irrigation: 0 m3; pedigree (1,1,1,1,1)
  The data was collected for a hectare area through interview
  properties: water content 9089.91, dry mass 0.11 kg, wet mass 1000 kg
- inorganic nitrogen fertiliser, as N: 0 kg; pedigree (1,1,1,1,1)
  The data was collected for a hectare area through interview
  properties: dry mass 1 kg, wet mass 1 kg
- diesel, burned in agricultural machinery: 0.0763852 MJ; lognormal variance with pedigree 0.006, pedigree (3,3,2,5,2)
  Planking.The data was collected for a hectare area through interview
- packaging, for fertilisers: 0.188 kg; lognormal variance with pedigree 0.0514, pedigree (4,3,2,5,4)
  Total amount of active substance/s of fertilisers needed for the production of 'mustard' is calculated to be circa 9.40E-02 kg. Fertiliser/s used in this dataset is/are: 'nitrogen fertiliser, as N', 'phosphate fertiliser, as P2O5', 'urea, as N'. The total amount of active substance/s is doubled in order to account for the packaging of the dilluted product of fertiliser/s that is/are applied. Therefore, 1.88E-01 kg of packaging for fertilisers is justified with this exchange.
  properties: heating value, net 25.01 MJ, dry mass 1 kg, price 0.0642 EUR2005, carbon content, fossil 0.825301, wet mass 1 kg
  note on carbon content, fossil: Considering a chemical formula (C2H4)n for polyethylene, carbon content-fossil is calculated to be 0.856286 kg of Carbon per kg of dry mass.
- tillage, rotary cultivator: 0.000116834 ha; lognormal variance with pedigree 0.006, pedigree (3,3,2,5,2)
  The data was collected for a hectare area through interview
- rape seed, for sowing: 0.001 kg; lognormal variance with pedigree 0.006, pedigree (3,3,2,5,2)
  The data was collected for a hectare area through interview
  properties: water content 0.0638298, wet mass 1 kg, carbon content, non-fossil 0.574, dry mass 0.94 kg
- urea: 0.0737535, 0.0135413, 0.0109233 kg (3 entries); lognormal variance with pedigree 0.006, pedigree (3,3,2,5,2)
  (same comment as for urea)
- inorganic phosphorus fertiliser, as P2O5: 0.000263597, 0.000341994, 0.000273846, 0.00214421, 0.000451808, 1.86162e-5, 4.90714e-5, 0.00506201, 9.12402e-5, 9.95652e-6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 kg (29 entries); lognormal variance with pedigree 0.006, pedigree (3,3,2,5,2)
  The data was collected for a hectare area through interview
- irrigation: 0.00254268, 0.000107929, 4.31716e-6, 0.0227298, 0.000372482, 1.86256e-5, 0.00105761, 0.000172145, 0.000839623, 0.000286964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 m3 (16 entries); lognormal variance with pedigree 0.006, pedigree (3,3,2,5,2)
  The data was collected for a hectare area through interview
- inorganic nitrogen fertiliser, as N: 7.16475e-5, 0.000102984, 9.20433e-5, 0.000323333, 0.000193099, 2.39342e-6, 1.4331e-5, 0.00181582, 3.39363e-5, 5.0971e-6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 kg (29 entries); lognormal variance with pedigree 0.006, pedigree (3,3,2,5,2)
  The data was collected for a hectare area through interview

## Inputs from nature
- Energy, gross calorific value, in biomass [natural resource, biotic]: 23.3024 MJ; lognormal variance with pedigree 0.006, pedigree (3,3,2,5,2)
  The data was collected for a hectare area through interview
- Transformation, to annual crop, irrigated [natural resource, land]: 4 m2; lognormal variance with pedigree 0.0854, pedigree (3,3,2,5,2)
  Calculated Value. This value has been calculated by using the ecoinvent LCI calculation tool for crop production.
- Transformation, from annual crop, irrigated [natural resource, land]: 4 m2; lognormal variance with pedigree 0.0134, pedigree (3,3,2,5,2)
  (same comment as for Transformation, to annual crop, irrigated)
- Occupation, annual crop, irrigated [natural resource, land]: 1.83333 m2*year; lognormal variance with pedigree 0.0074, pedigree (3,3,2,5,2)
  (same comment as for Transformation, to annual crop, irrigated)
- Carbon dioxide, in air [natural resource, in air]: 1.51835 kg; lognormal variance with pedigree 0.006, pedigree (3,3,2,5,2)
  (same comment as for Transformation, to annual crop, irrigated)

## Emissions to nature
- Chromium, ion [water, surface water]: 5.7958e-6 kg; lognormal variance with pedigree 0.1088, pedigree (4,5,2,5,2)
  (same comment as for Transformation, to annual crop, irrigated)
- Zinc, ion [water, ground-]: 3.98605e-6 kg; lognormal variance with pedigree 0.1088, pedigree (4,5,2,5,2)
  (same comment as for Transformation, to annual crop, irrigated)
- Phosphate [water, surface water]: 0.000119585 kg; lognormal variance with pedigree 0.0588, pedigree (4,5,2,5,2)
  (same comment as for Transformation, to annual crop, irrigated)
- Cadmium, ion [water, surface water]: 5.55811e-8 kg; lognormal variance with pedigree 0.1088, pedigree (4,5,2,5,2)
  (same comment as for Transformation, to annual crop, irrigated)
- Carbon dioxide, from soil or biomass stock [air, non-urban air or from high stacks]: 1.26 kg; = 3150/2500
  Global average LUC emissions according 2nd edition of the Quantis-modified tool developed by Blonk Consultants 'WFLDB-adapted-Blonk 2014 direct-land-use-change-assessment-tool_2015-05-18a.xlsx', tab. 'Country & land use unknown'. The emission are based on the relative change in production areas in all countries for a given crop. The weighted average is used which takes into acount relative difference in crop expansion into primary forest, secondary forest, grassland, perennial and annual land. The amount of 3150 kg of CO2 per ha*year (taken from the tool) is divided with the yield of seed-cotton, 2500 kg per ha.
- Zinc, ion [water, surface water]: 8.11374e-6 kg; lognormal variance with pedigree 0.1088, pedigree (4,5,2,5,2)
  (same comment as for Transformation, to annual crop, irrigated)
- Mercury [water, surface water]: 1.48219e-8 kg; lognormal variance with pedigree 0.1088, pedigree (4,5,2,5,2)
  (same comment as for Transformation, to annual crop, irrigated)
- Mercury [water, ground-]: 1.949e-10 kg; lognormal variance with pedigree 0.1088, pedigree (4,5,2,5,2)
  (same comment as for Transformation, to annual crop, irrigated)
- Water [water, surface water]: 0.0126 m3; lognormal variance with pedigree 0.0194, pedigree (4,5,2,5,2)
  (same comment as for Transformation, to annual crop, irrigated)
- Nickel, ion [water, surface water]: 4.54226e-6 kg; lognormal variance with pedigree 0.1088, pedigree (4,5,2,5,2)
  (same comment as for Transformation, to annual crop, irrigated)
- Mercury [soil, agricultural]: -1.70678e-8 kg
  (same comment as for Transformation, to annual crop, irrigated)
- Copper [soil, agricultural]: -6.44462e-6 kg
  (same comment as for Transformation, to annual crop, irrigated)
- Zinc [soil, agricultural]: -1.91917e-5 kg
  (same comment as for Transformation, to annual crop, irrigated)
- Lead [soil, agricultural]: -1.56392e-6 kg
  (same comment as for Transformation, to annual crop, irrigated)
- Cadmium [soil, agricultural]: 1.5067e-6 kg; lognormal variance with pedigree 0.0588, pedigree (4,5,2,5,2)
  (same comment as for Transformation, to annual crop, irrigated)
- Cadmium, ion [water, ground-]: 8.55018e-9 kg; lognormal variance with pedigree 0.1088, pedigree (4,5,2,5,2)
  (same comment as for Transformation, to annual crop, irrigated)
- Nickel [soil, agricultural]: -2.35743e-6 kg
  (same comment as for Transformation, to annual crop, irrigated)
- Copper, ion [water, ground-]: 6.06455e-7 kg; lognormal variance with pedigree 0.1088, pedigree (4,5,2,5,2)
  (same comment as for Transformation, to annual crop, irrigated)
- Dinitrogen monoxide [air, non-urban air or from high stacks]: 0.0015055 kg; lognormal variance with pedigree 0.0488, pedigree (4,5,2,5,2)
  (same comment as for Transformation, to annual crop, irrigated)
- Copper, ion [water, surface water]: 4.58566e-6 kg; lognormal variance with pedigree 0.1088, pedigree (4,5,2,5,2)
  (same comment as for Transformation, to annual crop, irrigated)
- Water [air, non-urban air or from high stacks]: 0.06426 m3; lognormal variance with pedigree 0.0194, pedigree (4,5,2,5,2)
  (same comment as for Transformation, to annual crop, irrigated)
- Lead [water, surface water]: 1.72215e-6 kg; lognormal variance with pedigree 0.1088, pedigree (4,5,2,5,2)
  (same comment as for Transformation, to annual crop, irrigated)
- Chromium [soil, agricultural]: 9.9548e-6 kg; lognormal variance with pedigree 0.0588, pedigree (4,5,2,5,2)
  (same comment as for Transformation, to annual crop, irrigated)
- Phosphate [water, ground-]: 3.93494e-5 kg; lognormal variance with pedigree 0.0588, pedigree (4,5,2,5,2)
  (same comment as for Transformation, to annual crop, irrigated)
- Carbon dioxide, fossil [air, non-urban air or from high stacks]: 0.0719759 kg; lognormal variance with pedigree 0.0194, pedigree (4,5,2,5,2)
  (same comment as for Transformation, to annual crop, irrigated)
- Chromium, ion [water, ground-]: 3.76463e-6 kg; lognormal variance with pedigree 0.1088, pedigree (4,5,2,5,2)
  (same comment as for Transformation, to annual crop, irrigated)
- Water [water, ground-]: 0.04914 m3; lognormal variance with pedigree 0.0194, pedigree (4,5,2,5,2)
  (same comment as for Transformation, to annual crop, irrigated)
- Nitrate [water, ground-]: 0.0462869 kg; lognormal variance with pedigree 0.0588, pedigree (4,5,2,5,2)
  (same comment as for Transformation, to annual crop, irrigated)
- Ammonia [air, non-urban air or from high stacks]: 0.0104394 kg; lognormal variance with pedigree 0.0268, pedigree (4,5,2,5,2)
  (same comment as for Transformation, to annual crop, irrigated)
- Phosphorus [water, surface water]: 0.00051014 kg; lognormal variance with pedigree 0.0588, pedigree (4,5,2,5,2)
  (same comment as for Transformation, to annual crop, irrigated)
- Nitrogen oxides [air, non-urban air or from high stacks]: 0.00364903 kg; lognormal variance with pedigree 0.0588, pedigree (4,5,2,5,2)
  (same comment as for Transformation, to annual crop, irrigated)
- Lead [water, ground-]: 3.91272e-8 kg; lognormal variance with pedigree 0.1088, pedigree (4,5,2,5,2)
  (same comment as for Transformation, to annual crop, irrigated)

## Sampling procedure
The farmer was identified and contacted by agriculture science faculty familiar with the local farmers in the region. Data was collected directly from the farmer through semi-structured interview using a questionnaire based on the input requirements of the ecoinvent LCI calculation tool for crop production. The farmer does not maintain any written records and has provided the data from recent memory. In this region, typically farmers are unable to provide exact name of active ingredient in the pesticide they use and the same was noted from details given on the pesticide packet. Individual farmer is not able to calculate fuel consumption for his own farm alone and this information has been collected from farming community of the area

## Extrapolations
Ecoinvent LCI calculation tool for crop production was used to calculate field emissions from the cultivation process. The data has been approximated using Rape seed as proxy since the tool at this stage could not support non existing crops in ecoeditor. Number of wet days have been taken for the neighboring district (Ludhiana) and rainfall data is Normal rainfall for Punjab where the farm is located.
