# ethylene vinyl acetate copolymer production

Dataset: EcoSpold 2, unit process
Geography: RoW
Time period: 2000-01-01 to 2021-12-31
Technology level: current
Classification: EcoSpold01Categories: plastics/polymers
Classification: ISIC rev.4 ecoinvent: 2013:Manufacture of plastics and synthetic rubber in primary forms
Tags: ConvertedDataset
Scenario: Business-as-Usual
System model: Allocation, cut-off by classification
Generated by: Roland Hischier
Published in: Hischier R. 2007
Database: ecoinvent
isCopyrightProtected: true
accessRestrictedTo: 1

## General comment
The functional unit represent 1 kg of solid EVA. Large uncertainty of the process data due to weak data on the production process and missing data on process emissions.
[This dataset was already contained in the ecoinvent database version 2. It was not individually updated during the transfer to ecoinvent version 3. Life Cycle Impact Assessment results may still have changed, as they are affected by changes in the supply chain, i.e. in other datasets. This dataset was generated following the ecoinvent quality guidelines for version 2. It may have been subject to central changes described in the ecoinvent version 3 change report (http://www.ecoinvent.org/database/ecoinvent-version-3/reports-of-changes/), and the results of the central updates were reviewed extensively. The changes added e.g. consistent water flows and other information throughout the database. The documentation of this dataset can be found in the ecoinvent reports of version 2, which are still available via the ecoinvent website. The change report linked above covers all central changes that were made during the conversion process.]

## Included activities end
Raw materials and chemicals used for production, transport of materials to manufacturing plant, estimated emissions to air and water from production (incomplete), estimation of energy demand and infrastructure of the plant (approximation). Solid wastes omitted.

## Geography
Data used has no specific geographical origin (stoechiometry). Average europenan processes for raw materials, transport requirements and electricity mix used.

## Technology
Production from ethylene and vinyl acetate by emulsion polymerization with a yield of 95%. Inventory bases on stoechiometric calculations. The emissions to air (0.2 wt.% of raw material input) and water were estimated using mass balance. Treatment of the waste water in a internal waste water treatment plant assumed (elimination efficiency of 90% for C).

## Time period
time to which data refer

## Parameters
- fraction, cooling water, cooling pond system, to air: 0.032 dimensionless; name fraction_CW_CP_to_air; lognormal variance with pedigree 0.0413, pedigree (2,3,1,3,1)
  Calculated based on literature value (Scown, C.D., 2011, Water Footprint of U.S. Transportation Fuels and supplying information of the article) (Vionnet, S., Quantis Water Database - Technical Report, 2012).
- fraction, cooling water, recirculating system, to air: 0.771 dimensionless; name fraction_CW_R_to_air; lognormal variance with pedigree 0.0413, pedigree (2,3,1,3,1)
  (same comment as for fraction, cooling water, cooling pond system, to air)
- fraction, cooling water, once-through system, to air: 0.004 dimensionless; name fraction_CW_OT_to_air; lognormal variance with pedigree 0.0413, pedigree (2,3,1,3,1)
  (same comment as for fraction, cooling water, cooling pond system, to air)
- fraction, cooling water, to air: 0.3875 dimensionless; name fraction_CW_to_air; = (0.5*fraction_CW_OT_to_air)+(0.5*fraction_CW_R_to_air); lognormal variance with pedigree 0.092025, pedigree (4,4,3,2,4)
  Calculated value based on literature value (see comments of the other parametres present in this dataset) and expert opinion. In the case when no industry/literature data are available about the type of cooling or directly fraction, cooling water, to air specific for the process a default assumption is applied. It is assumed that the once-through cooling system is used in 50% of all cases and recirculating system is used in another 50% of all cases.
- fraction, process water, to air: 0.205 dimensionless; name fraction_PW_to_air; lognormal variance with pedigree 0.092025, pedigree (4,4,3,2,4)

## Reference product
- ethylene vinyl acetate copolymer: 1 kg; By-product classification allocatable product; CPC 347: Plastics in primary forms; CAS 24937-78-8
  EcoSpold01Location=RER
  production volume 2.67763 kg
    This is a placeholder value that does not reflect real-world production volumes. This dataset does not currently require a real-world production volume to work in the database framework, and no actual data were collected yet. This has no negative effect on the results of the ecoinvent database.
  property heating value, net 35.99 MJ
    LHV is calculated based on the elemental composition of the substance. Based on the name of the substance, the chemical formula of the substance is assumed to be: C2.14H2.22O0.07
  property price 1.12 EUR2005
    Calculated value based on data from United Nations Commodity Trade Statistics Database (comtrade.un.org). UN comtrade category: 390130 Ethylene-vinyl acetate copolymers in primary forms. Year 2005. Using exchange rate of 1EURO = 1.209 USD. Average of price of import into 5 main markets (EU, US, JP, IN and CN).
  property carbon content, fossil 0.79734
    Ethylene vinyl acetate copolymer contains 20% of vinyl acetate (ecoinvent v2.2 report 11_II)
  property carbon content 0.79734
    carbon content on a dry matter basis (reserved; not for manual entry)
  properties: wet mass 1 kg, water in wet mass 0 kg, dry mass 1 kg, water content 0, carbon content, non-fossil 0, carbon allocation 0.79734 kg

## Inputs from technosphere
- heat, district or industrial, natural gas: 0 MJ; pedigree (1,1,1,1,1)
  Estimated with data from a large chem. Plant
  EcoSpold01Location=RER
  Uncertainty: estimated with data from a large chem. Plant
  properties: heating value, net 1 MJ
- potato starch: 0.0052584 kg; lognormal variance with pedigree 0.2, pedigree (5,5,5,5,4)
  Estimation based on Ullmann's
  EcoSpold01Location=DE
  Uncertainty: estimation based on Ullmann's
  properties: carbon content, non-fossil 0.46, water content 0.25, dry mass 0.8 kg, wet mass 1 kg, heating value, net 10.66 MJ
  note on carbon content, non-fossil: C-content of starch is considered 46% on dry mass basis (from "Evolutionary and Biochemical Aspects", A.D. Kay and T. Vrede (in Global Ecology, 2010, Elsevier B.V., S.E. Jørgensen Ed.)).
- chemical factory, organics: 4e-10 unit; lognormal variance with pedigree 0.588, pedigree (4,5,5,5,5)
  EcoSpold01Location=RER
  Estimation
  Uncertainty: estimation
- electricity, medium voltage: 0 kWh; pedigree (1,1,1,1,1)
  EcoSpold01Location=UCTE
  Estimated with data from a large chem. Plant
  Uncertainty: estimated with data from a large chem. Plant
- ethylene: 0 kg; pedigree (1,1,1,1,1)
  Estimation based on Ullmann's
  EcoSpold01Location=RER
  Uncertainty: estimation based on Ullmann's
  properties: heating value, net 43.22 MJ, carbon content, fossil 0.857143, dry mass 1 kg, wet mass 1 kg
- vinyl acetate: 0.21034 kg; lognormal variance with pedigree 0.2, pedigree (5,5,5,5,4)
  (same comment as for ethylene)
  properties: heating value, net 25.35 MJ, carbon content, fossil 0.55814, dry mass 1 kg, wet mass 1 kg
  note on carbon content, fossil: Vinyl acetate (CH3CO2CH=CH2) (ecoinvent v2.2 report 11_II), C4H6O2. MW=86 g/mol
- heat, district or industrial, natural gas: 0.0303564, 1.96964 MJ (2 entries); lognormal variance with pedigree 0.21, pedigree (5,5,5,5,4)
  (same comment as for heat, district or industrial, natural gas)
- electricity, medium voltage: 0.00419753, 0.000804905, 0.0135127, 0.19653, 0.027701, 0.090254 kWh (6 entries); lognormal variance with pedigree 0.21, pedigree (5,5,5,5,4)
  (same comment as for electricity, medium voltage)
- ethylene: 0.0133022, 0.829068 kg (2 entries); lognormal variance with pedigree 0.2, pedigree (5,5,5,5,4)
  (same comment as for ethylene)

## Inputs from nature
- Water, cooling, unspecified natural origin [natural resource, in water]: 0.024 m3; name water_cooling_UNO_input; lognormal variance with pedigree 0.21, pedigree (5,5,5,5,4)
  Estimated with data from a large chem. Plant
  Uncertainty: estimated with data from a large chem. Plant
- Water, unspecified natural origin [natural resource, in water]: 0.012 m3; name water_UNO_input; lognormal variance with pedigree 0.21, pedigree (5,5,5,5,4)
  Estimation
  Uncertainty: estimation

## Emissions to nature
- BOD5, Biological Oxygen Demand [water, surface water]: 0.0093018 kg; lognormal variance with pedigree 0.23, pedigree (5,5,5,5,4)
  Estimated from mass balance and WWTP effic.
  Uncertainty: estimated from mass balance and WWTP effic.
- Hydrocarbons, unspecified [water, surface water]: 0.0031551 kg; lognormal variance with pedigree 0.51, pedigree (5,5,5,5,4)
  (same comment as for BOD5, Biological Oxygen Demand)
- Water [water, unspecified]: 0.02424 m3; name water_to_water_unspecified; lognormal variance with pedigree 0.0827, pedigree (2,2,5,5,1)
  Calculated value based on literature values and expert opinion. See comments in the parametres' comment field.
  property fraction, origin: unspecified 1; name fraction_origin_unspecified_Ww
  property fraction, origin: salt water 0; name fraction_origin_salt_water_Ww
  property dry mass 0 kg; name DM
  property water in wet mass 1000 kg; name WWM
  property carbon content, non-fossil 0; name C_content_non_fossil
  property carbon content, fossil 0; name C_content_fossil
  property wet mass 1000 kg; name WM
  property fraction, origin: fresh water 0; name fraction_origin_fresh_water_Ww
- TOC, Total Organic Carbon [water, surface water]: 0.0025118 kg; lognormal variance with pedigree 0.23, pedigree (5,5,5,5,4)
  (same comment as for BOD5, Biological Oxygen Demand)
- DOC, Dissolved Organic Carbon [water, surface water]: 0.0025118 kg; lognormal variance with pedigree 0.23, pedigree (5,5,5,5,4)
  (same comment as for BOD5, Biological Oxygen Demand)
- Water [air, unspecified]: 0.01176 m3; name water_to_air_unspecified; lognormal variance with pedigree 0.0827, pedigree (2,2,5,5,1)
  (same comment as for Water)
  property fraction, origin: salt water 0; name fraction_origin_salt_water
  property fraction, origin: unspecified 1; name fraction_origin_unspecified
  property fraction, origin: fresh water 0; name fraction_origin_fresh_water
- Carbon dioxide, fossil [air, urban air close to ground]: 0.083114 kg; lognormal variance with pedigree 0.2, pedigree (5,5,5,5,4)
  (same comment as for BOD5, Biological Oxygen Demand)
- COD, Chemical Oxygen Demand [water, surface water]: 0.0093018 kg; lognormal variance with pedigree 0.23, pedigree (5,5,5,5,4)
  (same comment as for BOD5, Biological Oxygen Demand)

## Sampling procedure
Process data based on stoechiometric calculations of few literature sources. Energy demand based on approximation from large chemical plant. Process emissions based on estimations only.

## Extrapolations
none This dataset has been copied from an original dataset covering the geography RER. The uncertainty has been adjusted accordingly.

## Review by Jürgen Sutter 2007-09-13
passed.
