# natural gas, high pressure, import from RU

Dataset: EcoSpold 2, unit process
Geography: GR
Time period: 2012-01-01 to 2021-12-31
Technology level: current
Classification: ISIC rev.4 ecoinvent: 4930:Transport via pipeline
Scenario: Business-as-Usual
System model: Allocation, cut-off by classification
Generated by: Florentine Brunner
Published in: Faist Emmenegger, Mireille 2015
Database: ecoinvent
isCopyrightProtected: true
accessRestrictedTo: 1

## General comment
This dataset describes the transport needed for an average export of Russian natural gas (expressed in tkm). Gas losses and emissions during seasonal storage are included. An average distance of 6000 km is estimated for the export.

## Included activities start
'Exit gate' of natural gas field

## Included activities end
'Entry gate' of national market.

## Geography
The average weighted export distance is based on the trade movements 2012.

## Technology
The distance to the different countries is based on rough estimates.

## Reference product
- natural gas, high pressure: 1 m3; CPC 12020: Natural gas, liquefied or in the gaseous state; By-product classification allocatable product; CAS 14493-06-2
  production volume 2.58785e9 m3; = 2.67*1000000000*37.8/39
    m3 imported in 2012 from RU to GR according to BP Statistical Review of World Energy, June 2014. The share of import to the category 'other Europe' is 3.86% from Netherlands, 38.4% from Norway, 0.008% from United Kingdom, 48.2% from Russian Federation, 9.6% from Algeria based on the import mix to 'other Europe' as described by BP 2014. Scaled form BP standard heating value (37.8MJ/m3) to LHV of ecoinvent v3 (39MJ/m3).
    Refrence(s): BP (2014). Statistical Review of World Energy, June 2014. Retrieved online from http://www.bp.com/content/dam/bp/excel/energy-economics/statistical-review-2015/bp-statistical-review-of-world-energy-2015-workbook.xlsx, 30 August, 2017
  property price 0.166 EUR2005
    Temporary price data. Calculated as 90% of purchasers price based on: 2005 price for Europe-27 Import (US$ and kg) in UN Commodity Trade Statistics Database - Natural gas in gaseous state (http://data.un.org/Data.aspx?q=natural+gas&d=ComTrade&f=_l1Code%3a28%3bcmdCode%3a271121; accessed 4 January 2011), using density of natural gas of 0.8 kg/m3 for unit conversion.
  property carbon content, fossil 0.602381
    An average C content of 0.506 kg C/ m3 has been assumed (this average has been calculated using data in Tab 3.5, ecoinvent v2.2 report 6_V
  property heating value, net 39 MJ
    Literature value, Source: United Nations Statistics Division (2018) International Recommendations for Energy Statistics (IRES). Available at: http://unstats.un.org/unsd/statcom/doc11/BG-IRES.pdf.
  property carbon content 0.602381
    carbon content on a dry matter basis (reserved; not for manual entry)
  properties: heating value, gross 0 MJ, carbon content, non-fossil 0, water content 0, dry mass 0.84 kg, water in wet mass 0 kg, wet mass 0.84 kg, carbon allocation 0.506 kg

## Inputs from technosphere
- transport, pipeline, long distance, natural gas: 1.314 metric ton*km; = (6700-4900)*0.73/1000; lognormal variance with pedigree 0.1286, pedigree (2,1,4,1,1)
  Average distance from Russian border to importing country estimated 1800km multiplied by density of the natural gas.
  Uncertainty: A
- transport, pipeline, long distance, natural gas: 3.577 metric ton*km; = 4900*0.73/1000; lognormal variance with pedigree 0.1286, pedigree (2,1,4,1,1)
  Average transport distance for gas exports from Russian Producers to the Russian border of 4900 km according Faist Emmenegger (2015) multiplied by density of NG. Reference(s): Faist Emmenegger M., Del Duce A. ; Zah R. (2015) Update and extension of the inventory data for energy gases, Final Report.
  Uncertainty: A
- natural gas, burned in gas motor, for storage: 0.0546 MJ; lognormal variance with pedigree 0.036, pedigree (4,1,4,5,3)
  Data from german industrial expert for 2001, standard technology
  Uncertainty: D
  properties: heating value, net 1 MJ
- natural gas, high pressure: 1.0001 m3; lognormal variance with pedigree 0.026, pedigree (4,1,4,1,1)
  average losses
  Uncertainty: a
  properties: heating value, net 39 MJ, carbon content, fossil 0.602381, dry mass 0.84 kg, wet mass 0.84 kg
  note on heating value, net: Literature value, Source: United Nations Statistics Division (2018) International Recommendations for Energy Statistics (IRES). Available at: http://unstats.un.org/unsd/statcom/doc11/BG-IRES.pdf.
  note on carbon content, fossil: An average C content of 0.506 kg C/ m3 has been assumed (this average has been calculated using data in Tab 3.5, ecoinvent v2.2 report 6_V

## Emissions to nature
- NMVOC, non-methane volatile organic compounds, unspecified origin [air, non-urban air or from high stacks]: 1e-7 kg; lognormal variance with pedigree 0.1286, pedigree (2,1,4,1,1)
  Calculated based on average losses and russian gas composition
  Uncertainty: c
- Ethane [air, non-urban air or from high stacks]: 6e-7 kg; lognormal variance with pedigree 0.1286, pedigree (2,1,4,1,1)
  Calculated based on average losses and russian gas composition
  Uncertainty: c
- Carbon dioxide, fossil [air, non-urban air or from high stacks]: 1e-7 kg; lognormal variance with pedigree 0.0086, pedigree (2,1,4,1,1)
  Calculated based on average losses and russian gas composition
  Uncertainty: c
- Propane [air, non-urban air or from high stacks]: 2e-7 kg; lognormal variance with pedigree 0.1286, pedigree (2,1,4,1,1)
  Calculated based on average losses and russian gas composition
  Uncertainty: c
- Mercury [air, non-urban air or from high stacks]: 1e-12 kg; lognormal variance with pedigree 0.0486, pedigree (2,1,4,1,1)
  Calculated based on average losses and russian gas composition
  Uncertainty: c
- Butane [air, non-urban air or from high stacks]: 1e-7 kg; lognormal variance with pedigree 0.1286, pedigree (2,1,4,1,1)
  Calculated based on average losses and russian gas composition
  Uncertainty: c
- Methane, fossil [air, non-urban air or from high stacks]: 7.16e-5 kg; lognormal variance with pedigree 0.1286, pedigree (2,1,4,1,1)
  Calculated based on average losses and russian gas composition
  Uncertainty: c

## Extrapolations
This dataset has been extrapolated from year 2012 to the year of the calculation (2021). The uncertainty has been adjusted accordingly.
