# treatment of raw sewage sludge, municipal incineration

Dataset: EcoSpold 2, unit process
Geography: RoW
Time period: 2006-01-01 to 2021-12-31
Technology level: current
Classification: ISIC rev.4 ecoinvent: 3821:Treatment and disposal of non-hazardous waste
Synonyms: municipal waste incineration; Siedlungsabfallverbrennung; Kehrichtverbrennung
Scenario: Business-as-Usual
System model: Allocation, cut-off by classification
Share of production covered: 1.8 %
Generated by: Gabor Doka
Published in: Doka G. 2013
Database: ecoinvent
isCopyrightProtected: true
accessRestrictedTo: 1

## General comment
This dataset represents the activity of waste disposal of raw sewage sludge in a municipal solid waste incinerator (MSWI) // Recommended use of this dataset: for incineration of unfermented sewage sludge from treatment of average municipal wastewater // // Waste composition (wet, in ppm): upper heating value 5.077 MJ/kg; lower heating value 3.196 MJ/kg; H2O 730000; O 61097; H 13886; C 111090; S 5191.6; N 11827; P 5613.7; B n.a.; Cl n.a.; Br n.a.; F n.a.; I n.a.; Ag n.a.; As 0.50992; Ba n.a.; Cd 0.36239; Co 2.0891; Cr 15.796; Cu 72.712; Hg 0.36239; Mn 68.441; Mo 1.2364; Ni 6.8001; Pb 20.145; Sb n.a.; Se n.a.; Sn 5.1856; V n.a.; Zn 198.1; Be n.a.; Sc n.a.; Sr n.a.; Ti n.a.; Tl n.a.; W n.a.; Si 7705.6; Fe 34796; Ca 13075; Al 3862.6; K n.a.; Mg 1468; Na n.a.; // Share of carbon in waste that is biogenic 100%. // Share of metals in waste not oxidised and bulk-recyclable (exclude very small or thin parts) Iron: 0%; Alu: 0%; Copper: 0%. // One kg of this waste produces 0.126 kg of slag and 0.0168 kg of residues, which are landfilled. Additional solidification with 0.006721 kg of cement. // Net energy production: 0.26MJ/kg electric energy and 0.72MJ/kg thermal energy. // Recovery of metal scrap to recycling: 0g iron scrap, 0g aluminium scrap, 0g copper scrap.

## Included activities start
waste incineration from waste reception gate and delivery into waste bunker at incinerator plant site (without transports to the incinerator)

## Included activities end
Waste-specific short-term emissions to water from leachate. Long-term emissions from landfill to ground water.

## Geography
Specific to the technology mix encountered in Switzerland in 2010. Well applicable to modern incineration practices in Europe, North America or Japan.

## Technology
average Swiss MSWI plants in 2010 (grate incinerators) with electrostatic precipitator for fly ash (ESP), wet flue gas scrubber and 25% SNCR , 42.77% SCR-high dust , 32.68% SCR-low dust -DeNOx facilities and 0% without Denox (weighted according to mass of burnt waste, representing Swiss average). Efficiency of iron scrap separation from slag : 58%. Efficiency of non-ferrous scrap separation from slag : 31%. Gross electric efficiency technology mix 15.84% and Gross thermal efficiency technology mix 28.51%

## Time period
Waste composition as given in literature reference, theoretical data or other source. Transfer coefficients for modern MSWI.

## Reference product
- raw sewage sludge: -1 kg; By-product classification Waste; CPC 39920: Sewage sludge
  Main reference product of this activity (supply of disposal service).
  production volume 3.2025e9 kg
    based on qualified estimate on MSW in WTE globally and share of sewage sludge in Swiss MSWI (Binggeli et al. 2012) and unqualified split into 70% digester sludge and 30% raw sludge.
  property heating value, net 3.2 MJ
    Value taken from the general comment of the treatment dataset.
  property price 0 EUR2005
    Waste products are assigned a price of zero as they are assumed to require further treatment.
  property carbon content 0.4096
    carbon content on a dry matter basis (reserved; not for manual entry)
  properties: dry mass 0.05 kg, carbon content, fossil 0, carbon content, non-fossil 0.4096, wet mass 1 kg, water in wet mass 0.95 kg, water content 19, carbon allocation 0.02048 kg

## By-products
- electricity, for reuse in municipal waste incineration only: 0 kWh; name E_el_prod_MSWI; CPC 17100: Electrical energy; By-product classification allocatable product; pedigree (1,1,1,1,1)
  Net electricity generated from this waste and used in internal MSWI plant energy redistribution.
  Uncertainty: uncertainty is calculated from uncertainties in waste composition and uncertainties in energy efficiency and the uncertainty in internal energy demand
  production volume 2.3489e8 kWh
    calculated in proportion to reference product waste input to incinerator
  property exergy 3.6 MJ; name E_el_prod_MSWI_exergy
    This exergy property is based on the exergy content of the product.
  property true value relation 3.6; name E_el_prod_MSWI_true_value_relation
    property to calculate "true value" from
  property price 0.1 EUR2005; name E_el_prod_MSWI_price_EUR2005
    Estimated to be the same price as in case of electricity, medium voltage.
- heat, for reuse in municipal waste incineration only: 0 MJ; name E_th_prod_MSWI; By-product classification allocatable product; CPC 17300: Steam and hot water; pedigree (1,1,1,1,1)
  (same comment as for electricity, for reuse in municipal waste incineration only)
  production volume 2.3102e9 MJ
    calculated in proportion to reference product waste input to incinerator
  property price 0.0106 EUR2005; name E_th_prod_MSWI_price_EUR2005
    Average European district heat price from Ecoheatcool and Euroheat 2005-2006, Ecoheat Work package 1: The European heat market. Final report. 10.6 EUR/GJ i s the price of district heat. http://www.solarthermalworld.org/files/Ecoheatcool%20WP1%20Web.pdf?download
  property exergy 0.1842 MJ; name E_th_prod_MSWI_exergy
    This exergy property is based on the exergy content of the product.
  property true value relation 0.1842; name E_th_prod_MSWI_true_value_relation
    property to calculate "true value" from

## Inputs from technosphere
- process-specific burdens, residual material landfill: 0 kg; pedigree (1,1,1,1,1)
  Mass-specific expenditures required for landfilling of incineration residues.
  Uncertainty: uncertainty is calculated from uncertainties in waste composition and transfer coefficients in incinerator
- chromium oxide, flakes: 1.8233e-6 kg; lognormal variance with pedigree 1.3909, pedigree (1,1,4,1,1)
  Input to DeNOx stage.
  Uncertainty: uncertainty calculated from uncertainty in average DeNOx input, uncertainty in the share of thermal NOx, uncertainty of nitrogen content in average municipal waste and the uncertainty in nitrogen content in *this* waste.
  properties: wet mass 1 kg, dry mass 1 kg
- cement, unspecified: 0 kg; pedigree (1,1,1,1,1)
  Cement required for solidification of landfilled residual material.
  Uncertainty: Uncertainty calculated from uncertainty of the waste composition of this waste, of transfer coefficients in the incinerator and of the solidification recipe.
  properties: dry mass 1 kg, wet mass 1 kg
- process-specific burdens, slag landfill: 0 kg; pedigree (1,1,1,1,1)
  Mass-specific expenditures required for landfilling of bottom ash.
  Uncertainty: uncertainty is calculated from uncertainties in waste composition and transfer coefficients in incinerator
- water, decarbonised: 0 kg; pedigree (1,1,1,1,1)
  Incinerator process water used in flue gas scrubber stage.
  Uncertainty: uncertainty calculated from uncertainty in average water input, and the uncertainty of the waste composition of this waste
  properties: wet mass 1 kg
- waste cement, hydrated: 0 kg; pedigree (1,1,1,1,1)
  Hydrated cement output for solidification of landfilled residual material.
  Uncertainty: Uncertainty calculated from uncertainty of the waste composition of this waste and transfer coefficients in the incinerator and of the solidification recipe.
  production volume 0 kg
    calculated in proportion to reference product waste input to incinerator
  properties: wet mass 1 kg, dry mass 1 kg
- municipal waste incineration facility: 2.5e-10 unit
  Demands per kilogram waste.
- residual material landfill: 3.5005e-11 unit; lognormal variance with pedigree 0.049103, pedigree (1,1,4,1,1)
  Landfill infrastructure required for landfilling of incineration residues.
  Uncertainty: uncertainty is calculated from uncertainties in waste composition and transfer coefficients in incinerator
- hydrochloric acid, without water, in 30% solution state: 1.3404e-5 kg; lognormal variance with pedigree 0.11927, pedigree (1,1,4,1,1)
  Auxilliary inputs for the wastewater treatment stage of the incinerator plant.
  Uncertainty: uncertainty calculated from uncertainty in average HCl input, of transfer coefficients in the incinerator, and the uncertainty of the waste composition of this waste
  properties: wet mass 1 kg, dry mass 1 kg, heating value, net 3.32 MJ
- chemical, organic: 6.0939e-6 kg; lognormal variance with pedigree 1.6826, pedigree (1,1,4,1,1)
  Auxilliary inputs for the wastewater treatment stage of the incinerator plant. Proxy for (pure) Trisodium-trimercapto-s-triazine (CAS 17766-26-6), used as 15% diluted solution, aka TMT15.
  Uncertainty: uncertainty calculated from uncertainty in average TMT15 input, of transfer coefficients in the incinerator, and the uncertainty of the waste composition of this waste
  properties: dry mass 1 kg, heating value, net 19.03 MJ, carbon content, fossil 0.628, wet mass 1 kg
- ammonia, anhydrous, liquid: 0 kg; pedigree (1,1,1,1,1)
  Input to DeNOx stage (100% NH3).
  Uncertainty: uncertainty calculated from uncertainty in average DeNOx input, uncertainty in the share of thermal NOx, uncertainty of nitrogen content in average municipal waste and the uncertainty in nitrogen content in *this* waste.
  properties: wet mass 1 kg, dry mass 1 kg
- heat, district or industrial, natural gas: 0 MJ; pedigree (1,1,1,1,1)
  Input to DeNOx stage, to heat up flue gas in low-dust SCR.
  Uncertainty: uncertainty calculated from uncertainty in average DeNOx input, uncertainty in the share of thermal NOx, uncertainty of nitrogen content in average municipal waste and the uncertainty in nitrogen content in *this* waste.
  properties: heating value, net 1 MJ
- titanium dioxide: 8.934e-5 kg; lognormal variance with pedigree 1.3909, pedigree (1,1,4,1,1)
  Input to DeNOx stage (TiO2 catalyst carrier)
  Uncertainty: uncertainty calculated from uncertainty in average DeNOx input, uncertainty in the share of thermal NOx, uncertainty of nitrogen content in average municipal waste and the uncertainty in nitrogen content in *this* waste.
  properties: dry mass 1 kg, wet mass 1 kg
- slag landfill: 2.2353e-10 unit; lognormal variance with pedigree 0.053857, pedigree (1,1,4,1,1)
  Landfill infrastructure required for landfilling of bottom ash.
  Uncertainty: uncertainty is calculated from uncertainties in waste composition and transfer coefficients in incinerator
- iron (III) chloride, without water, in 40% solution state: 5.4279e-6 kg; lognormal variance with pedigree 0.42842, pedigree (1,1,4,1,1)
  Auxilliary inputs for the wastewater treatment stage of the incinerator plant.
  Uncertainty: uncertainty calculated from uncertainty in average FeCl3 input, of transfer coefficients in the incinerator, and the uncertainty of the waste composition of this waste
  properties: wet mass 1 kg, dry mass 1 kg
- quicklime, milled, packed: 8.3607e-5 kg; lognormal variance with pedigree 0.28659, pedigree (1,1,4,1,1)
  Auxilliary inputs for the flue gas treatment stage of the incinerator plant.
  Uncertainty: uncertainty calculated from uncertainty in average CaO input, of transfer coefficients in the incinerator, and the uncertainty of the waste composition of this waste
  properties: dry mass 0.99 kg, water content 0.010101, wet mass 1 kg
- sodium hydroxide, without water, in 50% solution state: 0.0018103 kg; lognormal variance with pedigree 0.26049, pedigree (1,1,4,1,1)
  Auxilliary inputs for the flue gas treatment stage of the incinerator plant.
  Uncertainty: uncertainty calculated from uncertainty in average NaOH input, of transfer coefficients in the incinerator, and the uncertainty of the waste composition of this waste
  properties: heating value, net 3.03 MJ, dry mass 1 kg, wet mass 1 kg
- chemical, inorganic: 5.0996e-5 kg; lognormal variance with pedigree 0.11927, pedigree (1,1,4,1,1)
  Auxilliary inputs for the wastewater treatment stage of the incinerator plant. Proxy for Polyelectrolyte.
  Uncertainty: uncertainty calculated from uncertainty in average Polyelectrolyte input, of transfer coefficients in the incinerator, and the uncertainty of the waste composition of this waste
  properties: carbon content, fossil 0.003, dry mass 1 kg, wet mass 1 kg
- transport, freight, lorry, unspecified: 0 metric ton*km; pedigree (1,1,1,1,1)
  Transport services to transport incineration residues to landfills.
  Uncertainty: uncertainty calculated from uncertainty of the waste composition of this waste, uncertainty of transfer coefficients and the uncertainty in generic transportation distances
- process-specific burdens, residual material landfill: 0.00475314, 0.0120499 kg (2 entries); lognormal variance with pedigree 0.049103, pedigree (1,1,4,1,1)
  (same comment as for process-specific burdens, residual material landfill)
- cement, unspecified: 0.000970484, 0.000201929, 1.47899e-5, 4.21561e-5, 0.000953373, 2.80606e-5, 0.000308188, 3.72873e-5, 0.00416473 kg (9 entries); lognormal variance with pedigree 0.058187, pedigree (1,1,4,1,1)
  (same comment as for cement, unspecified)
- process-specific burdens, slag landfill: 0.0355686, 0.0901714 kg (2 entries); lognormal variance with pedigree 0.053857, pedigree (1,1,4,1,1)
  (same comment as for process-specific burdens, slag landfill)
- water, decarbonised: 0.00545134, 0.0141844, 0.0572088, 0.0139701, 0.0028163, 0.00926054, 0.000511237, 0.00728502, 0.0169698, 0.106447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 kg (12 entries); lognormal variance with pedigree 0.42842, pedigree (1,1,4,1,1)
  (same comment as for water, decarbonised)
- waste cement, hydrated: -0.00475314, -0.0120499 kg (2 entries); lognormal variance with pedigree 0.058187, pedigree (1,1,4,1,1)
  (same comment as for waste cement, hydrated)
  production volume 5.3811e7 kg
- ammonia, anhydrous, liquid: 0.000298908, 2.56947e-5, 3.99744e-5, 7.92035e-5, 7.75985e-5, 8.13316e-6, 3.63582e-5, 0.000860129 kg (8 entries); lognormal variance with pedigree 0.97842, pedigree (1,1,4,1,1)
  (same comment as for ammonia, anhydrous, liquid)
- heat, district or industrial, natural gas: 0.00296786, 0.0711156, 0.192567 MJ (3 entries); lognormal variance with pedigree 0.97842, pedigree (1,1,4,1,1)
  (same comment as for heat, district or industrial, natural gas)
- transport, freight, lorry, unspecified: 0.000652484, 0.000102155, 0.00494686 metric ton*km (3 entries); lognormal variance with pedigree 0.044443, pedigree (1,1,4,1,1)
  (same comment as for transport, freight, lorry, unspecified)

## Inputs from nature
- Oxygen [natural resource, in air]: 0.48171 kg; lognormal variance with pedigree 0.073386, pedigree (1,1,4,1,1)
  Oxygen from ambient air needed to combust and oxidise this waste. Net demand, i.e. without O2 leaving the plant in flue gas uncombusted.
  Uncertainty: uncertainty is calculated from uncertainties in waste composition and transfer coefficients to flue gas and soild residues in incinerator

## Emissions to nature
- Zinc [air, urban air close to ground]: 1.3278e-7 kg; lognormal variance with pedigree 0.89896, pedigree (1,1,4,1,1)
  Emission to air from waste composition and transfer coefficients.
  Uncertainty: uncertainty is calculated from uncertainties in waste composition and transfer coefficients in incinerator
- Cyanide [air, urban air close to ground]: 3.7897e-5 kg; lognormal variance with pedigree 1.1295, pedigree (1,1,4,1,1)
  Nitrogen species emitted to air after DeNOx stage.
  Uncertainty: uncertainty calculated from uncertainty in average N-emissions and uncertainty in the share of thermal NOx and the uncertainty in nitrogen content in *this* waste.
- Phosphorus [air, urban air close to ground]: 5.7049e-6 kg; lognormal variance with pedigree 0.46773, pedigree (1,1,4,1,1)
  (same comment as for Zinc)
- Methane, non-fossil [air, urban air close to ground]: 6.35e-7 kg; lognormal variance with pedigree 0.081565, pedigree (1,1,4,1,1)
  Incomplete combustion product emitted to air.
  Uncertainty: uncertainty calculated from uncertainty in average operation emissions, and the uncertainty of the flue gas volume from this waste.
- Aluminium [air, urban air close to ground]: 3.1493e-9 kg; lognormal variance with pedigree 0.56554, pedigree (1,1,4,1,1)
  (same comment as for Zinc)
- Phosphate [water, surface water]: 3.1561e-6 kg; lognormal variance with pedigree 0.39182, pedigree (1,1,4,1,1)
  Emissions to water from waste composition and transfer coefficients in incinerator and landfills.
  Uncertainty: uncertainty is calculated from uncertainties in waste composition and transfer coefficients in incinerator and landfills
- Benzene, pentachloro- [air, urban air close to ground]: 2.2366e-10 kg; lognormal variance with pedigree 0.081565, pedigree (1,1,4,1,1)
  (same comment as for Methane, non-fossil)
- Particulates, > 2.5 um, and < 10um [air, urban air close to ground]: 2.5398e-8 kg; lognormal variance with pedigree 0.18028, pedigree (1,1,4,1,1)
  (same comment as for Methane, non-fossil)
- Benzene, hexachloro- [air, urban air close to ground]: 8.8516e-11 kg; lognormal variance with pedigree 0.081565, pedigree (1,1,4,1,1)
  (same comment as for Methane, non-fossil)
- COD, Chemical Oxygen Demand [water, surface water]: 0.00012995 kg; lognormal variance with pedigree 0.13814, pedigree (1,1,4,1,1)
  (same comment as for Phosphate)
- Water [water, surface water]: 0.0004693 m3; lognormal variance with pedigree 1.7871, pedigree (1,1,4,1,1)
  Process water released to surface water.
  Uncertainty: uncertainty calculated from uncertainty in process water input and the uncertainty of fraction to surface water.
- Phenol, pentachloro- [air, urban air close to ground]: 1.8435e-11 kg; lognormal variance with pedigree 0.081565, pedigree (1,1,4,1,1)
  (same comment as for Methane, non-fossil)
- Calcium, ion [water, surface water]: 0.00014475 kg; lognormal variance with pedigree 0.28379, pedigree (1,1,4,1,1)
  (same comment as for Phosphate)
- DOC, Dissolved Organic Carbon [water, surface water]: 5.6748e-5 kg; lognormal variance with pedigree 0.13865, pedigree (1,1,4,1,1)
  (same comment as for Phosphate)
- Lead [water, surface water]: 1.927e-9 kg; lognormal variance with pedigree 0.99555, pedigree (1,1,4,1,1)
  (same comment as for Phosphate)
- TOC, Total Organic Carbon [water, surface water]: 5.6748e-5 kg; lognormal variance with pedigree 0.13865, pedigree (1,1,4,1,1)
  (same comment as for Phosphate)
- Nitrogen oxides [air, urban air close to ground]: 0.00053091 kg; lognormal variance with pedigree 1.0435, pedigree (1,1,4,1,1)
  Sum of fuel-Nox and thermal-NOx emitted to air after DeNOx stage.
  Uncertainty: uncertainty calculated from uncertainty in average N-emissions and uncertainty in the share of thermal NOx and the uncertainty in nitrogen content in *this* waste.
- Sulfate [water, ground-, long-term]: 0.012858 kg; lognormal variance with pedigree 0.2513, pedigree (1,1,4,1,1)
  Long-term emissions from landfilling of incineration residues.
  Uncertainty: uncertainty is calculated from uncertainties in waste composition and transfer coefficients in incinerator and landfills.
- Molybdenum [water, ground-, long-term]: 8.9707e-7 kg; lognormal variance with pedigree 1.548, pedigree (1,1,4,1,1)
  (same comment as for Sulfate)
- Carbon dioxide, non-fossil [air, urban air close to ground]: 0.40475 kg; lognormal variance with pedigree 0.12008, pedigree (1,1,4,1,1)
  (same comment as for Zinc)
- Iron, ion [water, ground-, long-term]: 0.017554 kg; lognormal variance with pedigree 0.41813, pedigree (1,1,4,1,1)
  (same comment as for Sulfate)
- Magnesium [water, surface water]: 6.8495e-6 kg; lognormal variance with pedigree 0.78698, pedigree (1,1,4,1,1)
  (same comment as for Phosphate)
- NMVOC, non-methane volatile organic compounds, unspecified origin [air, urban air close to ground]: 1.9266e-6 kg; lognormal variance with pedigree 0.081565, pedigree (1,1,4,1,1)
  (same comment as for Methane, non-fossil)
- Mercury [air, urban air close to ground]: 1.0275e-8 kg; lognormal variance with pedigree 1.7127, pedigree (1,1,4,1,1)
  (same comment as for Zinc)
- Nitrate [water, surface water]: 0.00015076 kg; lognormal variance with pedigree 0.25561, pedigree (1,1,4,1,1)
  (same comment as for Phosphate)
- Nickel, ion [water, ground-, long-term]: 6.5274e-6 kg; lognormal variance with pedigree 1.2962, pedigree (1,1,4,1,1)
  (same comment as for Sulfate)
- Cadmium [air, urban air close to ground]: 1.8471e-10 kg; lognormal variance with pedigree 1.7339, pedigree (1,1,4,1,1)
  (same comment as for Zinc)
- Lead [air, urban air close to ground]: 1.6596e-9 kg; lognormal variance with pedigree 1.2149, pedigree (1,1,4,1,1)
  (same comment as for Zinc)
- Cadmium, ion [water, surface water]: 3.4733e-11 kg; lognormal variance with pedigree 1.4171, pedigree (1,1,4,1,1)
  (same comment as for Phosphate)
- Particulates, < 2.5 um [air, urban air close to ground]: 5.0542e-6 kg; lognormal variance with pedigree 0.38968, pedigree (1,1,4,1,1)
  (same comment as for Methane, non-fossil)
- Cobalt [water, surface water]: 3.7849e-10 kg; lognormal variance with pedigree 1.7645, pedigree (1,1,4,1,1)
  (same comment as for Phosphate)
- Cobalt [air, urban air close to ground]: 3.7993e-9 kg; lognormal variance with pedigree 1.4984, pedigree (1,1,4,1,1)
  (same comment as for Zinc)
- Calcium [air, urban air close to ground]: 0.0001029 kg; lognormal variance with pedigree 0.35349, pedigree (1,1,4,1,1)
  (same comment as for Zinc)
- Heat, waste [water, surface water]: 1.307 MJ; lognormal variance with pedigree 0.10663, pedigree (1,1,4,1,1)
  Waste heat generated from heating value of this waste plus any electricity required to process it.
  Uncertainty: uncertainty is calculated from uncertainties in waste composition and uncertainties in energy efficiency and the uncertainty in internal energy demand
- Toluene [air, urban air close to ground]: 8.4666e-8 kg; lognormal variance with pedigree 0.081565, pedigree (1,1,4,1,1)
  (same comment as for Methane, non-fossil)
- Nickel, ion [water, surface water]: 4.569e-9 kg; lognormal variance with pedigree 1.8729, pedigree (1,1,4,1,1)
  (same comment as for Phosphate)
- Tin [air, urban air close to ground]: 3.3873e-12 kg; lognormal variance with pedigree 1.4335, pedigree (1,1,4,1,1)
  (same comment as for Zinc)
- Dinitrogen monoxide [air, urban air close to ground]: 0.00017639 kg; lognormal variance with pedigree 1.1295, pedigree (1,1,4,1,1)
  (same comment as for Cyanide)
- Sulfur dioxide [air, urban air close to ground]: 5.521e-5 kg; lognormal variance with pedigree 0.46723, pedigree (1,1,4,1,1)
  (same comment as for Zinc)
- Calcium, ion [water, ground-, long-term]: 0.0097394 kg; lognormal variance with pedigree 0.32122, pedigree (1,1,4,1,1)
  (same comment as for Sulfate)
- Chromium VI [water, ground-, long-term]: 1.449e-6 kg; lognormal variance with pedigree 1.6772, pedigree (1,1,4,1,1)
  (same comment as for Sulfate)
- Aluminium [water, ground-, long-term]: 0.0027933 kg; lognormal variance with pedigree 0.44407, pedigree (1,1,4,1,1)
  (same comment as for Sulfate)
- Nitrate [water, ground-, long-term]: 0.00042538 kg; lognormal variance with pedigree 0.36316, pedigree (1,1,4,1,1)
  (same comment as for Sulfate)
- Chromium, ion [water, surface water]: 1.2265e-9 kg; lognormal variance with pedigree 1.2512, pedigree (1,1,4,1,1)
  (same comment as for Phosphate)
- DOC, Dissolved Organic Carbon [water, ground-, long-term]: 0.0003301 kg; lognormal variance with pedigree 0.079805, pedigree (1,1,4,1,1)
  (same comment as for Sulfate)
- Arsenic [air, urban air close to ground]: 3.9943e-9 kg; lognormal variance with pedigree 1.6772, pedigree (1,1,4,1,1)
  (same comment as for Zinc)
- Molybdenum [water, surface water]: 3.3768e-7 kg; lognormal variance with pedigree 1.0952, pedigree (1,1,4,1,1)
  (same comment as for Phosphate)
- Phosphate [water, ground-, long-term]: 0.0007522 kg; lognormal variance with pedigree 4.5457, pedigree (1,1,4,1,1)
  (same comment as for Sulfate)
- Benzo(a)pyrene [air, urban air close to ground]: 9.4204e-13 kg; lognormal variance with pedigree 0.38968, pedigree (1,1,4,1,1)
  (same comment as for Methane, non-fossil)
- Molybdenum [air, urban air close to ground]: 1.6268e-9 kg; lognormal variance with pedigree 1.5703, pedigree (1,1,4,1,1)
  (same comment as for Zinc)
- Cadmium, ion [water, ground-, long-term]: 2.6444e-8 kg; lognormal variance with pedigree 7.1612, pedigree (1,1,4,1,1)
  (same comment as for Sulfate)
- Iron, ion [water, surface water]: 9.1474e-7 kg; lognormal variance with pedigree 0.59793, pedigree (1,1,4,1,1)
  (same comment as for Phosphate)
- Magnesium [air, urban air close to ground]: 1.5484e-6 kg; lognormal variance with pedigree 0.63684, pedigree (1,1,4,1,1)
  (same comment as for Zinc)
- Manganese [air, urban air close to ground]: 1.3071e-8 kg; lognormal variance with pedigree 1.0534, pedigree (1,1,4,1,1)
  (same comment as for Zinc)
- Copper [air, urban air close to ground]: 6.6598e-9 kg; lognormal variance with pedigree 1.046, pedigree (1,1,4,1,1)
  (same comment as for Zinc)
- Silicon [water, ground-, long-term]: 0.00077826 kg; lognormal variance with pedigree 5.0707, pedigree (1,1,4,1,1)
  (same comment as for Sulfate)
- Manganese [water, surface water]: 1.0654e-8 kg; lognormal variance with pedigree 0.8808, pedigree (1,1,4,1,1)
  (same comment as for Phosphate)
- Chromium [air, urban air close to ground]: 1.3793e-8 kg; lognormal variance with pedigree 1.2369, pedigree (1,1,4,1,1)
  (same comment as for Zinc)
- Cobalt [water, ground-, long-term]: 1.7018e-6 kg; lognormal variance with pedigree 1.3971, pedigree (1,1,4,1,1)
  (same comment as for Sulfate)
- Mercury [water, ground-, long-term]: 2.3081e-8 kg; lognormal variance with pedigree 3.2466, pedigree (1,1,4,1,1)
  (same comment as for Sulfate)
- Mercury [water, surface water]: 3.9357e-10 kg; lognormal variance with pedigree 1.2195, pedigree (1,1,4,1,1)
  (same comment as for Phosphate)
- COD, Chemical Oxygen Demand [water, ground-, long-term]: 0.00083422 kg; lognormal variance with pedigree 0.079805, pedigree (1,1,4,1,1)
  (same comment as for Sulfate)
- Carbon monoxide, non-fossil [air, urban air close to ground]: 7.1961e-5 kg; lognormal variance with pedigree 0.77051, pedigree (1,1,4,1,1)
  (same comment as for Methane, non-fossil)
- Manganese [water, ground-, long-term]: 4.2223e-5 kg; lognormal variance with pedigree 2.0058, pedigree (1,1,4,1,1)
  (same comment as for Sulfate)
- Silicon [air, urban air close to ground]: 1.2002e-8 kg; lognormal variance with pedigree 0.47462, pedigree (1,1,4,1,1)
  (same comment as for Zinc)
- Lead [water, ground-, long-term]: 9.7398e-6 kg; lognormal variance with pedigree 4.322, pedigree (1,1,4,1,1)
  (same comment as for Sulfate)
- Heat, waste [air, urban air close to ground]: 3.7479 MJ; lognormal variance with pedigree 0.10663, pedigree (1,1,4,1,1)
  (same comment as for Heat, waste)
- Nickel [air, urban air close to ground]: 8.5425e-9 kg; lognormal variance with pedigree 1.3464, pedigree (1,1,4,1,1)
  (same comment as for Zinc)
- Copper, ion [water, surface water]: 9.4219e-9 kg; lognormal variance with pedigree 0.91741, pedigree (1,1,4,1,1)
  (same comment as for Phosphate)
- Chromium VI [water, surface water]: 4.4147e-7 kg; lognormal variance with pedigree 1.289, pedigree (1,1,4,1,1)
  (same comment as for Phosphate)
- Copper, ion [water, ground-, long-term]: 6.4949e-5 kg; lognormal variance with pedigree 0.99436, pedigree (1,1,4,1,1)
  (same comment as for Sulfate)
- Benzene [air, urban air close to ground]: 4.2333e-8 kg; lognormal variance with pedigree 0.081565, pedigree (1,1,4,1,1)
  (same comment as for Methane, non-fossil)
- Arsenic, ion [water, surface water]: 3.5323e-7 kg; lognormal variance with pedigree 1.5452, pedigree (1,1,4,1,1)
  (same comment as for Phosphate)
- Magnesium [water, ground-, long-term]: 0.0013 kg; lognormal variance with pedigree 0.59391, pedigree (1,1,4,1,1)
  (same comment as for Sulfate)
- Zinc, ion [water, ground-, long-term]: 6.0242e-5 kg; lognormal variance with pedigree 3.0011, pedigree (1,1,4,1,1)
  (same comment as for Sulfate)
- Sulfate [water, surface water]: 0.0026337 kg; lognormal variance with pedigree 0.21205, pedigree (1,1,4,1,1)
  (same comment as for Phosphate)
- TOC, Total Organic Carbon [water, ground-, long-term]: 0.0003301 kg; lognormal variance with pedigree 0.079805, pedigree (1,1,4,1,1)
  (same comment as for Sulfate)
- Zinc, ion [water, surface water]: 1.7873e-8 kg; lognormal variance with pedigree 0.73274, pedigree (1,1,4,1,1)
  (same comment as for Phosphate)
- Iron [air, urban air close to ground]: 6.236e-8 kg; lognormal variance with pedigree 0.29583, pedigree (1,1,4,1,1)
  (same comment as for Zinc)
- Tin, ion [water, ground-, long-term]: 1.9846e-6 kg; lognormal variance with pedigree 2.2074, pedigree (1,1,4,1,1)
  (same comment as for Sulfate)
- Water [air, urban air close to ground]: 0.0017406 m3; lognormal variance with pedigree 1.2829, pedigree (1,1,4,1,1)
  Water vapour from waste humidity, hydrogen oxidation and part of the process water.
  Uncertainty: Uncertainty calculated from uncertainty in waste composition, process water input and the uncertainty of fraction to air.
- BOD5, Biological Oxygen Demand [water, surface water]: 0.00012828 kg; lognormal variance with pedigree 0.14195, pedigree (1,1,4,1,1)
  (same comment as for Phosphate)
- Silicon [water, surface water]: 1.8892e-6 kg; lognormal variance with pedigree 0.65757, pedigree (1,1,4,1,1)
  (same comment as for Phosphate)
- Dioxins, measured as 2,3,7,8-tetrachlorodibenzo-p-dioxin [air, urban air close to ground]: 8.466e-14 kg; lognormal variance with pedigree 0.38968, pedigree (1,1,4,1,1)
  (same comment as for Methane, non-fossil)
- BOD5, Biological Oxygen Demand [water, ground-, long-term]: 0.00027287 kg; lognormal variance with pedigree 0.079805, pedigree (1,1,4,1,1)
  (same comment as for Sulfate)
- Arsenic, ion [water, ground-, long-term]: 1.527e-7 kg; lognormal variance with pedigree 1.665, pedigree (1,1,4,1,1)
  (same comment as for Sulfate)
- Aluminium [water, surface water]: 4.1802e-7 kg; lognormal variance with pedigree 0.86013, pedigree (1,1,4,1,1)
  (same comment as for Phosphate)
- Ammonia [air, urban air close to ground]: 1.6766e-6 kg; lognormal variance with pedigree 1.0435, pedigree (1,1,4,1,1)
  (same comment as for Cyanide)
- Tin, ion [water, surface water]: 1.3719e-10 kg; lognormal variance with pedigree 1.987, pedigree (1,1,4,1,1)
  (same comment as for Phosphate)
