# train production, passenger, regional

Dataset: EcoSpold 2, unit process
Geography: RoW
Time period: 2000-01-01 to 2021-12-31
Technology level: current
Classification: EcoSpold01Categories: transport systems/train
Classification: ISIC rev.4 ecoinvent: 3020:Manufacture of railway locomotives and rolling stock
Scenario: Business-as-Usual
System model: Allocation, cut-off by classification
Generated by: Michael Spielmann (obsolete)
Published in: Spielmann M. 2004
Database: ecoinvent
isCopyrightProtected: true
accessRestrictedTo: 1

## General comment
Based on "train production, passenger, regional, CH 2000). The exchanges of the train manufacturing are derived from an assessment of the "Kolibri", a regional train which is currently used for regional transportation in Switzerland .The life span of the train is assumed to be 40 years resulting in a life time performance of 6’000’000 vkm. Total weight of the train is about 171t. The dominating material is steel.

## Included activities start
Service starts with the material consumption for the production of the regional train.

## Included activities end
This inventory calls processes of material production, representing the material composition of a standard Swiss Regional Train (Kolibri). For manufacturing, electricity and light oil burned in industrial furnace are included. For the transportation of materials standard distance are applied. The disposal of the regional train is included as well.

## Geography
Extrapolated from "train production, passenger, regional, CH 2000). Manufacturing data represents a train produced in Europe.

## Technology
In 2000 the modelled train dominates the regional transport in Switzerland. However, in the near future new trains will be in operation, which are characterised by a substitution of steel with aluminium.
References:
Frischknecht R., Bollens U., Bosshart S., Ciot M., Ciseri L., Doka G., Dones R., Gantner U. and Hischier R. (1996) Ökoinventare von Energiesystemen: Grundlagen für den ökologischen Vergleich von Energiesystemen und den Einbezug von Energiesystemen in Ökobilanzen für die Schweiz. Auflage No. 3. Gruppe Energie - Stoffe - Umwelt (ESU), Eidgenössische Technische Hochschule Zuerich und Sektion Ganzheitliche Systemanalysen, Paul Scherrer Institut, Villigen, Bundesamt für Energie (Hrsg.), Bern

## Reference product
- train, passenger, regional: 1 unit; name RP_amount_1; By-product classification allocatable product; CPC 49520: Self-propelled railway or tramway coaches, vans and trucks (except maintenance or service vehicles)
  EcoSpold01Location=CH
  production volume 3.96633 unit; name RP_PV_1
    This is a placeholder value that does not reflect real-world production volumes. This dataset does not currently require a real-world production volume to work in the database framework, and no actual data were collected yet. This has no negative effect on the results of the ecoinvent database.
  property price 196920 EUR2005
    Calculated based on literature value (UN Commodity Trade Statistics Database) using data on trade value and net weight (kg) for 5 reference countries/regions (RER, USA, JP, CN and IN) which average is assumed to be a good approximation of the global price. The weight of the train is assumed to be 171t.

## Inputs from technosphere
- aluminium, cast alloy: 3200 kg; = 0.32*10000; lognormal variance with pedigree 0.0606, pedigree (4,3,5,5,1)
  10000 kg aluminium, production mix. Literature studies.
  0.32: part of aluminium cast alloy in aluminium, production mix. Based on the aluminium, production mix in ecoinvent v2.2.
  Uncertainty: literature studies
  properties: dry mass 1 kg, wet mass 1 kg
- stone wool, packed: 1280 kg; lognormal variance with pedigree 0.0606, pedigree (4,3,5,5,1)
  Literature studies.
  EcoSpold01Location=CH
  Uncertainty: literature studies
  properties: wet mass 1 kg, carbon content, fossil 0.015401, dry mass 1 kg
  note on carbon content, fossil: The chemical composition of the glass fibres used in the rock wool production is similar to the composition of naturally cooled volcano basalt and has a composition listed in Tab. 3.1 and 3.2 in ecoinvent v2.2 report 16, part XIV. Rock wool contains: a minimum of 96% mineral fibres,between 0.5 and 3.0 weight percent of phenolic resin depending on the specific product characteristics, and about 0.2 percent mineral oil (ecoinvent v2.2 report 16, part XIV). An average composition of 1.8% phenolic resin, 0.2% mineral oil, and 98% mineral fibres has been assumed and used to calculate C content of the rock wool
- flat glass, uncoated: 7230 kg; lognormal variance with pedigree 0.0606, pedigree (4,3,5,5,1)
  EcoSpold01Location=RER
  Literature studies.
  Uncertainty: literature studies
  properties: wet mass 1 kg, dry mass 1 kg
- reinforcing steel: 114000 kg; lognormal variance with pedigree 0.0606, pedigree (4,3,5,5,1)
  Literature studies.
  EcoSpold01Location=RER
  Uncertainty: literature studies
  properties: carbon content, fossil 0.004, dry mass 1 kg, wet mass 1 kg
- alkyd paint, white, without solvent, in 60% solution state: 1280 kg; lognormal variance with pedigree 0.0606, pedigree (4,3,5,5,1)
  EcoSpold01Location=RER
  Literature studies.
  Uncertainty: literature studies
  properties: heating value, net 10.3 MJ, carbon content, fossil 0.140367, dry mass 1 kg, wet mass 1 kg, carbon content, non-fossil 0.199629
  note on carbon content, fossil: C content was calculated as an addition of C content in the raw materials.
- used train, passenger, regional: -1 unit; name BP_amount_1; lognormal variance with pedigree 0.342, pedigree (1,1,5,5,1)
  production volume 3.96633 unit; = RP_PV_1 * (BP_amount_1 / RP_amount_1)
    Calculated from production volume of reference product using the relative outputs.
  property price 0 EUR2005; name BP_amount_1_price_EUR2005
  property wet mass 171000 kg; name WM
  property dry mass 171000 kg; name DM
  property carbon content, fossil 0.0691852; name C_content_fossil
  property water in wet mass 0 kg; name WWM
  property carbon content, non-fossil 0.0107248; name C_content_non_fossil
  property water content 0; name water_content
- glued laminated timber, average glue mix: 0 m3; pedigree (1,1,1,1,1)
  Literature studies.
  EcoSpold01Location=RER
  Uncertainty: literature studies
  properties: carbon content, non-fossil 0.441932, heating value, net 5537.41 MJ, water content 0.0979228, carbon content, fossil 0.01791, wet mass 444 kg, dry mass 404.4 kg, price 298 EUR2005
- aluminium, wrought alloy: 6800 kg; = 0.68*10000; lognormal variance with pedigree 0.0606, pedigree (4,3,5,5,1)
  10000 kg aluminium, production mix. Literature studies.
  0.68: part of aluminium, wrought alloy in aluminium, production mix. Based on the aluminium, production mix in ecoinvent v2.2.
  Uncertainty: literature studies
  properties: dry mass 1 kg, wet mass 1 kg
- polyethylene, high density, granulate: 13000 kg; lognormal variance with pedigree 0.052, pedigree (1,1,5,5,1)
  EcoSpold01Location=RER
  Literature studies.
  properties: wet mass 1 kg, dry mass 1 kg, carbon content, fossil 0.857143, heating value, net 42.47 MJ
  note on carbon content, fossil: Polyethylene is formed out of a huge amount of ethylene monomers (C2H4) (ecoinvent v2.2 report 11_II). MW=28 g/mol
- copper, cathode: 7000 kg; lognormal variance with pedigree 0.0606, pedigree (4,3,5,5,1)
  Literature studies.
  EcoSpold01Location=RER
  Uncertainty: literature studies
  properties: wet mass 1 kg, dry mass 1 kg
- heat, district or industrial, other than natural gas: 0 MJ; pedigree (1,1,1,1,1)
  Literature studies.
  EcoSpold01Location=CH
  Uncertainty: literature studies; value represents a rough estimate (basic uncertainty =2)
  properties: heating value, net 1 MJ
- lead: 1450 kg; lognormal variance with pedigree 0.0606, pedigree (4,3,5,5,1)
  EcoSpold01Location=RER
  Uncertainty: literature studies
  properties: wet mass 1 kg, dry mass 1 kg
- electricity, medium voltage: 0 kWh; source Frischknecht R. 1996; pedigree (1,1,1,1,1)
  EcoSpold01Location=CH
  Calculated value. Estimates for energy consumption for manufacturing is taken from Frischknecht (1996) assuming an electricity consumption of 2.7 MJ/kg material.
  Uncertainty: literature studies; value represents a rough estimate (basic uncertainty =2)
- glued laminated timber, average glue mix: 2.73399, 5.93601 m3 (2 entries); lognormal variance with pedigree 0.0606, pedigree (4,3,5,5,1)
  Literature studies.
  EcoSpold01Location=RER
  Uncertainty: literature studies
- heat, district or industrial, other than natural gas: 71.2189, 4300.54, 175628 MJ (3 entries); lognormal variance with pedigree 0.1806, pedigree (4,3,5,5,1)
  (same comment as for heat, district or industrial, other than natural gas)
- electricity, medium voltage: 1301.96, 249.66, 5732.59, 18979.6, 4191.28, 60958.4, 8592.11, 27994.4 kWh (8 entries); source Frischknecht R. 1996; lognormal variance with pedigree 0.1806, pedigree (4,3,5,5,1)
  (same comment as for electricity, medium voltage)

## Sampling procedure
The data of the material composition and energy consumption is based on oral communication with an expert of one company and literature studies.

## Extrapolations
This train type is used as an estimate for the entire regional train fleet. This dataset has been copied from an original dataset covering the geography CH. The uncertainty has been adjusted accordingly.

## Review by Carl Vadenbo 2012-06-29
In preparation for the release of ecoinvent v3.0, exchange for disposal of used regional train was added and extrapolated to 'train production, passenger, regional, GLO 2000'. The amounts and the uncertainty information of the exchanges were reviewed and were found to correspond to the disaggregated datasets, and the dataset was accepted for inclusion into the ecoinvent database on 2012.07.04.

## Review by Niels Jungbluth 2004-04-01
Passed.
