# yarding and processing, mobile cable yarder on truck

Dataset: EcoSpold 2, unit process
Geography: RER
Time period: 2012-01-01 to 2021-12-31
Technology level: current
Classification: ISIC rev.4 ecoinvent: 0220:Logging
Synonyms: yarding with tower yarder
Tags: Swiss brush-up completed
Scenario: Business-as-Usual
System model: Allocation, cut-off by classification
Generated by: Frank Werner
Database: ecoinvent
isCopyrightProtected: true
accessRestrictedTo: 1

## General comment
The inventory refers to 1 productive machine hour (PMS) - referring to the operational time of the machine including breaks up to 15 minutes - of a mobile cable yarder in combination with a processor, mounted on a truck with an engine power of 353 kW and a total weight of 31,000 kg, including three cables (for downhill yarding) and carriage.
Cable yarding is the process of transporting logs to the landing using a stationary winching machine (a yarder) and a system of heavy wire rope. Cable yarding is primarily used on the West Coast of North America with yarder, loaders and grapple yarders, but also in Europe (Austria, Switzerland, Czech Republic, France, Italy).
These systems are best suited for steep terrain or soft soils that restrict ground operations. All cable yarding systems can move wood uphill to a landing; some systems can also bring wood downhill to the landing. Extraction distance is generally longer than with other ground-based systems and may reach over more than 600 m. Depending on the type of rigging and yarder capability, cable yarding can be used in selection harvests as well as clearcuts.
Cable yarding systems are often paired with manual felling and processing because of the steep terrain.
The inventoried mobile cable yarder incl. a processor, carriage and cables is mounted on a truck. The whole machinery incl. truck has a total weight of 31,000 kg (of which 2,005 kg of cable and 385 kg of carriage), with a tower height of approximately 10.5 m, with an engine power of 353 kW and a maintenance factor of 0.55 (estimated based on Spielmann et al. 2007).
The assumed yarding distance is 600 m.
The dataset can be complemented with a third cable to approximate the same machinery used for "non-uphill" yarding.

## Included activities start
Service beginning with the transport of the machinery to the logging site.

## Included activities end
Includes the input of machinery infrastructure, the input of diesel fuel, lubricants/greases as well as their disposal, and the emissions into air from diesel consumption. Wood is not included in the dataset.

## Geography
Emission profile according to European legislation

## Technology
Average european technology

## Parameters
- engine power: 353 kW; name EP; lognormal variance with pedigree 0.5526, pedigree (3,3,1,1,1)
  modern cable yarder incl. processor on truck according to producer information
- lifetime of machine, productive machine hours: 17000 hour; name total_PMH; lognormal variance with pedigree 0.5526, pedigree (3,3,1,1,1)
  expert guess WSL
- load factor: 0.5 dimensionless; name LF; lognormal variance with pedigree 0.5526, pedigree (3,3,1,1,1)
  according to Lambrecht et al. 2004
- diesel consumption: 35.3 l/hour; name diesel_consumption; = 0.1*EP; lognormal variance with pedigree 2.29638e-8, pedigree (1,1,1,1,1)
  according to Klvac & Skoupy 2009, referring to Freitas 2004 (see general comments field for total of evaulated literature)
- share of EURO IIIb: 0.5 dimensionless; name EURO_IIIb; = 1-EURO_IIIa; lognormal variance with pedigree 0.719098, pedigree (1,1,1,1,1)
  assuming that the relevant share of forest machinery belongs to vehicle types tier EURO IIIa and EURO IIIb as define in the Guideline 97/68/EG by the European Commission.
- share of EURO IIIa: 0.5 dimensionless; name EURO_IIIa; lognormal variance with pedigree 0.592, pedigree (5,4,1,1,1)
  assuming that the relevant share of foresassuming that the relevant share of forest machinery belongs to vehicle types tier EURO IIIa and EURO IIIb as define in the Guideline 97/68/EG by the European Commission.

## Reference product
- cable yarding: 1 hour; CPC 8614: Support and operation services to forestry and logging; By-product classification allocatable product
  production volume 1.97259e6 hour; name p_harvesting; = 5000*total_PMH/10/71707302*16641109
    annual production of machinery: 5000 times total productive machine hours, weighted by RER GDP/Global GDP
  property price 15.146 EUR2005
    Calculated based on inputs: The price of the product has been calculated as a sum of the values of the material and energy inputs for this product. This value is therefore a rough estimation. It may underestimate the real price since there are additional expenses when producing any product. These expences can include for example labour costs, treatment of waste materials and profit for the producer. Please consider carefully whether this level of data quality is acceptable for your application.

## Inputs from technosphere
- transport, freight, lorry 16-32 metric ton, EURO5: 9.3 metric ton*km; = 12000/1000*6.2/8; source Spielmann, M. 2007; lognormal variance with pedigree 0.3926, pedigree (3,3,5,1,1)
  transport of forest machinery calculated for the weight of the machinery, transported over 8 km (Spielmann et al. 2007) and 8 productive machine hours (PMH) per day
  properties: UVEK_link_1 4388, UVEK_relative_amount_1 1
  note on UVEK_link_1: to be used only in special submissions in coordination with ecoinvent and the Swiss FOEN
- lubricating oil: 0.0882 kg; name m_lubricating_oil; = 1764/20000; source Spielmann, M. 2007; lognormal variance with pedigree 0.0662, pedigree (2,3,5,1,1)
  hydraulic oil and engine oil/grease; taken from value for truck from Spielmann et al. 2007
  properties: wet mass 1 kg, carbon content, fossil 0.75, UVEK_relative_amount_1 1, UVEK_link_1 2866, heating value, net 40.2 MJ, dry mass 1 kg
  note on heating value, net: Literature value, Source: IPCC 2006, 2006 IPCC Guidelines for National Greenhouse Gas Inventories, Prepared by the National Greenhouse Gas Inventories Programme, Eggleston H.S., Buendia L., Miwa K., Ngara T. and Tanabe K. (eds). Published: IGES, Japan
- waste mineral oil: 0 kg; name w_mineral_oil; source Klvac R. 2003; pedigree (1,1,1,1,1)
  hydraulic oil and engine oil/grease; adjusted for water content of waste oil
  production volume 0 kg
    Calculated from production volume of reference product using the relative outputs.
  property water content 0.111111; name WC_oil
  property dry mass 0.9 kg; name DM_oil
  property wet mass 1 kg; name w_mineral_oil_WM
  properties: carbon content, fossil 0.864444, heating value, net 34.7 MJ, UVEK_link_1 1113, UVEK_relative_amount_1 -1
  note on heating value, net: Value taken from the general comment of the treatment dataset.
- mobile cable yarder, truck-mounted, incl. processor: 5.88235e-5 unit; = 1/total_PMH; source Spielmann, M. 2007; lognormal variance with pedigree 0.558, pedigree (1,1,4,1,1)
  assuming a service life of 20000 PMH (according to Spielmann et al. 2007); other sources report lower service lifes e.g. 7000 (for cost calculations; Schweizer Forstkalender 2011)
- diesel, low-sulfur: 29.652 kg; name m_diesel; = diesel_consumption*0.84; source Jirsousek R. 2007; lognormal variance with pedigree 0.033, pedigree (1,1,4,1,1)
  Density of diesel: 0.84 kg/l
  property water content 0; name water_content
  property carbon content, fossil 0.865; name C_content_fossil
  property carbon content, non-fossil 0; name C_content_non_fossil
  property water in wet mass 0 kg; name WWM
  properties: UVEK_link_1 740, wet mass 1 kg, dry mass 1 kg, UVEK_relative_amount_1 1, heating value, net 42.8 MJ
- waste mineral oil: -0.0956325, -0.00236748 kg (2 entries); source Klvac R. 2003; lognormal variance with pedigree 0.0342, pedigree (2,3,4,1,1)
  hydraulic oil and engine oil/grease; adjusted for water content of waste oil
  production volume 193314 kg
  properties: carbon content, fossil 0.864444, water content 0.111111, dry mass 0.9 kg, heating value, net 34.7 MJ, wet mass 1 kg, UVEK_link_1 1113, UVEK_relative_amount_1 -1

## Emissions to nature
- Particulates, > 10 um [air, non-urban air or from high stacks]: 0.0011902 kg; = (EURO_IIIa* EP* LF*(IF(EP>130;0.2;0.3))+EURO_IIIb* EP* LF*(IF(EP>130;0.025;0.025)))/1000/(0.0000943+0.00000628+0.00000419)*0.00000628; source Lambrecht U. 2004; lognormal variance with pedigree 0.208, pedigree (1,1,4,1,1)
  emission model calculating hourly specific emissions as "engine power x load factor x base emission factor" as proposed by Lambrecht et al. (2004) and applied in Spielmann et al. (2007); values for base emission factors for particles for mobile machine classes EURO IIIa and EUROIIIb are taken from European Directive 2004/ 26/EC. The proportional distribution accross particle classes is made based on the ecoinvent v3 dataset "Diesel, burned in building machine/GLO".
- Methane, fossil [air, non-urban air or from high stacks]: 0.00146142 kg; = (EURO_IIIa* EP* LF*(IF(EP>130;0.012;0.012))+EURO_IIIb* EP* LF*(IF(EP>130;0.00456;0.00456)))/1000; source Lambrecht U. 2004; lognormal variance with pedigree 0.208, pedigree (1,1,4,1,1)
  emission model calculating hourly specific emissions as "engine power x load factor x base emission factor" as proposed by Lambrecht et al. (2004) and applied in Spielmann et al. (2007); values for base emission factors for VOC for mobile machinery classes EURO IIIa and EURO IIIb are taken from European Directive 2004/ 26/EC, of which 2.4% are assumed to be methane.
- Particulates, < 2.5 um [air, non-urban air or from high stacks]: 0.017872 kg; = (EURO_IIIa* EP* LF*(IF(EP>130;0.2;0.3))+EURO_IIIb* EP* LF*(IF(EP>130;0.025;0.025)))/1000/(0.0000943+0.00000628+0.00000419)*0.0000943; source Lambrecht U. 2004; lognormal variance with pedigree 0.558, pedigree (1,1,4,1,1)
  (same comment as for Particulates, > 10 um)
- NMVOC, non-methane volatile organic compounds, unspecified origin [air, non-urban air or from high stacks]: 0.0593923 kg; name nmvoc; = (EURO_IIIa* EP* LF*(IF(EP>130;0.488;0.488))+EURO_IIIb* EP* LF*(IF(EP>130;0.185;0.185)))/1000; source Lambrecht U. 2004; lognormal variance with pedigree 0.208, pedigree (1,1,4,1,1)
  emission model calculating hourly specific emissions as "engine power x load factor x base emission factor" as proposed by Lambrecht et al. (2004) and applied in Spielmann et al. (2007); values for base emission factors for VOC for vehicle classes EURO IIIa and EURO IIIb are taken from Guideline 97/68/EG, of which 97.6% are assumed to be NMVOC.
- Zinc [air, unspecified]: 2.96971e-5 kg; = m_diesel*0.0000000234*42.8; source Kellenberger D. 2007; lognormal variance with pedigree 0.808, pedigree (1,1,4,1,1)
  value per MJ taken from ecoinvent 3.4 dataset "diesel, burned in building machine, GLO 2001" converted to input of diesel as mass (42.8 MJ/kg lower heating value)
- PAH, polycyclic aromatic hydrocarbons [air, unspecified]: 9.96248e-5 kg; name pah; = m_diesel*0.0000000785*42.8; source Kellenberger D. 2007
  (same comment as for Zinc)
- Dioxins, measured as 2,3,7,8-tetrachlorodibenzo-p-dioxin [air, unspecified]: 1.77675e-12 kg; = m_diesel*0.0000000000000014*42.8; source Kellenberger D. 2007
  (same comment as for Zinc)
- Particulates, > 2.5 um, and < 10um [air, non-urban air or from high stacks]: 0.000794098 kg; = (EURO_IIIa* EP* LF*(IF(EP>130;0.2;0.3))+EURO_IIIb* EP* LF*(IF(EP>130;0.025;0.025)))/1000/(0.0000943+0.00000628+0.00000419)*0.00000419; source Lambrecht U. 2004; lognormal variance with pedigree 0.358, pedigree (1,1,4,1,1)
  (same comment as for Particulates, > 10 um)
- Benzo(a)pyrene [air, unspecified]: 8.89643e-7 kg; = m_diesel*0.000000000701*42.8; source Kellenberger D. 2007
  (same comment as for Zinc)
- Ammonia [air, unspecified]: 0.000592672 kg; = m_diesel*0.000000467*42.8; source Kellenberger D. 2007; lognormal variance with pedigree 0.208, pedigree (1,1,4,1,1)
  (same comment as for Zinc)
- Cadmium [air, unspecified]: 2.96971e-7 kg; = m_diesel*0.000000000234*42.8; source Kellenberger D. 2007; lognormal variance with pedigree 0.808, pedigree (1,1,4,1,1)
  (same comment as for Zinc)
- Carbon monoxide, fossil [air, unspecified]: 0.329967 kg; = m_diesel*0.00026*42.8; source Kellenberger D. 2007; lognormal variance with pedigree 0.208, pedigree (1,1,4,1,1)
  (same comment as for Zinc)
- Nickel [air, unspecified]: 2.08133e-6 kg; name nickel; = m_diesel*0.00000000164*42.8; source Kellenberger D. 2007; lognormal variance with pedigree 0.808, pedigree (1,1,4,1,1)
  (same comment as for Zinc)
- Copper [air, unspecified]: 5.03835e-5 kg; = m_diesel*0.0000000397*42.8; source Kellenberger D. 2007; lognormal variance with pedigree 0.208, pedigree (1,1,4,1,1)
  (same comment as for Zinc)
- Dinitrogen monoxide [air, unspecified]: 0.0035535 kg; = m_diesel*0.0000028*42.8; source Kellenberger D. 2007; lognormal variance with pedigree 0.208, pedigree (1,1,4,1,1)
  (same comment as for Zinc)
- Selenium [air, unspecified]: 2.96971e-7 kg; = m_diesel*0.000000000234*42.8; source Kellenberger D. 2007; lognormal variance with pedigree 0.808, pedigree (1,1,4,1,1)
  (same comment as for Zinc)
- Nitrogen oxides [air, non-urban air or from high stacks]: 0.485375 kg; = (EURO_IIIa* EP* LF*(IF(EP>130;3.5;3.5))+EURO_IIIb* EP* LF*(IF(EP>130;2;3.3)))/1000; source Lambrecht U. 2004; lognormal variance with pedigree 0.208, pedigree (1,1,4,1,1)
  emission model calculating hourly specific emissions as "engine power x load factor x base emission factor" as proposed by Lambrecht et al. (2004) and applied in Spielmann et al. (2007); values for base emission factors for NOx for mobile machine class EUROIIIb are taken from the European Directive 2004/ 26/EC; for mobile machine class EURO IIIa values for base emission factors for NOx are calculated based on an assumed reduction of VOC emissions as compared to "Tier 2" limit for VOC of 1.0 g/kWh (following Spielmann et al. 2007).
  property dry mass 1 kg; name DM
- Carbon dioxide, fossil [air, non-urban air or from high stacks]: 92.6447 kg; = m_diesel*0.073*42.8; source Kellenberger D. 2007; lognormal variance with pedigree 0.033, pedigree (1,1,4,1,1)
  calculated from diesel input as 3.113 kg CO2/kg diesel as inventoried in the ecoinvent dataset diesel, burned in building machine

## Sampling procedure
Material and fuel input from literature sources (see general comments field); air-borne emissions taken from existing dataset on diesel consumption in building machines or - where emission levels beyond applicable European legislation - estimated with emissions model based on emission limits established in European Directive 2004/ 26/EC for non-road mobile machinery types EURO IIIa and IIIb (according to Lambrecht et al 2004 and e.g. applied in Spielmann et al. 2007).

## Extrapolations
This dataset has been extrapolated from year 2012 to the year of the calculation (2021). The uncertainty has been adjusted accordingly.
