# treatment of wastewater from glass production, capacity 1.1E10l/year

Dataset: EcoSpold 2, unit process
Geography: CH
Time period: 1994-01-01 to 2021-12-31
Technology level: current
Classification: ISIC rev.4 ecoinvent: 3700:Sewerage
Classification: EcoSpold01Categories: waste management/wastewater treatment
Tags: ConvertedDataset; Treatment
Scenario: Business-as-Usual
System model: Allocation, cut-off by classification
Generated by: Gabor Doka (obsolete)
Published in: Doka G. 2008
Database: ecoinvent
isCopyrightProtected: true
accessRestrictedTo: 1

## General comment
Wastewater purified in a moderatly large municipal wastewater treatment plant (capacity class 2), with an average capacity size of 71100 per-captia-equivalents PCE.
Wastewater contains (in kg/m3): COD: 0.115 (GSD=123.5%); SO4-S: 0.333 (GSD=123.5%); NH4-N: 0.009 (GSD=123.5%); B: 0.0005243 (GSD=224.1%); F: 0.03 (GSD=224.1%); As: 0.0003 (GSD=224.1%); Ba: 0.003 (GSD=224.1%); Cd: 0.00005 (GSD=224.1%); Cr: 0.0005 (GSD=224.1%); Cu: 0.0005 (GSD=224.1%); Ni: 0.0005 (GSD=224.1%); Pb: 0.0005 (GSD=224.1%); Sb: 0.0003 (GSD=224.1%); Sn: 0.0005 (GSD=224.1%); Zn: 0.0005 (GSD=224.1%);
[This dataset was already contained in the ecoinvent database version 2. It was not individually updated during the transfer to ecoinvent version 3. Life Cycle Impact Assessment results may still have changed, as they are affected by changes in the supply chain, i.e. in other datasets. This dataset was generated following the ecoinvent quality guidelines for version 2. It may have been subject to central changes described in the ecoinvent version 3 change report (http://www.ecoinvent.org/database/ecoinvent-version-3/reports-of-changes/), and the results of the central updates were reviewed extensively. The changes added e.g. consistent water flows and other information throughout the database. The documentation of this dataset can be found in the ecoinvent reports of version 2, which are still available via the ecoinvent website. The change report linked above covers all central changes that were made during the conversion process.]

## Included activities end
Infrastructure materials for municipal wastewater treatment plant, transports, dismantling. Land use burdens.

## Geography
Specific to the technology mix encountered in Switzerland in 2000. Well applicable to modern treatment practices in Europe, North America or Japan.

## Technology
Three stage wastewater treatment (mechanical, biological, chemical) including sludge digestion (fermentation) according to the average technology in Switzerland

## Parameters
- fraction, process water, to air: 0.1 dimensionless; name fraction_PW_to_air; lognormal variance with pedigree 0.092025, pedigree (4,4,3,2,4)
  Literature value (Statistics Canada, 2007 & Shaffer, K.H., 2008, Consumptive water use in the Great Lakes Basin, USGS) (Vionnet, S., Quantis Water Database - Technical Report, 2012).

## Reference product
- wastewater from glass production: -1 m3; name RP_amount_1; CPC 39920: Sewage sludge; By-product classification Waste
  production volume 0.0336675 m3; name RP_PV_1
    This is a placeholder value that does not reflect real-world production volumes. This dataset does not currently require a real-world production volume to work in the database framework, and no actual data were collected yet. This has no negative effect on the results of the ecoinvent database. The placeholder value of this activity was scaled according to the nominal GDP of 2005 (source: United Nations, http://data.un.org/Glossary.aspx?q=GDP+%28current+US%24%29, accessed 20130726) to reflect an appropriate share of the global production volume, which is also a placeholder value.
  property carbon content, fossil 0.0455242
    COD= 0.115 kg/m3 (Tab A.18, ecoinvent v2.2 report 13_I). COD was converted to TOC, using conversion factors in Tab 4.10 (ecoinvent v2.2 report 13_IV). TOC was considered as Total Carbon.
  property price 0 EUR2005; name RP_amount_1_price_EUR2005
    Waste products are assigned a price of zero as they are assumed to require further treatment.
  property carbon content 0.0455242
    carbon content on a dry matter basis (reserved; not for manual entry)
  properties: dry mass 1.09356 kg, water content 913.443, wet mass 1000 kg, carbon content, non-fossil 0, water in wet mass 998.906 kg, carbon allocation 0.0497835 kg

## Inputs from technosphere
- cement, unspecified: 0.00056413 kg; lognormal variance with pedigree 0.08, pedigree (1,1,5,1,1)
  burden from sludge incineration. Uncertainty calculated from wastewater composition and treatment model
  properties: dry mass 1 kg, wet mass 1 kg
- heat, district or industrial, other than natural gas: 0.043794 MJ; lognormal variance with pedigree 0.05, pedigree (1,1,5,1,1)
  (same comment as for cement, unspecified)
  properties: heating value, net 1 MJ
- chemical, organic: 4.6881e-5 kg; lognormal variance with pedigree 0.72, pedigree (1,1,5,1,1)
  (same comment as for cement, unspecified)
  properties: wet mass 1 kg, carbon content, fossil 0.628, heating value, net 19.03 MJ, dry mass 1 kg
  note on carbon content, fossil: This dataset is an unweighted average of 20 organic substances (listed in Tab 88.1, ecoinvent v2.2 report 8, part II), being part of the top100 chemicals included in this database. The C-content has also been calculated as an unweighted average of the C content of the substances composing this dataset.
- electricity, low voltage: 0.10649 kWh; lognormal variance with pedigree 0.06, pedigree (1,1,5,1,1)
  direct wastewater treatment plant burden. Uncertainty calculated from wastewater composition and treatment model
- chemical, inorganic: 5.0023e-7 kg; lognormal variance with pedigree 0.19, pedigree (1,1,5,1,1)
  (same comment as for cement, unspecified)
  properties: wet mass 1 kg, dry mass 1 kg, carbon content, fossil 0.003
  note on carbon content, fossil: This dataset is an unweighted average of 20 inorganic substances (listed in Tab 88.1, ecoinvent v2.2 report 8, part II), being part of the top100 chemicals included in this database. The C-content has also been calculated as an unweighted average of the C content of the substances composing this dataset.
- heat, district or industrial, natural gas: 0.00146628 MJ; lognormal variance with pedigree 0.26, pedigree (1,1,5,1,1)
  (same comment as for cement, unspecified)
  properties: heating value, net 1 MJ
- sewer grid, 1.1E10l/year, 242 km: 1.6832e-7 km; lognormal variance with pedigree 0.04, pedigree (1,1,5,1,1)
  uncertainty heeded in exchanges of the module
  This exchange has an activity link directly to the producing activity because the product is primarily consumed in the same geographical area where it is produced.
- hydrochloric acid, without water, in 30% solution state: 3.0014e-7 kg; lognormal variance with pedigree 0.19, pedigree (1,1,5,1,1)
  (same comment as for cement, unspecified)
  properties: wet mass 1 kg, dry mass 1 kg, heating value, net 3.32 MJ
- titanium dioxide: 4.7819e-7 kg; lognormal variance with pedigree 0.58, pedigree (1,1,5,1,1)
  (same comment as for cement, unspecified)
  properties: dry mass 1 kg, wet mass 1 kg
- waste graphical paper: -0.0155 kg; name BP_amount_1; lognormal variance with pedigree 0.04, pedigree (1,1,5,1,1)
  (same comment as for electricity, low voltage)
  production volume 0.000521847 kg; = BP_amount_1* RP_PV_1/ABS( RP_amount_1)
    Calculated from the production volume of wastewater from glass production in proportion to the respective output amounts.
  property price 0 EUR2005; name BP_amount_1_price_EUR2005
  properties: water content 0.126126, wet mass 1 kg, dry mass 0.888 kg, carbon content, non-fossil 0.454955, heating value, net 14.12 MJ
  note on heating value, net: Value taken from the general comment of the treatment dataset.
- ammonia, anhydrous, liquid: 1.6706e-5 kg; lognormal variance with pedigree 0.26, pedigree (1,1,5,1,1)
  (same comment as for cement, unspecified)
  properties: wet mass 1 kg, dry mass 1 kg
- waste plastic, mixture: -0.0155 kg; name BP_amount_2; lognormal variance with pedigree 0.04, pedigree (1,1,5,1,1)
  (same comment as for electricity, low voltage)
  production volume 0.000521847 kg; = BP_amount_2* RP_PV_1/ABS( RP_amount_1)
    (same comment as for waste graphical paper)
  property price 0 EUR2005; name BP_amount_2_price_EUR2005
  properties: heating value, net 30.79 MJ, wet mass 1 kg, water content 0.180638, carbon content, fossil 0.747344, dry mass 0.847 kg
  note on carbon content, fossil: C content in 1 kg DM was calculated using data in Tab A.2, ecoinvent v2.2 report 13_I
- quicklime, milled, packed: 1.505e-7 kg; lognormal variance with pedigree 0.15, pedigree (1,1,5,1,1)
  (same comment as for cement, unspecified)
  properties: wet mass 1 kg, water content 0.010101, dry mass 0.99 kg
- waste cement, hydrated: -0.0014103 kg; name BP_amount_3; lognormal variance with pedigree 0.08, pedigree (1,1,5,1,1)
  (same comment as for cement, unspecified)
  production volume 4.74813e-5 kg; = BP_amount_3* RP_PV_1/ABS( RP_amount_1)
    (same comment as for waste graphical paper)
  property price 0 EUR2005; name BP_amount_3_price_EUR2005
  properties: wet mass 1 kg, dry mass 1 kg
- chromium oxide, flakes: 9.7591e-9 kg; lognormal variance with pedigree 0.58, pedigree (1,1,5,1,1)
  (same comment as for cement, unspecified)
  properties: wet mass 1 kg, dry mass 1 kg
- municipal waste incineration facility: 1.3054e-11 unit; lognormal variance with pedigree 0.05, pedigree (1,1,5,1,1)
  (same comment as for cement, unspecified)
- slag landfill: 4.6004e-12 unit; lognormal variance with pedigree 0.07, pedigree (1,1,5,1,1)
  (same comment as for cement, unspecified)
- liquid manure spreading, by vacuum tanker: 0.0001548 m3; lognormal variance with pedigree 0.04, pedigree (1,1,5,1,1)
  burden from sludge spreading. Uncertainty calculated from wastewater composition and treatment model
  This exchange has an activity link directly to the producing activity because the product is primarily consumed in the same geographical area where it is produced.
- residual material landfill: 2.9382e-12 unit; lognormal variance with pedigree 0.07, pedigree (1,1,5,1,1)
  (same comment as for cement, unspecified)
- sodium hydroxide, without water, in 50% solution state: 8.3011e-7 kg; lognormal variance with pedigree 0.14, pedigree (1,1,5,1,1)
  (same comment as for cement, unspecified)
  properties: heating value, net 3.03 MJ, wet mass 1 kg, dry mass 1 kg
- electricity, high voltage: 0.0075072 kWh; lognormal variance with pedigree 0.49, pedigree (1,1,5,1,1)
  (same comment as for cement, unspecified)
- process-specific burdens, municipal waste incineration: 0.052217 kg; lognormal variance with pedigree 0.05, pedigree (1,1,5,1,1)
  burden from sludge incineration. Uncertainty calculated from wastewater composition and treatment model;activityLink introduced to establish a direct link to the corresponding regional supply of this product
- iron (III) chloride, without water, in 40% solution state: 6.0661e-5 kg; lognormal variance with pedigree 0.24, pedigree (1,1,5,1,1)
  direct wastewater treatment plant burden plus burden from sludge incineration. Uncertainty calculated from wastewater composition and treatment model
  properties: dry mass 1 kg, wet mass 1 kg
- wastewater treatment facility, capacity 1.1E10l/year: 1.9883e-9 unit; lognormal variance with pedigree 0.04, pedigree (1,1,5,1,1)
  (same comment as for sewer grid, 1.1E10l/year, 242 km)
- process-specific burdens, slag landfill: 0.0025877 kg; lognormal variance with pedigree 0.07, pedigree (1,1,5,1,1)
  (same comment as for process-specific burdens, municipal waste incineration)
- process-specific burdens, residual material landfill: 0.0014103 kg; lognormal variance with pedigree 0.07, pedigree (1,1,5,1,1)
  (same comment as for process-specific burdens, municipal waste incineration)

## Emissions to nature
- Antimony [water, surface water]: 0.0001837 kg; lognormal variance with pedigree 0.52, pedigree (1,1,5,1,1)
  sewer overload discharge plus direct wastewater treatment plant emission plus emission from sludge incineration. Uncertainty calculated from wastewater composition and treatment model
- Chromium [air, urban air close to ground]: 1.1166e-11 kg; lognormal variance with pedigree 0.8, pedigree (1,1,5,1,1)
  direct digester gas emission plus emission from sludge incineration. Uncertainty calculated from wastewater composition and treatment model
- Nitrogen oxides [air, urban air close to ground]: 0.00016227 kg; lognormal variance with pedigree 0.12, pedigree (1,1,5,1,1)
  (same comment as for Chromium)
- Nickel, ion [water, surface water]: 0.00030328 kg; lognormal variance with pedigree 0.67, pedigree (1,1,5,1,1)
  (same comment as for Antimony)
- Boron [air, urban air close to ground]: 1.9001e-5 kg; lognormal variance with pedigree 0.71, pedigree (1,1,5,1,1)
  (same comment as for Chromium)
- Nitrate [water, ground-, long-term]: 1.1895e-5 kg; lognormal variance with pedigree 0.12, pedigree (1,1,5,1,1)
  emission from sludge incineration. Uncertainty calculated from wastewater composition and treatment model
- Arsenic [soil, agricultural]: 2.5038e-5 kg; lognormal variance with pedigree 0.71, pedigree (1,1,5,1,1)
  emission from sludge spreading. Uncertainty calculated from wastewater composition and treatment model
- Lead [water, surface water]: 5.4958e-5 kg; lognormal variance with pedigree 0.61, pedigree (1,1,5,1,1)
  (same comment as for Antimony)
- Copper [air, urban air close to ground]: 1.6764e-9 kg; lognormal variance with pedigree 0.76, pedigree (1,1,5,1,1)
  (same comment as for Chromium)
- Copper, ion [water, surface water]: 0.0001297 kg; lognormal variance with pedigree 0.65, pedigree (1,1,5,1,1)
  (same comment as for Antimony)
- Sulfate [water, surface water]: 1.0173 kg; lognormal variance with pedigree 0.08, pedigree (1,1,5,1,1)
  (same comment as for Antimony)
- Cadmium [air, urban air close to ground]: 8.4265e-10 kg; lognormal variance with pedigree 0.74, pedigree (1,1,5,1,1)
  (same comment as for Chromium)
- Antimony [air, urban air close to ground]: 1.4775e-8 kg; lognormal variance with pedigree 1.34, pedigree (1,1,5,1,1)
  (same comment as for Chromium)
- NMVOC, non-methane volatile organic compounds, unspecified origin [air, urban air close to ground]: 1.7228e-6 kg; lognormal variance with pedigree 0.26, pedigree (1,1,5,1,1)
  direct digester gas emission. Uncertainty calculated from wastewater composition and treatment model
- Carbon [soil, agricultural]: 0.0050503 kg; lognormal variance with pedigree 0.11, pedigree (1,1,5,1,1)
  (same comment as for Arsenic)
- Chromium, ion [water, surface water]: 4.813e-7 kg; lognormal variance with pedigree 0.72, pedigree (1,1,5,1,1)
  (same comment as for Nitrate)
- COD, Chemical Oxygen Demand [water, surface water]: 0.022285 kg; lognormal variance with pedigree 0.08, pedigree (1,1,5,1,1)
  (same comment as for Antimony)
- Carbon monoxide, fossil [air, urban air close to ground]: 0.00012273 kg; lognormal variance with pedigree 0.16, pedigree (1,1,5,1,1)
  (same comment as for Nitrate)
- Barium [water, surface water]: 0.00018016 kg; lognormal variance with pedigree 0.57, pedigree (1,1,5,1,1)
  (same comment as for Antimony)
- Cadmium, ion [water, surface water]: 2.5382e-5 kg; lognormal variance with pedigree 0.66, pedigree (1,1,5,1,1)
  (same comment as for Antimony)
- Ammonium, ion [water, surface water]: 0.0037047 kg; lognormal variance with pedigree 0.09, pedigree (1,1,5,1,1)
  direct wastewater treatment plant emission. Uncertainty calculated from wastewater composition and treatment model
- Tin, ion [water, ground-, long-term]: 8.9659e-5 kg; lognormal variance with pedigree 1.26, pedigree (1,1,5,1,1)
  (same comment as for Nitrate)
- Tin [air, urban air close to ground]: 2.3665e-7 kg; lognormal variance with pedigree 0.73, pedigree (1,1,5,1,1)
  (same comment as for Chromium)
- DOC, Dissolved Organic Carbon [water, surface water]: 0.0055771 kg; lognormal variance with pedigree 0.08, pedigree (1,1,5,1,1)
  (same comment as for Antimony)
- TOC, Total Organic Carbon [water, surface water]: 0.0059707 kg; lognormal variance with pedigree 0.04, pedigree (1,1,5,1,1)
  (same comment as for Antimony)
- Water [water, unspecified]: 0.9 m3; name water_to_water_unspecified; lognormal variance with pedigree 0.0807, pedigree (2,2,5,1,1)
  Calculated value based on water balance.
  property water in wet mass 1000 kg; name WWM
  property wet mass 1000 kg; name WM
  property fraction, origin: fresh water 1; name fraction_origin_fresh_water_Ww
  property carbon content, non-fossil 0; name C_content_non_fossil
  property dry mass 0 kg; name DM
  property carbon content, fossil 0; name C_content_fossil
  property fraction, origin: salt water 0; name fraction_origin_salt_water_Ww
  property fraction, origin: unspecified 0; name fraction_origin_unspecified_Ww
- Tin [soil, agricultural]: 0.00011248 kg; lognormal variance with pedigree 0.71, pedigree (1,1,5,1,1)
  (same comment as for Arsenic)
- Water [air, unspecified]: 0.1 m3; name water_to_air_unspecified; lognormal variance with pedigree 0.0807, pedigree (2,2,5,1,1)
  Calculated value based on water balance.
  property fraction, origin: salt water 0; name fraction_origin_salt_water
  property fraction, origin: unspecified 1; name fraction_origin_unspecified
  property fraction, origin: fresh water 0; name fraction_origin_fresh_water
- Arsenic, ion [water, ground-, long-term]: 2.1804e-5 kg; lognormal variance with pedigree 0.71, pedigree (1,1,5,1,1)
  (same comment as for Nitrate)
- Antimony [water, ground-, long-term]: 5.7903e-5 kg; lognormal variance with pedigree 0.72, pedigree (1,1,5,1,1)
  (same comment as for Nitrate)
- Nickel [air, urban air close to ground]: 5.2088e-12 kg; lognormal variance with pedigree 0.81, pedigree (1,1,5,1,1)
  (same comment as for Chromium)
- Zinc, ion [water, ground-, long-term]: 3.2845e-6 kg; lognormal variance with pedigree 5.51, pedigree (1,1,5,1,1)
  (same comment as for Nitrate)
- Boron [soil, agricultural]: 9.9858e-5 kg; lognormal variance with pedigree 0.71, pedigree (1,1,5,1,1)
  (same comment as for Arsenic)
- Chromium [soil, agricultural]: 9.5235e-5 kg; lognormal variance with pedigree 0.71, pedigree (1,1,5,1,1)
  (same comment as for Arsenic)
- Methane, fossil [air, urban air close to ground]: 0.00037923 kg; lognormal variance with pedigree 0.14, pedigree (1,1,5,1,1)
  (same comment as for Nitrate)
- Zinc [air, urban air close to ground]: 3.4609e-9 kg; lognormal variance with pedigree 0.76, pedigree (1,1,5,1,1)
  (same comment as for Chromium)
- Arsenic, ion [water, surface water]: 0.00025307 kg; lognormal variance with pedigree 0.61, pedigree (1,1,5,1,1)
  (same comment as for Antimony)
- Tin, ion [water, surface water]: 0.00020917 kg; lognormal variance with pedigree 0.66, pedigree (1,1,5,1,1)
  (same comment as for Antimony)
- Copper [soil, agricultural]: 0.00014322 kg; lognormal variance with pedigree 0.71, pedigree (1,1,5,1,1)
  (same comment as for Arsenic)
- Copper, ion [water, ground-, long-term]: 0.00018357 kg; lognormal variance with pedigree 0.73, pedigree (1,1,5,1,1)
  (same comment as for Nitrate)
- Zinc, ion [water, surface water]: 0.00015459 kg; lognormal variance with pedigree 0.65, pedigree (1,1,5,1,1)
  (same comment as for Antimony)
- Ammonia [air, urban air close to ground]: 8.2564e-5 kg; lognormal variance with pedigree 0.31, pedigree (1,1,5,1,1)
  direct digester gas emission plus emission from sludge incineration plus emission from sludge spreading. Uncertainty calculated from wastewater composition and treatment model
- Nitrogen [water, surface water]: 0.0002543 kg; lognormal variance with pedigree 0.1, pedigree (1,1,5,1,1)
  (same comment as for Ammonium, ion)
- Chromium VI [water, surface water]: 0.00025867 kg; lognormal variance with pedigree 0.65, pedigree (1,1,5,1,1)
  (same comment as for Antimony)
- Boron [water, ground-, long-term]: 0.00010437 kg; lognormal variance with pedigree 0.71, pedigree (1,1,5,1,1)
  (same comment as for Nitrate)
- DOC, Dissolved Organic Carbon [water, ground-, long-term]: 7.82e-5 kg; lognormal variance with pedigree 0.12, pedigree (1,1,5,1,1)
  (same comment as for Nitrate)
- Cadmium, ion [water, ground-, long-term]: 1.5153e-7 kg; lognormal variance with pedigree 6.9, pedigree (1,1,5,1,1)
  (same comment as for Nitrate)
- Cyanide [air, urban air close to ground]: 2.9802e-7 kg; lognormal variance with pedigree 0.28, pedigree (1,1,5,1,1)
  (same comment as for Nitrate)
- BOD5, Biological Oxygen Demand [water, ground-, long-term]: 6.4642e-5 kg; lognormal variance with pedigree 0.12, pedigree (1,1,5,1,1)
  (same comment as for Nitrate)
- Fluoride [water, surface water]: 0.03 kg; lognormal variance with pedigree 0.67, pedigree (1,1,5,1,1)
  (same comment as for Antimony)
- Lead [soil, agricultural]: 0.00017212 kg; lognormal variance with pedigree 0.71, pedigree (1,1,5,1,1)
  (same comment as for Arsenic)
- Lead [water, ground-, long-term]: 1.9445e-5 kg; lognormal variance with pedigree 6.92, pedigree (1,1,5,1,1)
  (same comment as for Nitrate)
- Cadmium [soil, agricultural]: 9.5235e-6 kg; lognormal variance with pedigree 0.71, pedigree (1,1,5,1,1)
  (same comment as for Arsenic)
- Barium [soil, agricultural]: 0.0010906 kg; lognormal variance with pedigree 0.71, pedigree (1,1,5,1,1)
  (same comment as for Arsenic)
- Antimony [soil, agricultural]: 5.7135e-5 kg; lognormal variance with pedigree 0.71, pedigree (1,1,5,1,1)
  (same comment as for Arsenic)
- Nitrate [water, surface water]: 0.016818 kg; lognormal variance with pedigree 0.09, pedigree (1,1,5,1,1)
  (same comment as for Antimony)
- Boron [water, surface water]: 0.00029083 kg; lognormal variance with pedigree 0.59, pedigree (1,1,5,1,1)
  (same comment as for Antimony)
- Nickel [soil, agricultural]: 7.6111e-5 kg; lognormal variance with pedigree 0.71, pedigree (1,1,5,1,1)
  (same comment as for Arsenic)
- Barium [air, urban air close to ground]: 1.7294e-6 kg; lognormal variance with pedigree 0.73, pedigree (1,1,5,1,1)
  (same comment as for Chromium)
- Barium [water, ground-, long-term]: 0.0015354 kg; lognormal variance with pedigree 0.81, pedigree (1,1,5,1,1)
  (same comment as for Nitrate)
- TOC, Total Organic Carbon [water, ground-, long-term]: 7.82e-5 kg; lognormal variance with pedigree 0.12, pedigree (1,1,5,1,1)
  (same comment as for Nitrate)
- Zinc [soil, agricultural]: 0.0001336 kg; lognormal variance with pedigree 0.71, pedigree (1,1,5,1,1)
  (same comment as for Arsenic)
- Dinitrogen monoxide [air, urban air close to ground]: 2.7795e-5 kg; lognormal variance with pedigree 0.08, pedigree (1,1,5,1,1)
  direct wastewater treatment plant emission plus direct digester gas emission plus emission from sludge incineration plus emission from sludge spreading. Uncertainty calculated from wastewater composition and treatment model
- Lead [air, urban air close to ground]: 1.0147e-8 kg; lognormal variance with pedigree 0.75, pedigree (1,1,5,1,1)
  (same comment as for Chromium)
- Nickel, ion [water, ground-, long-term]: 0.000113 kg; lognormal variance with pedigree 0.71, pedigree (1,1,5,1,1)
  (same comment as for Nitrate)
- BOD5, Biological Oxygen Demand [water, surface water]: 0.0073186 kg; lognormal variance with pedigree 0.05, pedigree (1,1,5,1,1)
  (same comment as for Antimony)
- COD, Chemical Oxygen Demand [water, ground-, long-term]: 0.00019762 kg; lognormal variance with pedigree 0.12, pedigree (1,1,5,1,1)
  (same comment as for Nitrate)
- Chromium VI [water, ground-, long-term]: 1.5986e-5 kg; lognormal variance with pedigree 1.09, pedigree (1,1,5,1,1)
  (same comment as for Nitrate)
- Arsenic [air, urban air close to ground]: 8.4456e-8 kg; lognormal variance with pedigree 0.73, pedigree (1,1,5,1,1)
  (same comment as for Chromium)
- Carbon dioxide, fossil [air, urban air close to ground]: 0.14204 kg; lognormal variance with pedigree 0.06, pedigree (1,1,5,1,1)
  (same comment as for Nitrate)

## Extrapolations
This dataset has been extrapolated from year 2000 to the year of the calculation (2021). The uncertainty has been adjusted accordingly.

## Review by Niels Jungbluth 2009-01-22
passed.
