# treatment of wastewater from pig iron production, capacity 5E9l/year

Dataset: EcoSpold 2, unit process
Geography: Europe without Switzerland
Time period: 1994-01-01 to 2021-12-31
Technology level: current
Classification: EcoSpold01Categories: waste management/wastewater treatment
Classification: ISIC rev.4 ecoinvent: 3700:Sewerage
Tags: Treatment
Scenario: Business-as-Usual
System model: Allocation, cut-off by classification
Generated by: [System]
Database: ecoinvent
isCopyrightProtected: true
accessRestrictedTo: 1

## General comment
Wastewater purified in a medium size municipal wastewater treatment plant (capacity class 3), with an average capacity size of 24900 per-captia-equivalents PCE.
Wastewater contains (in kg/m3): COD: 0.0000203 (GSD=150%); TOC: 0.0000041 (GSD=150%); Cr: 0.000002 (GSD=150%); Cu: 0.0000042 (GSD=150%); Ni: 0.000003 (GSD=150%); Pb: 0.000002 (GSD=150%); Zn: 0.00002 (GSD=150%);
[This dataset was already contained in the ecoinvent database version 2. It was not individually updated during the transfer to ecoinvent version 3. Life Cycle Impact Assessment results may still have changed, as they are affected by changes in the supply chain, i.e. in other datasets. This dataset was generated following the ecoinvent quality guidelines for version 2. It may have been subject to central changes described in the ecoinvent version 3 change report (http://www.ecoinvent.org/database/ecoinvent-version-3/reports-of-changes/), and the results of the central updates were reviewed extensively. The changes added e.g. consistent water flows and other information throughout the database. The documentation of this dataset can be found in the ecoinvent reports of version 2, which are still available via the ecoinvent website. The change report linked above covers all central changes that were made during the conversion process.]

## Included activities end
Infrastructure materials for municipal wastewater treatment plant, transports, dismantling. Land use burdens.

## Geography
Specific to the technology mix encountered in Switzerland in 2000. Well applicable to modern treatment practices in Europe, North America or Japan.
This dataset has been extrapolated from the global dataset.

## Technology
Three stage wastewater treatment (mechanical, biological, chemical) including sludge digestion (fermentation) according to the average technology in Switzerland

## Parameters
- fraction, process water, to air: 0.1 dimensionless; name fraction_PW_to_air; lognormal variance with pedigree 0.092025, pedigree (4,4,3,2,4)

## Reference product
- wastewater from pig iron production: -1 m3; name RP; By-product classification Waste; CPC 39920: Sewage sludge
  production volume 1.61538e7 m3; name RP_PV; = 1.328E+11*0.00012164
    Calculated based on literature data and assumptions.
    The amount of pig iron produced in Europe in 2013 was 1.328E+11 kg (USGS, 2013, Mineral Yearbook, Iron and Steel). When producing 1kg of pig iron 0.00012164 m3 of wastewater is produced.
  property price 0 EUR2005; name RP_price_EUR2005
    Waste products are assigned a price of zero as they are assumed to require further treatment.
  property carbon content, fossil 1.2149e-5
    TOC = 0.0000041 kg/m3 (Tab A.19, ecoinvent v2.2 report 13_I). TOC was considered as Total Carbon.
  property carbon content 1.2149e-5
    carbon content on a dry matter basis (reserved; not for manual entry)
  properties: dry mass 0.337476 kg, wet mass 1000 kg, carbon content, non-fossil 0, water in wet mass 999.663 kg, water content 2962.17, carbon allocation 4.1e-6 kg

## Inputs from technosphere
- wastewater treatment facility, capacity 5E9l/year: 5.6882e-9 unit; lognormal variance with pedigree 0.042, pedigree (1,1,5,5,1)
  uncertainty heeded in exchanges of the module
- heat, district or industrial, other than natural gas: 4.4246e-5 MJ; lognormal variance with pedigree 0.052, pedigree (1,1,5,5,1)
  burden from sludge incineration. Uncertainty calculated from wastewater composition and treatment model
  properties: heating value, net 1 MJ
- waste cement, hydrated: -1.0969e-5 kg; name ByP_02; lognormal variance with pedigree 0.082, pedigree (1,1,5,5,1)
  (same comment as for heat, district or industrial, other than natural gas)
  production volume 177.191 kg; = ABS(ByP_02/RP)*RP_PV
    Calculated from the production volume of wastewater from pig iron production in proportion to the respective output amounts.
  property price 0 EUR2005; name ByP_02_price_EUR2005
  properties: wet mass 1 kg, dry mass 1 kg
- chemical, inorganic: 4.6407e-9 kg; lognormal variance with pedigree 0.212, pedigree (1,1,5,5,1)
  (same comment as for heat, district or industrial, other than natural gas)
  properties: wet mass 1 kg, dry mass 1 kg, carbon content, fossil 0.003
  note on carbon content, fossil: This dataset is an unweighted average of 20 inorganic substances (listed in Tab 88.1, ecoinvent v2.2 report 8, part II), being part of the top100 chemicals included in this database. The C-content has also been calculated as an unweighted average of the C content of the substances composing this dataset.
- iron (III) chloride, without water, in 40% solution state: 8.47e-7 kg; lognormal variance with pedigree 0.212, pedigree (1,1,5,5,1)
  direct wastewater treatment plant burden plus burden from sludge incineration. Uncertainty calculated from wastewater composition and treatment model
  properties: wet mass 1 kg, dry mass 1 kg
- waste graphical paper: -0.0155 kg; name ByP_01; lognormal variance with pedigree 0.042, pedigree (1,1,5,5,1)
  direct wastewater treatment plant burden. Uncertainty calculated from wastewater composition and treatment model
  production volume 250384 kg; = ABS(ByP_01/RP)*RP_PV
    (same comment as for waste cement, hydrated)
  property price 0 EUR2005; name ByP_01_price_EUR2005
  properties: wet mass 1 kg, carbon content, non-fossil 0.454955, dry mass 0.888 kg, water content 0.126126, heating value, net 14.12 MJ
  note on heating value, net: Value taken from the general comment of the treatment dataset.
- electricity, high voltage: 7.5847e-6 kWh; lognormal variance with pedigree 0.492, pedigree (1,1,5,5,1)
  (same comment as for heat, district or industrial, other than natural gas)
- heat, central or small-scale, other than natural gas: 0.0130228 MJ; lognormal variance with pedigree 0.042, pedigree (1,1,5,5,1)
  (same comment as for waste graphical paper)
  properties: heating value, net 1 MJ
- process-specific burdens, residual material landfill: 1.0969e-5 kg; lognormal variance with pedigree 0.072, pedigree (1,1,5,5,1)
  burden from sludge incineration. Uncertainty calculated from wastewater composition and treatment model;activityLink introduced to establish a direct link to the corresponding regional supply of this product
- electricity, low voltage: 0.028016 kWh; lognormal variance with pedigree 0.042, pedigree (1,1,5,5,1)
  (same comment as for waste graphical paper)
- liquid manure spreading, by vacuum tanker: 1.5371e-7 m3; lognormal variance with pedigree 0.042, pedigree (1,1,5,5,1)
  burden from sludge spreading. Uncertainty calculated from wastewater composition and treatment model
- process-specific burdens, slag landfill: 2.7989e-6 kg; lognormal variance with pedigree 0.072, pedigree (1,1,5,5,1)
  (same comment as for process-specific burdens, residual material landfill)
- heat, district or industrial, natural gas: 0.0179462 MJ; lognormal variance with pedigree 0.042, pedigree (1,1,5,5,1)
  (same comment as for waste graphical paper)
  properties: heating value, net 1 MJ
- hydrochloric acid, without water, in 30% solution state: 2.7844e-9 kg; lognormal variance with pedigree 0.212, pedigree (1,1,5,5,1)
  (same comment as for heat, district or industrial, other than natural gas)
  properties: dry mass 1 kg, wet mass 1 kg, heating value, net 3.32 MJ
- process-specific burdens, municipal waste incineration: 5.2756e-5 kg; lognormal variance with pedigree 0.052, pedigree (1,1,5,5,1)
  (same comment as for process-specific burdens, residual material landfill)
- cement, unspecified: 4.3874e-6 kg; lognormal variance with pedigree 0.082, pedigree (1,1,5,5,1)
  (same comment as for heat, district or industrial, other than natural gas)
  properties: wet mass 1 kg, dry mass 1 kg
- sewer grid, 5E9l/year, 110 km: 2.1782e-7 km; lognormal variance with pedigree 0.042, pedigree (1,1,5,5,1)
  uncertainty heeded in exchanges of the module
- municipal waste incineration facility: 1.3189e-14 unit; lognormal variance with pedigree 0.052, pedigree (1,1,5,5,1)
  (same comment as for heat, district or industrial, other than natural gas)
- residual material landfill: 2.2851e-14 unit; lognormal variance with pedigree 0.072, pedigree (1,1,5,5,1)
  (same comment as for heat, district or industrial, other than natural gas)
- slag landfill: 4.9758e-15 unit; lognormal variance with pedigree 0.072, pedigree (1,1,5,5,1)
  (same comment as for heat, district or industrial, other than natural gas)
- waste plastic, mixture: -0.0155 kg; name ByP_03; lognormal variance with pedigree 0.042, pedigree (1,1,5,5,1)
  (same comment as for waste graphical paper)
  production volume 250384 kg; = ABS(ByP_03/RP)*RP_PV
    (same comment as for waste cement, hydrated)
  property price 0 EUR2005; name ByP_03_price_EUR2005
  properties: dry mass 0.847 kg, water content 0.180638, wet mass 1 kg, carbon content, fossil 0.747344, heating value, net 30.79 MJ
  note on carbon content, fossil: C content in 1 kg DM was calculated using data in Tab A.2, ecoinvent v2.2 report 13_I

## Emissions to nature
- Chromium, ion [water, surface water]: 1.6684e-9 kg; lognormal variance with pedigree 0.242, pedigree (1,1,5,5,1)
  emission from sludge incineration. Uncertainty calculated from wastewater composition and treatment model
- Zinc [soil, agricultural]: 6.4745e-6 kg; lognormal variance with pedigree 0.232, pedigree (1,1,5,5,1)
  emission from sludge spreading. Uncertainty calculated from wastewater composition and treatment model
- Nickel, ion [water, ground-, long-term]: 5.8754e-7 kg; lognormal variance with pedigree 0.222, pedigree (1,1,5,5,1)
  (same comment as for Chromium, ion)
- Carbon dioxide, fossil [air, urban air close to ground]: 1.1417e-5 kg; lognormal variance with pedigree 0.112, pedigree (1,1,5,5,1)
  (same comment as for Chromium, ion)
- Zinc [air, urban air close to ground]: 1.1997e-10 kg; lognormal variance with pedigree 0.272, pedigree (1,1,5,5,1)
  direct digester gas emission plus emission from sludge incineration. Uncertainty calculated from wastewater composition and treatment model
- Zinc, ion [water, ground-, long-term]: 1.1385e-7 kg; lognormal variance with pedigree 5.022, pedigree (1,1,5,5,1)
  (same comment as for Chromium, ion)
- Nickel [soil, agricultural]: 5.5327e-7 kg; lognormal variance with pedigree 0.222, pedigree (1,1,5,5,1)
  (same comment as for Zinc)
- Lead [water, ground-, long-term]: 6.7405e-8 kg; lognormal variance with pedigree 6.432, pedigree (1,1,5,5,1)
  (same comment as for Chromium, ion)
- Lead [air, urban air close to ground]: 3.5183e-11 kg; lognormal variance with pedigree 0.262, pedigree (1,1,5,5,1)
  (same comment as for Zinc)
- Copper, ion [water, surface water]: 1.0894e-6 kg; lognormal variance with pedigree 0.192, pedigree (1,1,5,5,1)
  sewer overload discharge plus direct wastewater treatment plant emission plus emission from sludge incineration. Uncertainty calculated from wastewater composition and treatment model
- Carbon [soil, agricultural]: 4.9358e-7 kg; lognormal variance with pedigree 0.232, pedigree (1,1,5,5,1)
  (same comment as for Zinc)
- DOC, Dissolved Organic Carbon [water, surface water]: 4.5921e-7 kg; lognormal variance with pedigree 0.172, pedigree (1,1,5,5,1)
  (same comment as for Copper, ion)
- BOD5, Biological Oxygen Demand [water, ground-, long-term]: 4.519e-9 kg; lognormal variance with pedigree 0.242, pedigree (1,1,5,5,1)
  (same comment as for Chromium, ion)
- Copper, ion [water, ground-, long-term]: 1.3363e-6 kg; lognormal variance with pedigree 0.242, pedigree (1,1,5,5,1)
  (same comment as for Chromium, ion)
- Copper [air, urban air close to ground]: 1.2203e-11 kg; lognormal variance with pedigree 0.282, pedigree (1,1,5,5,1)
  (same comment as for Zinc)
- Chromium VI [water, ground-, long-term]: 5.5415e-8 kg; lognormal variance with pedigree 0.612, pedigree (1,1,5,5,1)
  (same comment as for Chromium, ion)
- Water [air, unspecified]: 0.1 m3; name water_to_air_unspecified; lognormal variance with pedigree 0.0827, pedigree (2,2,5,5,1)
  Calculated value based on water balance.
  property fraction, origin: unspecified 1; name fraction_origin_unspecified
  property fraction, origin: salt water 0; name fraction_origin_salt_water
  property fraction, origin: fresh water 0; name fraction_origin_fresh_water
- Nickel [air, urban air close to ground]: 2.7083e-14 kg; lognormal variance with pedigree 0.322, pedigree (1,1,5,5,1)
  (same comment as for Zinc)
- Water [water, unspecified]: 0.9 m3; name water_to_water_unspecified; lognormal variance with pedigree 0.0827, pedigree (2,2,5,5,1)
  Calculated value based on water balance.
  property dry mass 0 kg; name DM
  property fraction, origin: fresh water 1; name fraction_origin_fresh_water_Ww
  property carbon content, fossil 0; name C_content_fossil
  property wet mass 1000 kg; name WM
  property fraction, origin: salt water 0; name fraction_origin_salt_water_Ww
  property fraction, origin: unspecified 0; name fraction_origin_unspecified_Ww
  property water in wet mass 1000 kg; name WWM
  property carbon content, non-fossil 0; name C_content_non_fossil
- Carbon monoxide, fossil [air, urban air close to ground]: 1.6682e-8 kg; lognormal variance with pedigree 0.302, pedigree (1,1,5,5,1)
  (same comment as for Chromium, ion)
- TOC, Total Organic Carbon [water, ground-, long-term]: 5.4668e-9 kg; lognormal variance with pedigree 0.242, pedigree (1,1,5,5,1)
  (same comment as for Chromium, ion)
- Chromium VI [water, surface water]: 1.0321e-6 kg; lognormal variance with pedigree 0.192, pedigree (1,1,5,5,1)
  (same comment as for Copper, ion)
- Nickel, ion [water, surface water]: 1.8196e-6 kg; lognormal variance with pedigree 0.202, pedigree (1,1,5,5,1)
  (same comment as for Copper, ion)
- Chromium [air, urban air close to ground]: 3.8706e-14 kg; lognormal variance with pedigree 0.322, pedigree (1,1,5,5,1)
  (same comment as for Zinc)
- NMVOC, non-methane volatile organic compounds, unspecified origin [air, urban air close to ground]: 1.3898e-10 kg; lognormal variance with pedigree 0.382, pedigree (1,1,5,5,1)
  direct digester gas emission. Uncertainty calculated from wastewater composition and treatment model
- Lead [soil, agricultural]: 8.3412e-7 kg; lognormal variance with pedigree 0.232, pedigree (1,1,5,5,1)
  (same comment as for Zinc)
- COD, Chemical Oxygen Demand [water, ground-, long-term]: 1.3815e-8 kg; lognormal variance with pedigree 0.242, pedigree (1,1,5,5,1)
  (same comment as for Chromium, ion)
- Methane, fossil [air, urban air close to ground]: 3.0787e-8 kg; lognormal variance with pedigree 0.262, pedigree (1,1,5,5,1)
  (same comment as for Chromium, ion)
- COD, Chemical Oxygen Demand [water, surface water]: 3.9337e-6 kg; lognormal variance with pedigree 0.182, pedigree (1,1,5,5,1)
  (same comment as for Copper, ion)
- BOD5, Biological Oxygen Demand [water, surface water]: 1.2919e-6 kg; lognormal variance with pedigree 0.052, pedigree (1,1,5,5,1)
  (same comment as for Copper, ion)
- Chromium [soil, agricultural]: 4.6153e-7 kg; lognormal variance with pedigree 0.222, pedigree (1,1,5,5,1)
  (same comment as for Zinc)
- Copper [soil, agricultural]: 1.4575e-6 kg; lognormal variance with pedigree 0.232, pedigree (1,1,5,5,1)
  (same comment as for Zinc)
- Zinc, ion [water, surface water]: 6.1834e-6 kg; lognormal variance with pedigree 0.192, pedigree (1,1,5,5,1)
  (same comment as for Copper, ion)
- DOC, Dissolved Organic Carbon [water, ground-, long-term]: 5.4668e-9 kg; lognormal variance with pedigree 0.242, pedigree (1,1,5,5,1)
  (same comment as for Chromium, ion)
- Lead [water, surface water]: 2.1983e-7 kg; lognormal variance with pedigree 0.182, pedigree (1,1,5,5,1)
  (same comment as for Copper, ion)
- TOC, Total Organic Carbon [water, surface water]: 1.0539e-6 kg; lognormal variance with pedigree 0.042, pedigree (1,1,5,5,1)
  (same comment as for Copper, ion)

## Extrapolations
This dataset has been extrapolated from year 2000 to the year of the calculation (2021). The uncertainty has been adjusted accordingly.
