# heavy fuel oil, burned in refinery furnace

Dataset: EcoSpold 2, unit process
Geography: CH
Time period: 1980-01-01 to 2021-12-31
Technology level: current
Classification: ISIC rev.4 ecoinvent: 3530:Steam and air conditioning supply
Classification: EcoSpold01Categories: oil/heating systems
Synonyms: Schweröl; HFO
Tags: ConvertedDataset
Scenario: Business-as-Usual
System model: Allocation, cut-off by classification
Share of production covered: 100 %
Generated by: Niels Jungbluth
Published in: Jungbluth, N. 2007
Database: ecoinvent
isCopyrightProtected: true
accessRestrictedTo: 1

## General comment
Description of the direct emissions due to the combustion of heavy fuel oil in refinery furnaces and generators not including the infrastructure of the furnace.
[This dataset was already contained in the ecoinvent database version 2. It was not individually updated during the transfer to ecoinvent version 3. Life Cycle Impact Assessment results may still have changed, as they are affected by changes in the supply chain, i.e. in other datasets. This dataset was generated following the ecoinvent quality guidelines for version 2. It may have been subject to central changes described in the ecoinvent version 3 change report (http://www.ecoinvent.org/database/ecoinvent-version-3/reports-of-changes/), and the results of the central updates were reviewed extensively. The changes added e.g. consistent water flows and other information throughout the database. The documentation of this dataset can be found in the ecoinvent reports of version 2, which are still available via the ecoinvent website. The change report linked above covers all central changes that were made during the conversion process.]

## Included activities end
Consumption of heavy fuel oil and combustion emissions.

## Geography
Data for Swiss and single European plants.

## Technology
Average technology in use.

## Time period
New Swiss data for regulated emissions CO2, NOx, SOx, Ni and V have been provided by the refineries. They have been compared and discussed with older literature data. European data have been used for other emissions.

## Reference product
- heavy fuel oil, burned in refinery furnace: 1 MJ; By-product classification allocatable product; CPC 17300: Steam and hot water
  EcoSpold01Location=CH
  production volume 3.37596e8 MJ
    47 thousand tonnes of heavy fuel oil were burned in 2000.
    Calculated from an input of 4.6E+9 kg crude petroleum and the corresponding output relations of the dataset
  property price 0.0033534 EUR2005
    Calculated based on inputs: The price of the product has been calculated as a sum of the values of the material and energy inputs for this product. This value is therefore a rough estimation. It may underestimate the real price since there are additional expenses when producing any product. These expences can include for example labour costs, treatment of waste materials and profit for the producer. Please consider carefully whether this level of data quality is acceptable for your application.
  property carbon content 0.849
    carbon content on a dry matter basis (reserved; not for manual entry)
  properties: carbon content, non-fossil 0, water in wet mass 0 kg, water content 0, dry mass 0.0242718 kg, carbon content, fossil 0.849, wet mass 0.0242718 kg, carbon allocation 0.0206068 kg

## Inputs from technosphere
- heavy fuel oil: 0 kg; pedigree (1,1,1,1,1)
  EcoSpold01Location=CH
  This product is consumed where it is produced,which is why a direct activity link is created.
  Uncertainty: Input
  properties: wet mass 1 kg, carbon content, fossil 0.849, dry mass 1 kg, heating value, net 41.2 MJ
- heavy fuel oil: 0.0243 kg; lognormal variance with pedigree 0.04, pedigree (1,1,5,1,1)
  (same comment as for heavy fuel oil)

## Emissions to nature
- Hydrogen fluoride [air, urban air close to ground]: 2.18e-7 kg; lognormal variance with pedigree 0.0941, pedigree (3,4,5,3,1)
  Literature data
  Uncertainty: Literature data
- Lead [air, urban air close to ground]: 2.18e-7 kg; lognormal variance with pedigree 0.7041, pedigree (3,4,5,3,1)
  Literature data
  Uncertainty: Literature data
- Iron [air, urban air close to ground]: 2.43e-7 kg; lognormal variance with pedigree 0.0941, pedigree (3,4,5,3,1)
  Literature data
  Uncertainty: Literature data
- Nickel [air, urban air close to ground]: 4.61e-7 kg; lognormal variance with pedigree 0.16, pedigree (1,1,5,1,1)
  Range for RER refineries
- Zinc [air, urban air close to ground]: 8.5e-8 kg; lognormal variance with pedigree 0.7041, pedigree (3,4,5,3,1)
  Literature data
  Uncertainty: Literature data
- Arsenic [air, urban air close to ground]: 1.94e-8 kg; lognormal variance with pedigree 0.7041, pedigree (3,4,5,3,1)
  Literature data
  Uncertainty: Literature data
- Carbon dioxide, fossil [air, urban air close to ground]: 0.0783 kg; lognormal variance with pedigree 0.0526, pedigree (3,5,5,5,1)
  Literature data
  Uncertainty: Literature data
- Nitrogen oxides [air, urban air close to ground]: 0.000216 kg; lognormal variance with pedigree 0.32, pedigree (1,1,5,1,1)
  44.5% of Range for RER refineries
- Selenium [air, urban air close to ground]: 1.94e-8 kg; lognormal variance with pedigree 0.7041, pedigree (3,4,5,3,1)
  Literature data
  Uncertainty: Literature data
- Sulfur dioxide [air, urban air close to ground]: 0.000209 kg; lognormal variance with pedigree 1.79, pedigree (1,1,5,1,1)
  Range for RER refineries, Share for combustion
- Calcium [air, urban air close to ground]: 1.7e-7 kg; lognormal variance with pedigree 0.0941, pedigree (3,4,5,3,1)
  Literature data
  Uncertainty: Literature data
- Copper [air, urban air close to ground]: 2.43e-8 kg; lognormal variance with pedigree 0.7041, pedigree (3,4,5,3,1)
  Literature data
  Uncertainty: Literature data
- Particulates, > 10 um [air, urban air close to ground]: 1e-5 kg; lognormal variance with pedigree 0.3526, pedigree (2,4,5,1,1)
  Literature data
  Uncertainty: Literature data
- Methane, fossil [air, urban air close to ground]: 4.85e-6 kg; lognormal variance with pedigree 0.0941, pedigree (3,4,5,3,1)
  Literature data
  Uncertainty: Literature data
- Sodium [air, urban air close to ground]: 1.12e-6 kg; lognormal variance with pedigree 0.0941, pedigree (3,4,5,3,1)
  Literature data
  Uncertainty: Literature data
- Particulates, < 2.5 um [air, urban air close to ground]: 3.5e-5 kg; lognormal variance with pedigree 0.3526, pedigree (2,4,5,1,1)
  Literature data
  Uncertainty: Literature data
- Hydrogen chloride [air, urban air close to ground]: 2.18e-6 kg; lognormal variance with pedigree 0.0941, pedigree (3,4,5,3,1)
  Literature data
  Uncertainty: Literature data
- Chromium [air, urban air close to ground]: 7.21e-9 kg; lognormal variance with pedigree 0.7041, pedigree (3,4,5,3,1)
  Literature data
  Uncertainty: Literature data
- Cadmium [air, urban air close to ground]: 3.16e-8 kg; lognormal variance with pedigree 0.7041, pedigree (3,4,5,3,1)
  Literature data
  Uncertainty: Literature data
- Cobalt [air, urban air close to ground]: 1.94e-8 kg; lognormal variance with pedigree 0.7041, pedigree (3,4,5,3,1)
  Literature data
  Uncertainty: Literature data
- Vanadium [air, urban air close to ground]: 5.1e-7 kg; lognormal variance with pedigree 0.2, pedigree (1,1,5,1,1)
  Range for RER refineries
- Chromium VI [air, urban air close to ground]: 7.28e-11 kg; lognormal variance with pedigree 0.7041, pedigree (3,4,5,3,1)
  Literature data
  Uncertainty: Literature data
- Mercury [air, urban air close to ground]: 1.46e-10 kg; lognormal variance with pedigree 0.7041, pedigree (3,4,5,3,1)
  Literature data
  Uncertainty: Literature data
- Particulates, > 2.5 um, and < 10um [air, urban air close to ground]: 5e-6 kg; lognormal variance with pedigree 0.3526, pedigree (2,4,5,1,1)
  Literature data
  Uncertainty: Literature data
- NMVOC, non-methane volatile organic compounds, unspecified origin [air, urban air close to ground]: 4.85e-6 kg; lognormal variance with pedigree 0.0941, pedigree (3,4,5,3,1)
  Literature data
  Uncertainty: Literature data
- Molybdenum [air, urban air close to ground]: 1.21e-8 kg; lognormal variance with pedigree 0.7041, pedigree (3,4,5,3,1)
  Literature data
  Uncertainty: Literature data
- Carbon monoxide, fossil [air, urban air close to ground]: 1.5e-5 kg; lognormal variance with pedigree 0.682, pedigree (3,5,5,5,1)
  Literature data
  Uncertainty: Literature data

## Sampling procedure
Literature survey and plant data.

## Extrapolations
This dataset has been extrapolated from year 2000 to the year of the calculation (2021). The uncertainty has been adjusted accordingly.

## Review by Michael Spielmann (obsolete) 2003-08-19
Passed.

## Review by Emilia Moreno Ruiz 2018-05-31
Fuel input link to proper supplier

## Review by Emilia Moreno Ruiz 2018-03-13
Linking input directly to the refinery with the proper geography.
