# transmission network construction, electricity, high voltage

Dataset: EcoSpold 2, unit process
Geography: RoW
Time period: 1988-01-01 to 2021-12-31
Technology level: current
Classification: EcoSpold01Categories: electricity/distribution
Classification: ISIC rev.4 ecoinvent: 4220:Construction of utility projects
Tags: ConvertedDataset
Scenario: Business-as-Usual
System model: Allocation, cut-off by classification
Share of production covered: 100 %
Generated by: Pablo Tirado
Published in: Dones R. 2007
Database: ecoinvent
isCopyrightProtected: true
accessRestrictedTo: 1

## General comment
This dataset describes the infrastructure (poles, cables etc.) of the electricity high voltage transmission network
[This dataset was already contained in the ecoinvent database version 2. It was not individually updated during the transfer to ecoinvent version 3. Life Cycle Impact Assessment results may still have changed, as they are affected by changes in the supply chain, i.e. in other datasets. This dataset was generated following the ecoinvent quality guidelines for version 2. It may have been subject to central changes described in the ecoinvent version 3 change report (http://www.ecoinvent.org/database/ecoinvent-version-3/reports-of-changes/), and the results of the central updates were reviewed extensively. The changes added e.g. consistent water flows and other information throughout the database. The documentation of this dataset can be found in the ecoinvent reports of version 2, which are still available via the ecoinvent website. The change report linked above covers all central changes that were made during the conversion process.]

## Geography
The calculations are based on Swiss data

## Technology
Switching stations use SF6.

## Reference product
- transmission network, electricity, high voltage: 1 km; name amount_RP; CPC 53252: Local cables and related works; By-product classification allocatable product
  EcoSpold01Location=CH
  production volume 67670.1 km; name apv_RP; = 452.15*7.00e13/3.11e11
    Gross approximation of the production volume based on an estimate of the Quebec production volume (452,15 km, value from Hydro Quebec network and lifetime) scaled to GLO by the ratio of global and Quebec GDP for 2011 (7e13/3.11e11). It should be replaced as soon as better data is found.
  property price 4.7697e6 EUR2005
    The production volume of this product is small compared to other products supplied by the activities within the same ISIC 3 category. Calculated from Aluminium consumption. According to activity '_80 Infrastructure, excluding buildings, EU27' in the EU & DK IO database (Simapro, (0.0000404 (Al, after first processing) + 0.000615 (Al basic, virgin)) kg Al per EURO.. Ecoinvent: 3150 kg Al per km (dataset 'transmission network construction, electricity, high voltage').

## Inputs from technosphere
- concrete, normal: 0 m3; pedigree (1,1,1,1,1)
  This flow is considered as a regional specificity of Quebec. The flow is scaled using the production volumes (Quebec and GLO) to avoid its accounting of this specificity in the other regions."
  properties: wet mass 2380 kg, water content 0.086758, dry mass 2190 kg
- excavation, hydraulic digger: 798.434 m3; = 57.8*((apv_rp-452.15)/apv_rp)+1.6676E+05*452.15/apv_rp; lognormal variance with pedigree 0.0781, pedigree (4,2,5,5,3)
  EcoSpold01Location=RER
  Estimates
  Uncertainty: estimates
- waste wood pole, chrome preserved: -218.343 kg; name waste_wood; = (((16465*452.15)+(0*33644))/(452.15+33644))*-1; lognormal variance with pedigree 0.1712, pedigree (3,5,5,4,2)
  (same comment as for concrete, normal)
  production volume 2.22107e7 kg; = apv_RP * ( waste_wood / amount_RP)
    Calculated from production volume of reference product using the relative outputs.
  property price 0 EUR2005; name waste_wood_price_EUR2005
  properties: wet mass 1 kg, heating value, net 13.99 MJ, dry mass 0.8 kg, water content 0.25, carbon content, non-fossil 0.483676
  note on heating value, net: Value taken from the general comment of the treatment dataset.
- building, hall, steel construction: 0.180732 m2; = 0.181*((apv_rp-452.15)/apv_rp)+0.12068*452.15/apv_rp; lognormal variance with pedigree 0.14, pedigree (5,5,5,5,1)
  EcoSpold01Location=CH
  Estimates
  Uncertainty: estimates
- inert waste, for final disposal: -1.28367e6 kg; name inert_waste; = (((9.68E07*452.15)+(0*33644))/(452.15+33644))*-1; lognormal variance with pedigree 0.1712, pedigree (3,5,5,4,2)
  (same comment as for concrete, normal)
  production volume 1.29708e11 kg; = apv_RP * ( inert_waste / amount_RP)
    Calculated from production volume of reference product using the relative outputs.
  property price 0 EUR2005; name inert_waste_price_EUR2005
  properties: wet mass 1 kg, water content 0.00502513, dry mass 0.995 kg
- wood preservation, vacuum pressure method, organic salts, Cr-free, outdoor use, ground contact: 0.442246 kg; = 99.541*452.15/ apv_RP
  (same comment as for concrete, normal)
- scrap copper: -17.9488 kg; name scrap_copper; = (((1353.5*452.15)+(0*33644))/(452.15+33644))*-1; lognormal variance with pedigree 0.1712, pedigree (3,5,5,4,2)
  (same comment as for concrete, normal)
  production volume 439985 kg; = apv_RP * ( scrap_copper / amount_RP)
    Calculated from production volume of reference product using the relative outputs.
  property price 0 EUR2005; name scrap_copper_price_EUR2005
  properties: dry mass 1 kg, wet mass 1 kg
- scrap steel: -482.171 kg; name scrap_steel; = (((36360*452.15)+(0*33644))/(452.15+33644))*-1; lognormal variance with pedigree 0.1712, pedigree (3,5,5,4,2)
  (same comment as for concrete, normal)
  production volume 3.07639e7 kg; = apv_RP * ( scrap_steel / amount_RP)
    Calculated from production volume of reference product using the relative outputs.
  property price 0 EUR2005; name scrap_steel_price_EUR2005
  properties: dry mass 1 kg, wet mass 1 kg
- scrap aluminium: -116.534 kg; name scrap_alu; = (((8787.7*452.15)+(0*33644))/(452.15+33644))*-1; lognormal variance with pedigree 0.1712, pedigree (3,5,5,4,2)
  (same comment as for concrete, normal)
  production volume 7.88634e6 kg; = apv_RP * ( scrap_alu / amount_RP)
    Calculated from production volume of reference product using the relative outputs.
  property price 0 EUR2005; name scrap_alu_price_EUR2005
  properties: dry mass 1 kg, wet mass 1 kg
- packaging film, low density polyethylene: 66.9 kg; name packaging_film; lognormal variance with pedigree 0.0621, pedigree (3,2,5,5,3)
  EcoSpold01Location=RER
  Literature and estimations
  Uncertainty: literature and estimations
  properties: heating value, net 42.47 MJ, wet mass 1 kg, carbon content, fossil 0.857143, dry mass 1 kg
  note on carbon content, fossil: Polyethylene is formed out of a huge amount of ethylene monomers (C2H4) (ecoinvent v2.2 report 11_II). MW=28 g/mol
- waste polyvinylchloride: 0 kg; name waste_PVC; pedigree (1,1,1,1,1)
  EcoSpold01Location=CH
  Estimates
  Uncertainty: estimates
  production volume 0 kg
    Calculated from the production volume of transmission network, electricity, high voltage in proportion to the respective output amounts.
  property price 0 EUR2005; name waste_PVC_price_EUR2005
  properties: heating value, net 21.51 MJ, water content 0.00200401, wet mass 1 kg, carbon content, fossil 0.440882, dry mass 0.998 kg
  note on carbon content, fossil: C content in 1 kg DM was calculated using data in Tab A.1, ecoinvent v2.2 report 13_I
- aluminium, wrought alloy: 3175.05 kg; = 3150*((apv_rp-452.15)/apv_rp)+8787.7*452.15/ apv_RP; lognormal variance with pedigree 0.0621, pedigree (3,2,5,5,3)
  Literature and estimations
  EcoSpold01Location=RER
  Uncertainty: literature and estimations
  properties: dry mass 1 kg, wet mass 1 kg
- polyvinylchloride, suspension polymerised: 8.5526 kg; name PVC_suspension; = 8.5405*((apv_rp-452.15)/apv_rp)+11.265*452.15/ apv_RP; lognormal variance with pedigree 0.0621, pedigree (3,2,5,5,3)
  Literature and estimations
  EcoSpold01Location=RER
  Uncertainty: literature and estimations
  properties: dry mass 1 kg, wet mass 1 kg, carbon content, fossil 0.387097, heating value, net 21.5 MJ
  note on carbon content, fossil: Monomer is vynyl chloride, C2H3Cl (ecoinvent v2.2 report 11_II). MW=62 g/mol
- building, multi-storey: 7.05 m3; lognormal variance with pedigree 0.14, pedigree (5,5,5,5,1)
  EcoSpold01Location=RER
  Estimates
  Uncertainty: estimates
- light fuel oil: 0 kg; pedigree (1,1,1,1,1)
  Literature and estimations
  EcoSpold01Location=RER
  Uncertainty: literature and estimations
  properties: heating value, net 42.6 MJ, dry mass 1 kg, wet mass 1 kg, carbon content, fossil 0.862
- steel, unalloyed: 7729.59 kg; = 7740*((apv_rp-452.15)/apv_rp)+5396.5*452.15/ apv_RP; lognormal variance with pedigree 0.0621, pedigree (3,2,5,5,3)
  EcoSpold01Location=RER
  Literature and estimations
  Uncertainty: literature and estimations
  properties: wet mass 1 kg, dry mass 1 kg, carbon content, fossil 0.0025
  note on carbon content, fossil: Unalloyed steels or carbon steels are those in which the level of an individual element in no case reaches or exceeds the limiting concentration given in Tab. 3.1 ecoinvent v2.2 report 10_partII. Assumed to have a C content of 0.25%
- copper, cathode: 272.823 kg; = 268*((apv_rp-452.15)/apv_rp)+1353.5*452.15/apv_rp; lognormal variance with pedigree 0.0621, pedigree (3,2,5,5,3)
  EcoSpold01Location=RER
  Literature and estimations
  Uncertainty: literature and estimations
  properties: wet mass 1 kg, dry mass 1 kg
- steel, low-alloyed, hot rolled: 346.631 kg; = 210*((apv_rp-452.15)/apv_rp)+30963*452.15/ apv_RP; lognormal variance with pedigree 0.0621, pedigree (3,2,5,5,3)
  EcoSpold01Location=RER
  Literature and estimations
  Uncertainty: literature and estimations
  properties: dry mass 1 kg, carbon content, fossil 0.005, wet mass 1 kg
  note on carbon content, fossil: Low alloyed steel composition given in Tab. 3.2 ecoinvent v2.2 report 10_partII. Steel assumed to have a C content of 0.5%
- sulfur hexafluoride, liquid: 0.0144117 kg; = 3.2438*452.15/ apv_RP; lognormal variance with pedigree 0.1712, pedigree (3,5,5,4,2)
  (same comment as for concrete, normal)
  properties: wet mass 1 kg, dry mass 1 kg
- waste polyethylene: 0 kg; name waste_PE; pedigree (1,1,1,1,1)
  EcoSpold01Location=CH
  Estimates
  Uncertainty: estimates
  production volume 0 kg
    (same comment as for waste polyvinylchloride)
  property price 0 EUR2005; name waste_PE_price_EUR2005
  properties: carbon content, fossil 0.825301, wet mass 1 kg, water content 0.00401606, dry mass 0.996 kg, heating value, net 42.47 MJ
- sawlog and veneer log, softwood, debarked, measured as solid wood: 0.0956192 m3; = 21.522*452.15/ apv_RP; lognormal variance with pedigree 0.1712, pedigree (3,5,5,4,2)
  (same comment as for concrete, normal)
  properties: carbon content, non-fossil 0.494, dry mass 450 kg, wet mass 765 kg, water content 0.7, heating value, net 5962.7 MJ
- waste mineral oil: -85.2379 kg; name waste_oil; = (((1536.4*425.15)+(66.9*33644))/(425.15+33644))*-1; lognormal variance with pedigree 0.44, pedigree (5,5,5,5,1)
  Calculated as a weighted average of regional datasets.
  EcoSpold01Location=CH
  Uncertainty: estimates
  production volume 4.79721e6 kg; = waste_oil*apv_rp/amount_rp
    (same comment as for waste polyvinylchloride)
  property price 0 EUR2005; name waste_oil_price_EUR2005
  properties: dry mass 0.9 kg, carbon content, fossil 0.864444, water content 0.111111, wet mass 1 kg, heating value, net 34.7 MJ
  note on carbon content, fossil: Tab A.6, ecoinvent v2.2 report 13_I. C content has been calculated after data in the tables, and then referred to 1 kg DM
- gravel, crushed: 0 kg; pedigree (1,1,1,1,1)
  (same comment as for concrete, normal)
  properties: wet mass 1 kg, dry mass 1 kg
- lead: 134 kg; lognormal variance with pedigree 0.0621, pedigree (3,2,5,5,3)
  EcoSpold01Location=RER
  Literature and estimations
  Uncertainty: literature and estimations
  properties: dry mass 1 kg, wet mass 1 kg
- mastic asphalt: 3.93046 kg; = 884.67*452.15/ apv_RP; lognormal variance with pedigree 0.1712, pedigree (3,5,5,4,2)
  (same comment as for concrete, normal)
  properties: carbon content, fossil 0.0968869, wet mass 1 kg, dry mass 1 kg, heating value, net 2.94 MJ
- polyvinylchloride, emulsion polymerised: 8.54045 kg; name PVC_emulsion; lognormal variance with pedigree 0.0621, pedigree (3,2,5,5,3)
  Literature and estimations
  EcoSpold01Location=RER
  Uncertainty: literature and estimations
  properties: carbon content, fossil 0.387097, wet mass 1 kg, dry mass 1 kg, heating value, net 21.5 MJ
- concrete, normal: 4.15969, 0.433434, 3.50895, 1.97379, 0.281925, 165.202 m3 (6 entries); lognormal variance with pedigree 0.1712, pedigree (3,5,5,4,2)
  (same comment as for concrete, normal)
- waste polyvinylchloride: -33.2663, -2.22272, -0.168101, -0.918064, -0.370887, -0.871788, -28.3444 kg (7 entries); lognormal variance with pedigree 0.44, pedigree (5,5,5,5,1)
  EcoSpold01Location=CH
  Estimates
  Uncertainty: estimates
  production volume 4.47745e6 kg
- light fuel oil: 2.39621, 0.345571, 9.8135, 4.83611, 0.320919, 0.464999, 48.7227 kg (7 entries); lognormal variance with pedigree 0.0621, pedigree (3,2,5,5,3)
  Literature and estimations
  EcoSpold01Location=RER
  Uncertainty: literature and estimations
- waste polyethylene: -7.44208, -0.497251, -0.0376063, -0.205383, -0.0829722, -0.19503, -6.341, -52.0987 kg (8 entries); lognormal variance with pedigree 0.44, pedigree (5,5,5,5,1)
  EcoSpold01Location=CH
  Estimates
  Uncertainty: estimates
  production volume 4.55762e6 kg
- gravel, crushed: 376.925, 1725.55, 6623.3 kg (3 entries); lognormal variance with pedigree 0.1712, pedigree (3,5,5,4,2)
  (same comment as for concrete, normal)

## Inputs from nature
- Transformation, from forest, unspecified [natural resource, land]: 18.6 m2; lognormal variance with pedigree 0.14, pedigree (5,5,5,5,1)
  Estimates
  Uncertainty: estimates
- Occupation, industrial area [natural resource, land]: 1351.64 m2*year; = 1257*((apv_rp-452.15)/apv_rp)+22559*452.15/ apv_RP; lognormal variance with pedigree 0.26, pedigree (5,5,5,5,1)
  Estimates
  Uncertainty: estimates
- Occupation, grassland, natural (non-use) [natural resource, land]: 24.9911 m2*year; = 5625*452.15/ apv_RP; lognormal variance with pedigree 0.1712, pedigree (3,5,5,4,2)
  (same comment as for concrete, normal)
- Transformation, to grassland, natural (non-use) [natural resource, land]: 0.333214 m2; = 75*452.15/ apv_RP; lognormal variance with pedigree 0.1712, pedigree (3,5,5,4,2)
  (same comment as for concrete, normal)
- Transformation, from forest, primary (non-use) [natural resource, land]: 0.336569 m2; = 75.755*452.15/ apv_RP; lognormal variance with pedigree 0.1712, pedigree (3,5,5,4,2)
  (same comment as for concrete, normal)
- Transformation, from annual crop [natural resource, land]: 23.3 m2; lognormal variance with pedigree 0.18, pedigree (5,5,5,5,1)
  Estimates
  Uncertainty: estimates
- Transformation, to industrial area [natural resource, land]: 41.9 m2; lognormal variance with pedigree 0.14, pedigree (5,5,5,5,1)
  Estimates
  Uncertainty: estimates

## Sampling procedure
statistics

## Extrapolations
Infrastructure is extrapolated to the entire Swiss territory on the basis of statistics available for smaller areas and of data representativeness This dataset has been copied from an original dataset covering the geography CH. The uncertainty has been adjusted accordingly.

## Review by Emilia Moreno Ruiz 2014-05-29
updated to fit to the new wood preservation data

## Review by Gerald Rebitzer (obsolete) 2003-08-10
passed

## Review by Emilia Moreno Ruiz 2015-09-17
broken formula fixed

## Review by Christian Bauer 2014-01-05
This dataset was thoroughfully reviewed and complies with the Data Quality Guidelines.
