# transport, passenger aircraft, all distances to generic market for transport, passenger aircraft, unspecified

Dataset: EcoSpold 2, unit process
Geography: GLO
Time period: 2016-01-01 to 2021-12-31
Technology level: current
Classification: ISIC rev.4 ecoinvent: 5110:Passenger air transport
Tags: linking activity
Scenario: Business-as-Usual
System model: Allocation, cut-off by classification
Generated by: Lucia Valsasina
Database: ecoinvent
isCopyrightProtected: true
accessRestrictedTo: 1

## General comment
This is a linking activity which transfers part of the production volume of the specific transport, passenger, aircraft of all distances to the generic market for transport, passenger, aircraft, unspecified.
The transport, passenger, lorry, unspecified is meant to be used by activities, where the distance of the transport supplied is unkown.

## Included activities start
The activity starts with the input of the transport activities for the different flight distances. The mix is based on the production volumes of the respective transforming activities.

## Included activities end
The activity ends with the supply of 1 person*km of generic (i.e. unspecified) transport.

## Reference product
- transport, passenger aircraft, unspecified: 1 person*km; By-product classification allocatable product; CPC 6424: Air transport services of passengers
  production volume 2.70365e12 person*km; name transport_RP_PV; = (4.88395E+11*0.9*0.5)+(9.49326E+11*0.9*0.5)+(2.56164E+12*0.9*0.5)+(2.00876E+12*0.9*0.5)
    Estimated.
    The production volume is calculated as a sum of all the "transport, passenger, aircraft, ... haul" activities.
    It is estimated, that 10% of this transport is used for transport of goods in need of atmosphere control.
    It is also estimated, that 50% of the production volume of this transport is transferred to the generic market for transport, passenger, aircraft, unspecified. Which means, that 50% of people using this transport do not know or do not care about the distance travelled.
  property price 0.0094627 EUR2005
    Calculated based on inputs: The price of the product has been calculated as a sum of the values of the material and energy inputs for this product. This value is therefore a rough estimation. It may underestimate the real price since there are additional expenses when producing any product. These expences can include for example labour costs, treatment of waste materials and profit for the producer. Please consider carefully whether this level of data quality is acceptable for your application.

## Inputs from technosphere
- transport, passenger aircraft, medium haul: 0.426363 person*km; = (2.56164E+12*0.9*0.5)/ transport_RP_PV; lognormal variance with pedigree 0.2106, pedigree (5,5,5,5,5)
  Calculated from the production volumes.
  The production volume is taken from the "transport, passenger, aircraft, ... haul" activities.
  It is estimated, that 10% of this transport is used for transport of goods in need of atmosphere control.
  It is also estimated, that 50% of the production volume of this transport is transferred to the generic market for transport, passenger, aircraft, unspecified. Which means, that 50% of people using this transport do not know or do not care about the distance travelled.
- transport, passenger aircraft, long haul: 0.334341 person*km; = (2.00876E+12*0.9*0.5)/ transport_RP_PV; lognormal variance with pedigree 0.2106, pedigree (5,5,5,5,5)
  (same comment as for transport, passenger aircraft, medium haul)
- transport, passenger aircraft, very short haul: 0.0812891 person*km; = (4.88395E+11*0.9*0.5)/ transport_RP_PV; lognormal variance with pedigree 0.2106, pedigree (5,5,5,5,5)
  (same comment as for transport, passenger aircraft, medium haul)
- transport, passenger aircraft, short haul: 0.158007 person*km; = (9.49326E+11*0.9*0.5)/ transport_RP_PV; lognormal variance with pedigree 0.2106, pedigree (5,5,5,5,5)
  (same comment as for transport, passenger aircraft, medium haul)

## Extrapolations
This dataset has been extrapolated from year 2016 to the year of the calculation (2021). The uncertainty has been adjusted accordingly.
