# planing, board, hardwood, u=20%

Dataset: EcoSpold 2, unit process
Geography: RoW
Time period: 2011-01-01 to 2021-12-31
Technology level: current
Classification: ISIC rev.4 ecoinvent: 1610:Sawmilling and planing of wood
Scenario: Business-as-Usual
System model: Allocation, cut-off by classification
Generated by: [System]
Published in: BFS 2013
Database: ecoinvent
isCopyrightProtected: true
accessRestrictedTo: 1

## General comment
This dataset represents the planing of one m3 hardwood board that has been air dried or kiln dried to 20% moisture content. The ratio of kiln dried to air dried raw board input corresponds to the extimated market mix. The planing mill is assumed to be located on the sawmill site. The suction of the shavings is modeled in a separate activity.
The data was provided by and approved by the Swiss forest industry (Holzindustrie Schweiz HIS).
Within ecoinvent, three products - boards, beams and laths - are distinguished:
After being sawn, the resulting products can either be air dried down to a moisture content of u=20% (mass of water per dry mass), kiln dried down to u=20% or kiln dried down to u=10%. The resulting products can then be planed (the ratio of planed products at a moisture content of u=20% reflects the market share of air dried and kiln dried unplaned products). The activity name indicates the respective product and moisture content of the product being planed.

## Included activities start
Planing process starting from air dried respectively kiln dried hardwood board, at sawmill site.

## Included activities end
This activity ends with planed hardwood board, at plant. The dataset includes the planing process at the sawmill site and input of wood. The dataset does not include dust emissions.

## Geography
Represents average Swiss conditions.

## Parameters
- share of kiln dried wood: 0.8 dimensionless; name share_kiln_dried
  share of kiln dried sawnwood input (part of sawnwood input is air dried instead of kiln dried)
- share of shaving: 10 dimensionless; name share_shaving
  share of shaving production per volume of sawlog input
- share of board: 90 dimensionless; name share_board
  share of board production per volume of sawlog input
- shrinkage ratio (u=30% - 0%): 0.004 dimensionless; name shrinkage_ratio
  shrinkage of volume (%) per change in moisture content in %, relevant for u=30% to 0%
- wood density, apparent: 706.56 kg/m3; name wood_d_apparent; = (1+moisture_board/100)* basic_wood_d
  kg wet matter/wet volume
- wood density, dry: 640 kg/m3; name dry_wood_d
  kg oven-dry matter/oven-dry volume
- moisture content board: 20 dimensionless; name moisture_board
  moisture content of board
- wood density, basic: 588.8 kg/m3; name basic_wood_d; = dry_wood_d*(1-moisture_board*shrinkage_ratio)
  kg oven-dry matter/wet volume

## Reference product
- sawnwood, board, hardwood, dried (u=20%), planed: 0 m3; name board_planed; source BFS 2013; CPC 31102: Wood, sawn or chipped lengthwise, sliced or peeled, of a thickness exceeding 6 mm, of non-coniferous wood; By-product classification allocatable product
  production volume 2.65664e7 m3; name p_sawnwood_planed; = 43075422.9677305*0.5+12922626.8903191*0.5
    Estimated to be 50% of respective air dried and kiln dried sawn timber product; extraplated to global production volume from Swiss production volumes via the production volumes of sawntimber (NC) or (C) as applicable according to FAOStat
  property water content 0.2; name water_content
  property price 265 EUR2005; name board_planed_price_EUR2005
    Expert judgement (Urs Luginbühl, Swiss Sawmilling industry, personal communication in June 2014). Cross-reference; FAOSTAT (accessed 20140428). The price is calculated by using data on total world import quantity (m3) and import value (1000 USD), year 2005. 25656806 m3 of Sawnwood (NC) - coniferous was imported in the world in 2005. The import value was 9652714000 USD. The calculated price is thus (9652714000/25656806=376*0.8=) 303 Euro.
  property wet mass 706.56 kg; = basic_wood_d*(1+ water_content)
  property heating value, net 8524.3 MJ
    LHV is calculated based on the Carbon content of the product. More details can be found on the respective documentation.The property is based on a value of 12.06MJ/kg
  property water in wet mass 117.76 kg; = basic_wood_d* water_content
  property dry mass 588.8 kg; = basic_wood_d
  property carbon content 0.494
    carbon content on a dry matter basis (reserved; not for manual entry)
  property true value 265; name board_planed_true_value
    allocation property applied in "true value" allocation // value calculated from revenue
  properties: carbon content, fossil 0, carbon content, non-fossil 0.494, carbon allocation 290.867 kg
- shavings, hardwood, loose, measured as dry mass: 1 kg; name m_shavings; = (board_raw_u20_kd+board_raw_u20_ad)* share_shaving/100* basic_wood_d; source BFS 2013; By-product classification allocatable product; CPC 39283: Non-agglomerated wood waste and scrap
  calculated as dry mass
  production volume 1.83176e9 kg; = m_shavings*p_sawnwood_planed
    Calculated from production volume of reference product using the relative outputs.
  property price 0.113 EUR2005; name m_shavings_price_EUR2005
    Calculated based on data from FAOSTAT (accessed 20140429). The price is calculated by using data on total world import quantity (m3) and import value (1000 USD), year 2005. 40461924 m3 of Chips and Particles was imported in the world in 2005. The import value was 3022227000 USD. The calculated price is thus (3022227000/40461924=74.7*0.8=) 62.2 Euro/m3. It is estimated, that the chips and particles are half hardwood (of density 650 kg/m3) and half softwood (of density 450 kg/m3), thus the remaining mixture has a density of 550 kg/m3. The recalculated price is (1/550*62.2=) 0.11 Euro/kg. Using the same approach the calculated price for 2010 was 0.123 Euro/kg.
  property heating value, net 12.61 MJ
    LHV is calculated based on the Carbon content of the product. More details can be found on the respective documentation.
  property carbon content 0.494
    carbon content on a dry matter basis (reserved; not for manual entry)
  property true value 7.39271; name m_shavings_true_value
    allocation property applied in "true value" allocation // value calculated from revenue
  properties: carbon content, non-fossil 0.494, water content 0.2, water in wet mass 0.2 kg, dry mass 1 kg, wet mass 1.2 kg, carbon content, fossil 0, carbon allocation 0.494 kg

## Inputs from technosphere
- electricity, medium voltage: 0 kWh; name elec_medvol; source BFS 2013; pedigree (1,1,1,1,1)
  electricity consumed for the planing; the suction of the shavings in covered in a separate dataset; data from Swiss industry
- sawnwood, board, hardwood, raw, dried (u=20%): 0.000368749 m3; name board_raw_u20_kd; = 1/(1-share_shaving/100)*share_kiln_dried; source BFS 2013; lognormal variance with pedigree 0.216, pedigree (5,5,5,5,5)
  input of raw sawn wood to be planed
  property water in wet mass 117.76 kg; name board_hardwood_raw_WWM; = board_hardwood_raw_DM* board_hardwood_raw_water_content
  property water content 0.2; name board_hardwood_raw_water_content
  property carbon content, fossil 0; name board_hardwood_raw_C_content_fossil
  property carbon content, non-fossil 0.494; name board_hardwood_ra_C_content_non_fossil_0
  property wet mass 706.56 kg; name board_hardwood_raw_WM; = board_hardwood_raw_DM*(1+ board_hardwood_raw_water_content)
  property dry mass 588.8 kg; name board_hardwood_raw_DM; = basic_wood_d
  properties: heating value, net 8524.3 MJ
- sawnwood, board, hardwood, raw, dried (u=20%): 9.21872e-5 m3; name board_raw_u20_ad; = 1/(1-share_shaving/100)*(1-share_kiln_dried); lognormal variance with pedigree 0.216, pedigree (5,5,5,5,5)
  input of raw sawn wood to be planed
  properties: wet mass 706.56 kg, dry mass 588.8 kg, carbon content, non-fossil 0.494, water content 0.2, heating value, net 8524.3 MJ
- planing mill: 3.06983e-10 unit; name planemill; source BFS 2013; lognormal variance with pedigree 0.64, pedigree (5,5,5,5,5)
  data taken from ecoinvent 2.2 dataset
- electricity, medium voltage: 0.000101627, 1.94876e-5, 0.000158858, 0.000327157, 0.00475821, 0.000670672, 0.00193726 kWh (7 entries); source BFS 2013; lognormal variance with pedigree 0.41, pedigree (5,5,5,5,5)
  (same comment as for electricity, medium voltage)

## Inputs from nature
- Carbon dioxide, non-fossil, resource correction [natural resource, in air]: 1.31974 kg; pedigree (1,1,1,1,1)
  This exchange has been added after economic allocation in order to re-balance the non-fossil carbon dioxide resource extraction.

## Sampling procedure
complementary literature and sampling from sawmills

## Extrapolations
created manually as a copy of the respective Swiss dataset; uncertainties have been adjusted accodingly
