# ventilation control and wiring production, central unit

Dataset: EcoSpold 2, unit process
Geography: RER
Time period: 2003-01-01 to 2021-12-31
Technology level: current
Classification: ISIC rev.4 ecoinvent: 2651:Manufacture of measuring, testing, navigating and control equipment
Classification: EcoSpold01Categories: ventilation/production of components
Tags: ConvertedDataset
Scenario: Business-as-Usual
System model: Allocation, cut-off by classification
Generated by: Alex Primas
Published in: Hässig, W. 2007
Database: ecoinvent
isCopyrightProtected: true
accessRestrictedTo: 1

## General comment
Production of a typical component used for a ventilation system in a multi family house. The house considered in the investigation includes 6 flats with 130 m2 floor area each and a ventilation rate of 120 m3/h.
[This dataset was already contained in the ecoinvent database version 2. It was not individually updated during the transfer to ecoinvent version 3. Life Cycle Impact Assessment results may still have changed, as they are affected by changes in the supply chain, i.e. in other datasets. This dataset was generated following the ecoinvent quality guidelines for version 2. It may have been subject to central changes described in the ecoinvent version 3 change report (http://www.ecoinvent.org/database/ecoinvent-version-3/reports-of-changes/), and the results of the central updates were reviewed extensively. The changes added e.g. consistent water flows and other information throughout the database. The documentation of this dataset can be found in the ecoinvent reports of version 2, which are still available via the ecoinvent website. The change report linked above covers all central changes that were made during the conversion process.]

## Included activities end
Materials used for the production. Estimation of electricity use for the different production steps. Energy use for heating of the production building. Transport of raw materials to the plant. Estimation for the Infrastructure of the Production site included.

## Geography
Data for production in Germany used.

## Technology
Basic control unit for central ventilation equipment with 720 m3/h nominal air flow. Electrical wiring for connection of unit and grid connection. Weight of control unit 0.6 kg, weight of wiring 4.2 kg. Electrical wiring for connection of unit

## Time period
Materials investigated in 2003

## Reference product
- ventilation control and wiring, central unit: 1 unit; CPC 44831: Parts of the following appliances: electromechanical domestic appliances, shavers and hairclippers, with self-[…]; By-product classification allocatable product
  EcoSpold01Location=RER
  production volume 1.32237 unit
    This is a placeholder value that does not reflect real-world production volumes. This dataset does not currently require a real-world production volume to work in the database framework, and no actual data were collected yet. This has no negative effect on the results of the ecoinvent database. The placeholder value of this activity was scaled according to the nominal GDP of 2005 (source: United Nations, http://data.un.org/Glossary.aspx?q=GDP+%28current+US%24%29, accessed 20130726) to reflect an appropriate share of the global production volume, which is also a placeholder value.
  property carbon content, non-fossil 1.68025e-5
    C content was calculated as an addition of C content in the product components, then it was referred to 1 kg DM
  property carbon content, fossil 0.262305
    (same comment as for ventilation control and wiring, central unit)
  property price 35.5359 EUR2005
    Calculated based on inputs: The price of the product has been calculated as a sum of the values of the material and energy inputs for this product. This value is therefore a rough estimation. It may underestimate the real price since there are additional expenses when producing any product. These expences can include for example labour costs, treatment of waste materials and profit for the producer. Please consider carefully whether this level of data quality is acceptable for your application.
  property carbon content 0.262321
    carbon content on a dry matter basis (reserved; not for manual entry)
  properties: water content 0, water in wet mass 0 kg, wet mass 4.8 kg, dry mass 4.8 kg, carbon allocation 1.25914 kg

## Inputs from technosphere
- wire drawing, copper: 1.76 kg; lognormal variance with pedigree 0.054, pedigree (3,4,5,1,1)
  Questionnaire, estimations
  EcoSpold01Location=RER
  Uncertainty: Questionnaire, estimations
- extrusion, plastic pipes: 2.73 kg; lognormal variance with pedigree 0.0526, pedigree (2,4,5,1,1)
  Questionnaire
  EcoSpold01Location=RER
  Uncertainty: Questionnaire
- heat, district or industrial, other than natural gas: 6.612 MJ; lognormal variance with pedigree 0.07, pedigree (1,1,5,1,1)
  4,5,1,1,1,5; Data estimated from related companies
  EcoSpold01Location=RER
  properties: heating value, net 1 MJ
- heat, district or industrial, natural gas: 6.612 MJ; lognormal variance with pedigree 0.076, pedigree (4,5,5,1,1)
  EcoSpold01Location=RER
  Data estimated from related companies
  Uncertainty: Data estimated from related companies
  properties: heating value, net 1 MJ
- plastic processing factory: 3.56e-9 unit; lognormal variance with pedigree 0.394, pedigree (4,5,5,1,3)
  EcoSpold01Location=RER
  Calculated with data of a similar company
  Uncertainty: Calculated with data of a similar company
- polyvinylchloride, emulsion polymerised: 0.348512 kg; lognormal variance with pedigree 0.0526, pedigree (2,4,5,1,1)
  EcoSpold01Location=RER
  Questionnaire
  Uncertainty: Questionnaire
  properties: dry mass 1 kg, carbon content, fossil 0.387097, wet mass 1 kg, heating value, net 21.5 MJ
  note on carbon content, fossil: Monomer is vynyl chloride, C2H3Cl (ecoinvent v2.2 report 11_II). MW=62 g/mol
- electronics, for control units: 0.6 kg; lognormal variance with pedigree 0.072, pedigree (3,4,5,1,3)
  Questionnaire, approximation for technology
  EcoSpold01Location=RER
  Uncertainty: Questionnaire, approximation for technology
  properties: carbon content, non-fossil 0.00013442, carbon content, fossil 0.337146, wet mass 1 kg, dry mass 1 kg
  note on carbon content, non-fossil: The control unit has a composition of 46% steel (housing), 32% plastics, 14% printed wiring boards and 8% cables (various types).;
- electricity, medium voltage: 0.528 kWh; lognormal variance with pedigree 0.108, pedigree (3,5,5,1,3)
  Data estimated from related processes
  EcoSpold01Location=UCTE
  Uncertainty: Data estimated from related processes
- copper, cathode: 1.76 kg; lognormal variance with pedigree 0.054, pedigree (3,4,5,1,1)
  Questionnaire, estimations
  EcoSpold01Location=RER
  Uncertainty: Questionnaire, estimations
  properties: dry mass 1 kg, wet mass 1 kg
- waste polyvinylchloride: -0.13 kg; lognormal variance with pedigree 0.07, pedigree (4,4,5,1,1)
  Estimations on precentage material disposed
  EcoSpold01Location=CH
  Uncertainty: Estimations on precentage material disposed
  production volume 0.13 kg
    Calculated from the production volume of ventilation control and wiring, central unit in proportion to the respective output amounts.
  properties: wet mass 1 kg, dry mass 0.998 kg, water content 0.00200401, carbon content, fossil 0.440882, heating value, net 21.51 MJ
  note on carbon content, fossil: C content in 1 kg DM was calculated using data in Tab A.1, ecoinvent v2.2 report 13_I
  note on heating value, net: Value taken from the general comment of the treatment dataset.
- polyvinylchloride, suspension polymerised: 2.38149 kg; lognormal variance with pedigree 0.0526, pedigree (2,4,5,1,1)
  EcoSpold01Location=RER
  Questionnaire
  Uncertainty: Questionnaire
  properties: heating value, net 21.5 MJ, carbon content, fossil 0.387097, dry mass 1 kg, wet mass 1 kg

## Sampling procedure
Questionnaire, technical information of producer and estimations. For control electronic proxy process used.

## Extrapolations
This dataset has been extrapolated from year 2003 to the year of the calculation (2021). The uncertainty has been adjusted accordingly.

## Review by Rolf Frischknecht 2007-08-16
passed
none
