# treatment of refractory spent pot liner from Al electrolysis, residual material landfill

Dataset: EcoSpold 2, unit process
Geography: CH
Time period: 1994-01-01 to 2021-12-31
Technology level: current
Classification: ISIC rev.4 ecoinvent: 3822:Treatment and disposal of hazardous waste
Classification: EcoSpold01Categories: waste management/residual material landfill
Synonyms: brick; ceramic; second cut of Spent Pot Lining SPL in aluminium electrolysis
Tags: Treatment; ConvertedDataset
Scenario: Business-as-Usual
System model: Allocation, cut-off by classification
Generated by: Gabor Doka (obsolete)
Published in: Doka G. 2009
Database: ecoinvent
isCopyrightProtected: true
accessRestrictedTo: 1

## General comment
Inventoried waste contains 100% spent pot liner, refractory fraction; .
waste composition (wet, in ppm): H2O n.a.; O 392510; H n.a.; C n.a.; S n.a.; N 330.12; P 80.218; B n.a.; Cl 399.4; Br n.a.; F 85871; I n.a.; Ag n.a.; As n.a.; Ba n.a.; Cd n.a.; Co n.a.; Cr n.a.; Cu n.a.; Hg n.a.; Mn 77.317; Mo n.a.; Ni n.a.; Pb n.a.; Sb n.a.; Se n.a.; Sn n.a.; V n.a.; Zn n.a.; Be n.a.; Sc n.a.; Sr 369.22; Ti 359.16; Tl n.a.; W n.a.; Si 172740; Fe 12568; Ca 39255; Al 195590; K 2486.7; Mg n.a.; Na 97853;
Share of carbon in waste that is biogenic 60.4%.
Additional solidification with 0.4002 kg of cement.
[This dataset was already contained in the ecoinvent database version 2. It was not individually updated during the transfer to ecoinvent version 3. Life Cycle Impact Assessment results may still have changed, as they are affected by changes in the supply chain, i.e. in other datasets. This dataset was generated following the ecoinvent quality guidelines for version 2. It may have been subject to central changes described in the ecoinvent version 3 change report (http://www.ecoinvent.org/database/ecoinvent-version-3/reports-of-changes/), and the results of the central updates were reviewed extensively. The changes added e.g. consistent water flows and other information throughout the database. The documentation of this dataset can be found in the ecoinvent reports of version 2, which are still available via the ecoinvent website. The change report linked above covers all central changes that were made during the conversion process.]

## Included activities end
Waste-specific short-term emissions to water from leachate. Long-term emissions from landfill to ground water. Expenditures for solidificalion with cement (user-specified option)

## Geography
Technology encountered in Switzerland in 2000. Landfill includes base seal and leachate collection system.

## Technology
Swiss residual material landfill for polluted, inorganic waste. With base seal and leachate collection system. Recultivation after closure.

## Time period
Waste composition as given in literature reference, theoretical data or other source. Transfer coefficients from prospective model.

## Reference product
- refractory spent pot liner from Al electrolysis: -1 kg; By-product classification Waste; CPC 39: Wastes or scraps
  EcoSpold01Location=CH
  production volume 0.0336675 kg
    This is a placeholder value that does not reflect real-world production volumes. This dataset does not currently require a real-world production volume to work in the database framework, and no actual data were collected yet. This has no negative effect on the results of the ecoinvent database. The placeholder value of this activity was scaled according to the nominal GDP of 2005 (source: United Nations, http://data.un.org/Glossary.aspx?q=GDP+%28current+US%24%29, accessed 20130726) to reflect an appropriate share of the global production volume, which is also a placeholder value.
  property price 0 EUR2005
    Waste products are assigned a price of zero as they are assumed to require further treatment.
  property carbon content 0
    carbon content on a dry matter basis (reserved; not for manual entry)
  properties: dry mass 1 kg, carbon content, fossil 0, water content 0, carbon content, non-fossil 0, water in wet mass 0 kg, wet mass 1 kg, carbon allocation 0 kg

## Inputs from technosphere
- cement, unspecified: 0.40019 kg; lognormal variance with pedigree 0.05, pedigree (1,1,5,1,1)
  Cement for solidification of residual material waste. Uncertainty in mass from solidification recipe.
  EcoSpold01Location=CH
  properties: dry mass 1 kg, wet mass 1 kg
- residual material landfill: 2.0843e-9 unit; lognormal variance with pedigree 0.04, pedigree (1,1,5,1,1)
  demands per kilogram waste. uncertainty is heeded in the module
  EcoSpold01Location=CH
- process-specific burdens, residual material landfill: 1.0005 kg; lognormal variance with pedigree 0.04, pedigree (1,1,5,1,1)
  EcoSpold01Location=CH
  demands per kilogram waste. uncertainty is heeded in the module;activityLink introduced to establish a direct link to the corresponding regional supply of this product
- waste cement, hydrated: -1.0005 kg; lognormal variance with pedigree 0.05, pedigree (1,1,5,1,1)
  EcoSpold01Location=CH
  Hydrated cement for solidification of residual material waste. Uncertainty in mass from solidification recipe.
  production volume 1.0005 kg
    Calculated from the production volume of refractory spent pot liner from Al electrolysis, 0% water in proportion to the respective output amounts.
  properties: dry mass 1 kg, wet mass 1 kg

## Emissions to nature
- Potassium, ion [water, surface water]: 0.00070097 kg; lognormal variance with pedigree 0.62, pedigree (1,1,5,1,1)
  uncertainty is calculated from uncertainties in waste composition and transfer coefficients in residual landfill
- Potassium, ion [water, ground-, long-term]: 0.0017858 kg; lognormal variance with pedigree 0.58, pedigree (1,1,5,1,1)
  uncertainty is calculated from uncertainties in waste composition and transfer coefficients in incinerator and landfills.
- Nitrate [water, surface water]: 0.00027607 kg; lognormal variance with pedigree 0.91, pedigree (1,1,5,1,1)
  (same comment as for Potassium, ion)
- Aluminium [water, surface water]: 9.693e-5 kg; lognormal variance with pedigree 0.85, pedigree (1,1,5,1,1)
  (same comment as for Potassium, ion)
- Titanium, ion [water, surface water]: 1.7799e-7 kg; lognormal variance with pedigree 1.58, pedigree (1,1,5,1,1)
  (same comment as for Potassium, ion)
- Sodium, ion [water, surface water]: 0.036722 kg; lognormal variance with pedigree 0.19, pedigree (1,1,5,1,1)
  (same comment as for Potassium, ion)
- Nitrate [water, ground-, long-term]: 0.0011859 kg; lognormal variance with pedigree 0.85, pedigree (1,1,5,1,1)
  (same comment as for Potassium, ion)
- Manganese [water, surface water]: 1.0662e-9 kg; lognormal variance with pedigree 2.25, pedigree (1,1,5,1,1)
  (same comment as for Potassium, ion)
- Fluoride [water, surface water]: 0.0046535 kg; lognormal variance with pedigree 0.35, pedigree (1,1,5,1,1)
  (same comment as for Potassium, ion)
- Chloride [water, ground-, long-term]: 0.00028517 kg; lognormal variance with pedigree 0.82, pedigree (1,1,5,1,1)
  (same comment as for Potassium, ion)
- Phosphate [water, ground-, long-term]: 5.495e-5 kg; lognormal variance with pedigree 1.59, pedigree (1,1,5,1,1)
  (same comment as for Potassium, ion)
- Chloride [water, surface water]: 0.00011423 kg; lognormal variance with pedigree 0.86, pedigree (1,1,5,1,1)
  (same comment as for Potassium, ion)
- Titanium, ion [water, ground-, long-term]: 0.00010662 kg; lognormal variance with pedigree 1.2, pedigree (1,1,5,1,1)
  (same comment as for Potassium, ion)
- Iron, ion [water, ground-, long-term]: 6.2989e-5 kg; lognormal variance with pedigree 7.39, pedigree (1,1,5,1,1)
  (same comment as for Potassium, ion)
- Calcium, ion [water, surface water]: 5.9215e-6 kg; lognormal variance with pedigree 1.15, pedigree (1,1,5,1,1)
  (same comment as for Potassium, ion)
- Calcium, ion [water, ground-, long-term]: 0.003547 kg; lognormal variance with pedigree 1.7, pedigree (1,1,5,1,1)
  (same comment as for Potassium, ion)
- Fluoride [water, ground-, long-term]: 0.081218 kg; lognormal variance with pedigree 0.18, pedigree (1,1,5,1,1)
  (same comment as for Potassium, ion)
- Strontium [water, ground-, long-term]: 0.00013367 kg; lognormal variance with pedigree 1.09, pedigree (1,1,5,1,1)
  (same comment as for Potassium, ion)
- Phosphate [water, surface water]: 9.1737e-8 kg; lognormal variance with pedigree 1.81, pedigree (1,1,5,1,1)
  (same comment as for Potassium, ion)
- Manganese [water, ground-, long-term]: 6.3866e-7 kg; lognormal variance with pedigree 6.79, pedigree (1,1,5,1,1)
  (same comment as for Potassium, ion)
- Silicon [water, surface water]: 0.00038847 kg; lognormal variance with pedigree 0.66, pedigree (1,1,5,1,1)
  (same comment as for Potassium, ion)
- Aluminium [water, ground-, long-term]: 0.058061 kg; lognormal variance with pedigree 0.47, pedigree (1,1,5,1,1)
  (same comment as for Potassium, ion)
- Sodium, ion [water, ground-, long-term]: 0.061131 kg; lognormal variance with pedigree 0.17, pedigree (1,1,5,1,1)
  (same comment as for Potassium, ion)
- Strontium [water, surface water]: 2.2316e-7 kg; lognormal variance with pedigree 1.55, pedigree (1,1,5,1,1)
  (same comment as for Potassium, ion)
- Silicon [water, ground-, long-term]: 0.17235 kg; lognormal variance with pedigree 0.12, pedigree (1,1,5,1,1)
  (same comment as for Potassium, ion)
- Iron, ion [water, surface water]: 1.0516e-7 kg; lognormal variance with pedigree 1.66, pedigree (1,1,5,1,1)
  (same comment as for Potassium, ion)

## Sampling procedure
Landfill model based on observed leachate concentrations in literature. Extrapolated to 60'000 years heeding chemical characteristics. Initial waste composition from various literature sources.

## Extrapolations
This dataset has been extrapolated from year 2000 to the year of the calculation (2021). The uncertainty has been adjusted accordingly.

## Review by Niels Jungbluth 2009-02-15
passed.
