# treatment of waste polypropylene, municipal incineration

Dataset: EcoSpold 2, unit process
Geography: RoW
Time period: 2006-01-01 to 2021-12-31
Technology level: current
Classification: ISIC rev.4 ecoinvent: 3821:Treatment and disposal of non-hazardous waste
Synonyms: Kehrichtverbrennung; municipal waste incineration; Siedlungsabfallverbrennung
Scenario: Business-as-Usual
System model: Allocation, cut-off by classification
Share of production covered: 1.8 %
Generated by: Gabor Doka
Published in: Doka G. 2013
Database: ecoinvent
isCopyrightProtected: true
accessRestrictedTo: 1

## General comment
This dataset represents the activity of waste disposal of waste polypropylene in a municipal solid waste incinerator (MSWI) // Recommended use of this dataset: For PP, which goes to disposal as part of communal waste mixture. // // Waste composition (wet, in ppm): upper heating value 36.16 MJ/kg; lower heating value 32.78 MJ/kg; H2O 159000; O 32454; H 103430; C 694120; S 360.46; N 1095.3; P n.a.; B n.a.; Cl 1234.1; Br 8.0972; F 12.146; I n.a.; Ag n.a.; As 1.5385; Ba 202.43; Cd 28.663; Co 1.417; Cr 10.526; Cu 34.93; Hg 0.040486; Mn 25.371; Mo n.a.; Ni 0.80972; Pb 19.079; Sb 8.5021; Se 1.7004; Sn 3.2205; V 1862.4; Zn 288.78; Be 0.40486; Sc n.a.; Sr 71.661; Ti 809.72; Tl 0.32389; W n.a.; Si n.a.; Fe 1295.6; Ca 2186.3; Al 161.94; K n.a.; Mg 80.972; Na 1186.6; // Share of carbon in waste that is biogenic 0%. // Share of metals in waste not oxidised and bulk-recyclable (exclude very small or thin parts) Iron: 0%; Alu: 0%; Copper: 0%. // One kg of this waste produces 0.02025 kg of slag and 0.008463 kg of residues, which are landfilled. Additional solidification with 0.003385 kg of cement. // Net energy production: 4.2MJ/kg electric energy and 8.15MJ/kg thermal energy. // Recovery of metal scrap to recycling: 0g iron scrap, 0g aluminium scrap, 0g copper scrap.

## Included activities start
waste incineration from waste reception gate and delivery into waste bunker at incinerator plant site (without transports to the incinerator)

## Included activities end
Waste-specific short-term emissions to water from leachate. Long-term emissions from landfill to ground water.

## Geography
Specific to the technology mix encountered in Switzerland in 2010. Well applicable to modern incineration practices in Europe, North America or Japan.

## Technology
average Swiss MSWI plants in 2010 (grate incinerators) with electrostatic precipitator for fly ash (ESP), wet flue gas scrubber and 25% SNCR , 42.77% SCR-high dust , 32.68% SCR-low dust -DeNOx facilities and 0% without Denox (weighted according to mass of burnt waste, representing Swiss average). Efficiency of iron scrap separation from slag : 58%. Efficiency of non-ferrous scrap separation from slag : 31%. Gross electric efficiency technology mix 15.84% and Gross thermal efficiency technology mix 28.51%

## Time period
Waste composition as given in literature reference, theoretical data or other source. Transfer coefficients for modern MSWI.

## Reference product
- waste polypropylene: -1 kg; CPC 39270: Waste, parings and scrap of plastics; By-product classification Waste; CAS 9003-07-0
  Main reference product of this activity (supply of disposal service).
  production volume 3.4074e9 kg
    based on estimate on MSW in WTE globally, share of total plastic in MSW in top WTE countries and share of PP plastic types in US MSW (Fatarella 2012)
  property heating value, net 32.78 MJ
    Value assumed for all polypropylene products. Source: Phyllis2, database for (treated) biomass, algae, feedstocks for biogas production and biochar, https://phyllis.nl/Biomass/View/1186, ECN.TNO
  property price 0 EUR2005
    Waste products are assigned a price of zero as they are assumed to require further treatment.
  property carbon content 0.825208
    carbon content on a dry matter basis (reserved; not for manual entry)
  properties: water in wet mass 0.159 kg, carbon content, fossil 0.825208, carbon content, non-fossil 0, water content 0.189061, wet mass 1 kg, dry mass 0.841 kg, carbon allocation 0.694 kg

## By-products
- heat, for reuse in municipal waste incineration only: 0 MJ; name E_th_prod_MSWI; By-product classification allocatable product; CPC 17300: Steam and hot water; pedigree (1,1,1,1,1)
  Net electricity generated from this waste and used in internal MSWI plant energy redistribution.
  Uncertainty: uncertainty is calculated from uncertainties in waste composition and uncertainties in energy efficiency and the uncertainty in internal energy demand
  production volume 2.7773e10 MJ
    calculated in proportion to reference product waste input to incinerator
  property price 0.0106 EUR2005; name E_th_prod_MSWI_price_EUR2005
    Average European district heat price from Ecoheatcool and Euroheat 2005-2006, Ecoheat Work package 1: The European heat market. Final report. 10.6 EUR/GJ i s the price of district heat. http://www.solarthermalworld.org/files/Ecoheatcool%20WP1%20Web.pdf?download
  property exergy 0.1842 MJ; name E_th_prod_MSWI_exergy
    This exergy property is based on the exergy content of the product.
  property true value relation 0.1842; name E_th_prod_MSWI_true_value_relation
    property to calculate "true value" from
- electricity, for reuse in municipal waste incineration only: 0 kWh; name E_el_prod_MSWI; CPC 17100: Electrical energy; By-product classification allocatable product; pedigree (1,1,1,1,1)
  (same comment as for heat, for reuse in municipal waste incineration only)
  production volume 3.9785e9 kWh
    calculated in proportion to reference product waste input to incinerator
  property exergy 3.6 MJ; name E_el_prod_MSWI_exergy
    This exergy property is based on the exergy content of the product.
  property true value relation 3.6; name E_el_prod_MSWI_true_value_relation
    property to calculate "true value" from
  property price 0.1 EUR2005; name E_el_prod_MSWI_price_EUR2005
    Estimated to be the same price as in case of electricity, medium voltage.

## Inputs from technosphere
- ammonia, anhydrous, liquid: 0 kg; pedigree (1,1,1,1,1)
  Input to DeNOx stage (100% NH3).
  Uncertainty: uncertainty calculated from uncertainty in average DeNOx input, uncertainty in the share of thermal NOx, uncertainty of nitrogen content in average municipal waste and the uncertainty in nitrogen content in *this* waste.
  properties: dry mass 1 kg, wet mass 1 kg
- chromium oxide, flakes: 1.2537e-6 kg; lognormal variance with pedigree 0.52493, pedigree (1,1,4,1,1)
  Input to DeNOx stage.
  Uncertainty: uncertainty calculated from uncertainty in average DeNOx input, uncertainty in the share of thermal NOx, uncertainty of nitrogen content in average municipal waste and the uncertainty in nitrogen content in *this* waste.
  properties: wet mass 1 kg, dry mass 1 kg
- slag landfill: 3.3528e-11 unit; lognormal variance with pedigree 0.075744, pedigree (1,1,4,1,1)
  Landfill infrastructure required for landfilling of bottom ash.
  Uncertainty: uncertainty is calculated from uncertainties in waste composition and transfer coefficients in incinerator
- titanium dioxide: 6.1429e-5 kg; lognormal variance with pedigree 0.52493, pedigree (1,1,4,1,1)
  Input to DeNOx stage (TiO2 catalyst carrier)
  Uncertainty: uncertainty calculated from uncertainty in average DeNOx input, uncertainty in the share of thermal NOx, uncertainty of nitrogen content in average municipal waste and the uncertainty in nitrogen content in *this* waste.
  properties: dry mass 1 kg, wet mass 1 kg
- municipal waste incineration facility: 2.5e-10 unit
  Demands per kilogram waste.
- process-specific burdens, slag landfill: 0 kg; pedigree (1,1,1,1,1)
  Mass-specific expenditures required for landfilling of bottom ash.
  Uncertainty: uncertainty is calculated from uncertainties in waste composition and transfer coefficients in incinerator
- cement, unspecified: 0 kg; pedigree (1,1,1,1,1)
  Cement required for solidification of landfilled residual material.
  Uncertainty: Uncertainty calculated from uncertainty of the waste composition of this waste, of transfer coefficients in the incinerator and of the solidification recipe.
  properties: dry mass 1 kg, wet mass 1 kg
- chemical, organic: 8.2147e-6 kg; lognormal variance with pedigree 1.00477, pedigree (1,1,4,1,1)
  Auxilliary inputs for the wastewater treatment stage of the incinerator plant. Proxy for (pure) Trisodium-trimercapto-s-triazine (CAS 17766-26-6), used as 15% diluted solution, aka TMT15.
  Uncertainty: uncertainty calculated from uncertainty in average TMT15 input, of transfer coefficients in the incinerator, and the uncertainty of the waste composition of this waste
  properties: wet mass 1 kg, dry mass 1 kg, carbon content, fossil 0.628, heating value, net 19.03 MJ
- process-specific burdens, residual material landfill: 0 kg; pedigree (1,1,1,1,1)
  Mass-specific expenditures required for landfilling of incineration residues.
  Uncertainty: uncertainty is calculated from uncertainties in waste composition and transfer coefficients in incinerator
- water, decarbonised: 0 kg; pedigree (1,1,1,1,1)
  Incinerator process water used in flue gas scrubber stage.
  Uncertainty: uncertainty calculated from uncertainty in average water input, and the uncertainty of the waste composition of this waste
  properties: wet mass 1 kg
- hydrochloric acid, without water, in 30% solution state: 2.0416e-5 kg; lognormal variance with pedigree 0.22119, pedigree (1,1,4,1,1)
  Auxilliary inputs for the wastewater treatment stage of the incinerator plant.
  Uncertainty: uncertainty calculated from uncertainty in average HCl input, of transfer coefficients in the incinerator, and the uncertainty of the waste composition of this waste
  properties: heating value, net 3.32 MJ, wet mass 1 kg, dry mass 1 kg
- transport, freight, lorry, unspecified: 0 metric ton*km; pedigree (1,1,1,1,1)
  Transport services to transport incineration residues to landfills.
  Uncertainty: uncertainty calculated from uncertainty of the waste composition of this waste, uncertainty of transfer coefficients and the uncertainty in generic transportation distances
- residual material landfill: 1.7631e-11 unit; lognormal variance with pedigree 0.059849, pedigree (1,1,4,1,1)
  Landfill infrastructure required for landfilling of incineration residues.
  Uncertainty: uncertainty is calculated from uncertainties in waste composition and transfer coefficients in incinerator
- quicklime, milled, packed: 0.00066148 kg; lognormal variance with pedigree 0.63093, pedigree (1,1,4,1,1)
  Auxilliary inputs for the flue gas treatment stage of the incinerator plant.
  Uncertainty: uncertainty calculated from uncertainty in average CaO input, of transfer coefficients in the incinerator, and the uncertainty of the waste composition of this waste
  properties: wet mass 1 kg, dry mass 0.99 kg, water content 0.010101
- iron (III) chloride, without water, in 40% solution state: 0.0002705 kg; lognormal variance with pedigree 0.45416, pedigree (1,1,4,1,1)
  Auxilliary inputs for the wastewater treatment stage of the incinerator plant.
  Uncertainty: uncertainty calculated from uncertainty in average FeCl3 input, of transfer coefficients in the incinerator, and the uncertainty of the waste composition of this waste
  properties: dry mass 1 kg, wet mass 1 kg
- sodium hydroxide, without water, in 50% solution state: 0.00025102 kg; lognormal variance with pedigree 0.32864, pedigree (1,1,4,1,1)
  Auxilliary inputs for the flue gas treatment stage of the incinerator plant.
  Uncertainty: uncertainty calculated from uncertainty in average NaOH input, of transfer coefficients in the incinerator, and the uncertainty of the waste composition of this waste
  properties: wet mass 1 kg, heating value, net 3.03 MJ, dry mass 1 kg
- chemical, inorganic: 7.7674e-5 kg; lognormal variance with pedigree 0.22119, pedigree (1,1,4,1,1)
  Auxilliary inputs for the wastewater treatment stage of the incinerator plant. Proxy for Polyelectrolyte.
  Uncertainty: uncertainty calculated from uncertainty in average Polyelectrolyte input, of transfer coefficients in the incinerator, and the uncertainty of the waste composition of this waste
  properties: dry mass 1 kg, wet mass 1 kg, carbon content, fossil 0.003
- heat, district or industrial, natural gas: 0 MJ; pedigree (1,1,1,1,1)
  Input to DeNOx stage, to heat up flue gas in low-dust SCR.
  Uncertainty: uncertainty calculated from uncertainty in average DeNOx input, uncertainty in the share of thermal NOx, uncertainty of nitrogen content in average municipal waste and the uncertainty in nitrogen content in *this* waste.
  properties: heating value, net 1 MJ
- waste cement, hydrated: 0 kg; pedigree (1,1,1,1,1)
  Hydrated cement output for solidification of landfilled residual material.
  Uncertainty: Uncertainty calculated from uncertainty of the waste composition of this waste and transfer coefficients in the incinerator and of the solidification recipe.
  production volume 0 kg
    calculated in proportion to reference product waste input to incinerator
  properties: wet mass 1 kg, dry mass 1 kg
- ammonia, anhydrous, liquid: 0.000205519, 1.76668e-5, 2.74851e-5, 5.44577e-5, 5.33541e-5, 5.59209e-6, 2.49987e-5, 0.000591396 kg (8 entries); lognormal variance with pedigree 0.22425, pedigree (1,1,4,1,1)
  (same comment as for ammonia, anhydrous, liquid)
- process-specific burdens, slag landfill: 0.00533473, 0.0135243 kg (2 entries); lognormal variance with pedigree 0.075744, pedigree (1,1,4,1,1)
  (same comment as for process-specific burdens, slag landfill)
- cement, unspecified: 0.000488794, 0.000101704, 7.44908e-6, 2.12323e-5, 0.000480176, 1.4133e-5, 0.000155222, 1.87801e-5, 0.00209761 kg (9 entries); lognormal variance with pedigree 0.068933, pedigree (1,1,4,1,1)
  (same comment as for cement, unspecified)
- process-specific burdens, residual material landfill: 0.00239388, 0.00606882 kg (2 entries); lognormal variance with pedigree 0.059849, pedigree (1,1,4,1,1)
  (same comment as for process-specific burdens, residual material landfill)
- water, decarbonised: 0.00830308, 0.0216046, 0.0871363, 0.0212782, 0.00428959, 0.014105, 0.000778679, 0.011096, 0.0258472, 0.162132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 kg (12 entries); lognormal variance with pedigree 0.45416, pedigree (1,1,4,1,1)
  (same comment as for water, decarbonised)
- transport, freight, lorry, unspecified: 0.000125072, 1.95817e-5, 0.000948246 metric ton*km (3 entries); lognormal variance with pedigree 0.045883, pedigree (1,1,4,1,1)
  (same comment as for transport, freight, lorry, unspecified)
- heat, district or industrial, natural gas: 0.00204071, 0.0488995, 0.13241 MJ (3 entries); lognormal variance with pedigree 0.22425, pedigree (1,1,4,1,1)
  (same comment as for heat, district or industrial, natural gas)
- waste cement, hydrated: -0.00239388, -0.00606882 kg (2 entries); lognormal variance with pedigree 0.068933, pedigree (1,1,4,1,1)
  (same comment as for waste cement, hydrated)
  production volume 2.8836e7 kg

## Inputs from nature
- Oxygen [natural resource, in air]: 2.6823 kg; lognormal variance with pedigree 0.022658, pedigree (1,1,4,1,1)
  Oxygen from ambient air needed to combust and oxidise this waste. Net demand, i.e. without O2 leaving the plant in flue gas uncombusted.
  Uncertainty: uncertainty is calculated from uncertainties in waste composition and transfer coefficients to flue gas and soild residues in incinerator

## Emissions to nature
- TOC, Total Organic Carbon [water, ground-, long-term]: 0.0020627 kg; lognormal variance with pedigree 0.022643, pedigree (1,1,4,1,1)
  Long-term emissions from landfilling of incineration residues.
  Uncertainty: uncertainty is calculated from uncertainties in waste composition and transfer coefficients in incinerator and landfills.
- Sodium, ion [water, ground-, long-term]: 0.00085449 kg; lognormal variance with pedigree 0.32479, pedigree (1,1,4,1,1)
  (same comment as for TOC, Total Organic Carbon)
- Titanium [air, urban air close to ground]: 6.7179e-7 kg; lognormal variance with pedigree 0.71624, pedigree (1,1,4,1,1)
  Emission to air from waste composition and transfer coefficients.
  Uncertainty: uncertainty is calculated from uncertainties in waste composition and transfer coefficients in incinerator
- Cadmium [air, urban air close to ground]: 1.461e-8 kg; lognormal variance with pedigree 1.1636, pedigree (1,1,4,1,1)
  (same comment as for Titanium)
- Strontium [air, urban air close to ground]: 7.1661e-9 kg; lognormal variance with pedigree 1.046, pedigree (1,1,4,1,1)
  (same comment as for Titanium)
- Thallium [water, surface water]: 1.9842e-10 kg; lognormal variance with pedigree 1.895, pedigree (1,1,4,1,1)
  Emissions to water from waste composition and transfer coefficients in incinerator and landfills.
  Uncertainty: uncertainty is calculated from uncertainties in waste composition and transfer coefficients in incinerator and landfills
- Tin [air, urban air close to ground]: 2.1036e-12 kg; lognormal variance with pedigree 1.4984, pedigree (1,1,4,1,1)
  (same comment as for Titanium)
- Sulfate [water, ground-, long-term]: 0.00089277 kg; lognormal variance with pedigree 0.47448, pedigree (1,1,4,1,1)
  (same comment as for TOC, Total Organic Carbon)
- Cadmium, ion [water, surface water]: 2.7472e-9 kg; lognormal variance with pedigree 0.95637, pedigree (1,1,4,1,1)
  (same comment as for Thallium)
- Sodium, ion [water, surface water]: 0.00032242 kg; lognormal variance with pedigree 0.33223, pedigree (1,1,4,1,1)
  (same comment as for Thallium)
- Aluminium [air, urban air close to ground]: 1.3204e-10 kg; lognormal variance with pedigree 0.97983, pedigree (1,1,4,1,1)
  (same comment as for Titanium)
- Magnesium [air, urban air close to ground]: 8.5408e-8 kg; lognormal variance with pedigree 1.0166, pedigree (1,1,4,1,1)
  (same comment as for Titanium)
- Zinc, ion [water, ground-, long-term]: 8.7819e-5 kg; lognormal variance with pedigree 2.9527, pedigree (1,1,4,1,1)
  (same comment as for TOC, Total Organic Carbon)
- Thallium [air, urban air close to ground]: 3.2389e-10 kg; lognormal variance with pedigree 1.7409, pedigree (1,1,4,1,1)
  (same comment as for Titanium)
- Nickel, ion [water, surface water]: 5.4405e-10 kg; lognormal variance with pedigree 2.1459, pedigree (1,1,4,1,1)
  (same comment as for Thallium)
- Cobalt [water, surface water]: 2.5673e-10 kg; lognormal variance with pedigree 1.8113, pedigree (1,1,4,1,1)
  (same comment as for Thallium)
- Calcium, ion [water, surface water]: 2.4203e-5 kg; lognormal variance with pedigree 0.4345, pedigree (1,1,4,1,1)
  (same comment as for Thallium)
- Cobalt [air, urban air close to ground]: 2.5771e-9 kg; lognormal variance with pedigree 1.5487, pedigree (1,1,4,1,1)
  (same comment as for Titanium)
- Strontium [water, ground-, long-term]: 7.1567e-5 kg; lognormal variance with pedigree 1.0139, pedigree (1,1,4,1,1)
  (same comment as for TOC, Total Organic Carbon)
- Copper, ion [water, surface water]: 4.5261e-9 kg; lognormal variance with pedigree 0.99478, pedigree (1,1,4,1,1)
  (same comment as for Thallium)
- Manganese [water, surface water]: 3.9493e-9 kg; lognormal variance with pedigree 0.98795, pedigree (1,1,4,1,1)
  (same comment as for Thallium)
- Strontium [water, surface water]: 4.512e-8 kg; lognormal variance with pedigree 1.726, pedigree (1,1,4,1,1)
  (same comment as for Thallium)
- Titanium, ion [water, ground-, long-term]: 0.00024206 kg; lognormal variance with pedigree 0.81924, pedigree (1,1,4,1,1)
  (same comment as for TOC, Total Organic Carbon)
- Barium [water, surface water]: 2.7246e-8 kg; lognormal variance with pedigree 1.1784, pedigree (1,1,4,1,1)
  (same comment as for Thallium)
- Sulfate [water, surface water]: 0.00018286 kg; lognormal variance with pedigree 0.38934, pedigree (1,1,4,1,1)
  (same comment as for Thallium)
- Barium [air, urban air close to ground]: 7.9455e-7 kg; lognormal variance with pedigree 0.89161, pedigree (1,1,4,1,1)
  (same comment as for Titanium)
- DOC, Dissolved Organic Carbon [water, ground-, long-term]: 0.0020627 kg; lognormal variance with pedigree 0.022643, pedigree (1,1,4,1,1)
  (same comment as for TOC, Total Organic Carbon)
- Nickel, ion [water, ground-, long-term]: 7.7724e-7 kg; lognormal variance with pedigree 1.5721, pedigree (1,1,4,1,1)
  (same comment as for TOC, Total Organic Carbon)
- Benzene [air, urban air close to ground]: 1.281e-8 kg; lognormal variance with pedigree 0.086769, pedigree (1,1,4,1,1)
  Incomplete combustion product emitted to air.
  Uncertainty: uncertainty calculated from uncertainty in average operation emissions, and the uncertainty of the flue gas volume from this waste.
- Copper, ion [water, ground-, long-term]: 3.12e-5 kg; lognormal variance with pedigree 1.0907, pedigree (1,1,4,1,1)
  (same comment as for TOC, Total Organic Carbon)
- Chloride [water, ground-, long-term]: 0.00028597 kg; lognormal variance with pedigree 0.63503, pedigree (1,1,4,1,1)
  (same comment as for TOC, Total Organic Carbon)
- Bromine [water, ground-, long-term]: 7.8045e-7 kg; lognormal variance with pedigree 1.3037, pedigree (1,1,4,1,1)
  (same comment as for TOC, Total Organic Carbon)
- Iron, ion [water, surface water]: 3.4058e-8 kg; lognormal variance with pedigree 0.89909, pedigree (1,1,4,1,1)
  (same comment as for Thallium)
- Beryllium [water, ground-, long-term]: 3.7002e-7 kg; lognormal variance with pedigree 1.6132, pedigree (1,1,4,1,1)
  (same comment as for TOC, Total Organic Carbon)
- Aluminium [water, surface water]: 1.7526e-8 kg; lognormal variance with pedigree 1.1352, pedigree (1,1,4,1,1)
  (same comment as for Thallium)
- Lead [water, surface water]: 1.8251e-9 kg; lognormal variance with pedigree 1.00176, pedigree (1,1,4,1,1)
  (same comment as for Thallium)
- DOC, Dissolved Organic Carbon [water, surface water]: 0.00035459 kg; lognormal variance with pedigree 0.034989, pedigree (1,1,4,1,1)
  (same comment as for Thallium)
- Arsenic, ion [water, ground-, long-term]: 4.6071e-7 kg; lognormal variance with pedigree 1.5222, pedigree (1,1,4,1,1)
  (same comment as for TOC, Total Organic Carbon)
- Iron, ion [water, ground-, long-term]: 0.00065359 kg; lognormal variance with pedigree 0.80799, pedigree (1,1,4,1,1)
  (same comment as for TOC, Total Organic Carbon)
- Methane, fossil [air, urban air close to ground]: 1.9215e-7 kg; lognormal variance with pedigree 0.086769, pedigree (1,1,4,1,1)
  (same comment as for Benzene)
- Tin, ion [water, ground-, long-term]: 1.2326e-6 kg; lognormal variance with pedigree 2.2663, pedigree (1,1,4,1,1)
  (same comment as for TOC, Total Organic Carbon)
- Fluoride [water, ground-, long-term]: 1.089e-5 kg; lognormal variance with pedigree 0.75378, pedigree (1,1,4,1,1)
  (same comment as for TOC, Total Organic Carbon)
- Manganese [air, urban air close to ground]: 4.8454e-9 kg; lognormal variance with pedigree 1.1856, pedigree (1,1,4,1,1)
  (same comment as for Titanium)
- Bromine [air, urban air close to ground]: 4.0446e-9 kg; lognormal variance with pedigree 1.3245, pedigree (1,1,4,1,1)
  (same comment as for Titanium)
- Beryllium [water, surface water]: 2.5357e-10 kg; lognormal variance with pedigree 2.2076, pedigree (1,1,4,1,1)
  (same comment as for Thallium)
- Lead [air, urban air close to ground]: 1.5719e-9 kg; lognormal variance with pedigree 1.2223, pedigree (1,1,4,1,1)
  (same comment as for Titanium)
- Arsenic, ion [water, surface water]: 1.0657e-6 kg; lognormal variance with pedigree 1.4069, pedigree (1,1,4,1,1)
  (same comment as for Thallium)
- Iron [air, urban air close to ground]: 2.3218e-9 kg; lognormal variance with pedigree 0.6945, pedigree (1,1,4,1,1)
  (same comment as for Titanium)
- Phenol, pentachloro- [air, urban air close to ground]: 5.5787e-12 kg; lognormal variance with pedigree 0.086769, pedigree (1,1,4,1,1)
  (same comment as for Benzene)
- Arsenic [air, urban air close to ground]: 1.2051e-8 kg; lognormal variance with pedigree 1.5344, pedigree (1,1,4,1,1)
  (same comment as for Titanium)
- Cyanide [air, urban air close to ground]: 3.5097e-6 kg; lognormal variance with pedigree 1.4278, pedigree (1,1,4,1,1)
  Nitrogen species emitted to air after DeNOx stage.
  Uncertainty: uncertainty calculated from uncertainty in average N-emissions and uncertainty in the share of thermal NOx and the uncertainty in nitrogen content in *this* waste.
- Bromine [water, surface water]: 7.3127e-6 kg; lognormal variance with pedigree 0.67164, pedigree (1,1,4,1,1)
  (same comment as for Thallium)
- Chromium VI [water, surface water]: 2.9419e-7 kg; lognormal variance with pedigree 1.3406, pedigree (1,1,4,1,1)
  (same comment as for Thallium)
- BOD5, Biological Oxygen Demand [water, surface water]: 0.00080154 kg; lognormal variance with pedigree 0.035561, pedigree (1,1,4,1,1)
  (same comment as for Thallium)
- Chromium [air, urban air close to ground]: 9.1918e-9 kg; lognormal variance with pedigree 1.2881, pedigree (1,1,4,1,1)
  (same comment as for Titanium)
- Vanadium, ion [water, ground-, long-term]: 0.00086815 kg; lognormal variance with pedigree 0.44735, pedigree (1,1,4,1,1)
  (same comment as for TOC, Total Organic Carbon)
- Carbon monoxide, fossil [air, urban air close to ground]: 2.1776e-5 kg; lognormal variance with pedigree 0.78706, pedigree (1,1,4,1,1)
  (same comment as for Benzene)
- Calcium [air, urban air close to ground]: 1.7206e-5 kg; lognormal variance with pedigree 0.57263, pedigree (1,1,4,1,1)
  (same comment as for Titanium)
- Vanadium [air, urban air close to ground]: 3.9499e-5 kg; lognormal variance with pedigree 0.59394, pedigree (1,1,4,1,1)
  (same comment as for Titanium)
- Antimony [water, ground-, long-term]: 5.4067e-6 kg; lognormal variance with pedigree 1.2596, pedigree (1,1,4,1,1)
  (same comment as for TOC, Total Organic Carbon)
- Aluminium [water, ground-, long-term]: 0.00011711 kg; lognormal variance with pedigree 0.82748, pedigree (1,1,4,1,1)
  (same comment as for TOC, Total Organic Carbon)
- TOC, Total Organic Carbon [water, surface water]: 0.00035459 kg; lognormal variance with pedigree 0.034989, pedigree (1,1,4,1,1)
  (same comment as for Thallium)
- Water [water, surface water]: 0.0004754 m3; lognormal variance with pedigree 1.89, pedigree (1,1,4,1,1)
  Process water released to surface water.
  Uncertainty: uncertainty calculated from uncertainty in process water input and the uncertainty of fraction to surface water.
- Titanium, ion [water, surface water]: 3.019e-7 kg; lognormal variance with pedigree 0.53574, pedigree (1,1,4,1,1)
  (same comment as for Thallium)
- Dioxins, measured as 2,3,7,8-tetrachlorodibenzo-p-dioxin [air, urban air close to ground]: 2.5619e-14 kg; lognormal variance with pedigree 0.40142, pedigree (1,1,4,1,1)
  (same comment as for Benzene)
- Chromium VI [water, ground-, long-term]: 9.6562e-7 kg; lognormal variance with pedigree 1.728, pedigree (1,1,4,1,1)
  (same comment as for TOC, Total Organic Carbon)
- Dinitrogen monoxide [air, urban air close to ground]: 1.6336e-5 kg; lognormal variance with pedigree 1.4278, pedigree (1,1,4,1,1)
  (same comment as for Cyanide)
- Antimony [air, urban air close to ground]: 6.8107e-12 kg; lognormal variance with pedigree 1.3682, pedigree (1,1,4,1,1)
  (same comment as for Titanium)
- Tin, ion [water, surface water]: 8.52e-11 kg; lognormal variance with pedigree 2.045, pedigree (1,1,4,1,1)
  (same comment as for Thallium)
- Sulfur dioxide [air, urban air close to ground]: 3.8333e-6 kg; lognormal variance with pedigree 0.81163, pedigree (1,1,4,1,1)
  (same comment as for Titanium)
- Chromium, ion [water, surface water]: 8.1735e-10 kg; lognormal variance with pedigree 1.3049, pedigree (1,1,4,1,1)
  (same comment as for Thallium)
- Ammonia [air, urban air close to ground]: 1.1528e-6 kg; lognormal variance with pedigree 0.26533, pedigree (1,1,4,1,1)
  (same comment as for Cyanide)
- COD, Chemical Oxygen Demand [water, ground-, long-term]: 0.0052126 kg; lognormal variance with pedigree 0.022643, pedigree (1,1,4,1,1)
  (same comment as for TOC, Total Organic Carbon)
- Magnesium [water, surface water]: 3.7781e-7 kg; lognormal variance with pedigree 1.114, pedigree (1,1,4,1,1)
  (same comment as for Thallium)
- NMVOC, non-methane volatile organic compounds, unspecified origin [air, urban air close to ground]: 5.8299e-7 kg; lognormal variance with pedigree 0.086769, pedigree (1,1,4,1,1)
  (same comment as for Benzene)
- Cadmium, ion [water, ground-, long-term]: 2.0916e-6 kg; lognormal variance with pedigree 6.5916, pedigree (1,1,4,1,1)
  (same comment as for TOC, Total Organic Carbon)
- Cobalt [water, ground-, long-term]: 1.1543e-6 kg; lognormal variance with pedigree 1.4466, pedigree (1,1,4,1,1)
  (same comment as for TOC, Total Organic Carbon)
- Fluoride [water, surface water]: 9.2871e-7 kg; lognormal variance with pedigree 0.81112, pedigree (1,1,4,1,1)
  (same comment as for Thallium)
- Mercury [air, urban air close to ground]: 1.1479e-9 kg; lognormal variance with pedigree 1.9367, pedigree (1,1,4,1,1)
  (same comment as for Titanium)
- Water [air, urban air close to ground]: 0.0018976 m3; lognormal variance with pedigree 1.3196, pedigree (1,1,4,1,1)
  Water vapour from waste humidity, hydrogen oxidation and part of the process water.
  Uncertainty: Uncertainty calculated from uncertainty in waste composition, process water input and the uncertainty of fraction to air.
- Sodium [air, urban air close to ground]: 9.7426e-6 kg; lognormal variance with pedigree 0.65121, pedigree (1,1,4,1,1)
  (same comment as for Titanium)
- Nitrate [water, ground-, long-term]: 3.9395e-5 kg; lognormal variance with pedigree 0.65927, pedigree (1,1,4,1,1)
  (same comment as for TOC, Total Organic Carbon)
- Zinc, ion [water, surface water]: 2.6055e-8 kg; lognormal variance with pedigree 0.69603, pedigree (1,1,4,1,1)
  (same comment as for Thallium)
- Antimony [water, surface water]: 2.9304e-6 kg; lognormal variance with pedigree 1.2955, pedigree (1,1,4,1,1)
  (same comment as for Thallium)
- Thallium [water, ground-, long-term]: 1.89e-7 kg; lognormal variance with pedigree 1.2952, pedigree (1,1,4,1,1)
  (same comment as for TOC, Total Organic Carbon)
- Hydrogen fluoride [air, urban air close to ground]: 8.1944e-8 kg; lognormal variance with pedigree 1.2613, pedigree (1,1,4,1,1)
  (same comment as for Titanium)
- COD, Chemical Oxygen Demand [water, surface water]: 0.00081198 kg; lognormal variance with pedigree 0.034914, pedigree (1,1,4,1,1)
  (same comment as for Thallium)
- Lead [water, ground-, long-term]: 9.2248e-6 kg; lognormal variance with pedigree 4.329, pedigree (1,1,4,1,1)
  (same comment as for TOC, Total Organic Carbon)
- Particulates, > 2.5 um, and < 10um [air, urban air close to ground]: 7.6857e-9 kg; lognormal variance with pedigree 0.1882, pedigree (1,1,4,1,1)
  (same comment as for Benzene)
- Particulates, < 2.5 um [air, urban air close to ground]: 1.5294e-6 kg; lognormal variance with pedigree 0.40142, pedigree (1,1,4,1,1)
  (same comment as for Benzene)
- Selenium [water, surface water]: 5.7443e-7 kg; lognormal variance with pedigree 1.2025, pedigree (1,1,4,1,1)
  (same comment as for Thallium)
- Nitrogen oxides [air, urban air close to ground]: 0.00036505 kg; lognormal variance with pedigree 0.26533, pedigree (1,1,4,1,1)
  Sum of fuel-Nox and thermal-NOx emitted to air after DeNOx stage.
  Uncertainty: uncertainty calculated from uncertainty in average N-emissions and uncertainty in the share of thermal NOx and the uncertainty in nitrogen content in *this* waste.
- Selenium [water, ground-, long-term]: 1.1044e-6 kg; lognormal variance with pedigree 1.1084, pedigree (1,1,4,1,1)
  (same comment as for TOC, Total Organic Carbon)
- Magnesium [water, ground-, long-term]: 7.1708e-5 kg; lognormal variance with pedigree 0.96849, pedigree (1,1,4,1,1)
  (same comment as for TOC, Total Organic Carbon)
- Heat, waste [air, urban air close to ground]: 26.255 MJ; lognormal variance with pedigree 0.030036, pedigree (1,1,4,1,1)
  Waste heat generated from heating value of this waste plus any electricity required to process it.
  Uncertainty: uncertainty is calculated from uncertainties in waste composition and uncertainties in energy efficiency and the uncertainty in internal energy demand
- Benzene, pentachloro- [air, urban air close to ground]: 6.7681e-11 kg; lognormal variance with pedigree 0.086769, pedigree (1,1,4,1,1)
  (same comment as for Benzene)
- Carbon dioxide, fossil [air, urban air close to ground]: 2.5298 kg; lognormal variance with pedigree 0.0120931, pedigree (1,1,4,1,1)
  (same comment as for Titanium)
- Copper [air, urban air close to ground]: 3.1992e-9 kg; lognormal variance with pedigree 1.1416, pedigree (1,1,4,1,1)
  (same comment as for Titanium)
- Selenium [air, urban air close to ground]: 2.0286e-8 kg; lognormal variance with pedigree 1.52, pedigree (1,1,4,1,1)
  (same comment as for Titanium)
- Nitrate [water, surface water]: 1.3963e-5 kg; lognormal variance with pedigree 0.4585, pedigree (1,1,4,1,1)
  (same comment as for Thallium)
- Barium [water, ground-, long-term]: 0.00010195 kg; lognormal variance with pedigree 2.2436, pedigree (1,1,4,1,1)
  (same comment as for TOC, Total Organic Carbon)
- Calcium, ion [water, ground-, long-term]: 0.0016285 kg; lognormal variance with pedigree 0.52585, pedigree (1,1,4,1,1)
  (same comment as for TOC, Total Organic Carbon)
- Mercury [water, surface water]: 4.3969e-11 kg; lognormal variance with pedigree 1.4077, pedigree (1,1,4,1,1)
  (same comment as for Thallium)
- Hydrogen chloride [air, urban air close to ground]: 7.0424e-7 kg; lognormal variance with pedigree 0.66153, pedigree (1,1,4,1,1)
  (same comment as for Titanium)
- Mercury [water, ground-, long-term]: 2.5786e-9 kg; lognormal variance with pedigree 3.4337, pedigree (1,1,4,1,1)
  (same comment as for TOC, Total Organic Carbon)
- Nickel [air, urban air close to ground]: 1.0172e-9 kg; lognormal variance with pedigree 1.6203, pedigree (1,1,4,1,1)
  (same comment as for Titanium)
- Benzene, hexachloro- [air, urban air close to ground]: 2.6786e-11 kg; lognormal variance with pedigree 0.086769, pedigree (1,1,4,1,1)
  (same comment as for Benzene)
- Chloride [water, surface water]: 0.00094743 kg; lognormal variance with pedigree 0.52204, pedigree (1,1,4,1,1)
  (same comment as for Thallium)
- Toluene [air, urban air close to ground]: 2.5621e-8 kg; lognormal variance with pedigree 0.086769, pedigree (1,1,4,1,1)
  (same comment as for Benzene)
- Zinc [air, urban air close to ground]: 1.9356e-7 kg; lognormal variance with pedigree 0.85492, pedigree (1,1,4,1,1)
  (same comment as for Titanium)
- Benzo(a)pyrene [air, urban air close to ground]: 2.8507e-13 kg; lognormal variance with pedigree 0.40142, pedigree (1,1,4,1,1)
  (same comment as for Benzene)
- BOD5, Biological Oxygen Demand [water, ground-, long-term]: 0.001705 kg; lognormal variance with pedigree 0.022643, pedigree (1,1,4,1,1)
  (same comment as for TOC, Total Organic Carbon)
- Heat, waste [water, surface water]: 6.6896 MJ; lognormal variance with pedigree 0.030036, pedigree (1,1,4,1,1)
  (same comment as for Heat, waste)
- Vanadium, ion [water, surface water]: 2.9734e-6 kg; lognormal variance with pedigree 0.78416, pedigree (1,1,4,1,1)
  (same comment as for Thallium)
- Manganese [water, ground-, long-term]: 1.5652e-5 kg; lognormal variance with pedigree 2.1239, pedigree (1,1,4,1,1)
  (same comment as for TOC, Total Organic Carbon)
