# o-chlorotoluene production

Dataset: EcoSpold 2, unit process
Geography: RoW
Time period: 2010-01-01 to 2021-12-31
Technology level: current
Classification: ISIC rev.4 ecoinvent: 2011:Manufacture of basic chemicals
Synonyms: C7H7Cl
Scenario: Business-as-Usual
System model: Allocation, cut-off by classification
Share of production covered: 100 %
Generated by: Jürgen Sutter
Database: ecoinvent
isCopyrightProtected: true
accessRestrictedTo: 1

## General comment
The process “o-chlorotoluene, at plant, GLO" is modelled for the production of o-chlorotoluene from toluene. Raw materials are modelled with a stoechiometric calculation. Emissions are estimated. Energy consumptions, infrastructure and transports are calculated with standard values.
o-Chlorotoluene (C7H7Cl; CAS 95-49-8, 2-chlorotoluene) is a colourless, mobile, flammable liquids with a faint odour, similar to that of benzene; they form binary azeotropes with many organic compounds. Monochlorotoluenes are produced on a large scale by reacting liquid toluene with gaseous chlorine at a moderate temperature and normal pressure in the presence of catalysts. Mixtures of isomers reflecting various chlorination stages are obtained. The chlorination conditions should be such as to give the highest possible yield of monochlorotoluene, because the dichlorotoluenes cannot be separated economically. The relative proportions of the various chlorotoluenes obtained can be varied within wide limits by altering the reaction conditions and catalyst. With most catalyst systems, a high reaction temperature favors ortho and meta substitution as well as further chlorination. Reducing the temperature favors substitution in the para position and increases the total yield of monochlorotoluene. Because of the directing influence of the methyl group, the 3-chlorotoluene fraction of crude monochlorotoluene is limited to between 0.2 and 2 % depending on the catalyst.
The reaction is usually conducted at a temperature between 20 and 70 °C. Chlorination at temperatures below 20 °C is uneconomical because the rate of reaction is too low.
2-Chlorotoluene is a starting material in the production of 2-chlorobenzyl chloride, 2-chlorobenzaldehyde, 2-chlorobenzotrichloride, 2-chlorobenzoyl chloride and 2-chlorobenzoic acid, which are precursors for dyes, pharmaceuticals, optical brighteners, fungicides, and products of other types. 2-Chlorotoluene is also used in the production of dichlorotoluenes (chlorination), 3-chlorotoluene (isomerization), and o-chlorobenzonitrile (ammonoxidation).
Frischknecht R., Jungbluth N., Althaus H.-J., Doka G., Dones R., Heck T., Hellweg S., Hischier R., Nemecek T., Rebitzer G. and Spielmann M. (2007) Overview and Methodology. Final report ecoinvent v2.0 No. 1. Swiss Centre for Life Cycle Inventories, Dübendorf, CH, retrieved from: www.ecoinvent.org.

Gendorf (2000) Umwelterklärung 2000, Werk Gendorf. Werk Gendorf, Burgkirchen as pdf-File under: http://www.gendorf.de/pdf/umwelterklaerung2000.pdf

Manfred Rossberg, Wilhelm Lendle, Gerhard Pfleiderer, Adolf Tögel, Eberhard-Ludwig Dreher, Ernst Langer, Heinz Rassaerts, Peter Kleinschmidt, Heinz Strack, Richard Cook, Uwe Beck, Karl-August Lipper, Theodore R. Torkelson, Eckhard Löser, Klaus K. Beutel, Trevor Mann: Chlorinated Hydrocarbons. Published online: 2000. In: Ullmann's Encyclopedia of Industrial Chemistry, Seventh Edition, 2004 Electronic Release (ed. Fiedler E., Grossmann G., Kersebohm D., Weiss G. and Witte C.). 7 th Electronic Release Edition. Wiley InterScience, New York, Online-Version under: DOI: 10.1002/14356007.a06_233.pub2

## Included activities end
production of o-chlorotoluene including materials, energy uses, infrastructure, and emissions

## Geography
The inventory is modelled for the world.

## Technology
chlorination of toluene

## Time period
Time of publications

## Parameters
- fraction, cooling water, recirculating system, to air: 0.771 dimensionless; name fraction_CW_R_to_air; lognormal variance with pedigree 0.0413, pedigree (2,3,1,3,1)
  Calculated based on literature value (Scown, C.D., 2011, Water Footprint of U.S. Transportation Fuels and supplying information of the article) (Vionnet, S., Quantis Water Database - Technical Report, 2012).
- fraction, cooling water, to air: 0.3875 dimensionless; name fraction_CW_to_air; = (0.5*fraction_CW_OT_to_air)+(0.5*fraction_CW_R_to_air); lognormal variance with pedigree 0.092025, pedigree (4,4,3,2,4)
  Calculated value based on literature value (see comments of the other parametres present in this dataset) and expert opinion. In the case when no industry/literature data are available about the type of cooling or directly fraction, cooling water, to air specific for the process a default assumption is applied. It is assumed that the once-through cooling system is used in 50% of all cases and recirculating system is used in another 50% of all cases.
- fraction, cooling water, once-through system, to air: 0.004 dimensionless; name fraction_CW_OT_to_air; lognormal variance with pedigree 0.0413, pedigree (2,3,1,3,1)
  (same comment as for fraction, cooling water, recirculating system, to air)
- fraction, cooling water, cooling pond system, to air: 0.032 dimensionless; name fraction_CW_CP_to_air; lognormal variance with pedigree 0.0413, pedigree (2,3,1,3,1)
  (same comment as for fraction, cooling water, recirculating system, to air)

## Reference product
- o-chlorotoluene: 1 kg; CPC 341: Basic organic chemicals; By-product classification allocatable product; CAS 95-49-8
  EcoSpold01Location=RER
  production volume 6.7e6 kg
    Expert judgement
  property price 0.792429 EUR2005
    Calculated based on inputs: The price of the product has been calculated as a sum of the values of the material and energy inputs for this product. This value is therefore a rough estimation. It may underestimate the real price since there are additional expenses when producing any product. These expences can include for example labour costs, treatment of waste materials and profit for the producer. Please consider carefully whether this level of data quality is acceptable for your application.
  property heating value, net 26.83 MJ
    LHV is calculated based on the elemental composition of the substance. Based on the name of the substance, the chemical formula of the substance is manually found to be: C7H7Cl.
  property carbon content, fossil 0.664193
    Calculated based on molecular structure. See tab "chemicals".
  property carbon content 0.664193
    carbon content on a dry matter basis (reserved; not for manual entry)
  properties: carbon content, non-fossil 0, water in wet mass 0 kg, wet mass 1 kg, water content 0, dry mass 1 kg, carbon allocation 0.664193 kg

## Inputs from technosphere
- toluene, liquid: 0.73753 kg; lognormal variance with pedigree 0.0335, pedigree (4,5,4,1,1)
  As there was no data available for the production of o-chlorotoluene, the values for the consumption of the raw materials are calculated with an assumed yield of 95 % (Frischknecht et al. 2007).
  EcoSpold01Location=RER
  Uncertainty: Stoechiometric calculation
  properties: heating value, net 38.17 MJ, carbon content, fossil 0.913043, dry mass 1 kg, wet mass 1 kg
- chemical factory, organics: 4e-10 unit; lognormal variance with pedigree 0.3184, pedigree (4,5,5,5,5)
  EcoSpold01Location=RER
  No information was readily available about infrastructure and land-use of production plants. Therefore, in this study, the infrastructure is estimated based on the module "chemical plant, organics". This module assumes a built area of about 4.2 ha, an average output of 50'000 t/a, and plant life of fifty years. For this study, the estimated value is 4.00 E-10 units per kg of produced chemical.
  Uncertainty: Estimation
- heat, from steam, in chemical industry: 2 MJ; lognormal variance with pedigree 0.1786, pedigree (4,5,5,5,5)
  EcoSpold01Location=RER
  There was no information available on the amount of energy used for the o-chlorotoluene production process. In order not to neglect the process energy demand those values were approximated with data from an large chemical plant site in Germany producing 2.05 Mt a-1 (intermediates included) of different chemicals (Gendorf (2000)). The values for the energy consumption per kg of product of this plant (3.2 MJ kg-1) were used as approximation for the energy consumption of the o-chlorotoluene production. This total energy demand contains a split of 50% natural gas, 38% electricity and 12% steam from external energy sources. For this inventory all energy used for heat or steam was assumed to be natural gas. For this inventory an amount of 2 MJ natural gas and 0.333 kW electricity per kg product was used.
  Uncertainty: Estimation
  properties: heating value, net 1 MJ
- electricity, medium voltage: 0 kWh; pedigree (1,1,1,1,1)
  There was no information available on the amount of energy used for the o-chlorotoluene production process. In order not to neglect the process energy demand those values were approximated with data from an large chemical plant site in Germany producing 2.05 Mt a-1 (intermediates included) of different chemicals (Gendorf (2000)). The values for the energy consumption per kg of product of this plant (3.2 MJ kg-1) were used as approximation for the energy consumption of the o-chlorotoluene production. This total energy demand contains a split of 50% natural gas, 38% electricity and 12% steam from external energy sources. For this inventory all energy used for heat or steam was assumed to be natural gas. For this inventory an amount of 2 MJ natural gas and 0.333 kW electricity per kg product was used.
  EcoSpold01Location=UCTE
  Uncertainty: Estimation
- sodium hydroxide, without water, in 50% solution state: 0.31746 kg; lognormal variance with pedigree 0.0335, pedigree (4,5,4,1,1)
  EcoSpold01Location=RER
  The produced hydrogen chloride is considered to be neutralized with sodium hydroxide.
  Uncertainty: Stoechiometric calculation
  properties: heating value, net 3.03 MJ, dry mass 1 kg, wet mass 1 kg
- chlorine, liquid: 0.56117 kg; lognormal variance with pedigree 0.0335, pedigree (4,5,4,1,1)
  EcoSpold01Location=RER
  As there was no data available for the production of o-chlorotoluene, the values for the consumption of the raw materials are calculated with an assumed yield of 95 % (Frischknecht et al. 2007).
  Uncertainty: Stoechiometric calculation
- electricity, medium voltage: 0.00419753, 0.000804905, 0.0135127, 0.19653, 0.027701, 0.090254 kWh (6 entries); lognormal variance with pedigree 0.1786, pedigree (4,5,5,5,5)
  (same comment as for electricity, medium voltage)

## Inputs from nature
- Water, cooling, unspecified natural origin [natural resource, in water]: 0.024 m3; name water_cooling_UNO_input; lognormal variance with pedigree 0.0335, pedigree (4,5,4,1,1)
  There was no information available on the amount of cooling water used within the plant. In order not to neglect the process cooling water demand this value was approximated with data from an large chemical plant site in Germany producing 2.05 Mt a-1 (intermediates included) of different chemicals (Gendorf 2000). In this plant in total an average 24 kg water per kg of product were used for. This value was used in this inventory as approximation for the cooling water consumption.
  There was no information available on the amount of cooling water used within the plant. In order not to neglect the process cooling water demand this value was approximated with data from an large chemical plant site in Germany producing 2.05 Mt a-1 (intermediates included) of different chemicals (Gendorf 2000). In this plant in total an average 24 kg water per kg of product were used for. This value was used in this inventory as approximation for the cooling water consumption.
  Uncertainty: Estimation

## Emissions to nature
- Carbon dioxide, fossil [air, urban air close to ground]: 0.017778 kg; lognormal variance with pedigree 0.1786, pedigree (4,5,5,5,5)
  The carbon contained in the removed toluene is accounted as CO2 emissions to air.
  Uncertainty: Estimation
- Chlorine [air, urban air close to ground]: 0.0011223 kg; lognormal variance with pedigree 0.1786, pedigree (4,5,5,5,5)
  There was no data available on process emissions to air for the production of o-chlorotoluene. As approximation the air emissions occurring from the purge vent, the distillation vent and fugitive emission sources were estimated to 0.2% of the raw material input.
  Uncertainty: Estimation
- DOC, Dissolved Organic Carbon [water, surface water]: 0.00053839 kg; lognormal variance with pedigree 0.218, pedigree (4,5,5,5,5)
  The values for COD, BOD, TOC, and DOC used in this inventory are calculated from the amount of organic substances in the treated waste water assuming a carbon conversion of 96% for COD. For the calculation of the values for BOD and DOC the worst case scenario BOD = COD and TOC = DOC is used.
  Uncertainty: Estimation
- Toluene [water, surface water]: 0.00059003 kg; lognormal variance with pedigree 0.3184, pedigree (4,5,5,5,5)
  The remaining amount of unreacted toluene and chlorine (4.8 % of the input) is assumed to leave the production process with the wastewater. Further it is assumed that this wastewater is treated in a internal wastewater plant. The removal efficiency for toluene is assumed with 90%.
  Uncertainty: Estimation
- Sodium, ion [water, surface water]: 0.18254 kg; lognormal variance with pedigree 0.6642, pedigree (4,5,5,5,5)
  Estimation from neutralization steps.
  Uncertainty: Estimation
- BOD5, Biological Oxygen Demand [water, surface water]: 0.0017703 kg; lognormal variance with pedigree 0.218, pedigree (4,5,5,5,5)
  (same comment as for DOC, Dissolved Organic Carbon)
- Chloride [water, surface water]: 0.28227 kg; lognormal variance with pedigree 0.3184, pedigree (4,5,5,5,5)
  The remaining chlorine is calculated as chloride emission. Other chloride emissions are calculated from neutralization steps.
  Uncertainty: Estimation
- TOC, Total Organic Carbon [water, surface water]: 0.00053839 kg; lognormal variance with pedigree 0.218, pedigree (4,5,5,5,5)
  (same comment as for DOC, Dissolved Organic Carbon)
- COD, Chemical Oxygen Demand [water, surface water]: 0.0017703 kg; lognormal variance with pedigree 0.218, pedigree (4,5,5,5,5)
  (same comment as for DOC, Dissolved Organic Carbon)
- Water [water, unspecified]: 0.0147 m3; name water_to_water_unspecified; = water_cooling_UNO_input*(1-fraction_CW_to_air); lognormal variance with pedigree 0.130025, pedigree (4,4,5,2,4)
  Calculated value based on literature values and expert opinion. See comments in the parametres' comment field.
  property fraction, origin: salt water 0; name fraction_origin_salt_water_Ww
  property fraction, origin: unspecified 1; name fraction_origin_unspecified_Ww
  property fraction, origin: fresh water 0; name fraction_origin_fresh_water_Ww
- Toluene [air, urban air close to ground]: 0.0014751 kg; lognormal variance with pedigree 0.1786, pedigree (4,5,5,5,5)
  (same comment as for Chlorine)
- Water [air, unspecified]: 0.0093 m3; name water_to_air_unspecified; = water_cooling_UNO_input*fraction_CW_to_air; lognormal variance with pedigree 0.130025, pedigree (4,4,5,2,4)
  (same comment as for Water)
  property fraction, origin: fresh water 0; name fraction_origin_fresh_water
  property fraction, origin: unspecified 1; name fraction_origin_unspecified
  property fraction, origin: salt water 0; name fraction_origin_salt_water

## Sampling procedure
Literature data

## Extrapolations
Emissions are modelled with standard methods.
