# tap water production, ultrafiltration treatment

Dataset: EcoSpold 2, unit process
Geography: CA-QC
Time period: 2012-01-01 to 2021-12-31
Technology level: modern
Classification: EcoSpold01Categories: water supply/production
Classification: ISIC rev.4 ecoinvent: 3600:Water collection, treatment and supply
Synonyms: potable water
Tags: single enterprise data
Scenario: Business-as-Usual
System model: Allocation, cut-off by classification
Share of production covered: 29 %
Generated by: Marylène Dussault
Database: ecoinvent
isCopyrightProtected: true
accessRestrictedTo: 1

## General comment
This dataset represents production of 1 kg of tap water under pressure at facility gate, ready for distribution in network. It represents average operation of ultrafiltration treatment for production of tap water. Ultrafiltration treatment includes intake pumping, ultrafiltration through polyvinylidenfluoride hollow fibers membrane and disinfection. Inventory was constructed from reported chemicals, energy inputs and wastes from a single plant located in Québec covering representing 29% of total production of tap water from this technology. Facility has 5 trains each containing 64 modules. Module useful life was assumed to be 10 years based on personal communication with expert from the facility, which is justify mainly from the high quality of intake water.

## Included activities start
From the intake pumping of raw surface water into the water treatment plant.

## Included activities end
This dataset ends with the production of tap water, at facility gate, under pressure. It includes energy for intake pumping, treatment system, lighting and heating of the building as well as the energy of the pump pressurizing water to the beginning of the network. It includes all chemicals and materials added to the water during treatment and replacement of ultrafiltration modules and pressure vessels. It excludes energy for pumping stations and water losses within the network which is included in the tap water market. Emissions to the environment occurring during the treatment and during the distribution were not considered as they are assumed negligible. Main substance in water that would be released in the environment are assumed to be considered in wastewater processes.

## Time period
Time of publication.

## Parameters
- unit conversion, days in a year: 365.25 d/year; name days_per_year; lognormal variance with pedigree 0.0006, pedigree (1,1,1,1,1)
  Conversion factor.

## Reference product
- tap water: 1 kg; name tapwater; CPC 18000: Natural water; By-product classification allocatable product; CAS 7732-18-5
  production volume 3.74e10 kg; name PV_tapwater
    Calculated value. Estimated value based on sum of average flow rate of municipal microfiltration treatment plant across region with a coverage of nearly 100%.
  property price 0.000397 EUR2005; name tapwater_price_EUR2005
    Converted from EU price by using Purchasing Power Parities (0.8458 in 2003 and 0.8426 in 2004)
  property carbon content 0.0017899
    carbon content on a dry matter basis (reserved; not for manual entry)
  properties: wet mass 1 kg, carbon content, fossil 0.0017899, water content 2940.18, dry mass 0.00034 kg, water in wet mass 0.99966 kg, carbon content, non-fossil 0, carbon allocation 6.08566e-7 kg

## Inputs from technosphere
- epoxy resin, liquid: 4.07003e-6 kg; name epoxy; lognormal variance with pedigree 0.0126, pedigree (3,4,4,1,1)
  Calculated value. Based on pressure vessel material inputs developed for the seawater reverse osmosis datasets, number of module in operation at ultrafiltration plant and assumed lifetime of 15 years.
  properties: heating value, net 12.82 MJ, wet mass 1 kg, carbon content, fossil 0.42325, dry mass 1 kg
- ultrafiltration module: 7.96466e-9 unit; lognormal variance with pedigree 0.0126, pedigree (3,4,4,1,1)
  Calculated value. Based on reported amount of module used in treatment facility and the expected lifetime of membrane (estimated ot 5 years).
- diesel, burned in building machine: 2.6708e-5 MJ; = diesel_use*density_diesel*NHV*43.2; lognormal variance with pedigree 0.008, pedigree (1,1,4,1,1)
  Calculated value.
  Uncertainty: Calculated variable. Uncertainty will be determined from propagation of uncertainty factors of underlying variables.
  property density 0.84 kg/l; name density_diesel
  property heating value, net 1 MJ; name NHV
  property fuel input in physical units, L 7.36e-7 l; name diesel_use
  note on heating value, net: Literature. net (lower) heating (calorific) value for diesel in MJ/kg
  note on fuel input in physical units, L: Calculated value. Diesel volume consumed in a year based on average diesel consumption of other surface water production facility. Diesel exclusively used for routine runs of emergency generators and during emergency.
- glass fibre: 5.21384e-5 kg; name fglass; lognormal variance with pedigree 0.0126, pedigree (3,4,4,1,1)
  (same comment as for epoxy resin, liquid)
  properties: wet mass 1 kg, dry mass 1 kg
- oxygen, liquid: 3.43e-5 kg; lognormal variance with pedigree 0.0106, pedigree (1,4,4,1,1)
  Measured value. Represents use of oxygen, delivered in liquid state, for ozone production in surveyed treatment plant.
  properties: wet mass 1 kg, dry mass 1 kg
- tap water: 2.95e-5 kg; lognormal variance with pedigree 0.0112, pedigree (2,4,4,1,1)
  Calculated value. Represents water content in hypochlorite solution. Chemical flows are based on active substance only and water contained in solution must be added seperatly. Hypochlorite solution reported to be supply as a 12% concentrated solution.
- electricity, medium voltage: 0.000365 kWh; lognormal variance with pedigree 0.0112, pedigree (2,4,4,1,1)
  EcoSpold01Location=UCTE
  Measured value. Represents electricity consumption for the entire treatment process including pumping for water intake and pumping for distribution at the plant gate.
- sodium hypochlorite, without water, in 15% solution state: 4.02e-6 kg; lognormal variance with pedigree 0.0112, pedigree (2,4,4,1,1)
  Measured value. Represents use of sodium hypochlorite, delivered in 12% solution state, for chlorine desinfection in surveyed treatment plant.
  properties: wet mass 1 kg, dry mass 1 kg
- wastewater, unpolluted: -3.3e-6 m3; name ww; lognormal variance with pedigree 0.0112, pedigree (2,4,4,1,1)
  EcoSpold01Location=CH
  Measured value. Average amount of wastewater produced during treatment.
  production volume 123420 m3; = PV_tapwater*(ww/tapwater)
    Calculated from the production volume of tap water, at user in proportion to the respective output amounts.
  property price 0 EUR2005; name ww_price_EUR2005
  properties: carbon content, fossil 0.00178991, water content 2962.17, carbon content, non-fossil 0.00178991, dry mass 0.337476 kg, wet mass 1000 kg
  note on carbon content, fossil: Assumed to be like in tap water. Bicarbonate content is 2.93 mol/m3. CO2 content is 0.1 mol/m3 (ecoinvent v2.2 report 8, Tab 93.1).
- water works, capacity 1.1E10l/year: 1.52103e-12 unit; = 1/(Q_av* days_per_year*lifetime*UnitConversion(1, 'm3', 'l')); lognormal variance with pedigree 0.008, pedigree (1,1,4,1,1)
  Calculated value. Amount of water works construction attributed to the production of 1kg of tap water. Value is based on assumed lifetime production of water treatment plant and an assumed typical medium-sized plant of 30,000 m3/day.
  Uncertainty: Calculated variable. Uncertainty will be determined from propagation of uncertainty factors of underlying variables.
  property lifetime 60 year; name lifetime
  property plant average daily flow rate 30000 m3/d; name Q_av
  note on lifetime: Estimated Value. Expected lifetime of water works as defined in the construction process.
  note on plant average daily flow rate: Fixed values, Flow rate of a conventional water purification plant for a medium-size facility as defined in the water works process.

## Inputs from nature
- Water, lake [natural resource, in water]: 0.0010033 m3; name waterIn; lognormal variance with pedigree 0.0112, pedigree (2,4,4,1,1)
  Calculated value. Surface water withdrawal represents average withdrawal from surveyed plants based on water production and wastewater production.

## Sampling procedure
Based on data collected from selected plants chosen either for their technological specificities or their production representativeness. A survey campaign was conducted in summer 2013 with 2012 as a reference year. All technologies combined, 16 distinct tap water production plants participated.

## Extrapolations
This dataset has been extrapolated from year 2012 to the year of the calculation (2021). The uncertainty has been adjusted accordingly.
