# natural gas, burned in gas motor, for storage

Dataset: EcoSpold 2, unit process
Geography: RoW
Time period: 1990-01-01 to 2021-12-31
Technology level: current
Classification: EcoSpold01Categories: natural gas/power plants
Classification: ISIC rev.4 ecoinvent: 3510:Electric power generation, transmission and distribution
Tags: ConvertedDataset
Scenario: Business-as-Usual
System model: Allocation, cut-off by classification
Generated by: Thomas Heck
Published in: Faist Emmenegger, M. 2007
Database: ecoinvent
isCopyrightProtected: true
accessRestrictedTo: 1

## General comment
[This dataset was already contained in the ecoinvent database version 2. It was not individually updated during the transfer to ecoinvent version 3. Life Cycle Impact Assessment results may still have changed, as they are affected by changes in the supply chain, i.e. in other datasets. This dataset was generated following the ecoinvent quality guidelines for version 2. It may have been subject to central changes described in the ecoinvent version 3 change report (http://www.ecoinvent.org/database/ecoinvent-version-3/reports-of-changes/), and the results of the central updates were reviewed extensively. The changes added e.g. consistent water flows and other information throughout the database. The documentation of this dataset can be found in the ecoinvent reports of version 2, which are still available via the ecoinvent website. The change report linked above covers all central changes that were made during the conversion process.]

## Included activities end
The module includes fuel input, infrastructure, and emissions to air.

## Technology
For infrastructure, a 206kW gas motor from a combined heat pand power (CHP) station was used.

## Time period
Data of mid 1990s

## Reference product
- natural gas, burned in gas motor, for storage: 1 MJ; By-product classification allocatable product; CPC 17100: Electrical energy
  EcoSpold01Location=GLO
  production volume 3.59966 MJ
    Dummy value to be replaced by measured, estimated or calculated value
  property price 0.00459897 EUR2005
    Calculated based on inputs: The price of the product has been calculated as a sum of the values of the material and energy inputs for this product. This value is therefore a rough estimation. It may underestimate the real price since there are additional expenses when producing any product. These expences can include for example labour costs, treatment of waste materials and profit for the producer. Please consider carefully whether this level of data quality is acceptable for your application.
  properties: heating value, net 1 MJ

## Inputs from technosphere
- gas motor, 206kW: 6.55e-9 unit; lognormal variance with pedigree 0.16, pedigree (1,1,5,1,1)
  uncertainty of lifetime
  EcoSpold01Location=RER
- natural gas, high pressure: 0 m3
  property heating value, gross 0 MJ; name Gross_Heat_Value
  property water content 0; name water_content
  property carbon content, fossil 0.602381; name C_content_fossil
  property water in wet mass 0 kg; name WWM
  property carbon content, non-fossil 0; name C_content_non_fossil
  property wet mass 0.84 kg; name WM
  property dry mass 0.84 kg; name DM
  properties: heating value, net 39 MJ
  note on heating value, net: Literature value, Source: United Nations Statistics Division (2018) International Recommendations for Energy Statistics (IRES). Available at: http://unstats.un.org/unsd/statcom/doc11/BG-IRES.pdf.
- natural gas, high pressure: 0.000371866, 3.70234e-5, 0.000925026, 0.00755269, 0.00127495, 0.0173384 m3 (6 entries)
  properties: carbon content, fossil 0.602381, wet mass 0.84 kg, dry mass 0.84 kg, heating value, net 39 MJ

## Emissions to nature
- Mercury [air, urban air close to ground]: 1.5e-10 kg; lognormal variance with pedigree 0.69, pedigree (1,1,5,1,1)
  basic uncertainty for heavy metal; trace element in natural gas
- Carbon monoxide, fossil [air, urban air close to ground]: 6e-5 kg; lognormal variance with pedigree 0.34, pedigree (1,1,5,1,1)
  rough estimate
- NMVOC, non-methane volatile organic compounds, unspecified origin [air, urban air close to ground]: 8e-6 kg; lognormal variance with pedigree 0.69, pedigree (1,1,5,1,1)
  rough estimate
- Carbon dioxide, fossil [air, urban air close to ground]: 0.056 kg; lognormal variance with pedigree 0.04, pedigree (1,1,5,1,1)
  composition of natural gas
- Nitrogen oxides [air, urban air close to ground]: 2e-5 kg; lognormal variance with pedigree 0.34, pedigree (1,1,5,1,1)
  rough estimate
- Sulfur dioxide [air, urban air close to ground]: 5.5e-7 kg; lognormal variance with pedigree 0.04, pedigree (1,1,5,1,1)
  composition of natural gas
- Particulates, < 2.5 um [air, urban air close to ground]: 2e-6 kg; lognormal variance with pedigree 0.34, pedigree (1,1,5,1,1)
  rough estimate
- Methane, fossil [air, urban air close to ground]: 1.7e-5 kg; lognormal variance with pedigree 0.69, pedigree (1,1,5,1,1)
  rough estimate
- Dioxins, measured as 2,3,7,8-tetrachlorodibenzo-p-dioxin [air, urban air close to ground]: 0 kg; pedigree (1,1,1,1,1)
  rough estimate, high uncertainty

## Sampling procedure
Literature

## Review by Michael Spielmann (obsolete) 2003-07-25
passed

## Review by Bo Weidema 2012-07-19
Input of natural gas production mix replaced by "natural gas, high pressure"
