# ground granulated blast furnace slag to generic market for supplementary cementitious materials

Dataset: EcoSpold 2, unit process
Geography: US
Time period: 2019-01-01 to 2021-12-31
Technology level: current
Classification: ISIC rev.4 ecoinvent: 2394:Manufacture of cement, lime and plaster
Scenario: Business-as-Usual
System model: Allocation, cut-off by classification
Generated by: Lucia Valsasina
Database: ecoinvent
isCopyrightProtected: true
accessRestrictedTo: 1

## General comment
This activity is a renaming activity, linking ground granulated blast furnace slag to the generic market for supplementary cementitious materials (SCM).

## Included activities start
The activity starts with the input of GGBFS.

## Included activities end
With the provision of a generic kg of supplementary cementitious materials.

## Reference product
- supplementary cementitious materials: 1 kg; name SCM; CPC 15: Stone, sand and clay; By-product classification allocatable product
  production volume 8.706e8 kg; = 2902000000*0.30
    Ground granulated blast furnace slag main use is as a alternative constitutents for cement production. It is here assumed that 30% of GGBFS goes to the generic market for supplementary cementitious materials (SCMs). GGBFS is one of the main SCMs used today. The production volume of GGBFS is taken from the PV of the regional production activites (accessed 17th June 2019).
  property price 0.075 EUR2005; name SCM_price_EUR2005
    Price set equal to the price of clay as considered as the product that can answer in increase in demand of supplementary cementitious materials. Calculated value based on data from United Nations Commodity Trade Statistics Database (comtrade.un.org). UN comtrade category: 250810 Bentonite. Year 2005. Using exchange rate of 1EURO = 1.209 USD. Average of price of import into 5 main markets (EU, US, JP, IN and CN).
  property water content 0; name SCM_water_content
  property water in wet mass 0 kg; name SCM_WWM
  property wet mass 1 kg; name SCM_WM
  property dry mass 1 kg; name SCM_DM

## Inputs from technosphere
- ground granulated blast furnace slag: 1 kg; name GGBFS
  This activity is a renaming activity, linking ground granulated blast furnace slag to the generic market for supplementary cementitious materials (SCM).
  property water content 0; name GGBFS_water_content
  property water in wet mass 0 kg; name GGBFS_WWM
  property wet mass 1 kg; name GGBFS_WM
  property carbon content, non-fossil 0; name GGBFS_C_content_non_fossil
  property dry mass 1 kg; name GGBFS_DM
  property carbon content, fossil 0; name GGBFS_C_content_fossil
  note on carbon content, fossil: Industry value; Arcelor Mittal, chemical composition of blast furnace slag (http://www.cst.com.br/english/products/co_products/catalog_products/blast_slag/blast_slag.asp, accessed: 20121003).

## Extrapolations
This dataset has been extrapolated from year 2019 to the year of the calculation (2021). The uncertainty has been adjusted accordingly.
