# treatment of residue from mechanical treatment, cathode ray tube display, municipal incineration with fly ash extraction

Dataset: EcoSpold 2, unit process
Geography: CH
Time period: 2006-01-01 to 2021-12-31
Technology level: current
Classification: ISIC rev.4 ecoinvent: 3821:Treatment and disposal of non-hazardous waste
Synonyms: Siedlungsabfallverbrennung; Kehrichtverbrennung; municipal waste incineration
Scenario: Business-as-Usual
System model: Allocation, cut-off by classification
Share of production covered: 100 %
Generated by: Gabor Doka
Published in: Doka G. 2015
Database: ecoinvent
isCopyrightProtected: true
accessRestrictedTo: 1

## General comment
This dataset represents the activity of waste disposal of residue from mechanical treatment, cathode ray tube display in a municipal solid waste incinerator (MSWI) // Recommended use of this dataset: Only for incineration of shredder residues generated in the recycling (mechanical treatment) of CRT screens (Cathode Ray Tube residue) // Inventoried waste contains 1.84% rubber; 45.2% Plastics from electronic consumer goods; 45.2% Plastics from electronic industrial goods; 2.32% MSWI iron scrap; 2.19% Alu in MSW; 1.39% Glass; 1.86% wiring copper; 0.0715% Pb in ASR inert; 0.0149% silver; . // Waste composition (wet, in ppm): upper heating value 33.29 MJ/kg; lower heating value 31.91 MJ/kg; H2O 8559.9; O 56016; H 68796; C 751310; S 401.89; N 12011; P 470.09; B n.a.; Cl 6229.2; Br 4967.1; F 225.78; I n.a.; Ag 148.56; As 6.7733; Ba 159.85; Cd 136.2; Co 26.621; Cr 79.422; Cu 21842; Hg 0.76766; Mn 61.83; Mo 2.7093; Ni 476.78; Pb 858.09; Sb 4335.5; Se 1.7697; Sn 198.85; V 6.4689; Zn 698.08; Be 0.42136; Sc n.a.; Sr 74.58; Ti 4043.2; Tl 0.33709; W n.a.; Si 8372.8; Fe 20313; Ca 3820; Al 24220; K 105.66; Mg n.a.; Na 1019.8; // Share of carbon in waste that is biogenic 0%. // Share of metals in waste not oxidised and bulk-recyclable (exclude very small or thin parts) Iron: 92.98%; Alu: 90.09%; Copper: 85.35%. // Recovery of metal scrap from bottom ash to recycling: 10.932g iron scrap, 6.6548g aluminium scrap, 5.6944g copper scrap. From this waste, the FLUWA process in the technology mix recovers 0.000845kg (DM) of a hydroxide sludge to be recycled in zinc furnaces. // Ultimately one kg of this waste produces 0.1215 kg of bottom ash (can include some washed ash) and 0.01102 kg of residues, which are landfilled (technology mix). Additional solidification of residues with 0.004407 kg of cement.Net energy production: 4.09MJ/kg electric energy and 7.94MJ/kg thermal energy. //

## Included activities start
waste incineration from waste reception gate and delivery into waste bunker at incinerator plant site (without transports to the incinerator)

## Included activities end
Waste-specific short-term emissions to water from leachate. Long-term emissions from landfill to ground water.

## Geography
Specific to the technology mix encountered in Switzerland in 2012.

## Technology
average Swiss MSWI plants in 2010 (grate incinerators) with electrostatic precipitator for fly ash (ESP), wet flue gas scrubber and 25% SNCR , 42.77% SCR-high dust , 32.68% SCR-low dust -DeNOx facilities and 0% without Denox (weighted according to mass of burnt waste, representing Swiss average). Efficiency of iron scrap separation from slag : 58%. Efficiency of non-ferrous scrap separation from slag : 31%. The technology mix for this dataset includes a filter ash treatment (FLUWA) of a share of 46.22%. Gross electric efficiency technology mix 15.84% and Gross thermal efficiency technology mix 28.51%

## Time period
Waste composition as given in literature reference, theoretical data or other source. Transfer coefficients for modern MSWI.

## Reference product
- residue from mechanical treatment, cathode ray tube display: -1 kg; name RP_amount_1; CPC 39990: Other wastes n.e.c.; By-product classification Waste
  Main reference product of this activity (supply of disposal service).
  production volume 800020 kg; name RP_PV_1
    based on corresponding global production volume of MSW fraction in conventional MSWI (wo fly ash extraction) and scaled down to annual Swiss incinerated MSW mass of 3.02 mio. tonnes.
  property heating value, net 31.91 MJ
    Value taken from the general comment of the treatment dataset.
  property price 0 EUR2005; name RP_amount_1_price_EUR2005
    Waste products are assigned a price of zero as they are assumed to require further treatment.
  property carbon content 0.7578
    carbon content on a dry matter basis (reserved; not for manual entry)
  properties: beryllium content 4.25e-7, tin content 0.00020057, sodium content 0.0010286, vanadium content 6.5247e-6, lead content 0.0008655, selenium content 1.785e-6, zinc content 0.00070411, wet mass 1 kg, strontium content 7.5224e-5, calcium content 0.0038529, silicon content 0.0084451, aluminium content 0.024429, thallium content 3.4e-7, potassium content 0.00010658, water in wet mass 0.0085599 kg, iron content 0.020489, titanium content 0.0040781, carbon content, fossil 0.7578, dry mass 0.99144 kg, sulfur content 0.00040536, phosphorus content 0.00047415, water content 0.0086338, oxygen content 0.0565, hydrogen content 0.06939, silver content 0.00014984, nitrogen content 0.012115, bromine content 0.00501, fluorine content 0.00022773, arsenic content 6.8318e-6, chlorine content 0.006283, barium content 0.00016123, mercury content 7.7429e-7, cadmium content 0.00013738, nickel content 0.0004809, cobalt content 2.6851e-5, chromium content 8.0108e-5, copper content 0.02203, molybdenum content 2.7327e-6, antimony content 0.0043729, manganese content 6.2364e-5, carbon allocation 0.751313 kg

## By-products
All rows: pedigree (1,1,1,1,1)
- electricity, for reuse in municipal waste incineration only: 0 kWh; name E_el_prod_MSWI; CPC 17100: Electrical energy; By-product classification allocatable product
  Net electricity generated from this waste and used in internal MSWI plant energy redistribution.
  Uncertainty: uncertainty is calculated from uncertainties in waste composition and uncertainties in energy efficiency and the uncertainty in internal energy demand
  production volume 908580 kWh
    calculated in proportion to reference product waste input to incinerator
  property exergy 3.6 MJ; name E_el_prod_MSWI_exergy
    This exergy property is based on the exergy content of the product.
  property price 0.1 EUR2005; name E_el_prod_MSWI_price_EUR2005
    Estimated to be the same price as in case of electricity, medium voltage.
  property true value relation 3.6; name E_el_prod_MSWI_true_value_relation
    property to calculate "true value" from
- heat, for reuse in municipal waste incineration only: 0 MJ; name E_th_prod_MSWI; By-product classification allocatable product; CPC 17300: Steam and hot water
  Net useful heat generated from this waste and used in internal MSWI plant energy redistribution.
  Uncertainty: uncertainty is calculated from uncertainties in waste composition and uncertainties in energy efficiency and the uncertainty in internal energy demand
  production volume 6.3524e6 MJ
    calculated in proportion to reference product waste input to incinerator
  property price 0.0106 EUR2005; name E_th_prod_MSWI_price_EUR2005
    Average European district heat price from Ecoheatcool and Euroheat 2005-2006, Ecoheat Work package 1: The European heat market. Final report. 10.6 EUR/GJ i s the price of district heat. http://www.solarthermalworld.org/files/Ecoheatcool%20WP1%20Web.pdf?download
  property exergy 0.1842 MJ; name E_th_prod_MSWI_exergy
    This exergy property is based on the exergy content of the product.
  property true value relation 0.1842; name E_th_prod_MSWI_true_value_relation
    property to calculate "true value" from
- iron scrap, sorted, pressed: 0 kg; CPC 39310: Slag, dross, scalings and other waste from the manufacture of iron or steel; By-product classification Recyclable
  Iron scrap recovered from this waste.
  Uncertainty: uncertainty calculated from uncertainty in waste composition, uncertainty of share of recyclable metal, uncertainty of transfer coefficient to bottom ash, uncertainty of the efficiency of scrap removal in MSWI plant.
  production volume 0 kg
    calculated in proportion to reference product waste input to incinerator
  property price 0.175 EUR2005
    Temporary price data. Calculated as 90% of purchasers price based on: 2005 import and export prices (total trades (USD) divided by total weight (kg) in biggest economies of the world: EU27, USA, Brasil, China, India, Japan and Russia) from UN Commodity Trade Statistics Database (http://data.un.org/Explorer.aspxDatabase [Accessed 2011.06.20]). Commodity: Waste or scrap, of cast iron
  property carbon content 0
    carbon content on a dry matter basis (reserved; not for manual entry)
  properties: water content 0, carbon content, non-fossil 0, dry mass 1 kg, water in wet mass 0 kg, carbon content, fossil 0, wet mass 1 kg, carbon allocation 0 kg
- aluminium scrap, post-consumer, prepared for melting: 0 kg; By-product classification Recyclable; CPC 39363: Waste and scrap of aluminium
  Aluminium scrap recovered from this waste.
  Uncertainty: uncertainty calculated from uncertainty in waste composition, uncertainty of share of recyclable metal, uncertainty of transfer coefficient to bottom ash, uncertainty of the efficiency of scrap removal in MSWI plant.
  production volume 0 kg
    calculated in proportion to reference product waste input to incinerator
  property price 0.806 EUR2005
    Temporary price data. Calculated as 90% of purchasers price based on: 2005 import and export prices (total trades (USD) divided by total weight (kg) in biggest economies of the world: EU27, USA, Brasil, China, India, Japan and Russia) from UN Commodity Trade Statistics Database (http://data.un.org/Explorer.aspxDatabase [Accessed 2011.06.17]). Commodity: Waste or scrap, aluminium
  property carbon content 0
    carbon content on a dry matter basis (reserved; not for manual entry)
  properties: carbon content, fossil 0, wet mass 1 kg, dry mass 1 kg, carbon content, non-fossil 0, water content 0, water in wet mass 0 kg, carbon allocation 0 kg
- copper scrap, sorted, pressed: 0 kg; CPC 39361: Waste and scrap of copper; By-product classification Recyclable
  Copper scrap recovered from this waste.
  Uncertainty: uncertainty calculated from uncertainty in waste composition, uncertainty of share of recyclable metal, uncertainty of transfer coefficient to bottom ash, uncertainty of the efficiency of scrap removal in MSWI plant.
  production volume 0 kg
    calculated in proportion to reference product waste input to incinerator
  property price 2.84 EUR2005
    Temporary price data. Calculated as 90% of purchasers price based on: Source: USGS Mineral Yearbook 2007, Table 1 in <http://minerals.usgs.gov/minerals/pubs/commodity/recycle/myb1-2007-recyc.pdf>
  property carbon content 0
    carbon content on a dry matter basis (reserved; not for manual entry)
  properties: water content 0, water in wet mass 0 kg, dry mass 1 kg, carbon content, fossil 0, wet mass 1 kg, carbon content, non-fossil 0, carbon allocation 0 kg
- metalliferous hydroxide sludge: 0 kg; By-product classification Recyclable; CPC 1429: Other non-ferrous metal ores and concentrates (other than uranium or thorium ores and concentrates)
  Metalliferous hydroxide sludge from filter ash leaching (FLUWA).
  Uncertainty: uncertainty is calculated from uncertainties in waste composition and transfer coefficients to filter ash in incinerator and the uncertainty of the transfer coefficients of the FLUWA process.
  production volume 0 kg
    calculated in proportion to reference product waste input to incinerator
  property price 0.0042 EUR2005
    World market value of manure, deflated with barley world market price and consumer price index, based on [http://www.gov.pe.ca/photos/original/af_NM_manconv.pdf].
  property heating value, net 0 MJ
    Non combustible products are assumed to have an LHV equal to zero (0).
  property carbon content 0.046248
    carbon content on a dry matter basis (reserved; not for manual entry)
  properties: sulfur content 0.027969, fluorine content 0.003898, oxygen content 0.32321, bromine content 0.1161, phosphorus content 0.01049, arsenic content 7.4267e-5, chlorine content 0.17415, molybdenum content 0.00019651, cobalt content 0.00077723, manganese content 7.5369e-6, barium content 5.3244e-5, mercury content 1.6554e-6, copper content 0.0014184, titanium content 0.00039242, antimony content 0.055615, beryllium content 7.4519e-6, selenium content 2.2243e-5, tin content 0.00019145, cadmium content 0.054867, zinc content 0.14459, chromium content 0.00026895, nickel content 0.00049844, calcium content 0.033552, aluminium content 0.00017675, strontium content 1.0066e-6, thallium content 4.0315e-6, iron content 0.0001861, lead content 0.0028447, vanadium content 4.5659e-6, water in wet mass 0.75 kg, silicon content 0.00016789, water content 3, dry mass 0.25 kg, wet mass 1 kg, potassium content 0.00079545, sodium content 0.0012247, carbon content, fossil 0.046248, carbon allocation 0.011562 kg

## Inputs from technosphere
- sodium hydroxide, without water, in 50% solution state: 0.0010862 kg; lognormal variance with pedigree 0.19138, pedigree (1,1,4,1,1)
  Auxilliary inputs for the flue gas treatment stage of the incinerator plant, and partially in the filter ash treatment (FLUWA).
  Uncertainty: uncertainty calculated from uncertainty in average NaOH input, of transfer coefficients in the incinerator, and the uncertainty of the waste composition of this waste
  properties: heating value, net 3.03 MJ, wet mass 1 kg, dry mass 1 kg
- municipal waste incineration facility: 2.5e-10 unit
  Demands per kilogram waste.
- process-specific burdens, residual material landfill: 0.021966 kg; lognormal variance with pedigree 0.062608, pedigree (1,1,4,1,1)
  Mass-specific expenditures required for landfilling of incineration residues.;activityLink introduced to establish a direct link to the corresponding regional supply of this product
  Uncertainty: uncertainty is calculated from uncertainties in waste composition and transfer coefficients in incinerator
- quicklime, milled, packed: 0.0034554 kg; lognormal variance with pedigree 0.38953, pedigree (1,1,4,1,1)
  Auxilliary inputs for the flue gas treatment stage of the incinerator plant.
  Uncertainty: uncertainty calculated from uncertainty in average CaO input, of transfer coefficients in the incinerator, and the uncertainty of the waste composition of this waste
  properties: wet mass 1 kg, dry mass 0.99 kg, water content 0.010101
- process-specific burdens, slag landfill: 0.12146 kg; lognormal variance with pedigree 0.039934, pedigree (1,1,4,1,1)
  Mass-specific expenditures required for landfilling of bottom ash.;activityLink introduced to establish a direct link to the corresponding regional supply of this product
  Uncertainty: uncertainty is calculated from uncertainties in waste composition and transfer coefficients in incinerator
- hydrochloric acid, without water, in 30% solution state: 0.00033502 kg; lognormal variance with pedigree 0.075517, pedigree (1,1,4,1,1)
  Auxilliary inputs for the wastewater treatment stage of the incinerator plant.
  Uncertainty: uncertainty calculated from uncertainty in average HCl input, of transfer coefficients in the incinerator, and the uncertainty of the waste composition of this waste
  properties: dry mass 1 kg, wet mass 1 kg, heating value, net 3.32 MJ
- iron (III) chloride, without water, in 40% solution state: 6.74e-5 kg; lognormal variance with pedigree 0.26751, pedigree (1,1,4,1,1)
  Auxilliary inputs for the wastewater treatment stage of the incinerator plant.
  Uncertainty: uncertainty calculated from uncertainty in average FeCl3 input, of transfer coefficients in the incinerator, and the uncertainty of the waste composition of this waste
  properties: wet mass 1 kg, dry mass 1 kg
- chemical, organic: 2.6097e-5 kg; lognormal variance with pedigree 0.75652, pedigree (1,1,4,1,1)
  Auxilliary inputs for the wastewater treatment stage of the incinerator plant. Proxy for (pure) Trisodium-trimercapto-s-triazine (CAS 17766-26-6), used as 15% diluted solution, aka TMT15.
  Uncertainty: uncertainty calculated from uncertainty in average TMT15 input, of transfer coefficients in the incinerator, and the uncertainty of the waste composition of this waste
  properties: wet mass 1 kg, dry mass 1 kg, carbon content, fossil 0.628, heating value, net 19.03 MJ
- chemical, inorganic: 0.00015754 kg; lognormal variance with pedigree 0.22247, pedigree (1,1,4,1,1)
  Auxilliary inputs for the wastewater treatment stage of the incinerator plant. Proxy for Polyelectrolyte.
  Uncertainty: uncertainty calculated from uncertainty in average Polyelectrolyte input, of transfer coefficients in the incinerator, and the uncertainty of the waste composition of this waste
  properties: wet mass 1 kg, carbon content, fossil 0.003, dry mass 1 kg
- cement, unspecified: 0.004407 kg; lognormal variance with pedigree 0.071692, pedigree (1,1,4,1,1)
  Cement required for solidification of landfilled residual material.
  Uncertainty: Uncertainty calculated from uncertainty of the waste composition of this waste, of transfer coefficients in the incinerator and of the solidification recipe.
  properties: dry mass 1 kg, wet mass 1 kg
- waste cement, hydrated: -0.011018 kg; lognormal variance with pedigree 0.071692, pedigree (1,1,4,1,1)
  Hydrated cement output for solidification of landfilled residual material.
  Uncertainty: Uncertainty calculated from uncertainty of the waste composition of this waste and transfer coefficients in the incinerator and of the solidification recipe.
  production volume 8814.3 kg
    calculated in proportion to reference product waste input to incinerator
  properties: dry mass 1 kg, wet mass 1 kg
- transport, freight, lorry, unspecified: 0.0055353 metric ton*km; lognormal variance with pedigree 0.033109, pedigree (1,1,4,1,1)
  Transport services to transport incineration residues to landfills and filter ash to external treatments (FLUWA).
  Uncertainty: uncertainty calculated from uncertainty of the waste composition of this waste, uncertainty of transfer coefficients and the uncertainty in generic transportation distances
- ammonia, anhydrous, liquid: 0.0021428 kg; lognormal variance with pedigree 0.67824, pedigree (1,1,4,1,1)
  Input to DeNOx stage (100% NH3).
  Uncertainty: uncertainty calculated from uncertainty in average DeNOx input, uncertainty in the share of thermal NOx, uncertainty of nitrogen content in average municipal waste and the uncertainty in nitrogen content in *this* waste.
  properties: wet mass 1 kg, dry mass 1 kg
- heat, district or industrial, natural gas: 0.40069 MJ; lognormal variance with pedigree 0.67824, pedigree (1,1,4,1,1)
  Input to DeNOx stage, to heat up flue gas in low-dust SCR.
  Uncertainty: uncertainty calculated from uncertainty in average DeNOx input, uncertainty in the share of thermal NOx, uncertainty of nitrogen content in average municipal waste and the uncertainty in nitrogen content in *this* waste.
  properties: heating value, net 1 MJ
- spent activated carbon with mercury: -4.0954e-6 kg; name BP_amount_1; lognormal variance with pedigree 1.6103, pedigree (1,1,4,1,1)
  Spent ion exchanger charged with mercury, from FLUWA filter ash treatment, approximated here with Spent activated carbon with mercury, deposited undergound in a polyethylene Big Bag.
  Uncertainty: uncertainty calculated from uncertainty in of transfer coefficients in the incinerator, and the uncertainty of the waste composition of this waste.
  production volume 3.2764 kg; = ABS(RP_PV_1 * (BP_amount_1 / RP_amount_1))
    Calculated from production volume of reference product using the relative outputs.
  property price 0 EUR2005; name BP_amount_1_price_EUR2005
  properties: carbon content, fossil 0.6, dry mass 1 kg, wet mass 1 kg, heating value, net 18.18 MJ
- titanium dioxide: 0.00013425 kg; lognormal variance with pedigree 1.0349, pedigree (1,1,4,1,1)
  Input to DeNOx stage (TiO2 catalyst carrier)
  Uncertainty: uncertainty calculated from uncertainty in average DeNOx input, uncertainty in the share of thermal NOx, uncertainty of nitrogen content in average municipal waste and the uncertainty in nitrogen content in *this* waste.
  properties: dry mass 1 kg, wet mass 1 kg
- chromium oxide, flakes: 2.7398e-6 kg; lognormal variance with pedigree 1.0349, pedigree (1,1,4,1,1)
  Input to DeNOx stage. Active component in SCR catalyst (vanadium pentoxide, V2O5), here approximated with the available chromium trioxide.
  Uncertainty: uncertainty calculated from uncertainty in average DeNOx input, uncertainty in the share of thermal NOx, uncertainty of nitrogen content in average municipal waste and the uncertainty in nitrogen content in *this* waste.
  properties: wet mass 1 kg, dry mass 1 kg
- hydrogen peroxide, without water, in 50% solution state: 0.0007473 kg; lognormal variance with pedigree 0.091462, pedigree (1,1,4,1,1)
  Auxilliary oxidising agent for filter ash treatment (FLUWA).
  Uncertainty: uncertainty calculated from uncertainty in of transfer coefficients in the incinerator, and the uncertainty of the waste composition of this waste
  properties: dry mass 1 kg, wet mass 1 kg, heating value, net 7.13 MJ
- cationic resin: 3.8906e-6 kg; lognormal variance with pedigree 1.6103, pedigree (1,1,4,1,1)
  Auxilliary input for mercury removal in filter ash treatment (FLUWA).
  Uncertainty: uncertainty calculated from uncertainty in of transfer coefficients in the incinerator, and the uncertainty of the waste composition of this waste
  properties: carbon content, fossil 0.521606, dry mass 0.5 kg, water content 1, wet mass 1 kg, heating value, net 6.68 MJ
- water, decarbonised: 1.8676 kg; lognormal variance with pedigree 0.26751, pedigree (1,1,4,1,1)
  Incinerator process water used in flue gas scrubber stage.
  Uncertainty: uncertainty calculated from uncertainty in average water input, and the uncertainty of the waste composition of this waste
  properties: wet mass 1 kg
- slag landfill: 2.1593e-10 unit; lognormal variance with pedigree 0.039934, pedigree (1,1,4,1,1)
  Landfill infrastructure required for landfilling of bottom ash.
  Uncertainty: uncertainty is calculated from uncertainties in waste composition and transfer coefficients in incinerator
- residual material landfill: 4.5763e-11 unit; lognormal variance with pedigree 0.062608, pedigree (1,1,4,1,1)
  Landfill infrastructure required for landfilling of incineration residues.
  Uncertainty: uncertainty is calculated from uncertainties in waste composition and transfer coefficients in incinerator
- iron scrap, sorted, pressed: -0.010932 kg; lognormal variance with pedigree 0.30216, pedigree (1,1,4,1,1)
  (same comment as for iron scrap, sorted, pressed)
  production volume 8745.5 kg
  properties: price 0.175 EUR2005, dry mass 1 kg, wet mass 1 kg
- aluminium scrap, post-consumer, prepared for melting: -0.0066548 kg; lognormal variance with pedigree 0.28276, pedigree (1,1,4,1,1)
  (same comment as for aluminium scrap, post-consumer, prepared for melting)
  production volume 5324 kg
  properties: wet mass 1 kg, dry mass 1 kg, price 0.806 EUR2005
- copper scrap, sorted, pressed: -0.0056944 kg; lognormal variance with pedigree 0.29452, pedigree (1,1,4,1,1)
  (same comment as for copper scrap, sorted, pressed)
  production volume 4555.6 kg
  properties: dry mass 1 kg, wet mass 1 kg, price 2.84 EUR2005
- metalliferous hydroxide sludge: -0.0033797 kg; lognormal variance with pedigree 0.069922, pedigree (1,1,4,1,1)
  (same comment as for metalliferous hydroxide sludge)
  production volume 2703.8 kg
  properties: sulfur content 0.027969, oxygen content 0.32321, bromine content 0.1161, chlorine content 0.17415, antimony content 0.055615, cadmium content 0.054867, zinc content 0.14459, calcium content 0.033552, water content 3, dry mass 0.25 kg, wet mass 1 kg, carbon content, fossil 0.046248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

## Inputs from nature
- Oxygen [natural resource, in air]: 2.5646 kg; lognormal variance with pedigree 0.0179499, pedigree (1,1,4,1,1)
  Oxygen from ambient air needed to combust and oxidise this waste. Net demand, i.e. without O2 leaving the plant in flue gas uncombusted.
  Uncertainty: uncertainty is calculated from uncertainties in waste composition and transfer coefficients to flue gas and soild residues in incinerator

## Emissions to nature
- Cadmium, ion [water, surface water]: 2.4254e-8 kg; lognormal variance with pedigree 0.93471, pedigree (1,1,4,1,1)
  Emissions to water from waste composition and transfer coefficients in incinerator and landfills.
  Uncertainty: uncertainty is calculated from uncertainties in waste composition and transfer coefficients in incinerator and landfills
- Methane, fossil [air, urban air close to ground]: 2.211e-7 kg; lognormal variance with pedigree 0.077138, pedigree (1,1,4,1,1)
  Incomplete combustion product emitted to air.
  Uncertainty: uncertainty calculated from uncertainty in average operation emissions, and the uncertainty of the flue gas volume from this waste.
- Chromium VI [water, ground-, long-term]: 2.7177e-6 kg; lognormal variance with pedigree 3.0393, pedigree (1,1,4,1,1)
  Long-term emissions from landfilling of incineration residues.
  Uncertainty: uncertainty is calculated from uncertainties in waste composition and transfer coefficients in incinerator and landfills.
- Cobalt [water, surface water]: 4.3866e-9 kg; lognormal variance with pedigree 1.665, pedigree (1,1,4,1,1)
  (same comment as for Cadmium, ion)
- Sulfur dioxide [air, urban air close to ground]: 4.0866e-6 kg; lognormal variance with pedigree 0.79745, pedigree (1,1,4,1,1)
  Emission to air from waste composition and transfer coefficients.
  Uncertainty: uncertainty is calculated from uncertainties in waste composition and transfer coefficients in incinerator
- Copper, ion [water, ground-, long-term]: 0.01598 kg; lognormal variance with pedigree 0.28384, pedigree (1,1,4,1,1)
  (same comment as for Chromium VI)
- Chromium VI [water, surface water]: 7.2285e-7 kg; lognormal variance with pedigree 1.0802, pedigree (1,1,4,1,1)
  (same comment as for Cadmium, ion)
- Nitrogen oxides [air, urban air close to ground]: 0.00079779 kg; lognormal variance with pedigree 0.73336, pedigree (1,1,4,1,1)
  Sum of fuel-Nox and thermal-NOx emitted to air after DeNOx stage.
  Uncertainty: uncertainty calculated from uncertainty in average N-emissions and uncertainty in the share of thermal NOx and the uncertainty in nitrogen content in *this* waste.
- Barium [air, urban air close to ground]: 6.2742e-7 kg; lognormal variance with pedigree 0.921, pedigree (1,1,4,1,1)
  (same comment as for Sulfur dioxide)
- Mercury [water, ground-, long-term]: 1.6121e-7 kg; lognormal variance with pedigree 1.6429, pedigree (1,1,4,1,1)
  (same comment as for Chromium VI)
- Copper, ion [water, surface water]: 7.1002e-7 kg; lognormal variance with pedigree 1.1546, pedigree (1,1,4,1,1)
  (same comment as for Cadmium, ion)
- Ammonia [air, urban air close to ground]: 2.5193e-6 kg; lognormal variance with pedigree 0.73336, pedigree (1,1,4,1,1)
  Nitrogen species emitted to air after DeNOx stage.
  Uncertainty: uncertainty calculated from uncertainty in average N-emissions and uncertainty in the share of thermal NOx and the uncertainty in nitrogen content in *this* waste.
- Cadmium [air, urban air close to ground]: 6.9354e-8 kg; lognormal variance with pedigree 0.95041, pedigree (1,1,4,1,1)
  (same comment as for Sulfur dioxide)
- Manganese [water, ground-, long-term]: 6.0542e-5 kg; lognormal variance with pedigree 1.034, pedigree (1,1,4,1,1)
  (same comment as for Chromium VI)
- Mercury [water, surface water]: 4.0847e-9 kg; lognormal variance with pedigree 1.78, pedigree (1,1,4,1,1)
  (same comment as for Cadmium, ion)
- Dinitrogen monoxide [air, urban air close to ground]: 0.00017915 kg; lognormal variance with pedigree 1.1276, pedigree (1,1,4,1,1)
  (same comment as for Ammonia)
- Cobalt [air, urban air close to ground]: 4.8416e-8 kg; lognormal variance with pedigree 1.1636, pedigree (1,1,4,1,1)
  (same comment as for Sulfur dioxide)
- Molybdenum [water, ground-, long-term]: 2.0889e-6 kg; lognormal variance with pedigree 1.4468, pedigree (1,1,4,1,1)
  (same comment as for Chromium VI)
- Manganese [water, surface water]: 3.6166e-9 kg; lognormal variance with pedigree 1.922, pedigree (1,1,4,1,1)
  (same comment as for Cadmium, ion)
- Cyanide [air, urban air close to ground]: 3.8488e-5 kg; lognormal variance with pedigree 1.1276, pedigree (1,1,4,1,1)
  (same comment as for Ammonia)
- Chromium [air, urban air close to ground]: 4.1402e-8 kg; lognormal variance with pedigree 1.024, pedigree (1,1,4,1,1)
  (same comment as for Sulfur dioxide)
- Nickel, ion [water, ground-, long-term]: 0.00046623 kg; lognormal variance with pedigree 0.75089, pedigree (1,1,4,1,1)
  (same comment as for Chromium VI)
- Molybdenum [water, surface water]: 4.5082e-7 kg; lognormal variance with pedigree 0.92581, pedigree (1,1,4,1,1)
  (same comment as for Cadmium, ion)
- Phosphorus [air, urban air close to ground]: 4.5889e-7 kg; lognormal variance with pedigree 0.78174, pedigree (1,1,4,1,1)
  (same comment as for Sulfur dioxide)
- Copper [air, urban air close to ground]: 2.642e-7 kg; lognormal variance with pedigree 0.33402, pedigree (1,1,4,1,1)
  (same comment as for Sulfur dioxide)
- Lead [water, ground-, long-term]: 0.00081868 kg; lognormal variance with pedigree 0.73213, pedigree (1,1,4,1,1)
  (same comment as for Chromium VI)
- Nickel, ion [water, surface water]: 3.1405e-7 kg; lognormal variance with pedigree 1.3896, pedigree (1,1,4,1,1)
  (same comment as for Cadmium, ion)
- Hydrogen chloride [air, urban air close to ground]: 3.4829e-6 kg; lognormal variance with pedigree 0.45626, pedigree (1,1,4,1,1)
  (same comment as for Sulfur dioxide)
- Mercury [air, urban air close to ground]: 2.1766e-8 kg; lognormal variance with pedigree 1.6203, pedigree (1,1,4,1,1)
  (same comment as for Sulfur dioxide)
- Antimony [water, ground-, long-term]: 0.0017579 kg; lognormal variance with pedigree 0.42214, pedigree (1,1,4,1,1)
  (same comment as for Chromium VI)
- Lead [water, surface water]: 2.23e-8 kg; lognormal variance with pedigree 1.4859, pedigree (1,1,4,1,1)
  (same comment as for Cadmium, ion)
- Bromine [air, urban air close to ground]: 2.4811e-6 kg; lognormal variance with pedigree 0.48153, pedigree (1,1,4,1,1)
  (same comment as for Sulfur dioxide)
- Manganese [air, urban air close to ground]: 1.1901e-9 kg; lognormal variance with pedigree 1.0828, pedigree (1,1,4,1,1)
  (same comment as for Sulfur dioxide)
- Selenium [water, ground-, long-term]: 1.3581e-6 kg; lognormal variance with pedigree 0.97314, pedigree (1,1,4,1,1)
  (same comment as for Chromium VI)
- Antimony [water, surface water]: 0.00085108 kg; lognormal variance with pedigree 0.44917, pedigree (1,1,4,1,1)
  (same comment as for Cadmium, ion)
- Hydrogen fluoride [air, urban air close to ground]: 1.5232e-6 kg; lognormal variance with pedigree 0.87284, pedigree (1,1,4,1,1)
  (same comment as for Sulfur dioxide)
- Molybdenum [air, urban air close to ground]: 3.5649e-9 kg; lognormal variance with pedigree 1.4696, pedigree (1,1,4,1,1)
  (same comment as for Sulfur dioxide)
- Tin, ion [water, ground-, long-term]: 0.00013711 kg; lognormal variance with pedigree 0.96592, pedigree (1,1,4,1,1)
  (same comment as for Chromium VI)
- Selenium [water, surface water]: 3.5259e-7 kg; lognormal variance with pedigree 1.0642, pedigree (1,1,4,1,1)
  (same comment as for Cadmium, ion)
- Arsenic [air, urban air close to ground]: 5.3057e-8 kg; lognormal variance with pedigree 1.3391, pedigree (1,1,4,1,1)
  (same comment as for Sulfur dioxide)
- Nickel [air, urban air close to ground]: 5.6839e-7 kg; lognormal variance with pedigree 0.78174, pedigree (1,1,4,1,1)
  (same comment as for Sulfur dioxide)
- Vanadium, ion [water, ground-, long-term]: 9.7546e-7 kg; lognormal variance with pedigree 2.2612, pedigree (1,1,4,1,1)
  (same comment as for Chromium VI)
- Tin, ion [water, surface water]: 1.6597e-7 kg; lognormal variance with pedigree 0.79734, pedigree (1,1,4,1,1)
  (same comment as for Cadmium, ion)
- Lead [air, urban air close to ground]: 1.0969e-8 kg; lognormal variance with pedigree 0.73803, pedigree (1,1,4,1,1)
  (same comment as for Sulfur dioxide)
- Zinc, ion [water, ground-, long-term]: 0.00031641 kg; lognormal variance with pedigree 1.5174, pedigree (1,1,4,1,1)
  (same comment as for Chromium VI)
- Vanadium, ion [water, surface water]: 4.0267e-9 kg; lognormal variance with pedigree 1.6413, pedigree (1,1,4,1,1)
  (same comment as for Cadmium, ion)
- Antimony [air, urban air close to ground]: 3.4691e-9 kg; lognormal variance with pedigree 0.55141, pedigree (1,1,4,1,1)
  (same comment as for Sulfur dioxide)
- Beryllium [water, ground-, long-term]: 3.9544e-7 kg; lognormal variance with pedigree 1.6465, pedigree (1,1,4,1,1)
  (same comment as for Chromium VI)
- Zinc, ion [water, surface water]: 4.2478e-8 kg; lognormal variance with pedigree 0.65292, pedigree (1,1,4,1,1)
  (same comment as for Cadmium, ion)
- Selenium [air, urban air close to ground]: 2.1112e-8 kg; lognormal variance with pedigree 1.5128, pedigree (1,1,4,1,1)
  (same comment as for Sulfur dioxide)
- Strontium [water, ground-, long-term]: 7.45e-5 kg; lognormal variance with pedigree 1.0088, pedigree (1,1,4,1,1)
  (same comment as for Chromium VI)
- Beryllium [water, surface water]: 2.6223e-10 kg; lognormal variance with pedigree 2.2878, pedigree (1,1,4,1,1)
  (same comment as for Cadmium, ion)
- Tin [air, urban air close to ground]: 1.1975e-10 kg; lognormal variance with pedigree 0.95041, pedigree (1,1,4,1,1)
  (same comment as for Sulfur dioxide)
- Titanium, ion [water, ground-, long-term]: 0.00121 kg; lognormal variance with pedigree 0.7332, pedigree (1,1,4,1,1)
  (same comment as for Chromium VI)
- Strontium [water, surface water]: 4.8758e-8 kg; lognormal variance with pedigree 1.6778, pedigree (1,1,4,1,1)
  (same comment as for Cadmium, ion)
- Vanadium [air, urban air close to ground]: 1.4365e-8 kg; lognormal variance with pedigree 1.3464, pedigree (1,1,4,1,1)
  (same comment as for Sulfur dioxide)
- Thallium [water, ground-, long-term]: 2.5871e-7 kg; lognormal variance with pedigree 1.4451, pedigree (1,1,4,1,1)
  (same comment as for Chromium VI)
- Titanium, ion [water, surface water]: 8.2313e-7 kg; lognormal variance with pedigree 0.39397, pedigree (1,1,4,1,1)
  (same comment as for Cadmium, ion)
- Zinc [air, urban air close to ground]: 4.643e-7 kg; lognormal variance with pedigree 0.73803, pedigree (1,1,4,1,1)
  (same comment as for Sulfur dioxide)
- Silicon [water, ground-, long-term]: 0.00065768 kg; lognormal variance with pedigree 5.3164, pedigree (1,1,4,1,1)
  (same comment as for Chromium VI)
- Thallium [water, surface water]: 2.3994e-10 kg; lognormal variance with pedigree 1.7337, pedigree (1,1,4,1,1)
  (same comment as for Cadmium, ion)
- Strontium [air, urban air close to ground]: 7.458e-9 kg; lognormal variance with pedigree 1.046, pedigree (1,1,4,1,1)
  (same comment as for Sulfur dioxide)
- Iron, ion [water, ground-, long-term]: 0.0048686 kg; lognormal variance with pedigree 0.41269, pedigree (1,1,4,1,1)
  (same comment as for Chromium VI)
- Silicon [water, surface water]: 1.7716e-6 kg; lognormal variance with pedigree 0.58906, pedigree (1,1,4,1,1)
  (same comment as for Cadmium, ion)
- Titanium [air, urban air close to ground]: 3.3545e-6 kg; lognormal variance with pedigree 0.50931, pedigree (1,1,4,1,1)
  (same comment as for Sulfur dioxide)
- Calcium, ion [water, ground-, long-term]: 0.0035455 kg; lognormal variance with pedigree 0.44806, pedigree (1,1,4,1,1)
  (same comment as for Chromium VI)
- Iron, ion [water, surface water]: 9.4653e-8 kg; lognormal variance with pedigree 1.4062, pedigree (1,1,4,1,1)
  (same comment as for Cadmium, ion)
- Thallium [air, urban air close to ground]: 3.3709e-10 kg; lognormal variance with pedigree 1.7409, pedigree (1,1,4,1,1)
  (same comment as for Sulfur dioxide)
- Aluminium [water, ground-, long-term]: 0.014279 kg; lognormal variance with pedigree 0.2793, pedigree (1,1,4,1,1)
  (same comment as for Chromium VI)
- Calcium, ion [water, surface water]: 5.5177e-5 kg; lognormal variance with pedigree 0.2552, pedigree (1,1,4,1,1)
  (same comment as for Cadmium, ion)
- Silicon [air, urban air close to ground]: 4.1706e-9 kg; lognormal variance with pedigree 0.47462, pedigree (1,1,4,1,1)
  (same comment as for Sulfur dioxide)
- Potassium, ion [water, ground-, long-term]: 7.5817e-5 kg; lognormal variance with pedigree 0.65126, pedigree (1,1,4,1,1)
  (same comment as for Chromium VI)
- Aluminium [water, surface water]: 4.1066e-7 kg; lognormal variance with pedigree 0.94178, pedigree (1,1,4,1,1)
  (same comment as for Cadmium, ion)
- Iron [air, urban air close to ground]: 2.554e-9 kg; lognormal variance with pedigree 0.37981, pedigree (1,1,4,1,1)
  (same comment as for Sulfur dioxide)
- Sodium, ion [water, ground-, long-term]: 0.00086716 kg; lognormal variance with pedigree 0.64016, pedigree (1,1,4,1,1)
  (same comment as for Chromium VI)
- Potassium, ion [water, surface water]: 2.8652e-5 kg; lognormal variance with pedigree 0.38413, pedigree (1,1,4,1,1)
  (same comment as for Cadmium, ion)
- Calcium [air, urban air close to ground]: 2.2118e-5 kg; lognormal variance with pedigree 0.50235, pedigree (1,1,4,1,1)
  (same comment as for Sulfur dioxide)
- NMVOC, non-methane volatile organic compounds, unspecified origin [air, urban air close to ground]: 6.7081e-7 kg; lognormal variance with pedigree 0.077138, pedigree (1,1,4,1,1)
  (same comment as for Methane, fossil)
- Sodium, ion [water, surface water]: 0.00015053 kg; lognormal variance with pedigree 0.56471, pedigree (1,1,4,1,1)
  (same comment as for Cadmium, ion)
- Aluminium [air, urban air close to ground]: 1.7646e-9 kg; lognormal variance with pedigree 0.36661, pedigree (1,1,4,1,1)
  (same comment as for Sulfur dioxide)
- Particulates, < 2.5 um [air, urban air close to ground]: 1.7598e-6 kg; lognormal variance with pedigree 0.37951, pedigree (1,1,4,1,1)
  (same comment as for Methane, fossil)
- Chromium, ion [water, surface water]: 6.1554e-9 kg; lognormal variance with pedigree 0.6444, pedigree (1,1,4,1,1)
  (same comment as for Cadmium, ion)
- Potassium [air, urban air close to ground]: 5.2203e-7 kg; lognormal variance with pedigree 0.97248, pedigree (1,1,4,1,1)
  (same comment as for Sulfur dioxide)
- Particulates, > 2.5 um, and < 10um [air, urban air close to ground]: 8.8433e-9 kg; lognormal variance with pedigree 0.17347, pedigree (1,1,4,1,1)
  (same comment as for Methane, fossil)
- COD, Chemical Oxygen Demand [water, ground-, long-term]: 0.0055675 kg; lognormal variance with pedigree 0.020564, pedigree (1,1,4,1,1)
  (same comment as for Chromium VI)
- Sodium [air, urban air close to ground]: 1.0343e-6 kg; lognormal variance with pedigree 0.68004, pedigree (1,1,4,1,1)
  (same comment as for Sulfur dioxide)
- Dioxins, measured as 2,3,7,8-tetrachlorodibenzo-p-dioxin [air, urban air close to ground]: 2.9478e-14 kg; lognormal variance with pedigree 0.37951, pedigree (1,1,4,1,1)
  (same comment as for Methane, fossil)
- DOC, Dissolved Organic Carbon [water, ground-, long-term]: 0.0022031 kg; lognormal variance with pedigree 0.020564, pedigree (1,1,4,1,1)
  (same comment as for Chromium VI)
- TOC, Total Organic Carbon [water, surface water]: 0.00024912 kg; lognormal variance with pedigree 0.026382, pedigree (1,1,4,1,1)
  (same comment as for Cadmium, ion)
- Benzene [air, urban air close to ground]: 1.474e-8 kg; lognormal variance with pedigree 0.077138, pedigree (1,1,4,1,1)
  (same comment as for Methane, fossil)
- BOD5, Biological Oxygen Demand [water, ground-, long-term]: 0.0018211 kg; lognormal variance with pedigree 0.020564, pedigree (1,1,4,1,1)
  (same comment as for Chromium VI)
- BOD5, Biological Oxygen Demand [water, surface water]: 0.00055894 kg; lognormal variance with pedigree 0.02661, pedigree (1,1,4,1,1)
  (same comment as for Cadmium, ion)
- Toluene [air, urban air close to ground]: 2.948e-8 kg; lognormal variance with pedigree 0.077138, pedigree (1,1,4,1,1)
  (same comment as for Methane, fossil)
- TOC, Total Organic Carbon [water, ground-, long-term]: 0.0022031 kg; lognormal variance with pedigree 0.020564, pedigree (1,1,4,1,1)
  (same comment as for Chromium VI)
- COD, Chemical Oxygen Demand [water, surface water]: 0.00057116 kg; lognormal variance with pedigree 0.026401, pedigree (1,1,4,1,1)
  (same comment as for Cadmium, ion)
- Benzene, pentachloro- [air, urban air close to ground]: 7.7876e-11 kg; lognormal variance with pedigree 0.077138, pedigree (1,1,4,1,1)
  (same comment as for Methane, fossil)
- Sulfate [water, ground-, long-term]: 0.00096679 kg; lognormal variance with pedigree 0.59137, pedigree (1,1,4,1,1)
  (same comment as for Chromium VI)
- DOC, Dissolved Organic Carbon [water, surface water]: 0.00024912 kg; lognormal variance with pedigree 0.026382, pedigree (1,1,4,1,1)
  (same comment as for Cadmium, ion)
- Benzene, hexachloro- [air, urban air close to ground]: 3.082e-11 kg; lognormal variance with pedigree 0.077138, pedigree (1,1,4,1,1)
  (same comment as for Methane, fossil)
- Nitrate [water, ground-, long-term]: 0.00043081 kg; lognormal variance with pedigree 0.36302, pedigree (1,1,4,1,1)
  (same comment as for Chromium VI)
- Sulfate [water, surface water]: 0.00016185 kg; lognormal variance with pedigree 0.41457, pedigree (1,1,4,1,1)
  (same comment as for Cadmium, ion)
- Phenol, pentachloro- [air, urban air close to ground]: 6.419e-12 kg; lognormal variance with pedigree 0.077138, pedigree (1,1,4,1,1)
  (same comment as for Methane, fossil)
- Phosphate [water, ground-, long-term]: 4.136e-5 kg; lognormal variance with pedigree 5.1516, pedigree (1,1,4,1,1)
  (same comment as for Chromium VI)
- Nitrate [water, surface water]: 0.00015432 kg; lognormal variance with pedigree 0.2404, pedigree (1,1,4,1,1)
  (same comment as for Cadmium, ion)
- Benzo(a)pyrene [air, urban air close to ground]: 3.2801e-13 kg; lognormal variance with pedigree 0.37951, pedigree (1,1,4,1,1)
  (same comment as for Methane, fossil)
- Chloride [water, ground-, long-term]: 0.00078595 kg; lognormal variance with pedigree 0.40992, pedigree (1,1,4,1,1)
  (same comment as for Chromium VI)
- Phosphate [water, surface water]: 6.736e-7 kg; lognormal variance with pedigree 0.371, pedigree (1,1,4,1,1)
  (same comment as for Cadmium, ion)
- Heat, waste [water, surface water]: 5.6422 MJ; lognormal variance with pedigree 0.024346, pedigree (1,1,4,1,1)
  Waste heat generated from heating value of this waste plus any electricity required to process it.
  Uncertainty: uncertainty is calculated from uncertainties in waste composition and uncertainties in energy efficiency and the uncertainty in internal energy demand
- Bromine [water, ground-, long-term]: 0.00025749 kg; lognormal variance with pedigree 0.46974, pedigree (1,1,4,1,1)
  (same comment as for Chromium VI)
- Chloride [water, surface water]: 0.0052928 kg; lognormal variance with pedigree 0.16038, pedigree (1,1,4,1,1)
  (same comment as for Cadmium, ion)
- Heat, waste [air, urban air close to ground]: 24.526 MJ; lognormal variance with pedigree 0.024346, pedigree (1,1,4,1,1)
  (same comment as for Heat, waste)
- Fluoride [water, ground-, long-term]: 0.00015063 kg; lognormal variance with pedigree 0.51883, pedigree (1,1,4,1,1)
  (same comment as for Chromium VI)
- Bromine [water, surface water]: 0.004609 kg; lognormal variance with pedigree 0.11909, pedigree (1,1,4,1,1)
  (same comment as for Cadmium, ion)
- Silver, ion [water, ground-, long-term]: 0.00014855 kg; lognormal variance with pedigree 0.91736, pedigree (1,1,4,1,1)
  (same comment as for Chromium VI)
- Fluoride [water, surface water]: 6.5711e-5 kg; lognormal variance with pedigree 0.54596, pedigree (1,1,4,1,1)
  (same comment as for Cadmium, ion)
- Water [air, urban air close to ground]: 0.00177282 m3; lognormal variance with pedigree 0.76968, pedigree (1,1,4,1,1)
  Water vapour from waste humidity, hydrogen oxidation and part of the process water.
  Uncertainty: Uncertainty calculated from uncertainty in waste composition, process water input and the uncertainty of fraction to air.
- Arsenic, ion [water, ground-, long-term]: 4.1294e-6 kg; lognormal variance with pedigree 1.328, pedigree (1,1,4,1,1)
  (same comment as for Chromium VI)
- Silver, ion [water, surface water]: 5.1577e-9 kg; lognormal variance with pedigree 2.013, pedigree (1,1,4,1,1)
  (same comment as for Cadmium, ion)
- Water [water, surface water]: 0.000633478 m3; lognormal variance with pedigree 1.1434, pedigree (1,1,4,1,1)
  Process water released to surface water.
  Uncertainty: uncertainty calculated from uncertainty in process water input and the uncertainty of fraction to surface water.
- Barium [water, ground-, long-term]: 0.00011678 kg; lognormal variance with pedigree 1.2602, pedigree (1,1,4,1,1)
  (same comment as for Chromium VI)
- Arsenic, ion [water, surface water]: 2.5695e-6 kg; lognormal variance with pedigree 1.2166, pedigree (1,1,4,1,1)
  (same comment as for Cadmium, ion)
- Carbon monoxide, fossil [air, urban air close to ground]: 2.5056e-5 kg; lognormal variance with pedigree 0.7561, pedigree (1,1,4,1,1)
  (same comment as for Methane, fossil)
- Cadmium, ion [water, ground-, long-term]: 2.195e-5 kg; lognormal variance with pedigree 4.924, pedigree (1,1,4,1,1)
  (same comment as for Chromium VI)
- Barium [water, surface water]: 6.7824e-8 kg; lognormal variance with pedigree 0.72747, pedigree (1,1,4,1,1)
  (same comment as for Cadmium, ion)
- Carbon dioxide, fossil [air, urban air close to ground]: 2.7382 kg; lognormal variance with pedigree 0.0105449, pedigree (1,1,4,1,1)
  (same comment as for Sulfur dioxide)
- Cobalt [water, ground-, long-term]: 2.3289e-5 kg; lognormal variance with pedigree 1.107, pedigree (1,1,4,1,1)
  (same comment as for Chromium VI)

## Extrapolations
This dataset has been extrapolated from year 2012 to the year of the calculation (2021). The uncertainty has been adjusted accordingly.
