# treatment of waste polyethylene terephthalate, sanitary landfill

Dataset: EcoSpold 2, unit process
Geography: CH
Time period: 1994-01-01 to 2021-12-31
Technology level: current
Classification: ISIC rev.4 ecoinvent: 3821:Treatment and disposal of non-hazardous waste
Classification: EcoSpold01Categories: waste management/sanitary landfill
Synonyms: Pegoterate; Poly(oxyethyleneoxyterephthaloyl); PET
Tags: ConvertedDataset; Treatment
Scenario: Business-as-Usual
System model: Allocation, cut-off by classification
Generated by: Gabor Doka (obsolete)
Published in: Doka G. 2007
Database: ecoinvent
isCopyrightProtected: true
accessRestrictedTo: 1

## General comment
Inventoried waste contains 100% PET; .
waste composition (wet, in ppm): upper heating value 23.13 MJ/kg; lower heating value 22.95 MJ/kg; H2O 2000; O 368750; H 63380; C 553640; S 147.87; N 6456.8; P n.a.; B n.a.; Cl 788.62; Br 69.004; F 11.829; I n.a.; Ag n.a.; As 1.873; Ba 49.289; Cd 3.2531; Co 31.052; Cr 5.4218; Cu 11.829; Hg 0.08872; Mn 17.744; Mo n.a.; Ni 3.9431; Pb 5.5203; Sb 159.2; Se 2.0701; Sn 0.98577; V 1281.5; Zn 68.676; Be 0.49289; Sc n.a.; Sr 87.241; Ti 985.77; Tl 0.39431; W n.a.; Si n.a.; Fe 98.577; Ca 295.73; Al 197.15; K n.a.; Mg n.a.; Na 1444.7;
Share of carbon in waste that is biogenic 0%.
Overall degradability of waste during 100 years: 1%.
[This dataset was already contained in the ecoinvent database version 2. It was not individually updated during the transfer to ecoinvent version 3. Life Cycle Impact Assessment results may still have changed, as they are affected by changes in the supply chain, i.e. in other datasets. This dataset was generated following the ecoinvent quality guidelines for version 2. It may have been subject to central changes described in the ecoinvent version 3 change report (http://www.ecoinvent.org/database/ecoinvent-version-3/reports-of-changes/), and the results of the central updates were reviewed extensively. The changes added e.g. consistent water flows and other information throughout the database. The documentation of this dataset can be found in the ecoinvent reports of version 2, which are still available via the ecoinvent website. The change report linked above covers all central changes that were made during the conversion process.]

## Included activities end
Waste-specific short-term emissions to air via landfill gas incineration and landfill leachate. Burdens from treatment of short-term leachate (0-100a) in wastewater treatment plant (including WWTP sludge disposal in municipal incinerator). Long-term emissions from landfill to groundwater (after base lining failure).

## Geography
Technology encountered in Switzerland in 2000. Landfill includes base seal, leachate collection system, treatment of leachate in municipal wastewater treatment plant.

## Technology
Swiss municipal sanitary landfill for biogenic or untreated municipal waste ('reactive organic landfill'). Landfill gas and leachate collection system. Recultivation and monitoring for 150 years after closure.

## Reference product
- waste polyethylene terephthalate: -1 kg; CPC 39270: Waste, parings and scrap of plastics; By-product classification Waste; CAS 25038-59-9
  production volume 0 kg
    estimated proportion; source: ecoinvent v2; value to be replaced by value to be calculated from the demand for this treatment activity
  property heating value, net 22.95 MJ
    Value taken from the general comment of the treatment dataset.
  property price 0 EUR2005
    Waste products are assigned a price of zero as they are assumed to require further treatment.
  property carbon content, fossil 0.554108
    C content in 1 kg DM was calculated using data in Tab A.1, ecoinvent v2.2 report 13_I
  property carbon content 0.554108
    carbon content on a dry matter basis (reserved; not for manual entry)
  properties: water in wet mass 0.002 kg, carbon content, non-fossil 0, wet mass 1 kg, dry mass 0.998 kg, water content 0.00200401, carbon allocation 0.553 kg

## Inputs from technosphere
- sodium hydroxide, without water, in 50% solution state: 1.13e-8 kg; lognormal variance with pedigree 0.51, pedigree (1,1,5,1,1)
  burden from incineration of sludge from wastewater treatment of the short-term leachate (0-100a). uncertainty is calculated from uncertainties in waste composition and transfer coefficients in incinerator and uncertainty of waste decomposition and short-term leaching in sanitary landfill
  properties: dry mass 1 kg, wet mass 1 kg, heating value, net 3.03 MJ
- process-specific burdens, residual material landfill: 4.97e-7 kg; lognormal variance with pedigree 0.45, pedigree (1,1,5,1,1)
  burden from incineration of sludge from wastewater treatment of the short-term leachate (0-100a). uncertainty is calculated from uncertainties in waste composition and transfer coefficients in incinerator and uncertainty of waste decomposition and short-term leaching in sanitary landfill;activityLink introduced to establish a direct link to the corresponding regional supply of this product
- chromium oxide, flakes: 1.33e-10 kg; lognormal variance with pedigree 0.95, pedigree (5,5,5,5,5)
  burden from incineration of sludge from wastewater treatment of the short-term leachate (0-100a). Proxy for vanadium pentoxide V2O5 in SCR catalyst, uncertainty calculated from uncertainty in average DeNOx input, uncertainty in the share of thermal NOx, uncertainty of nitrogen content in average municipal waste and the unertainty in nitrogen content in *this* waste and uncertainty of waste decomposition and short-term leaching in sanitary landfill
  properties: wet mass 1 kg, dry mass 1 kg
- heat, for reuse in municipal waste incineration only: 8.94e-5 MJ; name E_th_prod_MSWI; lognormal variance with pedigree 0.67, pedigree (1,1,5,1,1)
  (same comment as for sodium hydroxide, without water, in 50% solution state)
- hydrochloric acid, without water, in 30% solution state: 6.05e-11 kg; lognormal variance with pedigree 0.66, pedigree (1,1,5,1,1)
  (same comment as for sodium hydroxide, without water, in 50% solution state)
  properties: heating value, net 3.32 MJ, dry mass 1 kg, wet mass 1 kg
- electricity, for reuse in municipal waste incineration only: 1.53e-5 kWh; name E_el_prod_MSWI; lognormal variance with pedigree 1.05, pedigree (1,1,5,1,1)
  (same comment as for sodium hydroxide, without water, in 50% solution state)
- iron (III) chloride, without water, in 40% solution state: 1.54e-8 kg; lognormal variance with pedigree 0.78, pedigree (1,1,5,1,1)
  (same comment as for sodium hydroxide, without water, in 50% solution state)
  properties: dry mass 1 kg, wet mass 1 kg
- waste plastic, mixture: -3.88e-5 kg; lognormal variance with pedigree 0.2106, pedigree (5,5,5,5,5)
  burden from wastewater treatment of the short-term leachate (0-100a). Uncertainty calculated from unertainty of the waste composition of this waste, uncertainty in waste decomposition and short-term leaching in sanitary landfill
  production volume 0 kg
    Calculated from the production volume of waste polyethylene terephtalate, 0.2% water in proportion to the respective output amounts.
  properties: heating value, net 30.79 MJ, wet mass 1 kg, carbon content, fossil 0.747344, water content 0.180638, dry mass 0.847 kg
  note on heating value, net: Value taken from the general comment of the treatment dataset.
  note on carbon content, fossil: C content in 1 kg DM was calculated using data in Tab A.2, ecoinvent v2.2 report 13_I
- ammonia, anhydrous, liquid: 2.27e-7 kg; lognormal variance with pedigree 0.59, pedigree (1,1,5,1,1)
  (same comment as for sodium hydroxide, without water, in 50% solution state)
  properties: wet mass 1 kg, dry mass 1 kg
- waste graphical paper: -3.88e-5 kg; lognormal variance with pedigree 0.2106, pedigree (5,5,5,5,5)
  (same comment as for waste plastic, mixture)
  production volume 0 kg
    (same comment as for waste plastic, mixture)
  properties: heating value, net 14.12 MJ, water content 0.126126, carbon content, non-fossil 0.454955, dry mass 0.888 kg, wet mass 1 kg
- electricity, low voltage: 0.000923 kWh; lognormal variance with pedigree 0.49, pedigree (5,5,5,5,5)
  (same comment as for waste plastic, mixture)
- waste cement, hydrated: -4.97e-7 kg; lognormal variance with pedigree 0.45, pedigree (1,1,5,1,1)
  (same comment as for sodium hydroxide, without water, in 50% solution state)
  production volume 0 kg
    (same comment as for waste plastic, mixture)
  properties: wet mass 1 kg, dry mass 1 kg
- chemical, organic: 8.88e-9 kg; lognormal variance with pedigree 2.03, pedigree (1,1,5,1,1)
  (same comment as for sodium hydroxide, without water, in 50% solution state)
  properties: carbon content, fossil 0.628, heating value, net 19.03 MJ, dry mass 1 kg, wet mass 1 kg
  note on carbon content, fossil: This dataset is an unweighted average of 20 organic substances (listed in Tab 88.1, ecoinvent v2.2 report 8, part II), being part of the top100 chemicals included in this database. The C-content has also been calculated as an unweighted average of the C content of the substances composing this dataset.
- process-specific burdens, slag landfill: 2.8e-6 kg; lognormal variance with pedigree 0.51, pedigree (1,1,5,1,1)
  (same comment as for process-specific burdens, residual material landfill)
- municipal waste incineration facility: 2.66e-14 unit; lognormal variance with pedigree 0.67, pedigree (1,1,5,1,1)
  Burden from incineration of sludge from wastewater treatment of the short-term leachate (0-100a).
  Burden from incineration of sludge from wastewater treatment of the short-term leachate (0-100a).
- sewer grid, 5E9l/year, 110 km: 5.45e-10 km; lognormal variance with pedigree 0.2106, pedigree (5,5,5,5,5)
  (same comment as for waste plastic, mixture)
- sanitary landfill facility: 5.56e-10 unit; lognormal variance with pedigree 0.04, pedigree (1,1,5,1,1)
  demands per kilogram waste. uncertainty is heeded in the module
  This exchange has an activity link directly to the producing activity because the product is primarily consumed in the same geographical area where it is produced.
- chemical, inorganic: 1.01e-10 kg; lognormal variance with pedigree 0.66, pedigree (1,1,5,1,1)
  (same comment as for sodium hydroxide, without water, in 50% solution state)
  properties: wet mass 1 kg, carbon content, fossil 0.003, dry mass 1 kg
  note on carbon content, fossil: This dataset is an unweighted average of 20 inorganic substances (listed in Tab 88.1, ecoinvent v2.2 report 8, part II), being part of the top100 chemicals included in this database. The C-content has also been calculated as an unweighted average of the C content of the substances composing this dataset.
- heat, central or small-scale, other than natural gas: 4.2864e-5 MJ; lognormal variance with pedigree 0.23, pedigree (5,5,5,5,5)
  (same comment as for waste plastic, mixture)
  properties: heating value, net 1 MJ
- titanium dioxide: 6.49e-9 kg; lognormal variance with pedigree 0.83, pedigree (1,1,5,1,1)
  (same comment as for sodium hydroxide, without water, in 50% solution state)
  properties: wet mass 1 kg, dry mass 1 kg
- wastewater treatment facility, capacity 5E9l/year: 1.42e-11 unit; lognormal variance with pedigree 0.2106, pedigree (5,5,5,5,5)
  (same comment as for waste plastic, mixture)
- slag landfill: 4.97e-15 unit; lognormal variance with pedigree 0.51, pedigree (1,1,5,1,1)
  (same comment as for sodium hydroxide, without water, in 50% solution state)
- cement, unspecified: 1.99e-7 kg; lognormal variance with pedigree 0.45, pedigree (1,1,5,1,1)
  (same comment as for sodium hydroxide, without water, in 50% solution state)
  properties: wet mass 1 kg, dry mass 1 kg
- residual material landfill: 1.04e-15 unit; lognormal variance with pedigree 0.45, pedigree (1,1,5,1,1)
  (same comment as for sodium hydroxide, without water, in 50% solution state)
- process-specific burdens, municipal waste incineration: 0.000107 kg; lognormal variance with pedigree 0.67, pedigree (1,1,5,1,1)
  Burden from incineration of sludge from wastewater treatment of the short-term leachate (0-100a).
  Burden from incineration of sludge from wastewater treatment of the short-term leachate (0-100a).;activityLink introduced to establish a direct link to the corresponding regional supply of this product
- heat, district or industrial, natural gas: 7.893e-5 MJ; lognormal variance with pedigree 0.23, pedigree (5,5,5,5,5)
  (same comment as for sodium hydroxide, without water, in 50% solution state)
  properties: heating value, net 1 MJ
- process-specific burdens, sanitary landfill: 1 kg; lognormal variance with pedigree 0.04, pedigree (1,1,5,1,1)
  demands per kilogram waste. uncertainty is heeded in the module;activityLink introduced to establish a direct link to the corresponding regional supply of this product
- quicklime, milled, packed: 2.04e-9 kg; lognormal variance with pedigree 0.51, pedigree (1,1,5,1,1)
  (same comment as for sodium hydroxide, without water, in 50% solution state)
  properties: wet mass 1 kg, water content 0.010101, dry mass 0.99 kg

## Emissions to nature
- Manganese [water, surface water]: 1.03e-7 kg; lognormal variance with pedigree 1.58, pedigree (1,1,5,1,1)
  Emissions from short-term leachate treatment and incineration of resulting sludge. Uncertainty calculated depending on waste input and uncertainty of transfer coefficents in landfill, wastewater treatment and incineration model.
- Mercury [water, ground-, long-term]: 8.86e-8 kg; lognormal variance with pedigree 1.96, pedigree (1,1,5,1,1)
  Emissions from long-term leachate (>100a) directly from MSW landfill and indirectly via incineration of treatement sludge from leachate treatement. Uncertainty calculated depending on waste input and uncertainty of long-term transfer coefficents in landfill.
- Copper [air, non-urban air or from high stacks]: 1.66e-13 kg; lognormal variance with pedigree 3.38, pedigree (1,1,5,1,1)
  burden from direct release or incineration of landfill biogas. Uncertainty calculated from unertainty of the waste composition of this waste, uncertainty in waste decomposition and short-term leaching in sanitary landfill
- COD, Chemical Oxygen Demand [water, ground-, long-term]: 0.154 kg; lognormal variance with pedigree 0.52, pedigree (1,1,5,1,1)
  (same comment as for Mercury)
- Beryllium [air, urban air close to ground]: 1.41e-13 kg; lognormal variance with pedigree 2.46, pedigree (1,1,5,1,1)
  (same comment as for Manganese)
- Beryllium [water, surface water]: 1.46e-10 kg; lognormal variance with pedigree 2.43, pedigree (1,1,5,1,1)
  (same comment as for Manganese)
- Strontium [air, urban air close to ground]: 2.5e-12 kg; lognormal variance with pedigree 1.8, pedigree (1,1,5,1,1)
  (same comment as for Manganese)
- DOC, Dissolved Organic Carbon [water, ground-, long-term]: 0.141 kg; lognormal variance with pedigree 0.52, pedigree (1,1,5,1,1)
  (same comment as for Mercury)
- Titanium [air, non-urban air or from high stacks]: 1.23e-10 kg; lognormal variance with pedigree 2.52, pedigree (1,1,5,1,1)
  (same comment as for Copper)
- Carbon monoxide, fossil [air, non-urban air or from high stacks]: 7.86e-7 kg; lognormal variance with pedigree 1.07, pedigree (1,1,5,1,1)
  (same comment as for Copper)
- Cobalt [air, non-urban air or from high stacks]: 2.5e-11 kg; lognormal variance with pedigree 2.74, pedigree (1,1,5,1,1)
  (same comment as for Copper)
- Barium [air, urban air close to ground]: 5.31e-10 kg; lognormal variance with pedigree 1.49, pedigree (1,1,5,1,1)
  (same comment as for Manganese)
- Sodium [air, non-urban air or from high stacks]: 1.49e-8 kg; lognormal variance with pedigree 1.91, pedigree (1,1,5,1,1)
  (same comment as for Copper)
- NMVOC, non-methane volatile organic compounds, unspecified origin [air, non-urban air or from high stacks]: 1.49e-8 kg; lognormal variance with pedigree 0.46, pedigree (1,1,5,1,1)
  (same comment as for Copper)
- Bromine [water, ground-, long-term]: 6.72e-5 kg; lognormal variance with pedigree 1.05, pedigree (1,1,5,1,1)
  (same comment as for Mercury)
- Tin, ion [water, ground-, long-term]: 9.86e-7 kg; lognormal variance with pedigree 1.61, pedigree (1,1,5,1,1)
  (same comment as for Mercury)
- Titanium [air, urban air close to ground]: 2.43e-10 kg; lognormal variance with pedigree 1.48, pedigree (1,1,5,1,1)
  (same comment as for Manganese)
- Barium [water, surface water]: 3.39e-8 kg; lognormal variance with pedigree 1.47, pedigree (1,1,5,1,1)
  (same comment as for Manganese)
- Mercury [air, non-urban air or from high stacks]: 2.43e-11 kg; lognormal variance with pedigree 2.79, pedigree (1,1,5,1,1)
  (same comment as for Copper)
- Arsenic, ion [water, surface water]: 2.96e-9 kg; lognormal variance with pedigree 2.1, pedigree (1,1,5,1,1)
  (same comment as for Manganese)
- Aluminium [air, urban air close to ground]: 1.45e-10 kg; lognormal variance with pedigree 1.69, pedigree (1,1,5,1,1)
  (same comment as for Manganese)
- Ammonium, ion [water, ground-, long-term]: 0.00257 kg; lognormal variance with pedigree 0.46, pedigree (1,1,5,1,1)
  (same comment as for Mercury)
- Nitrogen oxides [air, urban air close to ground]: 1.41e-6 kg; lognormal variance with pedigree 0.49, pedigree (1,1,5,1,1)
  (same comment as for Manganese)
- Nitrite [water, surface water]: 1.64e-6 kg; lognormal variance with pedigree 0.73, pedigree (1,1,5,1,1)
  (same comment as for Manganese)
- NMVOC, non-methane volatile organic compounds, unspecified origin [air, urban air close to ground]: 4.12e-9 kg; lognormal variance with pedigree 1.03, pedigree (1,1,5,1,1)
  (same comment as for Manganese)
- Barium [air, non-urban air or from high stacks]: 1.41e-10 kg; lognormal variance with pedigree 2.52, pedigree (1,1,5,1,1)
  (same comment as for Copper)
- Vanadium [air, non-urban air or from high stacks]: 3.38e-10 kg; lognormal variance with pedigree 2.39, pedigree (1,1,5,1,1)
  (same comment as for Copper)
- TOC, Total Organic Carbon [water, surface water]: 2.57e-5 kg; lognormal variance with pedigree 0.87, pedigree (1,1,5,1,1)
  (same comment as for Manganese)
- Thallium [air, non-urban air or from high stacks]: 5.73e-14 kg; lognormal variance with pedigree 3.54, pedigree (1,1,5,1,1)
  (same comment as for Copper)
- Zinc [air, urban air close to ground]: 3.67e-13 kg; lognormal variance with pedigree 1.86, pedigree (1,1,5,1,1)
  (same comment as for Manganese)
- Cobalt [air, urban air close to ground]: 1.56e-15 kg; lognormal variance with pedigree 1.78, pedigree (1,1,5,1,1)
  (same comment as for Manganese)
- Cadmium [air, urban air close to ground]: 1.57e-13 kg; lognormal variance with pedigree 2.1, pedigree (1,1,5,1,1)
  (same comment as for Manganese)
- Thallium [air, urban air close to ground]: 1.13e-13 kg; lognormal variance with pedigree 2.49, pedigree (1,1,5,1,1)
  (same comment as for Manganese)
- Chromium VI [water, surface water]: 3.24e-10 kg; lognormal variance with pedigree 2.33, pedigree (1,1,5,1,1)
  (same comment as for Manganese)
- Carbon dioxide, fossil [air, non-urban air or from high stacks]: 0.0139 kg; lognormal variance with pedigree 0.42, pedigree (1,1,5,1,1)
  (same comment as for Copper)
- Ammonium, ion [water, surface water]: 7.81e-5 kg; lognormal variance with pedigree 0.52, pedigree (1,1,5,1,1)
  (same comment as for Manganese)
- Lead [air, urban air close to ground]: 1.08e-14 kg; lognormal variance with pedigree 2.47, pedigree (1,1,5,1,1)
  (same comment as for Manganese)
- Lead [air, non-urban air or from high stacks]: 1.08e-13 kg; lognormal variance with pedigree 3.44, pedigree (1,1,5,1,1)
  (same comment as for Copper)
- Iron, ion [water, ground-, long-term]: 6.91e-6 kg; lognormal variance with pedigree 2.77, pedigree (1,1,5,1,1)
  (same comment as for Mercury)
- Vanadium, ion [water, ground-, long-term]: 0.000373 kg; lognormal variance with pedigree 1.05, pedigree (1,1,5,1,1)
  (same comment as for Mercury)
- Arsenic [air, non-urban air or from high stacks]: 4.72e-11 kg; lognormal variance with pedigree 2.67, pedigree (1,1,5,1,1)
  (same comment as for Copper)
- Manganese [air, urban air close to ground]: 0 kg; pedigree (1,1,1,1,1)
  (same comment as for Manganese)
- Copper, ion [water, ground-, long-term]: 1.18e-5 kg; lognormal variance with pedigree 1.29, pedigree (1,1,5,1,1)
  (same comment as for Mercury)
- Aluminium [water, ground-, long-term]: 0.000197 kg; lognormal variance with pedigree 0.91, pedigree (1,1,5,1,1)
  (same comment as for Mercury)
- Beryllium [air, non-urban air or from high stacks]: 7.16e-14 kg; lognormal variance with pedigree 3.51, pedigree (1,1,5,1,1)
  (same comment as for Copper)
- Mercury [air, urban air close to ground]: 0 kg; pedigree (1,1,1,1,1)
  (same comment as for Manganese)
- Lead [water, surface water]: 3.58e-11 kg; lognormal variance with pedigree 2.41, pedigree (1,1,5,1,1)
  (same comment as for Manganese)
- Strontium [water, surface water]: 2.58e-8 kg; lognormal variance with pedigree 1.74, pedigree (1,1,5,1,1)
  (same comment as for Manganese)
- Sodium, ion [water, surface water]: 5.98e-5 kg; lognormal variance with pedigree 0.85, pedigree (1,1,5,1,1)
  Emissions from short-term leachate treatment. Uncertainty calculated depending on waste input and uncertainty of transfer coefficents in landfill and wastewater treatment.
- Bromine [water, surface water]: 1.74e-6 kg; lognormal variance with pedigree 1.31, pedigree (1,1,5,1,1)
  (same comment as for Sodium, ion)
- Cadmium, ion [water, surface water]: 2.91e-9 kg; lognormal variance with pedigree 2.04, pedigree (1,1,5,1,1)
  (same comment as for Manganese)
- Aluminium [air, non-urban air or from high stacks]: 2.46e-11 kg; lognormal variance with pedigree 2.74, pedigree (1,1,5,1,1)
  (same comment as for Copper)
- TOC, Total Organic Carbon [water, ground-, long-term]: 0.141 kg; lognormal variance with pedigree 0.52, pedigree (1,1,5,1,1)
  (same comment as for Mercury)
- Chromium [air, non-urban air or from high stacks]: 1.55e-13 kg; lognormal variance with pedigree 3.4, pedigree (1,1,5,1,1)
  (same comment as for Copper)
- Arsenic [air, urban air close to ground]: 9.47e-13 kg; lognormal variance with pedigree 2.14, pedigree (1,1,5,1,1)
  (same comment as for Manganese)
- Hydrogen fluoride [air, non-urban air or from high stacks]: 4.72e-8 kg; lognormal variance with pedigree 1.77, pedigree (1,1,5,1,1)
  (same comment as for Copper)
- Chromium VI [water, ground-, long-term]: 2.46e-8 kg; lognormal variance with pedigree 8.67, pedigree (1,1,5,1,1)
  (same comment as for Mercury)
- Selenium [water, surface water]: 1.46e-9 kg; lognormal variance with pedigree 2.17, pedigree (1,1,5,1,1)
  (same comment as for Manganese)
- Chromium, ion [water, surface water]: 9.7e-13 kg; lognormal variance with pedigree 2.36, pedigree (1,1,5,1,1)
  (same comment as for Manganese)
- Cobalt [water, ground-, long-term]: 3.1e-5 kg; lognormal variance with pedigree 1.16, pedigree (1,1,5,1,1)
  (same comment as for Mercury)
- Strontium [water, ground-, long-term]: 8.72e-5 kg; lognormal variance with pedigree 1.02, pedigree (1,1,5,1,1)
  (same comment as for Mercury)
- Selenium [air, urban air close to ground]: 0 kg; pedigree (1,1,1,1,1)
  (same comment as for Manganese)
- Nickel [air, urban air close to ground]: 0 kg; pedigree (1,1,1,1,1)
  (same comment as for Manganese)
- Iron [air, non-urban air or from high stacks]: 3.38e-12 kg; lognormal variance with pedigree 2.99, pedigree (1,1,5,1,1)
  (same comment as for Copper)
- Hydrogen chloride [air, non-urban air or from high stacks]: 2.86e-7 kg; lognormal variance with pedigree 1.52, pedigree (1,1,5,1,1)
  (same comment as for Copper)
- Sulfate [water, surface water]: 1.68e-6 kg; lognormal variance with pedigree 1.43, pedigree (1,1,5,1,1)
  (same comment as for Sodium, ion)
- Calcium, ion [water, ground-, long-term]: 0.000295 kg; lognormal variance with pedigree 0.86, pedigree (1,1,5,1,1)
  (same comment as for Mercury)
- Particulates, < 2.5 um [air, non-urban air or from high stacks]: 2.64e-7 kg; lognormal variance with pedigree 0.72, pedigree (1,1,5,1,1)
  (same comment as for Copper)
- Tin [air, urban air close to ground]: 4.48e-14 kg; lognormal variance with pedigree 2.67, pedigree (1,1,5,1,1)
  (same comment as for Manganese)
- Sulfate [water, ground-, long-term]: 0.000411 kg; lognormal variance with pedigree 0.95, pedigree (1,1,5,1,1)
  (same comment as for Mercury)
- Antimony [air, non-urban air or from high stacks]: 4.2e-11 kg; lognormal variance with pedigree 2.67, pedigree (1,1,5,1,1)
  (same comment as for Copper)
- Zinc [air, non-urban air or from high stacks]: 7.23e-12 kg; lognormal variance with pedigree 2.9, pedigree (1,1,5,1,1)
  (same comment as for Copper)
- Thallium [water, ground-, long-term]: 3.94e-7 kg; lognormal variance with pedigree 1.73, pedigree (1,1,5,1,1)
  (same comment as for Mercury)
- Zinc, ion [water, ground-, long-term]: 5.67e-5 kg; lognormal variance with pedigree 1.06, pedigree (1,1,5,1,1)
  (same comment as for Mercury)
- Fluoride [water, ground-, long-term]: 1.18e-5 kg; lognormal variance with pedigree 1.29, pedigree (1,1,5,1,1)
  (same comment as for Mercury)
- Strontium [air, non-urban air or from high stacks]: 1.27e-11 kg; lognormal variance with pedigree 2.83, pedigree (1,1,5,1,1)
  (same comment as for Copper)
- Nitrite [water, ground-, long-term]: 0.00014 kg; lognormal variance with pedigree 0.46, pedigree (1,1,5,1,1)
  (same comment as for Mercury)
- Calcium [air, urban air close to ground]: 6.3e-11 kg; lognormal variance with pedigree 1.51, pedigree (1,1,5,1,1)
  (same comment as for Manganese)
- Nitrogen oxides [air, non-urban air or from high stacks]: 4.16e-8 kg; lognormal variance with pedigree 1.1, pedigree (1,1,5,1,1)
  (same comment as for Copper)
- Sodium, ion [water, ground-, long-term]: 0.00138 kg; lognormal variance with pedigree 0.65, pedigree (1,1,5,1,1)
  (same comment as for Mercury)
- Nitrogen, organic bound [water, ground-, long-term]: 0.0042 kg; lognormal variance with pedigree 0.46, pedigree (1,1,5,1,1)
  (same comment as for Mercury)
- Iron [air, urban air close to ground]: 2.23e-13 kg; lognormal variance with pedigree 1.98, pedigree (1,1,5,1,1)
  (same comment as for Manganese)
- Nitrogen [water, surface water]: 2.12e-6 kg; lognormal variance with pedigree 0.47, pedigree (1,1,5,1,1)
  (same comment as for Manganese)
- Antimony [water, surface water]: 1.14e-7 kg; lognormal variance with pedigree 1.59, pedigree (1,1,5,1,1)
  (same comment as for Manganese)
- DOC, Dissolved Organic Carbon [water, surface water]: 2.47e-5 kg; lognormal variance with pedigree 0.87, pedigree (1,1,5,1,1)
  (same comment as for Manganese)
- Tin [air, non-urban air or from high stacks]: 1.45e-14 kg; lognormal variance with pedigree 3.7, pedigree (1,1,5,1,1)
  (same comment as for Copper)
- Tin, ion [water, surface water]: 2.43e-11 kg; lognormal variance with pedigree 2.64, pedigree (1,1,5,1,1)
  (same comment as for Manganese)
- Dinitrogen monoxide [air, urban air close to ground]: 3.97e-7 kg; lognormal variance with pedigree 0.45, pedigree (1,1,5,1,1)
  (same comment as for Manganese)
- Sulfur dioxide [air, non-urban air or from high stacks]: 1.93e-7 kg; lognormal variance with pedigree 1.65, pedigree (1,1,5,1,1)
  (same comment as for Copper)
- Nickel [air, non-urban air or from high stacks]: 5.73e-13 kg; lognormal variance with pedigree 3.24, pedigree (1,1,5,1,1)
  (same comment as for Copper)
- Titanium, ion [water, surface water]: 2.5e-7 kg; lognormal variance with pedigree 1.44, pedigree (1,1,5,1,1)
  (same comment as for Manganese)
- Nitrate [water, surface water]: 0.000285 kg; lognormal variance with pedigree 0.46, pedigree (1,1,5,1,1)
  (same comment as for Manganese)
- BOD5, Biological Oxygen Demand [water, surface water]: 3.2e-5 kg; lognormal variance with pedigree 0.87, pedigree (1,1,5,1,1)
  (same comment as for Manganese)
- Ammonia [air, urban air close to ground]: 1.44e-7 kg; lognormal variance with pedigree 0.5, pedigree (1,1,5,1,1)
  (same comment as for Manganese)
- Chloride [water, surface water]: 1.99e-5 kg; lognormal variance with pedigree 0.99, pedigree (1,1,5,1,1)
  (same comment as for Sodium, ion)
- Calcium [air, non-urban air or from high stacks]: 9.63e-11 kg; lognormal variance with pedigree 2.57, pedigree (1,1,5,1,1)
  (same comment as for Copper)
- Copper, ion [water, surface water]: 1.5e-10 kg; lognormal variance with pedigree 2.34, pedigree (1,1,5,1,1)
  (same comment as for Manganese)
- Thallium [water, surface water]: 1.16e-10 kg; lognormal variance with pedigree 2.46, pedigree (1,1,5,1,1)
  (same comment as for Manganese)
- Selenium [water, ground-, long-term]: 5.84e-7 kg; lognormal variance with pedigree 1.92, pedigree (1,1,5,1,1)
  (same comment as for Mercury)
- Lead [water, ground-, long-term]: 5.52e-6 kg; lognormal variance with pedigree 1.39, pedigree (1,1,5,1,1)
  (same comment as for Mercury)
- Barium [water, ground-, long-term]: 4.92e-5 kg; lognormal variance with pedigree 1.08, pedigree (1,1,5,1,1)
  (same comment as for Mercury)
- Nickel, ion [water, ground-, long-term]: 3.94e-6 kg; lognormal variance with pedigree 1.43, pedigree (1,1,5,1,1)
  (same comment as for Mercury)
- Antimony [air, urban air close to ground]: 8.27e-12 kg; lognormal variance with pedigree 2.23, pedigree (1,1,5,1,1)
  (same comment as for Manganese)
- Chloride [water, ground-, long-term]: 0.000768 kg; lognormal variance with pedigree 0.73, pedigree (1,1,5,1,1)
  (same comment as for Mercury)
- Cadmium, ion [water, ground-, long-term]: 3.25e-6 kg; lognormal variance with pedigree 1.46, pedigree (1,1,5,1,1)
  (same comment as for Mercury)
- Iron, ion [water, surface water]: 6.87e-9 kg; lognormal variance with pedigree 1.92, pedigree (1,1,5,1,1)
  (same comment as for Manganese)
- Chromium [air, urban air close to ground]: 0 kg; pedigree (1,1,1,1,1)
  (same comment as for Manganese)
- Beryllium [water, ground-, long-term]: 4.93e-7 kg; lognormal variance with pedigree 1.7, pedigree (1,1,5,1,1)
  (same comment as for Mercury)
- Methane, fossil [air, urban air close to ground]: 9.06e-7 kg; lognormal variance with pedigree 0.92, pedigree (1,1,5,1,1)
  (same comment as for Manganese)
- Manganese [air, non-urban air or from high stacks]: 5.08e-11 kg; lognormal variance with pedigree 2.66, pedigree (1,1,5,1,1)
  (same comment as for Copper)
- Nitrate [water, ground-, long-term]: 0.00027 kg; lognormal variance with pedigree 0.46, pedigree (1,1,5,1,1)
  (same comment as for Mercury)
- Calcium, ion [water, surface water]: 3.47e-7 kg; lognormal variance with pedigree 1.48, pedigree (1,1,5,1,1)
  (same comment as for Manganese)
- Arsenic, ion [water, ground-, long-term]: 1.87e-6 kg; lognormal variance with pedigree 1.53, pedigree (1,1,5,1,1)
  (same comment as for Mercury)
- Carbon monoxide, fossil [air, urban air close to ground]: 3e-7 kg; lognormal variance with pedigree 0.92, pedigree (1,1,5,1,1)
  (same comment as for Manganese)
- Bromine [air, non-urban air or from high stacks]: 2.44e-8 kg; lognormal variance with pedigree 1.84, pedigree (1,1,5,1,1)
  (same comment as for Copper)
- Vanadium [air, urban air close to ground]: 6.66e-11 kg; lognormal variance with pedigree 1.36, pedigree (1,1,5,1,1)
  (same comment as for Manganese)
- Vanadium, ion [water, surface water]: 6.86e-7 kg; lognormal variance with pedigree 1.31, pedigree (1,1,5,1,1)
  (same comment as for Manganese)
- Carbon dioxide, fossil [air, urban air close to ground]: 0.000463 kg; lognormal variance with pedigree 0.87, pedigree (1,1,5,1,1)
  (same comment as for Manganese)
- Methane, fossil [air, non-urban air or from high stacks]: 0.00213 kg; lognormal variance with pedigree 0.46, pedigree (1,1,5,1,1)
  (same comment as for Copper)
- COD, Chemical Oxygen Demand [water, surface water]: 0.000102 kg; lognormal variance with pedigree 0.87, pedigree (1,1,5,1,1)
  (same comment as for Manganese)
- Copper [air, urban air close to ground]: 3.17e-15 kg; lognormal variance with pedigree 2.41, pedigree (1,1,5,1,1)
  (same comment as for Manganese)
- Hydrogen sulfide [water, ground-, long-term]: 1.07e-5 kg; lognormal variance with pedigree 0.95, pedigree (1,1,5,1,1)
  (same comment as for Mercury)
- Zinc, ion [water, surface water]: 1.01e-8 kg; lognormal variance with pedigree 1.8, pedigree (1,1,5,1,1)
  (same comment as for Manganese)
- Titanium, ion [water, ground-, long-term]: 0.000985 kg; lognormal variance with pedigree 0.7, pedigree (1,1,5,1,1)
  (same comment as for Mercury)
- Selenium [air, non-urban air or from high stacks]: 5.46e-13 kg; lognormal variance with pedigree 3.25, pedigree (1,1,5,1,1)
  (same comment as for Copper)
- Manganese [water, ground-, long-term]: 1.72e-5 kg; lognormal variance with pedigree 1.22, pedigree (1,1,5,1,1)
  (same comment as for Mercury)
- Nickel, ion [water, surface water]: 1.39e-9 kg; lognormal variance with pedigree 2.15, pedigree (1,1,5,1,1)
  (same comment as for Manganese)
- Aluminium [water, surface water]: 5.92e-9 kg; lognormal variance with pedigree 1.66, pedigree (1,1,5,1,1)
  (same comment as for Manganese)
- Fluoride [water, surface water]: 8.69e-9 kg; lognormal variance with pedigree 1.98, pedigree (1,1,5,1,1)
  (same comment as for Sodium, ion)
- Mercury [water, surface water]: 1.92e-11 kg; lognormal variance with pedigree 2.66, pedigree (1,1,5,1,1)
  (same comment as for Manganese)
- Cyanide [air, urban air close to ground]: 4.05e-9 kg; lognormal variance with pedigree 0.6, pedigree (1,1,5,1,1)
  (same comment as for Manganese)
- Cadmium [air, non-urban air or from high stacks]: 3.82e-11 kg; lognormal variance with pedigree 2.69, pedigree (1,1,5,1,1)
  (same comment as for Copper)
- Antimony [water, ground-, long-term]: 1.6e-5 kg; lognormal variance with pedigree 2.26, pedigree (1,1,5,1,1)
  (same comment as for Mercury)
- BOD5, Biological Oxygen Demand [water, ground-, long-term]: 0.0364 kg; lognormal variance with pedigree 0.52, pedigree (1,1,5,1,1)
  (same comment as for Mercury)
- Cobalt [water, surface water]: 5.07e-8 kg; lognormal variance with pedigree 1.66, pedigree (1,1,5,1,1)
  (same comment as for Manganese)

## Sampling procedure
Landfill model based on observed leachate concentrations in literature. Extrapolated to 60'000 years heeding chemical characteristics. Initial waste composition from various literature sources.

## Extrapolations
This dataset has been extrapolated from year 2000 to the year of the calculation (2021). The uncertainty has been adjusted accordingly.

## Review by Niels Jungbluth 2003-07-21
Passed. Calculation for standard deviation 95 of, i.e., infrastructure,
land occupation, transport services or other services can differ from
standard Pedigree approach used in this project and figures obtained by
this procedure.
