# machine operation, diesel, >= 18.64 kW and < 74.57 kW, underground mining

Dataset: EcoSpold 2, unit process
Geography: GLO
Time period: 2014-01-01 to 2021-12-31
Technology level: current
Classification: EcoSpold01Categories: construction processes/machinery
Classification: ISIC rev.4 ecoinvent: 4312:Site preparation
Tags: template dataset
Scenario: Business-as-Usual
System model: Allocation, cut-off by classification
Generated by: Jean-Francois Menard
Published in: Kellenberger D. 2007
Database: ecoinvent
isCopyrightProtected: true
accessRestrictedTo: 1

## General comment
This dataset represents the operation of underground mining machines. The U.S. EPA NONROAD2008 model for off-road machines has been used as basis for this dataset, it refers to engine power in units of horsepower (hp), the engine power range for the dataset is then >= 25 kW and < 100 kW. The fuel consumption and emission factors from the model have been kept in the original units of kg/hp.hour for transparency reasons. However the engine power parameter used as input data for the dataset is quantified in the SI power unit of kilowatt (kW). The functional unit is 1 hour of operation.
The fuel consumption and basic emission factors are generated by the U.S. EPA NONROAD2008 model for off-road machines. Supplementary emissions are provided by the U.S. EPA NMIM model and copied directly from the ecoinvent v3.0 dataset "diesel burned in building machine, GLO 2001". The building machine infrastructure and lubricating oil input and waste output have been copied from the same ecoinvent dataset.
This dataset is a template dataset and has been parameterized for the machine power (in kW), emission standard (referred to as "tier" by the U.S EPA, the European equivalents would be the Stage I to IV standards published by the European Commission) and load factor to enable the creation of specific instances. To do so, the tier fraction (e.g. T0) and power (e.g. T0_kW), and the load factor parameters could be changed to reflect a specific situation/machine. The diesel fuel sulfur content (see Exchange Properties) could also be changed (the ultra-low sulfur nonroad diesel sulfur content of 0,0015% or 15 ppm, effective June 2010 in the United States of America is used as default).

## Included activities end
Includes the inputs " building machine" for infrastructure, lubricating oil and fuel consumption, and air emissions and waste oil as outputs.

## Geography
Fuel flow and most emission flows are extrapolated from US conditions, some emission flows and the other intermediate product flows (building machine, lubricating oil) are extrapolated from RER and CH conditions. The uncertainty has been adjusted accordingly.

## Technology
Average current technology for one typical machine representing the category.

## Parameters
- particulates <= 10 um emissions tier T4-T4A for hp < 50: 0.0006688 kg/hp*h; name T44A_PM10_50hp; lognormal variance with pedigree 0.218, pedigree (4,5,5,5,4)
  Literature value. Taken from the NONROAD2008 model.
- total hydrocarbon emissions tier T2-T3B-T4-T4A-T4N for hp < 100: 0.00084 kg/hp*h; name T23B44AN_thc_100hp; lognormal variance with pedigree 0.138, pedigree (4,5,5,5,4)
  Literature value. Taken from the NONROAD2008 model.
- particulates <= 10 um emissions tier T0-T1 for hp < 50: 0.00158 kg/hp*h; name T01_PM10_50hp; lognormal variance with pedigree 0.218, pedigree (4,5,5,5,4)
  Literature value. Taken from the NONROAD2008 model.
- particulates <= 10 um emissions tier T3B-T4-T4A-T4N for hp < 100: 0.0004736 kg/hp*h; name T3B44AN_PM10_100hp; lognormal variance with pedigree 0.218, pedigree (4,5,5,5,4)
  Literature value. Taken from the NONROAD2008 model.
- power tier T4N: 68.9698 kW; name T4N_kW; lognormal variance with pedigree 0.0986, pedigree (4,5,5,5,4)
  Calculated value. Represents the average engine nominal power of the US (lower 48 states) 2014 machine population of the type represented by this dataset (>= 18.64 kW and < 74.57 kW, underground mining) for which the model year falls under the tier T4N emission standard (from 2014 for machines >= 55.93 kW). Value calculated from the population data included in the NONROAD2008 model. The NONROAD2008 data is given in the unit of horsepower, the "horsepower to kilowatt conversion factor" parameter was used to convert the result in kW, the SI unit of power.
  Basic parameter used to define the machine population represented by the dataset, could be changed to create a new instance of the dataset to reflect a specific situation/machine.
- total hydrocarbon emissions: 0.0142249 kg; name THC; = (T0*T0_kW/hp_to_kW*if(T0_kW/hp_to_kW<50;T01_thc_50hp;T01_thc_100hp)+T1*T1_kW/hp_to_kW*if(T1_kW/hp_to_kW<50;T01_thc_50hp;T01_thc_100hp)+T2*T2_kW/hp_to_kW*if(T2_kW/hp_to_kW<50;T244A_thc_50hp;T23B44AN_thc_100hp)+T3B*T3B_kW/hp_to_kW*T23B44AN_thc_100hp+T4A*T4A_kW/hp_to_kW*if(T4A_kW/hp_to_kW<50;T244A_thc_50hp;T23B44AN_thc_100hp)+T4*T4_kW/hp_to_kW*if(T4_kW/hp_to_kW<50;T244A_thc_50hp;T23B44AN_thc_100hp)+T4N*T4N_kW/hp_to_kW*T23B44AN_thc_100hp)*load; lognormal variance with pedigree 0, pedigree (1,1,1,1,1)
  Calculated value. Represents the emissions per hour of operation of the US weigthed average machine represented by this dataset (>= 18.64 kW and < 74.57 kW, underground mining).
  Uncertainty: Calculated variable. Uncertainty should be determined from propagation of uncertainty factors of underlying variables, however no uncertainty could be generated for the terms of the power function. Uncertainty of actual relation between variables not accounted at this time, although this could be included in a future update.
- power tier T2: 0 kW; name T2_kW
  Calculated value. Represents the average engine nominal power of the US (lower 48 states) 2014 machine population of the type represented by this dataset (>= 18.64 kW and < 74.57 kW, underground mining) for which the model year falls under the tier T2 emission standard (from 2004 to 2008). Value calculated from the population data included in the NONROAD2008 model. The NONROAD2008 data is given in the unit of horsepower, the "horsepower to kilowatt conversion factor" parameter was used to convert the result in kW, the SI unit of power.
  Basic parameter used to define the machine population represented by the dataset, could be changed to create a new instance of the dataset to reflect a specific situation/machine.
- horsepower to kilowatt conversion factor: 0.7457 dimensionless; name hp_to_kW; lognormal variance with pedigree 0, pedigree (1,1,1,1,1)
  Literature value. Taken from http://en.wikipedia.org/wiki/Horsepower.
- power tier T0: 0 kW; name T0_kW
  Calculated value. Represents the average engine nominal power of the US (lower 48 states) 2014 machine population of the type represented by this dataset (>= 18.64 kW and < 74.57 kW, underground mining) for which the model year falls under the tier T0 emission standard (pre-1999 for machines < 37.28 kW, and pre-1998 for machines >=37.28 kW). Value calculated from the population data included in the NONROAD2008 model. The NONROAD2008 data is given in the unit of horsepower, the "horsepower to kilowatt conversion factor" parameter was used to convert the result in kW, the SI unit of power.
  Basic parameter used to define the machine population represented by the dataset, could be changed to create a new instance of the dataset to reflect a specific situation/machine.
- power tier T3B: 68.9698 kW; name T3B_kW; lognormal variance with pedigree 0.0986, pedigree (4,5,5,5,4)
  Calculated value. Represents the average engine nominal power of the US (lower 48 states) 2014 machine population of the type represented by this dataset (>= 18.64 kW and < 74.57 kW, underground mining) for which the model year falls under the tier T3B emission standard (from 2008 to 2011 for machines >= 55.93 kW). Value calculated from the population data included in the NONROAD2008 model. The NONROAD2008 data is given in the unit of horsepower, the "horsepower to kilowatt conversion factor" parameter was used to convert the result in kW, the SI unit of power.
  Basic parameter used to define the machine population represented by the dataset, could be changed to create a new instance of the dataset to reflect a specific situation/machine.
- power tier T4: 53.6222 kW; name T4_kW; lognormal variance with pedigree 0.0986, pedigree (4,5,5,5,4)
  Calculated value. Represents the average engine nominal power of the US (lower 48 states) 2014 machine population of the type represented by this dataset (>= 18.64 kW and < 74.57 kW, underground mining) for which the model year falls under the tier T4 emission standard (from 2013 for machines < 55.93 kW, and from 2012 to 2013 for machines >= 55.93 kW). Value calculated from the population data included in the NONROAD2008 model. The NONROAD2008 data is given in the unit of horsepower, the "horsepower to kilowatt conversion factor" parameter was used to convert the result in kW, the SI unit of power.
  Basic parameter used to define the machine population represented by the dataset, could be changed to create a new instance of the dataset to reflect a specific situation/machine.
- particulates <= 10 um emissions tier T2 for hp < 100: 0.00047 kg/hp*h; name T2_PM10_100hp; lognormal variance with pedigree 0.218, pedigree (4,5,5,5,4)
  Literature value. Taken from the NONROAD2008 model.
- particulates <= 10 um emissions tier T2 for hp < 50: 0.00067 kg/hp*h; name T2_PM10_50hp; lognormal variance with pedigree 0.218, pedigree (4,5,5,5,4)
  Literature value. Taken from the NONROAD2008 model.
- fraction tier T2: 0 dimensionless; name T2
  Calculated value. Represents the fraction of the US (lower 48 states) 2014 machine population of the type represented by this dataset (>= 18.64 kW and < 74.57 kW, unerground mining) for which the model year falls under the tier T2 emission standard (from 2004 to 2008). Value calculated from the population data included in the NONROAD2008 model.
  Basic parameter used to define the machine population represented by the dataset, could be changed to create a new instance of the dataset to reflect a specific situation/machine.
- power tier T1: 56.8559 kW; name T1_kW; lognormal variance with pedigree 0.0986, pedigree (4,5,5,5,4)
  Calculated value. Represents the average engine nominal power of the US (lower 48 states) 2014 machine population of the type represented by this dataset (>= 18.64 kW and < 74.57 kW, underground mining) for which the model year falls under the tier T1 emission standard (from 1999 to 2003 for machines < 37.28 kW, and from 1998 to 2003 for machines >= 37.28 kW). Value calculated from the population data included in the NONROAD2008 model. The NONROAD2008 data is given in the unit of horsepower, the "horsepower to kilowatt conversion factor" parameter was used to convert the result in kW, the SI unit of power.
  Basic parameter used to define the machine population represented by the dataset, could be changed to create a new instance of the dataset to reflect a specific situation/machine.
- fraction tier T3B: 0.0669492 dimensionless; name T3B
  Calculated value. Represents the fraction of the US (lower 48 states) 2014 machine population of the type represented by this dataset (>= 18.64 kW and < 74.57 kW, underground mining) for which the model year falls under the tier T3B emission standard (from 2008 to 2011 for machines >= 55.93 kW). Value calculated from the population data included in the NONROAD2008 model.
  Basic parameter used to define the machine population represented by the dataset, could be changed to create a new instance of the dataset to reflect a specific situation/machine.
- fraction tier T0: 0 dimensionless; name T0
  Calculated value. Represents the fraction of the US (lower 48 states) 2014 machine population of the type represented by this dataset (>= 18.64 kW and < 74.57 kW, underground mining) for which the model year falls under the tier T0 emission standard (pre-1999 for machines < 37.28 kW, and pre-1998 for machines >=37.28 kW). Value calculated from the population data included in the NONROAD2008 model.
  Basic parameter used to define the machine population represented by the dataset, could be changed to create a new instance of the dataset to reflect a specific situation/machine.
- fraction tier T4N: 0.411017 dimensionless; name T4N
  Calculated value. Represents the fraction of the US (lower 48 states) 2014 machine population of the type represented by this dataset (>= 18.64 kW and < 74.57 kW, underground mining) for which the model year falls under the tier T4N emission standard (from 2014 for machines >= 55.93 kW). Value calculated from the population data included in the NONROAD2008 model.
  Basic parameter used to define the machine population represented by the dataset, could be changed to create a new instance of the dataset to reflect a specific situation/machine.
- fraction tier T1: 0.00169491 dimensionless; name T1
  Calculated value. Represents the fraction of the US (lower 48 states) 2014 machine population of the type represented by this dataset (>= 18.64 kW and < 74.57 kW, underground mining) for which the model year falls under the tier T1 emission standard (from 1999 to 2003 for machines < 37.28 kW, and from 1998 to 2003 for machines >= 37.28 kW). Value calculated from the population data included in the NONROAD2008 model.
  Basic parameter used to define the machine population represented by the dataset, could be changed to create a new instance of the dataset to reflect a specific situation/machine.
- fraction tier T4: 0.419492 dimensionless; name T4
  Calculated value. Represents the fraction of the US (lower 48 states) 2014 machine population of the type represented by this dataset (>= 18.64 kW and < 74.57 kW, underground mining) for which the model year falls under the tier T4 emission standard (from 2013 for machines < 55.93 kW, and from 2012 to 2013 for machines >= 55.93 kW). Value calculated from the population data included in the NONROAD2008 model.
  Basic parameter used to define the machine population represented by the dataset, could be changed to create a new instance of the dataset to reflect a specific situation/machine.
- fraction tier T4A: 0.100847 dimensionless; name T4A
  Calculated value. Represents the fraction of the US (lower 48 states) 2014 machine population of the type represented by this dataset (>= 18.64 kW and < 74.57 kW, underground mining) for which the model year falls under the tier T4A emission standard (from 2008 to 2012 for machines < 55.93 kW). Value calculated from the population data included in the NONROAD2008 model.
  Basic parameter used to define the machine population represented by the dataset, could be changed to create a new instance of the dataset to reflect a specific situation/machine.
- total particulates <= 10 um emissions: 0.00802395 kg; name PM10; = (T0*T0_kW/hp_to_kW*if(T0_kW/hp_to_kW<50;T01_PM10_50hp;T01_PM10_100hp)+T1*T1_kW/hp_to_kW*if(T1_kW/hp_to_kW<50;T01_PM10_50hp;T01_PM10_100hp)+T2*T2_kW/hp_to_kW*if(T2_kW/hp_to_kW<50;T2_PM10_50hp;T2_PM10_100hp)+T3B*T3B_kW/hp_to_kW*T3B44AN_PM10_100hp+T4*T4_kW/hp_to_kW*if(T4_kW/hp_to_kW<50;T44A_PM10_50hp;T3B44AN_PM10_100hp)+T4A*T4A_kW/hp_to_kW*if(T4A_kW/hp_to_kW<50;T44A_PM10_50hp;T3B44AN_PM10_100hp)+T4N*T4N_kW/hp_to_kW*T3B44AN_PM10_100hp)*load; lognormal variance with pedigree 0, pedigree (1,1,1,1,1)
  (same comment as for total hydrocarbon emissions)
- volatile organic compound emissions ratio: 1.053 dimensionless; name VOC_to_THC; lognormal variance with pedigree 0.138, pedigree (4,5,5,5,4)
  Literature value. Taken from the NONROAD2008 model.
- load factor: 0.21 dimensionless; name load; lognormal variance with pedigree 0.0986, pedigree (4,5,5,5,4)
  Literature value. Represents the average fraction of the nominal engine power output used by the machine during its normal work cycle. Taken from the NONROAD2008 model.
  As cited in the U.S. EPA NONROAD2008 model documentation (Median Life, Annual Activity, and Load Factor Values for Nonroad engine Emissions Modeling, NR-005d, 47 pp, EPA-420-R-10-016, July 2010, http://www.epa.gov/oms/models/nonrdmdl/nonrdmdl2010/420r10016.pdf), "Each diesel nonroad equipment type was assigned one of three composite load factors (High load factor or 0.59, Low load factor or 0.21, or 7-cycle average, i.e. steady-state, or 0.43). To apply these load factors, we matched nonroad applications with the test cycle that most closely represents the nonroad activity for the application".
  Basic parameter used to define the machine population represented by the dataset, could be changed to create a new instance of the dataset to reflect a specific situation/machine.
- total volatile organic compound emissions: 0.0149788 kg; name VOC; = THC*VOC_to_THC; lognormal variance with pedigree 0, pedigree (1,1,1,1,1)
  (same comment as for total hydrocarbon emissions)
- power tier T4A: 43.7657 kW; name T4A_kW; lognormal variance with pedigree 0.0986, pedigree (4,5,5,5,4)
  Calculated value. Represents the average engine nominal power of the US (lower 48 states) 2014 machine population of the type represented by this dataset (>= 18.64 kW and < 74.57 kW, underground mining) for which the model year falls under the tier T4A emission standard (from 2008 to 2012 for machines < 55.93 kW). Value calculated from the population data included in the NONROAD2008 model. The NONROAD2008 data is given in the unit of horsepower, the "horsepower to kilowatt conversion factor" parameter was used to convert the result in kW, the SI unit of power.
  Basic parameter used to define the machine population represented by the dataset, could be changed to create a new instance of the dataset to reflect a specific situation/machine.
- total hydrocarbon emissions tier T0-T1 for hp < 100: 0.00227 kg/hp*h; name T01_thc_100hp; lognormal variance with pedigree 0.138, pedigree (4,5,5,5,4)
  Literature value. Taken from the NONROAD2008 model.
- total hydrocarbon emissions tier T0-T1 for hp < 50: 0.00413 kg/hp*h; name T01_thc_50hp; lognormal variance with pedigree 0.138, pedigree (4,5,5,5,4)
  Literature value. Taken from the NONROAD2008 model.
- total hydrocarbon emissions tier T2-T4-T4A for hp < 50: 0.00064 kg/hp*h; name T244A_thc_50hp; lognormal variance with pedigree 0.138, pedigree (4,5,5,5,4)
  Literature value. Taken from the NONROAD2008 model.
- particulates <= 10 um emissions tier T0-T1 for hp < 100: 0.00142 kg/hp*h; name T01_PM10_100hp; lognormal variance with pedigree 0.218, pedigree (4,5,5,5,4)
  Literature value. Taken from the NONROAD2008 model.

## Reference product
- machine operation, diesel, >= 18.64 kW and < 74.57 kW, underground mining: 1 hour; name RefProd; By-product classification allocatable product; CPC 543: Site preparation services
  production volume 4 hour; name ProdVol
    This is a placeholder value that does not reflect real-world production volumes. This dataset does not currently require a real-world production volume to work in the database framework, and no actual data were collected yet. This has no negative effect on the results of the ecoinvent database.
  property price 1.74499 EUR2005; name RefProd_price_EUR2005
    Calculated based on inputs: The price of the product has been calculated as a sum of the values of the material and energy inputs for this product. This value is therefore a rough estimation. It may underestimate the real price since there are additional expenses when producing any product. These expences can include for example labour costs, treatment of waste materials and profit for the producer. Please consider carefully whether this level of data quality is acceptable for your application.

## Inputs from technosphere
- lubricating oil: 0 kg; name oil; pedigree (1,1,1,1,1)
  Calculated value (see Exchange Properties).
  EcoSpold01Location=RER
  Uncertainty: Calculated variable. Uncertainty should be determined from propagation of uncertainty factors of underlying variables, however no uncertainty could be generated for the terms of the power function. Uncertainty of actual relation between variables not accounted at this time, although this could be included in a future update.
  property consumption ratio 0.022; name oil_ratio
  properties: wet mass 1 kg, dry mass 1 kg, carbon content, fossil 0.75, heating value, net 40.2 MJ
  note on consumption ratio: Calculated value. The consumption value has been taken directly from the ecoinvent v3.0 dataset "diesel, burned in building machine, GLO 2001" and divided by the diesel fuel consumption indicated in the same dataset (0,0234 kg) to obtain the consumption ratio per kg of diesel fuel.
  note on carbon content, fossil: Lubricating oil is produced from diesel. C-content/dry mass of fats and oils considered 75%, from: ecoinvent v2.2 report, n 15a, pg 40
  note on heating value, net: Literature value, Source: IPCC 2006, 2006 IPCC Guidelines for National Greenhouse Gas Inventories, Prepared by the National Greenhouse Gas Inventories Programme, Eggleston H.S., Buendia L., Miwa K., Ngara T. and Tanabe K. (eds). Published: IGES, Japan
- building machine: 2.11133e-5 unit; = diesel*machine_ratio; lognormal variance with pedigree 0.002, pedigree (1,1,3,1,1)
  (same comment as for lubricating oil)
  property consumption ratio 5.73e-6; name machine_ratio
- waste mineral oil: 0 kg; name waste_oil; pedigree (1,1,1,1,1)
  EcoSpold01Location=CH
  Uncertainty: Calculated variable. Uncertainty should be determined from propagation of uncertainty factors of underlying variables, however no uncertainty could be generated for the terms of the power function. Uncertainty of actual relation between variables not accounted at this time, although this could be included in a future update.
  production volume 0 kg
    Calculated from production volume of reference product using the relative outputs.
  property price 0 EUR2005; name waste_oil_price_EUR2005
  properties: dry mass 0.9 kg, wet mass 1 kg, carbon content, fossil 0.864444, water content 0.111111, heating value, net 34.7 MJ
  note on carbon content, fossil: Tab A.6, ecoinvent v2.2 report 13_I. C content has been calculated after data in the tables, and then referred to 1 kg DM
  note on heating value, net: Value taken from the general comment of the treatment dataset.
- diesel: 3.6847 kg; = (T0*T0_kW/hp_to_kW+T1*T1_kW/hp_to_kW+T2*T2_kW/hp_to_kW+T3B*T3B_kW/hp_to_kW+T4*T4_kW/hp_to_kW+T4A*T4A_kW/hp_to_kW+T4N*T4N_kW/hp_to_kW)*T0123B44AN_diesel_100hp*load; lognormal variance with pedigree 0.002, pedigree (1,1,3,1,1)
  EcoSpold01Location=RER
  Calculated value. Represents the diesel fuel consumption per hour of operation of the US weigthed average machine represented by this dataset (>= 18.64 kW and < 74.57 kW, underground mining).
  Uncertainty: Calculated variable. Uncertainty should be determined from propagation of uncertainty factors of underlying variables, however no uncertainty could be generated for the terms of the power function. Uncertainty of actual relation between variables not accounted at this time, although this could be included in a future update.
  property fuel consumption tier T0-T1-T2-T3B-T4-T4A-T4N for hp < 100 0.218182 kg/hp*h; name T0123B44AN_diesel_100hp
  property sulfur content 1.5e-5; name diesel_S_content
  property carbon content, fossil 0.865; name diesel_C
  properties: dry mass 1 kg, wet mass 1 kg, heating value, net 42.8 MJ
  note on sulfur content: sulfur content on a dry matter basis. Basic parameter used to define the diesel fuel sulfur content (the default value is the ultra-low sulfur nonroad diesel sulfur content, effective June 2010 in the United States of America), could be changed to create a new instance of the dataset to reflect a specific situation/machine.
  note on carbon content, fossil: C-content of diesel is 86.5% (ecoinvent v2.2 report 6_IV, Tab 3.14)
- lubricating oil: 0.014105, 0.0669584 kg (2 entries); lognormal variance with pedigree 0.002, pedigree (1,1,3,1,1)
  (same comment as for lubricating oil)
  properties: wet mass 1 kg, consumption ratio 0.022, dry mass 1 kg, carbon content, fossil 0.75, heating value, net 40.2 MJ
- waste mineral oil: -0.0222512, -0.000550851, -0.0582614 kg (3 entries); lognormal variance with pedigree 0.002, pedigree (1,1,3,1,1)
  (same comment as for waste mineral oil)
  production volume 0.324254 kg

## Inputs from nature
- Oxygen [natural resource, in air]: 8.56553 kg; = acetaldehyde*acetaldehyde_O+acrolein*acrolein_O+formaldehyde*formaldehyde_O+propanal*propanal_O+N2O*N2O_O+NOx*NOx_O+CO*CO_O+CO2*CO2_O+dioxins*dioxins_O+SO2*SO2_O; lognormal variance with pedigree 0.002, pedigree (1,1,3,1,1)
  Calculated value.
  Uncertainty: Calculated variable. Uncertainty should be determined from propagation of uncertainty factors of underlying variables, however no uncertainty could be generated for the terms of the power function. Uncertainty of actual relation between variables not accounted at this time, although this could be included in a future update.

## Emissions to nature
- Benzo(b)fluoranthene [air, unspecified]: 3.93174e-9 kg; name benzoBfluoranthene; = PM10*benzoBfluoranthene_ratio; lognormal variance with pedigree 0.3201, pedigree (1,5,3,3,1)
  Calculated value (see Exchange Properties).
  property emission ratio 4.9e-7 kg/kg; name benzoBfluoranthene_ratio
  property carbon content, fossil 0.952065; name benzoBfluoranthene_C
- Acenaphthylene [air, unspecified]: 6.74012e-7 kg; name acenaphthylene; = PM10*acenaphthylene_ratio; lognormal variance with pedigree 0.002, pedigree (1,1,3,1,1)
  Calculated value (see Exchange Properties).
  Uncertainty: Calculated variable. Uncertainty should be determined from propagation of uncertainty factors of underlying variables, however no uncertainty could be generated for the terms of the power function. Uncertainty of actual relation between variables not accounted at this time, although this could be included in a future update.
  property emission ratio 8.4e-5 kg/kg; name acenaphthylene_ratio
  property carbon content, fossil 0.947021; name acenaphthylene_C
- Particulates, < 2.5 um [air, unspecified]: 0.00778323 kg; name PM25; = PM10*PM25_ratio; lognormal variance with pedigree 0.002, pedigree (1,1,3,1,1)
  (same comment as for Acenaphthylene)
  property carbon content, fossil 0.922582; name PM_C
  property emission ratio 0.97 kg/kg; name PM25_ratio
- Benz(a)anthracene [air, unspecified]: 5.69701e-9 kg; name benzAanthracene; = PM10*benzAanthracene_ratio; lognormal variance with pedigree 0.002, pedigree (1,1,3,1,1)
  (same comment as for Acenaphthylene)
  property emission ratio 7.1e-7 kg/kg; name benzAanthracene_ratio
  property carbon content, fossil 0.947021; name benzAanthracene_C
- Acenaphthene [air, unspecified]: 8.02395e-7 kg; name acenaphthene; = PM10*acenaphthene_ratio; lognormal variance with pedigree 0.002, pedigree (1,1,3,1,1)
  (same comment as for Acenaphthylene)
  property carbon content, fossil 0.934641; name acenaphthene_C
  property emission ratio 0.0001 kg/kg; name acenaphthene_ratio
- Nitrogen oxides [air, unspecified]: 0.0877156 kg; name NOx; = ((T0*T0_kW/hp_to_kW+T1*T1_kW/hp_to_kW)*T01_nox_100hp+T2*T2_kW/hp_to_kW*if(T2_kW/hp_to_kW<50;T244A_nox_50hp;T23B44AN_nox_100hp)+T3B*T3B_kW/hp_to_kW*T23B44AN_nox_100hp+T4A*T4A_kW/hp_to_kW*if(T4A_kW/hp_to_kW<50;T244A_nox_50hp;T23B44AN_nox_100hp)+T4*T4_kW/hp_to_kW*if(T4_kW/hp_to_kW<50;T244A_nox_50hp;T23B44AN_nox_100hp)+T4N*T4N_kW/hp_to_kW*T23B44AN_nox_100hp)*load; lognormal variance with pedigree 0.002, pedigree (1,1,3,1,1)
  (same comment as for total hydrocarbon emissions)
  property nitrogen oxides emissions tier T2-T4-T4A for hp < 50 0.00522 kg/hp*h; name T244A_nox_50hp
  property nitrogen oxides emissions tier T0-T1 for hp < 100 0.00761 kg/hp*h; name T01_nox_100hp
  property nitrogen oxides emissions tier T2-T4-T4A for hp < 75 0.00519 kg/hp*h; name T23B44AN_nox_100hp
  property oxygen content 0.695533; name NOx_O
- Anthracene [air, unspecified]: 3.4503e-9 kg; name anthracene; = PM10*anthracene_ratio; lognormal variance with pedigree 0.002, pedigree (1,1,3,1,1)
  (same comment as for Acenaphthylene)
  property emission ratio 4.3e-7 kg/kg; name anthracene_ratio
  property carbon content, fossil 0.94345; name anthracene_C
- Butadiene [air, unspecified]: 2.78846e-5 kg; name butadiene; = VOC*butadiene_ratio; lognormal variance with pedigree 0.002, pedigree (1,1,3,1,1)
  (same comment as for Acenaphthylene)
  property carbon content, fossil 0.8882; name butadiene_C
  property emission ratio 0.0018616 kg/kg; name butadiene_ratio
- Copper [air, unspecified]: 6.26399e-6 kg; = diesel*copper_ratio; lognormal variance with pedigree 0.002, pedigree (1,1,3,1,1)
  (same comment as for Acenaphthylene)
  property emission ratio 1.7e-6 kg/kg; name copper_ratio
- 2,2,4-Trimethyl pentane [air, unspecified]: 1.07733e-5 kg; name trimethylpentane; = VOC*trimethylpentane_ratio; lognormal variance with pedigree 0.002, pedigree (1,1,3,1,1)
  (same comment as for Acenaphthylene)
  property emission ratio 0.000719235 kg/kg; name trimethylpentane_ratio
  property carbon content, fossil 0.841179; name trimethylpentane_C
- Carbon dioxide, fossil [air, unspecified]: 11.614 kg; name CO2; = (diesel*diesel_C-trimethylpentane*trimethylpentane_C-acenaphthene*acenaphthene_C-acenaphthylene*acenaphthylene_C-acetaldehyde*acetaldehyde_C-acrolein*acrolein_C-anthracene*anthracene_C-benzAanthracene*benzAanthracene_C-benzene*benzene_C-ethylbenzene*ethylbenzene_C-benzoApyrene*benzoApyrene_C-benzoBfluoranthene*benzoBfluoranthene_C-benzoGHIperylene*benzoGHIperylene_C-benzoKfluoranthene*benzoKfluoranthene_C-butadiene*butadiene_C-chrysene*chrysene_C-dibenzAHanthracene*dibenzAHanthracene_C-dioxins*dioxins_C-ethane*ethane_C-fluoranthene*fluoranthene_C-fluorene*fluorene_C-formaldehyde*formaldehyde_C-hexane*hexane_C-indeno123CDpyrene*indeno123CDpyrene_C-methane*methane_C-naphthalene*naphthalene_C-NMVOC*NMVOC_C-phenanthrene*phenanthrene_C-(PM10p+PM25+PM2510)*PM_C-propanal*propanal_C-pyrene*pyrene_C-styrene*styrene_C-toluene*toluene_C-xylene*xylene_C)*44/12; lognormal variance with pedigree 0.002, pedigree (1,1,3,1,1)
  Calculated value. Represents the emissions per hour of operation of the US weigthed average machine represented by this dataset (>= 18.64 kW and < 74.57 kW, underground mining). Based on the carbon balance, considers the diesel fuel carbon content and the carbon in the other carbon containing emissions and converts the remaining into carbon dioxide. The 44/12 term represents the stoichiometric relationship between carbon dioxide and carbon.
  Uncertainty: Calculated variable. Uncertainty should be determined from propagation of uncertainty factors of underlying variables, however no uncertainty could be generated for the terms of the power function. Uncertainty of actual relation between variables not accounted at this time, although this could be included in a future update.
  property oxygen content 0.727079; name CO2_O; = 1-CO2_C
  property carbon content, fossil 0.272921; name CO2_C
- Particulates, > 10 um [air, unspecified]: 0.00051163 kg; name PM10p; = PM10*PM10p_ratio; lognormal variance with pedigree 0.002, pedigree (1,1,3,1,1)
  (same comment as for Acenaphthylene)
  property emission ratio 0.0637628 kg/kg; name PM10p_ratio
- NMVOC, non-methane volatile organic compounds, unspecified origin [air, unspecified]: 0.0113865 kg; name NMVOC; = VOC-trimethylpentane-acetaldehyde-acrolein-benzene-ethylbenzene-butadiene-formaldehyde-hexane-propanal-styrene-toluene-xylene; lognormal variance with pedigree 0.002, pedigree (1,1,3,1,1)
  (same comment as for Oxygen)
  property carbon content, fossil 0.854049; name NMVOC_C
- Propanal [air, unspecified]: 0.00017675 kg; name propanal; = VOC*propanal_ratio; lognormal variance with pedigree 0.002, pedigree (1,1,3,1,1)
  (same comment as for Acenaphthylene)
  property carbon content, fossil 0.620409; name propanal_C
  property oxygen content 0.275468; name propanal_O
  property emission ratio 0.0118 kg/kg; name propanal_ratio
- Zinc [air, unspecified]: 3.6847e-6 kg; = diesel*zinc_ratio; lognormal variance with pedigree 0.002, pedigree (1,1,3,1,1)
  (same comment as for Acenaphthylene)
  property emission ratio 1e-6 kg/kg; name zinc_ratio
- Xylene [air, unspecified]: 0.000158506 kg; name xylene; = VOC*xylene_ratio; lognormal variance with pedigree 0.002, pedigree (1,1,3,1,1)
  (same comment as for Acenaphthylene)
  property carbon content, fossil 0.905065; name xylene_C
  property emission ratio 0.010582 kg/kg; name xylene_ratio
- Benzo(a)pyrene [air, unspecified]: 2.80838e-9 kg; name benzoApyrene; = PM10*benzoApyrene_ratio; lognormal variance with pedigree 0.3201, pedigree (1,5,3,3,1)
  Calculated value (see Exchange Properties).
  property carbon content, fossil 0.952065; name benzoApyrene_C
  property emission ratio 3.5e-7 kg/kg; name benzoApyrene_ratio
- Toluene [air, unspecified]: 0.000224188 kg; name toluene; = VOC*toluene_ratio; lognormal variance with pedigree 0.002, pedigree (1,1,3,1,1)
  (same comment as for Acenaphthylene)
  property emission ratio 0.014967 kg/kg; name toluene_ratio
  property carbon content, fossil 0.91249; name toluene_C
- Cadmium [air, unspecified]: 3.6847e-8 kg; = diesel*cadmium_ratio; lognormal variance with pedigree 0.002, pedigree (1,1,3,1,1)
  (same comment as for Acenaphthylene)
  property emission ratio 1e-8 kg/kg; name cadmium_ratio
- Pyrene [air, unspecified]: 2.32695e-8 kg; name pyrene; = PM10*pyrene_ratio; lognormal variance with pedigree 0.002, pedigree (1,1,3,1,1)
  (same comment as for Acenaphthylene)
  property carbon content, fossil 0.950167; name pyrene_C
  property emission ratio 2.9e-6 kg/kg; name pyrene_ratio
- Styrene [air, unspecified]: 8.90462e-6 kg; name styrene; = VOC*styrene_ratio; lognormal variance with pedigree 0.002, pedigree (1,1,3,1,1)
  (same comment as for Acenaphthylene)
  property emission ratio 0.00059448 kg/kg; name styrene_ratio
  property carbon content, fossil 0.922582; name styrene_C
- Particulates, > 2.5 um, and < 10um [air, unspecified]: 0.000240719 kg; name PM2510; = PM10-PM25; lognormal variance with pedigree 0.002, pedigree (1,1,3,1,1)
  (same comment as for Oxygen)
- Phenanthrene [air, unspecified]: 2.08623e-6 kg; name phenanthrene; = PM10*phenanthrene_ratio; lognormal variance with pedigree 0.002, pedigree (1,1,3,1,1)
  (same comment as for Acenaphthylene)
  property carbon content, fossil 0.94345; name phenanthrene_C
  property emission ratio 0.00026 kg/kg; name phenanthrene_ratio
- Manganese [air, unspecified]: 3.00622e-8 kg; = diesel*manganese_ratio; lognormal variance with pedigree 0.002, pedigree (1,1,3,1,1)
  (same comment as for Acenaphthylene)
  property emission ratio 8.15864e-9 kg/kg; name manganese_ratio
- Dioxins, measured as 2,3,7,8-tetrachlorodibenzo-p-dioxin [air, unspecified]: 2.21153e-12 kg; name dioxins; = diesel*dioxins_ratio; lognormal variance with pedigree 0.002, pedigree (1,1,3,1,1)
  (same comment as for Acenaphthylene)
  property oxygen content 0.0993808; name dioxins_O
  property carbon content, fossil 0.447652; name dioxins_C
  property emission ratio 6.00192e-13 kg/kg; name dioxins_ratio
- Naphthalene [air, unspecified]: 3.69102e-6 kg; name naphthalene; = PM10*Naphthalene_ratio; lognormal variance with pedigree 0.002, pedigree (1,1,3,1,1)
  (same comment as for Acenaphthylene)
  property carbon content, fossil 0.937091; name naphthalene_C
  property emission ratio 0.00046 kg/kg; name naphthalene_ratio
- Hexane [air, unspecified]: 2.38358e-5 kg; name hexane; = VOC*hexane_ratio; lognormal variance with pedigree 0.002, pedigree (1,1,3,1,1)
  (same comment as for Acenaphthylene)
  property emission ratio 0.0015913 kg/kg; name hexane_ratio
  property carbon content, fossil 0.836259; name hexane_C
- Dinitrogen monoxide [air, unspecified]: 0.000442164 kg; name N2O; = diesel*N2O_ratio; lognormal variance with pedigree 0.002, pedigree (1,1,3,1,1)
  (same comment as for Acenaphthylene)
  property oxygen content 0.363506; name N2O_O
  property emission ratio 0.00012 kg/kg; name N2O_ratio
- Indeno(1,2,3-cd)pyrene [air, unspecified]: 6.33892e-10 kg; name indeno123CDpyrene; = PM10*indeno123CDpyrene_ratio; lognormal variance with pedigree 0.002, pedigree (1,1,3,1,1)
  (same comment as for Acenaphthylene)
  property emission ratio 7.9e-8 kg/kg; name indeno123CDpyrene_ratio
  property carbon content, fossil 0.956232; name indeno123CDpyrene_C
- Formaldehyde [air, unspecified]: 0.00176983 kg; name formaldehyde; = VOC*formaldehyde_ratio; lognormal variance with pedigree 0.002, pedigree (1,1,3,1,1)
  (same comment as for Acenaphthylene)
  property emission ratio 0.118155 kg/kg; name formaldehyde_ratio
  property oxygen content 0.532842; name formaldehyde_O
  property carbon content, fossil 0.400023; name formaldehyde_C
- Selenium [air, unspecified]: 3.6847e-8 kg; = diesel*selenium_ratio; lognormal variance with pedigree 0.002, pedigree (1,1,3,1,1)
  (same comment as for Acenaphthylene)
  property emission ratio 1e-8 kg/kg; name selenium_ratio
- Fluorene [air, unspecified]: 8.02395e-7 kg; name fluorene; = PM10*fluorene_ratio; lognormal variance with pedigree 0.002, pedigree (1,1,3,1,1)
  (same comment as for Acenaphthylene)
  property emission ratio 0.0001 kg/kg; name fluorene_ratio
  property carbon content, fossil 0.939364; name fluorene_C
- Benzene, ethyl- [air, unspecified]: 4.64359e-5 kg; name ethylbenzene; = VOC*ethylbenzene_ratio; lognormal variance with pedigree 0.002, pedigree (1,1,3,1,1)
  (same comment as for Acenaphthylene)
  property carbon content, fossil 0.905065; name ethylbenzene_C
  property emission ratio 0.0031001 kg/kg; name ethylbenzene_ratio
- Nickel [air, unspecified]: 4.46545e-8 kg; = diesel*nickel_ratio; lognormal variance with pedigree 0.002, pedigree (1,1,3,1,1)
  Calculated value (see Exchange Properties).
  property emission ratio 1.21189e-8 kg/kg; name nickel_ratio
- Fluoranthene [air, unspecified]: 1.36407e-7 kg; name fluoranthene; = PM10*fluoranthene_ratio; lognormal variance with pedigree 0.002, pedigree (1,1,3,1,1)
  (same comment as for Acenaphthylene)
  property emission ratio 1.7e-5 kg/kg; name fluoranthene_ratio
  property carbon content, fossil 0.950167; name fluoranthene_C
- Ethane [air, unspecified]: 1.42249e-5 kg; name ethane; = THC*ethane_ratio; lognormal variance with pedigree 0.002, pedigree (1,1,3,1,1)
  (same comment as for Acenaphthylene)
  property carbon content, fossil 0.798885; name ethane_C
  property emission ratio 0.001 kg/kg; name ethane_ratio
- Ammonia [air, unspecified]: 9.56958e-5 kg; = diesel*ammonia_ratio; lognormal variance with pedigree 0.002, pedigree (1,1,3,1,1)
  (same comment as for Acenaphthylene)
  property emission ratio 2.59711e-5 kg/kg; name ammonia_ratio
- Dibenz(a,h)anthracene [air, unspecified]: 2.32695e-11 kg; name dibenzAHanthracene; = PM10*dibenzAHanthracene_ratio; lognormal variance with pedigree 0.002, pedigree (1,1,3,1,1)
  (same comment as for Acenaphthylene)
  property carbon content, fossil 0.949307; name dibenzAHanthracene_C
  property emission ratio 2.9e-9 kg/kg; name dibenzAHanthracene_ratio
- Chromium VI [air, unspecified]: 2.2382e-10 kg; = diesel*chromiumVI_ratio; lognormal variance with pedigree 0.002, pedigree (1,1,3,1,1)
  (same comment as for Acenaphthylene)
  property emission ratio 6.07431e-11 kg/kg; name chromiumVI_ratio
- Methane, fossil [air, unspecified]: 0.000227599 kg; name methane; = THC*methane_ratio; lognormal variance with pedigree 0.002, pedigree (1,1,3,1,1)
  (same comment as for Acenaphthylene)
  property carbon content, fossil 0.748694; name methane_C
  property emission ratio 0.016 kg/kg; name methane_ratio
- Chrysene [air, unspecified]: 1.52455e-8 kg; name chrysene; = PM10*chrysene_ratio; lognormal variance with pedigree 0.002, pedigree (1,1,3,1,1)
  (same comment as for Acenaphthylene)
  property carbon content, fossil 0.947021; name chrysene_C
  property emission ratio 1.9e-6 kg/kg; name chrysene_ratio
- Benzene [air, unspecified]: 0.00030473 kg; name benzene; = VOC*benzene_ratio; lognormal variance with pedigree 0.002, pedigree (1,1,3,1,1)
  (same comment as for Acenaphthylene)
  property emission ratio 0.020344 kg/kg; name benzene_ratio
  property carbon content, fossil 0.922582; name benzene_C
- Carbon monoxide, fossil [air, unspecified]: 0.102759 kg; name CO; = (T0*T0_kW/hp_to_kW*if(T0_kW/hp_to_kW<50;T01_co_50hp;T01_co_100hp)+T1*T1_kW/hp_to_kW*if(T1_kW/hp_to_kW<50;T01_co_50hp;T01_co_100hp)+T2*T2_kW/hp_to_kW*if(T2_kW/hp_to_kW<50;T244A_co_50hp;T23B44AN_co_100hp)+T3B*T3B_kW/hp_to_kW*T23B44AN_co_100hp+T4*T4_kW/hp_to_kW*if(T4_kW/hp_to_kW<50;T244A_co_50hp;T23B44AN_co_100hp)+T4A*T4A_kW/hp_to_kW*if(T4A_kW/hp_to_kW<50;T244A_co_50hp;T23B44AN_co_100hp)+T4N*T4N_kW/hp_to_kW*T23B44AN_co_100hp)*load; lognormal variance with pedigree 0.002, pedigree (1,1,3,1,1)
  (same comment as for total hydrocarbon emissions)
  property carbon content, fossil 0.428811; name CO_C
  property carbon monoxide emissions tier T2-T3B-T4-T4A-T4N for hp < 100 0.00608 kg/hp*h; name T23B44AN_co_100hp
  property oxygen content 0.571189; name CO_O; = 1-CO_C
  property carbon monoxide emissions tier T0-T1 for hp < 50 0.01285 kg/hp*h; name T01_co_50hp
  property carbon monoxide emissions tier T0-T1 for hp < 100 0.00897 kg/hp*h; name T01_co_100hp
  property carbon monoxide emissions tier T2-T4-T4A for hp < 50 0.00394 kg/hp*h; name T244A_co_50hp
- Benzo(k)fluoranthene [air, unspecified]: 2.80838e-9 kg; name benzoKfluoranthene; = PM10*benzoKfluoranthene_ratio; lognormal variance with pedigree 0.3201, pedigree (1,5,3,3,1)
  Calculated value (see Exchange Properties).
  property emission ratio 3.5e-7 kg/kg; name benzoKfluoranthene_ratio
  property carbon content, fossil 0.952065; name benzoKfluoranthene_C
- Acrolein [air, unspecified]: 4.54106e-5 kg; name acrolein; = VOC*acrolein_ratio; lognormal variance with pedigree 0.002, pedigree (1,1,3,1,1)
  (same comment as for Acenaphthylene)
  property emission ratio 0.00303165 kg/kg; name acrolein_ratio
  property oxygen content 0.285372; name acrolein_O
  property carbon content, fossil 0.642716; name acrolein_C
- Chromium [air, unspecified]: 4.34474e-10 kg; = diesel*chromium_ratio; lognormal variance with pedigree 0.002, pedigree (1,1,3,1,1)
  (same comment as for Acenaphthylene)
  property emission ratio 1.17913e-10 kg/kg; name chromium_ratio
- Benzo(ghi)perylene [air, unspecified]: 1.52455e-9 kg; name benzoGHIperylene; = PM10*benzoGHIperylene_ratio; lognormal variance with pedigree 0.3201, pedigree (1,5,3,3,1)
  Calculated value (see Exchange Properties).
  property emission ratio 1.9e-7 kg/kg; name benzoGHIperylene_ratio
  property carbon content, fossil 0.956232; name benzoGHIperylene_C
- Acetaldehyde [air, unspecified]: 0.000795077 kg; name acetaldehyde; = VOC*acetaldehyde_ratio; lognormal variance with pedigree 0.002, pedigree (1,1,3,1,1)
  (same comment as for Acenaphthylene)
  property oxygen content 0.363179; name acetaldehyde_O
  property emission ratio 0.05308 kg/kg; name acetaldehyde_ratio
  property carbon content, fossil 0.545303; name acetaldehyde_C
- Sulfur dioxide [air, unspecified]: 0.000107682 kg; name SO2; = (T0*T0_kW/hp_to_kW*(T0123B44AN_diesel_100hp*sulfur_to_direct_PM-if(T0_kW/hp_to_kW<50;T01_thc_50hp;T01_thc_100hp))+T1*T1_kW/hp_to_kW*(T0123B44AN_diesel_100hp*sulfur_to_direct_PM-if(T1_kW/hp_to_kW<50;T01_thc_50hp;T01_thc_100hp))+T2*T2_kW/hp_to_kW*(T0123B44AN_diesel_100hp*sulfur_to_direct_PM-if(T2_kW/hp_to_kW<50;T244A_thc_50hp;T23B44AN_thc_100hp))+T3B*T3B_kW/hp_to_kW*(T0123B44AN_diesel_100hp*sulfur_to_direct_PM-T23B44AN_thc_100hp)+T4A*T4A_kW/hp_to_kW*(T0123B44AN_diesel_100hp*sulfur_to_direct_PM-if(T4A_kW/hp_to_kW<50;T244A_thc_50hp;T23B44AN_thc_100hp))+T4*T4_kW/hp_to_kW*(T0123B44AN_diesel_100hp*sulfur_to_direct_PM-if(T4_kW/hp_to_kW<50;T244A_thc_50hp;T23B44AN_thc_100hp))+T4N*T4N_kW/hp_to_kW*(T0123B44AN_diesel_100hp*sulfur_to_direct_PM-T23B44AN_thc_100hp))*diesel_S_content*2*load; lognormal variance with pedigree 0.002, pedigree (1,1,3,1,1)
  Calculated value. Represents the emissions per hour of operation of the US weigthed average machine represented by this dataset (>= 18.64 kW and < 74.57 kW, underground mining). Based on the diesel fuel sulfur content, modulated by the estimated fraction of sulfur directly converted to particulate form (value of 0,978 taken from NONROAD2008 model). The value of 2 in the mathematical relation repressents the stoichiometric relationship between sulfur dioxide and elementary sulfur (2 g SO2/g S).
  Uncertainty: Calculated variable. Uncertainty should be determined from propagation of uncertainty factors of underlying variables, however no uncertainty could be generated for the terms of the power function. Uncertainty of actual relation between variables not accounted at this time, although this could be included in a future update.
  property oxygen content 0.499477; name SO2_O
  property fraction of diesel sulfur converted to direct PM (hydrated sulfuric acid) 0.978; name sulfur_to_direct_PM

## Sampling procedure
Most data from the U.S. EPA NONROAD2008 and NMIM models. Some data from the LCA study Oekoinventare von Energiesystemen 1996 and emissions from the Swiss "Offroad" database.

## Extrapolations
This dataset has been extrapolated from year 2014 to the year of the calculation (2021). The uncertainty has been adjusted accordingly.
