# cadmium production, primary

Dataset: EcoSpold 2, unit process
Geography: CA-QC
Time period: 2000-01-01 to 2021-12-31
Technology level: current
Classification: ISIC rev.4 ecoinvent: 2420:Manufacture of basic precious and other non-ferrous metals
Scenario: Business-as-Usual
System model: Allocation, cut-off by classification
Generated by: Pascal Lesage
Published in: Classen M. 2009
Database: ecoinvent
isCopyrightProtected: true
accessRestrictedTo: 1

## General comment
This dataset describes the primary production of 1 kg of cadmium metal (99.9%) in Quebec. This is a child dataset, with exchanges identical to the GLO dataset. It was created to enable linking to regional markets (e.g. for electricity). Data quality indicators were adjusted accordingly.
The assumptions used for this dataset are the same as for the GLO: as roughly 70% of primary cadmium is produced as by-product by companies that produce refined zinc (in the activity "primary zinc production from concentrate"), this dataset represents the remaining 30% of production of refined cadmium.
No secondary sources of cadmium from post consumer scrap are considered. Only the most important source is taken into account: the cadmium sludges from hydrometallurgical zinc operations (modelled in the activity "primary zinc production from concentrate").
For the use in applications where cadmium is a major constituent - e.g. in NiCd battery systems - the dataset should be complemented with additional specific emission factors and the secondary production process.

## Included activities start
From reception of raw materials, at the factory gate.

## Included activities end
This activity ends with the production of cadmium metal.

The dataset includes the the treatment of cadmium sludge from hydrometallurgical zinc operations, the refining of cadmium by electrolysis, and the infrastructure for the process.

The dataset does not include emissions to air, nor emissions to water.

## Geography
Child dataset; the exchanges are identical to the GLO dataset. Created to enable linking to regional markets (e.g. for electricity). Data quality indicators adjusted accordingly.

## Technology
Cadmium sludge formed in hydrometallurgical zinc operations by purification of zinc solution, via subsequent purification and oxidation of the sponge. Cadmium cathodes are formed by electrowinning. Other sources from pyrometallurgical zinc wastes and post consumer scrap (batteries) are disregarded.
OXIDATION & PURIFICATION
Cadmium is extracted by oxidizing the enriched starting materials solutions, remnants of hydrometallurgical zinc refining. In order to oxidize the cadmium, air is blown in . Cadmium is precipitated from the solution as a metal sponge by reduction with zinc dust. The precipitated sponge contains 90 % cadmium and only 2.5 % zinc. No heat is used for drying.
ELECTROWINNING
The cadmium sponge is precipitated directly in the tank with the electrolytic acid. The anode consists of lead, which does not dissolve, whereas the cathode is aluminum sheet. The current yield is ca. 93 %; the energy consumption is 1250 kWh per tonne of cadmium cathode sheet deposited. Typical impurity levels in electrolytic cadmium sheet are 5 - 10 ppm Cu, 15 - 20 ppm Pb, 5 - 10 ppm Tl, and 5 ppm Zn. The zinc dust used for cementation of the cadmium sponge is recovered later in the sludge of the electrolysis and will be returned into the zinc cycle.

## Reference product
- cadmium: 1 kg; By-product classification allocatable product; CPC 342: Basic inorganic chemicals n.e.c.; CAS 7440-43-9
  Due to its toxicity the dissipative use of cadmium has been cut down and regulated.
  Uses: Description of the different uses of Cadmium:
  - Nickel-Cadmium Batteries. Cadmium hydroxide is utilised as one of the two principal electrode materials in Ni-Cd batteries which have extensive applications in the railroad and aircraft industry for starting and emergency power and in consumer applications such as cordless power tools, cellular telephones, camcorders, portable computers, portable household appliances and toys.
  - Cadmium Pigments. Cadmium sulphide and cadmium sulphoselenide are utilised as bright yellow to deep red pigments in plastics, ceramics, glasses, enamels and artists colours. They are used in applications where high temperature or high pressure processing is required.
  - Cadmium Stabilisers. Cadmium-bearing stabilisers retard the degradation processes in polyvinylchloride (PVC) which occur upon exposure to heat and ultraviolet light. These stabilisers contain organic cadmium salts, usually carboxylates such as cadmium laurate or cadmium stearate, which are incorporated into PVC before processing.
  - Cadmium Coatings. Cadmium coatings are utilised on steel, aluminium, and certain other non-ferrous metal fasteners and moving parts to provide the best available combination of corrosion resistance, particularly in salt and alkali media, and lubricity or low coefficient of friction. They are also employed in many electrical or electronic applications where a combination of corrosion resistance and low electrical resistivity are required. In addition, cadmium coatings exhibit excellent plating characteristics on a wide variety of substrates, have good galvanic comparability with aluminium, and are readily solderable.
  - Alloys and Minor Uses. Cadmium alloys include (a) electrical conductivity alloys, (b) heat conductivity alloys, and (c) electrical contact alloys. Other minor uses of cadmium include cadmium telluride and cadmium sulphide in solar cells, and other semiconducting cadmium compounds in a variety of electronic applications.
  Estimation from dataset author.
  production volume 432000 kg; = 1800000*0.8*0.3
    The production volume is approximated with the production volume reported by USGS for Canada in 2018 (USGS 2019). At the global level, 20% of the production of cadmium is estimated to be from secondary sources (USGS 2018). This is assumed to be valid for Quebec as well.
    Additionally, at the global level, roughly 70% of primary cadmium is produced as by-product by companies that produce zinc, which is assumed to be also the case in Quebec. As this production is taken into account in the global activity "primary zinc production from concentrate", the primary fraction of the production volume reported for Canada is scaled down to 30%.
    Reference:
    USGS (2019) Cadmium. U.S. Geological Survey, Mineral Commodity Summaries, February 2019, https://prd-wret.s3-us-west-2.amazonaws.com/assets/palladium/production/s3fs-public/atoms/files/mcs-2019-cadmi.pdf (last accessed on 2019-05-27).
  property price 1.23738 EUR2005; name cadmium_price_EUR2005
    Price calculated as 5-year market average (2015-2019; USD/kg; USGS [2020]) and converted to EUR2005 (USD2019/EUR2005 exchange rate: 0.62; Official Data Foundation [2020] and Macrotrends [2020]).
    References:
    Official Data Foundation (2020). Inflation Calculator [Online]. Available from: https://www.officialdata.org/us/inflation/2005?endYear=2019&amount=1 [Accessed 28/07/2020]
    USGS (2020). Mineral Commodity Summaries 2020 [Online]. Available from: https://pubs.usgs.gov/periodicals/mcs2020/mcs2020.pdf [Accessed 28/07/2020]
    Macrotrends (2020). Euro Dollar Exchange Rate (EUR USD) - Historical Chart [Online]. Available from: https://www.macrotrends.net/2548/euro-dollar-exchange-rate-historical-chart [Accessed 28/07/2020]
  property carbon content 0
    carbon content on a dry matter basis (reserved; not for manual entry)
  properties: water in wet mass 0 kg, carbon content, fossil 0, water content 0, wet mass 1 kg, dry mass 1 kg, carbon content, non-fossil 0, carbon allocation 0 kg

## Inputs from technosphere
- cadmium sludge from zinc electrolysis: 1.87542 kg; name cadmium_sludge; = 1/cadmium_sludge_Cd_content*cadmium; lognormal variance with pedigree 0.2106, pedigree (5,5,5,5,5)
  Calculated based on cadmium content of cadmium sludge. See property comment for more information.
  property concentration, cadmium 0.533214 kg/kg; name cadmium_sludge_Cd_content
  properties: wet mass 1 kg, dry mass 1 kg
  note on concentration, cadmium: Amount taken from the cadmium content reported for this product in the dataset "primary zinc production from concentrate" (GLO), which is based on industry data.
- sulfuric acid: 0.036 kg; source Davenport W. G. 2002; lognormal variance with pedigree 0.0361, pedigree (4,4,4,3,3)
  Proxy: "sulfuric acid" is used as a proxy for electrolyte.
  Estimation: Taking copper electrowinning as approximation, 0.2 m3 electrolyte per tonne is bled (drained) and purified for recycling into electrolytic refining. It is assumed that all of this volume is replenished with fresh electrolyte (180 kg H2SO4 per m3), since no process data on the purification of spent electrolyte are available.
  properties: wet mass 1 kg, dry mass 1 kg
- chemical factory, organics: 8e-10 unit; lognormal variance with pedigree 0.3461, pedigree (4,4,4,3,3)
  Estimation from dataset author: Facilities have an output of 50 000 t/year, and a lifetime of 25 years.
  Proxy: "chemical factory, organics" is used as a proxy for the used facilities.
- electricity, medium voltage: 1.25 kWh; source Schulte-Schrepping K.-H. 2002; lognormal variance with pedigree 0.0408, pedigree (1,2,5,3,1)
  Literature value.

## Sampling procedure
Dataset based on literature. The input amount of cadmium sludge is calculated based on its cadmium content.

## Extrapolations
This dataset has been extrapolated from year 2013 to the year of the calculation (2021). The uncertainty has been adjusted accordingly.
