# transport, trolleybus

Dataset: EcoSpold 2, unit process
Geography: RoW
Time period: 2000-01-01 to 2021-12-31
Technology level: current
Classification: ISIC rev.4 ecoinvent: 4921:Urban and suburban passenger land transport
Synonyms: Heavy Duty Vehicle; truck; Lastwagen
Scenario: Business-as-Usual
System model: Allocation, cut-off by classification
Generated by: Michael Spielmann (obsolete)
Published in: Spielmann M. 2004
Database: ecoinvent
isCopyrightProtected: true
accessRestrictedTo: 1

## General comment
Based on 'transport, trolleybus, CH 2000'.Inventory refers to the entire transport life cycle. For road infrastructure, expenditures and environmental interventions due to construction of roads have been allocated based on the Gross tonne kilometre performance. Expenditures due to operation of the road infrastructure, as well as land use have been allocated based on the yearly vehicle kilometre performance. For the attribution of vehicle share to the transport performance a vehicle life time performance of 19’867’050 pkm/vehicle have been assumed. The energy use and combustion emissions dataset represents the energy use and combustion emission of a trolleybus in Switzerland.

## Included activities start
The energy use and combustion emissions service starts with electricity consumption.

## Included activities end
operation of vehicle; production and maintenance of vehicles; construction of road. The energy use and combustion emissions service ends with the service of transporting 1 vehicle over 1 kilometre. The dataset includes electricity consumption, particulate emissions and until and including heavy metal emissions.

## Geography
Extrapolated from 'transport, trolleybus, CH 2000'. The data for vehicle operation and road infrastructure reflect Swiss conditions. Data for vehicle manufacturing and maintenance represents generic European data. Data for the vehicle disposal reflect Swiss situation. The data of the energy use and combustion emissions refers to average transport conditions in Switzerland.

## Technology
For vehicle operation all technologies are included in the average data. Road construction comprises bitumen and concrete roads. For the manufacturing of vehicles, the data reflects current modern technologies. For trolley buses no direct emissions due to combustion occur. However, emissions due to tyre, brake and road abrasion are accounted for.

## Time period
Data for gaseous emissions is based on scenarios for 2000.

## Reference product
- transport, trolleybus: 1 person*km; By-product classification allocatable product; CPC 64112: Urban and suburban scheduled road transport services of passengers
  production volume 3.96633 person*km; name transport_RP_PV
    This is a placeholder value that does not reflect real-world production volumes. This dataset does not currently require a real-world production volume to work in the database framework, and no actual data were collected yet. This has no negative effect on the results of the ecoinvent database.
  property price 0.0189327 EUR2005
    Calculated based on inputs: The price of the product has been calculated as a sum of the values of the material and energy inputs for this product. This value is therefore a rough estimation. It may underestimate the real price since there are additional expenses when producing any product. These expences can include for example labour costs, treatment of waste materials and profit for the producer. Please consider carefully whether this level of data quality is acceptable for your application.

## Inputs from technosphere
- maintenance, bus: 5.03e-8 unit; lognormal variance with pedigree 0.044, pedigree (3,1,5,5,1)
  Uncertainty: o
- bus: 5.03e-8 unit; lognormal variance with pedigree 0.044, pedigree (3,1,5,5,1)
  Uncertainty: o
- road: 0.00053 m*year; lognormal variance with pedigree 0.044, pedigree (3,1,5,5,1)
  Uncertainty: o
- electricity, medium voltage: 0 kWh; source Bundesamt für Statistik (BfS) 2000; pedigree (1,1,1,1,1)
  Literature value. The total electricity consumption of trolley buses and trams operating in Switzerland is available from the Swiss transport statistic Bundesamt für Statistik (BfS) (2000). Energy use and combustion emissions
  Uncertainty: d
- road maintenance: 8.6684e-5 m*year; lognormal variance with pedigree 0.344, pedigree (3,1,5,5,1)
  This input indicates the unit of road per vkm used during the transport activity. The road input is composed by two demand factors: - Road infrastructure and disposal (RI&D), which varies according to the gross vehicle weight. - Road operations & maintenance (RO&M), which does not vary according to the gross vehicle weight.
  Uncertainty: o
- electricity, medium voltage: 0.00119048, 0.000228283, 0.00524174, 0.0173545, 0.0038324, 0.0557388, 0.00785641, 0.0255974 kWh (8 entries); source Bundesamt für Statistik (BfS) 2000; lognormal variance with pedigree 0.042, pedigree (1,1,5,5,1)
  (same comment as for electricity, medium voltage)

## Emissions to nature
- Zinc [air, urban air close to ground]: 1.3013e-7 kg; lognormal variance with pedigree 0.718, pedigree (4,5,5,5,1)
  Estimated value. For trolley buses no direct emissions due to combustion occur. However, emissions due to tyre, brake and road abrasion are accounted for. Energy use and combustion emissions
  Uncertainty: e
  property dry mass 1 kg; name DM
  property water content 0; name water_content
  property wet mass 1 kg; name WM
  property water in wet mass 0 kg; name WWM
  property carbon content, fossil 0; name C_content_fossil
  property carbon content, non-fossil 0; name C_content_non_fossil
- Nickel [air, urban air close to ground]: 1.29745e-9 kg; lognormal variance with pedigree 0.718, pedigree (4,5,5,5,1)
  (same comment as for Zinc)
- Particulates, > 2.5 um, and < 10um [air, urban air close to ground]: 2.7258e-6 kg; lognormal variance with pedigree 0.1646, pedigree (3,3,5,5,1)
  (same comment as for Zinc)
- Ethane, 1,1,1,2-tetrafluoro-, HFC-134a [air, urban air close to ground]: 4.8125e-7 kg; lognormal variance with pedigree 0.162, pedigree (1,1,5,5,1)
  Estimated value. Yearly amount of cooling agent refilled in maintenance. Energy use and combustion emissions
- Lead [air, urban air close to ground]: 8.085e-10 kg; lognormal variance with pedigree 0.718, pedigree (4,5,5,5,1)
  (same comment as for Zinc)
- Chromium, ion [water, surface water]: 1.5246e-9 kg; lognormal variance with pedigree 0.842, pedigree (1,1,5,5,1)
  Estimated value. For trolley buses no direct emissions due to combustion occur. However, emissions due to tyre, brake and road abrasion are accounted for. Energy use and combustion emissions
- Lead [water, surface water]: 8.47e-10 kg; lognormal variance with pedigree 0.842, pedigree (1,1,5,5,1)
  (same comment as for Chromium, ion)
- Cadmium, ion [water, surface water]: 1.694e-10 kg; lognormal variance with pedigree 0.842, pedigree (1,1,5,5,1)
  (same comment as for Chromium, ion)
- Nickel [soil, industrial]: 1.3552e-9 kg; lognormal variance with pedigree 0.842, pedigree (1,1,5,5,1)
  (same comment as for Chromium, ion)
- Cadmium [air, urban air close to ground]: 1.62085e-10 kg; lognormal variance with pedigree 0.718, pedigree (4,5,5,5,1)
  (same comment as for Zinc)
- Copper, ion [water, surface water]: 2.53715e-9 kg; lognormal variance with pedigree 0.842, pedigree (1,1,5,5,1)
  (same comment as for Chromium, ion)
- Nickel, ion [water, surface water]: 1.3552e-9 kg; lognormal variance with pedigree 0.842, pedigree (1,1,5,5,1)
  (same comment as for Chromium, ion)
- Particulates, < 2.5 um [air, urban air close to ground]: 1.155e-6 kg; lognormal variance with pedigree 0.1641, pedigree (3,2,5,5,1)
  (same comment as for Zinc)
- Particulates, > 10 um [air, urban air close to ground]: 1.6324e-5 kg; lognormal variance with pedigree 0.182, pedigree (3,5,5,5,1)
  (same comment as for Zinc)
- Zinc, ion [water, surface water]: 1.35905e-7 kg; lognormal variance with pedigree 0.842, pedigree (1,1,5,5,1)
  (same comment as for Chromium, ion)
- Chromium VI [air, urban air close to ground]: 2.91445e-12 kg; lognormal variance with pedigree 0.842, pedigree (1,1,5,5,1)
  Calculated value. For trolley buses no direct emissions due to combustion occur. However, emissions due to tyre, brake and road abrasion are accounted for. Energy use and combustion emissions
- Copper [air, urban air close to ground]: 2.42935e-9 kg; lognormal variance with pedigree 0.718, pedigree (4,5,5,5,1)
  (same comment as for Zinc)
- Chromium [soil, industrial]: 1.5246e-9 kg; lognormal variance with pedigree 0.842, pedigree (1,1,5,5,1)
  (same comment as for Chromium, ion)
- Cadmium [soil, industrial]: 1.694e-10 kg; lognormal variance with pedigree 0.842, pedigree (1,1,5,5,1)
  (same comment as for Chromium, ion)
- Chromium [air, urban air close to ground]: 1.45915e-9 kg; lognormal variance with pedigree 0.718, pedigree (4,5,5,5,1)
  (same comment as for Zinc)
- Zinc [soil, industrial]: 1.35905e-7 kg; lognormal variance with pedigree 0.842, pedigree (1,1,5,5,1)
  (same comment as for Chromium, ion)
- Lead [soil, industrial]: 8.47e-10 kg; lognormal variance with pedigree 0.842, pedigree (1,1,5,5,1)
  (same comment as for Chromium, ion)
- Copper [soil, industrial]: 2.53715e-9 kg; lognormal variance with pedigree 0.842, pedigree (1,1,5,5,1)
  (same comment as for Chromium, ion)

## Sampling procedure
National statistics, literature studies

## Extrapolations
see Technology and Geography This dataset has been copied from an original dataset covering the geography CH. The uncertainty has been adjusted accordingly.
