# treatment of aluminium scrap, post-consumer, prepared for recycling, at remelter

Dataset: EcoSpold 2, unit process
Geography: RoW
Time period: 2005-01-01 to 2021-12-31
Technology level: current
Classification: EcoSpold01Categories: metals/extraction
Classification: ISIC rev.4 ecoinvent: 2420:Manufacture of basic precious and other non-ferrous metals
Scenario: Business-as-Usual
System model: Allocation, cut-off by classification
Share of production covered: 17.4 %
Generated by: Pascal Lesage
Published in: European Aluminium Association 2008
Database: ecoinvent
isCopyrightProtected: true
accessRestrictedTo: 1

## General comment
This dataset is based on two sources: the European Aluminium Association 2005 LCI data (EAA, 2008); and (2) the ecoinvent v2.2 dataset for the same activity (Althaus, 2009), itself largely based on EAA data from 2000. Priority was given to data contained in EAA (2008); Althaus (2009) was used only in cases where it was found to be more complete that EAA (2008). Note that both sources are European in scope - this GLO dataset is therefore an extrapolation.
Remelters use mainly reverbatory furnaces, and this dataset is based on this furnace technology only.
The dataset excludes, for lack of access to data, salt slag and dross recycling. According to EAA, this data gap represents approximately 10-20% of potential impacts, as calculated using the CML 2001 method.
The following emissions to air are reported in EAA 2008 but excluded from this dataset: CO (0.095 kg/tonne secondary aluminium), Dust/particulates (0.041 kg/tonne secondary aluminium), NOx (0.329 kg/tonne secondary aluminium), SO2 (0.051 kg/tonne secondary aluminium), and VOC (0.050 kg/tonne secondary aluminium). These are assumed to be combustion emissions or electricity production emissions, conclusion arrived at by comparing gate-to-gate emissions with the cradle-to-gate emissions also reported in EAA 2008. Their inclusion wouldhave led to double-counting.
While this dataset represents the remelting of post-consumer scrap aluminium, the inputs and outputs reported by EAA (2008) actually refer to refining of new scrap. In the ecoinvent database, both the remelting of post-consumer scrap and new scrap is represented by two distinct but mostly identical datasets to enable the appropriate modeling of aluminium mass flow through the economy. The use of new scrap remelting to represent prepared old scrap remelting is thought to be more accurate than the use of refining as a proxy for this activity. The extrapolation is accounted for in the uncertainty.

## Included activities start
The activity starts with the reception of prepared post-consumer scrap.

## Included activities end
The activity ends with wrought aluminium billets. Note that the dataset excludes salt slag processing and dross recycling (data gap), as well as an output of unspecified metal for recycling output.

## Geography
Some Swiss datasets are used for European processes.

## Technology
Average technology for the aluminium recycled in Europe

## Reference product
- aluminium scrap, post-consumer, prepared for melting: 0 kg; source European Aluminium Association 2008; By-product classification Recyclable; CPC 39363: Waste and scrap of aluminium
  production volume 0 kg; name scrapInputVolume; = WroughtPV/ secondaryAluminiumOutput
    Based on International Aluminium Institute data on the relative share of primary, secondary (new scrap) and aluminium (old scrap) aluminium in wrought alloy, the total amount of wrought alloy produced globally, and the total amount of primary aluminium ingots produced globally.
  property price 0.806 EUR2005; name scrapInputAmount_price_EUR2005
    Temporary price data. Calculated as 90% of purchasers price based on: 2005 import and export prices (total trades (USD) divided by total weight (kg) in biggest economies of the world: EU27, USA, Brasil, China, India, Japan and Russia) from UN Commodity Trade Statistics Database (http://data.un.org/Explorer.aspxDatabase [Accessed 2011.06.17]). Commodity: Waste or scrap, aluminium
  property carbon content 0
    carbon content on a dry matter basis (reserved; not for manual entry)
  properties: dry mass 1 kg, wet mass 1 kg, carbon content, non-fossil 0, carbon content, fossil 0, water in wet mass 0 kg, water content 0, carbon allocation 0 kg
- aluminium, wrought alloy: 1 kg; name secondaryAluminiumOutput; source European Aluminium Association 2008; By-product classification allocatable product; CPC 4153: Semi-finished products of aluminium or aluminium alloys; pedigree (1,1,1,1,1)
  production volume 3.81186e9 kg; name WroughtPV
  property price 1.44 EUR2005; name secondaryAluminiumOutput_price_EUR2005
  properties: dry mass 1 kg, carbon content, fossil 0, wet mass 1 kg, carbon content, non-fossil 0, water in wet mass 0 kg, water content 0, carbon content 0, carbon allocation 0 kg

## By-products
- aluminium, wrought alloy: 0 kg; source European Aluminium Association 2008; By-product classification allocatable product; CPC 4153: Semi-finished products of aluminium or aluminium alloys; pedigree (1,1,1,1,1)
  production volume 0 kg; name WroughtPV
    (same comment as for aluminium scrap, post-consumer, prepared for melting)
  property carbon content 0
    carbon content on a dry matter basis (reserved; not for manual entry)
  properties: dry mass 1 kg, carbon content, fossil 0, wet mass 1 kg, carbon content, non-fossil 0, water in wet mass 0 kg, water content 0, carbon allocation 0 kg

## Inputs from technosphere
- aluminium melting furnace: 2e-9 unit; = secondaryAluminiumOutput/(50*10000000); source Hans-Jörg Althaus  2009; lognormal variance with pedigree 0.2106, pedigree (5,5,5,5,5)
  EcoSpold01Location=RER
  Estimated, based on an assumed 10 000 tonne scrap aluminium output per year and a lifetime of 50 years.
  Uncertainty: rough guess
- argon, liquid: 0.00224397 kg; source European Aluminium Association 2008; lognormal variance with pedigree 0.0832, pedigree (1,3,5,5,4)
  Reported as "argon"
  EcoSpold01Location=RER
  properties: wet mass 1 kg, dry mass 1 kg
- inert waste, for final disposal: -0.00160024 kg; name inertWasteAmount; source European Aluminium Association 2008; lognormal variance with pedigree 0.0832, pedigree (1,3,5,5,4)
  EcoSpold01Location=CH
  Reported as "non-hazardous waste". Split between incineration (17%), landfilling (20%) and further processing (63%) reported in EAA (2008) not accounted for in this dataset.
  production volume 6.0999e6 kg; = inertWasteAmount*scrapInputVolume/abs(scrapInputAmount)
    Calculated from the production volume of aluminium scrap treatment in proportion to the respective output amounts.
  property price 0 EUR2005; name inertWasteAmount_price_EUR2005
  properties: wet mass 1 kg, water content 0.00502513, dry mass 0.995 kg
- hazardous waste, for incineration: -5.99939e-5 kg; name hazWasteIncinerationAmount; source European Aluminium Association 2008; lognormal variance with pedigree 0.0832, pedigree (1,3,5,5,4)
  Reported as Hazardous waste for incineration
  production volume 228689 kg; = hazWasteIncinerationAmount*scrapInputVolume/abs(scrapInputAmount)
    (same comment as for inert waste, for final disposal)
  property wet mass 1 kg; name WM
  property dry mass 0.75 kg; name DM
  property price 0 EUR2005; name hazWasteIncinerationAmount_price_EUR2005
  property carbon content, fossil 0.554667; name C_content_fossil
  property water in wet mass 0.25 kg; name WWM
  property carbon content, non-fossil 0; name C_content_non_fossil
  property water content 0.333333; name water_content
  properties: heating value, net 17 MJ
  note on heating value, net: Value taken from the general comment of the treatment dataset.
  note on carbon content, fossil: Tab A.6, ecoinvent v2.2 report 13_I. C content has been calculated after data in the tables, and then referred to 1 kg DM
- heat, district or industrial, natural gas: 0 MJ; pedigree (1,1,1,1,1)
  Reported as kg natural gas. Conversion to heat supplied by the combustion of natural gas based on lower heating value of natural gas and boiler efficiency (expressed as 1/fuel_use), both taken from ecoinvent reports on energy production.
  EcoSpold01Location=RER
  Uncertainty: Uncertainty based on that of underlying variables.
  property heating value, net 1 MJ; name Net_Heat_Value_NG_per_kg
  property kgFuel_Input 0.0687115 kg; name fuel_input_in_kg; = (68.1/1000)/ secondaryAluminiumOutput
  property Corresponding fuel use 1.04 MJ; name fuel_use_ng
  note on kgFuel_Input: Based on reported value by EAA, expressed as kg per tonne aluminium output, as well as kg Al output per kg input.
  note on Corresponding fuel use: Lower heating value of the fuel input related to the heat/electricity output
- hazardous waste, for underground deposit: -0.00268994 kg; name hazWasteDepositAmount; source European Aluminium Association 2008; lognormal variance with pedigree 0.0832, pedigree (1,3,5,5,4)
  Reported as Hazardous waste for landfilling
  production volume 1.02537e7 kg; = hazWasteDepositAmount*scrapInputVolume/abs(scrapInputAmount)
    (same comment as for inert waste, for final disposal)
  property price 0 EUR2005; name hazWasteDepositAmount_price_EUR2005
  properties: wet mass 1 kg, carbon content, fossil 0.554667, dry mass 1 kg
- refractory, fireclay, packed: 0.00140046 kg; source Hans-Jörg Althaus  2009; lognormal variance with pedigree 0.0832, pedigree (1,3,5,5,4)
  Not reported in EAA 2008, taken from earlier EAA data as found in Althaus 2009.
  EcoSpold01Location=DE
  properties: dry mass 1 kg, wet mass 1 kg
- heat, district or industrial, other than natural gas: 0 MJ; pedigree (1,1,1,1,1)
  Sum of fuel inputs (2.7 kg diesel/light fuel oil, 2.7 kg heavy fuel oil, 0.3 kg propane) using LHV of 45.4, 41.2 and 46.35 MJ/kg respectively and a fuel use of 1.05 MJ/MJ supplied.
  EcoSpold01Location=RER
  Uncertainty: Uncertainty accounts for that introduced by the use of conversion factors such as Lower heating value and efficiency.
  properties: heating value, net 1 MJ
- chlorine, liquid: 0.000140046 kg; source European Aluminium Association 2008; lognormal variance with pedigree 0.0832, pedigree (1,3,5,5,4)
  EcoSpold01Location=RER
  Reported as Chlorine
  properties: dry mass 1 kg, wet mass 1 kg
- silicon, metallurgical grade: 0.015166 kg; = 2.874e-2*52.3%; source European Aluminium Association 2008; lognormal variance with pedigree 0.0838, pedigree (2,3,5,5,4)
  Reported as "alloying metal", 52.3% assumed to be Silicon in Althaus (2009)
  EcoSpold01Location=NO
  properties: wet mass 1 kg, dry mass 1 kg
- sodium chloride, powder: 0.00049995 kg; source European Aluminium Association 2008; lognormal variance with pedigree 0.082, pedigree (1,1,5,5,4)
  Reported as fluxing salts.
  EcoSpold01Location=RER
  properties: wet mass 1 kg, dry mass 1 kg
- nitrogen, liquid: 0.00125013 kg; source Hans-Jörg Althaus  2009; lognormal variance with pedigree 0.0832, pedigree (1,3,5,5,4)
  EcoSpold01Location=RER
  Not reported in EAA 2008, taken from earlier EAA data as found in Althaus 2009.
  properties: wet mass 1 kg, dry mass 1 kg
- aluminium casting facility: 1.53846e-10 unit; = secondaryAluminiumOutput/(50*130000000); source Hans-Jörg Althaus  2009; lognormal variance with pedigree 0.1306, pedigree (5,5,5,5,4)
  Estimated, based on an assumed 130 000 tonne scrap aluminium output per year and a lifetime of 50 years. Based on casting plant.
  EcoSpold01Location=RER
  Uncertainty: rough guess
- copper, cathode: 0.0138321 kg; = 2.874e-2*47.7%; source European Aluminium Association 2008; lognormal variance with pedigree 0.0838, pedigree (2,3,5,5,4)
  EcoSpold01Location=RER
  Reported as "alloying metal", 47.7% assumed to be Copper in Althaus (2009)
  properties: dry mass 1 kg, wet mass 1 kg
- electricity, medium voltage: 0 kWh; source European Aluminium Association 2008; pedigree (1,1,1,1,1)
  EcoSpold01Location=UCTE
- aluminium scrap, post-consumer, prepared for melting: 1.00898 kg; source European Aluminium Association 2008
  production volume 3.84609e9 kg
  properties: dry mass 1 kg, wet mass 1 kg
- heat, district or industrial, natural gas: 0.0459361, 2.98052 MJ (2 entries); lognormal variance with pedigree 0.04, pedigree (1,1,5,1,1)
  (same comment as for heat, district or industrial, natural gas)
  properties: heating value, net 1 MJ, kgFuel_Input 0.0687115 kg, Corresponding fuel use 1.04 MJ
- heat, district or industrial, other than natural gas: 9.65205e-5, 0.238023 MJ (2 entries); lognormal variance with pedigree 0.0518, pedigree (2,3,5,5,3)
  (same comment as for heat, district or industrial, other than natural gas)
- electricity, medium voltage: 0.00167628, 0.000321439, 0.00539629, 0.0784842, 0.0110624, 0.0360429 kWh (6 entries); source European Aluminium Association 2008; lognormal variance with pedigree 0.082, pedigree (1,1,5,5,4)
  EcoSpold01Location=UCTE

## Inputs from nature
- Water, cooling, unspecified natural origin [natural resource, in water]: 0.00965997 m3; source European Aluminium Association 2008; lognormal variance with pedigree 0.0832, pedigree (1,3,5,5,4)
  Reported as "water". Assumption that this is cooling water from Althaus 2009.

## Emissions to nature
- Particulates, > 2.5 um, and < 10um [air, unspecified]: 1.96775e-5 kg; = 4.063e-5*48%; source European Aluminium Association 2008; lognormal variance with pedigree 0.2032, pedigree (2,3,5,5,4)
  Reported as dust/particulates emissions to air. Split between three classes of particulates based on CEPMIEP database: 32% <2.5 um, 48% >2.5<10 um, 20% > 10 um. Assumed process emissions and not combustion emissions.
  Uncertainty: Uncertainty accounts for use of CEPMEIP database to split total particulates among the three particulate classes.
- Particulates, > 10 um [air, unspecified]: 8.19897e-6 kg; = 4.063e-5*20%; source European Aluminium Association 2008; lognormal variance with pedigree 0.1232, pedigree (2,3,5,5,4)
  (same comment as for Particulates, > 2.5 um, and < 10um)
- Water [water, unspecified]: 9.16961e-6 m3; source European Aluminium Association 2008; lognormal variance with pedigree 0.0832, pedigree (1,3,5,5,4)
- Particulates, < 2.5 um [air, unspecified]: 1.31184e-5 kg; = 4.063e-5*32%; source European Aluminium Association 2008; lognormal variance with pedigree 0.3832, pedigree (2,3,5,5,4)
  (same comment as for Particulates, > 2.5 um, and < 10um)
- Chlorine [air, unspecified]: 5.99939e-6 kg; source European Aluminium Association 2008; lognormal variance with pedigree 0.1226, pedigree (1,3,5,5,4)
- Hydrogen chloride [air, unspecified]: 3.30037e-5 kg; source Hans-Jörg Althaus  2009; lognormal variance with pedigree 0.1226, pedigree (1,3,5,5,4)
  Not reported in EAA 2008, taken from earlier EAA data as found in Althaus 2009.
- Hydrocarbons, chlorinated [air, unspecified]: 3.89971e-6 kg; source Hans-Jörg Althaus  2009; lognormal variance with pedigree 0.1226, pedigree (1,3,5,5,4)
  Not reported in EAA 2008, taken from earlier EAA data as found in Althaus 2009.

## Sampling procedure
Literature / Survey

## Extrapolations
see Geography This dataset has been copied from an original dataset covering the geography RER. The uncertainty has been adjusted accordingly. The percent representativeness is based on the total volume of remelters who supplied data for EAA (2008) divided by the global volume of refining in 2007 according to Wellmet (see production volume comment for more information) and hence represents an estimate only.

## Review by Hans-Jörg Althaus 2012-06-01
ok
