# treatment of rainwater mineral oil storage, in wastewater treatment plant, capacity 1.1E10l/year

Dataset: EcoSpold 2, unit process
Geography: RoW
Time period: 1994-01-01 to 2021-12-31
Technology level: current
Classification: EcoSpold01Categories: waste management/wastewater treatment
Classification: ISIC rev.4 ecoinvent: 3700:Sewerage
Tags: Treatment; ConvertedDataset
Scenario: Business-as-Usual
System model: Allocation, cut-off by classification
Generated by: Gabor Doka (obsolete)
Published in: Doka G. 2008
Database: ecoinvent
isCopyrightProtected: true
accessRestrictedTo: 1

## General comment
Wastewater purified in a moderatly large municipal wastewater treatment plant (capacity class 2), with an average capacity size of 71100 per-captia-equivalents PCE.
Wastewater contains (in kg/m3): COD: 0.07 (GSD=136%); SO4-S: 0.011 (GSD=136%); NH4-N: 0.00028 (GSD=136%); NO3-N: 0.001 (GSD=136%); Ptot.: 0.00066 (GSD=136%); B: 0.000016 (GSD=231%); Cl: 0.34 (GSD=231%); Ba: 0.00003 (GSD=231%); Cd: 0.0000005 (GSD=231%); Cr: 0.000008 (GSD=231%); Cu: 0.000015 (GSD=231%); Mn: 0.00012 (GSD=231%); Ni: 0.000005 (GSD=231%); Pb: 0.0000025 (GSD=231%); Zn: 0.00028 (GSD=231%); Sr: 0.00021 (GSD=231%); Fe: 0.0014 (GSD=231%); Ca: 0.036 (GSD=231%); Al: 0.00035 (GSD=231%); K: 0.004 (GSD=231%); Mg: 0.0022 (GSD=231%); Na: 0.212 (GSD=231%);
[This dataset was already contained in the ecoinvent database version 2. It was not individually updated during the transfer to ecoinvent version 3. Life Cycle Impact Assessment results may still have changed, as they are affected by changes in the supply chain, i.e. in other datasets. This dataset was generated following the ecoinvent quality guidelines for version 2. It may have been subject to central changes described in the ecoinvent version 3 change report (http://www.ecoinvent.org/database/ecoinvent-version-3/reports-of-changes/), and the results of the central updates were reviewed extensively. The changes added e.g. consistent water flows and other information throughout the database. The documentation of this dataset can be found in the ecoinvent reports of version 2, which are still available via the ecoinvent website. The change report linked above covers all central changes that were made during the conversion process.]

## Included activities end
Infrastructure materials for municipal wastewater treatment plant, transports, dismantling. Land use burdens.

## Geography
Specific to the technology mix encountered in Switzerland in 2000. Well applicable to modern treatment practices in Europe, North America or Japan.

## Technology
Three stage wastewater treatment (mechanical, biological, chemical) including sludge digestion (fermentation) according to the average technology in Switzerland

## Parameters
- fraction, process water, to air: 0.1 dimensionless; name fraction_PW_to_air; lognormal variance with pedigree 0.092025, pedigree (4,4,3,2,4)

## Reference product
- rainwater mineral oil storage: -1 m3; CPC 94110: Sewerage and sewage treatment services; By-product classification Waste
  EcoSpold01Location=CH
  production volume 2.67833 m3
    This is a placeholder value that does not reflect real-world production volumes. This dataset does not currently require a real-world production volume to work in the database framework, and no actual data were collected yet. This has no negative effect on the results of the ecoinvent database.
  property carbon content, fossil 0.0457865
    COD= 0.07 kg/m3 (Tab A.19, ecoinvent v2.2 report 13_I). COD was converted to TOC, using conversion factors in Tab 4.10 (ecoinvent v2.2 report 13_IV). TOC was considered as Total Carbon.
  property price 0.0929599 EUR2005
    Waste products are assigned a price of zero as they are assumed to require further treatment.
  property carbon content 0.0457865
    carbon content on a dry matter basis (reserved; not for manual entry)
  properties: water in wet mass 999.338 kg, water content 1509.95, dry mass 0.661834 kg, carbon content, non-fossil 0, wet mass 1000 kg, carbon allocation 0.030303 kg

## Inputs from technosphere
- sewer grid, 1.1E10l/year, 242 km: 1.6832e-7 km; lognormal variance with pedigree 0.042, pedigree (1,1,5,5,1)
  EcoSpold01Location=CH
  uncertainty heeded in exchanges of the module
- sodium hydroxide, without water, in 50% solution state: 6.9648e-7 kg; lognormal variance with pedigree 0.162, pedigree (1,1,5,5,1)
  EcoSpold01Location=RER
  burden from sludge incineration. Uncertainty calculated from wastewater composition and treatment model
  properties: heating value, net 3.03 MJ, dry mass 1 kg, wet mass 1 kg
- process-specific burdens, slag landfill: 0.0064405 kg; lognormal variance with pedigree 0.072, pedigree (1,1,5,5,1)
  burden from sludge incineration. Uncertainty calculated from wastewater composition and treatment model
  EcoSpold01Location=CH
- chemical, organic: 4.6881e-7 kg; lognormal variance with pedigree 0.772, pedigree (1,1,5,5,1)
  burden from sludge incineration. Uncertainty calculated from wastewater composition and treatment model
  EcoSpold01Location=GLO
  properties: heating value, net 19.03 MJ, wet mass 1 kg, dry mass 1 kg, carbon content, fossil 0.628
  note on carbon content, fossil: This dataset is an unweighted average of 20 organic substances (listed in Tab 88.1, ecoinvent v2.2 report 8, part II), being part of the top100 chemicals included in this database. The C-content has also been calculated as an unweighted average of the C content of the substances composing this dataset.
- heat, district or industrial, other than natural gas: 0 MJ; pedigree (1,1,1,1,1)
  (same comment as for process-specific burdens, slag landfill)
  properties: heating value, net 1 MJ
- ammonia, anhydrous, liquid: 0 kg; pedigree (1,1,1,1,1)
  EcoSpold01Location=CH
  burden from sludge incineration. Uncertainty calculated from wastewater composition and treatment model
  properties: dry mass 1 kg, wet mass 1 kg
- titanium dioxide: 2.128e-8 kg; lognormal variance with pedigree 0.582, pedigree (1,1,5,5,1)
  (same comment as for sodium hydroxide, without water, in 50% solution state)
  properties: wet mass 1 kg, dry mass 1 kg
- electricity, low voltage: 0 kWh; pedigree (1,1,1,1,1)
  direct wastewater treatment plant burden. Uncertainty calculated from wastewater composition and treatment model
  EcoSpold01Location=CH
- quicklime, milled, packed: 1.2627e-7 kg; lognormal variance with pedigree 0.162, pedigree (1,1,5,5,1)
  (same comment as for ammonia, anhydrous, liquid)
  properties: water content 0.010101, dry mass 0.99 kg, wet mass 1 kg
- residual material landfill: 2.1774e-12 unit; lognormal variance with pedigree 0.072, pedigree (1,1,5,5,1)
  (same comment as for process-specific burdens, slag landfill)
- iron (III) chloride, without water, in 40% solution state: 0.0041056 kg; lognormal variance with pedigree 0.152, pedigree (1,1,5,5,1)
  direct wastewater treatment plant burden plus burden from sludge incineration. Uncertainty calculated from wastewater composition and treatment model
  EcoSpold01Location=CH
  properties: wet mass 1 kg, dry mass 1 kg
- aluminium sulfate, powder: 0.00080902 kg; lognormal variance with pedigree 0.152, pedigree (1,1,5,5,1)
  direct wastewater treatment plant burden. Uncertainty calculated from wastewater composition and treatment model
  EcoSpold01Location=RER
  properties: wet mass 1 kg, dry mass 1 kg
- chromium oxide, flakes: 4.3428e-10 kg; lognormal variance with pedigree 0.582, pedigree (1,1,5,5,1)
  (same comment as for sodium hydroxide, without water, in 50% solution state)
  properties: dry mass 1 kg, wet mass 1 kg
- waste plastic, mixture: 0 kg; pedigree (1,1,1,1,1)
  EcoSpold01Location=CH
  direct wastewater treatment plant burden. Uncertainty calculated from wastewater composition and treatment model
  production volume 0 kg
    Calculated from the production volume of rainwater mineral oil storage in proportion to the respective output amounts.
  properties: water content 0.180638, wet mass 1 kg, heating value, net 30.79 MJ, dry mass 0.847 kg, carbon content, fossil 0.747344
  note on heating value, net: Value taken from the general comment of the treatment dataset.
  note on carbon content, fossil: C content in 1 kg DM was calculated using data in Tab A.2, ecoinvent v2.2 report 13_I
- process-specific burdens, municipal waste incineration: 0.045023 kg; lognormal variance with pedigree 0.052, pedigree (1,1,5,5,1)
  (same comment as for ammonia, anhydrous, liquid)
- iron sulfate: 0.0029934 kg; lognormal variance with pedigree 0.152, pedigree (1,1,5,5,1)
  (same comment as for aluminium sulfate, powder)
  properties: wet mass 1 kg, dry mass 1 kg
- chemical, inorganic: 1.2058e-7 kg; lognormal variance with pedigree 0.402, pedigree (1,1,5,5,1)
  (same comment as for chemical, organic)
  properties: carbon content, fossil 0.003, wet mass 1 kg, dry mass 1 kg
  note on carbon content, fossil: This dataset is an unweighted average of 20 inorganic substances (listed in Tab 88.1, ecoinvent v2.2 report 8, part II), being part of the top100 chemicals included in this database. The C-content has also been calculated as an unweighted average of the C content of the substances composing this dataset.
- slag landfill: 1.145e-11 unit; lognormal variance with pedigree 0.072, pedigree (1,1,5,5,1)
  (same comment as for ammonia, anhydrous, liquid)
- liquid manure spreading, by vacuum tanker: 0.00012095 m3; lognormal variance with pedigree 0.042, pedigree (1,1,5,5,1)
  burden from sludge spreading. Uncertainty calculated from wastewater composition and treatment model
  EcoSpold01Location=CH
- electricity, high voltage: 0 kWh; pedigree (1,1,1,1,1)
  (same comment as for ammonia, anhydrous, liquid)
- municipal waste incineration facility: 1.1256e-11 unit; lognormal variance with pedigree 0.052, pedigree (1,1,5,5,1)
  (same comment as for process-specific burdens, slag landfill)
- waste cement, hydrated: -0.0010451 kg; lognormal variance with pedigree 0.082, pedigree (1,1,5,5,1)
  (same comment as for process-specific burdens, slag landfill)
  production volume 0.00178921 kg
    (same comment as for waste plastic, mixture)
  properties: wet mass 1 kg, dry mass 1 kg
- process-specific burdens, residual material landfill: 0.0010451 kg; lognormal variance with pedigree 0.072, pedigree (1,1,5,5,1)
  (same comment as for ammonia, anhydrous, liquid)
- heat, district or industrial, natural gas: 0 MJ; pedigree (1,1,1,1,1)
  (same comment as for sodium hydroxide, without water, in 50% solution state)
  properties: heating value, net 1 MJ
- hydrochloric acid, without water, in 30% solution state: 7.2347e-8 kg; lognormal variance with pedigree 0.402, pedigree (1,1,5,5,1)
  burden from sludge incineration. Uncertainty calculated from wastewater composition and treatment model
  EcoSpold01Location=RER
  properties: wet mass 1 kg, dry mass 1 kg, heating value, net 3.32 MJ
- wastewater treatment facility, capacity 1.1E10l/year: 1.9883e-9 unit; lognormal variance with pedigree 0.042, pedigree (1,1,5,5,1)
  uncertainty heeded in exchanges of the module
  EcoSpold01Location=CH
- cement, unspecified: 0 kg; pedigree (1,1,1,1,1)
  (same comment as for ammonia, anhydrous, liquid)
  properties: dry mass 1 kg, wet mass 1 kg
- waste graphical paper: 0 kg; pedigree (1,1,1,1,1)
  (same comment as for electricity, low voltage)
  production volume 0 kg
    (same comment as for waste plastic, mixture)
  properties: heating value, net 14.12 MJ, water content 0.126126, carbon content, non-fossil 0.454955, dry mass 0.888 kg, wet mass 1 kg
- heat, district or industrial, other than natural gas: 1.53058e-5, 0.0377447 MJ (2 entries); lognormal variance with pedigree 0.052, pedigree (1,1,5,5,1)
  (same comment as for process-specific burdens, slag landfill)
- ammonia, anhydrous, liquid: 1.55826e-7, 1.33951e-8, 2.08394e-8, 4.12902e-8, 4.04535e-8, 4.23996e-9, 1.89542e-8, 4.48401e-7 kg (8 entries); lognormal variance with pedigree 0.262, pedigree (1,1,5,5,1)
  (same comment as for ammonia, anhydrous, liquid)
- electricity, low voltage: 0.00066523, 0.000121126, 0.00195028, 0.029943, 0.00484424, 0.0139102 kWh (6 entries); lognormal variance with pedigree 0.062, pedigree (1,1,5,5,1)
  (same comment as for electricity, low voltage)
- waste plastic, mixture: -0.00190479, -0.000127271, -9.62528e-6, -5.25674e-5, -2.12366e-5, -4.99177e-5, -0.0133346 kg (7 entries); lognormal variance with pedigree 0.042, pedigree (1,1,5,5,1)
  (same comment as for waste plastic, mixture)
  production volume 0.026536 kg
- electricity, high voltage: 8.08426e-5, 1.54983e-5, 0.000262773, 0.00378384, 0.000600082, 0.00172987 kWh (6 entries); lognormal variance with pedigree 0.492, pedigree (1,1,5,5,1)
  (same comment as for ammonia, anhydrous, liquid)
- heat, district or industrial, natural gas: 9.90349e-7, 6.42579e-5 MJ (2 entries); lognormal variance with pedigree 0.262, pedigree (1,1,5,5,1)
  (same comment as for sodium hydroxide, without water, in 50% solution state)
- cement, unspecified: 1.46801e-5, 1.07522e-6, 3.06473e-6, 6.93098e-5, 2.03999e-6, 2.24051e-5, 2.71077e-6, 0.000302774 kg (8 entries); lognormal variance with pedigree 0.082, pedigree (1,1,5,5,1)
  (same comment as for ammonia, anhydrous, liquid)
- waste graphical paper: -0.000758025, -0.000115754, -1.01216e-5, -0.000418268, -4.07846e-5, -7.54965e-5, -0.0140816 kg (7 entries); lognormal variance with pedigree 0.042, pedigree (1,1,5,5,1)
  (same comment as for electricity, low voltage)
  production volume 0.026536 kg

## Emissions to nature
- Calcium, ion [water, surface water]: 0.032477 kg; lognormal variance with pedigree 0.722, pedigree (1,1,5,5,1)
  sewer overload discharge plus direct wastewater treatment plant emission plus emission from sludge incineration. Uncertainty calculated from wastewater composition and treatment model
- Calcium [air, urban air close to ground]: 3.6104e-6 kg; lognormal variance with pedigree 0.782, pedigree (1,1,5,5,1)
  direct digester gas emission plus emission from sludge incineration. Uncertainty calculated from wastewater composition and treatment model
- Phosphate [water, ground-, long-term]: 3.0812e-5 kg; lognormal variance with pedigree 4.312, pedigree (1,1,5,5,1)
  emission from sludge incineration. Uncertainty calculated from wastewater composition and treatment model
- Chromium VI [water, surface water]: 4.1387e-6 kg; lognormal variance with pedigree 0.692, pedigree (1,1,5,5,1)
  (same comment as for Calcium, ion)
- Lead [soil, agricultural]: 8.606e-7 kg; lognormal variance with pedigree 0.762, pedigree (1,1,5,5,1)
  emission from sludge spreading. Uncertainty calculated from wastewater composition and treatment model
- Aluminium [air, urban air close to ground]: 4.3758e-7 kg; lognormal variance with pedigree 0.562, pedigree (1,1,5,5,1)
  (same comment as for Calcium)
- Copper [soil, agricultural]: 4.2965e-6 kg; lognormal variance with pedigree 0.762, pedigree (1,1,5,5,1)
  (same comment as for Lead)
- Nitrate [water, surface water]: 0.0042698 kg; lognormal variance with pedigree 0.112, pedigree (1,1,5,5,1)
  (same comment as for Calcium, ion)
- Calcium, ion [water, ground-, long-term]: 0.0018847 kg; lognormal variance with pedigree 0.762, pedigree (1,1,5,5,1)
  (same comment as for Phosphate)
- DOC, Dissolved Organic Carbon [water, surface water]: 0.0033947 kg; lognormal variance with pedigree 0.122, pedigree (1,1,5,5,1)
  (same comment as for Calcium, ion)
- Nickel, ion [water, ground-, long-term]: 1.13e-6 kg; lognormal variance with pedigree 0.762, pedigree (1,1,5,5,1)
  (same comment as for Phosphate)
- Cadmium, ion [water, ground-, long-term]: 1.5153e-9 kg; lognormal variance with pedigree 6.952, pedigree (1,1,5,5,1)
  (same comment as for Phosphate)
- Carbon dioxide, fossil [air, urban air close to ground]: 0.086458 kg; lognormal variance with pedigree 0.082, pedigree (1,1,5,5,1)
  (same comment as for Phosphate)
- Cadmium [air, urban air close to ground]: 8.4265e-12 kg; lognormal variance with pedigree 0.792, pedigree (1,1,5,5,1)
  (same comment as for Calcium)
- Strontium [water, ground-, long-term]: 6.3343e-5 kg; lognormal variance with pedigree 0.762, pedigree (1,1,5,5,1)
  (same comment as for Phosphate)
- Chromium, ion [water, surface water]: 7.7008e-9 kg; lognormal variance with pedigree 0.772, pedigree (1,1,5,5,1)
  (same comment as for Phosphate)
- Nickel [air, urban air close to ground]: 5.2088e-14 kg; lognormal variance with pedigree 0.862, pedigree (1,1,5,5,1)
  (same comment as for Calcium)
- Boron [water, surface water]: 8.8758e-6 kg; lognormal variance with pedigree 0.632, pedigree (1,1,5,5,1)
  (same comment as for Calcium, ion)
- Magnesium [water, surface water]: 0.0019846 kg; lognormal variance with pedigree 0.722, pedigree (1,1,5,5,1)
  (same comment as for Calcium, ion)
- Aluminium [water, ground-, long-term]: 0.00020729 kg; lognormal variance with pedigree 0.552, pedigree (1,1,5,5,1)
  (same comment as for Phosphate)
- NMVOC, non-methane volatile organic compounds, unspecified origin [air, urban air close to ground]: 1.0487e-6 kg; lognormal variance with pedigree 0.312, pedigree (1,1,5,5,1)
  direct digester gas emission. Uncertainty calculated from wastewater composition and treatment model
- BOD5, Biological Oxygen Demand [water, ground-, long-term]: 3.9347e-5 kg; lognormal variance with pedigree 0.172, pedigree (1,1,5,5,1)
  (same comment as for Phosphate)
- Water [water, unspecified]: 0.9 m3; name water_to_water_unspecified; lognormal variance with pedigree 0.0827, pedigree (2,2,5,5,1)
  Calculated value based on water balance.
  property fraction, origin: fresh water 1; name fraction_origin_fresh_water_Ww
  property fraction, origin: salt water 0; name fraction_origin_salt_water_Ww
  property fraction, origin: unspecified 0; name fraction_origin_unspecified_Ww
  property wet mass 1000 kg; name WM
  property water in wet mass 1000 kg; name WWM
  property carbon content, fossil 0; name C_content_fossil
  property carbon content, non-fossil 0; name C_content_non_fossil
  property dry mass 0 kg; name DM
- Manganese [air, urban air close to ground]: 1.9735e-13 kg; lognormal variance with pedigree 0.882, pedigree (1,1,5,5,1)
  (same comment as for Calcium)
- Nitrogen oxides [air, urban air close to ground]: 7.221e-6 kg; lognormal variance with pedigree 0.122, pedigree (1,1,5,5,1)
  (same comment as for Calcium)
- Water [air, unspecified]: 0.1 m3; name water_to_air_unspecified; lognormal variance with pedigree 0.0827, pedigree (2,2,5,5,1)
  Calculated value based on water balance.
  property fraction, origin: salt water 0; name fraction_origin_salt_water
  property fraction, origin: unspecified 1; name fraction_origin_unspecified
  property fraction, origin: fresh water 0; name fraction_origin_fresh_water
- Iron [air, urban air close to ground]: 6.5509e-8 kg; lognormal variance with pedigree 0.222, pedigree (1,1,5,5,1)
  (same comment as for Calcium)
- Ammonia [air, urban air close to ground]: 3.6741e-6 kg; lognormal variance with pedigree 0.312, pedigree (1,1,5,5,1)
  direct digester gas emission plus emission from sludge incineration plus emission from sludge spreading. Uncertainty calculated from wastewater composition and treatment model
- BOD5, Biological Oxygen Demand [water, surface water]: 0.0044548 kg; lognormal variance with pedigree 0.052, pedigree (1,1,5,5,1)
  (same comment as for Calcium, ion)
- Zinc [air, urban air close to ground]: 1.9381e-9 kg; lognormal variance with pedigree 0.812, pedigree (1,1,5,5,1)
  (same comment as for Calcium)
- Cadmium [soil, agricultural]: 9.5235e-8 kg; lognormal variance with pedigree 0.762, pedigree (1,1,5,5,1)
  (same comment as for Lead)
- Iron, ion [water, ground-, long-term]: 0.00091913 kg; lognormal variance with pedigree 1.002, pedigree (1,1,5,5,1)
  (same comment as for Phosphate)
- Copper [air, urban air close to ground]: 5.0291e-11 kg; lognormal variance with pedigree 0.822, pedigree (1,1,5,5,1)
  (same comment as for Calcium)
- Lead [water, surface water]: 2.7479e-7 kg; lognormal variance with pedigree 0.652, pedigree (1,1,5,5,1)
  (same comment as for Calcium, ion)
- Aluminium [water, surface water]: 2.1015e-5 kg; lognormal variance with pedigree 0.592, pedigree (1,1,5,5,1)
  (same comment as for Calcium, ion)
- DOC, Dissolved Organic Carbon [water, ground-, long-term]: 4.76e-5 kg; lognormal variance with pedigree 0.172, pedigree (1,1,5,5,1)
  (same comment as for Phosphate)
- Potassium, ion [water, surface water]: 0.004 kg; lognormal variance with pedigree 0.722, pedigree (1,1,5,5,1)
  (same comment as for Calcium, ion)
- Lead [air, urban air close to ground]: 5.0736e-11 kg; lognormal variance with pedigree 0.802, pedigree (1,1,5,5,1)
  (same comment as for Calcium)
- Sulfate [water, surface water]: 0.036177 kg; lognormal variance with pedigree 0.122, pedigree (1,1,5,5,1)
  (same comment as for Calcium, ion)
- COD, Chemical Oxygen Demand [water, surface water]: 0.013565 kg; lognormal variance with pedigree 0.122, pedigree (1,1,5,5,1)
  (same comment as for Calcium, ion)
- Strontium [soil, agricultural]: 3.9999e-5 kg; lognormal variance with pedigree 0.762, pedigree (1,1,5,5,1)
  (same comment as for Lead)
- Copper, ion [water, ground-, long-term]: 5.5071e-6 kg; lognormal variance with pedigree 0.782, pedigree (1,1,5,5,1)
  (same comment as for Phosphate)
- Nickel [soil, agricultural]: 7.6111e-7 kg; lognormal variance with pedigree 0.762, pedigree (1,1,5,5,1)
  (same comment as for Lead)
- Nitrate [water, ground-, long-term]: 5.2934e-7 kg; lognormal variance with pedigree 0.122, pedigree (1,1,5,5,1)
  (same comment as for Phosphate)
- Cadmium, ion [water, surface water]: 2.5382e-7 kg; lognormal variance with pedigree 0.712, pedigree (1,1,5,5,1)
  (same comment as for Calcium, ion)
- Iron, ion [water, surface water]: 0.00071117 kg; lognormal variance with pedigree 0.712, pedigree (1,1,5,5,1)
  (same comment as for Calcium, ion)
- Manganese [soil, agricultural]: 2.2856e-5 kg; lognormal variance with pedigree 0.762, pedigree (1,1,5,5,1)
  (same comment as for Lead)
- Phosphate [water, ground-]: 2.8981e-6 kg; lognormal variance with pedigree 0.192, pedigree (1,1,5,5,1)
  (same comment as for Lead)
- Aluminium [soil, agricultural]: 0.00017664 kg; lognormal variance with pedigree 0.542, pedigree (1,1,5,5,1)
  (same comment as for Lead)
- COD, Chemical Oxygen Demand [water, ground-, long-term]: 0.00012029 kg; lognormal variance with pedigree 0.172, pedigree (1,1,5,5,1)
  (same comment as for Phosphate)
- Magnesium [soil, agricultural]: 8.3467e-5 kg; lognormal variance with pedigree 0.762, pedigree (1,1,5,5,1)
  (same comment as for Lead)
- Ammonium, ion [water, surface water]: 0.00011526 kg; lognormal variance with pedigree 0.142, pedigree (1,1,5,5,1)
  direct wastewater treatment plant emission. Uncertainty calculated from wastewater composition and treatment model
- Barium [soil, agricultural]: 1.0906e-5 kg; lognormal variance with pedigree 0.762, pedigree (1,1,5,5,1)
  (same comment as for Lead)
- Manganese [water, ground-, long-term]: 3.121e-5 kg; lognormal variance with pedigree 0.922, pedigree (1,1,5,5,1)
  (same comment as for Phosphate)
- Phosphate [water, surface water]: 0.00069119 kg; lognormal variance with pedigree 0.132, pedigree (1,1,5,5,1)
  sewer overload discharge plus direct wastewater treatment plant emission plus emission from sludge incineration plus emission from sludge spreading. Uncertainty calculated from wastewater composition and treatment model
- Magnesium [water, ground-, long-term]: 0.00012218 kg; lognormal variance with pedigree 0.762, pedigree (1,1,5,5,1)
  (same comment as for Phosphate)
- Zinc [soil, agricultural]: 7.4816e-5 kg; lognormal variance with pedigree 0.762, pedigree (1,1,5,5,1)
  (same comment as for Lead)
- TOC, Total Organic Carbon [water, surface water]: 0.0036344 kg; lognormal variance with pedigree 0.042, pedigree (1,1,5,5,1)
  (same comment as for Calcium, ion)
- Sodium, ion [water, surface water]: 0.212 kg; lognormal variance with pedigree 0.722, pedigree (1,1,5,5,1)
  (same comment as for Calcium, ion)
- Methane, fossil [air, urban air close to ground]: 0.00023089 kg; lognormal variance with pedigree 0.192, pedigree (1,1,5,5,1)
  (same comment as for Phosphate)
- Cyanide [air, urban air close to ground]: 1.3262e-8 kg; lognormal variance with pedigree 0.282, pedigree (1,1,5,5,1)
  (same comment as for Phosphate)
- Copper, ion [water, surface water]: 3.8909e-6 kg; lognormal variance with pedigree 0.702, pedigree (1,1,5,5,1)
  (same comment as for Calcium, ion)
- Iron [soil, agricultural]: 0.0012375 kg; lognormal variance with pedigree 0.172, pedigree (1,1,5,5,1)
  (same comment as for Lead)
- Zinc, ion [water, surface water]: 8.657e-5 kg; lognormal variance with pedigree 0.702, pedigree (1,1,5,5,1)
  (same comment as for Calcium, ion)
- Boron [soil, agricultural]: 3.0475e-6 kg; lognormal variance with pedigree 0.762, pedigree (1,1,5,5,1)
  (same comment as for Lead)
- Chromium [air, urban air close to ground]: 1.7866e-13 kg; lognormal variance with pedigree 0.852, pedigree (1,1,5,5,1)
  (same comment as for Calcium)
- Dinitrogen monoxide [air, urban air close to ground]: 3.5836e-6 kg; lognormal variance with pedigree 0.092, pedigree (1,1,5,5,1)
  direct wastewater treatment plant emission plus direct digester gas emission plus emission from sludge incineration plus emission from sludge spreading. Uncertainty calculated from wastewater composition and treatment model
- Manganese [water, surface water]: 6.0902e-5 kg; lognormal variance with pedigree 0.712, pedigree (1,1,5,5,1)
  (same comment as for Calcium, ion)
- Strontium [air, urban air close to ground]: 6.3426e-9 kg; lognormal variance with pedigree 0.792, pedigree (1,1,5,5,1)
  (same comment as for Calcium)
- Carbon monoxide, fossil [air, urban air close to ground]: 7.6552e-5 kg; lognormal variance with pedigree 0.202, pedigree (1,1,5,5,1)
  (same comment as for Phosphate)
- Nitrogen [water, surface water]: 1.1316e-5 kg; lognormal variance with pedigree 0.112, pedigree (1,1,5,5,1)
  (same comment as for Ammonium, ion)
- Boron [air, urban air close to ground]: 5.799e-7 kg; lognormal variance with pedigree 0.762, pedigree (1,1,5,5,1)
  (same comment as for Calcium)
- Barium [air, urban air close to ground]: 1.7294e-8 kg; lognormal variance with pedigree 0.782, pedigree (1,1,5,5,1)
  (same comment as for Calcium)
- Boron [water, ground-, long-term]: 3.1851e-6 kg; lognormal variance with pedigree 0.762, pedigree (1,1,5,5,1)
  (same comment as for Phosphate)
- Phosphorus [air, urban air close to ground]: 2.6309e-7 kg; lognormal variance with pedigree 0.162, pedigree (1,1,5,5,1)
  (same comment as for Calcium)
- TOC, Total Organic Carbon [water, ground-, long-term]: 4.76e-5 kg; lognormal variance with pedigree 0.172, pedigree (1,1,5,5,1)
  (same comment as for Phosphate)
- Zinc, ion [water, ground-, long-term]: 1.8393e-6 kg; lognormal variance with pedigree 5.562, pedigree (1,1,5,5,1)
  (same comment as for Phosphate)
- Chloride [water, surface water]: 0.34268 kg; lognormal variance with pedigree 0.712, pedigree (1,1,5,5,1)
  (same comment as for Calcium, ion)
- Chromium [soil, agricultural]: 1.5238e-6 kg; lognormal variance with pedigree 0.762, pedigree (1,1,5,5,1)
  (same comment as for Lead)
- Barium [water, ground-, long-term]: 1.5354e-5 kg; lognormal variance with pedigree 0.862, pedigree (1,1,5,5,1)
  (same comment as for Phosphate)
- Chromium VI [water, ground-, long-term]: 2.5578e-7 kg; lognormal variance with pedigree 1.142, pedigree (1,1,5,5,1)
  (same comment as for Phosphate)
- Magnesium [air, urban air close to ground]: 1.8225e-7 kg; lognormal variance with pedigree 0.782, pedigree (1,1,5,5,1)
  (same comment as for Calcium)
- Carbon [soil, agricultural]: 0.0030741 kg; lognormal variance with pedigree 0.162, pedigree (1,1,5,5,1)
  (same comment as for Lead)
- Barium [water, surface water]: 1.8016e-6 kg; lognormal variance with pedigree 0.612, pedigree (1,1,5,5,1)
  (same comment as for Calcium, ion)
- Calcium [soil, agricultural]: 0.0013658 kg; lognormal variance with pedigree 0.762, pedigree (1,1,5,5,1)
  (same comment as for Lead)
- Strontium [water, surface water]: 0.00010661 kg; lognormal variance with pedigree 0.712, pedigree (1,1,5,5,1)
  (same comment as for Calcium, ion)
- Lead [water, ground-, long-term]: 9.7227e-8 kg; lognormal variance with pedigree 6.972, pedigree (1,1,5,5,1)
  (same comment as for Phosphate)
- Nickel, ion [water, surface water]: 3.0328e-6 kg; lognormal variance with pedigree 0.712, pedigree (1,1,5,5,1)
  (same comment as for Calcium, ion)

## Extrapolations
wastewater compositions from literature and/or estimates This dataset has been copied from an original dataset covering the geography CH. The uncertainty has been adjusted accordingly.

## Review by Niels Jungbluth 2009-01-22
passed.
