# steel production, electric, low-alloyed

Dataset: EcoSpold 2, unit process
Geography: Europe without Switzerland and Austria
Time period: 2013-01-01 to 2023-12-31
Technology level: current
Classification: ISIC rev.4 ecoinvent: 2410:Manufacture of basic iron and steel
Scenario: Business-as-Usual
System model: Allocation, cut-off by classification
Generated by: Johannes Müller
Published in: Remus, R. 2013
Database: ecoinvent
isCopyrightProtected: true
accessRestrictedTo: 1

## General comment
"Background:
This activity represents the production of secondary low-alloyed steel in an electric arc furnace (EAF). The process comprises the following operations: 1) mixing and pretreatment (if required) of ferrous materials (including alloying additions), principally ferrous scrap; 2) furnace charging and scrap melting; 3) steel and scrap tapping; 4) secondary metallurgical treatment in a ladle furnace; and 5) casting (continuous and/or ingot).

Modelling approach:
Data on were mostly taken from the IPPC Best Available Technology report from the European Commission (Remus et al., 2013); note that where only data ranges were provided, the geometric mean of reported values was used here. The proportion of each by-product that is recycled internally (i.e. returned as an input to the process after it has been produced) is based on measured data from plants worldwide reported by worldsteel (2010): EAF slag, 3%; secondary metallurgy slag, 14%; and dust, 10%.

References:
Remus, R., Aguado-Monsonet, M. A., Roudier, S. & Samcho, L. D. (2013). JRC reference report - Best available techniques (BAT) reference document for iron and steel production. Joint Research Centre - European Commission, Luxemboug.
Worldsteel (2010). Steel industry by-products. World Steel Association: Brussels, Belgium."

## Included activities start
At the gate of the steelmaking plant with the arrival of the ferrous scrap.

## Included activities end
At the gate of the steelmaking plant with the cast steel ready for transport to manufacturers and fabricators.

## Geography
Data are taken from electric arc furnace plants across Europe and are considered representative of the average situation across Europe.

## Technology
Represents average European technology; furnace with 4th hole and secondary metallurgy

## Time period
Data are mostly compiled from reports published between 2005 and 2010 but are considered representative of modern operations.

## Parameters
- ratio of production volume, region Quebec vs Global: 0.00545126 dimensionless; name ratio_PV; = 2410000000/442099900000; lognormal variance with pedigree 0.0026, pedigree (3,1,1,1,1)
  Production volume from Quebec region over World production volume
- fraction, cooling water, recirculating system, to air: 0.771 dimensionless; name fraction_CW_R_to_air; lognormal variance with pedigree 0.0413, pedigree (2,3,1,3,1)
  Calculated based on literature value (Scown, C.D., 2011, Water Footprint of U.S. Transportation Fuels and supplying information of the article) (Vionnet, S., Quantis Water Database - Technical Report, 2012).
- fraction, cooling water, cooling pond system, to air: 0.032 dimensionless; name fraction_CW_CP_to_air; lognormal variance with pedigree 0.0413, pedigree (2,3,1,3,1)
  (same comment as for fraction, cooling water, recirculating system, to air)
- electricity, ladler furnace: 0.113121 kWh; name kWh_ladler; lognormal variance with pedigree 0.0033, pedigree (2,4,1,3,1)
  Measured value. Electricity consumption for ladler furnace for alloying based on reported value from one facility in Qc region.
- electricity, electric arc furnace: 0.42361 kWh; name kWh_EAF; lognormal variance with pedigree 0.0034, pedigree (2,3,2,5,1)
- fraction, cooling water, once-through system, to air: 0.004 dimensionless; name fraction_CW_OT_to_air; lognormal variance with pedigree 0.0413, pedigree (2,3,1,3,1)
  (same comment as for fraction, cooling water, recirculating system, to air)
- fraction, cooling water, to air: 0.56 dimensionless; name fraction_CW_to_air; lognormal variance with pedigree 0.041425, pedigree (2,3,2,2,1)
- fraction, process water, to air: 0.095 dimensionless; name fraction_PW_to_air; lognormal variance with pedigree 0.092025, pedigree (4,4,3,2,4)

## Reference product
- steel, low-alloyed: 1 kg; name RP; By-product classification allocatable product; CPC 41122: Alloy steel in ingots or other primary forms and semi-finished products of alloy steel
  production volume 1.1181e10 kg; name PV
    Calculated based on the amount of crude steel produced in Europe through the EAF route in 2019, excluding Austria and Switzerland (worldsteel, 2020) and excluding the amount of stainless steel. Of the amount of steel produced in Europe in 2019 that was not stainless steel, 82.6% was unalloyed and 17.4% low-alloyed (eurofer 2020).
    References:
    eurofer (2020). European Steel in Figures 2020. https://www.eurofer.eu/assets/Uploads/European-Steel-in-Figures-2020.pdf (last accessed 2021-08-11).
    worldsteel (2020). Steel Statistical Yearbook 2020 [online]. Available from: https://www.worldsteel.org/en/dam/jcr:5001dac8-0083-46f3-aadd-35aa357acbcc/Steel%2520Statistical%2520Yearbook%25202020%2520%2528concise%2520version%2529.pdf (accessed 20.07.2021).
  property heating value, net 0 MJ
    Non combustible products are assumed to have an LHV equal to zero (0).
  property carbon content 0.005
    carbon content on a dry matter basis (reserved; not for manual entry)
  properties: dry mass 1 kg, wet mass 1 kg, carbon content, fossil 0.005, water in wet mass 0 kg, price 0.468 EUR2005, water content 0, carbon content, non-fossil 0, carbon allocation 0.005 kg

## Inputs from technosphere
- electric arc furnace secondary metallurgy slag: -0.01924 kg; name EAF_SM_slag_amount; lognormal variance with pedigree 0.004425, pedigree (2,3,3,2,2)
  Amount reported by worldsteel (2010) and is representative of the average global situation in 2009. Also based on worldsteel (2010), an internal recovery (recycling) rate of 14% is assumed. Source: Worldsteel (2010). Steel industry by-products. World Steel Association: Brussels, Belgium.
  production volume 2.15123e8 kg; = PV * EAF_SM_slag_amount / RP
    Calculated from production volume of reference product using the relative outputs.
  property price 0 EUR2005; name EAF_SM_slag_amount_price_EUR2005
  properties: magnesium content 0.0427775, water content 0.00502513, iron content 0.0199153, calcium content 0.312637, fluorine content 0.0129487, manganese content 0.00556519, oxygen content 0.476841, dry mass 0.995 kg, wet mass 1 kg, aluminium content 0.0530427, silicon content 0.0601451, sulfur content 0.00614898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
  note on magnesium content: The value of 'magnesium content' is documented in Turner & Symeonidis, 2020. Reference: Turner David & Symeonidis Avraam, 2020, Life cycle inventories of the treatment of iron and steelmaking by-products, ecoinvent association, Zürich, Switzerland
  note on iron content: The value of 'iron content' is documented in Turner & Symeonidis, 2020. Reference: Turner David & Symeonidis Avraam, 2020, Life cycle inventories of the treatment of iron and steelmaking by-products, ecoinvent association, Zürich, Switzerland
  note on calcium content: The value of 'calcium content' is documented in Turner & Symeonidis, 2020. Reference: Turner David & Symeonidis Avraam, 2020, Life cycle inventories of the treatment of iron and steelmaking by-products, ecoinvent association, Zürich, Switzerland
  note on fluorine content: The value of 'fluorine content' is documented in Turner & Symeonidis, 2020. Reference: Turner David & Symeonidis Avraam, 2020, Life cycle inventories of the treatment of iron and steelmaking by-products, ecoinvent association, Zürich, Switzerland
  note on manganese content: The value of 'manganese content' is documented in Turner & Symeonidis, 2020. Reference: Turner David & Symeonidis Avraam, 2020, Life cycle inventories of the treatment of iron and steelmaking by-products, ecoinvent association, Zürich, Switzerland
  note on oxygen content: The value of 'oxygen content' is documented in Turner & Symeonidis, 2020. Reference: Turner David & Symeonidis Avraam, 2020, Life cycle inventories of the treatment of iron and steelmaking by-products, ecoinvent association, Zürich, Switzerland
  note on aluminium content: The value of 'aluminium content' is documented in Turner & Symeonidis, 2020. Reference: Turner David & Symeonidis Avraam, 2020, Life cycle inventories of the treatment of iron and steelmaking by-products, ecoinvent association, Zürich, Switzerland
  note on silicon content: The value of 'silicon content' is documented in Turner & Symeonidis, 2020. Reference: Turner David & Symeonidis Avraam, 2020, Life cycle inventories of the treatment of iron and steelmaking by-products, ecoinvent association, Zürich, Switzerland
  note on sulfur content: The value of 'sulfur content' is documented in Turner & Symeonidis, 2020. Reference: Turner David & Symeonidis Avraam, 2020, Life cycle inventories of the treatment of iron and steelmaking by-products, ecoinvent association, Zürich, Switzerland
- electric arc furnace slag: -0.145866 kg; name EAF_slag_amount; lognormal variance with pedigree 0.004425, pedigree (2,3,3,2,2)
  Amount reported by worldsteel (2010) and is representative of the average global situation in 2009. Also based on worldsteel (2010), an internal recovery (recycling) rate of 3% is assumed. Source: Worldsteel (2010). Steel industry by-products. World Steel Association: Brussels, Belgium.
  production volume 1.63093e9 kg; = PV * EAF_slag_amount / RP
    Calculated from production volume of reference product using the relative outputs.
  property price 0 EUR2005; name EAF_slag_amount_price_EUR2005
  properties: fluorine content 0.02, oxygen content 0.317802, calcium content 0.251088, chromium content 0.0282022, silicon content 0.0836324, iron content 0.158855, water content 0.00502513, magnesium content 0.0502306, wet mass 1 kg, manganese content 0.0350676, dry mass 0.995 kg, aluminium content 0.0371314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
  note on chromium content: The value of 'chromium content' is documented in Turner & Symeonidis, 2020. Reference: Turner David & Symeonidis Avraam, 2020, Life cycle inventories of the treatment of iron and steelmaking by-products, ecoinvent association, Zürich, Switzerland
- electricity, medium voltage: 0 kWh; pedigree (1,1,1,1,1)
  geometric mean of Remus et al. (2013) data range
  Uncertainty: Calculated variable. Uncertainty will be determined from propagation of uncertainty factors of underlying variables. Uncertainty of actual relation between variables not accounted for at this time, although this could be included in a future update.
- hard coal: 0.00916515 kg; name n_hardcoal; lognormal variance with pedigree 0.0034, pedigree (2,3,2,5,1)
  geometric mean of Remus et al. (2013) data range
  property carbon content, fossil 0.845; name ccf_hardcoal
  properties: heating value, net 27.91 MJ, dry mass 0.94 kg, water content 0.0638298, wet mass 1 kg
  note on heating value, net: Based on the Characterization factor of Hard coal in the CED method
  note on carbon content, fossil: C content 75-94% (specified in Tab 1.1, report 6, part VI). A mean content of 0.845 kg C/ kg dry hard coal was considered
- natural gas, high pressure: 0 m3; name n_naturalgas; pedigree (1,1,1,1,1)
  geometric mean of Remus et al. (2013) data range (MJ:m3 conversion based on LHV value from: https://www.engineeringtoolbox.com/fuels-higher-calorific-values-d_169.html)
  property carbon content, fossil 0.602381; name ccf_naturalgas
  properties: heating value, net 39 MJ, wet mass 0.84 kg, dry mass 0.84 kg, heating value, gross 39 MJ
  note on heating value, net: Literature value, Source: United Nations Statistics Division (2018) International Recommendations for Energy Statistics (IRES). Available at: http://unstats.un.org/unsd/statcom/doc11/BG-IRES.pdf.
  note on carbon content, fossil: An average C content of 0.506 kg C/ m3 has been assumed (this average has been calculated using data in Tab 3.5, ecoinvent v2.2 report 6_V
- electric arc furnace dust: -0.0191274 kg; name EAF_dust_amount; lognormal variance with pedigree 0.004425, pedigree (2,3,3,2,2)
  Amount reported by worldsteel (2010) and is representative of the average global situation in 2009. Also based on worldsteel (2010), an internal recovery (recycling) rate of 10% is assumed. Source: Worldsteel (2010). Steel industry by-products. World Steel Association: Brussels, Belgium.
  production volume 2.13864e8 kg; = PV * EAF_dust_amount / RP
    Calculated from production volume of reference product using the relative outputs.
  property price 0 EUR2005; name EAF_dust_amount_price_EUR2005
  properties: tungsten content 0.00866025, calcium content 0.052289, iron content 0.259042, silicon content 0.0210985, manganese content 0.0192227, magnesium content 0.0130343, wet mass 1 kg, zinc content 0.0646031, carbon content, fossil 0.0155074, dry mass 0.999 kg, oxygen content 0.492232, chlorine content 0.0108651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
  note on tungsten content: The value of 'tungsten content' is documented in Turner & Symeonidis, 2020. Reference: Turner David & Symeonidis Avraam, 2020, Life cycle inventories of the treatment of iron and steelmaking by-products, ecoinvent association, Zürich, Switzerland
  note on zinc content: The value of 'zinc content' is documented in Turner & Symeonidis, 2020. Reference: Turner David & Symeonidis Avraam, 2020, Life cycle inventories of the treatment of iron and steelmaking by-products, ecoinvent association, Zürich, Switzerland
  note on carbon content, fossil: The value of 'carbon content, fossil' is documented in Turner & Symeonidis, 2020. Reference: Turner David & Symeonidis Avraam, 2020, Life cycle inventories of the treatment of iron and steelmaking by-products, ecoinvent association, Zürich, Switzerland
  note on chlorine content: The value of 'chlorine content' is documented in Turner & Symeonidis, 2020. Reference: Turner David & Symeonidis Avraam, 2020, Life cycle inventories of the treatment of iron and steelmaking by-products, ecoinvent association, Zürich, Switzerland
- ferromanganese, high-coal, 74.5% Mn: 0.0103047 kg; lognormal variance with pedigree 0.0013, pedigree (2,2,1,1,1)
  Value taken from regional dataset for Switzerland, which was used as a proxy.
  properties: dry mass 1 kg, heating value, net 2.27 MJ, carbon content, fossil 0.075, wet mass 1 kg
- oxygen, liquid: 0.0239048 kg; lognormal variance with pedigree 0.0034, pedigree (2,3,2,5,1)
  geometric mean of Remus et al. (2013) data range (m3:kg conversion based on: http://www.airproducts.com/Products/Gases/gas-facts/conversion-formulas/weight-and-volume-equivalents/oxygen.aspx)
  properties: dry mass 1 kg, wet mass 1 kg
- argon, liquid: 0.00109287 kg; name Argon; lognormal variance with pedigree 0.0044, pedigree (2,4,1,4,2)
  geometric mean of Remus et al. (2013) data range (m3:kg conversion based on: http://www.airproducts.com/Products/Gases/gas-facts/conversion-formulas/weight-and-volume-equivalents/argon.aspx)
  properties: wet mass 1 kg, dry mass 1 kg
- iron scrap, sorted, pressed: 1.13139 kg; lognormal variance with pedigree 0.004, pedigree (2,3,2,5,1)
  geometric mean of Remus et al. (2013) data range
  properties: dry mass 1 kg, wet mass 1 kg
- ferrosilicon: 0.00391695 kg; lognormal variance with pedigree 0.0013, pedigree (2,2,1,1,1)
  Value taken from regional dataset for Switzerland, which was used as a proxy.
  properties: wet mass 1 kg, dry mass 1 kg, heating value, net 3.03 MJ, carbon content, fossil 0.1
- electric arc furnace converter: 4e-11 unit; lognormal variance with pedigree 0.5, pedigree (5,5,5,5,5)
  Source: Classen et al. (2009)
- anode, for metal electrolysis: 0.0034641 kg; lognormal variance with pedigree 0.0034, pedigree (2,3,2,5,1)
  geometric mean of Remus et al. (2013) data range
  properties: wet mass 1 kg, dry mass 1 kg, carbon content, fossil 0.865971
  note on carbon content, fossil: The main component of the anode is carbon, coming from bitumen and petroleum coke (ecoinvent v2.2 report 10). The C content in those components of the anode has been taken into account to calculate the anode final C content.
- inert waste, for final disposal: -0.00678233 kg; name EAF_inert_amount; lognormal variance with pedigree 0.004425, pedigree (2,3,3,2,2)
  Represents used refractories, etc.
  production volume 7.58333e7 kg; = PV * EAF_inert_amount / RP
    Calculated from production volume of reference product using the relative outputs.
  property price 0 EUR2005; name EAF_inert_amount_price_EUR2005
  properties: wet mass 1 kg, water content 0.00502513, dry mass 0.995 kg
- quicklime, in pieces, loose: 0.0591608 kg; lognormal variance with pedigree 0.0034, pedigree (2,3,2,5,1)
  geometric mean of Remus et al. (2013) data range
  properties: water content 0.010101, wet mass 1 kg, dry mass 0.99 kg
- nitrogen, liquid: 0.00359723 kg; lognormal variance with pedigree 0.0572, pedigree (2,3,5,5,3)
  geometric mean of Remus et al. (2013) data range (m3:kg conversion based on: http://www.airproducts.com/Products/Gases/gas-facts/conversion-formulas/weight-and-volume-equivalents/nitrogen.aspx)
  properties: wet mass 1 kg, dry mass 1 kg
- refractory, basic, packed: 0.0154919 kg; lognormal variance with pedigree 0.0034, pedigree (2,3,2,5,1)
  geometric mean of Remus et al. (2013) data range
  properties: wet mass 1 kg, dry mass 1 kg
- electricity, medium voltage: 0.00460445, 0.00231144, 0.0265084, 0.00498712, 0.0828726, 0.00606586, 0.0242182, 0.00145608, 0.0406046, 0.0235223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 kWh (38 entries); lognormal variance with pedigree 0.0512, pedigree (2,3,5,5,3)
  (same comment as for electricity, medium voltage)
- natural gas, high pressure: 8.06204e-5, 0.000167647, 7.1396e-5, 0.00153047, 1.59798e-5, 0.000231122, 0.00168194, 0.000446729, 8.64962e-5, 5.13113e-5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 m3 (17 entries); lognormal variance with pedigree 0.0034, pedigree (2,3,2,5,1)
  (same comment as for natural gas, high pressure)
  properties: heating value, net 39 MJ, wet mass 0.84 kg, carbon content, fossil 0.602381, dry mass 0.84 kg, heating value, gross 39 MJ

## Inputs from nature
- Water, cooling, unspecified natural origin [natural resource, in water]: 0.00654217 m3; name water_cooling_UNO_input; source Byers, W. 2003; lognormal variance with pedigree 0.0152, pedigree (2,3,3,5,1)
  geometric mean of Remus et al. (2013) data range
  property dry mass 0.1101 kg; name DM
  property carbon content, fossil 0.0104329; name C_content_fossil
  property carbon content, non-fossil 0; name C_content_non_fossil
  property wet mass 1000 kg; name WM
  property water content 9081.65; name water_content
  property water in wet mass 999.89 kg; name WWM

## Emissions to nature
- Lead [air, unspecified]: 4.62331e-7 kg; lognormal variance with pedigree 0.6534, pedigree (2,3,2,5,1)
  geometric mean of Remus et al. (2013) data range
- Water [air, unspecified]: 0.00292117 m3; name water_to_air_unspecified; lognormal variance with pedigree 0.0427, pedigree (2,2,1,5,1)
  Source: Classen et al. (2009)
  property fraction, origin: fresh water 0; name fraction_origin_fresh_water
  property fraction, origin: salt water 0; name fraction_origin_salt_water
  property fraction, origin: unspecified 1; name fraction_origin_unspecified
- Hydrocarbons, aromatic [air, unspecified]: 7.7008e-5 kg; lognormal variance with pedigree 0.0434, pedigree (2,3,2,5,1)
  Source: Classen et al. (2009)
- Dioxins, measured as 2,3,7,8-tetrachlorodibenzo-p-dioxin [air, unspecified]: 4.89898e-13 kg; lognormal variance with pedigree 0.3034, pedigree (2,3,2,5,1)
  geometric mean of Remus et al. (2013) data range
- Cadmium [air, unspecified]: 1.21655e-8 kg; lognormal variance with pedigree 0.6534, pedigree (2,3,2,5,1)
  geometric mean of Remus et al. (2013) data range
- Particulates, < 2.5 um [air, unspecified]: 1.47224e-5 kg; lognormal variance with pedigree 0.3034, pedigree (2,3,2,5,1)
  geometric mean of Remus et al. (2013) data range (assume 42.5% of total dust emissions [Classen et al. 2009])
- PAH, polycyclic aromatic hydrocarbons [air, unspecified]: 9.34345e-8 kg; lognormal variance with pedigree 0.3034, pedigree (2,3,2,5,1)
  geometric mean of Remus et al. (2013) data range
- Hydrogen chloride [air, unspecified]: 5.31037e-6 kg; lognormal variance with pedigree 0.0434, pedigree (2,3,2,5,1)
  geometric mean of Remus et al. (2013) data range
- Benzene [air, unspecified]: 3.63318e-7 kg; lognormal variance with pedigree 0.1234, pedigree (2,3,2,5,1)
  geometric mean of Remus et al. (2013) data range
- Hydrogen fluoride [air, unspecified]: 2.44949e-8 kg; lognormal variance with pedigree 0.0434, pedigree (2,3,2,5,1)
  geometric mean of Remus et al. (2013) data range
- Particulates, > 10 um [air, unspecified]: 5.19615e-6 kg; lognormal variance with pedigree 0.0434, pedigree (2,3,2,5,1)
  geometric mean of Remus et al. (2013) data range (assume 15% of total dust emissions [Classen et al. 2009])
- Sulfur dioxide [air, unspecified]: 3.24037e-5 kg; lognormal variance with pedigree 0.0034, pedigree (2,3,2,5,1)
  geometric mean of Remus et al. (2013) data range
- Nickel [air, unspecified]: 7.74597e-8 kg; lognormal variance with pedigree 0.6534, pedigree (2,3,2,5,1)
  geometric mean of Remus et al. (2013) data range
- Water [water, unspecified]: 0.0022952 m3; name water_to_water_unspecified; lognormal variance with pedigree 0.0427, pedigree (2,2,1,5,1)
  Source: Classen et al. (2009)
  property fraction, origin: salt water 0; name fraction_origin_salt_water_Ww
  property fraction, origin: unspecified 1; name fraction_origin_unspecified_Ww
  property fraction, origin: fresh water 0; name fraction_origin_fresh_water_Ww
- Nitrogen oxides [air, unspecified]: 7.73305e-5 kg; lognormal variance with pedigree 0.0434, pedigree (2,3,2,5,1)
  geometric mean of Remus et al. (2013) data range
- Copper [air, unspecified]: 7.48999e-8 kg; lognormal variance with pedigree 0.6534, pedigree (2,3,2,5,1)
  geometric mean of Remus et al. (2013) data range
- Particulates, > 2.5 um, and < 10um [air, unspecified]: 1.47224e-5 kg; lognormal variance with pedigree 0.1234, pedigree (2,3,2,5,1)
  (same comment as for Particulates, < 2.5 um)
- Zinc [air, unspecified]: 2.19089e-6 kg; lognormal variance with pedigree 0.6534, pedigree (2,3,2,5,1)
  geometric mean of Remus et al. (2013) data range
- Mercury [air, unspecified]: 2e-8 kg; lognormal variance with pedigree 0.6534, pedigree (2,3,2,5,1)
  geometric mean of Remus et al. (2013) data range
- Carbon dioxide, fossil [air, unspecified]: 0.0441472 kg; = (( ccf_hardcoal* n_hardcoal) + ( ccf_naturalgas * n_naturalgas) - ( ccf_carbonmonoxide * n_carbonmonoxide)) / ccf_carbondioxide; lognormal variance with pedigree 0.2106, pedigree (5,5,5,5,5)
  Calculated Value. Carbon dioxide emission is calculated as the sum of carbon in hard coal and natural gas minus the emissions of carbon monoxide.
  property carbon content, fossil 0.272916; name ccf_carbondioxide
- Chromium [air, unspecified]: 1.83303e-7 kg; lognormal variance with pedigree 0.6534, pedigree (2,3,2,5,1)
  geometric mean of Remus et al. (2013) data range
- Carbon monoxide, fossil [air, unspecified]: 0.000474342 kg; name n_carbonmonoxide; lognormal variance with pedigree 0.6534, pedigree (2,3,2,5,1)
  geometric mean of Remus et al. (2013) data range
  property carbon content, fossil 0.428805; name ccf_carbonmonoxide
- Polychlorinated biphenyls [air, unspecified]: 2.23607e-10 kg; lognormal variance with pedigree 0.3034, pedigree (2,3,2,5,1)
  geometric mean of Remus et al. (2013) data range
- Benzene, hexachloro- [air, unspecified]: 1.54919e-9 kg; lognormal variance with pedigree 0.1234, pedigree (2,3,2,5,1)
  geometric mean of Remus et al. (2013) data range

## Sampling procedure
Data were taken from direct measurements at blast furnace plants across Europe.

Note that there may be mass imbalances in the dataset. This is because the values represent the average situation in steelmaking many different plants and have not been augmented or adjusted. Similarily, these values represent the situation post-ventilation/off-gas management, i.e. it is not the mass of carbon, for instance, that is produced that is reported but the amount that is actually, on average, emitted to the environment considering an average mix of steelmaking, technologies, off-gas management approaches, and internal recovery (recycling) or utilisation rates at integrated steelmakers in Europe.

It should also be noted that data on radionucleid emissions to air, e.g. of Pollonium 210 and Lead 210, were not available and have therefore not been inventoried here.
