# poultry manure, dried, Recycled Content cut-off

Dataset: EcoSpold 2, unit process
Geography: GLO
Time period: 2021-01-01 to 2021-12-31
Technology level: current
Scenario: Business-as-Usual
System model: Allocation, cut-off by classification
Generated by: [System]
isCopyrightProtected: true
accessRestrictedTo: 1

## Reference product
- poultry manure, dried: 1 kg; By-product classification Recyclable; CPC 34654: Excreta of animals useful for manure/fertilizer and fuel preparation
  property lead content 2.92e-6
    pg 36 Tab 7. Original values are given in kg/m3, but this is an error and it is mg/kg DM
  property mercury content 2e-7
    pg 36 Tab 7. Original values are given in kg/m3, but this is an error and it is mg/kg DM
  property cadmium content 2.92e-7
    pg 36 Tab 7. Original values are given in kg/m3, but this is an error and it is mg/kg DM
  property zinc content 0.000349
    pg 36 Tab 7. Original values are given in kg/m3, but this is an error and it is mg/kg DM
  property nickel content 4e-5
    pg 36 Tab 7. Original values are given in kg/m3, but this is an error and it is mg/kg DM
  property copper content 4.38e-5
    pg 36 Tab 7. Original values are given in kg/m3, but this is an error and it is mg/kg DM
  property carbon content 0.33389
    carbon content on a dry matter basis (reserved; not for manual entry)
  properties: water content 0.156069, carbon content, fossil 0, water in wet mass 0.135 kg, wet mass 1 kg, carbon content, non-fossil 0.33389, potassium content 0.024, phosphorus content 0.0167, nitrogen content 0.532, dry mass 0.865 kg, carbon allocation 0.288815 kg
