# flat glass factory construction

Dataset: EcoSpold 2, unit process
Geography: RER
Time period: 2000-01-01 to 2021-12-31
Technology level: current
Classification: ISIC rev.4 ecoinvent: 4290:Construction of other civil engineering projects
Classification: EcoSpold01Categories: glass/construction
Synonyms: Flach; Flachglasfabrik; plate
Tags: ConvertedDataset
Scenario: Business-as-Usual
System model: Allocation, cut-off by classification
Generated by: Daniel Kellenberger (obsolete)
Published in: Kellenberger D. 2007
Database: ecoinvent
isCopyrightProtected: true
accessRestrictedTo: 1

## General comment
The lifespan of the buildings and the land occupation is assumed to be 50 years and of the equipment (furnace (exkl. fireproof brick), float bath, annealing lehr, warehouse, stacking) 20 years. The module is based on a yearly production volume of 83'000 t/a
[This dataset was already contained in the ecoinvent database version 2. It was not individually updated during the transfer to ecoinvent version 3. Life Cycle Impact Assessment results may still have changed, as they are affected by changes in the supply chain, i.e. in other datasets. This dataset was generated following the ecoinvent quality guidelines for version 2. It may have been subject to central changes described in the ecoinvent version 3 change report (http://www.ecoinvent.org/database/ecoinvent-version-3/reports-of-changes/), and the results of the central updates were reviewed extensively. The changes added e.g. consistent water flows and other information throughout the database. The documentation of this dataset can be found in the ecoinvent reports of version 2, which are still available via the ecoinvent website. The change report linked above covers all central changes that were made during the conversion process.]

## Included activities end
includes the infrastructure (multi-storey buildings and halls, tin initial load and equipment) and the land-use (built and not built areas)

## Geography
Data from one company in Germany is extrapolated to RER. For some exchanges CH-modules are used as proxy

## Technology
Assumed data for average European plant

## Reference product
- flat glass factory: 1 unit; CPC 53269: Other constructions for manufacturing; By-product classification allocatable product
  EcoSpold01Location=RER
  production volume 1.32237 unit
    This is a placeholder value that does not reflect real-world production volumes. This dataset does not currently require a real-world production volume to work in the database framework, and no actual data were collected yet. This has no negative effect on the results of the ecoinvent database. The placeholder value of this activity was scaled according to the nominal GDP of 2005 (source: United Nations, http://data.un.org/Glossary.aspx?q=GDP+%28current+US%24%29, accessed 20130726) to reflect an appropriate share of the global production volume, which is also a placeholder value.
  property price 1.78204e7 EUR2005
    Calculated based on inputs: The price of the product has been calculated as a sum of the values of the material and energy inputs for this product. This value is therefore a rough estimation. It may underestimate the real price since there are additional expenses when producing any product. These expences can include for example labour costs, treatment of waste materials and profit for the producer. Please consider carefully whether this level of data quality is acceptable for your application.

## Inputs from technosphere
- industrial machine, heavy, unspecified: 300000 kg; lognormal variance with pedigree 0.69, pedigree (1,1,5,1,1)
  Estimation of standard deviation
  EcoSpold01Location=RER
- building, multi-storey: 84000 m3; lognormal variance with pedigree 0.3761, pedigree (1,5,5,3,3)
  EcoSpold01Location=RER
  activityLink introduced to establish a direct link to the corresponding regional supply of this product
- building, hall, steel construction: 48300 m2; lognormal variance with pedigree 0.3761, pedigree (1,5,5,3,3)
  EcoSpold01Location=CH
- tin: 200000 kg; lognormal variance with pedigree 0.0541, pedigree (3,4,5,3,1)
  EcoSpold01Location=RER
  properties: dry mass 1 kg, wet mass 1 kg

## Inputs from nature
- Transformation, to industrial area [natural resource, land]: 128100 m2; lognormal variance with pedigree 0.1961, pedigree (1,5,5,3,3)
- Transformation, to traffic area, rail/road embankment [natural resource, land]: 21400 m2; lognormal variance with pedigree 0.1961, pedigree (1,5,5,3,3)
- Occupation, industrial area [natural resource, land]: 6.4e6 m2*year; lognormal variance with pedigree 0.1161, pedigree (1,5,5,3,3)
- Occupation, traffic area, rail/road embankment [natural resource, land]: 1.07e6 m2*year; lognormal variance with pedigree 0.1161, pedigree (1,5,5,3,3)
- Transformation, from unspecified [natural resource, land]: 128000 m2; lognormal variance with pedigree 0.1961, pedigree (1,5,5,3,3)

## Sampling procedure
Questionnaire (one German company)

## Extrapolations
This dataset has been extrapolated from year 2001 to the year of the calculation (2021). The uncertainty has been adjusted accordingly.

## Review by Roberto Dones 2007-11-07
passed
