# polyethylene production, linear low density, granulate

Dataset: EcoSpold 2, unit process
Geography: RER
Time period: 2011-01-01 to 2021-12-31
Technology level: current
Classification: ISIC rev.4 ecoinvent: 2013:Manufacture of plastics and synthetic rubber in primary forms
Synonyms: LLDPE
Scenario: Business-as-Usual
System model: Allocation, cut-off by classification
Share of production covered: 86 %
Generated by: Thomas Fröhlich
Published in: PlasticsEurope 2016
Database: ecoinvent
isCopyrightProtected: true
accessRestrictedTo: 1

## General comment
The dataset represents the production mix of commercial LLDPE production technologies: gas phase polymerisation and soulution polimerisation using Ziegler-Natta and Metallocene catalysts
LLDPE is either produced in the gas phase process in a fluidised bed reactor or in the solution process. Depending of the kind of co-monomer chosen, the kind of used technology has to be adapted. If 1-butene is used as co-monomer, usually the gas phase process is chosen, for 1-octene as co-monomer, the solution process is preferable. For a polymerisation process with 1-hexene as co-monomer, however, both technologies can be applied. As catalysts, usually Ziegler-Natta or metallocene-type catalysts are applied.
In the gas phase processes a fluidised bed of polymer particles and catalyst is maintained by a steady gaseous monomer feed from the bottom of the reactor. Polymer powder is continuously extracted at the bottom of the fluidised bed reactor. Unreacted monomer gas from the top is compressed and recycled to the reactor inlet. Catalyst, and co-catalyst if necessary, is also continuously fed to the reactor. Typically Ziegler-Natta catalysts are used for gas phase polymerisation where the catalyst is supported on inert silica particles so that the reaction takes place at the catalyst surface.
For solution polymerisation, the hydrocarbon solvent (C9-C6) is kept at high temperature (>130 °C) to ensure that the formed polymer stays dissolved after production. In a subsequent step, the solvent is evaporated and recycled, and the liquid polymer can directly be sent to the extruder.
After the reaction phase, most of the residual (unreacted) monomers (which are mostly present as gases) are separated from the polymer and are either recycled back into the process or flared of. Depending on the purity of the separated monomers, the gas can either be fed directly back into the production line or the monomers are returned to a purification unit. To limit the accumulation of impurities in the process, usually a small side-stream (purge) of the unreacted gas is sent back to the cracker or to a dedicated purification unit. After polymerisation, the polymer is usually fed di-rectly into a hot melt extruder, where additives can be added to the melted polymer if required. The polymer is then pelletised in an underwater pelletiser. The pelletised product is dried, blended where required and degassed.

## Included activities start
Acitivity starts with monomers and comonomers entering the polymerisation plant. Energy supply is included in terms of heat production inside the battery limits of the plant. Steam and electricity supply is outside the activity.

## Included activities end
Activity ends with polymer granulate leaving the factory.

## Allocation
The polyolefin production itself is regarded as a single-output process since only one polymer type is produced by one installation. All other products of this installation, e.g. monomers being recycled to the cracker or distillation, or hydrocarbons being used thermally, are treated as internal flows replacing the respective input materials (i.e. monomers or energy carriers). Hence, no allocation is needed for the polyolefin production process.

## Geography
EU27 including Norway and Switzerland

## Technology
Coverage of production capacity in Europe: 86%

## Time period
Data was collected for the year 2011, processed in 2013 and published in 2014

## Reference product
- polyethylene, linear low density, granulate: 1 kg; CPC 34710: Polymers of ethylene, in primary forms; By-product classification allocatable product; CAS 9002-88-4
  Reference Product
  production volume 3.6e9 kg; name RP_PV
    Production Capacity in 2013 in EU27+NOR+CH, Source: PlasticsEurope
  property carbon content 0.857143
    carbon content on a dry matter basis (reserved; not for manual entry)
  properties: wet mass 1 kg, heating value, net 42.47 MJ, price 1.29 EUR2005, carbon content, non-fossil 0, carbon content, fossil 0.857143, water in wet mass 0 kg, dry mass 1 kg, water content 0, carbon allocation 0.857143 kg

## Inputs from technosphere
- waste plastic, mixture: -0.000834714 kg; name BP_amount4; lognormal variance with pedigree 0.0107, pedigree (3,2,4,1,1)
  Weighted average of reported waste
  production volume 3.00497e6 kg; = BP_amount4*RP_PV
    calculated with production volume of reference product
  property price 0 EUR2005; name BP_amount4_price_EUR2005
  properties: water content 0.180638, carbon content, fossil 0.747344, dry mass 0.847 kg, wet mass 1 kg, heating value, net 30.79 MJ
  note on heating value, net: Value taken from the general comment of the treatment dataset.
- wastewater, average: 0 m3; name BP_amount1; pedigree (1,1,1,1,1)
  Weighted average of reported waste
  production volume 0 m3
    calculated with production volume of reference product
  property price 0 EUR2005; name BP_amount1_price_EUR2005
  properties: dry mass 0.346837 kg, water content 2882.2, carbon content, non-fossil 0.194039, wet mass 1000 kg
  note on carbon content, non-fossil: 0.0673 kg TOC/m3 (Tab A.17, ecoinvent v2.2 report 13_I). TOC was considered as Total Carbon.
- compressed air, 600 kPa gauge: 0.0258615 m3; lognormal variance with pedigree 0.0093, pedigree (2,2,4,1,1)
  Weighted average of reported input
- titanium tetrachloride: 0.000234426 kg; lognormal variance with pedigree 0.0093, pedigree (2,2,4,1,1)
  Weighted average of reported input
  properties: wet mass 1 kg, dry mass 1 kg
- natural gas, high pressure: 0 m3; pedigree (1,1,1,1,1)
  Weighted average of reported input
  properties: dry mass 1 kg, wet mass 1 kg, heating value, net 39 MJ, carbon content, fossil 0.695187
  note on heating value, net: Literature value, Source: United Nations Statistics Division (2018) International Recommendations for Energy Statistics (IRES). Available at: http://unstats.un.org/unsd/statcom/doc11/BG-IRES.pdf.
- hazardous waste, for incineration: 0 kg; name BP_amount2; pedigree (1,1,1,1,1)
  Weighted average of reported waste
  production volume 0 kg
    calculated with production volume of reference product
  property price 0 EUR2005; name BP_amount2_price_EUR2005
  properties: heating value, net 17 MJ, wet mass 1 kg, dry mass 0.75 kg, carbon content, fossil 0.554667, water content 0.333333
  note on carbon content, fossil: Tab A.6, ecoinvent v2.2 report 13_I. C content has been calculated after data in the tables, and then referred to 1 kg DM
- wastewater, unpolluted: -0.0677939 m3; name BP_amount5; lognormal variance with pedigree 0.0107, pedigree (3,2,4,1,1)
  Weighted average of reported waste
  production volume 2.44058e8 m3; = BP_amount5*RP_PV
    calculated with production volume of reference product
  property price 0 EUR2005; name BP_amount5_price_EUR2005
  properties: carbon content, fossil 0.00178991, wet mass 1000 kg, carbon content, non-fossil 0.00178991, water content 2962.17, dry mass 0.337476 kg
  note on carbon content, fossil: Assumed to be like in tap water. Bicarbonate content is 2.93 mol/m3. CO2 content is 0.1 mol/m3 (ecoinvent v2.2 report 8, Tab 93.1).
- nitrogen, liquid: 0.0741013 kg; lognormal variance with pedigree 0.0093, pedigree (2,2,4,1,1)
  Weighted average of reported input
  properties: dry mass 1 kg, wet mass 1 kg
- heat, from steam, in chemical industry: 0.398619 MJ; lognormal variance with pedigree 0.0093, pedigree (2,2,4,1,1)
  Weighted average of reported input
  properties: heating value, net 1 MJ
- solvent, organic: 0.0101688 kg; lognormal variance with pedigree 0.0093, pedigree (2,2,4,1,1)
  Weighted average of reported input
  properties: wet mass 1 kg, heating value, net 19.11 MJ, carbon content, fossil 0.63072, dry mass 1 kg
- electricity, medium voltage: 0.353378 kWh; lognormal variance with pedigree 0.0093, pedigree (2,2,4,1,1)
  Weighted average of reported input
- ethylene: 0.936152 kg; lognormal variance with pedigree 0.0093, pedigree (2,2,4,1,1)
  Weighted average of reported input
  properties: dry mass 1 kg, heating value, net 43.22 MJ, wet mass 1 kg, carbon content, fossil 0.857143
- chemical, organic: 0.0859425 kg; lognormal variance with pedigree 0.0093, pedigree (2,2,4,1,1)
  Sum input parameter covering partly confidential information on additives, solvents, catalysts. Weighted average of reported input materials.
  properties: carbon content, fossil 0.628, heating value, net 19.03 MJ, dry mass 1 kg, wet mass 1 kg
  note on carbon content, fossil: This dataset is an unweighted average of 20 organic substances (listed in Tab 88.1, ecoinvent v2.2 report 8, part II), being part of the top100 chemicals included in this database. The C-content has also been calculated as an unweighted average of the C content of the substances composing this dataset.
- chemical factory, organics: 4e-10 unit; lognormal variance with pedigree 0.311225, pedigree (2,3,3,2,3)
  Calculated based on literature data published by the industry. For this activity, no information was readily available concerning infrastructure and land-use. Therefore, the infrastructure is estimated based on data from two chemical factories, the BASF site of Ludwigshafen and the chemical factory in Gendorf (which are both located in Germany), which produce a wide range of chemical substances. Based on this data, the following assumptions are made: the built area amounts to about 4.2 ha, the plant has an average output of 50"000 t/a and a lifespan of fifty years. The estimated infrastructure amount is therefore 4.00 E-10 units per kg of produced chemical.
  References:
  Althaus H.-J., Chudacoff M., Hischier R., Jungbluth N., Osses M. and Primas A. (2007) Life Cycle Inventories of Chemicals. ecoinvent report No. 8, v2.0. EMPA Dübendorf, Swiss Centre for Life Cycle Inventories, Dübendorf, CH.
  Gendorf (2000) Umwelterklärung 2000, Werk Gendorf. Werk Gendorf, Burgkirchen.
- chemical, inorganic: 0.0030926 kg; lognormal variance with pedigree 0.0093, pedigree (2,2,4,1,1)
  (same comment as for chemical, organic)
  properties: carbon content, fossil 0.003, wet mass 1 kg, dry mass 1 kg
  note on carbon content, fossil: This dataset is an unweighted average of 20 inorganic substances (listed in Tab 88.1, ecoinvent v2.2 report 8, part II), being part of the top100 chemicals included in this database. The C-content has also been calculated as an unweighted average of the C content of the substances composing this dataset.
- hydrogen, liquid: 0.0002264 kg; lognormal variance with pedigree 0.0093, pedigree (2,2,4,1,1)
  Weighted average of reported input
  properties: dry mass 1 kg, wet mass 1 kg, heating value, net 120.21 MJ
- spent solvent mixture: 0 kg; name BP_amount3; pedigree (1,1,1,1,1)
  Weighted average of reported waste
  production volume 0 kg
    calculated with production volume of reference product
  property price 0 EUR2005; name BP_amount3_price_EUR2005
  properties: dry mass 0.835 kg, wet mass 1 kg, heating value, net 21.7 MJ, water content 0.197605, carbon content, fossil 0.571257
  note on carbon content, fossil: Tab A.7, ecoinvent v2.2 report 13_I. C content has been calculated after data in the tables, and then referred to 1 kg DM
- wastewater, average: -1.97106e-5, -2.13232e-6 m3 (2 entries); lognormal variance with pedigree 0.0492, pedigree (2,3,4,1,1)
  Weighted average of reported waste
  production volume 78634.5 m3
- natural gas, high pressure: 0.00922249, 5.95457e-5 m3 (2 entries); lognormal variance with pedigree 0.0093, pedigree (2,2,4,1,1)
  Weighted average of reported input
- hazardous waste, for incineration: -0.000247155, -6.46048e-6 kg (2 entries); lognormal variance with pedigree 0.0107, pedigree (3,2,4,1,1)
  Weighted average of reported waste
  production volume 913016 kg
- spent solvent mixture: -0.000300498, -7.04021e-6 kg (2 entries); lognormal variance with pedigree 0.0107, pedigree (3,2,4,1,1)
  Weighted average of reported waste
  production volume 1.10714e6 kg

## Inputs from nature
- Water, unspecified natural origin [natural resource, in water]: 0.000434869 m3; lognormal variance with pedigree 0.0093, pedigree (2,2,4,1,1)
  Weighted average of reported input
- Water, cooling, unspecified natural origin [natural resource, in water]: 0.0887132 m3; lognormal variance with pedigree 0.0093, pedigree (2,2,4,1,1)
  Weighted average of reported input

## Emissions to nature
- Particulates, > 10 um [air, unspecified]: 2.26422e-6 kg; lognormal variance with pedigree 0.0492, pedigree (2,3,4,1,1)
  Weighted average of reported emissions
- Carbon monoxide, fossil [air, unspecified]: 8.64132e-5 kg; lognormal variance with pedigree 0.6592, pedigree (2,3,4,1,1)
  Weighted average of reported emissions
- Sulfur hexafluoride [air, unspecified]: 1.423e-9 kg; lognormal variance with pedigree 0.0492, pedigree (2,3,4,1,1)
  Weighted average of reported emissions
- Zinc, ion [water, unspecified]: 6.25583e-8 kg; lognormal variance with pedigree 0.6592, pedigree (2,3,4,1,1)
  Weighted average of reported emissions
- Suspended solids, unspecified [water, unspecified]: 1.10011e-6 kg; lognormal variance with pedigree 0.0487, pedigree (2,2,4,1,1)
  Weighted average of reported emissions
- Ethene [air, unspecified]: 6.08551e-5 kg; lognormal variance with pedigree 0.1292, pedigree (2,3,4,1,1)
  Weighted average of reported emissions
- Propene [air, unspecified]: 6.91339e-7 kg; lognormal variance with pedigree 0.1292, pedigree (2,3,4,1,1)
  Weighted average of reported emissions
- Ammonium, ion [water, unspecified]: 1.49289e-7 kg; lognormal variance with pedigree 0.0492, pedigree (2,3,4,1,1)
  Weighted average of reported emissions
- Particulates, > 2.5 um, and < 10um [air, unspecified]: 2.23331e-7 kg; lognormal variance with pedigree 0.1292, pedigree (2,3,4,1,1)
  Weighted average of reported emissions
- Carbon dioxide, fossil [air, unspecified]: 0.082571 kg; lognormal variance with pedigree 0.0093, pedigree (2,2,4,1,1)
  Weighted average of reported emissions
- AOX, Adsorbable Organic Halogen as Cl [water, unspecified]: 4.54159e-8 kg; lognormal variance with pedigree 0.0487, pedigree (2,2,4,1,1)
  Weighted average of reported emissions
- Phosphorus [water, unspecified]: 6.21095e-7 kg; lognormal variance with pedigree 0.0492, pedigree (2,3,4,1,1)
  Weighted average of reported emissions
- Nitrogen oxides [air, unspecified]: 4.02759e-5 kg; lognormal variance with pedigree 0.0487, pedigree (2,2,4,1,1)
  Weighted average of reported emissions
- Methane, fossil [air, unspecified]: 7.91982e-8 kg; lognormal variance with pedigree 0.0492, pedigree (2,3,4,1,1)
  Weighted average of reported emissions
- Dinitrogen monoxide [air, unspecified]: 6.66331e-6 kg; lognormal variance with pedigree 0.0487, pedigree (2,2,4,1,1)
  Weighted average of reported emissions
- Sulfur dioxide [air, unspecified]: 1.33921e-7 kg; lognormal variance with pedigree 0.0098, pedigree (2,3,4,1,1)
  Weighted average of reported emissions
- Nitrogen, organic bound [water, unspecified]: 3.08645e-6 kg; lognormal variance with pedigree 0.0492, pedigree (2,3,4,1,1)
  Weighted average of reported emissions
- NMVOC, non-methane volatile organic compounds, unspecified origin [air, unspecified]: 0.000138773 kg; lognormal variance with pedigree 0.0487, pedigree (2,2,4,1,1)
  Weighted average of reported emissions
- Water [air, unspecified]: 0.0213323 m3; lognormal variance with pedigree 0.0167, pedigree (4,2,4,1,1)
  Calculated to close water balance
- Hydrogen [air, unspecified]: 9.57478e-9 kg; lognormal variance with pedigree 0.0492, pedigree (2,3,4,1,1)
  Weighted average of reported emissions

## Sampling procedure
Questionnaires sent out to all production units in Europe operated by PlasticEurope member companies.

## Extrapolations
This dataset has been extrapolated from year 2016 to the year of the calculation (2021). The uncertainty has been adjusted accordingly.
