# yarn production, cotton, ring spinning

Dataset: EcoSpold 2, unit process
Geography: IN
Time period: 2015-04-01 to 2021-03-31
Technology level: current
Classification: ISIC rev.4 ecoinvent: 1311:Preparation and spinning of textile fibres
Classification: EcoSpold01Categories: textiles/processing
Scenario: Business-as-Usual
System model: Allocation, cut-off by classification
Generated by: Mireille Faist Emmenegger
Published in: Faist Emmenegger, M. 2018
Database: ecoinvent
isCopyrightProtected: true
accessRestrictedTo: 1

## General comment
This dataset represents the process of spinning of 1 kg of cotton yarn by ring spinning from the raw cotton.
The Ring Spinning is the most widely used form of spinning machine due to significant advantages in comparison with the new spinning processes. The ring spinning machine is used in the textile industry to simultaneously twist staple fibres into yarn and then wind it onto bobbins for storage. The yarn loop rotating rapidly about a fixed axis generates a surface referred to as "balloon". Ring frame settings are chosen to reduce yarn hairiness and the risk of glazing or melting the fibre.
This dataset covers all relevant input and output flows of the represented gate to gate unit process of Ring spinning(Combed yarn). The inventory is based on industry data and the dataset represents the Indian average of the Ring spun yarn manufacturin technology. Air conditionning is not included.
The following processes are used to convert cotton fibre to cotton yarn. The cotton bales are opened and cleaned and mixed in blowroom. The fibres then undergo carding and are converted to sliver. The fibres are then parallelised in drawing process. In combing stage the short fibres are removed. The parallelised fibres are then converted to roving, which is fed into ring frame for spinning into yarn.The yarns are wound on to cones and conditioned before packaging.

## Included activities start
The activity starts from opening of bales

## Included activities end
The activity ends with spinning and winding after which yarn is conditioned for packaging.

## Geography
Annual average based on inputs from Indian manufacturer. Uttarkhand (North India).

## Technology
The process describes an average yarn fineness, as data was collected for a whole year of a company.

## Reference product
- yarn, cotton: 1 kg; By-product classification allocatable product; CPC 26360: Cotton yarn (other than sewing thread), containing 85% or more by weight of cotton
  production volume 1.4616e9 kg; name PVRP; = 2436000000*(60/100)
    Considering 60% of spun yarns are produced by ring spinning process Source: http://www.cicr.org.in/isci/5-2/Paper_2.pdf http://texmin.nic.in/sites/default/files/prod_variety_yarn.pdf
  property price 2.265 EUR2005
    Estimated value. Various souces report a value around 3 USD per kg of cotton yarn (YarnsandFibers.com, 2018. Pakistan textile exports hit by rise in prices, retrieved from: http://www.yarnsandfibers.com/news/news-tags/cotton-yarn-prices, accessed 1Feb2018; Alibaba.com, 2018. Retrieved from: https://www.alibaba.com/showroom/100%2525-cotton-yarn-price.html, accessed 1Feb2018). The price was checked also against the values reported from the Indian Ministry of Textile, Price Data for textile, Prices (Month End) for 2018 (retrieved from: http://texmin.nic.in/sites/default/files/monthend_jan2018_1.pdf, accessed 6March 2018).
  property heating value, net 12.95 MJ
    LHV is calculated based on the Carbon content of the product. More details can be found on the respective documentation.
  property carbon content 0.46
    carbon content on a dry matter basis (reserved; not for manual entry)
  properties: carbon content, fossil 0, water in wet mass 0.06 kg, wet mass 1 kg, carbon content, non-fossil 0.46, dry mass 0.94 kg, water content 0.0638298, carbon allocation 0.4324 kg

## Inputs from technosphere
- electricity, low voltage: 2.24 kWh; lognormal variance with pedigree 0.0046, pedigree (1,4,3,1,1)
  sum of electricity used for:
  Blowroom; Carding, Breaker Drawing, Lap former/combing, Roving, Ring spinning, Winding and Compressors.
  Illumination and airconditioning are not considered here.
- waste mineral oil: -0.0001729 kg; name bp2; lognormal variance with pedigree 0.0046, pedigree (1,4,3,1,1)
  Waste mineral oil, generated due to the use of lubricating oil in machinery and equipment.
  production volume 252711 kg; = PVRP*bp2
    Calculated from production volume of reference product using the relative outputs.
  property price 0 EUR2005; name bp2_price_EUR2005
  properties: wet mass 1 kg, dry mass 0.9 kg, carbon content, fossil 0.864444, water content 0.111111, heating value, net 34.7 MJ
  note on carbon content, fossil: Tab A.6, ecoinvent v2.2 report 13_I. C content has been calculated after data in the tables, and then referred to 1 kg DM
  note on heating value, net: Value taken from the general comment of the treatment dataset.
- building, hall: 1.60531e-5 m2; = 7500/(9344000*50); lognormal variance with pedigree 0.3026, pedigree (2,1,3,1,1)
  total building area (square meters) divided by production per year and life time of the plant
- lubricating oil: 0.0001729 kg; lognormal variance with pedigree 0.0046, pedigree (1,4,3,1,1)
  This is sum of greese and mobil oil used for lubircating machines
  properties: carbon content, fossil 0.75, heating value, net 40.2 MJ, dry mass 1 kg, wet mass 1 kg
  note on carbon content, fossil: Lubricating oil is produced from diesel. C-content/dry mass of fats and oils considered 75%, from: ecoinvent v2.2 report, n 15a, pg 40
  note on heating value, net: Literature value, Source: IPCC 2006, 2006 IPCC Guidelines for National Greenhouse Gas Inventories, Prepared by the National Greenhouse Gas Inventories Programme, Eggleston H.S., Buendia L., Miwa K., Ngara T. and Tanabe K. (eds). Published: IGES, Japan
- fibre, cotton: 1.05 kg; lognormal variance with pedigree 0.0046, pedigree (1,4,3,1,1)
  waste cotton fibre and fibre noil co-product are resued in the process, hence not included in the inventory
  properties: carbon content, non-fossil 0.46, water content 0.0638298, dry mass 0.94 kg, heating value, net 12.95 MJ, wet mass 1 kg
- diesel, burned in diesel-electric generating set, 18.5kW: 0.0637 MJ; = 0.0014*45.5; lognormal variance with pedigree 0.0126, pedigree (4,4,3,1,1)
  Diesel used for power backup. Forumula includes diesel consumption in kg multiplied with calorific value
- waste yarn and waste textile: -0.05 kg; name bp1
  This represents the quantum of waste that is ultimately landfilled. Estimates on expert judgement based on company data
  production volume 7.308e7 kg; = PVRP*bp1
    Calculated from production volume of reference product using the relative outputs.
  property price 0 EUR2005; name bp1_price_EUR2005
  properties: heating value, net 13.14 MJ, dry mass 0.97917 kg, carbon content, non-fossil 0.44455, wet mass 1 kg, water content 0.0212731

## Inputs from nature
- Water, well, in ground [natural resource, in water]: 0.0001 m3; name Water_well_in_ground_amount_1; lognormal variance with pedigree 0.0126, pedigree (4,4,3,1,1)
  water is used for humidification, gardening etc.

## Emissions to nature
- Water [air, urban air close to ground]: 0.0001 m3; = Water_well_in_ground_amount_1*1; lognormal variance with pedigree 0.0126, pedigree (4,4,3,1,1)
  Considering full evaporation rate

## Sampling procedure
Industry data. Spinning mill in Uttarakhand, North India was chosen to provide data based on its technical representation of the current state of business and its willingness to participate.Industry data has been supplemented with some details from literature.

## Extrapolations
This dataset has been extrapolated from year 2016 to the year of the calculation (2021). The uncertainty has been adjusted accordingly.
