# nutrient supply from ammonium sulfate

Dataset: EcoSpold 2, unit process
Geography: RER
Time period: 2016-01-01 to 2021-12-31
Technology level: current
Classification: ISIC rev.4 ecoinvent: 0161:Support activities for crop production
Scenario: Business-as-Usual
System model: Allocation, cut-off by classification
Generated by: Avraam Symeonidis
Database: ecoinvent
isCopyrightProtected: true
accessRestrictedTo: 1

## General comment
This inventory describes the supply of nutrients from ''ammonium sulfate'' for fertiliser use.
No machinery expenditures or emissions to the environment are considered related to the actual application of this substance on soil during its agricultural use. The purpose of this activity is to connect the chemical production of ''ammonium sulfate'' with its generic use as fertilizer. The product ''ammonium sulfate'' is connected to the generic market for ''inorganic nitrogen fertiliser, as N'' through this supplying activity. In the agricultural context, ''ammonium sulfate'' can be used directly as a fertilizer input to crop production, eventually with other chemicals; alternatively, a generic input of ''inorganic nitrogen fertiliser, as N'' can be used instead, and this will represent the regional consumption mix for his type of nutrient. A way in between is allowed by using the generic input ''inorganic nitrogen fertiliser, as N'' and link to the activity providing it from a specific chemical.
In all cases, emissions associated to the application of the fertilizer have to be calculated in the crop production activity.

## Technology
Inventory based on composition of ''ammonium sulfate''.

## Reference product
- inorganic nitrogen fertiliser, as N: 1 kg; name RP; By-product classification allocatable product; CPC 3461: Mineral or chemical fertilizers, nitrogenous
  production volume 6.2449e8 kg; = 11506664.6*1000*0.212*0.256
    The production volume has been extrapolated from the global production volume of this product in the database by employing GDP scaling. GDP for Europe is calculated to amount circa 25.6% of the global GDP. Original comment of the GLO dataset is: The global production Volume of ammonium sulphate was retrieved from FAOSTAT from the Domain “Fertilizer by Product”. Data was filtered for “Regions: World(>List)”, “Elements: Production Quantity”, “Items: Ammonium sulphate”, “Years: 2017”. The global production volume was calculated as the sum of these values. The nitrogen content of ammonium sulphate is 0.212. Thus, 2439412895.2 Kg of inorganic nitrogen fertilizer are produced from of ammonium sulphate.
    http://www.fao.org/faostat/en/#data/RFB
  property carbon content, fossil 0
    Carbon content, fossil is calculated based on the chemical formula of the substance.
  property nitrogen content 1
    Nitrogen content (on a dry matter basis) of inorganic nitrogen fertiliser, as N is calculated from the molecular formula of the substance (Nitrogen).
  property price 0.473 EUR2005; name RP_price_EUR2005
    Temporary price data. Calculated as 90% of purchasers price based on: 2004 prices are calculated on basis of Import/Export data (tonnes and US$) from UN Trade Statistics Database (http://data.un.org/Browse.aspx?d=ComTrade, accessed 7/7-2010). N, P2O5, or K2O content (http://www.fertilizer.org/ifa/Home-Page/STATISTICS/Conversions-factors)
  property carbon content 0
    carbon content on a dry matter basis (reserved; not for manual entry)
  properties: carbon content, non-fossil 0, wet mass 1 kg, water in wet mass 0 kg, water content 0, dry mass 1 kg, carbon allocation 0 kg

## Inputs from technosphere
- ammonium sulfate: 4.717 kg; lognormal variance with pedigree 0.1702, pedigree (3,5,2,1,4)
  properties: nitrogen content 0.211999, oxygen content 0.48432, sulfur content 0.242661, dry mass 1 kg, hydrogen content 0.0610205, wet mass 1 kg
  note on nitrogen content: Nitrogen content (on a dry matter basis) of ammonium sulfate is calculated from the molecular formula of the substance (H8N2O4S).
  note on oxygen content: Oxygen content (on a dry matter basis) of ammonium sulfate is calculated from the molecular formula of the substance (H8N2O4S).
  note on sulfur content: Sulfur content (on a dry matter basis) of ammonium sulfate is calculated from the molecular formula of the substance (H8N2O4S).
  note on hydrogen content: Hydrogen content (on a dry matter basis) of ammonium sulfate is calculated from the molecular formula of the substance (H8N2O4S).

## Extrapolations
This dataset has been extrapolated from year 2019 to the year of the calculation (2021). The uncertainty has been adjusted accordingly.
