# dust collector production, multicyclone

Dataset: EcoSpold 2, unit process
Geography: CH
Time period: 2010-01-01 to 2021-12-31
Technology level: current
Classification: ISIC rev.4 ecoinvent: 2819:Manufacture of other general-purpose machinery
Classification: EcoSpold01Categories: wood energy/heating systems
Synonyms: particulate filter; dust precipitator; dust collector; exhaust aftertreatment control system
Tags: biomass power
Scenario: Business-as-Usual
System model: Allocation, cut-off by classification
Generated by: Marco Mina
Database: ecoinvent
isCopyrightProtected: true
accessRestrictedTo: 1

## General comment
This dataset represent the production and the disposal of a multicyclone for industrial use, dimensioned to be connected to a wood furnace with capacity of about 1000kW. The air flow capacity is 2222 liters per second. Could be used as a dust collector for other industrial processes with a comparable capacity. It could be scaled for other different capacity.

## Included activities start
From reception of furnace components at the factory gate

## Included activities end
This activity ends with the disposal of the device in the end of its lifetime. The dataset includes the most important materials used for the fabrication of the multicyclone (mainly steel and steel alloys). The dataset includes energy required for the construction and the disposal of the device. The dataset doesnt include the basement in concrete for the installation.

## Geography
Could be used for central European conditions.

## Technology
Typical multicyclone for for dust collection from wood boilers. This device is dimensioned to be applied in conjunction with a wood furnace 1000kW thermal capacity.

## Reference product
- dust collector, multicyclone: 1 unit; By-product classification allocatable product; CPC 4393: General-purpose machinery n.e.c.
  production volume 590 unit; name RP_PV_1
    estimated from the number of produced furnaces with which the device is applied together and an estimate of the industrial processes within the country which could apply the device (i.e. municipal incinerators, wood-pellets production, sawmills and wood manufacturing industries) - high uncertainty
  property lifetime capacity [l] 5.04576e15 l; name lifetime_capacity_l; = (20*365*24*60*60)* capacity_l_per_hour
    lifetime capacity in litres
  property capacity [l/hour] 8e6 l/hour; name capacity_l_per_hour
    capacity in litres per hour
  property price 728.893 EUR2005
    Calculated based on inputs: The price of the product has been calculated as a sum of the values of the material and energy inputs for this product. This value is therefore a rough estimation. It may underestimate the real price since there are additional expenses when producing any product. These expences can include for example labour costs, treatment of waste materials and profit for the producer. Please consider carefully whether this level of data quality is acceptable for your application.
  properties: lifetime 20 year

## Inputs from technosphere
- sheet rolling, steel: 79 kg; source Ventilazione Industriale s.r.l. company 2011; lognormal variance with pedigree 0.0432, pedigree (4,5,4,5,1)
  estimation
- scrap steel: -1500 kg; name BP_amount_1; lognormal variance with pedigree 0.0087, pedigree (1,2,4,1,1)
  disposal of all the device
  production volume 885000 kg; = RP_PV_1* BP_amount_1
    calculated with matematical relation
  property price 0 EUR2005; name BP_amount_1_price_EUR2005
  properties: lifetime 20 year, wet mass 1 kg, dry mass 1 kg
- heat, central or small-scale, other than natural gas: 1200 MJ; source Ventilazione Industriale s.r.l. company 2011; lognormal variance with pedigree 0.1484, pedigree (3,3,5,1,1)
  estimation
  properties: heating value, net 1 MJ
- drawing of pipe, steel: 79 kg; source Ventilazione Industriale s.r.l. company 2011; lognormal variance with pedigree 0.0432, pedigree (4,5,4,5,1)
  estimation
- drawing of pipe, steel: 0 kg; source Ventilazione Industriale s.r.l. company 2011
  estimation
- steel, chromium steel 18/8, hot rolled: 810 kg; source Ventilazione Industriale s.r.l. company 2011; lognormal variance with pedigree 0.0087, pedigree (1,2,4,1,1)
  literature value
  properties: dry mass 1 kg, carbon content, fossil 0.0008, wet mass 1 kg
  note on carbon content, fossil: Stainless steel model is the grade 304 steel (18/8 stainless, 18% chromium 8% nickel; max. 0.08% C)
- steel, low-alloyed, hot rolled: 690 kg; source Ventilazione Industriale s.r.l. company 2011; lognormal variance with pedigree 0.0087, pedigree (1,2,4,1,1)
  literature value
  properties: carbon content, fossil 0.005, dry mass 1 kg, wet mass 1 kg
  note on carbon content, fossil: Low alloyed steel composition given in Tab. 3.2 ecoinvent v2.2 report 10_partII. Steel assumed to have a C content of 0.5%
- sheet rolling, steel: 0 kg; source Ventilazione Industriale s.r.l. company 2011
  estimation
- electricity, low voltage: 380 kWh; source Ventilazione Industriale s.r.l. company 2011; lognormal variance with pedigree 0.1451, pedigree (3,3,5,1,1)
  estimation

## Sampling procedure
literature, furnace manual available for customers, investigation and personal communication from producer and technician

## Extrapolations
This dataset has been extrapolated from year 2011 to the year of the calculation (2021). The uncertainty has been adjusted accordingly.

## Review by Bo Weidema 2012-02-01
Passed. Documentation adequate, inputs relevant, mass balance correct, and correct handling of capacity utilisation.

## Review by Bo Weidema 2012-02-01
As an exception this dataset has only been reviewed by one reviewer. Since this is an infrastructure dataset, this exception is reasonable.

## Review by Martin Kilga 2012-02-01
For such a device I would add the dimensions and item list (see comment)
