# canal construction

Dataset: EcoSpold 2, unit process
Geography: RoW
Time period: 1993-01-01 to 2021-12-31
Technology level: current
Classification: ISIC rev.4 ecoinvent: 4290:Construction of other civil engineering projects
Classification: EcoSpold01Categories: transport systems/ship
Scenario: Business-as-Usual
System model: Allocation, cut-off by classification
Generated by: Michael Spielmann (obsolete)
Published in: Spielmann M. 2007
Database: ecoinvent
isCopyrightProtected: true
accessRestrictedTo: 1

## General comment
Based on 'canal construction, RER 1994'. Assumption for the construction of the canal are derived from the Main-Donau-Canal in Germany. The canal is characterised by a width of 42 m and a average depth of 4m. Life time of port is assumed to be 118 years. The canal bed area is estimated with 42m2. In addition, 10 meters at each edge is modelled as road traffic area. Maintenance and land use is integrated too.

## Included activities end
This inventory comprises the construction and the maintenance and land use canals in Germany. The inventory calls processes of material production, representing the material used in the construction phase of the canal. Also lorry transport of materials to and from the constructions site has been taken into account. Expenditures due to disposal are excluded. Also expenditures for the construction of bridges are excluded. For the maintenance and land use, the inventory includes the electricity consumption due to the operation of watergates. Land occupation and transformation are taken into account.

## Geography
Extrapolated from 'canal construction ,RER 1994'. Data is based on a case study of one canal in Germany.

## Technology
unknown
References:
Maibach M., Peter D. and Seiler B. (1999) Ökoinventar Transporte: Grundlagen für den ökologischen Vergleich von Transportsystemen und den Einbezug von Transportsystemen in Ökobilanzen. Technischer Schlussbericht. In: Schweizerischer Nationalfonds zur Förderung der wissenschaftlichen Forschung (ed. SPP Umwelt M.). 2nd Edition. INFRAS, Zürich
Enquête (1994) Schutz der Erdatmospäre, Verkehr, Band 4, Studienband, Teilband II. Enquête Kommission, Bonn

## Reference product
- canal: 1 m*year; CPC 53232: Harbours, waterways and related facilities; By-product classification allocatable product
  production volume 2.67763 m*year
    This is a placeholder value that does not reflect real-world production volumes. This dataset does not currently require a real-world production volume to work in the database framework, and no actual data were collected yet. This has no negative effect on the results of the ecoinvent database.
  property price 53.8128 EUR2005
    Calculated based on inputs: The price of the product has been calculated as a sum of the values of the material and energy inputs for this product. This value is therefore a rough estimation. It may underestimate the real price since there are additional expenses when producing any product. These expences can include for example labour costs, treatment of waste materials and profit for the producer. Please consider carefully whether this level of data quality is acceptable for your application.

## Inputs from technosphere
All rows: source Maibach M. 1999
- pitch: 0 kg; pedigree (1,1,1,1,1)
  Literature studies. The value represents construction activities and is of fair quality.
  properties: dry mass 1 kg, wet mass 1 kg, carbon content, fossil 0.83, heating value, net 28 MJ
- reinforcing steel: 8.68 kg; lognormal variance with pedigree 0.082, pedigree (1,1,5,5,1)
  Literature studies. The value represents construction activities and is of fair quality.
  properties: dry mass 1 kg, wet mass 1 kg, carbon content, fossil 0.004
- electricity, medium voltage: 0 kWh; pedigree (1,1,1,1,1)
  Literature value. Data for electricity consumption, predominately due the operation of sluices is derived from Enquête (1994) as quoted in Maibach et al. (1999). Maintenance and land use
  Further references:
  Enquête (1994) Schutz der Erdatmospäre, Verkehr, Band 4, Studienband, Teilband II. Enquête Kommission, Bonn
- excavation, skid-steer loader: 4.03 m3; lognormal variance with pedigree 0.342, pedigree (1,1,5,5,1)
  Literature studies. The value represents construction activities and is a rough estimate.
- concrete, medium strength: 0 m3; pedigree (1,1,1,1,1)
  Literature studies. The value represents construction activities and is of fair quality.
  properties: wet mass 2380 kg, water content 0.086758, dry mass 2190 kg
- pitch: 0.000470298, 2.68031e-5, 0.0012131, 5.43763e-5, 7.76273e-5, 0.00685779 kg (6 entries); lognormal variance with pedigree 0.082, pedigree (1,1,5,5,1)
  Literature studies. The value represents construction activities and is of fair quality.
- electricity, medium voltage: 0.0431097, 0.00826659, 0.138779, 2.01842, 0.284497, 0.926933 kWh (6 entries); lognormal variance with pedigree 0.342, pedigree (1,1,5,5,1)
  (same comment as for electricity, medium voltage)
- concrete, medium strength: 0.031609, 0.0115668, 0.0448351, 0.0329516, 0.00903749 m3 (5 entries); lognormal variance with pedigree 0.082, pedigree (1,1,5,5,1)
  Literature studies. The value represents construction activities and is of fair quality.

## Inputs from nature
All rows: lognormal variance with pedigree 0.082, pedigree (1,1,5,5,1)
- Transformation, to traffic area, road network [natural resource, land]: 0.169 m2
  Estimation based on land occupation and an assumed life span of the canal of 118 years. Maintenance and land use
- Transformation, to river, artificial [natural resource, land]: 0.356 m2
  (same comment as for Transformation, to traffic area, road network)
- Occupation, river, artificial [natural resource, land]: 42 m2*year
  Literature value, representing occupied area in the 90'ties. Maintenance and land use
- Transformation, from unspecified [natural resource, land]: 0.525 m2
  (same comment as for Transformation, to traffic area, road network)
- Occupation, traffic area, road network [natural resource, land]: 20 m2*year
  Literature value, representing occupied area in the 90'ties. Maintenance and land use

## Sampling procedure
literature studies and own assumptions

## Extrapolations
Data calculated for one canal in Germany is used as an estimate for Europe. This dataset has been copied from an original dataset covering the geography RER. The uncertainty has been adjusted accordingly.

## Review by Niels Jungbluth 2003-08-29
passed

## Review by Carl Vadenbo 2012-06-29
In preparation for the release of ecoinvent v3.0, the datasets 'canal RER' and 'maintenance, operation, canal RER' in ecoinvent v2.2 were merged and extrapolated into the dataset 'canal construction, GLO 1993-1994'. The amounts of the exchanges were reviewed and were found to correspond to the disaggregated datasets. The uncertainty information has only been adjusted for geographical representativeness in GLO, and consequently needs to be revised before subsequent releases of the database. Despite this shortcoming, the new dataset was accepted for inclusion into the ecoinvent database on 2012.07.04.
