# electricity production, hard coal

Dataset: EcoSpold 2, unit process
Geography: BR-North-eastern grid
Time period: 2014-01-01 to 2021-12-31
Technology level: modern
Classification: ISIC rev.4 ecoinvent: 3510:Electric power generation, transmission and distribution
Classification: EcoSpold01Categories: hard coal/power plants
Synonyms: anthracite; other bituminous coal; coking coal
Tags: coal power; fossil fuels; hard coal power
Scenario: Business-as-Usual
System model: Allocation, cut-off by classification
Generated by: Henrique Rogerio Antunes de Souza Junior
Published in: Röder, A. 2007
Database: ecoinvent
isCopyrightProtected: true
accessRestrictedTo: 1

## General comment
This dataset represents the production of high voltage electricity in an average hard coal power plant Brazil-North-eastern in 2014. 'Hard coal' includes anthracite, coking coal and other bituminous coal according to the definition of the IEA electricity information 2014.
Comments on the inventory:
Information about efficiency was obtained in Electricity Information 2014.
Information about electricity production was obtained in Capacidade Instalada de Geração Elétrica Brasil e Mundo (2014): Ano Referência 2014 and Matrizes Elétricas Estaduais: Ano Referência 2015.
In the absence of data for north-eastern Brazil, we use the same information was used from the plants of the southern region, considering that they are similar technologies.
Information about emissions and water used was obtained in Relatório de Sustentabilidade 2014: Brasil, Nosso Lar. Tractebel Energia and Relatório de Sustentabilidade 2014. Eletrobras CGTEE, which represent 100% of production for the south of Brazil.
ELETROBRAS (2015). Relatório de Sustentabilidade 2014. Eletrobras CGTEE.
MME (2015). Capacidade Instalada de Geração Elétrica Brasil e Mundo (2014): Ano Referência 2014. Edição de 05 de março de 2015. Ministério De Minas E Energia – MME. Secretaria De Planejamento E Desenvolvimento Energético. Núcleo De Estudos Estratégicos De Energia.
MME (2016). Matrizes Elétricas Estaduais: Ano Referência 2015. Edição de 23 de novembro de 2016. Ministério De Minas E Energia – MME. Secretaria De Planejamento E Desenvolvimento Energético. Núcleo De Estudos Estratégicos De Energia.
TRACTEBEL (2015). Relatório de Sustentabilidade 2014: Brasil, Nosso Lar. Tractebel Energia. GDF Suez.
IEA/OECD. 2015. Energy balances of non-OECD countries 2015. International Energy Agency (IEA), Paris Cedex (FR).
The original ecoinvent dataset used as a basis was 'electricity production, hard coal, BR, 1980 - 2015' and it has been copied in '12/2017'
[This dataset is meant to replace the following datasets:
- electricity production, hard coal, BR, 1980 - 2015]

## Included activities start
From the constructed hard coal power plant ready to produce electricity.
From reception of hard coal and operating materials at power plant gate.

## Included activities end
This activity ends with 1kWh of high voltage electricity produced at the power plant and arrived at the busbar.

This dataset includes:
- all operation and maintenance activities and materials of the power plants.
- Use of fuel oil for startup
- Particle removal (dedusting of the flue gas)

- Desulfurisation and denitrification. These processes are described in separate modules; it can be decided by changing the values of NOx and SOx retained whether and how much DeNOx and DeSOx are installed.
- Cooling: It is assumed that all plants use wet cooling with a cooling tower. No cooling tower is included in this dataset (will be implemented in future versions)
- Loss of feed water

This dataset doesn't include
- raw materials extraction, decommissioning and waste treatment as these activities are already included in the infrastructure datasets
- transformation of the electricity produced
- The disposal of non-recycled ashes is modelled separately.

## Technology
POWER PLANT:
Hard coal power plant input is a market mix of 100MWe power plants (representing all power plants with a capacity <250MWe and 7% of the installed capacity) and 500MWe power plants (representing all power plants with a capacity >250MWe and 93% of the installed capacity). The plants are used for middle load with 4000 hours of operation at full capacity per year. The plants are assumed to operate 150000 hours during its lifetime.
OTHER DATA:
- Share of installed capacity with desulfurisation 2% (rough estimation based on sulfur mass balance
- Average efficiency of desulfurisation installations: 92% (rough estimation based on Dones et al. 27
- Share of installed capacity with denitrification (primary and/or secondary installations): 73% (figure based on IEA 212 )
- Average efficiency of denitrification installations: 8% (estimation based on Dones et al. 27, p.128. Valid for selective catalytic reaction systems)
- Share of installed capacity with particle filters: 98% (figure based on IEA 212 )
- Average efficiency of particle filters: 98% (figure based on IEA 212 )
- IEA 2012. Coal Power Database. International Energy Agency Clean Coal Centre, London
- IEA/OECD. 2010. Electricity Information 2010. International Energy Agency (IEA), Paris Cedex (FR). Part IV. Detailed OECD Electricity And Heat Data.
- Dones, R., Bauer, C., Röder, A. (2007) Kohle. In: Dones, R. (Ed.) et al., Sachbilanzen von Energiesystemen: Grundlagen für den ökologischen Vergleich von Energiesystemen und den Einbezug von Energiesystemen in Ökobilanzen für die Schweiz. Final report ecoinvent No.

## Time period
The Annual Production Volume is valid for the year 2014.

## Parameters
- factor: input of MJ for the production of 1 kWh: 10.2273 MJ/kWh; name factor_MJ_kWh; = 1*3.6/efficiency; undefined min 11.1801, max 11.1801, standardDeviation95 0, pedigree (1,1,1,1,1)
  Calculated value. 3.6 MJ = 1kWh.
  nan
- water consumption, electricity production from hard coal, recirculating CS: 0.000517125 m3/kWh; name WConsumption_EP_HC_recirculatingCS; = (0.001379)*recirculating_CS_fraction_from_allCS; lognormal variance with pedigree 0.092025, pedigree (4,4,3,2,4)
  Data obtained from the Relatório de Sustentabilidade 2014. Eletrobras CGTEE.
  This document is provided by the company that manages the thermal plants responsible for the generation of 34% of the energy coming from hard coal from the south of Brazil.
  ELETROBRAS (2015). Relatório de Sustentabilidade 2014. Eletrobras CGTEE.
- losses from gross electricity production: 0.0485176 dimensionless; name losses_gross_net; = 30304/(624426-(-172)-0); lognormal variance with pedigree 0.017225, pedigree (4,3,1,2,3)
  Literature value/calculated value.
  This is an average value for the entire energy sector estimate for Brazil.
  The data are find in IEA - Brazil: Electricity and Heat for 2014
  equation: "Energy industry own use"/("Domestic supply"-"statistical differences"-"Transformation")
  Available in: <https://www.iea.org/statistics/statisticssearch/report/?country=Brazil&product=electricityandheat&year=2014> Access at 03-2018.
  Uncertainty: Generic IEA value used.
- recirculating cooling system as a fraction of all cooling systems: 0.375 dimensionless; name recirculating_CS_fraction_from_allCS; lognormal variance with pedigree 0.092025, pedigree (4,4,3,2,4)
  Calculated as an average of data available for Europe (Floerke, 2008, Future changes of freshwater needs in the electricity production sector) and USA (NERL, 2011, Estimating freshwater needs to meet future thermoelectric generation requirements).
  nan
- water consumption, electricity production from hard coal, once-through and cooli: 0.000861875 m3/kWh; name WConsumption_EP_HC_once_through_andCP_CS; = (0.001379)*once_through_andCP_CS_fractio_from_allCS; lognormal variance with pedigree 0.092025, pedigree (4,4,3,2,4)
  (same comment as for water consumption, electricity production from hard coal, recirculatin)
- efficiency: 0.352 dimensionless; lognormal variance with pedigree 0.003325, pedigree (3,2,1,2,2)
  Literature value/calculated value. Net electrical efficiency based on the lower heating value (LHV).
  This is an average estimate for Brazil.
  The data are find in IEA/OECD. 2015. Energy balances of non-OECD countries 2015 (II.64 - Brazil 2013).
  The efficiency is calculated by Electr. generated (Ktoe) in relation to the energy consumed (Electricity plants + CHP plants + losses) (Ktoe)
  IEA/OECD. 2015. Energy balances of non-OECD countries 2015. International Energy Agency (IEA), Paris Cedex (FR).
- fraction, water, decarbonised, to air: 0.475517 dimensionless; name fraction_WDC_to_air; = fraction_CW_to_air; lognormal variance with pedigree 0.092025, pedigree (4,4,3,2,4)
  Calculated value. See comments in the other parametres present in this dataset. Decarbonised water is considered to be always used as cooling water, thus cooling water fractions to air are applied to all carbonised water input flows to calculate the amount of water consumed in the processes.
  nan
- water withdrawal, electricity production from hard coal, recirculating CS: 0.0010875 m3/kWh; name WWithdrawal_EP_HC_recirculating_CS; = (0.0029)*recirculating_CS_fraction_from_allCS; lognormal variance with pedigree 0.092025, pedigree (4,4,3,2,4)
  (same comment as for water consumption, electricity production from hard coal, recirculatin)
- once-through and cooling pond cooling systems as a fraction of all cooling syste: 0.625 dimensionless; name once_through_andCP_CS_fractio_from_allCS; lognormal variance with pedigree 0.092025, pedigree (4,4,3,2,4)
  (same comment as for recirculating cooling system as a fraction of all cooling systems)
- fraction, water, completely softened, to air: 0.15 dimensionless; name fraction_WCS_to_air; = fraction_PW_to_air; lognormal variance with pedigree 0.092025, pedigree (4,4,3,2,4)
  Calculated value. See comment in the other parametres present in this dataset. Water, completely softened is considered to be always used as process water, thus process water fractions to air are applied to all water, completely softened input flows to calculate the amount of water consumed in the processes.
  nan
- fraction, process water, to air: 0.15 dimensionless; name fraction_PW_to_air; lognormal variance with pedigree 0.092025, pedigree (4,4,3,2,4)
  Literature value. In case when no industry/process specific data are available, default evaporation fraction value is used. This value is 15% and is based on literature (Statistics Canada, 2007 & Shaffer, K.H., 2008, Consumptive water use in the Great Lakes Basin, USGS & Shiklomanov, 2003, World Water Resources at the Beginning of the 21st Century) and has been approved by an expert.
  nan
- water withdrawal, electricity production from hard coal, once-through and coolin: 0.0018125 m3/kWh; name WWithdrawal_EP_HC_once_through_andCP_CS; = (0.0029)*once_through_andCP_CS_fractio_from_allCS; lognormal variance with pedigree 0.092025, pedigree (4,4,3,2,4)
  (same comment as for water consumption, electricity production from hard coal, recirculatin)
- gross electricity production: 1.08205e10 kWh; name gross_electricity; = (93816000000*0.11)*(1+losses_gross_net); lognormal variance with pedigree 0.0012, pedigree (2,1,1,1,1)
  Literature value/statistics.
  The data are find in Matrizes Elétricas Estaduais: Ano Referência 2015 (page 5 - North-eastern) (MME, 2016).
  The gross electricity production are calculated by net production plus generation losses (losses from gross electricity production).
  equation: (net production * hard coal fraction) * (1 + losses)
  In the absence of data for north-eastern Brazil, we use the same information was used from the plants of the southern region, considering that they are similar technologies.
  Information about emissions and water used was obtained in Relatório de Sustentabilidade 2014: Brasil, Nosso Lar. Tractebel Energia and Relatório de Sustentabilidade 2014. Eletrobras CGTEE, which represent 100% of production for the south of Brazil.
  ELETROBRAS (2015). Relatório de Sustentabilidade 2014. Eletrobras CGTEE.
  MME (2016). Matrizes Elétricas Estaduais: Ano Referência 2015. Edição de 23 de novembro de 2016. Ministério De Minas E Energia - MME. Secretaria De Planejamento E Desenvolvimento Energético. Núcleo De Estudos Estratégicos De Energia. Available in: <http://www.mme.gov.br/documents/10584/3580498/03+-+Matrizes+El%C3%A9tricas+Estaduais+2016+-+ano+ref.+2015+%28PDF%29/ddfaad8c-a436-4aa8-b619-f95dd2cf689c?version=1.0> Access in: 12/2017.
  TRACTEBEL (2015). Relatório de Sustentabilidade 2014: Brasil, Nosso Lar. Tractebel Energia. GDF Suez.
- fraction, cooling water, to air: 0.475517 dimensionless; name fraction_CW_to_air; = (WConsumption_EP_HC_recirculatingCS*recirculating_CS_fraction_from_allCS+WConsumption_EP_HC_once_through_andCP_CS*once_through_andCP_CS_fractio_from_allCS)/(WWithdrawal_EP_HC_recirculating_CS*recirculating_CS_fraction_from_allCS+WWithdrawal_EP_HC_once_through_andCP_CS*once_through_andCP_CS_fractio_from_allCS); lognormal variance with pedigree 0.092025, pedigree (4,4,3,2,4)
  Calculated
  nan

## Reference product
- electricity, high voltage: 1 kWh; name electricity; By-product classification allocatable product; CPC 17100: Electrical energy
  production volume 1.02955e10 kWh; name electricity_apv; = gross_electricity*(1- losses_gross_net)
    Data obtained from the reports of the Ministry of Mines and Energy of Brazil (MME, 2016) for the year 2015.
    MME (2016). Matrizes Elétricas Estaduais: Ano Referência 2015. Edição de 23 de novembro de 2016. Ministério De Minas E Energia - MME. Secretaria De Planejamento E Desenvolvimento Energético. Núcleo De Estudos Estratégicos De Energia.
  property price 0.0977 EUR2005
    Temporary price data. Calculated as 90% of purchasers price based on: 94% of the average price (to account for a 6% loss in transformation and transmission) for electricity for industrial consumersin 2005 (excluded taxes). From IEA.

## Inputs from technosphere
- residue from cooling tower: -5.625e-5 kg; name amount_residue; = (factor_MJ_kWh*0.000005*1.1)*-1; lognormal variance with pedigree 0.0812, pedigree (5,3,4,5,2)
  Literature value/calculated value. Amount of cooling tower needed for producing 1kWh of electricity from hard coal, based on the value for burning 1MJ of hard coal. Weighted average with electricity production data (Itten&Frischknecht 2012) and values of 14 countries
  (AT, BE, ES, FR, IT, NL, PT, DE, CZ, HR, PL, SK, CN, US) (Röder et al. 2007) .
  Country values calculated from mass balance.
  Source:
  Itten R. and Frischknecht R. (2012) Life Cycle Inventories of Electricity Mixes and Grid. ESU-services Ltd., Uster, Switzerland.
  production volume 579120 kg; = amount_residue/electricity*electricity_apv
    Calculated from the production volume of hard coal, burned in power plant in proportion to the respective output amounts.
  property price 0 EUR2005; name amount_residue_price_EUR2005
  properties: carbon content, fossil 0.0544233, water content 0.428571, dry mass 0.7 kg, wet mass 1 kg
- water, decarbonised: 2.04545 kg; name water_decarbonised_user; = factor_MJ_kWh*0.2; lognormal variance with pedigree 0.054, pedigree (4,5,4,5,3)
  Literature value/calculated value. Cooling water, decarbonised, for the cooling water circuit lost when producing 1kWh of electricity from hard coal, based on the value for burning 1MJ of hard coal. Röder et al. 2007, Tab. 9.65 and Tab. 9.66, p. 160f. These tables give an amount of 0.15 kg/MJ burned, which is valid for the assumption of 75% wet cooling and 25% run-through cooling. However, this revised dataset assumes 100% wet cooling.
  properties: wet mass 1 kg
- hard coal ash: -0.0765 kg; name amount_ash; = (factor_MJ_kWh*0.00748)*-1; lognormal variance with pedigree 0.0986, pedigree (5,3,4,5,3)
  Literature value/calculated value. Hard coal ash produced when producing 1kWh of electricity from hard coal, based on the value for burning 1MJ of hard coal. Weighted average with electricity production data (Itten&Frischknecht 2012) and values of 12 countries
  (AT, BE, ES, FR, IT, NL, PT, DE, CZ, HR, PL, SK). These values were valid for the ash being disposed off. Now, total amount of ash has been calculated (disposed+recycled) with the data in Tab. 9.69 p. 165 in Röder et al. 2007. Globally, 74% of the lignite ash are recycled, 26% go to disposal.
  Source:
  Itten R. and Frischknecht R. (2012) Life Cycle Inventories of Electricity Mixes and Grid. ESU-services Ltd., Uster, Switzerland.
  production volume 7.87603e8 kg; = amount_ash/electricity*electricity_apv
    (same comment as for residue from cooling tower)
  property price 0 EUR2005; name amount_ash_price_EUR2005
  properties: wet mass 1 kg, dry mass 1 kg
- water, completely softened: 0.0613636 kg; name water_completely_softened; = factor_MJ_kWh*0.006; lognormal variance with pedigree 0.054, pedigree (4,5,4,5,3)
  Literature value/calculated value. Feed water for the steam circuit lost when producing 1kWh of electricity from hard coal, based on the value for burning 1MJ of hard coal. Röder et al. 2007, Tab. 9.65 and Tab. 9.66, p. 160f.
  properties: wet mass 1 kg
- hard coal power plant: 1.33333e-11 unit; name hard_coal_power_plant; = 1/ (150000*500*1000); source Röder, A. 2007; lognormal variance with pedigree 0.3686, pedigree (5,3,4,5,3)
  Calculated value. At the moment, the hard coal power plant input consists of a market mix of a 100MWe power plant and a 500MWe power plant
  .
  For this calculation, 4000 load hours per year are assumed. It is assumed that a total of 150'000h is reached during the lifetime. A capacity of 500MW is taken for the calculation.
- hard coal: 0.447955 kg; name hard_coal; = factor_MJ_kWh*0.0438; lognormal variance with pedigree 0.0212, pedigree (3,3,4,5,3)
  Literature value/calculated value. Hard coal use when producing 1kWh of electricity from hard coal, based on the value for burning 1MJ of hard coal. Weighted average with electricity production data (Itten&Frischknecht 2012) and hard coal use values of 14 countries
  (AT, BE, ES, FR, IT, NL, PT, DE, CZ, HR, PL, SK, CN, US) (Röder et al. 2007)
  Source:
  Itten R. and Frischknecht R. (2012) Life Cycle Inventories of Electricity Mixes and Grid. ESU-services Ltd., Uster, Switzerland.
  properties: water content 0.0638298, dry mass 0.94 kg, wet mass 1 kg, heating value, net 27.91 MJ, carbon content, fossil 0.845
  note on heating value, net: Based on the Characterization factor of Hard coal in the CED method
  note on carbon content, fossil: C content 75-94% (specified in Tab 1.1, report 6, part VI). A mean content of 0.845 kg C/ kg dry hard coal was considered
- light fuel oil: 0.000173864 kg; name light_fuel_oil; = factor_MJ_kWh*0.000017; lognormal variance with pedigree 0.024, pedigree (3,4,4,5,1)
  Literature value/calculated value. Light fuel oil use per 1MJ of hard coal burned, use for start-up of the power plant after shut down. Weighted average with electricity production data (Itten&Frischknecht 2012) and ight fuel oil use values of 14 countries
  (AT, BE, ES, FR, IT, NL, PT, DE, CZ, HR, PL, SK, CN, US) (Röder et al. 2007)
  Country values are typical values for hard coal plants.
  Source:
  Itten R. and Frischknecht R. (2012) Life Cycle Inventories of Electricity Mixes and Grid. ESU-services Ltd., Uster, Switzerland.
  properties: wet mass 1 kg, dry mass 1 kg, heating value, net 42.6 MJ, carbon content, fossil 0.862
- SOx retained, in hard coal flue gas desulfurisation: 0.00201 kg; name sox_retained; lognormal variance with pedigree 0.093, pedigree (4,4,5,5,4)
  Calculated value. Weighted average from all figures from countries in ecoinvent version 2 (AT, BE, BR, CN, CZ, DE, DK, ES, FI, FR, GB, ES, FI, FR, GB, HR, HU, IE, IT, JP, NL, NO, PL, PT, RO, SE, SI, SK) and the new countries for version 3 (AU, CA regions, CL, IN, KR, MX, MY, PE, RU, TH, TR, TW, TZ, UA, US regions, ZA). Weighting was made with net electricity production 2008 in these countries (Itten&Frischknecht 2012).
  BA and BG were not included in the calculation of the GLO average as they inherit all GLO values at the moment.
  properties: wet mass 1 kg, dry mass 1 kg

## Inputs from nature
- Water, cooling, unspecified natural origin [natural resource, in water]: 0.00139314 m3; name water_cooling_UNO_input; = ((recirculating_CS_fraction_from_allCS*WWithdrawal_EP_HC_recirculating_CS)+(once_through_andCP_CS_fractio_from_allCS*WWithdrawal_EP_HC_once_through_andCP_CS))/11.31*factor_MJ_kWh; lognormal variance with pedigree 0.098025, pedigree (4,4,4,2,4)
  Calculated based on literature data.

## Emissions to nature
- Lead-210 [air, non-urban air or from high stacks]: 0.00070875 kBq; name lead_210; = factor_MJ_kWh*0.0000693; lognormal variance with pedigree 0.3986, pedigree (5,3,4,5,3)
  Literature value/calculated value. Emissions when producing 1kWh of electricity from hard coal, based on the value for burning 1MJ of hard coal. Weighted average with electricity production data (Itten&Frischknecht 2012) and emission values of 14 countries
  (AT, BE, ES, FR, IT, NL, PT, DE, CZ, HR, PL, SK, CN, US) (Röder et al. 2007)
  Country emissions values calculated from trace element balance, input uncertain
  Source:
  Itten R. and Frischknecht R. (2012) Life Cycle Inventories of Electricity Mixes and Grid. ESU-services Ltd., Uster, Switzerland.
- Vanadium [air, non-urban air or from high stacks]: 1.51364e-7 kg; name vanadium; = factor_MJ_kWh*0.0000000148; lognormal variance with pedigree 0.7486, pedigree (5,3,4,5,3)
  (same comment as for Lead-210)
- Antimony [air, non-urban air or from high stacks]: 1.22727e-8 kg; name antimony; = factor_MJ_kWh*0.0000000012; lognormal variance with pedigree 0.7486, pedigree (5,3,4,5,3)
  (same comment as for Lead-210)
- Hydrocarbons, aliphatic, unsaturated [air, non-urban air or from high stacks]: 1.30909e-6 kg; name hydrocarbons_aliphatic_unsaturated; = factor_MJ_kWh*0.000000128; lognormal variance with pedigree 0.08, pedigree (3,5,4,5,1)
  Literature value/calculated value. Emissions when producing 1kWh of electricity from hard coal, based on the value for burning 1MJ of hard coal. Weighted average with electricity production data (Itten&Frischknecht 2012) and emission values of 14 countries
  (AT, BE, ES, FR, IT, NL, PT, DE, CZ, HR, PL, SK, CN, US) (Röder et al. 2007)
  Country emissions values based on literature.
  Source:
  Itten R. and Frischknecht R. (2012) Life Cycle Inventories of Electricity Mixes and Grid. ESU-services Ltd., Uster, Switzerland.
- Propene [air, non-urban air or from high stacks]: 9.68523e-8 kg; name propene; = factor_MJ_kWh*0.00000000947; lognormal variance with pedigree 0.08, pedigree (3,5,4,5,1)
  (same comment as for Hydrocarbons, aliphatic, unsaturated)
- Hydrogen chloride [air, non-urban air or from high stacks]: 0.000271023 kg; name hydrogen_chloride; = factor_MJ_kWh*0.0000265; lognormal variance with pedigree 0.2186, pedigree (5,3,4,5,3)
  (same comment as for Lead-210)
- Hydrocarbons, chlorinated [air, non-urban air or from high stacks]: 1.70795e-8 kg; name hydrocarbons_chlorinated; = factor_MJ_kWh*0.00000000167; lognormal variance with pedigree 0.1786, pedigree (5,3,4,5,3)
  (same comment as for Hydrocarbons, aliphatic, unsaturated)
- Molybdenum [air, non-urban air or from high stacks]: 1.17614e-8 kg; name molybdenum; = factor_MJ_kWh*0.00000000115; lognormal variance with pedigree 0.7486, pedigree (5,3,4,5,3)
  (same comment as for Lead-210)
- Mercury [air, non-urban air or from high stacks]: 2.76136e-8 kg; name mercury; = factor_MJ_kWh*0.0000000027; lognormal variance with pedigree 0.7486, pedigree (5,3,4,5,3)
  (same comment as for Lead-210)
- Methane, monochloro-, R-40 [air, non-urban air or from high stacks]: 4.46932e-8 kg; name methane_monochloro; = factor_MJ_kWh*0.00000000437; lognormal variance with pedigree 0.1406, pedigree (3,3,4,5,3)
  (same comment as for Hydrocarbons, aliphatic, unsaturated)
- Uranium-238 [air, non-urban air or from high stacks]: 0.000162614 kBq; name uranium_238; = factor_MJ_kWh*0.0000159; lognormal variance with pedigree 0.3986, pedigree (5,3,4,5,3)
  (same comment as for Lead-210)
- Pentane [air, non-urban air or from high stacks]: 8.89773e-7 kg; name pentane; = factor_MJ_kWh*0.000000087; lognormal variance with pedigree 0.08, pedigree (3,5,4,5,1)
  (same comment as for Hydrocarbons, aliphatic, unsaturated)
- Polonium-210 [air, non-urban air or from high stacks]: 0.00125795 kBq; name polonium_210; = factor_MJ_kWh*0.000123; lognormal variance with pedigree 0.3986, pedigree (5,3,4,5,3)
  (same comment as for Lead-210)
- Nitrogen oxides [air, non-urban air or from high stacks]: 0.00116898 kg; name nitrogen_oxides; = factor_MJ_kWh*0.0001143; lognormal variance with pedigree 0.0049, pedigree (2,3,3,3,2)
  Data obtained from the Relatório de Sustentabilidade 2014. Eletrobras CGTEE. emissions (page 51) and electricity production (page 19)
  emissions are calculated by: 2878(kgNOx) / 2462000(KWh) = 0.001168968
  ELETROBRAS (2015). Relatório de Sustentabilidade 2014. Eletrobras CGTEE.
  http://cgtee.gov.br/Files/SustentabilidadeCGTEE2014.pdf
- Boron [air, non-urban air or from high stacks]: 3.91705e-6 kg; name boron; = factor_MJ_kWh*0.000000383; lognormal variance with pedigree 0.7486, pedigree (5,3,4,5,3)
  (same comment as for Lead-210)
- Chromium [air, non-urban air or from high stacks]: 8.38636e-8 kg; name chromium; = factor_MJ_kWh*0.0000000082; lognormal variance with pedigree 0.7486, pedigree (5,3,4,5,3)
  (same comment as for Lead-210)
- Methane, dichloro-, HCC-30 [air, non-urban air or from high stacks]: 2.44432e-8 kg; name methane_dichloro; = factor_MJ_kWh*0.00000000239; lognormal variance with pedigree 0.1786, pedigree (5,3,4,5,3)
  (same comment as for Hydrocarbons, aliphatic, unsaturated)
- Arsenic [air, non-urban air or from high stacks]: 1.01966e-7 kg; name arsenic; = factor_MJ_kWh*0.00000000997; lognormal variance with pedigree 0.7486, pedigree (5,3,4,5,3)
  (same comment as for Lead-210)
- Thorium-228 [air, non-urban air or from high stacks]: 3.375e-5 kBq; name throium_228; = factor_MJ_kWh*0.0000033; lognormal variance with pedigree 0.3986, pedigree (5,3,4,5,3)
  (same comment as for Lead-210)
- Zinc [air, non-urban air or from high stacks]: 4.25455e-7 kg; name zinc; = factor_MJ_kWh*0.0000000416; lognormal variance with pedigree 0.7486, pedigree (5,3,4,5,3)
  (same comment as for Lead-210)
- Cadmium [air, non-urban air or from high stacks]: 1.06364e-8 kg; name cadmium; = factor_MJ_kWh*0.00000000104; lognormal variance with pedigree 0.7486, pedigree (5,3,4,5,3)
  (same comment as for Lead-210)
- Propane [air, non-urban air or from high stacks]: 2.11705e-7 kg; name propane; = factor_MJ_kWh*0.0000000207; lognormal variance with pedigree 0.08, pedigree (3,5,4,5,1)
  (same comment as for Hydrocarbons, aliphatic, unsaturated)
- Formaldehyde [air, non-urban air or from high stacks]: 3.7125e-7 kg; name formaldehyde; = factor_MJ_kWh*0.0000000363; lognormal variance with pedigree 0.08, pedigree (3,5,4,5,1)
  (same comment as for Hydrocarbons, aliphatic, unsaturated)
- Acenaphthene [air, non-urban air or from high stacks]: 4.29545e-11 kg; name acenaphthene; = factor_MJ_kWh*0.0000000000042; lognormal variance with pedigree 0.1406, pedigree (3,3,4,5,3)
  (same comment as for Hydrocarbons, aliphatic, unsaturated)
- Carbon disulfide [air, non-urban air or from high stacks]: 1.09432e-8 kg; name carbon_disulfide; = factor_MJ_kWh*0.00000000107; lognormal variance with pedigree 0.3206, pedigree (3,3,4,5,3)
  Literature value/calculated value. Emissions when producing 1kWh of electricity from hard coal, based on the value for burning 1MJ of hard coal. Weighted average with electricity production data (Itten&Frischknecht 2012) and emission values of 14 countries
  (AT, BE, ES, FR, IT, NL, PT, DE, CZ, HR, PL, SK, CN, US) (Röder et al. 2007)
  Source:
  Itten R. and Frischknecht R. (2012) Life Cycle Inventories of Electricity Mixes and Grid. ESU-services Ltd., Uster, Switzerland.
- Particulates, > 10 um [air, non-urban air or from high stacks]: 6.36136e-5 kg; name particulates_gt10; = 6.22E-06 * factor_MJ_kWh; lognormal variance with pedigree 0.0049, pedigree (2,3,3,3,2)
  See power plant data base for details
  Amount was scaled to the amount of reference product.
- Strontium [air, non-urban air or from high stacks]: 6.05455e-7 kg; name strontium; = factor_MJ_kWh*0.0000000592; lognormal variance with pedigree 0.7486, pedigree (5,3,4,5,3)
  (same comment as for Lead-210)
- Dioxins, measured as 2,3,7,8-tetrachlorodibenzo-p-dioxin [air, non-urban air or from high stacks]: 1.08409e-13 kg; name dioxins; = factor_MJ_kWh*1.06E-14; lognormal variance with pedigree 0.34, pedigree (3,5,4,5,1)
  (same comment as for Hydrocarbons, aliphatic, unsaturated)
- Bromine [air, non-urban air or from high stacks]: 3.20114e-6 kg; name bromine; = factor_MJ_kWh*0.000000313; lognormal variance with pedigree 0.1806, pedigree (3,3,4,5,3)
  (same comment as for Lead-210)
- Hydrocarbons, aliphatic, alkanes, unspecified [air, non-urban air or from high stacks]: 1.38068e-6 kg; name hydrocarbons_al_al_unspec; = factor_MJ_kWh*0.000000135; lognormal variance with pedigree 0.08, pedigree (3,5,4,5,1)
  (same comment as for Hydrocarbons, aliphatic, unsaturated)
- Particulates, < 2.5 um [air, non-urban air or from high stacks]: 0.000211705 kg; name particulates_lt2_5; = 2.07E-05 * factor_MJ_kWh; lognormal variance with pedigree 0.0049, pedigree (2,3,3,3,2)
  (same comment as for Particulates, > 10 um)
- Cobalt [air, non-urban air or from high stacks]: 3.41591e-8 kg; name cobalt; = factor_MJ_kWh*0.00000000334; lognormal variance with pedigree 0.7486, pedigree (5,3,4,5,3)
  (same comment as for Lead-210)
- Chloroform [air, non-urban air or from high stacks]: 8.26364e-9 kg; name chloroform; = factor_MJ_kWh*0.000000000808; lognormal variance with pedigree 0.1406, pedigree (3,3,4,5,3)
  (same comment as for Carbon disulfide)
- Ethene, tetrachloro- [air, non-urban air or from high stacks]: 3.62045e-9 kg; name ethene_tetrachloro; = factor_MJ_kWh*0.000000000354; lognormal variance with pedigree 0.1786, pedigree (5,3,4,5,3)
  (same comment as for Hydrocarbons, aliphatic, unsaturated)
- Acrolein [air, non-urban air or from high stacks]: 2.44432e-8 kg; name acrolein; = factor_MJ_kWh*0.00000000239; lognormal variance with pedigree 0.3586, pedigree (5,3,4,5,3)
  (same comment as for Hydrocarbons, aliphatic, unsaturated)
- Uranium-234 [air, non-urban air or from high stacks]: 2.06591e-5 kBq; name uranium_234; = factor_MJ_kWh*0.00000202; lognormal variance with pedigree 0.3586, pedigree (5,3,4,5,3)
  (same comment as for Hydrocarbons, aliphatic, unsaturated)
- Hydrogen fluoride [air, non-urban air or from high stacks]: 2.89432e-5 kg; name hydrogen_fluoride; = factor_MJ_kWh*0.00000283; lognormal variance with pedigree 0.2186, pedigree (5,3,4,5,3)
  (same comment as for Lead-210)
- Methane, fossil [air, non-urban air or from high stacks]: 2.60601e-5 kg; name methane_fossil; = factor_MJ_kWh*2.5481E-06; lognormal variance with pedigree 0.0639, pedigree (2,3,3,3,2)
  Data obtained from the Relatório de Sustentabilidade 2014. Eletrobras CGTEE. emissions (page 51) and electricity production (page 19)
  emissions are calculated by: (1604000(kgCO2eq)/25(conversion factor)) / 2462000(KWh) = 2.60601137286759E-05
  ELETROBRAS (2015). Relatório de Sustentabilidade 2014. Eletrobras CGTEE.
  http://cgtee.gov.br/Files/SustentabilidadeCGTEE2014.pdf
- Barium [air, non-urban air or from high stacks]: 6.6375e-7 kg; name barium; = factor_MJ_kWh*0.0000000649; lognormal variance with pedigree 0.7486, pedigree (5,3,4,5,3)
  (same comment as for Lead-210)
- Ethane, 1,1,1-trichloro-, HCFC-140 [air, non-urban air or from high stacks]: 1.6875e-9 kg; name ethane_trichloro; = factor_MJ_kWh*0.000000000165; lognormal variance with pedigree 0.1406, pedigree (3,3,4,5,3)
  (same comment as for Hydrocarbons, aliphatic, unsaturated)
- Chromium VI [air, non-urban air or from high stacks]: 1.43182e-8 kg; name chromium_vi; = factor_MJ_kWh*0.0000000014; lognormal variance with pedigree 0.5006, pedigree (3,3,4,5,3)
  Literature value/calculated value. Emissions when producing 1kWh of electricity from hard coal, based on the value for burning 1MJ of hard coal. Weighted average with electricity production data (Itten&Frischknecht 2012) and emission values of 14 countries
  (AT, BE, ES, FR, IT, NL, PT, DE, CZ, HR, PL, SK, CN, US) (Röder et al. 2007)
  Country emissions values based on range of data.
  Source:
  Itten R. and Frischknecht R. (2012) Life Cycle Inventories of Electricity Mixes and Grid. ESU-services Ltd., Uster, Switzerland.
- Aldehydes, unspecified [air, non-urban air or from high stacks]: 8.00795e-8 kg; name aldehydes_unspecified; = factor_MJ_kWh*0.00000000783; lognormal variance with pedigree 0.1406, pedigree (3,3,4,5,3)
  (same comment as for Hydrocarbons, aliphatic, unsaturated)
- Carbon monoxide, fossil [air, non-urban air or from high stacks]: 9.02045e-5 kg; name carbon_monoxide_fossil; = factor_MJ_kWh*0.00000882; lognormal variance with pedigree 0.674, pedigree (3,4,4,5,1)
  (same comment as for Hydrocarbons, aliphatic, unsaturated)
- Copper [air, non-urban air or from high stacks]: 8.39659e-8 kg; name copper; = factor_MJ_kWh*0.00000000821; lognormal variance with pedigree 0.7486, pedigree (5,3,4,5,3)
  (same comment as for Lead-210)
- Radon-222 [air, non-urban air or from high stacks]: 0.00509318 kBq; name radon_222; = factor_MJ_kWh*0.000498; lognormal variance with pedigree 0.3986, pedigree (5,3,4,5,3)
  (same comment as for Lead-210)
- Benzene [air, non-urban air or from high stacks]: 1.42159e-6 kg; name benzene; = factor_MJ_kWh*0.000000139; lognormal variance with pedigree 0.088, pedigree (3,5,4,5,3)
  (same comment as for Hydrocarbons, aliphatic, unsaturated)
- Styrene [air, non-urban air or from high stacks]: 2.08636e-9 kg; name styrene; = factor_MJ_kWh*0.000000000204; lognormal variance with pedigree 0.1406, pedigree (3,3,4,5,3)
  (same comment as for Hydrocarbons, aliphatic, unsaturated)
- Sulfate [air, non-urban air or from high stacks]: 4.02955e-9 kg; name sulfate; = factor_MJ_kWh*0.000000000394; lognormal variance with pedigree 0.1786, pedigree (5,3,4,5,3)
  (same comment as for Hydrocarbons, aliphatic, unsaturated)
- Radon-220 [air, non-urban air or from high stacks]: 0.00518523 kBq; name radon_220; = factor_MJ_kWh*0.000507; lognormal variance with pedigree 0.3986, pedigree (5,3,4,5,3)
  (same comment as for Lead-210)
- Actinides, radioactive, unspecified [air, non-urban air or from high stacks]: 0.000174886 kBq; name actinides_radioactive_unspecified; = factor_MJ_kWh*0.0000171; lognormal variance with pedigree 0.3206, pedigree (3,3,4,5,3)
  (same comment as for Hydrocarbons, aliphatic, unsaturated)
- Beryllium [air, non-urban air or from high stacks]: 1.76932e-9 kg; name beryllium; = factor_MJ_kWh*0.000000000173; lognormal variance with pedigree 0.6706, pedigree (3,3,4,5,3)
  (same comment as for Carbon disulfide)
- Dinitrogen monoxide [air, non-urban air or from high stacks]: 1.81116e-5 kg; name dinitrogen_monoxide; = factor_MJ_kWh*1.77091E-06; lognormal variance with pedigree 0.0639, pedigree (2,3,3,3,2)
  Data obtained from the Relatório de Sustentabilidade 2014. Eletrobras CGTEE. emissions (page 51) and electricity production (page 19)
  emissions are calculated by: (13288000(kgCO2eq)/298(kg CO2eq/kg N2O)) / 2462000(KWh) = 1.811E-05
  ELETROBRAS (2015). Relatório de Sustentabilidade 2014. Eletrobras CGTEE.
  http://cgtee.gov.br/Files/SustentabilidadeCGTEE2014.pdf
- Benzene, ethyl- [air, non-urban air or from high stacks]: 7.92614e-9 kg; name benzene_ethyl; = factor_MJ_kWh*0.000000000775; lognormal variance with pedigree 0.1406, pedigree (3,3,4,5,3)
  (same comment as for Carbon disulfide)
- NMVOC, non-methane volatile organic compounds, unspecified origin [air, non-urban air or from high stacks]: 9.51136e-6 kg; name nmvoc; = factor_MJ_kWh*0.00000093; lognormal variance with pedigree 0.1406, pedigree (3,3,4,5,3)
  (same comment as for Hydrocarbons, aliphatic, unsaturated)
- Ethane, 1,2-dichloro- [air, non-urban air or from high stacks]: 3.36477e-9 kg; name ethane_dichloro; = factor_MJ_kWh*0.000000000329; lognormal variance with pedigree 0.1786, pedigree (5,3,4,5,3)
  (same comment as for Hydrocarbons, aliphatic, unsaturated)
- Iodine [air, non-urban air or from high stacks]: 1.62614e-6 kg; name iodine; = factor_MJ_kWh*0.000000159; lognormal variance with pedigree 0.2186, pedigree (5,3,4,5,3)
  (same comment as for Lead-210)
- Carbon dioxide, fossil [air, non-urban air or from high stacks]: 1.16173 kg; name carbon_dioxide_fossil; = factor_MJ_kWh*0.113591; lognormal variance with pedigree 0.0039, pedigree (2,3,3,3,2)
  Data obtained from the Relatório de Sustentabilidade 2014. Eletrobras CGTEE. emissions (page 51) and electricity production (page 19)
  emissions are calculated by: 2860126(kgCO2) / 2462000(KWh) = 1.1617
  ELETROBRAS (2015). Relatório de Sustentabilidade 2014. Eletrobras CGTEE.
  http://cgtee.gov.br/Files/SustentabilidadeCGTEE2014.pdf
- Cyanide [air, non-urban air or from high stacks]: 2.10682e-7 kg; name cyanide; = factor_MJ_kWh*0.0000000206; lognormal variance with pedigree 0.1786, pedigree (5,3,4,5,3)
  (same comment as for Carbon disulfide)
- Potassium-40 [air, non-urban air or from high stacks]: 0.000235227 kBq; name potassium_40; = factor_MJ_kWh*0.000023; lognormal variance with pedigree 0.3986, pedigree (5,3,4,5,3)
  (same comment as for Lead-210)
- Particulates, > 2.5 um, and < 10um [air, non-urban air or from high stacks]: 2.48523e-5 kg; name particulates_2_5_to_10; = 2.43E-06 * factor_MJ_kWh; lognormal variance with pedigree 0.0049, pedigree (2,3,3,3,2)
  (same comment as for Particulates, > 10 um)
- Phenol [air, non-urban air or from high stacks]: 1.35e-9 kg; name phenol; = factor_MJ_kWh*0.000000000132; lognormal variance with pedigree 0.1406, pedigree (3,3,4,5,3)
  (same comment as for Hydrocarbons, aliphatic, unsaturated)
- Ethane [air, non-urban air or from high stacks]: 2.48523e-7 kg; name ethane; = factor_MJ_kWh*0.0000000243; lognormal variance with pedigree 0.08, pedigree (3,5,4,5,1)
  (same comment as for Hydrocarbons, aliphatic, unsaturated)
- Water [air, unspecified]: 0.00164431 m3; name water_to_air_unspecified; = (water_completely_softened/1000)*fraction_WCS_to_air+(water_decarbonised_user/1000)*fraction_WDC_to_air+water_cooling_UNO_input*fraction_CW_to_air; lognormal variance with pedigree 0.098025, pedigree (4,4,4,2,4)
  Calculated value based on literature values and expert opinion. See comments in the parametres' comment field.
  property fraction, origin: fresh water 0.047882; name fraction_origin_fresh_water
  property fraction, origin: salt water 0; name fraction_origin_salt_water
  property fraction, origin: unspecified 0.952118; name fraction_origin_unspecified
- Magnesium [air, non-urban air or from high stacks]: 9.26591e-7 kg; name magnesium; = factor_MJ_kWh*0.0000000906; lognormal variance with pedigree 0.7086, pedigree (5,3,4,5,3)
  (same comment as for Hydrocarbons, aliphatic, unsaturated)
- Protactinium-234 [air, non-urban air or from high stacks]: 1.05341e-5 kBq; name protactinium_234; = factor_MJ_kWh*0.00000103; lognormal variance with pedigree 0.3206, pedigree (3,3,4,5,3)
  (same comment as for Hydrocarbons, aliphatic, unsaturated)
- Xylene [air, non-urban air or from high stacks]: 5.58409e-6 kg; name xylene; = factor_MJ_kWh*0.000000546; lognormal variance with pedigree 0.08, pedigree (3,5,4,5,1)
  (same comment as for Hydrocarbons, aliphatic, unsaturated)
- Water [water, unspecified]: 0.00185564 m3; name water_to_water_unspecified; = (water_completely_softened/1000)*(1-fraction_WCS_to_air)+(water_decarbonised_user/1000)*(1-fraction_WDC_to_air)+water_cooling_UNO_input*(1-fraction_CW_to_air); lognormal variance with pedigree 0.098025, pedigree (4,4,4,2,4)
  (same comment as for Water)
  property fraction, origin: unspecified 0.957054; name fraction_origin_unspecified_Ww
  property fraction, origin: fresh water 0.0429463; name fraction_origin_fresh_water_Ww
  property fraction, origin: salt water 0; name fraction_origin_salt_water_Ww
- Thorium-234 [air, non-urban air or from high stacks]: 1.05341e-5 kBq; name thorium_234; = factor_MJ_kWh*0.00000103; lognormal variance with pedigree 0.3206, pedigree (3,3,4,5,3)
  (same comment as for Hydrocarbons, aliphatic, unsaturated)
- Cumene [air, non-urban air or from high stacks]: 4.59205e-10 kg; name cumene; = factor_MJ_kWh*0.0000000000449; lognormal variance with pedigree 0.124, pedigree (1,1,3,5,1)
  (same comment as for Carbon disulfide)
- Benzo(a)pyrene [air, non-urban air or from high stacks]: 4.40795e-12 kg; name benzo_a_pyrene; = factor_MJ_kWh*0.000000000000431; lognormal variance with pedigree 0.08, pedigree (3,5,4,5,1)
  (same comment as for Hydrocarbons, aliphatic, unsaturated)
- Selenium [air, non-urban air or from high stacks]: 1.6875e-7 kg; name selenium; = factor_MJ_kWh*0.0000000165; lognormal variance with pedigree 0.7486, pedigree (5,3,4,5,3)
  (same comment as for Lead-210)
- Manganese [air, non-urban air or from high stacks]: 3.66136e-7 kg; name manganese; = factor_MJ_kWh*0.0000000358; lognormal variance with pedigree 0.7486, pedigree (5,3,4,5,3)
  (same comment as for Lead-210)
- Nickel [air, non-urban air or from high stacks]: 2.04545e-7 kg; name nickel; = factor_MJ_kWh*0.00000002; lognormal variance with pedigree 0.7486, pedigree (5,3,4,5,3)
  (same comment as for Lead-210)
- Thorium-230 [air, non-urban air or from high stacks]: 1.05341e-5 kBq; name thorium_230; = factor_MJ_kWh*0.00000103; lognormal variance with pedigree 0.3586, pedigree (5,3,4,5,3)
  (same comment as for Hydrocarbons, aliphatic, unsaturated)
- Furan [air, non-urban air or from high stacks]: 4.21364e-13 kg; name furan; = factor_MJ_kWh*4.12E-14; lognormal variance with pedigree 0.1406, pedigree (3,3,4,5,3)
  (same comment as for Hydrocarbons, aliphatic, unsaturated)
- Hydrocarbons, aliphatic, alkanes, cyclic [air, non-urban air or from high stacks]: 4.87841e-8 kg; name hydrocarbons_al_al_cyclic; = factor_MJ_kWh*0.00000000477; lognormal variance with pedigree 0.1406, pedigree (3,3,4,5,3)
  (same comment as for Hydrocarbons, aliphatic, unsaturated)
- Radium-228 [air, non-urban air or from high stacks]: 6.04432e-5 kBq; name radium_228; = factor_MJ_kWh*0.00000591; lognormal variance with pedigree 0.3986, pedigree (5,3,4,5,3)
  (same comment as for Lead-210)
- Sulfur dioxide [air, non-urban air or from high stacks]: 0.0119345 kg; name sulfur_dioxide; = factor_MJ_kWh*0.00116693; lognormal variance with pedigree 0.0049, pedigree (2,3,3,3,2)
  Data obtained from the Relatório de Sustentabilidade 2014. Eletrobras CGTEE. emissions (page 51) and electricity production (page 19)
  emissions are calculated by: 29382(kgSO2) / 2462000(KWh) = 0.0119
  ELETROBRAS (2015). Relatório de Sustentabilidade 2014. Eletrobras CGTEE.
  http://cgtee.gov.br/Files/SustentabilidadeCGTEE2014.pdf
- Radium-226 [air, non-urban air or from high stacks]: 0.000187159 kBq; name radium_226; = factor_MJ_kWh*0.0000183; lognormal variance with pedigree 0.3907, pedigree (3,3,5,3,3)
  (same comment as for Lead-210)
- Toluene [air, non-urban air or from high stacks]: 6.80114e-7 kg; name toluene; = factor_MJ_kWh*0.0000000665; lognormal variance with pedigree 0.08, pedigree (3,5,4,5,1)
  (same comment as for Hydrocarbons, aliphatic, unsaturated)
- Thorium-232 [air, non-urban air or from high stacks]: 4.93977e-5 kBq; name thorium_232; = factor_MJ_kWh*0.00000483; lognormal variance with pedigree 0.3986, pedigree (5,3,4,5,3)
  (same comment as for Lead-210)
- Lead [air, non-urban air or from high stacks]: 3.79432e-7 kg; name lead; = factor_MJ_kWh*0.0000000371; lognormal variance with pedigree 0.7486, pedigree (5,3,4,5,3)
  (same comment as for Lead-210)
- Hexane [air, non-urban air or from high stacks]: 5.67614e-9 kg; name hexane; = factor_MJ_kWh*0.000000000555; lognormal variance with pedigree 0.1786, pedigree (5,3,4,5,3)
  (same comment as for Hydrocarbons, aliphatic, unsaturated)
- Butane [air, non-urban air or from high stacks]: 1.14545e-7 kg; name butane; = factor_MJ_kWh*0.0000000112; lognormal variance with pedigree 0.08, pedigree (3,5,4,5,1)
  (same comment as for Hydrocarbons, aliphatic, unsaturated)
- PAH, polycyclic aromatic hydrocarbons [air, non-urban air or from high stacks]: 7.66023e-8 kg; name pah; = factor_MJ_kWh*0.00000000749; lognormal variance with pedigree 0.34, pedigree (3,5,4,5,1)
  (same comment as for Hydrocarbons, aliphatic, unsaturated)

## Sampling procedure
literature and statistics

## Extrapolations
This dataset has been extrapolated from year 2017 to the year of the calculation (2021). The uncertainty has been adjusted accordingly.

## Review by Christopher Oberschelp 2017-11-29
Dataset looks reasonable and main exchanges have been checked. Uncertainties might require update later on (as discussed with ecoinvent). LCIA results might be able to show indiviual issues by comparison with a reference dataset.
