# polyurethane production, flexible foam, MDI-based

Dataset: EcoSpold 2, unit process
Geography: RoW
Time period: 1997-01-01 to 2021-12-31
Technology level: current
Classification: ISIC rev.4 ecoinvent: 2013:Manufacture of plastics and synthetic rubber in primary forms
Synonyms: flexible polyurethane foams FPF PU
Scenario: Business-as-Usual
System model: Allocation, cut-off by classification
Generated by: [System]
Database: ecoinvent
isCopyrightProtected: true
accessRestrictedTo: 1

## General comment
This dataset represents the production of 1 kg of one possible composition of polyurethane (PUR) flexible foam (density 45 to 53 kg/m³). Flexible polyurethane foam is used to manufacture mattresses, upholstered furniture and car seats, but also acoustic insulation boards, carpet underlays, household sponges, clothing and sportswear, packaging and many other applications. The MDI-based foams are increasingly used for bedding applications due to their viscoelastic properties (also known as “memory” and pressure-relieving properties. The inventory is estimated based on industrial data.
References:
Adam, N., Avar, G., Blankenheim, H., Friederichs, W., Giersig, M., Weigand, E., Halfmann, M., Wittbecker, F.-W., Larimer, D.-R., Maier, U., Meyer-Ahrens, S., Noble, K.-L. and Wussow, H.-G. 2005. Polyurethanes. Ullmann's Encyclopedia of Industrial Chemistry.
[This dataset is meant to replace the following datasets:
- polyurethane production, flexible foam, GLO, 1997 - 2020]

## Included activities start
From reception of raw materials at the factory gate.

## Included activities end
This activity ends with the production of 1 kg of PUR flexible foam.

## Geography
Typical composition for European conditions.

## Technology
Polyurethane is made by reacting diisocyanates and polyols. To generate PU foam, addition of water to the main reagents causes a side reaction producing carbon dioxide, which acts as a blowing agent. Flexible slabstock polyurethane foams are produced as large blocks using a continuous process with minimal human handling. Continuous foam machines are the standard in Europe today.
The process represents production with water as a blowing agent, althought this might not be the case all over the world. If this is important in your study, make sure to check which blowing agent is used and replace it, if necessary.
References:
The full report can be accessed here: https://www.europur.org/images/20150821_EPD_EUROPUR_PU_foam.pdf (last accessed 2020-12-14).
The data is a copy of the corresponding RER dataset, uncertianty has been adjusted accrodingly.

## Time period
Time of publications.

## Parameters
- fraction, process water, to air: 0.205 dimensionless; name fraction_PW_to_air; lognormal variance with pedigree 0.092025, pedigree (4,4,3,2,4)
  Literature value (Statistics Canada, 2007 & Shaffer, K.H., 2008, Consumptive water use in the Great Lakes Basin, USGS) (Vionnet, S., Quantis Water Database - Technical Report, 2012).

## Reference product
- polyurethane, flexible foam: 1 kg; name RP; CPC 34740: Polyacetals, other polyethers and epoxide resins, in primary forms; polycarbonates, alkyd resins, polyallyl es[…]; By-product classification allocatable product; CAS 9009-54-5
  PUR flexible foam is used for manufacturing products such as mattresses, cushions and car seats.
  production volume 1.577e8 kg; name RP_PV
    The amount of total production of flexible polyurethane foam in 2018 in EU28 was of 1.7 million t, information taken from Austin, A. 2019. The European flexible PU foam market report for 2018. PU magazine vol 16, NO.4 – August/September 2019. The figures were provided by Europur. According to the article roughly half of the amount of MDI compared to TDI was consumed to produce flexible foam. Based on the amount of MDI/TDI consumed in the process, the split between MDI and TDI based polyurethane foams has been calculated. A 50/50 split was assumed among the two types of TDI products. 5% of overall foams are assumed to be flame retardant based on lack of data, assuming flame retardant foams belong to the "other" category in figure 2 of the article.
  property carbon content, fossil 0.633827
    Polyurethanes (PUR) is the collective name for an extensive group of polymers with very different compositions and correspondingly varied property profiles, though their molecule chain contains all a urethane group (-NH-CO-O-). All PURs are built on a common principle : they are produced by the diisocyanate polyaddition process, that links polyols and (di)isocyanates. In this dataset, an example of typical polyurethane mixture is described (Ullmann, Polyurethanes, Dieterich et al. & ecoinvent v2 report 11_II). C content was calculated as an addition of C contents in its components.
  property carbon content 0.633827
    carbon content on a dry matter basis (reserved; not for manual entry)
  properties: carbon content, non-fossil 0, heating value, net 30.67 MJ, price 1.29 EUR2005, wet mass 1 kg, water content 0, water in wet mass 0 kg, dry mass 1 kg, carbon allocation 0.633827 kg

## By-products
- waste paper, unsorted: 0 kg; By-product classification Recyclable; CPC 39240: Waste and scrap of paper or paperboard; pedigree (1,1,1,1,1)
  production volume 0 kg; = BP_waste_paper*RP_PV/abs(RP)
    Calculated from production volume of reference product using the relative outputs.
  property price 0.093 EUR2005; name BP_waste_paper_price_EUR2005
    Temporary price data. Calculated as 90% of purchasers price based on: Assumed to be 10% less than for sorted waste paper
  properties: heating value, net 14.11 MJ, water in wet mass 0 kg

## Inputs from technosphere
- heat, district or industrial, natural gas: 0 MJ; pedigree (1,1,1,1,1)
  properties: heating value, net 1 MJ
- nitrogen, liquid: 0.000553 kg; lognormal variance with pedigree 0.0035, pedigree (2,2,2,5,1)
  properties: dry mass 1 kg, wet mass 1 kg
- benzyl alcohol: 0.00145609 kg; lognormal variance with pedigree 0.0035, pedigree (2,2,2,5,1)
  properties: heating value, net 32.52 MJ, wet mass 1 kg, carbon content, fossil 0.777778, dry mass 1 kg
- chemical factory, organics: 4e-10 unit; lognormal variance with pedigree 0.3114, pedigree (2,3,2,5,3)
- water, deionised: 0.0096 kg; lognormal variance with pedigree 0.0035, pedigree (2,2,2,5,1)
  properties: wet mass 1 kg
- packaging film, low density polyethylene: 0.00288 kg; lognormal variance with pedigree 0.0035, pedigree (2,2,2,5,1)
  properties: carbon content, fossil 0.857143, dry mass 1 kg, wet mass 1 kg, heating value, net 42.47 MJ
- paper, woodcontaining, supercalendered: 0.00643718 kg; lognormal variance with pedigree 0.0035, pedigree (2,2,2,5,1)
  properties: heating value, net 14.11 MJ, water content 0.0582011, carbon content, non-fossil 0.289073, wet mass 1 kg, carbon content, fossil 0.0109646, dry mass 0.945 kg
- methylene diphenyl diisocyanate: 0.350283 kg; lognormal variance with pedigree 0.0035, pedigree (2,2,2,5,1)
  properties: dry mass 1 kg, carbon content, fossil 0.72, wet mass 1 kg, heating value, net 26.66 MJ
- dipropylene glycol monomethyl ether: 0.00346689 kg; lognormal variance with pedigree 0.0035, pedigree (2,2,2,5,1)
  properties: carbon content, fossil 0.567568, wet mass 1 kg, dry mass 1 kg, heating value, net 30.27 MJ
- silicon, metallurgical grade: 0.00263879 kg; lognormal variance with pedigree 0.0035, pedigree (2,2,2,5,1)
  properties: dry mass 1 kg, wet mass 1 kg
- compressed air, 1000 kPa gauge: 0.00798 m3; lognormal variance with pedigree 0.0035, pedigree (2,2,2,5,1)
- electricity, medium voltage: 0 kWh; pedigree (1,1,1,1,1)
- diethylene glycol: 0.000226 kg; lognormal variance with pedigree 0.0035, pedigree (2,2,2,5,1)
  properties: wet mass 1 kg, dry mass 1 kg, carbon content, fossil 0.45283, heating value, net 25.14 MJ
- tap water: 0 kg; pedigree (1,1,1,1,1)
  properties: wet mass 1 kg, dry mass 0.000337476 kg, carbon content, fossil 0.00178991, water content 2962.17
  note on carbon content, fossil: Bicarbonate content is 2.93 mol/m3. CO2 content is 0.1 mol/m3 (ecoinvent v2.2 report 8, Tab 93.1).
- chemical, organic: 0.00394 kg; lognormal variance with pedigree 0.0035, pedigree (2,2,2,5,1)
  properties: wet mass 1 kg, heating value, net 19.03 MJ, carbon content, fossil 0.628, dry mass 1 kg
  note on carbon content, fossil: This dataset is an unweighted average of 20 organic substances (listed in Tab 88.1, ecoinvent v2.2 report 8, part II), being part of the top100 chemicals included in this database. The C-content has also been calculated as an unweighted average of the C content of the substances composing this dataset.
- polyol: 0.671 kg; lognormal variance with pedigree 0.0035, pedigree (2,2,2,5,1)
  properties: dry mass 1 kg, wet mass 1 kg, carbon content, fossil 0.640856, heating value, net 19.42 MJ
- N-methyl-2-pyrrolidone: 1.94e-5 kg; lognormal variance with pedigree 0.0035, pedigree (2,2,2,5,1)
  properties: wet mass 1 kg, carbon content, fossil 0.585366, heating value, net 29.36 MJ, dry mass 1 kg
- cyclic N-compound: 0.000279 kg; lognormal variance with pedigree 0.0035, pedigree (2,2,2,5,1)
  properties: carbon content, fossil 0.641962, dry mass 1 kg, wet mass 1 kg
- waste plastic, mixture: 0 kg; name BP_waste_plastic; pedigree (1,1,1,1,1)
  production volume 0 kg
    Calculated from production volume of reference product using the relative outputs.
  property price 0 EUR2005; name BP_waste_plastic_price_EUR2005
  properties: carbon content, fossil 0.747344, heating value, net 30.79 MJ, dry mass 0.847 kg, wet mass 1 kg, water content 0.180638
  note on heating value, net: Value taken from the general comment of the treatment dataset.
- waste paint: -0.000798387 kg; name BP_waste_paint; lognormal variance with pedigree 0.0035, pedigree (2,2,2,5,1)
  production volume 125906 kg; = BP_waste_paint*RP_PV/abs(RP)
    Calculated from production volume of reference product using the relative outputs.
  property price 0 EUR2005; name BP_waste_paint_price_EUR2005
  properties: carbon content, fossil 0.65, dry mass 1 kg, wet mass 1 kg, heating value, net 19.7 MJ
- waste paper, unsorted: -0.00222 kg; lognormal variance with pedigree 0.0035, pedigree (2,2,2,5,1)
  production volume 350094 kg
  properties: heating value, net 14.11 MJ
- heat, district or industrial, natural gas: 8.15675e-5, 0.00529243 MJ (2 entries); lognormal variance with pedigree 0.0035, pedigree (2,2,2,5,1)
- electricity, medium voltage: 0.000430082, 8.24711e-5, 0.00189367, 0.00138452, 0.0201366, 0.00283826, 0.00924748 kWh (7 entries); lognormal variance with pedigree 0.0035, pedigree (2,2,2,5,1)
- tap water: 2.91156e-5, 3.50474e-6, 5.79216e-6, 0.000146055, 3.79959e-6, 1.08079e-5, 0.00167138 kg (7 entries); lognormal variance with pedigree 0.0035, pedigree (2,2,2,5,1)
- waste plastic, mixture: -0.000809843, -5.41106e-5, -4.0923e-6, -2.23496e-5, -9.02899e-6, -2.12231e-5, -0.00566935 kg (7 entries); lognormal variance with pedigree 0.0035, pedigree (2,2,2,5,1)
  production volume 1.03924e6 kg

## Inputs from nature
- Water, well, in ground [natural resource, in water]: 0.000174 m3; lognormal variance with pedigree 0.0035, pedigree (2,2,2,5,1)
- Water, cooling, unspecified natural origin [natural resource, in water]: 1.03e-8 m3; lognormal variance with pedigree 0.0035, pedigree (2,2,2,5,1)

## Emissions to nature
- Water [air, unspecified]: 1.03e-8 m3; lognormal variance with pedigree 0.0429, pedigree (2,2,2,5,1)
- Particulates, > 2.5 um, and < 10um [air, unspecified]: 9.45e-8 kg; lognormal variance with pedigree 0.3029, pedigree (2,2,2,5,1)
- NMVOC, non-methane volatile organic compounds, unspecified origin [air, unspecified]: 7.37e-7 kg; lognormal variance with pedigree 0.0429, pedigree (2,2,2,5,1)
- Water [water, unspecified]: 0.000173686 m3; lognormal variance with pedigree 0.0429, pedigree (2,2,2,5,1)
- Carbon dioxide, fossil [air, unspecified]: 0.0285 kg; lognormal variance with pedigree 0.0035, pedigree (2,2,2,5,1)

## Sampling procedure
Data based on industry report and expert judgement.

## Extrapolations
The dataset is a copy of the corresponding RER dataset, uncertainty has been adjusted accordingly.
