# fibreboard production, soft, from wet processes

Dataset: EcoSpold 2, unit process
Geography: CH
Time period: 2008-01-01 to 2021-12-31
Technology level: current
Classification: ISIC rev.4 ecoinvent: 1621:Manufacture of veneer sheets and wood-based panels
Tags: ConvertedDataset; Swiss brush-up completed
Scenario: Business-as-Usual
System model: Allocation, cut-off by classification
Share of production covered: 1 %
Generated by: Frank Werner
Published in: Hischier, R. 2009
Database: ecoinvent
isCopyrightProtected: true
accessRestrictedTo: 1

## General comment
140 kg/m3
This dataset has been revised. The input 'heat, district or industrial, other than natural gas' includes 1.47E2 MJ from light fuel oil. This is used as a proxy for heat from animal fat.
The old flows related to light fuel oil and carbon corrections have been deleted.
[This dataset was already contained in the ecoinvent database version 2. It was not individually updated during the transfer to ecoinvent version 3. Life Cycle Impact Assessment results may still have changed, as they are affected by changes in the supply chain, i.e. in other datasets. This dataset was generated following the ecoinvent quality guidelines for version 2. It may have been subject to central changes described in the ecoinvent version 3 change report (http://www.ecoinvent.org/database/ecoinvent-version-3/reports-of-changes/), and the results of the central updates were reviewed extensively. The changes added e.g. consistent water flows and other information throughout the database. The documentation of this dataset can be found in the ecoinvent reports of version 2, which are still available via the ecoinvent website. The change report linked above covers all central changes that were made during the conversion process.]

## Included activities end
includes all inputs to the production processes, transport, wastes and emissions to air and water; does not include any packaging material

## Geography
representative for Swiss production and Swiss consumption

## Technology
wet process, medium enterprise technology (2008)

## Parameters
- input wood fuel: 162.516 MJ; name wood_fuel; = 0.0504*169*(20.4-1.32)
  input of wood fuel used in production, i.e. internal wood residues from processing wood inputs; expressed in MJ of absolutely dry mass (lower heating value at humidity u=0%). Converted from bulked chips volume x bulk density x (upper heating value for softwood - 1.32 MJ/MJ)
- fraction, cooling water, recirculating system, to air: 0.771 dimensionless; name fraction_CW_R_to_air; lognormal variance with pedigree 0.0413, pedigree (2,3,1,3,1)
  Calculated based on literature value (Scown, C.D., 2011, Water Footprint of U.S. Transportation Fuels and supplying information of the article) (Vionnet, S., Quantis Water Database - Technical Report, 2012).
- fraction, cooling water, to air: 0.3875 dimensionless; name fraction_CW_to_air; = (0.5*fraction_CW_OT_to_air)+(0.5*fraction_CW_R_to_air); lognormal variance with pedigree 0.092025, pedigree (4,4,3,2,4)
  Calculated value based on literature value (see comments of the other parametres present in this dataset) and expert opinion. In the case when no industry/literature data are available about the type of cooling or directly fraction, cooling water, to air specific for the process a default assumption is applied. It is assumed that the once-through cooling system is used in 50% of all cases and recirculating system is used in another 50% of all cases.
- fraction, cooling water, cooling pond system, to air: 0.032 dimensionless; name fraction_CW_CP_to_air; lognormal variance with pedigree 0.0413, pedigree (2,3,1,3,1)
  (same comment as for fraction, cooling water, recirculating system, to air)
- fraction, process water, to air: 0.43 dimensionless; name fraction_PW_to_air; lognormal variance with pedigree 0.092025, pedigree (4,4,3,2,4)
  Literature value (Statistics Canada, 2007 & Shaffer, K.H., 2008, Consumptive water use in the Great Lakes Basin, USGS) (Vionnet, S., Quantis Water Database - Technical Report, 2012).
- fraction, cooling water, once-through system, to air: 0.004 dimensionless; name fraction_CW_OT_to_air; lognormal variance with pedigree 0.0413, pedigree (2,3,1,3,1)
  (same comment as for fraction, cooling water, recirculating system, to air)
- fraction, tap water, to air: 0.43 dimensionless; name fraction_TW_to_air; = fraction_PW_to_air; lognormal variance with pedigree 0.092025, pedigree (4,4,3,2,4)
  Calculated value. See comment in the other parametres present in this dataset. Tap water is considered to be always used as process water, thus process water fractions to air are applied to all tap water input flows to calculate the amount of water consumed in the processes.

## Reference product
- fibreboard, soft: 1 m3; name RP; By-product classification allocatable product; CPC 31449: Other fibreboard
  production volume 199800 m3; name RP_PV
    FaoStat 2011; PV in m3 assuming 60% of total production. It is considered that in Switzerland, the production of fibreboard, soft happens very specifically in wet processes only (product category Other fibreboard ; Switzerland; production quantity; 2011)
  property price 148 EUR2005
    Export prices for the World+ according to: http://faostat.fao.org/site/626/DesktopDefault.aspx?PageID=626#ancor downloaded 28 April 2009; calculated as export value divided by export volume.
  property carbon content, fossil 0.0133086
    C content calculated as the addition of the C contents in the final product components: 2.772 kg of paraffin and vinyl acetate
  property carbon content, non-fossil 0.483534
    The fibreboard is composed of wood and additives. The weight of the wood is assumed to be the DM kg minus 2.772 kg additives. C content of wood is 0.494 kgC/kg dry wood (ecoinvent v2.2 report 9)
  property heating value, net 1954.67 MJ
    Assumed equal to "fiberboard, hard".The property is based on a value of 13.96MJ/kg
  property carbon content 0.496843
    carbon content on a dry matter basis (reserved; not for manual entry)
  properties: dry mass 130.841 kg, water content 0.07, wet mass 140 kg, water in wet mass 9.15888 kg, carbon allocation 65.0075 kg

## Inputs from technosphere
- tap water: 307 kg; name tap_water_input
  properties: dry mass 0.000337476 kg, UVEK_link_1 4284, wet mass 1 kg, water content 2962.17, carbon content, fossil 0.00178991, UVEK_relative_amount_1 1
  note on UVEK_link_1: to be used only in special submissions in coordination with ecoinvent and the Swiss FOEN
  note on carbon content, fossil: Bicarbonate content is 2.93 mol/m3. CO2 content is 0.1 mol/m3 (ecoinvent v2.2 report 8, Tab 93.1).
- furnace, wood chips, with silo, 1000kW: 4.54007e-6 unit; = 2.9333E-08*wood_fuel/1.05; lognormal variance with pedigree 0.558, pedigree (1,1,4,1,1)
  Infrastructure factor from DS 'Heat, district or industrial, other than natural gas {CH}| heat production, wood chips from industry, at furnace 1000kW | Cut-off, U', multiplied by the input of wood fuel (direct wood fuel plus production residues); correction for assumed efficiency as original value refers to heat output
  properties: UVEK_link_1 999999, UVEK_relative_amount_1 1
- wood ash mixture, pure: -0.103185 kg; name w_wood_ash; = (0.000666666666666667*wood_fuel/1.05)*-1; lognormal variance with pedigree 0.0336, pedigree (2,1,4,1,1)
  Emission factor from DS on heat generation from industrial residual wood mulitplied by the input of wood fuel (direct wood fuel plus production residues), scaled to convert wood input to resulting heat.
  production volume 20616.3 kg; = w_wood_ash*RP_PV
    Calculated from production volume of reference product using the relative outputs.
  properties: carbon content, non-fossil 0.012, UVEK_link_3 1129, UVEK_relative_amount_3 -1, UVEK_link_1 1128, wet mass 1 kg, dry mass 1 kg, UVEK_link_2 1127
- aluminium sulfate, powder: 0.00476 kg
  properties: UVEK_link_8 4416, dry mass 1 kg, wet mass 1 kg, UVEK_relative_amount_1 1, UVEK_link_1 158
  note on UVEK_link_8: This link has been introduced to model transport specifically for the SAM model; to be used only in special submissions in coordination with ecoinvent and the Swiss FOEN.
- electricity, medium voltage: 79.8 kWh
  properties: UVEK_relative_amount_1 1, UVEK_link_1 1710
- wood chips, dry, measured as dry mass: 139.05 kg
  property water content 0.4; name water_content
  property dry mass 1 kg; name DM
  property carbon content, non-fossil 0.494; name C_content_non_fossil
  property wet mass 1.4 kg; name WM
  property water in wet mass 0.4 kg; name WWM
  properties: heating value, net 9.99 MJ
- municipal solid waste: -2.26 kg; name MSW; lognormal variance with pedigree 0.0336, pedigree (2,1,4,1,1)
  production volume 451548 kg; name MSW_PV; = MSW*RP_PV/RP
    Calculated from the production volume of fibreboard, soft in proportion to the respective output amounts.
  properties: carbon content, non-fossil 0.261655, UVEK_link_1 1004, carbon content, fossil 0.171549, dry mass 0.771 kg, wet mass 1 kg, UVEK_relative_amount_1 -1, heating value, net 11.74 MJ, water content 0.297017
  note on carbon content, non-fossil: MSW composition in tab 4.1, ecoinvent v2.2 report 13_I. C content referred to 1 kg DM
  note on heating value, net: Value taken from the general comment of the treatment dataset.
- heat, district or industrial, other than natural gas: 74.88 MJ
  heat production with heavy fuel oil
  properties: heating value, net 1 MJ, UVEK_link_1 2546, UVEK_relative_amount_1 1
- raw sewage sludge: -5.18 kg; name raw_sewage; lognormal variance with pedigree 0.0336, pedigree (2,1,4,1,1)
  production volume 1.03496e6 kg; name raw_sewage_PV; = raw_sewage*RP_PV/RP
    (same comment as for municipal solid waste)
  properties: heating value, net 3.2 MJ, carbon content, non-fossil 0.4096, UVEK_link_1 1059, wet mass 1 kg, water content 19, UVEK_relative_amount_1 -1, dry mass 0.05 kg
- pulpwood, softwood, measured as solid wood under bark: 0.0024222 m3
  property heating value, gross 0 MJ; name pulpwood_Gross_Heat_Value
  property basic wood density 387.2; name pulpwood_basic_wood_d
  properties: water content 1.4, carbon content, non-fossil 0.494, heating value, net 4483.78 MJ, wet mass 1080 kg, dry mass 450 kg
  note on carbon content, non-fossil: C content of dry mass is 0.494 kgC/kg dry wood (ecoinvent v2.2 report 9)
  note on heating value, gross: gross (upper) heating (calorific) value; referring to 1 m3 solid wood as the reference flow, excluding bark
  note on heating value, net: Value based on "softwood forestry, mixed species, sustainable forest management"The property is based on a value of 11.58MJ/kg
- vinyl acetate: 2.1 kg
  properties: wet mass 1 kg, UVEK_relative_amount_1 1, dry mass 1 kg, heating value, net 25.35 MJ, carbon content, fossil 0.55814, UVEK_link_1 4822
  note on carbon content, fossil: Vinyl acetate (CH3CO2CH=CH2) (ecoinvent v2.2 report 11_II), C4H6O2. MW=86 g/mol
- heat, district or industrial, natural gas: 355.68 MJ
  properties: UVEK_link_1 2583, UVEK_relative_amount_1 1, heating value, net 1 MJ
- slab and siding, softwood, wet, measured as dry mass: 13.995 kg
  properties: carbon content, non-fossil 0.494, water content 0.7, dry mass 1 kg, wet mass 1.7 kg, heating value, net 7.79 MJ
- paraffin: 0.672 kg
  properties: heating value, net 41.5 MJ, UVEK_link_1 3381, carbon content, fossil 0.847059, wet mass 1 kg, dry mass 1 kg, UVEK_relative_amount_1 1
  note on heating value, net: Indicative value. Reference: Fuels - Higher and Lower Calorific Values, available at: https://www.engineeringtoolbox.com/fuels-higher-calorific-values-d_169.html
  note on carbon content, fossil: An average composition of C12H26 (molecular weight of 170 g/mol) was assumed for n-parafins, after ecoinvent v2.2 report 8, part II, pg 398
- wastewater from soft fibreboard production: -0.2148 m3; name wastewater_output; lognormal variance with pedigree 0.067, pedigree (1,4,5,1,1)
  production volume 42917 m3; name wastewater_output_PV; = wastewater_output*RP_PV/RP
    (same comment as for municipal solid waste)
  properties: wet mass 1000 kg, carbon content, non-fossil 0.999914, water content 22.098, UVEK_link_1 4596, dry mass 43.2938 kg, UVEK_relative_amount_1 -1
  note on carbon content, non-fossil: COD= 100 kg/m3 (Tab A.17, ecoinvent v2.2 report 13_I). COD was converted to TOC, using conversion factors in Tab 4.10 (ecoinvent v2.2 report 13_IV). TOC was considered as Total Carbon.
- wooden board factory, organic bonded boards: 6.6667e-9 unit; lognormal variance with pedigree 0.558, pedigree (1,1,4,1,1)
  Linking to specific geographical region where infrastructure is located
- inert waste, for final disposal: -0.0426 kg; name inert_waste; lognormal variance with pedigree 0.0336, pedigree (2,1,4,1,1)
  production volume 8511.48 kg; name inert_waste_PV; = inert_waste*RP_PV/RP
    (same comment as for municipal solid waste)
  properties: UVEK_link_1 969, water content 0.00502513, dry mass 0.995 kg, wet mass 1 kg, UVEK_relative_amount_1 -1

## Inputs from nature
- Water, cooling, unspecified natural origin [natural resource, in water]: 0.807 m3; name water_cooling_UNO_input

## Emissions to nature
- Hydrocarbons, aliphatic, alkanes, unspecified [air, unspecified]: 0.000187796 kg; = 1.21333333333333E-06*wood_fuel/1.05; lognormal variance with pedigree 0.2412, pedigree (2,3,5,1,1)
  Emission factor from DS 'Heat, district or industrial, other than natural gas {CH}| heat production, wood chips from industry, at furnace 1000kW | Cut-off, U' on heat generation from industrial residual wood per MJ, multiplied by the input of wood fuel (direct wood fuel plus production residues ) scaled to reflect wood input per generated heat.
- Water [air, unspecified]: 0.444723 m3; name water_to_air_unspecified; = (tap_water_input/1000*fraction_TW_to_air)+(water_cooling_UNO_input*fraction_CW_to_air); lognormal variance with pedigree 0.2087, pedigree (2,2,4,1,1)
  Calculated value based on literature values and expert opinion. See comments in the parametres' comment field.
  property fraction, origin: fresh water 0.296837; name fraction_origin_fresh_water
  property fraction, origin: unspecified 0.703163; name fraction_origin_unspecified
  property fraction, origin: salt water 0; name fraction_origin_salt_water
- Copper [air, unspecified]: 4.54012e-6 kg; = 2.93333333333334E-08*wood_fuel/1.05; lognormal variance with pedigree 0.2412, pedigree (2,3,5,1,1)
  (same comment as for Hydrocarbons, aliphatic, alkanes, unspecified)
- Formaldehyde [air, unspecified]: 2.6828e-5 kg; = 1.73333333333334E-07*wood_fuel/1.05; lognormal variance with pedigree 0.2412, pedigree (2,3,5,1,1)
  (same comment as for Hydrocarbons, aliphatic, alkanes, unspecified)
- Benzene [air, unspecified]: 0.000187796 kg; = 1.21333333333333E-06*wood_fuel/1.05; lognormal variance with pedigree 0.2412, pedigree (2,3,5,1,1)
  (same comment as for Hydrocarbons, aliphatic, alkanes, unspecified)
- Chromium VI [air, unspecified]: 8.25477e-9 kg; = 5.33333333333334E-11*wood_fuel/1.05; lognormal variance with pedigree 0.8412, pedigree (2,3,5,1,1)
  (same comment as for Hydrocarbons, aliphatic, alkanes, unspecified)
- Potassium [air, unspecified]: 0.00482904 kg; = 0.0000312*wood_fuel/1.05; lognormal variance with pedigree 0.2412, pedigree (2,3,5,1,1)
  (same comment as for Hydrocarbons, aliphatic, alkanes, unspecified)
- Zinc [air, unspecified]: 6.19108e-5 kg; = 0.0000004*wood_fuel/1.05; lognormal variance with pedigree 0.8412, pedigree (2,3,5,1,1)
  (same comment as for Hydrocarbons, aliphatic, alkanes, unspecified)
- PAH, polycyclic aromatic hydrocarbons [air, unspecified]: 2.2907e-6 kg; name pah; = 0.0000000148*wood_fuel/1.05; lognormal variance with pedigree 0.5912, pedigree (2,3,5,1,1)
  (same comment as for Hydrocarbons, aliphatic, alkanes, unspecified)
- Sulfur dioxide [air, unspecified]: 0.000515923 kg; = 3.33333333333334E-06*wood_fuel/1.05; lognormal variance with pedigree 0.0662, pedigree (2,3,5,1,1)
  (same comment as for Hydrocarbons, aliphatic, alkanes, unspecified)
- Magnesium [air, unspecified]: 7.42929e-5 kg; name magnesium; = 0.00000048*wood_fuel/1.05; lognormal variance with pedigree 0.2412, pedigree (2,3,5,1,1)
  (same comment as for Hydrocarbons, aliphatic, alkanes, unspecified)
- Hydrocarbons, aliphatic, unsaturated [air, unspecified]: 0.000639745 kg; = 4.13333333333333E-06*wood_fuel/1.05; lognormal variance with pedigree 0.2412, pedigree (2,3,5,1,1)
  (same comment as for Hydrocarbons, aliphatic, alkanes, unspecified)
- Toluene [air, unspecified]: 6.19108e-5 kg; = 0.0000004*wood_fuel/1.05; lognormal variance with pedigree 0.3912, pedigree (2,3,5,1,1)
  (same comment as for Hydrocarbons, aliphatic, alkanes, unspecified)
- Sodium [air, unspecified]: 0.00026828 kg; = 1.73333333333334E-06*wood_fuel/1.05; lognormal variance with pedigree 0.2412, pedigree (2,3,5,1,1)
  (same comment as for Hydrocarbons, aliphatic, alkanes, unspecified)
- Carbon monoxide, non-fossil [air, unspecified]: 0.0619108 kg; = 0.0004*wood_fuel/1.05; lognormal variance with pedigree 0.2412, pedigree (2,3,5,1,1)
  (same comment as for Hydrocarbons, aliphatic, alkanes, unspecified)
- Manganese [air, unspecified]: 3.50828e-5 kg; name manganese; = 2.26666666666667E-07*wood_fuel/1.05; lognormal variance with pedigree 0.2412, pedigree (2,3,5,1,1)
  (same comment as for Hydrocarbons, aliphatic, alkanes, unspecified)
- Cadmium [air, unspecified]: 1.44458e-7 kg; = 9.33333333333334E-10*wood_fuel/1.05; lognormal variance with pedigree 0.8412, pedigree (2,3,5,1,1)
  (same comment as for Hydrocarbons, aliphatic, alkanes, unspecified)
- Arsenic [air, unspecified]: 2.06369e-7 kg; = 1.33333333333333E-09*wood_fuel/1.05; lognormal variance with pedigree 0.2412, pedigree (2,3,5,1,1)
  (same comment as for Hydrocarbons, aliphatic, alkanes, unspecified)
- Bromine [air, unspecified]: 1.23822e-5 kg; = 0.00000008*wood_fuel/1.05; lognormal variance with pedigree 0.8412, pedigree (2,3,5,1,1)
  (same comment as for Hydrocarbons, aliphatic, alkanes, unspecified)
- Particulates, > 10 um [air, urban air close to ground]: 0.00542 kg; lognormal variance with pedigree 0.208, pedigree (1,1,4,1,1)
  dust emissions
- Carbon dioxide, non-fossil [air, unspecified]: 22.0815 kg; = 0.142666666666666*wood_fuel/1.05; lognormal variance with pedigree 0.0662, pedigree (2,3,5,1,1)
  (same comment as for Hydrocarbons, aliphatic, alkanes, unspecified)
- Ammonia [air, unspecified]: 0.000357019 kg; = 2.30666666666667E-06*wood_fuel/1.05; lognormal variance with pedigree 0.2412, pedigree (2,3,5,1,1)
  (same comment as for Hydrocarbons, aliphatic, alkanes, unspecified)
- Particulates, > 2.5 um, and < 10um [air, unspecified]: 0.000515923 kg; = 3.33333333333334E-06*wood_fuel/1.05
  (same comment as for Hydrocarbons, aliphatic, alkanes, unspecified)
- Lead [air, unspecified]: 5.15923e-6 kg; = 3.33333333333333E-08*wood_fuel/1.05; lognormal variance with pedigree 0.8412, pedigree (2,3,5,1,1)
  (same comment as for Hydrocarbons, aliphatic, alkanes, unspecified)
- Calcium [air, unspecified]: 0.00120726 kg; = 0.0000078*wood_fuel/1.05; lognormal variance with pedigree 0.2412, pedigree (2,3,5,1,1)
  (same comment as for Hydrocarbons, aliphatic, alkanes, unspecified)
- Particulates, < 2.5 um [air, unspecified]: 0.00928662 kg; = 0.0000600000000000001*wood_fuel/1.05; lognormal variance with pedigree 0.5912, pedigree (2,3,5,1,1)
  (same comment as for Hydrocarbons, aliphatic, alkanes, unspecified)
- Fluorine [air, unspecified]: 1.03185e-5 kg; = 6.66666666666667E-08*wood_fuel/1.05; lognormal variance with pedigree 0.2412, pedigree (2,3,5,1,1)
  (same comment as for Hydrocarbons, aliphatic, alkanes, unspecified)
- NMVOC, non-methane volatile organic compounds, unspecified origin [air, unspecified]: 0.00637458 kg; name nmvoc; = 9.33333333333334E-06*wood_fuel/1.05+0.00493; lognormal variance with pedigree 0.2412, pedigree (2,3,5,1,1)
  Emission factor from DS 'Heat, district or industrial, other than natural gas {CH}| heat production, wood chips from industry, at furnace 1000kW | Cut-off, U' on heat generation from industrial residual wood per MJ, multiplied by the input of wood fuel (direct wood fuel plus production residues ) scaled to reflect wood input per generated heat plus estimated emissions from wood and glue drying processes (company specific data).
- Chlorine [air, unspecified]: 3.71465e-5 kg; = 0.00000024*wood_fuel/1.05; lognormal variance with pedigree 0.2412, pedigree (2,3,5,1,1)
  (same comment as for Hydrocarbons, aliphatic, alkanes, unspecified)
- Acetaldehyde [air, unspecified]: 1.25885e-5 kg; = 8.13333333333333E-08*wood_fuel/1.05; lognormal variance with pedigree 0.2412, pedigree (2,3,5,1,1)
  (same comment as for Hydrocarbons, aliphatic, alkanes, unspecified)
- Phosphorus [air, unspecified]: 6.19108e-5 kg; = 0.0000004*wood_fuel/1.05; lognormal variance with pedigree 0.2412, pedigree (2,3,5,1,1)
  (same comment as for Hydrocarbons, aliphatic, alkanes, unspecified)
- Dinitrogen monoxide [air, unspecified]: 0.000474649 kg; = 3.06666666666667E-06*wood_fuel/1.05; lognormal variance with pedigree 0.2412, pedigree (2,3,5,1,1)
  (same comment as for Hydrocarbons, aliphatic, alkanes, unspecified)
- Water [water, unspecified]: 0.454477 m3; name water_to_water_unspecified; = (tap_water_input/1000)*(1-fraction_TW_to_air)+water_cooling_UNO_input*(1-fraction_CW_to_air)-(wastewater_output*-1); lognormal variance with pedigree 0.2087, pedigree (2,2,4,1,1)
  (same comment as for Water)
  property fraction, origin: fresh water 0.261461; name fraction_origin_fresh_water_Ww
  property fraction, origin: unspecified 0.738539; name fraction_origin_unspecified_Ww
  property fraction, origin: salt water 0; name fraction_origin_salt_water_Ww
- Benzene, ethyl- [air, unspecified]: 6.19108e-6 kg; = 0.00000004*wood_fuel/1.05; lognormal variance with pedigree 0.2412, pedigree (2,3,5,1,1)
  (same comment as for Hydrocarbons, aliphatic, alkanes, unspecified)
- Methane, non-fossil [air, unspecified]: 0.000619108 kg; = 0.000004*wood_fuel/1.05; lognormal variance with pedigree 0.2412, pedigree (2,3,5,1,1)
  (same comment as for Hydrocarbons, aliphatic, alkanes, unspecified)
- Benzo(a)pyrene [air, unspecified]: 1.03185e-7 kg; = 6.66666666666667E-10*wood_fuel/1.05; lognormal variance with pedigree 0.5912, pedigree (2,3,5,1,1)
  (same comment as for Hydrocarbons, aliphatic, alkanes, unspecified)
- Chromium [air, unspecified]: 8.17222e-7 kg; = 5.28000000000001E-09*wood_fuel/1.05; lognormal variance with pedigree 0.8412, pedigree (2,3,5,1,1)
  (same comment as for Hydrocarbons, aliphatic, alkanes, unspecified)
- Dioxins, measured as 2,3,7,8-tetrachlorodibenzo-p-dioxin [air, unspecified]: 6.39745e-12 kg; = 4.13333333333333E-14*wood_fuel/1.05; lognormal variance with pedigree 0.5912, pedigree (2,3,5,1,1)
  (same comment as for Hydrocarbons, aliphatic, alkanes, unspecified)
- Benzene, hexachloro- [air, unspecified]: 1.48586e-12 kg; = 9.60000000000001E-15*wood_fuel/1.05; lognormal variance with pedigree 0.2412, pedigree (2,3,5,1,1)
  (same comment as for Hydrocarbons, aliphatic, alkanes, unspecified)
- Nitrogen oxides [air, unspecified]: 0.0464331 kg; = 0.0003*wood_fuel/1.05; lognormal variance with pedigree 0.2412, pedigree (2,3,5,1,1)
  (same comment as for Hydrocarbons, aliphatic, alkanes, unspecified)
- Nickel [air, unspecified]: 1.23822e-6 kg; name nickel; = 0.000000008*wood_fuel/1.05; lognormal variance with pedigree 0.8412, pedigree (2,3,5,1,1)
  (same comment as for Hydrocarbons, aliphatic, alkanes, unspecified)
- Mercury [air, unspecified]: 6.19108e-8 kg; name mercury; = 0.0000000004*wood_fuel/1.05; lognormal variance with pedigree 0.8412, pedigree (2,3,5,1,1)
  (same comment as for Hydrocarbons, aliphatic, alkanes, unspecified)
- Phenol, pentachloro- [air, unspecified]: 1.67159e-9 kg; = 0.0000000000108*wood_fuel/1.05; lognormal variance with pedigree 0.3912, pedigree (2,3,5,1,1)
  (same comment as for Hydrocarbons, aliphatic, alkanes, unspecified)
- m-Xylene [air, unspecified]: 2.47643e-5 kg; name mxylene; = 0.00000016*wood_fuel/1.05; lognormal variance with pedigree 0.3912, pedigree (2,3,5,1,1)
  (same comment as for Hydrocarbons, aliphatic, alkanes, unspecified)

## Sampling procedure
plant data

## Extrapolations
This dataset has been extrapolated from year 2009 to the year of the calculation (2021). The uncertainty has been adjusted accordingly.
