# photovoltaic module production, building-integrated, for slanted-roof installation

Dataset: EcoSpold 2, unit process
Geography: RoW
Time period: 1992-01-01 to 2021-12-31
Technology level: current
Classification: ISIC rev.4 ecoinvent: 4390:Other specialized construction activities
Tags: infrastructure; photovoltaic power
Scenario: Business-as-Usual
System model: Allocation, cut-off by classification
Generated by: [System]
Published in: Jungbluth N. 2012
Database: ecoinvent
isCopyrightProtected: true
accessRestrictedTo: 1

## General comment
This dataset represents the production of the structural components necessary for the integration of 1 m2 photovoltaic laminate on a slanted roof. The search for material efficient and aesthetic mounting of solar laminates has lead to the idea of integrating the laminates directly in the roof construction instead of mounting them above it. Thus, the PV-plants do not only produce electricity, but also replace roof tiles. This allows to use frameless laminates instead of framed panels, which further reduces the amount of necessary materials.

## Included activities start
From delivery of the needed materials and parts.

## Included activities end
This activity ends with the installed mounting structure.

This dataset includes
- Materials and packaging for the production
- Energy use for the metal processing.

This dataset doesn't include the energy use for the mounting process itself. This must be included in data for the PV-plant, where all necessary components (panel/laminate, mounting structure, inverter etc.) are assembled and mounted on the building.

## Technology
Construction process: The roof tiles are removed in the area foreseen for the solar laminates. Then steel profiles are screwed to the tile slats . Different aluminium profiles are used to make a frame for the laminate. A rubber is attached to these profiles. The laminates are placed within these frames and connected to the electric system. All edges are closed with rubber or silicones. Steel sheets are mounted at the gap be-tween roof tiles and solar laminates.

## Time period
The calculation of the annual production volume of the reference product is based on data from 2008. It does not represent an average of the time period 1992-2008.

## Parameters
- amount of panel needed per kWp installed capacity: 7.7914 m2; name panel_area_per_kWp; = (0.345*21.4+0.525*22.1+0.03*24+0.047*46.5+0.048*27.7+0.006*25.6)/(capacity*1000); lognormal variance with pedigree 0.012, pedigree (3,3,2,4,3)
  Literature value/calculated value. Weighted average of values for the different cell types given in Tab. 12.3 in Jungbluth et al. 2012. Weighting factor taken from Tab. 14.6.
- share of slanted roof installations, laminated, integrated, on roof: 0.025 dimensionless; name share_slantedroof_laminate; lognormal variance with pedigree 0.0208, pedigree (4,4,2,5,3)
  Literature value. Tab. 14.7, p. 146 in Jungbluth et al. 2012. Shares from european conditions taken for this global dataset.
- Installed capacity: 5490 MW; name capacity_installed; lognormal variance with pedigree 0.0962, pedigree (4,2,5,3,3)
  Literature value. New installed grid-connected photovoltaic capacity in 2008
  IEA. 2009. Trends in Photovoltaic Applications:Survey report of selected IEA countries between 1992 and 2008. International Energy Agency (IEA), Report IEA-PVPS T1-18:2009, Paris Cedex (FR)
  Uncertainty: 1) This value is valid for 2008 and gives not any average over the time span 1992-2008.
  2) The given value for new installed grid-connected capacity in 2008 is too low, which is considered in the uncertainty.
  Investigations for the year 2009 showed the following figures:
  - Total installed capacity in 2009 (on- and offgrid or not specified in the sources): 14560MWp GLO, out of it 7450MWp installed in 2009.
  Source: Data from 30 countries (AU,AT, BE, CA, CN, CZ, DK, FI, FR, DE, GR, HU, IN, IT, JP, LU, MY, MX, NL, PT, SI, ZA, KR, ES, SE, CH, TW, TH, GB, US) and 4 sources: [1] [IEA, 2010. Trends in Photovoltaic Applications:Survey report of selected IEA countries between1992 and 2009. International Energy Agency, Report IEA-PVPS T1-19:2010]; [2] [Eurobserver, 2010. Photovoltaic barometer. Systèmes Solaires - le journal du photovoltaïque; Baromètre Photovoltaïque - Eurobserver Nr.3, avril 2010. ]; [3] [Eurobserver, 2011. Photovoltaic barometer. Systèmes Solaires - le journal du photovoltaïque; Baromètre Photovoltaïque - Eurobserver Nr.5, avril 2011.]; [4] [EPIA.Global Market Outlook for Photovoltaics until 2015. European Photovoltaic Industry Association.]
  - Total installed new capacity in 2009, total: 6188 MW (21 countries) [IEA. 2010. Trends in Photovoltaic Applications:Survey report of selected IEA countries between1992 and 2009. International Energy Agency (IEA), Report IEA-PVPS T1-19:2010, Paris Cedex (FR)]
  - New on-grid capacity in 2009: 6113 MW (21 countries) [IEA. 2010. Trends in Photovoltaic Applications:Survey report of selected IEA countries between1992 and 2009. International Energy Agency (IEA), Report IEA-PVPS T1-19:2010, Paris Cedex (FR)]
  This gives a factor of 7447/6188=1.2 between the sources.
- share open ground installations, multi-Si, on open ground, total: 0.351918 dimensionless; name pv_openground_total; lognormal variance with pedigree 0.1782, pedigree (4,5,2,5,5)
  Literature value, calculated value. The shares of the different types of cells and mounting systems are taken from Jungbluth N. et al. (2012)and adapted for GLO for open ground PV plants. According to IEA (2009), there were 35.19% grid-connected centralized PV power plants globally. It is assumed that all centralized PV power plants are open ground plants.
  Sources:
  - Jungbluth N., Stucki M., Flury K., Frischknecht R. and Buesser S. (2012) Life Cycle Inventories of Photovoltaic Power Production. ESU-services Ltd., Uster, CH, retrieved from: www.esu-services.ch/data/public-lci-reports/ <http://www.esu-services.ch/data/public-lci-reports
  - IEA. 2009. Trends in Photovoltaic Applications:Survey report of selected IEA countries between1992 and 2008. International Energy Agency (IEA), Report IEA-PVPS T1-18:2009, Paris Cedex (FR)
- capacity: 0.003 MW; lognormal variance with pedigree 0.0006, pedigree (1,1,1,1,1)

## Reference product
- photovoltaic module, building-integrated, for slanted-roof installation: 1 m2; By-product classification allocatable product; CPC 87360: Installation services of electrical machinery and apparatus n.e.c.
  EcoSpold01Location=RER
  production volume 692432 m2; name apv_slantedroof_laminate; = (capacity_installed*1000)* (1- pv_openground_total)* share_slantedroof_laminate* panel_area_per_kWp
    Calculated value.
    It is assumed that this value ist the same as the number of installed 3kWp plants of this type. Data on new installed capacity of 3kWp PV plants are valid for 2008.
  property price 5.63305 EUR2005
    Calculated based on inputs: The price of the product has been calculated as a sum of the values of the material and energy inputs for this product. This value is therefore a rough estimation. It may underestimate the real price since there are additional expenses when producing any product. These expences can include for example labour costs, treatment of waste materials and profit for the producer. Please consider carefully whether this level of data quality is acceptable for your application.

## By-products
- waste paperboard, unsorted: 0 kg; By-product classification Recyclable; CPC 39240: Waste and scrap of paper or paperboard; pedigree (1,1,1,1,1)
  EcoSpold01Location=CH
  Calculated value
  Uncertainty: Calculated with use
  production volume 0 kg; = waste_cardboard* apv_slantedroof_laminate
    Calculated from the production volume of photovoltaic slanted-roof construction, integrated, on roof in proportion to the respective output amounts.
  property carbon content, non-fossil 0.483259
    C content was calculated for 1 kg DM, using data in Tab A.3, ecoinvent v2.2 report 13_I.
  property price 0.03924 EUR2005; name waste_cardboard_price_EUR2005
    Temporary price data. Calculated as 90% of purchasers price based on: Assumed to be 10% less than for sorted waste paperboard
  property carbon content 0.483259
    carbon content on a dry matter basis (reserved; not for manual entry)
  properties: carbon content, fossil 0, water in wet mass 0.196 kg, water content 0.243781, dry mass 0.804 kg, wet mass 1 kg, heating value, net 15.92 MJ, carbon allocation 0.38854 kg

## Inputs from technosphere
- section bar rolling, steel: 0.20047 kg; = steel_low_hot; lognormal variance with pedigree 0.204, pedigree (3,4,5,5,3)
  Calculated value
  EcoSpold01Location=RER
  Uncertainty: Brunschweiler 1993
- synthetic rubber: 1.244 kg; name rubber; lognormal variance with pedigree 0.1721, pedigree (1,2,5,5,1)
  Literature and own estimations. A rubber is attached to the aluminium profiles. All edges are closed with rubber or silicones. Rounded values in the reference table.
  EcoSpold01Location=RER
  properties: heating value, net 26.42 MJ, wet mass 1 kg, dry mass 1 kg, carbon content, fossil 0.871949
  note on carbon content, fossil: EPDM (Ethylene-propene-diene terpolymer) rubber is a terpolymer of ethylene, propene, and a diene with the residual unsaturated portion of the diene in the side chain (ecoinvent v2.2 report 7-part XX & Ullmann). Chemical formula (deduced from Evidences of Solvent-Induced Miscibility in Polychloroprene-co-Ethylene-Propene Diene Terpolymer Blends, Dubey et al., Journal of Applied Polymer Science, 2009, 111:1884–1891): C20H35
- waste polystyrene isolation, flame-retardant: -0.0060154 kg; name waste_polystyrene; = (polystyrene)*-1; lognormal variance with pedigree 0.204, pedigree (3,4,5,5,3)
  EcoSpold01Location=CH
  Calculated value
  Uncertainty: Disposal of plastics parts at end of life
  production volume 4165.25 kg; = waste_polystyrene* apv_slantedroof_laminate
    (same comment as for waste paperboard, unsorted)
  property price 0 EUR2005; name waste_polystyrene_price_EUR2005
  properties: wet mass 1 kg, heating value, net 38.67 MJ, water content 0.00199232, carbon content, fossil 0.918145, dry mass 0.998012 kg
  note on carbon content, fossil: Polystyrene isolation (EPS) is flame-retarded with hexa-bromo-cyclo-dodecan (C12H18Br6) and contains 0.67 w% bromine (ecoinvent v2.2 report 13_I, pg 39). The rest is polystyrene: (C8H8)n.
- section bar extrusion, aluminium: 2.2482 kg; = aluminium_wrought; lognormal variance with pedigree 0.204, pedigree (3,4,5,5,3)
  Calculated value
  EcoSpold01Location=RER
  Uncertainty: Estimation
- polyethylene, high density, granulate: 0.028183 kg; name hdpe; lognormal variance with pedigree 0.1721, pedigree (1,2,5,5,1)
  Literature and own estimations, recycled PE. Rounded values in the reference table.
  EcoSpold01Location=RER
  properties: wet mass 1 kg, heating value, net 42.47 MJ, carbon content, fossil 0.857143, dry mass 1 kg
  note on carbon content, fossil: Polyethylene is formed out of a huge amount of ethylene monomers (C2H4) (ecoinvent v2.2 report 11_II). MW=28 g/mol
- scrap aluminium: -2.2482 kg; name scrap_aluminium; = (aluminium_wrought)*-1
  Calculated value
  production volume 1.55809e6 kg; = scrap_aluminium* apv_slantedroof_laminate
    Calculated from production volume of reference product using the relative outputs.
  property price 0 EUR2005; name scrap_aluminium_price_EUR2005
  property lifetime 30 year; name lifetime
  properties: wet mass 1 kg, dry mass 1 kg
- waste polyethylene/polypropylene product: -1.29056 kg; name waste_polyethy; = (hdpe+ rubber+ polyurethane)*-1; lognormal variance with pedigree 0.204, pedigree (3,4,5,5,3)
  Calculated value
  EcoSpold01Location=CH
  Uncertainty: Disposal of plastics parts at end of life
  production volume 893627 kg; = waste_polyethy* apv_slantedroof_laminate
    (same comment as for waste paperboard, unsorted)
  property price 0 EUR2005; name waste_polyethy_price_EUR2005
  properties: dry mass 0.847 kg, wet mass 1 kg, carbon content, fossil 0.748045, water content 0.180638, heating value, net 42.47 MJ
  note on carbon content, fossil: Mixed various plastics was used to estimate the C content of this waste (Tab A.2, ecoinvent v2.2 report 13_I)
- scrap steel: -0.20047 kg; name scrap_steel; = (steel_low_hot)*-1
  Calculated value
  production volume 138934 kg; = scrap_steel* apv_slantedroof_laminate
    Calculated from production volume of reference product using the relative outputs.
  property price 0 EUR2005; name scrap_steel_price_EUR2005
  properties: dry mass 1 kg, wet mass 1 kg, lifetime 30 year
- corrugated board box: 0 kg; name cardboard; source Schwarz U. 1992; pedigree (1,1,1,1,1)
  EcoSpold01Location=RER
  Literature value. Packaging material
  properties: water content 0.0582011, dry mass 0.945 kg, carbon content, non-fossil 0.432275, wet mass 1 kg, carbon content, fossil 0.000656085, heating value, net 12.86 MJ
  note on carbon content, non-fossil: Biogenic C content was calculated after biogenic C contents of chemicals used in the production of board (Tab 10.15 & 10.16, ecoinvent v2.2 report 11_III, part 10).
  note on carbon content, fossil: Fossil C content was calculated after fossil C contents of chemicals used in the production of board (Tab 10-15 & 10.16 ecoinvent v2.2 report 11_III, part 10)
- polystyrene, high impact: 0.0060154 kg; name polystyrene; source Schwarz U. 1992; lognormal variance with pedigree 0.204, pedigree (3,4,5,5,3)
  EcoSpold01Location=RER
  Literature value. Packaging material, considered from Schwarz&Keller 1992 with a correction factor (see Jungbluth et al. 2012, p.91 and p.127)
  properties: heating value, net 38.67 MJ, dry mass 1 kg, carbon content, fossil 0.923077, wet mass 1 kg
  note on carbon content, fossil: Chemical formula of polystyrene is (C8H8)n (ecoinvent v2.2 report 11_II)
- aluminium, wrought alloy: 2.2482 kg; name aluminium_wrought; source Siemer J. 2008; lognormal variance with pedigree 0.1721, pedigree (1,2,5,5,1)
  EcoSpold01Location=RER
  Literature and own estimations. Different aluminium profiles are used to make a frame for the laminate.
  properties: wet mass 1 kg, dry mass 1 kg
- steel, low-alloyed, hot rolled: 0.20047 kg; name steel_low_hot; lognormal variance with pedigree 0.1721, pedigree (1,2,5,5,1)
  EcoSpold01Location=RER
  Literature and own estimations. Used for the steel profiles. Rounded values in the reference table.
  properties: dry mass 1 kg, wet mass 1 kg, carbon content, fossil 0.005
  note on carbon content, fossil: Low alloyed steel composition given in Tab. 3.2 ecoinvent v2.2 report 10_partII. Steel assumed to have a C content of 0.5%
- polyurethane, flexible foam: 0.01838 kg; name polyurethane; lognormal variance with pedigree 0.1721, pedigree (1,2,5,5,1)
  Literature and own estimations. Rounded values in the reference table.
  EcoSpold01Location=RER
  properties: dry mass 1 kg, wet mass 1 kg, carbon content, fossil 0.633827, heating value, net 30.67 MJ
  note on carbon content, fossil: Polyurethanes (PUR) is the collective name for an extensive group of polymers with very different compositions and correspondingly varied property profiles, though their molecule chain contains all a urethane group (-NH-CO-O-). All PURs are built on a common principle : they are produced by the diisocyanate polyaddition process, that links polyols and (di)isocyanates. In this dataset, an example of typical polyurethane mixture is described (Ullmann, Polyurethanes, Dieterich et al. & ecoinvent v2 report 11_II). C content was calculated as an addition of C contents in its components.
- waste paperboard, unsorted: -0.11429 kg; lognormal variance with pedigree 0.204, pedigree (3,4,5,5,3)
  EcoSpold01Location=CH
  Calculated value
  Uncertainty: Calculated with use
  production volume 79138 kg
  properties: water content 0.243781, carbon content, non-fossil 0.483259, dry mass 0.804 kg, wet mass 1 kg, heating value, net 15.92 MJ
  note on carbon content, non-fossil: C content was calculated for 1 kg DM, using data in Tab A.3, ecoinvent v2.2 report 13_I.
- corrugated board box: 0.00132967, 0.11296 kg (2 entries); source Schwarz U. 1992; lognormal variance with pedigree 0.204, pedigree (3,4,5,5,3)
  EcoSpold01Location=RER
  Literature value. Packaging material

## Sampling procedure
Detailed analysis of materials for one product in a diploma thesis.

## Extrapolations
This type of mounting system is described by only one possible example. A market survey for mounting systems has been published by Siemer (2003; 2006; 2007; 2008). In this survey the total weight of several dozen of different mounting systems is reported without providing more detailed information on the type of materials used. In order to achieve an average weight for this type of mounting system, the weights of the different mounting system models were weighted by their installed capacity in Europe.

The different types of mounting systems were described in a handbook for tilers <Prinz et al. 1992>. The examples for slanted roof and façade plants have been investigated for singlecrystalline cells. The average consumption of packaging material for the finished PV plants is calculated with a correction factor from this old information, which accounts for the average weight of 1992-2008 installations (for further information see p.91 and p.127 in Jungbluth et al. 2012)

This dataset has been copied from an original dataset covering the geography RER. The uncertainty has been adjusted accordingly.
The calculation of the annual production volume of the reference product is based on data from 2008.

Sources:
- Siemer J. (2003) Für jedes Dach den passenden Deckel. In: Photon, Vol. 2003, retrieved from: www.photon.de
- Siemer J. (2006) Arbeit an der Schnittstelle. In: Photon, Vol. 2006, retrieved from: www.photon.de.
- Siemer J. (2007) Konkurrenz belebt das Geschäft. In: Photon, Vol. 2007, re-trieved from: www.photon.de.
- Siemer J. (2008) Debütantenball - Marktübersicht Montagesysteme 2008. In: Photon, Vol. 2008, retrieved from: www.photon.de.
- H. Prinz, M. Real, W. Müller et al. „Photovoltaics für Dachdecker - Grundlagen, Systemübersicht and Ausführung“, (Vernehmlassungsausgabe 20. 11.1992), Bundesamt für Konjunkturfragen, (BfK) Programm „PACER“

## Review by Christian Bauer 2009-02-15
Passed.
none

## Review by Carl Vadenbo 2012-03-22
The dataset were found to meet the quality guidelines for the ecoinvent database on 2012.04.10.

Improvements in the following areas/aspects are recommended for future revisions in order to strenghen the overall quality of the dataset:
-material losses during manufacturing.

## Review by Bo Weidema 2012-03-22
This dataset has only been reviewed by two editors.
