# rye production

Dataset: EcoSpold 2, unit process
Geography: RoW
Time period: 2002-01-01 to 2021-12-31
Technology level: current
Classification: ISIC rev.4 ecoinvent: 0111:Growing of cereals (except rice), leguminous crops and oil seeds
Synonyms: Secale cereale L.
Scenario: Business-as-Usual
System model: Allocation, cut-off by classification
Share of production covered: 100 %
Generated by: Jürgen Sutter
Published in: Jungbluth N. 2007
Database: ecoinvent
isCopyrightProtected: true
accessRestrictedTo: 1

## General comment
This dataset represents the cultivation of rye on an area of 1 ha producing the co-products rye grain and straw. The yield of rye grain is 3172 kg/ha at a moisture content at storage of 15%, the yield of straw is 2163 kg/ha at a moisture content of 15%.
[This dataset was already contained in the ecoinvent database version 2. It was not individually updated during the transfer to ecoinvent version 3. Life Cycle Impact Assessment results may still have changed, as they are affected by changes in the supply chain, i.e. in other datasets. This dataset was generated following the ecoinvent quality guidelines for version 2. It may have been subject to central changes described in the ecoinvent version 3 change report (http://www.ecoinvent.org/database/ecoinvent-version-3/reports-of-changes/), and the results of the central updates were reviewed extensively. The changes added e.g. consistent water flows and other information throughout the database. The documentation of this dataset can be found in the ecoinvent reports of version 2, which are still available via the ecoinvent website. The change report linked above covers all central changes that were made during the conversion process.]

## Included activities start
This activity starts after the harvest of the previous crop. The inputs of seeds, mineral fertilisers and pesticides are considered. It is assumed that no farm manure is applied.

## Included activities end
The dataset includes all machine operations and corresponding machine infrastructure and sheds. Machine operations are: soil cultivation, sowing, fertilisation, weed control, pest and pathogen control, combine-harvest, transport from field to regional processing centre (15 km) and drying of grains. Further, direct field emissions are included. This activity ends after drying of grains at the regional processing centre.

## Geography
The inventory is modelled for Europe.

## Technology
Conventional rye cultivation

## Time period
Time of publications.

## Parameters
- fraction, irrigation water, to ground water: 0.8 dimensionless; name fraction_IW_to_ground_water; lognormal variance with pedigree 0.0886, pedigree (4,3,1,1,4)
- fraction, irrigation water to surface water: 0.2 dimensionless; name fraction_IW_to_surface_water; lognormal variance with pedigree 0.0886, pedigree (4,3,1,1,4)
- fraction, irrigation water, to air: 0.586986 dimensionless; name fraction_IW_to_air; lognormal variance with pedigree 0.0409, pedigree (2,2,2,1,1)
- yield, agriculture: 3.172 metric ton/ha; name yield_agriculture
  amount (ton) of harvested agricultural products per hectare land.

## Reference product
- rye grain: 1 kg; name REF_PRODUCT; CPC 01162: Rye, other; By-product classification allocatable product
  Average annual yield in the European Union (years 2001-2005; FAOSTAT 2006). Retrieved from http://faostat.fao.org/faostat/ on May 16, 2006.
  production volume 1.53921e9 kg
    World production 2005 (FAOSTAT)
  property carbon content, non-fossil 0.465305; name REF_PRODUCT_C_content_non_fossil
    biogene carbon content on a dry matter basis
    Composition data obtained from Rye, in (http://www.nal.usda.gov/fnic/foodcomp/search/). First, composition data were refered to 1 kg dry mass. Then, C-contents were calculated considering a C-content/dry mass of 46% in carbohydrates (including fibres), 53% in proteins and 75% in fats. All data from 'Evolutionary and Biochemical Aspects', A.D. Kay and T. Vrede (in Global Ecology, 2010, Elsevier B.V., S.E. Jørgensen Ed.).
  property energy content 15.1895 MJ; name REF_PRODUCT_energy_content
    See chapter 'Product Properties' in '01_crop production - yields & inputs CH & Europe_v1.0.pdf', section 'AGRICULTURAL PRODUCTION IN SWITZERLAND' - pdf-document on the dedicated talk page of ecoinvent (www.ecoinvent.org/documentation)
  property price 0.109 EUR2005; name REF_PRODUCT_price_EUR2005
    Temporary price data. Calculated as 90% of purchasers price based on: 2004 prices for World import/export data (tonnes and US$) from FaoStat statistics (http://faostat.fao.org/site/535/default.aspx#ancor, TRADE)- [Accessed 24 May 2010].
  property dry mass 0.85 kg; name REF_PRODUCT_DM
  property carbon content 0.465305
    carbon content on a dry matter basis (reserved; not for manual entry)
  property true value 0.109; name REF_PRODUCT_true_value
    allocation property applied in "true value" allocation // value calculated from revenue
  properties: water in wet mass 0.15 kg, water content 0.176471, wet mass 1 kg, carbon content, fossil 0, carbon allocation 0.39551 kg

## By-products
- straw: 0 kg; name BY_PRODUCT; source Nemecek, T. 2004; CPC 01913: Cereal straw, husks, unprepared, ground, pressed, or in the form of pellets; By-product classification allocatable product
  Harvested mass of straw: 50% (Nemecek et al. 2004). Total mass of straw based on ratio grain/straw from Nemecek et al. (2004)
  production volume 1.0496e9 kg
    calculated from the proportion of 2163 kg straw to 3172 kg grain (per ha)
  property heating value, net 14.25 MJ
    Literature value, Source: Phyllis2, database for (treated) biomass, algae, feedstocks for biogas production and biochar, https://phyllis.nl/Biomass/View/1271, ECN.TNO
  property price 0.012 EUR2005; name BY_PRODUCT_price_EUR2005
    Temporary price data. Calculated as 90% of purchasers price based on: Based on price allocation ratio from EcoInvent v2 report number 17, page 118.
  property energy content 17.459 MJ; name BY_PRODUCT_energy_content
    (same comment as for rye grain)
  property carbon content, non-fossil 0.437377; name BY_PRODUCT_C_content_non_fossil
    biogene carbon content on a dry matter basis
    Composition data obtained as the average of those of Rye straw (http://beefmagazine.com/images/2009%20feed%20table.pdf), and Barley straw and Wheat straw (http://www.uwex.edu/ces/crops/uwforage/StrawFOF.pdf). First, composition data were refered to 1 kg dry mass. Then, C-contents were calculated considering a C-content/dry mass of 46% in carbohydrates (including fibres), 53% in proteins and 75% in fats. All data from 'Evolutionary and Biochemical Aspects', A.D. Kay and T. Vrede (in Global Ecology, 2010, Elsevier B.V., S.E. Jørgensen Ed.).
  property dry mass 0.85 kg; name BY_PRODUCT_DM
  property carbon content 0.437377
    carbon content on a dry matter basis (reserved; not for manual entry)
  property true value 0.00818172; name BY_PRODUCT_true_value
    allocation property applied in "true value" allocation // value calculated from revenue
  properties: wet mass 1 kg, carbon content, fossil 0, water content 0.176471, water in wet mass 0.15 kg, carbon allocation 0.37177 kg

## Inputs from technosphere
- lime: 0.293247 kg; source KTBL 2004; lognormal variance with pedigree 0.0426, pedigree (1,3,5,5,1)
  Amount of nutrient interpolated from nutrient requirements of rye depending on the yield given in KTBL (2004) for Germany,
  properties: carbon content, fossil 0.120005, dry mass 1 kg, wet mass 1 kg
- combine harvesting: 0.00011302 ha; source KTBL 2004; lognormal variance with pedigree 0.042, pedigree (1,1,5,5,1)
  Weighted average based on diesel consumption of rye cultivation in Germany (KTBL 2004; weight: 45.7%) and of wheat cultivation in Poland (Jungbluth 2006; weight: 54.3%). --- Sources: Jungbluth, Niels (2006) Life cycle inventory of wheat straw production in Europe. Personal communication.
- packaging, for pesticides: 0.00103374 kg; lognormal variance with pedigree 0.0912, pedigree (4,3,5,5,4)
  Total amount of active substance/s of pesticides needed for the production of rye grain is calculated to be circa 5.56E-04 kg. Pesticide/s used in this dataset is/are: '[sulfonyl]urea-compound', '[thio]carbamate-compound', 'benzimidazole-compound', 'benzo[thia]diazole-compound', 'cyclic N-compound', 'dinitroaniline-compound', 'diphenylether-compound', 'glyphosate', 'nitrile-compound', 'organophosphorus-compound, unspecified', 'pesticide, unspecified', 'phenoxy-compound', 'pyrethroid-compound'. The total amount of active substance/s is doubled in order to account for the packaging of the dilluted product of pesticide/s that is/are applied. Therefore, 1.11E-03 kg of packaging for pesticides is justified with this exchange.
  properties: heating value, net 25.97 MJ, wet mass 1 kg, price 0.0642 EUR2005, carbon content, fossil 0.85714, dry mass 1 kg
- tillage, harrowing, by spring tine harrow: 0.000506086 ha; source KTBL 2004; lognormal variance with pedigree 0.0426, pedigree (1,3,5,5,1)
  (same comment as for combine harvesting)
- phenoxy-compound: 8.94139e-6 kg; source Rossberg D. 2002; lognormal variance with pedigree 0.0426, pedigree (1,3,5,5,1)
  Amount of active ingredient from Rossberg (2002). Substnaces that are not availabe in the ecoinvent database are approximated by inventories of superordinate chemical classes. The inventories were assigned according to Sutter (2010, Tab. 2.25). If no inventory for the active ingredient or the corresponding chemical class was available, the pesticide was approximated with the product 'pesticide, unspecified'. --- Sources: Sutter J. (2010) Life Cycle Inventories of Pesticides. Swiss Centre for Life Cycle Inventories, St. Gallen, Switzerland.
  properties: carbon content, fossil 0.532559, wet mass 1 kg, dry mass 1 kg
  note on carbon content, fossil: An unweighted average of the C content in mCPA, mCPB, mecoprop, fluazifop-P-butyl, and 2,4-D. Those substances are classified as phenoxy-compounds in Tab 2.25, Sutter 2010
- tillage, cultivating, chiselling: 0.000201939 ha; source KTBL 2004; lognormal variance with pedigree 0.042, pedigree (1,1,5,5,1)
  (same comment as for combine harvesting)
- inorganic nitrogen fertiliser, as N: 0 kg; source KTBL 2004; pedigree (1,1,1,1,1)
  (same comment as for lime)
  properties: wet mass 1 kg, dry mass 1 kg
- potassium chloride: 0.024161 kg; source KTBL 2004; lognormal variance with pedigree 0.0426, pedigree (1,3,5,5,1)
  The exchange has been updated from 'potassium chloride, as K2O' into 'potassium chloride' and therefore its amount has been scaled (multiplied) from 0.0164 kg by 1.5829 kg of 'potassium chloride' per kg of 'potassium chloride, as K2O'. Original comment of the exchange is: Amount of nutrient interpolated from nutrient requirements of rye depending on the yield given in KTBL (2004) for Germany,
  properties: dry mass 1 kg, wet mass 1 kg
- bale loading: 0.00920795 unit; source Nemecek, T. 2004; lognormal variance with pedigree 0.042, pedigree (1,1,5,5,1)
  loading straw bales
- packaging, for fertilisers: 0.731033 kg; lognormal variance with pedigree 0.0912, pedigree (4,3,5,5,4)
  Total amount of active substance/s of fertilisers needed for the production of 'rye grain' is calculated to be circa 3.93E-01 kg. Fertiliser/s used in this dataset is/are: 'ammonium nitrate, as N', 'lime', 'nitrogen fertiliser, as N', 'phosphate fertiliser, as P2O5', 'potassium chloride, as K2O', 'potassium fertiliser, as K2O', 'urea, as N'. The total amount of active substance/s is doubled in order to account for the packaging of the dilluted product of fertiliser/s that is/are applied. Therefore, 7.86E-01 kg of packaging for fertilisers is justified with this exchange.
  properties: wet mass 1 kg, dry mass 1 kg, heating value, net 25.01 MJ, carbon content, fossil 0.825301, price 0.0642 EUR2005
  note on carbon content, fossil: Considering a chemical formula (C2H4)n for polyethylene, carbon content-fossil is calculated to be 0.856286 kg of Carbon per kg of dry mass.
- transport, tractor and trailer, agricultural: 0.014584 metric ton*km; lognormal variance with pedigree 0.268, pedigree (4,5,5,5,5)
  Transport of harvested grains to the regional processing centre; distance 15 km (according to Nemecek et al. 2004).
- [sulfonyl]urea-compound: 5.83268e-6 kg; source Rossberg D. 2002; lognormal variance with pedigree 0.0426, pedigree (1,3,5,5,1)
  (same comment as for phenoxy-compound)
  properties: dry mass 1 kg, wet mass 1 kg, carbon content, fossil 0.540853
  note on carbon content, fossil: Approximated as an unweighted average of the C-content of the [sulfonyl]urea-compounds (Tab 2.25 Sutter, 2010) chlorotoluron, Diuron, Linuron and Isoproturon.
- sowing: 0.000175881 ha; source KTBL 2004; lognormal variance with pedigree 0.0426, pedigree (1,3,5,5,1)
  (same comment as for combine harvesting)
- nitrile-compound: 1.07762e-5 kg; source Rossberg D. 2002; lognormal variance with pedigree 0.0426, pedigree (1,3,5,5,1)
  (same comment as for phenoxy-compound)
  properties: carbon content, fossil 0.344995, wet mass 1 kg, dry mass 1 kg
  note on carbon content, fossil: An unweighted average of the C content in chlorothalonil, dichlobenil, bromoxynil, ioxynil, substances classified as nitrile-compounds in Tab 2.25, Sutter 2010
- pesticide, unspecified: 0.000385502 kg; source Rossberg D. 2002; lognormal variance with pedigree 0.0426, pedigree (1,3,5,5,1)
  (same comment as for phenoxy-compound)
  properties: dry mass 1 kg, wet mass 1 kg, carbon content, fossil 0.486978
  note on carbon content, fossil: Mean of C content in all pesticides whose formula has been documented in Sutter 2010
- tillage, ploughing: 0.000175822 ha; source KTBL 2004; lognormal variance with pedigree 0.0426, pedigree (1,3,5,5,1)
  (same comment as for combine harvesting)
- drying of bread grain, seed and legumes: 0.0110736 l; source Nemecek, T. 2004; lognormal variance with pedigree 0.042, pedigree (1,1,5,5,1)
- diphenylether-compound: 8.79653e-6 kg; source Rossberg D. 2002; lognormal variance with pedigree 0.0426, pedigree (1,3,5,5,1)
  (same comment as for phenoxy-compound)
  properties: dry mass 1 kg, carbon content, fossil 0.560061, wet mass 1 kg
  note on carbon content, fossil: C content of diphenylether-compounds was calculated after the C content of thepesticides aclonifen and diflufenican classified as diphenylether-compound in Tab 2.25 of Sutter 2010
- fertilising, by broadcaster: 0.000203903 ha; lognormal variance with pedigree 0.0426, pedigree (1,3,5,5,1)
  (same comment as for combine harvesting)
- benzo[thia]diazole-compound: 5.68283e-6 kg; source Rossberg D. 2002; lognormal variance with pedigree 0.0426, pedigree (1,3,5,5,1)
  (same comment as for phenoxy-compound)
  properties: carbon content, fossil 0.499869, dry mass 1 kg, wet mass 1 kg
  note on carbon content, fossil: C content estimated after the herbicide Bentazon (C10H12N2O3S) (Tab 1.5, Sutter 2010), classified in ecoinvent v2.2 report 15a, Tab 10.3 as a benzo[thia]diazole compound
- inorganic potassium fertiliser, as K2O: 0 kg; source KTBL 2004; pedigree (1,1,1,1,1)
  (same comment as for lime)
  properties: wet mass 1 kg, dry mass 1 kg
- urea: 0 kg; source KTBL 2004; pedigree (1,1,1,1,1)
  The exchange has been updated from 'urea, as N' into 'urea' and therefore its amount has been scaled (multiplied) from 0.0027 kg by 2.1438 kg of 'urea' per kg of 'urea, as N'. Original comment of the exchange is: Amount of nutrient interpolated from nutrient requirements of rye depending on the yield given in KTBL (2004) for Germany,
  properties: wet mass 1 kg, carbon content, fossil 0.2, dry mass 1 kg
- pyrethroid-compound: 9.47569e-6 kg; source Rossberg D. 2002; lognormal variance with pedigree 0.0426, pedigree (1,3,5,5,1)
  (same comment as for phenoxy-compound)
  properties: wet mass 1 kg, dry mass 1 kg, carbon content, fossil 0.623
  note on carbon content, fossil: C content of pyrethroid-compounds was calculated as an unweigthed average of C content of the substances: cypermethrin, alpha-cypermethrin,beta-cyfluthrin, lambdacyhalothrin. Those substances are classified as pyrethroid-compounds in Tab 2.25, Sutter 2010
- ammonium nitrate: 0 kg; source KTBL 2004; pedigree (1,1,1,1,1)
  The exchange has been updated from 'ammonium nitrate, as N' into 'ammonium nitrate' and therefore its amount has been scaled (multiplied) from 0.0034 kg by 2.8573 kg of 'ammonium nitrate' per kg of 'ammonium nitrate, as N'. Original comment of the exchange is: Amount of nutrient interpolated from nutrient requirements of rye depending on the yield given in KTBL (2004) for Germany,
  properties: dry mass 1 kg, wet mass 1 kg
- irrigation: 0 m3; name water_irrigation_input; source Siebert, S. 2010; pedigree (1,1,1,1,1)
  Calculated based on literature values (Doll, 2010) and partially modelled at ETH (Pfister, S.).
  property carbon content, fossil 0; name C_content_fossil
  property carbon content, non-fossil 0; name C_content_non_fossil
  property dry mass 0.11 kg; name DM
  property water content 9089.91; name water_content
  property water in wet mass 999.89 kg; name WWM
  property wet mass 1000 kg; name WM
- inorganic phosphorus fertiliser, as P2O5: 0 kg; source KTBL 2004; pedigree (1,1,1,1,1)
  (same comment as for lime)
  properties: wet mass 1 kg, dry mass 1 kg
- benzimidazole-compound: 1.74115e-6 kg; source Rossberg D. 2002; lognormal variance with pedigree 0.0426, pedigree (1,3,5,5,1)
  (same comment as for phenoxy-compound)
  properties: dry mass 1 kg, carbon content, fossil 0.529668, wet mass 1 kg
  note on carbon content, fossil: C content estimated as an average of that of the pesticides Carbendazim, prochloraz and ethofumesate (Sutter 2010)
- dinitroaniline-compound: 1.75324e-5 kg; source Rossberg D. 2002; lognormal variance with pedigree 0.0426, pedigree (1,3,5,5,1)
  (same comment as for phenoxy-compound)
  properties: carbon content, fossil 0.55516, wet mass 1 kg, dry mass 1 kg
  note on carbon content, fossil: C content of dinitroaniline-compound was calculated after the C content of the herbicide pendimethalin, classified as dinitroaniline-compound in Tab 2.25 of Sutter 2010
- application of plant protection product, by field sprayer: 0.000491628 ha; source KTBL 2004; lognormal variance with pedigree 0.0426, pedigree (1,3,5,5,1)
  (same comment as for combine harvesting)
- rye seed, for sowing: 0.0410546 kg; name SEED; = 140/3172; source Nemecek, T. 2004; lognormal variance with pedigree 0.0426, pedigree (1,3,5,5,1)
  Calculated from rye production, RER
  property carbon content, non-fossil 0.448334; name SEED_C_content_non_fossil
  property water content 0.176471; name rye_seed_sowing_water_content
  property water in wet mass 0.15 kg; name rye_seed_sowing_WWM
  property dry mass 0.85 kg; name SEED_DM
  property energy content 15.1895 MJ; name SEED_energy_content
  property wet mass 1 kg; name rye_seed_sowing_WM
  note on carbon content, non-fossil: biogene carbon content on a dry matter basis; Composition data obtained from Rye, in (http://www.nal.usda.gov/fnic/foodcomp/search/). First, composition data were refered to 1 kg dry mass. Then, C-contents were calculated considering a C-content/dry mass of 44% in carbohydrates (including fibres), 53% in proteins and 75% in fats. All data from ecoinvent report, n 15a, pg 40, except C-content in protein, that comes from Determination of protein concentration by total organic carbon analysis, Rouwenhorst et al., 1991, J Biochem and Biophys Methods, 22:119-128.
  note on energy content: See chapter 'Product Properties' in '01_crop production - yields & inputs CH & Europe_v1.0.pdf', section 'AGRICULTURAL PRODUCTION IN SWITZERLAND' - pdf-document on the dedicated talk page of ecoinvent (www.ecoinvent.org/documentation)
- baling: 0.00211724 unit; source Nemecek, T. 2004; lognormal variance with pedigree 0.042, pedigree (1,1,5,5,1)
  baling of straw
- cyclic N-compound: 5.41862e-5 kg; source Rossberg D. 2002; lognormal variance with pedigree 0.0426, pedigree (1,3,5,5,1)
  (same comment as for phenoxy-compound)
  properties: wet mass 1 kg, carbon content, fossil 0.641962, dry mass 1 kg
  note on carbon content, fossil: Calculated as an unweigthed average of the C content of the cyclic N-compounds where information was avaliable in Sutter, 2010, following the classification in Tab 2.25 in Sutter 2010: Difenoconazole (C19H17Cl2N3O3), Fenpropidin (C19H31N), Fenpropimorph (C20H33NO), Flusilazole (C16H15F2N3Si), Metconazole (C17H22ClN3O), Penconazole (C13H15Cl2N3), Propiconazole (C15H17Cl2N3O2), Tebuconazole (C16H22ClN3O)
- glyphosate: 5.8057e-6 kg; source Rossberg D. 2002; lognormal variance with pedigree 0.0426, pedigree (1,3,5,5,1)
  (same comment as for phenoxy-compound)
  properties: carbon content, fossil 0.214286, wet mass 1 kg, dry mass 1 kg
- organophosphorus-compound, unspecified: 1.55524e-6 kg; source Rossberg D. 2002; lognormal variance with pedigree 0.0426, pedigree (1,3,5,5,1)
  (same comment as for phenoxy-compound)
  properties: wet mass 1 kg, dry mass 1 kg, carbon content, fossil 0.260898
  note on carbon content, fossil: C content was calculated as an unweighted average of glyphosate, parathion, and fosetyl-Al. Those substances are classified as organo-phosphorous compounds in Tab 2.25, Sutter 2010
- [thio]carbamate-compound: 1.04287e-6 kg; source Rossberg D. 2002; lognormal variance with pedigree 0.0426, pedigree (1,3,5,5,1)
  (same comment as for phenoxy-compound)
  properties: wet mass 1 kg, carbon content, fossil 0.626349, dry mass 1 kg
  note on carbon content, fossil: Approximated as an unweighted average of the C-content of the [thio]carbamate-compounds (Tab 2.25 Sutter, 2010) carbofuran,orbencarb, prosulfocarb
- inorganic potassium fertiliser, as K2O: 0.0165359 kg; source KTBL 2004; lognormal variance with pedigree 0.0426, pedigree (1,3,5,5,1)
  (same comment as for lime)
- inorganic nitrogen fertiliser, as N: 9.77172e-5, 0.000140455, 0.000125534, 0.000440982, 0.00026336, 3.26429e-6, 1.95455e-5, 0.00247652, 4.62844e-5, 6.95173e-6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 kg (28 entries); source KTBL 2004; lognormal variance with pedigree 0.0426, pedigree (1,3,5,5,1)
  (same comment as for lime)
- urea: 0.00232968, 0.00034504, 0.00272819 kg (3 entries); source KTBL 2004; lognormal variance with pedigree 0.0426, pedigree (1,3,5,5,1)
  (same comment as for urea)
- ammonium nitrate: 0.00159569, 0.00207608, 0.00541692 kg (3 entries); source KTBL 2004; lognormal variance with pedigree 0.0426, pedigree (1,3,5,5,1)
  (same comment as for ammonium nitrate)
- irrigation: 0.00260314, 0.000110495, 0.0232703, 0.000381339, 0.0447181, 0.000859589, 0.000293788, 0.000787702, 0.00435909, 0.000171853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 m3 (13 entries); source Siebert, S. 2010; lognormal variance with pedigree 0.0447, pedigree (2,2,5,5,1)
  (same comment as for irrigation)
  properties: dry mass 0.11 kg, water content 9089.91, wet mass 1000 kg
- inorganic phosphorus fertiliser, as P2O5: 0.000118452, 0.000153682, 0.000123058, 0.000963542, 0.000203029, 8.36555e-6, 2.20512e-5, 0.00227471, 4.10006e-5, 4.47416e-6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 kg (28 entries); source KTBL 2004; lognormal variance with pedigree 0.0426, pedigree (1,3,5,5,1)
  (same comment as for lime)

## Inputs from nature
- Transformation, from annual crop, non-irrigated, intensive [natural resource, land]: 2.08205 m2; = 7100/3172; lognormal variance with pedigree 0.162, pedigree (1,1,5,5,1)
  Modelled, based on chapter 'Land use' in '01_crop production_direct field emissions and natural resources_v1.0.pdf' - pfd-document on the dedicated talk page of econinvent (www.ecoinvent.og/documentation)
- Transformation, to annual crop, non-irrigated, intensive [natural resource, land]: 2.93247 m2; = 10000/3172; lognormal variance with pedigree 0.162, pedigree (1,1,5,5,1)
  (same comment as for Transformation, from annual crop, non-irrigated, intensive)
- Transformation, from pasture, man made, intensive [natural resource, land]: 0.850416 m2; = 2900/3172; lognormal variance with pedigree 0.162, pedigree (1,1,5,5,1)
  (same comment as for Transformation, from annual crop, non-irrigated, intensive)
- Occupation, annual crop, non-irrigated, intensive [natural resource, land]: 2.44371 m2*year; = 8333.3/3172; lognormal variance with pedigree 0.082, pedigree (1,1,5,5,1)
  (same comment as for Transformation, from annual crop, non-irrigated, intensive)
- Energy, gross calorific value, in biomass [natural resource, biotic]: 21.2792 MJ; lognormal variance with pedigree 0.0517684, pedigree (4,3,5,1,1)
  Calculated from energy balance.
- Carbon dioxide, in air [natural resource, in air]: 2.1561 kg; = 44/12 * (REF_PRODUCT_C_content_non_fossil * REF_PRODUCT * REF_PRODUCT_DM + BY_PRODUCT_C_content_non_fossil * BY_PRODUCT * BY_PRODUCT_DM - SEED_C_content_non_fossil * SEED * SEED_DM); lognormal variance with pedigree 0.0606, pedigree (4,3,5,5,1)
  Modelled,see chapter 'CO2 binding' in '01_crop production_direct field emissions and natural resources_v1.0.pdf' - pdf-document on the dedicated talk page of ecoinvent (www.ecoinvent.org/documentation)

## Emissions to nature
- Copper [soil, agricultural]: -2.8123e-6 kg; source Nemecek, T. 2004
  Calculated as the difference between heavy metal input through fertilisers and output through the harvested product. Heavy metal contents of rye grains, straw and mineral fertilizers according to Nemecek et al. (2004). Negative values represent a net export of heavy metals.
- Fluroxypyr [soil, agricultural]: 5.98517e-7 kg; lognormal variance with pedigree 0.0706, pedigree (4,3,5,5,1)
  Modelled, based on chapter 'Emissions of pesticides to agricultural soil' in '01_crop production_direct field emissions and natural resources_v1.0.pdf' - pfd-document on the dedicated talk page of econinvent (www.ecoinvent.og/documentation)
- Deltamethrin [soil, agricultural]: 2.94713e-8 kg; lognormal variance with pedigree 0.0706, pedigree (4,3,5,5,1)
  (same comment as for Fluroxypyr)
- Nitrogen oxides [air, non-urban air or from high stacks]: 0.000128909 kg; = 0.21 * N2O; lognormal variance with pedigree 0.1006, pedigree (4,3,5,5,1)
  Modelled, see chapter 'Emissions of NOx to the air' in '01_crop production_direct field emissions and natural resources_v1.0.pdf' - pdf-document on the dedicated talk page of ecoinvent (www.ecoinvent.org/documentation)
- Mecoprop-P [soil, agricultural]: 4.7157e-6 kg; lognormal variance with pedigree 0.0706, pedigree (4,3,5,5,1)
  (same comment as for Fluroxypyr)
- Dichlorprop-P [soil, agricultural]: 9.06837e-6 kg; lognormal variance with pedigree 0.0706, pedigree (4,3,5,5,1)
  (same comment as for Fluroxypyr)
- Chlortoluron [soil, agricultural]: 5.50161e-6 kg; lognormal variance with pedigree 0.0706, pedigree (4,3,5,5,1)
  (same comment as for Fluroxypyr)
- Fenpropimorph [soil, agricultural]: 1.655e-5 kg; lognormal variance with pedigree 0.0706, pedigree (4,3,5,5,1)
  (same comment as for Fluroxypyr)
- Triadimenol [soil, agricultural]: 1.09578e-6 kg; lognormal variance with pedigree 0.0706, pedigree (4,3,5,5,1)
  (same comment as for Fluroxypyr)
- Oxydemeton-methyl [soil, agricultural]: 2.11475e-6 kg; lognormal variance with pedigree 0.0706, pedigree (4,3,5,5,1)
  (same comment as for Fluroxypyr)
- Metconazole [soil, agricultural]: 8.16165e-7 kg; lognormal variance with pedigree 0.0706, pedigree (4,3,5,5,1)
  (same comment as for Fluroxypyr)
- Kresoxim-methyl [soil, agricultural]: 3.09845e-6 kg; lognormal variance with pedigree 0.0706, pedigree (4,3,5,5,1)
  (same comment as for Fluroxypyr)
- Trinexapac-ethyl [soil, agricultural]: 9.1801e-6 kg; lognormal variance with pedigree 0.0706, pedigree (4,3,5,5,1)
  (same comment as for Fluroxypyr)
- Phosphorus [water, ground-]: 2.05273e-5 kg; lognormal variance with pedigree 0.1006, pedigree (4,3,5,5,1)
  (same comment as for Fluroxypyr)
- Fluquinconazole [soil, agricultural]: 4.53418e-7 kg; lognormal variance with pedigree 0.0706, pedigree (4,3,5,5,1)
  (same comment as for Fluroxypyr)
- Glyphosate [soil, agricultural]: 5.8057e-6 kg; lognormal variance with pedigree 0.0706, pedigree (4,3,5,5,1)
  (same comment as for Fluroxypyr)
- Epoxiconazole [soil, agricultural]: 2.60717e-6 kg; lognormal variance with pedigree 0.0706, pedigree (4,3,5,5,1)
  (same comment as for Fluroxypyr)
- Dimethoate [soil, agricultural]: 2.07487e-5 kg; lognormal variance with pedigree 0.0706, pedigree (4,3,5,5,1)
  (same comment as for Fluroxypyr)
- Lead [soil, agricultural]: 4.3119e-6 kg; source Nemecek, T. 2004; lognormal variance with pedigree 0.1006, pedigree (4,3,5,5,1)
  (same comment as for Copper)
- Ioxynil [soil, agricultural]: 1.07762e-5 kg; lognormal variance with pedigree 0.0706, pedigree (4,3,5,5,1)
  (same comment as for Fluroxypyr)
- Azoxystrobin [soil, agricultural]: 6.5746e-6 kg; lognormal variance with pedigree 0.0706, pedigree (4,3,5,5,1)
  (same comment as for Fluroxypyr)
- Tribenuron [soil, agricultural]: 1.13959e-7 kg; lognormal variance with pedigree 0.0706, pedigree (4,3,5,5,1)
  (same comment as for Fluroxypyr)
- Bentazone [soil, agricultural]: 5.68283e-6 kg; lognormal variance with pedigree 0.0706, pedigree (4,3,5,5,1)
  (same comment as for Fluroxypyr)
- Carbendazim [soil, agricultural]: 1.74115e-6 kg; lognormal variance with pedigree 0.0706, pedigree (4,3,5,5,1)
  (same comment as for Fluroxypyr)
- Ammonia [air, non-urban air or from high stacks]: 0.0010749 kg; = 3.6655/( yield_agriculture*1000); lognormal variance with pedigree 0.0706, pedigree (4,3,5,5,1)
  Modelled, based on the 'AGRAMMON model' in '01_crop production_direct field emissions and natural resources_v1.0.pdf' - pfd-document on the dedicated talk page of econinvent (www.ecoinvent.og/documentation)
- Water [water, ground-]: 0.0569715 m3; name water_to_water_ground; lognormal variance with pedigree 0.1306, pedigree (4,3,5,5,4)
  Calculated value. See the parameters and their comments to understand the calculation.
  property fraction, origin: fresh water 1; name fraction_origin_fresh_water_Wgw
  property fraction, origin: unspecified 0; name fraction_origin_unspecified_Wgw
  property fraction, origin: salt water 0; name fraction_origin_salt_water_Wgw
- Dithianon [soil, agricultural]: 1.99505e-6 kg; lognormal variance with pedigree 0.0706, pedigree (4,3,5,5,1)
  (same comment as for Fluroxypyr)
- Iodosulfuron [soil, agricultural]: 3.02279e-8 kg; lognormal variance with pedigree 0.0706, pedigree (4,3,5,5,1)
  (same comment as for Fluroxypyr)
- Pendimethalin [soil, agricultural]: 1.75324e-5 kg; lognormal variance with pedigree 0.0706, pedigree (4,3,5,5,1)
  (same comment as for Fluroxypyr)
- Flurtamone [soil, agricultural]: 5.28988e-6 kg; lognormal variance with pedigree 0.0706, pedigree (4,3,5,5,1)
  (same comment as for Fluroxypyr)
- Dinitrogen monoxide [air, non-urban air or from high stacks]: 0.000613854 kg; name N2O; = 2.0933/( yield_agriculture*1000); lognormal variance with pedigree 0.1006, pedigree (4,3,5,5,1)
  Modelled, based on chapter 'Emissions of N2O to the air' in '01_crop production_direct field emissions and natural resources_v1.0.pdf' - pfd-document on the dedicated talk page of econinvent (www.ecoinvent.og/documentation)
- Nickel [soil, agricultural]: 2.18988e-6 kg; source Nemecek, T. 2004; lognormal variance with pedigree 0.1006, pedigree (4,3,5,5,1)
  (same comment as for Copper)
- Water [air, unspecified]: 0.101218 m3; name water_to_air_unspecified; lognormal variance with pedigree 0.0827, pedigree (2,2,5,5,1)
  Calculated value based on literature values and expert opinion. See comments in the parametres' comment field.
  property fraction, origin: fresh water 1; name fraction_origin_fresh_water
  property fraction, origin: unspecified 0; name fraction_origin_unspecified
  property fraction, origin: salt water 0; name fraction_origin_salt_water
- Spiroxamine [soil, agricultural]: 1.49629e-5 kg; lognormal variance with pedigree 0.0706, pedigree (4,3,5,5,1)
  (same comment as for Fluroxypyr)
- Isoproturon [soil, agricultural]: 0.00010066 kg; lognormal variance with pedigree 0.0706, pedigree (4,3,5,5,1)
  (same comment as for Fluroxypyr)
- Ethephon [soil, agricultural]: 9.50237e-5 kg; lognormal variance with pedigree 0.0706, pedigree (4,3,5,5,1)
  (same comment as for Fluroxypyr)
- Water [water, surface water]: 0.0142429 m3; name water_to_water_surface; lognormal variance with pedigree 0.1306, pedigree (4,3,5,5,4)
  Calculated value. See the parameters and their comments to understand the calculation.
  property fraction, origin: salt water 0; name fraction_origin_salt_water_Wsw
  property fraction, origin: fresh water 1; name fraction_origin_fresh_water_Wsw
- MCPA [soil, agricultural]: 3.62746e-6 kg; lognormal variance with pedigree 0.0706, pedigree (4,3,5,5,1)
  (same comment as for Fluroxypyr)
- Phosphorus [water, surface water]: 8.8065e-5 kg; lognormal variance with pedigree 0.1006, pedigree (4,3,5,5,1)
  (same comment as for Fluroxypyr)
- Prochloraz [soil, agricultural]: 4.89693e-6 kg; lognormal variance with pedigree 0.0706, pedigree (4,3,5,5,1)
  (same comment as for Fluroxypyr)
- Metsulfuron-methyl [soil, agricultural]: 5.58606e-8 kg; lognormal variance with pedigree 0.0706, pedigree (4,3,5,5,1)
  (same comment as for Fluroxypyr)
- Chlormequat [soil, agricultural]: 0.00011436 kg; lognormal variance with pedigree 0.0706, pedigree (4,3,5,5,1)
  (same comment as for Fluroxypyr)
- Tebuconazole [soil, agricultural]: 1.24539e-5 kg; lognormal variance with pedigree 0.0706, pedigree (4,3,5,5,1)
  (same comment as for Fluroxypyr)
- Propiconazole [soil, agricultural]: 2.19155e-6 kg; lognormal variance with pedigree 0.0706, pedigree (4,3,5,5,1)
  (same comment as for Fluroxypyr)
- Parathion [soil, agricultural]: 1.55524e-6 kg; lognormal variance with pedigree 0.0706, pedigree (4,3,5,5,1)
  (same comment as for Fluroxypyr)
- Flusilazole [soil, agricultural]: 1.82095e-6 kg; lognormal variance with pedigree 0.0706, pedigree (4,3,5,5,1)
  (same comment as for Fluroxypyr)
- Fenpropidin [soil, agricultural]: 8.29772e-6 kg; lognormal variance with pedigree 0.0706, pedigree (4,3,5,5,1)
  (same comment as for Fluroxypyr)
- Amidosulfuron [soil, agricultural]: 1.99505e-7 kg; lognormal variance with pedigree 0.0706, pedigree (4,3,5,5,1)
  (same comment as for Fluroxypyr)
- Thifensulfuron-methyl [soil, agricultural]: 4.57055e-8 kg; lognormal variance with pedigree 0.0706, pedigree (4,3,5,5,1)
  (same comment as for Fluroxypyr)
- Zinc [soil, agricultural]: 3.43451e-5 kg; lognormal variance with pedigree 0.1006, pedigree (4,3,5,5,1)
  (same comment as for Fluroxypyr)
- Chromium [soil, agricultural]: 5.57902e-6 kg; source Nemecek, T. 2004; lognormal variance with pedigree 0.1006, pedigree (4,3,5,5,1)
  (same comment as for Copper)
- Mefenpyr [soil, agricultural]: 9.06837e-8 kg; lognormal variance with pedigree 0.0706, pedigree (4,3,5,5,1)
  (same comment as for Fluroxypyr)
- Cinidon-ethyl [soil, agricultural]: 2.41826e-7 kg; lognormal variance with pedigree 0.0706, pedigree (4,3,5,5,1)
  (same comment as for Fluroxypyr)
- Cyproconazole [soil, agricultural]: 2.92608e-6 kg; lognormal variance with pedigree 0.0706, pedigree (4,3,5,5,1)
  (same comment as for Fluroxypyr)
- Cyprodinil [soil, agricultural]: 3.44594e-6 kg; lognormal variance with pedigree 0.0706, pedigree (4,3,5,5,1)
  (same comment as for Fluroxypyr)
- Diflufenican [soil, agricultural]: 8.79653e-6 kg; lognormal variance with pedigree 0.0706, pedigree (4,3,5,5,1)
  (same comment as for Fluroxypyr)
- Lambda-cyhalothrin [soil, agricultural]: 5.73591e-7 kg; lognormal variance with pedigree 0.0706, pedigree (4,3,5,5,1)
  (same comment as for Fluroxypyr)
- Fenbuconazole [soil, agricultural]: 5.21422e-7 kg; lognormal variance with pedigree 0.0706, pedigree (4,3,5,5,1)
  (same comment as for Fluroxypyr)
- Pirimicarb [soil, agricultural]: 1.04287e-6 kg; lognormal variance with pedigree 0.0706, pedigree (4,3,5,5,1)
  (same comment as for Fluroxypyr)
- Cadmium [soil, agricultural]: 8.94344e-7 kg; source Nemecek, T. 2004; lognormal variance with pedigree 0.1006, pedigree (4,3,5,5,1)
  (same comment as for Copper)
- Nitrate [water, ground-]: 0.0616464 kg; = 210.22/( yield_agriculture*1000); lognormal variance with pedigree 0.1006, pedigree (4,3,5,5,1)
  Modelled, base on the 'SALCA-NO3 model' in '01_crop production_direct field emissions and natural resources_v1.0.pdf' - pfd-document on the dedicated talk page of econinvent (www.ecoinvent.og/documentation)
- Cypermethrin [soil, agricultural]: 8.9021e-6 kg; lognormal variance with pedigree 0.0706, pedigree (4,3,5,5,1)
  (same comment as for Fluroxypyr)
- Esfenvalerate [soil, agricultural]: 3.77849e-8 kg; lognormal variance with pedigree 0.0706, pedigree (4,3,5,5,1)
  (same comment as for Fluroxypyr)

## Sampling procedure
Literature data

## Extrapolations
Transports are modelled with standard distances. Data for the usage of pesticides are taken from German production. Machine usage is modelled with German processings and diesel consumptions from Germany and Poland. Emissions are calculated with standard methods. This dataset has been copied from an original dataset covering the geography RER.

## Review by Niels Jungbluth 2006-09-05
Passed.
none

## Review by Bo Weidema 2012-12-07
Nitrogen emissions revised to better reflect global average.

## Review by Bo Weidema 2012-01-19
In general, it is difficult or impossible to check the validity of the exchanges due to the limited documentation of each value, relying on an external model. However, since the dataset is an improvement compared to the previously existing dataset in the ecoinvent database, it is accepted. It is recommended to improve the transparency in the future, by integrating the model into the dataset and report the emissions from fertilisers separate from those of the plant production.
