# petroleum and gas production, on-shore

Dataset: EcoSpold 2, unit process
Geography: BR
Time period: 2018-01-01 to 2021-12-31
Technology level: current
Classification: EcoSpold01Categories: oil/production
Classification: ISIC rev.4 ecoinvent: 0610:Extraction of crude petroleum
Tags: Combined Production; combined production
Scenario: Business-as-Usual
System model: Allocation, cut-off by classification
Share of production covered: 100 %
Generated by: F. Valebona; T. B. Rocha; F. L. Motta
Published in: Valebona, F. 2021
Database: ecoinvent
isCopyrightProtected: true
accessRestrictedTo: 1

## General comment
This dataset represents the Brazilian onshore production of petroleum and natural gas. In Brazilian production fields, 4% of petroleum and 20% of natural gas production takes place onshore, while the remaining quantities are produced offshore (ANP, 2019). After the exploration phase and drilling, oil and gas are moved to the surface through the wellbore by means of a pump.
Brazilian national statistics was used to re-contextualize the ‘petroleum and gas production, on-shore’ dataset for the Global region, valid for the 2000-2012 period, available in database version 3.6. The adapted parameters were the petroleum and natural gas production yields, as well as the amount of flaring, venting, natural gas consumed in turbines and produced water.
This dataset was developed under the Cornerstone project, an initiative from the Brazilian Business Network on Life cycle Assessment (Rede ACV) in collaboration with ecoinvent to increase the quantity and quality of inventories that represent Brazil, through a thorough adaptation of the datasets. More information about this project is available in redeacv.org.br/en/wg-database. Technical background is provided in Valebona F.; Rocha T.B.; Motta F. L. Cornerstone Project. Recontextualization of Datasets: Methodology. ACV Brasil, Brazil.
Reference:
Agência Nacional do Petróleo, Gás Natural e Biocombustíveis (2019). Anuário Estatístico 2019. Available at: www.anp.gov.br/publicacoes/anuario-estatistico/5237-anuario-estatistico-2019. Accessed in 04/06/2020.

## Included activities start
From exploration activities (i.e. fuel requirements and emissions from well testing). The production phase of petroleum and natural gas takes into account platform infrastructure, fuel and auxiliary chemicals consumption.

## Included activities end
The activity ends with the dried natural gas and the produced crude petroleum.

## Geography
Brazil.

## Technology
All Brazilian production and exploration onshore fields have been included. Data refers to the national average.

## Time period
Data representing the Brazilian situation in 2018 were collected for the petroleum and natural gas production yields, the amount of flaring, venting, natural gas composition, natural gas consumed in turbines and produced water. Although scaled according to the amount of produced energy, the remaining parameters refer to the 2000-2012 period, as for the Global region. Data is assumed to be valid from 2018 to 2021.

## Reference product
- petroleum: 1 kg; source ANP 2019; CPC 12010: Petroleum oils and oils obtained from bituminous minerals, crude; By-product classification allocatable product; CAS 8002-05-9
  Amount of produced crude petroleum.
  EcoSpold01Location=NG
  production volume 5.77928e9 kg; name petroleum_PV
    kg of onshore petroleum produced in BR in 2018 (ANP, 2019). Refrence(s): Agência Nacional do Petróleo, Gás Natural e Biocombustíveis (2019). Anuário Estatístico 2019. Available at: www.anp.gov.br/publicacoes/anuario-estatistico/5237-anuario-estatistico-2019. Accessed in 04/06/2020
  property carbon content, fossil 0.85
    C-content of crude oil is 83-87% (ecoinven report 6_IV, Tab 3.2). An average C-content of 0.85 kg C/kg crude oil was considered
  property price 0.192 EUR2005
    Temporary price data. Calculated as 90% of purchasers price based on: Crude oil prices from U.S. energy information administration_Independent statistics and analysis: Weekly All Countries Spot Price FOB Weighted by Estimated Export Volume (Dollars per Barrel) (http://tonto.eia.doe.gov/dnav/pet/pet_pri_wco_k_w.htm; accessed 06072010). Conversion factors - 0.159 m3/barrel with crude oil density of 853 kg/m3
  property amount in multioutput activity_kg 5.77928e9 kg; name petroleum_amount_MO_kg
  property carbon content 0.85
    carbon content on a dry matter basis (reserved; not for manual entry)
  properties: water content 0, wet mass 1 kg, carbon content, non-fossil 0, water in wet mass 0 kg, heating value, net 43.2 MJ, dry mass 1 kg, carbon allocation 0.85 kg
- natural gas, high pressure: 0 m3; name natural_gas; source ANP 2019; CPC 12020: Natural gas, liquefied or in the gaseous state; By-product classification allocatable product; CAS 14493-06-2
  Amount of produced natural gas. Without reinjected, flared and consumed natural gas.
  production volume 0 m3; name natural_gas_PV
    m3 of onshore natural gas produced in BR in 2018 (ANP, 2019). Refrence(s): Agência Nacional do Petróleo, Gás Natural e Biocombustíveis (2019). Anuário Estatístico 2019. Available at: www.anp.gov.br/publicacoes/anuario-estatistico/5237-anuario-estatistico-2019. Accessed in 04/06/2020
  property heating value, net 39 MJ
    Literature value, Source: United Nations Statistics Division (2018) International Recommendations for Energy Statistics (IRES). Available at: http://unstats.un.org/unsd/statcom/doc11/BG-IRES.pdf.
  property price 0.166 EUR2005; name natural_gas_price_EUR2005
    Temporary price data. Calculated as 90% of purchasers price based on: 2005 price for Europe-27 Import (US$ and kg) in UN Commodity Trade Statistics Database - Natural gas in gaseous state (http://data.un.org/Data.aspx?q=natural+gas&d=ComTrade&f=_l1Code%3a28%3bcmdCode%3a271121; accessed 4 January 2011), using density of natural gas of 0.8 kg/m3 for unit conversion.
  property carbon content, fossil 0.602381
    An average C content of 0.506 kg C/ m3 has been assumed (this average has been calculated using data in Tab 3.5, ecoinvent v2.2 report 6_V
  property amount in multioutput activity_m3 4.34648e9 m3; name natural_gas_amount_MO_m3
  property carbon content 0.602381
    carbon content on a dry matter basis (reserved; not for manual entry)
  properties: water content 0, heating value, gross 0 MJ, dry mass 0.84 kg, carbon content, non-fossil 0, wet mass 0.84 kg, water in wet mass 0 kg, carbon allocation 0.506 kg

## Inputs from technosphere
- low level radioactive waste: -2.0549e-9 m3; name low_level_waste; = (low_level_waste_amount_MO_m3*(4346481720,2*39+5779280798,5*42)/(1,35E10*39+1,07E11*42)*(0.5* petroleum +0.5*natural_gas *0.84)/(0.5* 5779280798,5 +0.5*4346481720,2 *0.84))*-1; lognormal variance with pedigree 0.332, pedigree (3,5,3,5,3)
  EcoSpold01Location=CH
  Generic value from GLO dataset. Scaled according to energy content of reference products.
  Uncertainty: Generic value from the GLO dataset. Uncertainty has been increased to reflect the extrapolation from a different time period.
  production volume 19.3784 m3; = low_level_waste_amount_MO_m3*(4346481720,2*39+5779280798,5*42)/(1,35E10*39+1,07E11*42)*(0.50* petroleum+0.50* natural_gas *0.84)/(0.50* 5779280798,5 +0.50*4346481720,2 *0.84)
    Calculated from the production volume of reference products
  property price 0 EUR2005; name low_level_waste_price_EUR2005
  property amount in multioutput activity_m3 236 m3; name low_level_waste_amount_MO_m3
  properties: dry mass 2500 kg, wet mass 2500 kg
- natural gas, vented: 0.00199913 m3; name nat_gas_vented; = nat_gas_vented_amount_MO_m3*(0.5* petroleum +0.5*natural_gas *0.84)/(0.5* 5779280798,5 +0.5*4346481720,2 *0.84); lognormal variance with pedigree 0.3306, pedigree (2,1,1,1,1)
  The amount of Flaring and Losses (1.27E+8 m³) informed by ANP (2019) for the year 2018 is used to estimate the amount of flared and vented natural gas. The share of vented natural gas is estimated using the amount of fugitive methane emitted during exploration and production activities in 2012 (112,261,860 kg - MCTI, 2015). Considering that all methane fugitive emissions are due to venting, the final amount of vented natural gas in 2012 is calculated with the natural gas composition (0.73%vol of methane; 0.71 kg methane/m³; compiled from anp.gov.br/dados-estatisticos). Thereby, the calculated amount of vented natural gas in 2012 is 2.15E+8 m³, which corresponds to 15% of the combined Flaring and Losses statistics for 2012. This calculated share was used to split the amount flared and vented natural gas in onshore production for 2018, respectively 1.08E+8 m³ and 1.89E+7 m³.
  References:
  [ANP 2019] Agência Nacional do Petróleo, Gás Natural e Biocombustíveis (2019). Anuário Estatístico 2019. Available at: www.anp.gov.br/publicacoes/anuario-estatistico/5237-anuario-estatistico-2019. Accessed in 04/06/2020.
  [MCTI 2015]
  Ministry of Science, Technology and Innovation (2015). Third Brazilian Inventory of Anthropic Emissions and Removals of Greenhouse Gases. Reference Reports. Energy Sector. Fugitive Emissions of Green House Gases in the Oil and Gas Industry. Petrobras e Centro de Estudos Integrados sobre Meio Ambiente e Mudanças Climáticas - Centro Clima/COPPE/UFRJ. Available at: https://sirene.mctic.gov.br/portal/opencms/textoGeral/2018/10/11/Relatorios_de_Referencia_do_II_Inventario_Brasileiro_de_Emissoes_e_Remocoes_Antropicas_de_Gases_de_Efeito_Estufa.html. Accessed in: 12/06/2020.
  EcoSpold01Location=GLO
  property amount in multioutput activity_m3 1.88524e7 m3; name nat_gas_vented_amount_MO_m3; = 126866986,7*0,1486
  properties: carbon content, fossil 0.602381, dry mass 0.84 kg, wet mass 0.84 kg, heating value, net 39 MJ
  note on carbon content, fossil: An average C content of 0.506 kg C/ m3 has been assumed (this average has been calculated using data in Tab 3.5, ecoinvent v2.2 report 6_V
  note on heating value, net: Literature value, Source: United Nations Statistics Division (2018) International Recommendations for Energy Statistics (IRES). Available at: http://unstats.un.org/unsd/statcom/doc11/BG-IRES.pdf.
  note on amount in multioutput activity_m3: Calculated based on natural gas composition (compiled from anp.gov.br/dados-estatisticos) and amount of fugitive emissions. The amount of Flaring and Losses (1,27E+8 m³) informed by ANP (2019) for the year of 2018 is used to estimate the amount of flared and vented natural gas. The share of vented natural gas is estimated using the amount of fugitive methane emitted during exploration and production activities in 2012 (MCTI, 2015). Considering that all methane fugitive emissions are due to venting, the final amount of vented natural gas is calculated with the natural gas composition. Thereby, the calculated amount of vented natural gas is 2.15E+8 m³, which corresponds to 15% of Flaring and Losses statistics for 2012. This calculated share was used to estimate the amount of flared and vented natural gas in onshore production. References: [ANP 2019] Agência Nacional do Petróleo, Gás Natural e Biocombustíveis (2019). Anuário Estatístico 2019. Available at: www.anp.gov.br/publicacoes/anuario-estatistico/5237-anuario-estatistico-2019. Accessed in 04/06/2020. [MCTI 2015] Ministry of Science, Technology and Innovation (2015). Third Brazilian Inventory of Anthropic Emissions and Removals of Greenhouse Gases. Reference Reports. Energy Sector. Fugitive Emissions of Green House Gases in the Oil and Gas Industry. Petrobras e Centro de Estudos Integrados sobre Meio Ambiente e Mudanças Climáticas - Centro Clima/COPPE/UFRJ. Available at: https://sirene.mctic.gov.br/portal/opencms/textoGeral/2018/10/11/Relatorios_de_Referencia_do_II_Inventario_Brasileiro_de_Emissoes_e_Remocoes_Antropicas_de_Gases_de_Efeito_Estufa.html. Accessed in: 12/06/2020.
- spent antifreezer liquid: -8.92544e-10 kg; = (spent_antifreezer_amount_MO_kg*(4346481720,2*39+5779280798,5*42)/(1,35E10*39+1,07E11*42)*(0.50* petroleum+0.50* natural_gas *0.84)/(0.50* 5779280798,5 +0.50*4346481720,2 *0.84))*-1; lognormal variance with pedigree 0.022, pedigree (1,1,3,5,3)
  Norwegian environmental report, for NL onshore production. Scaled from the GLO dataset according to energy content of reference products.
  production volume 8.41698 kg; = spent_antifreezer_amount_MO_kg*(4346481720,2*39+5779280798,5*42)/(1,35E10*39+1,07E11*42)*(0.50* petroleum+0.50* natural_gas *0.84)/(0.50* 5779280798,5 +0.50*4346481720,2 *0.84)
    Calculated from the production volume of reference products
  property amount in multioutput activity_kg 102.506 kg; name spent_antifreezer_amount_MO_kg; = 3048,8*(0.50* 107000000000*4.9E8/1.31E12 +0.50* 13500000000 *0.84*5.45e10/6.37e11)/(0.50* 647220000 +0.50*35000000000 *0.84)
  properties: carbon content, fossil 0.431328, dry mass 0.482 kg, wet mass 1 kg, water content 1.07469, heating value, net 0.56 MJ
  note on amount in multioutput activity_kg: Mathematical relation with original values from the GLO dataset.
  note on heating value, net: Value taken from the general comment of the treatment dataset.
- hazardous waste, for underground deposit: -3.94367e-7 kg; = (hazwaste_amount_MO_kg*(4346481720,2*39+5779280798,5*42)/(1,35E10*39+1,07E11*42)*(0.50* petroleum +0.50* natural_gas *0.84)/(0.50* 5779280798,5 +0.50*4346481720,2 *0.84))*-1; lognormal variance with pedigree 0.022, pedigree (1,1,3,5,3)
  Norwegian environmental report, for NL onshore production. Scaled from the GLO dataset according to energy content of reference products.
  Uncertainty: Scaled from the GLO dataset according to energy content of reference products.
  production volume 3719.01 kg; = hazwaste_amount_MO_kg*(4346481720,2*39+5779280798,5*42)/(1,35E10*39+1,07E11*42)*(0.50* petroleum+0.50* natural_gas *0.84)/(0.50* 5779280798,5 +0.50*4346481720,2 *0.84)
    Calculated from the production volume of reference products
  property amount in multioutput activity_kg 45292 kg; name hazwaste_amount_MO_kg; = 1347100*(0.50*107000000000*4.9E8/1.31E12 +0.50*13500000000 *0.84*5.45e10/6.37e11)/(0.50* 647220000 +0.50*35000000000 *0.84)
  properties: carbon content, fossil 0.554667, wet mass 1 kg, dry mass 1 kg
  note on carbon content, fossil: Tab A.6, ecoinvent v2.2 report 13_I, average hazardous waste composition was used, and referred to 0% water mass. No waste-specific emission are currently inventoried for underground deposits. Accordingly, no waste composition must be specified. For generic, average waste to underground deposit deposition in a 200 liter steel drum without cement solidification is assumed (ecoinvent v2.2 report 13_I).
- waste emulsion paint: -3.93694e-9 kg; = (waste_em_paint_amount_MO_kg*(4346481720,2*39+5779280798,5*42)/(1,35E10*39+1,07E11*42)*(0.50* petroleum+0.50* natural_gas *0.84)/(0.50* 5779280798,5 +0.50*4346481720,2 *0.84))*-1; lognormal variance with pedigree 0.022, pedigree (1,1,3,5,3)
  (same comment as for spent antifreezer liquid)
  production volume 37.1266 kg; = waste_em_paint_amount_MO_kg*(4346481720,2*39+5779280798,5*42)/(1,35E10*39+1,07E11*42)*(0.50* petroleum+0.50* natural_gas *0.84)/(0.50* 5779280798,5 +0.50*4346481720,2 *0.84)
    Calculated from the production volume of reference products
  property amount in multioutput activity_kg 452.146 kg; name waste_em_paint_amount_MO_kg; = 13448*(0.50* 107000000000*4.9E8/1.31E12 +0.50* 13500000000 *0.84*5.45e10/6.37e11)/(0.50* 647220000 +0.50*35000000000 *0.84)
  properties: heating value, net 8.18 MJ, carbon content, fossil 0.27, dry mass 1 kg, wet mass 1 kg
  note on carbon content, fossil: Tab A.4, ecoinvent v2.2 report 13_I. C content has been calculated after data in the tables, and then referred to 1 kg DM
- chemical, inorganic: 1.23642e-6 kg; name chem_inorg; = chem_inorg_amount_MO_kg*(4346481720,2*39+5779280798,5*42)/(1,35E10*39+1,07E11*42)*(0.5* petroleum +0.5*natural_gas *0.84)/(0.5* 5779280798,5 +0.5*4346481720,2 *0.84); lognormal variance with pedigree 0.4252, pedigree (2,3,3,5,5)
  EcoSpold01Location=GLO
  Generic value. Scaled from the GLO dataset according to energy content of reference products.
  Uncertainty: . Uncertainty has been increased to reflect the extrapolation from a different region and time period.
  property amount in multioutput activity_kg 142000 kg; name chem_inorg_amount_MO_kg
  properties: dry mass 1 kg, wet mass 1 kg, carbon content, fossil 0.003
  note on carbon content, fossil: This dataset is an unweighted average of 20 inorganic substances (listed in Tab 88.1, ecoinvent v2.2 report 8, part II), being part of the top100 chemicals included in this database. The C-content has also been calculated as an unweighted average of the C content of the substances composing this dataset.
- onshore well, oil/gas: 4.19688e-6 m; name onshore_well; = onshore_well_amount_MO_m*(4346481720,2*39+5779280798,5*42)/(1,35E10*39+1,07E11*42)*(0.5* petroleum +0.5*natural_gas *0.84)/(0.5* 5779280798,5 +0.5*4346481720,2 *0.84); lognormal variance with pedigree 0.4252, pedigree (2,3,3,5,5)
  Environmental report. Scaled from the GLO dataset according to energy content of reference products.
  EcoSpold01Location=GLO
  Uncertainty: Environmental report. Uncertainty has been increased to reflect the extrapolation from a different region and time period.
  property amount in multioutput activity_m 482000 m; name onshore_well_amount_MO_m
- waste mineral oil: -3.27444e-7 kg; = (waste_min_oil_amount_MO_kg*(4346481720,2*39+5779280798,5*42)/(1,35E10*39+1,07E11*42)*(0.50* petroleum+0.50* natural_gas *0.84)/(0.50* 5779280798,5 +0.50*4346481720,2 *0.84))*-1; lognormal variance with pedigree 0.022, pedigree (1,1,3,5,3)
  (same comment as for spent antifreezer liquid)
  production volume 3087.9 kg; = waste_min_oil_amount_MO_kg*(4346481720,2*39+5779280798,5*42)/(1,35E10*39+1,07E11*42)*(0.50* petroleum+0.50* natural_gas *0.84)/(0.50* 5779280798,5 +0.50*4346481720,2 *0.84)
    Calculated from the production volume of reference products
  property amount in multioutput activity_kg 37606 kg; name waste_min_oil_amount_MO_kg; = 1118500*(0.50* 107000000000*4.9E8/1.31E12 +0.50* 13500000000 *0.84*5.45e10/6.37e11)/(0.50* 647220000 +0.50*35000000000 *0.84)
  properties: wet mass 1 kg, water content 0.111111, dry mass 0.9 kg, carbon content, fossil 0.864444, heating value, net 34.7 MJ
  note on carbon content, fossil: Tab A.6, ecoinvent v2.2 report 13_I. C content has been calculated after data in the tables, and then referred to 1 kg DM
- municipal solid waste: -0.000373539 kg; name MSW; = (MSW_amount_MO_kg*(4346481720,2*39+5779280798,5*42)/(1,35E10*39+1,07E11*42)*(0.5* petroleum +0.5*natural_gas *0.84)/(0.5* 5779280798,5 +0.5*4346481720,2 *0.84))*-1; lognormal variance with pedigree 0.1261, pedigree (3,2,3,5,5)
  EcoSpold01Location=CH
  Environmental report. Scaled from the GLO dataset according to energy content of reference products.
  Uncertainty: Environmental report. Uncertainty has been increased to reflect the extrapolation from a different region and time period.
  production volume 3.5226e6 kg; = MSW_amount_MO_kg*(4346481720,2*39+5779280798,5*42)/(1,35E10*39+1,07E11*42)*(0.50* petroleum+0.50* natural_gas *0.84)/(0.50* 5779280798,5 +0.50*4346481720,2 *0.84)
    Calculated from the production volume of reference porducts
  property amount in multioutput activity_kg 4.29e7 kg; name MSW_amount_MO_kg
  properties: wet mass 1 kg, carbon content, non-fossil 0.261655, carbon content, fossil 0.171549, dry mass 0.771 kg, heating value, net 11.74 MJ, water content 0.297017
  note on carbon content, non-fossil: MSW composition in tab 4.1, ecoinvent v2.2 report 13_I. C content referred to 1 kg DM
- sweet gas, burned in gas turbine: 1.94724 MJ; name sweet_gas_burned; = sweet_gas_burned_amount_MO_MJ*(0.5* petroleum +0.5*natural_gas *0.84)/(0.5* 5779280798,5 +0.5*4346481720,2 *0.84); source Brazilian Ministry of Mines and Energy  2018; lognormal variance with pedigree 0.03, pedigree (1,1,1,1,1)
  EcoSpold01Location=NO
  Amount of gas consumed in turbines during exploration and production according to national statistics (MME, 2018).
  Assumed energy content of natural gas: 39 MJ/m³
  Reference:
  [MME 2018] Ministry of Mines and Energy (2018). Monthly Bulletin of the Natural Gas Industry. December 2018. Edition number 142. Available at: http://www.mme.gov.br/web/guest/secretarias/petroleo-gas-natural-ebiocombustiveis/publicacoes/boletim-mensal-de-acompanhamento-da-industria-de-gas-natural. Accessed in: 10/06/2020.
  property amount in multioutput activity_MJ 1.83632e10 MJ; name sweet_gas_burned_amount_MO_MJ; = 470850000*39
  properties: heating value, net 1 MJ, carbon content, fossil 0.589286, dry mass 0.0247059 kg, wet mass 0.0247059 kg
  note on amount in multioutput activity_MJ: Amount of gas consumed in turbines during exploration and production according to national statistics (MME, 2018). Assumed energy content of natural gas: 39 MJ/m³ Reference: [MME 2018] Ministry of Mines and Energy (2018). Monthly Bulletin of the Natural Gas Industry. December 2018. Edition number 142. Available at: http://www.mme.gov.br/web/guest/secretarias/petroleo-gas-natural-ebiocombustiveis/publicacoes/boletim-mensal-de-acompanhamento-da-industria-de-gas-natural. Accessed in: 10/06/2020.
- chemical, organic: 9.22965e-7 kg; name chem_org; = chem_org_amount_MO_kg*(4346481720,2*39+5779280798,5*42)/(1,35E10*39+1,07E11*42)*(0.5* petroleum +0.5*natural_gas *0.84)/(0.5* 5779280798,5 +0.5*4346481720,2 *0.84); lognormal variance with pedigree 0.4252, pedigree (2,3,3,5,5)
  Generic value. Scaled from the GLO dataset according to energy content of reference products.
  EcoSpold01Location=GLO
  Uncertainty: . Uncertainty has been increased to reflect the extrapolation from a different region and time period.
  property amount in multioutput activity_kg 106000 kg; name chem_org_amount_MO_kg
  properties: dry mass 1 kg, wet mass 1 kg, heating value, net 19.03 MJ, carbon content, fossil 0.628
  note on carbon content, fossil: This dataset is an unweighted average of 20 organic substances (listed in Tab 88.1, ecoinvent v2.2 report 8, part II), being part of the top100 chemicals included in this database. The C-content has also been calculated as an unweighted average of the C content of the substances composing this dataset.
- offshore platform, petroleum: 4.27524e-11 unit; name offshore_plattform; = offshore_plattform_amount_MO_unit*(4346481720,2*39+5779280798,5*42)/(1,35E10*39+1,07E11*42)*(0.5* petroleum +0.5*natural_gas *0.84)/(0.5* 5779280798,5 +0.5*4346481720,2 *0.84); lognormal variance with pedigree 0.4252, pedigree (2,3,3,5,5)
  EcoSpold01Location=OCE
  Questionnaire. Scaled from the GLO dataset according to energy content of reference products.
  Uncertainty: Questionnaire. Uncertainty has been increased to reflect the extrapolation from a different region and time period.
  property amount in multioutput activity_unit 4.91 unit; name offshore_plattform_amount_MO_unit
- onshore petroleum field infrastructure: 1.27996e-10 unit; name onshore_petr_field; = onshore_petr_field_amount_MO_unit*(4346481720,2*39+5779280798,5*42)/(1,35E10*39+1,07E11*42)*(0.5* petroleum +0.5*natural_gas *0.84)/(0.5* 5779280798,5 +0.5*4346481720,2 *0.84); lognormal variance with pedigree 0.4252, pedigree (2,3,3,5,5)
  EcoSpold01Location=GLO
  Questionnaire. Scaled from the GLO dataset according to energy content of reference products.
  Uncertainty: Questionnaire. Uncertainty has been increased to reflect the extrapolation from a different region and time period.
  property amount in multioutput activity_unit 14.7 unit; name onshore_petr_field_amount_MO_unit
- pipeline, petroleum: 7.15733e-9 km; name pipeline; = pipeline_amount_MO_km*(4346481720,2*39+5779280798,5*42)/(1,35E10*39+1,07E11*42)*(0.5* petroleum +0.5*natural_gas *0.84)/(0.5* 5779280798,5 +0.5*4346481720,2 *0.84); lognormal variance with pedigree 0.4232, pedigree (2,3,1,5,5)
  Environmental report. Scaled from the GLO dataset according to energy content of reference products.
  EcoSpold01Location=RER
  Uncertainty: Environmental report. Uncertainty has been increased to reflect the extrapolation from a different region and time period.
  property amount in multioutput activity_km 822 km; name pipeline_amount_MO_km
- waste wood, untreated: -6.35068e-8 kg; = (waste_wood_amount_MO_kg*(4346481720,2*39+5779280798,5*42)/(1,35E10*39+1,07E11*42)*(0.50* petroleum+0.50* natural_gas *0.84)/(0.50* 5779280798,5 +0.50*4346481720,2 *0.84))*-1; lognormal variance with pedigree 0.022, pedigree (1,1,3,5,3)
  (same comment as for spent antifreezer liquid)
  production volume 598.89 kg; = waste_wood_amount_MO_kg*(4346481720,2*39+5779280798,5*42)/(1,35E10*39+1,07E11*42)*(0.50* petroleum+0.50* natural_gas *0.84)/(0.50* 5779280798,5 +0.50*4346481720,2 *0.84)
    Calculated from the production volume of reference products
  property amount in multioutput activity_kg 7293.58 kg; name waste_wood_amount_MO_kg; = 216930*(0.50* 107000000000*4.9E8/1.31E12 +0.50* 13500000000 *0.84*5.45e10/6.37e11)/(0.50* 647220000 +0.50*35000000000 *0.84)
  properties: heating value, net 13.99 MJ, wet mass 1 kg, dry mass 0.8 kg, carbon content, non-fossil 0.48632, water content 0.25
- waste natural gas, sweet: -0.446704 MJ; name waste_NG_sweet; = (waste_NG_sweet_amount_MO_MJ*(0.5* petroleum +0.5*natural_gas *0.84)/(0.5* 5779280798,5 +0.5*4346481720,2 *0.84))*-1; source ANP 2019; lognormal variance with pedigree 0.0306, pedigree (2,1,1,1,1)
  The amount of Flaring and Losses (1.27E+8 m³) informed by ANP (2019) for the year 2018 is used to estimate the amount of flared and vented natural gas. The share of vented natural gas is estimated using the amount of fugitive methane emitted during exploration and production activities in 2012 (112,261,860 kg - MCTI, 2015). Considering that all methane fugitive emissions are due to venting, the final amount of vented natural gas in 2012 is calculated with the natural gas composition (0.73%vol of methane; 0.71 kg methane/m³; compiled from anp.gov.br/dados-estatisticos). Thereby, the calculated amount of vented natural gas in 2012 is 2.15E+8 m³, which corresponds to 15% of the combined Flaring and Losses statistics for 2012. This calculated share was used to split the amount flared and vented natural gas in onshore production for 2018, respectively 1.08E+8 m³ and 1.89E+7 m³.
  References:
  [ANP 2019] Agência Nacional do Petróleo, Gás Natural e Biocombustíveis (2019). Anuário Estatístico 2019. Available at: www.anp.gov.br/publicacoes/anuario-estatistico/5237-anuario-estatistico-2019. Accessed in 04/06/2020.
  [MCTI 2015]
  Ministry of Science, Technology and Innovation (2015). Third Brazilian Inventory of Anthropic Emissions and Removals of Greenhouse Gases. Reference Reports. Energy Sector. Fugitive Emissions of Green House Gases in the Oil and Gas Industry. Petrobras e Centro de Estudos Integrados sobre Meio Ambiente e Mudanças Climáticas - Centro Clima/COPPE/UFRJ. Available at: https://sirene.mctic.gov.br/portal/opencms/textoGeral/2018/10/11/Relatorios_de_Referencia_do_II_Inventario_Brasileiro_de_Emissoes_e_Remocoes_Antropicas_de_Gases_de_Efeito_Estufa.html. Accessed in: 12/06/2020.
  EcoSpold01Location=GLO
  production volume 4.21257e9 MJ; = waste_NG_sweet_amount_MO_MJ*(0.5* petroleum_PV +0.5*natural_gas_PV *0.84)/(0.5* 5779280798,5 +0.5*4346481720,2 *0.84)
    Calculated from the production volume of reference products
  property amount in multioutput activity_MJ 4.21257e9 MJ; name waste_NG_sweet_amount_MO_MJ; = 126866986,7*39*(1-0,1486)
  property price 0 EUR2005; name waste_NG_sweet_price_EUR2005
  properties: dry mass 0.0247059 kg, wet mass 0.0247059 kg, carbon content, fossil 0.589286
  note on amount in multioutput activity_MJ: Amount of flared gas calculated according to national statistics. The amount of Flaring and Losses (1.27E+8 m³) informed by ANP (2019) for the year 2018 is used to estimate the amount of flared and vented natural gas. The share of vented natural gas is estimated using the amount of fugitive methane emitted during exploration and production activities in 2012 (112,261,860 kg - MCTI, 2015). Considering that all methane fugitive emissions are due to venting, the final amount of vented natural gas in 2012 is calculated with the natural gas composition (0.73%vol of methane; compiled from anp.gov.br/dados-estatisticos). Thereby, the calculated amount of vented natural gas in 2012 is 2.15E+8 m³, which corresponds to 15% of the combined Flaring and Losses statistics for 2012. This calculated share was used to split the amount flared and vented natural gas in onshore production for 2018, respectively 1.08E+8 m³ and 1.89E+7 m³. Assumed energy content of natural gas: 39 MJ/m³ References: [ANP 2019] Agência Nacional do Petróleo, Gás Natural e Biocombustíveis (2019). Anuário Estatístico 2019. Available at: www.anp.gov.br/publicacoes/anuario-estatistico/5237-anuario-estatistico-2019. Accessed in 04/06/2020. [MCTI 2015] Ministry of Science, Technology and Innovation (2015). Third Brazilian Inventory of Anthropic Emissions and Removals of Greenhouse Gases. Reference Reports. Energy Sector. Fugitive Emissions of Green House Gases in the Oil and Gas Industry. Petrobras e Centro de Estudos Integrados sobre Meio Ambiente e Mudanças Climáticas - Centro Clima/COPPE/UFRJ. Available at: https://sirene.mctic.gov.br/portal/opencms/textoGeral/2018/10/11/Relatorios_de_Referencia_do_II_Inventario_Brasileiro_de_Emissoes_e_Remocoes_Antropicas_de_Gases_de_Efeito_Estufa.html. Accessed in: 12/06/2020.
- water discharge from petroleum/natural gas extraction, onshore: -1.63256 kg; name water_discharge; = (water_discharge_amount_MO_kg*(1* petroleum +0*natural_gas *0.84)/(1* 5779280798,5 +0*4346481720,2 *0.84))*-1; lognormal variance with pedigree 0.0006, pedigree (2,1,1,1,1)
  EcoSpold01Location=GLO
  Water discharged. Total amount of produced water obtained from national statistics (anp.gov.br/dados-estatisticos).
  Discharged fraction calculated with standard parameters from Schori (2012). For onshore production, 10% is considered to be discharged and 90% reinjected.
  References:
  [ANP 2020]
  Agência Nacional do Petróleo, Gás Natural e Biocombustíveis. Satatistical data. Available at: anp.gov.br/dados-estatisticos
  [Schori 2012]
  Schori, S., Frischknecht, R. (2012). Life Cycle Inventory of Natural Gas Supply. ESU-services Ltd.
  production volume 9.43503e9 kg; = water_discharge_amount_MO_kg*(1* petroleum+0* natural_gas *0.84)/(1* 5779280798,5 +0*4346481720,2 *0.84)
    Calculated from the production volume of reference products
  property price 0 EUR2005; name water_discharge_price_EUR2005
  property amount in multioutput activity_kg 9.43503e9 kg; name water_discharge_amount_MO_kg; = 94350277666,3*0,1
  properties: carbon content, fossil 0.00269714, dry mass 0.0848608 kg, water content 10.784, wet mass 1 kg
  note on amount in multioutput activity_kg: Water discharged. Total amount of produced water obtained from national statistics (anp.gov.br/dados-estatisticos). Discharged fraction calculated with standard parameters from Schori (2012). For onshore production, 10% is considered to be discharged and 90% reinjected. References: [ANP 2020] Agência Nacional do Petróleo, Gás Natural e Biocombustíveis. Satatistical data. Available at: anp.gov.br/dados-estatisticos [Schori 2012] Schori, S., Frischknecht, R. (2012). Life Cycle Inventory of Natural Gas Supply. ESU-services Ltd.

## Inputs from nature
- Gas, natural, in ground [natural resource, in ground]: 0 m3; name gas_ground; = gas_ground_amount_MO_m3*(0* petroleum +1*natural_gas *0.84)/(0* 5779280798,5 +1*4346481720,2 *0.84); source ANP 2019; pedigree (1,1,1,1,1)
  ANP Statistical Yearbook 2019 - Table 3.32 - Natural Gas Balance in Brazil - 2009/2019
  Uncertainty: Production
  property amount in multioutput activity_m3 4.34648e9 m3; name gas_ground_amount_MO_m3
- Oil, crude, in ground [natural resource, in ground]: 1 kg; name oil_ground; = oil_ground_amount_MO_kg*(1* petroleum +0*natural_gas *0.84)/(1* 5779280798,5 +0*4346481720,2 *0.84); source ANP 2019; lognormal variance with pedigree 0, pedigree (1,1,1,1,1)
  ANP Statistical Yearbook 2019 - Table 3.32 - Natural Gas Balance in Brazil - 2009/2019
  property amount in multioutput activity_kg 5.77928e9 kg; name oil_ground_amount_MO_kg
- Water, salt, sole [natural resource, in water]: 0.00150911 m3; = (water_discharge*-1)*0,9151392373965/990; lognormal variance with pedigree 0.0006, pedigree (2,1,1,1,1)
  Flow created to close the water balance. Produced water to be discharged.
  Total amount of produced water obtained from national statistics (anp.gov.br/dados-estatisticos).
  Discharged fraction calculated with standard parameters from Schori (2012). For onshore production, 10% is considered to be discharged and 90% reinjected.
  Property water in wet mass of water discharge from petroleum/natural gas extraction, onshore: 0,9151392373965 kg
  Property water in wet mass of Water, salt, sole (in water/natural resource): 990 kg
  References:
  [ANP 2020]
  Agência Nacional do Petróleo, Gás Natural e Biocombustíveis. Satatistical data. Available at: anp.gov.br/dados-estatisticos
  [Schori 2012]
  Schori, S., Frischknecht, R. (2012). Life Cycle Inventory of Natural Gas Supply. ESU-services Ltd.

## Emissions to nature
- AOX, Adsorbable Organic Halogen as Cl [water, surface water]: 6.78292e-10 kg; name AOX; = AOX_amount_MO_kg*(4346481720,2*39+5779280798,5*42)/(1,35E10*39+1,07E11*42)*(0.5* petroleum +0.5*natural_gas *0.84)/(0.5* 5779280798,5 +0.5*4346481720,2 *0.84); lognormal variance with pedigree 0.212, pedigree (3,5,5,5,5)
  Extrapolation for sum parameter. Scaled according to energy content of reference products.
  Uncertainty: Extrapolation for sum parameter. Uncertainty has been increased to reflect the extrapolation from a different region.
  property amount in multioutput activity_kg 77.9 kg; name AOX_amount_MO_kg
- TOC, Total Organic Carbon [water, surface water]: 5.69452e-5 kg; name TOC; = TOC_amount_MO_kg*(4346481720,2*39+5779280798,5*42)/(1,35E10*39+1,07E11*42)*(0.5* petroleum +0.5*natural_gas *0.84)/(0.5* 5779280798,5 +0.5*4346481720,2 *0.84); lognormal variance with pedigree 0.212, pedigree (3,5,5,5,5)
  (same comment as for AOX, Adsorbable Organic Halogen as Cl)
  property amount in multioutput activity_kg 6.54e6 kg; name TOC_amount_MO_kg
- Oils, unspecified [water, surface water]: 6.58265e-5 kg; name oils; = oils_amount_MO_kg*(4346481720,2*39+5779280798,5*42)/(1,35E10*39+1,07E11*42)*(0.5* petroleum +0.5*natural_gas *0.84)/(0.5* 5779280798,5 +0.5*4346481720,2 *0.84); lognormal variance with pedigree 0.4232, pedigree (2,3,1,5,5)
  Environmental report. Scaled from the GLO dataset according to energy content of reference products.
  Uncertainty: Environmental report. Uncertainty has been increased to reflect the extrapolation from a different region and time period.
  property amount in multioutput activity_kg 7.56e6 kg; name oils_amount_MO_kg
- BOD5, Biological Oxygen Demand [water, surface water]: 0.000207232 kg; name BOD; = BOD_amount_MO_kg*(4346481720,2*39+5779280798,5*42)/(1,35E10*39+1,07E11*42)*(0.5* petroleum +0.5*natural_gas *0.84)/(0.5* 5779280798,5 +0.5*4346481720,2 *0.84); lognormal variance with pedigree 0.212, pedigree (3,5,5,5,5)
  (same comment as for AOX, Adsorbable Organic Halogen as Cl)
  property amount in multioutput activity_kg 2.38e7 kg; name BOD_amount_MO_kg
- Methane, bromotrifluoro-, Halon 1301 [air, non-urban air or from high stacks]: 5.99056e-8 kg; name halon; = halon_amount_MO_kg*(4346481720,2*39+5779280798,5*42)/(1,35E10*39+1,07E11*42)*(0.5* petroleum +0.5*natural_gas *0.84)/(0.5* 5779280798,5 +0.5*4346481720,2 *0.84); lognormal variance with pedigree 0.7747, pedigree (2,2,3,5,5)
  (same comment as for Oils, unspecified)
  property amount in multioutput activity_kg 6880 kg; name halon_amount_MO_kg
- DOC, Dissolved Organic Carbon [water, surface water]: 5.69452e-5 kg; name DOC; = DOC_amount_MO_kg*(4346481720,2*39+5779280798,5*42)/(1,35E10*39+1,07E11*42)*(0.5* petroleum +0.5*natural_gas *0.84)/(0.5* 5779280798,5 +0.5*4346481720,2 *0.84); lognormal variance with pedigree 0.212, pedigree (3,5,5,5,5)
  (same comment as for AOX, Adsorbable Organic Halogen as Cl)
  property amount in multioutput activity_kg 6.54e6 kg; name DOC_amount_MO_kg
- Nitrogen [water, surface water]: 5.08501e-8 kg; name N2; = N2_amount_MO_kg*(4346481720,2*39+5779280798,5*42)/(1,35E10*39+1,07E11*42)*(0.5* petroleum +0.5*natural_gas *0.84)/(0.5* 5779280798,5 +0.5*4346481720,2 *0.84); lognormal variance with pedigree 0.212, pedigree (3,5,5,5,5)
  (same comment as for AOX, Adsorbable Organic Halogen as Cl)
  property amount in multioutput activity_kg 5840 kg; name N2_amount_MO_kg
- Sulfur [water, surface water]: 1.76756e-7 kg; name S2; = S2_amount_MO_kg*(4346481720,2*39+5779280798,5*42)/(1,35E10*39+1,07E11*42)*(0.5* petroleum +0.5*natural_gas *0.84)/(0.5* 5779280798,5 +0.5*4346481720,2 *0.84); lognormal variance with pedigree 0.212, pedigree (3,5,5,5,5)
  (same comment as for AOX, Adsorbable Organic Halogen as Cl)
  property amount in multioutput activity_kg 20300 kg; name S2_amount_MO_kg
- COD, Chemical Oxygen Demand [water, surface water]: 0.000207232 kg; name COD; = COD_amount_MO_kg*(4346481720,2*39+5779280798,5*42)/(1,35E10*39+1,07E11*42)*(0.5* petroleum +0.5*natural_gas *0.84)/(0.5* 5779280798,5 +0.5*4346481720,2 *0.84); lognormal variance with pedigree 0.212, pedigree (3,5,5,5,5)
  (same comment as for AOX, Adsorbable Organic Halogen as Cl)
  property amount in multioutput activity_kg 2.38e7 kg; name COD_amount_MO_kg

## Sampling procedure
Data is based on the statistical yearbook published by the Petroleum, Gas and Biofuels Brazilian National Agency (ANP) and the Monthly Bulletin of the Natural Gas Industry from the Brazilian Ministry of Mines and Energy. They are based on the direct report from producers.

This activity results in the production of 4.35E+9 m³ of natural gas and 5.78E+9 kg of petroleum, produced in Brazilian onshore fields over 2018 (ANP, 2019).
The amount of Flaring and Losses (1.27E+8 m³) informed by ANP (2019) for the year 2018 is used to estimate the amount of flared and vented natural gas. The share of vented natural gas is estimated using the amount of fugitive methane emitted during exploration and production activities in 2012 (112,261,860 kg - MCTI, 2015). Considering that all methane fugitive emissions are due to venting, the final amount of vented natural gas in 2012 is calculated with the natural gas composition (0.73%vol of methane; 0.71 kg methane/m³; compiled from anp.gov.br/dados-estatisticos). Thereby, the calculated amount of vented natural gas in 2012 is 2.15E+8 m³, which corresponds to 15% of the combined Flaring and Losses statistics for 2012. This calculated share was used to split the amount flared and vented natural gas in onshore production for 2018, respectively 1.08E+8 m³ and 1.89E+7 m³.
Another adaptation is the amount of natural gas consumed in turbines during field exploration and production activities (4.71E+8 m³ - retrieved from MME, 2019).
References:
[ANP 2019] Agência Nacional do Petróleo, Gás Natural e Biocombustíveis (2019). Anuário Estatístico 2019. Available at: www.anp.gov.br/publicacoes/anuario-estatistico/5237-anuario-estatistico-2019. Accessed in 04/06/2020.
[MCTI 2015] Ministry of Science, Technology and Innovation (2015). Third Brazilian Inventory of Anthropic Emissions and Removals of Greenhouse Gases. Reference Reports. Energy Sector. Fugitive Emissions of Green House Gases in the Oil and Gas Industry. Petrobras e Centro de Estudos Integrados sobre Meio Ambiente e Mudanças Climáticas - Centro Clima/COPPE/UFRJ. Available at: https://sirene.mctic.gov.br/portal/opencms/textoGeral/2018/10/11/Relatorios_de_Referencia_do_II_Inventario_Brasileiro_de_Emissoes_e_Remocoes_Antropicas_de_Gases_de_Efeito_Estufa.html. Accessed in: 12/06/2020.
[MME 2019] Ministry of Mines and Energy (2019). Monthly Bulletin of the Natural Gas Industry. December 2018. Edition number 142. Available at: http://www.mme.gov.br/web/guest/secretarias/petroleo-gas-natural-ebiocombustiveis/publicacoes/boletim-mensal-de-acompanhamento-da-industria-de-gas-natural. Accessed in: 10/06/2020.

## Extrapolations
All flows contained in the original Global dataset that could not be updated with Brazilian data were scaled according to the energy content of the reference products. Produced water composition, i.e. contaminants concentrations, was also extrapolated from the Global dataset. The uncertainty information was adjusted accordingly.

Assumed energy contents are 39 MJ/m³ of natural gas and 42 MJ/kg of petroleum.

The carbon content properties of all air and water emissions were adjusted to consider 100% fossil carbon. However, waste treatment flows of ‘waste wood, untreated’ and ‘Municipal Solid Waste’ are responsible for unbalanced non-fossil carbon emissions, as in the original dataset representing the global geography.
