# anode production, for metal electrolysis

Dataset: EcoSpold 2, unit process
Geography: RoW
Time period: 1995-01-01 to 2021-12-31
Technology level: current
Classification: EcoSpold01Categories: metals/extraction
Classification: ISIC rev.4 ecoinvent: 2790:Manufacture of other electrical equipment
Tags: ConvertedDataset
Scenario: Business-as-Usual
System model: Allocation, cut-off by classification
Share of production covered: 98 %
Generated by: Hans-Jörg Althaus
Published in: Althaus H.-J. 2000
Database: ecoinvent
isCopyrightProtected: true
accessRestrictedTo: 1

## General comment
[This dataset was already contained in the ecoinvent database version 2. It was not individually updated during the transfer to ecoinvent version 3. Life Cycle Impact Assessment results may still have changed, as they are affected by changes in the supply chain, i.e. in other datasets. This dataset was generated following the ecoinvent quality guidelines for version 2. It may have been subject to central changes described in the ecoinvent version 3 change report (http://www.ecoinvent.org/database/ecoinvent-version-3/reports-of-changes/), and the results of the central updates were reviewed extensively. The changes added e.g. consistent water flows and other information throughout the database. The documentation of this dataset can be found in the ecoinvent reports of version 2, which are still available via the ecoinvent website. The change report linked above covers all central changes that were made during the conversion process.]

## Included activities end
Includes anode production (with it's plant), transports of materials to the plant and the disposal of the wastes.

## Geography
Some Swiss datasets are used for European processes.

## Technology
Average technology for the aluminium consumed in Europe (85% prebaked, 15% Söderberg

## Parameters
- fraction, cooling water, to air: 0.16 dimensionless; name fraction_CW_to_air; lognormal variance with pedigree 0.041425, pedigree (2,3,2,2,1)
- fraction, process water, to air: 0.16 dimensionless; name fraction_PW_to_air; lognormal variance with pedigree 0.092025, pedigree (4,4,3,2,4)
- fraction, cooling water, cooling pond system, to air: 0.032 dimensionless; name fraction_CW_CP_to_air; lognormal variance with pedigree 0.0413, pedigree (2,3,1,3,1)
  Calculated based on literature value (Scown, C.D., 2011, Water Footprint of U.S. Transportation Fuels and supplying information of the article) (Vionnet, S., Quantis Water Database - Technical Report, 2012).
- fraction, cooling water, recirculating system, to air: 0.771 dimensionless; name fraction_CW_R_to_air; lognormal variance with pedigree 0.0413, pedigree (2,3,1,3,1)
  (same comment as for fraction, cooling water, cooling pond system, to air)
- fraction, cooling water, once-through system, to air: 0.004 dimensionless; name fraction_CW_OT_to_air; lognormal variance with pedigree 0.0413, pedigree (2,3,1,3,1)
  (same comment as for fraction, cooling water, cooling pond system, to air)

## Reference product
- anode, for metal electrolysis: 1 kg; CPC 42950: Wire, rods, tubes, plates, electrodes and similar products, of base metal or of metal carbides, coated or core[…]; By-product classification allocatable product
  EcoSpold01Location=RER
  production volume 2.67763 kg
    This is a placeholder value that does not reflect real-world production volumes. This dataset does not currently require a real-world production volume to work in the database framework, and no actual data were collected yet. This has no negative effect on the results of the ecoinvent database.
  property price 9.02 EUR2005
    From UN trade-database. Import data. (USD/kg). Category: Parts of primary cells and primary batteries. Weight: 0.591 kg
  property carbon content, fossil 0.865971
    The main component of the anode is carbon, coming from bitumen and petroleum coke (ecoinvent v2.2 report 10). The C content in those components of the anode has been taken into account to calculate the anode final C content.
  property carbon content 0.865971
    carbon content on a dry matter basis (reserved; not for manual entry)
  properties: water content 0, water in wet mass 0 kg, carbon content, non-fossil 0, wet mass 1 kg, dry mass 1 kg, carbon allocation 0.865971 kg

## Inputs from technosphere
- cast iron: 0.00781 kg; lognormal variance with pedigree 0.042, pedigree (1,1,5,5,1)
  EcoSpold01Location=RER
  properties: wet mass 1 kg, carbon content, fossil 0.04, dry mass 1 kg
  note on carbon content, fossil: Cast iron is made by remelting pig iron in small furnaces (e.g. cupola furnaces or electric arc furnaces) and poured into moulds to make castings. It usually contains 2% to 6% carbon (ecoinvent v2.2 report 10_partII). An average content of 4% was considered
- heat, district or industrial, other than natural gas: 0 MJ; pedigree (1,1,1,1,1)
  EcoSpold01Location=CH
  properties: heating value, net 1 MJ
- anode factory: 2.5e-10 unit; lognormal variance with pedigree 0.5, pedigree (5,5,5,5,5)
  EcoSpold01Location=RER
  Rough guess
  Uncertainty: rough guess
- pitch: 0 kg; pedigree (1,1,1,1,1)
  EcoSpold01Location=RER
  properties: heating value, net 28 MJ, carbon content, fossil 0.83, wet mass 1 kg, dry mass 1 kg
- inert waste, for final disposal: -0.0105 kg; lognormal variance with pedigree 0.042, pedigree (1,1,5,5,1)
  EcoSpold01Location=CH
  production volume 0.0315 kg
    Calculated from the production volume of anode, for aluminium electrolysis in proportion to the respective output amounts.
  properties: water content 0.00502513, dry mass 0.995 kg, wet mass 1 kg
- refractory spent pot liner from Al electrolysis: -0.0039 kg; lognormal variance with pedigree 0.042, pedigree (1,1,5,5,1)
  EcoSpold01Location=CH
  production volume 0.0117 kg
    (same comment as for inert waste, for final disposal)
  properties: wet mass 1 kg, dry mass 1 kg
- heat, district or industrial, natural gas: 0 MJ; pedigree (1,1,1,1,1)
  EcoSpold01Location=RER
  properties: heating value, net 1 MJ
- refractory, fireclay, packed: 0.0101 kg; lognormal variance with pedigree 0.042, pedigree (1,1,5,5,1)
  EcoSpold01Location=DE
  properties: dry mass 1 kg, wet mass 1 kg
- electricity, medium voltage: 0 kWh; pedigree (1,1,1,1,1)
  EcoSpold01Location=UCTE
- waste asphalt: -0.0007 kg; lognormal variance with pedigree 0.042, pedigree (1,1,5,5,1)
  EcoSpold01Location=CH
  production volume 0.0021 kg
    (same comment as for inert waste, for final disposal)
  properties: water content 0.001001, dry mass 0.999 kg, wet mass 1 kg, carbon content, fossil 0.0440796
  note on carbon content, fossil: The waste contains 94.7% inert material (see Tab A.5 for details) 5.3% bitumen (see Tab A.6 for details), ecoinvent v2.2 report 13_I
- petroleum coke: 0.649 kg; lognormal variance with pedigree 0.042, pedigree (1,1,5,5,1)
  EcoSpold01Location=RER
  properties: carbon content, fossil 0.885, wet mass 1 kg, dry mass 1 kg, heating value, net 35 MJ
- heat, district or industrial, other than natural gas: 0.000378998, 0.934621 MJ (2 entries); lognormal variance with pedigree 0.042, pedigree (1,1,5,5,1)
  EcoSpold01Location=CH
- pitch: 0.00886538, 0.000505254, 0.0228677, 0.00102502, 0.00146332, 0.129273 kg (6 entries); lognormal variance with pedigree 0.042, pedigree (1,1,5,5,1)
  EcoSpold01Location=RER
- heat, district or industrial, natural gas: 0.0288385, 1.87116 MJ (2 entries); lognormal variance with pedigree 0.042, pedigree (1,1,5,5,1)
  EcoSpold01Location=RER
- electricity, medium voltage: 0.00165128, 0.000316644, 0.0053158, 0.0773136, 0.0108974, 0.0355053 kWh (6 entries); lognormal variance with pedigree 0.042, pedigree (1,1,5,5,1)
  EcoSpold01Location=UCTE

## Inputs from nature
- Water, cooling, unspecified natural origin [natural resource, in water]: 0.00352 m3; name water_cooling_UNO_input; source EAA - European Aluminium Association 2008; lognormal variance with pedigree 0.0607, pedigree (2,2,5,5,3)
  Calculated based on literature, (Vionnet, S., Quantis Water Database - Technical Report, 2012). Assumed to have the same data as for anode, aluminium electrolysis / GLO. The process starts with unloading of process materials to their storage areas on site. It includes the processes: recovery of spent anode materials, anode mix preparation, anode block or briquette forming and baking, rodding of baked anodes, maintenance and repair of plant and equipment and treatment of process air, liquids and solids. The process ends when the output (rodded anodes or briquettes) is ready to be transported to an electrolysis plant (primary aluminium smelter). It is assumed that only the total water use is reported and that 80% is used as cooling water and 20% is used as process water.
- Water, unspecified natural origin [natural resource, in water]: 0.00088 m3; name water_UNO_input; source EAA - European Aluminium Association 2008; lognormal variance with pedigree 0.0546, pedigree (3,3,5,5,1)
  Calculated based on literature, (Vionnet, S., Quantis Water Database - Technical Report, 2012). Assumed to have the same data as for anode, aluminium electrolysis / GLO. The process starts with unloading of process materials to their storage areas on site. It includes the processes: recovery of spent anode materials, anode mix preparation, anode block or briquette forming and baking, rodding of baked anodes, maintenance and repair of plant and equipment and treatment of process air, liquids and solids. It is assumed that only the total water use is reported and that 80% is used as cooling water and 20% is used as process water.
  property water in wet mass 999.89 kg; name WWM
  property carbon content, non-fossil 0; name C_content_non_fossil
  property carbon content, fossil 0.0104329; name C_content_fossil
  property wet mass 1000 kg; name WM
  property water content 9081.65; name water_content
  property dry mass 0.1101 kg; name DM

## Emissions to nature
- Nitrogen oxides [air, unspecified]: 0.00019 kg; lognormal variance with pedigree 0.082, pedigree (1,1,5,5,1)
- Carbon monoxide, fossil [air, unspecified]: 0.00104 kg; lognormal variance with pedigree 0.692, pedigree (1,1,5,5,1)
- Particulates, < 2.5 um [air, unspecified]: 8.68e-5 kg; lognormal variance with pedigree 0.342, pedigree (1,1,5,5,1)
- Particulates, > 2.5 um, and < 10um [air, unspecified]: 0.000143 kg; lognormal variance with pedigree 0.162, pedigree (1,1,5,5,1)
- Particulates, > 10 um [air, unspecified]: 0.00013 kg; lognormal variance with pedigree 0.082, pedigree (1,1,5,5,1)
- Benzo(a)pyrene [air, unspecified]: 3.18e-6 kg; lognormal variance with pedigree 0.342, pedigree (1,1,5,5,1)
- Water [water, unspecified]: 0.003696 m3; name water_to_water_unspecified; lognormal variance with pedigree 0.0827, pedigree (2,2,5,5,1)
  Calculated value based on literature values and expert opinion. See comments in the parametres' comment field.
  property fraction, origin: unspecified 1; name fraction_origin_unspecified_Ww
  property fraction, origin: fresh water 0; name fraction_origin_fresh_water_Ww
  property fraction, origin: salt water 0; name fraction_origin_salt_water_Ww
- PAH, polycyclic aromatic hydrocarbons [air, unspecified]: 9.48e-5 kg; lognormal variance with pedigree 0.342, pedigree (1,1,5,5,1)
- Water [air, unspecified]: 0.000704 m3; name water_to_air_unspecified; lognormal variance with pedigree 0.0827, pedigree (2,2,5,5,1)
  (same comment as for Water)
  property fraction, origin: fresh water 0; name fraction_origin_fresh_water
  property fraction, origin: salt water 0; name fraction_origin_salt_water
  property fraction, origin: unspecified 1; name fraction_origin_unspecified
- Carbon dioxide, fossil [air, unspecified]: 0.253 kg; lognormal variance with pedigree 0.042, pedigree (1,1,5,5,1)
- Sulfur dioxide [air, unspecified]: 0.00084 kg; lognormal variance with pedigree 0.042, pedigree (1,1,5,5,1)
- Hydrogen fluoride [air, unspecified]: 9e-5 kg; lognormal variance with pedigree 0.082, pedigree (1,1,5,5,1)

## Sampling procedure
Literature / Survey

## Extrapolations
see Geography This dataset has been copied from an original dataset covering the geography RER. The uncertainty has been adjusted accordingly.

## Review by Roland Hischier 2003-06-10
Passed.
