# calcium nitrate production

Dataset: EcoSpold 2, unit process
Geography: RoW
Time period: 2010-01-01 to 2021-12-31
Technology level: current
Classification: ISIC rev.4 ecoinvent: 2012:Manufacture of fertilizers and nitrogen compounds
Synonyms: Norge saltpeter
Scenario: Business-as-Usual
System model: Allocation, cut-off by classification
Generated by: Avraam Symeonidis
Database: ecoinvent
isCopyrightProtected: true
accessRestrictedTo: 1

## General comment
The activity represents the production of calcium nitrate from limestone and nitric acid.
Calcium carbonate in limestone reacts with nitric acid given the formula: CaCO3 + 2 HNO3 → Ca(NO3)2 + CO2 + H2O
The reaction yield is assumed to be 98.1%.
Calcium nitrate has an N-content of 17%. Non-reacting nitric acid and ammonia are considered to be recycled or re-used internally and not being liberated to the environment. This is due to the toxicity of reactants.

## Included activities start
The activity starts when the raw materials enter the process.

## Included activities end
Materials entering the process are included as well as energy uses, infrastructure and emissions.

## Geography
The process described here is the generic method used for the production of calcium nitrate from limestone and nitric acid.

## Technology
Limestone (CaCO3) is usually neutralized in towers of circulating 40-48% nitric acid (HNO3). Acid solutions of calcium nitrate are fed again to the tower until the residual acidity of the solution decreases to 1,5-1,9% of HNO3. Then the free nitric acid is further neutralized with ammonia. Following the application of ammonia, some amount of ammonium nitrate forms, faciliating the crystallization of Ca(NO3)2 from a melt. The filtered solution containing ca. 49% of Ca(NO3)2 and 3% of NH4NO3 is evaporated under vacuum to 75-82% of Ca(NO3)2. This production method is used by most manufacturers of calcium nitrate in the Commonwealth of Independent States (CIS).

## Parameters
- efficiency: 0.981 dimensionless; name efficiency_reaction; = (100-1.9)/100; lognormal variance with pedigree 0.0412, pedigree (2,1,1,1,4)
  output relative to input. Calculated based on technology description. Of the input HNO3, 1.9% will not be reacted.
- fraction of cooling water which evaporates to air, recirculating cooling system: 0.771 dimensionless; name fraction_CW_R_to_air; lognormal variance with pedigree 0.092025, pedigree (4,4,3,2,4)
  Calculated based on literature value (Scown, C.D., 2011, Water Footprint of U.S. Transportation Fuels and supplying information of the article) (Vionnet, S., Quantis Water Database - Technical Report, 2012).
- fraction of cooling water which evaporates to air: 0.3875 dimensionless; name fraction_CW_to_air; = (0.5*fraction_CW_OT_to_air)+(0.5*fraction_CW_R_to_air); lognormal variance with pedigree 0.092025, pedigree (4,4,3,2,4)
  fraction of cooling water which evaporates to air, i.e. is consumed
- fraction of cooling water which evaporates to air, once-through cooling system: 0.004 dimensionless; name fraction_CW_OT_to_air; lognormal variance with pedigree 0.092025, pedigree (4,4,3,2,4)
  (same comment as for fraction of cooling water which evaporates to air, recirculating cooli)

## Reference product
- ammonium nitrate: 1 kg; name BP; = ((1- 0.981)*nitric_acid)*80.04/63.01*0.349978014; By-product classification allocatable product; CPC 34613: Ammonium nitrate; CAS 6484-52-2; pedigree (1,1,1,1,1)
  stoichiometric calculation. Molar weight.
  The produced ammonium nitrate is calculated based on the non-reacted nitric acid.
  This flow is measured as kg of N. (N content in ammonium nitrate 0.3499)
  production volume 3.79525e7 kg; = PVRP*BP/calcium_nitrate
    Calculated from production volume of reference product using the relative outputs.
  property carbon content, fossil 0
    Carbon content, fossil is calculated based on the chemical formula of the substance.
  property price 0.41 EUR2005; name BP_price_EUR2005
    Prices are calculated on basis of Import/Export data (tonnes and US$) from UN Trade Statistics Database (http://data.un.org/Browse.aspx?d=ComTrade, accessed 7/7-2010). N, P2O5, or K2O content (http://www.fertilizer.org/ifa/Home-Page/STATISTICS/Conversions-factors)
  property oxygen content 0.599654
    Oxygen content (on a dry matter basis) of ammonium nitrate is calculated from the molecular formula of the substance (H4N2O3).
  property nitrogen content 0.349979
    Nitrogen content (on a dry matter basis) of ammonium nitrate is calculated from the molecular formula of the substance (H4N2O3).
  property hydrogen content 0.0503678
    Hydrogen content (on a dry matter basis) of ammonium nitrate is calculated from the molecular formula of the substance (H4N2O3).
  property carbon content 0
    carbon content on a dry matter basis (reserved; not for manual entry)
  property true value 0.00273529; name BP_true_value
    allocation property applied in "true value" allocation // value calculated from revenue
  properties: carbon content, non-fossil 0, wet mass 1 kg, dry mass 1 kg, water in wet mass 0 kg, water content 0, carbon allocation 0 kg
- calcium nitrate: 0 kg; name calcium_nitrate; By-product classification allocatable product; CPC 34615: Mixtures of ammonium nitrate with calcium carbonate or other inorganic non-fertilizing substances; CAS 10124-37-5
  production volume 5.68881e9 kg; name PVRP; = 14515*1000*1000/0.1189*0.10
    Estimation.
    Ammonium nitrate is produced in the second step of calcium nitrate production from nitric acid. Th reaction of nitric acid and ammonia is in fact the main production route for ammonium nitrate. Therefore it is estimated that both production volumes are linked. Here, we assume the same Production Volumes for both, since no data is availble for calcium nitrate. Moreover, the main production route for calcium nitrate is as a byproduct in the Odda-Process, therefore, the production of calcium nitrate by the present reaction is assumed to be 10% of the total production.
    Note: ammonium nitrate world production in 2012 is taken from IFA production and trade statistics http://www.fertilizer.org/ifa/Home-Page/STATISTICS/Production-and-trade
    The original production volume is expressed as thousands metric tonne nutrient. The N-content is 0.1189
  property price 0.473 EUR2005; name calcium_nitrate_price_EUR2005
    Temporary price data. Calculated as 90% of purchasers price based on: 2004 prices are calculated on basis of Import/Export data (tonnes and US$) from UN Trade Statistics Database (http://data.un.org/Browse.aspx?d=ComTrade, accessed 7/7-2010). N, P2O5, or K2O content (http://www.fertilizer.org/ifa/Home-Page/STATISTICS/Conversions-factors)
  property oxygen content 0.585031
    Oxygen content (on a dry matter basis) of calcium nitrate is calculated from the molecular formula of the substance (Ca1N2O6).
  property carbon content, fossil 0
    Carbon content, fossil is calculated based on the chemical formula of the substance.
  property nitrogen content 0.170722
    Nitrogen content (on a dry matter basis) of calcium nitrate is calculated from the molecular formula of the substance (Ca1N2O6).
  property calcium content 0.244247
    Calcium content (on a dry matter basis) of calcium nitrate is calculated from the molecular formula of the substance (Ca1N2O6).
  property carbon content 0
    carbon content on a dry matter basis (reserved; not for manual entry)
  property true value 0.473; name calcium_nitrate_true_value
    allocation property applied in "true value" allocation // value calculated from revenue
  properties: water content 0, water in wet mass 0 kg, carbon content, non-fossil 0, dry mass 1 kg, wet mass 1 kg, carbon allocation 0 kg

## Inputs from technosphere
- chemical factory, organics: 1.11175e-9 unit; source Gendorf 2000; lognormal variance with pedigree 0.448, pedigree (4,5,5,5,5)
  Estimation. The infrastructure is estimated based on the module 'chemical plant, organics'. This module assumes a built area of about 4.2 ha, an average output of 50'000 t/a, and plant life of fifty years.
  Uncertainty: E
- nitric acid, without water, in 50% solution state: 0 kg; name nitric_acid; pedigree (1,1,1,1,1)
  Stoichiometric calculation of reactants necessary considering the yield of the reaction.
  properties: nitrogen content 0.222283, hydrogen content 0.0159952, dry mass 1 kg, wet mass 1 kg, oxygen content 0.761721
  note on nitrogen content: Nitrogen content (on a dry matter basis) of nitric acid, without water, in 50% solution state is calculated from the molecular formula of the substance (HNO3).
  note on hydrogen content: Hydrogen content (on a dry matter basis) of nitric acid, without water, in 50% solution state is calculated from the molecular formula of the substance (HNO3).
  note on oxygen content: Oxygen content (on a dry matter basis) of nitric acid, without water, in 50% solution state is calculated from the molecular formula of the substance (HNO3).
- limestone, unprocessed: 0 kg; name lime; pedigree (1,1,1,1,1)
  Stoichiometric calculation of reactants necessary considering the yield of the reaction and that limestone, unprocessed has a CaCO3 cintent of 94.5% in terms of mass.
  property oxygen content 0.453222; name lime_O_content; = 0.4796*0.945
  property calcium content 0.378378; name lime_Ca_content; = 0.4004*0.945
  properties: carbon content, fossil 0.1134, wet mass 1 kg, water content 0.00200401, dry mass 0.998 kg
- ammonia, anhydrous, liquid: 0 kg; name ammonia_input; pedigree (1,1,1,1,1)
  Stoichiometric calculation. Molar weight.
  The nitric acid that does not react with limestone is 1.9% (refer to parameter efficiency). This is further neutralized with ammonia.
  properties: nitrogen content 0.822453, wet mass 1 kg, hydrogen content 0.177547, dry mass 1 kg
  note on nitrogen content: Nitrogen content (on a dry matter basis) of ammonia, anhydrous, liquid is calculated from the molecular formula of the substance (H3N).
  note on hydrogen content: Hydrogen content (on a dry matter basis) of ammonia, anhydrous, liquid is calculated from the molecular formula of the substance (H3N).
- heat, from steam, in chemical industry: 2.75784 MJ; source Gendorf 2000; lognormal variance with pedigree 0.1306, pedigree (2,5,5,5,4)
  Estimation. These values were approximated with data from an large chemical plant site in Germany producing 2.05 Mt a-1 (intermediates included) of different chemicals. The values for the energy consumption per kg of product of this plant (3.2 MJ kg-1) were used as approximation for the energy consumption of the calcium nitrate production.
  properties: heating value, net 1 MJ
- nitric acid, without water, in 50% solution state: 0.131134, 0.0319983, 0.0795738, 0.242952, 0.0381276, 0.0215354, 0.0318798, 0.103483 kg (8 entries); lognormal variance with pedigree 0.0592, pedigree (2,5,4,5,4)
  Stoichiometric calculation of reactants necessary considering the yield of the reaction.
- limestone, unprocessed: 0.0216538, 0.548229 kg (2 entries); lognormal variance with pedigree 0.0592, pedigree (2,5,4,5,4)
  (same comment as for limestone, unprocessed)
  properties: oxygen content 0.453222, calcium content 0.378378, carbon content, fossil 0.1134, wet mass 1 kg, water content 0.00200401, dry mass 0.998 kg
- ammonia, anhydrous, liquid: 0.000732694, 6.29838e-5, 9.79866e-5, 0.000194146, 0.000190212, 1.99363e-5, 8.91225e-5, 0.00210838 kg (8 entries); lognormal variance with pedigree 0.0592, pedigree (2,5,4,5,4)
  (same comment as for ammonia, anhydrous, liquid)

## Inputs from nature
- Water, cooling, unspecified natural origin [natural resource, in water]: 0.0206838 m3; name water_cooling_UNO_input; = 0.024*calcium_nitrate; source Gendorf 2000; lognormal variance with pedigree 0.1786, pedigree (4,5,5,5,5)
  Estimation. This value was approximated with data from an large chemical plant site in Germany producing 2.05 Mt a-1 (intermediates included) of different chemicals.
  Uncertainty: E

## Emissions to nature
- Water [air, unspecified]: 0.00801496 m3; name water_to_air_unspecified; = water_cooling_UNO_input*fraction_CW_to_air; lognormal variance with pedigree 0.0507, pedigree (2,2,4,5,1)
  Calculated value based on literature values and expert opinion. See comments in the parametres' comment field.
- Carbon dioxide, fossil [air, unspecified]: 0.236803 kg; = lime*0.945*0.120002717638372/0.272911530465013; lognormal variance with pedigree 0.0592, pedigree (2,5,4,5,4)
  It is assumed that all carbon content in lime is tranformed into CO2 during the process and emmited to air.
- Water [water, unspecified]: 0.0126688 m3; name water_to_water_unspecified; = water_cooling_UNO_input*(1-fraction_CW_to_air); lognormal variance with pedigree 0.0507, pedigree (2,2,4,5,1)
  (same comment as for Water)

## Extrapolations
Data have been extrapolated from the region of Europe. Uncertainty has been adjusted accordingly.
