# maize silage production

Dataset: EcoSpold 2, unit process
Geography: RoW
Time period: 2010-01-01 to 2021-12-31
Technology level: current
Classification: ISIC rev.4 ecoinvent: 0119:Growing of other non-perennial crops
Synonyms: corn silage
Scenario: Business-as-Usual
System model: Allocation, cut-off by classification
Generated by: Dominique Maxime
Database: ecoinvent
isCopyrightProtected: true
accessRestrictedTo: 1

## General comment
This dataset represents the production of 1 kg fresh matter of maize silage.
This dataset has been extrapolated from an original dataset covering the geography Quebec (Canada).
This activity was adapted to include the global average land use change (LUC) emissions according 2nd edition of the Quantis-modified tool developed by Blonk Consultants 'WFLDB-adapted-Blonk 2014 direct-land-use-change-assessment-tool_2015-05-18a.xlsx', tab. 'Country & land use unknown'. The size of the emission depends on (i) the relative crop expansion in all countries of the crop during the last 20 years and (ii) the corresponding, country specific land transformations. The current results are based on the average FAOSTAT data (harvested area) of 2009-2011 and 1989-1991. The weighted average is used which takes into account relative difference in crop expansion into primary forest, secondary forest, grassland, perennial and annual land.

## Included activities start
This activity starts with soil cultivation after the harvest of the previous crop.

## Included activities end
This activity ends after harvest and ensiling of maize plant, at the farm gate. The dataset includes the inputs of seeds, mineral and organic fertilisers applied, pesticides and all machine operations and corresponding machine infrastructure and sheds. Machine operations are: soil cultivation, transport of seeds, fertilisers and pesticides to the field (15 km), sowing, fertilisation, weed control, pest and pathogen control, plant cutting, loading, transport to farm and discharge into silo. Direct field emissions are also included. Note that there is likely irrigation involved at the GLO scale, but no data were specifically collected for the dataset since it is extrapolated from the QC-CA geography where no irrigation is applied.

## Geography
This dataset has been copied from an original dataset covering the geography Quebec (Canada). The uncertainty has been adjusted accordingly.

## Time period
Time of publications

## Parameters
- fraction, process water, to air: 0.58699 dimensionless; name fraction_PW_to_air; lognormal variance with pedigree 0.0409, pedigree (2,2,2,1,1)
  For agricultural crop dataset, distinction is made between irrigation water and process water. Process water is the water that comes with manure or pesticide application. A fraction of the process water input evaporates to the air and the remaining is considered emitted to surface water and ground water.
  By default, the same value as for irrigation is assumed: this is a global value similar to the one used in ecoinvent 3 GLO crop datasets.
- fraction, process water to water, to surface water: 0.2 dimensionless; name fraction_PWtoW_to_surface_water; lognormal variance with pedigree 0.0886, pedigree (4,3,1,1,4)
  (same comment as for fraction, process water, to air)
- yield, agriculture: 36.33 metric ton/ha; name yield_agriculture; lognormal variance with pedigree 0.0101, pedigree (1,2,1,5,1)
  Amount (fresh basis) of harvested and ensiled material (65% water content) per hectare of cultivated land. See supporting documentation '01 crop production - Quebec.pdf' available on ecoinvent reports web page (https://ecoquery.ecoinvent.org/File/Reports).
- water content at harvest: 0.65 kg/kg; name harvest_wc; lognormal variance with pedigree 0.012, pedigree (1,1,1,5,1)
  Water content at harvest (wet mass basis). See supporting documentation '01 crop production - Quebec.pdf' available on ecoinvent reports web page (https://ecoquery.ecoinvent.org/File/Reports).

## Reference product
- maize silage: 1 kg; name REF_PRODUCT; CPC 01911: Maize for forage and silage; By-product classification allocatable product
  production volume 5.13844e11 kg
    World maize silage production is roughly estimated from 2010-2012 average global maize area (1.709E+8 ha, FAOSTAT 2013), assuming 9% is dedicated to maize silage (Yara website, http://www.yara.co.uk/crop-nutrition/crops/maize/key-facts/world-production/default.aspx), and considering an average yield of 35000 kg wet matter/ha of silage (average maize silage yield in the US in 2011-2012 is 41761 kg wet matter/ha (USDA 2013, http://www.usda.gov/oce/forum/presentations/Newell.pdf); it is over 36000 kg wet matter/ha in Quebec).
  property price 0.0349023 EUR2005; name REF_PRODUCT_price_EUR2005
    Average prices in EUR were estimated from a series of prices in BRL from 2006 to 2015 that were considered by Embrapa Pecus project (https://www.embrapa.br/pecuaria-sudeste/busca-de-projetos/-/projeto/38213/projeto-da-rede-pecus), the same source of data used to build the beef cattle datasets for BR region.
  property carbon content, fossil 0; name REF_PRODUCT_C_content_fossil
    fossil carbon content on a dry matter basis
  property dry mass 0.35 kg; name REF_PRODUCT_DM; = REF_PRODUCT_WM - REF_PRODUCT_WWM
  property energy content 6.6325 MJ; name REF_PRODUCT_energy_content
    as gross calorific value
  property water in wet mass 0.65 kg; name REF_PRODUCT_WWM
  property wet mass 1 kg; name REF_PRODUCT_WM
  property carbon content, non-fossil 0.4773; name REF_PRODUCT_C_content_non_fossil
    biogene carbon content on a dry matter basis
    Composition data obtained for 2 maize silage (30-35% moisture and 35-40% moisture) from Feedipedia (http://www.feedipedia.org). First, composition data were refered to 1 kg dry mass. Then, C-contents were calculated considering a C-content/dry mass of 46% in carbohydrates (including fibres), 53% in proteins and 75% in fats. All data from 'Evolutionary and Biochemical Aspects', A.D. Kay and T. Vrede (in Global Ecology, 2010, Elsevier B.V., S.E. Jørgensen Ed.).
  property water content 1.85714; name REF_PRODUCT_water_content; = REF_PRODUCT_WWM / REF_PRODUCT_DM
  property carbon content 0.4773
    carbon content on a dry matter basis (reserved; not for manual entry)
  properties: carbon allocation 0.167055 kg

## Inputs from technosphere
- ammonia, anhydrous, liquid: 0 kg; pedigree (1,1,1,1,1)
  Amount is determined from the mineral nutrient used for the crop and from the overall mineral fertilizers sales, by type of fertilizer, in Quebec for agriculture (APNC, 2010). See details for disaggregation in supporting documentation '01 crop production - Quebec.pdf' available on ecoinvent reports web page (https://ecoquery.ecoinvent.org/File/Reports).
  properties: wet mass 1 kg, dry mass 1 kg
- tillage, ploughing: 2.7819e-5 ha; lognormal variance with pedigree 0.0119, pedigree (2,2,4,5,2)
  See supporting documentation '01 crop production - Quebec.pdf' available on ecoinvent reports web page (https://ecoquery.ecoinvent.org/File/Reports).
- ammonium sulfate: 7.1467e-5 kg; lognormal variance with pedigree 0.0119, pedigree (2,2,4,5,2)
  (same comment as for ammonia, anhydrous, liquid)
  properties: dry mass 1 kg, wet mass 1 kg
- transport, tractor and trailer, agricultural: 0.006978 metric ton*km; lognormal variance with pedigree 0.1313, pedigree (2,2,4,5,2)
  Transport of inputs from farm to field (assuming 15 km). See supporting documentation '01 crop production - Quebec.pdf' available on ecoinvent reports web page (https://ecoquery.ecoinvent.org/File/Reports).
- manure, liquid, cattle: 0.17184 kg; name MANURE_LIQUID_CATTLE; lognormal variance with pedigree 0.0119, pedigree (2,2,4,5,2)
  Amount of 0.17184 kg of manure, liquid, cattle is needed when producing 1kg of maize silage.
  Amount is determined from the organic nutrient actually used for the crop and from data about organic fertilizer production, by type, in Quebec (MAPAQ, 2013). See details for disaggregation in supporting documentation '01 crop production - Quebec.pdf' available on ecoinvent reports web page (https://ecoquery.ecoinvent.org/File/Reports).
  property water in wet mass 0.925 kg; name MANURE_LIQUID_CATTLE_WWM
  properties: water content 12.333, nitrogen content 0.03681, wet mass 1 kg, dry mass 0.075 kg, carbon content, non-fossil 0.68
  note on nitrogen content: Total N content on a dry matter basis. Weighted average of beef cattle liquid manure (0.0425 kg N/kg dm) and dairy cattle liquid manure (0.03611 kg N/kg dm) considering that N supply in central and peripherical agricultural regions is for 89% from dairy and 11% from beef cattle (MAPAQ, 2013). N content from Parent and Gagne (2013).
- liquid manure spreading, by vacuum tanker: 0.00038524 m3; lognormal variance with pedigree 0.0119, pedigree (2,2,4,5,2)
  Calculated from liquid manure input rate and crop yield.
- packaging, for fertilisers: 0.0160035 kg; lognormal variance with pedigree 0.0592, pedigree (4,3,4,5,4)
  Total amount of active substance/s of fertilisers needed for the production of 'maize silage' is calculated to be circa 8.00E-03 kg. Fertiliser/s used in this dataset is/are: 'ammonia, liquid', 'ammonium nitrate, as N', 'ammonium sulfate, as N', 'lime', 'nitrogen fertiliser, as N', 'phosphate fertiliser, as P2O5', 'urea, as N'. The total amount of active substance/s is doubled in order to account for the packaging of the dilluted product of fertiliser/s that is/are applied. Therefore, 1.60E-02 kg of packaging for fertilisers is justified with this exchange.
  properties: price 0.0642 EUR2005, heating value, net 25.01 MJ, wet mass 1 kg, dry mass 1 kg, carbon content, fossil 0.825301
  note on carbon content, fossil: Considering a chemical formula (C2H4)n for polyethylene, carbon content-fossil is calculated to be 0.856286 kg of Carbon per kg of dry mass.
- tillage, rotary cultivator: 4.0012e-5 ha; lognormal variance with pedigree 0.0119, pedigree (2,2,4,5,2)
  2 passes. See supporting documentation '01 crop production - Quebec.pdf' available on ecoinvent reports web page (https://ecoquery.ecoinvent.org/File/Reports).
- [thio]carbamate-compound: 3.8262e-8 kg; lognormal variance with pedigree 0.0433, pedigree (1,2,5,5,2)
  Carbaryl (6,3702E-08 kg) and pyraclostrobin (4,5614E-08 kg). Pyraclostrobin is derived from carbamate but it might not belong to this chemical class. See supporting documentation '01 crop production - Quebec.pdf' available on ecoinvent reports web page (https://ecoquery.ecoinvent.org/File/Reports).
  properties: wet mass 1 kg, carbon content, fossil 0.626349, dry mass 1 kg
- atrazine: 1.4946e-5 kg; lognormal variance with pedigree 0.0433, pedigree (1,2,5,5,2)
  (same comment as for tillage, ploughing)
  properties: dry mass 1 kg, wet mass 1 kg, carbon content, fossil 0.446512
- packaging, for pesticides: 0.000104486 kg; lognormal variance with pedigree 0.0592, pedigree (4,3,4,5,4)
  Total amount of active substance/s of pesticides needed for the production of maize silage is calculated to be circa 5.22E-05 kg. Pesticide/s used in this dataset is/are: '[thio]carbamate-compound', 'atrazine', 'benzoic-compound', 'dimethenamide', 'glyphosate', 'metolachlor', 'pendimethalin', 'pesticide, unspecified', 'pyrethroid-compound'. The total amount of active substance/s is doubled in order to account for the packaging of the dilluted product of pesticide/s that is/are applied. Therefore, 1.04E-04 kg of packaging for pesticides is justified with this exchange.
  properties: heating value, net 25.97 MJ, price 0.0642 EUR2005, wet mass 1 kg, carbon content, fossil 0.85714, dry mass 1 kg
- benzoic-compound: 2.5048e-6 kg; lognormal variance with pedigree 0.0433, pedigree (1,2,5,5,2)
  Dicamba. See supporting documentation '01 crop production - Quebec.pdf' available on ecoinvent reports web page (https://ecoquery.ecoinvent.org/File/Reports).
  properties: wet mass 1 kg, dry mass 1 kg, carbon content, fossil 0.405853
- manure, liquid, swine: 0.2134 kg; name MANURE_LIQUID_SWINE; lognormal variance with pedigree 0.0119, pedigree (2,2,4,5,2)
  Amount of 0.2134 kg of manure, liquid, swine is needed when producing 1kg of maize silage.
  Amount is determined from the organic nutrient actually used for the crop (CECPA, 2011) and from data about organic fertilizer production, by type, in Quebec (MAPAQ, 2013). See details for disaggregation in supporting documentation '01 crop production - Quebec.pdf' available on ecoinvent reports web page (https://ecoquery.ecoinvent.org/File/Reports).
  property water in wet mass 0.95 kg; name MANURE_LIQUID_SWINE_WWM
  properties: water content 19, dry mass 0.05 kg, nitrogen content 0.1, carbon content, non-fossil 0.64, wet mass 1 kg
- fodder loading, by self-loading trailer: 0.002293 m3; lognormal variance with pedigree 0.0119, pedigree (2,2,4,5,2)
  As modelled in the machinery QC process, it includes cutting, loading, tranport to farm and discharge/compacting.
- manure, solid, cattle: 0.050985 kg; name MANURE_SOLID_CATTLE; lognormal variance with pedigree 0.0119, pedigree (2,2,4,5,2)
  Amount of 0.050985 kg of manure, solid, cattle is needed when producing 1kg of maize silage.
  Amount is determined from the organic nutrient actually used for the crop (CECPA, 2011) and from data about organic fertilizer production, by type, in Quebec (MAPAQ, 2013). See details for disaggregation in supporting documentation '01 crop production - Quebec.pdf' available on ecoinvent reports web page (https://ecoquery.ecoinvent.org/File/Reports).
  property water in wet mass 0.78 kg; name MANURE_SOLID_CATTLE_WWM
  properties: wet mass 1 kg, dry mass 0.22 kg, carbon content, non-fossil 0.441, nitrogen content 0.02734, water content 3.5454
  note on nitrogen content: Total N content on a dry matter basis. Weighted average of beef cattle solid manure (0.02639 kg N/kg dm) and dairy cattle solid manure (0.02789 kg N/kg dm) considering that N supply in central and peripherical agricultural regions is about 63% from dairy and 37% from beef cattle (MAPAQ, 2013). N content from Parent and Gagne (2013).
- dimethenamide: 1.7341e-6 kg; lognormal variance with pedigree 0.0433, pedigree (1,2,5,5,2)
  (same comment as for tillage, ploughing)
  properties: carbon content, fossil 0.521739, wet mass 1 kg, dry mass 1 kg
- fertilising, by broadcaster: 2.7525e-5 ha; lognormal variance with pedigree 0.0119, pedigree (2,2,4,5,2)
- lime: 0.0050656 kg; name LIME_CaCO3; lognormal variance with pedigree 0.0119, pedigree (2,2,4,5,2)
  as CaCO3. CECPA (2011). Étude sur les coûts de production des cereales, du maïs-grain et des oleagineux en 2009 au Quebec. [Centre d’Études sur les Coûts de Production en Agriculture], Juillet 2011, 112 p. [in French]. Available at: http://www.cecpa.qc.ca/contenuFichiers/files/etudesAnalyses/etude-complete-cereales-mais-grain-oleagineux-en-2009-quebec_20130501133424.pdf
  properties: dry mass 1 kg, carbon content, fossil 0.120005, wet mass 1 kg
- solid manure loading and spreading, by hydraulic loader and spreader: 0.066562 kg; lognormal variance with pedigree 0.0119, pedigree (2,2,4,5,2)
  Calculated from solid manure input rate and crop yield.
- maize seed, for sowing: 0.000878613 kg; name SEED; = (1 / (yield_agriculture * UnitConversion(1, 'metric ton', 'kg'))) * SEED_nber_per_ha * SEED_mass_per_seed; lognormal variance with pedigree 0.008, pedigree (1,1,4,1,1)
  Calculated value. See Exchange Properties.
  property water in wet mass 0.14 kg; name SEED_WWM
  property dry mass 0.86 kg; name SEED_DM; = SEED_WM - SEED_WWM
  property seeds per hectare 84000 unit; name SEED_nber_per_ha
  property wet mass 1 kg; name SEED_WM
  property carbon content, non-fossil 0.46957; name SEED_C_content_non_fossil
  property mass per seed 0.00038 kg; name SEED_mass_per_seed
  property water content 0.162791; name SEED_water_content; = SEED_WWM / SEED_DM
  property carbon content, fossil 0; name maize_seed_sowing_C_content_fossil
  note on seeds per hectare: 1.05 bag of seeds/ha (CECPA 2011). 80'000 seeds/bag (http://www.lacoop.coop/cooperateur/articles/2007/12/p38.asp). 380 g/1000 grains (http://www1.agric.gov.ab.ca/$department/deptdocs.nsf/all/agdex81?opendocument#Calculating).
  note on carbon content, non-fossil: biogene carbon content on a dry matter basis; Composition data obtained from Corn Grain Whole, in (http://beefmagazine.com/images/2009%20feed%20table.pdf). First, composition data were refered to 1 kg dry mass. Then, C-contents were calculated considering a C-content/dry mass of 44% in carbohydrates (including fibres), 53% in proteins and 75% in fats. All data from ecoinvent report, n 15a, pg 40, except C-content in protein, that comes from Determination of protein concentration by total organic carbon analysis, Rouwenhorst et al., 1991, J Biochem and Biophys Methods, 22:119-128.
  note on mass per seed: 0,380 kg/1000 seeds (http://www1.agric.gov.ab.ca/$department/deptdocs.nsf/all/agdex81?opendocument#Calculating).
- poultry manure, fresh: 0.066562 kg; lognormal variance with pedigree 0.0119, pedigree (2,2,4,5,2)
  Amount of 0.066562 kg of poultry manure, fresh is needed when producing 1kg of maize silage.
  Amount is determined from the organic nutrient used for the crop (Beauregard, 2013) and from data about organic fertilizer production, by type, in Quebec (MAPAQ, 2013). See details for disaggregation in supporting documentation '01 crop production - Quebec.pdf' available on ecoinvent reports web page (https://ecoquery.ecoinvent.org/File/Reports).
  properties: carbon content, non-fossil 0.33389, wet mass 1 kg, dry mass 0.38 kg, water content 1.63158, nitrogen content 0.04044
- metolachlor: 1.1891e-5 kg; lognormal variance with pedigree 0.0433, pedigree (1,2,5,5,2)
  (same comment as for tillage, ploughing)
  properties: carbon content, fossil 0.633803, wet mass 1 kg, dry mass 1 kg
- glyphosate: 1.7616e-5 kg; lognormal variance with pedigree 0.0433, pedigree (1,2,5,5,2)
  (same comment as for tillage, ploughing)
  properties: dry mass 1 kg, carbon content, fossil 0.214286, wet mass 1 kg
- pendimethalin: 1.4038e-6 kg; lognormal variance with pedigree 0.0433, pedigree (1,2,5,5,2)
  (same comment as for tillage, ploughing)
  properties: wet mass 1 kg, dry mass 1 kg, carbon content, fossil 0.55516
- pesticide, unspecified: 2.0938e-6 kg; lognormal variance with pedigree 0.0433, pedigree (1,2,5,5,2)
  5,9770E-06 kg herbicide, unspecified; 2,2807E-09 kg insecticide, unspecified, and 3,1458E-09 kg fungicide, unspecified. They account for 4%, 2% and 6% of herbicides, insecticides and fungicides inputs, respectively. See supporting documentation '01 crop production - Quebec.pdf' available on ecoinvent reports web page (https://ecoquery.ecoinvent.org/File/Reports).
  properties: carbon content, fossil 0.486978, dry mass 1 kg, wet mass 1 kg
  note on carbon content, fossil: Mean of C content in all pesticides whose formula has been documented in Sutter 2010
- pyrethroid-compound: 1.5414e-8 kg; lognormal variance with pedigree 0.0433, pedigree (1,2,5,5,2)
  Tefluthrin. See supporting documentation '01 crop production - Quebec.pdf' available on ecoinvent reports web page (https://ecoquery.ecoinvent.org/File/Reports).
  properties: carbon content, fossil 0.623, dry mass 1 kg, wet mass 1 kg
- ammonium nitrate: 0 kg; pedigree (1,1,1,1,1)
  The exchange has been updated from 'ammonium nitrate, as N' into 'ammonium nitrate' and therefore its amount has been scaled (multiplied) from 0.0005 kg by 2.8573 kg of 'ammonium nitrate' per kg of 'ammonium nitrate, as N'. Original comment of the exchange is: Amount is determined from the mineral nutrient used for the crop and from the overall mineral fertilizers sales, by type of fertilizer, in Quebec for agriculture (APNC, 2010). See details for disaggregation in supporting documentation '01 crop production - Quebec.pdf' available on ecoinvent reports web page (https://ecoquery.ecoinvent.org/File/Reports).
  properties: dry mass 1 kg, wet mass 1 kg
- inorganic nitrogen fertiliser, as N: 0 kg; pedigree (1,1,1,1,1)
  Amount is determined from Beauregard (2013) and from the overall mineral fertilizers sales, by type of fertilizer, in Quebec for agriculture (APNC, 2010). See details for disaggregation in supporting documentation '01 crop production - Quebec.pdf' available on ecoinvent reports web page (https://ecoquery.ecoinvent.org/File/Reports).
  properties: wet mass 1 kg, dry mass 1 kg
- sowing: 2.7562e-5 ha; lognormal variance with pedigree 0.0119, pedigree (2,2,4,5,2)
  (same comment as for tillage, ploughing)
- urea: 0 kg; name UREA_N; pedigree (1,1,1,1,1)
  The exchange has been updated from 'urea, as N' into 'urea' and therefore its amount has been scaled (multiplied) from 0.0011 kg by 2.1438 kg of 'urea' per kg of 'urea, as N'. Original comment of the exchange is: Amount is determined from the mineral nutrient used for the crop and from the overall mineral fertilizers sales, by type of fertilizer, in Quebec for agriculture (APNC, 2010). See details for disaggregation in supporting documentation '01 crop production - Quebec.pdf' available on ecoinvent reports web page (https://ecoquery.ecoinvent.org/File/Reports).
  properties: dry mass 1 kg, carbon content, fossil 0.2, wet mass 1 kg
- inorganic phosphorus fertiliser, as P2O5: 0 kg; pedigree (1,1,1,1,1)
  Amount is determined from the mineral nutrient used for the crop (Beauregard, 2013) and from the overall mineral fertilizers sales, by type of fertilizer, in Quebec for agriculture (APNC, 2010). See details for disaggregation in supporting documentation '01 crop production - Quebec.pdf' available on ecoinvent reports web page (https://ecoquery.ecoinvent.org/File/Reports).
  Mono- and di-ammonium phosphate (MAP and DAP), as P2O5. The concommitant supply of nitrogen by DAP is accounted for in total N requirements. See supporting documentation '01 crop production - Quebec.pdf' available on ecoinvent reports web page (https://ecoquery.ecoinvent.org/File/Reports).
  properties: dry mass 1 kg, wet mass 1 kg
- chopping, maize: 2.75255e-5 ha; = (1 / (yield_agriculture * UnitConversion(1, 'metric ton', 'kg'))); lognormal variance with pedigree 0.008, pedigree (1,1,4,1,1)
  Complete harvest of cropland area. See parameters.
- application of plant protection product, by field sprayer: 1.295e-5 ha; lognormal variance with pedigree 0.0119, pedigree (2,2,4,5,2)
  47% of cropand area receives plant protection products in average. See supporting documentation '01 crop production - Quebec.pdf' available on ecoinvent reports web page (https://ecoquery.ecoinvent.org/File/Reports).
- ammonia, anhydrous, liquid: 2.11087e-5, 1.21278e-5, 5.47994e-6, 5.74357e-7, 2.56759e-6, 6.07417e-5 kg (6 entries); lognormal variance with pedigree 0.0119, pedigree (2,2,4,5,2)
  (same comment as for ammonia, anhydrous, liquid)
- ammonium nitrate: 0.000233213, 0.0004375, 0.000791691 kg (3 entries); lognormal variance with pedigree 0.0119, pedigree (2,2,4,5,2)
  (same comment as for ammonium nitrate)
- inorganic nitrogen fertiliser, as N: 3.14049e-6, 4.51403e-6, 4.03449e-6, 1.0491e-7, 6.28162e-7, 7.95917e-5, 1.48751e-6, 2.23419e-7, 2.16943e-8, 6.03878e-7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 kg (27 entries); lognormal variance with pedigree 0.0119, pedigree (2,2,4,5,2)
  (same comment as for inorganic nitrogen fertiliser, as N)
- urea: 0.00203621, 0.000373852 kg (2 entries); lognormal variance with pedigree 0.0119, pedigree (2,2,4,5,2)
  (same comment as for urea)
- inorganic phosphorus fertiliser, as P2O5: 3.76815e-6, 4.88885e-6, 3.91467e-6, 2.66121e-7, 7.01482e-7, 7.23621e-5, 1.30429e-6, 1.4233e-7, 3.10973e-8, 2.58944e-7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 kg (27 entries); lognormal variance with pedigree 0.0119, pedigree (2,2,4,5,2)
  (same comment as for inorganic phosphorus fertiliser, as P2O5)

## Inputs from nature
- Transformation, from annual crop, non-irrigated, intensive [natural resource, land]: 0.275255 m2; = (1 / (yield_agriculture * UnitConversion(1, 'metric ton', 'kg'))) * UnitConversion(1, 'ha', 'm2'); lognormal variance with pedigree 0.008, pedigree (1,1,4,1,1)
  Calculated value. See Parameters.
- Carbon dioxide, in air [natural resource, in air]: 0.612006 kg; = 44/12 * (REF_PRODUCT_C_content_non_fossil * REF_PRODUCT * REF_PRODUCT_DM - SEED_C_content_non_fossil * SEED * REF_PRODUCT_DM); lognormal variance with pedigree 0.008, pedigree (1,1,4,1,1)
  Calculated value, see chapter 'CO2 binding' in '01 crop production-direct field emissions natural resources v1.2.pdf' available on ecoinvent reports web page (https://ecoquery.ecoinvent.org/File/Reports). The 44/12 ratio is the stoichiometric mass ratio of carbon dioxide to carbon.
- Energy, gross calorific value, in biomass [natural resource, biotic]: 5.31 MJ; lognormal variance with pedigree 0.1313, pedigree (3,3,4,3,5)
  Estimated to be the same as in case of other maize silage production datasets.
- Occupation, annual crop, non-irrigated, intensive [natural resource, land]: 0.229378 m2*year; = OCCUP_period * (1 / (yield_agriculture * UnitConversion(1, 'metric ton', 'kg'))) * UnitConversion(1, 'ha', 'm2'); lognormal variance with pedigree 0.008, pedigree (1,1,4,1,1)
  Calculated value. See Exchange Properties and Parameters.
  property occupation period 0.83333 year; name OCCUP_period
- Transformation, to annual crop, non-irrigated, intensive [natural resource, land]: 0.275255 m2; = (1 / (yield_agriculture * UnitConversion(1, 'metric ton', 'kg')))*UnitConversion(1, 'ha', 'm2'); lognormal variance with pedigree 0.008, pedigree (1,1,4,1,1)
  Calculated value. See Parameters.

## Emissions to nature
- Metolachlor [water, ground-]: 7.0158e-8 kg; lognormal variance with pedigree 0.0833, pedigree (2,2,5,5,2)
  Modelled with PestLCI 2.0. See supporting documentation '01 crop production - Quebec.pdf' available on ecoinvent reports web page (https://ecoquery.ecoinvent.org/File/Reports).
- Copper, ion [water, surface water]: 1.3253e-6 kg; lognormal variance with pedigree 0.0907, pedigree (5,2,4,5,2)
  Calculated value. See supporting documentation '01 crop production - Quebec.pdf' available on ecoinvent reports web page (https://ecoquery.ecoinvent.org/File/Reports).
- Ammonia [air, non-urban air or from high stacks]: 0.00087266 kg; lognormal variance with pedigree 0.0193, pedigree (2,2,4,5,2)
  NH3 from mineral fertilisers are calculated with the emission factors published in the EMEP guidelines from the European Environment Agency (EEA, 2013). NH3 from manure are calculated according to the caracteristics of every manure, and to Quebec figures for period and method of maqnure application, and delay before incorporation of manure into the soil (Parent et Gagne, 2010; 2013). See supporting documentation '01 crop production - Quebec.pdf' available on ecoinvent reports web page (https://ecoquery.ecoinvent.org/File/Reports).
- Pyraclostrobin [air, non-urban air or from high stacks]: 7.264e-13 kg; lognormal variance with pedigree 0.0833, pedigree (2,2,5,5,2)
  (same comment as for Metolachlor)
- Pendimethalin [soil, agricultural]: 1.3152e-6 kg; lognormal variance with pedigree 0.0763, pedigree (2,2,5,5,2)
  (same comment as for Metolachlor)
- Pendimethalin [air, non-urban air or from high stacks]: 8.1421e-8 kg; lognormal variance with pedigree 0.0833, pedigree (2,2,5,5,2)
  (same comment as for Metolachlor)
- Fungicides, unspecified [soil, agricultural]: 1.101e-9 kg; lognormal variance with pedigree 0.0466, pedigree (2,2,5,5,2)
  (same comment as for Metolachlor)
- Pendimethalin [water, ground-]: 7.1593e-9 kg; lognormal variance with pedigree 0.0833, pedigree (2,2,5,5,2)
  (same comment as for Metolachlor)
- Dinitrogen monoxide [air, non-urban air or from high stacks]: 0.00016798 kg; name N2O; source Rochette, P. 2008; lognormal variance with pedigree 0.0413, pedigree (2,2,4,5,2)
  Direct and indirect N2O emissions from all sources of N input (fertilizers, above- and below-ground crop residues). Modelled with Quebec conditions using the Tier 2 approach (IPCC 2006; Rochette et al. 2008; Little et al. 2008, 2013). See supporting documentation '01 crop production - Quebec.pdf' available on ecoinvent reports web page (https://ecoquery.ecoinvent.org/File/Reports).
- Pyraclostrobin (prop) [soil, agricultural]: 1.5905e-8 kg; lognormal variance with pedigree 0.0763, pedigree (2,2,5,5,2)
  (same comment as for Metolachlor)
- Nitrate [water, ground-]: 0.0052906 kg; lognormal variance with pedigree 0.0513, pedigree (2,2,4,5,2)
  Modelled with the 'SQCB-NO3 model' described in '01 crop production-direct field emissions natural resources v1.2.pdf' available on ecoinvent reports web page (https://ecoquery.ecoinvent.org/File/Reports). Quebec average conditions are considered for the SQCB-NO3 model input parameters (see supporting documentation '01 crop production - Quebec.pdf' available on ecoinvent reports web page (https://ecoquery.ecoinvent.org/File/Reports)).
- Nitrogen oxides [air, non-urban air or from high stacks]: 0.00014392 kg; lognormal variance with pedigree 0.0193, pedigree (2,2,4,5,2)
  Calculated with an emission factor (EF=0.012 kg NO-N/kg N ) from total N application less NH3-N lost through volatilization. Conversion from NO-N to NO2 with factor=46/14. See supporting documentation '01 crop production - Quebec.pdf' available on ecoinvent reports web page (https://ecoquery.ecoinvent.org/File/Reports).
  property emission ratio 0.21 kg/kg; name NOx_to_N2O
- Pyraclostrobin [water, surface water]: 5.907e-11 kg; lognormal variance with pedigree 0.0833, pedigree (2,2,5,5,2)
  (same comment as for Metolachlor)
- Glyphosate [soil, agricultural]: 1.704e-5 kg; lognormal variance with pedigree 0.0763, pedigree (2,2,5,5,2)
  Modelled with PestLCI 2.0 (Dijkman et al. 2012). See supporting documentation '01 crop production - Quebec.pdf' available on ecoinvent reports web page (https://ecoquery.ecoinvent.org/File/Reports).
- Pyraclostrobin [water, ground-]: 1.1734e-14 kg; lognormal variance with pedigree 0.0833, pedigree (2,2,5,5,2)
  (same comment as for Metolachlor)
- Zinc [soil, agricultural]: 7.6734e-6 kg; lognormal variance with pedigree 0.0907, pedigree (5,2,4,5,2)
  (same comment as for Copper, ion)
- Zinc, ion [water, surface water]: 7.4039e-6 kg; lognormal variance with pedigree 0.0907, pedigree (5,2,4,5,2)
  (same comment as for Copper, ion)
- Water [water, surface water]: 3.31606e-5 m3; = ((MANURE_LIQUID_CATTLE* MANURE_LIQUID_CATTLE_WWM) + (MANURE_LIQUID_SWINE* MANURE_LIQUID_SWINE_WWM) + (MANURE_SOLID_CATTLE* MANURE_SOLID_CATTLE_WWM))* (1-fraction_PW_to_air)*fraction_PWtoW_to_surface_water* UnitConversion(1, 'l', 'm3')
  Calculated value; See Parameters. Water emitted from: irrigated water (if any), process water.
- Tefluthrin [soil, agricultural]: 1.1638e-8 kg; lognormal variance with pedigree 0.0763, pedigree (2,2,5,5,2)
  (same comment as for Metolachlor)
- Tefluthrin [water, surface water]: 0 kg; pedigree (1,1,1,1,1)
  (same comment as for Metolachlor)
- Phosphate [water, surface water]: 3.7391e-5 kg; source Michaud, A.R. 2008; lognormal variance with pedigree 0.0513, pedigree (2,2,4,5,2)
  Modelled with Quebec conditions with the 'ODEP model' (Michaud et al., 2008). See supporting documentation '01 crop production - Quebec.pdf' available on ecoinvent reports web page (https://ecoquery.ecoinvent.org/File/Reports).
  property carbon content, non-fossil 0; name C_content_non_fossil
  property water in wet mass 0 kg; name WWM
  property wet mass 1 kg; name WM
  property water content 0; name water_content
  property dry mass 1 kg; name DM
  property carbon content, fossil 0; name C_content_fossil
- Nickel, ion [water, surface water]: 2.2582e-6 kg; lognormal variance with pedigree 0.0907, pedigree (5,2,4,5,2)
  (same comment as for Copper, ion)
- Carbon dioxide, from soil or biomass stock [air, non-urban air or from high stacks]: 0.0376943 kg; normal variance with pedigree 0.5452, pedigree (3,3,5,5,2)
  Global average LUC emissions according 2nd edition of the Quantis-modified tool developed by Blonk Consultants 'WFLDB-adapted-Blonk 2014 direct-land-use-change-assessment-tool_2015-05-18a.xlsx', tab. 'Country & land use unknown'. The emission are based on the relative change in production areas in all countries for a given crop. The weighted average is used which takes into acount relative difference in crop expansion into primary forest, secondary forest, grassland, perennial and annual land.
  Uncertainty: Uncertainty estimated based on IPCC 2006
- Chromium [soil, agricultural]: -1.1144e-6 kg
  (same comment as for Copper, ion)
- Phosphorus [water, surface water]: 4.5493e-5 kg; source Michaud, A.R. 2008; lognormal variance with pedigree 0.0513, pedigree (2,2,4,5,2)
  (same comment as for Phosphate)
- Carbon dioxide, fossil [air, non-urban air or from high stacks]: 0.00399498 kg; = UREA_N*0.466461632733939*1.571 +LIME_CaCO3*0.44; lognormal variance with pedigree 0.008, pedigree (1,1,4,1,1)
  Carbon dioxide emissions from limestone and urea application calculated from C content (IPCC, 2006). Emission factors are EF=1.57 kg CO2/kg N for urea, and EF=0.44 kg CO2/kg CaCO3 for limestone. See supporting documentation '01 crop production - Quebec.pdf' available on ecoinvent reports web page (https://ecoquery.ecoinvent.org/File/Reports).
- Tefluthrin [air, non-urban air or from high stacks]: 3.7765e-9 kg; lognormal variance with pedigree 0.0833, pedigree (2,2,5,5,2)
  (same comment as for Metolachlor)
- Glyphosate [air, non-urban air or from high stacks]: 6.342e-8 kg; source Dijkman, T.J. 2012; lognormal variance with pedigree 0.0833, pedigree (2,2,5,5,2)
  (same comment as for Glyphosate)
- Cadmium [soil, agricultural]: -3.6313e-8 kg
  (same comment as for Copper, ion)
- Glyphosate [water, ground-]: 5.1086e-7 kg; source Dijkman, T.J. 2012; lognormal variance with pedigree 0.0833, pedigree (2,2,5,5,2)
  (same comment as for Glyphosate)
- Atrazine [soil, agricultural]: 1.4346e-5 kg; lognormal variance with pedigree 0.0763, pedigree (2,2,5,5,2)
  (same comment as for Metolachlor)
- Atrazine [air, non-urban air or from high stacks]: 9.0426e-8 kg; lognormal variance with pedigree 0.0833, pedigree (2,2,5,5,2)
  (same comment as for Metolachlor)
- Atrazine [water, ground-]: 5.0817e-7 kg; lognormal variance with pedigree 0.0833, pedigree (2,2,5,5,2)
  (same comment as for Metolachlor)
- Atrazine [water, surface water]: 1.9654e-9 kg; lognormal variance with pedigree 0.0833, pedigree (2,2,5,5,2)
  (same comment as for Metolachlor)
- Copper [soil, agricultural]: 5.5566e-6 kg; lognormal variance with pedigree 0.0907, pedigree (5,2,4,5,2)
  (same comment as for Copper, ion)
- Lead [soil, agricultural]: -6.8299e-7 kg
  (same comment as for Copper, ion)
- Carbaryl [air, non-urban air or from high stacks]: 4.2361e-9 kg; lognormal variance with pedigree 0.0833, pedigree (2,2,5,5,2)
  (same comment as for Metolachlor)
- Carbaryl [water, surface water]: 7.3577e-13 kg; lognormal variance with pedigree 0.0833, pedigree (2,2,5,5,2)
  (same comment as for Metolachlor)
- Carbaryl [water, ground-]: 5.9084e-11 kg; lognormal variance with pedigree 0.0833, pedigree (2,2,5,5,2)
  (same comment as for Metolachlor)
- Pendimethalin [water, surface water]: 1.2003e-11 kg; lognormal variance with pedigree 0.0833, pedigree (2,2,5,5,2)
  (same comment as for Metolachlor)
- Dicamba [soil, agricultural]: 2.2153e-6 kg; lognormal variance with pedigree 0.0763, pedigree (2,2,5,5,2)
  (same comment as for Metolachlor)
- Dicamba [air, non-urban air or from high stacks]: 2.3545e-7 kg; lognormal variance with pedigree 0.0833, pedigree (2,2,5,5,2)
  No possible elementary flow. Because of lack of information on the active ingredient, assumed entirely emitted to soil.
- Metolachlor [water, surface water]: 2.8538e-10 kg; lognormal variance with pedigree 0.0833, pedigree (2,2,5,5,2)
  (same comment as for Metolachlor)
- Glyphosate [water, surface water]: 2.2813e-9 kg; source Dijkman, T.J. 2012; lognormal variance with pedigree 0.0833, pedigree (2,2,5,5,2)
  (same comment as for Glyphosate)
- Dicamba [water, ground-]: 5.3855e-8 kg; lognormal variance with pedigree 0.0833, pedigree (2,2,5,5,2)
  (same comment as for Dicamba)
- Dimethenamid [soil, agricultural]: 1.7141e-6 kg; lognormal variance with pedigree 0.0763, pedigree (2,2,5,5,2)
  (same comment as for Metolachlor)
- Dimethenamid [water, surface water]: 6.503e-11 kg; lognormal variance with pedigree 0.0833, pedigree (2,2,5,5,2)
  (same comment as for Metolachlor)
- Dimethenamid [air, non-urban air or from high stacks]: 1.474e-8 kg; lognormal variance with pedigree 0.0833, pedigree (2,2,5,5,2)
  (same comment as for Metolachlor)
- Dimethenamid [water, ground-]: 5.2024e-9 kg; lognormal variance with pedigree 0.0833, pedigree (2,2,5,5,2)
  (same comment as for Metolachlor)
- Carbaryl [soil, agricultural]: 1.8e-8 kg; lognormal variance with pedigree 0.0763, pedigree (2,2,5,5,2)
  (same comment as for Metolachlor)
- Insecticides, unspecified [soil, agricultural]: 7.9825e-10 kg; lognormal variance with pedigree 0.0466, pedigree (2,2,5,5,2)
  (same comment as for Metolachlor)
- Tefluthrin [water, ground-]: 1.8497e-14 kg; lognormal variance with pedigree 0.0833, pedigree (2,2,5,5,2)
  (same comment as for Metolachlor)
- Herbicides, unspecified [soil, agricultural]: 2.092e-6 kg; lognormal variance with pedigree 0.0466, pedigree (2,2,5,5,2)
  (same comment as for Metolachlor)
- Cadmium, ion [water, surface water]: 4.0005e-8 kg; lognormal variance with pedigree 0.0907, pedigree (5,2,4,5,2)
  (same comment as for Copper, ion)
- Nickel [soil, agricultural]: -2.3079e-6 kg
  (same comment as for Copper, ion)
- Chromium, ion [water, surface water]: 1.788e-6 kg; lognormal variance with pedigree 0.0907, pedigree (5,2,4,5,2)
  (same comment as for Copper, ion)
- Metolachlor [soil, agricultural]: 1.18e-5 kg; lognormal variance with pedigree 0.0763, pedigree (2,2,5,5,2)
  (same comment as for Metolachlor)
- Lead [water, surface water]: 6.5975e-7 kg; lognormal variance with pedigree 0.0907, pedigree (5,2,4,5,2)
  (same comment as for Copper, ion)
- Water [air, non-urban air or from high stacks]: 0.000235647 m3; = ((MANURE_LIQUID_CATTLE* MANURE_LIQUID_CATTLE_WWM) + (MANURE_LIQUID_SWINE* MANURE_LIQUID_SWINE_WWM) + (MANURE_SOLID_CATTLE* MANURE_SOLID_CATTLE_WWM))* fraction_PW_to_air* UnitConversion(1, 'l', 'm3')
  (same comment as for Water)
- Metolachlor [air, non-urban air or from high stacks]: 2.0809e-8 kg; lognormal variance with pedigree 0.0833, pedigree (2,2,5,5,2)
  (same comment as for Metolachlor)
- Water [water, ground-]: 0.000132642 m3; = ((MANURE_LIQUID_CATTLE* MANURE_LIQUID_CATTLE_WWM) + (MANURE_LIQUID_SWINE* MANURE_LIQUID_SWINE_WWM) + (MANURE_SOLID_CATTLE* MANURE_SOLID_CATTLE_WWM))* (1-fraction_PW_to_air)*(1- fraction_PWtoW_to_surface_water)* UnitConversion(1, 'l', 'm3')
  (same comment as for Water)
- Dicamba [water, surface water]: 2.1541e-10 kg; lognormal variance with pedigree 0.0833, pedigree (2,2,5,5,2)
  (same comment as for Dicamba)

## Sampling procedure
Literature and statistics data, opinions of experts in the field of agricultural production and agroeconomists.

## Extrapolations
This dataset has been extrapolated from an original dataset covering the geography Quebec (Canada). The uncertainty has been adjusted accordingly.The uncertainty has been adjusted accordingly. Modelling of the Quebec dataset is described as follow:
Transports are modelled with standard distances. Machine usage is modelled with Quebec diesel consumptions and field works (Beauregard, 2013) and Swiss machines. Mineral fertilizer types are extrapolated from overall mineral fertilizers sales in Quebec (APNC 2011). Organic fertilizer types are extrapolated from animal manure supply data, per region in Quebec, communicated by the Ministry of Agriculture (MAPAQ). Data about agricultural management practices are from BPR (2008. Suivi 2007 du Portrait agroenvironnemental des fermes du Que´bec). Emissions are calculated with standard methods according to ecoinvent documentation (Nemecek and Schnetzer, 2011. '01 crop production-direct field emissions natural resources' v1.2, August 2011, available at https://ecoquery.ecoinvent.org/File/Reports) and the World Food LCA Database guidelines (Nemecek et al. 2014, available at http://www.quantis-intl.com/microsites/wfldb/), except for : 1) pesticides emitted fractions (modelled using PestLCI 2.0, a global model, considering Quebec average conditions for model input parameters, and considering that the degradation/uptake fraction calculated by PestLCI is actually emitted to soil - see the supporting documentation '01 crop production - Quebec.pdf' for rationale), 2) phosphorus and phosphate emissions (modelled using ODEP, a Quebec model, considering geospatialized weighted average conditions for soil, hydrology, and agricultural management practices), and 3) ammonia emissions from organic fertilizers which are calculated according to Quebec conditions and agricultural management practices (coefficients are taken from Parent et Gagne (2010 and 2013 update). Furthermore, an IPCC Tier 2 approach is used for N2O emissions using regional and ecodistrict-based emission factors (Rochette et al., 2008). Due to lack of comprehensive data on pesticides use for Quebec, data from a 2008 survey in the neighbouring province of Ontario are used (OMAFRA, 2008). Uncertainty in terms of the variance of the logtransformed data is the default value as provided by the Data Quality Guidelines for ecoinvent v3 (available at http://www.ecoinvent.org/support/documents-and-files/). Details on modelling and calculations are reported in the supporting documentation '01 crop production - Quebec.pdf' available on ecoinvent reports web page (https://ecoquery.ecoinvent.org/File/Reports).
