# treatment of waste cement-fibre slab, municipal incineration

Dataset: EcoSpold 2, unit process
Geography: CH
Time period: 1994-01-01 to 2021-12-31
Technology level: outdated
Classification: EcoSpold01Categories: waste management/municipal incineration
Classification: ISIC rev.4 ecoinvent: 3821:Treatment and disposal of non-hazardous waste
Tags: ConvertedDataset; Treatment
Scenario: Business-as-Usual
System model: Allocation, cut-off by classification
Generated by: Gabor Doka (obsolete)
Published in: Doka G. 2007
Database: ecoinvent
isCopyrightProtected: true
accessRestrictedTo: 1

## General comment
Inventoried waste contains 36% natural wood; 64% cement hydrated; .
waste composition (wet, in ppm): upper heating value 5.531 MJ/kg; lower heating value 5.036 MJ/kg; H2O 66489; O 564550; H 60725; C 144530; S 3205.8; N 355.31; P 187.68; B 0.75986; Cl 119.14; Br n.a.; F 7.5983; I n.a.; Ag n.a.; As 2.3252; Ba n.a.; Cd 0.46058; Co 1.1548; Cr 13.924; Cu 3.9646; Hg 0.12607; Mn 140.57; Mo 0.29887; Ni 10.737; Pb 28.83; Sb 0.056384; Se n.a.; Sn 0.85073; V 14.805; Zn 57.951; Be n.a.; Sc n.a.; Sr n.a.; Ti n.a.; Tl 0.12324; W n.a.; Si 24593; Fe 6434.8; Ca 117210; Al 8583.5; K 23.548; Mg 71.121; Na 2638.9;
Share of carbon in waste that is biogenic 100%.
Share of iron in waste that is metallic/recyclable 0%.
Net energy produced in MSWI: 0.14MJ/kg waste electric energy and 0.45MJ/kg waste thermal energy
Allocation of energy production: no substitution or expansion. Total burden allocated to waste disposal function of MSWI.
One kg of this waste produces 0.2994 kg of slag and 0.0006114 kg of residues, which are landfilled. Additional solidification with 0.0002446 kg of cement.
[This dataset was already contained in the ecoinvent database version 2. It was not individually updated during the transfer to ecoinvent version 3. Life Cycle Impact Assessment results may still have changed, as they are affected by changes in the supply chain, i.e. in other datasets. This dataset was generated following the ecoinvent quality guidelines for version 2. It may have been subject to central changes described in the ecoinvent version 3 change report (http://www.ecoinvent.org/database/ecoinvent-version-3/reports-of-changes/), and the results of the central updates were reviewed extensively. The changes added e.g. consistent water flows and other information throughout the database. The documentation of this dataset can be found in the ecoinvent reports of version 2, which are still available via the ecoinvent website. The change report linked above covers all central changes that were made during the conversion process.]

## Included activities end
waste-specific air and water emisions from incineration, auxiliary material consumption for flue gas cleaning. Short-term emissions to river water and long-term emisisons to ground water from slag compartment (from bottom slag) and residual material landfill (from solidified fly ashes and scrubber slugde). Process energy demands for MSWI.

## Geography
Specific to the technology mix encountered in Switzerland in 2000. Well applicable to modern incineration practices in Europe, North America or Japan.

## Technology
replaced by newer incineration technology with fly ash extraction. Average Swiss MSWI plants in 2000 with electrostatic precipitator for fly ash (ESP), wet flue gas scrubber and 29.4% SNCR , 32.2% SCR-high dust , 24.6% SCR-low dust -DeNOx facilities and 13.8% without Denox (by burnt waste, according to Swiss average). Share of waste incinerated in plants with magnetic scrap separation from slag : 50%. Gross electric efficiency technology mix 12.997% and Gross thermal efficiency technology mix 25.57%

## Time period
Waste composition as given in literature reference, theoretical data or other source. Transfer coefficients for modern Swiss MSWI. Emission speciation based on early 90ies data.

## Reference product
- waste cement-fibre slab, dismantled: -1 kg; By-product classification Waste; CPC 39: Wastes or scraps
  EcoSpold01Location=CH
  production volume 0 kg; name RP_PV_1
    outdated. Replaced by newer incineration technology with fly ash extraction.
  property price 0 EUR2005
    Waste products are assigned a price of zero as they are assumed to require further treatment.
  property carbon content, fossil 0
    The waste contains 0.64kg inert material (Tab A.3 ecoinvent v2.2 report 13_I for details) and 0.36kg untreated wood (Tab A.4 ecoinvent v2.2 report 13_I for details).
  property carbon content, non-fossil 0.144
    (same comment as for waste cement-fibre slab, dismantled)
  property carbon content 0.144
    carbon content on a dry matter basis (reserved; not for manual entry)
  properties: dry mass 1 kg, water in wet mass 0 kg, wet mass 1 kg, water content 0, carbon allocation 0.144 kg

## Inputs from technosphere
- slag landfill: 5.32e-10 unit; lognormal variance with pedigree 0.06, pedigree (1,1,5,1,1)
  uncertainty is calculated from uncertainties in waste composition and transfer coefficients in incinerator
  EcoSpold01Location=CH
- chemical, organic: 5.43e-7 kg; lognormal variance with pedigree 1.26, pedigree (1,1,5,1,1)
  EcoSpold01Location=GLO
  Proxy for TMT15. uncertainty calculated from uncertainty in average auxiliary material input, and the unertainty of the waste composition of this waste
  properties: dry mass 1 kg, heating value, net 19.03 MJ, carbon content, fossil 0.628, wet mass 1 kg
  note on carbon content, fossil: This dataset is an unweighted average of 20 organic substances (listed in Tab 88.1, ecoinvent v2.2 report 8, part II), being part of the top100 chemicals included in this database. The C-content has also been calculated as an unweighted average of the C content of the substances composing this dataset.
- process-specific burdens, municipal waste incineration: 1 kg; lognormal variance with pedigree 0.04, pedigree (1,1,5,1,1)
  EcoSpold01Location=CH
  demands per kilogram waste. uncertainty is heeded in the module;activityLink introduced to establish a direct link to the corresponding regional supply of this product
- process-specific burdens, residual material landfill: 0.000611 kg; lognormal variance with pedigree 0.11, pedigree (1,1,5,1,1)
  EcoSpold01Location=CH
  uncertainty is calculated from uncertainties in waste composition and transfer coefficients in incinerator;activityLink introduced to establish a direct link to the corresponding regional supply of this product
- residual material landfill: 1.27e-12 unit; lognormal variance with pedigree 0.11, pedigree (1,1,5,1,1)
  (same comment as for slag landfill)
- quicklime, milled, packed: 2.09e-5 kg; lognormal variance with pedigree 0.96, pedigree (1,1,5,1,1)
  EcoSpold01Location=CH
  uncertainty calculated from uncertainty in average auxiliary material input, and the unertainty of the waste composition of this waste
  properties: wet mass 1 kg, dry mass 0.99 kg, water content 0.010101
- sodium hydroxide, without water, in 50% solution state: 0.000135 kg; lognormal variance with pedigree 0.85, pedigree (1,1,5,1,1)
  EcoSpold01Location=RER
  uncertainty calculated from uncertainty in average auxiliary material input, and the unertainty of the waste composition of this waste
  properties: wet mass 1 kg, dry mass 1 kg, heating value, net 3.03 MJ
- ammonia, anhydrous, liquid: 1.79e-5 kg; lognormal variance with pedigree 1.75, pedigree (1,1,5,1,1)
  EcoSpold01Location=CH
  uncertainty calculated from uncertainty in average DeNOx input, uncertainty in the share of thermal NOx, uncertainty of nitrogen content in average municipal waste and the unertainty in nitrogen content in *this* waste.
  properties: wet mass 1 kg, dry mass 1 kg
- titanium dioxide: 5.13e-7 kg; lognormal variance with pedigree 2.46, pedigree (1,1,5,1,1)
  EcoSpold01Location=RER
  uncertainty calculated from uncertainty in average DeNOx input, uncertainty in the share of thermal NOx, uncertainty of nitrogen content in average municipal waste and the unertainty in nitrogen content in *this* waste.
  properties: dry mass 1 kg, wet mass 1 kg
- cement, unspecified: 0.000245 kg; lognormal variance with pedigree 0.12, pedigree (1,1,5,1,1)
  Cement for solidification of landfilled residual material. Uncertainty calculated from unertainty of the waste composition of this waste, of transfer coefficients in the incinerator and of the solidification recipe.
  EcoSpold01Location=CH
  properties: wet mass 1 kg, dry mass 1 kg
- chromium oxide, flakes: 1.05e-8 kg; lognormal variance with pedigree 2.46, pedigree (1,1,5,1,1)
  Proxy for vanadium pentoxide V2O5 in SCR catalyst, uncertainty calculated from uncertainty in average DeNOx input, uncertainty in the share of thermal NOx, uncertainty of nitrogen content in average municipal waste and the unertainty in nitrogen content in *this* waste.
  EcoSpold01Location=RER
  properties: dry mass 1 kg, wet mass 1 kg
- chemical, inorganic: 8.23e-7 kg; lognormal variance with pedigree 0.41, pedigree (1,1,5,1,1)
  EcoSpold01Location=GLO
  Proxy for Polyelectrolyte. uncertainty calculated from uncertainty in average auxiliary material input, and the unertainty of the waste composition of this waste
  properties: wet mass 1 kg, dry mass 1 kg, carbon content, fossil 0.003
  note on carbon content, fossil: This dataset is an unweighted average of 20 inorganic substances (listed in Tab 88.1, ecoinvent v2.2 report 8, part II), being part of the top100 chemicals included in this database. The C-content has also been calculated as an unweighted average of the C content of the substances composing this dataset.
- hydrochloric acid, without water, in 30% solution state: 4.94e-7 kg; lognormal variance with pedigree 0.41, pedigree (1,1,5,1,1)
  uncertainty calculated from uncertainty in average auxiliary material input, and the unertainty of the waste composition of this waste
  EcoSpold01Location=RER
  properties: heating value, net 3.32 MJ, wet mass 1 kg, dry mass 1 kg
- iron (III) chloride, without water, in 40% solution state: 1.37e-6 kg; lognormal variance with pedigree 0.59, pedigree (1,1,5,1,1)
  uncertainty calculated from uncertainty in average auxiliary material input, and the unertainty of the waste composition of this waste
  EcoSpold01Location=CH
  properties: wet mass 1 kg, dry mass 1 kg
- municipal waste incineration facility: 2.5e-10 unit; lognormal variance with pedigree 0.04, pedigree (1,1,5,1,1)
  EcoSpold01Location=CH
  demands per kilogram waste. uncertainty is heeded in the module
- heat, district or industrial, natural gas: 0.001575 MJ; lognormal variance with pedigree 1.75, pedigree (1,1,5,1,1)
  (same comment as for titanium dioxide)
  properties: heating value, net 1 MJ
- process-specific burdens, slag landfill: 0.299 kg; lognormal variance with pedigree 0.06, pedigree (1,1,5,1,1)
  uncertainty is calculated from uncertainties in waste composition and transfer coefficients in incinerator;activityLink introduced to establish a direct link to the corresponding regional supply of this product
  EcoSpold01Location=CH
- waste cement, hydrated: -0.000611 kg; name BP_amount_1; lognormal variance with pedigree 0.12, pedigree (1,1,5,1,1)
  Hydrated cement for solidification of landfilled residual material. Uncertainty calculated from unertainty of the waste composition of this waste and transfer coefficients in the incinerator and of the solidification recipe.
  EcoSpold01Location=CH
  production volume 0 kg; = RP_PV_1* BP_amount_1
    Calculated from the production volume of waste cement-fibre slab, dismantled in proportion to the respective output amounts.
  property price 0 EUR2005; name BP_amount_1_price_EUR2005
  properties: dry mass 1 kg, wet mass 1 kg

## Emissions to nature
- Cobalt [water, surface water]: 1.62e-10 kg; lognormal variance with pedigree 2.49, pedigree (1,1,5,1,1)
  uncertainty is calculated from uncertainties in waste composition and transfer coefficients in incinerator and landfills
- Carbon monoxide, non-fossil [air, urban air close to ground]: 0.000223 kg; lognormal variance with pedigree 0.690625, pedigree (1,3,5,2,1)
  Literature data from switzerland and germany adapted to plant age distribution in switzerland
  Uncertainty: & basic uncertainty of 5; literature data from switzerland and germany adapted to plant age distribution in switzerland
- Molybdenum [air, urban air close to ground]: 5.98e-10 kg; lognormal variance with pedigree 1.78, pedigree (1,1,5,1,1)
  uncertainty is calculated from uncertainties in waste composition and transfer coefficients in incinerator
- Lead [air, urban air close to ground]: 3.72e-10 kg; lognormal variance with pedigree 1.22, pedigree (1,1,5,1,1)
  (same comment as for Molybdenum)
- Hydrogen chloride [air, urban air close to ground]: 1.32e-9 kg; lognormal variance with pedigree 1.03, pedigree (1,1,5,1,1)
  (same comment as for Molybdenum)
- Iron [air, urban air close to ground]: 1.86e-10 kg; lognormal variance with pedigree 0.56, pedigree (1,1,5,1,1)
  (same comment as for Molybdenum)
- Carbon dioxide, non-fossil [air, urban air close to ground]: 0.524 kg; lognormal variance with pedigree 0.13, pedigree (1,1,5,1,1)
  (same comment as for Molybdenum)
- Copper, ion [water, surface water]: 1.46e-10 kg; lognormal variance with pedigree 2.31, pedigree (1,1,5,1,1)
  (same comment as for Cobalt)
- Cadmium, ion [water, ground-, long-term]: 3.89e-7 kg; lognormal variance with pedigree 1.82, pedigree (1,1,5,1,1)
  Long-term emissions from landfilling of incineration residues. uncertainty is calculated from uncertainties in waste composition and transfer coefficients in incinerator and landfills.
- Aluminium [water, ground-, long-term]: 0.00701 kg; lognormal variance with pedigree 0.44, pedigree (1,1,5,1,1)
  (same comment as for Cadmium, ion)
- Methane, non-fossil [air, urban air close to ground]: 6.38e-6 kg; lognormal variance with pedigree 0.091225, pedigree (2,3,5,2,1)
  Confidential data from 5 plants in Switzerland and Germany
  Uncertainty: & basic uncertainty of 1.5; confidential data from 5 plants in Switzerland and Germany
- Manganese [water, surface water]: 7.29e-9 kg; lognormal variance with pedigree 1.96, pedigree (1,1,5,1,1)
  (same comment as for Cobalt)
- Aluminium [air, urban air close to ground]: 3.56e-9 kg; lognormal variance with pedigree 0.51, pedigree (1,1,5,1,1)
  (same comment as for Molybdenum)
- Zinc [air, urban air close to ground]: 1.05e-10 kg; lognormal variance with pedigree 1.14, pedigree (1,1,5,1,1)
  (same comment as for Molybdenum)
- Boron [water, surface water]: 1.19e-7 kg; lognormal variance with pedigree 1.58, pedigree (1,1,5,1,1)
  (same comment as for Cobalt)
- Calcium, ion [water, surface water]: 0.000511 kg; lognormal variance with pedigree 0.61, pedigree (1,1,5,1,1)
  (same comment as for Cobalt)
- Nickel [air, urban air close to ground]: 8.64e-15 kg; lognormal variance with pedigree 1.44, pedigree (1,1,5,1,1)
  (same comment as for Molybdenum)
- Nitrate [water, surface water]: 4.54e-6 kg; lognormal variance with pedigree 0.6, pedigree (1,1,5,1,1)
  (same comment as for Cobalt)
- Potassium, ion [water, ground-, long-term]: 1.94e-5 kg; lognormal variance with pedigree 0.87, pedigree (1,1,5,1,1)
  (same comment as for Cadmium, ion)
- Hydrogen fluoride [air, urban air close to ground]: 4e-9 kg; lognormal variance with pedigree 1.37, pedigree (1,1,5,1,1)
  (same comment as for Molybdenum)
- Magnesium [air, urban air close to ground]: 9.79e-8 kg; lognormal variance with pedigree 1.06, pedigree (1,1,5,1,1)
  (same comment as for Molybdenum)
- Molybdenum [water, surface water]: 5.1e-8 kg; lognormal variance with pedigree 1.21, pedigree (1,1,5,1,1)
  (same comment as for Cobalt)
- Arsenic, ion [water, surface water]: 7.18e-8 kg; lognormal variance with pedigree 1.18, pedigree (1,1,5,1,1)
  (same comment as for Cobalt)
- Tin, ion [water, ground-, long-term]: 8.46e-7 kg; lognormal variance with pedigree 1.63, pedigree (1,1,5,1,1)
  (same comment as for Cadmium, ion)
- Iron, ion [water, ground-, long-term]: 0.00335 kg; lognormal variance with pedigree 0.57, pedigree (1,1,5,1,1)
  (same comment as for Cadmium, ion)
- Sulfate [water, ground-, long-term]: 0.00873 kg; lognormal variance with pedigree 0.54, pedigree (1,1,5,1,1)
  (same comment as for Cadmium, ion)
- Phosphate [water, ground-, long-term]: 1.06e-5 kg; lognormal variance with pedigree 5.5, pedigree (1,1,5,1,1)
  (same comment as for Cadmium, ion)
- Sodium [air, urban air close to ground]: 4.77e-8 kg; lognormal variance with pedigree 0.62, pedigree (1,1,5,1,1)
  (same comment as for Molybdenum)
- Antimony [water, ground-, long-term]: 8.16e-9 kg; lognormal variance with pedigree 2.9, pedigree (1,1,5,1,1)
  (same comment as for Cadmium, ion)
- COD, Chemical Oxygen Demand [water, ground-, long-term]: 0.00357 kg; lognormal variance with pedigree 0.11, pedigree (1,1,5,1,1)
  (same comment as for Cadmium, ion)
- Dinitrogen monoxide [air, urban air close to ground]: 1.5e-6 kg; lognormal variance with pedigree 1.86, pedigree (1,1,5,1,1)
  uncertainty calculated from uncertainty in average N-emissions, uncertainty in the share of thermal NOx, uncertainty of nitrogen content in average municipal waste and the unertainty in nitrogen content in *this* waste.
- Manganese [water, ground-, long-term]: 0.000138 kg; lognormal variance with pedigree 0.96, pedigree (1,1,5,1,1)
  (same comment as for Cadmium, ion)
- Chromium VI [water, surface water]: 8.11e-9 kg; lognormal variance with pedigree 1.1, pedigree (1,1,5,1,1)
  (same comment as for Cobalt)
- Cyanide [air, urban air close to ground]: 3.2e-7 kg; lognormal variance with pedigree 1.86, pedigree (1,1,5,1,1)
  (same comment as for Dinitrogen monoxide)
- Potassium [air, urban air close to ground]: 7.1e-8 kg; lognormal variance with pedigree 1.21, pedigree (1,1,5,1,1)
  (same comment as for Molybdenum)
- Vanadium, ion [water, surface water]: 6.57e-9 kg; lognormal variance with pedigree 2.01, pedigree (1,1,5,1,1)
  (same comment as for Cobalt)
- Silicon [water, ground-, long-term]: 0.00021 kg; lognormal variance with pedigree 5.96, pedigree (1,1,5,1,1)
  (same comment as for Cadmium, ion)
- Zinc, ion [water, ground-, long-term]: 5.16e-5 kg; lognormal variance with pedigree 1.08, pedigree (1,1,5,1,1)
  (same comment as for Cadmium, ion)
- Manganese [air, urban air close to ground]: 1.04e-13 kg; lognormal variance with pedigree 1.1, pedigree (1,1,5,1,1)
  (same comment as for Molybdenum)
- Molybdenum [water, ground-, long-term]: 2.47e-7 kg; lognormal variance with pedigree 1.76, pedigree (1,1,5,1,1)
  (same comment as for Cadmium, ion)
- Cobalt [air, urban air close to ground]: 0 kg; pedigree (1,1,1,1,1)
  (same comment as for Molybdenum)
- Calcium [air, urban air close to ground]: 7.85e-8 kg; lognormal variance with pedigree 0.22, pedigree (1,1,5,1,1)
  (same comment as for Molybdenum)
- Sulfur dioxide [air, urban air close to ground]: 1.92e-7 kg; lognormal variance with pedigree 0.59, pedigree (1,1,5,1,1)
  (same comment as for Molybdenum)
- Chloride [water, ground-, long-term]: 2.81e-6 kg; lognormal variance with pedigree 0.51, pedigree (1,1,5,1,1)
  (same comment as for Cadmium, ion)
- Potassium, ion [water, surface water]: 4.08e-6 kg; lognormal variance with pedigree 0.76, pedigree (1,1,5,1,1)
  (same comment as for Cobalt)
- Chromium, ion [water, surface water]: 7.55e-10 kg; lognormal variance with pedigree 1.3, pedigree (1,1,5,1,1)
  (same comment as for Cobalt)
- Chromium [air, urban air close to ground]: 1.75e-14 kg; lognormal variance with pedigree 1.4, pedigree (1,1,5,1,1)
  (same comment as for Molybdenum)
- Mercury [air, urban air close to ground]: 3.98e-15 kg; lognormal variance with pedigree 1.98, pedigree (1,1,5,1,1)
  (same comment as for Molybdenum)
- Magnesium [water, surface water]: 2.49e-7 kg; lognormal variance with pedigree 1.52, pedigree (1,1,5,1,1)
  (same comment as for Cobalt)
- COD, Chemical Oxygen Demand [water, surface water]: 9.66e-6 kg; lognormal variance with pedigree 0.33, pedigree (1,1,5,1,1)
  (same comment as for Cobalt)
- Copper [air, urban air close to ground]: 1.1e-11 kg; lognormal variance with pedigree 1.5, pedigree (1,1,5,1,1)
  (same comment as for Molybdenum)
- Antimony [water, surface water]: 3.8e-11 kg; lognormal variance with pedigree 2.67, pedigree (1,1,5,1,1)
  (same comment as for Cobalt)
- Zinc, ion [water, surface water]: 2.71e-9 kg; lognormal variance with pedigree 1.57, pedigree (1,1,5,1,1)
  (same comment as for Cobalt)
- Lead [water, ground-, long-term]: 1.95e-5 kg; lognormal variance with pedigree 2.83, pedigree (1,1,5,1,1)
  (same comment as for Cadmium, ion)
- Fluoride [water, surface water]: 5.84e-7 kg; lognormal variance with pedigree 0.98, pedigree (1,1,5,1,1)
  (same comment as for Cobalt)
- Nitrate [water, ground-, long-term]: 1.28e-5 kg; lognormal variance with pedigree 0.85, pedigree (1,1,5,1,1)
  (same comment as for Cadmium, ion)
- BOD5, Biological Oxygen Demand [water, surface water]: 5.41e-6 kg; lognormal variance with pedigree 0.2, pedigree (1,1,5,1,1)
  (same comment as for Cobalt)
- Vanadium, ion [water, ground-, long-term]: 1.45e-6 kg; lognormal variance with pedigree 2.61, pedigree (1,1,5,1,1)
  (same comment as for Cadmium, ion)
- Mercury [water, surface water]: 1.52e-9 kg; lognormal variance with pedigree 1.55, pedigree (1,1,5,1,1)
  (same comment as for Cobalt)
- Cadmium [air, urban air close to ground]: 3.98e-12 kg; lognormal variance with pedigree 1.76, pedigree (1,1,5,1,1)
  (same comment as for Molybdenum)
- Mercury [water, ground-, long-term]: 1.67e-8 kg; lognormal variance with pedigree 2.62, pedigree (1,1,5,1,1)
  (same comment as for Cadmium, ion)
- Thallium [water, surface water]: 7.76e-11 kg; lognormal variance with pedigree 2.59, pedigree (1,1,5,1,1)
  (same comment as for Cobalt)
- Nickel, ion [water, surface water]: 6.76e-9 kg; lognormal variance with pedigree 2.01, pedigree (1,1,5,1,1)
  (same comment as for Cobalt)
- Nickel, ion [water, ground-, long-term]: 1.07e-5 kg; lognormal variance with pedigree 1.3, pedigree (1,1,5,1,1)
  (same comment as for Cadmium, ion)
- Calcium, ion [water, ground-, long-term]: 0.117 kg; lognormal variance with pedigree 0.15, pedigree (1,1,5,1,1)
  (same comment as for Cadmium, ion)
- Chloride [water, surface water]: 0.000116 kg; lognormal variance with pedigree 0.9, pedigree (1,1,5,1,1)
  (same comment as for Cobalt)
- Phosphorus [air, urban air close to ground]: 3.92e-8 kg; lognormal variance with pedigree 0.95, pedigree (1,1,5,1,1)
  (same comment as for Molybdenum)
- Cadmium, ion [water, surface water]: 2.33e-10 kg; lognormal variance with pedigree 2.25, pedigree (1,1,5,1,1)
  (same comment as for Cobalt)
- Iron, ion [water, surface water]: 5.57e-8 kg; lognormal variance with pedigree 1.71, pedigree (1,1,5,1,1)
  (same comment as for Cobalt)
- Aluminium [water, surface water]: 1.13e-7 kg; lognormal variance with pedigree 1.64, pedigree (1,1,5,1,1)
  (same comment as for Cobalt)
- Magnesium [water, ground-, long-term]: 6.57e-5 kg; lognormal variance with pedigree 1.03, pedigree (1,1,5,1,1)
  (same comment as for Cadmium, ion)
- TOC, Total Organic Carbon [water, surface water]: 3.96e-6 kg; lognormal variance with pedigree 0.32, pedigree (1,1,5,1,1)
  (same comment as for Cobalt)
- Cobalt [water, ground-, long-term]: 1.15e-6 kg; lognormal variance with pedigree 1.59, pedigree (1,1,5,1,1)
  (same comment as for Cadmium, ion)
- Chromium VI [water, ground-, long-term]: 1.15e-7 kg; lognormal variance with pedigree 4.49, pedigree (1,1,5,1,1)
  (same comment as for Cadmium, ion)
- Thallium [water, ground-, long-term]: 1.23e-7 kg; lognormal variance with pedigree 1.87, pedigree (1,1,5,1,1)
  (same comment as for Cadmium, ion)
- Sulfate [water, surface water]: 0.000887 kg; lognormal variance with pedigree 0.66, pedigree (1,1,5,1,1)
  (same comment as for Cobalt)
- Boron [air, urban air close to ground]: 9.12e-8 kg; lognormal variance with pedigree 1.64, pedigree (1,1,5,1,1)
  (same comment as for Molybdenum)
- DOC, Dissolved Organic Carbon [water, surface water]: 3.96e-6 kg; lognormal variance with pedigree 0.32, pedigree (1,1,5,1,1)
  (same comment as for Cobalt)
- Ammonia [air, urban air close to ground]: 2.82e-7 kg; lognormal variance with pedigree 1.86, pedigree (1,1,5,1,1)
  (same comment as for Dinitrogen monoxide)
- Sodium, ion [water, ground-, long-term]: 0.00232 kg; lognormal variance with pedigree 0.57, pedigree (1,1,5,1,1)
  (same comment as for Cadmium, ion)
- Tin, ion [water, surface water]: 1.36e-11 kg; lognormal variance with pedigree 2.83, pedigree (1,1,5,1,1)
  (same comment as for Cobalt)
- Sodium, ion [water, surface water]: 0.000323 kg; lognormal variance with pedigree 0.67, pedigree (1,1,5,1,1)
  (same comment as for Cobalt)
- Arsenic [air, urban air close to ground]: 1.55e-15 kg; lognormal variance with pedigree 1.64, pedigree (1,1,5,1,1)
  (same comment as for Molybdenum)
- BOD5, Biological Oxygen Demand [water, ground-, long-term]: 0.00117 kg; lognormal variance with pedigree 0.11, pedigree (1,1,5,1,1)
  (same comment as for Cadmium, ion)
- Phosphate [water, surface water]: 1.77e-8 kg; lognormal variance with pedigree 1.64, pedigree (1,1,5,1,1)
  (same comment as for Cobalt)
- DOC, Dissolved Organic Carbon [water, ground-, long-term]: 0.00141 kg; lognormal variance with pedigree 0.11, pedigree (1,1,5,1,1)
  (same comment as for Cadmium, ion)
- Arsenic, ion [water, ground-, long-term]: 2.25e-6 kg; lognormal variance with pedigree 1.5, pedigree (1,1,5,1,1)
  (same comment as for Cadmium, ion)
- Lead [water, surface water]: 6.23e-10 kg; lognormal variance with pedigree 1.68, pedigree (1,1,5,1,1)
  (same comment as for Cobalt)
- Silicon [water, surface water]: 9.07e-7 kg; lognormal variance with pedigree 1.39, pedigree (1,1,5,1,1)
  (same comment as for Cobalt)
- Boron [water, ground-, long-term]: 5.01e-7 kg; lognormal variance with pedigree 1, pedigree (1,1,5,1,1)
  (same comment as for Cadmium, ion)
- Fluoride [water, ground-, long-term]: 6.78e-6 kg; lognormal variance with pedigree 0.94, pedigree (1,1,5,1,1)
  (same comment as for Cadmium, ion)
- TOC, Total Organic Carbon [water, ground-, long-term]: 0.00141 kg; lognormal variance with pedigree 0.11, pedigree (1,1,5,1,1)
  (same comment as for Cadmium, ion)
- Copper, ion [water, ground-, long-term]: 3.68e-6 kg; lognormal variance with pedigree 1.41, pedigree (1,1,5,1,1)
  (same comment as for Cadmium, ion)
- Nitrogen oxides [air, urban air close to ground]: 1.13e-5 kg; lognormal variance with pedigree 1.86, pedigree (1,1,5,1,1)
  (same comment as for Dinitrogen monoxide)

## Sampling procedure
waste-specific calculation based on literature data

## Extrapolations
This dataset has been extrapolated from year 2000 to the year of the calculation (2021). The uncertainty has been adjusted accordingly.

## Review by Niels Jungbluth 2003-07-15
Passed. Calculation for standard deviation 95 of, i.e., infrastructure,
land occupation, transport services or other services can differ from
standard Pedigree approach used in this project and figures obtained by
this procedure.
