# lightweight concrete block production, expanded clay

Dataset: EcoSpold 2, unit process
Geography: CH
Time period: 1995-01-01 to 2021-12-31
Technology level: current
Classification: EcoSpold01Categories: construction materials/concrete
Classification: ISIC rev.4 ecoinvent: 2399:Manufacture of other non-metallic mineral products n.e.c.
Tags: ConvertedDataset
Scenario: Business-as-Usual
System model: Allocation, cut-off by classification
Generated by: Daniel Kellenberger (obsolete)
Published in: Kellenberger D. 2004
Database: ecoinvent
isCopyrightProtected: true
accessRestrictedTo: 1

## General comment
Hardening is assumed to be by air-drying. It is assumed that there is wastewater and solid waste, but as no exact description on the composition of the wastewater and solid waste is available a proxy for each ("treatment, concrete production effluent, to wastewater treatment, class 3" and "disposal, municipal solid waste, 22.9% water, to municipal incineration") is used. The lifespan of the plant is assumed to be 50 years.
Lightweight concrete block. Image source: http://keramzit.by/data/pictures/poduct/block1.png

## Included activities end
includes the raw materials, their transport to the finishing plant, the air-drying, the packing, the infrastructure and the disposal of wastewater and some solid household (e.g. packing material) waste

## Geography
For some exchanges CH, RER and GLO modules have been used as proxy.

## Technology
The raw material mixture (aggregates, cement and water) of lightweight concrete blocks are poured into a mould then squeezed and finaly hardened by air (assumption for this study)

## Parameters
- fraction, process water, to air: 0.15 dimensionless; name fraction_PW_to_air; lognormal variance with pedigree 0.092025, pedigree (4,4,3,2,4)
  Literature value. In case when no industry/process specific data are available, default evaporation fraction value is used. This value is 15% and is based on literature (Statistics Canada, 2007 & Shaffer, K.H., 2008, Consumptive water use in the Great Lakes Basin, USGS & Shiklomanov, 2003, World Water Resources at the Beginning of the 21st Century) and has been approved by an expert.
- fraction, tap water, to air: 0.15 dimensionless; name fraction_TW_to_air; = fraction_PW_to_air; lognormal variance with pedigree 0.092025, pedigree (4,4,3,2,4)
  Calculated value. See comment in the other parametres present in this dataset. Tap water is considered to be always used as process water, thus process water fractions to air are applied to all tap water input flows to calculate the amount of water consumed in the processes.

## Reference product
- lightweight concrete block, expanded clay: 1 kg; name RP_amount_1; CPC 379: Other non-metallic mineral products n.e.c.; By-product classification allocatable product
  EcoSpold01Location=CH
  production volume 2.07779e6 kg; name RP_PV_1; = 18889035*0.09/(0.9/1.1)
    Estimated value. According to the European mineral statistics 2009-2013 (http://www.bgs.ac.uk/mineralsuk/statistics/europeanStatistics.html), Switzerland does not export Bentonite and imports 19982 tons. For Kaolin it exports 425 tons and imports 17924 tons. Similar values are reported from the Swiss statistical data (https://www.swiss-impex.admin.ch/, accessed 08.02.2016). The production volume for Switzerland are calculated based on the import volume for 2014. Code, name and import volume for CH in kg: 2508.1000 “Bentonite” 19,037,054 kg, 2508.3000 “ Fireclay (excl. expanded clays, kaolin and other kaolinic clays)” 7,608,438kg, 2508.4000 “Clays (excluding fireclay, expanded clay, and kaolin and other kaolinic clays)” 18,889,035 kg, and 2507.0000 “Kaolin and other kaolinic clays, whether or not calcined” 16,839,960 kg. The volume of produced clay is assigned to the different activities based on USGS (2015) estimates of uses in the USA (http://minerals.usgs.gov/minerals/pubs/commodity/clays/mcs-2015-clays.pdf, accessed 08.02.2016) and according to input of clay per reference product. Of common clay, 39% is used for brick (for which 50% is assumed to be used for clay bricks and 50% light clay bricks), 23% lightweight aggregate, 31% cement, and 7% other uses (USGS specifies that 9% of common clay is used for lightweight concrete block production in the 2013 Minerals yearbook http://minerals.usgs.gov/minerals/pubs/commodity/clays/myb1-2013-clays.pdf, accessed 08.02.2016). Of ball clay, 39% is used for floor and wall tiles, 17% sanitary ware, and 44% other uses. Of bentonite 26% absorbents, 24% drilling mud, 15% foundry sand bond (assumed to represent plaster clay), 11% iron ore pelletising, and 24% other uses. Of fire clay, 34% for heavy clay products, and 66% for refractory and other products. Of fuller’s earth, 70% absorbents, and 30% for other uses. The US produce 15 to 25 % of refined clays (without common clay and shale).
  property price 0.422602 EUR2005
    Calculated based on inputs: The price of the product has been calculated as a sum of the values of the material and energy inputs for this product. This value is therefore a rough estimation. It may underestimate the real price since there are additional expenses when producing any product. These expences can include for example labour costs, treatment of waste materials and profit for the producer. Please consider carefully whether this level of data quality is acceptable for your application.
  property carbon content 0
    carbon content on a dry matter basis (reserved; not for manual entry)
  properties: dry mass 1 kg, water in wet mass 0 kg, carbon content, non-fossil 0, carbon content, fossil 0, wet mass 1 kg, water content 0, carbon allocation 0 kg

## Inputs from technosphere
- electricity, medium voltage: 0.0065 kWh; lognormal variance with pedigree 0.1001, pedigree (3,5,5,3,1)
  EcoSpold01Location=UCTE
- diesel, burned in building machine: 0.0158 MJ; lognormal variance with pedigree 0.1001, pedigree (3,5,5,3,1)
  EcoSpold01Location=GLO
  properties: heating value, net 1 MJ
- municipal solid waste: -0.000125 kg; name BP_amount_1; lognormal variance with pedigree 0.69, pedigree (1,1,5,1,1)
  estimated
  EcoSpold01Location=CH
  production volume 259.724 kg; = BP_amount_1* RP_PV_1/ RP_amount_1
    Calculated from the production volume of lightweight concrete block, expanded clay in proportion to the respective output amounts.
  properties: heating value, net 11.74 MJ, carbon content, fossil 0.171549, dry mass 0.771 kg, wet mass 1 kg, water content 0.297017, carbon content, non-fossil 0.261655
  note on heating value, net: Value taken from the general comment of the treatment dataset.
  note on carbon content, fossil: MSW composition in tab 4.1, ecoinvent v2.2 report 13_I. C content referred to 1 kg DM
- tap water: 1.114 kg; name tap_water_input; source Dansk Teknologisk Institut 1995; lognormal variance with pedigree 0.052625, pedigree (3,3,5,2,1)
  Calculated based on literature, (Vionnet, S., Quantis Water Database - Technical Report, 2012).
  EcoSpold01Location=RER
  properties: water content 2962.17, dry mass 0.000337476 kg, wet mass 1 kg, carbon content, fossil 0.00178991
  note on carbon content, fossil: Bicarbonate content is 2.93 mol/m3. CO2 content is 0.1 mol/m3 (ecoinvent v2.2 report 8, Tab 93.1).
- wastewater from concrete production: -8.33e-5 m3; name wastewater_output; lognormal variance with pedigree 0.69, pedigree (1,1,5,1,1)
  EcoSpold01Location=CH
  estimated
  production volume 173.08 m3; = wastewater_output* RP_PV_1/ RP_amount_1
    (same comment as for municipal solid waste)
  property price 0 EUR2005; name wastewater_output_price_EUR2005
  properties: dry mass 0.449139 kg, water content 2225.48, wet mass 1000 kg, carbon content, fossil 0.027074
  note on carbon content, fossil: TOC =0.01216 kg/m3 (Tab A.20, ecoinvent v2.2 report 13_I). TOC was considered as Total Carbon.
- clay pit infrastructure: 1.67e-10 unit; lognormal variance with pedigree 0.69, pedigree (1,1,5,1,1)
  EcoSpold01Location=CH
  estimated
- cement, Portland: 0.1 kg; lognormal variance with pedigree 0.1001, pedigree (3,5,5,3,1)
  EcoSpold01Location=CH
  properties: wet mass 1 kg, dry mass 1 kg
- expanded clay: 0.9 kg; lognormal variance with pedigree 0.1001, pedigree (3,5,5,3,1)
  EcoSpold01Location=DE
  properties: wet mass 1 kg, water content 0.0362694, dry mass 0.965 kg
- packing, clay product: 1 kg; lognormal variance with pedigree 0.69, pedigree (1,1,5,1,1)
  estimated
  EcoSpold01Location=CH

## Emissions to nature
- Water [water, unspecified]: 0.0008636 m3; name water_to_water_unspecified; = (tap_water_input/1000)*(1-fraction_TW_to_air)-(wastewater_output*-1); lognormal variance with pedigree 0.0807, pedigree (2,2,5,1,1)
  Calculated value based on literature values and expert opinion. See comments in the parametres' comment field.
  property carbon content, fossil 0; name C_content_fossil
  property wet mass 1000 kg; name WM
  property fraction, origin: salt water 0; name fraction_origin_salt_water_Ww
  property fraction, origin: fresh water 1; name fraction_origin_fresh_water_Ww
  property fraction, origin: unspecified 0; name fraction_origin_unspecified_Ww
  property carbon content, non-fossil 0; name C_content_non_fossil
  property water in wet mass 1000 kg; name WWM
  property dry mass 0 kg; name DM
- Water [air, unspecified]: 0.0001671 m3; name water_to_air_unspecified; = (tap_water_input/1000*fraction_TW_to_air); lognormal variance with pedigree 0.0807, pedigree (2,2,5,1,1)
  (same comment as for Water)
  property fraction, origin: unspecified 0; name fraction_origin_unspecified
  property fraction, origin: salt water 0; name fraction_origin_salt_water
  property fraction, origin: fresh water 1; name fraction_origin_fresh_water

## Sampling procedure
Literature

## Extrapolations
This dataset has been extrapolated from year 2000 to the year of the calculation (2021). The uncertainty has been adjusted accordingly.

## Review by Roberto Dones 2004-04-05
passed
