# sodium phosphate production

Dataset: EcoSpold 2, unit process
Geography: RoW
Time period: 1994-01-01 to 2021-12-31
Technology level: current
Classification: ISIC rev.4 ecoinvent: 2011:Manufacture of basic chemicals
Synonyms: Tromete; Sodium orthophosphate; Sodium phosphate; Phosphoric acid trisodium salt; TRISODIUM PHOSPHATE; 7601-54-9
Scenario: Business-as-Usual
System model: Allocation, cut-off by classification
Generated by: Roland Hischier
Published in: Zah R. 2007
Database: ecoinvent
isCopyrightProtected: true
accessRestrictedTo: 1

## General comment
This dataset represents the production of 1 kg of sodium phosphate from soda and phosphoric acid. Sodium phosphate, ortho-liquor is the starting point for the production of sodium tripolyphosphate, used within the detergent industry.
Material and energy inputs as well as production of waste and emissions are based on literature sources.
References:
Zah R. and Hischier R. (2007) Life Cycle Inventories of Detergents. Final report ecoinvent data v2.0, No. 12. Swiss Centre for Life Cycle Inventories, Dübendorf, CH.
Gendorf (2016) Umwelterklärung 2015, Werk Gendorf Industriepark, www.gendorf.de.

## Included activities start
From reception of soda and phosphoric acid at the factory gate.

## Included activities end
This activity ends with the production of 1 kg of sodium phosphate. The dataset includes material and energy inputs, production of waste, emissions and infrastructure. The dataset doesn't include water emissions.

## Geography
Average data for UK consumption - here used as average values for the global production. Some values are based on data from a large chemical factory located in Germany. These are assumed to be valid for this geography.

## Technology
In a first step, the phosphate rock is calcinated at temperatures of approx. 750 °C. It is subsequently reacted exothermically with sulphuric acid in the dihydrate process. The phosphoric acid produced is filtered and washed. It has a concentration of 29% and is concentrated to 55% by vaporisation. In the subsequent purification step, the phosphoric acid is dissolved in an organic solvent. The residues that occur are treated with a mixture of solvents and sulphuric acid. The produced waste is treated with calcium carbonate producing a stable material (raffinate solidification process) that can be deposited. The phosphoric acid solution itself is purified in a countercurrent with small quantities of the final product and separated again from the solvent which is reused. The purified phosphoric acid is neutralised with sodium carbonate, and the so called ortholiquor of dissolved sodium phosphate is produced.
Reference:
Zah R. and Hischier R. (2007) Life Cycle Inventories of Detergents. Final report ecoinvent data v2.0, No. 12. Swiss Centre for Life Cycle Inventories, Dübendorf, CH.

## Time period
Date of published literature. Some values are based on data published by the Gendorf factory that were collected between 2011 and 2015. The time period has been adjusted accordingly. For more details, see the comments of the exchanges.

## Parameters
- fraction, process water, to air: 0.205 dimensionless; name fraction_PW_to_air; lognormal variance with pedigree 0.092025, pedigree (4,4,3,2,4)
  Literature value (Statistics Canada, 2007 & Shaffer, K.H., 2008, Consumptive water use in the Great Lakes Basin, USGS) (Vionnet, S., Quantis Water Database - Technical Report, 2012).

## Reference product
- sodium phosphate: 1 kg; name RP; source Landbank 1994; CPC 34240: Phosphates of triammonium; salts and peroxysalts of inorganic acids and metals n.e.c.; By-product classification allocatable product; CAS 7601-54-9
  Sodium phosphate, ortho-liquor is the starting point for the production of sodium tripolyphosphate, used within the detergent industry.
  production volume 2.87201e7 kg; name RP_PV
    Estimated value. The global production volume is extrapolated from the European production volume based on reports from Cefic (European Chemical Industry Council), and the American Chemistry Council.
    According to Cefic (2016a) the global sales of chemicals in the year 2015 was 3 534 billion euros. The reported share of sales per region are: EU28 14.7%; Other Europe (Switzerland, Norway, Turkey, Russia and Ukraine) 2.7%; NAFTA (US, Canada and Mexico) 16.5%; Latin America 3.8%; China 39.9%; Japan 3.9%; Republic of Korea 3.2%; India 2.2%; Rest of Asia 11.9%; Rest of the World 1.3%. Cefic also reports the US total sales, which amount to 518.7 billion euros out of the global 3 534 billion euros (14.7%). The same share is reported by the American Chemistry Council (2016), according to which the USA sales account for 15% of global sales for the year 2016.
    European production volume:
    Estimated value. According to the European Chemical Agency, the consumption of Trisodium orthophosphate for the year of 2016 is estimated to be 5500000 kg. The aforementioned value is the average of the range given in the literature. According to the European Chemical Industry Council (Cefic, 2016a), the total sales of chemicals of the European Union in 2016 amounted to 519 billion euros. Chemical imports were valued at 91 billion euros for the first 11 months of 2016. Based on this, the value for the total imports for the year 2016 was extrapolated, yielding a value of 99.3 billion euros. Furthermore, Cefic (2016b) reports a trade surplus (exports-imports) of 46.4 billion euros (once again extrapolated for the whole year using the value of 42 billion euros for the first 11 months of 2016). Considering all the aforementioned information, the total chemical consumption in the EU is calculated to be 472.6 billion euros (total sales-exports+imports). It is therefore calculated that production is 110% of consumption. This value is used to scale the information on chemical consumption to production. The European production volume is therefore 6050000 kg. Since no data were found for the global production this value was scaled accordingly.
    References:
    American Chemistry Council 2016. Outlook: U.S. Chemical Industry Continues to Outpace Industrial Output; Accounts for More Than One-Half of Construction Spending by Manufacturing Sector. Accessible at: https://www.americanchemistry.com/Media/PressReleasesTranscripts/ACC-news-releases/US-Chemical-Industry-Continues-to-Outpace-Industrial-Output.html
    European Chemical Agency, Brief profile of Trisodium orthophosphate, Accessible at: https://echa.europa.eu/brief-profile/-/briefprofile/100.028.645
    Cefic 2016a. Facts and figures 2016 of the European chemical industry. Accessible at: http://www.cefic.org/Facts-and-Figures/Chemicals-Industry-Profile/
    Cefic 2016b. 2016: EU chemicals output posts positive growth for third year running. Accessible at: http://www.cefic.org/Documents/RESOURCES/Chemical%20Trends%20Report/March-2017-Cefic-Chemicals-Trends-Report.pdf
  property price 0.99 EUR2005
    Calculated value based on data from United Nations Commodity Trade Statistics Database (comtrade.un.org). UN comtrade category: 283522 Mono- or di-sodium phosphates. Year 2005. Using exchange rate of 1EURO = 1.209 USD. Average of price of import into 5 main markets (EU, US, JP, IN and CN).
  property carbon content 0
    carbon content on a dry matter basis (reserved; not for manual entry)
  properties: water in wet mass 0 kg, wet mass 1 kg, water content 0, dry mass 1 kg, carbon content, fossil 0, carbon content, non-fossil 0, carbon allocation 0 kg

## Inputs from technosphere
- soda ash, light, crystalline, heptahydrate: 0.737 kg; source Landbank 1994; lognormal variance with pedigree 0.0286, pedigree (2,5,4,5,1)
  Calculated value: calculation based on literature source. According to literature, the purified phosphoric acid has a concentration of 56%. For the dataset, all chemicals use a functional unit referring to 100% of their respective acting substance, thus the literature value has been multiplied with a factor of 1.79.
  Uncertainty: D
  properties: wet mass 1 kg, dry mass 1 kg, carbon content, fossil 0.0517241, heating value, net 3.43 MJ
- heat, district or industrial, natural gas: 0 MJ; source Landbank 1994; pedigree (1,1,1,1,1)
  Literature value.
  Uncertainty: D
  properties: heating value, net 1 MJ
- phosphoric acid, industrial grade, without water, in 85% solution state: 0.99 kg; source Landbank 1994; lognormal variance with pedigree 0.0286, pedigree (2,5,4,5,1)
  (same comment as for soda ash, light, crystalline, heptahydrate)
  properties: dry mass 1 kg, wet mass 1 kg
- chemical factory, organics: 4e-10 unit; lognormal variance with pedigree 0.31, pedigree (2,3,2,4,3)
  Calculated based on literature data published by the industry. For this activity, no information was readily available concerning infrastructure and land-use. Therefore, the infrastructure is estimated based on data from two chemical factories, the BASF site of Ludwigshafen and the chemical factory in Gendorf (which are both located in Germany), which produce a wide range of chemical substances. Based on this data, the following assumptions are made: the built area amounts to about 4.2 ha, the plant has an average output of 50'000 t/a and a lifespan of fifty years. The estimated infrastructure amount is therefore 4.00 E-10 units per kg of produced chemical.
  References:
  Althaus H.-J., Chudacoff M., Hischier R., Jungbluth N., Osses M. and Primas A. (2007) Life Cycle Inventories of Chemicals. ecoinvent report No. 8, v2.0. EMPA Dübendorf, Swiss Centre for Life Cycle Inventories, Dübendorf, CH.
  Gendorf (2000) Umwelterklärung 2000, Werk Gendorf. Werk Gendorf, Burgkirchen.
- nitrogen, liquid: 0.019 kg; lognormal variance with pedigree 0.0106, pedigree (2,3,2,4,3)
  Calculated based on literature data published by the industry. This value is a 5-year average of data (2011 - 2015) published by the Gendorf factory (Gendorf, 2016, Umwelterklärung, www.gendorf.de), (Gendorf, 2015, Umwelterklärung, www.gendorf.de), (Gendorf, 2014, Umwelterklärung, www.gendorf.de). The amount of nitrogen used per kg of chemical substance produced is calculated using literature data published by the Gendorf factory based in Germany, which produces a wide range of chemical substances. The factory produced 1657400 tonnes of chemical substances in the year 2015 (Gendorf, 2016, Umwelterklärung, www.gendorf.de) and 740000 tonnes of intermediate products. The reported amount of nitrogen used in 2015 was 33512400 Nm3 (Gendorf, 2016, Umwelterklärung, www.gendorf.de). One Nm3 of nitrogen is equal to 1.2506 kg. The resulting amount of nitrogen - the 5-year average (2011 - 2015, weighted by production volume) is 0.019 kg/kg. Nitrogen is mainly used during the production of chemicals for 'blanketing', which is the process of applying gas to the vapour space of a container or vessel in order to control its composition.
  properties: wet mass 1 kg, dry mass 1 kg
- heat, district or industrial, other than natural gas: 0 MJ; source Landbank 1994; pedigree (1,1,1,1,1)
  Literature value.
  Uncertainty: D
  properties: heating value, net 1 MJ
- heat, district or industrial, natural gas: 0.00371865, 0.241281 MJ (2 entries); source Landbank 1994; lognormal variance with pedigree 0.0286, pedigree (2,5,4,5,1)
  Literature value.
  Uncertainty: D
- heat, district or industrial, other than natural gas: 0.000159301, 0.392841 MJ (2 entries); source Landbank 1994; lognormal variance with pedigree 0.0286, pedigree (2,5,4,5,1)
  Literature value.
  Uncertainty: D

## Inputs from nature
- Water, unspecified natural origin [natural resource, in water]: 0.000931 m3; name water_UNO_input; source Landbank 1994; lognormal variance with pedigree 0.0286, pedigree (2,5,4,5,1)
  Literature value.
  Uncertainty: D

## Emissions to nature
- Nitrogen [air, unspecified]: 0.019 kg; lognormal variance with pedigree 0.0106, pedigree (2,3,2,4,3)
  Calculated value. The amount of nitrogen released to air is equal to the amount of nitrogen entering the activity.
- Water [air, unspecified]: 0.000190855 m3; = (water_UNO_input*fraction_PW_to_air); lognormal variance with pedigree 0.0429, pedigree (2,2,2,5,1)
  Calculated as a fraction of the input of water. For more details, refer to the mathematical relation and the parameters.
  property fraction, origin: fresh water 0; name fraction_origin_fresh_water
  property fraction, origin: salt water 0; name fraction_origin_salt_water
  property fraction, origin: unspecified 1; name fraction_origin_unspecified
- Water [water, unspecified]: 0.000740145 m3; = water_UNO_input*(1-fraction_PW_to_air); lognormal variance with pedigree 0.0429, pedigree (2,2,2,5,1)
  (same comment as for Water)
  property fraction, origin: unspecified 1; name fraction_origin_unspecified_Ww
  property wet mass 1000 kg; name WM
  property water in wet mass 1000 kg; name WWM
  property carbon content, non-fossil 0; name C_content_non_fossil
  property fraction, origin: salt water 0; name fraction_origin_salt_water_Ww
  property fraction, origin: fresh water 0; name fraction_origin_fresh_water_Ww
  property carbon content, fossil 0; name C_content_fossil
  property dry mass 0 kg; name DM
- Carbon dioxide, fossil [air, urban air close to ground]: 0.967 kg; source Landbank 1994; lognormal variance with pedigree 0.0286, pedigree (2,5,4,5,1)
  (same comment as for soda ash, light, crystalline, heptahydrate)

## Sampling procedure
Based on literature and estimations. Some values are calculated based on data from a large chemical factory located in Germany. For more details, see the comments of the exchanges.

## Extrapolations
This dataset has been copied from an original dataset covering the geography RER. The uncertainty has been adjusted accordingly.

## Review by Emilia Moreno Ruiz 2017-08-08
This dataset was additionally reviewed in a separate review process by Eric Johnson of Atlantic Consulting as well as Emilia Moreno Ruiz and Gregor Wernet of ecoinvent.
