# treatment of wood ash mixture, pure, landfarming

Dataset: EcoSpold 2, unit process
Geography: CH
Time period: 2000-01-01 to 2021-12-31
Technology level: current
Classification: ISIC rev.4 ecoinvent: 3821:Treatment and disposal of non-hazardous waste
Classification: EcoSpold01Categories: waste management/landfarming
Tags: ConvertedDataset; Treatment
Scenario: Business-as-Usual
System model: Allocation, cut-off by classification
Generated by: Gabor Doka (obsolete)
Published in: Doka G. 2007
Database: ecoinvent
isCopyrightProtected: true
accessRestrictedTo: 1

## General comment
Inventoried waste contains 100% wood ash pure; .
waste composition (wet, in ppm): H2O n.a.; O 445010; H n.a.; C 12000; S 9200; N n.a.; P 9800; B n.a.; Cl 3200; Br n.a.; F n.a.; I n.a.; Ag n.a.; As 6.7; Ba n.a.; Cd 14.2; Co 18; Cr 194.9; Cu 163.2; Hg 0.1; Mn 19956; Mo 3.7; Ni 55.2; Pb 65; Sb n.a.; Se n.a.; Sn n.a.; V 39.5; Zn 1662; Be n.a.; Sc n.a.; Sr n.a.; Ti 1383; Tl n.a.; W n.a.; Si 82600; Fe 22833; Ca 284400; Al 20800; K 54500; Mg 32100; Na n.a.;
Share of carbon in waste that is biogenic 100%.
[This dataset was already contained in the ecoinvent database version 2. It was not individually updated during the transfer to ecoinvent version 3. Life Cycle Impact Assessment results may still have changed, as they are affected by changes in the supply chain, i.e. in other datasets. This dataset was generated following the ecoinvent quality guidelines for version 2. It may have been subject to central changes described in the ecoinvent version 3 change report (http://www.ecoinvent.org/database/ecoinvent-version-3/reports-of-changes/), and the results of the central updates were reviewed extensively. The changes added e.g. consistent water flows and other information throughout the database. The documentation of this dataset can be found in the ecoinvent reports of version 2, which are still available via the ecoinvent website. The change report linked above covers all central changes that were made during the conversion process.]

## Included activities end
direct emissions from landfarming applications (100% to agricultural soil). Burden for spreading process.

## Technology
direct spreading on agricultural areas.

## Time period
Waste composition as given in literature reference.

## Reference product
- wood ash mixture, pure: -1 kg; By-product classification Waste; CPC 3928: Sawdust and wood waste and scrap
  production volume 1.50412e7 kg; = 1.787E+09*0.008417
    Estimated. The regional production volume is extrapolated from the global production volume using the nominal GDP of 2005 (source: United Nations, http://data.un.org/Glossary.aspx?q=GDP+%28current+US%24%29, accessed 20130726 and 20130312).
    Gross domestic product (GDP) at current prices is GDP at prices of the current reporting period. Also known as nominal GDP.
  property price 0 EUR2005
    Waste products are assigned a price of zero as they are assumed to require further treatment.
  property heating value, net 0 MJ
    Non combustible products are assumed to have an LHV equal to zero (0).
  property carbon content 0.012
    carbon content on a dry matter basis (reserved; not for manual entry)
  properties: carbon content, fossil 0, dry mass 1 kg, water content 0, wet mass 1 kg, water in wet mass 0 kg, carbon content, non-fossil 0.012, carbon allocation 0.012 kg

## Inputs from technosphere
- liquid manure spreading, by vacuum tanker: 0.001 m3; lognormal variance with pedigree 0.148, pedigree (5,5,5,1,4)
  Approximate burden for spreading. vaccum tank spreading (in m3) for landfarming of waste (in kg)
  This exchange has an activity link directly to the producing activity because the product is primarily consumed in the same geographical area where it is produced.

## Emissions to nature
- Arsenic [soil, agricultural]: 6.7e-6 kg; lognormal variance with pedigree 1.36, pedigree (1,1,5,1,1)
  direct emission from landfarming process. Uncertainty from uncertainty in waste composition.
- Chromium [soil, agricultural]: 0.000195 kg; lognormal variance with pedigree 0.91, pedigree (1,1,5,1,1)
  (same comment as for Arsenic)
- Cobalt [soil, agricultural]: 1.8e-5 kg; lognormal variance with pedigree 1.23, pedigree (1,1,5,1,1)
  (same comment as for Arsenic)
- Aluminium [soil, agricultural]: 0.0208 kg; lognormal variance with pedigree 0.32, pedigree (1,1,5,1,1)
  (same comment as for Arsenic)
- Titanium [soil, agricultural]: 0.00138 kg; lognormal variance with pedigree 0.66, pedigree (1,1,5,1,1)
  (same comment as for Arsenic)
- Sulfur [soil, agricultural]: 0.0092 kg; lognormal variance with pedigree 0.42, pedigree (1,1,5,1,1)
  (same comment as for Arsenic)
- Calcium [soil, agricultural]: 0.284 kg; lognormal variance with pedigree 0.08, pedigree (1,1,5,1,1)
  (same comment as for Arsenic)
- Nickel [soil, agricultural]: 5.52e-5 kg; lognormal variance with pedigree 1.08, pedigree (1,1,5,1,1)
  (same comment as for Arsenic)
- Lead [soil, agricultural]: 6.5e-5 kg; lognormal variance with pedigree 1.06, pedigree (1,1,5,1,1)
  (same comment as for Arsenic)
- Magnesium [soil, agricultural]: 0.0321 kg; lognormal variance with pedigree 0.27, pedigree (1,1,5,1,1)
  (same comment as for Arsenic)
- Silicon [soil, agricultural]: 0.0826 kg; lognormal variance with pedigree 0.18, pedigree (1,1,5,1,1)
  (same comment as for Arsenic)
- Manganese [soil, agricultural]: 0.02 kg; lognormal variance with pedigree 0.33, pedigree (1,1,5,1,1)
  (same comment as for Arsenic)
- Chloride [soil, agricultural]: 0.0032 kg; lognormal variance with pedigree 0.55, pedigree (1,1,5,1,1)
  (same comment as for Arsenic)
- Zinc [soil, agricultural]: 0.00166 kg; lognormal variance with pedigree 0.63, pedigree (1,1,5,1,1)
  (same comment as for Arsenic)
- Phosphorus [soil, agricultural]: 0.0098 kg; lognormal variance with pedigree 0.41, pedigree (1,1,5,1,1)
  (same comment as for Arsenic)
- Potassium [soil, agricultural]: 0.0545 kg; lognormal variance with pedigree 0.22, pedigree (1,1,5,1,1)
  (same comment as for Arsenic)
- Vanadium [soil, agricultural]: 3.95e-5 kg; lognormal variance with pedigree 1.13, pedigree (1,1,5,1,1)
  (same comment as for Arsenic)
- Carbon [soil, agricultural]: 0.012 kg; lognormal variance with pedigree 0.39, pedigree (1,1,5,1,1)
  (same comment as for Arsenic)
- Molybdenum [soil, agricultural]: 3.7e-6 kg; lognormal variance with pedigree 1.43, pedigree (1,1,5,1,1)
  (same comment as for Arsenic)
- Mercury [soil, agricultural]: 1e-7 kg; lognormal variance with pedigree 1.9, pedigree (1,1,5,1,1)
  (same comment as for Arsenic)
- Iron [soil, agricultural]: 0.0228 kg; lognormal variance with pedigree 0.31, pedigree (1,1,5,1,1)
  (same comment as for Arsenic)
- Copper [soil, agricultural]: 0.000163 kg; lognormal variance with pedigree 0.94, pedigree (1,1,5,1,1)
  (same comment as for Arsenic)
- Cadmium [soil, agricultural]: 1.42e-5 kg; lognormal variance with pedigree 1.26, pedigree (1,1,5,1,1)
  (same comment as for Arsenic)

## Sampling procedure
Waste compositions from literature data.

## Extrapolations
This dataset has been extrapolated from year 2000 to the year of the calculation (2021). The uncertainty has been adjusted accordingly.

## Review by Niels Jungbluth 2003-07-31
Passed.
