# treatment of wastewater from hard fibreboard production, capacity 5E9l/year

Dataset: EcoSpold 2, unit process
Geography: RoW
Time period: 2012-01-01 to 2021-12-31
Technology level: current
Classification: ISIC rev.4 ecoinvent: 3700:Sewerage
Classification: EcoSpold01Categories: waste management/wastewater treatment
Tags: Treatment
Scenario: Business-as-Usual
System model: Allocation, cut-off by classification
Generated by: Frank Werner
Database: ecoinvent
isCopyrightProtected: true
accessRestrictedTo: 1

## General comment
Wastewater purified in a medium size municipal wastewater treatment plant (capacity class 3), with an average capacity size of 24900 per-captia-equivalents PCE.
The treated waste water has the following composition (see sampling procedure for source):
Wastewater contains (in kg/m3): COD: 1.25 (GSD=122.5%); Ntot.: 0.00631 (GSD=122.5%); Ptot.: 0.00159 (GSD=122.5%);
[This dataset is meant to replace the following datasets:]

## Included activities end
Infrastructure materials for municipal wastewater treatment plant, transports, dismantling. Land use burdens.

## Geography
Specific to the technology mix encountered in Switzerland in 2000. Well applicable to modern treatment practices in Europe, North America or Japan.

## Technology
Three stage wastewater treatment (mechanical, biological, chemical) including sludge digestion (fermentation) according to the average technology in Switzerland

## Parameters
- scaling factor: 3.391 dimensionless; name scaling_factor
- fraction, process water, to air: 0.1 dimensionless; lognormal variance with pedigree 0.092025, pedigree (4,4,3,2,4)

## Reference product
- wastewater from hard fibreboard production: -1 m3; = -0.294897959183673 * scaling_factor; CPC 39920: Sewage sludge; By-product classification Waste
  Amount was scaled to 1.
  production volume 2.073e7 m3; name p_board
    Extrapolated from RER production to GLO production of the board, assuming the same quantity of wastewater per m3
  property price 0 EUR2005
    Waste products are assigned a price of zero as they are assumed to require further treatment.

## Inputs from technosphere
- residual material landfill: 0 unit; = 1.05779897959184E-16 * scaling_factor; pedigree (1,1,1,1,1)
  burden from sludge incineration. Uncertainty calculated from wastewater composition and treatment model
  Amount was scaled to the amount of reference product.
  EcoSpold01Location=CH
- titanium dioxide: 7.56e-7 kg; = 2.22942857142857E-07 * scaling_factor; lognormal variance with pedigree 0.035, pedigree (1,1,4,5,1)
  Amount was scaled to the amount of reference product.
  properties: wet mass 1 kg, dry mass 1 kg
- process-specific burdens, slag landfill: 0.01133 kg; = 0.00334119387755102 * scaling_factor; lognormal variance with pedigree 0.04, pedigree (1,1,4,5,1)
  (same comment as for residual material landfill)
- ammonia, anhydrous, liquid: 0 kg; pedigree (1,1,1,1,1)
  Amount was scaled to the amount of reference product.
  properties: wet mass 1 kg, dry mass 1 kg
- process-specific burdens, residual material landfill: 0.00172 kg; = 0.000507224489795918 * scaling_factor; lognormal variance with pedigree 0.04, pedigree (1,1,4,5,1)
  EcoSpold01Location=CH
  burden from sludge incineration. Uncertainty calculated from wastewater composition and treatment model
  Amount was scaled to the amount of reference product.
- iron (III) chloride, without water, in 40% solution state: 0.0099 kg; = 0.00291948979591837 * scaling_factor; lognormal variance with pedigree 0.035, pedigree (1,1,4,5,1)
  Amount was scaled to the amount of reference product.
  properties: dry mass 1 kg, wet mass 1 kg
- waste graphical paper: 0 kg; name w_paper; pedigree (1,1,1,1,1)
  direct wastewater treatment plant burden. Uncertainty calculated from wastewater composition and treatment model
  Amount was scaled to the amount of reference product.
  EcoSpold01Location=CH
  production volume 0 kg
    calculated by the system
  property price 0 EUR2005; name w_paper_price_EUR2005
  properties: carbon content, non-fossil 0.454955, water content 0.126126, wet mass 1 kg, dry mass 0.888 kg, heating value, net 14.12 MJ
  note on heating value, net: Value taken from the general comment of the treatment dataset.
- quicklime, milled, packed: 7.07e-7 kg; = 2.08492857142857E-07 * scaling_factor; lognormal variance with pedigree 0.035, pedigree (1,1,4,5,1)
  Amount was scaled to the amount of reference product.
  properties: water content 0.010101, dry mass 0.99 kg, wet mass 1 kg
- cement, unspecified: 0 kg; pedigree (1,1,1,1,1)
  (same comment as for residual material landfill)
  properties: dry mass 1 kg, wet mass 1 kg
- sodium hydroxide, without water, in 50% solution state: 3.9e-6 kg; = 1.15010204081633E-06 * scaling_factor; lognormal variance with pedigree 0.035, pedigree (1,1,4,5,1)
  Amount was scaled to the amount of reference product.
  properties: heating value, net 3.03 MJ, dry mass 1 kg, wet mass 1 kg
- waste plastic, mixture: 0 kg; name w_plastic; pedigree (1,1,1,1,1)
  (same comment as for waste graphical paper)
  production volume 0 kg
    calculated by the system
  property price 0 EUR2005; name w_plastic_price_EUR2005
  properties: wet mass 1 kg, dry mass 0.847 kg, water content 0.180638, heating value, net 30.79 MJ, carbon content, fossil 0.747344
  note on carbon content, fossil: C content in 1 kg DM was calculated using data in Tab A.2, ecoinvent v2.2 report 13_I
- electricity, for reuse in municipal waste incineration only: 0 kWh; pedigree (1,1,1,1,1)
  Amount was scaled to the amount of reference product.
- heat, for reuse in municipal waste incineration only: 0 MJ; pedigree (1,1,1,1,1)
  Amount was scaled to the amount of reference product.
- wastewater treatment facility, capacity 5E9l/year: 5.6882e-9 unit; = 1.67743857142857E-09 * scaling_factor; lognormal variance with pedigree 0.01, pedigree (1,1,4,5,1)
  EcoSpold01Location=CH
  uncertainty heeded in exchanges of the module
  Amount was scaled to the amount of reference product.
- heat, district or industrial, natural gas: 0 MJ; pedigree (1,1,1,1,1)
  Amount was scaled to the amount of reference product.
  properties: heating value, net 1 MJ
- sewer grid, 5E9l/year, 110 km: 2.178e-7 km; = 6.42287755102041E-08 * scaling_factor; lognormal variance with pedigree 0.01, pedigree (1,1,4,5,1)
  (same comment as for wastewater treatment facility, capacity 5E9l/year)
- slag landfill: 2.01e-11 unit; = 5.92744897959184E-12 * scaling_factor; lognormal variance with pedigree 0.04, pedigree (1,1,4,5,1)
  (same comment as for process-specific burdens, residual material landfill)
- hydrochloric acid, without water, in 30% solution state: 8.92e-8 kg; = 2.63048979591837E-08 * scaling_factor; lognormal variance with pedigree 0.12, pedigree (1,1,4,5,1)
  EcoSpold01Location=RER
  burden from sludge incineration. Uncertainty calculated from wastewater composition and treatment model
  Amount was scaled to the amount of reference product.
  properties: dry mass 1 kg, wet mass 1 kg, heating value, net 3.32 MJ
- municipal waste incineration facility: 1.696e-10 unit; = 5.0014693877551E-11 * scaling_factor; lognormal variance with pedigree 0.02, pedigree (1,1,4,5,1)
  (same comment as for process-specific burdens, residual material landfill)
- process-specific burdens, municipal waste incineration: 0.678 kg; = 0.199940816326531 * scaling_factor; lognormal variance with pedigree 0.02, pedigree (1,1,4,5,1)
  (same comment as for process-specific burdens, residual material landfill)
- waste cement, hydrated: -0.00172 kg; name w_cement; = (0.000507224489795918 * scaling_factor)*-1; lognormal variance with pedigree 0.05, pedigree (1,1,4,5,1)
  (same comment as for process-specific burdens, residual material landfill)
  production volume 0 kg
    calculated by the system
  property price 0 EUR2005; name w_cement_price_EUR2005
  properties: dry mass 1 kg, wet mass 1 kg
- aluminium sulfate, powder: 0.0019 kg; = 0.00056030612244898 * scaling_factor; lognormal variance with pedigree 0.035, pedigree (1,1,4,5,1)
  Amount was scaled to the amount of reference product.
  properties: dry mass 1 kg, wet mass 1 kg
- electricity, low voltage: 0 kWh; pedigree (1,1,1,1,1)
  EcoSpold01Location=CH
  direct wastewater treatment plant burden. Uncertainty calculated from wastewater composition and treatment model
  Amount was scaled to the amount of reference product.
- iron sulfate: 0.0072 kg; = 0.00212326530612245 * scaling_factor; lognormal variance with pedigree 0.035, pedigree (1,1,4,5,1)
  Amount was scaled to the amount of reference product.
  properties: dry mass 1 kg, wet mass 1 kg
- chemical, inorganic: 1.487e-7 kg; = 4.38513265306122E-08 * scaling_factor; lognormal variance with pedigree 0.12, pedigree (1,1,4,5,1)
  EcoSpold01Location=GLO
  burden from sludge incineration. Uncertainty calculated from wastewater composition and treatment model
  Amount was scaled to the amount of reference product.
  properties: wet mass 1 kg, carbon content, fossil 0.003, dry mass 1 kg
  note on carbon content, fossil: This dataset is an unweighted average of 20 inorganic substances (listed in Tab 88.1, ecoinvent v2.2 report 8, part II), being part of the top100 chemicals included in this database. The C-content has also been calculated as an unweighted average of the C content of the substances composing this dataset.
- chromium oxide, flakes: 1.54e-8 kg; = 4.54142857142857E-09 * scaling_factor; lognormal variance with pedigree 0.035, pedigree (1,1,4,5,1)
  Amount was scaled to the amount of reference product.
  properties: dry mass 1 kg, wet mass 1 kg
- ammonia, anhydrous, liquid: 5.53378e-6, 4.75695e-7, 7.40059e-7, 1.46632e-6, 1.43661e-6, 1.50572e-7, 6.73111e-7, 1.59239e-5 kg (8 entries); lognormal variance with pedigree 0.035, pedigree (1,1,4,5,1)
  Amount was scaled to the amount of reference product.
- waste graphical paper: -0.000758025, -0.000115754, -1.01216e-5, -0.000418268, -4.07846e-5, -7.54965e-5, -0.0140816 kg (7 entries); lognormal variance with pedigree 0.01, pedigree (1,1,4,5,1)
  (same comment as for waste graphical paper)
- cement, unspecified: 2.41872e-9, 1.77154e-10, 5.04948e-10, 1.14196e-8, 3.36111e-10, 3.69149e-9, 4.46629e-10, 4.98854e-8 kg (8 entries); lognormal variance with pedigree 0.05, pedigree (1,1,4,5,1)
  (same comment as for residual material landfill)
- waste plastic, mixture: -0.00190479, -0.000127271, -9.62528e-6, -5.25674e-5, -2.12366e-5, -4.99177e-5, -0.0133346 kg (7 entries); lognormal variance with pedigree 0.01, pedigree (1,1,4,5,1)
  (same comment as for waste graphical paper)
- electricity, for reuse in municipal waste incineration only: 0.00332107, 7.97752e-5, 3.52945e-5, 0.0013233, 0.0927406 kWh (5 entries); lognormal variance with pedigree 0.035, pedigree (1,1,4,5,1)
  Amount was scaled to the amount of reference product.
- heat, for reuse in municipal waste incineration only: 0.0150574, 0.000361694, 0.000160022, 0.00599974, 0.547421 MJ (5 entries); lognormal variance with pedigree 0.035, pedigree (1,1,4,5,1)
  Amount was scaled to the amount of reference product.
- heat, district or industrial, natural gas: 3.90079e-5, 0.00253099 MJ (2 entries); lognormal variance with pedigree 0.0431, pedigree (4,2,4,5,1)
  Amount was scaled to the amount of reference product.
- electricity, low voltage: 0.000358263, 6.52328e-5, 0.00105033, 0.0161259, 0.00260889, 0.00749138 kWh (6 entries); lognormal variance with pedigree 0.13, pedigree (1,1,4,5,1)
  (same comment as for electricity, low voltage)

## Emissions to nature
- Ammonia [air, urban air close to ground]: 1.67e-5 kg; = 4.92479591836735E-06 * scaling_factor; lognormal variance with pedigree 0.16, pedigree (1,1,4,5,1)
  Amount was scaled to the amount of reference product.
- Water [air, unspecified]: 0.1 m3; = 0.0294897959183673 * scaling_factor; lognormal variance with pedigree 0.0507, pedigree (2,2,4,5,1)
  Calculated value based on water balance.
  Amount was scaled to the amount of reference product.
- Nitrogen oxides [air, urban air close to ground]: 0.000163 kg; = 4.80683673469388E-05 * scaling_factor; lognormal variance with pedigree 0.16, pedigree (1,1,4,5,1)
  Amount was scaled to the amount of reference product.
- Nitrogen [water, surface water]: 0.00011 kg; = 3.24387755102041E-05 * scaling_factor; lognormal variance with pedigree 0.16, pedigree (1,1,4,5,1)
  Amount was scaled to the amount of reference product.
- Aluminium [water, ground-, long-term]: 0.0002277 kg; = 6.71482653061225E-05 * scaling_factor; lognormal variance with pedigree 0.16, pedigree (1,1,4,5,1)
  Amount was scaled to the amount of reference product.
- Nitrate [water, surface water]: 0.0108 kg; = 0.00318489795918367 * scaling_factor; lognormal variance with pedigree 0.16, pedigree (1,1,4,5,1)
  Amount was scaled to the amount of reference product.
- Iron, ion [water, ground-, long-term]: 0.0028 kg; = 0.000825714285714286 * scaling_factor; lognormal variance with pedigree 0.16, pedigree (1,1,4,5,1)
  Amount was scaled to the amount of reference product.
- Ammonium, ion [water, surface water]: 0.00248 kg; = 0.00073134693877551 * scaling_factor; lognormal variance with pedigree 0.16, pedigree (1,1,4,5,1)
  Amount was scaled to the amount of reference product.
- Phosphate [water, ground-, long-term]: 0.000121 kg; = 3.56826530612245E-05 * scaling_factor; lognormal variance with pedigree 0.16, pedigree (1,1,4,5,1)
  Amount was scaled to the amount of reference product.
- Carbon dioxide, non-fossil [air, urban air close to ground]: 1.678 kg; = 0.494838775510204 * scaling_factor; lognormal variance with pedigree 0.07, pedigree (1,1,4,5,1)
  direct wastewater treatment plant emission plus direct digester gas emission plus emission from sludge incineration. Uncertainty calculated from wastewater composition and treatment model
  Amount was scaled to the amount of reference product.
- Nitrate [water, ground-, long-term]: 1.88e-5 kg; = 5.54408163265306E-06 * scaling_factor; lognormal variance with pedigree 0.16, pedigree (1,1,4,5,1)
  Amount was scaled to the amount of reference product.
- BOD5, Biological Oxygen Demand [water, ground-, long-term]: 0.00114 kg; = 0.000336183673469388 * scaling_factor; lognormal variance with pedigree 0.16, pedigree (1,1,4,5,1)
  emission from sludge incineration. Uncertainty calculated from wastewater composition and treatment model
  Amount was scaled to the amount of reference product.
- Aluminium [water, surface water]: 2.56e-8 kg; = 7.54938775510204E-09 * scaling_factor; lognormal variance with pedigree 0.16, pedigree (1,1,4,5,1)
  Amount was scaled to the amount of reference product.
- DOC, Dissolved Organic Carbon [water, surface water]: 0.0606 kg; = 0.0178708163265306 * scaling_factor; lognormal variance with pedigree 0.01, pedigree (1,1,4,5,1)
  sewer overload discharge plus direct wastewater treatment plant emission plus emission from sludge incineration. Uncertainty calculated from wastewater composition and treatment model
  Amount was scaled to the amount of reference product.
- Iron, ion [water, surface water]: 2.07e-6 kg; = 6.10438775510204E-07 * scaling_factor; lognormal variance with pedigree 0.16, pedigree (1,1,4,5,1)
  Amount was scaled to the amount of reference product.
- NMVOC, non-methane volatile organic compounds, unspecified origin [air, urban air close to ground]: 1.87e-5 kg; = 5.51459183673469E-06 * scaling_factor; lognormal variance with pedigree 0.3, pedigree (1,1,4,5,1)
  direct digester gas emission. Uncertainty calculated from wastewater composition and treatment model
  Amount was scaled to the amount of reference product.
- Chloride [water, surface water]: 0.00646 kg; = 0.00190504081632653 * scaling_factor; lognormal variance with pedigree 0.16, pedigree (1,1,4,5,1)
  Amount was scaled to the amount of reference product.
- BOD5, Biological Oxygen Demand [water, surface water]: 0.07955 kg; = 0.0234591326530612 * scaling_factor; lognormal variance with pedigree 0.1, pedigree (1,1,4,5,1)
  (same comment as for DOC, Dissolved Organic Carbon)
- Phosphate [water, surface water]: 0.00164 kg; = 0.000483632653061224 * scaling_factor; lognormal variance with pedigree 0.192, pedigree (1,1,5,5,1)
  Amount was scaled to the amount of reference product.
- Carbon monoxide, non-fossil [air, urban air close to ground]: 0.00135 kg; = 0.000398112244897959 * scaling_factor; lognormal variance with pedigree 0.2, pedigree (1,1,4,5,1)
  direct digester gas emission plus emission from sludge incineration. Uncertainty calculated from wastewater composition and treatment model
  Amount was scaled to the amount of reference product.
- Nitrite [water, surface water]: 0.0001448 kg; = 4.27012244897959E-05 * scaling_factor; lognormal variance with pedigree 0.16, pedigree (1,1,4,5,1)
  Amount was scaled to the amount of reference product.
- COD, Chemical Oxygen Demand [water, ground-, long-term]: 0.0035 kg; = 0.00103214285714286 * scaling_factor; lognormal variance with pedigree 0.16, pedigree (1,1,4,5,1)
  (same comment as for BOD5, Biological Oxygen Demand)
- Sulfate [water, surface water]: 0.0062 kg; = 0.00182836734693878 * scaling_factor; lognormal variance with pedigree 0.16, pedigree (1,1,4,5,1)
  Amount was scaled to the amount of reference product.
- TOC, Total Organic Carbon [water, surface water]: 0.0649 kg; = 0.0191388775510204 * scaling_factor; lognormal variance with pedigree 0.09, pedigree (1,1,4,5,1)
  (same comment as for DOC, Dissolved Organic Carbon)
- Aluminium [air, urban air close to ground]: 4.81e-7 kg; = 1.41845918367347E-07 * scaling_factor; lognormal variance with pedigree 0.16, pedigree (1,1,4,5,1)
  Amount was scaled to the amount of reference product.
- COD, Chemical Oxygen Demand [water, surface water]: 0.2422 kg; = 0.0714242857142857 * scaling_factor; lognormal variance with pedigree 0.16, pedigree (1,1,4,5,1)
  (same comment as for DOC, Dissolved Organic Carbon)
- Iron [air, urban air close to ground]: 2.01e-7 kg; = 5.92744897959184E-08 * scaling_factor; lognormal variance with pedigree 0.16, pedigree (1,1,4,5,1)
  Amount was scaled to the amount of reference product.
- DOC, Dissolved Organic Carbon [water, ground-, long-term]: 0.00138 kg; = 0.000406959183673469 * scaling_factor; lognormal variance with pedigree 0.16, pedigree (1,1,4,5,1)
  (same comment as for BOD5, Biological Oxygen Demand)
- Phosphorus [air, urban air close to ground]: 1.03e-6 kg; = 3.03744897959184E-07 * scaling_factor; lognormal variance with pedigree 0.16, pedigree (1,1,4,5,1)
  Amount was scaled to the amount of reference product.
- Methane, non-fossil [air, urban air close to ground]: 0.00412 kg; = 0.00121497959183673 * scaling_factor; lognormal variance with pedigree 0.18, pedigree (1,1,4,5,1)
  (same comment as for Carbon monoxide, non-fossil)
- Cyanide [air, urban air close to ground]: 4.71e-7 kg; = 1.3889693877551E-07 * scaling_factor; lognormal variance with pedigree 0.16, pedigree (1,1,4,5,1)
  Amount was scaled to the amount of reference product.
- TOC, Total Organic Carbon [water, ground-, long-term]: 0.00138 kg; = 0.000406959183673469 * scaling_factor; lognormal variance with pedigree 0.16, pedigree (1,1,4,5,1)
  (same comment as for BOD5, Biological Oxygen Demand)
- Dinitrogen monoxide [air, urban air close to ground]: 3.128e-5 kg; = 9.22440816326531E-06 * scaling_factor; lognormal variance with pedigree 0.16, pedigree (1,1,4,5,1)
  Amount was scaled to the amount of reference product.
- Water [water, unspecified]: 0.9 m3; = 0.265408163265306 * scaling_factor; lognormal variance with pedigree 0.0507, pedigree (2,2,4,5,1)
  (same comment as for Water)
  property carbon content, non-fossil 0; name C_content_non_fossil
  property dry mass 0 kg; name DM
  property wet mass 1000 kg; name WM
  property water in wet mass 1000 kg; name WWM
  property carbon content, fossil 0; name C_content_fossil

## Sampling procedure
Survey among member companies of the European Panel Federation; generation of dataset with ecoinvent 2.0 tool for treatment of wastewater

## Review by Gabor Doka 2014-02-19
inventory manually typed down from the legacy WWT tool of eiv2.2, with some undocumented extensions by the ecoinvent centre (water 10% water evaporation).
WW composition is listed in general comments (as in other legacy WWT DS)
