# heat and power co-generation, biogas, gas engine, renewable energy products

Dataset: EcoSpold 2, unit process
Geography: CH
Time period: 2010-01-01 to 2021-12-31
Technology level: modern
Classification: ISIC rev.4 ecoinvent: 3821:Treatment and disposal of non-hazardous waste
Classification: EcoSpold01Categories: biomass/cogeneration
Tags: with true value; certified electricity; biogas power; renewables
Scenario: Business-as-Usual
System model: Allocation, cut-off by classification
Share of production covered: 100 %
Generated by: Christian Bauer
Published in: Jungbluth N. 2007
Database: ecoinvent
isCopyrightProtected: true
accessRestrictedTo: 1

## General comment
The multioutput process "biogas gas burned in cogen with gas engine" delivers the co-products: heat and certified electricity. The allocation is based on the exergy values of heat and electricity. The exergy value of electricity is 1, and the exergy value of heat is 0.17. The degrees of efficiency are as follows: electricity: 0.32 and heat: 0.55.
[This dataset was already contained in the ecoinvent database version 2. It was not individually updated during the transfer to ecoinvent version 3. Life Cycle Impact Assessment results may still have changed, as they are affected by changes in the supply chain, i.e. in other datasets. This dataset was generated following the ecoinvent quality guidelines for version 2. It may have been subject to central changes described in the ecoinvent version 3 change report (http://www.ecoinvent.org/database/ecoinvent-version-3/reports-of-changes/), and the results of the central updates were reviewed extensively. The changes added e.g. consistent water flows and other information throughout the database. The documentation of this dataset can be found in the ecoinvent reports of version 2, which are still available via the ecoinvent website. The change report linked above covers all central changes that were made during the conversion process.]

## Included activities end
Use of biogas in a cogeneration unit. Included are emissions to air, biogas consumption, use and disposal of operational supplements as well as infrastructure expenditures.

## Geography
Inventory represents Swiss data for label-certified electricity.

## Technology
Lambda 1-engine" with a catalytic converter

## Reference product
- electricity, high voltage, renewable energy products: 1 kWh; name electricity; By-product classification allocatable product; CPC 17100: Electrical energy
  production volume 4.2e7 kWh; name apv_el
    Literature value/statistics. Net production of grid-connected certified electricity in 2011 with this technology in Switzerland.
  property true value relation 3.6; name electricity_true_value_relation
    property to calculate "true value" from
  property price 0.101 EUR2005; name electricity_price_EUR2005
    Temporary price data. Calculated as 90% of purchasers price based on: 94% of the average price (to account for a 6% loss in transformation and transmission) for electricity for industrial consumersin 2005 (excluded taxes). From IEA. In addition, regarding label-certified electricity, the Swiss government has a market instrument for renewable energy which is calculated as the difference between the market price and the production price. This was started in 2009 and is 0.45 Rp/kWh. Therefore, the production price of label certified energy is assumed to be the supplyer price plus the 0.45Rp/kWh (http://www.bfe.admin.ch/themen/00612/02073/index.html?lang=de).The unit conversion from CH to EUR is based on the ecoinvent unit conversion file (1 CHF2005 = 0.644 EUR2005). As an approximation, this is also used for global electricity production
  property exergy 3.6 MJ; name electricity_exergy
    allocation factor for electricity (=1) vs. heat, where heat is calculated as the termodynamic mean temperature Tm = (Tfeed-Treturn)/ln(Tfeed/Treturn), relative to the application temperature (Tu, typically = 293 K), i.e. (Tm-Tu)/Tm
  property true value 0.0114644; name electricity_true_value
    allocation property applied in "true value" allocation // value calculated from true value relation

## By-products
- heat, central or small-scale, other than natural gas: 0 MJ; name heat; CPC 17300: Steam and hot water; By-product classification allocatable product
  production volume 2.59875e8 MJ; name apv_heat; = apv_el/ electricity* heat
    In 2002 the production of electricity from biogas was 9.8 GWh/a.
    Calculated from the electricity output (efficiency 55 heat to 32 electricity; conversion factor 3.6 for MJ/kWh)
  property exergy 0.169678 MJ; name heat_exergy
    (same comment as for electricity, high voltage, renewable energy products)
  property true value relation 0.169678; name heat_true_value_relation
    property to calculate "true value" from
  property price 0.0106 EUR2005; name heat_price_EUR2005
    Average European district heat price from Ecoheatcool and Euroheat 2005-2006, Ecoheat Work package 1: The European heat market. Final report. 10.6 EUR/GJ i s the price of district heat. http://www.solarthermalworld.org/files/Ecoheatcool%20WP1%20Web.pdf?download
  property true value 0.00334339; name heat_true_value
    (same comment as for electricity, high voltage, renewable energy products)
  properties: heating value, net 1 MJ

## Inputs from technosphere
- biogas: 0.383148 m3; lognormal variance with pedigree 0.0506, pedigree (1,4,5,1,3)
  Own calculations based onlower heating value of biogas
  Uncertainty: e
  property heating value, net 22.73 MJ; name lower_heating_value
  properties: dry mass 1.15 kg, carbon content, non-fossil 0.449939, wet mass 1.15 kg
  note on heating value, net: Value taken from the general comment of "heat and power co-generation, biogas, gas engine" dataset.
  note on carbon content, non-fossil: Total C content in kg/Nm3 (Tab 12.8, ecoinvent v2.2 report n17), referred to 1kg DM
- heat and power co-generation unit, 160kW electrical, components for electricity only: 4.35495e-8 unit; lognormal variance with pedigree 0.36, pedigree (1,4,5,1,3)
  activityLink introduced to establish a direct link to the corresponding regional supply of this product
  Uncertainty: e
- heat and power co-generation unit, 160kW electrical, components for heat only: 4.35495e-8 unit; lognormal variance with pedigree 0.36, pedigree (1,4,5,1,3)
  Value for cogeneration of natural gas used as approximination
  Uncertainty: e
- lubricating oil: 0.000261297 kg; lognormal variance with pedigree 0.06, pedigree (1,4,5,1,3)
  Ecoinvent V1.1. cogeneration of natural gas.
  Uncertainty: v
  properties: wet mass 1 kg, dry mass 1 kg, carbon content, fossil 0.75, heating value, net 40.2 MJ
  note on carbon content, fossil: Lubricating oil is produced from diesel. C-content/dry mass of fats and oils considered 75%, from: ecoinvent v2.2 report, n 15a, pg 40
  note on heating value, net: Literature value, Source: IPCC 2006, 2006 IPCC Guidelines for National Greenhouse Gas Inventories, Prepared by the National Greenhouse Gas Inventories Programme, Eggleston H.S., Buendia L., Miwa K., Ngara T. and Tanabe K. (eds). Published: IGES, Japan
- waste mineral oil: -0.000261297 kg; name waste; lognormal variance with pedigree 0.062, pedigree (1,4,5,5,3)
  Value of cogeneration of natural gas used as approximination
  Uncertainty: v
  production volume 14175 kg; name apv_waste; = apv_el/ electricity* waste
    Calculated from the production volume of biogas in proportion to the respective output amounts.
  property price 0 EUR2005; name waste_price_EUR2005
  properties: wet mass 1 kg, dry mass 0.9 kg, carbon content, fossil 0.864444, water content 0.111111, heating value, net 34.7 MJ
  note on carbon content, fossil: Tab A.6, ecoinvent v2.2 report 13_I. C content has been calculated after data in the tables, and then referred to 1 kg DM
  note on heating value, net: Value taken from the general comment of the treatment dataset.
- heat and power co-generation unit, 160kW electrical, common components for heat+electricity: 4.35495e-8 unit; lognormal variance with pedigree 0.36, pedigree (1,4,5,1,3)
  Value for cogeneration of natural gas used as approximination
  Uncertainty: e

## Emissions to nature
- Sulfur dioxide [air, non-urban air or from high stacks]: 0.000182908 kg; lognormal variance with pedigree 0.062, pedigree (1,4,5,5,3)
  Uncertainty: o
- Carbon monoxide, non-fossil [air, non-urban air or from high stacks]: 0.000418075 kg; lognormal variance with pedigree 0.182, pedigree (1,4,5,5,3)
  Uncertainty: v
- Dinitrogen monoxide [air, non-urban air or from high stacks]: 2.17747e-5 kg; lognormal variance with pedigree 0.362, pedigree (1,4,5,5,3)
  Own calculations based on carbon content in biogas
  Uncertainty: v
- Methane, non-fossil [air, non-urban air or from high stacks]: 0.000200328 kg; lognormal variance with pedigree 0.324, pedigree (1,4,3,5,3)
  Uncertainty: v
- NMVOC, non-methane volatile organic compounds, unspecified origin [air, non-urban air or from high stacks]: 1.74198e-5 kg; lognormal variance with pedigree 0.362, pedigree (1,4,5,5,3)
  Uncertainty: v
- Nitrogen oxides [air, non-urban air or from high stacks]: 0.000130648 kg; lognormal variance with pedigree 0.182, pedigree (1,4,5,5,3)
  Ecoinvent V1.1. cogeneration of natural gas.
  Uncertainty: v
- Carbon dioxide, non-fossil [air, non-urban air or from high stacks]: 0.727294 kg; lognormal variance with pedigree 0.062, pedigree (1,4,5,5,3)
  This corresponds to 1 MJ of biogas (lower heating value)
  Uncertainty: o
- Platinum [air, non-urban air or from high stacks]: 6.09693e-11 kg; lognormal variance with pedigree 0.712, pedigree (1,4,5,5,3)
  Ecoinvent V1.1. cogeneration of natural gas.
  Uncertainty: v

## Sampling procedure
Literature data

## Review by Carl Vadenbo 2015-05-22
The update of the whole electricity sector for the ecoinvent v3.2 database consist of hundreds of datasets. All these datasets have passed through a streamlined review processes where the underlying modelling of production volumes, technology shares and efficiencies was reviewed in detail prior to the datasets being submitted to the database.
