# tris(2,4-ditert-butylphenyl) phosphite production

Dataset: EcoSpold 2, unit process
Geography: GLO
Time period: 2015-01-01 to 2021-12-31
Technology level: current
Classification: ISIC rev.4 ecoinvent: 2011:Manufacture of basic chemicals
Synonyms: Tris(2,4-di-tert-Butylphenyl)phosphite; Irgafos 168; 31570-04-4; Tris(2,4-ditert-butylphenyl) phosphite; Tris(2,4-di-t-butylphenyl)phosphite; Tris(2,4-di-tert-butylphenyl) phosphite
Scenario: Business-as-Usual
System model: Allocation, cut-off by classification
Generated by: Lucia Valsasina
Database: ecoinvent
isCopyrightProtected: true
accessRestrictedTo: 1

## General comment
This activity produces 1 kg of tris(2,4-ditert-butylphenyl) phosphite production. This product main application is in the plastics and packaging industry, it is used for the production of polymers, adhesives, sealants and coatings (ECHA 2017 and OECD 2009). Tris(2,4-ditert-butylphenyl) phosphite is used as a stabilizer and as an antioxidant (OECD 2009).
Tris(2,4-ditert-butylphenyl) phosphite is usually sold in solid form and close to 100% purity (OECD 2009).
Tris(2,4-ditert-butylphenyl) phosphite is both produced and imported in the European Union (ECHA 2017). ECHA (2017) reports a total consumption between 10 and 100 thousand tonnes. According to OECD SIDS report (2009) in 2002 the global consumption of this product was of 55 thousand tonnes.
Reference(s):
Gendorf (2016) Umwelterklärung 2015, Werk Gendorf Industriepark, www.gendorf.de
ECHA 2017. Tris(2,4-ditert-butylphenyl) phosphite. ECHA European Chemicals Agency. Last updated: 14/01/2017 Retrieved from: https://echa.europa.eu/substance-information/-/substanceinfo/100.046.084, accessed 23 February 2017
OECD SIDS 2009. SIDS Initial Assessment Report Agreed at SIAM 18; resubmitted November 2009 SIAP. Retrieved from: http://webnet.oecd.org/Hpv/UI/handler.axd?id=cfda1bb7-ec51-4010-bc84-2cee9dd819ed, accessed 2 February 2017
Maul et al.1993. PROCESS FOR THE PREPARATION OF TRIS(2,4-DITERT-BUTYLPHENYL) PHOSPHITE. United States Patent 5,235,086
For more information on the model please refer to the dedicate ecoinvent report, access it in the Report section of ecoQuery (http://www.ecoinvent.org/login-databases.html)

## Included activities start
The activity starts when the raw materials enter the process.

## Included activities end
Materials entering the process are included as well as energy uses, infrastructure and emissions.

## Geography
The inputs to the process are calculated based on stoichiometry and literature data, they are therefore considered to be valid for the chosen geography. The inputs of heat, electricity, water, factory and nitrogen are mostly taken as average of industry data. Industry data values are a 5-year average of data (2011 - 2015) published by the Gendorf factory (Gendorf, 2016, Umwelterklärung, www.gendorf.de), (Gendorf, 2015, Umwelterklärung, www.gendorf.de), (Gendorf, 2014, Umwelterklärung, www.gendorf.de). The Gendorf factory is based in Germany, it produces a wide range of chemical substances. The factory produced 1657400 tonnes of chemical substances in the year 2015 (Gendorf, 2016, Umwelterklärung, www.gendorf.de) and 740000 tonnes of intermediate products. Given the range of chemicals produced by the german site, the values are used for the GLO geography, with uncertainty adjusted accordingly.

## Technology
Tris(2,4-ditert-butylphenyl) phosphite is produced from the reaction of 2,4-ditert-butylphenyl and phosphorus trichloride. The reaction happens in three steps with the aid of a catalyst (Maul et al.1993). The catalyst in not considered significant in terms of emissions for the reaction and is therefore not included in this dataset and is assumed to be taken into consideration in the input of chemical factory.
Hydrochloric acid is produced in the reaction. Hydrochloric acid is neutralized with sodium hydroxide resulting in emissions of sodium chloride.
Chemical reaction:
3C14H22O + PCl3 -> C42H63O3P + 3HCl
This inventory representing production of a particular chemical compound is at least partially based on a generic model on the production of chemicals. The data generated by this model have been improved by compound-specific data when available.
The model on production of chemicals is using specific industry or literature data wherever possible and more generic data on chemical production processes to fill compound-specific data gaps when necessary. The basic principles of the model have been published in literature (Hischier 2005, Establishing Life Cycle Inventories of Chemicals Based on Differing Data Availability). The model has been updated and extended with newly available data from the chemical industry.
In the model, unreacted fractions are treated in a waste treatment process, and emissions reported are after a waste treatment process that is included in the scope of this dataset. For volatile reactants, a small level of evaporation is assumed. Solvents and catalysts are mostly recycled in closed-loop systems within the scope of the dataset and reported flows are for losses from this system.
The main source of information for the values for heat, electricity, water (process and cooling), nitrogen, chemical factory is industry data from Gendorf. The values are a 5-year average of data (2011 - 2015) published by the Gendorf factory (Gendorf, 2016, Umwelterklärung, www.gendorf.de), (Gendorf, 2015, Umwelterklärung, www.gendorf.de), (Gendorf, 2014, Umwelterklärung, www.gendorf.de). The Gendorf factory is based in Germany, it produces a wide range of chemical substances. The factory produced 1657400 tonnes of chemical substances in the year 2015 (Gendorf, 2016, Umwelterklärung, www.gendorf.de) and 740000 tonnes of intermediate products.
Reference(s):
Hischier, R. (2005) Establishing Life Cycle Inventories of Chemicals Based on Differing Data Availability (9 pp). The International Journal of Life Cycle Assessment, Volume 10, Issue 1, pp 59–67. 10.1065/lca2004.10.181.7
Gendorf (2016) Umwelterklärung 2015, Werk Gendorf Industriepark, www.gendorf.de
ECHA 2017. Tris(2,4-ditert-butylphenyl) phosphite. ECHA European Chemicals Agency. Last updated: 14/01/2017 Retrieved from: https://echa.europa.eu/substance-information/-/substanceinfo/100.046.084, accessed 23 February 2017
OECD SIDS 2009. SIDS Initial Assessment Report Agreed at SIAM 18; resubmitted November 2009 SIAP. Retrieved from: http://webnet.oecd.org/Hpv/UI/handler.axd?id=cfda1bb7-ec51-4010-bc84-2cee9dd819ed, accessed 2 February 2017
Maul et al.1993. PROCESS FOR THE PREPARATION OF TRIS(2,4-DITERT-BUTYLPHENYL) PHOSPHITE. United States Patent 5,235,086
For more information on the model please refer to the dedicate ecoinvent report, access it in the Report section of ecoQuery (http://www.ecoinvent.org/login-databases.html)

## Time period
The activity is based on stoichiometry and literature data, it is therefore considered not to change significantly over time in terms of inputs. The inputs of heat, electricity, water, factory and nitrogen are mostly taken as average of industry data. Industry data values are a 5-year average of data (2011 - 2015) published by the Gendorf factory (Gendorf, 2016, Umwelterklärung, www.gendorf.de), (Gendorf, 2015, Umwelterklärung, www.gendorf.de), (Gendorf, 2014, Umwelterklärung, www.gendorf.de). The Gendorf factory is based in Germany, it produces a wide range of chemical substances. The factory produced 1657400 tonnes of chemical substances in the year 2015 (Gendorf, 2016, Umwelterklärung, www.gendorf.de) and 740000 tonnes of intermediate products. The time period is therefore set based on the years from Gendorf reference.

## Reference product
- tris(2,4-ditert-butylphenyl) phosphite: 1 kg; name RP; By-product classification allocatable product; CPC 34180: Phosphoric esters and their salts or esters of other inorganic acids (excluding esters of hydrogen halides) an[…]; CAS 31570-04-4
  This activity produces 1 kg of tris(2,4-ditert-butylphenyl) phosphite production. This product main application is in the plastics and packaging industry, it is used for the production of polymers, adhesives, sealants and coatings (ECHA 2017 and OECD 2009). Tris(2,4-ditert-butylphenyl) phosphite is used as a stabilizer and as an antioxidant (OECD 2009).
  Tris(2,4-ditert-butylphenyl) phosphite is usually sold in solid form and close to 100% purity (OECD 2009).
  Tris(2,4-ditert-butylphenyl) phosphite is both produced and imported in the European Union (ECHA 2017). ECHA (2017) reports a total consumption between 10 and 100 thousand tonnes. According to OECD SIDS report (2009) in 2002 the global consumption of this product was of 55 thousand tonnes.
  Reference(s):
  Gendorf (2016) Umwelterklärung 2015, Werk Gendorf Industriepark, www.gendorf.de
  ECHA 2017. Tris(2,4-ditert-butylphenyl) phosphite. ECHA European Chemicals Agency. Last updated: 14/01/2017 Retrieved from: https://echa.europa.eu/substance-information/-/substanceinfo/100.046.084, accessed 23 February 2017
  OECD SIDS 2009. SIDS Initial Assessment Report Agreed at SIAM 18; resubmitted November 2009 SIAP. Retrieved from: http://webnet.oecd.org/Hpv/UI/handler.axd?id=cfda1bb7-ec51-4010-bc84-2cee9dd819ed, accessed 2 February 2017
  Maul et al.1993. PROCESS FOR THE PREPARATION OF TRIS(2,4-DITERT-BUTYLPHENYL) PHOSPHITE. United States Patent 5,235,086
  production volume 3.47701e8 kg; name RP_PV
    Estimated value. The global production volume is extrapolated from the European production volume based on reports from Cefic (European Chemical Industry Council), and the American Chemistry Council.
    According to Cefic (2016a) the global sales of chemicals in the year 2015 was 3 534 billion euros. The reported share of sales per region are: EU28 14.7%; Other Europe (Switzerland, Norway, Turkey, Russia and Ukraine) 2.7%; NAFTA (US, Canada and Mexico) 16.5%; Latin America 3.8%; China 39.9%; Japan 3.9%; Republic of Korea 3.2%; India 2.2%; Rest of Asia 11.9%; Rest of the World 1.3%. Cefic also reports the US total sales, which amount to 518.7 billion euros out of the global 3 534 billion euros (14.7%). The same share is reported by the American Chemistry Council (2016), according to which the USA sales account for 15% of global sales for the year 2016.
    European production volume:
    Estimated value. According to the European Chemical Agency, the consumption of Tris(2,4-ditert-butylphenyl) phosphite for the year of 2016 is estimated to be 55000000 kg. The aforementioned value is the average of the range given in the literature. According to the European Chemical Industry Council (Cefic, 2016a), the total sales of chemicals of the European Union in 2016 amounted to 519 billion euros. Chemical imports were valued at 91 billion euros for the first 11 months of 2016. Based on this, the value for the total imports for the year 2016 was extrapolated, yielding a value of 99.3 billion euros. Furthermore, Cefic (2016b) reports a trade surplus (exports-imports) of 46.4 billion euros (once again extrapolated for the whole year using the value of 42 billion euros for the first 11 months of 2016). Considering all the aforementioned information, the total chemical consumption in the EU is calculated to be 472.6 billion euros (total sales-exports+imports). It is therefore calculated that production is 110% of consumption. This value is used to scale the information on chemical consumption to production. The European production volume is therefore 60500000 kg
    Since no data were found for the global production this value was scaled accordingly.
    References:
    American Chemistry Council 2016. Outlook: U.S. Chemical Industry Continues to Outpace Industrial Output; Accounts for More Than One-Half of Construction Spending by Manufacturing Sector. Accessible at: https://www.americanchemistry.com/Media/PressReleasesTranscripts/ACC-news-releases/US-Chemical-Industry-Continues-to-Outpace-Industrial-Output.html
    European Chemical Agency, Brief profile of Tris(2,4-ditert-butylphenyl) phosphite, Accessible at: https://echa.europa.eu/brief-profile/-/briefprofile/100.046.084
    Cefic 2016a. Facts and figures 2016 of the European chemical industry. Accessible at: http://www.cefic.org/Facts-and-Figures/Chemicals-Industry-Profile/
    Cefic 2016b. 2016: EU chemicals output posts positive growth for third year running. Accessible at: http://www.cefic.org/Documents/RESOURCES/Chemical%20Trends%20Report/March-2017-Cefic-Chemicals-Trends-Report.pdf
  property heating value, net 35.43 MJ
    LHV is calculated based on the elemental composition of the substance. Based on the CAS number of the substance (031570-04-4), the chemical formula of the substance is found to be: C42H63O3P, (PubChem 2020).
    Reference: Kim, S., Chen, J., Cheng, T., Gindulyte, A., He, J., He, S., Li, Q., Shoemaker, B. A., Thiessen, P. A., Yu, B., Zaslavsky, L., Zhang, J., & Bolton, E. E. (2019). PubChem 2019 update: improved access to chemical data. Nucleic acids research, 47(D1), D1102–D1109. https://doi.org/10.1093/nar/gky1033
  property price 2.29155 EUR2005; name RP_price_EUR2005
    Calculated based on inputs: The price of the product has been calculated as a sum of the values of the material and energy inputs for this product. This value is therefore a rough estimation. It may underestimate the real price since there are additional expenses when producing any product. These expences can include for example labour costs, treatment of waste materials and profit for the producer. Please consider carefully whether this level of data quality is acceptable for your application.
  property carbon content 0.779773
    carbon content on a dry matter basis (reserved; not for manual entry)
  properties: dry mass 1 kg, carbon content, non-fossil 0, water content 0, water in wet mass 0 kg, carbon content, fossil 0.779773, wet mass 1 kg, carbon allocation 0.779773 kg

## Inputs from technosphere
- sodium hydroxide, without water, in 50% solution state: 0.195239 kg; lognormal variance with pedigree 0.010025, pedigree (2,3,2,2,3)
  Calculated value based on stoichiometric calculations and literature data.
  39.997108g/mol is the molar mass of sodium hydroxide, without water, in 50% solution state (HNaO).
  646.934182g/mol is the molar mass of tris(2,4-ditert-butylphenyl) phosphite (C42H63O3P).
  Tris(2,4-ditert-butylphenyl) phosphite is produced from the reaction of 2,4-ditert-butylphenyl and phosphorus trichloride. The reaction happens in three steps with the aid of a catalyst (Maul et al.1993). The catalyst in not considered significant in terms of emissions for the reaction and is therefore not included in this dataset and is assumed to be taken into consideration in the input of chemical factory.
  Hydrochloric acid is produced in the reaction. Hydrochloric acid is neutralized with sodium hydroxide resulting in emissions of sodium chloride.
  Chemical reaction:
  3C14H22O + PCl3 -> C42H63O3P + 3HCl
  properties: dry mass 1 kg, heating value, net 3.03 MJ, wet mass 1 kg
- 2,4-di-tert-butylphenol: 1.00715 kg; lognormal variance with pedigree 0.010025, pedigree (2,3,2,2,3)
  Calculated value based on stoichiometric calculations and literature data.
  206.32808g/mol is the molar mass of 2,4-di-tert-butylphenol (C14H22O).
  646.934182g/mol is the molar mass of tris(2,4-ditert-butylphenyl) phosphite (C42H63O3P).
  Tris(2,4-ditert-butylphenyl) phosphite is produced from the reaction of 2,4-ditert-butylphenyl and phosphorus trichloride. The reaction happens in three steps with the aid of a catalyst (Maul et al.1993). The catalyst in not considered significant in terms of emissions for the reaction and is therefore not included in this dataset and is assumed to be taken into consideration in the input of chemical factory.
  Hydrochloric acid is produced in the reaction. Hydrochloric acid is neutralized with sodium hydroxide resulting in emissions of sodium chloride.
  Chemical reaction:
  3C14H22O + PCl3 -> C42H63O3P + 3HCl
  properties: heating value, net 37.61 MJ, dry mass 1 kg, wet mass 1 kg, carbon content, fossil 0.814984
- electricity, medium voltage: 1.248 kWh; lognormal variance with pedigree 0.0912, pedigree (4,4,5,4,4)
  Estimated value. Expert judgement.
  The expert judgement is made starting from Industry data (see details about Gendorf in the paragraph below) and adjusted based on the modelled activity.
  The values are a 5-year average of data (2011 - 2015) published by the Gendorf factory (Gendorf, 2016, Umwelterklärung, www.gendorf.de), (Gendorf, 2015, Umwelterklärung, www.gendorf.de), (Gendorf, 2014, Umwelterklärung, www.gendorf.de). The Gendorf factory is based in Germany, it produces a wide range of chemical substances. The factory produced 1657400 tonnes of chemical substances in the year 2015 (Gendorf, 2016, Umwelterklärung, www.gendorf.de) and 740000 tonnes of intermediate products.
  Reference(s):
  Gendorf (2016) Umwelterklärung 2015, Werk Gendorf Industriepark, www.gendorf.de
- phosphorus trichloride: 0.223454 kg; lognormal variance with pedigree 0.010025, pedigree (2,3,2,2,3)
  Calculated value based on stoichiometric calculations and literature data.
  137.331862g/mol is the molar mass of phosphorus trichloride (PCl3).
  646.934182g/mol is the molar mass of tris(2,4-ditert-butylphenyl) phosphite (C42H63O3P).
  Tris(2,4-ditert-butylphenyl) phosphite is produced from the reaction of 2,4-ditert-butylphenyl and phosphorus trichloride. The reaction happens in three steps with the aid of a catalyst (Maul et al.1993). The catalyst in not considered significant in terms of emissions for the reaction and is therefore not included in this dataset and is assumed to be taken into consideration in the input of chemical factory.
  Hydrochloric acid is produced in the reaction. Hydrochloric acid is neutralized with sodium hydroxide resulting in emissions of sodium chloride.
  Chemical reaction:
  3C14H22O + PCl3 -> C42H63O3P + 3HCl
  properties: dry mass 1 kg, wet mass 1 kg
- wastewater, average: 0 m3; name BP_wastewater_average; pedigree (1,1,1,1,1)
  Calculated based on literature data published by the industry. This value is a 5-year average of data (2011 - 2015) published by the Gendorf factory (Gendorf, 2016, Umwelterklärung, www.gendorf.de), (Gendorf, 2015, Umwelterklärung, www.gendorf.de), (Gendorf, 2014, Umwelterklärung, www.gendorf.de). The amount of wastewater (which is later on treated in the municipal WWTP) per kg of chemical substance produced is calculated using literature data published by the Gendorf factory based in Germany, which produces a wide range of chemical substances. The factory produced 1657400 tonnes of chemical substances in the year 2015 (Gendorf, 2016, Umwelterklärung, www.gendorf.de) and 740000 tonnes of intermediate products. The amount of wastewater which is later on treated in the municipal WWTP in the year 2015 was 1200 tonnes (Gendorf, 2016, Umwelterklärung, www.gendorf.de). The resulting amount of wastewater is 2.7E-06 m3/kg of chemical product produced.
  production volume 0 m3
    Calculated from the production volume of the reference product in proportion to the respective output amounts.
  property price 0 EUR2005; name BP_wastewater_average_price_EUR2005
  properties: wet mass 1000 kg, carbon content, non-fossil 0.194039, dry mass 0.346837 kg, water content 2882.2
  note on carbon content, non-fossil: 0.0673 kg TOC/m3 (Tab A.17, ecoinvent v2.2 report 13_I). TOC was considered as Total Carbon.
- heat, district or industrial, natural gas: 6.45 MJ; lognormal variance with pedigree 0.0912, pedigree (4,4,5,4,4)
  (same comment as for electricity, medium voltage)
  properties: heating value, net 1 MJ
- nitrogen, liquid: 0 kg; pedigree (1,1,1,1,1)
  (same comment as for electricity, medium voltage)
  properties: dry mass 1 kg, wet mass 1 kg
- tap water: 0.078 kg; lognormal variance with pedigree 0.010025, pedigree (2,3,2,2,3)
  Calculated value based on stoichiometric calculations and literature data.
  18.01528g/mol is the molar mass of tap water (H2O).
  646.934182g/mol is the molar mass of tris(2,4-ditert-butylphenyl) phosphite (C42H63O3P).
  Tris(2,4-ditert-butylphenyl) phosphite is produced from the reaction of 2,4-ditert-butylphenyl and phosphorus trichloride. The reaction happens in three steps with the aid of a catalyst (Maul et al.1993). The catalyst in not considered significant in terms of emissions for the reaction and is therefore not included in this dataset and is assumed to be taken into consideration in the input of chemical factory.
  Hydrochloric acid is produced in the reaction. Hydrochloric acid is neutralized with sodium hydroxide resulting in emissions of sodium chloride.
  Chemical reaction:
  3C14H22O + PCl3 -> C42H63O3P + 3HCl
  properties: carbon content, fossil 0.00178991, dry mass 0.000337476 kg, water content 2962.17, wet mass 1 kg
  note on carbon content, fossil: Bicarbonate content is 2.93 mol/m3. CO2 content is 0.1 mol/m3 (ecoinvent v2.2 report 8, Tab 93.1).
- chemical factory, organics: 4e-10 unit; lognormal variance with pedigree 0.31, pedigree (2,3,2,4,3)
  Calculated based on literature data published by the industry. For this activity, no information was readily available concerning infrastructure and land-use. Therefore, the infrastructure is estimated based on data from two chemical factories, the BASF site of Ludwigshafen and the chemical factory in Gendorf (which are both located in Germany), which produce a wide range of chemical substances. Based on this data, the following assumptions are made: the built area amounts to about 4.2 ha, the plant has an average output of 50'000 t/a and a lifespan of fifty years. The estimated infrastructure amount is therefore 4.00 E-10 units per kg of produced chemical.
  References:
  Althaus H.-J., Chudacoff M., Hischier R., Jungbluth N., Osses M. and Primas A. (2007) Life Cycle Inventories of Chemicals. ecoinvent report No. 8, v2.0. EMPA Dübendorf, Swiss Centre for Life Cycle Inventories, Dübendorf, CH.
  Gendorf (2000) Umwelterklärung 2000, Werk Gendorf. Werk Gendorf, Burgkirchen.
- heat, from steam, in chemical industry: 0 MJ; pedigree (1,1,1,1,1)
  (same comment as for electricity, medium voltage)
  properties: heating value, net 1 MJ
- wastewater, average: -8.43646e-7, -9.12666e-8, -1.76509e-6 m3 (3 entries); lognormal variance with pedigree 0.0106, pedigree (2,3,2,4,3)
  (same comment as for wastewater, average)
  production volume 938.793 m3
- nitrogen, liquid: 0.0122763, 0.0447237 kg (2 entries); lognormal variance with pedigree 0.0912, pedigree (4,4,5,4,4)
  (same comment as for electricity, medium voltage)
- heat, from steam, in chemical industry: 0.0899315, 0.510069 MJ (2 entries); lognormal variance with pedigree 0.0912, pedigree (4,4,5,4,4)
  (same comment as for electricity, medium voltage)

## Inputs from nature
- Water, well, in ground [natural resource, in water]: 0.00249 m3; lognormal variance with pedigree 0.0912, pedigree (4,4,5,4,4)
  (same comment as for electricity, medium voltage)
- Water, river [natural resource, in water]: 0.00258 m3; lognormal variance with pedigree 0.0912, pedigree (4,4,5,4,4)
  (same comment as for electricity, medium voltage)
- Water, cooling, unspecified natural origin [natural resource, in water]: 0.0492 m3; lognormal variance with pedigree 0.0912, pedigree (4,4,5,4,4)
  (same comment as for electricity, medium voltage)

## Emissions to nature
- 2,4-di-tert-butylphenol [water, unspecified]: 0.00503577 kg; lognormal variance with pedigree 0.0106, pedigree (2,3,2,4,3)
  Calculated value. The values is based on a generic model. The basic principles of the model have been published in literature (Hischier 2005, Establishing Life Cycle Inventories of Chemicals Based on Differing Data Availability). The model has been updated and extended with newly available data from the chemical industry. Find more information in the dedicated report on the ecoinvent website.
  Reference(s):
  Hischier, R. (2005) Establishing Life Cycle Inventories of Chemicals Based on Differing Data Availability (9 pp). The International Journal of Life Cycle Assessment, Volume 10, Issue 1, pp 59–67. 10.1065/lca2004.10.181.7
- Phosphorus trichloride [water, unspecified]: 0.000190734 kg; lognormal variance with pedigree 0.0106, pedigree (2,3,2,4,3)
  (same comment as for 2,4-di-tert-butylphenol)
- Phosphorus trichloride [air, unspecified]: 0.00735801 kg; lognormal variance with pedigree 0.0106, pedigree (2,3,2,4,3)
  (same comment as for 2,4-di-tert-butylphenol)
- Phosphate [water, unspecified]: 0.00250612 kg; lognormal variance with pedigree 0.0106, pedigree (2,3,2,4,3)
  (same comment as for 2,4-di-tert-butylphenol)
- Nitrogen [air, unspecified]: 0.057 kg; lognormal variance with pedigree 0.0912, pedigree (4,4,5,4,4)
  (same comment as for electricity, medium voltage)
- Chloride, ion [water, unspecified]: 0.00822016 kg; lognormal variance with pedigree 0.0106, pedigree (2,3,2,4,3)
  (same comment as for 2,4-di-tert-butylphenol)
- Water [water, unspecified]: 0.0501 m3; lognormal variance with pedigree 0.0106, pedigree (2,3,2,4,3)
  (same comment as for 2,4-di-tert-butylphenol)
- Chloride [water, unspecified]: 0.15899 kg; lognormal variance with pedigree 0.0106, pedigree (2,3,2,4,3)
  (same comment as for 2,4-di-tert-butylphenol)
- Water [air, unspecified]: 0.0042 m3; lognormal variance with pedigree 0.0106, pedigree (2,3,2,4,3)
  (same comment as for 2,4-di-tert-butylphenol)
- Carbon dioxide, fossil [air, unspecified]: 0.142859 kg; lognormal variance with pedigree 0.0106, pedigree (2,3,2,4,3)
  (same comment as for 2,4-di-tert-butylphenol)
- Sodium, ion [water, unspecified]: 0.11222 kg; lognormal variance with pedigree 0.0106, pedigree (2,3,2,4,3)
  (same comment as for 2,4-di-tert-butylphenol)

## Sampling procedure
Literature data and stochiometric calculation.

## Extrapolations
This dataset has been extrapolated from year 2020 to the year of the calculation (2021). The uncertainty has been adjusted accordingly.

## Review by Emilia Moreno Ruiz 2017-08-10
This dataset was additionally reviewed in a separate review process by Eric Johnson of Atlantic Consulting as well as Emilia Moreno Ruiz and Gregor Wernet of ecoinvent.
