# printed wiring board production, mounted mainboard, laptop computer, Pb containing

Dataset: EcoSpold 2, unit process
Geography: GLO
Time period: 2005-01-01 to 2021-12-31
Technology level: current
Classification: EcoSpold01Categories: electronics/module
Classification: ISIC rev.4 ecoinvent: 2610:Manufacture of electronic components and boards
Tags: ConvertedDataset
Scenario: Business-as-Usual
System model: Allocation, cut-off by classification
Generated by: Roland Hischier
Published in: Hischier R. 2007
Database: ecoinvent
isCopyrightProtected: true
accessRestrictedTo: 1

## General comment
This dataset represents the average composition and production efforts for 1 kg of a motherboard used in a Laptop PC. It is based on a typical Laptop PC mainboard, used in modern computers. Main data are taken from the literature, own estimations and assumptions. Infrastructure and production efforts are based on own assumptions.
[This dataset was already contained in the ecoinvent database version 2. It was not individually updated during the transfer to ecoinvent version 3. Life Cycle Impact Assessment results may still have changed, as they are affected by changes in the supply chain, i.e. in other datasets. This dataset was generated following the ecoinvent quality guidelines for version 2. It may have been subject to central changes described in the ecoinvent version 3 change report (http://www.ecoinvent.org/database/ecoinvent-version-3/reports-of-changes/), and the results of the central updates were reviewed extensively. The changes added e.g. consistent water flows and other information throughout the database. The documentation of this dataset can be found in the ecoinvent reports of version 2, which are still available via the ecoinvent website. The change report linked above covers all central changes that were made during the conversion process.]

## Included activities start
From reception of printed wiring board at the factory gate.

## Included activities end
This dataset includes component input and production efforts (incl. PWB waste due to failure in mounting) for the production of Laptop PC mainboards, using Pb-containing solder material.

## Geography
Data represent a global valuable composition of Laptop PC mainboards.

## Technology
Average PWB mounting technology (solder paste production line)

## Reference product
- printed wiring board, mounted mainboard, laptop computer, Pb containing: 1 kg; CPC 47160: Electronic integrated circuits; By-product classification allocatable product
  The motherboard is the largest circuit board (printed wiring board) in a PC. It contains the microprocessor(s) with heat sink, solid-state random access memory (RAM), support chips, Basic Input/Output System (BIOS), backup battery, etc. Many motherboards include built-in modems, sound, video, Ethernet, SCSI host adapters, RAID, Firewire, and other options. The fabrication of a printed wiring board is described in more details in part II (“modules”) of this report.
  EcoSpold01Location=GLO
  production volume 1 kg
    Dummy value to be replaced by measured, estimated or calculated value
  property price 319.29 EUR2005
    Calculated based on inputs: The price of the product has been calculated as a sum of the values of the material and energy inputs for this product. This value is therefore a rough estimation. It may underestimate the real price since there are additional expenses when producing any product. These expences can include for example labour costs, treatment of waste materials and profit for the producer. Please consider carefully whether this level of data quality is acceptable for your application.
  property carbon content, fossil 0.138333
    C content was calculated as the addition of C content in the PWB components
  property carbon content 0.138333
    carbon content on a dry matter basis (reserved; not for manual entry)
  properties: water in wet mass 0 kg, water content 0, carbon content, non-fossil 0, wet mass 1 kg, dry mass 1 kg, carbon allocation 0.138333 kg

## Inputs from technosphere
- mounting, through-hole technology, Pb-containing solder: 0.02911 m2; source Kemna R. 2005; lognormal variance with pedigree 0.0527, pedigree (3,3,5,3,1)
  EcoSpold01Location=GLO
  Estimation, based on literature and own assumptions.
  Uncertainty: data from literature plus own assumptions
- resistor, surface-mounted: 0.019388 kg; source Kemna R. 2005; lognormal variance with pedigree 0.0527, pedigree (3,3,5,3,1)
  (same comment as for mounting, through-hole technology, Pb-containing solder)
  properties: carbon content, fossil 0.00893558, wet mass 1 kg, dry mass 1 kg
  note on carbon content, fossil: Calculated as the addition of C contents in the product composition, and referred to 1 kg DM resistor.
- integrated circuit, logic type: 0.1449 kg; source Kemna R. 2005; lognormal variance with pedigree 0.0527, pedigree (3,3,5,3,1)
  (same comment as for mounting, through-hole technology, Pb-containing solder)
  properties: dry mass 1 kg, wet mass 1 kg, carbon content, fossil 0.221701
  note on carbon content, fossil: Calculated as the addition of C contents in the product composition
- printed wiring board, for surface mounting, Pb containing surface: 0.19407 m2; source Kemna R. 2005; lognormal variance with pedigree 0.0507, pedigree (1,3,5,3,1)
  EcoSpold01Location=GLO
  Estimation, based on literature and own assumptions.
  Uncertainty: data from literature
  properties: carbon content, fossil 0.109783, wet mass 3.26 kg, dry mass 3.26 kg
  note on carbon content, fossil: C content was calculated as the addition of C content in the PWB components, listed in Tab 2.2 (ecoinvent v2.2 report 18_II), and considering a final weight of 3.26 kg/m2 (an efficiency of 88%). Referred to 1 kg DM PWB
- integrated circuit, memory type: 0.10816 kg; source Kemna R. 2005; lognormal variance with pedigree 0.0527, pedigree (3,3,5,3,1)
  (same comment as for mounting, through-hole technology, Pb-containing solder)
  properties: carbon content, fossil 0.113389, dry mass 1 kg, wet mass 1 kg
- diode, glass-, for surface-mounting: 0.0030612 kg; source Kemna R. 2005; lognormal variance with pedigree 0.0527, pedigree (3,3,5,3,1)
  Estimation, based on literature and own assumptions.
  EcoSpold01Location=GLO
  Uncertainty: data from literature plus own assumptions
  properties: carbon content, fossil 0.00928779, wet mass 1 kg, dry mass 1 kg
- mounting, surface mount technology, Pb-containing solder: 0.16496 m2; source Kemna R. 2005; lognormal variance with pedigree 0.0527, pedigree (3,3,5,3,1)
  (same comment as for diode, glass-, for surface-mounting)
- used printed wiring boards: -0.020408 kg; lognormal variance with pedigree 0.0527, pedigree (3,3,5,3,1)
  Estimation, based on a european PWB mounting company.
  EcoSpold01Location=GLO
  Uncertainty: data from literature plus own assumptions
  production volume 0.020408 kg
    Calculated from the production volume of printed wiring board, mounted mainboard, laptop computer, Pb containing in proportion to the respective output amounts.
  properties: carbon content, fossil 0.193742, dry mass 1 kg, wet mass 1 kg, carbon content, non-fossil 0.000960142
  note on carbon content, fossil: Composition of printed wiring boards used to calculate C content
- electric connector, peripheral type buss: 0.043878 kg; source Kemna R. 2005; lognormal variance with pedigree 0.0527, pedigree (3,3,5,3,1)
  (same comment as for diode, glass-, for surface-mounting)
  properties: carbon content, fossil 0.160512, dry mass 1 kg, wet mass 1 kg
- capacitor, for surface-mounting: 0.027551 kg; source Kemna R. 2005; lognormal variance with pedigree 0.0527, pedigree (3,3,5,3,1)
  (same comment as for diode, glass-, for surface-mounting)
  properties: dry mass 1 kg, wet mass 1 kg
- transistor, surface-mounted: 0.0081633 kg; source Kemna R. 2005; lognormal variance with pedigree 0.0527, pedigree (3,3,5,3,1)
  (same comment as for diode, glass-, for surface-mounting)
  properties: carbon content, fossil 0.083636, wet mass 1 kg, dry mass 1 kg
  note on carbon content, fossil: Calculated as the addition of C contents in the product composition, and referred to 1 kg DM transistor.
- electric connector, peripheral component interconnect buss: 0.032653 kg; source Kemna R. 2005; lognormal variance with pedigree 0.0527, pedigree (3,3,5,3,1)
  (same comment as for diode, glass-, for surface-mounting)
  properties: dry mass 1 kg, carbon content, fossil 0.506549, wet mass 1 kg
- light emitting diode: 0.0010204 kg; source Kemna R. 2005; lognormal variance with pedigree 0.0527, pedigree (3,3,5,3,1)
  (same comment as for diode, glass-, for surface-mounting)
  properties: carbon content, fossil 0.0203273, wet mass 1 kg, dry mass 1 kg

## Sampling procedure
literature & own estimations

## Extrapolations
This dataset has been extrapolated from year 2005 to the year of the calculation (2021). The uncertainty has been adjusted accordingly.

## Review by Rolf Frischknecht 2007-09-21
passed.

## Review by Roland Hischier 2011-09-21
Transfer of documentation done.
