# treatment of wastewater from wafer fabrication, capacity 1.1E10l/year

Dataset: EcoSpold 2, unit process
Geography: RoW
Time period: 1994-01-01 to 2021-12-31
Technology level: current
Classification: EcoSpold01Categories: waste management/wastewater treatment
Classification: ISIC rev.4 ecoinvent: 3700:Sewerage
Tags: ConvertedDataset; Treatment
Scenario: Business-as-Usual
System model: Allocation, cut-off by classification
Generated by: Martin Lehmann
Published in: Hischier R. 2007
Database: ecoinvent
isCopyrightProtected: true
accessRestrictedTo: 1

## General comment
Wastewater purified in a moderatly large municipal wastewater treatment plant (capacity class 2), with an average capacity size of 71100 per-captia-equivalents PCE.
Wastewater contains (in kg/m3): COD: 0.095 (GSD=122.5%); Ntot.: 0.016 (GSD=122.5%); Ptot.: 0.016 (GSD=122.5%); As: 0.0007 (GSD=224.1%); Cd: 0.0007 (GSD=223.8%); Cr: 0.0007 (GSD=223.8%); Cu: 0.0066 (GSD=223.8%); Ni: 0.0066 (GSD=223.8%); Pb: 0.0007 (GSD=223.8%); Si: 0.0066 (GSD=224.1%); Mg: 0.0007 (GSD=224.1%);
[This dataset was already contained in the ecoinvent database version 2. It was not individually updated during the transfer to ecoinvent version 3. Life Cycle Impact Assessment results may still have changed, as they are affected by changes in the supply chain, i.e. in other datasets. This dataset was generated following the ecoinvent quality guidelines for version 2. It may have been subject to central changes described in the ecoinvent version 3 change report (http://www.ecoinvent.org/database/ecoinvent-version-3/reports-of-changes/), and the results of the central updates were reviewed extensively. The changes added e.g. consistent water flows and other information throughout the database. The documentation of this dataset can be found in the ecoinvent reports of version 2, which are still available via the ecoinvent website. The change report linked above covers all central changes that were made during the conversion process.]

## Included activities end
Infrastructure materials for municipal wastewater treatment plant, transports, dismantling. Land use burdens.

## Geography
Specific to the technology mix encountered in Switzerland in 2000. Well applicable to modern treatment practices in Europe, North America or Japan.

## Technology
Three stage wastewater treatment (mechanical, biological, chemical) including sludge digestion (fermentation) according to the average technology in Switzerland

## Parameters
- fraction, process water, to air: 0.1 dimensionless; name fraction_PW_to_air; lognormal variance with pedigree 0.092025, pedigree (4,4,3,2,4)

## Reference product
- wastewater from wafer fabrication: -1 m3; CPC 39920: Sewage sludge; By-product classification Waste
  EcoSpold01Location=CH
  production volume 3.96633 m3
    This is a placeholder value that does not reflect real-world production volumes. This dataset does not currently require a real-world production volume to work in the database framework, and no actual data were collected yet. This has no negative effect on the results of the ecoinvent database.
  property carbon content, fossil 0.121862
    COD: 0.095 kg/m3 (Tab 3.7, ecoinvent v2.2 report 18_1). COD was converted to TOC, using conversion factors in Tab 4.10 (ecoinvent v2.2 report 13_IV). TOC was considered as Total Carbon.
  property price 0 EUR2005
    Waste products are assigned a price of zero as they are assumed to require further treatment.
  property carbon content 0.121862
    carbon content on a dry matter basis (reserved; not for manual entry)
  properties: carbon content, non-fossil 0, water content 2962.17, wet mass 1000 kg, dry mass 0.337476 kg, water in wet mass 999.663 kg, carbon allocation 0.0411255 kg

## Inputs from technosphere
- slag landfill: 1.3486e-10 unit; lognormal variance with pedigree 0.072, pedigree (1,1,5,5,1)
  EcoSpold01Location=CH
  burden from sludge incineration. Uncertainty calculated from wastewater composition and treatment model
- iron (III) chloride, without water, in 40% solution state: 0.09935 kg; lognormal variance with pedigree 0.102, pedigree (1,1,5,5,1)
  EcoSpold01Location=CH
  direct wastewater treatment plant burden plus burden from sludge incineration. Uncertainty calculated from wastewater composition and treatment model
  properties: dry mass 1 kg, wet mass 1 kg
- aluminium sulfate, powder: 0.019613 kg; lognormal variance with pedigree 0.102, pedigree (1,1,5,5,1)
  EcoSpold01Location=RER
  direct wastewater treatment plant burden. Uncertainty calculated from wastewater composition and treatment model
  properties: dry mass 1 kg, wet mass 1 kg
- process-specific burdens, municipal waste incineration: 0 kg; pedigree (1,1,1,1,1)
  burden from sludge incineration. Uncertainty calculated from wastewater composition and treatment model
  EcoSpold01Location=CH
- sewer grid, 1.1E10l/year, 242 km: 1.6832e-7 km; lognormal variance with pedigree 0.042, pedigree (1,1,5,5,1)
  uncertainty heeded in exchanges of the module
  EcoSpold01Location=CH
- wastewater treatment facility, capacity 1.1E10l/year: 1.9883e-9 unit; lognormal variance with pedigree 0.042, pedigree (1,1,5,5,1)
  uncertainty heeded in exchanges of the module
  EcoSpold01Location=CH
- quicklime, milled, packed: 3.2688e-6 kg; lognormal variance with pedigree 0.112, pedigree (1,1,5,5,1)
  (same comment as for slag landfill)
  properties: water content 0.010101, dry mass 0.99 kg, wet mass 1 kg
- municipal waste incineration facility: 7.0577e-11 unit; lognormal variance with pedigree 0.042, pedigree (1,1,5,5,1)
  (same comment as for process-specific burdens, municipal waste incineration)
- process-specific burdens, residual material landfill: 0 kg; pedigree (1,1,1,1,1)
  (same comment as for slag landfill)
- sodium hydroxide, without water, in 50% solution state: 1.803e-5 kg; lognormal variance with pedigree 0.112, pedigree (1,1,5,5,1)
  burden from sludge incineration. Uncertainty calculated from wastewater composition and treatment model
  EcoSpold01Location=RER
  properties: dry mass 1 kg, wet mass 1 kg, heating value, net 3.03 MJ
- titanium dioxide: 1.1757e-6 kg; lognormal variance with pedigree 0.542, pedigree (1,1,5,5,1)
  (same comment as for sodium hydroxide, without water, in 50% solution state)
  properties: wet mass 1 kg, dry mass 1 kg
- chromium oxide, flakes: 2.3994e-8 kg; lognormal variance with pedigree 0.542, pedigree (1,1,5,5,1)
  EcoSpold01Location=RER
  burden from sludge incineration. Uncertainty calculated from wastewater composition and treatment model
  properties: dry mass 1 kg, wet mass 1 kg
- chemical, organic: 0.00065633 kg; lognormal variance with pedigree 0.712, pedigree (1,1,5,5,1)
  burden from sludge incineration. Uncertainty calculated from wastewater composition and treatment model
  EcoSpold01Location=GLO
  properties: wet mass 1 kg, dry mass 1 kg, heating value, net 19.03 MJ, carbon content, fossil 0.628
  note on carbon content, fossil: This dataset is an unweighted average of 20 organic substances (listed in Tab 88.1, ecoinvent v2.2 report 8, part II), being part of the top100 chemicals included in this database. The C-content has also been calculated as an unweighted average of the C content of the substances composing this dataset.
- waste cement, hydrated: 0 kg; pedigree (1,1,1,1,1)
  (same comment as for slag landfill)
  production volume 0 kg
    Calculated from the production volume of wastewater from wafer fabrication in proportion to the respective output amounts.
  properties: dry mass 1 kg, wet mass 1 kg
- heat, district or industrial, other than natural gas: 0 MJ; pedigree (1,1,1,1,1)
  (same comment as for slag landfill)
  properties: heating value, net 1 MJ
- liquid manure spreading, by vacuum tanker: 0.00061068 m3; lognormal variance with pedigree 0.042, pedigree (1,1,5,5,1)
  EcoSpold01Location=CH
  burden from sludge spreading. Uncertainty calculated from wastewater composition and treatment model
- electricity, high voltage: 0 kWh; pedigree (1,1,1,1,1)
  (same comment as for slag landfill)
- process-specific burdens, slag landfill: 0 kg; pedigree (1,1,1,1,1)
  (same comment as for process-specific burdens, municipal waste incineration)
- chemical, inorganic: 1.5764e-6 kg; lognormal variance with pedigree 0.172, pedigree (1,1,5,5,1)
  EcoSpold01Location=GLO
  burden from sludge incineration. Uncertainty calculated from wastewater composition and treatment model
  properties: carbon content, fossil 0.003, wet mass 1 kg, dry mass 1 kg
  note on carbon content, fossil: This dataset is an unweighted average of 20 inorganic substances (listed in Tab 88.1, ecoinvent v2.2 report 8, part II), being part of the top100 chemicals included in this database. The C-content has also been calculated as an unweighted average of the C content of the substances composing this dataset.
- hydrochloric acid, without water, in 30% solution state: 9.4586e-7 kg; lognormal variance with pedigree 0.172, pedigree (1,1,5,5,1)
  (same comment as for chromium oxide, flakes)
  properties: heating value, net 3.32 MJ, dry mass 1 kg, wet mass 1 kg
- electricity, low voltage: 0 kWh; pedigree (1,1,1,1,1)
  EcoSpold01Location=CH
  direct wastewater treatment plant burden. Uncertainty calculated from wastewater composition and treatment model
- cement, unspecified: 0 kg; pedigree (1,1,1,1,1)
  (same comment as for slag landfill)
  properties: wet mass 1 kg, dry mass 1 kg
- waste graphical paper: -0.0155 kg; lognormal variance with pedigree 0.042, pedigree (1,1,5,5,1)
  direct wastewater treatment plant burden. Uncertainty calculated from wastewater composition and treatment model
  EcoSpold01Location=CH
  production volume 0.062 kg
    (same comment as for waste cement, hydrated)
  properties: carbon content, non-fossil 0.454955, dry mass 0.888 kg, wet mass 1 kg, heating value, net 14.12 MJ, water content 0.126126
  note on heating value, net: Value taken from the general comment of the treatment dataset.
- ammonia, anhydrous, liquid: 0 kg; pedigree (1,1,1,1,1)
  (same comment as for process-specific burdens, municipal waste incineration)
  properties: dry mass 1 kg, wet mass 1 kg
- residual material landfill: 2.0986e-11 unit; lognormal variance with pedigree 0.072, pedigree (1,1,5,5,1)
  (same comment as for process-specific burdens, municipal waste incineration)
- heat, district or industrial, natural gas: 0 MJ; pedigree (1,1,1,1,1)
  (same comment as for chromium oxide, flakes)
  properties: heating value, net 1 MJ
- iron sulfate: 0.072568 kg; lognormal variance with pedigree 0.102, pedigree (1,1,5,5,1)
  (same comment as for aluminium sulfate, powder)
  properties: dry mass 1 kg, wet mass 1 kg
- waste plastic, mixture: 0 kg; pedigree (1,1,1,1,1)
  (same comment as for electricity, low voltage)
  production volume 0 kg
    (same comment as for waste cement, hydrated)
  properties: water content 0.180638, wet mass 1 kg, carbon content, fossil 0.747344, dry mass 0.847 kg, heating value, net 30.79 MJ
  note on carbon content, fossil: C content in 1 kg DM was calculated using data in Tab A.2, ecoinvent v2.2 report 13_I
- process-specific burdens, municipal waste incineration: 0.0798583, 0.202452 kg (2 entries); lognormal variance with pedigree 0.042, pedigree (1,1,5,5,1)
  (same comment as for process-specific burdens, municipal waste incineration)
- process-specific burdens, residual material landfill: 0.00284939, 0.00722361 kg (2 entries); lognormal variance with pedigree 0.072, pedigree (1,1,5,5,1)
  (same comment as for slag landfill)
- waste cement, hydrated: -0.00284939, -0.00722361 kg (2 entries); lognormal variance with pedigree 0.082, pedigree (1,1,5,5,1)
  (same comment as for slag landfill)
  production volume 0.0399529 kg
- heat, district or industrial, other than natural gas: 9.36806e-5, 0.00565688, 0.231019 MJ (3 entries); lognormal variance with pedigree 0.042, pedigree (1,1,5,5,1)
  (same comment as for slag landfill)
- electricity, high voltage: 0.000410156, 7.86309e-5, 0.00181115, 0.00593547, 0.00133319, 0.0191974, 0.00304453, 0.00877652 kWh (8 entries); lognormal variance with pedigree 0.492, pedigree (1,1,5,5,1)
  (same comment as for slag landfill)
- process-specific burdens, slag landfill: 0.0214591, 0.0544019 kg (2 entries); lognormal variance with pedigree 0.072, pedigree (1,1,5,5,1)
  (same comment as for process-specific burdens, municipal waste incineration)
- electricity, low voltage: 0.00169113, 0.000307922, 0.00695097, 0.0242851, 0.00495793, 0.0761201, 0.0123149, 0.035362 kWh (8 entries); lognormal variance with pedigree 0.052, pedigree (1,1,5,5,1)
  (same comment as for electricity, low voltage)
- cement, unspecified: 0.000581799, 0.000121055, 8.86646e-6, 2.52723e-5, 0.000571542, 1.68221e-5, 0.000184757, 2.23535e-5, 0.00249673 kg (9 entries); lognormal variance with pedigree 0.082, pedigree (1,1,5,5,1)
  (same comment as for slag landfill)
- ammonia, anhydrous, liquid: 8.60944e-6, 7.40084e-7, 1.15138e-6, 2.28129e-6, 2.23506e-6, 2.34259e-7, 1.04722e-6, 2.47743e-5 kg (8 entries); lognormal variance with pedigree 0.222, pedigree (1,1,5,5,1)
  (same comment as for process-specific burdens, municipal waste incineration)
- heat, district or industrial, natural gas: 4.01237e-5, 0.000961441, 0.00260339 MJ (3 entries); lognormal variance with pedigree 0.222, pedigree (1,1,5,5,1)
  (same comment as for chromium oxide, flakes)
- waste plastic, mixture: -0.00172425, -0.000115208, -8.71297e-6, -4.75849e-5, -1.92238e-5, -4.51863e-5, -0.00146914, -0.0120707 kg (8 entries); lognormal variance with pedigree 0.042, pedigree (1,1,5,5,1)
  (same comment as for electricity, low voltage)
  production volume 0.0614782 kg

## Emissions to nature
- Ammonium, ion [water, surface water]: 0.0062851 kg; lognormal variance with pedigree 0.062, pedigree (1,1,5,5,1)
  direct wastewater treatment plant emission. Uncertainty calculated from wastewater composition and treatment model
- Carbon monoxide, fossil [air, urban air close to ground]: 0.00013479 kg; lognormal variance with pedigree 0.202, pedigree (1,1,5,5,1)
  emission from sludge incineration. Uncertainty calculated from wastewater composition and treatment model
- Iron, ion [water, ground-, long-term]: 0.01748 kg; lognormal variance with pedigree 0.932, pedigree (1,1,5,5,1)
  (same comment as for Carbon monoxide, fossil)
- Magnesium [water, ground-, long-term]: 3.8875e-5 kg; lognormal variance with pedigree 0.712, pedigree (1,1,5,5,1)
  (same comment as for Carbon monoxide, fossil)
- Lead [soil, agricultural]: 0.00024097 kg; lognormal variance with pedigree 0.712, pedigree (1,1,5,5,1)
  emission from sludge spreading. Uncertainty calculated from wastewater composition and treatment model
- TOC, Total Organic Carbon [water, surface water]: 0.0049323 kg; lognormal variance with pedigree 0.042, pedigree (1,1,5,5,1)
  sewer overload discharge plus direct wastewater treatment plant emission plus emission from sludge incineration. Uncertainty calculated from wastewater composition and treatment model
- Magnesium [water, surface water]: 0.00063148 kg; lognormal variance with pedigree 0.672, pedigree (1,1,5,5,1)
  (same comment as for TOC, Total Organic Carbon)
- Nitrogen oxides [air, urban air close to ground]: 0.00039896 kg; lognormal variance with pedigree 0.082, pedigree (1,1,5,5,1)
  direct digester gas emission plus emission from sludge incineration. Uncertainty calculated from wastewater composition and treatment model
- Carbon dioxide, fossil [air, urban air close to ground]: 0.11734 kg; lognormal variance with pedigree 0.062, pedigree (1,1,5,5,1)
  (same comment as for Carbon monoxide, fossil)
- Chromium [air, urban air close to ground]: 1.5633e-11 kg; lognormal variance with pedigree 0.802, pedigree (1,1,5,5,1)
  (same comment as for Nitrogen oxides)
- Silicon [water, surface water]: 0.00039664 kg; lognormal variance with pedigree 0.572, pedigree (1,1,5,5,1)
  (same comment as for TOC, Total Organic Carbon)
- Aluminium [soil, agricultural]: 0.0011976 kg; lognormal variance with pedigree 0.102, pedigree (1,1,5,5,1)
  (same comment as for Lead)
- Nitrogen [water, surface water]: 0.0002793 kg; lognormal variance with pedigree 0.082, pedigree (1,1,5,5,1)
  (same comment as for Ammonium, ion)
- DOC, Dissolved Organic Carbon [water, ground-, long-term]: 6.46e-5 kg; lognormal variance with pedigree 0.112, pedigree (1,1,5,5,1)
  (same comment as for Carbon monoxide, fossil)
- DOC, Dissolved Organic Carbon [water, surface water]: 0.0046071 kg; lognormal variance with pedigree 0.082, pedigree (1,1,5,5,1)
  (same comment as for TOC, Total Organic Carbon)
- Magnesium [air, urban air close to ground]: 5.7989e-8 kg; lognormal variance with pedigree 0.732, pedigree (1,1,5,5,1)
  (same comment as for Nitrogen oxides)
- Arsenic, ion [water, surface water]: 0.00059051 kg; lognormal variance with pedigree 0.612, pedigree (1,1,5,5,1)
  (same comment as for TOC, Total Organic Carbon)
- Chloride [water, surface water]: 0.065054 kg; lognormal variance with pedigree 0.102, pedigree (1,1,5,5,1)
  (same comment as for TOC, Total Organic Carbon)
- Nickel, ion [water, surface water]: 0.0040032 kg; lognormal variance with pedigree 0.662, pedigree (1,1,5,5,1)
  (same comment as for TOC, Total Organic Carbon)
- Iron [air, urban air close to ground]: 1.2459e-6 kg; lognormal variance with pedigree 0.142, pedigree (1,1,5,5,1)
  (same comment as for Nitrogen oxides)
- Lead [water, ground-, long-term]: 2.7224e-5 kg; lognormal variance with pedigree 6.922, pedigree (1,1,5,5,1)
  (same comment as for Carbon monoxide, fossil)
- Phosphate [water, ground-, long-term]: 0.00074695 kg; lognormal variance with pedigree 4.272, pedigree (1,1,5,5,1)
  (same comment as for Carbon monoxide, fossil)
- Carbon [soil, agricultural]: 0.004172 kg; lognormal variance with pedigree 0.102, pedigree (1,1,5,5,1)
  (same comment as for Lead)
- Lead [air, urban air close to ground]: 1.4206e-8 kg; lognormal variance with pedigree 0.752, pedigree (1,1,5,5,1)
  (same comment as for Nitrogen oxides)
- Ammonia [air, urban air close to ground]: 0.00020299 kg; lognormal variance with pedigree 0.282, pedigree (1,1,5,5,1)
  direct digester gas emission plus emission from sludge incineration plus emission from sludge spreading. Uncertainty calculated from wastewater composition and treatment model
- Chromium VI [water, surface water]: 0.00036214 kg; lognormal variance with pedigree 0.642, pedigree (1,1,5,5,1)
  (same comment as for TOC, Total Organic Carbon)
- Arsenic, ion [water, ground-, long-term]: 5.0875e-5 kg; lognormal variance with pedigree 0.712, pedigree (1,1,5,5,1)
  (same comment as for Carbon monoxide, fossil)
- Silicon [water, ground-, long-term]: 0.00033038 kg; lognormal variance with pedigree 5.462, pedigree (1,1,5,5,1)
  (same comment as for Carbon monoxide, fossil)
- Copper, ion [water, surface water]: 0.001712 kg; lognormal variance with pedigree 0.652, pedigree (1,1,5,5,1)
  (same comment as for TOC, Total Organic Carbon)
- BOD5, Biological Oxygen Demand [water, surface water]: 0.0060458 kg; lognormal variance with pedigree 0.052, pedigree (1,1,5,5,1)
  (same comment as for TOC, Total Organic Carbon)
- Cyanide [air, urban air close to ground]: 7.3271e-7 kg; lognormal variance with pedigree 0.242, pedigree (1,1,5,5,1)
  (same comment as for Carbon monoxide, fossil)
- TOC, Total Organic Carbon [water, ground-, long-term]: 6.46e-5 kg; lognormal variance with pedigree 0.112, pedigree (1,1,5,5,1)
  (same comment as for Carbon monoxide, fossil)
- BOD5, Biological Oxygen Demand [water, ground-, long-term]: 5.34e-5 kg; lognormal variance with pedigree 0.112, pedigree (1,1,5,5,1)
  (same comment as for Carbon monoxide, fossil)
- Methane, fossil [air, urban air close to ground]: 0.00031424 kg; lognormal variance with pedigree 0.142, pedigree (1,1,5,5,1)
  (same comment as for Carbon monoxide, fossil)
- Silicon [air, urban air close to ground]: 8.8576e-6 kg; lognormal variance with pedigree 0.732, pedigree (1,1,5,5,1)
  (same comment as for Nitrogen oxides)
- Silicon [soil, agricultural]: 0.0023994 kg; lognormal variance with pedigree 0.712, pedigree (1,1,5,5,1)
  (same comment as for Lead)
- Phosphorus [air, urban air close to ground]: 6.3779e-6 kg; lognormal variance with pedigree 0.112, pedigree (1,1,5,5,1)
  (same comment as for Nitrogen oxides)
- Copper [soil, agricultural]: 0.0018904 kg; lognormal variance with pedigree 0.712, pedigree (1,1,5,5,1)
  (same comment as for Lead)
- Nickel [air, urban air close to ground]: 6.8756e-11 kg; lognormal variance with pedigree 0.812, pedigree (1,1,5,5,1)
  (same comment as for Nitrogen oxides)
- Phosphate [water, surface water]: 0.016756 kg; lognormal variance with pedigree 0.082, pedigree (1,1,5,5,1)
  sewer overload discharge plus direct wastewater treatment plant emission plus emission from sludge incineration plus emission from sludge spreading. Uncertainty calculated from wastewater composition and treatment model
- Magnesium [soil, agricultural]: 2.6558e-5 kg; lognormal variance with pedigree 0.712, pedigree (1,1,5,5,1)
  (same comment as for Lead)
- COD, Chemical Oxygen Demand [water, ground-, long-term]: 0.00016325 kg; lognormal variance with pedigree 0.112, pedigree (1,1,5,5,1)
  (same comment as for Carbon monoxide, fossil)
- Chromium [soil, agricultural]: 0.00013333 kg; lognormal variance with pedigree 0.712, pedigree (1,1,5,5,1)
  (same comment as for Lead)
- Chromium VI [water, ground-, long-term]: 2.2381e-5 kg; lognormal variance with pedigree 1.092, pedigree (1,1,5,5,1)
  (same comment as for Carbon monoxide, fossil)
- NMVOC, non-methane volatile organic compounds, unspecified origin [air, urban air close to ground]: 1.4232e-6 kg; lognormal variance with pedigree 0.262, pedigree (1,1,5,5,1)
  direct digester gas emission. Uncertainty calculated from wastewater composition and treatment model
- Phosphate [water, ground-]: 7.0258e-5 kg; lognormal variance with pedigree 0.142, pedigree (1,1,5,5,1)
  (same comment as for Lead)
- Cadmium [air, urban air close to ground]: 1.1797e-8 kg; lognormal variance with pedigree 0.742, pedigree (1,1,5,5,1)
  (same comment as for Nitrogen oxides)
- Nickel [soil, agricultural]: 0.0010047 kg; lognormal variance with pedigree 0.712, pedigree (1,1,5,5,1)
  (same comment as for Lead)
- Aluminium [air, urban air close to ground]: 2.9667e-6 kg; lognormal variance with pedigree 0.122, pedigree (1,1,5,5,1)
  (same comment as for Nitrogen oxides)
- Nitrate [water, ground-, long-term]: 2.9246e-5 kg; lognormal variance with pedigree 0.082, pedigree (1,1,5,5,1)
  (same comment as for Carbon monoxide, fossil)
- Arsenic [air, urban air close to ground]: 1.9706e-7 kg; lognormal variance with pedigree 0.732, pedigree (1,1,5,5,1)
  (same comment as for Nitrogen oxides)
- Chromium, ion [water, surface water]: 6.7382e-7 kg; lognormal variance with pedigree 0.722, pedigree (1,1,5,5,1)
  (same comment as for Carbon monoxide, fossil)
- Copper [air, urban air close to ground]: 2.2128e-8 kg; lognormal variance with pedigree 0.762, pedigree (1,1,5,5,1)
  (same comment as for Nitrogen oxides)
- Cadmium [soil, agricultural]: 0.00013333 kg; lognormal variance with pedigree 0.712, pedigree (1,1,5,5,1)
  (same comment as for Lead)
- Water [air, unspecified]: 0.1 m3; name water_to_air_unspecified; lognormal variance with pedigree 0.0827, pedigree (2,2,5,5,1)
  Calculated value based on water balance.
  property fraction, origin: salt water 0; name fraction_origin_salt_water
  property fraction, origin: fresh water 0; name fraction_origin_fresh_water
  property fraction, origin: unspecified 1; name fraction_origin_unspecified
- Sulfate [water, surface water]: 0.062394 kg; lognormal variance with pedigree 0.102, pedigree (1,1,5,5,1)
  (same comment as for TOC, Total Organic Carbon)
- Water [water, unspecified]: 0.9 m3; name water_to_water_unspecified; lognormal variance with pedigree 0.0827, pedigree (2,2,5,5,1)
  Calculated value based on water balance.
  property fraction, origin: unspecified 0; name fraction_origin_unspecified_Ww
  property fraction, origin: salt water 0; name fraction_origin_salt_water_Ww
  property fraction, origin: fresh water 1; name fraction_origin_fresh_water_Ww
  property carbon content, fossil 0; name C_content_fossil
  property dry mass 0 kg; name DM
  property water in wet mass 1000 kg; name WWM
  property wet mass 1000 kg; name WM
  property carbon content, non-fossil 0; name C_content_non_fossil
- Nitrate [water, surface water]: 0.027533 kg; lognormal variance with pedigree 0.062, pedigree (1,1,5,5,1)
  (same comment as for TOC, Total Organic Carbon)
- Cadmium, ion [water, surface water]: 0.00035535 kg; lognormal variance with pedigree 0.662, pedigree (1,1,5,5,1)
  (same comment as for TOC, Total Organic Carbon)
- COD, Chemical Oxygen Demand [water, surface water]: 0.018409 kg; lognormal variance with pedigree 0.082, pedigree (1,1,5,5,1)
  (same comment as for TOC, Total Organic Carbon)
- Arsenic [soil, agricultural]: 5.8422e-5 kg; lognormal variance with pedigree 0.712, pedigree (1,1,5,5,1)
  (same comment as for Lead)
- Iron, ion [water, surface water]: 1.2771e-5 kg; lognormal variance with pedigree 0.132, pedigree (1,1,5,5,1)
  (same comment as for TOC, Total Organic Carbon)
- Dinitrogen monoxide [air, urban air close to ground]: 5.907e-5 kg; lognormal variance with pedigree 0.072, pedigree (1,1,5,5,1)
  direct wastewater treatment plant emission plus direct digester gas emission plus emission from sludge incineration plus emission from sludge spreading. Uncertainty calculated from wastewater composition and treatment model
- Nitrite [water, surface water]: 0.00036708 kg; lognormal variance with pedigree 0.082, pedigree (1,1,5,5,1)
  (same comment as for Ammonium, ion)
- Cadmium, ion [water, ground-, long-term]: 2.1214e-6 kg; lognormal variance with pedigree 6.902, pedigree (1,1,5,5,1)
  (same comment as for Carbon monoxide, fossil)
- Nickel, ion [water, ground-, long-term]: 0.0014916 kg; lognormal variance with pedigree 0.712, pedigree (1,1,5,5,1)
  (same comment as for Carbon monoxide, fossil)
- Iron [soil, agricultural]: 0.023535 kg; lognormal variance with pedigree 0.102, pedigree (1,1,5,5,1)
  (same comment as for Lead)
- Aluminium [water, ground-, long-term]: 0.0014054 kg; lognormal variance with pedigree 0.112, pedigree (1,1,5,5,1)
  (same comment as for Carbon monoxide, fossil)
- Aluminium [water, surface water]: 1.5802e-7 kg; lognormal variance with pedigree 0.712, pedigree (1,1,5,5,1)
  (same comment as for TOC, Total Organic Carbon)
- Copper, ion [water, ground-, long-term]: 0.0024231 kg; lognormal variance with pedigree 0.732, pedigree (1,1,5,5,1)
  (same comment as for Carbon monoxide, fossil)
- Lead [water, surface water]: 7.6941e-5 kg; lognormal variance with pedigree 0.602, pedigree (1,1,5,5,1)
  (same comment as for TOC, Total Organic Carbon)

## Extrapolations
wastewater compositions from literature and/or estimates This dataset has been copied from an original dataset covering the geography CH. The uncertainty has been adjusted accordingly.

## Review by Rolf Frischknecht 2009-02-07
passed.
