# tap water production, conventional treatment

Dataset: EcoSpold 2, unit process
Geography: CO
Time period: 2012-01-01 to 2021-12-31
Technology level: current
Classification: ISIC rev.4 ecoinvent: 3600:Water collection, treatment and supply
Synonyms: potable water
Scenario: Business-as-Usual
System model: Allocation, cut-off by classification
Share of production covered: 20.6 %
Generated by: Laura Rubio
Published in: Gmünder S. 2017
Database: ecoinvent
isCopyrightProtected: true
accessRestrictedTo: 1

## General comment
This dataset represents production of 1 kg of tap water under pressure at facility gate, ready for distribution in network. It represents average operation of conventional treatment for production tap water. Conventional treatment includes coagulation, flocculation and decantation. In some occasions the treatment also includes, chemical application, filtration, pH stabilization and/or softening, which can be present in some plants. Inventory was constructed from reported chemicals, energy inputs and wastes from 6 distinct conventional plants located in Colombia

## Included activities start
This activity starts from tap water, under pressure, at tap water treatment plant and fed into tap water distribution network.

## Included activities end
This dataset ends with the production of tap water, at facility gate, under pressure. It includes energy for intake pumping and treatment system, as well as the energy of the pump pressurizing water to the beginning of the network. It includes all chemicals and material added to the water during treatment. It excludes energy for pumping stations and water losses within the network as they are included in the tap water market. Emissions to the environment occurring during the treatment and during the distribution were not considered as they are assumed negligible. Main substance in water that would be released in the environment are assumed to be considered in wastewater processes.

## Geography
Extrapolated from data from six conventional treatment plants in Colombia. The uncertainty was adjusted accordingly.

## Technology
Most Frequent technology in tap water production facility in Colombia

## Time period
The time period is set from 2012 to the year 2017 as it is a considering period in which conventional treatment plants have not passed through drastic technological changes.

## Parameters
- unit conversion, days in a year: 365.25 d/year; name days_per_year; lognormal variance with pedigree 0.0006, pedigree (1,1,1,1,1)
  Conversion factor.

## Reference product
- tap water: 1 kg; name tapwater; CPC 18000: Natural water; By-product classification allocatable product; CAS 7732-18-5
  production volume 1.91238e12 kg; name PV_tapwater; = 2223703014000*0.86
    Calculated value based on national database. The total tap water production technology shares in Colombia, was based on data from a public entity: Superintendecia de Servicios Públicos (SUI, 2008)- <http://www.sui.gov.co/web/acueducto>. The register, records tap water treatment using different technologies from 2398 local plants in 478 municipalities, which represents 78% of the total country"s population. The remaining 22%, as there is no existing data, was distributed among the current technologies. The production technology shares, present in the ecoinvent database, are calculated to be as follows; tap water production, conventional treatment 86%, tap water production, conventional with biological treatment 9.6%, tap water production, direct filtration treatment 1%, tap water production, underground water with disinfection 1.7%, tap water production, underground water without chemical treatment 1.7%.
  properties: water content 2940.18, carbon content, fossil 0.0017899, dry mass 0.00034 kg, wet mass 1 kg, carbon content, non-fossil 0, price 0.000397 EUR2005, water in wet mass 0.99966 kg, carbon content 0.0017899, carbon allocation 6.08566e-7 kg

## Inputs from technosphere
- heat, district or industrial, natural gas: 0.000178498 MJ; lognormal variance with pedigree 0.0046, pedigree (1,3,3,5,1)
  Calculated value. This mathematical function was taken from the "tap water production, conventional treatment, GLO" dataset (accessed 20170920) as it was considered adequate also for this dataset.
  Uncertainty: C
  property Corresponding fuel use 1.11 MJ; name fuel_use
  property heating value, net 1 MJ; name heating_value
  property fuel input in physical units, m3 4.43e-6 m3; name fuel_input
  note on Corresponding fuel use: Lower heating value of the fuel input related to the heat/electricity output
  note on fuel input in physical units, m3: Measured value. Average natural gas consumption in surveyed conventional treatment plants. Note than only 4 of the 9 conventional plants reported using natural gas. Plants not reporting natural gas were attributed an input value of 0 during the calculation of the weighted average.
- tap water: 2.1e-5 kg; lognormal variance with pedigree 0.0072, pedigree (3,3,3,5,1)
  Calculated value. This value was taken from the "tap water production, conventional treatment, GLO" dataset (accessed 20170920) as it was considered adequate also for this dataset. Water content of hypochlorite solution, prehydrolysed coagulant and aluminium sulfate.
  properties: water content 2962.17, dry mass 0.000337476 kg, wet mass 1 kg, carbon content, fossil 0.00178991
  note on carbon content, fossil: Bicarbonate content is 2.93 mol/m3. CO2 content is 0.1 mol/m3 (ecoinvent v2.2 report 8, Tab 93.1).
- chemical, inorganic: 9.09e-7 kg; source Empresas Públicas de Medellin ( EMP) 2016; lognormal variance with pedigree 0.0032, pedigree (1,3,3,1,1)
  Measured value. Average use of coagulants (Clarifloc, AK 23 coagulant) in 6 Colombian treatment plants, according to LCA reports/ written communication [(Orlando, Rodriguez, Villamizar-gallardo, & García, 2016), (Varón Hoyos, 2015) , (EPM, 2016)]. Note that 3 of the 6 conventional plants reported using either of these two substances. Plants not reporting these consumables were attributed an input value of 0 during the calculation of the weighted average. This avoided double functional equivalent chemical inputs.
  properties: wet mass 1 kg, dry mass 1 kg, carbon content, fossil 0.003
  note on carbon content, fossil: This dataset is an unweighted average of 20 inorganic substances (listed in Tab 88.1, ecoinvent v2.2 report 8, part II), being part of the top100 chemicals included in this database. The C-content has also been calculated as an unweighted average of the C content of the substances composing this dataset.
- chlorine, liquid: 3.071e-6 kg; source Empresas Públicas de Medellin ( EMP) 2016; lognormal variance with pedigree 0.0032, pedigree (1,3,3,1,1)
  Measured value. Average use of chlorine in 6 Colombian treatment plants, according to LCA reports/ written communication [(Orlando, Rodriguez, Villamizar-gallardo, & García, 2016), (Varón Hoyos, 2015) , (EPM, 2016)].
  properties: wet mass 1 kg, dry mass 1 kg
- wastewater, unpolluted: -3.2626e-5 m3; name ww; = (waterIn_L+ waterIn_R-tapwater/1000)*-1; lognormal variance with pedigree 0.0058, pedigree (2,3,3,5,1)
  Measured value. This value was taken from the "tap water production, conventional treatment, GLO" dataset (accessed 20170920) as it was considered adequate also for this dataset. It represents the average amount of wastewater produced during treatment.
  production volume 6.23935e7 m3; = PV_tapwater*(ww/tapwater)
    Calculated from the production volume of tap water in proportion to the respective output amounts.
  property price 0 EUR2005; name ww_price_EUR2005
  properties: carbon content, non-fossil 0.00178991, wet mass 1000 kg, water content 2962.17, dry mass 0.337476 kg, carbon content, fossil 0.00178991
  note on carbon content, fossil: Assumed to be like in tap water. Bicarbonate content is 2.93 mol/m3. CO2 content is 0.1 mol/m3 (ecoinvent v2.2 report 8, Tab 93.1).
- activated carbon, granular: 5.743e-7 kg; name GAC; source Empresas Públicas de Medellin (EMP) 2016; lognormal variance with pedigree 0.0032, pedigree (1,3,3,1,1)
  Measured value. Value represents average for use of activated carbon in 6 Colombian Treatment plants according LCA reports/written communication [(Orlando, Rodriguez, Villamizar-gallardo, & García, 2016), (Varón Hoyos, 2015) , (EPM, 2016)]. Note that 2 of the 6 conventional plants reported using activated Carbon. Plants not reporting this consumable were attributed an input value of 0 during the calculation of the weighted average. This avoided double functional equivalent chemical inputs.
  property carbon content, fossil 0.81; name GAC_C_content_fossil
  property carbon content, non-fossil 0; name GAC_C_content_non_fossil
  property dry mass 0.97 kg; name GAC_DM
  property wet mass 1 kg; name GAC_WM
  property water content 0.030928; name GAC_water_content
  property water in wet mass 0.03 kg; name GAC_WWM
  properties: heating value, net 30.23 MJ
  note on carbon content, fossil: Literature value. From Biomass and Bioenergy: Processing and Properties (2014) edited by Khalid Rehman Hakeem, Mohammad Jawaid, Umer Rashid (p. 252). Carbon content is in the range of 72-90%, an average value of 81% is taken.
- sodium hydroxide, without water, in 50% solution state: 1.2046e-7 kg; source Empresas Públicas de Medellin ( EMP) 2016; lognormal variance with pedigree 0.0032, pedigree (1,3,3,1,1)
  Measured value. Average use of sodium hydroxide (dry basis) in 6 Colombian treatment plants according to LCA reports/written communication [(Orlando, Rodriguez, Villamizar-gallardo, & García, 2016), (Varón Hoyos, 2015) , (EPM, 2016)]. Note than only 1 plant over the 6 conventional plants reported using this substance. Plants not reporting this consumable were attributed an input value of 0 during the calculation of the weighted average. This avoided double functional equivalent chemical inputs.
  properties: heating value, net 3.03 MJ, wet mass 1 kg, dry mass 1 kg
- quicklime, milled, packed: 2.235e-8 kg; source Empresas Públicas de Medellin ( EMP) 2016; lognormal variance with pedigree 0.0032, pedigree (1,3,3,1,1)
  Measured value. Average use of lime for pH adjustment in assessed conventional treatment plants in Colombia, according to LCA reports/written communication [(Orlando, Rodriguez, Villamizar-gallardo, & García, 2016), (Varón Hoyos, 2015) , (EPM, 2016)]. Note than only 1 of the 6 conventional plants reported using this substance. Plants not reporting this consumable were attributed an input value of 0 during the calculation of the weighted average. This avoided double functional equivalent chemical inputs.
  properties: wet mass 1 kg, water content 0.010101, dry mass 0.99 kg
- sodium chloride, powder: 1.36e-7 kg; source Empresas Públicas de Medellin ( EMP) 2016; lognormal variance with pedigree 0.00466, pedigree (1,3,3,5,1)
  Measured value. Value reprensent average for use of sodium chloride solution in 6 Colombian treatment plants according to LCA reports/written communication [(Orlando, Rodriguez, Villamizar-gallardo, & García, 2016), (Varón Hoyos, 2015) , (EPM, 2016)]. Note that only 1 of the 6 conventional plants reported using this sodium chloride. Plants not reporting this consumable were attributed an input value of 0 during the calculation of the weighted average. This avoided double functional equivalent chemical inputs.
  properties: wet mass 1 kg, dry mass 1 kg
- polyacrylamide: 9.73e-7 kg; source Empresas Públicas de Medellin ( EMP) 2016; lognormal variance with pedigree 0.0032, pedigree (1,3,3,1,1)
  Measured value. Value represents average for use of polyacrylamide in the production of flocculants for the clarification of water based on Colombian LCA reports/written communication [(Orlando, Rodriguez, Villamizar-gallardo, & García, 2016), (Varón Hoyos, 2015) , (EPM, 2016)]. Note that 5 of the 6 conventional plants reported using this substance. Plants not reporting this consumable were attributed an input of 0 during the calculation of the weighted average. This avoided double functional equivalent chemical inputs.
  properties: heating value, net 23.88 MJ, wet mass 1 kg, carbon content, fossil 0.51, dry mass 1 kg
- water works, capacity 1.1E10l/year: 1.52103e-12 unit; = 1/(Q_av* days_per_year*lifetime*UnitConversion(1, 'm3', 'l')); lognormal variance with pedigree 0.304, pedigree (1,1,3,5,1)
  Calculated value. This mathematical relation was taken from the "tap water production, conventional treatment, GLO" dataset (accessed 20170920) as it was considered adequate also for this dataset. Amount of water works construction attributed to the production of 1kg of tap water. Value is based on assumed lifetime production of water treatment plant and an assumed typical medium-sized plant of 30,000 m3/day.
  Uncertainty: C
  property plant average daily flow rate 30000 m3/d; name Q_av
  property lifetime 60 year; name lifetime
  note on plant average daily flow rate: Fixed values, Flow rate of a conventional water purification plant for a medium-size facility as defined in the water works process.
  note on lifetime: Estimated Value. Expected lifetime of water works as defined in the construction process.
- aluminium sulfate, powder: 3.464e-5 kg; source Empresas Públicas de Medellin ( EMP) 2016; lognormal variance with pedigree 0.0032, pedigree (1,3,3,1,1)
  Measured value. Value reprensent average for use of aluminium sulphate solution in 6 Colombian treatment plants according to LCA reports/personal communication [(Orlando, Rodriguez, Villamizar-gallardo, & García, 2016), (Varón Hoyos, 2015) , (EPM, 2016)]. Note that 3 of the 6 conventional plants reported using this aluminium sulphate solution. Plants not reporting this consumable were attributed an input value of 0 during the calculation of the weighted average. This avoided double functional equivalent chemical inputs.
  properties: wet mass 1 kg, dry mass 1 kg
- silica sand: 1.49834e-6 kg; lognormal variance with pedigree 0.0072, pedigree (3,3,3,5,1)
  Calculated value taken from the existind dataset. " Tap water production, conventional treatment, GLO", as it was also considered adequate. Amount of sand to compensate losses through sand filter washing. Extrapolated to all plant from one reported value. Also includes average use of micro-sand for adjustment for this technology. Note that only 1 of the 9 conventional plants reported using micro-sand. Plants not reporting this consumable were attributed an input value of 0 during the calculation of the weighted average.
  properties: dry mass 0.99 kg, wet mass 1 kg, water content 0.010101
- water pump operation, diesel: 1.5967e-5 MJ; = diesel_use*density_diesel*NHV; lognormal variance with pedigree 0.0046, pedigree (1,3,3,5,1)
  (same comment as for heat, district or industrial, natural gas)
  property fuel input in physical units, L 4.40008e-7 l; name diesel_use
  property density 0.84 kg/l; name density_diesel
  property heating value, net 43.2 MJ; name NHV
  properties: price 0.07 EUR2005
  note on heating value, net: Literature. net (lower) heating (calorific) value for diesel in MJ/kg
- polyaluminium chloride: 8.659e-7 kg
  Measured value. Value represents average for use of aluminium polychloride in 6 Colombian Treatment plants according LCA reports/written communication [(Orlando, Rodriguez, Villamizar-gallardo, & García, 2016), (Varón Hoyos, 2015) , (EPM, 2016)]. Note that 2 of the 6 conventional plants reported using aluminium polychloride. Plants not reporting this consumable were attributed an input value of 0 during the calculation of the weighted average. This avoided double functional equivalent chemical inputs.
- lime, hydrated, loose weight: 4.228e-6 kg; lognormal variance with pedigree 0.0032, pedigree (1,3,3,1,1)
  Measured value. Average use of lime for pH adjustment in 6 assessed conventional treatment plants in Colombia, according to LCA reports/written communication [(Orlando, Rodriguez, Villamizar-gallardo, & García, 2016), (Varón Hoyos, 2015) , (EPM, 2016)]. Note than 3 of the 6 conventional plants reported using this substance. Plants not reporting this consumable were attributed an input value of 0 during the calculation of the weighted average. This avoided double functional equivalent chemical inputs.
  properties: wet mass 1 kg, water content 0.00300903, dry mass 0.997 kg
- electricity, medium voltage: 0.000534 kWh; source Empresas Públicas de Medellin ( EMP) 2016; lognormal variance with pedigree 0.0032, pedigree (1,3,3,1,1)
  Measured value. Average electricity consumption for entire process including pumping for water intake and pumping for distribution at the plant gate, according to 6 colombian treatment plants LCA reports/ written communication [(Orlando, Rodriguez, Villamizar-gallardo, & García, 2016), (Varón Hoyos, 2015) , (EPM, 2016)]. All 6 plant reported electricity use. Values reported varied from 1.31e-3 to 2.574e-6 kWh/kg.

## Inputs from nature
- Water, river [natural resource, in water]: 0.000944244 m3; name waterIn_R; = tapwater*1.032626* (1-0.08559) /1000; lognormal variance with pedigree 0.0066, pedigree (3,1,3,5,1)
  Calculated value. It is assumed that the treatment process itselve have 3.3% losses and that 9% of the water is supplied by the lakes and 91% by rivers, similar to the GLO dataset.
- Water, lake [natural resource, in water]: 8.83825e-5 m3; name waterIn_L; = tapwater*1.032626* 0.08559 /1000; lognormal variance with pedigree 0.0066, pedigree (3,1,3,5,1)
  (same comment as for Water, river)

## Sampling procedure
Based on data from 6 local conventional treatment plants representing 20.6% of the total produced tap water in Colombia. Conventional tap production facilities were regionalized in accordance to these 6 Colombian Treatment plants, of which 4 are located in Pamplona (Orlando, Rodriguez, Villamizar-gallardo, & García, 2016), 1 in Medellin (EPM, 2016) and 1 in Pereira (Varón Hoyos, 2015). Data was taken from LCA national studied reports for 5 of the 6 treatment plants, in Medellin"s case data comes from primary source (written communication from Empresas Públicas de Medellin, EPM)

## Extrapolations
This dataset has been extrapolated from year 2017 to the year of the calculation (2021). The uncertainty has been adjusted accordingly.
