# fluorine production, liquid

Dataset: EcoSpold 2, unit process
Geography: RER
Time period: 1999-01-01 to 2021-12-31
Technology level: current
Classification: EcoSpold01Categories: chemicals/inorganics
Classification: ISIC rev.4 ecoinvent: 2011:Manufacture of basic chemicals
Tags: ConvertedDataset
Scenario: Business-as-Usual
System model: Allocation, cut-off by classification
Generated by: Niels Jungbluth
Published in: Althaus H.-J. 2007
Database: ecoinvent
isCopyrightProtected: true
accessRestrictedTo: 1

## General comment
This data represents the production of 1 kg of fluorine as a basic product for SF6. It is rough and incomplete. Raw materials and emissions are estimated. Energy consumption is modelled with literature data.
[This dataset was already contained in the ecoinvent database version 2. It was not individually updated during the transfer to ecoinvent version 3. Life Cycle Impact Assessment results may still have changed, as they are affected by changes in the supply chain, i.e. in other datasets. This dataset was generated following the ecoinvent quality guidelines for version 2. It may have been subject to central changes described in the ecoinvent version 3 change report (http://www.ecoinvent.org/database/ecoinvent-version-3/reports-of-changes/), and the results of the central updates were reviewed extensively. The changes added e.g. consistent water flows and other information throughout the database. The documentation of this dataset can be found in the ecoinvent reports of version 2, which are still available via the ecoinvent website. The change report linked above covers all central changes that were made during the conversion process.]

## Included activities start
From the reception of hydrogen fluoride at the factory gate.

## Included activities end
This activity ends with 1 kg of fluorine at the factory gate. The dataset includes the input materials (although incomplete), energy uses and emissions.

## Geography
Estimation for Europe

## Technology
The world’s production of elemental fluorine, except for countries with planned economies, is concentrated in seven countries with an overall capacity of ca 17’000t/a. It is mainly used in two areas: manufacture of UF6 (18’000- 21’000t/a corresponding to 6’000 – 7’000t of F) and direct manufacture of 5’100 – 7’700t/a of SF6, corresponding to 4’000 – 6’000t of F. The rest is required for miscellaneous applications.
In all modern fluorine-production units, the gas is produced by electrolysis of KF•2HF (solution of potassium fluoride in anhydrous hydrogen fluoride with 40.68 wt % HF). Potassium salts are used to produce the potassium fluoride.
Elemental fluorine production units are integrated into SF6 and UF6 production units to avoid transport difficulties.
Reference:
Jaccaud M., Faron R., Devilliers D. and Romano R. (1999) Fluorine. In: Ullmann's encyclopedia of industrial chemistry: Electronic release, Vol. A11 (ed. Arpe et al.). 6 Edition. Wiley-VCH, Weinheim, D.

## Time period
Time of publication

## Reference product
- fluorine, liquid: 1 kg; CPC 34231: Chemical elements n.e.c.; inorganic acids except phosphoric, nitric and sulphonitric; inorganic oxygen compoun[…]; By-product classification allocatable product; CAS 7782-41-4
  A raw material for the production of SF6.
  EcoSpold01Location=RER
  production volume 1.32237 kg
    This is a placeholder value that does not reflect real-world production volumes. This dataset does not currently require a real-world production volume to work in the database framework, and no actual data were collected yet. This has no negative effect on the results of the ecoinvent database. The placeholder value of this activity was scaled according to the nominal GDP of 2005 (source: United Nations, http://data.un.org/Glossary.aspx?q=GDP+%28current+US%24%29, accessed 20130726) to reflect an appropriate share of the global production volume, which is also a placeholder value.
  property price 4.03 EUR2005
    Cross-reference; Calculated value based on data from United Nations Commodity Trade Statistics Database (comtrade.un.org) is 0.898 Euro/kg. UN comtrade category: 280130 Fluorine, bromine Year 2005. Using exchange rate of 1EURO = 1.209 USD. Average of price of import into 5 main markets (EU, US, JP, IN and CN).
  property carbon content 0
    carbon content on a dry matter basis (reserved; not for manual entry)
  properties: wet mass 1 kg, carbon content, non-fossil 0, dry mass 1 kg, carbon content, fossil 0, water content 0, water in wet mass 0 kg, carbon allocation 0 kg

## Inputs from technosphere
- hydrogen fluoride: 1.14 kg; source Jaccaud, M. 1999; lognormal variance with pedigree 0.2541, pedigree (3,4,5,3,5)
  Estimation. Calculated assuming an efficiency of 92.5% for the production of fluoride.
  EcoSpold01Location=GLO
  Uncertainty: Estimation for the use of KF · 2HF (40.68 wt % HF) with pure HF, 92.5% yield
  properties: wet mass 1 kg, dry mass 1 kg, heating value, net 6.06 MJ
- chemical factory, organics: 4e-10 unit; lognormal variance with pedigree 0.628, pedigree (5,5,5,1,5)
  EcoSpold01Location=RER
  Estimation.
  Uncertainty: Rough estimation
- electricity, medium voltage: 15.3 kWh; source Jaccaud, M. 1999; lognormal variance with pedigree 0.04, pedigree (1,1,5,1,1)
  Literature value. An average taken from a range of literature values.
  EcoSpold01Location=UCTE

## Emissions to nature
- Hydrogen fluoride [air, unspecified]: 0.001 kg; lognormal variance with pedigree 0.15, pedigree (5,5,5,5,1)
  Estimation.
  Uncertainty: Estimation

## Sampling procedure
Literature survey

## Extrapolations
This dataset has been extrapolated from year 1999 to the year of the calculation (2021). The uncertainty has been adjusted accordingly.

## Review by Roland Hischier 2003-08-19
Passed.

## Review by Emilia Moreno Ruiz 2012-05-24
dataset documented by trainee Helen Hamilton
