# greenhouse construction, plastic walls and roof, plastic tubes

Dataset: EcoSpold 2, unit process
Geography: RoW
Time period: 2005-01-01 to 2021-12-31
Technology level: current
Classification: ISIC rev.4 ecoinvent: 4100:Construction of buildings
Tags: WFLDB
Scenario: Business-as-Usual
System model: Allocation, cut-off by classification
Generated by: [System]
Database: ecoinvent
isCopyrightProtected: true
accessRestrictedTo: 1

## General comment
This global dataset is a copy of the regional FR dataset, except for the following modifications.
The production volume represents the global annual production.
The geographicalCorrelation score of every pedigree matrix of was changed to '5'.
The comments below were part of the FR regional dataset.
This dataset represents the production and dismantling of 1 m2 of greenhouse with plastic walls and roof and plastic tubes.
This double-layer air-inflated film greenhouse is made of a structure of plastic pipes, covered with a double EVA (ethylene vinyl acetate) copolymer sheet. The plastic cover must be replaced every 4 years. The greenhouse structure lifetime is typically 25 years. It comprises of a heating system and fume condenser. Such greenhouses represent recent technology (after 2002) and typically cover large surfaces (7 ha in average). A network of polypropylene pipes is used to deliver heat (hot water at 50-80°C), on the ground (thermo-siphon) and at the height of the plants (growth pipes). A boiler is used to store hot water. CO2 from combustion is recovered and injected again into the greenhouse as to increase photosynthesis. The greenhouse also includes a fertigation system made of a network of polyethylene pipes. Other auxiliary facilities are also considered.

## Included activities start
This activity starts with the production of materials used to build the greenhouse and permanent technical infrastructure.

## Included activities end
This dataset includes the production of the greenhouse as well as the permanent technical infrastructure. For the greenhouse are included its bearing structure (plastic tubes) and covering materials (plastic covers). Technical infrastrctucture includes heating and cooling systems, fertigation system, CO2 injection system, storage facilities and permanent working equipments such as trolley systems.
The activity ends with the disposal and recycling of all the materials.

## Time period
Time period referring to the data source: 2005-2009. Based on expert opinion data is considered to be valid at least up to 2012.

## Reference product
- greenhouse, plastic walls and roof: 1 m2*year; name RP; CPC 38703: Prefabricated buildings, of plastics; By-product classification allocatable product
  production volume 3.81304 m2*year; name RP_PV
    This is a placeholder value that does not reflect real-world production volumes. This dataset does not currently require a real-world production volume to work in the database framework, and no actual data were collected yet. This has no negative effect on the results of the ecoinvent database.
  property price 0.934765 EUR2005
    Calculated based on inputs: The price of the product has been calculated as a sum of the values of the material and energy inputs for this product. This value is therefore a rough estimation. It may underestimate the real price since there are additional expenses when producing any product. These expences can include for example labour costs, treatment of waste materials and profit for the producer. Please consider carefully whether this level of data quality is acceptable for your application.
  properties: lifetime 25 year

## By-products
- aluminium scrap, post-consumer: 0 kg; CPC 39363: Waste and scrap of aluminium; By-product classification Recyclable
  Aluminum components sent to recycling
  production volume 0 kg; = ABS( ByP_04/ RP* RP_PV)
    Calculated from reference product production volume, reference product amount and byproduct amount.
  property price 0.685 EUR2005
    Temporary price data. Calculated as 90% of purchasers price based on: estimated at 85% of new scrap
  property carbon content 0
    carbon content on a dry matter basis (reserved; not for manual entry)
  properties: carbon content, non-fossil 0, water in wet mass 0 kg, wet mass 1 kg, water content 0, carbon content, fossil 0, dry mass 1 kg, carbon allocation 0 kg
- iron scrap, unsorted: 0 kg; CPC 39310: Slag, dross, scalings and other waste from the manufacture of iron or steel; By-product classification Recyclable
  Steel and chromium steel components sent to treatment
  production volume 0 kg; = ABS( ByP_07/ RP* RP_PV)
    (same comment as for aluminium scrap, post-consumer)
  property price 0.149 EUR2005
    Temporary price data. Calculated as 90% of purchasers price based on: estimated at 85% of sorted scrap
  property carbon content 0
    carbon content on a dry matter basis (reserved; not for manual entry)
  properties: carbon content, fossil 0, wet mass 1 kg, water in wet mass 0 kg, dry mass 1 kg, water content 0, carbon content, non-fossil 0, carbon allocation 0 kg

## Inputs from technosphere
- sheet rolling, steel: 0.03552 kg; lognormal variance with pedigree 0.374402, pedigree (5,5,5,5,5)
  Literature data and primary data from French manufacturers (Boulard et al, 2011). Roofing.
- polystyrene, expandable: 0.0049 kg; lognormal variance with pedigree 0.374402, pedigree (5,5,5,5,5)
  Literature data and primary data from French manufacturers (Boulard et al, 2011). Plastic bags part of for the support system.
  properties: carbon content, fossil 0.923077, wet mass 1 kg, dry mass 1 kg, heating value, net 38.67 MJ
- silicone product: 0.00012 kg; lognormal variance with pedigree 0.374402, pedigree (5,5,5,5,5)
  Literature data and primary data from French manufacturers (Boulard et al, 2011). Silicone.
  properties: wet mass 1 kg, heating value, net 9.83 MJ, carbon content, fossil 0.324324, dry mass 1 kg
- acrylic varnish, without water, in 87.5% solution state: 0.00111111 kg; lognormal variance with pedigree 0.374402, pedigree (5,5,5,5,5)
  Literature data and primary data from French manufacturers (Boulard et al, 2011). Paint protection.
  properties: dry mass 1 kg, wet mass 1 kg, carbon content, fossil 0.674725, heating value, net 20.44 MJ
- blow moulding: 0.00316667 kg; lognormal variance with pedigree 0.374402, pedigree (5,5,5,5,5)
  Literature data and primary data from French manufacturers (Boulard et al, 2011). Tanks for the fertigation system.
- steel, low-alloyed: 0.245959 kg; lognormal variance with pedigree 0.374402, pedigree (5,5,5,5,5)
  Literature data and primary data from French manufacturers (Boulard et al, 2011). Poles and trellis for the greenhouse structure.
  properties: wet mass 1 kg, carbon content, fossil 0.005, dry mass 1 kg
- wire drawing, copper: 0.0018 kg; lognormal variance with pedigree 0.374402, pedigree (5,5,5,5,5)
  Literature data and primary data from French manufacturers (Boulard et al, 2011). Cables and wires for the greenhouse structure.
- agricultural machinery, unspecified: 0.0076 kg; lognormal variance with pedigree 0.374402, pedigree (5,5,5,5,5)
  Literature data and primary data from French manufacturers (Boulard et al, 2011). Ramp for the soil preparation system.
- waste plastic, mixture: 0 kg; name ByP_06
  Plastic components sent to treatment
  production volume 0 kg
    (same comment as for aluminium scrap, post-consumer)
  property price 0 EUR2005; name ByP_06_price_EUR2005
  properties: carbon content, fossil 0.747344, wet mass 1 kg, heating value, net 30.79 MJ, water content 0.180638, dry mass 0.847 kg
  note on heating value, net: Value taken from the general comment of the treatment dataset.
- polymer foaming: 0.0049 kg; lognormal variance with pedigree 0.374402, pedigree (5,5,5,5,5)
  (same comment as for polystyrene, expandable)
- heat and power co-generation unit, 200kW electrical, diesel SCR, components for electricity only: 6.2e-10 unit; lognormal variance with pedigree 0.374402, pedigree (5,5,5,5,5)
  Literature data and primary data from French manufacturers (Boulard et al, 2011). Generating set for the heating system.
- steel, chromium steel 18/8: 0.0344 kg; lognormal variance with pedigree 0.374402, pedigree (5,5,5,5,5)
  Literature data and primary data from French manufacturers (Boulard et al, 2011). Bolting for the greenhouse structure.
  properties: carbon content, fossil 0.0008, dry mass 1 kg, wet mass 1 kg
- oil boiler, 100kW: 1.8612e-6 unit; lognormal variance with pedigree 0.374402, pedigree (5,5,5,5,5)
  Literature data and primary data from French manufacturers (Boulard et al, 2011). Boiler for the heating system.
- diesel, burned in building machine: 0.373733 MJ; lognormal variance with pedigree 0.374402, pedigree (5,5,5,5,5)
  Literature data and primary data from French manufacturers (Boulard et al, 2011). Energy for building a retention pond.
  properties: heating value, net 1 MJ
- calendering, rigid sheets: 0.001 kg; lognormal variance with pedigree 0.374402, pedigree (5,5,5,5,5)
  Literature data and primary data from French manufacturers (Boulard et al, 2011). Cladding materials.
- extrusion, plastic film: 0.169822 kg; lognormal variance with pedigree 0.374402, pedigree (5,5,5,5,5)
  Literature data and primary data from French manufacturers (Boulard et al, 2011). Mulch film.
- polycarbonate: 0.001 kg; lognormal variance with pedigree 0.374402, pedigree (5,5,5,5,5)
  (same comment as for calendering, rigid sheets)
  properties: heating value, net 29.57 MJ, dry mass 1 kg, wet mass 1 kg, carbon content, fossil 0.755906
- electricity, low voltage: 0 kWh; pedigree (1,1,1,1,1)
  Literature data and primary data from French manufacturers (Boulard et al, 2011). Electricity for manufacturing of the greenhouse structure.
- waste concrete: 0 kg; name ByP_01
  Concrete components sent to treatment
  production volume 0 kg
    Calculated from production volume of reference product using the relative outputs.
  property price 0 EUR2005; name ByP_01_price_EUR2005
  properties: wet mass 1 kg, water content 1, dry mass 0.5 kg
- bitumen seal: 0.0001 kg; lognormal variance with pedigree 0.374402, pedigree (5,5,5,5,5)
  Literature data and primary data from French manufacturers (Boulard et al, 2011). Cement sealing in the greenhouse structure.
  properties: carbon content, fossil 0.643968, dry mass 1 kg, wet mass 1 kg, heating value, net 19.51 MJ
- injection moulding: 0.0236311 kg; lognormal variance with pedigree 0.374402, pedigree (5,5,5,5,5)
  Literature data and primary data from French manufacturers (Boulard et al, 2011). Taps, gutters and stoppers for the fertigation system. Clips and joints for the greenhouse structure.
- synthetic rubber: 0.0003 kg; lognormal variance with pedigree 0.374402, pedigree (5,5,5,5,5)
  Literature data and primary data from French manufacturers (Boulard et al, 2011). Tubes for the soil preparation system.
  properties: carbon content, fossil 0.871949, wet mass 1 kg, heating value, net 26.42 MJ, dry mass 1 kg
- concrete block: 0 kg; pedigree (1,1,1,1,1)
  Literature data and primary data from French manufacturers (Boulard et al, 2011). Mechanical room part of for the storage system.
  properties: wet mass 1 kg, dry mass 1 kg
- polyethylene, high density, granulate: 0.0479 kg; lognormal variance with pedigree 0.374402, pedigree (5,5,5,5,5)
  Literature data and primary data from French manufacturers (Boulard et al, 2011). Pipes for the fertigation system.
  properties: carbon content, fossil 0.857143, wet mass 1 kg, dry mass 1 kg, heating value, net 42.47 MJ
- concrete, normal: 0 m3; pedigree (1,1,1,1,1)
  Literature data and primary data from French manufacturers (Boulard et al, 2011). Walls for the greenhouse structure.
  properties: water content 0.086758, wet mass 2380 kg, dry mass 2190 kg
- electronics, for control units: 1.6e-5 kg; lognormal variance with pedigree 0.374402, pedigree (5,5,5,5,5)
  Literature data and primary data from French manufacturers (Boulard et al, 2011). Control unit for the greenhouse structure.
  properties: wet mass 1 kg, carbon content, non-fossil 0.00013442, carbon content, fossil 0.337146, dry mass 1 kg
- waste rubber, unspecified: 0 kg; name ByP_02
  Synthetic rubber sent to treatment
  production volume 0 kg
    Calculated from production volume of reference product using the relative outputs.
  property price 0 EUR2005; name ByP_02_price_EUR2005
  properties: heating value, net 27.19 MJ, wet mass 1 kg, carbon content, fossil 0.853, dry mass 1 kg
- extrusion, plastic pipes: 0.0742556 kg; lognormal variance with pedigree 0.374402, pedigree (5,5,5,5,5)
  (same comment as for polyethylene, high density, granulate)
- aluminium, cast alloy: 0.0064 kg; lognormal variance with pedigree 0.374402, pedigree (5,5,5,5,5)
  Literature data and primary data from French manufacturers (Boulard et al, 2011). Aluminum in the greenhouse structure.
  properties: wet mass 1 kg, dry mass 1 kg
- ethylene vinyl acetate copolymer: 0.122222 kg; lognormal variance with pedigree 0.374402, pedigree (5,5,5,5,5)
  Literature data and primary data from French manufacturers (Boulard et al, 2011). Plastic covers for the greenhouse structure.
  properties: heating value, net 35.99 MJ, carbon content, fossil 0.79734, dry mass 1 kg, wet mass 1 kg
- gas motor, 206kW: 6.2e-10 unit; lognormal variance with pedigree 0.374402, pedigree (5,5,5,5,5)
  (same comment as for heat and power co-generation unit, 200kW electrical, diesel SCR, compo)
- section bar rolling, steel: 0.225949 kg; lognormal variance with pedigree 0.374402, pedigree (5,5,5,5,5)
  (same comment as for steel, low-alloyed)
- tractor, 4-wheel, agricultural: 0.0152 kg; lognormal variance with pedigree 0.374402, pedigree (5,5,5,5,5)
  Literature data and primary data from French manufacturers (Boulard et al, 2011). Tractor.
- zinc coat, coils: 0.0234405 m2; lognormal variance with pedigree 0.374402, pedigree (5,5,5,5,5)
  (same comment as for steel, low-alloyed)
- copper, cathode: 0.000648 kg; lognormal variance with pedigree 0.374402, pedigree (5,5,5,5,5)
  (same comment as for wire drawing, copper)
  properties: dry mass 1 kg, wet mass 1 kg
- polyethylene, linear low density, granulate: 0.0476 kg; lognormal variance with pedigree 0.374402, pedigree (5,5,5,5,5)
  Literature data and primary data from French manufacturers (Boulard et al, 2011). Thermal screen for the cooling system.
  properties: dry mass 1 kg, wet mass 1 kg, heating value, net 42.47 MJ, carbon content, fossil 0.857143
- glass fibre reinforced plastic, polyamide, injection moulded: 8e-5 kg; lognormal variance with pedigree 0.374402, pedigree (5,5,5,5,5)
  Literature data and primary data from French manufacturers (Boulard et al, 2011). Electrical gear.
  properties: wet mass 1 kg, dry mass 1 kg, carbon content, fossil 0.446018
- waste polyvinylchloride: 0 kg; name ByP_05
  Etylene vinyl acetate copolymer (plastic covers) sent to treatment
  production volume 0 kg
    (same comment as for aluminium scrap, post-consumer)
  property price 0 EUR2005; name ByP_05_price_EUR2005
  properties: wet mass 1 kg, carbon content, fossil 0.440882, water content 0.00200401, dry mass 0.998 kg, heating value, net 21.51 MJ
- polyester resin, unsaturated: 0.00136364 kg; lognormal variance with pedigree 0.374402, pedigree (5,5,5,5,5)
  Literature data and primary data from French manufacturers (Boulard et al, 2011). Roofing membrane.
  properties: dry mass 1 kg, wet mass 1 kg, carbon content, fossil 0.58584, heating value, net 17.75 MJ
- section bar extrusion, aluminium: 0.0064 kg; lognormal variance with pedigree 0.374402, pedigree (5,5,5,5,5)
  Literature data and primary data from French manufacturers (Boulard et al, 2011). Roof structure.
- polypropylene, granulate: 0.03012 kg; lognormal variance with pedigree 0.374402, pedigree (5,5,5,5,5)
  Literature data and primary data from French manufacturers (Boulard et al, 2011). PP sleeves.
  properties: wet mass 1 kg, dry mass 1 kg, carbon content, fossil 0.857143, heating value, net 32.78 MJ
  note on heating value, net: Value extracted from "treatment of waste polypropylene, open burning"
- polyvinylfluoride: 0.0238854 kg; lognormal variance with pedigree 0.374402, pedigree (5,5,5,5,5)
  Literature data and primary data from French manufacturers (Boulard et al, 2011). Cables, wires, joints and clips for the greenhouse structure.
  properties: heating value, net 23.7 MJ, carbon content, fossil 0.521739, dry mass 1 kg, wet mass 1 kg
- waste electric and electronic equipment: -0.000664 kg; name ByP_03
  Electric and electronic components sent to treatment
  production volume 0.00253186 kg; = ABS( ByP_03/ RP* RP_PV)
    Calculated from production volume of reference product using the relative outputs.
  property price 0 EUR2005; name ByP_03_price_EUR2005
  properties: wet mass 1 kg, dry mass 1 kg, carbon content, non-fossil 0.000485011, carbon content, fossil 0.0877555
- aluminium scrap, post-consumer: -0.0064 kg
  Aluminum components sent to recycling
  production volume 0.0244035 kg
  properties: price 0.685 EUR2005, wet mass 1 kg, dry mass 1 kg
- iron scrap, unsorted: -0.2804 kg
  Steel and chromium steel components sent to treatment
  production volume 1.06918 kg
  properties: wet mass 1 kg, dry mass 1 kg, price 0.149 EUR2005
- waste plastic, mixture: -8.06805e-5, -0.000201453, -0.00011015, -8.54538e-5, -0.000224935, -0.0175621, -0.000257044, -0.00117343, -8.87448e-5, -3.01464e-5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 kg (42 entries)
  Plastic components sent to treatment
  production volume 0.597885 kg
- electricity, low voltage: 2.1942e-5, 0.000198068, 0.000635378, 3.55593e-5, 0.000231715, 9.77233e-5, 8.72506e-5, 0.000162873, 0.000164464, 0.00144026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 kWh (46 entries); lognormal variance with pedigree 0.374402, pedigree (5,5,5,5,5)
  (same comment as for electricity, low voltage)
- waste concrete: -0.000246724, -0.951264 kg (2 entries)
  Concrete components sent to treatment
  production volume 3.62815 kg
- concrete block: 0.0736368, 0.0333532 kg (2 entries); lognormal variance with pedigree 0.374402, pedigree (5,5,5,5,5)
  (same comment as for concrete block)
- concrete, normal: 8.45564e-5, 2.54745e-6, 8.81067e-6, 7.13285e-5, 4.01223e-5, 0.000169907, 5.73085e-6 m3 (7 entries); lognormal variance with pedigree 0.374402, pedigree (5,5,5,5,5)
  (same comment as for concrete, normal)
- waste rubber, unspecified: -1.20866e-5, -0.000287913 kg (2 entries)
  Synthetic rubber sent to treatment
  production volume 0.00114391 kg
- waste polyvinylchloride: -6.27744e-5, -0.000156743, -8.57034e-5, -6.64883e-5, -0.000175013, -0.0136644, -0.000199996, -0.000913002, -6.90489e-5, -2.34558e-5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 kg (42 entries)
  Etylene vinyl acetate copolymer (plastic covers) sent to treatment
  production volume 0.465191 kg

## Sampling procedure
Dataset is adapted from AGRIBALYSE 1.2 database, with land occupation and transformation flows removed (these are accounted for in the crop datasets). Data was collected from French manufacturers and reported in Boulard et al. (2011).
Translated name: Serre double parrois gonflee, BRM.

## Extrapolations
The amount of the exchanges are copy from a regional dataset.
