# nutrient supply from poultry manure, dried

Dataset: EcoSpold 2, unit process
Geography: GLO
Time period: 2016-01-01 to 2021-12-31
Technology level: current
Classification: ISIC rev.4 ecoinvent: 0161:Support activities for crop production
Scenario: Business-as-Usual
System model: Allocation, cut-off by classification
Generated by: Avraam Symeonidis
Database: ecoinvent
isCopyrightProtected: true
accessRestrictedTo: 1

## General comment
This inventory describes the supply of nutrients from ''poultry manure, dried'' for fertiliser use.
No machinery expenditures or emissions to the environment are considered related to the actual application of this substance on soil during its agricultural use. The purpose of this activity is to connect the chemical production of ''poultry manure, dried'' with its generic uses as fertilizer. The product ''poultry manure, dried'' is connected to the generic market for 'organic nitrogen fertiliser, as N' and 'organic phosphorus fertiliser, as P2O5' and 'organic potassium fertiliser, as K2O' through this supplying activity. In the agricultural context, ''poultry manure, dried'' can be used directly as a fertilizer input to crop production, eventually with other chemicals; alternatively, a generic input of 'organic nitrogen fertiliser, as N' and 'organic phosphorus fertiliser, as P2O5' and 'organic potassium fertiliser, as K2O' can be used instead, and this will represent the regional consumption mix for his type of nutrient. A way in between is allowed by using the generic input 'organic nitrogen fertiliser, as N' and 'organic phosphorus fertiliser, as P2O5' and 'organic potassium fertiliser, as K2O' and link to the activity providing it from a specific chemical.
In all cases, emissions associated to the application of the fertilizer have to be calculated in the crop production activity.

## Technology
Inventory based on composition of ''poultry manure, dried''.

## Reference product
- organic phosphorus fertiliser, as P2O5: 1 kg; name phosphate_fertiliser_output; By-product classification allocatable product; CPC 34659: Fertilizers n.e.c.
  Literature data. Source nutrient content: Ecoinvent report 15. Agriculture. Pg 96, Tab 9.1 (Nemecek 2007) Information on heavy metals taken from Nemecek T. & Schnetzer J. (2011) Methods of assessment of direct field emissions for LCIs of agricultural production systems. Data v3.0 (2012). Accessible in the database report section under the name '01 crop production-direct field emissions natural resources v1.2.pdf'. Nitrogen was set as the reference product as considered the key nutrient in manure (Penn State Agronomy Guide 2015-2016. Retrieved from: http://extension.psu.edu/agronomy-guide/cm/sec2/sec29c, accessed 17th March 2016) References: Nemecek T., Kägi T. and Blaser S. (2007) Life Cycle Inventories of Agricultural Production Systems. Final report ecoinvent v2.0 No.15. Swiss Centre for Life Cycle Inventories, Dübendorf, CH. Nemecek T. & Schnetzer J. (2011) Methods of assessment of direct field emissions for LCIs of agricultural production systems. Data v3.0 (2012)
  production volume 6.04742e8 kg; = 22906883000*0.032*1000*0.5*0.05* phosphate_fertiliser_output
    Calculated based on literature data. 2.29E+07 (1000heads) is the number of poultry being produced every year in the world (FAOSTAT, sum of item codes 1057 Chicken, 1079 Turkeys and 2029 Poultry birds, accessed 20151026). 0.032 tons/year is the amount of manure produced by one animal each year (University of Wisconsin, http://learningstore.uwex.edu/Assets/pdfs/A3601.pdf, accessed 20151026 and World Bank, https://www.google.ch/url?sa=t&rct=j&q=&esrc=s&source=web&cd=10&cad=rja&uact=8&ved=0CE4QFjAJahUKEwiD_I_Cm-DIAhXh8HIKHZMdDLY&url=http%3A%2F%2Fsiteresources.worldbank.org%2FINTAPCFORUM%2FResources%2Fpart3.ppt&usg=AFQjCNGs7QNHFbEJyEG80btGpJtKy04C3A&sig2=1XdVmhpSsiSRhzx_XLP34Q&bvm=bv.105841590,d.bGQ, accessed 20151026). 50% of the fresh manure gets dried. This activity concerns 5% of the dried poultry manure.
  property price 0.241 EUR2005; name phosphate_fertiliser_outpu_price_EUR2005
    Set equal to the price of the corresponding inorganic fertiliser
  property carbon content, fossil 0
    Carbon content, fossil is calculated based on the chemical formula of the substance.
  property oxygen content 0.563579
    Oxygen content (on a dry matter basis) of organic phosphorus fertiliser, as P2O5 is calculated from the molecular formula of the substance (Phosphorus).
  property phosphorus content 0.436421
    Phosphorus content (on a dry matter basis) of organic phosphorus fertiliser, as P2O5 is calculated from the molecular formula of the substance (Phosphorus).
  property carbon content 0
    carbon content on a dry matter basis (reserved; not for manual entry)
  property true value 0.007953; name phosphate_fertiliser_output_true_value
    allocation property applied in "true value" allocation // value calculated from revenue
  properties: dry mass 1 kg, wet mass 1 kg, water in wet mass 0 kg, carbon content, non-fossil 0, water content 0, carbon allocation 0 kg
- organic nitrogen fertiliser, as N: 0 kg; name nitrogen_fertiliser_output; CPC 34659: Fertilizers n.e.c.; By-product classification allocatable product
  (same comment as for organic phosphorus fertiliser, as P2O5)
  production volume 8.42973e8 kg; = 22906883000*0.032*1000*0.5*0.05* nitrogen_fertiliser_output
    (same comment as for organic phosphorus fertiliser, as P2O5)
  property price 0.473 EUR2005; name nitrogen_fertiliser_output_price_EUR2005
    Set equal to the price of the corresponding inorganic fertiliser
  property carbon content, fossil 0
    Carbon content, fossil is calculated based on the chemical formula of the substance.
  property nitrogen content 1
    Nitrogen content (on a dry matter basis) of organic nitrogen fertiliser, as N is calculated from the molecular formula of the substance (Nitrogen).
  property carbon content 0
    carbon content on a dry matter basis (reserved; not for manual entry)
  property true value 0.021758; name nitrogen_fertiliser_output_true_value
    allocation property applied in "true value" allocation // value calculated from revenue
  properties: water in wet mass 0 kg, dry mass 1 kg, carbon content, non-fossil 0, water content 0, wet mass 1 kg, carbon allocation 0 kg

## By-products
- organic potassium fertiliser, as K2O: 0 kg; name potassium_fertiliser_output; By-product classification allocatable product; CPC 34659: Fertilizers n.e.c.
  (same comment as for organic phosphorus fertiliser, as P2O5)
  production volume 4.58138e8 kg; = 22906883000*0.032*1000*0.5*0.05* potassium_fertiliser_output
    (same comment as for organic phosphorus fertiliser, as P2O5)
  property carbon content, fossil 0
    Carbon content, fossil is calculated based on the chemical formula of the substance.
  property oxygen content 0.169852
    Oxygen content (on a dry matter basis) of organic potassium fertiliser, as K2O is calculated from the molecular formula of the substance (Potassium).
  property potassium content 0.830148
    Potassium content (on a dry matter basis) of organic potassium fertiliser, as K2O is calculated from the molecular formula of the substance (Potassium).
  property price 0.188 EUR2005; name potassium_fertiliser_outpu_price_EUR2005
    Set equal to the price of the corresponding inorganic fertiliser
  property carbon content 0
    carbon content on a dry matter basis (reserved; not for manual entry)
  property true value 0.0047; name potassium_fertiliser_output_true_value
    allocation property applied in "true value" allocation // value calculated from revenue
  properties: wet mass 1 kg, carbon content, non-fossil 0, dry mass 1 kg, water in wet mass 0 kg, water content 0, carbon allocation 0 kg

## Inputs from technosphere
- poultry manure, dried: 7.00357 kg; name poultry_manure
  combined production
  properties: copper content 4.38e-5, nitrogen content 0.532, phosphorus content 0.0167, water content 0.156069, lead content 2.92e-6, nickel content 4e-5, carbon content, non-fossil 0.33389, wet mass 1 kg, zinc content 0.000349, dry mass 0.865 kg, potassium content 0.024, mercury content 2e-7, cadmium content 2.92e-7
  note on copper content: pg 36 Tab 7. Original values are given in kg/m3, but this is an error and it is mg/kg DM
