# sawnwood production, softwood, dried (u=20%), planed

Dataset: EcoSpold 2, unit process
Geography: RoW
Time period: 2014-01-01 to 2021-12-31
Technology level: current
Classification: EcoSpold01Categories: wooden materials/extraction
Classification: ISIC rev.4 ecoinvent: 1610:Sawmilling and planing of wood
Scenario: Business-as-Usual
System model: Allocation, cut-off by classification
Generated by: Emilia Moreno Ruiz
Database: ecoinvent
isCopyrightProtected: false
accessRestrictedTo: 1

## General comment
This activity is providing a more generic sawnwood product, combining inputs from the specific products issued from planing. The relative contribution is based on their Production Volumes.

## Included activities start
Entry of the specific products issued of the planing activity

## Included activities end
Delivery of the generic planed product

## Reference product
- sawnwood, softwood, dried (u=20%), planed: 1 m3; By-product classification allocatable product; CPC 31101: Wood, sawn or chipped lengthwise, sliced or peeled, of a thickness exceeding 6 mm, of coniferous wood
  production volume 3.77486e6 m3; = 53400000*0.1
    50% of the Production Volume issued from the planing has been made accesible as this generic product
  property price 151 EUR2005
    Temporary price data. Calculated as 90% of purchasers price based on: 2004 export prices for the World+ according to: http://faostat.fao.org/site/626/DesktopDefault.aspx?PageID=626#ancor downloaded 28 April 2009; calculated as export value divided by export volume.
  property heating value, net 6514.84 MJ
    LHV is calculated based on the Carbon content of the product. More details can be found on the respective documentation.The property is based on a value of 12.06MJ/kg
  property carbon content 0.494
    carbon content on a dry matter basis (reserved; not for manual entry)
  properties: carbon content, non-fossil 0.494, dry mass 450 kg, water content 0.2, carbon content, fossil 0, wet mass 540 kg, water in wet mass 90 kg, carbon allocation 222.3 kg

## Inputs from technosphere
- sawnwood, beam, softwood, dried (u=20%), planed: 0.519209 m3; lognormal variance with pedigree 0.0026, pedigree (1,1,3,1,1)
  The input share has been calculated using data from the planing activity
  properties: carbon content, non-fossil 0.494, dry mass 387.2 kg, wet mass 464.64 kg, water content 0.2, heating value, net 5860.46 MJ
- sawnwood, board, softwood, dried (u=20%), planed: 0.449982 m3; lognormal variance with pedigree 0.0026, pedigree (1,1,3,1,1)
  The input share has been calculated using data from the planing activity
  properties: heating value, net 5605.65 MJ, wet mass 464.64 kg, dry mass 387.2 kg, water content 0.2, carbon content, non-fossil 0.494
- sawnwood, lath, softwood, dried (u=20%), planed: 0.184608 m3; lognormal variance with pedigree 0.0026, pedigree (1,1,3,1,1)
  The input share has been calculated using data from the planing activity
  properties: carbon content, non-fossil 0.494, heating value, net 5860.46 MJ, water content 0.2, wet mass 485.76 kg, dry mass 404.8 kg
