# treatment of wastewater, average, capacity 5E9l/year

Dataset: EcoSpold 2, unit process
Geography: CA-QC
Time period: 1994-01-01 to 2021-12-31
Technology level: current
Classification: ISIC rev.4 ecoinvent: 3700:Sewerage
Classification: EcoSpold01Categories: waste management/wastewater treatment
Tags: Treatment
Scenario: Business-as-Usual
System model: Allocation, cut-off by classification
Generated by: Marylène Dussault
Published in: Doka G. 2008
Database: ecoinvent
isCopyrightProtected: true
accessRestrictedTo: 1

## General comment
This dataset represents activated sludge wastewater treatment. This dataset is a copy of the Global version and is used to approximate activated sludage and biofiltration technolgie in Quebec. This dataset should be replace as soon as data for these technologies in the Quebec region become available. Only the production volume have been modified and the sewer process have been removed as it is included in the market process. Wastewater purified in a medium size municipal wastewater treatment plant (capacity class 3), with an average capacity size of 24900 per-captia-equivalents PCE.
Wastewater contains (in kg/m3): COD: 0.1556 (GSD=122.5%); BOD: 0.1036 (GSD=122.5%); DOC: 0.04575 (GSD=122.5%); TOC: 0.0673 (GSD=122.5%); SO4-S: 0.044 (GSD=122.5%); S part.: 0.002 (GSD=122.5%); NH4-N: 0.01495 (GSD=122.5%); NO3-N: 0.00105 (GSD=122.5%); NO2-N: 0.0004 (GSD=122.5%); N part.: 0.003279 (GSD=122.5%); N org. solv.: 0.008392 (GSD=122.5%); PO4-P: 0.002459 (GSD=122.5%); P part.: 0.0006147 (GSD=122.5%); Cl: 0.03003 (GSD=224.1%); F: 0.00003277 (GSD=224.1%); As: 0.0000009 (GSD=224.1%); Cd: 0.0000002806 (GSD=223.8%); Co: 0.000001618 (GSD=223.8%); Cr: 0.00001223 (GSD=223.8%); Cu: 0.00003744 (GSD=223.8%); Hg: 0.0000002 (GSD=223.8%); Mn: 0.000053 (GSD=224.1%); Mo: 0.0000009574 (GSD=223.8%); Ni: 0.000006589 (GSD=223.8%); Pb: 0.000008631 (GSD=223.8%); Sn: 0.0000034 (GSD=224.1%); Zn: 0.0001094 (GSD=223.8%); Si: 0.003126 (GSD=224.1%); Fe: 0.007093 (GSD=224.1%); Ca: 0.05083 (GSD=224.1%); Al: 0.001038 (GSD=224.1%); K: 0.0003989 (GSD=224.1%); Mg: 0.005707 (GSD=224.1%); Na: 0.002186 (GSD=224.1%);

## Included activities end
Infrastructure materials for municipal wastewater treatment plant, transports, dismantling. Land use burdens.

## Geography
Specific to the technology mix encountered in Switzerland in 2000. Well applicable to modern treatment practices in Europe, North America or Japan.

## Technology
Three stage wastewater treatment (mechanical, biological, chemical) including sludge digestion (fermentation) according to the average technology in Switzerland

## Parameters
- fraction, process water, to air: 0.1 dimensionless; lognormal variance with pedigree 0.092025, pedigree (4,4,3,2,4)

## Reference product
- wastewater, average: -1 m3; name WWT; CPC 39920: Sewage sludge; By-product classification Waste
  EcoSpold01Location=CH
  production volume 1.01469e8 m3; name PV_WWT
    Literature value. Represents volume of treated wastewater from lagoon facility during a year in Québec. Calculated from Quebec government published data in annual report on wastewater treatments in the region (MAMOT, 2011). Includes all types of lagoon technology (aerated, facultative, non-aerated, etc.).
  property price 0 EUR2005; name WWT_price_EUR2005
    Waste products are assigned a price of zero as they are assumed to require further treatment.
  property carbon content, non-fossil 0.194039
    0.0673 kg TOC/m3 (Tab A.17, ecoinvent v2.2 report 13_I). TOC was considered as Total Carbon.
  property carbon content 0.194039
    carbon content on a dry matter basis (reserved; not for manual entry)
  properties: wet mass 1000 kg, water content 2882.2, water in wet mass 999.653 kg, carbon content, fossil 0, dry mass 0.346837 kg, carbon allocation 0.0673 kg

## Inputs from technosphere
- chemical, inorganic: 5.7056e-7 kg; lognormal variance with pedigree 0.082, pedigree (1,1,5,5,1)
  burden from sludge incineration. Uncertainty calculated from wastewater composition and treatment model
  EcoSpold01Location=GLO
  properties: carbon content, fossil 0.003, wet mass 1 kg, dry mass 1 kg
  note on carbon content, fossil: This dataset is an unweighted average of 20 inorganic substances (listed in Tab 88.1, ecoinvent v2.2 report 8, part II), being part of the top100 chemicals included in this database. The C-content has also been calculated as an unweighted average of the C content of the substances composing this dataset.
- sodium hydroxide, without water, in 50% solution state: 0.00030516 kg; lognormal variance with pedigree 0.092, pedigree (1,1,5,5,1)
  burden from sludge incineration. Uncertainty calculated from wastewater composition and treatment model
  EcoSpold01Location=RER
  properties: heating value, net 3.03 MJ, dry mass 1 kg, wet mass 1 kg
- chemical, organic: 4.5537e-7 kg; lognormal variance with pedigree 0.432, pedigree (1,1,5,5,1)
  (same comment as for chemical, inorganic)
  properties: heating value, net 19.03 MJ, wet mass 1 kg, dry mass 1 kg, carbon content, fossil 0.628
  note on carbon content, fossil: This dataset is an unweighted average of 20 organic substances (listed in Tab 88.1, ecoinvent v2.2 report 8, part II), being part of the top100 chemicals included in this database. The C-content has also been calculated as an unweighted average of the C content of the substances composing this dataset.
- process-specific burdens, slag landfill: 0.020463 kg; lognormal variance with pedigree 0.072, pedigree (1,1,5,5,1)
  burden from sludge incineration. Uncertainty calculated from wastewater composition and treatment model
  EcoSpold01Location=CH
- waste graphical paper: -0.0155 kg; name w_paper; lognormal variance with pedigree 0.042, pedigree (1,1,5,5,1)
  EcoSpold01Location=CH
  direct wastewater treatment plant burden. Uncertainty calculated from wastewater composition and treatment model
  production volume 1.57278e6 kg; = (-1)*w_paper/WWT*PV_WWT
    Calculated from the production volume of sewage, average in proportion to the respective output amounts.
  property price 0 EUR2005; name w_paper_price_EUR2005
  properties: wet mass 1 kg, carbon content, non-fossil 0.454955, water content 0.126126, dry mass 0.888 kg, heating value, net 14.12 MJ
  note on heating value, net: Value taken from the general comment of the treatment dataset.
- titanium dioxide: 1.7875e-6 kg; lognormal variance with pedigree 0.542, pedigree (1,1,5,5,1)
  EcoSpold01Location=RER
  burden from sludge incineration. Uncertainty calculated from wastewater composition and treatment model
  properties: wet mass 1 kg, dry mass 1 kg
- chromium oxide, flakes: 3.6479e-8 kg; lognormal variance with pedigree 0.542, pedigree (1,1,5,5,1)
  (same comment as for sodium hydroxide, without water, in 50% solution state)
  properties: dry mass 1 kg, wet mass 1 kg
- electricity, high voltage: 0.016155 kWh; lognormal variance with pedigree 0.492, pedigree (1,1,5,5,1)
  (same comment as for process-specific burdens, slag landfill)
- hydrochloric acid, without water, in 30% solution state: 3.4233e-7 kg; lognormal variance with pedigree 0.082, pedigree (1,1,5,5,1)
  (same comment as for titanium dioxide)
  properties: heating value, net 3.32 MJ, dry mass 1 kg, wet mass 1 kg
- waste plastic, mixture: -0.0155 kg; name w_plastic; lognormal variance with pedigree 0.042, pedigree (1,1,5,5,1)
  direct wastewater treatment plant burden. Uncertainty calculated from wastewater composition and treatment model
  EcoSpold01Location=CH
  production volume 1.57278e6 kg; = (-1)*w_plastic/WWT*PV_WWT
    (same comment as for waste graphical paper)
  property price 0 EUR2005; name w_plastic_price_EUR2005
  properties: wet mass 1 kg, dry mass 0.847 kg, water content 0.180638, carbon content, fossil 0.747344, heating value, net 30.79 MJ
  note on carbon content, fossil: C content in 1 kg DM was calculated using data in Tab A.2, ecoinvent v2.2 report 13_I
- electricity, low voltage: 0.20571 kWh; lognormal variance with pedigree 0.062, pedigree (1,1,5,5,1)
  (same comment as for waste graphical paper)
- liquid manure spreading, by vacuum tanker: 0.00039637 m3; lognormal variance with pedigree 0.042, pedigree (1,1,5,5,1)
  burden from sludge spreading. Uncertainty calculated from wastewater composition and treatment model;activityLink introduced to establish a direct link to the corresponding regional supply of this product
  EcoSpold01Location=CH
- cement, unspecified: 0.0012833 kg; lognormal variance with pedigree 0.082, pedigree (1,1,5,5,1)
  (same comment as for process-specific burdens, slag landfill)
  properties: wet mass 1 kg, dry mass 1 kg
- iron sulfate: 0.01166 kg; lognormal variance with pedigree 0.102, pedigree (1,1,5,5,1)
  direct wastewater treatment plant burden. Uncertainty calculated from wastewater composition and treatment model
  EcoSpold01Location=RER
  properties: wet mass 1 kg, dry mass 1 kg
- residual material landfill: 6.684e-12 unit; lognormal variance with pedigree 0.072, pedigree (1,1,5,5,1)
  EcoSpold01Location=CH
  burden from sludge incineration. Uncertainty calculated from wastewater composition and treatment model
- heat, district or industrial, natural gas: 0.00548082 MJ; lognormal variance with pedigree 0.222, pedigree (1,1,5,5,1)
  (same comment as for sodium hydroxide, without water, in 50% solution state)
  properties: heating value, net 1 MJ
- wastewater treatment facility, capacity 5E9l/year: 5.6882e-9 unit; lognormal variance with pedigree 0.042, pedigree (1,1,5,5,1)
  uncertainty heeded in exchanges of the module;activityLink introduced to establish a direct link to the corresponding regional supply of this product
  EcoSpold01Location=CH
- process-specific burdens, residual material landfill: 0.0032083 kg; lognormal variance with pedigree 0.072, pedigree (1,1,5,5,1)
  (same comment as for residual material landfill)
- iron (III) chloride, without water, in 40% solution state: 0.015946 kg; lognormal variance with pedigree 0.102, pedigree (1,1,5,5,1)
  EcoSpold01Location=CH
  direct wastewater treatment plant burden plus burden from sludge incineration. Uncertainty calculated from wastewater composition and treatment model
  properties: dry mass 1 kg, wet mass 1 kg
- slag landfill: 3.6379e-11 unit; lognormal variance with pedigree 0.072, pedigree (1,1,5,5,1)
  (same comment as for process-specific burdens, slag landfill)
- ammonia, anhydrous, liquid: 6.2445e-5 kg; lognormal variance with pedigree 0.222, pedigree (1,1,5,5,1)
  (same comment as for residual material landfill)
  properties: wet mass 1 kg, dry mass 1 kg
- aluminium sulfate, powder: 0.0031512 kg; lognormal variance with pedigree 0.102, pedigree (1,1,5,5,1)
  EcoSpold01Location=RER
  direct wastewater treatment plant burden. Uncertainty calculated from wastewater composition and treatment model
  properties: dry mass 1 kg, wet mass 1 kg
- waste cement, hydrated: -0.0032083 kg; name w_cement; lognormal variance with pedigree 0.082, pedigree (1,1,5,5,1)
  (same comment as for process-specific burdens, slag landfill)
  production volume 325544 kg; = (-1)*w_cement/WWT*PV_WWT
    (same comment as for waste graphical paper)
  property price 0 EUR2005; name w_cement_price_EUR2005
  properties: dry mass 1 kg, wet mass 1 kg
- municipal waste incineration facility: 2.8093e-11 unit; lognormal variance with pedigree 0.042, pedigree (1,1,5,5,1)
  (same comment as for process-specific burdens, slag landfill)
- heat, district or industrial, other than natural gas: 0.094244 MJ; lognormal variance with pedigree 0.052, pedigree (1,1,5,5,1)
  (same comment as for residual material landfill)
  properties: heating value, net 1 MJ
- quicklime, milled, packed: 1.0865e-6 kg; lognormal variance with pedigree 0.082, pedigree (1,1,5,5,1)
  (same comment as for residual material landfill)
  properties: wet mass 1 kg, water content 0.010101, dry mass 0.99 kg
- process-specific burdens, municipal waste incineration: 0.11237 kg; lognormal variance with pedigree 0.042, pedigree (1,1,5,5,1)
  (same comment as for process-specific burdens, slag landfill)

## Emissions to nature
- Tin, ion [water, ground-, long-term]: 5.2834e-7 kg; lognormal variance with pedigree 1.262, pedigree (1,1,5,5,1)
  emission from sludge incineration. Uncertainty calculated from wastewater composition and treatment model
- Silicon [soil, agricultural]: 0.001377 kg; lognormal variance with pedigree 0.712, pedigree (1,1,5,5,1)
  emission from sludge spreading. Uncertainty calculated from wastewater composition and treatment model
- Aluminium [water, surface water]: 6.231e-5 kg; lognormal variance with pedigree 0.552, pedigree (1,1,5,5,1)
  sewer overload discharge plus direct wastewater treatment plant emission plus emission from sludge incineration. Uncertainty calculated from wastewater composition and treatment model
- Nickel, ion [water, ground-, long-term]: 1.2904e-6 kg; lognormal variance with pedigree 0.712, pedigree (1,1,5,5,1)
  (same comment as for Tin, ion)
- Carbon dioxide, non-fossil [air, urban air close to ground]: 0.1874 kg; lognormal variance with pedigree 0.062, pedigree (1,1,5,5,1)
  direct wastewater treatment plant emission plus direct digester gas emission plus emission from sludge incineration. Uncertainty calculated from wastewater composition and treatment model
- Iron, ion [water, surface water]: 0.003602 kg; lognormal variance with pedigree 0.662, pedigree (1,1,5,5,1)
  (same comment as for Aluminium)
- Phosphate [water, ground-]: 1.7752e-5 kg; lognormal variance with pedigree 0.132, pedigree (1,1,5,5,1)
  (same comment as for Silicon)
- Zinc, ion [water, surface water]: 3.3808e-5 kg; lognormal variance with pedigree 0.652, pedigree (1,1,5,5,1)
  (same comment as for Aluminium)
- Aluminium [air, urban air close to ground]: 1.223e-6 kg; lognormal variance with pedigree 0.472, pedigree (1,1,5,5,1)
  direct digester gas emission plus emission from sludge incineration. Uncertainty calculated from wastewater composition and treatment model
- Cobalt [soil, agricultural]: 3.7332e-7 kg; lognormal variance with pedigree 0.712, pedigree (1,1,5,5,1)
  (same comment as for Silicon)
- Zinc [soil, agricultural]: 3.54e-5 kg; lognormal variance with pedigree 0.712, pedigree (1,1,5,5,1)
  (same comment as for Silicon)
- Copper, ion [water, surface water]: 9.7124e-6 kg; lognormal variance with pedigree 0.652, pedigree (1,1,5,5,1)
  (same comment as for Aluminium)
- Magnesium [water, ground-, long-term]: 0.00027466 kg; lognormal variance with pedigree 0.712, pedigree (1,1,5,5,1)
  (same comment as for Tin, ion)
- Arsenic [air, urban air close to ground]: 2.5337e-10 kg; lognormal variance with pedigree 0.732, pedigree (1,1,5,5,1)
  (same comment as for Aluminium)
- Sulfate [water, ground-, long-term]: 0.0020512 kg; lognormal variance with pedigree 0.102, pedigree (1,1,5,5,1)
  (same comment as for Tin, ion)
- Chromium VI [water, ground-, long-term]: 3.3892e-7 kg; lognormal variance with pedigree 1.092, pedigree (1,1,5,5,1)
  (same comment as for Tin, ion)
- Phosphorus [air, urban air close to ground]: 1.1527e-6 kg; lognormal variance with pedigree 0.102, pedigree (1,1,5,5,1)
  (same comment as for Aluminium)
- Sulfate [water, surface water]: 0.14483 kg; lognormal variance with pedigree 0.082, pedigree (1,1,5,5,1)
  (same comment as for Aluminium)
- Calcium, ion [water, ground-, long-term]: 0.0023063 kg; lognormal variance with pedigree 0.712, pedigree (1,1,5,5,1)
  (same comment as for Tin, ion)
- Cadmium, ion [water, ground-, long-term]: 7.3701e-10 kg; lognormal variance with pedigree 6.902, pedigree (1,1,5,5,1)
  (same comment as for Tin, ion)
- Sodium, ion [water, surface water]: 0.002186 kg; lognormal variance with pedigree 0.672, pedigree (1,1,5,5,1)
  (same comment as for Aluminium)
- Cyanide [air, urban air close to ground]: 1.114e-6 kg; lognormal variance with pedigree 0.242, pedigree (1,1,5,5,1)
  (same comment as for Tin, ion)
- Arsenic [soil, agricultural]: 9.1004e-8 kg; lognormal variance with pedigree 0.712, pedigree (1,1,5,5,1)
  (same comment as for Silicon)
- Methane, non-fossil [air, urban air close to ground]: 0.00050234 kg; lognormal variance with pedigree 0.142, pedigree (1,1,5,5,1)
  (same comment as for Aluminium)
- Phosphate [water, surface water]: 0.002715 kg; lognormal variance with pedigree 0.082, pedigree (1,1,5,5,1)
  sewer overload discharge plus direct wastewater treatment plant emission plus emission from sludge incineration plus emission from sludge spreading. Uncertainty calculated from wastewater composition and treatment model
- Chromium [air, urban air close to ground]: 2.3673e-13 kg; lognormal variance with pedigree 0.802, pedigree (1,1,5,5,1)
  (same comment as for Aluminium)
- Lead [water, ground-, long-term]: 2.909e-7 kg; lognormal variance with pedigree 6.922, pedigree (1,1,5,5,1)
  (same comment as for Tin, ion)
- DOC, Dissolved Organic Carbon [water, ground-, long-term]: 8.9735e-5 kg; lognormal variance with pedigree 0.112, pedigree (1,1,5,5,1)
  (same comment as for Tin, ion)
- Mercury [air, urban air close to ground]: 3.3644e-13 kg; lognormal variance with pedigree 0.742, pedigree (1,1,5,5,1)
  (same comment as for Aluminium)
- COD, Chemical Oxygen Demand [water, surface water]: 0.030152 kg; lognormal variance with pedigree 0.082, pedigree (1,1,5,5,1)
  (same comment as for Aluminium)
- COD, Chemical Oxygen Demand [water, ground-, long-term]: 0.00022677 kg; lognormal variance with pedigree 0.112, pedigree (1,1,5,5,1)
  (same comment as for Tin, ion)
- Cadmium [soil, agricultural]: 6.4759e-8 kg; lognormal variance with pedigree 0.712, pedigree (1,1,5,5,1)
  (same comment as for Silicon)
- Nitrogen [water, surface water]: 0.00049 kg; lognormal variance with pedigree 0.082, pedigree (1,1,5,5,1)
  direct wastewater treatment plant emission. Uncertainty calculated from wastewater composition and treatment model
- Iron [air, urban air close to ground]: 2.3545e-7 kg; lognormal variance with pedigree 0.202, pedigree (1,1,5,5,1)
  (same comment as for Aluminium)
- Lead [air, urban air close to ground]: 1.5184e-10 kg; lognormal variance with pedigree 0.752, pedigree (1,1,5,5,1)
  (same comment as for Aluminium)
- Potassium, ion [water, surface water]: 0.0003989 kg; lognormal variance with pedigree 0.672, pedigree (1,1,5,5,1)
  (same comment as for Aluminium)
- Calcium [air, urban air close to ground]: 4.418e-6 kg; lognormal variance with pedigree 0.732, pedigree (1,1,5,5,1)
  (same comment as for Aluminium)
- Nickel, ion [water, surface water]: 3.9965e-6 kg; lognormal variance with pedigree 0.662, pedigree (1,1,5,5,1)
  (same comment as for Aluminium)
- Nickel [air, urban air close to ground]: 5.9485e-14 kg; lognormal variance with pedigree 0.812, pedigree (1,1,5,5,1)
  (same comment as for Aluminium)
- Cobalt [water, ground-, long-term]: 3.7072e-7 kg; lognormal variance with pedigree 0.712, pedigree (1,1,5,5,1)
  (same comment as for Tin, ion)
- BOD5, Biological Oxygen Demand [water, surface water]: 0.0098229 kg; lognormal variance with pedigree 0.072, pedigree (1,1,5,5,1)
  (same comment as for Aluminium)
- Calcium, ion [water, surface water]: 0.045857 kg; lognormal variance with pedigree 0.672, pedigree (1,1,5,5,1)
  (same comment as for Aluminium)
- Mercury [water, surface water]: 6.2619e-8 kg; lognormal variance with pedigree 0.642, pedigree (1,1,5,5,1)
  (same comment as for Aluminium)
- TOC, Total Organic Carbon [water, surface water]: 0.0072993 kg; lognormal variance with pedigree 0.082, pedigree (1,1,5,5,1)
  (same comment as for Aluminium)
- Arsenic, ion [water, surface water]: 7.5206e-7 kg; lognormal variance with pedigree 0.612, pedigree (1,1,5,5,1)
  (same comment as for Aluminium)
- DOC, Dissolved Organic Carbon [water, surface water]: 0.0075378 kg; lognormal variance with pedigree 0.082, pedigree (1,1,5,5,1)
  (same comment as for Aluminium)
- Cadmium, ion [water, surface water]: 1.4245e-7 kg; lognormal variance with pedigree 0.662, pedigree (1,1,5,5,1)
  (same comment as for Aluminium)
- Cobalt [air, urban air close to ground]: 1.3444e-14 kg; lognormal variance with pedigree 0.812, pedigree (1,1,5,5,1)
  (same comment as for Aluminium)
- Lead [water, surface water]: 9.4871e-7 kg; lognormal variance with pedigree 0.602, pedigree (1,1,5,5,1)
  (same comment as for Aluminium)
- Aluminium [soil, agricultural]: 0.00069025 kg; lognormal variance with pedigree 0.452, pedigree (1,1,5,5,1)
  (same comment as for Silicon)
- Magnesium [water, surface water]: 0.0051483 kg; lognormal variance with pedigree 0.672, pedigree (1,1,5,5,1)
  (same comment as for Aluminium)
- Sulfur dioxide [air, urban air close to ground]: 0.00088561 kg; lognormal variance with pedigree 0.112, pedigree (1,1,5,5,1)
  (same comment as for Aluminium)
- Silicon [water, ground-, long-term]: 0.00013562 kg; lognormal variance with pedigree 5.462, pedigree (1,1,5,5,1)
  (same comment as for Tin, ion)
- Carbon monoxide, non-fossil [air, urban air close to ground]: 0.00016855 kg; lognormal variance with pedigree 0.152, pedigree (1,1,5,5,1)
  (same comment as for Aluminium)
- Copper [air, urban air close to ground]: 1.0879e-10 kg; lognormal variance with pedigree 0.762, pedigree (1,1,5,5,1)
  (same comment as for Aluminium)
- Sulfur [soil, agricultural]: 0.00072107 kg; lognormal variance with pedigree 0.102, pedigree (1,1,5,5,1)
  (same comment as for Silicon)
- Chloride [water, surface water]: 0.040484 kg; lognormal variance with pedigree 0.482, pedigree (1,1,5,5,1)
  (same comment as for Aluminium)
- Nitrate [water, surface water]: 0.048302 kg; lognormal variance with pedigree 0.062, pedigree (1,1,5,5,1)
  (same comment as for Aluminium)
- Lead [soil, agricultural]: 3.5998e-6 kg; lognormal variance with pedigree 0.712, pedigree (1,1,5,5,1)
  (same comment as for Silicon)
- Tin [soil, agricultural]: 9.2667e-7 kg; lognormal variance with pedigree 0.712, pedigree (1,1,5,5,1)
  (same comment as for Silicon)
- Manganese [soil, agricultural]: 1.223e-5 kg; lognormal variance with pedigree 0.712, pedigree (1,1,5,5,1)
  (same comment as for Silicon)
- Zinc, ion [water, ground-, long-term]: 6.2251e-7 kg; lognormal variance with pedigree 5.512, pedigree (1,1,5,5,1)
  (same comment as for Tin, ion)
- Molybdenum [water, surface water]: 5.287e-7 kg; lognormal variance with pedigree 0.592, pedigree (1,1,5,5,1)
  (same comment as for Aluminium)
- TOC, Total Organic Carbon [water, ground-, long-term]: 8.9735e-5 kg; lognormal variance with pedigree 0.112, pedigree (1,1,5,5,1)
  (same comment as for Tin, ion)
- BOD5, Biological Oxygen Demand [water, ground-, long-term]: 7.4177e-5 kg; lognormal variance with pedigree 0.112, pedigree (1,1,5,5,1)
  (same comment as for Tin, ion)
- Manganese [water, ground-, long-term]: 1.1945e-5 kg; lognormal variance with pedigree 0.872, pedigree (1,1,5,5,1)
  (same comment as for Tin, ion)
- Chromium VI [water, surface water]: 6.3121e-6 kg; lognormal variance with pedigree 0.652, pedigree (1,1,5,5,1)
  (same comment as for Aluminium)
- Nitrogen oxides [air, urban air close to ground]: 0.00069387 kg; lognormal variance with pedigree 0.082, pedigree (1,1,5,5,1)
  (same comment as for Aluminium)
- Water [air, unspecified]: 0.1 m3; lognormal variance with pedigree 0.0827, pedigree (2,2,5,5,1)
  Calculated value based on water balance.
- Copper, ion [water, ground-, long-term]: 1.1913e-5 kg; lognormal variance with pedigree 0.732, pedigree (1,1,5,5,1)
  (same comment as for Tin, ion)
- Zinc [air, urban air close to ground]: 6.5594e-10 kg; lognormal variance with pedigree 0.762, pedigree (1,1,5,5,1)
  (same comment as for Aluminium)
- Water [water, unspecified]: 0.9 m3; lognormal variance with pedigree 0.0827, pedigree (2,2,5,5,1)
  Calculated value based on water balance.
  property carbon content, fossil 0; name C_content_fossil
  property wet mass 1000 kg; name WM
  property carbon content, non-fossil 0; name C_content_non_fossil
  property dry mass 0 kg; name DM
  property water in wet mass 1000 kg; name WWM
- Magnesium [soil, agricultural]: 0.00026233 kg; lognormal variance with pedigree 0.712, pedigree (1,1,5,5,1)
  (same comment as for Silicon)
- Dinitrogen monoxide [air, urban air close to ground]: 0.00010637 kg; lognormal variance with pedigree 0.082, pedigree (1,1,5,5,1)
  direct wastewater treatment plant emission plus direct digester gas emission plus emission from sludge incineration plus emission from sludge spreading. Uncertainty calculated from wastewater composition and treatment model
- Magnesium [air, urban air close to ground]: 4.0971e-7 kg; lognormal variance with pedigree 0.732, pedigree (1,1,5,5,1)
  (same comment as for Aluminium)
- Aluminium [water, ground-, long-term]: 0.00057938 kg; lognormal variance with pedigree 0.462, pedigree (1,1,5,5,1)
  (same comment as for Tin, ion)
- Cadmium [air, urban air close to ground]: 4.1068e-12 kg; lognormal variance with pedigree 0.732, pedigree (1,1,5,5,1)
  (same comment as for Aluminium)
- Molybdenum [water, ground-, long-term]: 2.0729e-7 kg; lognormal variance with pedigree 0.712, pedigree (1,1,5,5,1)
  (same comment as for Tin, ion)
- Mercury [soil, agricultural]: 6.4759e-8 kg; lognormal variance with pedigree 0.712, pedigree (1,1,5,5,1)
  (same comment as for Silicon)
- Manganese [water, surface water]: 2.6898e-5 kg; lognormal variance with pedigree 0.662, pedigree (1,1,5,5,1)
  (same comment as for Aluminium)
- Tin, ion [water, surface water]: 1.4223e-6 kg; lognormal variance with pedigree 0.662, pedigree (1,1,5,5,1)
  (same comment as for Aluminium)
- Chromium, ion [water, surface water]: 1.0204e-8 kg; lognormal variance with pedigree 0.722, pedigree (1,1,5,5,1)
  (same comment as for Tin, ion)
- Nitrate [water, ground-, long-term]: 4.4464e-5 kg; lognormal variance with pedigree 0.082, pedigree (1,1,5,5,1)
  (same comment as for Tin, ion)
- Calcium [soil, agricultural]: 0.0023366 kg; lognormal variance with pedigree 0.712, pedigree (1,1,5,5,1)
  (same comment as for Silicon)
- NMVOC, non-methane volatile organic compounds, unspecified origin [air, urban air close to ground]: 2.2813e-6 kg; lognormal variance with pedigree 0.262, pedigree (1,1,5,5,1)
  direct digester gas emission. Uncertainty calculated from wastewater composition and treatment model
- Molybdenum [soil, agricultural]: 2.2094e-7 kg; lognormal variance with pedigree 0.712, pedigree (1,1,5,5,1)
  (same comment as for Silicon)
- Manganese [air, urban air close to ground]: 7.5533e-14 kg; lognormal variance with pedigree 0.832, pedigree (1,1,5,5,1)
  (same comment as for Aluminium)
- Silicon [air, urban air close to ground]: 3.636e-6 kg; lognormal variance with pedigree 0.732, pedigree (1,1,5,5,1)
  (same comment as for Aluminium)
- Chromium [soil, agricultural]: 2.8227e-6 kg; lognormal variance with pedigree 0.712, pedigree (1,1,5,5,1)
  (same comment as for Silicon)
- Ammonia [air, urban air close to ground]: 0.00041569 kg; lognormal variance with pedigree 0.292, pedigree (1,1,5,5,1)
  direct digester gas emission plus emission from sludge incineration plus emission from sludge spreading. Uncertainty calculated from wastewater composition and treatment model
- Carbon [soil, agricultural]: 0.008102 kg; lognormal variance with pedigree 0.102, pedigree (1,1,5,5,1)
  (same comment as for Silicon)
- Iron, ion [water, ground-, long-term]: 0.0033035 kg; lognormal variance with pedigree 0.992, pedigree (1,1,5,5,1)
  (same comment as for Tin, ion)
- Nitrite [water, surface water]: 0.000644 kg; lognormal variance with pedigree 0.082, pedigree (1,1,5,5,1)
  (same comment as for Nitrogen)
- Copper [soil, agricultural]: 1.2994e-5 kg; lognormal variance with pedigree 0.712, pedigree (1,1,5,5,1)
  (same comment as for Silicon)
- Nickel [soil, agricultural]: 1.2152e-6 kg; lognormal variance with pedigree 0.712, pedigree (1,1,5,5,1)
  (same comment as for Silicon)
- Arsenic, ion [water, ground-, long-term]: 5.6685e-8 kg; lognormal variance with pedigree 0.712, pedigree (1,1,5,5,1)
  (same comment as for Tin, ion)
- Silicon [water, surface water]: 0.00018783 kg; lognormal variance with pedigree 0.572, pedigree (1,1,5,5,1)
  (same comment as for Aluminium)
- Fluoride [water, surface water]: 3.2769e-5 kg; lognormal variance with pedigree 0.672, pedigree (1,1,5,5,1)
  (same comment as for Aluminium)
- Molybdenum [air, urban air close to ground]: 5.012e-10 kg; lognormal variance with pedigree 0.732, pedigree (1,1,5,5,1)
  (same comment as for Aluminium)
- Iron [soil, agricultural]: 0.006218 kg; lognormal variance with pedigree 0.162, pedigree (1,1,5,5,1)
  (same comment as for Silicon)
- Ammonium, ion [water, surface water]: 0.011027 kg; lognormal variance with pedigree 0.062, pedigree (1,1,5,5,1)
  (same comment as for Nitrogen)
- Phosphate [water, ground-, long-term]: 0.000135 kg; lognormal variance with pedigree 4.252, pedigree (1,1,5,5,1)
  (same comment as for Tin, ion)
- Tin [air, urban air close to ground]: 1.3946e-9 kg; lognormal variance with pedigree 0.732, pedigree (1,1,5,5,1)
  (same comment as for Aluminium)
- Mercury [water, ground-, long-term]: 3.8216e-9 kg; lognormal variance with pedigree 2.972, pedigree (1,1,5,5,1)
  (same comment as for Tin, ion)
- Cobalt [water, surface water]: 8.2108e-7 kg; lognormal variance with pedigree 0.662, pedigree (1,1,5,5,1)
  (same comment as for Aluminium)

## Extrapolations
This dataset has been extrapolated from year 2000 to the year of the calculation (2021). The uncertainty has been adjusted accordingly.
