# packaging glass factory construction

Dataset: EcoSpold 2, unit process
Geography: RoW
Time period: 2000-01-01 to 2021-12-31
Technology level: current
Classification: ISIC rev.4 ecoinvent: 4290:Construction of other civil engineering projects
Classification: EcoSpold01Categories: glass/packaging
Tags: ConvertedDataset
Scenario: Business-as-Usual
System model: Allocation, cut-off by classification
Generated by: Roland Hischier
Published in: Hischier R. 2007
Database: ecoinvent
isCopyrightProtected: true
accessRestrictedTo: 1

## General comment
A production site with a production amount of 3 times 250 t/d (resulting in 266 kt per year) and a total life span of 50 a is assumed here.
[This dataset was already contained in the ecoinvent database version 2. It was not individually updated during the transfer to ecoinvent version 3. Life Cycle Impact Assessment results may still have changed, as they are affected by changes in the supply chain, i.e. in other datasets. This dataset was generated following the ecoinvent quality guidelines for version 2. It may have been subject to central changes described in the ecoinvent version 3 change report (http://www.ecoinvent.org/database/ecoinvent-version-3/reports-of-changes/), and the results of the central updates were reviewed extensively. The changes added e.g. consistent water flows and other information throughout the database. The documentation of this dataset can be found in the ecoinvent reports of version 2, which are still available via the ecoinvent website. The change report linked above covers all central changes that were made during the conversion process.]

## Included activities end
This module includes the land-use, the material and construction efforts of the machineries (melting furnace, forming machine, cooling furnace), the transport of the furnace to the glass production site and the buildings. Dismantling of the machineries and the buildings are accounted for as well.

## Geography
european production site, based on personal communication from experts of a European packaging glass producer

## Technology
mix of regenerative and recuperative furnace

## Reference product
- packaging glass factory: 1 unit; CPC 53269: Other constructions for manufacturing; By-product classification allocatable product
  production volume 2.67763 unit
    This is a placeholder value that does not reflect real-world production volumes. This dataset does not currently require a real-world production volume to work in the database framework, and no actual data were collected yet. This has no negative effect on the results of the ecoinvent database.
  property price 7.58288e8 EUR2005
    Convert from EU 27 price to the world by currency exchange rate.

## Inputs from technosphere
- electricity, medium voltage: 0 kWh; pedigree (1,1,1,1,1)
  Calculated, based on Frischknecht 1996
  Uncertainty: c
- steel, chromium steel 18/8, hot rolled: 408000 kg; lognormal variance with pedigree 0.0532, pedigree (2,3,5,5,1)
  Personal information from experts
  Uncertainty: p
  properties: wet mass 1 kg, dry mass 1 kg, carbon content, fossil 0.0008
  note on carbon content, fossil: Stainless steel model is the grade 304 steel (18/8 stainless, 18% chromium 8% nickel; max. 0.08% C)
- steel, low-alloyed, hot rolled: 3.07e6 kg; lognormal variance with pedigree 0.0532, pedigree (2,3,5,5,1)
  Personal information from experts
  Uncertainty: p
  properties: carbon content, fossil 0.005, wet mass 1 kg, dry mass 1 kg
  note on carbon content, fossil: Low alloyed steel composition given in Tab. 3.2 ecoinvent v2.2 report 10_partII. Steel assumed to have a C content of 0.5%
- electronics, for control units: 150000 kg; lognormal variance with pedigree 0.0532, pedigree (2,3,5,5,1)
  Personal information from experts
  Uncertainty: p
  properties: wet mass 1 kg, dry mass 1 kg, carbon content, fossil 0.337146, carbon content, non-fossil 0.00013442
  note on carbon content, fossil: The control unit has a composition of 46% steel (housing), 32% plastics, 14% printed wiring boards and 8% cables (various types).;
- building, multi-storey: 200000 m3; lognormal variance with pedigree 0.494, pedigree (5,4,5,5,4)
  Own estimation
  Uncertainty: o
- waste concrete, not reinforced: -5.52e6 kg; lognormal variance with pedigree 0.194, pedigree (5,4,5,5,4)
  Own estimation
  Uncertainty: o
  production volume 1.656e7 kg
    Calculated from the production volume of packaging glass factory in proportion to the respective output amounts.
  properties: wet mass 1 kg, dry mass 1 kg
- electronics scrap from control units: -150000 kg; lognormal variance with pedigree 0.194, pedigree (5,4,5,5,4)
  Calculated, based on input
  Uncertainty: c
  production volume 450000 kg
    (same comment as for waste concrete, not reinforced)
  properties: dry mass 1 kg, wet mass 1 kg, carbon content, non-fossil 0.00013442, carbon content, fossil 0.337146
- cast iron: 4.24e6 kg; lognormal variance with pedigree 0.0532, pedigree (2,3,5,5,1)
  Personal information from experts
  Uncertainty: p
  properties: carbon content, fossil 0.04, wet mass 1 kg, dry mass 1 kg
  note on carbon content, fossil: Cast iron is made by remelting pig iron in small furnaces (e.g. cupola furnaces or electric arc furnaces) and poured into moulds to make castings. It usually contains 2% to 6% carbon (ecoinvent v2.2 report 10_partII). An average content of 4% was considered
- concrete, normal: 0 m3; pedigree (1,1,1,1,1)
  Estimation, in accordance with experts
  Uncertainty: e
  properties: dry mass 2190 kg, wet mass 2380 kg, water content 0.086758
- heat, district or industrial, other than natural gas: 0 MJ; pedigree (1,1,1,1,1)
  Calculated, based on Frischknecht 1996
  Uncertainty: c
  properties: heating value, net 1 MJ
- heat, district or industrial, natural gas: 0 MJ; pedigree (1,1,1,1,1)
  Calculated, based on Frischknecht 1996
  Uncertainty: c
  properties: heating value, net 1 MJ
- road, company, internal: 1e6 m2*year; lognormal variance with pedigree 0.494, pedigree (5,4,5,5,4)
  Own estimation
  Uncertainty: o
- stone wool: 60000 kg; lognormal variance with pedigree 0.0532, pedigree (2,3,5,5,1)
  Personal information from experts
  Uncertainty: p
  properties: wet mass 1 kg, dry mass 1 kg, carbon content, fossil 0.015401
  note on carbon content, fossil: The chemical composition of the glass fibres used in the rock wool production is similar to the composition of naturally cooled volcano basalt and has a composition listed in Tab. 3.1 and 3.2 in ecoinvent v2.2 report 16, part XIV. Rock wool contains: a minimum of 96% mineral fibres,between 0.5 and 3.0 weight percent of phenolic resin depending on the specific product characteristics, and about 0.2 percent mineral oil (ecoinvent v2.2 report 16, part XIV). An average composition of 1.8% phenolic resin, 0.2% mineral oil, and 98% mineral fibres has been assumed and used to calculate C content of the rock wool
- refractory, fireclay, packed: 4.49e7 kg; lognormal variance with pedigree 0.0532, pedigree (2,3,5,5,1)
  Personal information from experts
  Uncertainty: p
  properties: dry mass 1 kg, wet mass 1 kg
- building, hall, steel construction: 160000 m2; lognormal variance with pedigree 0.494, pedigree (5,4,5,5,4)
  Own estimation
  Uncertainty: o
- electricity, medium voltage: 11.1304, 2.13433, 35.8309, 521.129, 73.4534, 239.322 kWh (6 entries); lognormal variance with pedigree 0.0532, pedigree (2,3,5,5,1)
  Calculated, based on Frischknecht 1996
  Uncertainty: c
- concrete, normal: 52.2455, 5.44391, 44.0723, 24.7907, 104.981, 3.54096, 2074.93 m3 (7 entries); lognormal variance with pedigree 0.08, pedigree (4,4,5,5,3)
  Estimation, in accordance with experts
  Uncertainty: e
- heat, district or industrial, other than natural gas: 16.7124, 41213.3 MJ (2 entries); lognormal variance with pedigree 0.0532, pedigree (2,3,5,5,1)
  Calculated, based on Frischknecht 1996
  Uncertainty: c
- heat, district or industrial, natural gas: 592.86, 38467.1 MJ (2 entries); lognormal variance with pedigree 0.0532, pedigree (2,3,5,5,1)
  Calculated, based on Frischknecht 1996
  Uncertainty: c

## Inputs from nature
- Occupation, construction site [natural resource, land]: 400000 m2*year; lognormal variance with pedigree 0.112, pedigree (4,4,5,5,1)
  Estimation based on 1 site
  Uncertainty: e
- Occupation, industrial area [natural resource, land]: 1.074e7 m2*year; lognormal variance with pedigree 0.112, pedigree (4,4,5,5,1)
  Estimation based on 1 site
  Uncertainty: e
- Transformation, from unspecified [natural resource, land]: 215000 m2; lognormal variance with pedigree 0.192, pedigree (4,4,5,5,1)
  Estimation based on 1 site
  Uncertainty: e
- Transformation, to industrial area [natural resource, land]: 214800 m2; lognormal variance with pedigree 0.192, pedigree (4,4,5,5,1)
  Estimation based on 1 site
  Uncertainty: e

## Extrapolations
This dataset has been copied from an original dataset covering the geography RER. The uncertainty has been adjusted accordingly.

## Review by Hans-Jörg Althaus 2003-08-20
passed
