# recultivation, bentonite mine

Dataset: EcoSpold 2, unit process
Geography: DE
Time period: 1997-01-01 to 2021-12-31
Technology level: current
Classification: ISIC rev.4 ecoinvent: 3900:Remediation activities and other waste management services
Classification: EcoSpold01Categories: construction materials/additives
Synonyms: Renaturierung
Tags: ConvertedDataset
Scenario: Business-as-Usual
System model: Allocation, cut-off by classification
Generated by: Daniel Kellenberger (obsolete)
Published in: Kellenberger D. 2007
Database: ecoinvent
isCopyrightProtected: true
accessRestrictedTo: 1

## General comment
May only be used as Input for the module "bentonite, at mine". It is assumed that the total of mined material is immediately refilled (from on side to the other...). Therefore half of the total amount of diesel is allocated to this recultivation module.
[This dataset was already contained in the ecoinvent database version 2. It was not individually updated during the transfer to ecoinvent version 3. Life Cycle Impact Assessment results may still have changed, as they are affected by changes in the supply chain, i.e. in other datasets. This dataset was generated following the ecoinvent quality guidelines for version 2. It may have been subject to central changes described in the ecoinvent version 3 change report (http://www.ecoinvent.org/database/ecoinvent-version-3/reports-of-changes/), and the results of the central updates were reviewed extensively. The changes added e.g. consistent water flows and other information throughout the database. The documentation of this dataset can be found in the ecoinvent reports of version 2, which are still available via the ecoinvent website. The change report linked above covers all central changes that were made during the conversion process.]

## Included activities end
includes only transformation from mineral extraction site to unknown and the diesel consumption for refilling of overburden material (thickness of lyer 30m) and of additional material (thickness layer 3m). The additional material and its transport to the mine is not included.

## Geography
data are only from one company in Germany (Süd-Chemie AG); reclamation practices may differ with the sites and the country, hence prudence should be taken to use this module for different mines.

## Technology
Recultivated soil thickness 33 m (30 m overburden material and 3 m additional material)

## Reference product
- recultivation, bentonite mine: 1 m2; CPC 9441: Site remediation and clean-up services; By-product classification allocatable product
  EcoSpold01Location=DE
  production volume 0.242058 m2
    This is a placeholder value that does not reflect real-world production volumes. This dataset does not currently require a real-world production volume to work in the database framework, and no actual data were collected yet. This has no negative effect on the results of the ecoinvent database. The placeholder value of this activity was scaled according to the nominal GDP of 2005 (source: United Nations, http://data.un.org/Glossary.aspx?q=GDP+%28current+US%24%29, accessed 20130726) to reflect an appropriate share of the global production volume, which is also a placeholder value.
  property price 97.948 EUR2005
    Calculated based on inputs: The price of the product has been calculated as a sum of the values of the material and energy inputs for this product. This value is therefore a rough estimation. It may underestimate the real price since there are additional expenses when producing any product. These expences can include for example labour costs, treatment of waste materials and profit for the producer. Please consider carefully whether this level of data quality is acceptable for your application.

## Inputs from technosphere
- diesel, burned in building machine: 5210 MJ; lognormal variance with pedigree 0.0406, pedigree (1,3,5,1,1)
  EcoSpold01Location=GLO
  properties: heating value, net 1 MJ

## Inputs from nature
- Transformation, from mineral extraction site [natural resource, land]: 1 m2; lognormal variance with pedigree 0.1606, pedigree (1,3,5,1,1)
- Transformation, to unspecified [natural resource, land]: 1 m2; lognormal variance with pedigree 0.1606, pedigree (1,3,5,1,1)

## Sampling procedure
environmental report of one German company (Süd-Chemie AG)

## Extrapolations
This dataset has been extrapolated from year 2000 to the year of the calculation (2021). The uncertainty has been adjusted accordingly.

## Review by Roberto Dones 2005-07-19
Passed
