# treatment of sulfidic tailings, from cinnabar mine operation, tailings impoundment

Dataset: EcoSpold 2, unit process
Geography: CN
Time period: 2015-01-01 to 2021-12-31
Technology level: current
Classification: ISIC rev.4 ecoinvent: 3822:Treatment and disposal of hazardous waste
Synonyms: pond; tails; tailing; sulphidic
Scenario: Business-as-Usual
System model: Allocation, cut-off by classification
Share of production covered: 80 %
Generated by: David Turner
Database: ecoinvent
isCopyrightProtected: true
accessRestrictedTo: 1

## General comment
This dataset represents the activity of waste disposal of sulfidic tailings, from cinnebar mine operation in a tailings impoundment in China.
Background: Tailings, a waste material produced during mineral concentration (beneficiation), often contain significant quantities of mobile toxic metals and are typically produced in large quantities. To manage these wastes, tailings are commonly stored behind dammed impoundments, known as tailings ponds. These ponds pose a significant long-term pollution risk as metals may leach out into the surrounding environment, potentially over very long timeframes.
Modelling approach: This dataset was produced using a model developed specifically for assessing the long-term emissions of tailings disposal (see Doka, 2017). The tailings disposal model is based on the modelling framework applied in existing landfill process models used in ecoinvent and is based on a top-down approach. Literature data on measurements of deposited tailings compositions (solids) and measured current concentrations in leachate (liquid) form the basis of the model and are used to characterise pollutant mobility and calculate the currently occurring rate of emissions of the landfill. Heeding chief parameters, such as hydrology, pH development and elemental chemistry, these emissions are then projected into the future. Tailings composition is based on the typical composition of tailings at cinnebar mine sites worldwide; i.e. composition is not region-specific. Land use was calculated following the approach described by Doka (2008). Based on an assumed generic final height of a tailings impoundment of 60 m and an assumed tailings density of 2200 kg/m3, a land area of 7.58E-06 m2 is required per kilogram of sulfidic tailings. The land is assumed to be converted from unknown origin to a disposal site. After an operational phase of 30 years, spontaneous restoration of a consolidated state is assumed to be reached after one hundred years. The total occupation time is therefore 130 years and the land occupation per kilogram tailings is 9.85E-04 m2.
Waste composition (wet, in ppm): H2O 300000; O 624100; H na; C 6145; S 359.53; N 5.0454; P 223.04; B 54.583; Cl 102.61; Br 0.22894; F 772.88; I na; Ag 8.5672; As 54.876; Ba 349.73; Cd 4.2073; Co 14.437; Cr 55.949; Cu 649.95; Hg 0.26107; Mn 191.27; Mo 11.985; Ni 26.998; Pb 164.15; Sb 28.927; Se 6.5496; Sn 27.855; V 127.15; Zn 232.03; Be 1.1555; Sc 12.867; Sr 98.34; Ti 227.57; Tl 2.8558; W 9.9784; Si 37291; Fe 10762; Ca 3218.1; Al 10317; K 1762.7; Mg 1565.1; Na 1013. // Share of carbon in waste that is biogenic 0%.
Activity extent: The dataset includes all potential emissions to the environment and land use changes. Input exchanges of infrastructure, materials, energy, and water are not included here but are accounted for in the activity, cinnebar mine operation.
References
Doka, G. (2008). Life Cycle Inventory data of mining waste: Emissions from sulfidic tailings disposal. Zürich, Switzerland: Doka Life Cycle Assessments.
Doka, G. (2017). A model for waste-specific and climate-specific life cycle inventories of tailings impoundments. Zürich, Switzerland: Doka Life Cycle Assessments.

## Included activities start
The activity starts at the point of waste deposition in the impoundment. All upstream activities, including the pumping of tailings to the site, any dewatering or treatment, or other transport-related activities are excluded.

## Included activities end
Waste-specific short- and long-term emissions to the environment via impoundment leachate; land transformation and occupation. Note that the structural integrity of the site is assumed to be unwavering during the entie modelled time horizon; i.e. accidental releases of leachate (due to impoundment failure) are not considered.

## Geography
Given name of site is 'Cinnabar deposits; China'. Impoundment site with mean annual temperature (MAT) of 15.6268910915479 degC, mean annual precipitation (MAP) of 1174.20769417927 mm/year, mean annual actual evaporation (EAT) of 711.700313 mm/year, and net infiltration of 818.357537679275 mm/year (using half of natural surface evapotranspiration).

## Technology
This is an inventory for an impoundment of copper ore beneficiation tailings waste. The following assumptions were made concerning technology: final impoundment height is 60 meters; operation phase duration is 30 years; and impoundment leachates are released into the environment untreated.

## Time period
'Data on average composition of tailings and tailings-derived leachates from literature sources published between 1994 and 2017 (mean publication date: 2009±6). Mean annual temperature and precipitation data for 1970-2000 (source: Fick and Hijmans, 2017); mean annual evapotranspiration for 1950-2000 (source: Fekete et al., 2002). Production volume based on world mine production data from the USGS Minerals Yearbook 2015. Transfer coefficients from prospective, tailings-specific model.
References:
Fekete, B. M., Vorosmarty, C. J. & Grabs, W. (2002). High-resolution fields of global runoff combining observed river discharge and simulated water balances. Global Biogeochemical Cycles, 16, 15-1 - 15-10.
Fick, S. E. & Hijmans, R. J. (2017). Worldclim 2: New 1-km spatial resolution climate surfaces for global land areas. International Journal of Climatology, 37, 4302-4315.'

## Reference product
- sulfidic tailings, from cinnabar mine operation: -1 kg; By-product classification Waste
  main reference product of this activity (supply of disposal service).
  production volume 9.31e9 kg
    Estimate of the national tailings production volume from the mining and concentration of cinnebar, based on national mine production of cinnebar (kg) multiplied by estimated tailings generation rate per kg mined cinnebar (332 kg per kg cinnebar in concentrate).
  property price 0 EUR2005
    Waste products are assigned a price of zero as they are assumed to require further treatment.
  property carbon content 0.0087785
    carbon content on a dry matter basis (reserved; not for manual entry)
  properties: boron content 7.7976e-5, vanadium content 0.00018165, antimony content 4.1325e-5, chromium content 7.9928e-5, manganese content 0.00027325, potassium content 0.0025181, cadmium content 6.0104e-6, beryllium content 1.6507e-6, silicon content 0.053273, scandium content 1.8381e-5, lead content 0.0002345, zinc content 0.00033146, calcium content 0.0045972, carbon content, non-fossil 0, thallium content 4.0797e-6, iron content 0.015374, water in wet mass 0.3 kg, sodium content 0.0014472, tin content 3.9792e-5, molybdenum content 1.7121e-5, phosphorus content 0.00031862, sulfur content 0.00051362, copper content 0.0009285, water content 0.42857, wet mass 1 kg, fluorine content 0.0011041, arsenic content 7.8394e-5, nitrogen content 7.2076e-6, magnesium content 0.0022359, silver content 1.2239e-5, oxygen content 0.89157, aluminium content 0.014738, selenium content 9.3566e-6, bromine content 3.2706e-7, tungsten content 1.4255e-5, dry mass 0.7 kg, strontium content 0.00014049, nickel content 3.8568e-5, titanium content 0.0003251, carbon content, fossil 0.0087785, mercury content 3.7296e-7, barium content 0.00049962, cobalt content 2.0624e-5, chlorine content 0.00014659, carbon allocation 0.00614495 kg

## Inputs from nature
- Occupation, dump site [natural resource, land]: 0.00098485 m2*year; lognormal variance with pedigree 0.14986, pedigree (1,1,2,1,1)
  for impoundment operation phase and 100 year renaturation phase.
  Uncertainty: U
- Transformation, from unspecified [natural resource, land]: 7.5758e-6 m2; lognormal variance with pedigree 0.030796, pedigree (1,1,2,1,1)
  conversion of impoundment area.
  Uncertainty: U
- Transformation, to dump site [natural resource, land]: 7.5758e-6 m2; lognormal variance with pedigree 0.030796, pedigree (1,1,2,1,1)
  conversion to impoundment area.
  Uncertainty: U

## Emissions to nature
- Hydrogen sulfide [water, ground-]: 7.1739e-5 kg; lognormal variance with pedigree 0.19858, pedigree (1,1,2,1,1)
  burden from short-term leachate to groundwater in uncontrolled impoundment in moist cimate.
  Uncertainty: U
- TOC, Total Organic Carbon [water, ground-]: 1.8692e-6 kg; lognormal variance with pedigree 0.30896, pedigree (1,1,2,1,1)
  (same comment as for Hydrogen sulfide)
- Fluoride [water, ground-, long-term]: 0.0005393 kg; lognormal variance with pedigree 0.1811, pedigree (1,1,2,1,1)
  Emissions from long-term leachate (>100a) directly from tailings impoundment.
  Uncertainty: U
- Thallium [water, ground-, long-term]: 2.8548e-6 kg; lognormal variance with pedigree 0.35839, pedigree (1,1,2,1,1)
  (same comment as for Fluoride)
- Copper, ion [water, ground-, long-term]: 0.00064938 kg; lognormal variance with pedigree 0.1787, pedigree (1,1,2,1,1)
  (same comment as for Fluoride)
- Tin, ion [water, ground-, long-term]: 2.7802e-5 kg; lognormal variance with pedigree 0.28323, pedigree (1,1,2,1,1)
  (same comment as for Fluoride)
- Fluoride [water, ground-]: 1.5484e-6 kg; lognormal variance with pedigree 0.31388, pedigree (1,1,2,1,1)
  (same comment as for Hydrogen sulfide)
- Tin, ion [water, ground-]: 5.2757e-8 kg; lognormal variance with pedigree 0.42588, pedigree (1,1,2,1,1)
  (same comment as for Hydrogen sulfide)
- DOC, Dissolved Organic Carbon [water, ground-]: 1.8692e-6 kg; lognormal variance with pedigree 0.30896, pedigree (1,1,2,1,1)
  (same comment as for Hydrogen sulfide)
- Sulfate [water, ground-, long-term]: 0.00016058 kg; lognormal variance with pedigree 0.20264, pedigree (1,1,2,1,1)
  (same comment as for Fluoride)
- DOC, Dissolved Organic Carbon [water, ground-, long-term]: 0.0011197 kg; lognormal variance with pedigree 0.28799, pedigree (1,1,2,1,1)
  (same comment as for Fluoride)
- Thallium [water, ground-]: 9.6574e-10 kg; lognormal variance with pedigree 0.55704, pedigree (1,1,2,1,1)
  (same comment as for Hydrogen sulfide)
- COD, Chemical Oxygen Demand [water, ground-]: 1.7026e-7 kg; lognormal variance with pedigree 0.30896, pedigree (1,1,2,1,1)
  (same comment as for Hydrogen sulfide)
- Strontium [water, ground-]: 2.5069e-7 kg; lognormal variance with pedigree 0.37447, pedigree (1,1,2,1,1)
  (same comment as for Hydrogen sulfide)
- Copper, ion [water, ground-]: 5.7033e-7 kg; lognormal variance with pedigree 0.34616, pedigree (1,1,2,1,1)
  (same comment as for Hydrogen sulfide)
- Strontium [water, ground-, long-term]: 9.8089e-5 kg; lognormal variance with pedigree 0.24126, pedigree (1,1,2,1,1)
  (same comment as for Fluoride)
- COD, Chemical Oxygen Demand [water, ground-, long-term]: 0.00010199 kg; lognormal variance with pedigree 0.28799, pedigree (1,1,2,1,1)
  (same comment as for Fluoride)
- Sulfate [water, ground-]: 0.00066666 kg; lognormal variance with pedigree 0.19858, pedigree (1,1,2,1,1)
  (same comment as for Hydrogen sulfide)
- Cobalt [water, ground-, long-term]: 1.419e-5 kg; lognormal variance with pedigree 0.30504, pedigree (1,1,2,1,1)
  (same comment as for Fluoride)
- Silver, ion [water, ground-, long-term]: 8.5654e-6 kg; lognormal variance with pedigree 0.32228, pedigree (1,1,2,1,1)
  (same comment as for Fluoride)
- Chromium VI [water, ground-, long-term]: 5.4526e-7 kg; lognormal variance with pedigree 1.6004, pedigree (1,1,2,1,1)
  (same comment as for Fluoride)
- Sodium, ion [water, ground-, long-term]: 0.00099533 kg; lognormal variance with pedigree 0.16419, pedigree (1,1,2,1,1)
  (same comment as for Fluoride)
- Cobalt [water, ground-]: 2.4696e-7 kg; lognormal variance with pedigree 0.3805, pedigree (1,1,2,1,1)
  (same comment as for Hydrogen sulfide)
- Sodium, ion [water, ground-]: 1.7667e-5 kg; lognormal variance with pedigree 0.2391, pedigree (1,1,2,1,1)
  (same comment as for Hydrogen sulfide)
- Chloride [water, ground-, long-term]: 7.2162e-5 kg; lognormal variance with pedigree 0.24089, pedigree (1,1,2,1,1)
  (same comment as for Fluoride)
- Silver, ion [water, ground-]: 1.8338e-9 kg; lognormal variance with pedigree 0.53601, pedigree (1,1,2,1,1)
  (same comment as for Hydrogen sulfide)
- Chloride [water, ground-]: 3.0449e-5 kg; lognormal variance with pedigree 0.24963, pedigree (1,1,2,1,1)
  (same comment as for Hydrogen sulfide)
- Silicon [water, ground-, long-term]: 0.0002428 kg; lognormal variance with pedigree 1.6387, pedigree (1,1,2,1,1)
  (same comment as for Fluoride)
- Chromium VI [water, ground-]: 1.5053e-8 kg; lognormal variance with pedigree 0.46622, pedigree (1,1,2,1,1)
  (same comment as for Hydrogen sulfide)
- Silicon [water, ground-]: 6.6693e-6 kg; lognormal variance with pedigree 0.27438, pedigree (1,1,2,1,1)
  (same comment as for Hydrogen sulfide)
- Calcium, ion [water, ground-]: 0.00010144 kg; lognormal variance with pedigree 0.18553, pedigree (1,1,2,1,1)
  (same comment as for Hydrogen sulfide)
- Selenium [water, ground-]: 9.502e-9 kg; lognormal variance with pedigree 0.48233, pedigree (1,1,2,1,1)
  (same comment as for Hydrogen sulfide)
- Cadmium, ion [water, ground-, long-term]: 4.1806e-6 kg; lognormal variance with pedigree 0.34569, pedigree (1,1,2,1,1)
  (same comment as for Fluoride)
- Selenium [water, ground-, long-term]: 3.367e-7 kg; lognormal variance with pedigree 0.88158, pedigree (1,1,2,1,1)
  (same comment as for Fluoride)
- Calcium, ion [water, ground-, long-term]: 0.0031166 kg; lognormal variance with pedigree 0.12704, pedigree (1,1,2,1,1)
  (same comment as for Fluoride)
- Scandium [water, ground-]: 7.1519e-8 kg; lognormal variance with pedigree 0.41771, pedigree (1,1,2,1,1)
  (same comment as for Hydrogen sulfide)
- Bromine [water, ground-, long-term]: 1.5975e-7 kg; lognormal variance with pedigree 0.44799, pedigree (1,1,2,1,1)
  (same comment as for Fluoride)
- Potassium, ion [water, ground-, long-term]: 0.00054637 kg; lognormal variance with pedigree 0.23196, pedigree (1,1,2,1,1)
  (same comment as for Fluoride)
- Cadmium, ion [water, ground-]: 2.6671e-8 kg; lognormal variance with pedigree 0.45054, pedigree (1,1,2,1,1)
  (same comment as for Hydrogen sulfide)
- Scandium [water, ground-, long-term]: 1.2795e-5 kg; lognormal variance with pedigree 0.30884, pedigree (1,1,2,1,1)
  (same comment as for Fluoride)
- Boron [water, ground-, long-term]: 1.2637e-6 kg; lognormal variance with pedigree 1.1471, pedigree (1,1,2,1,1)
  (same comment as for Fluoride)
- Potassium, ion [water, ground-]: 1.0923e-6 kg; lognormal variance with pedigree 0.32502, pedigree (1,1,2,1,1)
  (same comment as for Hydrogen sulfide)
- Boron [water, ground-]: 3.513e-8 kg; lognormal variance with pedigree 0.43841, pedigree (1,1,2,1,1)
  (same comment as for Hydrogen sulfide)
- Phosphate [water, ground-, long-term]: 0.00061304 kg; lognormal variance with pedigree 0.21423, pedigree (1,1,2,1,1)
  (same comment as for Fluoride)
- BOD5, Biological Oxygen Demand [water, ground-, long-term]: 2.0398e-6 kg; lognormal variance with pedigree 0.28799, pedigree (1,1,2,1,1)
  (same comment as for Fluoride)
- Nickel, ion [water, ground-, long-term]: 2.6845e-5 kg; lognormal variance with pedigree 0.28427, pedigree (1,1,2,1,1)
  (same comment as for Fluoride)
- Bromine [water, ground-]: 4.5867e-10 kg; lognormal variance with pedigree 0.58077, pedigree (1,1,2,1,1)
  (same comment as for Hydrogen sulfide)
- Beryllium [water, ground-]: 5.4655e-9 kg; lognormal variance with pedigree 0.50172, pedigree (1,1,2,1,1)
  (same comment as for Hydrogen sulfide)
- Phosphate [water, ground-]: 7.0462e-5 kg; lognormal variance with pedigree 0.24343, pedigree (1,1,2,1,1)
  (same comment as for Hydrogen sulfide)
- Beryllium [water, ground-, long-term]: 1.15e-6 kg; lognormal variance with pedigree 0.38787, pedigree (1,1,2,1,1)
  (same comment as for Fluoride)
- Nickel, ion [water, ground-]: 1.5215e-7 kg; lognormal variance with pedigree 0.39272, pedigree (1,1,2,1,1)
  (same comment as for Hydrogen sulfide)
- BOD5, Biological Oxygen Demand [water, ground-]: 3.4053e-9 kg; lognormal variance with pedigree 0.30896, pedigree (1,1,2,1,1)
  (same comment as for Hydrogen sulfide)
- Molybdenum [water, ground-, long-term]: 6.0445e-6 kg; lognormal variance with pedigree 0.3399, pedigree (1,1,2,1,1)
  (same comment as for Fluoride)
- Barium [water, ground-, long-term]: 0.00034973 kg; lognormal variance with pedigree 0.19914, pedigree (1,1,2,1,1)
  (same comment as for Fluoride)
- Molybdenum [water, ground-]: 2.355e-7 kg; lognormal variance with pedigree 0.38273, pedigree (1,1,2,1,1)
  (same comment as for Hydrogen sulfide)
- Barium [water, ground-]: 3.7849e-9 kg; lognormal variance with pedigree 0.5115, pedigree (1,1,2,1,1)
  (same comment as for Hydrogen sulfide)
- Mercury [water, ground-]: 4.4416e-10 kg; lognormal variance with pedigree 0.58181, pedigree (1,1,2,1,1)
  (same comment as for Hydrogen sulfide)
- Zinc, ion [water, ground-]: 1.8477e-6 kg; lognormal variance with pedigree 0.31067, pedigree (1,1,2,1,1)
  (same comment as for Hydrogen sulfide)
- Antimony [water, ground-, long-term]: 7.7666e-7 kg; lognormal variance with pedigree 1.0998, pedigree (1,1,2,1,1)
  (same comment as for Fluoride)
- Manganese [water, ground-, long-term]: 0.0001889 kg; lognormal variance with pedigree 0.21915, pedigree (1,1,2,1,1)
  (same comment as for Fluoride)
- Zinc, ion [water, ground-, long-term]: 0.00023018 kg; lognormal variance with pedigree 0.21273, pedigree (1,1,2,1,1)
  (same comment as for Fluoride)
- Antimony [water, ground-]: 2.1633e-8 kg; lognormal variance with pedigree 0.45463, pedigree (1,1,2,1,1)
  (same comment as for Hydrogen sulfide)
- Mercury [water, ground-, long-term]: 2.6063e-7 kg; lognormal variance with pedigree 0.43573, pedigree (1,1,2,1,1)
  (same comment as for Fluoride)
- Tungsten [water, ground-, long-term]: 1.2857e-6 kg; lognormal variance with pedigree 0.57943, pedigree (1,1,2,1,1)
  (same comment as for Fluoride)
- Aluminium [water, ground-, long-term]: 0.010304 kg; lognormal variance with pedigree 0.091119, pedigree (1,1,2,1,1)
  (same comment as for Fluoride)
- Magnesium [water, ground-, long-term]: 0.0015149 kg; lognormal variance with pedigree 0.15009, pedigree (1,1,2,1,1)
  (same comment as for Fluoride)
- Tungsten [water, ground-]: 3.7892e-8 kg; lognormal variance with pedigree 0.43792, pedigree (1,1,2,1,1)
  (same comment as for Hydrogen sulfide)
- Aluminium [water, ground-]: 1.2482e-5 kg; lognormal variance with pedigree 0.24817, pedigree (1,1,2,1,1)
  (same comment as for Hydrogen sulfide)
- Manganese [water, ground-]: 2.3706e-6 kg; lognormal variance with pedigree 0.30393, pedigree (1,1,2,1,1)
  (same comment as for Hydrogen sulfide)
- Vanadium, ion [water, ground-, long-term]: 1.9898e-7 kg; lognormal variance with pedigree 2.8409, pedigree (1,1,2,1,1)
  (same comment as for Fluoride)
- Nitrate [water, ground-]: 1.0148e-5 kg; lognormal variance with pedigree 0.34229, pedigree (1,1,2,1,1)
  (same comment as for Hydrogen sulfide)
- Lead [water, ground-, long-term]: 0.00016411 kg; lognormal variance with pedigree 0.22422, pedigree (1,1,2,1,1)
  (same comment as for Fluoride)
- Vanadium, ion [water, ground-]: 5.4702e-9 kg; lognormal variance with pedigree 0.49952, pedigree (1,1,2,1,1)
  (same comment as for Hydrogen sulfide)
- Nitrate [water, ground-, long-term]: 8.1929e-6 kg; lognormal variance with pedigree 0.34234, pedigree (1,1,2,1,1)
  (same comment as for Fluoride)
- Lead [water, ground-]: 3.3041e-8 kg; lognormal variance with pedigree 0.43998, pedigree (1,1,2,1,1)
  (same comment as for Hydrogen sulfide)
- TOC, Total Organic Carbon [water, ground-, long-term]: 0.0011197 kg; lognormal variance with pedigree 0.28799, pedigree (1,1,2,1,1)
  (same comment as for Fluoride)
- Arsenic, ion [water, ground-, long-term]: 9.2959e-7 kg; lognormal variance with pedigree 1.3001, pedigree (1,1,2,1,1)
  (same comment as for Fluoride)
- Magnesium [water, ground-]: 5.0208e-5 kg; lognormal variance with pedigree 0.20811, pedigree (1,1,2,1,1)
  (same comment as for Hydrogen sulfide)
- Ammonium, ion [water, ground-, long-term]: 5.1905e-7 kg; lognormal variance with pedigree 0.34234, pedigree (1,1,2,1,1)
  (same comment as for Fluoride)
- Iron, ion [water, ground-]: 9.3688e-6 kg; lognormal variance with pedigree 0.25757, pedigree (1,1,2,1,1)
  (same comment as for Hydrogen sulfide)
- Arsenic, ion [water, ground-]: 2.5759e-8 kg; lognormal variance with pedigree 0.44856, pedigree (1,1,2,1,1)
  (same comment as for Hydrogen sulfide)
- Hydrogen sulfide [water, ground-, long-term]: 1.728e-5 kg; lognormal variance with pedigree 0.20264, pedigree (1,1,2,1,1)
  (same comment as for Fluoride)
- Titanium, ion [water, ground-]: 1.5689e-8 kg; lognormal variance with pedigree 0.46457, pedigree (1,1,2,1,1)
  (same comment as for Hydrogen sulfide)
- Ammonium, ion [water, ground-]: 6.4294e-7 kg; lognormal variance with pedigree 0.34229, pedigree (1,1,2,1,1)
  (same comment as for Hydrogen sulfide)
- Iron, ion [water, ground-, long-term]: 0.010753 kg; lognormal variance with pedigree 0.089859, pedigree (1,1,2,1,1)
  (same comment as for Fluoride)
- Titanium, ion [water, ground-, long-term]: 0.00022755 kg; lognormal variance with pedigree 0.21337, pedigree (1,1,2,1,1)
  (same comment as for Fluoride)

## Sampling procedure
Tailings model based on observed leachate concentrations in literature. Extrapolated to 60'000 years heeding chemical characteristics. Initial waste composition from various literature sources. Climate information for national copper deposits (identified from the USGS Major Mineral Deposits database) from literature as follows: global mean annual temperature and precipitation data from Fick and Hijmans (2017); global mean annual evapotranspiration data from Fekete et al. (2002).

References:
Fekete, B. M., Vorosmarty, C. J. & Grabs, W. (2002). High-resolution fields of global runoff combining observed river discharge and simulated water balances. Global Biogeochemical Cycles, 16, 15-1 - 15-10.
Fick, S. E. & Hijmans, R. J. (2017). Worldclim 2: New 1-km spatial resolution climate surfaces for global land areas. International Journal of Climatology, 37, 4302-4315.

## Extrapolations
This dataset has been extrapolated from year 2019 to the year of the calculation (2021). The uncertainty has been adjusted accordingly.
