# ethanol production from potatoes

Dataset: EcoSpold 2, unit process
Geography: RoW
Time period: 2002-01-01 to 2021-12-31
Technology level: current
Classification: EcoSpold01Categories: biomass/fuels
Classification: ISIC rev.4 ecoinvent: 2011:Manufacture of basic chemicals
Tags: ConvertedDataset
Scenario: Business-as-Usual
System model: Allocation, cut-off by classification
Share of production covered: 0 %
Generated by: Edgard Gnansounou
Published in: Jungbluth N. 2007
Database: ecoinvent
isCopyrightProtected: true
accessRestrictedTo: 1

## General comment
Inventory refers to the production of 1 kg hydrated ethanol 95% (dry basis, i.e. 1.05 kg hydrated ethanol 95% wet basis), respectively 1 kg of DDGS (wet basis) from potatoes. The multioutput-process 'potatoes, in distillery' delivers the co-products 'ethanol, 95% in H2O, from potatoes, at distillery' and 'DDGS, from potatoes, at distillery'. Economic allocation with allocation factor for common stages of 95.6% to ethanol. Allocation is done according to carbon balance for CO2 emissions.
[This dataset was already contained in the ecoinvent database version 2. It was not individually updated during the transfer to ecoinvent version 3. Life Cycle Impact Assessment results may still have changed, as they are affected by changes in the supply chain, i.e. in other datasets. This dataset was generated following the ecoinvent quality guidelines for version 2. It may have been subject to central changes described in the ecoinvent version 3 change report (http://www.ecoinvent.org/database/ecoinvent-version-3/reports-of-changes/), and the results of the central updates were reviewed extensively. The changes added e.g. consistent water flows and other information throughout the database. The documentation of this dataset can be found in the ecoinvent reports of version 2, which are still available via the ecoinvent website. The change report linked above covers all central changes that were made during the conversion process.]

## Included activities end
This dataset includes the transport of potatoes to the distillery, and the processing of potatoes to hydrated ethanol (95%) and DDGS (distiller's dried grains with solubles, 90% dry matter). System boundary is at the distillery. Dehydration to anhydrous ethanol is not included.

## Geography
Data is from the etha+ project (Alcosuisse, CH)

## Technology
The process is similar to that of wheat-to-ethanol or yet dry-milling corn-to-ethanol. The production of DDGS from stillage includes separation of draff, concentration, drying and granulation. DDGS are used as animal feed.

## Time period
Data from 2002 to 2005, current technology for the production of ethanol from starch-based feedstocks, applied to potatoes

## Parameters
- fraction, cooling water, cooling pond system, to air: 0.032 dimensionless; name fraction_CW_CP_to_air; lognormal variance with pedigree 0.0413, pedigree (2,3,1,3,1)
  Calculated based on literature value (Scown, C.D., 2011, Water Footprint of U.S. Transportation Fuels and supplying information of the article) (Vionnet, S., Quantis Water Database - Technical Report, 2012).
- fraction, cooling water, recirculating system, to air: 0.771 dimensionless; name fraction_CW_R_to_air; lognormal variance with pedigree 0.0413, pedigree (2,3,1,3,1)
  (same comment as for fraction, cooling water, cooling pond system, to air)
- fraction, cooling water, to air: 0.3875 dimensionless; name fraction_CW_to_air; = (0.5*fraction_CW_OT_to_air)+(0.5*fraction_CW_R_to_air); lognormal variance with pedigree 0.092025, pedigree (4,4,3,2,4)
  Calculated value based on literature value (see comments of the other parametres present in this dataset) and expert opinion. In the case when no industry/literature data are available about the type of cooling or directly fraction, cooling water, to air specific for the process a default assumption is applied. It is assumed that the once-through cooling system is used in 50% of all cases and recirculating system is used in another 50% of all cases.
- fraction, process water, to air: 0.47 dimensionless; name fraction_PW_to_air; lognormal variance with pedigree 0.092025, pedigree (4,4,3,2,4)
- fraction, tap water, to air: 0.47 dimensionless; name fraction_TW_to_air; lognormal variance with pedigree 0.092025, pedigree (4,4,3,2,4)
- fraction, cooling water, once-through system, to air: 0.004 dimensionless; name fraction_CW_OT_to_air; lognormal variance with pedigree 0.0413, pedigree (2,3,1,3,1)
  (same comment as for fraction, cooling water, cooling pond system, to air)

## Reference product
- Distiller's Dried Grains with Solubles: 1 kg; name BP_amount_1; CPC 23319: Preparations used in animal feeding n.e.c.; By-product classification allocatable product
  production volume 5.53737e7 kg; = pvrp * (BP_amount_1 / RP_amount_1)
    Production volume of ethanol for use as a fuel was 1-1.5 Ml in 2005 in CH
    Calculated from the production volume of ethanol, without water, in 95% solution state, from fermentation in proportion to the respective output amounts.
  property price 0.00365 EUR2005
    Temporary price data.The price of ethanol, without water, in 95% solution state, from fermentation is 0.324 Euro (calculated as 90% of purchasers price based on: 2005 prices from FAPRI2007, 2009. Agricultural outlook. (http://www.fapri.missouri.edu/outreach/publications/ag_outlook.asp?current_page=outreach; accessed 22/06/10). Unit conversion from US gallon to kg - 1 gallon = 3.7856 liter * 0.789 kg/liter (ethanol density) = 2.9868 kg). When producing 0.30638kg of ethanol, without water, in 95% solution state, from fermentation, 0.32067kg of Distiller's Dried Grains with Solubles is produced as a by-product. The economic allocation factor in eiv2.2 was 98.837% for ethanol and 1.163% for Distiller's Dried Grains with Solubles. Following this assumption the price of the Distiller's Dried Grains with Solubles is calculated to be ((0.01163*0.324*0.30638)/(0.32067-0.01163*0.32067)=) 0.003643 Euro.
  property carbon content, non-fossil 0.4885
    Assumed to be like Distillers Grain Corn with Solubles. Composition data obtained from (http://beefmagazine.com/images/2009%20feed%20table.pdf). First, composition data were refered to 1 kg dry mass. Then, C-contents were calculated considering a C-content/dry mass of 46% in carbohydrates (including fibres), 53% in proteins and 75% in fats. All data from "Evolutionary and Biochemical Aspects", A.D. Kay and T. Vrede (in Global Ecology, 2010, Elsevier B.V., S.E. Jørgensen Ed.).
  property carbon content 0.4885
    carbon content on a dry matter basis (reserved; not for manual entry)
  property true value 0.00570123; name BP_amount_1_true_value
    allocation property applied in "true value" allocation // value calculated from revenue
  properties: dry mass 0.9 kg, wet mass 1 kg, carbon content, fossil 0, water content 0.111111, water in wet mass 0.1 kg, carbon allocation 0.43965 kg
- ethanol, without water, in 95% solution state, from fermentation: 0 kg; name RP_amount_1; CPC 35491: Biodiesel; By-product classification allocatable product; CAS 64-17-5
  EcoSpold01Location=CH
  production volume 3.54509e7 kg; name pvrp
    Calculated based on literature values and estimates. The global production volume of ethanol (from renewable sources =bioethanol) is 4.5E10l/year (*0.79kg/l= 3.55E+10kg/year) (Source: F. O. Licht, "Ethanol: World Production, by Country," table, World Ethanol and Biofuels Report, vol. 4, no. 17 (9 May 2006), p. 395.). Bioethanol is produced mainly from sugar cane and different type of grains (FAO, http://www.fao.org/docrep/016/i3009e/i3009e02.pdf). Sweet sorghum, grass, potatoes and rye represent minority feedstock. Therefore it is estimated, that each represent 0.1% of the total production volume.
  property price 0.324 EUR2005
    Temporary price data. Calculated as 90% of purchasers price based on: 2005 prices from FAPRI2007, 2009. Agricultural outlook. (http://www.fapri.missouri.edu/outreach/publications/ag_outlook.asp?current_page=outreach; accessed 22/06/10). Unit conversion from US gallon to kg - 1 gallon = 3.7856 liter * 0.789 kg/liter (ethanol density) = 2.9868 kg
  property heating value, net 31.58 MJ
    LHV is calculated based on the elemental composition of the substance. Based on the CAS number of the substance (000064-17-5), the chemical formula of the substance is found to be: C2H6O, (PubChem 2020).
    Reference: Kim, S., Chen, J., Cheng, T., Gindulyte, A., He, J., He, S., Li, Q., Shoemaker, B. A., Thiessen, P. A., Yu, B., Zaslavsky, L., Zhang, J., & Bolton, E. E. (2019). PubChem 2019 update: improved access to chemical data. Nucleic acids research, 47(D1), D1102–D1109. https://doi.org/10.1093/nar/gky1033
  property carbon content, non-fossil 0.521739
    Assumed to be like Distillers Grain Corn with Solubles. Composition data obtained from (http://beefmagazine.com/images/2009%20feed%20table.pdf). First, composition data were refered to 1 kg dry mass. Then, C-contents were calculated considering a C-content/dry mass of 46% in carbohydrates (including fibres), 53% in proteins and 75% in fats. All data from "Evolutionary and Biochemical Aspects", A.D. Kay and T. Vrede (in Global Ecology, 2010, Elsevier B.V., S.E. Jørgensen Ed.).
    C2H6O
  property carbon content 0.521739
    carbon content on a dry matter basis (reserved; not for manual entry)
  property true value 0.324; name RP_amount_1_true_value
    allocation property applied in "true value" allocation // value calculated from revenue
  properties: carbon content, fossil 0, wet mass 1 kg, dry mass 1 kg, water in wet mass 0 kg, water content 0, carbon allocation 0.521739 kg

## Inputs from technosphere
- transport, tractor and trailer, agricultural: 0.00160186 metric ton*km; lognormal variance with pedigree 0.1721, pedigree (1,2,5,5,1)
  EcoSpold01Location=CH
  Etha+ project Alcosuisse, industrial data
  Uncertainty: etha+ project Alcosuisse, industrial data
- ethanol fermentation plant: 5.6754e-12 unit; lognormal variance with pedigree 0.3521, pedigree (1,2,5,5,1)
  (same comment as for transport, tractor and trailer, agricultural)
- wastewater, from residence: -0.000124876 m3; name ww
  Etha+ project Alcosuisse, industrial data
  EcoSpold01Location=CH
  production volume 399885 m3; = pvrp*ww
    Calculated from the production volume of ethanol, without water, in 95% solution state, from fermentation in proportion to the respective output amounts.
  property price 0 EUR2005; name ww_price_EUR2005
  properties: dry mass 0.337476 kg, wet mass 1000 kg, carbon content, non-fossil 0.199421, water content 2962.17
  note on carbon content, non-fossil: Assumed to be like Distillers Grain Corn with Solubles. Composition data obtained from (http://beefmagazine.com/images/2009%20feed%20table.pdf). First, composition data were refered to 1 kg dry mass. Then, C-contents were calculated considering a C-content/dry mass of 46% in carbohydrates (including fibres), 53% in proteins and 75% in fats. All data from "Evolutionary and Biochemical Aspects", A.D. Kay and T. Vrede (in Global Ecology, 2010, Elsevier B.V., S.E. Jørgensen Ed.). 0.0673 kg TOC/m3 (Tab A.17, ecoinvent v2.2 report 13_I). TOC was considered as Total Carbon.
- electricity, medium voltage: 0 kWh; pedigree (1,1,1,1,1)
  (same comment as for transport, tractor and trailer, agricultural)
- heat, district or industrial, natural gas: 0 MJ; pedigree (1,1,1,1,1)
  EcoSpold01Location=RER
  Etha+ project Alcosuisse, industrial data
  Uncertainty: etha+ project Alcosuisse, industrial data
  properties: heating value, net 1 MJ
- potato: 0.160186 kg; lognormal variance with pedigree 0.0521, pedigree (1,2,5,5,1)
  Etha+ project Alcosuisse, industrial data
  Uncertainty: etha+ project Alcosuisse, industrial data
  properties: carbon content, non-fossil 0.4282, wet mass 1 kg, water content 3.54545, dry mass 0.22 kg
- soda ash, light, crystalline, heptahydrate: 0.00048216 kg; lognormal variance with pedigree 0.0521, pedigree (1,2,5,5,1)
  Etha+ project Alcosuisse, industrial data
  EcoSpold01Location=RER
  Uncertainty: etha+ project Alcosuisse, industrial data
  properties: carbon content, fossil 0.0517241, wet mass 1 kg, dry mass 1 kg, heating value, net 3.43 MJ
- ammonium sulfate: 0.000126214 kg; lognormal variance with pedigree 0.0521, pedigree (1,2,5,5,1)
  (same comment as for soda ash, light, crystalline, heptahydrate)
  properties: dry mass 1 kg, wet mass 1 kg
- tap water: 0 kg; name tap_water_input; pedigree (1,1,1,1,1)
  Etha+ project Alcosuisse, industrial data
  EcoSpold01Location=CH
  Uncertainty: etha+ project Alcosuisse, industrial data
  properties: wet mass 1 kg, carbon content, fossil 0.00178991, water content 2962.17, dry mass 0.000337476 kg
  note on carbon content, fossil: Bicarbonate content is 2.93 mol/m3. CO2 content is 0.1 mol/m3 (ecoinvent v2.2 report 8, Tab 93.1).
- sulfuric acid: 0.00020829 kg; lognormal variance with pedigree 0.0521, pedigree (1,2,5,5,1)
  (same comment as for heat, district or industrial, natural gas)
  properties: dry mass 1 kg, wet mass 1 kg
- inorganic nitrogen fertiliser, as N: 0 kg; pedigree (1,1,1,1,1)
  (same comment as for heat, district or industrial, natural gas)
  properties: wet mass 1 kg, dry mass 1 kg
- electricity, medium voltage: 6.41181e-5, 1.22951e-5, 0.000282314, 0.000934693, 0.000206409, 0.00300203, 0.000423138, 0.00137865 kWh (8 entries); lognormal variance with pedigree 0.0521, pedigree (1,2,5,5,1)
  (same comment as for transport, tractor and trailer, agricultural)
- heat, district or industrial, natural gas: 0.00232349, 0.0556753, 0.150758 MJ (3 entries); lognormal variance with pedigree 0.0521, pedigree (1,2,5,5,1)
  (same comment as for heat, district or industrial, natural gas)
- tap water: 0.000110789, 1.3336e-5, 2.204e-5, 0.00473914, 0.000555761, 1.4458e-5, 4.11255e-5, 0.00635985 kg (8 entries); lognormal variance with pedigree 0.0521, pedigree (1,2,5,5,1)
  (same comment as for tap water)
- inorganic nitrogen fertiliser, as N: 1.13616e-8, 6.05471e-7, 7.59102e-8, 8.70283e-7, 2.20364e-8, 7.7783e-7, 1.02092e-7, 2.47145e-7, 2.73239e-6, 1.63182e-6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 kg (63 entries); lognormal variance with pedigree 0.0521, pedigree (1,2,5,5,1)
  (same comment as for heat, district or industrial, natural gas)

## Inputs from nature
- Water, cooling, unspecified natural origin [natural resource, in water]: 1.83424e-6 m3; name water_cooling_UNO_input; lognormal variance with pedigree 1.21, pedigree (5,5,5,5,5)
  property carbon content, fossil 0.0104329; name C_content_fossil
  property water in wet mass 999.89 kg; name WWM
  property water content 9081.65; name water_content
  property dry mass 0.1101 kg; name DM
  property carbon content, non-fossil 0; name C_content_non_fossil
  property wet mass 1000 kg; name WM
- Carbon dioxide, in air [natural resource, in air]: 0.0195331 kg; lognormal variance with pedigree 0.042, pedigree (1,1,5,5,1)
  Calculation, to close carbon balance
  Uncertainty: Calculation, to close carbon balance

## Emissions to nature
- Water [air, unspecified]: 6.28314e-6 m3; name water_to_air_unspecified; lognormal variance with pedigree 0.0827, pedigree (2,2,5,5,1)
  Calculated value based on literature values and expert opinion. See comments in the parametres' comment field.
  property fraction, origin: unspecified 0.11312; name fraction_origin_unspecified
  property fraction, origin: salt water 0; name fraction_origin_salt_water
  property fraction, origin: fresh water 0.88688; name fraction_origin_fresh_water
- Carbon dioxide, non-fossil [air, urban air close to ground]: 0.0351705 kg; lognormal variance with pedigree 0.042, pedigree (1,1,5,5,1)
  Calculation, to close carbon balance
  Uncertainty: Calculation, to close carbon balance

## Sampling procedure
Data is from the etha+ project (Alcosuisse, CH), technology by French ethanol plant supplier, modelling by ENERS (CH)

## Extrapolations
none This dataset has been copied from an original dataset covering the geography CH. The uncertainty has been adjusted accordingly.

## Review by Emilia Moreno Ruiz 2012-03-19
name change from "Distiller's Dried Grains with Solubles, from potatoes" to "Distiller's Dried Grains with Solubles"

## Review by Niels Jungbluth 2006-08-15
Passed.
none
