# maleic unsaturated polyester resin production

Dataset: EcoSpold 2, unit process
Geography: RoW
Time period: 2013-01-01 to 2021-12-31
Technology level: current
Classification: ISIC rev.4 ecoinvent: 2013:Manufacture of plastics and synthetic rubber in primary forms
Synonyms: UP resin
Scenario: Business-as-Usual
System model: Allocation, cut-off by classification
Generated by: Etienne LEES-PERASSO
Published in: Eelco Rietveld 2014
Database: ecoinvent
isCopyrightProtected: true
accessRestrictedTo: 1

## General comment
This dataset represents the production of unsaturated polyester resins (UPR).
This resin belongs to the unsaturated polyester composite resin category. They are often used as matrix for composite materials, when applied on glass fibre or natural fibres (ex: flax).
The perimeter of this data includes the manufacturing of the resin from raw materials.

Resin type is maleic unsaturated polyester resin (UPR).
Typical characteristics:
Appearance: Homogeneous liquid resin.
Main applications: Sheet moulding compounds (SMC) and Bulk moulding compounds (BMC)
Other possible applications: Pultrusion-compounds.
Viscosity (mPa.s) RVF at 25 °C, Spindle 3 rpm 20 (GM025): 1100-1250.
Monomer content (%) RS06C: 34-36.
They are among the most used thermoset resins. They have uses in many applications. The maleic resins are used to produce moulded technical parts.
The use of one resin over another depends on the user required physical caracteristics.
Data for the life cycle inventory for this resin were primarly taken from the Ernst & Young Report: "Life cycle assessment of four generic unsaturated polyester (UP) resins and one vinyl ester (VE) resins", Revised version, September 2014. The following companies participated in the study: Reichhold, Polynt Composites, Ashland Performance Materials.

## Included activities start
Cradle to gate. This activity starts with the raw materials delivery at the manufacturing plant gate.

## Included activities end
Cradle to gate. This activity ends with the maleic based unsaturated polyester resin at the manufacturing plant gate. Packaging is not included.

## Geography
Based on the average production of three European producers: Polynt Composites, Reichhold and Ashland, representing a significant part of the European production. Extrapolated to a global production, based on similar manufacturing technology.

## Technology
This resin is manufactured from styrene, maleic anhydrid, propylene glycol, di ethylene glycol and ethylene glycol.
Resin manufacturing process. Source : "Life cycle assessment of four generic unsaturated polyester (UP) resins and one vinyl ester (VE) resins", Revised version, September 2014, Ernst & Young Accountants
Not included in this dataset, there are different shaping solutions for this resin in order to obtain a usable, finished or semi-finished product. The most common are sheet molding compound (SMC) and bulk moulding compound (BMC). It can be reinforced with fibres, such as glass fibre, in order to modify its mecanical properties and allow new uses.

## Reference product
- maleic unsaturated polyester resin: 1 kg; name RP_amount_1; CPC 34740: Polyacetals, other polyethers and epoxide resins, in primary forms; polycarbonates, alkyd resins, polyallyl es[…]; By-product classification allocatable product
  This resin belongs to the unsaturated polyester composite resin category. They are often used as matrix for composite materials, when applied on glass fibre or natural fibres (ex: flax). Typical characteristics: Appearance: Homogeneous liquid resin. Main applications: Sheet moulding compounds (SMC) and Bulk moulding compounds (BMC) Other possible applications: Pultrusion-compounds. Viscosity (mPa.s) RVF at 25 °C, Spindle 3 rpm 20 (GM025): 1100-1250. Monomer content (%) RS06C: 34-36. They are among the most used thermoset resins. They have uses in many applications. The maleic resins are used to produce moulded technical parts. The use of one resin over another depends on the user required physical caracteristics.
  production volume 9.75e8 kg; name RP_PV_1; = 4500000000/4
    Global production of UPR resins in 2013. No distinction could be made between the different UPR resin as no more specific data was available. 1/4 of the total production volume has been allocated to each resin.
  property price 1.28043 EUR2005
    Calculated based on inputs: The price of the product has been calculated as a sum of the values of the material and energy inputs for this product. This value is therefore a rough estimation. It may underestimate the real price since there are additional expenses when producing any product. These expences can include for example labour costs, treatment of waste materials and profit for the producer. Please consider carefully whether this level of data quality is acceptable for your application.
  property heating value, net 20.47 MJ
    LHV is calculated based on the Carbon content of the product. More details can be found on the respective documentation.
  property carbon content 0.675478
    carbon content on a dry matter basis (reserved; not for manual entry)
  properties: water in wet mass 0 kg, wet mass 1 kg, dry mass 1 kg, carbon content, fossil 0.675478, carbon content, non-fossil 0, water content 0, carbon allocation 0.675478 kg

## Inputs from technosphere
- heat, district or industrial, other than natural gas: 0.25891 MJ; lognormal variance with pedigree 0.0034, pedigree (1,3,2,5,1)
  Based on a calorific value of 12.4 kWh/kg. Activity link has been defined as the ratio between heat from natural gas and heavy fuel oil iw known.
  properties: corresponding fuel use, propane, furnace >100kW 1.05263 MJ, heating value, net 1 MJ
  note on corresponding fuel use, propane, furnace >100kW: Lower heating value of the fuel input related to the heat/electricity output, taken directly from ecoinvent v3.0 dataset "heat production, natural gas, at industrial furnace >100kW, GLO 2000".
- wastewater, average: -7.24e-6 m3; name BP_amount_3; lognormal variance with pedigree 0.004, pedigree (2,3,2,5,1)
  production volume 7059 m3; = RP_PV_1 * (BP_amount_3 / RP_amount_1)
    Calculated from production volume of reference product using the relative outputs.
  property price 0 EUR2005; name BP_amount_3_price_EUR2005
  properties: dry mass 0.346837 kg, carbon content, non-fossil 0.194039, water content 2882.2, wet mass 1000 kg
  note on carbon content, non-fossil: 0.0673 kg TOC/m3 (Tab A.17, ecoinvent v2.2 report 13_I). TOC was considered as Total Carbon.
- steam, in chemical industry: 0.24 kg; lognormal variance with pedigree 0.0034, pedigree (1,3,2,5,1)
  Value based on data from three producers.
- styrene: 0.38 kg; name STYR; lognormal variance with pedigree 0.0034, pedigree (1,3,2,5,1)
  Value based on data from three producers.
  properties: wet mass 1 kg, dry mass 1 kg, carbon content, fossil 0.923077, heating value, net 37.26 MJ
- diethylene glycol: 0.125 kg; name DIETHYL; lognormal variance with pedigree 0.0034, pedigree (1,3,2,5,1)
  Value based on data from three producers.
  properties: wet mass 1 kg, dry mass 1 kg, carbon content, fossil 0.45283, heating value, net 25.14 MJ
- ethylene glycol: 0.065 kg; name ETHYL; lognormal variance with pedigree 0.0034, pedigree (1,3,2,5,1)
  Value based on data from three producers.
  properties: heating value, net 23.44 MJ, dry mass 1 kg, carbon content, fossil 0.387097, wet mass 1 kg
- electricity, low voltage: 0 kWh; pedigree (1,1,1,1,1)
  Value based on data from three producers.
- municipal solid waste: 0 kg; name BP_amount_2; pedigree (1,1,1,1,1)
  production volume 0 kg
    Calculated from production volume of reference product using the relative outputs.
  properties: dry mass 0.771 kg, heating value, net 11.74 MJ, carbon content, fossil 0.171549, carbon content, non-fossil 0.261655, wet mass 1 kg, water content 0.297017
  note on heating value, net: Value taken from the general comment of the treatment dataset.
  note on carbon content, fossil: MSW composition in tab 4.1, ecoinvent v2.2 report 13_I. C content referred to 1 kg DM
- chemical factory, organics: 4e-10 unit; lognormal variance with pedigree 0.478, pedigree (4,5,5,5,5)
  Estimation. Data was estimated based on the dataset "chemical plant, organics". This module assumes a built area of about 4.2 ha, an average output of 50'000 t/a, and plant life of fifty years.
- propylene glycol, liquid: 0.125 kg; name PROPYL; lognormal variance with pedigree 0.0034, pedigree (1,3,2,5,1)
  Value based on data from three producers.
  properties: wet mass 1 kg, dry mass 1 kg, heating value, net 27.09 MJ, carbon content, fossil 0.473684
- hazardous waste, for incineration: -1.4e-6 kg; name BP_amount_1; lognormal variance with pedigree 0.004, pedigree (2,3,2,5,1)
  production volume 1365 kg; = RP_PV_1 * (BP_amount_1 / RP_amount_1)
    Calculated from production volume of reference product using the relative outputs.
  property price 0 EUR2005; name BP_amount_1_price_EUR2005
  properties: carbon content, fossil 0.554667, heating value, net 17 MJ, wet mass 1 kg, dry mass 0.75 kg, water content 0.333333
  note on carbon content, fossil: Tab A.6, ecoinvent v2.2 report 13_I. C content has been calculated after data in the tables, and then referred to 1 kg DM
- nitrogen, liquid: 0.01294 kg; lognormal variance with pedigree 0.0034, pedigree (1,3,2,5,1)
  Value based on data from three producers.
  properties: wet mass 1 kg, dry mass 1 kg
- maleic anhydride: 0.375 kg; lognormal variance with pedigree 0.0034, pedigree (1,3,2,5,1)
  properties: carbon content, fossil 0.489955, wet mass 1 kg, dry mass 1 kg, heating value, net 17.32 MJ
- heat, district or industrial, natural gas: 0.7749 MJ; lognormal variance with pedigree 0.0034, pedigree (1,3,2,5,1)
  Based on a calorific value of 10.5 kWh/m3. Activity link has been defined as the ratio between heat from natural gas and heavy fuel oil iw known.
  properties: heating value, net 1 MJ
- electricity, low voltage: 0.00118472, 0.000215716, 0.00347329, 0.0533261, 0.00862723, 0.0247729 kWh (6 entries); lognormal variance with pedigree 0.0034, pedigree (1,3,2,5,1)
  Value based on data from three producers.
- municipal solid waste: -4.74006e-7, -1.19438e-7, -1.70684e-7, -0.000335236 kg (4 entries); lognormal variance with pedigree 0.004, pedigree (2,3,2,5,1)
  production volume 327600 kg

## Emissions to nature
- Water [air, unspecified]: 7e-5 m3; lognormal variance with pedigree 0.0508, pedigree (4,3,2,5,1)
  Estimation based on the hypothesis that all condensating water is evaporating.
- Nitrogen [air, unspecified]: 0.01294 kg; lognormal variance with pedigree 0.0508, pedigree (4,3,2,5,1)
  Estimation based on the hypothesis that all used nitrogen is emitted to air.

## Sampling procedure
The data come from three different European producers. The average values have been used.

## Extrapolations
The infrastructure impacts have been assessed based on chemical industry average infrastructure, as no specific data was available.
