# maintenance, train, passenger, long distance

Dataset: EcoSpold 2, unit process
Geography: RoW
Time period: 1993-01-01 to 2021-12-31
Technology level: current
Classification: ISIC rev.4 ecoinvent: 3315:Repair of transport equipment, except motor vehicles
Classification: EcoSpold01Categories: transport systems/train
Tags: ConvertedDataset
Scenario: Business-as-Usual
System model: Allocation, cut-off by classification
Generated by: Michael Spielmann (obsolete)
Published in: Spielmann M. 2004
Database: ecoinvent
isCopyrightProtected: true
accessRestrictedTo: 1

## General comment
The life span of the train is assumed to be 40 years resulting in a life time performance of 20’000’000 vkm.
[This dataset was already contained in the ecoinvent database version 2. It was not individually updated during the transfer to ecoinvent version 3. Life Cycle Impact Assessment results may still have changed, as they are affected by changes in the supply chain, i.e. in other datasets. This dataset was generated following the ecoinvent quality guidelines for version 2. It may have been subject to central changes described in the ecoinvent version 3 change report (http://www.ecoinvent.org/database/ecoinvent-version-3/reports-of-changes/), and the results of the central updates were reviewed extensively. The changes added e.g. consistent water flows and other information throughout the database. The documentation of this dataset can be found in the ecoinvent reports of version 2, which are still available via the ecoinvent website. The change report linked above covers all central changes that were made during the conversion process.]

## Included activities end
This inventory includes expenditures for one major revision as well as a regular substitution of break shoes (40 kg break shoes/car). Also, the disposal of wood, glass and plastics is addressed. Land use and material expenditures due to buildings of service garages are not included.

## Geography
Data represents a train maintenance in Switzerland.

## Parameters
- fraction, tap water, to air: 0.15 dimensionless; name fraction_TW_to_air; lognormal variance with pedigree 0.092025, pedigree (4,4,3,2,4)
- fraction, process water, to air: 0.15 dimensionless; name fraction_PW_to_air; lognormal variance with pedigree 0.092025, pedigree (4,4,3,2,4)

## Reference product
- maintenance, train, passenger, long distance: 1 unit; CPC 87149: Maintenance and repair services of other transport equipment; By-product classification allocatable product
  EcoSpold01Location=CH
  production volume 3.96633 unit
    This is a placeholder value that does not reflect real-world production volumes. This dataset does not currently require a real-world production volume to work in the database framework, and no actual data were collected yet. This has no negative effect on the results of the ecoinvent database.
  property price 391437 EUR2005
    Calculated based on inputs: The price of the product has been calculated as a sum of the values of the material and energy inputs for this product. This value is therefore a rough estimation. It may underestimate the real price since there are additional expenses when producing any product. These expences can include for example labour costs, treatment of waste materials and profit for the producer. Please consider carefully whether this level of data quality is acceptable for your application.

## Inputs from technosphere
- polyethylene, high density, granulate: 78200 kg; lognormal variance with pedigree 0.0606, pedigree (4,3,5,5,1)
  Literature studies
  EcoSpold01Location=RER
  Uncertainty: literature studies
  properties: heating value, net 42.47 MJ, dry mass 1 kg, carbon content, fossil 0.857143, wet mass 1 kg
  note on carbon content, fossil: Polyethylene is formed out of a huge amount of ethylene monomers (C2H4) (ecoinvent v2.2 report 11_II). MW=28 g/mol
- aluminium, cast alloy: 4160 kg; lognormal variance with pedigree 0.0606, pedigree (4,3,5,5,1)
  EcoSpold01Location=RER
  Literature studies
  Uncertainty: literature studies
  properties: dry mass 1 kg, wet mass 1 kg
- wastewater, average: 0 m3; pedigree (1,1,1,1,1)
  Literature studies
  EcoSpold01Location=CH
  Uncertainty: literature studies
  production volume 0 m3
    Calculated from the production volume of maintenance, train, passenger, long distance in proportion to the respective output amounts.
  properties: water content 2882.2, wet mass 1000 kg, dry mass 0.346837 kg, carbon content, non-fossil 0.194039
  note on carbon content, non-fossil: 0.0673 kg TOC/m3 (Tab A.17, ecoinvent v2.2 report 13_I). TOC was considered as Total Carbon.
- electricity, medium voltage: 0 kWh; pedigree (1,1,1,1,1)
  EcoSpold01Location=CH
  Literature studies, rough estimate
  Uncertainty: literature studies, rough estimate
- solvent, organic: 500 kg; lognormal variance with pedigree 0.0607, pedigree (2,2,5,5,3)
  EcoSpold01Location=GLO
  Literature studies; estimate based on ICE maintenace figures
  Uncertainty: literature studies; estimate based on ICE maintenace figures
  properties: heating value, net 19.11 MJ, carbon content, fossil 0.63072, wet mass 1 kg, dry mass 1 kg
  note on carbon content, fossil: Mixture of 15 of the most often used solvents (list in ecoinvent v2.2 report 11-III, pg 293). C content was calculated as an unweighted average of C content of the different solvents
- flat glass, coated: 26100 kg; lognormal variance with pedigree 0.0607, pedigree (2,2,5,5,3)
  EcoSpold01Location=RER
  Literature studies; estimate based on ICE maintenace figures
  Uncertainty: literature studies; estimate based on ICE maintenace figures
  properties: dry mass 1 kg, wet mass 1 kg
- lubricating oil: 500 kg; lognormal variance with pedigree 0.0606, pedigree (4,3,5,5,1)
  Literature studies; estimate based on ICE maintenace figures
  EcoSpold01Location=RER
  Uncertainty: literature studies; estimate based on ICE maintenace figures
  properties: heating value, net 40.2 MJ, carbon content, fossil 0.75, wet mass 1 kg, dry mass 1 kg
  note on heating value, net: Literature value, Source: IPCC 2006, 2006 IPCC Guidelines for National Greenhouse Gas Inventories, Prepared by the National Greenhouse Gas Inventories Programme, Eggleston H.S., Buendia L., Miwa K., Ngara T. and Tanabe K. (eds). Published: IGES, Japan
  note on carbon content, fossil: Lubricating oil is produced from diesel. C-content/dry mass of fats and oils considered 75%, from: ecoinvent v2.2 report, n 15a, pg 40
- waste plastic, mixture: 0 kg; pedigree (1,1,1,1,1)
  Literature studies
  EcoSpold01Location=CH
  Uncertainty: literature studies
  production volume 0 kg
    (same comment as for wastewater, average)
  properties: dry mass 0.847 kg, wet mass 1 kg, heating value, net 30.79 MJ, carbon content, fossil 0.747344, water content 0.180638
  note on heating value, net: Value taken from the general comment of the treatment dataset.
  note on carbon content, fossil: C content in 1 kg DM was calculated using data in Tab A.2, ecoinvent v2.2 report 13_I
- tap water: 0 kg; name tap_water_input; pedigree (1,1,1,1,1)
  Literature studies, rough estimate
  EcoSpold01Location=CH
  Uncertainty: literature studies, rough estimate
  properties: water content 2962.17, carbon content, fossil 0.00178991, dry mass 0.000337476 kg, wet mass 1 kg
  note on carbon content, fossil: Bicarbonate content is 2.93 mol/m3. CO2 content is 0.1 mol/m3 (ecoinvent v2.2 report 8, Tab 93.1).
- alkyd paint, white, without solvent, in 60% solution state: 6180 kg; lognormal variance with pedigree 0.0607, pedigree (2,2,5,5,3)
  (same comment as for flat glass, coated)
  properties: dry mass 1 kg, carbon content, non-fossil 0.199629, heating value, net 10.3 MJ, carbon content, fossil 0.140367, wet mass 1 kg
  note on carbon content, non-fossil: C content was calculated as an addition of C content in the raw materials.
- tempering, flat glass: 26100 kg; lognormal variance with pedigree 0.0607, pedigree (2,2,5,5,3)
  (same comment as for flat glass, coated)
- reinforcing steel: 99000 kg; lognormal variance with pedigree 0.0606, pedigree (4,3,5,5,1)
  EcoSpold01Location=RER
  Literature studies
  Uncertainty: literature studies
  properties: wet mass 1 kg, dry mass 1 kg, carbon content, fossil 0.004
- waste glass: 0 kg; pedigree (1,1,1,1,1)
  Literature studies
  EcoSpold01Location=CH
  Uncertainty: literature studies
  production volume 0 kg
    (same comment as for wastewater, average)
  properties: wet mass 1 kg, dry mass 1 kg, heating value, net 0.05 MJ
  note on heating value, net: Value extracted from "treatment of waste glass, open dump, very wet infiltration class (1000mm)"
- pitch: 0 kg; pedigree (1,1,1,1,1)
  Literature studies
  EcoSpold01Location=CH
  Uncertainty: literature studies
  properties: heating value, net 28 MJ, carbon content, fossil 0.83, wet mass 1 kg, dry mass 1 kg
- heat, district or industrial, natural gas: 0 MJ; pedigree (1,1,1,1,1)
  EcoSpold01Location=RER
  Literature studies, rough estimate
  Uncertainty: literature studies, rough estimate
  properties: heating value, net 1 MJ
- sodium hydroxide, without water, in 50% solution state: 40000 kg; lognormal variance with pedigree 0.0607, pedigree (2,2,5,5,3)
  (same comment as for lubricating oil)
  properties: heating value, net 3.03 MJ, dry mass 1 kg, wet mass 1 kg
- copper, cathode: 125 kg; lognormal variance with pedigree 0.0606, pedigree (4,3,5,5,1)
  (same comment as for lubricating oil)
  properties: dry mass 1 kg, wet mass 1 kg
- paper, woodfree, uncoated: 20700 kg; lognormal variance with pedigree 0.0606, pedigree (4,3,5,5,1)
  (same comment as for lubricating oil)
  properties: carbon content, non-fossil 0.281215, carbon content, fossil 0.0251406, heating value, net 14.11 MJ, water content 0.0582011, wet mass 1 kg, dry mass 0.945 kg
  note on carbon content, non-fossil: Biogenic C content was calculated after biogenic C contents of chemicals used in the production of the paper (in Tab 8.54 & 8.55 ecoinvent v2.2 report 11_III, part 8). The cellulose content in 1 kg of paper (on a wet mas basis) was estimated as (1-chemical content), C content of cellulose was considered 0.44 kgC/kg dry mass (ecoinvent v2.2 report, n 15a, pg 40)
  note on carbon content, fossil: Fossil C content was calculated after fossil C contents of chemicals used in the production of the paper (in Tab 8.54 & 8.55 ecoinvent v2.2 report 11_III, part 8).
- waste emulsion paint: 0 kg; pedigree (1,1,1,1,1)
  EcoSpold01Location=CH
  Literature studies
  Uncertainty: literature studies
  production volume 0 kg
    (same comment as for wastewater, average)
  properties: carbon content, fossil 0.27, wet mass 1 kg, dry mass 1 kg, heating value, net 8.18 MJ
  note on carbon content, fossil: Tab A.4, ecoinvent v2.2 report 13_I. C content has been calculated after data in the tables, and then referred to 1 kg DM
- synthetic rubber: 13200 kg; lognormal variance with pedigree 0.0606, pedigree (4,3,5,5,1)
  Literature studies
  EcoSpold01Location=RER
  Uncertainty: literature studies
  properties: wet mass 1 kg, carbon content, fossil 0.871949, dry mass 1 kg, heating value, net 26.42 MJ
  note on carbon content, fossil: EPDM (Ethylene-propene-diene terpolymer) rubber is a terpolymer of ethylene, propene, and a diene with the residual unsaturated portion of the diene in the side chain (ecoinvent v2.2 report 7-part XX & Ullmann). Chemical formula (deduced from Evidences of Solvent-Induced Miscibility in Polychloroprene-co-Ethylene-Propene Diene Terpolymer Blends, Dubey et al., Journal of Applied Polymer Science, 2009, 111:1884–1891): C20H35
- aluminium, wrought alloy: 8840 kg; lognormal variance with pedigree 0.0606, pedigree (4,3,5,5,1)
  EcoSpold01Location=RER
  Literature studies
  Uncertainty: literature studies
  properties: wet mass 1 kg, dry mass 1 kg
- heat, district or industrial, other than natural gas: 0 MJ; pedigree (1,1,1,1,1)
  (same comment as for tap water)
  properties: heating value, net 1 MJ
- wastewater, average: -147.79, -309.21 m3 (2 entries); lognormal variance with pedigree 0.0606, pedigree (4,3,5,5,1)
  Literature studies
  EcoSpold01Location=CH
  Uncertainty: literature studies
  production volume 1371 m3
- electricity, medium voltage: 5513, 1057.16, 24274, 80366.8, 17747.4, 258121, 36382.2, 118539 kWh (8 entries); lognormal variance with pedigree 0.1806, pedigree (4,3,5,5,1)
  (same comment as for electricity, medium voltage)
- waste plastic, mixture: -1446.14, -96.6258, -7.30765, -39.9099, -16.1231, -37.8982, -1232.18, -10123.8 kg (8 entries); lognormal variance with pedigree 0.0606, pedigree (4,3,5,5,1)
  Literature studies
  EcoSpold01Location=CH
  Uncertainty: literature studies
  production volume 39000 kg
- tap water: 4270.28, 514.027, 849.514, 182667, 21421.4, 557.272, 1585.15, 245136 kg (8 entries); lognormal variance with pedigree 0.0606, pedigree (4,3,5,5,1)
  (same comment as for tap water)
- waste glass: -2094.84, -193.077, -4.38027, -18.0138, -27.355, -80.6052, -3939.63, -19742.1 kg (8 entries); lognormal variance with pedigree 0.0606, pedigree (4,3,5,5,1)
  Literature studies
  EcoSpold01Location=CH
  Uncertainty: literature studies
  production volume 78300 kg
- pitch: 221.889, 12.6459, 735.289, 572.349, 25.655, 36.625, 3235.55 kg (7 entries); lognormal variance with pedigree 0.0607, pedigree (2,2,5,5,3)
  Literature studies
  EcoSpold01Location=CH
  Uncertainty: literature studies
- heat, district or industrial, natural gas: 719.008, 17228.8, 46652.2 MJ (3 entries); lognormal variance with pedigree 0.1806, pedigree (4,3,5,5,1)
  (same comment as for heat, district or industrial, natural gas)
- waste emulsion paint: -55.5629, -589.437 kg (2 entries); lognormal variance with pedigree 0.0606, pedigree (4,3,5,5,1)
  EcoSpold01Location=CH
  Literature studies
  Uncertainty: literature studies
  production volume 1935 kg
- heat, district or industrial, other than natural gas: 1732.99, 104646, 4.27362e6 MJ (3 entries); lognormal variance with pedigree 0.1806, pedigree (4,3,5,5,1)
  (same comment as for tap water)

## Emissions to nature
- NMVOC, non-methane volatile organic compounds, unspecified origin [air, non-urban air or from high stacks]: 3100 kg; lognormal variance with pedigree 0.0607, pedigree (2,2,5,5,3)
  Derived from the used paint and solvent, assuming all solvent is emitted to air.
  Uncertainty: Derived from the used paint and solvent, assuming all solvent is emitted to air.
- Water [air, unspecified]: 68.55 m3; name water_to_air_unspecified; lognormal variance with pedigree 0.0827, pedigree (2,2,5,5,1)
  Calculated value based on literature values and expert opinion. See comments in the parametres' comment field.
  property fraction, origin: salt water 0; name fraction_origin_salt_water
  property fraction, origin: fresh water 1; name fraction_origin_fresh_water
  property fraction, origin: unspecified 0; name fraction_origin_unspecified

## Sampling procedure
The data of the material composition and energy consumption is based on literature studies.

## Extrapolations
none This dataset has been copied from an original dataset covering the geography CH. The uncertainty has been adjusted accordingly.

## Review by Niels Jungbluth 2004-04-01
Passed.
