# petrol, unleaded, burned in machinery

Dataset: EcoSpold 2, unit process
Geography: GLO
Time period: 2009-01-01 to 2021-12-31
Technology level: current
Classification: ISIC rev.4 ecoinvent: 0161:Support activities for crop production
Tags: WFLDB
Scenario: Business-as-Usual
System model: Allocation, cut-off by classification
Generated by: Patrik Mouron
Database: ecoinvent
isCopyrightProtected: true
accessRestrictedTo: 1

## General comment
This dataset represents the combustion of 1 kg petrol, unleaded, in an unpecified agricultural motor machinery. This dataset is extrapolated from the operation of an agricultural tractor with two tyre-trailers of maximum 8t loading capacity each. Mean velocity when loaded is 15 km/h and mean velocity when empty is 25 km/h. Emissions and heat waste to the air from combustion and the emission to the soil from tyre abrasion during the transport are included.

## Included activities start
This activity starts with consumption of petrol for use in machinery.

## Included activities end
Included processes are petrol use and emissions from combustion.
This activity ends with the combustion of petrol in machinery.

## Parameters
- LUC_crop_specific: 1 dimensionless
  This parameter allows to switch between a 'crop specific' and a 'country specific' approach when calculating the LUC of a crop. By default, the chosen approach is 'crop specific', so the value of the parameter is 1. If you want to apply a 'country specific' approach, turn the parameter to 0.

## Reference product
- petrol, unleaded, burned in machinery: 1 MJ; CPC 86119: Other support services to crop production; By-product classification allocatable product; CAS 86290-81-5
  1.0 MJ (i.e. 0.0221 kg) petrol burned in machinery.
  production volume 4 MJ
    This is a placeholder value that does not reflect real-world production volumes. This dataset does not currently require a real-world production volume to work in the database framework, and no actual data were collected yet. This has no negative effect on the results of the ecoinvent database.
  property price 0.0156733 EUR2005
    Calculated based on inputs: The price of the product has been calculated as a sum of the values of the material and energy inputs for this product. This value is therefore a rough estimation. It may underestimate the real price since there are additional expenses when producing any product. These expences can include for example labour costs, treatment of waste materials and profit for the producer. Please consider carefully whether this level of data quality is acceptable for your application.
  properties: heating value, net 1 MJ

## Inputs from technosphere
- petrol, unleaded: 0, 0.00337468, 0.0001498, 0.000619092, 0.000149314, 0.000558582, 3.07574e-5, 0.0171928 kg (8 entries)
  properties: carbon content, fossil 0.865, heating value, net 43.2 MJ, dry mass 1 kg, wet mass 1 kg
  note on heating value, net: Assumed equal to "petroleum". LHV for petroleum: Based on literature, page 7, Report6, part 4

## Emissions to nature
- Zinc [air, non-urban air or from high stacks]: 2.20751e-8 kg; lognormal variance with pedigree 2.83242, pedigree (5,5,5,5,5)
  Emissions to air from combustion. Calculated according to 'Life Cycle Inventories of Agricultural Systems. Data v2.0 (2007).' ecoinvent report No. 15.
- Lead [air, non-urban air or from high stacks]: 3.22296e-6 kg; lognormal variance with pedigree 2.83242, pedigree (5,5,5,5,5)
  (same comment as for Zinc)
- Benzo(a)pyrene [air, non-urban air or from high stacks]: 8.83002e-10 kg; lognormal variance with pedigree 2.83242, pedigree (5,5,5,5,5)
  (same comment as for Zinc)
- Heat, waste [air, non-urban air or from high stacks]: 0.995585 MJ; lognormal variance with pedigree 0.220891, pedigree (5,5,5,5,5)
  (same comment as for Zinc)
- Methane, fossil [air, non-urban air or from high stacks]: 6.44592e-5 kg; lognormal variance with pedigree 0.407745, pedigree (5,5,5,5,5)
  (same comment as for Zinc)
- Cadmium [air, non-urban air or from high stacks]: 2.20751e-10 kg; lognormal variance with pedigree 2.83242, pedigree (5,5,5,5,5)
  (same comment as for Zinc)
- Ammonia [air, non-urban air or from high stacks]: 8.83002e-7 kg; source EEA 2013; lognormal variance with pedigree 0.407745, pedigree (5,5,5,5,5)
  (same comment as for Zinc)
- Nickel [air, non-urban air or from high stacks]: 1.54525e-9 kg; lognormal variance with pedigree 2.83242, pedigree (5,5,5,5,5)
  (same comment as for Zinc)
- Carbon dioxide, fossil [air, non-urban air or from high stacks]: 0.0662252 kg; lognormal variance with pedigree 0.222843, pedigree (5,5,5,5,5)
  (same comment as for Zinc)
- Benzene [air, non-urban air or from high stacks]: 0.000209272 kg; lognormal variance with pedigree 0.407745, pedigree (5,5,5,5,5)
  (same comment as for Zinc)
- Nitrogen oxides [air, non-urban air or from high stacks]: 0.000441501 kg; source EEA 2013; lognormal variance with pedigree 0.385318, pedigree (5,5,5,5,5)
  (same comment as for Zinc)
- Carbon monoxide, fossil [air, non-urban air or from high stacks]: 0.0139735 kg; lognormal variance with pedigree 2.80673, pedigree (5,5,5,5,5)
  (same comment as for Zinc)
- Dinitrogen monoxide [air, non-urban air or from high stacks]: 2.86976e-6 kg; lognormal variance with pedigree 0.407745, pedigree (5,5,5,5,5)
  (same comment as for Zinc)
- Chromium [air, non-urban air or from high stacks]: 1.10375e-9 kg; lognormal variance with pedigree 2.83242, pedigree (5,5,5,5,5)
  (same comment as for Zinc)
- Particulates, < 2.5 um [air, non-urban air or from high stacks]: 6.66667e-5 kg; lognormal variance with pedigree 1.45354, pedigree (5,5,5,5,5)
  (same comment as for Zinc)
- Copper [air, non-urban air or from high stacks]: 3.75276e-8 kg; lognormal variance with pedigree 2.83242, pedigree (5,5,5,5,5)
  (same comment as for Zinc)
- Sulfur dioxide [air, non-urban air or from high stacks]: 1.5894e-6 kg; lognormal variance with pedigree 0.246336, pedigree (5,5,5,5,5)
  (same comment as for Zinc)
- NMVOC, non-methane volatile organic compounds, unspecified origin [air, non-urban air or from high stacks]: 0.000240618 kg; lognormal variance with pedigree 0.385318, pedigree (5,5,5,5,5)
  (same comment as for Zinc)

## Extrapolations
This dataset has been extrapolated from year 2012 to the year of the calculation (2021). The uncertainty has been adjusted accordingly.
