# ethylene production, average

Dataset: EcoSpold 2, unit process
Geography: RER
Time period: 1999-01-01 to 2021-12-31
Technology level: current
Classification: ISIC rev.4 ecoinvent: 1920:Manufacture of refined petroleum products
Classification: EcoSpold01Categories: plastics/monomers
Synonyms: ethene; Ethan
Tags: ConvertedDataset
Scenario: Business-as-Usual
System model: Allocation, cut-off by classification
Generated by: Roland Hischier
Published in: Hischier R. 2007
Database: ecoinvent
isCopyrightProtected: true
accessRestrictedTo: 1

## General comment
Data are derived from the Eco-profiles of the European plastics industry (PlasticsEurope). Not included are the values reported for: recyclable wastes, amount of air / N2 / O2 consumed, unspecified metal emission to air and to water, mercaptan emission to air, unspecified CFC/HCFC emission to air, dioxin to water. The amount of "sulphur (bonded)" is assumed to be included into the amount of raw oil.
[This dataset was already contained in the ecoinvent database version 2. It was not individually updated during the transfer to ecoinvent version 3. Life Cycle Impact Assessment results may still have changed, as they are affected by changes in the supply chain, i.e. in other datasets. This dataset was generated following the ecoinvent quality guidelines for version 2. It may have been subject to central changes described in the ecoinvent version 3 change report (http://www.ecoinvent.org/database/ecoinvent-version-3/reports-of-changes/), and the results of the central updates were reviewed extensively. The changes added e.g. consistent water flows and other information throughout the database. The documentation of this dataset can be found in the ecoinvent reports of version 2, which are still available via the ecoinvent website. The change report linked above covers all central changes that were made during the conversion process.]

## Included activities end
Aggregated data for all processes from raw material extraction until delivery at plant

## Geography
19 European production sites

## Technology
product out of steam cracking of naphtha

## Time period
time to which data refer

## Parameters
- fraction, cooling water, cooling pond system, to air: 0.032 dimensionless; name fraction_CW_CP_to_air; lognormal variance with pedigree 0.0413, pedigree (2,3,1,3,1)
  Calculated based on literature value (Scown, C.D., 2011, Water Footprint of U.S. Transportation Fuels and supplying information of the article) (Vionnet, S., Quantis Water Database - Technical Report, 2012).
- fraction, process water, to air: 0.205 dimensionless; name fraction_PW_to_air; lognormal variance with pedigree 0.092025, pedigree (4,4,3,2,4)
  Literature value (Statistics Canada, 2007 & Shaffer, K.H., 2008, Consumptive water use in the Great Lakes Basin, USGS) (Vionnet, S., Quantis Water Database - Technical Report, 2012).
- fraction, cooling water, to air: 0.3875 dimensionless; name fraction_CW_to_air; = (0.5*fraction_CW_OT_to_air)+(0.5*fraction_CW_R_to_air); lognormal variance with pedigree 0.092025, pedigree (4,4,3,2,4)
  Calculated value based on literature value (see comments of the other parametres present in this dataset) and expert opinion. In the case when no industry/literature data are available about the type of cooling or directly fraction, cooling water, to air specific for the process a default assumption is applied. It is assumed that the once-through cooling system is used in 50% of all cases and recirculating system is used in another 50% of all cases.
- fraction, cooling water, recirculating system, to air: 0.771 dimensionless; name fraction_CW_R_to_air; lognormal variance with pedigree 0.0413, pedigree (2,3,1,3,1)
  (same comment as for fraction, cooling water, cooling pond system, to air)
- fraction, cooling water, once-through system, to air: 0.004 dimensionless; name fraction_CW_OT_to_air; lognormal variance with pedigree 0.0413, pedigree (2,3,1,3,1)
  (same comment as for fraction, cooling water, cooling pond system, to air)

## Reference product
- ethylene: 1 kg; name ethylene_RP; By-product classification allocatable product; CPC 33421: Ethylene, propylene, butylene, butadiene; CAS 74-85-1
  EcoSpold01Location=RER
  production volume 2.02988e10 kg; name ethylene_RP_PV; = 143E+09*0.167*0.85
    Estimated value. The global demand of ethylene in 2015 was of 143 million tons (Plotkin, 2016). Ethylene can be produced by a number of feedstocks; this dataset represents the production from Naphtha. According to Arns (n.d.), in 2013 EU28 represented 16.7% of the global chemical industry. This value is used to calculate the amount of production of ethylene in Europe, the resulting value (23.9 million tons) roughly matches the value reported from Arns (n.d.) in a bar graph, where the bar lies in the lower half between the values of 20 and 30 million tons. Arns (n.d.) also reports that "85% of European crackers use naphtha as main feedstock". We therefore assume that 85% of ethylene in Europe is produced from Naphtha.
    References:
    Plotkins, J.S. 2016. Beyond the Ethylene Steam Cracker. American Chemical Society. Retrieved from: https://www.acs.org/content/acs/en/pressroom/cutting-edge-chemistry/beyond-the-ethylene-steam-cracker.html, accessed 17 October 2018
    Arns, D. n.d. The European Petrochemical Industry in Challenging Times. Power point presentation from Cefic. Retrieved from: https://www.platts.com/IM.Platts.Content/ProductsServices/ConferenceandEvents/emea/european-petrochemicals/presentations/Dorothee_Arns.pdf, accessed 17 October 2018
  property price 0.754 EUR2005
    Source: CMAI (2011) Monomers Market Report (http://www.cmaiglobal.com/Marketing/Samples/MMR_Summary.pdf). Price: approx. 0.9 USD/kg
  property heating value, net 43.22 MJ
    LHV is calculated based on the elemental composition of the substance. Based on the CAS number of the substance (000074-85-1), the chemical formula of the substance is found to be: C2H4, (PubChem 2020).
    Reference: Kim, S., Chen, J., Cheng, T., Gindulyte, A., He, J., He, S., Li, Q., Shoemaker, B. A., Thiessen, P. A., Yu, B., Zaslavsky, L., Zhang, J., & Bolton, E. E. (2019). PubChem 2019 update: improved access to chemical data. Nucleic acids research, 47(D1), D1102–D1109. https://doi.org/10.1093/nar/gky1033
  property carbon content 0.857143
    carbon content on a dry matter basis (reserved; not for manual entry)
  properties: carbon content, non-fossil 0, water content 0, wet mass 1 kg, carbon content, fossil 0.857143, dry mass 1 kg, water in wet mass 0 kg, carbon allocation 0.857143 kg

## Inputs from technosphere
- average incineration residue: -0.0037702 kg; name ByP_03
  EcoSpold01Location=CH
  Uncertainty for LCI results cannot be determined
  production volume 7.65307e7 kg; = ByP_03/ ethylene_RP* ethylene_RP_PV
    Calculated from the production volume of ethylene, average in proportion to the respective output amounts.
  property price 0 EUR2005; name ByP_03_price_EUR2005
  properties: dry mass 1 kg, carbon content, non-fossil 0.0511208, carbon content, fossil 0.0325466, wet mass 1 kg
  note on carbon content, non-fossil: Tab A.1, ecoinvent v2.2 report 13_I. It is considered that 61.1% of the C has a biogenic origin
- waste wood, untreated: -6.3897e-8 kg; name ByP_05
  Uncertainty for LCI results cannot be determined
  EcoSpold01Location=CH
  production volume 1297.04 kg; = ByP_05/ ethylene_RP* ethylene_RP_PV
    (same comment as for average incineration residue)
  property price 0 EUR2005; name ByP_05_price_EUR2005
  properties: dry mass 0.8 kg, carbon content, non-fossil 0.48632, water content 0.25, wet mass 1 kg, heating value, net 13.99 MJ
  note on carbon content, non-fossil: Tab A.4, ecoinvent v2.2 report 13_I. C content has been referred to 1 kg DM,
  note on heating value, net: Value taken from the general comment of the treatment dataset.
- spoil from hard coal mining: -0.0081357 kg; name ByP_06
  Uncertainty for LCI results cannot be determined
  EcoSpold01Location=GLO
  production volume 1.65145e8 kg; = ByP_06/ ethylene_RP* ethylene_RP_PV
    (same comment as for average incineration residue)
  property price 0 EUR2005; name ByP_06_price_EUR2005
  properties: dry mass 1 kg, carbon content, fossil 0.007879, wet mass 1 kg
  note on carbon content, fossil: Composition of coal spoil is adopted by proxy from lignite spoil (pg 19, Doka G. (2009) Life Cycle Inventory of the disposal of lignite spoil, coal spoil and coal tailings. Doka Life Cycle Assessments, Zurich. Commissioned by the Swiss Centre for Life Cycle Inventories ecoinvent Centre)
- waste plastic, mixture: -1.2116e-6 kg; name ByP_07
  EcoSpold01Location=CH
  Uncertainty for LCI results cannot be determined
  production volume 24594.1 kg; = ByP_07/ ethylene_RP* ethylene_RP_PV
    (same comment as for average incineration residue)
  property price 0 EUR2005; name ByP_07_price_EUR2005
  properties: wet mass 1 kg, dry mass 0.847 kg, carbon content, fossil 0.747344, water content 0.180638, heating value, net 30.79 MJ
  note on carbon content, fossil: C content in 1 kg DM was calculated using data in Tab A.2, ecoinvent v2.2 report 13_I
- coal slurry: -7.3325e-7 kg; name ByP_01
  EcoSpold01Location=GLO
  Uncertainty for LCI results cannot be determined
  production volume 14884.1 kg; = ByP_01/ ethylene_RP* ethylene_RP_PV
    (same comment as for average incineration residue)
  property price 0 EUR2005; name ByP_01_price_EUR2005
  properties: dry mass 1 kg, wet mass 1 kg, carbon content, fossil 0.124
  note on carbon content, fossil: Coal tailings composition in Tab 3.4, (Doka G. (2009) Life Cycle Inventory of the disposal of lignite spoil, coal spoil and coal tailings. Doka Life Cycle Assessments, Zurich. Commissioned by the Swiss Centre for Life Cycle Inventories ecoinvent Centre)
- hazardous waste, for incineration: 0 kg; name ByP_08
  EcoSpold01Location=CH
  Uncertainty for LCI results cannot be determined
  production volume 0 kg
    (same comment as for average incineration residue)
  property price 0 EUR2005; name ByP_08_price_EUR2005
  properties: dry mass 0.75 kg, water content 0.333333, wet mass 1 kg, carbon content, fossil 0.554667, heating value, net 17 MJ
  note on carbon content, fossil: Tab A.6, ecoinvent v2.2 report 13_I. C content has been calculated after data in the tables, and then referred to 1 kg DM
- decommissioned chemical production facilities: -5.2288e-10 kg; name ByP_02
  Uncertainty for LCI results cannot be determined
  EcoSpold01Location=RER
  production volume 10.6139 kg; = ByP_02/ ethylene_RP* ethylene_RP_PV
    (same comment as for average incineration residue)
  property price 0 EUR2005; name ByP_02_price_EUR2005
  properties: dry mass 1 kg, wet mass 1 kg, carbon content, non-fossil 5.78006e-6, carbon content, fossil 0.0169382
  note on carbon content, non-fossil: Calculated from C content in input materials in the infrastructure
- municipal solid waste: -0.00184 kg; name ByP_04
  EcoSpold01Location=CH
  Uncertainty for LCI results cannot be determined
  production volume 3.73499e7 kg; = ByP_04/ ethylene_RP* ethylene_RP_PV
    (same comment as for average incineration residue)
  properties: water content 0.297017, dry mass 0.771 kg, carbon content, non-fossil 0.261655, carbon content, fossil 0.171549, heating value, net 11.74 MJ, wet mass 1 kg
  note on carbon content, non-fossil: MSW composition in tab 4.1, ecoinvent v2.2 report 13_I. C content referred to 1 kg DM
- hazardous waste, for incineration: -0.002001, -5.23048e-5 kg (2 entries)
  EcoSpold01Location=CH
  Uncertainty for LCI results cannot be determined
  production volume 4.16796e7 kg

## Inputs from nature
- Clay, bentonite, in ground [natural resource, in ground]: 5.5986e-5 kg
  Uncertainty for LCI results cannot be determined
- Sand, unspecified, in ground [natural resource, in ground]: 5.9331e-5 kg
  Uncertainty for LCI results cannot be determined
- Oil, crude, in ground [natural resource, in ground]: 0.92703 kg
  Uncertainty for LCI results cannot be determined
- Clay, unspecified, in ground [natural resource, in ground]: 2.2483e-10 kg
  Uncertainty for LCI results cannot be determined
- Phosphorus, in ground [natural resource, in ground]: 1.1401e-12 kg
  18% P in apatite; 12% in ore; Uncertainty for LCI results cannot be determined
- Manganese, in ground [natural resource, in ground]: 2.6394e-7 kg
  35.7% Mn in sedimentary deposit; 14.2% Mn in ore; Uncertainty for LCI results cannot be determined
- Sylvite, in ground [natural resource, in ground]: 5.597e-9 kg
  25% Sylvite in sylvinite; Uncertainty for LCI results cannot be determined
- Barium, in ground [natural resource, in ground]: 3.3744e-8 kg
  15% BaSO4 in ore; Uncertainty for LCI results cannot be determined
- Talc, in ground [natural resource, in ground]: 0 kg
  Uncertainty for LCI results cannot be determined
- Water, cooling, unspecified natural origin [natural resource, in water]: 0.026758 m3; name water_cooling_UNO_input; lognormal variance with pedigree 1.21, pedigree (5,5,5,5,5)
  Uncertainty for LCI results cannot be determined
- Granite, in ground [natural resource, in ground]: 1.6923e-15 kg
  Uncertainty for LCI results cannot be determined
- Iron, in ground [natural resource, in ground]: 0.00020464 kg
  46% Fe in siderite; 25% Fe in ore; Uncertainty for LCI results cannot be determined
- Water, unspecified natural origin [natural resource, in water]: 0.0012797 m3; name water_UNO_input; lognormal variance with pedigree 1.21, pedigree (5,5,5,5,5)
  Uncertainty for LCI results cannot be determined
- Uranium, in ground [natural resource, in ground]: 2.7664e-6 kg
  Uncertainty for LCI results cannot be determined
- Peat, in ground [natural resource, biotic]: 0.00034329 kg
  Uncertainty for LCI results cannot be determined
- Titanium, in ground [natural resource, in ground]: 0 kg
  95% TiO2 in rutile; 0.4% TiO2 in ore; Uncertainty for LCI results cannot be determined
- Mercury, in ground [natural resource, in ground]: 1.0089e-9 kg
  Uncertainty for LCI results cannot be determined
- Sodium nitrate, in ground [natural resource, in ground]: 0 kg
  Uncertainty for LCI results cannot be determined
- Chromium, in ground [natural resource, in ground]: 3.8224e-13 kg
  25.5% Cr in chromite; 11.6% in ore; Uncertainty for LCI results cannot be determined
- Magnesite, in ground [natural resource, in ground]: 0 kg
  60% Magnesite in ore; Uncertainty for LCI results cannot be determined
- Shale, in ground [natural resource, in ground]: 1.5807e-5 kg
  Uncertainty for LCI results cannot be determined
- Coal, hard, unspecified, in ground [natural resource, in ground]: 0.040762 kg
  Uncertainty for LCI results cannot be determined
- Energy, potential (in hydropower reservoir), converted [natural resource, in water]: 0.082587 MJ
- Sodium chloride, in ground [natural resource, in ground]: 0.00049234 kg
  Uncertainty for LCI results cannot be determined
- Energy, gross calorific value, in biomass [natural resource, biotic]: 0.11601 MJ
- Nickel, in ground [natural resource, in ground]: 5.5964e-13 kg
  1.98% Ni in silicates; 1.04% Ni in ore; Uncertainty for LCI results cannot be determined
- Zinc, in ground [natural resource, in ground]: 6.9043e-9 kg
  9.0% Zn in sulfide; 5.3% Zn in ore; Uncertainty for LCI results cannot be determined
- Olivine, in ground [natural resource, in ground]: 1.9199e-6 kg
  Uncertainty for LCI results cannot be determined
- Aluminium, in ground [natural resource, in ground]: 2.0075e-7 kg
  24% Al in bauxite; 11% Al in ore; Uncertainty for LCI results cannot be determined
- Dolomite, in ground [natural resource, in ground]: 2.5082e-6 kg
  Uncertainty for LCI results cannot be determined
- Feldspar, in ground [natural resource, in ground]: 0 kg
  Uncertainty for LCI results cannot be determined
- Water, river [natural resource, in water]: 0.00039777 m3; name water_river_input; lognormal variance with pedigree 1.21, pedigree (5,5,5,5,5)
  Uncertainty for LCI results cannot be determined
- Wood, unspecified, standing [natural resource, biotic]: 4.8581e-9 m3
  Uncertainty for LCI results cannot be determined
- Copper, in ground [natural resource, in ground]: 1.0308e-11 kg
  0.99% Cu in sulfide; 0.36% Cu and 82 ppm Mo in ore; Uncertainty for LCI results cannot be determined
- Fluorspar, in ground [natural resource, in ground]: 1.8851e-7 kg
  92% CaF2 in ore; Uncertainty for LCI results cannot be determined
- Lead, in ground [natural resource, in ground]: 1.8895e-7 kg
  5.0% Pb in sulfide; 3.0% Pb in ore; Uncertainty for LCI results cannot be determined
- Water, salt, ocean [natural resource, in water]: 0.00022439 m3; name water_salt_ocean_input; lognormal variance with pedigree 1.21, pedigree (5,5,5,5,5)
  Uncertainty for LCI results cannot be determined
- Gas, natural, in ground [natural resource, in ground]: 0.57317 m3
  Uncertainty for LCI results cannot be determined
- Coal, brown, in ground [natural resource, in ground]: 3.4128e-8 kg
  Uncertainty for LCI results cannot be determined
- Calcite, in ground [natural resource, in ground]: 0.00019905 kg
  Uncertainty for LCI results cannot be determined
- Water, well, in ground [natural resource, in water]: 9.3165e-11 m3; name water_well_in_ground_input; lognormal variance with pedigree 1.21, pedigree (5,5,5,5,5)
  Uncertainty for LCI results cannot be determined
- Anhydrite, in ground [natural resource, in ground]: 5.5835e-6 kg
  Uncertainty for LCI results cannot be determined
- Sulfur, in ground [natural resource, in ground]: 7.4567e-5 kg
  Uncertainty for LCI results cannot be determined
- Gravel, in ground [natural resource, in ground]: 7.5505e-7 kg
  Uncertainty for LCI results cannot be determined

## Emissions to nature
- Carbon monoxide, fossil [air, urban air close to ground]: 0.0018949 kg
  Uncertainty for LCI results cannot be determined
- Ethene [air, urban air close to ground]: 2.7907e-6 kg
  Uncertainty for LCI results cannot be determined
- Chromium [air, urban air close to ground]: 3.973e-10 kg
  Uncertainty for LCI results cannot be determined
- Particulates, > 10 um [air, urban air close to ground]: 0.00013332 kg
  Uncertainty for LCI results cannot be determined
- COD, Chemical Oxygen Demand [water, surface water]: 0.00013465 kg
  Uncertainty for LCI results cannot be determined
- Hydrogen [air, urban air close to ground]: 2.4303e-5 kg
  Uncertainty for LCI results cannot be determined
- Strontium [water, surface water]: 1.5548e-11 kg
  Uncertainty for LCI results cannot be determined
- Chlorate [water, surface water]: 1.4317e-7 kg
  Uncertainty for LCI results cannot be determined
- Arsenic, ion [water, surface water]: 2.6222e-10 kg
  Uncertainty for LCI results cannot be determined
- Cadmium, ion [water, surface water]: 2.9793e-15 kg
  Uncertainty for LCI results cannot be determined
- Sulfate [air, urban air close to ground]: 3.0994e-15 kg
  Uncertainty for LCI results cannot be determined
- NMVOC, non-methane volatile organic compounds, unspecified origin [air, urban air close to ground]: 0.0021288 kg
  Uncertainty for LCI results cannot be determined
- DOC, Dissolved Organic Carbon [water, surface water]: 1.576e-5 kg
  Calculated as equal to TOC.
- Copper, ion [water, surface water]: 2.6788e-7 kg
  Uncertainty for LCI results cannot be determined
- Ammonium, ion [water, surface water]: 2.3077e-6 kg
  Uncertainty for LCI results cannot be determined
- Nitrogen [water, surface water]: 1.2871e-6 kg
  Uncertainty for LCI results cannot be determined
- Zinc, ion [water, surface water]: 9.9572e-8 kg
  Uncertainty for LCI results cannot be determined
- Methane, non-fossil [air, urban air close to ground]: 2.8996e-5 kg
  Uncertainty for LCI results cannot be determined
- Sulfur dioxide [air, urban air close to ground]: 0.0022443 kg
  Uncertainty for LCI results cannot be determined
- Cyanide [water, surface water]: 1.9392e-11 kg
  Uncertainty for LCI results cannot be determined
- Mercury [air, urban air close to ground]: 1.3567e-9 kg
  Uncertainty for LCI results cannot be determined
- Carbonate [water, surface water]: 4.9463e-5 kg
  Uncertainty for LCI results cannot be determined
- Methane, dichloro-, HCC-30 [air, urban air close to ground]: 5.0938e-14 kg
  Uncertainty for LCI results cannot be determined
- Hydrogen chloride [air, urban air close to ground]: 1.9397e-5 kg
  Uncertainty for LCI results cannot be determined
- Sodium, ion [water, surface water]: 7.3994e-5 kg
  Uncertainty for LCI results cannot be determined
- Lead [water, surface water]: 1.4553e-10 kg
  Uncertainty for LCI results cannot be determined
- Propene [air, urban air close to ground]: 2.0672e-6 kg
  Uncertainty for LCI results cannot be determined
- AOX, Adsorbable Organic Halogen as Cl [water, surface water]: 5.2899e-13 kg
  Uncertainty for LCI results cannot be determined
- Bromate [water, surface water]: 5.2298e-10 kg
  Uncertainty for LCI results cannot be determined
- Oils, unspecified [water, surface water]: 9.5975e-6 kg
  Uncertainty for LCI results cannot be determined
- Acidity, unspecified [water, surface water]: 1.0198e-6 kg
  Uncertainty for LCI results cannot be determined
- Ethane, 1,2-dichloro- [air, urban air close to ground]: 8.2148e-12 kg
  Uncertainty for LCI results cannot be determined
- Dissolved solids [water, surface water]: 1.6607e-5 kg
  Uncertainty for LCI results cannot be determined
- Hydrogen sulfide [air, urban air close to ground]: 6.8691e-9 kg
  Uncertainty for LCI results cannot be determined
- Sulfide [water, surface water]: 2.0777e-13 kg
  Uncertainty for LCI results cannot be determined
- Fluorine [air, urban air close to ground]: 1.2905e-11 kg
  Uncertainty for LCI results cannot be determined
- Potassium, ion [water, surface water]: 1.6231e-10 kg
  Uncertainty for LCI results cannot be determined
- Lead [air, urban air close to ground]: 5.9789e-10 kg
  Uncertainty for LCI results cannot be determined
- Water [water, unspecified]: 0.0168839 m3; name water_to_water_unspecified; = water_cooling_UNO_input*(1-fraction_CW_to_air)+water_river_input*(1-fraction_PW_to_air)+water_salt_ocean_input*(1-fraction_PW_to_air)+water_well_in_ground_input*(1-fraction_PW_to_air); lognormal variance with pedigree 0.0807, pedigree (2,2,5,1,1)
  Calculated value based on literature values and expert opinion. See comments in the parametres' comment field.
  property carbon content, fossil 0; name C_content_fossil
  property carbon content, non-fossil 0; name C_content_non_fossil
  property dry mass 0 kg; name DM
  property fraction, origin: salt water 0.00996523; name fraction_origin_salt_water_Ww
  property water in wet mass 1000 kg; name WWM
  property wet mass 1000 kg; name WM
  property fraction, origin: fresh water 0.0176651; name fraction_origin_fresh_water_Ww
  property fraction, origin: unspecified 0.97237; name fraction_origin_unspecified_Ww
- Zinc [air, urban air close to ground]: 4.2193e-11 kg
  Uncertainty for LCI results cannot be determined
- Suspended solids, unspecified [water, surface water]: 9.4391e-5 kg
  Uncertainty for LCI results cannot be determined
- Copper [air, urban air close to ground]: 2.8819e-14 kg
  Uncertainty for LCI results cannot be determined
- Carbon dioxide, fossil [air, urban air close to ground]: 1.1238 kg
  Uncertainty for LCI results cannot be determined
- Arsenic [air, urban air close to ground]: 8.7172e-11 kg
  Uncertainty for LCI results cannot be determined
- Methane, fossil [air, urban air close to ground]: 0.010568 kg
  Uncertainty for LCI results cannot be determined
- Antimony [air, urban air close to ground]: 1.3914e-15 kg
  Uncertainty for LCI results cannot be determined
- Hydrocarbons, unspecified [water, surface water]: 1.611e-5 kg
  Uncertainty for LCI results cannot be determined
- Carbon disulfide [air, urban air close to ground]: 2.5406e-11 kg
  Uncertainty for LCI results cannot be determined
- Calcium, ion [water, surface water]: 3.8754e-8 kg
  Uncertainty for LCI results cannot be determined
- Carbon monoxide, non-fossil [air, urban air close to ground]: 5.1993e-6 kg
  Uncertainty for LCI results cannot be determined
- Nitrate [water, surface water]: 2.132e-6 kg
  Uncertainty for LCI results cannot be determined
- Hydrocarbons, chlorinated [air, urban air close to ground]: 1.6725e-9 kg
  Uncertainty for LCI results cannot be determined
- Nickel, ion [water, surface water]: 5.4567e-10 kg
  Uncertainty for LCI results cannot be determined
- Chloride [water, surface water]: 6.9586e-5 kg
  Uncertainty for LCI results cannot be determined
- Hydrogen fluoride [air, urban air close to ground]: 7.2876e-7 kg
  Uncertainty for LCI results cannot be determined
- Phenol [water, surface water]: 1.258e-6 kg
  Uncertainty for LCI results cannot be determined
- Nitrogen oxides [air, urban air close to ground]: 0.0022704 kg
  Uncertainty for LCI results cannot be determined
- Particulates, > 2.5 um, and < 10um [air, urban air close to ground]: 0.00017914 kg
  Uncertainty for LCI results cannot be determined
- Mercury [water, surface water]: 1.9681e-10 kg
  Uncertainty for LCI results cannot be determined
- Hydrocarbons, aromatic [air, urban air close to ground]: 3.9811e-5 kg
  Uncertainty for LCI results cannot be determined
- Chlorine [water, surface water]: 1.0039e-9 kg
  Uncertainty for LCI results cannot be determined
- Phosphorus [water, surface water]: 5.9284e-8 kg
  Uncertainty for LCI results cannot be determined
- Dinitrogen monoxide [air, urban air close to ground]: 2.8523e-13 kg
  Uncertainty for LCI results cannot be determined
- Ammonia [air, urban air close to ground]: 1.4084e-10 kg
  Uncertainty for LCI results cannot be determined
- Chromium, ion [water, surface water]: 7.6274e-14 kg
  Uncertainty for LCI results cannot be determined
- Iron, ion [water, surface water]: 8.8242e-9 kg
  Uncertainty for LCI results cannot be determined
- Sulfate [water, surface water]: 0.00049855 kg
  Uncertainty for LCI results cannot be determined
- Ethene, chloro- [water, surface water]: 3.4137e-12 kg
  Uncertainty for LCI results cannot be determined
- TOC, Total Organic Carbon [water, surface water]: 1.576e-5 kg
  Uncertainty for LCI results cannot be determined
- Ethene, chloro- [air, urban air close to ground]: 1.8464e-10 kg
  Uncertainty for LCI results cannot be determined
- Cadmium [air, urban air close to ground]: 1.5655e-11 kg
  Uncertainty for LCI results cannot be determined
- Manganese [water, surface water]: 1.5223e-14 kg
  Uncertainty for LCI results cannot be determined
- BOD5, Biological Oxygen Demand [water, surface water]: 1.9407e-5 kg
  Uncertainty for LCI results cannot be determined
- Fluoride [water, surface water]: 7.479e-10 kg
  Uncertainty for LCI results cannot be determined
- Magnesium [water, surface water]: 3.6917e-10 kg
  Uncertainty for LCI results cannot be determined
- Chlorinated solvents, unspecified [water, surface water]: 8.4815e-9 kg
  Uncertainty for LCI results cannot be determined
- Aluminium [water, surface water]: 4.5945e-7 kg
  Uncertainty for LCI results cannot be determined
- Nickel [air, urban air close to ground]: 5.1589e-14 kg
  Uncertainty for LCI results cannot be determined
- Ethane, 1,2-dichloro- [water, surface water]: 1.8688e-13 kg
  Uncertainty for LCI results cannot be determined
- Chlorine [air, urban air close to ground]: 3.2312e-11 kg
  Uncertainty for LCI results cannot be determined
- Carbon dioxide, non-fossil [air, urban air close to ground]: 0.0030833 kg
  Uncertainty for LCI results cannot be determined
- Water [air, unspecified]: 0.0104963 m3; name water_to_air_unspecified; = (water_cooling_UNO_input*fraction_CW_to_air)+(water_river_input*fraction_PW_to_air)+(water_salt_ocean_input*fraction_PW_to_air)+(water_well_in_ground_input*fraction_PW_to_air); lognormal variance with pedigree 0.0807, pedigree (2,2,5,1,1)
  (same comment as for Water)
  property fraction, origin: unspecified 0.988145; name fraction_origin_unspecified
  property fraction, origin: fresh water 0.00757932; name fraction_origin_fresh_water
  property fraction, origin: salt water 0.00427564; name fraction_origin_salt_water
- Particulates, < 2.5 um [air, urban air close to ground]: 0.00010415 kg
  Uncertainty for LCI results cannot be determined
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
## Sampling procedure
literature values based on company survey

## Extrapolations
This dataset has been extrapolated from year 2001 to the year of the calculation (2021). The uncertainty has been adjusted accordingly.

## Review by Jürgen Sutter 2010-04-06
passed.
