# port facilities construction

Dataset: EcoSpold 2, unit process
Geography: RoW
Time period: 1990-01-01 to 2021-12-31
Technology level: current
Classification: EcoSpold01Categories: transport systems/ship
Classification: ISIC rev.4 ecoinvent: 4290:Construction of other civil engineering projects
Scenario: Business-as-Usual
System model: Allocation, cut-off by classification
Generated by: Michael Spielmann (obsolete)
Published in: Spielmann M. 2007
Database: ecoinvent
isCopyrightProtected: true
accessRestrictedTo: 1

## General comment
Based on 'port facilities construction, RER 1992'. All data represents the construction, the maintenance, the land use and the disposal of one port for both, sea and inland shipping. The material composition of the sealed industrial area is derived from the construction and disposal expenditures of a Swiss highway. The built up are is modelled as a steel building. Life time of port is assumed to be 100 yrs. For the maintenance and land use data, the land use is further distingished in built up area (0.6%), road area (sealed area) (45.6%) and water bodies (54.29%). Emission to waters include emission from production sites on the port site, which are not directly connected to the the transport activities.

## Included activities start
Port facilities construction is starting with material for the construction. Port maintenance and land use is starting with the energy consumption.

## Included activities end
This inventory comprises the construction, maintenance and disposal of the world biggest port in Rotterdam. The inventory calls processes of material production, representing the material used in the construction phase of the port. Also building activities, and electricty consumption are accounted for (construction and disposal). Emission of NMVOC are included. Also lorry transport of materials to the constructions site has been taken into account. Expenditures due to construction and disposal are addressed. For the maintenance and land use, the inventory includes emissions of to water due to non removed oil spills. Land occupation and transformation are taken into account. Energy consumption at the port is based on assumptions for the specifice electricty consumption at the port in Hamburg.

## Geography
Extrapolated from 'port facilities construction, RER 1992'. Data refers to one port in Europe.

## Time period
Land use data represents conditions in 2002.

## Reference product
- port facilities: 1 unit; CPC 53232: Harbours, waterways and related facilities; By-product classification allocatable product
  production volume 2.67763 unit
    This is a placeholder value that does not reflect real-world production volumes. This dataset does not currently require a real-world production volume to work in the database framework, and no actual data were collected yet. This has no negative effect on the results of the ecoinvent database.
  property price 2.27476e10 EUR2005
    Calculated based on inputs: The price of the product has been calculated as a sum of the values of the material and energy inputs for this product. This value is therefore a rough estimation. It may underestimate the real price since there are additional expenses when producing any product. These expences can include for example labour costs, treatment of waste materials and profit for the producer. Please consider carefully whether this level of data quality is acceptable for your application.

## Inputs from technosphere
- gravel, crushed: 0 kg; pedigree (1,1,1,1,1)
  Literature value. Material composition and demand of the sealed industrial area is derived from the construction and disposal expenditures of a Swiss highway.
  properties: dry mass 1 kg, wet mass 1 kg
- pitch: 0 kg; pedigree (1,1,1,1,1)
  (same comment as for gravel, crushed)
  properties: wet mass 1 kg, dry mass 1 kg, heating value, net 28 MJ, carbon content, fossil 0.83
- electricity, medium voltage: 0 kWh; pedigree (1,1,1,1,1)
  4.53E+07 kWH electricity is used during the port facilities construction. Estimation. The value represents construction activities and is a rough estimate.
  2.27E+11 kWh electricity is used during the maintenance and land use of the port. Calculated value. Energy consumption at the port is based on assumptions for the specific electricity consumption at the port in Hamburg.
  Uncertainty: P
- concrete, medium strength: 0 m3; pedigree (1,1,1,1,1)
  (same comment as for gravel, crushed)
  properties: wet mass 2380 kg, dry mass 2190 kg, water content 0.086758
- reinforcing steel: 16700 kg; lognormal variance with pedigree 0.342, pedigree (1,1,5,5,1)
  (same comment as for gravel, crushed)
  properties: carbon content, fossil 0.004, wet mass 1 kg, dry mass 1 kg
- steel, low-alloyed, hot rolled: 1.65e6 kg; lognormal variance with pedigree 0.342, pedigree (1,1,5,5,1)
  (same comment as for gravel, crushed)
  properties: dry mass 1 kg, carbon content, fossil 0.005, wet mass 1 kg
  note on carbon content, fossil: Low alloyed steel composition given in Tab. 3.2 ecoinvent v2.2 report 10_partII. Steel assumed to have a C content of 0.5%
- building, hall, steel construction: 41500 m2; lognormal variance with pedigree 0.342, pedigree (1,1,5,5,1)
  Estimation. The value is a rough estimate.
- diesel, burned in building machine: 3.8e6 MJ; lognormal variance with pedigree 0.342, pedigree (1,1,5,5,1)
  Estimation. The value represents construction activities and is a rough estimate.
  properties: heating value, net 1 MJ
- inert waste, for final disposal: -1.11e9 kg; source Maibach M. 1999; lognormal variance with pedigree 0.342, pedigree (1,1,5,5,1)
  Estimation. The figures for disposal are derived from Maibach et al. (1999) and are rough estimates.
  production volume 3.33e9 kg
    Calculated from the production volume of port facilities in proportion to the respective output amounts.
  properties: wet mass 1 kg, dry mass 0.995 kg, water content 0.00502513
- excavation, skid-steer loader: 3.7e6 m3; source Maibach M. 1999; lognormal variance with pedigree 0.342, pedigree (1,1,5,5,1)
  Estimation. The figures for disposal are derived from Maibach et al. (1999) and are rough estimates
- gravel, crushed: 3.34316e7, 3.06066e6, 1.53049e8, 5.87459e8 kg (4 entries); lognormal variance with pedigree 0.342, pedigree (1,1,5,5,1)
  (same comment as for gravel, crushed)
- pitch: 1.37846e6, 78560.8, 3.55565e6, 159379, 227528, 2.01004e7 kg (6 entries); lognormal variance with pedigree 0.342, pedigree (1,1,5,5,1)
  (same comment as for gravel, crushed)
- electricity, medium voltage: 2.86195e9, 5.48799e8, 9.21319e9, 1.33998e11, 1.8887e10, 6.15368e10 kWh (6 entries); lognormal variance with pedigree 0.162, pedigree (1,1,5,5,1)
  (same comment as for electricity, medium voltage)
- concrete, medium strength: 6783.77, 2482.42, 9622.3, 7071.92, 1939.58 m3 (5 entries); lognormal variance with pedigree 0.342, pedigree (1,1,5,5,1)
  (same comment as for gravel, crushed)

## Inputs from nature
All rows: lognormal variance with pedigree 0.082, pedigree (1,1,5,5,1)
- Transformation, to traffic area, road network [natural resource, land]: 1.22e7 m2
  Estimation based on land occupation and an assumed life span of the port of 100 years. Maintenance and land use
- Occupation, industrial area [natural resource, land]: 1.22415e9 m2*year
  Calculated value. The data is derived from Port of Rotterdam (2002) and oral communication. Maintenance and land use
- Transformation, to industrial area [natural resource, land]: 1.22415e7 m2
  (same comment as for Transformation, to traffic area, road network)
- Transformation, to lake, artificial [natural resource, land]: 3.5e7 m2
  (same comment as for Transformation, to traffic area, road network)
- Occupation, traffic area, road network [natural resource, land]: 1.22e9 m2*year
  (same comment as for Occupation, industrial area)
- Occupation, lake, artificial [natural resource, land]: 3.5e9 m2*year
  (same comment as for Occupation, industrial area)
- Transformation, from unspecified [natural resource, land]: 5.95e7 m2
  (same comment as for Transformation, to traffic area, road network)

## Emissions to nature
- TOC, Total Organic Carbon [water, ocean]: 8.66e6 kg; lognormal variance with pedigree 0.162, pedigree (1,1,5,5,1)
  Calculated value, according to quality guidelines, derived from emissions of oil. Maintenance and land use
- DOC, Dissolved Organic Carbon [water, ocean]: 8.66e6 kg; lognormal variance with pedigree 0.162, pedigree (1,1,5,5,1)
  (same comment as for TOC, Total Organic Carbon)
- COD, Chemical Oxygen Demand [water, ocean]: 3.15e7 kg; lognormal variance with pedigree 0.162, pedigree (1,1,5,5,1)
  (same comment as for TOC, Total Organic Carbon)
- BOD5, Biological Oxygen Demand [water, ocean]: 3.15e7 kg; lognormal variance with pedigree 0.162, pedigree (1,1,5,5,1)
  Calculate value, according to quality guidelines, derived from emissions of oil. Maintenance and land use
- Oils, unspecified [water, unspecified]: 1e7 kg; lognormal variance with pedigree 1.312, pedigree (1,1,5,5,1)
  Oral communication. The data represents the geometirc mean of oil spills between 1994 - 1998 in Port of Rotterdam. Maintenance and land use
  property water content 0; name water_content
  property dry mass 1 kg; name DM
  property wet mass 1 kg; name WM
  property carbon content, fossil 0.375; name C_content_fossil
  property water in wet mass 0 kg; name WWM
  property carbon content, non-fossil 0.375; name C_content_non_fossil
- NMVOC, non-methane volatile organic compounds, unspecified origin [air, non-urban air or from high stacks]: 25500 kg; lognormal variance with pedigree 0.342, pedigree (1,1,5,5,1)
  Estimation. The value represents construction activities and is a rough estimate.

## Sampling procedure
literature studies and own assumptions

## Extrapolations
none This dataset has been copied from an original dataset covering the geography RER. The uncertainty has been adjusted accordingly.

## Review by Carl Vadenbo 2012-06-29
In preparation for the release of ecoinvent v3.0, the datasets 'port facilities RER' and 'operation, maintenance, port RER' in ecoinvent v2.2 were merged and extrapolated into the dataset 'port facilities construction, GLO 1990-1992'. The amounts of the exchanges were reviewed and were found to correspond to the disaggregated datasets. The uncertainty information has only been adjusted for geographical representativeness in GLO, and consequently needs to be revised before subsequent releases of the database. Despite this shortcoming, the new dataset was accepted for inclusion into the ecoinvent database on 2012.07.04.

## Review by Niels Jungbluth 2003-08-20
passed.
