# treatment of waste emulsion paint, hazardous waste incineration, with energy recovery

Dataset: EcoSpold 2, unit process
Geography: Europe without Switzerland
Time period: 1997-01-01 to 2021-12-31
Technology level: current
Classification: ISIC rev.4 ecoinvent: 3822:Treatment and disposal of hazardous waste
Tags: Treatment
Scenario: Business-as-Usual
System model: Allocation, cut-off by classification
Share of production covered: 39 %
Generated by: [System]
Database: ecoinvent
isCopyrightProtected: true
accessRestrictedTo: 1

## General comment
Inventoried waste contains 100% Emulsion paint (remains); . waste composition (wet, in ppm): upper heating value 11.14 MJ/kg; lower heating value 10.51 MJ/kg; H2O n.a.; O 214760; H 31708; C 268330; S n.a.; N n.a.; P n.a.; B n.a.; Cl 86465; Br n.a.; F n.a.; I n.a.; Ag n.a.; As 0.44122; Ba n.a.; Cd 0.016849; Co n.a.; Cr 1.248; Cu n.a.; Hg 0.0085442; Mn n.a.; Mo n.a.; Ni 0.95527; Pb 0.64946; Sb n.a.; Se n.a.; Sn n.a.; V n.a.; Zn 6.5444; Be n.a.; Sc n.a.; Sr n.a.; Ti 135000; Tl n.a.; W n.a.; Si 149810; Fe n.a.; Ca 113920; Al n.a.; K n.a.; Mg n.a.; Na n.a.; Share of carbon in waste that is biogenic 0%. Net energy produced in HWI: 17.11MJ/kg thermal energy and 1.27MJ/kg electric energy. Allocation of energy production: no substitution or expansion. 100% of burden allocated to waste disposal function of HWI. One kg of this waste produces 0.707 kg of residues, which are landfilled. Additional solidification with 0.2828 kg of cement.

## Included activities end
waste-specific air and water emissions from incineration, auxiliary material consumption for flue gas cleaning. Short-term emissions to river water and long-term emissions to ground water from residual material landfill (from solidified fly ashes and scrubber slugde). Process energy demands for HWI.

## Technology
Swiss HWI plant in 2000 with wet flue gas scrubber and low-dust SCR DeNOx facility. Gross thermal efficiency 74.4% and gross electric efficiency 10%.

## Time period
Transfer coefficients for modern Swiss MSWI. Emission speciation based on early 90ies data.

## Reference product
- waste emulsion paint: -1 kg; name RP; By-product classification Waste; CPC 39: Wastes or scraps
  production volume 9.51027e7 kg; name PV_RP; = 5370000000*0.35*0.22*0.23
    Estimated value. Eu paint market is of 5.37E+09kg (EUROPEAN COMMISSION 2002) of which 55% is paint and 35% is emulsion paint (http://www.psgdover.com/en/mouvex-paint-coatings-market-overview/what-are-paint-a-coatings/defining-paintaccessed, accessed 20151009). 22% is considered hazardous waste and 78% non hazardous waste (http://archive.epa.gov/sectors/web/pdf/paint_quantity_report.pdf, accessed 20151009). In the EU (Eurostat municipal waste treatment), of hazardous waste 23% is sent to hazardous incineration. Of non hazardous waste 23% is sent to incineration. 37% is considered to be sent to landfilling and it is split between sanitary and inert landfill using the same shares assumed for the US (see relevant dataset: “23% is sent to inert material landfill (http://archive.epa.gov/sectors/web/pdf/paint_quantity_report.pdf, accessed 20151009). The rest (65%) is considered to go to sanitary landfill.”) EUROPEAN COMMISSION (2002) STUDY ON HAZARDOUS HOUSEHOLD WASTE (HHW) WITH A MAIN EMPHASIS ON HAZARDOUS HOUSEHOLD CHEMICALS (HHC). Retrieved from: <http://ec.europa.eu/environment/waste/studies/pdf/household_report.pdf>, accessed 11th July 2016 Eurostat. Sustainable Development Indicator (SDI) on municipal waste Retrieved from: <http://ec.europa.eu/eurostat/web/waste/transboundary-waste-shipments/key-waste-streams/municipal-waste>, accessed 11th July 2016
  property heating value, net 8.18 MJ
    LHV is calculated based on the Carbon content of the product. More details can be found on the respective documentation.
  property price 0 EUR2005; name RP_price_EUR2005
    Waste products are assigned a price of zero as they are assumed to require further treatment.
  property carbon content, fossil 0.27
    Tab A.4, ecoinvent v2.2 report 13_I. C content has been calculated after data in the tables, and then referred to 1 kg DM
  property carbon content 0.27
    carbon content on a dry matter basis (reserved; not for manual entry)
  properties: carbon content, non-fossil 0, wet mass 1 kg, dry mass 1 kg, water content 0, water in wet mass 0 kg, carbon allocation 0.27 kg

## By-products
- heat, for reuse in municipal waste incineration only: 0 MJ; name BP2; By-product classification allocatable product; CPC 17300: Steam and hot water; pedigree (1,1,1,1,1)
  production volume 1.62721e9 MJ; = BP2*PV_RP/ABS(RP)
    Calculated based on the production volume of the reference product.
  property price 0.0106 EUR2005; name BP2_price_EUR2005
    Average European district heat price from Ecoheatcool and Euroheat 2005-2006, Ecoheat Work package 1: The European heat market. Final report. 10.6 EUR/GJ i s the price of district heat. http://www.solarthermalworld.org/files/Ecoheatcool%20WP1%20Web.pdf?download
- electricity, for reuse in municipal waste incineration only: 0 kWh; name BP3; CPC 17100: Electrical energy; By-product classification allocatable product; pedigree (1,1,1,1,1)
  production volume 3.35501e7 kWh; = BP3*PV_RP/ABS(RP)
    Calculated based on the production volume of the reference product.
  property price 0.1 EUR2005; name BP3_price_EUR2005
    Estimated to be the same price as in case of electricity, medium voltage.

## Inputs from technosphere
- iron (III) chloride, without water, in 40% solution state: 0.078188 kg; lognormal variance with pedigree 0.192, pedigree (1,1,5,5,1)
  uncertainty calculated from uncertainty in average auxiliary material input, and the unertainty of the waste composition of this waste
  properties: dry mass 1 kg, wet mass 1 kg
- residual material landfill: 1.4729e-9 unit; lognormal variance with pedigree 0.062, pedigree (1,1,5,5,1)
  uncertainty is calculated from uncertainties in waste composition and transfer coefficients in incinerator
- sodium hydroxide, without water, in 50% solution state: 0.091853 kg; lognormal variance with pedigree 0.232, pedigree (1,1,5,5,1)
  (same comment as for iron (III) chloride, without water, in 40% solution state)
  properties: wet mass 1 kg, dry mass 1 kg, heating value, net 3.03 MJ
- quicklime, milled, packed: 0.0072212 kg; lognormal variance with pedigree 0.232, pedigree (1,1,5,5,1)
  (same comment as for iron (III) chloride, without water, in 40% solution state)
  properties: dry mass 0.99 kg, wet mass 1 kg, water content 0.010101
- process-specific burdens, hazardous waste incineration plant: 1 kg; lognormal variance with pedigree 0.042, pedigree (1,1,5,5,1)
  demands per kilogram waste. uncertainty is heeded in the module
- cement, unspecified: 0.2828 kg; lognormal variance with pedigree 0.072, pedigree (1,1,5,5,1)
  Cement for solidification of landfilled residual material. Uncertainty calculated from unertainty of the waste composition of this waste, of transfer coefficients in the incinerator and of the solidification recipe.
  properties: wet mass 1 kg, dry mass 1 kg
- process-specific burdens, residual material landfill: 0.70699 kg; lognormal variance with pedigree 0.062, pedigree (1,1,5,5,1)
  uncertainty is calculated from uncertainties in waste composition and transfer coefficients in incinerator;activityLink introduced to establish a direct link to the corresponding regional supply of this product
- hydrochloric acid, without water, in 30% solution state: 0.00096247 kg; lognormal variance with pedigree 0.122, pedigree (1,1,5,5,1)
  (same comment as for iron (III) chloride, without water, in 40% solution state)
  properties: heating value, net 3.32 MJ, dry mass 1 kg, wet mass 1 kg
- heat, central or small-scale, other than natural gas: 11.7406 MJ; lognormal variance with pedigree 0.162, pedigree (1,1,5,5,1)
  Uncertainty dependent on total energy required and heating value present, using experimental GSd for substraction from uc=A*GSDa^2-B
  properties: heating value, net 1 MJ
- chemical, inorganic: 0.0016041 kg; lognormal variance with pedigree 0.122, pedigree (1,1,5,5,1)
  Proxy for Polyelectrolyte. uncertainty calculated from uncertainty in average auxiliary material input, and the unertainty of the waste composition of this waste
  properties: dry mass 1 kg, wet mass 1 kg, carbon content, fossil 0.003
  note on carbon content, fossil: This dataset is an unweighted average of 20 inorganic substances (listed in Tab 88.1, ecoinvent v2.2 report 8, part II), being part of the top100 chemicals included in this database. The C-content has also been calculated as an unweighted average of the C content of the substances composing this dataset.
- hazardous waste incineration facility: 1.25e-9 unit; lognormal variance with pedigree 0.042, pedigree (1,1,5,5,1)
  demands per kilogram waste. uncertainty is heeded in the module
- chemical, organic: 1.3709e-7 kg; lognormal variance with pedigree 1.662, pedigree (1,1,5,5,1)
  Proxy for TMT15. uncertainty calculated from uncertainty in average auxiliary material input, and the unertainty of the waste composition of this waste
  properties: heating value, net 19.03 MJ, dry mass 1 kg, carbon content, fossil 0.628, wet mass 1 kg
  note on carbon content, fossil: This dataset is an unweighted average of 20 organic substances (listed in Tab 88.1, ecoinvent v2.2 report 8, part II), being part of the top100 chemicals included in this database. The C-content has also been calculated as an unweighted average of the C content of the substances composing this dataset.
- waste cement, hydrated: -0.70699 kg; name BP1; lognormal variance with pedigree 0.072, pedigree (1,1,5,5,1)
  Hydrated cement for solidification of landfilled residual material. Uncertainty calculated from unertainty of the waste composition of this waste and transfer coefficients in the incinerator and of the solidification recipe.
  production volume 6.72367e7 kg; = BP1*PV_RP/ABS(RP)
    Calculated from the production volume of waste emulsion paint, 0% water in proportion to the respective output amounts.
  property price 0 EUR2005; name BP1_price_EUR2005
  properties: wet mass 1 kg, dry mass 1 kg

## Emissions to nature
- Chromium [air, urban air close to ground]: 9.2276e-14 kg; lognormal variance with pedigree 1.682, pedigree (1,1,5,5,1)
  (same comment as for residual material landfill)
- Chromium VI [water, surface water]: 7.8757e-8 kg; lognormal variance with pedigree 1.672, pedigree (1,1,5,5,1)
  uncertainty is calculated from uncertainties in waste composition and transfer coefficients in incinerator and landfills
- Lead [air, urban air close to ground]: 2.4107e-11 kg; lognormal variance with pedigree 1.712, pedigree (1,1,5,5,1)
  (same comment as for residual material landfill)
- Silicon [water, ground-, long-term]: 0.14912 kg; lognormal variance with pedigree 0.132, pedigree (1,1,5,5,1)
  Long-term emissions from landfilling of incineration residues. uncertainty is calculated from uncertainties in waste composition and transfer coefficients in incinerator and landfills.
- Titanium [air, urban air close to ground]: 0.000135 kg; lognormal variance with pedigree 0.152, pedigree (1,1,5,5,1)
  (same comment as for residual material landfill)
- Cadmium, ion [water, surface water]: 7.6138e-12 kg; lognormal variance with pedigree 1.912, pedigree (1,1,5,5,1)
  (same comment as for Chromium VI)
- Silicon [water, surface water]: 0.00033612 kg; lognormal variance with pedigree 0.682, pedigree (1,1,5,5,1)
  (same comment as for Chromium VI)
- Silicon [air, urban air close to ground]: 0.00034876 kg; lognormal variance with pedigree 0.142, pedigree (1,1,5,5,1)
  (same comment as for residual material landfill)
- Arsenic [air, urban air close to ground]: 4.5005e-15 kg; lognormal variance with pedigree 1.832, pedigree (1,1,5,5,1)
  (same comment as for residual material landfill)
- BOD5, Biological Oxygen Demand [water, ground-, long-term]: 0.0043595 kg; lognormal variance with pedigree 0.142, pedigree (1,1,5,5,1)
  (same comment as for Silicon)
- Arsenic, ion [water, ground-, long-term]: 0 kg; pedigree (1,1,1,1,1)
  (same comment as for Silicon)
- Carbon monoxide, fossil [air, urban air close to ground]: 1.2076e-5 kg; lognormal variance with pedigree 0.712, pedigree (1,4,5,5,3)
  1 plant for waste solvent incineration in Switzerland
- COD, Chemical Oxygen Demand [water, ground-, long-term]: 0.0043595 kg; lognormal variance with pedigree 0.142, pedigree (1,1,5,5,1)
  (same comment as for Silicon)
- DOC, Dissolved Organic Carbon [water, ground-, long-term]: 0.0019073 kg; lognormal variance with pedigree 0.142, pedigree (1,1,5,5,1)
  (same comment as for Silicon)
- Nickel [air, urban air close to ground]: 6.6869e-10 kg; lognormal variance with pedigree 1.642, pedigree (1,1,5,5,1)
  (same comment as for residual material landfill)
- Chloride [water, surface water]: 0.086334 kg; lognormal variance with pedigree 0.172, pedigree (1,1,5,5,1)
  (same comment as for Chromium VI)
- Hydrogen chloride [air, urban air close to ground]: 2.6671e-5 kg; lognormal variance with pedigree 0.202, pedigree (1,1,5,5,1)
  (same comment as for residual material landfill)
- Cadmium, ion [water, ground-, long-term]: 1.1433e-10 kg; lognormal variance with pedigree 8.192, pedigree (1,1,5,5,1)
  (same comment as for Silicon)
- Mercury [water, surface water]: 9.0089e-11 kg; lognormal variance with pedigree 1.952, pedigree (1,1,5,5,1)
  (same comment as for Chromium VI)
- Calcium, ion [water, ground-, long-term]: 0.010277 kg; lognormal variance with pedigree 1.602, pedigree (1,1,5,5,1)
  (same comment as for Silicon)
- BOD5, Biological Oxygen Demand [water, surface water]: 1.3483e-5 kg; lognormal variance with pedigree 0.372, pedigree (1,1,5,5,1)
  (same comment as for Chromium VI)
- Cadmium [air, urban air close to ground]: 9.2786e-13 kg; lognormal variance with pedigree 2.002, pedigree (1,1,5,5,1)
  (same comment as for residual material landfill)
- Mercury [air, urban air close to ground]: 0 kg; pedigree (1,1,1,1,1)
  (same comment as for residual material landfill)
- Chromium VI [water, ground-, long-term]: 2.3622e-7 kg; lognormal variance with pedigree 1.592, pedigree (1,1,5,5,1)
  (same comment as for Silicon)
- Carbon dioxide, fossil [air, urban air close to ground]: 0.97301 kg; lognormal variance with pedigree 0.092, pedigree (1,1,5,5,1)
  calculated from uncertainty in carbon in waste and transfer coefficients
- COD, Chemical Oxygen Demand [water, surface water]: 1.3483e-5 kg; lognormal variance with pedigree 0.372, pedigree (1,1,5,5,1)
  (same comment as for Chromium VI)
- Mercury [water, ground-, long-term]: 3.9908e-10 kg; lognormal variance with pedigree 4.292, pedigree (1,1,5,5,1)
  (same comment as for Silicon)
- Titanium, ion [water, surface water]: 6.6836e-5 kg; lognormal variance with pedigree 0.882, pedigree (1,1,5,5,1)
  (same comment as for Chromium VI)
- Lead [water, ground-, long-term]: 3.3686e-9 kg; lognormal variance with pedigree 8.592, pedigree (1,1,5,5,1)
  (same comment as for Silicon)
- Titanium, ion [water, ground-, long-term]: 0.040035 kg; lognormal variance with pedigree 0.502, pedigree (1,1,5,5,1)
  (same comment as for Silicon)
- TOC, Total Organic Carbon [water, surface water]: 5.8987e-6 kg; lognormal variance with pedigree 0.372, pedigree (1,1,5,5,1)
  (same comment as for Chromium VI)
- Lead [water, surface water]: 1.7677e-11 kg; lognormal variance with pedigree 1.822, pedigree (1,1,5,5,1)
  (same comment as for Chromium VI)
- Calcium, ion [water, surface water]: 1.7156e-5 kg; lognormal variance with pedigree 1.052, pedigree (1,1,5,5,1)
  (same comment as for Chromium VI)
- Chloride [water, ground-, long-term]: 0.00010495 kg; lognormal variance with pedigree 0.202, pedigree (1,1,5,5,1)
  (same comment as for Silicon)
- TOC, Total Organic Carbon [water, ground-, long-term]: 0.0019073 kg; lognormal variance with pedigree 0.142, pedigree (1,1,5,5,1)
  (same comment as for Silicon)
- DOC, Dissolved Organic Carbon [water, surface water]: 5.8987e-6 kg; lognormal variance with pedigree 0.372, pedigree (1,1,5,5,1)
  (same comment as for Chromium VI)
- Calcium [air, urban air close to ground]: 0.00018991 kg; lognormal variance with pedigree 0.172, pedigree (1,1,5,5,1)
  (same comment as for residual material landfill)
- Nickel, ion [water, ground-, long-term]: 2.7488e-7 kg; lognormal variance with pedigree 1.872, pedigree (1,1,5,5,1)
  (same comment as for Silicon)
- Zinc, ion [water, surface water]: 8.7827e-8 kg; lognormal variance with pedigree 1.372, pedigree (1,1,5,5,1)
  (same comment as for Chromium VI)
- Arsenic, ion [water, surface water]: 4.4122e-7 kg; lognormal variance with pedigree 1.722, pedigree (1,1,5,5,1)
  (same comment as for Chromium VI)
- Zinc [air, urban air close to ground]: 4.5811e-9 kg; lognormal variance with pedigree 1.392, pedigree (1,1,5,5,1)
  (same comment as for residual material landfill)
- Nickel, ion [water, surface water]: 1.9581e-7 kg; lognormal variance with pedigree 1.612, pedigree (1,1,5,5,1)
  (same comment as for Chromium VI)
- Zinc, ion [water, ground-, long-term]: 7.9077e-8 kg; lognormal variance with pedigree 6.212, pedigree (1,1,5,5,1)
  (same comment as for Silicon)

## Sampling procedure
The 2 Swiss HWI plants, used as the inventory reference technology mix, have a total annual capacity of 53'000 tons of hazardous waste. This corresponds to 39% of the Swiss total installed capacity in 2000. Swiss average plants size is 20'000 t/a.

## Extrapolations
This dataset has been extrapolated from year 2000 to the year of the calculation (2021). The uncertainty has been adjusted accordingly.
