# radish production, in heated greenhouse

Dataset: EcoSpold 2, unit process
Geography: GLO
Time period: 2010-01-01 to 2021-12-31
Technology level: current
Classification: ISIC rev.4 ecoinvent: 0113:Growing of vegetables and melons, roots and tubers
Scenario: Business-as-Usual
System model: Allocation, cut-off by classification
Generated by: Franziska Stössel
Published in: Stoessel, Franziska; 2012
Database: ecoinvent
isCopyrightProtected: false
accessRestrictedTo: 1

## General comment
This dataset represents radish production according to the Integrated Production standard in CH.

Yield: 40 t / ha.
Duration of one cropping cycle: 1.4 months.
Field production.
The LCA study, from which this LCI has been derived, contains detailed descriptions of the system boundaries and the data sources used (Stoessel et al. 2012). The publication is published and freely available with comprehensive supporting information:
http://pubs.acs.org/doi/pdf/10.1021/es2030577
Franziska Stoessel, Ronnie Juraske, Stephan Pfister, Stefanie Hellweg. (2012) Life Cycle Inventory and Carbon and Water FoodPrint of Fruits and Vegetables: Application to a Swiss Retailer. Environmental Science & Technology 6(46) 3253−3262.
This activity was adapted to include the global average land use change (LUC) emissions according 2nd edition of the Quantis-modified tool developed by Blonk Consultants 'WFLDB-adapted-Blonk 2014 direct-land-use-change-assessment-tool_2015-05-18a.xlsx', tab. 'Country & land use unknown'. The size of the emission depends on (i) the relative crop expansion in all countries of the crop during the last 20 years and (ii) the corresponding, country specific land transformations. The current results are based on the average FAOSTAT data (harvested area) of 2009-2011 and 1989-1991. The weighted average is used which takes into account relative difference in crop expansion into primary forest, secondary forest, grassland, perennial and annual land.

## Included activities start
From sowing.

## Included activities end
This activity ends with harvest and storage.
The dataset includes a storage period of 0.3 month and it's use of electricity. It also includes the electricity use in the greenhouse. And an average amount of heating energy for the production is included.
The pesticide inputs are classified according to their chemical classes and the emmssions are assigned to the soil (100%). Mercury emissions are neglected due to a lack of data while other heavy metal emissions are included. The dataset doesn't include infrastructure for production and storage facilities. No transports for agricultural means of production from the regional storage to the farm are included.

## Technology
Integrated Production

## Parameters
- fraction, process water, to air: 0.15 dimensionless; name fraction_PW_to_air; lognormal variance with pedigree 0.092025, pedigree (4,4,3,2,4)
  Literature value. In case when no industry/process specific data are available, default evaporation fraction value is used. This value is 15% and is based on literature (Statistics Canada, 2007 & Shaffer, K.H., 2008, Consumptive water use in the Great Lakes Basin, USGS & Shiklomanov, 2003, World Water Resources at the Beginning of the 21st Century) and has been approved by an expert.
- fraction, tap water, to air: 0.15 dimensionless; name fraction_TW_to_air; = fraction_PW_to_air; lognormal variance with pedigree 0.092025, pedigree (4,4,3,2,4)
  Calculated value. See comment in the other parametres present in this dataset. Tap water is considered to be always used as process water, thus process water fractions to air are applied to all tap water input flows to calculate the amount of water consumed in the processes.
- fraction, irrigation water, to air: 0.586986 dimensionless; name fraction_IW_to_air; lognormal variance with pedigree 0.0409, pedigree (2,2,2,1,1)
  Literature value (Siebert, 2010) (Vionnet, S., Quantis Water Database - Technical Report, 2012).
- fraction, irrigation water, to ground water: 0.8 dimensionless; name fraction_IW_to_ground_water; lognormal variance with pedigree 0.0886, pedigree (4,3,1,1,4)
  Literature value (Döll, 2011) cross referenced with expert opinion.
- fraction, irrigation water to surface water: 0.2 dimensionless; name fraction_IW_to_surface_water; lognormal variance with pedigree 0.0886, pedigree (4,3,1,1,4)
  Literature value (Döll, 2011) cross referenced with expert opinion.

## Reference product
- radish: 1 kg; source Stoessel, Franziska; 2012; CPC 0125: Root, bulb or tuberous vegetables; By-product classification allocatable product
  production volume 2.40115e11 kg
    in kg / year (2010) Including inter alia: bamboo shoots (Bambusa spp.); beets, chards (Beta vulgaris); capers
    (Capparis spinosa); cardoons (Cynara cardunculus); celery (Apium graveolens); chervil
    (Anthriscus cerefolium); cress (Lepidium sativum); fennel (Foeniculum vulgare); horseradish
    (Cochlearia armoracia); marjoram, sweet (Majorana hortensis); oyster plant (Tragopogon
    porrifolius); parsley (Petroselinum crispum); parsnips (Pastinaca sativa); radish (Raphanus
    sativus); rhubarb (Rheum spp.); rutabagas, swedes (Brassica napus); savory (Satureja
    hortensis); scorzonera (Scorzonera hispanica); sorrel (Rumex acetosa); soybean sprouts
    tarragon (Artemisia dracunculus); watercress (Nasturtium officinale). Other vegetables that are
    not identified separately because of their minor relevance at the international level. Because of
    their limited local importance, some countries report vegetables under this heading that are
    classified individually by FAO.
  property price 0.603 EUR2005
    Calculated from the trade statistics for the year 2005 published by the UN (COMTRADE database, accessed 20151105) as an average of 5 biggest importers of radish in the world; DE, UK, JP, USA and KR. Comtrade cathegory: 70690: Beetroot, salsify, celeriac, radishes etc. fresh, chilled.
  property carbon content 0.0259
    carbon content on a dry matter basis (reserved; not for manual entry)
  properties: wet mass 1 kg, water in wet mass 0.937 kg, carbon content, non-fossil 0.0259, carbon content, fossil 0, water content 14.873, dry mass 0.063 kg, carbon allocation 0.0016317 kg

## Inputs from technosphere
- heat, central or small-scale, natural gas: 0.00846 MJ; source Stoessel, Franziska; 2012; lognormal variance with pedigree 0.0105, pedigree (2,3,4,3,2)
  Uncertainty: Variance of logtransformed data = Default value of table 10.3 in Data Quality Guidelines
  properties: heating value, net 1 MJ
- electricity, low voltage: 0.337981 kWh; source Stoessel, Franziska; 2012; lognormal variance with pedigree 0.0105, pedigree (2,3,4,3,2)
  (same comment as for heat, central or small-scale, natural gas)
- tap water: 0.4 kg; name tap_water_input; source Stoessel, Franziska; 2012; lognormal variance with pedigree 0.0105, pedigree (2,3,4,3,2)
  (same comment as for heat, central or small-scale, natural gas)
  properties: wet mass 1 kg, dry mass 0.000337476 kg, carbon content, fossil 0.00178991, water content 2962.17
  note on carbon content, fossil: Bicarbonate content is 2.93 mol/m3. CO2 content is 0.1 mol/m3 (ecoinvent v2.2 report 8, Tab 93.1).
- irrigation: 0.0146 m3; name water_irrigation_input; source Stoessel, Franziska; 2012; lognormal variance with pedigree 0.0198, pedigree (2,4,4,4,3)
  Switzerland
  Uncertainty: Variance of logtransformed data = Default value of table 10.3 in Data Quality Guidelines
  properties: water content 9089.91, dry mass 0.11 kg, wet mass 1000 kg
- potassium sulfate: 0 kg; source Stoessel, Franziska; 2012; pedigree (1,1,1,1,1)
  The exchange has been updated from 'potassium sulfate, as K2O' into 'potassium sulfate' and therefore its amount has been scaled (multiplied) from 0.002 kg by 1.85 kg of 'potassium sulfate' per kg of 'potassium sulfate, as K2O'.
  Uncertainty: Variance of logtransformed data = Default value of table 10.3 in Data Quality Guidelines
  properties: wet mass 1 kg, dry mass 1 kg
- packaging, for fertilisers: 0.007754 kg; lognormal variance with pedigree 0.0592, pedigree (4,3,4,5,4)
  Total amount of active substance/s of fertilisers needed for the production of 'radish' is calculated to be circa 3.88E-03 kg. Fertiliser/s used in this dataset is/are: 'ammonium nitrate, as N', 'phosphate fertiliser, as P2O5', 'potassium sulfate, as K2O'. The total amount of active substance/s is doubled in order to account for the packaging of the dilluted product of fertiliser/s that is/are applied. Therefore, 7.75E-03 kg of packaging for fertilisers is justified with this exchange.
  properties: dry mass 1 kg, wet mass 1 kg, heating value, net 25.01 MJ, price 0.0642 EUR2005, carbon content, fossil 0.825301
  note on carbon content, fossil: Considering a chemical formula (C2H4)n for polyethylene, carbon content-fossil is calculated to be 0.856286 kg of Carbon per kg of dry mass.
- inorganic phosphorus fertiliser, as P2O5: 0 kg; source Stoessel, Franziska; 2012; pedigree (1,1,1,1,1)
  (same comment as for heat, central or small-scale, natural gas)
  properties: wet mass 1 kg, dry mass 1 kg
- ammonium nitrate: 0 kg; source Stoessel, Franziska; 2012; pedigree (1,1,1,1,1)
  The exchange has been updated from 'ammonium nitrate, as N' into 'ammonium nitrate' and therefore its amount has been scaled (multiplied) from 0.0014 kg by 2.8573 kg of 'ammonium nitrate' per kg of 'ammonium nitrate, as N'.
  Uncertainty: Variance of logtransformed data = Default value of table 10.3 in Data Quality Guidelines
  properties: wet mass 1 kg, dry mass 1 kg
- fertilising, by broadcaster: 0.00165 ha; source Stoessel, Franziska; 2012; lognormal variance with pedigree 0.0105, pedigree (2,3,4,3,2)
  Fertilizing by broadcaster is used as a proxy for all the machinery work done in horticultural processes.
  Uncertainty: Variance of logtransformed data = Default value of table 10.3 in Data Quality Guidelines
- heat, central or small-scale, other than natural gas: 50.8025 MJ
  properties: heating value, net 1 MJ
- potassium sulfate: 0.000640569, 0.00304086 kg (2 entries); source Stoessel, Franziska; 2012; lognormal variance with pedigree 0.0105, pedigree (2,3,4,3,2)
  (same comment as for potassium sulfate)
- inorganic phosphorus fertiliser, as P2O5: 1.85523e-5, 1.88511e-6, 6.73264e-5, 9.40329e-7, 1.32425e-7, 3.64224e-6, 1.34651e-7, 2.17277e-6, 1.21353e-6, 4.45627e-6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 kg (30 entries); source Stoessel, Franziska; 2012; lognormal variance with pedigree 0.0105, pedigree (2,3,4,3,2)
  (same comment as for heat, central or small-scale, natural gas)
- ammonium nitrate: 0.00098402, 0.000682454, 0.000524539, 0.00178066 kg (4 entries); source Stoessel, Franziska; 2012; lognormal variance with pedigree 0.0105, pedigree (2,3,4,3,2)
  (same comment as for ammonium nitrate)

## Inputs from nature
- Occupation, annual crop, irrigated, intensive [natural resource, land]: 0.0292 m2*year; source Stoessel, Franziska; 2012; lognormal variance with pedigree 0.0119, pedigree (2,3,4,3,2)
  (same comment as for heat, central or small-scale, natural gas)
- Transformation, from annual crop, irrigated, intensive [natural resource, land]: 0.250286 m2; source Stoessel, Franziska; 2012; lognormal variance with pedigree 0.0119, pedigree (2,3,4,3,2)
  (same comment as for heat, central or small-scale, natural gas)
- Transformation, to annual crop, irrigated, intensive [natural resource, land]: 0.250286 m2; source Stoessel, Franziska; 2012; lognormal variance with pedigree 0.0119, pedigree (2,3,4,3,2)
  (same comment as for heat, central or small-scale, natural gas)
- Energy, gross calorific value, in biomass [natural resource, biotic]: 1.42065 MJ; lognormal variance with pedigree 0.0099, pedigree (2,3,4,3,1)
  Calculated value based on literature. The gross energy is calculated using following formula; gross energy (MJ) = crude protein (kg)*23.04 (MJ/kg)+crude fat (kg)*38.96 (MJ/kg)+crude fibre (kg)*17.95 (MJ/kg)+carbohydrates (kg)*17.17 (MJ/kg) (formula based on expert opinion, cross referenced; Diepenbrock, 2012, Energy Balance in Crop Production). The product composition of fruits and vegetables is extracted from the USDA National Nutrient Database for Standard Reference (http://ndb.nal.usda.gov/, accessed 20131114). Crude protein (g)= 6.8, crude fat (g)= 1, crude fibre (g)= 16, ash (g)= 5.5, water (g)= 952.7, carbohydrates (g)= 34. The gross energy per kg of DM is 16.93MJ. The calculated gross energy per kg of reference product is thus 1.42MJ.

## Emissions to nature
- Phosphorus [water, surface water]: 9.53e-7 kg
- Cadmium [soil, agricultural]: 2.05358e-8 kg; source Thomas Nemecek 2011; lognormal variance with pedigree 0.0847, pedigree (3,4,5,3,2)
  (same comment as for heat, central or small-scale, natural gas)
  property water in wet mass 0 kg; name WWM
  property carbon content, non-fossil 0; name C_content_non_fossil
  property wet mass 1 kg; name WM
  property carbon content, fossil 0; name C_content_fossil
  property water content 0; name water_content
  property dry mass 1 kg; name DM
- Phosphate [water, ground-]: 2.72e-7 kg; source Stoessel, Franziska; 2012; lognormal variance with pedigree 0.0847, pedigree (3,4,5,3,2)
  (same comment as for heat, central or small-scale, natural gas)
- Water [air, unspecified]: 0.00863 m3; name water_to_air_unspecified; = (tap_water_input/1000)*fraction_TW_to_air+water_irrigation_input*fraction_IW_to_air; lognormal variance with pedigree 0.0487, pedigree (2,2,4,1,1)
  Calculated value based on literature values and expert opinion. See comments in the parametres' comment field.
  property fraction, origin: salt water 0; name fraction_origin_salt_water
  property fraction, origin: fresh water 1; name fraction_origin_fresh_water
  property fraction, origin: unspecified 0; name fraction_origin_unspecified
- Dinitrogen monoxide [air, non-urban air or from high stacks]: 2.71944e-5 kg; source Thomas Nemecek 2011; lognormal variance with pedigree 0.0747, pedigree (3,4,5,3,2)
  (same comment as for heat, central or small-scale, natural gas)
- Lead [soil, agricultural]: 2.50227e-7 kg; source Thomas Nemecek 2011; lognormal variance with pedigree 0.0847, pedigree (3,4,5,3,2)
  (same comment as for heat, central or small-scale, natural gas)
- Water [water, surface water]: 0.001206 m3; name water_to_water_surface; = water_irrigation_input*(1-fraction_IW_to_air)*fraction_IW_to_surface_water; lognormal variance with pedigree 0.0966, pedigree (4,3,4,1,4)
  Calculated value. See the parameters and their comments to understand the calculation.
  property fraction, origin: salt water 0; name fraction_origin_salt_water_Wsw
  property fraction, origin: fresh water 1; name fraction_origin_fresh_water_Wsw
- Copper [soil, agricultural]: -3.31306e-7 kg; source Thomas Nemecek 2011
- Zinc [soil, agricultural]: -7.42378e-7 kg; source Thomas Nemecek 2011
- Ammonia [air, non-urban air or from high stacks]: 3.37571e-5 kg; source Thomas Nemecek 2011; lognormal variance with pedigree 0.0527, pedigree (3,4,5,3,2)
  (same comment as for heat, central or small-scale, natural gas)
- Chromium [soil, agricultural]: 6.8612e-8 kg; source Thomas Nemecek 2011; lognormal variance with pedigree 0.0847, pedigree (3,4,5,3,2)
  (same comment as for heat, central or small-scale, natural gas)
- Water [water, ground-]: 0.004824 m3; name water_to_water_ground; = water_irrigation_input*(1-fraction_IW_to_air)*fraction_IW_to_ground_water; lognormal variance with pedigree 0.0966, pedigree (4,3,4,1,4)
  Calculated value. See the parameters and their comments to understand the calculation.
  property fraction, origin: unspecified 0; name fraction_origin_unspecified_Wgw
  property fraction, origin: fresh water 1; name fraction_origin_fresh_water_Wgw
  property fraction, origin: salt water 0; name fraction_origin_salt_water_Wgw
- Nitrogen oxides [air, non-urban air or from high stacks]: 5.71081e-6 kg; source Thomas Nemecek 2011; lognormal variance with pedigree 0.0747, pedigree (3,4,5,3,2)
  (same comment as for heat, central or small-scale, natural gas)
- Nickel [soil, agricultural]: 3.2726e-8 kg; source Thomas Nemecek 2011; lognormal variance with pedigree 0.0847, pedigree (3,4,5,3,2)
  (same comment as for heat, central or small-scale, natural gas)
- Nitrate [water, ground-]: 0.00184671 kg; source Thomas Nemecek 2011; lognormal variance with pedigree 0.0847, pedigree (3,4,5,3,2)
  (same comment as for heat, central or small-scale, natural gas)

## Sampling procedure
The LCI is based on radish production cost tables from Switzerland which is well representative for an Integrated Production in Switzerland. Most probably it is representative for productions in industrialized countries or farms which produces similarly.
Please refer to Stoessel et al. (2012) for more information: http://pubs.acs.org/doi/pdf/10.1021/es2030577
Franziska Stoessel, Ronnie Juraske, Stephan Pfister, Stefanie Hellweg. (2012) Life Cycle Inventory and Carbon and Water FoodPrint of Fruits and Vegetables: Application to a Swiss Retailer. Environmental Science & Technology 6(46) 3253−3262.

## Extrapolations
This dataset has been extrapolated from year 2010 to the year of the calculation (2021). The uncertainty has been adjusted accordingly.

## Review by Bo Weidema 2011-12-31
Production volume too large. Infrastructure missing.
