# apricot production

Dataset: EcoSpold 2, unit process
Geography: RoW
Time period: 2002-01-01 to 2021-12-31
Technology level: current
Classification: ISIC rev.4 ecoinvent: 0124:Growing of pome fruits and stone fruits
Tags: WFLDB
Scenario: Business-as-Usual
System model: Allocation, cut-off by classification
Generated by: [System]
Database: ecoinvent
isCopyrightProtected: true
accessRestrictedTo: 1

## General comment
This dataset is a weighted average of the regional datasets, with weights based on production volume of the reference product. Detailed comments and sources about the exchanges can be found in the regional datasets.
The geographicalCorrelation score of every pedigree matrix of was changed to '5'.
Sum of regional production volumes: 1.172e+9 kg
TR: PV = 6.609e+8 kg; weight = 0.5639
IT: PV = 2.446e+8 kg; weight = 0.2087
FR: PV = 1.714e+8 kg; weight = 0.1463
ES: PV = 9.505e+7 kg; weight = 0.08111
Yield of the global dataset = 17809.7114205 kg/ha, calculated as a weighted average of the regional yields.
The comments below were part of the TR regional dataset.
This dataset represents the production of 1 kg of apricots. The average yield from 2002-2004 is 17 t/ha. The data are representative for apricots production in Turkey used for the export market. Mineral NPK fertiliser input is 70-45-105 kg/ha. Organic fertilisers applied amount to 1.49 m3/ha of liquid manure and 0.74 t/ha of solid manure. Total active ingredients (a.i.) applied as pesticides amount to 31.7 kg a.i./ha.
The dataset was modelled within the project 'World Food LCA database (WFLDB)'. The aim of this project was to provide inventories of a broad variety of agricultural products and processes and to cover for each product at least 50% of the global export market. The export share of apricots produced in Turkey amounts to 10% of the global export (tonnage exported in 2010). The production system regarded in this dataset aimed at representing apricots produced in Turkey for the export market.
PEF-Quality: data quality rating (DQR) = 1.8 (i.e. very good quality). This dataset refers to an average situation; for specific situations exchanges might differ substantially due to site specific parameters

## Included activities start
This activity starts with the nursery producing fruit tree seedlings, i.e. grafted young trees to be planted.

## Included activities end
This activity ends with the waste treatment after the clearing of the orchard (rooting up the trees). The dataset includes all activities of a year in a year in the productive phase of the orchard including the establishment phase per year of lifetime (20 years, 300 trees/ha planted), the clearing of the orchard including waste treatment.
The establishment phase of the orchard includes tree nursery, soil cultivation, planting trees, sowing grass, and irrigation. Fertiliser and pesticide use in a year of the establishment phase is assumed to be half of the amount of a year in the productive phase.
The productive phase of the orchard includes machine operations, corresponding infrastructure, fuel use and sheds. Machine operations in the productive phase are: soil cultivation (mulching, mowing), fertiliser and pesticide application, harvesting and irrigation. Further, direct field emissions and land use change are included. At the end of the productive phase the orchard is cleared by rooting up the trees.

Heavy metal uptake by the crop is considered.
The inputs of seedlings, fertilisers (mineral and organic) and pesticides as well as packaging of fertilisers and pesticides are considered. The dataset doesn't include emissions from manure storage because these are within the system boundary of animal production.

## Reference product
- apricot: 1 kg; CPC 01343: Apricots; By-product classification allocatable product
  production volume 2.48216e9 kg
    Source: FAOSTAT. Average, 2009-2012
  property price 2.94 EUR2005
    Calculated value based on data from United Nations Commodity Trade Statistics Database (comtrade.un.org). UN comtrade category: 80910 Apricots, fresh. Year: 2010. Using exchange rate of 1EURO = 1.209 USD. Average of price of import into 5 main markets (EU, US, JP, IN and CN).
  property carbon content, non-fossil 0.412732
    calculation: C-content of components according to ecoinvent report No. 15a. Source of composition: Souci, S.W., Fachmann, W., Kraut, H. (Hg.: Bundesminsiterium fur Ernahrung, Landwirtschaft und Forsten, Bonn) 'Die Zusammensetzung der Lebensmittel - Nahrwerttabellen', medpharm Scientific Publishers Stuttgart, CRC Press; 2000. Peach used as proxy.
  property carbon content 0.412732
    carbon content on a dry matter basis (reserved; not for manual entry)
  properties: wet mass 1 kg, dry mass 0.539665 kg, water content 0.853, water in wet mass 0.460335 kg, carbon content, fossil 0, carbon allocation 0.222737 kg

## Inputs from technosphere
- phosphate rock, beneficiated: 0 kg; pedigree (1,1,1,1,1)
  The exchange has been updated from 'phosphate rock, as P2O5, beneficiated, dry' into 'phosphate rock, beneficiated' and therefore its amount has been scaled (multiplied) from 0 kg by 3.125 kg of 'phosphate rock, beneficiated' per kg of 'phosphate rock, as P2O5, beneficiated, dry'. Original comment of the exchange is: 3bCalculated based on literature values or expert estimation: The total amount of nutrient (Personal written communication, Fiorenzo Pasquali, Yara, 2015) multiplied by the share of fertiliser type (Personal written communication, Fiorenzo Pasquali, Yara, 2015). See supporting documentation 'WFLDB-Documentation.pdf' chapter 'Fertiliser application' for L3 and L4 data (https://ecoquery.ecoinvent.org/File/Reports).
  Corresponds to 0.945 kg/ha
  properties: wet mass 1 kg, dry mass 1 kg
- ammonium nitrate: 0 kg; pedigree (1,1,1,1,1)
  The exchange has been updated from 'ammonium nitrate, as N' into 'ammonium nitrate' and therefore its amount has been scaled (multiplied) from 0.0012 kg by 2.8573 kg of 'ammonium nitrate' per kg of 'ammonium nitrate, as N'. Original comment of the exchange is: Calculated based on literature values or expert estimation: The total amount of nutrient (Personal written communication, Christophe Mouiren, GRCETA Basse Durance, 2015) multiplied by the share of fertiliser type (Personal written communication, Christophe Mouiren, GRCETA Basse Durance, 2015). See supporting documentation 'WFLDB-Documentation.pdf' chapter 'Fertiliser application' for L3 and L4 data (https://ecoquery.ecoinvent.org/File/Reports).
  Corresponds to 24.0 kg/ha
  properties: wet mass 1 kg, dry mass 1 kg
- inorganic phosphorus fertiliser, as P2O5: 0 kg; pedigree (1,1,1,1,1)
  Calculated based on literature values or expert estimation: The total amount of nutrient (Personal written communication, Christophe Mouiren, GRCETA Basse Durance, 2015) multiplied by the share of fertiliser type (Personal written communication, Christophe Mouiren, GRCETA Basse Durance, 2015). See supporting documentation 'WFLDB-Documentation.pdf' chapter 'Fertiliser application' for L3 and L4 data (https://ecoquery.ecoinvent.org/File/Reports).
  Corresponds to 18.0 kg/ha
  properties: dry mass 1 kg, wet mass 1 kg
- ammonia, anhydrous, liquid: 0 kg; pedigree (1,1,1,1,1)
  Calculated based on literature values or expert estimation: The total amount of nutrient (Personal written communication, Christophe Mouiren, GRCETA Basse Durance, 2015) multiplied by the share of fertiliser type (Personal written communication, Christophe Mouiren, GRCETA Basse Durance, 2015). See supporting documentation 'WFLDB-Documentation.pdf' chapter 'Fertiliser application' for L3 and L4 data (https://ecoquery.ecoinvent.org/File/Reports).
  Corresponds to 1.46 kg/ha
  properties: dry mass 1 kg, wet mass 1 kg
- phenoxy-compound: 1.39901e-5 kg; lognormal variance with pedigree 0.0158498, pedigree (2,2,4,5,1)
  Proxy: Apple US used.
  properties: wet mass 1 kg, carbon content, fossil 0.532559, dry mass 1 kg
- tillage, ploughing: 3.3172e-5 ha; lognormal variance with pedigree 0.126177, pedigree (2,1,4,5,1)
  Literature value or expert estimation (Gundogmus 2006).
- packaging, for pesticides: 0.00252205 kg; lognormal variance with pedigree 0.0592, pedigree (4,3,4,5,4)
  Total amount of active substance/s of pesticides needed for the production of apricot is calculated to be circa 1.26E-03 kg. Pesticide/s used in this dataset is/are: 'copper oxide', 'cyclic N-compound', 'glyphosate', 'phenoxy-compound', 'phthalimide-compound'. The total amount of active substance/s is doubled in order to account for the packaging of the dilluted product of pesticide/s that is/are applied. Therefore, 2.52E-03 kg of packaging for pesticides is justified with this exchange.
  properties: dry mass 1 kg, price 0.0642 EUR2005, heating value, net 25.97 MJ, carbon content, fossil 0.85714, wet mass 1 kg
- inorganic nitrogen fertiliser, as N: 0 kg; pedigree (1,1,1,1,1)
  Calculated based on literature values or expert estimation: The total amount of nutrient (Personal written communication, Christophe Mouiren, GRCETA Basse Durance, 2015) multiplied by the share of fertiliser type (Personal written communication, Christophe Mouiren, GRCETA Basse Durance, 2015). See supporting documentation 'WFLDB-Documentation.pdf' chapter 'Fertiliser application' for L3 and L4 data (https://ecoquery.ecoinvent.org/File/Reports).
  properties: wet mass 1 kg, dry mass 1 kg
- tillage, rolling: 3.3172e-5 ha; lognormal variance with pedigree 0.126177, pedigree (2,1,4,5,1)
  Literature value or expert estimation (Gundogmus 2006).
- packaging, for fertilisers: 0.0217233 kg; lognormal variance with pedigree 0.0592, pedigree (4,3,4,5,4)
  Total amount of active substance/s of fertilisers needed for the production of 'apricot' is calculated to be circa 1.09E-02 kg. Fertiliser/s used in this dataset is/are: 'ammonia, liquid', 'ammonium nitrate, as N', 'ammonium sulfate, as N', 'nitrogen fertiliser, as N', 'phosphate fertiliser, as P2O5', 'phosphate rock, as P2O5, beneficiated, dry', 'potassium chloride, as K2O', 'potassium fertiliser, as K2O', 'potassium sulfate, as K2O', 'urea, as N'. The total amount of active substance/s is doubled in order to account for the packaging of the dilluted product of fertiliser/s that is/are applied. Therefore, 2.17E-02 kg of packaging for fertilisers is justified with this exchange.
  properties: carbon content, fossil 0.825301, dry mass 1 kg, heating value, net 25.01 MJ, wet mass 1 kg, price 0.0642 EUR2005
  note on carbon content, fossil: Considering a chemical formula (C2H4)n for polyethylene, carbon content-fossil is calculated to be 0.856286 kg of Carbon per kg of dry mass.
- mowing, by motor mower: 9.27068e-5 ha; lognormal variance with pedigree 0.126177, pedigree (2,1,4,5,1)
  Literature value or expert estimation (Personal written communication, Christophe Mouiren, GRCETA Basse Durance, 2015).
- waste wood, untreated: 0 kg; pedigree (1,1,1,1,1)
  Wood from trees after 1-2 years of sorrage at the field (20% water) per lifetime year (20 years) of the orchard
  production volume 0 kg
    Calculated from reference product production volume, reference product amount and byproduct amount.
  properties: dry mass 0.8 kg, carbon content, non-fossil 0.48632, wet mass 1 kg, heating value, net 13.99 MJ, water content 0.25
  note on heating value, net: Value taken from the general comment of the treatment dataset.
- tillage, harrowing, by rotary harrow: 6.6344e-5 ha; lognormal variance with pedigree 0.126177, pedigree (2,1,4,5,1)
  Literature value or expert estimation (Gundogmus 2006).
- mulching: 2.31767e-5 ha; lognormal variance with pedigree 0.126177, pedigree (2,1,4,5,1)
  (same comment as for mowing, by motor mower)
- trellis system, wooden poles, soft wood, tar impregnated: 7.31308e-6 ha; lognormal variance with pedigree 0.126177, pedigree (2,1,4,5,1)
  Used to attach trees in orchards with a tree density of more than 500 trees per ha.
- manure, solid, cattle: 0.0382776 kg; lognormal variance with pedigree 0.126177, pedigree (2,1,4,5,1)
  Calculated based on literature values: The total amount of manure (Personal written communication, Marc Lambert, Yara, 2015) multiplied by the country-share of manure per animal category (FAOSTAT 2015). See supporting documentation 'WFLDB-Documentation.pdf' chapter 'Fertiliser application' (https://ecoquery.ecoinvent.org/File/Reports).
  Corresponds to 846.0 kg/ha
  properties: water content 3.5454, wet mass 1 kg, dry mass 0.22 kg, carbon content, non-fossil 0.441
- copper oxide: 9.66204e-6 kg; lognormal variance with pedigree 0.0158498, pedigree (2,2,4,5,1)
  Literature value or expert estimation (Objectifs Info Arbo 2014).
  properties: wet mass 1 kg, dry mass 1 kg
- manure, liquid, swine: 0.00343706 kg; lognormal variance with pedigree 0.126177, pedigree (2,1,4,5,1)
  Calculated based on literature values: The total amount of manure (Personal written communication, Marc Lambert, Yara, 2015) multiplied by the country-share of manure per animal category (FAOSTAT 2015). See supporting documentation 'WFLDB-Documentation.pdf' chapter 'Fertiliser application' (https://ecoquery.ecoinvent.org/File/Reports).
  Corresponds to 0.129 m3/ha
  properties: carbon content, non-fossil 0.64, dry mass 0.05 kg, water content 19, wet mass 1 kg
- transport, tractor and trailer, agricultural: 0.002 metric ton*km; lognormal variance with pedigree 0.164439, pedigree (4,1,4,5,1)
  On-farm transport: Yield (in tonnes) multiplied by the average distance from field to farm. The distance was assumed to be 2 km (proxy).
- manure, liquid, cattle: 0.0634383 kg; lognormal variance with pedigree 0.126177, pedigree (2,1,4,5,1)
  Calculated based on literature values: The total amount of manure (Personal written communication, Marc Lambert, Yara, 2015) multiplied by the country-share of manure per animal category (FAOSTAT 2015). See supporting documentation 'WFLDB-Documentation.pdf' chapter 'Fertiliser application' (https://ecoquery.ecoinvent.org/File/Reports).
  Corresponds to 0.86 m3/ha
  properties: water content 12.333, carbon content, non-fossil 0.68, dry mass 0.075 kg, wet mass 1 kg
- urea: 0 kg; pedigree (1,1,1,1,1)
  The exchange has been updated from 'urea, as N' into 'urea' and therefore its amount has been scaled (multiplied) from 0.0005 kg by 2.1438 kg of 'urea' per kg of 'urea, as N'. Original comment of the exchange is: Calculated based on literature values or expert estimation: The total amount of nutrient (Personal written communication, Christophe Mouiren, GRCETA Basse Durance, 2015) multiplied by the share of fertiliser type (Personal written communication, Christophe Mouiren, GRCETA Basse Durance, 2015). See supporting documentation 'WFLDB-Documentation.pdf' chapter 'Fertiliser application' for L3 and L4 data (https://ecoquery.ecoinvent.org/File/Reports).
  Corresponds to 1.2 kg/ha
  properties: wet mass 1 kg, carbon content, fossil 0.2, dry mass 1 kg
- liquid manure spreading, by vacuum tanker: 6.845e-5 m3; lognormal variance with pedigree 0.126177, pedigree (2,1,4,5,1)
  This amount corresponds to the input of liquid manure.
- solid manure loading and spreading, by hydraulic loader and spreader: 0.0434881 kg; lognormal variance with pedigree 0.126177, pedigree (2,1,4,5,1)
  This amount corresponds the input of solid manure.
- irrigation: 0 m3; pedigree (1,1,1,1,1)
  Calculated value: The total amount of water used for irrigation (calculated from evapotranspiration, Pfister et al. 2011) multiplied by the country-share of irrigation technique (Personal written communication, Christophe Mouiren, GRCETA Basse Durance, 2015). See supporting documentation 'WFLDB-Documentation.pdf' chapter 'Water use for irrigation' for L1 data (https://ecoquery.ecoinvent.org/File/Reports).
  properties: wet mass 1000 kg, water content 9089.91, dry mass 0.11 kg
- poultry manure, fresh: 0.000787334 kg; lognormal variance with pedigree 0.126177, pedigree (2,1,4,5,1)
  Calculated based on literature values: The total amount of manure (Personal written communication, Marc Lambert, Yara, 2015) multiplied by the country-share of manure per animal category (FAOSTAT 2015). See supporting documentation 'WFLDB-Documentation.pdf' chapter 'Fertiliser application' (https://ecoquery.ecoinvent.org/File/Reports).
  Corresponds to 0.0109 m3/ha
  properties: dry mass 0.38 kg, carbon content, non-fossil 0.33389, water content 1.63158, wet mass 1 kg
- glyphosate: 6.17166e-5 kg; lognormal variance with pedigree 0.0158498, pedigree (2,2,4,5,1)
  Proxy: Apple US used.
  properties: wet mass 1 kg, carbon content, fossil 0.214286, dry mass 1 kg
- poultry manure, dried: 0.00521048 kg; lognormal variance with pedigree 0.126177, pedigree (2,1,4,5,1)
  Calculated based on literature values: The total amount of manure (Personal written communication, Marc Lambert, Yara, 2015) multiplied by the country-share of manure per animal category (FAOSTAT 2015). See supporting documentation 'WFLDB-Documentation.pdf' chapter 'Fertiliser application' (https://ecoquery.ecoinvent.org/File/Reports).
  Corresponds to 154.0 kg/ha
  properties: dry mass 0.865 kg, water content 0.156069, carbon content, non-fossil 0.33389, lead content 2.92e-6, cadmium content 2.92e-7, nickel content 4e-5, mercury content 2e-7, phosphorus content 0.0167, potassium content 0.024, nitrogen content 0.532, wet mass 1 kg, copper content 4.38e-5, zinc content 0.000349
- fertilising, by broadcaster: 0.000145869 ha; lognormal variance with pedigree 0.126177, pedigree (2,1,4,5,1)
  Literature value or expert estimation (Personal written communication, Christophe Mouiren, GRCETA Basse Durance, 2015). Corresponds to 2 applications per year.
- potassium sulfate: 0.00164675 kg; lognormal variance with pedigree 0.126177, pedigree (2,1,4,5,1)
  The exchange has been updated from 'potassium sulfate, as K2O' into 'potassium sulfate' and therefore its amount has been scaled (multiplied) from 0.0009 kg by 1.85 kg of 'potassium sulfate' per kg of 'potassium sulfate, as K2O'. Original comment of the exchange is: Calculated based on literature values or expert estimation: The total amount of nutrient (Personal written communication, Christophe Mouiren, GRCETA Basse Durance, 2015) multiplied by the share of fertiliser type (Personal written communication, Christophe Mouiren, GRCETA Basse Durance, 2015). See supporting documentation 'WFLDB-Documentation.pdf' chapter 'Fertiliser application' for L3 and L4 data (https://ecoquery.ecoinvent.org/File/Reports).
  properties: wet mass 1 kg, dry mass 1 kg
- fruit tree seedling, for planting: 0.000988311 unit; lognormal variance with pedigree 0.126177, pedigree (2,1,4,5,1)
  Literature value or expert estimation (Personal written communication, Christophe Mouiren, GRCETA Basse Durance, 2015). This is the number of trees per ha divided by the lifetime years of the orchard.
  properties: carbon content, non-fossil 0.439481, wet mass 1 kg, dry mass 0.578035 kg, water content 0.73
  note on carbon content, non-fossil: calculation: C-content of components according to ecoinvent report No. 15a. Source of composition: https://ndb.nal.usda.gov/ndb/search/. Unspecific seedling used as proxy.
- inorganic potassium fertiliser, as K2O: 0 kg; pedigree (1,1,1,1,1)
  Calculated based on literature values or expert estimation: The total amount of nutrient (Personal written communication, Christophe Mouiren, GRCETA Basse Durance, 2015) multiplied by the share of fertiliser type (Personal written communication, Christophe Mouiren, GRCETA Basse Durance, 2015). See supporting documentation 'WFLDB-Documentation.pdf' chapter 'Fertiliser application' for L3 and L4 data (https://ecoquery.ecoinvent.org/File/Reports).
  Corresponds to 71.3 kg/ha
  properties: wet mass 1 kg, dry mass 1 kg
- establishing orchard: 0.000988311 unit; lognormal variance with pedigree 0.126177, pedigree (2,1,4,5,1)
  (same comment as for fruit tree seedling, for planting)
- potassium chloride: 0.000196967 kg; lognormal variance with pedigree 0.126177, pedigree (2,1,4,5,1)
  The exchange has been updated from 'potassium chloride, as K2O' into 'potassium chloride' and therefore its amount has been scaled (multiplied) from 0.0001 kg by 1.5829 kg of 'potassium chloride' per kg of 'potassium chloride, as K2O'. Original comment of the exchange is: 3bCalculated based on literature values or expert estimation: The total amount of nutrient (Personal written communication, Fiorenzo Pasquali, Yara, 2015) multiplied by the share of fertiliser type (Personal written communication, Fiorenzo Pasquali, Yara, 2015). See supporting documentation 'WFLDB-Documentation.pdf' chapter 'Fertiliser application' for L3 and L4 data (https://ecoquery.ecoinvent.org/File/Reports).
  Corresponds to 1.5 kg/ha
  properties: dry mass 1 kg, wet mass 1 kg
- application of plant protection product, by field sprayer: 0.000361269 ha; lognormal variance with pedigree 0.126664, pedigree (2,2,4,5,1)
  Literature value or expert estimation (Personal written communication, Christophe Mouiren, GRCETA Basse Durance, 2015). Field sprayer used as a proxy for pesticide application in orchards. Corresponds to 7 applications per year.
- phthalimide-compound: 0.00079152 kg; lognormal variance with pedigree 0.0158498, pedigree (2,2,4,5,1)
  Literature value or expert estimation (Objectifs Info Arbo 2014).
  properties: dry mass 1 kg, carbon content, fossil 0.361204, wet mass 1 kg
- cyclic N-compound: 0.000384135 kg; lognormal variance with pedigree 0.0158498, pedigree (2,2,4,5,1)
  Literature value or expert estimation (Objectifs Info Arbo 2014).
  properties: carbon content, fossil 0.641962, wet mass 1 kg, dry mass 1 kg
- planting tree: 0.000988311 unit; lognormal variance with pedigree 0.126177, pedigree (2,1,4,5,1)
  (same comment as for fruit tree seedling, for planting)
- ammonium sulfate: 0.000323858 kg; lognormal variance with pedigree 0.126177, pedigree (2,1,4,5,1)
  Calculated based on literature values or expert estimation: The total amount of nutrient (Personal written communication, Christophe Mouiren, GRCETA Basse Durance, 2015) multiplied by the share of fertiliser type (Personal written communication, Christophe Mouiren, GRCETA Basse Durance, 2015). See supporting documentation 'WFLDB-Documentation.pdf' chapter 'Fertiliser application' for L3 and L4 data (https://ecoquery.ecoinvent.org/File/Reports).
  Corresponds to 5.4 kg/ha
  properties: wet mass 1 kg, dry mass 1 kg
- phosphate rock, beneficiated: 1.80148e-6, 1.80148e-6, 0.000135697 kg (3 entries); lognormal variance with pedigree 0.126177, pedigree (2,1,4,5,1)
  (same comment as for phosphate rock, beneficiated)
- ammonium nitrate: 0.00145643, 0.0018949 kg (2 entries); lognormal variance with pedigree 0.126177, pedigree (2,1,4,5,1)
  (same comment as for ammonium nitrate)
- inorganic phosphorus fertiliser, as P2O5: 1.87247e-7, 1.5514e-5, 9.94709e-7, 2.01281e-5, 2.21593e-7, 1.61172e-5, 4.35308e-7, 2.29226e-6, 0.000126197, 2.65912e-5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 kg (60 entries); lognormal variance with pedigree 0.126177, pedigree (2,1,4,5,1)
  (same comment as for inorganic phosphorus fertiliser, as P2O5)
- ammonia, anhydrous, liquid: 5.90215e-6, 5.0736e-7, 7.89322e-7, 1.56393e-6, 1.53224e-6, 1.60595e-7, 7.17918e-7 kg (7 entries); lognormal variance with pedigree 0.126177, pedigree (2,1,4,5,1)
  (same comment as for ammonia, anhydrous, liquid)
- inorganic nitrogen fertiliser, as N: 1.66076e-7, 8.85037e-6, 1.1096e-6, 1.27212e-5, 3.22114e-7, 1.13698e-5, 1.49231e-6, 3.6126e-6, 3.99403e-5, 2.38529e-5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 kg (60 entries); lognormal variance with pedigree 0.126177, pedigree (2,1,4,5,1)
  (same comment as for inorganic nitrogen fertiliser, as N)
- waste wood, untreated: -0.000196532, -0.000644264, -0.000355855, -0.000600554, -0.00068718, -0.0289163, -0.000611993, -0.0035904, -0.000262499, -0.000130862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 kg (39 entries); lognormal variance with pedigree 0.126177, pedigree (2,1,4,5,1)
  (same comment as for waste wood, untreated)
  production volume 1.86442e8 kg
- urea: 0.000840536, 0.000124488 kg (2 entries); lognormal variance with pedigree 0.126177, pedigree (2,1,4,5,1)
  (same comment as for urea)
- irrigation: 0.00485817, 0.000206214, 8.24857e-6, 0.0434287, 0.000711682, 3.5587e-5, 0.0834562, 0.00160423, 0.000548288, 0.00147007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 m3 (14 entries); lognormal variance with pedigree 0.126177, pedigree (2,1,4,5,1)
  (same comment as for irrigation)
- inorganic potassium fertiliser, as K2O: 8.80965e-8, 2.55344e-6, 2.11432e-6, 1.26534e-5, 6.66823e-7, 2.56645e-5, 2.7317e-6, 8.40305e-7, 0.00031731, 2.27153e-5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 kg (60 entries); lognormal variance with pedigree 0.126177, pedigree (2,1,4,5,1)
  (same comment as for inorganic potassium fertiliser, as K2O)

## Inputs from nature
- Transformation, to permanent crop, irrigated [natural resource, land]: 0.0281744 m2; lognormal variance with pedigree 0.0462144, pedigree (2,1,4,5,1)
  10000 m2 divided by the life time of the perennial crop (20 years).
- Occupation, permanent crop, irrigated [natural resource, land]: 0.565009 m2*year; lognormal variance with pedigree 0.0220616, pedigree (2,1,4,5,1)
  Related to the duration from harvest date of previous crop to harvest date of main crop.
- Transformation, from permanent crop, irrigated [natural resource, land]: 0.0281744 m2; lognormal variance with pedigree 0.0462144, pedigree (2,1,4,5,1)
  10000 m2 divided by the life time of the perennial crop (20 years).
- Energy, gross calorific value, in biomass [natural resource, biotic]: 2.71081 MJ; lognormal variance with pedigree 0.0158498, pedigree (2,2,4,5,1)
  Gross energy content is related to MJ/kg dry matter of product. Source: ecoinvent data
- Carbon dioxide, in air [natural resource, in air]: 0.255898 kg; lognormal variance with pedigree 0.0158498, pedigree (2,2,4,5,1)
  CO2 uptake by biomass

## Emissions to nature
- Mercury [water, surface water]: 4.36049e-10 kg; lognormal variance with pedigree 0.358938, pedigree (2,2,4,5,1)
  Calculated value - Freiermuth (2006). See 'WFLDB-Guidelines.pdf', available at https://ecoquery.ecoinvent.org/File/Reports.
- Nickel [soil, agricultural]: 1.94279e-7 kg
  Comment on mathematicalRelation:
  1.7588e-07 from Calculated value - Freiermuth (2006). See 'WFLDB-Guidelines.pdf', available at https://ecoquery.ecoinvent.org/File/Reports.
  -1.535562e-07 from Crop, default, heavy metals uptake model
  Heavy metal uptake can be excluded by setting the parameter heavyMetalUptakeSwitch to zero.
- Mercury [water, ground-]: 1.17307e-10 kg; lognormal variance with pedigree 0.358938, pedigree (2,2,4,5,1)
  (same comment as for Mercury)
- Cadmium, ion [water, ground-]: 2.19557e-9 kg; lognormal variance with pedigree 0.358938, pedigree (2,2,4,5,1)
  (same comment as for Mercury)
- Mercury [soil, agricultural]: 1.80763e-9 kg
  Comment on mathematicalRelation:
  7.0055e-09 from Calculated value - Freiermuth (2006). See 'WFLDB-Guidelines.pdf', available at https://ecoquery.ecoinvent.org/File/Reports.
  -5.961732e-09 from Crop, default, heavy metals uptake model
  Heavy metal uptake can be excluded by setting the parameter heavyMetalUptakeSwitch to zero.
- Lead [water, surface water]: 3.61717e-8 kg; lognormal variance with pedigree 0.358938, pedigree (2,2,4,5,1)
  (same comment as for Mercury)
- Cadmium, ion [water, surface water]: 1.79376e-9 kg; lognormal variance with pedigree 0.358938, pedigree (2,2,4,5,1)
  (same comment as for Mercury)
- Lead [water, ground-]: 6.60006e-9 kg; lognormal variance with pedigree 0.358938, pedigree (2,2,4,5,1)
  (same comment as for Mercury)
- Cadmium [soil, agricultural]: 1.31957e-7 kg
  Comment on mathematicalRelation:
  6.195e-08 from Calculated value - Freiermuth (2006). See 'WFLDB-Guidelines.pdf', available at https://ecoquery.ecoinvent.org/File/Reports.
  -1.492638e-08 from Crop, default, heavy metals uptake model
  Heavy metal uptake can be excluded by setting the parameter heavyMetalUptakeSwitch to zero.
- Ammonia [air, non-urban air or from high stacks]: 0.000589976 kg; lognormal variance with pedigree 0.0467216, pedigree (2,2,4,5,1)
  Calculated value - EMEP/EEA (2013). See 'WFLDB-Guidelines.pdf', available at https://ecoquery.ecoinvent.org/File/Reports.
- Lead [soil, agricultural]: 1.33509e-7 kg
  Comment on mathematicalRelation:
  1.32185e-07 from Calculated value - Freiermuth (2006). See 'WFLDB-Guidelines.pdf', available at https://ecoquery.ecoinvent.org/File/Reports.
  -7.949319e-08 from Crop, default, heavy metals uptake model
  Heavy metal uptake can be excluded by setting the parameter heavyMetalUptakeSwitch to zero.
- Iprodion [soil, agricultural]: 0.000356596 kg; lognormal variance with pedigree 0.0467216, pedigree (2,2,4,5,1)
  Calculated value - 100% emission in soil. See 'WFLDB-Guidelines.pdf', available at https://ecoquery.ecoinvent.org/File/Reports.
- 2,4-D [soil, agricultural]: 1.39901e-5 kg; lognormal variance with pedigree 0.0467216, pedigree (2,2,4,5,1)
  (same comment as for Iprodion)
- Indoxacarb [soil, agricultural]: 2.75383e-5 kg; lognormal variance with pedigree 0.0467216, pedigree (2,2,4,5,1)
  (same comment as for Iprodion)
- Zinc, ion [water, surface water]: 2.75243e-7 kg; lognormal variance with pedigree 0.358938, pedigree (2,2,4,5,1)
  (same comment as for Mercury)
- Glyphosate [soil, agricultural]: 6.17166e-5 kg; lognormal variance with pedigree 0.0467216, pedigree (2,2,4,5,1)
  (same comment as for Iprodion)
- Zinc, ion [water, ground-]: 9.45165e-7 kg; lognormal variance with pedigree 0.358938, pedigree (2,2,4,5,1)
  (same comment as for Mercury)
- Dinitrogen monoxide [air, non-urban air or from high stacks]: 8.59001e-5 kg; lognormal variance with pedigree 0.126664, pedigree (2,2,4,5,1)
  Calculated value - IPCC (2006). See 'WFLDB-Guidelines.pdf', available at https://ecoquery.ecoinvent.org/File/Reports.
- Zinc [soil, agricultural]: -6.13347e-7 kg
  Comment on mathematicalRelation:
  -4.707381e-06 from Crop, default, heavy metals uptake model
  Heavy metal uptake can be excluded by setting the parameter heavyMetalUptakeSwitch to zero.
- Chromium, ion [water, ground-]: 1.06365e-6 kg; lognormal variance with pedigree 0.358938, pedigree (2,2,4,5,1)
  (same comment as for Mercury)
- Water [water, surface water]: 0.0564512 m3; lognormal variance with pedigree 0.126177, pedigree (2,1,4,5,1)
  Calculated value - Emission calculated from water balance. See 'WFLDB-Guidelines.pdf', available at https://ecoquery.ecoinvent.org/File/Reports.
- Copper, ion [water, surface water]: 2.66083e-7 kg; lognormal variance with pedigree 0.358938, pedigree (2,2,4,5,1)
  (same comment as for Mercury)
- Water [water, ground-]: 0.0141127 m3; lognormal variance with pedigree 0.126177, pedigree (2,1,4,5,1)
  (same comment as for Water)
- Water [air, non-urban air or from high stacks]: 0.0946221 m3; lognormal variance with pedigree 0.126177, pedigree (2,1,4,5,1)
  (same comment as for Water)
- Phosphorus [water, surface water]: 5.13331e-6 kg; lognormal variance with pedigree 0.177866, pedigree (2,2,4,5,1)
  Calculated value - Prasuhn (2006) and SQCB-Erosion. See 'WFLDB-Guidelines.pdf', available at https://ecoquery.ecoinvent.org/File/Reports.
- Phosphate [water, surface water]: 4.80909e-5 kg; lognormal variance with pedigree 0.177866, pedigree (2,2,4,5,1)
  Calculated value - Prasuhn (2006). See 'WFLDB-Guidelines.pdf', available at https://ecoquery.ecoinvent.org/File/Reports.
- Carbon dioxide, from soil or biomass stock [air, non-urban air or from high stacks]: 0.000460423 kg; normal variance with pedigree 0.5452, pedigree (3,3,5,5,2)
  Global average LUC emissions according 2nd edition of the Quantis-modified tool developed by Blonk Consultants 'WFLDB-adapted-Blonk 2014 direct-land-use-change-assessment-tool_2015-05-18a.xlsx', tab. 'Country & land use unknown'. The emission are based on the relative change in production areas in all countries for a given crop. The weighted average is used which takes into acount relative difference in crop expansion into primary forest, secondary forest, grassland, perennial and annual land.
  Uncertainty: Uncertainty estimated based on IPCC guidlines 2006.
- Phosphate [water, ground-]: 1.04102e-5 kg; lognormal variance with pedigree 0.177866, pedigree (2,2,4,5,1)
  (same comment as for Phosphate)
- Copper, ion [water, ground-]: 1.78565e-7 kg; lognormal variance with pedigree 0.358938, pedigree (2,2,4,5,1)
  (same comment as for Mercury)
- Nitrogen oxides [air, non-urban air or from high stacks]: 0.0001585 kg; lognormal variance with pedigree 0.126664, pedigree (2,2,4,5,1)
  Calculated value - EEA/EMEP (2013). See 'WFLDB-Guidelines.pdf', available at https://ecoquery.ecoinvent.org/File/Reports.
- Copper [soil, agricultural]: 9.59101e-6 kg
  Comment on mathematicalRelation:
  6.97e-05 from Calculated value - Freiermuth (2006). See 'WFLDB-Guidelines.pdf', available at https://ecoquery.ecoinvent.org/File/Reports.
  -9.741543e-07 from Crop, default, heavy metals uptake model
  Heavy metal uptake can be excluded by setting the parameter heavyMetalUptakeSwitch to zero.
- Carbon dioxide, fossil [air, non-urban air or from high stacks]: 0.000978245 kg; lognormal variance with pedigree 0.0158498, pedigree (2,2,4,5,1)
  Calculated value - CO2 emissions from urea and lime. See 'WFLDB-Guidelines.pdf', available at https://ecoquery.ecoinvent.org/File/Reports.
- Captan [soil, agricultural]: 0.00079152 kg; lognormal variance with pedigree 0.0467216, pedigree (2,2,4,5,1)
  (same comment as for Iprodion)
- Nickel, ion [water, surface water]: 1.11453e-7 kg; lognormal variance with pedigree 0.358938, pedigree (2,2,4,5,1)
  (same comment as for Mercury)
- Chromium [soil, agricultural]: 4.60883e-7 kg
  Comment on mathematicalRelation:
  -2.83445e-07 from Calculated value - Freiermuth (2006). See 'WFLDB-Guidelines.pdf', available at https://ecoquery.ecoinvent.org/File/Reports.
  -8.0115e-08 from Crop, default, heavy metals uptake model
  Heavy metal uptake can be excluded by setting the parameter heavyMetalUptakeSwitch to zero.
- Nickel, ion [water, ground-]: 1.86517e-11 kg; lognormal variance with pedigree 0.358938, pedigree (2,2,4,5,1)
  (same comment as for Mercury)
- Chromium, ion [water, surface water]: 1.82599e-7 kg; lognormal variance with pedigree 0.358938, pedigree (2,2,4,5,1)
  (same comment as for Mercury)

## Sampling procedure
WFLDB Methodological Guidelines for the Life Cycle Inventory of Agricultural Products in the latest version, available at: (Report section: https://v30.ecoquery.ecoinvent.org/File/Reports). Data sources: Data were categorised from level 0 (L0) to level (L4) as follows: L0 = estimate, proxy; L1 = statistical data (e.g. FAOSTAT); L2 = L1 adapted to crop and country; L3 = literature data or L1 resp. L2 data approved by experts; medium detailing (i.e. kg of total N-fertiliser); L4 = L3 data of high detailing (i.e. portion N-fertiliser types).In this dataset data were obtained for yield: L3; Fertilisers: L3; Pesticides: L3; Machinery: L4; Irrigation: L3. For information regarding the calculation of individual exchanges see supporting documentation WFLDB-Documentation.pdf.

## Extrapolations
The amount of the exchanges are weighted average of regional datasets.

## Review by Assumpció ANTON 2016-05-30
Be aware that the use of statistics in input calculations could provide some specific inputs not common for specific crops, this should be corrected if better information is available and better reflexed in DQR . Currently, I would dissent for some of good marks provided, being a revision of criteria applied advisable.

Pesticides will need to be amended periodically checking for update of pesticides' ban.
