# paper sack production

Dataset: EcoSpold 2, unit process
Geography: RER
Time period: 2015-01-01 to 2021-12-31
Technology level: current
Classification: ISIC rev.4 ecoinvent: 1702:Manufacture of corrugated paper and paperboard and of containers of paper a
Synonyms: Paper bag; Paper sack; Pet food sack; Cement sack
Scenario: Business-as-Usual
System model: Allocation, cut-off by classification
Share of production covered: 86 %
Generated by: Malin Johansson
Database: ecoinvent
isCopyrightProtected: true
accessRestrictedTo: 1

## General comment
This dataset represent the production of an "average European paper sack", which is a hybrid mix of all types of multiwall paper sacks in Europe. It mixes brown (unbleached) and white (bleached) sack kraft paper, LDPE and HDPE plastic liners and different kinds of glues, all in one. The dataset is therefore suitable to use for both white and brown sacks, for example cement sacks and pet food sacks. But it should be handled with care when used for sacks without plastic liners or small bags such as carrier bags. Paper sacks are made of sack kraft paper which is a porous kraft paper with high elasticity and high tear resistance, designed for packaging products with high demands for strength and durability.
Data refers to 2015, it is from a study performed by CEPI Eurokraft and Eurosac in 2017.
The dataset represents average data calculated from 36 plants participating in the study representing 86% of European production by weight (based on total production within the Eurosac membership) in the production year 2015.
The air emission profile for paper sack production are based on the amounts of fuels bought and incinerated on-site. Exisiting ecoinvent emission profiles were used as proxy to calculate the amounts of air emissions. More information about the fuel mix and the proxy emission profiles is provided under the"Extrapolations" Comment of this dataset.
[This dataset is meant to replace the following datasets:]

## Included activities start
This module includes the European production of paper sacks at an average converting plant.Activities starts with kraft paper delivered to the converting plant, it includes paper sack production, printing and energy production on-site.

## Included activities end
The activity ends with the paper sacks leaving the factory gate.

## Technology
Average of present used technology in 2015

## Time period
Statistics from CEPI Eurokraft for Sack production in Europe 2015. Production volume valid for 2015.

## Reference product
- paper sack: 1 kg; name a_RP; CPC 32133: Other uncoated kraft paper and paperboard; sack kraft paper, creped or crinkled; By-product classification allocatable product
  production volume 9.04438e8 kg; name kraft_PV
    European production volume for 2018 estimated based on European deliveries (incl. non Eurosac volumes).
  property carbon content, non-fossil 0.42; name a_RP_C_content_non_fossil
    biogene carbon content on a dry matter basis
  property price 0.867186 EUR2005; name a_RP_price_EUR2005
    Calculated based on inputs: The price of the product has been calculated as a sum of the values of the material and energy inputs for this product. This value is therefore a rough estimation. It may underestimate the real price since there are additional expenses when producing any product. These expences can include for example labour costs, treatment of waste materials and profit for the producer. Please consider carefully whether this level of data quality is acceptable for your application.
  property carbon content, fossil 0.02; name a_RP_C_content_fossil
    fossil carbon content on a dry matter basis
  property carbon content 0.44
    carbon content on a dry matter basis (reserved; not for manual entry)
  properties: wet mass 1 kg, water content 0.0787487, dry mass 0.927 kg, water in wet mass 0.073 kg, heating value, net 14.11 MJ, carbon allocation 0.40788 kg

## By-products
- waste paper, unsorted: 0 kg; By-product classification Recyclable; CPC 39240: Waste and scrap of paper or paperboard
  Reported as paper waste, average amount of 36 European paper sack converters
  production volume 0 kg; = kraft_PV * a_wpap / a_RP
    Calculated from production volume of reference product using the relative outputs.
  property price 0.093 EUR2005; name a_wpap_price_EUR2005
    Temporary price data. Calculated as 90% of purchasers price based on: Assumed to be 10% less than for sorted waste paper
  property carbon content, non-fossil 0.448889; name a_wpap_C_content_non_fossil
    biogene carbon content on a dry matter basis
  property carbon content, fossil 0; name a_wpap_C_content_fossil
    fossil carbon content on a dry matter basis
  property carbon content 0.448889
    carbon content on a dry matter basis (reserved; not for manual entry)
  properties: wet mass 1 kg, water content 0.111111, dry mass 0.9 kg, water in wet mass 0.1 kg, heating value, net 14.11 MJ, carbon allocation 0.404 kg

## Inputs from technosphere
- oil storage, 3000l: 1.47155e-6 unit; lognormal variance with pedigree 0.3961, pedigree (4,5,5,3,4)
  Estimation based on data of external fuel inputs and emission factors from corresponding fuel combustion ecoinvent datasets (see comment "Extrapolations")
- extrusion, plastic film: 0.029 kg; = a_HDPE; lognormal variance with pedigree 0.2106, pedigree (5,5,5,5,5)
  Average for 36 European paper sack converters. The process requires high density polyethylene film. Therefore, the HDPE granulate and the service of extrusion of granulate to film in the equivalent amount are used as inputs.
- ethylene vinyl acetate copolymer: 0.0049 kg; lognormal variance with pedigree 0.2106, pedigree (5,5,5,5,5)
  Average for 36 European paper sack converters. Ethylene vinyl acetate copolymer is used as a proxy for PVA glue.
  properties: wet mass 1 kg, carbon content, fossil 0.79734, heating value, net 35.99 MJ, dry mass 1 kg
- diesel, low-sulfur: 5.14019e-5 kg; lognormal variance with pedigree 0.0033, pedigree (2,2,3,1,1)
  Average for 36 European paper sack converters
  Uncertainty: A
  properties: heating value, net 42.8 MJ, carbon content, fossil 0.865, dry mass 1 kg, wet mass 1 kg
- natural gas, high pressure: 0 m3; pedigree (1,1,1,1,1)
  Average for 36 European paper sack converters
  Uncertainty: A
  properties: wet mass 0.84 kg, carbon content, fossil 0.602381, dry mass 0.84 kg, heating value, net 39 MJ
  note on heating value, net: Literature value, Source: United Nations Statistics Division (2018) International Recommendations for Energy Statistics (IRES). Available at: http://unstats.un.org/unsd/statcom/doc11/BG-IRES.pdf.
- maize starch: 0.00626398 kg; lognormal variance with pedigree 0.0027, pedigree (1,2,3,1,1)
  Average for 36 European paper sack converters. Proxy for starch glue. 50/50 potato and maize starch assumed.
  Uncertainty: A
  properties: wet mass 1 kg, dry mass 0.86 kg, carbon content, non-fossil 0.46, heating value, net 11.64 MJ, water content 0.162791
- packaging box factory: 1.42857e-9 unit; = 1/14000000/50; lognormal variance with pedigree 0.396025, pedigree (4,5,5,2,4)
  packaging box factory was used as proxy as long as no paper sack converting facility is available. The amount is calculated based on the annual capacity of the factory (14kt paper) and the lifetime of 50 years. See ecoinvent datasets "packaging box factory construction, RER, 1993-2000".
- light fuel oil: 0.000338785 kg; lognormal variance with pedigree 0.0033, pedigree (2,2,3,1,1)
  Average for 36 European paper sack converters
  Uncertainty: A
  properties: heating value, net 42.6 MJ, wet mass 1 kg, carbon content, fossil 0.862, dry mass 1 kg
- heavy fuel oil: 0.000633495 kg; lognormal variance with pedigree 0.0033, pedigree (2,2,3,1,1)
  Average for 36 European paper sack converters
  Uncertainty: A
  properties: dry mass 1 kg, wet mass 1 kg, heating value, net 41.2 MJ, carbon content, fossil 0.849
- chimney: 1.56966e-6 m; lognormal variance with pedigree 0.3961, pedigree (4,5,5,3,4)
  (same comment as for oil storage, 3000l)
- packaging film, low density polyethylene: 0.024 kg; lognormal variance with pedigree 0.2106, pedigree (5,5,5,5,5)
  Average for 36 European paper sack converters
  properties: carbon content, fossil 0.857143, wet mass 1 kg, heating value, net 42.47 MJ, dry mass 1 kg
- waste plastic, mixture: -0.00179569 kg; name a_wplas
  Reported as plastic waste, average amount of 36 European paper sack converters
  production volume 1.62409e6 kg; = kraft_PV * a_wplas / a_RP
    Calculated from production volume of reference product using the relative outputs.
  property price 0 EUR2005; name a_wplas_price_EUR2005
  properties: carbon content, fossil 0.747344, water content 0.180638, heating value, net 30.79 MJ, dry mass 0.847 kg, wet mass 1 kg
  note on heating value, net: Value taken from the general comment of the treatment dataset.
- hazardous waste, for incineration: 0 kg; name a_hzw
  Reported as hazardous waste, average amount of 36 European paper sack converters
  production volume 0 kg
    Calculated from production volume of reference product using the relative outputs.
  property price 0 EUR2005; name a_hzw_price_EUR2005
  properties: carbon content, fossil 0.554667, heating value, net 17 MJ, dry mass 0.75 kg, water content 0.333333, wet mass 1 kg
- potato starch: 0.00626398 kg; lognormal variance with pedigree 0.0027, pedigree (1,2,3,1,1)
  (same comment as for maize starch)
  properties: heating value, net 10.66 MJ, carbon content, non-fossil 0.46, dry mass 0.8 kg, water content 0.25, wet mass 1 kg
- kraft paper: 0.949 kg; lognormal variance with pedigree 0.2106, pedigree (5,5,5,5,5)
  Average for 36 European paper sack converters
  properties: dry mass 0.945 kg, wet mass 1 kg, carbon content, non-fossil 0.41662, water content 0.0582011, carbon content, fossil 0.0020219, heating value, net 14.11 MJ
  note on carbon content, non-fossil: Biogenic C content was calculated after biogenic C contents of chemicals used in the production of the paper (in Tab 9.4 ecoinvent v2.2 report 11_III, part 9). The cellulose content in 1 kg of paper (on a wet mas basis) was estimated as (1-chemical content), C content of cellulose was considered 0.44 kgC/kg dry mass (ecoinvent v2.2 report, n 15a, pg 40)
  note on carbon content, fossil: Fossil C content was calculated after fossil C contents of chemicals used in the production of the paper (in Tab 9.4 ecoinvent v2.2 report 11_III, part 9).
- electricity, medium voltage: 0.151 kWh; lognormal variance with pedigree 0.2106, pedigree (5,5,5,5,5)
  Average for 36 European paper sack converters
- municipal solid waste: -0.0545484 kg; name a_msw
  Reported as mixed waste, non-hazardous, average amount of 36 European paper sack converters
  production volume 4.93356e7 kg; = kraft_PV * a_msw / a_RP
    Calculated from production volume of reference product using the relative outputs.
  property price 0 EUR2005; name a_msw_price_EUR2005
  properties: wet mass 1 kg, carbon content, non-fossil 0.261655, carbon content, fossil 0.171549, heating value, net 11.74 MJ, dry mass 0.771 kg, water content 0.297017
- industrial furnace, natural gas: 6.5548e-7 unit; lognormal variance with pedigree 0.1361, pedigree (4,5,5,3,4)
  (same comment as for oil storage, 3000l)
- printing ink, offset, without solvent, in 47.5% solution state: 0.0109 kg; lognormal variance with pedigree 0.2106, pedigree (5,5,5,5,5)
  Average for 36 European paper sack converters
  properties: wet mass 1 kg, heating value, net 20.51 MJ, dry mass 1 kg, carbon content, non-fossil 0.221773, carbon content, fossil 0.455266
- industrial furnace, 1MW, oil: 1.17726e-7 unit; lognormal variance with pedigree 0.3961, pedigree (4,5,5,3,4)
  (same comment as for oil storage, 3000l)
- chemical, inorganic: 0.000617 kg; lognormal variance with pedigree 0.2106, pedigree (5,5,5,5,5)
  Average for 36 European paper sack converters. Proxy for "anti-slip", varnish etc
  properties: wet mass 1 kg, carbon content, fossil 0.003, dry mass 1 kg
- polyethylene, high density, granulate: 0.029 kg; name a_HDPE; lognormal variance with pedigree 0.2106, pedigree (5,5,5,5,5)
  (same comment as for extrusion, plastic film)
  properties: dry mass 1 kg, carbon content, fossil 0.857143, heating value, net 42.47 MJ, wet mass 1 kg
- chemical, organic: 0.000617 kg; lognormal variance with pedigree 0.2106, pedigree (5,5,5,5,5)
  Average for 36 European paper sack converters. Proxy for "anti-slip", varnish etc.
  properties: carbon content, fossil 0.628, wet mass 1 kg, dry mass 1 kg, heating value, net 19.03 MJ
- waste paper, unsorted: -0.0121963 kg
  Reported as paper waste, average amount of 36 European paper sack converters
  production volume 1.10308e7 kg
  properties: wet mass 1 kg, water content 0.111111, dry mass 0.9 kg, heating value, net 14.11 MJ
- natural gas, high pressure: 0.00596406, 3.85074e-5 m3 (2 entries); lognormal variance with pedigree 0.0033, pedigree (2,2,3,1,1)
  Average for 36 European paper sack converters
  Uncertainty: A
- hazardous waste, for incineration: -0.00400812, -0.00010477 kg (2 entries)
  Reported as hazardous waste, average amount of 36 European paper sack converters
  production volume 3.71985e6 kg

## Inputs from nature
- Water, unspecified natural origin [natural resource, in water]: 0.000728 m3; name water_UNO_input; lognormal variance with pedigree 0.0421, pedigree (1,2,3,1,1)
  Average for 36 European paper sack converters
  Uncertainty: A

## Emissions to nature
- Chromium VI [air, urban air close to ground]: 1.28602e-12 kg; lognormal variance with pedigree 0.7006, pedigree (2,5,3,1,4)
  (same comment as for oil storage, 3000l)
- DOC, Dissolved Organic Carbon [water, unspecified]: 0.000152222 kg; = a_TOC; lognormal variance with pedigree 0.066, pedigree (4,5,3,1,3)
  Assumed equal to TOC.
- Acetone [air, urban air close to ground]: 3.85807e-9 kg; lognormal variance with pedigree 0.0906, pedigree (2,5,3,1,4)
  (same comment as for oil storage, 3000l)
- BOD5, Biological Oxygen Demand [water, surface water]: 5.12821e-6 kg; lognormal variance with pedigree 0.25, pedigree (5,5,5,5,5)
  Average for 36 European paper sack converters
- Water [water, unspecified]: 0.000294 m3; lognormal variance with pedigree 0.0421, pedigree (1,2,3,1,1)
  Average for 36 European paper sack converters
  Uncertainty: A
- Toluene [air, urban air close to ground]: 4.80914e-8 kg; lognormal variance with pedigree 0.0906, pedigree (2,5,3,1,4)
  (same comment as for oil storage, 3000l)
- Arsenic [air, urban air close to ground]: 3.34366e-10 kg; lognormal variance with pedigree 0.0906, pedigree (2,5,3,1,4)
  (same comment as for oil storage, 3000l)
- Sulfur dioxide [air, urban air close to ground]: 1.1043e-5 kg; lognormal variance with pedigree 0.00156, pedigree (2,3,2,3,1)
  (same comment as for oil storage, 3000l)
- Propionic acid [air, urban air close to ground]: 4.682e-9 kg; lognormal variance with pedigree 0.0906, pedigree (2,5,3,1,4)
  (same comment as for oil storage, 3000l)
- Acetic acid [air, urban air close to ground]: 5.05473e-8 kg; lognormal variance with pedigree 0.0906, pedigree (2,5,3,1,4)
  (same comment as for oil storage, 3000l)
- TOC, Total Organic Carbon [water, unspecified]: 0.000152222 kg; name a_TOC; = a_COD/2.7; lognormal variance with pedigree 0.066, pedigree (4,5,3,1,3)
  Calculated by default as TOC (gC) = COD/2.7 (COD measured in g O2). Should more correctly be calculated from the carbon content of the specified emissions to water.
- Methane, fossil [air, urban air close to ground]: 5.62022e-7 kg; lognormal variance with pedigree 0.0906, pedigree (2,5,3,1,4)
  (same comment as for oil storage, 3000l)
- Hydrocarbons, aromatic [air, urban air close to ground]: 4.36e-9 kg; lognormal variance with pedigree 0.3506, pedigree (2,5,3,1,4)
  (same comment as for oil storage, 3000l)
- Formaldehyde [air, urban air close to ground]: 4.99786e-8 kg; lognormal variance with pedigree 0.25, pedigree (5,5,5,5,5)
  (same comment as for oil storage, 3000l)
- Vanadium [air, urban air close to ground]: 2.57205e-8 kg; lognormal variance with pedigree 0.7006, pedigree (2,5,3,1,4)
  (same comment as for oil storage, 3000l)
- Mercury [air, urban air close to ground]: 1.92113e-11 kg; lognormal variance with pedigree 0.7006, pedigree (2,5,3,1,4)
  (same comment as for oil storage, 3000l)
- Particulates, > 10 um [air, urban air close to ground]: 6.17291e-8 kg; lognormal variance with pedigree 0.0415, pedigree (2,3,2,3,1)
  (same comment as for oil storage, 3000l)
- Nitrogen oxides [air, urban air close to ground]: 7.59546e-6 kg; lognormal variance with pedigree 0.0415, pedigree (2,3,2,3,1)
  (same comment as for oil storage, 3000l)
- COD, Chemical Oxygen Demand [water, unspecified]: 0.000411 kg; name a_COD; lognormal variance with pedigree 0.0421, pedigree (1,2,3,1,1)
  Estimation based on data of external fuel inputs and emission factors from corresponding fuel combustion ecoinvent datasets (see comment "Extrapolations")
  Uncertainty: A
- Nickel [air, urban air close to ground]: 1.2603e-8 kg; lognormal variance with pedigree 0.7006, pedigree (2,5,3,1,4)
  (same comment as for oil storage, 3000l)
- Ammonia [air, urban air close to ground]: 2.75627e-9 kg; lognormal variance with pedigree 0.0906, pedigree (2,5,3,1,4)
  (same comment as for oil storage, 3000l)
- Water [air, non-urban air or from high stacks]: 0.000434 m3; lognormal variance with pedigree 0.0421, pedigree (1,2,3,1,1)
  Difference between water input and water output is assumed to evaporate.
- Molybdenum [air, urban air close to ground]: 2.05764e-10 kg; lognormal variance with pedigree 0.7006, pedigree (2,5,3,1,4)
  (same comment as for oil storage, 3000l)
- Iron [air, urban air close to ground]: 2.10908e-8 kg; lognormal variance with pedigree 0.7006, pedigree (2,5,3,1,4)
  (same comment as for oil storage, 3000l)
- Sodium [air, urban air close to ground]: 1.92904e-8 kg; lognormal variance with pedigree 0.7006, pedigree (2,5,3,1,4)
  (same comment as for oil storage, 3000l)
- Calcium [air, urban air close to ground]: 2.82925e-9 kg; lognormal variance with pedigree 0.25, pedigree (5,5,5,5,5)
  (same comment as for oil storage, 3000l)
- Lead [air, urban air close to ground]: 3.72947e-9 kg; lognormal variance with pedigree 0.7006, pedigree (2,5,3,1,4)
  (same comment as for oil storage, 3000l)
- Hydrogen fluoride [air, urban air close to ground]: 1.38453e-9 kg; lognormal variance with pedigree 0.0906, pedigree (2,5,3,1,4)
  (same comment as for oil storage, 3000l)
- Butane [air, urban air close to ground]: 1.69118e-7 kg; lognormal variance with pedigree 0.0906, pedigree (2,5,3,1,4)
  (same comment as for oil storage, 3000l)
- Hydrocarbons, aliphatic, alkanes, unspecified [air, urban air close to ground]: 2.34293e-8 kg; lognormal variance with pedigree 0.0906, pedigree (2,5,3,1,4)
  (same comment as for oil storage, 3000l)
- Hydrocarbons, aliphatic, unsaturated [air, urban air close to ground]: 7.71614e-10 kg; lognormal variance with pedigree 0.0906, pedigree (2,5,3,1,4)
  (same comment as for oil storage, 3000l)
- Particulates, > 2.5 um, and < 10um [air, urban air close to ground]: 3.08646e-8 kg; lognormal variance with pedigree 0.1215, pedigree (2,3,2,3,1)
  (same comment as for oil storage, 3000l)
- Dinitrogen monoxide [air, urban air close to ground]: 5.39826e-8 kg; lognormal variance with pedigree 0.0906, pedigree (2,5,3,1,4)
  (same comment as for oil storage, 3000l)
- PAH, polycyclic aromatic hydrocarbons [air, urban air close to ground]: 2.36558e-9 kg; lognormal variance with pedigree 0.3506, pedigree (2,5,3,1,4)
  (same comment as for oil storage, 3000l)
- Methanol [air, urban air close to ground]: 1.31174e-8 kg; lognormal variance with pedigree 0.25, pedigree (5,5,5,5,5)
  (same comment as for oil storage, 3000l)
- Chromium [air, urban air close to ground]: 1.27316e-10 kg; lognormal variance with pedigree 0.7006, pedigree (2,5,3,1,4)
  (same comment as for oil storage, 3000l)
- Carbon dioxide, fossil [air, urban air close to ground]: 0.0163744 kg; lognormal variance with pedigree 0.0512, pedigree (2,5,3,1,4)
  (same comment as for oil storage, 3000l)
- Acetaldehyde [air, urban air close to ground]: 4.09217e-9 kg; lognormal variance with pedigree 0.0906, pedigree (2,5,3,1,4)
  Average for 36 European paper sack converters
- Hydrogen chloride [air, urban air close to ground]: 3.86036e-8 kg; lognormal variance with pedigree 0.0906, pedigree (2,5,3,1,4)
  (same comment as for oil storage, 3000l)
- Benzene [air, urban air close to ground]: 9.38899e-8 kg; lognormal variance with pedigree 0.0906, pedigree (2,5,3,1,4)
  (same comment as for oil storage, 3000l)
- Carbon monoxide, fossil [air, urban air close to ground]: 7.38295e-7 kg; lognormal variance with pedigree 0.7006, pedigree (2,5,3,1,4)
  Estimation based on data of external fuel inputs and emission factors from corresponding fuel combustion ecoinvent datasets (see comment "Extrapolations")
  Uncertainty: e
- Benzo(a)pyrene [air, urban air close to ground]: 3.52766e-12 kg; lognormal variance with pedigree 0.0906, pedigree (2,5,3,1,4)
  (same comment as for oil storage, 3000l)
- Copper [air, urban air close to ground]: 1.20738e-8 kg; lognormal variance with pedigree 0.7006, pedigree (2,5,3,1,4)
  (same comment as for oil storage, 3000l)
- Propane [air, urban air close to ground]: 4.79265e-8 kg; lognormal variance with pedigree 0.0906, pedigree (2,5,3,1,4)
  (same comment as for oil storage, 3000l)
- Ethanol [air, urban air close to ground]: 7.71614e-9 kg; lognormal variance with pedigree 0.0906, pedigree (2,5,3,1,4)
  (same comment as for oil storage, 3000l)
- Zinc [air, urban air close to ground]: 1.30769e-8 kg; lognormal variance with pedigree 0.7006, pedigree (2,5,3,1,4)
  (same comment as for oil storage, 3000l)
- Dioxins, measured as 2,3,7,8-tetrachlorodibenzo-p-dioxin [air, urban air close to ground]: 0 kg; pedigree (1,1,1,1,1)
  (same comment as for oil storage, 3000l)
- Particulates, < 2.5 um [air, urban air close to ground]: 2.64538e-7 kg; lognormal variance with pedigree 0.3015, pedigree (2,3,2,3,1)
  (same comment as for oil storage, 3000l)
- Cobalt [air, urban air close to ground]: 8.48775e-10 kg; lognormal variance with pedigree 0.7006, pedigree (2,5,3,1,4)
  (same comment as for oil storage, 3000l)
- Pentane [air, urban air close to ground]: 2.84419e-7 kg; lognormal variance with pedigree 0.0906, pedigree (2,5,3,1,4)
  (same comment as for oil storage, 3000l)
- Selenium [air, urban air close to ground]: 3.08646e-10 kg; lognormal variance with pedigree 0.7006, pedigree (2,5,3,1,4)
  (same comment as for oil storage, 3000l)

## Sampling procedure
The data were collected via a survey for the European paper sacks converters in Eurosac.Inputs and outputs to the plants were collected (gate to gate)

## Extrapolations
This dataset has been extrapolated from year 2020 to the year of the calculation (2021). The uncertainty has been adjusted accordingly.
