# grass production, permanent grassland, organic, extensive

Dataset: EcoSpold 2, unit process
Geography: RoW
Time period: 2000-01-01 to 2021-12-31
Technology level: current
Classification: ISIC rev.4 ecoinvent: 0119:Growing of other non-perennial crops
Scenario: Business-as-Usual
System model: Allocation, cut-off by classification
Share of production covered: 0 %
Generated by: Fredy Dinkel
Published in: Jungbluth N. 2007
Database: ecoinvent
isCopyrightProtected: true
accessRestrictedTo: 1

## General comment
This dataset represents the production of 1 kg of grass (dry matter). The dry matter yield is 3000 kg/ha. Moisture content at harvest is 85%.
[This dataset was already contained in the ecoinvent database version 2. It was not individually updated during the transfer to ecoinvent version 3. Life Cycle Impact Assessment results may still have changed, as they are affected by changes in the supply chain, i.e. in other datasets. This dataset was generated following the ecoinvent quality guidelines for version 2. It may have been subject to central changes described in the ecoinvent version 3 change report (http://www.ecoinvent.org/database/ecoinvent-version-3/reports-of-changes/), and the results of the central updates were reviewed extensively. The changes added e.g. consistent water flows and other information throughout the database. The documentation of this dataset can be found in the ecoinvent reports of version 2, which are still available via the ecoinvent website. The change report linked above covers all central changes that were made during the conversion process.]

## Included activities start
This activity assumes grass production on a permanent natural meadow with a lifetime of 50 years and represents one year of cultivation on an established meadow. No input materials are included.

## Included activities end
The dataset includes all machine operations and corresponding machine infrastructure and sheds. Machine operations are: mowing and loading for transport. This activity ends after loading of the grass at the farm gate.

## Geography
Refers to a production in the Swiss plateau (lowlands <700m).

## Technology
Extenisv organic production.

## Parameters
- fraction, irrigation water, to air: 0.586986 dimensionless; name fraction_IW_to_air; lognormal variance with pedigree 0.0409, pedigree (2,2,2,1,1)
- fraction, irrigation water, to ground water: 0.8 dimensionless; name fraction_IW_to_ground_water; lognormal variance with pedigree 0.0886, pedigree (4,3,1,1,4)
- fraction, irrigation water to surface water: 0.2 dimensionless; name fraction_IW_to_surface_water; lognormal variance with pedigree 0.0886, pedigree (4,3,1,1,4)

## Reference product
- grass, organic: 1 kg; name REF_PRODUCT; By-product classification allocatable product; CPC 01919: Forage products, n.e.c.
  EcoSpold01Location=CH
  production volume 5.66794e9 kg
    Area of permanent grass 20 million ha (Willer H, Yussefi M (Eds.) (2010). The World of Organic Agriculture. Statistics and Emerging Trends 2007. FiBL, IFOAM.). Of this area, 57% is assumed to be extensive. 50% is assumed to be grazed and 50% cut. Of the cut grass, 1/3 is assumed to be used fresh, 1/3 for silage, and 1/3 dried for hay. This dataset concerns grass for fresh usage only. Yields per area as provided in the dataset: 3000 kg DM/ha.
  property carbon content, non-fossil 0.443857; name REF_PRODUCT_C_content_non_fossil
    biogene carbon content on a dry matter basis
    Composition data obtained from the average composition of Fescue Fresh, Orchardgrass Fresh, and Timothy Fresh in (http://beefmagazine.com/images/2009%20feed%20table.pdf). First, composition data were refered to 1 kg dry mass. Then, C-contents were calculated considering a C-content/dry mass of 46% in carbohydrates (including fibres), 53% in proteins and 75% in fats. All data from "Evolutionary and Biochemical Aspects", A.D. Kay and T. Vrede (in Global Ecology, 2010, Elsevier B.V., S.E. Jørgensen Ed.).
  property energy content 18.9 MJ; name REF_PRODUCT_energy_content
    Approximation by values for hay. See chapter 'Product Properties' in "01_crop production - yields & inputs CH & Europe_v1.0.pdf", section "AGRICULTURAL PRODUCTION IN SWITZERLAND" - pdf-document on the dedicated talk page of ecoinvent (www.ecoinvent.org/documentation).
  property dry mass 1 kg; name REF_PRODUCT_DM
  property price 0.645 EUR2005; name REF_PRODUCT_price_EUR2005
    Temporary price data. Calculated as 90% of purchasers price based on: Source: Ecoinvent report nr. 17, table 12.46
  property carbon content 0.443857
    carbon content on a dry matter basis (reserved; not for manual entry)
  properties: water content 5.66667, carbon content, fossil 0, wet mass 6.66667 kg, water in wet mass 5.66667 kg, carbon allocation 0.443857 kg

## Inputs from technosphere
- irrigation: 0 m3; name water_irrigation_input; source Siebert, S. 2010; pedigree (1,1,1,1,1)
  Calculated based on literature values (Döll, 2010) and partially modelled at ETH (Pfister, S.).
  property water content 9089.91; name water_content
  property wet mass 1000 kg; name WM
  property dry mass 0.11 kg; name DM
  property carbon content, fossil 0; name C_content_fossil
  property carbon content, non-fossil 0; name C_content_non_fossil
  property water in wet mass 999.89 kg; name WWM
- mowing, by rotary mower: 0.00033333 ha; source LBL 2004; lognormal variance with pedigree 0.0607, pedigree (2,2,5,5,3)
  Max. 1 harvest per year, min. 1 harvest per 3 years (LBL 2004). 1 harvest per year was assumed for straw areas with use for bioenergy production. For those straw areas the use of rotary mower was assumed possible.
  EcoSpold01Location=CH
  Uncertainty: Max. 1 harvest per year, min. 1 harvest per 3 years (Walter et al. 2004). 1 harvest per year was assumed for straw areas with use for bioenergy production. For those straw areas the use of rotary mower was assumed possible.
- fodder loading, by self-loading trailer: 0.056 m3; lognormal variance with pedigree 0.0607, pedigree (2,2,5,5,3)
  Calculation with grass with 15% DM content and density of about 80 kg/m3
  EcoSpold01Location=CH
  Uncertainty: Calculation with grass with 15% DM content and density of about 80 kg/m3
- irrigation: 7.71851e-6, 3.27627e-7, 6.89982e-5, 1.1307e-6, 5.65396e-8, 3.21046e-6, 5.22561e-7, 0.000132593, 2.54875e-6, 8.71102e-7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 m3 (16 entries); source Siebert, S. 2010; lognormal variance with pedigree 0.0447, pedigree (2,2,5,5,1)
  (same comment as for irrigation)
  properties: water content 9089.91, wet mass 1000 kg, dry mass 0.11 kg

## Inputs from nature
- Occupation, pasture, man made, extensive [natural resource, land]: 3.3333 m2*year; lognormal variance with pedigree 0.1001, pedigree (4,2,5,5,1)
  Modelled, see chapter 'Land use' in "01_crop production_direct field emissions and natural resources_v1.0.pdf" - pdf-document on the dedicated talk page of ecoinvent (www.ecoinvent.org/documentation)
  Uncertainty: Calculation for one ha cultivated during one year and with a yield of 3000 dt/ha*a.
- Transformation, to pasture, man made, extensive [natural resource, land]: 0.066667 m2; lognormal variance with pedigree 0.1801, pedigree (4,2,5,5,1)
  Modelled, see chapter 'Land use' in "01_crop production_direct field emissions and natural resources_v1.0.pdf" - pdf-document on the dedicated talk page of ecoinvent (www.ecoinvent.org/documentation)
  Uncertainty: As in ecoinvent report 15 for hay, life time according the ecoinvent quality guidelines, extensiv meadow fixed at 50 years
- Energy, gross calorific value, in biomass [natural resource, biotic]: 18.9 MJ; lognormal variance with pedigree 0.041981, pedigree (2,2,5,3,1)
  Netto yield multiplied with 18.9 MJ/kg DM energy content of grass (Nemecek et al. 2004)
- Carbon dioxide, in air [natural resource, in air]: 1.62747 kg; = 44/12 * (REF_PRODUCT_C_content_non_fossil * REF_PRODUCT * REF_PRODUCT_DM ); lognormal variance with pedigree 0.0427, pedigree (2,2,5,5,1)
  Modelled,see chapter 'CO2 binding' in "01_crop production_direct field emissions and natural resources_v1.0.pdf" - pdf-document on the dedicated talk page of ecoinvent (www.ecoinvent.org/documentation)
  Uncertainty: Calculated with an uptake of 0.453 kg carbon per kg DM grass (Maier et al. 1998), resulting in 1.661 kg CO2 / kg DM
- Transformation, from pasture, man made, extensive [natural resource, land]: 0.066667 m2; lognormal variance with pedigree 0.1801, pedigree (4,2,5,5,1)
  (same comment as for Transformation, to pasture, man made, extensive)

## Emissions to nature
- Phosphate [water, surface water]: 0.00011452 kg; source Nemecek, T. 2004; lognormal variance with pedigree 0.1627, pedigree (2,2,5,5,4)
  Formula as in ecoinvent report No. 15, chapter 4.4 (Nemecek et al. 2004)
  Uncertainty: Formula as in ecoinvent report 15, Kapitel 4.4 (Nemecek et al. 2004)
- Nitrate [water, ground-]: 0.0111 kg; lognormal variance with pedigree 0.1627, pedigree (2,2,5,5,4)
  Modelled with the 'SALCA-NO3 model' described in "01_crop production_direct field emissions and natural resources_v1.0.pdf" - pdf-document on the dedicated talk page of ecoinvent (www.ecoinvent.org/documentation)
  Uncertainty: Formula as in ecoinvent report No. 15, chapter 4.4 (Nemecek et al. 2004)
- Nickel [soil, agricultural]: -1.68e-6 kg; source Nemecek, T. 2004
  Calculation input - output balance using data about metal content of grass, seed and fertilizers summarized in Nemecek et al. (2004)
- Dinitrogen monoxide [air, non-urban air or from high stacks]: 2.95874e-5 kg; name N2O; lognormal variance with pedigree 0.1626, pedigree (2,1,5,5,4)
  Modelled, see chapter 'Emissions of N2O to the air' in "01_crop production_direct field emissions and natural resources_v1.0.pdf" - pdf-document on the dedicated talk page of ecoinvent (www.ecoinvent.org/documentation)
  Uncertainty: Formula as in ecoinvent report 15, Kapitel 4.4 (Nemecek et al. 2004)
- Mercury [soil, agricultural]: -1.5e-7 kg; source Nemecek, T. 2004
  (same comment as for Nickel)
- Water [water, surface water]: 6.84724e-5 m3; name water_to_water_surface; lognormal variance with pedigree 0.1306, pedigree (4,3,5,5,4)
  Calculated value. See the parameters and their comments to understand the calculation.
  property fraction, origin: salt water 0; name fraction_origin_salt_water_Wsw
  property fraction, origin: fresh water 1; name fraction_origin_fresh_water_Wsw
- Water [air, unspecified]: 0.000172701 m3; name water_to_air_unspecified; lognormal variance with pedigree 0.0827, pedigree (2,2,5,5,1)
  Calculated value based on literature values and expert opinion. See comments in the parametres' comment field.
  property fraction, origin: salt water 0; name fraction_origin_salt_water
  property fraction, origin: fresh water 1; name fraction_origin_fresh_water
  property fraction, origin: unspecified 0; name fraction_origin_unspecified
- Zinc [soil, agricultural]: -4e-5 kg; source Nemecek, T. 2004
  (same comment as for Nickel)
- Chromium [soil, agricultural]: -1.09e-6 kg; source Nemecek, T. 2004
  (same comment as for Nickel)
- Water [water, ground-]: 0.00027389 m3; name water_to_water_ground; lognormal variance with pedigree 0.1306, pedigree (4,3,5,5,4)
  Calculated value. See the parameters and their comments to understand the calculation.
  property fraction, origin: unspecified 0; name fraction_origin_unspecified_Wgw
  property fraction, origin: salt water 0; name fraction_origin_salt_water_Wgw
  property fraction, origin: fresh water 1; name fraction_origin_fresh_water_Wgw
- Lead [soil, agricultural]: -3.3e-6 kg; source Nemecek, T. 2004
  (same comment as for Nickel)
- Copper [soil, agricultural]: -8.6e-6 kg; source Nemecek, T. 2004
  (same comment as for Nickel)
- Cadmium [soil, agricultural]: -1.3e-7 kg; source Nemecek, T. 2004
  (same comment as for Nickel)
- Phosphorus [water, surface water]: 1.5363e-6 kg; source Nemecek, T. 2004; lognormal variance with pedigree 0.1627, pedigree (2,2,5,5,4)
  (same comment as for Phosphate)
- Nitrogen oxides [air, non-urban air or from high stacks]: 6.21335e-6 kg; = 0.21 * N2O; lognormal variance with pedigree 0.1626, pedigree (2,1,5,5,4)
  Modelled, see chapter 'Emissions of NOx to the air' in "01_crop production_direct field emissions and natural resources_v1.0.pdf" - pdf-document on the dedicated talk page of ecoinvent (www.ecoinvent.org/documentation)
  Uncertainty: Formula as in ecoinvent report 15, Kapitel 4.4 (Nemecek et al. 2004)
- Phosphate [water, ground-]: 4.5806e-5 kg; source Nemecek, T. 2004; lognormal variance with pedigree 0.1627, pedigree (2,2,5,5,4)
  (same comment as for Phosphate)

## Sampling procedure
Data were compiled from statistics, fertilising recommendations, documents from extension services and expert knowledge.

## Extrapolations
This dataset has been copied from an original dataset covering the geography CH.

## Review by Niels Jungbluth 2005-08-25
Passed.
