# urea formaldehyde resin production

Dataset: EcoSpold 2, unit process
Geography: RER
Time period: 1995-01-01 to 2021-12-31
Technology level: current
Classification: ISIC rev.4 ecoinvent: 2013:Manufacture of plastics and synthetic rubber in primary forms
Synonyms: 9011-05-6; Ponoxylan; Pianizol; Karbamol; Piatherm; Hygromull; Gabrite; Polyoxymethylene urea; Polynoxylin; Urea formaldehyde
Scenario: Business-as-Usual
System model: Allocation, cut-off by classification
Generated by: Maggie Osses
Published in: Althaus H.-J. 2007
Database: ecoinvent
isCopyrightProtected: true
accessRestrictedTo: 1

## General comment
This dataset represents the production of 1 kg of urea formaldehyde resin (100%). Urea formaldehyde accounts for over 80% of amino resins. Amino resins are thermosetting polymers made by combining an aldehyde with a compound containing an amino (-NH2) group. They are primarily used as adhesives in the woodworking industry. Other uses include treatment of paper, production of molding materials, surface coatings, as well as auxiliary materials for the paper and textile industries. Urea formaldehyde resin is produced by hydroxymethylation of urea and formaldehyde, followed by condensation.
For the raw materials, data are taken from literature. The other values are approximations based on the manufacturing of alkyl resin. For this alkyl resin, the data is based on information provided by a European manufacturing company.
References:
Diem, H., Matthias, G. and Wagner, R. A. 2010. Amino Resins. Ullmann's Encyclopedia of Industrial Chemistry.
von Däniken A. and Chudacoff M. (1995) Vergleichende ökologische Bewertung von Anstrichstoffen im Baubereich - Band 2: Daten. Buwal Schriftenreihe Umwelt Nr. 232. BUWAL, Bern.
Althaus H.-J., Chudacoff M., Hischier R., Jungbluth N., Osses M. and Primas A. (2007) Life Cycle Inventories of Chemicals. ecoinvent report No. 8, v2.0. EMPA Dübendorf, Swiss Centre for Life Cycle Inventories, Dübendorf, CH.

## Included activities start
The activity starts when the raw materials enter the process.

## Included activities end
The manufacturing process is considered with consumption of raw materials, energy, infrastructure and land use, as well as the generation of emissions to air. Auxiliaries, solid wastes and emissions to water are not included due to the lack of information. No byproducts or coproducts are considered.

## Geography
The data has no specific geographical origin. It is assumed to be representative of the European urea-formaldehyde resin industry.

## Technology
Amino resin production consists of two stages: hydroxymethylation and condensation. Depending on the reaction conditions, hydroxymethylation is accompanied to a greater or lesser extent by condensation. The following equations illustrate the process for formaldehyde plus urea:
- Hydroxymethylation: NH2CONH2 + 2CH2O -> HOCH2-NHCONH-CH2OH
- Condensation: HOCH2-NHCONH-CH2OH + NH2CONH2 -> HOCH2-NHCONH-CH2 -NHCONH2 + H2O
- Further condensation leads to longer chains of the basic unit N-CO-N-CH2
The process for the production of the resin is continued until the resulting product is an oligomeric mixture that is still soluble or fusible. It is protected against further condensation by rendering the medium alkaline.
Hydroxymethylation
Hydroxymethylation can be carried out using either alkaline or acid catalysis, but the former is faster. The hydroxymethylation of urea is slightly exothermic. Industrial processes produce variable mixtures of oligomers with mixed repeat units, so the overall reaction rate is also variable and cannot be defined. Moreover, the important resin properties have not been correlated with the individual reaction rates. In general, the hydroxymethylation rate increases with increased concentration, temperature, and pH. Substituents also have an effect; adjacent electron-withdrawing groups reduce the reaction rate, as do bulky substituents.
Condensation
The condensation is catalysed by acids since the methylene bonds between two urea molecules are very stable and can be hydrolysed only by strong acids at elevated temperatures. The condensation reaction is slightly exothermic. It is impossible to give a single reaction rate for the condensation process because there are many different starting materials (hydroxymethyl compounds) and many end products (methylene compounds). The type of solvent also has an effect on the condensation rate.
Condensation of the resin by means of acid catalysis, i.e., cross-linking to give a substantially infusible product, is not carried out until the resin is put to use. This process is called curing. However, free hydroxymethyl groups are present even in this state. Condensations carried out in an excess of an alcohol, with the addition of acid and removal of water as necessary, produce curable etherified amino resins. These are soluble in nonaqueous solvents and can be mixed with alkyd resins, epoxy resins, etc. They are used as starting materials in the production of surface coatings. Resin glues based on urea have been subjected to partial etherification to stabilise them against further condensation.
Amino resins usually are prepared in 5 – 20 m3 batches. However, continuous processes are employed also, particularly for the production of resin glues. The patent literature describes processes where a particular stage is operated continuously while other stages are operated batchwise. In general, and because the reaction rate and the composition of the end product are influenced by a large number of parameters, the reaction must be controlled carefully. Only the most important processes are described here since there is a large number of reaction parameters and resultant adaptations of the process.
Batchwise Production
The batchwise procedure is the most widely used method for the industrial production of amino resins. Its disadvantage is its relatively small production capacity but on the other hand, this process permits an extensive variety of products and frequent changes of product.
The reactions are carried out in stirred kettles, in two or more stages, at 70 – 100 °C. In the first stage, which is carried out in a slightly acidic to alkaline solution, the principal reaction is hydroxymethylation. In subsequent stages, the condensation is carried out, water is split off, and higher molecular weight products of increasing viscosity are obtained. When the condensation is complete, the product is evaporated in the stirred kettle, or more economically in a tubular vaporiser, with the pressure reduced to protect the resin. The quality of the resin is then compared to its specifications and it is discharged into a storage container.
Continuous Production
The disadvantages of continuous production are that the amount produced per unit time in a particular plant can vary only within relatively narrow limits because prolonged residence under otherwise constant conditions increases the proportion of molecules with high degrees of condensation. Changing product is not simple either. Thus, the continuous production process is employed where the variety of products is restricted to a relatively narrow range. On the other hand, continuous procedures give a very uniform product quality. There are a large number of continuous processes that differ only in process technology for the product flow. In general, the differences include variations in the temperature, pH, concentration, or modifiers. In a typical example, urea and formaldehyde are combined and the solution pumped through a multistage unit. The product is then concentrated in a continuous evaporator to about 60–65% solids.

## Time period
The literature sources are from 1995 and 2000. The time period to which the data presented in the sources corresponds is not known.

## Parameters
- fraction, cooling water, cooling pond system, to air: 0.032 dimensionless; name fraction_CW_CP_to_air; lognormal variance with pedigree 0.0413, pedigree (2,3,1,3,1)
  Calculated based on literature value (Scown, C.D., 2011, Water Footprint of U.S. Transportation Fuels and supplying information of the article) (Vionnet, S., Quantis Water Database - Technical Report, 2012).
- fraction, process water, to air: 0.15 dimensionless; name fraction_PW_to_air; lognormal variance with pedigree 0.092025, pedigree (4,4,3,2,4)
  Literature value. In case when no industry/process specific data are available, default evaporation fraction value is used. This value is 15% and is based on literature (Statistics Canada, 2007 & Shaffer, K.H., 2008, Consumptive water use in the Great Lakes Basin, USGS & Shiklomanov, 2003, World Water Resources at the Beginning of the 21st Century) and has been approved by an expert.
- fraction, cooling water, once-through system, to air: 0.004 dimensionless; name fraction_CW_OT_to_air; lognormal variance with pedigree 0.0413, pedigree (2,3,1,3,1)
  (same comment as for fraction, cooling water, cooling pond system, to air)
- fraction, cooling water, to air: 0.3875 dimensionless; name fraction_CW_to_air; = (0.5*fraction_CW_OT_to_air)+(0.5*fraction_CW_R_to_air); lognormal variance with pedigree 0.092025, pedigree (4,4,3,2,4)
  Calculated value based on literature value (see comments of the other parametres present in this dataset) and expert opinion. In the case when no industry/literature data are available about the type of cooling or directly fraction, cooling water, to air specific for the process a default assumption is applied. It is assumed that the once-through cooling system is used in 50% of all cases and recirculating system is used in another 50% of all cases.
- fraction, cooling water, recirculating system, to air: 0.771 dimensionless; name fraction_CW_R_to_air; lognormal variance with pedigree 0.0413, pedigree (2,3,1,3,1)
  (same comment as for fraction, cooling water, cooling pond system, to air)

## Reference product
- urea formaldehyde resin: 1 kg; name RP; CPC 34790: Other plastics in primary forms; ion exchangers; By-product classification allocatable product
  The amino resins can be odourless or, depending on the content of free formaldehyde, have a more or less sharp odour. Urea formaldehyde accounts for over 80% of amino resins. Amino resins are thermosetting polymers which are primarily used as adhesives in the woodworking industry. Other uses include treatment of paper, production of molding materials, surface coatings, as well as auxiliary materials for the paper and textile industries.
  References:
  Diem, H., Matthias, G. and Wagner, R. A. 2010. Amino Resins. Ullmann's Encyclopedia of Industrial Chemistry.
  von Däniken A. and Chudacoff M. (1995) Vergleichende ökologische Bewertung von Anstrichstoffen im Baubereich - Band 2: Daten. Buwal Schriftenreihe Umwelt Nr. 232. BUWAL, Bern.
  Althaus H.-J., Chudacoff M., Hischier R., Jungbluth N., Osses M. and Primas A. (2007) Life Cycle Inventories of Chemicals. ecoinvent report No. 8, v2.0. EMPA Dübendorf, Swiss Centre for Life Cycle Inventories, Dübendorf, CH.
  production volume 0.696 kg; name RP_PV
    This is a placeholder value that does not reflect real-world production volumes. This dataset does not currently require a real-world production volume to work in the database framework, and no actual data were collected yet. This has no negative effect on the results of the ecoinvent database. The placeholder value of this activity was estimated by scaling the global production volume (which is also a placeholder value) according to the sales of chemicals products reported by Cefic (European Chemical Industry Council), and the American Chemistry Council.
    According to Cefic (2016) the global sales of chemicals in the year 2015 was 3 534 billion euros. The reported share of sales per region are: EU28 14.7%; Other Europe (Switzerland, Norway, Turkey, Russia and Ukraine) 2.7%; NAFTA (US, Canada and Mexico) 16.5%; Latin America 3.8%; China 39.9%; Japan 3.9%; Republic of Korea 3.2%; India 2.2%; Rest of Asia 11.9%; Rest of the World 1.3%. Cefic also reports the US total sales, which amount to 518.7 billion euros out of the global 3 534 billion euros (14.7%). The same share is reported by the American Chemistry Council (2016), according to which the USA sales account for 15% of global sales for the year 2016.
    References:
    Cefic 2016. Facts and figures 2016 of the European chemical industry. Accessible at: http://www.cefic.org/Facts-and-Figures/Chemicals-Industry-Profile/
    American Chemistry Council 2016. Outlook: U.S. Chemical Industry Continues to Outpace Industrial Output; Accounts for More Than One-Half of Construction Spending by Manufacturing Sector. Accessible at: https://www.americanchemistry.com/Media/PressReleasesTranscripts/ACC-news-releases/US-Chemical-Industry-Continues-to-Outpace-Industrial-Output.html
  property price 0.698 EUR2005
    Calculated value based on data from United Nations Commodity Trade Statistics Database (comtrade.un.org). UN comtrade category: 390910 Urea resins, thiourea resins, in primary forms. Year 2005. Using exchange rate of 1EURO = 1.209 USD. Average of price of import into 5 main markets (EU, US, JP, IN and CN).
  property carbon content, fossil 0.408958
    Chemical formula of the urea formaldehide monomer was assumed to be C3H8N2O
  property heating value, net 12.39 MJ
    LHV is calculated based on the Carbon content of the product. More details can be found on the respective documentation.
  property carbon content 0.408958
    carbon content on a dry matter basis (reserved; not for manual entry)
  properties: water in wet mass 0 kg, wet mass 1 kg, dry mass 1 kg, water content 0, carbon content, non-fossil 0, carbon allocation 0.408958 kg

## Inputs from technosphere
- electricity, medium voltage: 0.026 kWh; lognormal variance with pedigree 0.1786, pedigree (4,5,5,5,5)
  Estimated value based on expert judgement.
- sodium hydroxide, without water, in 50% solution state: 0.005 kg; lognormal variance with pedigree 0.1786, pedigree (4,5,5,5,5)
  Estimated value based on expert judgement.
  properties: wet mass 1 kg, heating value, net 3.03 MJ, dry mass 1 kg
- formaldehyde: 0.49 kg; lognormal variance with pedigree 0.032025, pedigree (3,5,3,2,1)
  Data from survey in literature (Diem 2000)
  Uncertainty: d
  properties: dry mass 1 kg, carbon content, fossil 0.4, heating value, net 20.19 MJ, wet mass 1 kg
- heat, district or industrial, natural gas: 0.6745 MJ; lognormal variance with pedigree 0.1786, pedigree (4,5,5,5,5)
  Estimated value based on expert judgement.
  properties: heating value, net 1 MJ
- chemical factory, organics: 4e-10 unit; lognormal variance with pedigree 0.309425, pedigree (2,3,2,2,3)
  Calculated based on literature data published by the industry. For this activity, no information was readily available concerning infrastructure and land-use. Therefore, the infrastructure is estimated based on data from two chemical factories, the BASF site of Ludwigshafen and the chemical factory in Gendorf (which are both located in Germany), which produce a wide range of chemical substances. Based on this data, the following assumptions are made: the built area amounts to about 4.2 ha, the plant has an average output of 50'000 t/a and a lifespan of fifty years. The estimated infrastructure amount is therefore 4.00 E-10 units per kg of produced chemical.
  References:
  Althaus H.-J., Chudacoff M., Hischier R., Jungbluth N., Osses M. and Primas A. (2007) Life Cycle Inventories of Chemicals. ecoinvent report No. 8, v2.0. EMPA Dübendorf, Swiss Centre for Life Cycle Inventories, Dübendorf, CH.
  Gendorf (2000) Umwelterklärung 2000, Werk Gendorf. Werk Gendorf, Burgkirchen.
- heat, district or industrial, other than natural gas: 0.7225 MJ; lognormal variance with pedigree 0.1786, pedigree (4,5,5,5,5)
  Estimated value based on expert judgement.
  properties: heating value, net 1 MJ
- urea: 1.26484 kg; lognormal variance with pedigree 0.032025, pedigree (3,5,3,2,1)
  The exchange has been updated from 'urea, as N' into 'urea' and therefore its amount has been scaled (multiplied) from 0.59 kg by 2.1438 kg of 'urea' per kg of 'urea, as N'. Original comment of the exchange is: Data from survey in literature (Diem 2000)
  Uncertainty: d
  properties: dry mass 1 kg, wet mass 1 kg, carbon content, fossil 0.2

## Inputs from nature
- Water, cooling, unspecified natural origin [natural resource, in water]: 0.000457 m3; name water_cooling_UNO_input; source Wilson, J.B. 2009; lognormal variance with pedigree 0.011, pedigree (2,2,2,3,1)
  Calculated based on literature, (Vionnet, S., Quantis Water Database - Technical Report, 2012). UF urea with 65% solids. It includes the processes: formaldehyde reactor, absorber, resin batch reactor.
  property carbon content, non-fossil 0; name C_content_non_fossil
  property wet mass 1000 kg; name WM
  property water content 9081.65; name water_content
  property water in wet mass 999.89 kg; name WWM
  property dry mass 0.1101 kg; name DM
  property carbon content, fossil 0.0104329; name C_content_fossil
- Water, unspecified natural origin [natural resource, in water]: 3.33e-5 m3; name water_UNO_input; source Wilson, J.B. 2009; lognormal variance with pedigree 0.014625, pedigree (3,3,3,2,1)
  (same comment as for Water, cooling, unspecified natural origin)

## Emissions to nature
- Formaldehyde [air, urban air close to ground]: 0.001 kg; lognormal variance with pedigree 0.0661, pedigree (3,5,4,3,3)
  Data from survey in literature (von Däniken et al. 1995)
  Uncertainty: d
- Water [air, unspecified]: 0.000182083 m3; = (water_cooling_UNO_input*fraction_CW_to_air)+(water_UNO_input*fraction_PW_to_air); lognormal variance with pedigree 0.0409, pedigree (2,2,2,1,1)
  Calculated as a fraction of the input of water. For more details, refer to the mathematical relation and the parameters.
  property fraction, origin: salt water 0; name fraction_origin_salt_water
  property fraction, origin: fresh water 0; name fraction_origin_fresh_water
  property fraction, origin: unspecified 1; name fraction_origin_unspecified
- Water [water, unspecified]: 0.000308218 m3; = water_cooling_UNO_input*(1-fraction_CW_to_air)+water_UNO_input*(1-fraction_PW_to_air); lognormal variance with pedigree 0.0409, pedigree (2,2,2,1,1)
  (same comment as for Water)
  property fraction, origin: fresh water 0; name fraction_origin_fresh_water_Ww
  property fraction, origin: salt water 0; name fraction_origin_salt_water_Ww
  property fraction, origin: unspecified 1; name fraction_origin_unspecified_Ww

## Sampling procedure
Based on literature and estimations.

## Extrapolations
This dataset has been extrapolated from year 2020 to the year of the calculation (2021). The uncertainty has been adjusted accordingly.

## Review by Emilia Moreno Ruiz 2017-08-09
This dataset was additionally reviewed in a separate review process by Eric Johnson of Atlantic Consulting as well as Emilia Moreno Ruiz and Gregor Wernet of ecoinvent.
