# gypsum quarry operation

Dataset: EcoSpold 2, unit process
Geography: ZA
Time period: 2017-01-01 to 2021-12-31
Technology level: current
Classification: EcoSpold01Categories: construction materials/others
Classification: ISIC rev.4 ecoinvent: 0810:Quarrying of stone, sand and clay
Synonyms: calcium sulphate dihydroxide; anhydrite; Gypsum; sulphate of lime
Tags: combined production
Scenario: Business-as-Usual
System model: Allocation, cut-off by classification
Share of production covered: 1 %
Generated by: Rachel Muigai
Published in: Muigai, R. 2017
Database: ecoinvent
isCopyrightProtected: true
accessRestrictedTo: 1

## General comment
The multi-output-process 'mining, gypsum' delivers the co-products 'gypsum, mineral, at mine' and 'anhydrite rock, at mine'. Allocation is done by weight. In some mines anhydrite is not exploited but left in the mine. Since the electricity consumption has a relevant share on the total energy consumption, the choice of the energy mix is important. For gypsum mined in countries with high fossil share in the electricity mix this module has to be adopted accordingly.5.57E+08 kg is the yearly average amount of gypsum produced in South Africa between 2007 - 2012 (Sources:www.dmr.gov.za (PUBLICATIONS/MINERAL ECONOMICS).

Major markets for natural gypsum in South Africa are plasterboards (calcined gypsum) and cement manufacture (uncalcined gypsum), followed by the agricultural sector where it is used for soil treatment (Source: Department of Mineral Resources SA (2009), Gypsum in South Africa, Report R82/2009
).

## Included activities start
quarrying of the gypsum

## Included activities end
mining and crushing of gypsum and anhydrite

## Geography
Data has been extrapolated from "gypsum quarry operations, GLO" dataset. Accessed 20171128.

## Technology
open-cast mining; composition of products: South Africa's gypsum deposits consist of several ‘types’ of gypsum, from high-grade powdery gypsum which contains about 90% pure gypsum, to gypsum mixed with clay containing around 65% to 85% gypsum (Source: Oosterhuis, W.R., 1998, Gypsum, In: Wilson, M.G.C. and Anhaeusser, C.R. (Eds.), The Mineral Resources of South Africa: Handbook, Silverton: Council for Geoscience, pp. 394-399). For calulation purposes it is assumed that gypsum content is 65% (lowest content locally) and anhydrite content is 34%, and 1 % is other elements.

## Parameters
- sum of reference products: 1 kg; name sum_RP
  It's the addition of the different reference product's amount

## Reference product
- gypsum, mineral: 0 kg; name gypsum; By-product classification allocatable product; CPC 15200: Gypsum; anhydrite; limestone flux; limestone and other calcareous stone, of a kind used for the manufacture of[…]; pedigree (1,1,1,1,1)
  The amount was calculated relative to the production volumes.
  EcoSpold01Location=CH
  production volume 0 kg; name gypsum_PV
    6-year (2007-2012) Annual average production volume of gypsum+anhydrite was obtained from www.dmr.gov.za (PUBLICATIONS/MINERAL ECONOMICS).
    It was considered that 34% was anhydrite and 65% gypsum
  property price 0.005 EUR2005; name gypsum_price_EUR2005
    Temporary price data. Calculated as 90% of purchasers price based on: 2004 prices for gypsum, crude, at mine in USGS (2007) Mineral commodity summaries 2007. <http://minerals.usgs.gov/minerals/pubs/mcs/2007/mcs2007.pdf> [Accessed 25 May 2010] and USGS (2009a) Mineral commodity summaries 2009. <http://minerals.usgs.gov/minerals/pubs/mcs/2009/mcs2009.pdf> [Accessed 25 May 2010]; The prices from USGS are assumed to be World/USA prices because they were collected from USA, major producer countries or global market (e.g. London, Metal Exchange).
  property carbon content 0
    carbon content on a dry matter basis (reserved; not for manual entry)
  properties: wet mass 1 kg, carbon content, non-fossil 0, water content 0, water in wet mass 0 kg, carbon content, fossil 0, dry mass 1 kg, carbon allocation 0 kg
- anhydrite rock: 1 kg; name anhydrite_rock; = anhydrite_rock_PV/(anhydrite_rock_PV+ gypsum_PV); CPC 15200: Gypsum; anhydrite; limestone flux; limestone and other calcareous stone, of a kind used for the manufacture of[…]; By-product classification allocatable product; pedigree (1,1,1,1,1)
  The amount was calculated relative to the production volumes.
  EcoSpold01Location=CH
  production volume 1.8938e8 kg; name anhydrite_rock_PV
    6-year (2007-2012) Annual average production volume of gypsum+anhydrite was obtained from www.dmr.gov.za (PUBLICATIONS/MINERAL ECONOMICS).
    It was considered that 34% was anhydrite and 65% gypsum (ecoinvent v2.2 report 7)
  property price 0.005 EUR2005; name anhydrite_rock_price_EUR2005
    Temporary price data. Calculated as 90% of purchasers price based on: Same price as for gypsum has been assumed
  property carbon content 0
    carbon content on a dry matter basis (reserved; not for manual entry)
  properties: wet mass 1 kg, dry mass 1 kg, water content 0, carbon content, fossil 0, water in wet mass 0 kg, carbon content, non-fossil 0, carbon allocation 0 kg

## Inputs from technosphere
- conveyor belt: 1.05e-8 m; = (1.05E-08/sum_RP)*( anhydrite_rock+gypsum); lognormal variance with pedigree 0.402, pedigree (5,4,3,1,3)
  Extrapolated value: “gypsum quarry operation, GLO” dataset accessed 2017/11/13.
  EcoSpold01Location=RER
- diesel, burned in building machine: 0.018 MJ; = (0.018/sum_RP)*( anhydrite_rock+gypsum); lognormal variance with pedigree 0.152, pedigree (1,4,3,1,3)
  EcoSpold01Location=GLO
  Extrapolated value: “gypsum quarry operation, GLO” dataset accessed 2017/11/13.
  properties: heating value, net 1 MJ
- industrial machine, heavy, unspecified: 4.63e-6 kg; = (4.63E-06/sum_RP)*( anhydrite_rock+gypsum); lognormal variance with pedigree 0.334, pedigree (3,4,3,1,3)
  (same comment as for conveyor belt)
- recultivation, limestone mine: 1.85e-5 m2; = (1.85E-05/sum_RP)*( anhydrite_rock+gypsum); lognormal variance with pedigree 0.152, pedigree (4,4,3,1,1)
  Extrapolated value: “gypsum quarry operation, GLO” dataset accessed 2017/11/13.
  EcoSpold01Location=CH
- electricity, medium voltage: 0.000916 kWh; = (0.000916/sum_RP)*( anhydrite_rock+gypsum); lognormal variance with pedigree 0.034, pedigree (3,4,3,1,3)
  EcoSpold01Location=CH
  Extrapolated value: “gypsum quarry operation, GLO” dataset accessed 2017/11/13.
- limestone quarry infrastructure: 5.26e-11 unit; = (5.26E-11/sum_RP)*( anhydrite_rock+gypsum); lognormal variance with pedigree 0.334, pedigree (3,4,3,1,3)
  (same comment as for recultivation, limestone mine)
- blasting: 7.73e-5 kg; = (7.73E-05/sum_RP)*( anhydrite_rock+gypsum); lognormal variance with pedigree 0.032, pedigree (1,4,3,1,3)
  EcoSpold01Location=RER
  Extrapolated value: “gypsum quarry operation, GLO” dataset accessed 2017/11/13.

## Inputs from nature
- Occupation, mineral extraction site [natural resource, land]: 0.000185 m2*year; = (0.000185/sum_RP)*( anhydrite_rock+gypsum); lognormal variance with pedigree 0.072, pedigree (4,4,3,1,1)
  Extrapolated value: “gypsum quarry operation, GLO” dataset accessed 2017/11/13.
- Transformation, from unspecified [natural resource, land]: 1.85e-5 m2; = (1.85E-05/sum_RP)*( anhydrite_rock+gypsum); lognormal variance with pedigree 0.152, pedigree (4,4,3,1,1)
  Extrapolated value: “gypsum quarry operation, GLO” dataset accessed 2017/11/13.
- Transformation, to mineral extraction site [natural resource, land]: 1.85e-5 m2; = (1.85E-05/sum_RP)*( anhydrite_rock+gypsum); lognormal variance with pedigree 0.152, pedigree (4,4,3,1,1)
  Extrapolated value: “gypsum quarry operation, GLO” dataset accessed 2017/11/13.
- Gypsum, in ground [natural resource, in ground]: 1 kg; = (1/sum_RP)*( anhydrite_rock+gypsum); lognormal variance with pedigree 0.002, pedigree (1,1,3,1,1)
  definition

## Emissions to nature
- Particulates, > 10 um [air, non-urban air or from high stacks]: 0.00112 kg; = (0.00112/sum_RP)*( anhydrite_rock+gypsum); lognormal variance with pedigree 0.1301, pedigree (1,5,3,3,4)
  Extrapolated values: “gypsum quarry operation, GLO 2003” dataset accessed 2017/11/13.
- Particulates, > 2.5 um, and < 10um [air, non-urban air or from high stacks]: 0.0004 kg; = (0.0004/sum_RP)*( anhydrite_rock+gypsum); lognormal variance with pedigree 0.2101, pedigree (1,5,3,3,4)
  Extrapolated values: “gypsum quarry operation, GLO 2003” dataset accessed 2017/11/13.
- Particulates, < 2.5 um [air, non-urban air or from high stacks]: 8e-5 kg; = (8E-05/sum_RP)*( anhydrite_rock+gypsum); lognormal variance with pedigree 0.3901, pedigree (1,5,3,3,4)
  Extrapolated value: “gypsum quarry operation, GLO” dataset accessed 2017/11/13.

## Sampling procedure
Secondary data from the "Department of Mineral Resources SA (2009), Gypsum in South Africa, Report R82/2009". Extrapolated values: “gypsum quarry operation, GLO 2003” dataset accessed 2017/11/13.

## Review by Bruno Peuportier 2018-01-17
This dataset corresponds to the Swiss dataset
