# coating powder production

Dataset: EcoSpold 2, unit process
Geography: RER
Time period: 1996-01-01 to 2021-12-31
Technology level: current
Classification: EcoSpold01Categories: metals/processing
Classification: ISIC rev.4 ecoinvent: 2022:Manufacture of paints, varnishes and similar coatings, printing ink and mas
Tags: ConvertedDataset
Scenario: Business-as-Usual
System model: Allocation, cut-off by classification
Generated by: Hans-Jörg Althaus
Published in: Althaus H.-J. 2004
Database: ecoinvent
isCopyrightProtected: true
accessRestrictedTo: 1

## General comment
A 1:1 mixture of epoxy and polyester resin is assumed. Powders of this composition are mainly used for exterior architectural applications. The pigment inventoried is TiO2. Other pigments (and thus other colours) could have very different ecoprofiles. Since many different powders are available on the market, the representation of a specific powder can be poor.
[This dataset was already contained in the ecoinvent database version 2. It was not individually updated during the transfer to ecoinvent version 3. Life Cycle Impact Assessment results may still have changed, as they are affected by changes in the supply chain, i.e. in other datasets. This dataset was generated following the ecoinvent quality guidelines for version 2. It may have been subject to central changes described in the ecoinvent version 3 change report (http://www.ecoinvent.org/database/ecoinvent-version-3/reports-of-changes/), and the results of the central updates were reviewed extensively. The changes added e.g. consistent water flows and other information throughout the database. The documentation of this dataset can be found in the ecoinvent reports of version 2, which are still available via the ecoinvent website. The change report linked above covers all central changes that were made during the conversion process.]

## Included activities end
Powder fabrication and packing in buckets. The functional unit refers to 1 kg of powder. For transports the buckets (0.0133 kg/kg powder) have to be taken into account separately

## Geography
Swiss waste treatment assumed

## Technology
Extrusion and grinding. This technology is commonly used with thermosetting powders.

## Reference product
- coating powder: 1 kg; CPC 35110: Paints and varnishes and related products; By-product classification allocatable product
  EcoSpold01Location=RER
  production volume 1.32237 kg
    This is a placeholder value that does not reflect real-world production volumes. This dataset does not currently require a real-world production volume to work in the database framework, and no actual data were collected yet. This has no negative effect on the results of the ecoinvent database. The placeholder value of this activity was scaled according to the nominal GDP of 2005 (source: United Nations, http://data.un.org/Glossary.aspx?q=GDP+%28current+US%24%29, accessed 20130726) to reflect an appropriate share of the global production volume, which is also a placeholder value.
  property heating value, net 10.28 MJ
    LHV is calculated based on the Carbon content of the product. More details can be found on the respective documentation.
  property price 39.5419 EUR2005
    Calculated based on inputs: The price of the product has been calculated as a sum of the values of the material and energy inputs for this product. This value is therefore a rough estimation. It may underestimate the real price since there are additional expenses when producing any product. These expences can include for example labour costs, treatment of waste materials and profit for the producer. Please consider carefully whether this level of data quality is acceptable for your application.
  property carbon content, fossil 0.339435
    The dataset assumes a 1:1 mixture of epoxy (C7H15ClO4) and polyester resin (C8H6O2, C8H16O4, C5H12O2,C4H2O3)n (29.3% w/w each). The pigment inventoried (35.4% w/w) is TiO2 (ecoinvent v2.2 report 10-part 10). The C content has been calculated as the addition of C content in each ingredient (including chemicals, organic)
  property carbon content 0.339435
    carbon content on a dry matter basis (reserved; not for manual entry)
  properties: wet mass 1 kg, water content 0, dry mass 1 kg, water in wet mass 0 kg, carbon content, non-fossil 0, carbon allocation 0.339435 kg

## Inputs from technosphere
- chemical, organic: 0.0697 kg; lognormal variance with pedigree 0.0526, pedigree (3,3,5,1,1)
  EcoSpold01Location=GLO
  properties: carbon content, fossil 0.628, dry mass 1 kg, wet mass 1 kg, heating value, net 19.03 MJ
  note on carbon content, fossil: This dataset is an unweighted average of 20 organic substances (listed in Tab 88.1, ecoinvent v2.2 report 8, part II), being part of the top100 chemicals included in this database. The C-content has also been calculated as an unweighted average of the C content of the substances composing this dataset.
- epoxy resin, liquid: 0.293 kg; lognormal variance with pedigree 0.0526, pedigree (3,3,5,1,1)
  EcoSpold01Location=RER
  properties: wet mass 1 kg, heating value, net 12.82 MJ, dry mass 1 kg, carbon content, fossil 0.42325
- waste emulsion paint: 0 kg; pedigree (1,1,1,1,1)
  EcoSpold01Location=CH
  production volume 0 kg
    Calculated from the production volume of coating powder in proportion to the respective output amounts.
  properties: carbon content, fossil 0.27, wet mass 1 kg, dry mass 1 kg, heating value, net 8.18 MJ
  note on carbon content, fossil: Tab A.4, ecoinvent v2.2 report 13_I. C content has been calculated after data in the tables, and then referred to 1 kg DM
- polyethylene, low density, granulate: 0.0133 kg; lognormal variance with pedigree 0.0706, pedigree (3,3,5,1,3)
  EcoSpold01Location=RER
  properties: carbon content, fossil 0.857143, wet mass 1 kg, dry mass 1 kg, heating value, net 42.47 MJ
  note on carbon content, fossil: Polyethylene is formed out of a huge amount of ethylene monomers (C2H4) (ecoinvent v2.2 report 11_II). MW=28 g/mol
- titanium dioxide: 0.354 kg; lognormal variance with pedigree 0.0526, pedigree (3,3,5,1,1)
  EcoSpold01Location=RER
  properties: dry mass 1 kg, wet mass 1 kg
- polyester resin, unsaturated: 0.293 kg; lognormal variance with pedigree 0.0526, pedigree (3,3,5,1,1)
  EcoSpold01Location=RER
  properties: carbon content, fossil 0.58584, dry mass 1 kg, heating value, net 17.75 MJ, wet mass 1 kg
  note on carbon content, fossil: (C8H6O2, C8H16O4, C5H12O2,C4H2O3)n was used as a representative formula for unsaturated polyester resin. This formula corresponds to the M390B Unsaturated Polyester Resin (National Industrial Chemicals Notification and Assessment Scheme, full public report, 1994).
- chemical factory, organics: 4e-10 unit; lognormal variance with pedigree 0.46, pedigree (5,5,5,5,5)
  EcoSpold01Location=RER
  activityLink introduced to establish a direct link to the corresponding regional supply of this product
- extrusion, plastic pipes: 1.02 kg; lognormal variance with pedigree 0.0706, pedigree (3,3,5,1,3)
  activityLink introduced to establish a direct link to the corresponding regional supply of this product
  EcoSpold01Location=RER
- electricity, medium voltage: 1.83 kWh; lognormal variance with pedigree 0.0706, pedigree (3,3,5,1,3)
  EcoSpold01Location=UCTE
- waste emulsion paint: -0.00999686, -3.13773e-6 kg (2 entries); lognormal variance with pedigree 0.38, pedigree (5,5,5,5,5)
  EcoSpold01Location=CH
  production volume 0.01 kg

## Emissions to nature
- NMVOC, non-methane volatile organic compounds, unspecified origin [air, unspecified]: 0.0001 kg; lognormal variance with pedigree 0.5, pedigree (5,5,5,5,5)

## Sampling procedure
Literature

## Extrapolations
This dataset has been extrapolated from year 2003 to the year of the calculation (2021). The uncertainty has been adjusted accordingly.

## Review by Roland Hischier 2004-04-01
passed.
