# metalliferous hydroxide sludge, Recycled Content cut-off

Dataset: EcoSpold 2, unit process
Geography: GLO
Time period: 2021-01-01 to 2021-12-31
Technology level: current
Scenario: Business-as-Usual
System model: Allocation, cut-off by classification
Generated by: [System]
isCopyrightProtected: true
accessRestrictedTo: 1

## Reference product
- metalliferous hydroxide sludge: 1 kg; By-product classification Recyclable; CPC 1429: Other non-ferrous metal ores and concentrates (other than uranium or thorium ores and concentrates)
  property aluminium content 0.0005054
    Calculated as a production volume weighted average of properties of all the metalliferous hydroxide sludge products produced in the database.
  property carbon content, non-fossil 0.0112
    Biogene carbon content on a dry matter basis. Calculated as a production volume weighted average of properties of all the metalliferous hydroxide sludge products produced in the database.
  property chromium content 0.000122
    (same comment as for metalliferous hydroxide sludge)
  property barium content 1.646e-5
    (same comment as for metalliferous hydroxide sludge)
  property antimony content 0.000521
    (same comment as for metalliferous hydroxide sludge)
  property arsenic content 1.3087e-5
    (same comment as for metalliferous hydroxide sludge)
  property heating value, net 0 MJ
    Non combustible products are assumed to have an LHV equal to zero (0).
  property zinc content 0.132
    (same comment as for metalliferous hydroxide sludge)
  property manganese content 4.46e-5
    (same comment as for metalliferous hydroxide sludge)
  property silicon content 0.00096
    (same comment as for metalliferous hydroxide sludge)
  property iodine content 3.57e-7
    (same comment as for metalliferous hydroxide sludge)
  property tin content 5.35e-5
    (same comment as for metalliferous hydroxide sludge)
  property selenium content 9.68e-6
    (same comment as for metalliferous hydroxide sludge)
  property titanium content 8.116e-5
    (same comment as for metalliferous hydroxide sludge)
  property potassium content 0.0122
    (same comment as for metalliferous hydroxide sludge)
  property sodium content 0.0163
    (same comment as for metalliferous hydroxide sludge)
  property fluorine content 0.005
    (same comment as for metalliferous hydroxide sludge)
  property iron content 0.00059
    (same comment as for metalliferous hydroxide sludge)
  property copper content 0.00017
    (same comment as for metalliferous hydroxide sludge)
  property phosphorus content 0.01557
    (same comment as for metalliferous hydroxide sludge)
  property sulfur content 0.1053
    (same comment as for metalliferous hydroxide sludge)
  property silver content 3.84e-7
    (same comment as for metalliferous hydroxide sludge)
  property strontium content 2.185e-7
    (same comment as for metalliferous hydroxide sludge)
  property molybdenum content 7.774e-5
    (same comment as for metalliferous hydroxide sludge)
  property lead content 0.003555
    (same comment as for metalliferous hydroxide sludge)
  property nickel content 2.082e-5
    (same comment as for metalliferous hydroxide sludge)
  property vanadium content 0.000574
    (same comment as for metalliferous hydroxide sludge)
  property thallium content 2.91e-6
    (same comment as for metalliferous hydroxide sludge)
  property oxygen content 0.394
    (same comment as for metalliferous hydroxide sludge)
  property cobalt content 9.787e-5
    (same comment as for metalliferous hydroxide sludge)
  property mercury content 8.31e-7
    (same comment as for metalliferous hydroxide sludge)
  property magnesium content 0.0032735
    (same comment as for metalliferous hydroxide sludge)
  property beryllium content 0.0027
    (same comment as for metalliferous hydroxide sludge)
  property bromine content 0.0026
    (same comment as for metalliferous hydroxide sludge)
  property boron content 0.00013285
    (same comment as for metalliferous hydroxide sludge)
  property carbon content, fossil 0.0082
    Fossil carbon content on a dry matter basis. Calculated as a production volume weighted average of properties of all the metalliferous hydroxide sludge products produced in the database.
  property calcium content 0.1045
    (same comment as for metalliferous hydroxide sludge)
  property cadmium content 0.00377
    (same comment as for metalliferous hydroxide sludge)
  property chlorine content 0.176087
    (same comment as for metalliferous hydroxide sludge)
  property carbon content 0.0194
    carbon content on a dry matter basis (reserved; not for manual entry)
  properties: dry mass 0.25 kg, wet mass 1 kg, water content 3, water in wet mass 0.75 kg, carbon allocation 0.00485 kg
