# heat production, air-water heat pump 10kW

Dataset: EcoSpold 2, unit process
Geography: CH
Time period: 1998-01-01 to 2021-12-31
Technology level: current
Classification: EcoSpold01Categories: heat pumps/heating systems
Classification: ISIC rev.4 ecoinvent: 3530:Steam and air conditioning supply
Tags: ConvertedDataset
Scenario: Business-as-Usual
System model: Allocation, cut-off by classification
Share of production covered: 0 %
Generated by: Thomas Heck
Published in: Heck, T. 2007
Database: ecoinvent
isCopyrightProtected: true
accessRestrictedTo: 1

## General comment
This dataset represents the production of heat with an air-water heat pump for an average one family house in the Swiss midland. Switzerland is assumed to represent an average climatological and geological location in Europe. The air-water heat pump has a heat capacity of 10 kW and a Seasonal Performance Factor (SPF) of 2.8 (for the year 1998). For this dataset the infrastructure of a brine-water heat pump with 10 kW is used. Differences in infrastructure between the two types of heat pumps are considered by a scaling factor. Data for the estimation of SPF is based on a field study for Swiss heat pumps an on various literature. Life time is assumed to be 20 years. This dataset is based on the following reference values: for the average one maily house a heating requirement of 10 kW, a heat distribution system (low-temperature system) of 50/40°C and a heat supply of approximately 20.000 kWh with 2.000 operating hours were assumed. The system is assumed to be operated without an auxiliary heating system.
[This dataset was already contained in the ecoinvent database version 2. It was not individually updated during the transfer to ecoinvent version 3. Life Cycle Impact Assessment results may still have changed, as they are affected by changes in the supply chain, i.e. in other datasets. This dataset was generated following the ecoinvent quality guidelines for version 2. It may have been subject to central changes described in the ecoinvent version 3 change report (http://www.ecoinvent.org/database/ecoinvent-version-3/reports-of-changes/), and the results of the central updates were reviewed extensively. The changes added e.g. consistent water flows and other information throughout the database. The documentation of this dataset can be found in the ecoinvent reports of version 2, which are still available via the ecoinvent website. The change report linked above covers all central changes that were made during the conversion process.]

## Included activities start
From ambient air entering the heat pump.

## Included activities end
This activity ends with heat at the air-water heat pump unit with a life time of 20 years. This dataset includes emissions of refrigerant R134a during operation. This dataset doesn´t include the heat distribution in the one family house, nor a buffer heat storage.

## Technology
Air-water heat pumps use ambient air as heat source. Here water represents the heating-circuit water. Most of the heat pumps in Switzerland are operated in a monovalent way, i.e. even at low outdoor temperatures the heat pump provides enough heat and an auxiliary system is not necessary if buildings are well insulated and a low temperature heating system is used. Air-water heat pumps are often used for retrofitting the heating system. When retrofitting heating systems in old buildings, special conditions have to be considered. Usually the heat distribution system in old buildings is operated with higher temperatures than in new buildings. For this purpose, particular retrofit heat pumps were developed. Seasonal Performance factors for retrofit heat pumps (air-water) and Swiss conditions are estimated to range between 2.5 and 2.7.

The Seasonal Performance Factor (SPF) is an important figure which indicates the ratio between heat amount at heat pump (respectively at storage if available) and specific demand for electricity of the heat pump (incl. all common auxiliaries). The Seasonal Performance Factors are estimated, based on a comprehensive field study for heat pump installations in Switzerland.

Projections based on measures result on average in a SPF (SPF 2) of 3.2 for heat pumps installed in 1998 in Switzerland. (Erb et al. 2000) Heat pumps installed in 1994/95 in Switzerland showed on average a SPF of 2.6. (Erb&Hubacher 2001a) Measurements over several years have indicated that the factor hasn’t declined with age. Hence constant Seasonal Performance Factors can be assumed. The difference between values for Swiss SPF and measured COP-values of WPZ is less than 10 %. Half of the sample is at least to some extent used for heating domestic hot water. (Erb et al. 2000)

While until 1998 the analysis of Erb&Hubacher indicates rising SP factors, the COP values have risen continuously until 1995 but then have remained constant, according to measurements of the WPZ (Wärmepumpentestzentrum Winterthur-Töss). (Roth 2001) Hence a good combination of heat pump systems and building technology is essential to achieve a good SPF. (Halozan 2002)

The estimation of the Seasonal Performance Factor is based on a COP-value (Coefficient of Performance) for a B0/W35 system of 3.47 to 4.84, averaged it amounts to 3,83. These values have been measured for brine-water heat pumps with a heat capacity between 9 and 11 kW until 22nd. January 1996 (WPZ 1996). In the year 1996, heat pump manufacturer indicated COP-values between 3 and 3.5. (Multi-Energie, Grünewald 1996); responsible authorities in Zürich and Solothurn indicated values between 3.2 and 3.5 for new systems and a COP of 3 for existing systems. (Energiefachstelle Solothurn 1996, BfK 1996). Measurements of existing systems showed values between 2.2 and 3.9 (2.6 on average). (Hubacher 1996)
References:
Zogg, Martin (2002b): The Swiss Retrofit Heat Pump Programme. Proceedings of the 7th International Energy Agency Conference on Heat Pumping Technologies, Beijing, China, May 19-22, 2002.
Erb M., Eicher H., Hubacher P.: Feldanalyse von Wärmepumpenanlagen. In: 11. Schweizerisches Status-Seminar. 14./15. September 2000, ETH Zürich. ZEN (Zentrum für Energie und Nachhaltigkeit im Bauwesen). Tagungsband. EMPA ZEN. Dübendorf. September 2000.
Erb M and Hubacher P: Field analysis of Swiss heat pump installations. IEA Heat Pump Centre Newsletter. Volume 19 - No. 1/2001. Available from: www.heatpumpcentre.org
Roth S., WPZ-Bulletin Nr. 28. Wärmepumpen-Testzentrum Winterthur Töss (WPZ).
Holozan H. (2002): Heat pumps and the environment. Proceedings of the 7th International Energy Agency Conference on Heat Pumping Technologies, Beijing, China, May 19-22, 2002.
WPZ-Bulletin Nr. 7, Wärmepumpentest- und Ausbildungszentrum Winterthur-Töss, 1996.
Persönliche Mitteilung der Firma Multi Energie AG, Aadorf, April 1996.
Persönliche Mitteilung der Firma Grünenwald AG, Affoltern a/A, April 1996.
Bundesamt für Konjunkturfragen, "Umweltwärme effizient nutzen – Heizen mit Elektro-Wärme¬pumpen", PACER, Bern, 1996.
Messdaten der Firma Hubacher Engeneering, Engelburg, Juli 1996.

## Reference product
- heat, air-water heat pump 10kW: 1 MJ; By-product classification allocatable product; CPC 17300: Steam and hot water
  Estimation. Operating hours of 2000 h/a and a life time of 20 years are assumed for the air-water heat pump. The reciprocal value indicates the amount of heat pumps required to produce one MJ of useful heat.
  EcoSpold01Location=CH
  production volume 0.0336675 MJ
    This is a placeholder value that does not reflect real-world production volumes. This dataset does not currently require a real-world production volume to work in the database framework, and no actual data were collected yet. This has no negative effect on the results of the ecoinvent database. The placeholder value of this activity was scaled according to the nominal GDP of 2005 (source: United Nations, http://data.un.org/Glossary.aspx?q=GDP+%28current+US%24%29, accessed 20130726) to reflect an appropriate share of the global production volume, which is also a placeholder value.
  property price 0.0106 EUR2005
    Average European district heat price from Ecoheatcool and Euroheat 2005-2006, Ecoheat Work package 1: The European heat market. Final report. 10.6 EUR/GJ i s the price of district heat. http://www.solarthermalworld.org/files/Ecoheatcool%20WP1%20Web.pdf?download

## Inputs from technosphere
- electricity, low voltage: 0.0992 kWh; source Erb M. 2000
  EcoSpold01Location=CH
  Estimation. The Swiss electricity mix is used. Data is based on the infrastrucutre of brine-water heat pumps. Differences are considered with a scaling factor. Seasonal Performance Factor of 2.8 (in the year 1998) is estimated. The reciprocal value of the Seasonal Performance Factor (SPF) indicates the required amount of electricity in MJ per MJ of heat, at heat pump (divided by the factor of 3.6 to convert into kWh).
- heat pump, brine-water, 10kW: 1.11e-6 unit; source Frischknecht R. 1999; lognormal variance with pedigree 0.08, pedigree (1,1,5,1,1)
  Estimation. For the calculation of the air-water heat pump the infrastructure of a brine-water heat pump with 10 kW is used. Thus, differences in infrastructure between the two types of heat pumps are considered by a scaling factor.
  The main difference between brine-water and air-water heat pumps lies in the Seasonal Performance Factor and borehole heat exchanger, which in case of the air-water heat pump does not exist.
  Air-water heat pumps have a higher total weight than brine-water heat pumps. (Frischknecht 1999, WPZ 2003). The weight of the air-water heat pump in Frischknecht is assumed to be 173 kg, which would relate to 250 kg for a heat pump with a thermal capacity of 10 kW (compared to 130 kg of weight for the brine-water heat pump with a thermal capacity of 10 kW). The weight of air-water heat pumps can be up to 300 kg. The higher weight of the air-water heat pump is mainly due to the heavy condenser. (ELCOPLUS 2002)
  Furthe references:
  Wärmepumpen-Testzentrum Winterthur-Töss. Testliste. Stand April 2003. <http://www.wpz.ch/>
  ELCOPLUS. Technische Dokumentation Wärmepumpen aerotop. März 2002.
  EcoSpold01Location=CH
- refrigerant R134a: 4e-6 kg; source Frischknecht R. 1999; lognormal variance with pedigree 0.11, pedigree (1,1,5,1,1)
  Estimation. Air-water heat pumps have higher filling quantities of refrigerant than brine-water heat pumps. (Frischknecht 1999, WPZ 2003)The filling quantity of refrigerant R134a amounts to approximately 0,49 kg/kW at operating conditions A2/W35 (WPZ 2003), i.e. about a factor of 1,6 higher than the amount used for brine-water heat pumps. This corresponds in proportion to data given in Frischknecht, where 2 kg of refrigerant were used for a brine-water heat pump (7 kW) and 3 kg of refrigerant were used for an air-water heat pump (7 kW).
  Further references:
  Wärmepumpen-Testzentrum Winterthur-Töss. Testliste. Stand April 2003. <http://www.wpz.ch/>
  EcoSpold01Location=RER
  properties: carbon content, fossil 0.235294, wet mass 1 kg, dry mass 1 kg, heating value, net 9.51 MJ

## Emissions to nature
- Ethane, 1,1,1,2-tetrafluoro-, HFC-134a [air, urban air close to ground]: 4e-6 kg; source Frischknecht R. 1999; lognormal variance with pedigree 0.11, pedigree (1,1,5,1,1)
  Estimation. During operation leakage losses occur, which result in refrigerant emissions to air. Data is based on refrigerant losses of brine-water heat pumps. Air-water heat pumps have higher filling quantities, thus higher emissions than brine-water heat pumps. Differences are considered with a scaling factor of 1,6. 2000 h/a of operating hours are assumed.

## Sampling procedure
Literature and field study of Swiss heat pumps.

## Extrapolations
This dataset has been extrapolated from year 2000 to the year of the calculation (2021). The uncertainty has been adjusted accordingly.

## Review by Gerald Rebitzer (obsolete) 2004-05-28
prepared

## Review by Roland Hischier 2011-09-22
Transfer of documentation done.
