# process-specific burdens, inert material landfill

Dataset: EcoSpold 2, unit process
Geography: CH
Time period: 1995-01-01 to 2021-12-31
Technology level: current
Classification: EcoSpold01Categories: waste management/inert material landfill
Classification: ISIC rev.4 ecoinvent: 3821:Treatment and disposal of non-hazardous waste
Synonyms: cleanfill
Tags: ConvertedDataset
Scenario: Business-as-Usual
System model: Allocation, cut-off by classification
Generated by: Gabor Doka (obsolete)
Published in: Doka G. 2007
Database: ecoinvent
isCopyrightProtected: true
accessRestrictedTo: 1

## General comment
landfill for inert, insoluble, largely unpolluted, mostly mineral wastes like bricks, concrete, excavation material with carbon content below 5%
[This dataset was already contained in the ecoinvent database version 2. It was not individually updated during the transfer to ecoinvent version 3. Life Cycle Impact Assessment results may still have changed, as they are affected by changes in the supply chain, i.e. in other datasets. This dataset was generated following the ecoinvent quality guidelines for version 2. It may have been subject to central changes described in the ecoinvent version 3 change report (http://www.ecoinvent.org/database/ecoinvent-version-3/reports-of-changes/), and the results of the central updates were reviewed extensively. The changes added e.g. consistent water flows and other information throughout the database. The documentation of this dataset can be found in the ecoinvent reports of version 2, which are still available via the ecoinvent website. The change report linked above covers all central changes that were made during the conversion process.]

## Included activities end
process-specific (i.e. independent of waste composition) energy demand and land use of landfill

## Geography
Specific to the technology encountered in Switzerland in 2000.

## Technology
50% of the sites feature a base seal and leachate collection system. landfill with renaturation after closure.

## Reference product
- process-specific burdens, inert material landfill: 1 kg; By-product classification allocatable product; CPC 39: Wastes or scraps
  EcoSpold01Location=CH
  production volume 0.0336675 kg
    This is a placeholder value that does not reflect real-world production volumes. This dataset does not currently require a real-world production volume to work in the database framework, and no actual data were collected yet. This has no negative effect on the results of the ecoinvent database. The placeholder value of this activity was scaled according to the nominal GDP of 2005 (source: United Nations, http://data.un.org/Glossary.aspx?q=GDP+%28current+US%24%29, accessed 20130726) to reflect an appropriate share of the global production volume, which is also a placeholder value.
  property price 0.000523272 EUR2005
    Calculated based on inputs: The price of the product has been calculated as a sum of the values of the material and energy inputs for this product. This value is therefore a rough estimation. It may underestimate the real price since there are additional expenses when producing any product. These expences can include for example labour costs, treatment of waste materials and profit for the producer. Please consider carefully whether this level of data quality is acceptable for your application.

## Inputs from technosphere
- electricity, low voltage: 1.33e-5 kWh; lognormal variance with pedigree 0.0612, pedigree (2,3,5,1,1)
  EcoSpold01Location=CH
  Uncertainty: & basic uncertainty of 1.05;
- diesel, burned in building machine: 0.027 MJ; lognormal variance with pedigree 0.0612, pedigree (2,3,5,1,1)
  EcoSpold01Location=GLO
  Uncertainty: & basic uncertainty of 1.05;
  properties: heating value, net 1 MJ
- heat, central or small-scale, other than natural gas: 0.0013442 MJ; lognormal variance with pedigree 0.0612, pedigree (2,3,5,1,1)
  EcoSpold01Location=CH
  Uncertainty: & basic uncertainty of 1.05;
  properties: heating value, net 1 MJ

## Inputs from nature
- Transformation, to forest, unspecified [natural resource, land]: 4.44e-5 m2; lognormal variance with pedigree 0.1812, pedigree (2,3,5,1,1)
  Uncertainty: & basic uncertainty of 2;
- Transformation, from dump site, inert material landfill [natural resource, land]: 4.44e-5 m2; lognormal variance with pedigree 0.1812, pedigree (2,3,5,1,1)
  Uncertainty: & basic uncertainty of 2;
- Transformation, to shrub land, sclerophyllous [natural resource, land]: 4.44e-5 m2; lognormal variance with pedigree 0.1812, pedigree (2,3,5,1,1)
  Uncertainty: & basic uncertainty of 2;
- Transformation, from shrub land, sclerophyllous [natural resource, land]: 4.44e-5 m2; lognormal variance with pedigree 0.1812, pedigree (2,3,5,1,1)
  Uncertainty: & basic uncertainty of 2;
- Occupation, construction site [natural resource, land]: 4.44e-5 m2*year; lognormal variance with pedigree 0.0912, pedigree (2,3,5,1,1)
  Uncertainty: & basic uncertainty of 1.5;
- Transformation, from pasture, man made [natural resource, land]: 4.44e-5 m2; lognormal variance with pedigree 0.1812, pedigree (2,3,5,1,1)
  Uncertainty: & basic uncertainty of 2;
- Transformation, to dump site, inert material landfill [natural resource, land]: 4.44e-5 m2; lognormal variance with pedigree 0.1812, pedigree (2,3,5,1,1)
  Uncertainty: & basic uncertainty of 2;
- Occupation, shrub land, sclerophyllous [natural resource, land]: 0.000222 m2*year; lognormal variance with pedigree 0.0912, pedigree (2,3,5,1,1)
  Uncertainty: & basic uncertainty of 1.5;
- Occupation, dump site [natural resource, land]: 0.000444 m2*year; lognormal variance with pedigree 0.0912, pedigree (2,3,5,1,1)
  Uncertainty: & basic uncertainty of 1.5;

## Sampling procedure
data from one literature source on sanitary landfill, adapted to features of this landfill type

## Extrapolations
This dataset has been extrapolated from year 1995 to the year of the calculation (2021). The uncertainty has been adjusted accordingly.

## Review by Niels Jungbluth 2003-06-18
Passed.
