# fertilising, by stool splitter, sugarcane

Dataset: EcoSpold 2, unit process
Geography: BR
Time period: 2012-01-01 to 2021-12-31
Technology level: current
Classification: ISIC rev.4 ecoinvent: 0161:Support activities for crop production
Classification: EcoSpold01Categories: agricultural means of production/work processes
Scenario: Business-as-Usual
System model: Allocation, cut-off by classification
Share of production covered: 100 %
Generated by: Mateus Chagas
Published in: Cavalett O. 2016
Database: ecoinvent
isCopyrightProtected: true
accessRestrictedTo: 1

## General comment
This dataset represents the boiler ashes application operation in one hectare (ha). The application is done in the furrow by a stool splitter aiming soil fertilization. Functional Unit (FU) is one hectare of fertiliser application. The operation time is about 2.8 hours per ha (37.5% of this time is actually worked, discounting time for maintenance, waiting in the field and re-allocations between the plots).

## Included activities start
From agricultural field foreseen to be processed.

## Included activities end
This activity ends when ashes are applied. The dataset includes the diesel fuel consumption (13.54 L of diesel per hour of effective operation) and the amount of agricultural machinery and shed. Also taken into consideration is the amount of emissions to the air from diesel combustion and the emission to the soil from tyre abrasion during the work process.

## Geography
The dataset is modeled for sugarcane production system in Brazilian South-Cental region.

## Technology
This activity is performed with a tractor (power 90 hp; weight 3410 kg) plus a stool splitter implement (weight 280 kg). Life spam of this tractor is considered as 13650 operating hours and of the implement as 10000 operating hours. Machinery used, fuel consumption and operation efficiencies were based on data from sugarcane mills in Brazil, expert's informations and unpublished data.

## Time period
Most of the data used to modelling this activity were collected in the last few years (2012-2014).

## Reference product
- fertilising, by stool splitter, sugarcane: 1 ha; CPC 86119: Other support services to crop production; By-product classification allocatable product
  production volume 4.18171e6 ha; = 10454280*2/5
    Estimated based on sugarcane production area in Brazil, year 2014, according to the IBGE data. This operation is assumed to occur twice every 5 years.
  property price 8.5628 EUR2005
    Calculated based on inputs: The price of the product has been calculated as a sum of the values of the material and energy inputs for this product. This value is therefore a rough estimation. It may underestimate the real price since there are additional expenses when producing any product. These expences can include for example labour costs, treatment of waste materials and profit for the producer. Please consider carefully whether this level of data quality is acceptable for your application.

## Inputs from technosphere
- shed: 0.002 m2; lognormal variance with pedigree 0.0127, pedigree (3,3,3,3,3)
  Proxy, based on ecoinvent database.
- agricultural machinery, unspecified: 0.0784314 kg; source Otávio Cavalett 2016; lognormal variance with pedigree 0.0027, pedigree (2,2,3,1,1)
  Proxy, based on data from sugarcane mills in Brazil, expert's informations and unpublished data. The main source of data for agricultural inputs and operations modelling prodedures is detailed in Cavalett et al., 2016.
- diesel: 12.1177 kg; source Otávio Cavalett 2016; lognormal variance with pedigree 0.0027, pedigree (2,2,3,1,1)
  (same comment as for agricultural machinery, unspecified)
  properties: wet mass 1 kg, dry mass 1 kg, carbon content, fossil 0.865, heating value, net 42.8 MJ
  note on carbon content, fossil: C-content of diesel is 86.5% (ecoinvent v2.2 report 6_IV, Tab 3.14)
- tractor, 4-wheel, agricultural: 0.699767 kg; source Otávio Cavalett 2016; lognormal variance with pedigree 0.0027, pedigree (2,2,3,1,1)
  (same comment as for agricultural machinery, unspecified)

## Emissions to nature
All rows: source Nemecek, T. 2007
- Benzo(a)pyrene [air, non-urban air or from high stacks]: 8.85e-5 kg; lognormal variance with pedigree 0.6621, pedigree (3,2,3,1,3)
  Proxy, based on 'Agricultural Field Work Processes'from Nemecek and Kagi, 2007.
- Benzene [air, non-urban air or from high stacks]: 8.85e-5 kg; lognormal variance with pedigree 0.0621, pedigree (3,2,3,1,3)
  Proxy, based on 'Agricultural Field Work Processes'from Nemecek and Kagi, 2007.
- Zinc [air, non-urban air or from high stacks]: 1.21e-5 kg; lognormal variance with pedigree 0.6621, pedigree (3,2,3,1,3)
  Proxy, based on 'Agricultural Field Work Processes'from Nemecek and Kagi, 2007.
- Dinitrogen monoxide [air, non-urban air or from high stacks]: 0.00145 kg; lognormal variance with pedigree 0.0621, pedigree (3,2,3,1,3)
  Proxy, based on 'Agricultural Field Work Processes'from Nemecek and Kagi, 2007.
- Cadmium [air, non-urban air or from high stacks]: 1.21e-7 kg; lognormal variance with pedigree 0.6621, pedigree (3,2,3,1,3)
  Proxy, based on 'Agricultural Field Work Processes'from Nemecek and Kagi, 2007.
- Nickel [air, non-urban air or from high stacks]: 8.48e-7 kg; lognormal variance with pedigree 0.6621, pedigree (3,2,3,1,3)
  Proxy, based on 'Agricultural Field Work Processes'from Nemecek and Kagi, 2007.
- Lead [soil, agricultural]: 0.000165544 kg; lognormal variance with pedigree 0.046, pedigree (3,4,3,1,1)
  Proxy, based on 'Agricultural Field Work Processes'from Nemecek and Kagi, 2007.
- Particulates, < 2.5 um [air, non-urban air or from high stacks]: 0.2 kg; lognormal variance with pedigree 0.0621, pedigree (3,2,3,1,3)
  Proxy, based on 'Agricultural Field Work Processes'from Nemecek and Kagi, 2007.
- Carbon dioxide, fossil [air, non-urban air or from high stacks]: 37.8 kg; lognormal variance with pedigree 0.0221, pedigree (3,2,3,1,3)
  Proxy, based on 'Agricultural Field Work Processes'from Nemecek and Kagi, 2007.
- Sulfur dioxide [air, non-urban air or from high stacks]: 0.0122 kg; lognormal variance with pedigree 0.0221, pedigree (3,2,3,1,3)
  Proxy, based on 'Agricultural Field Work Processes'from Nemecek and Kagi, 2007.
- PAH, polycyclic aromatic hydrocarbons [air, non-urban air or from high stacks]: 3.99e-5 kg; lognormal variance with pedigree 0.3221, pedigree (3,2,3,1,3)
  Proxy, based on 'Agricultural Field Work Processes'from Nemecek and Kagi, 2007.
- Zinc [soil, agricultural]: 0.00101873 kg; lognormal variance with pedigree 0.046, pedigree (3,4,3,1,1)
  Proxy, based on 'Agricultural Field Work Processes'from Nemecek and Kagi, 2007.
- Carbon monoxide, fossil [air, non-urban air or from high stacks]: 0.0654 kg; lognormal variance with pedigree 0.6621, pedigree (3,2,3,1,3)
  Proxy, based on 'Agricultural Field Work Processes'from Nemecek and Kagi, 2007. Emissions of CO, NOx and NMVOC were estimated based on avarege of the agricultural process used in sugarcane production.
- Selenium [air, non-urban air or from high stacks]: 1.21e-7 kg; lognormal variance with pedigree 0.0621, pedigree (3,2,3,1,3)
  Proxy, based on 'Agricultural Field Work Processes'from Nemecek and Kagi, 2007.
- Ammonia [air, non-urban air or from high stacks]: 0.000242 kg; lognormal variance with pedigree 0.0621, pedigree (3,2,3,1,3)
  Proxy, based on 'Agricultural Field Work Processes'from Nemecek and Kagi, 2007.
- Copper [air, non-urban air or from high stacks]: 2.06e-5 kg; lognormal variance with pedigree 0.6621, pedigree (3,2,3,1,3)
  Proxy, based on 'Agricultural Field Work Processes'from Nemecek and Kagi, 2007.
- Chromium [air, non-urban air or from high stacks]: 6.06e-7 kg; lognormal variance with pedigree 0.6621, pedigree (3,2,3,1,3)
  Proxy, based on 'Agricultural Field Work Processes'from Nemecek and Kagi, 2007.
- NMVOC, non-methane volatile organic compounds, unspecified origin [air, non-urban air or from high stacks]: 0.0364 kg; lognormal variance with pedigree 0.0621, pedigree (3,2,3,1,3)
  (same comment as for Carbon monoxide, fossil)
- Nitrogen oxides [air, non-urban air or from high stacks]: 0.515 kg; lognormal variance with pedigree 0.0521, pedigree (3,2,3,1,3)
  (same comment as for Carbon monoxide, fossil)
- Methane, fossil [air, non-urban air or from high stacks]: 0.00156 kg; lognormal variance with pedigree 0.0621, pedigree (3,2,3,1,3)
  Proxy, based on 'Agricultural Field Work Processes'from Nemecek and Kagi, 2007.
- Cadmium [soil, agricultural]: 3.82024e-5 kg; lognormal variance with pedigree 0.046, pedigree (3,4,3,1,1)
  Proxy, based on 'Agricultural Field Work Processes'from Nemecek and Kagi, 2007.

## Sampling procedure
The main source of data for agricultural inputs and operations modelling procedures is detailed in Cavalett et al., 2016. Emissions from the agricultural process are estimated according to Nemecek and Kagi, 2007.

## Extrapolations
This dataset has been extrapolated from year 2014 to the year of the calculation (2021). The uncertainty has been adjusted accordingly.

## Review by Jens Lansche 2018-02-23
All review comments considered
