# textile production, nonwoven polypropylene, spunbond

Dataset: EcoSpold 2, unit process
Geography: IN
Time period: 2013-04-01 to 2021-03-31
Technology level: current
Classification: ISIC rev.4 ecoinvent: 1311:Preparation and spinning of textile fibres
Classification: EcoSpold01Categories: textiles/processing
Scenario: Business-as-Usual
System model: Allocation, cut-off by classification
Generated by: Madhuri Nigam
Published in: Faist Emmenegger, M. 2018
Database: ecoinvent
isCopyrightProtected: true
accessRestrictedTo: 1

## General comment
This dataset represents the production of nonwoven textile from Polypropylene (PP) granules.
Nonwoven fabrics are broadly defined as sheet or web structures bonded together by entangling fiber or filaments (and by perforating films) mechanically, thermally or chemically. They are flat or tufted porous sheets that are made directly from separate fibers, molten plastic or plastic film. They are not made by weaving or knitting and do not require converting the fibers to yarn.
Spunbond Non Woven Fabric application:
1) Shopping bags,tablecloth,compund packing material,filter material
2) Medical field: Face mask; Surgical gown, protective colthes, operation cover,shoe cover, bed sheet etc.
3) Sanitary and Health: Baby & adult diaper, feminie hygiene, hygiene pad, spron, incontinece pad etc
4)Agriculture and horticulture covers
5)Usage:widely used alone or as components of apparel, home furnishings, health care, engineering, industrial and consumer goods etc.

## Included activities start
The process starts with arrival of PP granules

## Included activities end
This process ends with cutting and packaging of non woven spun bond polypropylene

## Geography
Indian average based on inputs from manufacturer in Uttarakhand North India.

## Technology
The process includes opening /mixing, spinning, bonding by heated rollers, cooling, winding cutting and packaging. This process involves feeding of PP granules through hopper, and mixing them with master batch. Granules are melted by heating oil, fibres thus formed are extruded and sprayed. The fibre mesh passes under heated rollers and gets pressed into nonwoven sheets which is then cooled and cut and wound on paper tubes for sale to further processes.

## Reference product
- textile, nonwoven polypropylene: 1 kg; name RP_amount_1; By-product classification allocatable product; CPC 26710: Woven fabrics of man-made filament yarn, obtained from high tenacity yarn of nylon or other polyamides, of pol[…]
  production volume 3.72407e7 kg; name RP_PV_1
    According to Indian Minestry of Textiles, the production of man made fibre is circa 524 million kg. From those it is assumed that polypropylene accounts for 7%.
    Reference:
    Indian Ministry of Textiles, accessed at: http://texmin.nic.in/sites/default/files/texind-overview.pdf on 09/04/2018.
  property price 1.1325 EUR2005; name RP_amount_1_price_EUR2005
    Estimated value. Various souces report a value around, what correspond to, 2.6 EUR per kg of non woven polyester fabric (madeinchina.com. Retrieved from: https://www.made-in-china.com/productdirectory.do?word=polypropylene+non+woven+fabric&subaction=hunt&style=b&mode=and&code=0&comProvince=nolimit&order=0&isOpenCorrection=1, accessed 1Feb2018; Alibaba.com, 2018. Retrieved from: https://www.alibaba.com/trade/search?fsb=y&IndexArea=product_en&CatId=&SearchText=polypropylene+non+woven+fabric&isGalleryList=G, accessed 1Feb2018).
  property heating value, net 32.78 MJ
    Value assumed for all polypropylene products. Source: Phyllis2, database for (treated) biomass, algae, feedstocks for biogas production and biochar, https://phyllis.nl/Biomass/View/1186, ECN.TNO
  property carbon content 0.857143
    carbon content on a dry matter basis (reserved; not for manual entry)
  properties: carbon content, fossil 0.857143, carbon content, non-fossil 0, water content 0, wet mass 1 kg, water in wet mass 0 kg, dry mass 1 kg, carbon allocation 0.857143 kg

## Inputs from technosphere
- sodium hydroxide, without water, in 50% solution state: 0.025 kg; lognormal variance with pedigree 0.0146, pedigree (4,4,3,5,1)
  properties: heating value, net 3.03 MJ, wet mass 1 kg, dry mass 1 kg
- wastewater, average: -0.00166934 m3; name wastewater; = ((water/1000)*.80)*-1; lognormal variance with pedigree 0.0046, pedigree (1,4,3,1,1)
  considering 80% default waste water generation rate
  production volume 62167.3 m3; = RP_PV_1 * (wastewater / RP_amount_1)
    Calculated from production volume of reference product using the relative outputs.
  property price 0 EUR2005; name wastewater_price_EUR2005
  properties: water content 2882.2, dry mass 0.346837 kg, carbon content, non-fossil 0.194039, wet mass 1000 kg
  note on carbon content, non-fossil: 0.0673 kg TOC/m3 (Tab A.17, ecoinvent v2.2 report 13_I). TOC was considered as Total Carbon.
- diesel, burned in diesel-electric generating set, 18.5kW: 0.1593 MJ; lognormal variance with pedigree 0.0046, pedigree (1,4,3,1,1)
  Diesel used for power backup
- tap water: 2.08667 kg; name water; = 0.08667+2; lognormal variance with pedigree 0.0126, pedigree (4,4,3,1,1)
  sum of water used for humidification and cleaning granules
  properties: carbon content, fossil 0.00178991, water content 2962.17, dry mass 0.000337476 kg, wet mass 1 kg
  note on carbon content, fossil: Bicarbonate content is 2.93 mol/m3. CO2 content is 0.1 mol/m3 (ecoinvent v2.2 report 8, Tab 93.1).
- polypropylene, granulate: 1 kg; lognormal variance with pedigree 0.0046, pedigree (1,4,3,1,1)
  granules are recirculated in the system hence no waste output is considered here.
  properties: heating value, net 32.78 MJ
  note on heating value, net: Value extracted from "treatment of waste polypropylene, open burning"
- building, hall: 3.7037e-5 m2; = 4000/(3600000*30); lognormal variance with pedigree 0.3026, pedigree (2,1,3,1,1)
  square meters of building divided by production per year and life time of the plant
- electricity, low voltage: 0.8065 kWh; lognormal variance with pedigree 0.0046, pedigree (1,4,3,1,1)
  sum of electricity used for
  Mixing
  Heating
  Spinning
  Conveyor
  Chilling
  Thermo bonding heaters,
  Winder
  Cutting
  Packaging
  Lighting

## Emissions to nature
- Water [air, unspecified]: 0.000417334 m3; = (water/1000)- (wastewater*-1); lognormal variance with pedigree 0.0046, pedigree (1,4,3,1,1)
  considering default value of 20% water evaporation rate

## Sampling procedure
Industry data. Representative mills in Uttarakhand (North India) was chosen to provide data based on its technical representativeness of the current state of business and their willingness to participate.

## Extrapolations
This dataset has been extrapolated from year 2014 to the year of the calculation (2021). The uncertainty has been adjusted accordingly.
