# photovoltaic mounting system production, for 570kWp open ground module

Dataset: EcoSpold 2, unit process
Geography: GLO
Time period: 2008-01-01 to 2021-12-31
Technology level: current
Classification: ISIC rev.4 ecoinvent: 4220:Construction of utility projects
Synonyms: open ground mounting
Tags: infrastructure; photovoltaic power
Scenario: Business-as-Usual
System model: Allocation, cut-off by classification
Share of production covered: 10 %
Generated by: Jungbluth Niels
Published in: Jungbluth N. 2012
Database: ecoinvent
isCopyrightProtected: true
accessRestrictedTo: 1

## General comment
This datasets represents the installation of the mounting system needed for the open ground mounting of 1 m2 PV panel.

## Included activities start
This dataset starts from the purchase of the needed components for the photovoltaic open ground mounting system.

## Included activities end
This dataset includes land use of the open ground power plant, packaging materials and the protection fence materials.

This dataset doesn't include the electricity use for erection of the mounting system as this is allocated to the PV plant dataset. The life cycle inventory of the production of mounting systems does not take into account process emissions such as dust, because information is not available.

## Technology
Mounting system for an open ground photovoltaic power plant. Most open ground systems have a foundation of profiles that are piled into the ground. However, in some cases, where piled profiles cannot be used, such as for photovoltaic power plants on sanitary landfills, a concrete foundation is installed. Here, piling is chosen as reference operation.

Weight of the mounting system: 10.37 kg/m2

## Parameters
- density, concrete: 2400 kg/m3; name concrete_density; lognormal variance with pedigree 0.008725, pedigree (1,2,1,2,3)
  Literature value. Elert, G. (ed.) 2012. The Physics FactbookTM. Density of Concrete. Edited by Glenn Elert. hypertextbook.com/facts/1999/KatrinaJones.shtml. Accessed 24.01.2012
- share open ground installations, multi-Si, on open ground, total: 0.351918 dimensionless; name pv_openground_total; lognormal variance with pedigree 0.1782, pedigree (4,5,2,5,5)
  Literature value, calculated value. The shares of the different types of cells and mounting systems are taken from Jungbluth N. et al. (2012)and adapted for GLO for open ground PV plants. According to IEA (2009), there were 35.19% grid-connected centralized PV power plants globally. It is assumed that all centralized PV power plants are open ground plants.
  Sources:
  - Jungbluth N., Stucki M., Flury K., Frischknecht R. and Buesser S. (2012) Life Cycle Inventories of Photovoltaic Power Production. ESU-services Ltd., Uster, CH, retrieved from: www.esu-services.ch/data/public-lci-reports/ <http://www.esu-services.ch/data/public-lci-reports
  - IEA. 2009. Trends in Photovoltaic Applications:Survey report of selected IEA countries between1992 and 2008. International Energy Agency (IEA), Report IEA-PVPS T1-18:2009, Paris Cedex (FR)
- concrete use: 1.3 dimensionless; name concrete; lognormal variance with pedigree 0.1519, pedigree (3,4,3,1,3)
  Literature value. Fence foundation. According to Daniel Fraile Montoro from EPIA all ground-mounted PV systems have a fence because of the insurance and the risk of high voltage access. Amount of concrete taken from [Mason J. M., Fthenakis V. M., Hansen T. and Kim H. C. (2006) Energy Pay-Back and Life Cycle CO2 Emissions of the BOS in an Optimized 3.5 MW PV Installation. In: Progress in Photovoltaics Research and Applications, 14, pp. 179-190.]
- steel use, for protection fence for photovoltaic open ground power plant: 1.1 kg; name steel_fence; lognormal variance with pedigree 0.0522, pedigree (3,3,4,4,4)
  Literature value/estimation. The average value of two literature values have been taken:
  1) 0.52kg/m2 in Mason et al. (2006)
  2) 1.6 kg/m2 in Frischknecht et al. (1996).
  Sources:
  1) Mason J. M., Fthenakis V. M., Hansen T. and Kim H. C. (2006) Energy Pay-Back and Life Cycle CO2 Emissions of the BOS in an Optimized 3.5 MW PV Installation. In: Progress in Photovoltaics Research and Applications, 14, pp. 179-190
  2) Frischknecht R., Bollens U., Bosshart S., Ciot M., Ciseri L., Doka G., Dones R., Gantner U., Hischier R. and Martin A. (1996) Ökoinventare von Energiesyste-men: Grundlagen für den ökologischen Vergleich von Energiesystemen und den Einbezug von Energiesystemen in Ökobilanzen für die Schweiz. 3. Gruppe Energie - Stoffe - Umwelt (ESU), Eidgenössische Technische Hochschule Zü-rich und Sektion Ganzheitliche Systemanalysen, Paul Scherrer Institut, Villigen, Bundesamt für Energie (Hrsg.), Bern, CH, retrieved from: www.energieforschung.ch.
- Installed capacity: 5490 MW; name capacity_installed_2008; lognormal variance with pedigree 0.0562, pedigree (4,2,1,3,3)
  Literature value. New installed capacity of photovoltaic power in 2008. Valid for grid-connected new capacity. [IEA. 2009. Trends in Photovoltaic Applications:Survey report of selected IEA countries between1992 and 2008. International Energy Agency (IEA), Report IEA-PVPS T1-18:2009, Paris Cedex (FR)]
  Uncertainty: The given value for new installed grid-connected capacity in 2008 is too low, which is considered in the uncertainty.
  Investigations for the year 2009 showed the following figures:
  - Total installed capacity in 2009 (on- and offgrid or not specified in the sources): 14560MWp GLO, out of it 7450MWp installed in 2009.
  Source: Data from 30 countries (AU,AT, BE, CA, CN, CZ, DK, FI, FR, DE, GR, HU, IN, IT, JP, LU, MY, MX, NL, PT, SI, ZA, KR, ES, SE, CH, TW, TH, GB, US) and 4 sources: [1] [IEA, 2010. Trends in Photovoltaic Applications:Survey report of selected IEA countries between1992 and 2009. International Energy Agency, Report IEA-PVPS T1-19:2010]; [2] [Eurobserver, 2010. Photovoltaic barometer. Systèmes Solaires - le journal du photovoltaïque; Baromètre Photovoltaïque - Eurobserver Nr.3, avril 2010. ]; [3] [Eurobserver, 2011. Photovoltaic barometer. Systèmes Solaires - le journal du photovoltaïque; Baromètre Photovoltaïque - Eurobserver Nr.5, avril 2011.]; [4] [EPIA.Global Market Outlook for Photovoltaics until 2015. European Photovoltaic Industry Association.]
  - Total installed new capacity in 2009, total: 6188 MW (21 countries) [IEA. 2010. Trends in Photovoltaic Applications:Survey report of selected IEA countries between1992 and 2009. International Energy Agency (IEA), Report IEA-PVPS T1-19:2010, Paris Cedex (FR)]
  - New on-grid capacity in 2009: 6113 MW (21 countries) [IEA. 2010. Trends in Photovoltaic Applications:Survey report of selected IEA countries between1992 and 2009. International Energy Agency (IEA), Report IEA-PVPS T1-19:2010, Paris Cedex (FR)]
  This gives a factor of 7447/6188=1.2 between the sources.
- capacity: 0.57 MW; lognormal variance with pedigree 0.0006, pedigree (1,1,1,1,1)
  capacity of photovoltaic cells in MWp.
- steel use, for photovoltaic open ground mounting system: 6.15 kg; name steel_pv_openground_mounting; lognormal variance with pedigree 0.1312, pedigree (2,3,1,1,1)
  Estimation/measured value. Zinc coated steel. Data from different manufacturers of open ground mounting systems. An expert estimation is then taken for this dataset.
  Uncertainty: It has to be noted that the amount of materials per m2 is quite variable. It depends on factors like actual panel size and location of installation. Thus, for example in Switzerland the mounting structure must be stable also with a certain snow load on the panel while this might not be necessary in Southern Europe. Also the expected maximum wind velocities influence the amount of materials used in the mounting structure. Moreover, larger panels need less amount of mounting materials per square metre.

## Reference product
- photovoltaic mounting system, for 570kWp open ground module: 1 m2; name RP_amount_1; CPC 87360: Installation services of electrical machinery and apparatus n.e.c.; By-product classification allocatable product
  EcoSpold01Location=RER
  production volume 3389.52 m2; name apv_openground; = (capacity_installed_2008*pv_openground_total)/capacity
    Total installed capacity in 2008: 14560MWp GLO, out of it 7450MWp installed in 2008.
    Source: Data from 30 countries (AU,AT, BE, CA, CN, CZ, DK, FI, FR, DE, GR, HU, IN, IT, JP, LU, MY, MX, NL, PT, SI, ZA, KR, ES, SE, CH, TW, TH, GB, US) and 4 sources:
    [IEA, 2010. Trends in Photovoltaic Applications:Survey report of selected IEA countries between1992 and 2009. International Energy Agency, Report IEA-PVPS T1-19:2010]
    [Eurobserver, 2010. Photovoltaic barometer. Systèmes Solaires - le journal du photovoltaïque; Baromètre Photovoltaïque - Eurobserver Nr.3, avril 2010. ]
    [Eurobserver, 2011. Photovoltaic barometer. Systèmes Solaires - le journal du photovoltaïque; Baromètre Photovoltaïque - Eurobserver Nr.5, avril 2011. ]
    [EPIA.Global Market Outlook for Photovoltaics until 2015. European Photovoltaic Industry Association.]
    The shares of the different types of cells and mounting systems are taken from [Jungbluth N., Stucki M., and Frischknecht R. (2010) Photovoltaics. In Dones, R. (Ed.) et al., Sachbilanzen von Energiesystemen: Grundlagen für den ökologischen Vergleich von Energiesystemen und den Einbezug von Energiesystemen in Oekobilanzen für die Schweiz. ecoinvent report No. 6-XII, Swiss Centre for Life Cycle Inventories, Dübendorf, CH, 2010] and adapted for GLO for open ground PV plants.
    This open ground construction is used in the datasets for 569kWp as well as 570kWp installations. It is assumed that there are produced as many pieces of open ground constructions as pv plant installations.
  property lifetime 30 year; name lifetime
    Estimation
  property price 10.9655 EUR2005
    Calculated based on inputs: The price of the product has been calculated as a sum of the values of the material and energy inputs for this product. This value is therefore a rough estimation. It may underestimate the real price since there are additional expenses when producing any product. These expences can include for example labour costs, treatment of waste materials and profit for the producer. Please consider carefully whether this level of data quality is acceptable for your application.

## By-products
- waste paperboard, unsorted: 0 kg; By-product classification Recyclable; CPC 39240: Waste and scrap of paper or paperboard; pedigree (1,1,1,1,1)
  EcoSpold01Location=CH
  Calculated value
  production volume 0 kg; = apv_openground*waste_cardboard
    Calculated value
  property price 0.03924 EUR2005; name waste_cardboard_price_EUR2005
    Temporary price data. Calculated as 90% of purchasers price based on: Assumed to be 10% less than for sorted waste paperboard
  property carbon content, non-fossil 0.483259
    C content was calculated for 1 kg DM, using data in Tab A.3, ecoinvent v2.2 report 13_I.
  property lifetime 30 year; name waste_cardboard_lifetime
    Estimation
  property carbon content 0.483259
    carbon content on a dry matter basis (reserved; not for manual entry)
  properties: heating value, net 15.92 MJ, carbon content, fossil 0, wet mass 1 kg, water content 0.243781, water in wet mass 0.196 kg, dry mass 0.804 kg, carbon allocation 0.38854 kg

## Inputs from technosphere
- waste polyethylene/polypropylene product: 0 kg; name waste_polyethy; pedigree (1,1,1,1,1)
  Estimation. Disposal of plastics parts at end of life
  EcoSpold01Location=CH
  production volume 0 kg
    Calculated value
  property price 0 EUR2005; name waste_polyethy_price_EUR2005
  property lifetime 30 year; name waste_polyethy_lifetime
  properties: dry mass 0.847 kg, carbon content, fossil 0.748045, wet mass 1 kg, heating value, net 42.47 MJ, water content 0.180638
  note on carbon content, fossil: Mixed various plastics was used to estimate the C content of this waste (Tab A.2, ecoinvent v2.2 report 13_I)
- section bar rolling, steel: 6.15 kg; = steel_pv_openground_mounting; source Jungbluth N. 2012; lognormal variance with pedigree 0.04, pedigree (1,1,5,1,1)
  EcoSpold01Location=RER
  Estimation/measured value. Data from different manufacturers of open ground mounting systems. An expert estimation is then taken for this dataset.
- corrugated board box: 0 kg; name cardboard; source Schwarz U. 1992; pedigree (1,1,1,1,1)
  Literature value. Packaging material. Packaging materials are assumed to be the same as reported by Schwarz & Keller (1992) for a mounted slanted roof system.
  EcoSpold01Location=RER
  properties: heating value, net 12.86 MJ, carbon content, fossil 0.000656085, dry mass 0.945 kg, water content 0.0582011, wet mass 1 kg, carbon content, non-fossil 0.432275
  note on carbon content, fossil: Fossil C content was calculated after fossil C contents of chemicals used in the production of board (Tab 10-15 & 10.16 ecoinvent v2.2 report 11_III, part 10)
  note on carbon content, non-fossil: Biogenic C content was calculated after biogenic C contents of chemicals used in the production of board (Tab 10.15 & 10.16, ecoinvent v2.2 report 11_III, part 10).
- waste reinforced concrete: 0 kg; name waste_concrete
  production volume 0 kg
    Calculated from production volume of reference product using the relative outputs.
  property price 0 EUR2005; name waste_concrete_price_EUR2005
  properties: dry mass 0.99418 kg, wet mass 1 kg, water content 0.00585407
- zinc coat, pieces: 0.156 m2; source Jungbluth N. 2012, p. 104; lognormal variance with pedigree 0.1899, pedigree (3,4,5,1,3)
  EcoSpold01Location=RER
  Estimation. Used for the coating of the zinc coated steel used for the mounting structure.
- wire drawing, steel: 1.1 kg; = steel_fence; source Jungbluth N. 2012, p. 101; lognormal variance with pedigree 0.1899, pedigree (3,4,5,1,3)
  Literature value / estimation. According to Daniel Fraile Montoro from EPIA all ground-mounted PV systems have a fence because of the insurance and the risk of high voltage access. He states that there are many different types of fences, but as a normal one a two meters meshed fence with some wire on the top could be considered [Personal communication with Daniel Fraile Montoro from the European Photovoltaic Industry Associa-tion, 17.11.2009]. For the inventory of such a fence, we consider the steel, zinc, and concrete input. The steel is drawn to wire and the zinc is used for a coils coating.
  EcoSpold01Location=RER
- scrap steel: 0 kg; name BP_amount_1
  Calculated value
  production volume 0 kg
    Calculated from production volume of reference product using the relative outputs.
  property price 0 EUR2005; name BP_amount_1_price_EUR2005
  properties: wet mass 1 kg, dry mass 1 kg
- section bar extrusion, aluminium: 3.98 kg; = aluminium; source Jungbluth N. 2012; lognormal variance with pedigree 0.1685, pedigree (1,2,5,1,1)
  (same comment as for section bar rolling, steel)
- aluminium, wrought alloy: 3.98 kg; name aluminium; source Jungbluth N. 2012, p. 101; lognormal variance with pedigree 0.1685, pedigree (1,2,5,1,1)
  Estimation/measured value. Data from different manufacturers of open ground mounting systems. An expert estimation is then taken for this dataset.
  Uncertainty: It has to be noted that the amount of materials per m2 is quite variable. It depends on factors like actual panel size and location of installation. Thus, for example in Switzerland the mounting structure must be stable also with a certain snow load on the panel while this might not be necessary in Southern Europe. Also the expected maximum wind velocities influence the amount of materials used in the mounting structure. Moreover, larger panels need less amount of mounting materials per square metre.
  properties: wet mass 1 kg, dry mass 1 kg
- scrap aluminium: 0 kg; name BP_amount_2
  Calculated value
  production volume 0 kg
    Calculated from production volume of reference product using the relative outputs.
  property price 0 EUR2005; name BP_amount_2_price_EUR2005
  property carbon content, fossil 0; name C_content_fossil
  property water in wet mass 0 kg; name WWM
  property wet mass 1 kg; name WM
  property water content 0; name water_content
  property dry mass 1 kg; name DM
  property carbon content, non-fossil 0; name C_content_non_fossil
- steel, chromium steel 18/8, hot rolled: 0.25 kg; name steel_chromium; source Jungbluth N. 2012, p. 101; lognormal variance with pedigree 0.1779, pedigree (2,3,5,1,1)
  EcoSpold01Location=RER
  Estimation/measured value. Stainless steel. Data from different manufacturers of open ground mounting systems. An expert estimation is then taken for this dataset.
  Uncertainty: It has to be noted that the amount of materials per m2 is quite variable. It depends on factors like actual panel size and location of installation. Thus, for example in Switzerland the mounting structure must be stable also with a certain snow load on the panel while this might not be necessary in Southern Europe. Also the expected maximum wind velocities influence the amount of materials used in the mounting structure. Moreover, larger panels need less amount of mounting materials per square metre.
  properties: carbon content, fossil 0.0008, dry mass 1 kg, wet mass 1 kg
  note on carbon content, fossil: Stainless steel model is the grade 304 steel (18/8 stainless, 18% chromium 8% nickel; max. 0.08% C)
- waste polystyrene isolation, flame-retardant: 0 kg; name waste_polystyrene; pedigree (1,1,1,1,1)
  Calculated value. Disposal of plastics parts at end of life
  EcoSpold01Location=CH
  production volume 0 kg
    Calculated value
  property price 0 EUR2005; name waste_polystyrene_price_EUR2005
  property lifetime 30 year; name waste_polystyrene_lifetime
  properties: dry mass 0.998012 kg, wet mass 1 kg, carbon content, fossil 0.918145, water content 0.00199232, heating value, net 38.67 MJ
  note on carbon content, fossil: Polystyrene isolation (EPS) is flame-retarded with hexa-bromo-cyclo-dodecan (C12H18Br6) and contains 0.67 w% bromine (ecoinvent v2.2 report 13_I, pg 39). The rest is polystyrene: (C8H8)n.
- zinc coat, coils: 0.11 m2; source Frischknecht R. 1996; lognormal variance with pedigree 0.1899, pedigree (3,4,5,1,3)
  (same comment as for wire drawing, steel)
- polystyrene, high impact: 0.0045455 kg; name polystyrene; source Schwarz U. 1992; lognormal variance with pedigree 0.1899, pedigree (3,4,5,1,3)
  EcoSpold01Location=RER
  Literature value. Packaging material. Packaging materials are assumed to be the same as reported by Schwarz & Keller (1992) for a mounted slanted roof system.
  properties: dry mass 1 kg, wet mass 1 kg, carbon content, fossil 0.923077, heating value, net 38.67 MJ
  note on carbon content, fossil: Chemical formula of polystyrene is (C8H8)n (ecoinvent v2.2 report 11_II)
- polyethylene, high density, granulate: 0.00090909 kg; name polyethylene; source Jungbluth N. 2012, p. 104; lognormal variance with pedigree 0.1685, pedigree (1,2,5,1,1)
  Literature and own estimations, recycled PE
  EcoSpold01Location=RER
  properties: wet mass 1 kg, dry mass 1 kg, carbon content, fossil 0.857143, heating value, net 42.47 MJ
  note on carbon content, fossil: Polyethylene is formed out of a huge amount of ethylene monomers (C2H4) (ecoinvent v2.2 report 11_II). MW=28 g/mol
- concrete, normal: 0.000541667 m3; name concrete_normal; = concrete/ concrete_density; source de Wild-Scholten M. J. 2006; lognormal variance with pedigree 0.04, pedigree (1,1,5,1,1)
  Literature value / estimation. According to Daniel Fraile Montoro from EPIA all ground-mounted PV systems have a fence because of the insurance and the risk of high voltage access. He states that there are many different types of fences, but as a normal one a two meters meshed fence with some wire on the top could be considered [Personal communication with Daniel Fraile Montoro from the European Photovoltaic Industry Associa-tion, 17.11.2009]. For the inventory of such a fence, we consider the steel, zinc, and concrete input. The steel is drawn to wire and the zinc is used for a coils coating.
  EcoSpold01Location=CH
  properties: wet mass 2380 kg, dry mass 2190 kg, water content 0.086758
- reinforcing steel: 7.25 kg; name steel_reinforcing; = steel_pv_openground_mounting+ steel_fence; source Jungbluth N. 2012, p. 101; lognormal variance with pedigree 0.04, pedigree (1,1,5,1,1)
  EcoSpold01Location=RER
  Literature and own estimations
  properties: dry mass 1 kg, carbon content, fossil 0.004, wet mass 1 kg
- waste paperboard, unsorted: -0.086364 kg; lognormal variance with pedigree 0.1899, pedigree (3,4,5,1,3)
  EcoSpold01Location=CH
  Calculated value
  production volume 292.733 kg
  properties: heating value, net 15.92 MJ, carbon content, non-fossil 0.483259, wet mass 1 kg, water content 0.243781, dry mass 0.804 kg
  note on carbon content, non-fossil: C content was calculated for 1 kg DM, using data in Tab A.3, ecoinvent v2.2 report 13_I.
- waste polyethylene/polypropylene product: -0.000254994, -7.65171e-6, -0.000646444 kg (3 entries); lognormal variance with pedigree 0.1899, pedigree (3,4,5,1,3)
  Estimation. Disposal of plastics parts at end of life
  EcoSpold01Location=CH
  production volume 3.08138 kg
  properties: dry mass 0.847 kg, carbon content, fossil 0.748045, wet mass 1 kg, heating value, net 42.47 MJ, water content 0.180638, lifetime 30 year
- corrugated board box: 0.0178326, 0.000797308, 0.0677341 kg (3 entries); source Schwarz U. 1992; lognormal variance with pedigree 0.1899, pedigree (3,4,5,1,3)
  (same comment as for corrugated board box)
- waste reinforced concrete: -0.559469, -0.005928, -7.9846 kg (3 entries)
  production volume 28980.4 kg
- scrap steel: -1.82621, -0.00231375, -5.67147 kg (3 entries)
  Calculated value
  production volume 25421.4 kg
- scrap aluminium: -1.26249, -0.059233, -2.65828 kg (3 entries)
  Calculated value
  production volume 13490.3 kg
  properties: wet mass 1 kg, dry mass 1 kg
- waste polystyrene isolation, flame-retardant: -0.00127498, -3.8259e-5, -0.00323226 kg (3 entries); lognormal variance with pedigree 0.1899, pedigree (3,4,5,1,3)
  Calculated value. Disposal of plastics parts at end of life
  EcoSpold01Location=CH
  production volume 15.4071 kg
  properties: dry mass 0.998012 kg, wet mass 1 kg, carbon content, fossil 0.918145, lifetime 30 year, water content 0.00199232, heating value, net 38.67 MJ

## Inputs from nature
- Occupation, industrial area [natural resource, land]: 141 m2*year; = land_use*lifetime; source Jungbluth N. 2012; lognormal variance with pedigree 0.188, pedigree (3,3,5,3,3)
  Calculated value.
- Transformation, from pasture, man made [natural resource, land]: 4.7 m2; name land_use; source Mason J. M. 2006; lognormal variance with pedigree 0.1899, pedigree (3,4,5,1,3)
  Literature value/Estimation. The total area of PV modules used in the large PV power plants is not calculated from the cell efficiency, but corresponds to the actual situation at the power plants investigated. The land use related to an open ground mounting system is 4.7 m2 per m2 of installed modules, based on information about a 3.5 MWp open ground power plant described by Mason et al. (2006) and a 560 kWp open ground power plant described by Frischknecht et al. (1996)
  [Frischknecht R., Bollens U., Bosshart S., Ciot M., Ciseri L., Doka G., Dones R., Gantner U., Hischier R. and Martin A. (1996) Ökoinventare von Energiesyste-men: Grundlagen für den ökologischen Vergleich von Energiesystemen und den Einbezug von Energiesystemen in Ökobilanzen für die Schweiz. 3. Gruppe Energie - Stoffe - Umwelt (ESU), Eidgenössische Technische Hochschule Zürich und Sektion Ganzheitliche Systemanalysen, Paul Scherrer Institut, Villigen, Bundesamt für Energie (Hrsg.), Bern, CH, retrieved from: www.energieforschung.ch.]
- Transformation, to industrial area [natural resource, land]: 4.7 m2; = land_use; source Jungbluth N. 2012; lognormal variance with pedigree 0.188, pedigree (3,3,5,3,3)
  Literature value/Estimation. The total area of PV modules used in the large PV power plants is not calculated from the cell efficiency, but corresponds to the actual situation at the power plants investigated.

## Sampling procedure
Data from manufacturers

## Extrapolations
This dataset has been extrapolated from year 2008 to the year of the calculation (2021). The uncertainty has been adjusted accordingly.

## Review by Christian Bauer 2012-02-01
passed

## Review by Bo Weidema 2012-02-01
As an exception, this dataset has only been reviewed by two reviewers. This can be justified by the limited number of exchanges with the environment of such an infrastructure dataset.
