# treatment of used refrigerant R-12, venting

Dataset: EcoSpold 2, unit process
Geography: GLO
Time period: 2010-01-01 to 2021-12-31
Technology level: current
Classification: ISIC rev.4 ecoinvent: 3822:Treatment and disposal of hazardous waste
Scenario: Business-as-Usual
System model: Allocation, cut-off by classification
Generated by: Avraam Symeonidis
Database: ecoinvent
isCopyrightProtected: true
accessRestrictedTo: 1

## General comment
This dataset represents treatment of used refrigerant R-12 by venting.
The refrigerant R-12 was a widely used refrigerant (mainly in automobile) and as aerosol spray propellant. It can be treated by two different technologies; 1) venting, and 2) final disposal.
R-12 is included in the list of "venting prohibition" under (§82.154, subpart F) under section 608 of the Clean Air Act in USA.
Reference: US EPA, accessed at https://www.epa.gov/section608/stationary-refrigeration-prohibition-venting-refrigerants, on 4/4/2018).

## Included activities start
The activity starts, when the used refrigerant is accepted for treatment.

## Included activities end
No energy is used during this process.

## Technology
Venting refers to releasing of the R-12 refrigerant to air. R-12 production was banned with the Montreal Protocol with this decision being in effect globally since 2010. Due to that, it is assumed that there is no reclaiming of R-12 around the globe.

## Reference product
- used refrigerant R-12: -1 kg; name used_refrigerant; By-product classification Waste; CPC 39990: Other wastes n.e.c.; CAS 75-71-8
  production volume 4.8e8 kg; = 0.3*0.5*3.2E+9
    Calculated based on literature and estimates.
    The amount of R-12 that is legally produced annually is yet unknown due to its global ban in production in 2010. However it is estimated that 3.2E+9 kg is the amount of refrigerant R-12 that is treated from used refrigerators. The amount derives after scaling the production volume of R-134a (3.4E+8 kg) with the relative presence of R-12 in an average refrigerator (An average refrigerator contains 7% R-134a, 27% R-600a and 66% R-12).
    It is estimated, that 70% of the refrigerant is vented already during the use phase. Estimated based on the information published by IPCC (http://www.ghgprotocol.org/files/ghgp/tools/hfc-pfc.xls, accessed 20150723).
    The shares of the three different technologies are estimated to be as follows;
    0.5 venting
    0.5 final disposal
  property price 0 EUR2005; name used_refrigerant_price_EUR2005
    Waste products are assigned a price of zero as they are assumed to require further treatment.
  property heating value, net 3.01 MJ
    LHV is calculated based on the elemental composition of the substance. Based on the name of the substance, the chemical formula of the substance is manually found to be: C6H15N.
  property carbon content 0.099333
    carbon content on a dry matter basis (reserved; not for manual entry)
  properties: wet mass 1 kg, water content 0, water in wet mass 0 kg, dry mass 1 kg, carbon content, fossil 0.099333, carbon content, non-fossil 0, carbon allocation 0.099333 kg

## Emissions to nature
- Methane, dichlorodifluoro-, CFC-12 [air, unspecified]: 1 kg; = ABS(used_refrigerant); lognormal variance with pedigree 0.042, pedigree (1,1,3,1,1)
  Calculated value.
  It is assumed, that all the refrigerant is vented into air.

## Extrapolations
This dataset has been extrapolated from year 2014 to the year of the calculation (2021). The uncertainty has been adjusted accordingly.

## Review by Gabor Doka 2018-04-04
Passed.
