# hard coal briquettes production

Dataset: EcoSpold 2, unit process
Geography: RER
Time period: 1980-01-01 to 2021-12-31
Technology level: current
Classification: ISIC rev.4 ecoinvent: 1920:Manufacture of refined petroleum products
Classification: EcoSpold01Categories: hard coal/fuels
Tags: ConvertedDataset
Scenario: Business-as-Usual
System model: Allocation, cut-off by classification
Generated by: Christian Bauer
Published in: Röder, A. 2007
Database: ecoinvent
isCopyrightProtected: true
accessRestrictedTo: 1

## General comment
Low heating value is 31.4 MJ/kg. Bulk density is 780 kg/m3. Only emission data on particles were available for the production process. The emissions of trace elements are assumed to be proportional to their relevant content in the input coal.
[This dataset was already contained in the ecoinvent database version 2. It was not individually updated during the transfer to ecoinvent version 3. Life Cycle Impact Assessment results may still have changed, as they are affected by changes in the supply chain, i.e. in other datasets. This dataset was generated following the ecoinvent quality guidelines for version 2. It may have been subject to central changes described in the ecoinvent version 3 change report (http://www.ecoinvent.org/database/ecoinvent-version-3/reports-of-changes/), and the results of the central updates were reviewed extensively. The changes added e.g. consistent water flows and other information throughout the database. The documentation of this dataset can be found in the ecoinvent reports of version 2, which are still available via the ecoinvent website. The change report linked above covers all central changes that were made during the conversion process.]

## Included activities end
The process considered is brick making using bitumen as binder, at a temperature below 100°C. The module includes energy input, transport of the coal and emissions to air.

## Geography
German conditions.

## Technology
No specific information available.

## Reference product
- hard coal briquettes: 1 MJ; CPC 11020: Patent fuel and similar solid fuels manufactured from hard coal; By-product classification allocatable product
  EcoSpold01Location=RER
  production volume 1.32237 MJ
    This is a placeholder value that does not reflect real-world production volumes. This dataset does not currently require a real-world production volume to work in the database framework, and no actual data were collected yet. This has no negative effect on the results of the ecoinvent database. The placeholder value of this activity was scaled according to the nominal GDP of 2005 (source: United Nations, http://data.un.org/Glossary.aspx?q=GDP+%28current+US%24%29, accessed 20130726) to reflect an appropriate share of the global production volume, which is also a placeholder value.
  property price 0.00759 EUR2005
    The production volume of this product is small compared to other products supplied by the activities within the same ISIC 3 category. Therefore, an average price of products supplied by the activities in the same ISIC 3 code has been applied.This price is obtained as '_37 Refined petroleum products and fuels, EU27' in the 'EU & DK Input Output Database' (available in SimaPro, 0.24 EUR2003 per kg DS). The price is assumed to be valid for both RER2005, world 2005. Energy content: 31.4 MJ/kg (From Eocinvent)
  property carbon content, fossil 0.833333
    80% C and 4% water in wet mass (ecoinvent v2.1 report 6_VI Table 7.1)
  property carbon content 0.833333
    carbon content on a dry matter basis (reserved; not for manual entry)
  properties: water content 0.0416667, dry mass 0.0305732 kg, carbon content, non-fossil 0, wet mass 0.0318471 kg, water in wet mass 0.00127389 kg, carbon allocation 0.0254777 kg

## Inputs from technosphere
- hard coal: 0.0318 kg; lognormal variance with pedigree 0.04, pedigree (1,1,5,1,1)
  EcoSpold01Location=UCTE
  standard for ressources
  properties: heating value, net 27.91 MJ, water content 0.0638298, carbon content, fossil 0.845, wet mass 1 kg, dry mass 0.94 kg
  note on heating value, net: Based on the Characterization factor of Hard coal in the CED method
  note on carbon content, fossil: C content 75-94% (specified in Tab 1.1, report 6, part VI). A mean content of 0.845 kg C/ kg dry hard coal was considered
- hard coal ash: -0.00016 kg; lognormal variance with pedigree 0.05, pedigree (1,1,5,1,1)
  EcoSpold01Location=DE
  own assumption
  production volume 0.00016 kg
    Calculated from the production volume of hard coal briquettes in proportion to the respective output amounts.
  properties: dry mass 1 kg, wet mass 1 kg
- electricity, medium voltage: 0.000278 kWh; lognormal variance with pedigree 0.34, pedigree (1,1,5,1,1)
  own assumption
  EcoSpold01Location=UCTE
- hard coal briquettes factory: 5.31e-13 unit; lognormal variance with pedigree 0.08, pedigree (1,1,5,1,1)
  own assumption
  EcoSpold01Location=RER
- pitch: 0 kg; pedigree (1,1,1,1,1)
  EcoSpold01Location=RER
  own assumption
  properties: carbon content, fossil 0.83, wet mass 1 kg, dry mass 1 kg, heating value, net 28 MJ
- heat, district or industrial, other than natural gas: 0.0075 MJ; lognormal variance with pedigree 0.34, pedigree (1,1,5,1,1)
  EcoSpold01Location=RER
  own assumption
  properties: heating value, net 1 MJ
- pitch: 0.00221543, 1.45663e-5 kg (2 entries); lognormal variance with pedigree 0.05, pedigree (1,1,5,1,1)
  EcoSpold01Location=RER
  own assumption

## Emissions to nature
- Arsenic [air, non-urban air or from high stacks]: 2.9e-10 kg; lognormal variance with pedigree 0.08, pedigree (1,1,5,1,1)
  own assumption
- Cadmium [air, non-urban air or from high stacks]: 1.5e-11 kg; lognormal variance with pedigree 0.08, pedigree (1,1,5,1,1)
  own assumption
- Potassium [air, non-urban air or from high stacks]: 5.9e-8 kg; lognormal variance with pedigree 0.69, pedigree (1,1,5,1,1)
  own assumption
- Iodine [air, non-urban air or from high stacks]: 5.9e-11 kg; lognormal variance with pedigree 0.69, pedigree (1,1,5,1,1)
  own assumption
- Antimony [air, non-urban air or from high stacks]: 3.3e-11 kg; lognormal variance with pedigree 0.69, pedigree (1,1,5,1,1)
  own assumption
- Aluminium [air, non-urban air or from high stacks]: 5e-7 kg; lognormal variance with pedigree 0.69, pedigree (1,1,5,1,1)
  own assumption
- Lead [air, non-urban air or from high stacks]: 1.2e-9 kg; lognormal variance with pedigree 0.08, pedigree (1,1,5,1,1)
  own assumption
- Barium [air, non-urban air or from high stacks]: 5.9e-9 kg; lognormal variance with pedigree 0.69, pedigree (1,1,5,1,1)
  own assumption
- Chromium [air, non-urban air or from high stacks]: 5.9e-10 kg; lognormal variance with pedigree 0.69, pedigree (1,1,5,1,1)
  own assumption
- Particulates, > 10 um [air, non-urban air or from high stacks]: 5.4e-6 kg; lognormal variance with pedigree 0.34, pedigree (1,1,5,1,1)
  own assumption
- Zinc [air, non-urban air or from high stacks]: 1.5e-11 kg; lognormal variance with pedigree 0.69, pedigree (1,1,5,1,1)
  own assumption
- Silicon [air, non-urban air or from high stacks]: 7.4e-7 kg; lognormal variance with pedigree 0.69, pedigree (1,1,5,1,1)
  own assumption
- Iron [air, non-urban air or from high stacks]: 2.1e-7 kg; lognormal variance with pedigree 0.69, pedigree (1,1,5,1,1)
  own assumption
- Titanium [air, non-urban air or from high stacks]: 1.8e-8 kg; lognormal variance with pedigree 0.69, pedigree (1,1,5,1,1)
  own assumption
- Selenium [air, non-urban air or from high stacks]: 2.9e-11 kg; lognormal variance with pedigree 0.69, pedigree (1,1,5,1,1)
  own assumption
- Bromine [air, non-urban air or from high stacks]: 3.3e-10 kg; lognormal variance with pedigree 0.69, pedigree (1,1,5,1,1)
  own assumption
- Strontium [air, non-urban air or from high stacks]: 5.9e-9 kg; lognormal variance with pedigree 0.69, pedigree (1,1,5,1,1)
  own assumption
- Molybdenum [air, non-urban air or from high stacks]: 8.8e-11 kg; lognormal variance with pedigree 0.69, pedigree (1,1,5,1,1)
  own assumption
- Manganese [air, non-urban air or from high stacks]: 2.1e-9 kg; lognormal variance with pedigree 0.69, pedigree (1,1,5,1,1)
  own assumption
- Zirconium [air, non-urban air or from high stacks]: 1.5e-11 kg; lognormal variance with pedigree 0.69, pedigree (1,1,5,1,1)
  own assumption
- Particulates, < 2.5 um [air, non-urban air or from high stacks]: 1.91e-5 kg; lognormal variance with pedigree 0.34, pedigree (1,1,5,1,1)
  own assumption
- Calcium [air, non-urban air or from high stacks]: 5.9e-8 kg; lognormal variance with pedigree 0.69, pedigree (1,1,5,1,1)
  own assumption
- Boron [air, non-urban air or from high stacks]: 1.6e-9 kg; lognormal variance with pedigree 0.69, pedigree (1,1,5,1,1)
  own assumption
- Cobalt [air, non-urban air or from high stacks]: 1.5e-10 kg; lognormal variance with pedigree 0.69, pedigree (1,1,5,1,1)
  own assumption
- Nickel [air, non-urban air or from high stacks]: 5.9e-10 kg; lognormal variance with pedigree 0.69, pedigree (1,1,5,1,1)
  own assumption
- Copper [air, non-urban air or from high stacks]: 4.4e-10 kg; lognormal variance with pedigree 0.69, pedigree (1,1,5,1,1)
  own assumption
- Phosphorus [air, non-urban air or from high stacks]: 2.9e-9 kg; lognormal variance with pedigree 0.69, pedigree (1,1,5,1,1)
  own assumption
- Beryllium [air, non-urban air or from high stacks]: 6.6e-11 kg; lognormal variance with pedigree 0.69, pedigree (1,1,5,1,1)
  own assumption
- Mercury [air, non-urban air or from high stacks]: 2.9e-12 kg; lognormal variance with pedigree 0.34, pedigree (1,1,5,1,1)
  own assumption
- Magnesium [air, non-urban air or from high stacks]: 1.8e-5 kg; lognormal variance with pedigree 0.69, pedigree (1,1,5,1,1)
  own assumption
- Sodium [air, non-urban air or from high stacks]: 2.9e-8 kg; lognormal variance with pedigree 0.69, pedigree (1,1,5,1,1)
  own assumption
- Uranium [air, non-urban air or from high stacks]: 5.9e-11 kg; lognormal variance with pedigree 0.69, pedigree (1,1,5,1,1)
  own assumption
- Vanadium [air, non-urban air or from high stacks]: 1.2e-9 kg; lognormal variance with pedigree 0.69, pedigree (1,1,5,1,1)
  own assumption
- Particulates, > 2.5 um, and < 10um [air, non-urban air or from high stacks]: 1.15e-5 kg; lognormal variance with pedigree 0.34, pedigree (1,1,5,1,1)
  own assumption
- Thorium [air, non-urban air or from high stacks]: 1.2e-10 kg; lognormal variance with pedigree 0.69, pedigree (1,1,5,1,1)
  own assumption
- Thallium [air, non-urban air or from high stacks]: 2.9e-11 kg; lognormal variance with pedigree 0.69, pedigree (1,1,5,1,1)
  own assumption
- Scandium [air, non-urban air or from high stacks]: 1.2e-10 kg; lognormal variance with pedigree 0.69, pedigree (1,1,5,1,1)
  own assumption

## Sampling procedure
literature

## Extrapolations
This dataset has been extrapolated from year 1992 to the year of the calculation (2021). The uncertainty has been adjusted accordingly.

## Review by Christian Bauer 2003-08-29
passed
