# liquefied petroleum gas, import from RoW

Dataset: EcoSpold 2, unit process
Geography: ZA
Time period: 2014-01-01 to 2021-12-31
Technology level: current
Classification: ISIC rev.4 ecoinvent: 1920:Manufacture of refined petroleum products
Scenario: Business-as-Usual
System model: Allocation, cut-off by classification
Generated by: Carl Vadenbo
Database: ecoinvent
isCopyrightProtected: true
accessRestrictedTo: 1

## General comment
This dataset represents the import of a refined petroleum products of unspecified geographical origin of supply to the domestic/regional market for this product. The transport requirements (expressed in tkm) with tanker ship was assumed to 10'000 km by sea by default. No product losses or other aspects, besides transport requirements have been included. The dataset is only a rough proxy with large uncertainties, and it should hence be revised accordingly if its contribution is expected to be important.

## Included activities start
Activity starts with transport by sea of a refined petroleum product of unspecified geographical origin.

## Included activities end
Activity ends with the refined petroleum product entering the domestic/regional market. Only supply (of unspecified origin) and a proxy transport requirement considered, all other aspects of the import activity are still missing.

## Geography
South Africa

## Reference product
- liquefied petroleum gas: 1 kg; CPC 334: Petroleum gases and other gaseous hydrocarbons, except natural gas; By-product classification allocatable product; CAS 68476-85-7
  production volume 1.013e8 kg
    Import volume for 2016 retreived from Department of Energy (2016) and converted assuming 0.555 kg/L. Department of Energy. (2016, 12 31). Energy Statistics, SA Fuel Sales Volume. Retrieved from Department of Energy, RSA: http://www.energy.gov.za/files/media/media_SAVolumes.html
  property price 0.276 EUR2005
    Temporary price data. Calculated as 90% of purchasers price based on: Average 2004 prices for EU27 from UN Commodity Trade Statistics Database - Average of Propane and butane (http://data.un.org/Data.aspx?q=Butanes+&d=ComTrade&f=_l1Code%3a28%3bcmdCode%3a271113 and http://data.un.org/Data.aspx?q=propane&d=ComTrade&f=_l1Code%3a28%3bcmdCode%3a271112; accessed 1 June 2010).
  property heating value, net 45.5 MJ
    Indicative value. Reference: Fuels - Higher and Lower Calorific Values, available at: https://www.engineeringtoolbox.com/fuels-higher-calorific-values-d_169.html
  property carbon content 0.821863
    carbon content on a dry matter basis (reserved; not for manual entry)
  properties: water in wet mass 0 kg, dry mass 1 kg, carbon content, non-fossil 0, water content 0, wet mass 1 kg, carbon content, fossil 0.821863, carbon allocation 0.821863 kg

## Inputs from technosphere
- transport, freight, sea, tanker for liquefied natural gas: 10 metric ton*km; lognormal variance with pedigree 0.33, pedigree (5,5,5,5,5)
  A transport distance of 10'000 km by sea assumed by default.
- liquefied petroleum gas: 1 kg
  Unspecified geographical origin of supply assumed due to lack of information on actual origin or missing corresponding supplying activity.
  properties: wet mass 1 kg, carbon content, fossil 0.821863, dry mass 1 kg, heating value, net 45.5 MJ
  note on heating value, net: Indicative value. Reference: Fuels - Higher and Lower Calorific Values, available at: https://www.engineeringtoolbox.com/fuels-higher-calorific-values-d_169.html

## Sampling procedure
Annual production volume for gross import of liquefied petroleum gas to ZA retrieved from official statistics (RSA Department of Ernergy 2016). Transport requirements entered as a proxy with high uncertainty.

## Extrapolations
This dataset has been extrapolated from year 2017 to the year of the calculation (2021). The uncertainty has been adjusted accordingly.

## Review by Carl Vadenbo 2021-03-24
Dataset update by chaning input of transport to "transport, freight, sea, tanker for liquefied natural gas" which is assumed to be appropriate also for LPG.
