# silicon production, solar grade, modified Siemens process

Dataset: EcoSpold 2, unit process
Geography: RER
Time period: 2004-01-01 to 2021-12-31
Technology level: current
Classification: ISIC rev.4 ecoinvent: 2011:Manufacture of basic chemicals
Synonyms: polycrystaline SoG-Silicon; Silicone; Silicon tetrahydride; Silicon metal; 7440-21-3; Monosilane
Scenario: Business-as-Usual
System model: Allocation, cut-off by classification
Share of production covered: 75 %
Generated by: [System]
Published in: Jungbluth, N. 2007
Database: ecoinvent
isCopyrightProtected: true
accessRestrictedTo: 1

## General comment
This dataset represents the production of solar-grade silicon for use in the photovoltaic industry. For this use, a purity of >98% is sufficient. The process modeled in this dataset represents a mix of the Siemens process (used for the production of electronic-grade silicon) and a modified Siemens process (developed specifically for the production of solar-grade silicon), with each process having a 50% share. The inventory is based on literature and industry data.
References:
Jungbluth N., Stucki M, and Frischknecht R. (2009) Photovoltaics. In Dones, R. (Ed.) et al., Sachbilanzen von Energiesystemen: Grundlagen für den ökologischen Vergleich von Energiesystemen und den Einbezug von Energiesystemen in Ökobilanzen für die Schweiz. ecoinvent report No. 6-XII, Swiss Centre for Life Cycle Inventories, Dübendorf, CH, 2009.

## Included activities start
The activity starts when the raw materials enter the process.

## Included activities end
This activity ends with the production of high purity polycrystalline silicon from MG-silicon. Only energy use, chemicals and yield are known. Emissions to water are roughly estimated.

## Geography
Data for different types of processes in Europe and North America.

## Technology
Production with the Siemens process either from SiHCl3 or SiH4. Partly with standard the Siemens process and partly with the modified Siemens ('solar grade') process, which has a lower electricity consumption. The mix of electricity supply is in accordance with the actual conditions at the considered production locations.
Reference:
Jungbluth N., Stucki M, and Frischknecht R. (2009) Photovoltaics. In Dones, R. (Ed.) et al., Sachbilanzen von Energiesystemen: Grundlagen für den ökologischen Vergleich von Energiesystemen und den Einbezug von Energiesystemen in Ökobilanzen für die Schweiz. ecoinvent report No. 6-XII, Swiss Centre for Life Cycle Inventories, Dübendorf, CH, 2009.

## Time period
Time of investigation.

## Reference product
- silicon, solar grade: 1 kg; name RP; CPC 342: Basic inorganic chemicals n.e.c.; By-product classification allocatable product; CAS 7440-21-3
  Solar grade silicon finds application in the photovoltaic industry.
  References:
  Jungbluth N., Stucki M, and Frischknecht R. (2009) Photovoltaics. In Dones, R. (Ed.) et al., Sachbilanzen von Energiesystemen: Grundlagen für den ökologischen Vergleich von Energiesystemen und den Einbezug von Energiesystemen in Ökobilanzen für die Schweiz. ecoinvent report No. 6-XII, Swiss Centre for Life Cycle Inventories, Dübendorf, CH, 2009.
  production volume 610000 kg; name RP_PV
    12600 t in 2005
    50% estimated European share of global production
  property price 18.4 EUR2005
    Temporary price data. Calculated as 90% of purchasers price based on: From ecoinvent report, no. 06_XIII, 10, table 5.2, page 32. Based on persomal communication with E. Williams in December 2002.
  property carbon content 0
    carbon content on a dry matter basis (reserved; not for manual entry)
  properties: wet mass 1 kg, water in wet mass 0 kg, water content 0, carbon content, non-fossil 0, carbon content, fossil 0, dry mass 1 kg, carbon allocation 0 kg

## Inputs from technosphere
- silicon, metallurgical grade: 1.13 kg; lognormal variance with pedigree 0.041225, pedigree (2,3,5,2,1)
  Literature
  Uncertainty: L
  properties: wet mass 1 kg, dry mass 1 kg
- electricity, high voltage: 65, 45 kWh (2 suppliers, which the file names only by identifier); sum of these 110 kWh; lognormal variance with pedigree 0.041225, pedigree (2,3,5,2,1)
  Literature, actual sources of electricity can vary with considered production location
  Uncertainty: l
- hydrogen, liquid: 0.050139 kg; lognormal variance with pedigree 0.042625, pedigree (3,3,5,2,1)
  De Wild 2007, share of NaOH, HCl and H2 estimated with EG-Si data
  Uncertainty: d
  properties: dry mass 1 kg, wet mass 1 kg, heating value, net 120.21 MJ
- sodium hydroxide, without water, in 50% solution state: 0.34819 kg; lognormal variance with pedigree 0.042625, pedigree (3,3,5,2,1)
  De Wild 2007, share of NaOH, HCl and H2 estimated with EG-Si data
  Uncertainty: d
  properties: heating value, net 3.03 MJ, wet mass 1 kg, dry mass 1 kg
- hydrochloric acid, without water, in 30% solution state: 1.6017 kg; lognormal variance with pedigree 0.042625, pedigree (3,3,5,2,1)
  De Wild 2007, share of NaOH, HCl and H2 estimated with EG-Si data
  Uncertainty: d
  properties: wet mass 1 kg, heating value, net 3.32 MJ, dry mass 1 kg
- silicone factory: 1e-11 unit; lognormal variance with pedigree 0.358625, pedigree (1,3,5,2,3)
  Estimation
  Uncertainty: E
- heat, district or industrial, natural gas: 185 MJ; lognormal variance with pedigree 0.041225, pedigree (2,3,5,2,1)
  Literature, for process heat
  Uncertainty: l
  properties: heating value, net 1 MJ

## Emissions to nature
- Chloride [water, surface water]: 0.035991 kg; lognormal variance with pedigree 0.3581, pedigree (1,2,5,1,3)
  Environmental report 2002, average Si product
  Uncertainty: E
- DOC, Dissolved Organic Carbon [water, surface water]: 0.00090998 kg; lognormal variance with pedigree 0.0901, pedigree (3,5,5,3,1)
  Extrapolation for sum parameter
  Uncertainty: E
- Phosphate [water, surface water]: 2.8043e-6 kg; lognormal variance with pedigree 0.0981, pedigree (1,2,5,1,3)
  Environmental report 2002, average Si product
  Uncertainty: E
- BOD5, Biological Oxygen Demand [water, surface water]: 0.00020471 kg; lognormal variance with pedigree 0.0981, pedigree (1,2,5,1,3)
  Environmental report 2002, average Si product
  Uncertainty: E
- Zinc, ion [water, surface water]: 1.963e-6 kg; lognormal variance with pedigree 0.6981, pedigree (1,2,5,1,3)
  Environmental report 2002, average Si product
  Uncertainty: E
- Copper, ion [water, surface water]: 1.0236e-7 kg; lognormal variance with pedigree 0.6981, pedigree (1,2,5,1,3)
  Environmental report 2002, average Si product
  Uncertainty: E
- Nitrogen [water, surface water]: 0.00020751 kg; lognormal variance with pedigree 0.0981, pedigree (1,2,5,1,3)
  Environmental report 2002, average Si product
  Uncertainty: E
- AOX, Adsorbable Organic Halogen as Cl [water, surface water]: 1.2619e-5 kg; lognormal variance with pedigree 0.0981, pedigree (1,2,5,1,3)
  Environmental report 2002, average Si product
  Uncertainty: E
- TOC, Total Organic Carbon [water, surface water]: 0.00090998 kg; lognormal variance with pedigree 0.0981, pedigree (1,2,5,1,3)
  Environmental report 2002, average Si product
  Uncertainty: E
- COD, Chemical Oxygen Demand [water, surface water]: 0.00202 kg; lognormal variance with pedigree 0.0981, pedigree (1,2,5,1,3)
  Environmental report 2002, average Si product
  Uncertainty: E
- Iron, ion [water, surface water]: 5.6085e-6 kg; lognormal variance with pedigree 0.6981, pedigree (1,2,5,1,3)
  Environmental report 2002, average Si product
  Uncertainty: E
- Sodium, ion [water, surface water]: 0.03379 kg; lognormal variance with pedigree 0.0981, pedigree (1,2,5,1,3)
  Environmental report 2002, average Si product
  Uncertainty: E

## Sampling procedure
Average of data from one company and estimated data from another company based on literature data.

## Extrapolations
This dataset has been extrapolated from year 2005 to the year of the calculation (2021). The uncertainty has been adjusted accordingly.

## Review by Gregor Wernet 2017-08-04
This dataset was additionally reviewed in a separate review process by Eric Johnson of Atlantic Consulting as well as Emilia Moreno Ruiz and Gregor Wernet of ecoinvent.
