# harvesting/bundling, energy wood harvester

Dataset: EcoSpold 2, unit process
Geography: RoW
Time period: 2012-01-01 to 2021-12-31
Technology level: current
Classification: ISIC rev.4 ecoinvent: 0220:Logging
Classification: EcoSpold01Categories: construction processes/machinery
Synonyms: bundling of slash
Scenario: Business-as-Usual
System model: Allocation, cut-off by classification
Generated by: [System]
Database: ecoinvent
isCopyrightProtected: true
accessRestrictedTo: 1

## General comment
The inventory refers to 1 productive machine hour (PMS) - referring to the operational time of the machine including breaks up to 15 minutes - of an energy wood harvester with an average engine power of 135 kW and a total weight of 21,400 kg.
An energy wood harvester is a type of heavy forestry vehicle employed in the stand or at the forest road for compiling and bundling slash into bundles of energy wood for more easy transportation.
Assumed fuel consumption: 11.55 l/PMH; total service life: 17,600 PMH, average daily transport distance of machinery: 60 km.
Productivity depends on the specific circumstances of the harvesting operation and is specified in the respective datasets.
The following sources have been consulted for the elaboration and plausibilisation of the dataset:
Anonymous (2004): DIRECTIVE 2004/26/EC OF THE EUROPEAN PARLIAMENT AND OF THE COUNCIL of 21 April 2004 amending Directive 97/68/EC on the approximation of the laws of the Member States relating to measures against the emission of gaseous and particulate pollutants from internal combustion engines to be installed in non-road mobile machinery. Official Journal of the European Union: 30.4.2004
Athanassiadis, D., G. Lidestav and I. Wästerlund (1999): Fuel, hydraulic oil and lubricant consumption in Swedish mechanized harvesting operations, 1996. Journal of Forest Engineering, 10(1): 59-66.
Eriksson, L. N. and L. Gustavsson (2008): Biofuels from stumps and small roundwood - costs and CO2 benefits. Biomass and Bioenergy, 32: 897-902.
Eriksson, L. N. and L. Gustavsson (2010): Comparative analysis of wood chips and bundles - costs, carbon dioxide emissions, dry-matter losses and allergic reactions. Biomass and Bioenergy, 34: 82-90.
Eriksson, L. N. and L. Gustavsson (2010): Costs, CO2- and primary energy balances of forest-fuel recovery systems at different forest productivity. Biomass and Bioenergy, 34: 610-619.
Klvac, R. and A. Skoupy (2009): Characteristic fuel consumption and exhaust emissions in fully mechanized logging operations. Journal of Forest Research, 14(6): 328-334: referring to Freitas 2004.
Klvac, R., S. Ward, P. M. O. Owende and J. Lyons (2003): Energy audit of wood harvesting systems. Scandinavian Journal of Forest Research, 18(2): 176-183.
Spielmann, M., L. Barreto, V. Erni, F. Frutig and O. Thees (2007): Life cycle assessment of energy wood chip supply chains; a case study of near future supply of forest wood chips in Switzerland (unpublished). Paul Scherrer Institute (PSI), Swiss Federal Institute for Forest, Snow and Landscape Research (WSL), Villigen, Birmensdorf.
Wittkopf, S., U. Hömer and S. Feller (2003): Bereitstellungsverfahren für Waldhackschnitzel - Leistungen, Kosten, Rahmenbedingungen. Bayer. Landesanstalt für Wald und Forstwirtschaft, Freising.

## Included activities start
Service beginning with the transport of the machinery to the logging site.

## Included activities end
Includes the input of machinery infrastructure, the input of diesel fuel, lubricants/greases, PE straps and the emissions into air from diesel consumption. Wood is not included in the dataset.

## Geography
Emission profile according to European legislation

## Technology
Average european technology

## Parameters
- engine power: 135 kW; name EP; lognormal variance with pedigree 0.5526, pedigree (3,3,1,1,1)
  according to manufacturer's information
- diesel consumption: 11.55 l/hour; name diesel_consumption; lognormal variance with pedigree 0.592, pedigree (5,4,1,1,1)
  according to Spielmann et al. 2007
- share of EURO IIIa: 0.5 dimensionless; name EURO_IIIa; lognormal variance with pedigree 0.592, pedigree (5,4,1,1,1)
  assuming that the relevant share of foresassuming that the relevant share of forest machinery belongs to vehicle types tier EURO IIIa and EURO IIIb as define in the Guideline 97/68/EG by the European Commission.
- load factor: 0.5 dimensionless; name LF; lognormal variance with pedigree 0.5526, pedigree (3,3,1,1,1)
  according to Lambrecht et al. 2004
- lifetime of machine, productive machine hours: 17600 hour; name total_PMH; lognormal variance with pedigree 0.5526, pedigree (3,3,1,1,1)
  according to Spielmann et al. 2007
- scaling factor: 4.30905 dimensionless; name scaling_factor
- share of EURO IIIb: 0.490338 dimensionless; name EURO_IIIb; lognormal variance with pedigree 0.719098, pedigree (1,1,1,1,1)
  assuming that the relevant share of forest machinery belongs to vehicle types tier EURO IIIa and EURO IIIb as define in the Guideline 97/68/EG by the European Commission.

## Reference product
- harvesting/bundling, energy wood harvester: 1 hour; = 0.232069936197014 * scaling_factor; By-product classification allocatable product; CPC 8614: Support and operation services to forestry and logging
  Amount was scaled to 1.
  production volume 2.70311e6 hour; name p_harvesting; = 2000*total_PMH/10
    annual production of machinery: 2000 times total productive machine hours
  property price 16.6213 EUR2005
    Calculated based on inputs: The price of the product has been calculated as a sum of the values of the material and energy inputs for this product. This value is therefore a rough estimation. It may underestimate the real price since there are additional expenses when producing any product. These expences can include for example labour costs, treatment of waste materials and profit for the producer. Please consider carefully whether this level of data quality is acceptable for your application.
  property wet mass 0 kg; name WM
  property carbon content 0
    carbon content on a dry matter basis (reserved; not for manual entry)
  properties: dry mass 0 kg, water content 0, carbon content, non-fossil 0, water in wet mass 0 kg, carbon content, fossil 0, carbon allocation 0 kg

## Inputs from technosphere
- transport, freight, lorry 16-32 metric ton, EURO5: 0 metric ton*km; source Spielmann, M. 2007; pedigree (1,1,1,1,1)
  transport of forest machinery calculated for the weight of the machinery, transported over 60 km and 8 productive machine hours (PMH) per day
  Amount was scaled to the amount of reference product.
- waste mineral oil: -0.393689 kg; name w_mineral_oil; = (0.0913633553259178 * scaling_factor)*-1; source Klvac R. 2003; lognormal variance with pedigree 1.88726, pedigree (1,1,4,5,1)
  hydraulic oil and engine oil/grease; adjusted for water content of waste oil
  Amount was scaled to the amount of reference product.
  production volume 1.06419e6 kg; = w_mineral_oil*p_harvesting
    calculated
  property price 0 EUR2005; name w_mineral_oil_price_EUR2005
  property water content 0.111111; name WC_oil
  property dry mass 0.9 kg; name DM_oil
  properties: carbon content, fossil 0.864444, heating value, net 34.7 MJ
  note on heating value, net: Value taken from the general comment of the treatment dataset.
- diesel, low-sulfur: 0 kg; name m_diesel; source Jirsousek R. 2007; pedigree (1,1,1,1,1)
  Density of diesel: 0.84 kg/l
  property water in wet mass 0 kg; name WWM
  property carbon content, non-fossil 0; name C_content_non_fossil
  property water content 0; name water_content
  property carbon content, fossil 0.865; name C_content_fossil
  properties: heating value, net 42.8 MJ, dry mass 1 kg
- vegetable oil, refined: 0.35346 kg; name m_oil_chainsaw; = 0.0820274396481965 * scaling_factor; source Klvac R. 2003; lognormal variance with pedigree 0.0682, pedigree (2,3,5,5,1)
  used for lubricating chain saw; estimate based on Klvac et al. (2003) as for harvester; value per l converted to kg
  Amount was scaled to the amount of reference product.
  properties: heating value, net 38.4 MJ, dry mass 1 kg, carbon content, non-fossil 0.768
  note on heating value, net: Values is approximated from HHV from "vegetable oil, crude". Source: Radovanovic,M.; Zivanovic,T.; Stojiljkovic,D.; Jovanovic,V.; Jerinic,N.; Knezevic,S. et.al. Utilization of sunflower husk as a fuel for industrial boilers - 20 years experience. Proc. 5th Eur. Conf. on Industrial Furnaces&Boilers 2000,vol.2,p.221-233. Available at: https://phyllis.nl/Biomass/View/2152
- packaging film, low density polyethylene: 1.6 kg; = 0.371311897915222 * scaling_factor; lognormal variance with pedigree 0.083, pedigree (5,5,4,5,1)
  proxy process for PE straps used to fix the bundle; calculated as 20 bundles/PMH and 0.08 kg of PA per bundle
  Amount was scaled to the amount of reference product.
  properties: heating value, net 42.47 MJ, carbon content, fossil 0.857143, wet mass 1 kg, dry mass 1 kg
- energy wood harvester: 5.68182e-5 unit; = 1.31857918293758E-05 * scaling_factor; source Spielmann, M. 2007; lognormal variance with pedigree 0.56, pedigree (1,1,4,5,1)
  assuming a service life of 17600 PMH (according to Spielmann et al. 2007); other sources report lower service lifes between 8000 - 12000 PMH (e.g. Knechtle 1997)
  Amount was scaled to the amount of reference product.
- lubricating oil: 0.35432 kg; name m_lubricating_oil; = 0.082227019793326 * scaling_factor; source Klvac R. 2003; lognormal variance with pedigree 0.0682, pedigree (2,3,5,5,1)
  hydraulic oil and engine oil/grease; estimate based on Klvac et al. (2003) as for forwarder; value per l converted to kg
  Amount was scaled to the amount of reference product.
  properties: heating value, net 40.2 MJ, dry mass 1 kg, carbon content, fossil 0.75
  note on heating value, net: Literature value, Source: IPCC 2006, 2006 IPCC Guidelines for National Greenhouse Gas Inventories, Prepared by the National Greenhouse Gas Inventories Programme, Eggleston H.S., Buendia L., Miwa K., Ngara T. and Tanabe K. (eds). Published: IGES, Japan
- transport, freight, lorry 16-32 metric ton, EURO5: 23.7589, 136.741 metric ton*km (2 entries); source Spielmann, M. 2007; lognormal variance with pedigree 0.0696, pedigree (3,3,5,5,1)
  (same comment as for transport, freight, lorry 16-32 metric ton, EURO5)
- diesel, low-sulfur: 0.338304, 0.341525, 0.682823, 0.022651, 0.153215, 8.15329 kg (6 entries); source Jirsousek R. 2007; lognormal variance with pedigree 0.0113602, pedigree (1,1,4,5,1)
  Density of diesel: 0.84 kg/l
  properties: heating value, net 42.8 MJ, dry mass 1 kg, carbon content, fossil 0.865

## Emissions to nature
- Ammonia [air, non-urban air or from high stacks]: 0.000193716 kg; = 4.49556610160452E-05 * scaling_factor; source Kellenberger D. 2007; lognormal variance with pedigree 0.01, pedigree (1,1,4,5,1)
  value per MJ taken from ecoinvent 2.2 dataset *diesel in building machine" converted to input of diesel as mass
  Amount was scaled to the amount of reference product.
- Selenium [air, non-urban air or from high stacks]: 9.70654e-8 kg; = 2.25259629073974E-08 * scaling_factor; source Kellenberger D. 2007; lognormal variance with pedigree 0.01, pedigree (1,1,4,5,1)
  (same comment as for Ammonia)
- Nitrogen oxides [air, non-urban air or from high stacks]: 0.217328 kg; = 0.0504353845884816 * scaling_factor; source Lambrecht U. 2004; lognormal variance with pedigree 0.245325, pedigree (1,1,4,5,1)
  emission model calculating hourly specific emissions as "engine power x load factor x base emission factor" as proposed by Lambrecht et al. (2004) and applied in Spielmann et al. (2007); values for base emission factors for NOx for mobile machine class EUROIIIb are taken from the European Directive 2004/ 26/EC; for mobile machine class EURO IIIa values for base emission factors for NOx are calculated based on an assumed reduction of VOC emissions as compared to "Tier 2" limit for VOC of 1.0 g/kWh (following Spielmann et al. 2007).
  Amount was scaled to the amount of reference product.
  property dry mass 1 kg; name DM
- Particulates, > 2.5 um, and < 10um [air, non-urban air or from high stacks]: 0.000340577 kg; = 7.90377417468429E-05 * scaling_factor; source Lambrecht U. 2004; lognormal variance with pedigree 0.0100005, pedigree (1,1,4,5,1)
  emission model calculating hourly specific emissions as "engine power x load factor x base emission factor" as proposed by Lambrecht et al. (2004) and applied in Spielmann et al. (2007); values for base emission factors for particles for mobile machine classes EURO IIIa and EUROIIIb are taken from European Directive 2004/ 26/EC. The proportional distribution accross particle classes is made based on the ecoinvent v3 dataset "Diesel, burned in building machine/GLO".
  Amount was scaled to the amount of reference product.
- PAH, polycyclic aromatic hydrocarbons [air, non-urban air or from high stacks]: 3.25625e-5 kg; = 7.55678670184057E-06 * scaling_factor; source Kellenberger D. 2007; lognormal variance with pedigree 0.01, pedigree (1,1,4,5,1)
  (same comment as for Ammonia)
- Dinitrogen monoxide [air, non-urban air or from high stacks]: 0.0011597 kg; = 0.000269130631806699 * scaling_factor; source Kellenberger D. 2007; lognormal variance with pedigree 0.01, pedigree (1,1,4,5,1)
  (same comment as for Ammonia)
- Nickel [air, non-urban air or from high stacks]: 6.80287e-7 kg; = 1.57874269949281E-07 * scaling_factor; source Kellenberger D. 2007; lognormal variance with pedigree 0.01, pedigree (1,1,4,5,1)
  (same comment as for Ammonia)
- NMVOC, non-methane volatile organic compounds, unspecified origin [air, non-urban air or from high stacks]: 0.0286836 kg; = 0.00665660992535283 * scaling_factor; source Lambrecht U. 2004; lognormal variance with pedigree 0.0141831, pedigree (1,1,4,5,1)
  emission model calculating hourly specific emissions as "engine power x load factor x base emission factor" as proposed by Lambrecht et al. (2004) and applied in Spielmann et al. (2007); values for base emission factors for VOC for vehicle classes EURO IIIa and EURO IIIb are taken from Guideline 97/68/EG, of which 97.6% are assumed to be NMVOC.
  Amount was scaled to the amount of reference product.
- Dioxins, measured as 2,3,7,8-tetrachlorodibenzo-p-dioxin [air, non-urban air or from high stacks]: 5.80733e-13 kg; = 1.34770718249386E-13 * scaling_factor; source Kellenberger D. 2007; lognormal variance with pedigree 0.01, pedigree (1,1,4,5,1)
  (same comment as for Ammonia)
- Carbon dioxide, fossil [air, non-urban air or from high stacks]: 30.2346 kg; = 7.01654341936215 * scaling_factor; source Kellenberger D. 2007; lognormal variance with pedigree 0.0100001, pedigree (1,1,4,5,1)
  calculated from diesel input as 3.113 kg CO2/kg diesel as inventoried in the ecoinvent dataset diesel, burned in building machine
  Amount was scaled to the amount of reference product.
- Copper [air, non-urban air or from high stacks]: 1.64679e-5 kg; = 3.82171251035758E-06 * scaling_factor; source Kellenberger D. 2007; lognormal variance with pedigree 0.01, pedigree (1,1,4,5,1)
  (same comment as for Ammonia)
- Particulates, > 10 um [air, non-urban air or from high stacks]: 0.000495474 kg; = 0.000114984733221283 * scaling_factor; source Lambrecht U. 2004; lognormal variance with pedigree 0.0100016, pedigree (1,1,4,5,1)
  (same comment as for Particulates, > 2.5 um, and < 10um)
- Methane, fossil [air, non-urban air or from high stacks]: 0.000761746 kg; = 0.000176778308116897 * scaling_factor; source Lambrecht U. 2004; lognormal variance with pedigree 0.0100092, pedigree (1,1,4,5,1)
  emission model calculating hourly specific emissions as "engine power x load factor x base emission factor" as proposed by Lambrecht et al. (2004) and applied in Spielmann et al. (2007); values for base emission factors for VOC for mobile machinery classes EURO IIIa and EURO IIIb are taken from European Directive 2004/ 26/EC, of which 2.4% are assumed to be methane.
  Amount was scaled to the amount of reference product.
- Cadmium [air, non-urban air or from high stacks]: 9.70654e-8 kg; = 2.25259629073974E-08 * scaling_factor; source Kellenberger D. 2007; lognormal variance with pedigree 0.01, pedigree (1,1,4,5,1)
  (same comment as for Ammonia)
- Particulates, < 2.5 um [air, non-urban air or from high stacks]: 0.00918417 kg; = 0.00213136990026274 * scaling_factor; source Lambrecht U. 2004; lognormal variance with pedigree 0.0106252, pedigree (1,1,4,5,1)
  (same comment as for Particulates, > 2.5 um, and < 10um)
- Carbon monoxide, fossil [air, non-urban air or from high stacks]: 0.10785 kg; = 0.025028847674886 * scaling_factor; source Kellenberger D. 2007; lognormal variance with pedigree 0.01, pedigree (1,1,4,5,1)
  (same comment as for Ammonia)
- Benzo(a)pyrene [air, non-urban air or from high stacks]: 2.90781e-7 kg; = 6.74816239234425E-08 * scaling_factor; source Kellenberger D. 2007; lognormal variance with pedigree 0.01, pedigree (1,1,4,5,1)
  (same comment as for Ammonia)
- Zinc [air, non-urban air or from high stacks]: 9.70654e-6 kg; = 2.25259629073974E-06 * scaling_factor; source Kellenberger D. 2007; lognormal variance with pedigree 0.01, pedigree (1,1,4,5,1)
  (same comment as for Ammonia)
- Oils, non-fossil [soil, forestry]: 0.0320463 kg; = 0.00743699415189616 * scaling_factor; source Kellenberger D. 2007; lognormal variance with pedigree 0.0100509, pedigree (1,1,4,5,1)
  10% of lubricating oil for chain saw assumed to remain in the forest
  Amount was scaled to the amount of reference product.

## Sampling procedure
Material and fuel input from literature sources (see general comments field); air-borne emissions taken from existing dataset on diesel consumption in building machines or - where emission levels beyond applicable European legislation - estimated with emissions model based on emission limits established in European Directive 2004/ 26/EC for non-road mobile machinery types EURO IIIa and IIIb (according to Lambrecht et al 2004 and e.g. applied in Spielmann et al. 2007).
