# treatment of used laptop computer, mechanical treatment

Dataset: EcoSpold 2, unit process
Geography: GLO
Time period: 2005-01-01 to 2021-12-31
Technology level: current
Classification: ISIC rev.4 ecoinvent: 3830:Materials recovery
Classification: EcoSpold01Categories: waste management/recycling
Tags: Treatment; ConvertedDataset
Scenario: Business-as-Usual
System model: Allocation, cut-off by classification
Generated by: Roland Hischier
Published in: Hischier R. 2007
Database: ecoinvent
isCopyrightProtected: true
accessRestrictedTo: 1

## General comment
manual dismantling plus subsequent shredding/separation procedure, based on calculations in accordance with the composition data
[This dataset was already contained in the ecoinvent database version 2. It was not individually updated during the transfer to ecoinvent version 3. Life Cycle Impact Assessment results may still have changed, as they are affected by changes in the supply chain, i.e. in other datasets. This dataset was generated following the ecoinvent quality guidelines for version 2. It may have been subject to central changes described in the ecoinvent version 3 change report (http://www.ecoinvent.org/database/ecoinvent-version-3/reports-of-changes/), and the results of the central updates were reviewed extensively. The changes added e.g. consistent water flows and other information throughout the database. The documentation of this dataset can be found in the ecoinvent reports of version 2, which are still available via the ecoinvent website. The change report linked above covers all central changes that were made during the conversion process.]

## Included activities end
This dataset represents the mechanical treatment of a WEEE devices in Switzerland. Two process steps are included: manual depollution and the mechanical treatment (shredder) of the remaining part.

## Geography
European data, used as average for global situation

## Technology
4-step-procedure (shredder - separation - shredder - separation) as used currently often in Europe

## Reference product
- used laptop computer: -1 kg; name RP; CPC 39990: Other wastes n.e.c.; By-product classification Waste
  EcoSpold01Location=GLO
  production volume 0.77 kg; name PV_RP
    Unknown
    proportion; source: Hischier 2005
  property price 0 EUR2005; name RP_price_EUR2005
    Waste products are assigned a price of zero as they are assumed to require further treatment.
  property carbon content, non-fossil 1.27837e-5
    Composition data from laptop computer divided by ist weight, 3.12 kg (Tab 4.12, ecoinvent v2.2 report 18_V)
  property carbon content, fossil 0.260278
    (same comment as for used laptop computer)
  property carbon content 0.260291
    carbon content on a dry matter basis (reserved; not for manual entry)
  properties: wet mass 1 kg, dry mass 1 kg, water in wet mass 0 kg, water content 0, carbon allocation 0.260291 kg

## By-products
- aluminium scrap, post-consumer, prepared for melting: 0 kg; By-product classification Recyclable; CPC 39363: Waste and scrap of aluminium; pedigree (1,1,1,1,1)
  Calculated - based on composition data
  production volume 0 kg; = PV_RP * abs( w2_alum/RP)
    Calculated from the production volume of used laptop computer in proportion to the respective output amounts.
  property price 0.806 EUR2005
    Temporary price data. Calculated as 90% of purchasers price based on: 2005 import and export prices (total trades (USD) divided by total weight (kg) in biggest economies of the world: EU27, USA, Brasil, China, India, Japan and Russia) from UN Commodity Trade Statistics Database (http://data.un.org/Explorer.aspxDatabase [Accessed 2011.06.17]). Commodity: Waste or scrap, aluminium
  property carbon content 0
    carbon content on a dry matter basis (reserved; not for manual entry)
  properties: carbon content, non-fossil 0, wet mass 1 kg, water content 0, dry mass 1 kg, water in wet mass 0 kg, carbon content, fossil 0, carbon allocation 0 kg
- iron scrap, sorted, pressed: 0 kg; CPC 39310: Slag, dross, scalings and other waste from the manufacture of iron or steel; By-product classification Recyclable; pedigree (1,1,1,1,1)
  Calculated - based on composition data
  production volume 0 kg; = PV_RP * abs( w3_iron/RP)
    (same comment as for aluminium scrap, post-consumer, prepared for melting)
  property price 0.175 EUR2005
    Temporary price data. Calculated as 90% of purchasers price based on: 2005 import and export prices (total trades (USD) divided by total weight (kg) in biggest economies of the world: EU27, USA, Brasil, China, India, Japan and Russia) from UN Commodity Trade Statistics Database (http://data.un.org/Explorer.aspxDatabase [Accessed 2011.06.20]). Commodity: Waste or scrap, of cast iron
  property carbon content 0
    carbon content on a dry matter basis (reserved; not for manual entry)
  properties: water in wet mass 0 kg, wet mass 1 kg, carbon content, non-fossil 0, carbon content, fossil 0, dry mass 1 kg, water content 0, carbon allocation 0 kg
- electronics scrap: 0 kg; By-product classification Recyclable; CPC 39: Wastes or scraps; pedigree (1,1,1,1,1)
  Calculated - based on composition data
  production volume 0 kg; = PV_RP * abs( w4_elec_scrap/RP)
    (same comment as for aluminium scrap, post-consumer, prepared for melting)
  property water content 0; name water_content
  property water in wet mass 0 kg; name WWM
  property wet mass 1 kg; name WM
  property price 16.1 EUR2005
    Temporary price data. Calculated as 90% of purchasers price based on: 2005 import prices (total trades (USD) divided by total weight (kg) in biggest economies of the world: EU27, USA, Brasil, China, India, Japan and Russia) from UN Commodity Trade Statistics Database (http://data.un.org/Explorer.aspxDatabase [Accessed 2011.06.20]). Commodity: Waste/scrap, precious metals except pure gold/platinum
  property carbon content, non-fossil 0.0045566; name C_content_non_fossil
    Carbon content assumed equal with the intermediate exchange of "electronic component, passive, unspecified"
  property carbon content, fossil 0.317311; name C_content_fossil
    (same comment as for electronics scrap)
  property dry mass 1 kg; name DM
  property carbon content 0.321868
    carbon content on a dry matter basis (reserved; not for manual entry)
  properties: carbon allocation 0.321868 kg

## Inputs from technosphere
- used liquid crystal display module: 0 kg; name U3; pedigree (1,1,1,1,1)
  EcoSpold01Location=CH
  Calculated - based on composition data
  Uncertainty: calculated - based on composition data
  production volume 0 kg
    (same comment as for aluminium scrap, post-consumer, prepared for melting)
  property price 0 EUR2005; name U3_price_EUR2005
  properties: wet mass 1 kg, dry mass 1 kg, carbon content, non-fossil 4.20542e-5, carbon content, fossil 0.327872
- residue from mechanical treatment, laptop computer: 0 kg; name w5_residue; pedigree (1,1,1,1,1)
  Calculated - based on composition data
  EcoSpold01Location=CH
  Uncertainty: calculated - based on composition data
  production volume 0 kg
    (same comment as for aluminium scrap, post-consumer, prepared for melting)
  property price 0 EUR2005; name w5_residue_price_EUR2005
  properties: wet mass 1 kg, heating value, net 31.96 MJ, dry mass 1 kg, carbon content, fossil 0.766065
  note on heating value, net: Value taken from the general comment of the treatment dataset.
  note on carbon content, fossil: Tab 4.19, ecoinvent v2.2 report 18_V, for details in fraction composition. Carbon content in plastic was calculated using data in Tab A.2, ecoinvent v2.2 report 13_I. Others was also considered plastic, and calculated the same way (from pg 70, ecoinvent v2.2 report 18_V). Ferro was assumed to have a C content of 0.012 kg C/ kg (C content of steel, calculated out of emission factors published in Commission Decision of 18 July 2007 establishing guidelines for the monitoring and reporting of greenhouse gas emissions pursuant to Directive 2003/87/EC of the European Parliament and of the Council (notified under document number C(2007) 3416)). The other component of the fraction were considered to content no C.
- used printed wiring boards: -0.0831 kg; name U2; lognormal variance with pedigree 0.054, pedigree (3,4,5,1,1)
  Calculated - based on composition data
  EcoSpold01Location=GLO
  Uncertainty: calculated - based on composition data
  production volume 0.063987 kg; = PV_RP * abs( U2/RP)
    (same comment as for aluminium scrap, post-consumer, prepared for melting)
  property price 0 EUR2005; name U2_price_EUR2005
  properties: carbon content, non-fossil 0.000960142, carbon content, fossil 0.193742, wet mass 1 kg, dry mass 1 kg
  note on carbon content, non-fossil: Composition of printed wiring boards used to calculate C content
- used Li-ion battery: -0.1648 kg; name U1; lognormal variance with pedigree 0.054, pedigree (3,4,5,1,1)
  Calculated - based on composition data
  production volume 0.126896 kg; = PV_RP * abs( U1/RP)
    (same comment as for aluminium scrap, post-consumer, prepared for melting)
  property price 0 EUR2005; name U1_price_EUR2005
  properties: carbon content, fossil 0.328011, wet mass 1 kg, dry mass 1 kg
- waste electric and electronic equipment: -0.5296 kg; name BP; = ((w1_plastic*-1)+ w2_alum+ w3_iron+ w4_elec_scrap+ (w5_residue*-1))*-1; lognormal variance with pedigree 0.134, pedigree (3,4,5,1,4)
  calculated as the sum of the waste input
  EcoSpold01Location=GLO
  Uncertainty: rough estimation
  production volume 0.407792 kg; = PV_RP * abs(BP/RP)
    (same comment as for aluminium scrap, post-consumer, prepared for melting)
  property price 0 EUR2005; name BP_price_EUR2005
- waste plastic, consumer electronics: 0 kg; name w1_plastic; pedigree (1,1,1,1,1)
  (same comment as for used liquid crystal display module)
  production volume 0 kg
    (same comment as for aluminium scrap, post-consumer, prepared for melting)
  property price 0 EUR2005; name w1_plastic_price_EUR2005
  properties: dry mass 0.847 kg, heating value, net 34.78 MJ, water content 0.180638, carbon content, fossil 0.830215, wet mass 1 kg
  note on heating value, net: Assumed equal to "waste plastic, consumer electronics, sorted".
  note on carbon content, fossil: C content in 1 kg DM was calculated using data in Tab A.2, ecoinvent v2.2 report 13_I
- aluminium scrap, post-consumer, prepared for melting: -0.2078 kg; lognormal variance with pedigree 0.2106, pedigree (5,5,5,5,5)
  Calculated - based on composition data
  production volume 0.160006 kg
  properties: price 0.806 EUR2005, wet mass 1 kg, dry mass 1 kg
- iron scrap, sorted, pressed: -0.0303 kg; lognormal variance with pedigree 0.2106, pedigree (5,5,5,5,5)
  Calculated - based on composition data
  production volume 0.023331 kg
  properties: wet mass 1 kg, dry mass 1 kg, price 0.175 EUR2005
- electronics scrap: -0.0151 kg; lognormal variance with pedigree 0.2106, pedigree (5,5,5,5,5)
  Calculated - based on composition data
  production volume 0.011627 kg
  properties: price 16.1 EUR2005
  note on carbon content, non-fossil: Carbon content assumed equal with the intermediate exchange of "electronic component, passive, unspecified"
- used liquid crystal display module: -0.00314916, -0.208451 kg (2 entries); lognormal variance with pedigree 0.054, pedigree (3,4,5,1,1)
  (same comment as for used liquid crystal display module)
  production volume 0.162932 kg
- residue from mechanical treatment, laptop computer: -0.000702461, -0.0464975 kg (2 entries); lognormal variance with pedigree 0.054, pedigree (3,4,5,1,1)
  (same comment as for residue from mechanical treatment, laptop computer)
  production volume 0.036344 kg
- waste plastic, consumer electronics: -0.00341109, -0.225789 kg (2 entries); lognormal variance with pedigree 0.054, pedigree (3,4,5,1,1)
  (same comment as for used liquid crystal display module)
  production volume 0.176484 kg

## Sampling procedure
literature and own experiences

## Extrapolations
This dataset has been extrapolated from year 2005 to the year of the calculation (2021). The uncertainty has been adjusted accordingly.

## Review by Bo Weidema 2012-05-31
Passed. This dataset is based on an earlier ecoinvent dataset. The outputs are now specified in terms of materials that can be treated by existing treatment activities.

## Review by Jürgen Sutter 2007-08-31
passed.
