# treatment of sulfidic tailings, from silver mine operation, tailings impoundment

Dataset: EcoSpold 2, unit process
Geography: US
Time period: 2015-01-01 to 2021-12-31
Technology level: current
Classification: ISIC rev.4 ecoinvent: 3822:Treatment and disposal of hazardous waste
Synonyms: tailing; sulphidic; tails; pond
Scenario: Business-as-Usual
System model: Allocation, cut-off by classification
Share of production covered: 80 %
Generated by: David Turner
Database: ecoinvent
isCopyrightProtected: true
accessRestrictedTo: 1

## General comment
This dataset represents the activity of waste disposal of sulfidic tailings, from silver mine operation in a tailings impoundment in the United States.
Background: Tailings, a waste material produced during mineral concentration (beneficiation), often contain significant quantities of mobile toxic metals and are typically produced in large quantities. To manage these wastes, tailings are commonly stored behind dammed impoundments, known as tailings ponds. These ponds pose a significant long-term pollution risk as metals may leach out into the surrounding environment, potentially over very long timeframes.
Modelling approach: This dataset was produced using a model developed specifically for assessing the long-term emissions of tailings disposal (see Doka, 2017). The tailings disposal model is based on the modelling framework applied in existing landfill process models used in ecoinvent and is based on a top-down approach. Literature data on measurements of deposited tailings compositions (solids) and measured current concentrations in leachate (liquid) form the basis of the model and are used to characterise pollutant mobility and calculate the currently occurring rate of emissions of the landfill. Heeding chief parameters, such as hydrology, pH development and elemental chemistry, these emissions are then projected into the future. Tailings composition is based on the typical composition of tailings at silver mine sites worldwide; i.e. composition is not region-specific. Land use was calculated following the approach described by Doka (2008). Based on an assumed generic final height of a tailings impoundment of 60 m and an assumed tailings density of 2200 kg/m3, a land area of 7.58E-06 m2 is required per kilogram of sulfidic tailings. The land is assumed to be converted from unknown origin to a disposal site. After an operational phase of 30 years, spontaneous restoration of a consolidated state is assumed to be reached after one hundred years. The total occupation time is therefore 130 years and the land occupation per kilogram tailings is 9.85E-04 m2.
Waste composition (wet, in ppm): H2O 300000; O 621950; H na; C 6145; S 272.23; N 5.0454; P 216.46; B 54.583; Cl 102.61; Br 0.22894; F 772.88; I na; Ag 10.076; As 74.238; Ba 355.2; Cd 4.6448; Co 10.164; Cr 49.843; Cu 590.65; Hg 0.43347; Mn 156.64; Mo 11.524; Ni 14.943; Pb 222.48; Sb 37.083; Se 4.0116; Sn 27.477; V 137.22; Zn 251.39; Be 1.0483; Sc 13.26; Sr 98.041; Ti 114.74; Tl 2.3266; W 9.2739; Si 39024; Fe 9774.1; Ca 2626.4; Al 12044; K 2278.2; Mg 1457.8; Na 1075.8. // Share of carbon in waste that is biogenic 0%.
Activity extent: The dataset includes all potential emissions to the environment and land use changes. Input exchanges of infrastructure, materials, energy, and water are not included here but are accounted for in the activity, silver mine operation.
References
Doka, G. (2008). Life Cycle Inventory data of mining waste: Emissions from sulfidic tailings disposal. Zürich, Switzerland: Doka Life Cycle Assessments.
Doka, G. (2017). A model for waste-specific and climate-specific life cycle inventories of tailings impoundments. Zürich, Switzerland: Doka Life Cycle Assessments.

## Included activities start
The activity starts at the point of waste deposition in the impoundment. All upstream activities, including the pumping of tailings to the site, any dewatering or treatment, or other transport-related activities are excluded.

## Included activities end
Waste-specific short- and long-term emissions to the environment via impoundment leachate; land transformation and occupation. Note that the structural integrity of the site is assumed to be unwavering during the entie modelled time horizon; i.e. accidental releases of leachate (due to impoundment failure) are not considered.

## Geography
Given name of site is 'Silver deposits; United States'. Impoundment site with mean annual temperature (MAT) of 2.87005914665306 degC, mean annual precipitation (MAP) of 386.750434963759 mm/year, mean annual actual evaporation (EAT) of 381.785371285406 mm/year, and net infiltration of 195.857749321056 mm/year (using half of natural surface evapotranspiration).
Temperature at site can result in permafrost conditions, which slows down water flow by a factor of 0.995.

## Technology
This is an inventory for an impoundment of copper ore beneficiation tailings waste. The following assumptions were made concerning technology: final impoundment height is 60 meters; operation phase duration is 30 years; and impoundment leachates are released into the environment untreated.

## Time period
'Data on average composition of tailings and tailings-derived leachates from literature sources published between 1994 and 2017 (mean publication date: 2009±6). Mean annual temperature and precipitation data for 1970-2000 (source: Fick and Hijmans, 2017); mean annual evapotranspiration for 1950-2000 (source: Fekete et al., 2002). Production volume based on world mine production data from the USGS Minerals Yearbook 2015. Transfer coefficients from prospective, tailings-specific model.
References:
Fekete, B. M., Vorosmarty, C. J. & Grabs, W. (2002). High-resolution fields of global runoff combining observed river discharge and simulated water balances. Global Biogeochemical Cycles, 16, 15-1 - 15-10.
Fick, S. E. & Hijmans, R. J. (2017). Worldclim 2: New 1-km spatial resolution climate surfaces for global land areas. International Journal of Climatology, 37, 4302-4315.'

## Reference product
- sulfidic tailings, from silver mine operation: -1 kg; By-product classification Waste
  main reference product of this activity (supply of disposal service).
  production volume 2.18e9 kg
    Estimate of the national tailings production volume from the mining and concentration of sulfidic silver ores, based on national mine production of silver from sulfide mineral deposits (kg) multiplied by estimated tailings generation rate per kg mined silver (1999 kg per kg silver).
  property price 0 EUR2005
    Waste products are assigned a price of zero as they are assumed to require further treatment.
  property carbon content 0.0087785
    carbon content on a dry matter basis (reserved; not for manual entry)
  properties: selenium content 5.7309e-6, antimony content 5.2976e-5, mercury content 6.1925e-7, bromine content 3.2706e-7, arsenic content 0.00010605, nickel content 2.1346e-5, molybdenum content 1.6462e-5, barium content 0.00050742, carbon content, non-fossil 0, water in wet mass 0.3 kg, manganese content 0.00022377, water content 0.42857, calcium content 0.003752, silver content 1.4394e-5, cobalt content 1.452e-5, titanium content 0.00016391, silicon content 0.055749, beryllium content 1.4976e-6, chlorine content 0.00014659, boron content 7.7976e-5, chromium content 7.1205e-5, tungsten content 1.3248e-5, potassium content 0.0032546, thallium content 3.3238e-6, phosphorus content 0.00030923, sodium content 0.0015368, nitrogen content 7.2076e-6, zinc content 0.00035913, magnesium content 0.0020826, scandium content 1.8943e-5, dry mass 0.7 kg, sulfur content 0.00038891, tin content 3.9253e-5, oxygen content 0.88851, vanadium content 0.00019603, iron content 0.013963, fluorine content 0.0011041, aluminium content 0.017206, lead content 0.00031783, copper content 0.00084378, wet mass 1 kg, carbon content, fossil 0.0087785, cadmium content 6.6354e-6, strontium content 0.00014006, carbon allocation 0.00614495 kg

## Inputs from nature
- Occupation, dump site [natural resource, land]: 0.00098485 m2*year; lognormal variance with pedigree 0.14986, pedigree (1,1,2,1,1)
  for impoundment operation phase and 100 year renaturation phase.
  Uncertainty: U
- Transformation, to dump site [natural resource, land]: 7.5758e-6 m2; lognormal variance with pedigree 0.030796, pedigree (1,1,2,1,1)
  conversion to impoundment area.
  Uncertainty: U
- Transformation, from unspecified [natural resource, land]: 7.5758e-6 m2; lognormal variance with pedigree 0.030796, pedigree (1,1,2,1,1)
  conversion of impoundment area.
  Uncertainty: U

## Emissions to nature
- Calcium, ion [water, ground-]: 1.9884e-5 kg; lognormal variance with pedigree 0.23292, pedigree (1,1,2,1,1)
  burden from short-term leachate to groundwater in uncontrolled impoundment in moist cimate.
  Uncertainty: U
- Scandium [water, ground-]: 1.7702e-8 kg; lognormal variance with pedigree 0.46172, pedigree (1,1,2,1,1)
  (same comment as for Calcium, ion)
- Bromine [water, ground-, long-term]: 5.735e-8 kg; lognormal variance with pedigree 0.55967, pedigree (1,1,2,1,1)
  Emissions from long-term leachate (>100a) directly from tailings impoundment.
  Uncertainty: U
- Potassium, ion [water, ground-, long-term]: 0.00019433 kg; lognormal variance with pedigree 0.5167, pedigree (1,1,2,1,1)
  (same comment as for Bromine)
- Boron [water, ground-, long-term]: 9.3468e-7 kg; lognormal variance with pedigree 1.2948, pedigree (1,1,2,1,1)
  (same comment as for Bromine)
- Potassium, ion [water, ground-]: 3.3913e-7 kg; lognormal variance with pedigree 0.36372, pedigree (1,1,2,1,1)
  (same comment as for Calcium, ion)
- Bromine [water, ground-]: 1.1024e-10 kg; lognormal variance with pedigree 0.62696, pedigree (1,1,2,1,1)
  (same comment as for Calcium, ion)
- Phosphate [water, ground-]: 1.6424e-5 kg; lognormal variance with pedigree 0.28013, pedigree (1,1,2,1,1)
  (same comment as for Calcium, ion)
- Beryllium [water, ground-, long-term]: 1.0472e-6 kg; lognormal variance with pedigree 0.39102, pedigree (1,1,2,1,1)
  (same comment as for Bromine)
- Phosphate [water, ground-, long-term]: 0.00064693 kg; lognormal variance with pedigree 0.21505, pedigree (1,1,2,1,1)
  (same comment as for Bromine)
- Boron [water, ground-]: 8.4394e-9 kg; lognormal variance with pedigree 0.48533, pedigree (1,1,2,1,1)
  (same comment as for Calcium, ion)
- BOD5, Biological Oxygen Demand [water, ground-]: 8.1785e-10 kg; lognormal variance with pedigree 0.35611, pedigree (1,1,2,1,1)
  (same comment as for Calcium, ion)
- Nickel, ion [water, ground-, long-term]: 1.4922e-5 kg; lognormal variance with pedigree 0.30389, pedigree (1,1,2,1,1)
  (same comment as for Bromine)
- BOD5, Biological Oxygen Demand [water, ground-, long-term]: 4.8989e-7 kg; lognormal variance with pedigree 0.71873, pedigree (1,1,2,1,1)
  (same comment as for Bromine)
- Nickel, ion [water, ground-]: 2.0225e-8 kg; lognormal variance with pedigree 0.45732, pedigree (1,1,2,1,1)
  (same comment as for Calcium, ion)
- Barium [water, ground-]: 9.2323e-10 kg; lognormal variance with pedigree 0.55767, pedigree (1,1,2,1,1)
  (same comment as for Calcium, ion)
- Molybdenum [water, ground-, long-term]: 4.7352e-6 kg; lognormal variance with pedigree 0.36179, pedigree (1,1,2,1,1)
  (same comment as for Bromine)
- Barium [water, ground-, long-term]: 7.6005e-5 kg; lognormal variance with pedigree 0.34721, pedigree (1,1,2,1,1)
  (same comment as for Bromine)
- Molybdenum [water, ground-]: 5.4796e-8 kg; lognormal variance with pedigree 0.42617, pedigree (1,1,2,1,1)
  (same comment as for Calcium, ion)
- Beryllium [water, ground-]: 1.191e-9 kg; lognormal variance with pedigree 0.55011, pedigree (1,1,2,1,1)
  (same comment as for Calcium, ion)
- Mercury [water, ground-]: 1.7712e-10 kg; lognormal variance with pedigree 0.61194, pedigree (1,1,2,1,1)
  (same comment as for Calcium, ion)
- Zinc, ion [water, ground-, long-term]: 0.00025091 kg; lognormal variance with pedigree 0.21007, pedigree (1,1,2,1,1)
  (same comment as for Bromine)
- Antimony [water, ground-, long-term]: 7.3685e-7 kg; lognormal variance with pedigree 1.2334, pedigree (1,1,2,1,1)
  (same comment as for Bromine)
- Mercury [water, ground-, long-term]: 4.333e-7 kg; lognormal variance with pedigree 0.4195, pedigree (1,1,2,1,1)
  (same comment as for Bromine)
- Zinc, ion [water, ground-]: 4.8082e-7 kg; lognormal variance with pedigree 0.35241, pedigree (1,1,2,1,1)
  (same comment as for Calcium, ion)
- Aluminium [water, ground-, long-term]: 0.01204 kg; lognormal variance with pedigree 0.086521, pedigree (1,1,2,1,1)
  (same comment as for Bromine)
- Magnesium [water, ground-, long-term]: 0.0014466 kg; lognormal variance with pedigree 0.15236, pedigree (1,1,2,1,1)
  (same comment as for Bromine)
- Vanadium, ion [water, ground-, long-term]: 1.5831e-7 kg; lognormal variance with pedigree 3.0903, pedigree (1,1,2,1,1)
  (same comment as for Bromine)
- Antimony [water, ground-]: 6.6625e-9 kg; lognormal variance with pedigree 0.49322, pedigree (1,1,2,1,1)
  (same comment as for Calcium, ion)
- Manganese [water, ground-]: 4.6846e-7 kg; lognormal variance with pedigree 0.35394, pedigree (1,1,2,1,1)
  (same comment as for Calcium, ion)
- Nitrate [water, ground-]: 3.2276e-6 kg; lognormal variance with pedigree 0.35824, pedigree (1,1,2,1,1)
  (same comment as for Calcium, ion)
- Manganese [water, ground-, long-term]: 0.00015617 kg; lognormal variance with pedigree 0.22578, pedigree (1,1,2,1,1)
  (same comment as for Bromine)
- Vanadium, ion [water, ground-]: 1.4178e-9 kg; lognormal variance with pedigree 0.54407, pedigree (1,1,2,1,1)
  (same comment as for Calcium, ion)
- Aluminium [water, ground-]: 3.4997e-6 kg; lognormal variance with pedigree 0.29017, pedigree (1,1,2,1,1)
  (same comment as for Calcium, ion)
- Magnesium [water, ground-]: 1.1232e-5 kg; lognormal variance with pedigree 0.25129, pedigree (1,1,2,1,1)
  (same comment as for Calcium, ion)
- Tungsten [water, ground-]: 8.4702e-9 kg; lognormal variance with pedigree 0.48582, pedigree (1,1,2,1,1)
  (same comment as for Calcium, ion)
- Nitrate [water, ground-, long-term]: 1.5114e-5 kg; lognormal variance with pedigree 0.34019, pedigree (1,1,2,1,1)
  (same comment as for Bromine)
- Lead [water, ground-, long-term]: 0.00022247 kg; lognormal variance with pedigree 0.21412, pedigree (1,1,2,1,1)
  (same comment as for Bromine)
- Tungsten [water, ground-, long-term]: 8.9918e-7 kg; lognormal variance with pedigree 0.65993, pedigree (1,1,2,1,1)
  (same comment as for Bromine)
- Ammonium, ion [water, ground-]: 2.0448e-7 kg; lognormal variance with pedigree 0.35824, pedigree (1,1,2,1,1)
  (same comment as for Calcium, ion)
- Lead [water, ground-]: 1.0756e-8 kg; lognormal variance with pedigree 0.47707, pedigree (1,1,2,1,1)
  (same comment as for Calcium, ion)
- Ammonium, ion [water, ground-, long-term]: 9.5751e-7 kg; lognormal variance with pedigree 0.34019, pedigree (1,1,2,1,1)
  (same comment as for Bromine)
- Iron, ion [water, ground-, long-term]: 0.009772 kg; lognormal variance with pedigree 0.092734, pedigree (1,1,2,1,1)
  (same comment as for Bromine)
- TOC, Total Organic Carbon [water, ground-]: 4.4894e-7 kg; lognormal variance with pedigree 0.35611, pedigree (1,1,2,1,1)
  (same comment as for Calcium, ion)
- Arsenic, ion [water, ground-]: 8.371e-9 kg; lognormal variance with pedigree 0.48553, pedigree (1,1,2,1,1)
  (same comment as for Calcium, ion)
- Hydrogen sulfide [water, ground-]: 1.3046e-5 kg; lognormal variance with pedigree 0.2242, pedigree (1,1,2,1,1)
  (same comment as for Calcium, ion)
- TOC, Total Organic Carbon [water, ground-, long-term]: 0.00026892 kg; lognormal variance with pedigree 0.71873, pedigree (1,1,2,1,1)
  (same comment as for Bromine)
- Arsenic, ion [water, ground-, long-term]: 9.293e-7 kg; lognormal variance with pedigree 1.45, pedigree (1,1,2,1,1)
  (same comment as for Bromine)
- Hydrogen sulfide [water, ground-, long-term]: 5.4359e-5 kg; lognormal variance with pedigree 0.20797, pedigree (1,1,2,1,1)
  (same comment as for Bromine)
- Titanium, ion [water, ground-]: 1.8999e-9 kg; lognormal variance with pedigree 0.53449, pedigree (1,1,2,1,1)
  (same comment as for Calcium, ion)
- Iron, ion [water, ground-]: 2.0436e-6 kg; lognormal variance with pedigree 0.30723, pedigree (1,1,2,1,1)
  (same comment as for Calcium, ion)
- Titanium, ion [water, ground-, long-term]: 0.00011474 kg; lognormal variance with pedigree 0.23613, pedigree (1,1,2,1,1)
  (same comment as for Bromine)
- Fluoride [water, ground-, long-term]: 0.0001936 kg; lognormal variance with pedigree 0.29278, pedigree (1,1,2,1,1)
  (same comment as for Bromine)
- Thallium [water, ground-, long-term]: 2.3264e-6 kg; lognormal variance with pedigree 0.36509, pedigree (1,1,2,1,1)
  (same comment as for Bromine)
- DOC, Dissolved Organic Carbon [water, ground-, long-term]: 0.00026892 kg; lognormal variance with pedigree 0.71873, pedigree (1,1,2,1,1)
  (same comment as for Bromine)
- Tin, ion [water, ground-]: 1.2499e-8 kg; lognormal variance with pedigree 0.47259, pedigree (1,1,2,1,1)
  (same comment as for Calcium, ion)
- Fluoride [water, ground-]: 3.7217e-7 kg; lognormal variance with pedigree 0.36007, pedigree (1,1,2,1,1)
  (same comment as for Calcium, ion)
- Thallium [water, ground-]: 1.8897e-10 kg; lognormal variance with pedigree 0.61086, pedigree (1,1,2,1,1)
  (same comment as for Calcium, ion)
- Copper, ion [water, ground-, long-term]: 0.00059053 kg; lognormal variance with pedigree 0.18185, pedigree (1,1,2,1,1)
  (same comment as for Bromine)
- Tin, ion [water, ground-, long-term]: 2.7464e-5 kg; lognormal variance with pedigree 0.28368, pedigree (1,1,2,1,1)
  (same comment as for Bromine)
- Copper, ion [water, ground-]: 1.2448e-7 kg; lognormal variance with pedigree 0.39608, pedigree (1,1,2,1,1)
  (same comment as for Calcium, ion)
- Sulfate [water, ground-, long-term]: 0.00050515 kg; lognormal variance with pedigree 0.20797, pedigree (1,1,2,1,1)
  (same comment as for Bromine)
- COD, Chemical Oxygen Demand [water, ground-, long-term]: 2.4495e-5 kg; lognormal variance with pedigree 0.71873, pedigree (1,1,2,1,1)
  (same comment as for Bromine)
- Sulfate [water, ground-]: 0.00012124 kg; lognormal variance with pedigree 0.2242, pedigree (1,1,2,1,1)
  (same comment as for Calcium, ion)
- DOC, Dissolved Organic Carbon [water, ground-]: 4.4894e-7 kg; lognormal variance with pedigree 0.35611, pedigree (1,1,2,1,1)
  (same comment as for Calcium, ion)
- Strontium [water, ground-, long-term]: 9.7981e-5 kg; lognormal variance with pedigree 0.24136, pedigree (1,1,2,1,1)
  (same comment as for Bromine)
- COD, Chemical Oxygen Demand [water, ground-]: 4.0893e-8 kg; lognormal variance with pedigree 0.35611, pedigree (1,1,2,1,1)
  (same comment as for Calcium, ion)
- Strontium [water, ground-]: 6.0026e-8 kg; lognormal variance with pedigree 0.42055, pedigree (1,1,2,1,1)
  (same comment as for Calcium, ion)
- Cobalt [water, ground-]: 4.1756e-8 kg; lognormal variance with pedigree 0.43486, pedigree (1,1,2,1,1)
  (same comment as for Calcium, ion)
- Silver, ion [water, ground-, long-term]: 1.0075e-5 kg; lognormal variance with pedigree 0.31693, pedigree (1,1,2,1,1)
  (same comment as for Bromine)
- Cobalt [water, ground-, long-term]: 1.0122e-5 kg; lognormal variance with pedigree 0.31664, pedigree (1,1,2,1,1)
  (same comment as for Bromine)
- Sodium, ion [water, ground-, long-term]: 0.000986 kg; lognormal variance with pedigree 0.16268, pedigree (1,1,2,1,1)
  (same comment as for Bromine)
- Chromium VI [water, ground-, long-term]: 3.5855e-7 kg; lognormal variance with pedigree 1.7858, pedigree (1,1,2,1,1)
  (same comment as for Bromine)
- Sodium, ion [water, ground-]: 4.5361e-6 kg; lognormal variance with pedigree 0.27963, pedigree (1,1,2,1,1)
  (same comment as for Calcium, ion)
- Chloride [water, ground-]: 8.3189e-6 kg; lognormal variance with pedigree 0.27465, pedigree (1,1,2,1,1)
  (same comment as for Calcium, ion)
- Silicon [water, ground-, long-term]: 0.00018727 kg; lognormal variance with pedigree 1.8353, pedigree (1,1,2,1,1)
  (same comment as for Bromine)
- Chloride [water, ground-, long-term]: 9.4291e-5 kg; lognormal variance with pedigree 0.23998, pedigree (1,1,2,1,1)
  (same comment as for Bromine)
- Silicon [water, ground-]: 1.6762e-6 kg; lognormal variance with pedigree 0.32038, pedigree (1,1,2,1,1)
  (same comment as for Calcium, ion)
- Chromium VI [water, ground-]: 3.2211e-9 kg; lognormal variance with pedigree 0.51722, pedigree (1,1,2,1,1)
  (same comment as for Calcium, ion)
- Silver, ion [water, ground-]: 5.1796e-10 kg; lognormal variance with pedigree 0.57784, pedigree (1,1,2,1,1)
  (same comment as for Calcium, ion)
- Calcium, ion [water, ground-, long-term]: 0.0026065 kg; lognormal variance with pedigree 0.13346, pedigree (1,1,2,1,1)
  (same comment as for Bromine)
- Selenium [water, ground-, long-term]: 1.5322e-7 kg; lognormal variance with pedigree 1.0135, pedigree (1,1,2,1,1)
  (same comment as for Bromine)
- Cadmium, ion [water, ground-, long-term]: 4.6377e-6 kg; lognormal variance with pedigree 0.34244, pedigree (1,1,2,1,1)
  (same comment as for Bromine)
- Selenium [water, ground-]: 1.3986e-9 kg; lognormal variance with pedigree 0.5449, pedigree (1,1,2,1,1)
  (same comment as for Calcium, ion)
- Cadmium, ion [water, ground-]: 7.0718e-9 kg; lognormal variance with pedigree 0.49209, pedigree (1,1,2,1,1)
  (same comment as for Calcium, ion)
- Scandium [water, ground-, long-term]: 1.3242e-5 kg; lognormal variance with pedigree 0.30784, pedigree (1,1,2,1,1)
  (same comment as for Bromine)

## Sampling procedure
Tailings model based on observed leachate concentrations in literature. Extrapolated to 60'000 years heeding chemical characteristics. Initial waste composition from various literature sources. Climate information for national copper deposits (identified from the USGS Major Mineral Deposits database) from literature as follows: global mean annual temperature and precipitation data from Fick and Hijmans (2017); global mean annual evapotranspiration data from Fekete et al. (2002).

References:
Fekete, B. M., Vorosmarty, C. J. & Grabs, W. (2002). High-resolution fields of global runoff combining observed river discharge and simulated water balances. Global Biogeochemical Cycles, 16, 15-1 - 15-10.
Fick, S. E. & Hijmans, R. J. (2017). Worldclim 2: New 1-km spatial resolution climate surfaces for global land areas. International Journal of Climatology, 37, 4302-4315.

## Extrapolations
This dataset has been extrapolated from year 2019 to the year of the calculation (2021). The uncertainty has been adjusted accordingly.
