# process-specific burdens, hazardous waste incineration plant

Dataset: EcoSpold 2, unit process
Geography: CH
Time period: 1997-01-01 to 2021-12-31
Technology level: current
Classification: EcoSpold01Categories: waste management/hazardous waste incineration
Classification: ISIC rev.4 ecoinvent: 3822:Treatment and disposal of hazardous waste
Synonyms: HWI; SAVA
Tags: ConvertedDataset
Scenario: Business-as-Usual
System model: Allocation, cut-off by classification
Share of production covered: 39 %
Generated by: Gabor Doka (obsolete)
Published in: Doka G. 2007
Database: ecoinvent
isCopyrightProtected: true
accessRestrictedTo: 1

## General comment
Constant for every kilogram of waste
[This dataset was already contained in the ecoinvent database version 2. It was not individually updated during the transfer to ecoinvent version 3. Life Cycle Impact Assessment results may still have changed, as they are affected by changes in the supply chain, i.e. in other datasets. This dataset was generated following the ecoinvent quality guidelines for version 2. It may have been subject to central changes described in the ecoinvent version 3 change report (http://www.ecoinvent.org/database/ecoinvent-version-3/reports-of-changes/), and the results of the central updates were reviewed extensively. The changes added e.g. consistent water flows and other information throughout the database. The documentation of this dataset can be found in the ecoinvent reports of version 2, which are still available via the ecoinvent website. The change report linked above covers all central changes that were made during the conversion process.]

## Included activities end
Burdens independent of the waste composition are inventoried. These depend on the manner the incineration is performend and not on the material. Includes burdens from DeNOx for abatement of thermal NOx.

## Geography
Based on technology encountered in Switzerland in 2000. Well applicable to modern incineration practices in Europe or North America or Japan.

## Technology
Swiss HWI plant in 2000 with wet flue gas scrubber and low-dust SCR DeNOx facility.

## Parameters
- fraction, process water, to air: 0.15 dimensionless; name fraction_PW_to_air; lognormal variance with pedigree 0.092025, pedigree (4,4,3,2,4)
  Literature value. In case when no industry/process specific data are available, default evaporation fraction value is used. This value is 15% and is based on literature (Statistics Canada, 2007 & Shaffer, K.H., 2008, Consumptive water use in the Great Lakes Basin, USGS & Shiklomanov, 2003, World Water Resources at the Beginning of the 21st Century) and has been approved by an expert.

## Reference product
- process-specific burdens, hazardous waste incineration plant: 1 kg; By-product classification allocatable product; CPC 39: Wastes or scraps
  EcoSpold01Location=CH
  production volume 0.0336675 kg
    This is a placeholder value that does not reflect real-world production volumes. This dataset does not currently require a real-world production volume to work in the database framework, and no actual data were collected yet. This has no negative effect on the results of the ecoinvent database. The placeholder value of this activity was scaled according to the nominal GDP of 2005 (source: United Nations, http://data.un.org/Glossary.aspx?q=GDP+%28current+US%24%29, accessed 20130726) to reflect an appropriate share of the global production volume, which is also a placeholder value.
  property price 0.00355534 EUR2005
    Calculated based on inputs: The price of the product has been calculated as a sum of the values of the material and energy inputs for this product. This value is therefore a rough estimation. It may underestimate the real price since there are additional expenses when producing any product. These expences can include for example labour costs, treatment of waste materials and profit for the producer. Please consider carefully whether this level of data quality is acceptable for your application.

## Inputs from technosphere
- titanium dioxide: 1.45e-5 kg; lognormal variance with pedigree 0.65, pedigree (5,5,5,5,5)
  uncertainty calculated from uncertainty for proxy (from MSWI), uncertainty in average DeNOx input and uncertainty in the share of thermal NOx
  EcoSpold01Location=RER
  Uncertainty: , uncertainty in average DeNOx input and uncertainty in the share of thermal NOx
  properties: dry mass 1 kg, wet mass 1 kg
- ammonia, anhydrous, liquid: 0.000369 kg; lognormal variance with pedigree 0.16, pedigree (1,1,5,1,1)
  uncertainty calculated from uncertainty in average DeNOx input and uncertainty in the share of thermal NOx
  EcoSpold01Location=CH
  properties: dry mass 1 kg, wet mass 1 kg
- heat, district or industrial, natural gas: 0.18 MJ; lognormal variance with pedigree 0.37, pedigree (5,5,5,5,5)
  EcoSpold01Location=RER
  uncertainty calculated from uncertainty for proxy (from MSWI), uncertainty in average DeNOx input and uncertainty in the share of thermal NOx
  Uncertainty: , uncertainty in average DeNOx input and uncertainty in the share of thermal NOx
  properties: heating value, net 1 MJ
- chromium: 2.96e-7 kg; lognormal variance with pedigree 0.65, pedigree (5,5,5,5,5)
  (same comment as for titanium dioxide)
  properties: dry mass 1 kg, wet mass 1 kg

## Inputs from nature
- Water, well, in ground [natural resource, in water]: 0.0043 m3; name water_well_in_ground_input; lognormal variance with pedigree 0.05, pedigree (1,4,5,1,3)
  1 plant for waste solvent incineration in Switzerland
  Uncertainty: & basic uncertainty of 1.05; 1 plant for waste solvent incineration in Switzerland

## Emissions to nature
- Dioxins, measured as 2,3,7,8-tetrachlorodibenzo-p-dioxin [air, urban air close to ground]: 3e-12 kg; lognormal variance with pedigree 0.421225, pedigree (2,3,5,2,4)
  Adapted from MSWI from confidential data from 5 plants in Switzerland and Germany
  Uncertainty: & basic uncertainty of 3; Adapted from MSWI from confidential data from 5 plants in Switzerland and Germany
- Water [air, unspecified]: 0.000645 m3; name water_to_air_unspecified; = (water_well_in_ground_input*fraction_PW_to_air); lognormal variance with pedigree 0.0807, pedigree (2,2,5,1,1)
  Calculated value based on literature values and expert opinion. See comments in the parametres' comment field.
  property fraction, origin: fresh water 1; name fraction_origin_fresh_water
  property fraction, origin: salt water 0; name fraction_origin_salt_water
  property fraction, origin: unspecified 0; name fraction_origin_unspecified
- Ammonia [air, urban air close to ground]: 1e-5 kg; lognormal variance with pedigree 0.2, pedigree (1,1,5,1,1)
  uncertainty calculated from uncertainty in average N-emissions and uncertainty in the share of thermal NOx
- Particulates, > 2.5 um, and < 10um [air, urban air close to ground]: 1.99e-7 kg; lognormal variance with pedigree 0.18, pedigree (1,4,5,1,3)
  From total PM value from 1 Swiss plant for waste solvent incineration + PM fractions from measurements in MSWI
  Uncertainty: & basic uncertainty of 2; from total PM value from 1 Swiss plant for waste solvent incineration + PM fractions from measurements in MSWI
- Particulates, < 2.5 um [air, urban air close to ground]: 3.97e-5 kg; lognormal variance with pedigree 0.37, pedigree (1,4,5,1,3)
  From total PM value from 1 Swiss plant for waste solvent incineration + PM fractions from measurements in MSWI
  Uncertainty: & basic uncertainty of 3; from total PM value from 1 Swiss plant for waste solvent incineration + PM fractions from measurements in MSWI
- Water [water, unspecified]: 0.003655 m3; name water_to_water_unspecified; = water_well_in_ground_input*(1-fraction_PW_to_air); lognormal variance with pedigree 0.0807, pedigree (2,2,5,1,1)
  (same comment as for Water)
  property fraction, origin: fresh water 1; name fraction_origin_fresh_water_Ww
  property fraction, origin: unspecified 0; name fraction_origin_unspecified_Ww
  property fraction, origin: salt water 0; name fraction_origin_salt_water_Ww
  property wet mass 1000 kg; name WM
  property water in wet mass 1000 kg; name WWM
  property dry mass 0 kg; name DM
  property carbon content, fossil 0; name C_content_fossil
  property carbon content, non-fossil 0; name C_content_non_fossil
- Nitrogen oxides [air, urban air close to ground]: 0.000181 kg; lognormal variance with pedigree 0.2, pedigree (1,1,5,1,1)
  (same comment as for Ammonia)

## Sampling procedure
The 2 Swiss HWI plants, used as the inventory reference technology mix, have a total annual capacity of 53'000 tons of hazardous waste. This corresonds to 39% of the Swiss total installed capacity in 2000. Swiss average plants size is 20'000 t/a.

## Extrapolations
This dataset has been extrapolated from year 2000 to the year of the calculation (2021). The uncertainty has been adjusted accordingly.

## Review by Niels Jungbluth 2003-07-07
Passed. Calculation for standard deviation 95 of infrastructure, land occupation, transport services and other services can differ from standard Pedigree approach used in this project and figures obtained by this procedure.
