# tanker production, for liquid goods other than petroleum and liquefied natural gas

Dataset: EcoSpold 2, unit process
Geography: GLO
Time period: 2007-01-01 to 2021-12-31
Technology level: current
Classification: EcoSpold01Categories: transport systems/ship
Classification: ISIC rev.4 ecoinvent: 3011:Building of ships and floating structures
Scenario: Business-as-Usual
System model: Allocation, cut-off by classification
Generated by: Philippa Notten
Published in: Notten, P.J. 2018
Database: ecoinvent
isCopyrightProtected: true
accessRestrictedTo: 1

## General comment
The dataset represents the manufacturing and disposal of one tanker for liquid goods other than petroleum and liquefied natural gas with a load capacity (DWT) of 72,000 tonnes. End of life is not accounted for other than by the inclusion of materials disposed or recovered for recycling (energy and other requirements for ship dismantling are not included).
The material breakdown of a freight ship is from Jain et al., (2016), which together with the estimated lightweight mass of an average tanker, was used to calculate the tonnage of steel, copper, brass, zinc, machinery, electronics, insulation material, plastics and wood required for ship construction.
The mass of paint used per lightweight tonne was determined from literature (Kameyama et al., n.d, Harish and Sunil, 2015, Nicolae et al., 2014). Emission of paint and volatiles (NMVOCs) are calculated applying emisison factors from OECD (2009).
Estimates of electricity, fuels and other consumables (welding wire, carbon dioxide gas etc) required for construction were determined from LCA studies (Kameyama et al., n.d, Nicolae et al., 2014) and an energy efficiency study on shipbuilding (Harish and Sunil, 2015). Welding and cutting demand is estimated by back-calculating from the amount of welding gas consumed, as reported in Harish and Sunil (2015) .
The materials produced at ship end-of-life are included but no energy for dismantling the ship is included.
The dataset does not include the chemicals, liquids and oils (e.g. lubricants, refigerants etc.) making up a portion of the ship's weight. Outputs and emissions of liquid materials are thus also not included at end-of-life dismantling of the ship.
References:
Jain, K., Pruyn, J. and Hopman, J. (2016) Quantitative assessment of material composition of end-of-life ships using onboard documentation, Resources, Conservation and Recycling, 107, pp. 1-9.
Harish, R. and Sunil, S. (2015) Energy Consumption and Conservation in Shipbuilding, International Journal of Innovative Research and Development, 4(7), pp. 26-31
Kameyama, M., Hiraoka, K. and Tauchi, H. (n.d) Study on Life Cycle Impact Assessment for Ships, Energy and Environment Department: Tokyo, Japan.
Nicolae, F., Popa, C. and Beizadae, H. (2014) Applications of Life Cycle Assessment (LCA) in Shipping Industry, 14th International Multidisciplinary Scientific GeoConference.
OECD (2009) OECD Series on Emission Scenario Documents Number 22: Emission Scenario Documents on Coating Industry, OECD: Paris, France

## Included activities start
Ship production, starting with receiving/obtaining the material inputs required for construction.

## Included activities end
The activity ends with the production of one ship. The dataset includes material consumption (steel, copper, plastic, paint etc.), energy consumption (electricity and LPG), welding and cutting, and emissions of the solvent of painting as NMVOC. The dataset does not include the consumption of liquids and oils (e.g. lubricants, refigerants etc.) or energy required for dismantling the ship at end-of-life.

## Geography
Manufacturing data represents global conditions.

## Technology
The data represents one bulk carrier with load capacity of 72,000 tonnes. The deadweight as percent of total displacement of an average bulk liquid carrier is estimated to be 79% (from the range given in Papanikolaou (2014)) (needed to calculate the ship lightweight mass).
Reference:
Papanikolaou, A. (2014) Ship Design: Methodologies for Preliminary Design Springer: Athens, Greeces

## Reference product
- tanker, for liquid goods other than petroleum and liquefied natural gas: 1 unit; name RP_amount_1; By-product classification allocatable product; CPC 49312: Tankers (ships)
  production volume 203 unit; name PV
    Estimated value based on annual total tonne.kms of tankers for liquid goods other than petroleum and LNG (calculated from IMO, 2015) and the tonne.km performance (lifetime tonne.kms) of an average tanker for liquid goods other than petroleum and LNG. Lifetime tonne-kilometres derived from annual transport tonne.kms per ship type (calculated from IMO (2015)) and a ship lifetime of 25 years (Demirel et al., 2013; Hayman et al., n.d.). Reference: IMO (2015) Third IMO Greenhouse Gas Study 2014. International Maritime Organization, London; Demirel, Y., Khorasanchi, M., Turan, O. and Incecik, A. (2013) On the importance of antifouling coatings regarding ship resistance and powering, Low Carbon Shipping Conference, London, UK.; Hayman, B., Dogliani, M., Kvale, I. and Fet, A. (n.d.) Technologies for reduced environmental impact from ships - Ship building, maintenance and dismantling aspects, TRESHIP Thematic Network: Brussels, Belgium.
  property price 1.95055e7 EUR2005; name RP_amount_1_price_EUR2005
    Calculated based on inputs: The price of the product has been calculated as a sum of the values of the material and energy inputs for this product. This value is therefore a rough estimation. It may underestimate the real price since there are additional expenses when producing any product. These expences can include for example labour costs, treatment of waste materials and profit for the producer. Please consider carefully whether this level of data quality is acceptable for your application.
  property lifetime capacity [metric ton*km] 2.11161e11 metric ton*km
    Lifetime tonne-kilometres derived from annual transport tonne.kms (calculated from IMO (2015)) and a ship lifetime of 25 years (Demirel et al., 2013; Hayman et al., n.d.). Reference: IMO (2015) Third IMO Greenhouse Gas Study 2014. International Maritime Organization, London; Demirel, Y., Khorasanchi, M., Turan, O. and Incecik, A. (2013) On the importance of antifouling coatings regarding ship resistance and powering, Low Carbon Shipping Conference, London, UK.; Hayman, B., Dogliani, M., Kvale, I. and Fet, A. (n.d.) Technologies for reduced environmental impact from ships - Ship building, maintenance and dismantling aspects, TRESHIP Thematic Network: Brussels, Belgium.
  property lifetime 25 year
    Ship lifetime assumed from Demirel et al. (2013) and Hayman et al. (n.d.). Reference: Demirel, Y., Khorasanchi, M., Turan, O. and Incecik, A. (2013) On the importance of antifouling coatings regarding ship resistance and powering, Low Carbon Shipping Conference, London, UK.; Hayman, B., Dogliani, M., Kvale, I. and Fet, A. (n.d.) Technologies for reduced environmental impact from ships - Ship building, maintenance and dismantling aspects, TRESHIP Thematic Network: Brussels, Belgium.

## By-products
- bronze scrap, post-consumer: 0 kg; CPC 3936: Waste and scrap of other metals; By-product classification Recyclable; pedigree (1,1,1,1,1)
  Bronze is estimated to make up 0.15% of total lightweight mass (Jain et al., 2016). Ship lightweight mass calculated from IHSF data, Papanikolaou (2014) and Anink & Krikke (2011). M
  production volume 0 kg; = PV * (waste_bronze / RP_amount_1)
    Calculated from production volume of reference product using the relative outputs.
  property price 0 EUR2005; name waste_bronze_price_EUR2005
    Assumed without economic value
  property carbon content 0
    carbon content on a dry matter basis (reserved; not for manual entry)
  properties: water in wet mass 0 kg, carbon content, fossil 0, wet mass 1 kg, carbon content, non-fossil 0, water content 0, dry mass 1 kg, carbon allocation 0 kg
- zinc scrap, post-consumer: 0 kg; By-product classification Recyclable; CPC 39365: Waste and scrap of zinc; pedigree (1,1,1,1,1)
  Zinc is estimated to make up 0.7% of total lightweight mass (Jain et al., 2016). Ship lightweight mass calculated from IHSF data, Papanikolaou (2014) and Anink & Krikke (2011).
  production volume 0 kg; = PV * (waste_zinc / RP_amount_1)
    Calculated from production volume of reference product using the relative outputs.
  property price 0.55 EUR2005; name waste_zinc_price_EUR2005
    Calculated as five year geometric mean of prices from Lerecycle.com, 2013-2017 (GB price used as a proxy for GLO price)
  property carbon content 0
    carbon content on a dry matter basis (reserved; not for manual entry)
  properties: zinc content 1, wet mass 1 kg, carbon content, fossil 0, water in wet mass 0 kg, carbon content, non-fossil 0, dry mass 1 kg, water content 0, carbon allocation 0 kg
- iron scrap, unsorted: 0 kg; CPC 39310: Slag, dross, scalings and other waste from the manufacture of iron or steel; By-product classification Recyclable; pedigree (1,1,1,1,1)
  Machinery, estimated to make up 6.2% of the lightweight (Jain et al., 2016), is approximated by cast iron. Ship lightweight mass calculated from IHSF data, Papanikolaou (2014) and Anink & Krikke (2011).
  production volume 0 kg; = PV * (waste_iron / RP_amount_1)
    Calculated from production volume of reference product using the relative outputs.
  property price 0.149 EUR2005; name waste_iron_price_EUR2005
    Temporary price data. Calculated as 90% of purchasers price based on: estimated at 85% of sorted scrap
  property carbon content 0
    carbon content on a dry matter basis (reserved; not for manual entry)
  properties: carbon content, fossil 0, carbon content, non-fossil 0, wet mass 1 kg, dry mass 1 kg, water in wet mass 0 kg, water content 0, carbon allocation 0 kg

## Inputs from technosphere
- copper, cathode: 30303.3 kg; lognormal variance with pedigree 0.0912, pedigree (4,4,5,4,4)
  Copper is estimated to make up 0.16% of total lightweight mass (Jain et al. (2016)). Ship lightweight mass calculated from IHSF data, Papanikolaou (2014) and Anink & Krikke (2011).
  EcoSpold01Location=RER
  properties: dry mass 1 kg, wet mass 1 kg
- polyurethane, flexible foam: 0 kg; pedigree (1,1,1,1,1)
  Plastics estimated to account for 1.2% of total material mass (Jain et al., 2016). This is split equally over the polymers most used in building & construction (PlasticsEurope, 2018). Ship lightweight mass calculated from IHSF data, Papanikolaou (2014) and Anink & Krikke (2011).
  properties: heating value, net 30.67 MJ, dry mass 1 kg, wet mass 1 kg, carbon content, fossil 0.633827
- waste plastic, mixture: 0 kg; name waste_plastic; pedigree (1,1,1,1,1)
  Plastics estimated to account for 1.2% of total material mass (Jain et al., 2016). Ship lightweight mass calculated from IHSF data, Papanikolaou (2014) and Anink & Krikke (2011).
  EcoSpold01Location=CH
  production volume 0 kg
    Calculated from production volume of reference product using the relative outputs.
  property price 0 EUR2005; name waste_plastic_price_EUR2005
  properties: water content 0.180638, wet mass 1 kg, carbon content, fossil 0.747344, dry mass 0.847 kg, heating value, net 30.79 MJ
  note on carbon content, fossil: C content in 1 kg DM was calculated using data in Tab A.2, ecoinvent v2.2 report 13_I
  note on heating value, net: Value taken from the general comment of the treatment dataset.
- bronze: 29437.5 kg; lognormal variance with pedigree 0.0912, pedigree (4,4,5,4,4)
  Bronze is estimated to make up 0.15% of total lightweight mass (Jain et al., 2016). Ship lightweight mass calculated from IHSF data, Papanikolaou (2014) and Anink & Krikke (2011).
  properties: wet mass 1 kg, dry mass 1 kg
- scrap copper: 0 kg; name waste_copper; pedigree (1,1,1,1,1)
  Copper is estimated to make up 0.16% of total lightweight mass (Jain et al. (2016)). Ship lightweight mass calculated from IHSF data, Papanikolaou (2014) and Anink & Krikke (2011).
  production volume 0 kg
    Calculated from production volume of reference product using the relative outputs.
  property price 0 EUR2005; name waste_copper_price_EUR2005
  properties: dry mass 1 kg, wet mass 1 kg
- zinc: 131603 kg; lognormal variance with pedigree 0.0912, pedigree (4,4,5,4,4)
  (same comment as for zinc scrap, post-consumer)
  properties: wet mass 1 kg, dry mass 1 kg
- scrap steel: 0 kg; name waste_steel; pedigree (1,1,1,1,1)
  Steel is estimated to make up 85% of total lightweight mass (Jain et al. (2016)). Ship lightweight mass calculated from IHSF data, Papanikolaou (2014) and Anink & Krikke (2011). Steel wastage percentage estimated by Papanikolaou (2014).
  production volume 0 kg
    Calculated from production volume of reference product using the relative outputs.
  property price 0 EUR2005; name waste_steel_price_EUR2005
  properties: wet mass 1 kg, dry mass 1 kg
- electronic component machinery, unspecified: 95.516 unit; lognormal variance with pedigree 0.0912, pedigree (4,4,5,4,4)
  Electronics are estimated to make up 1.2% of the lightweight mass (Jain et al., 2016). Ship lightweight mass calculated from IHSF data, Papanikolaou (2014) and Anink & Krikke (2011).
- glass wool mat: 162252 kg; lognormal variance with pedigree 0.0912, pedigree (4,4,5,4,4)
  Minerals estimated to account for 2.5% of total lightweight mass (Jain et al., 2016). This is split equally over glass wool, asbestos and ceramics (assumption). Ship lightweight mass calculated from IHSF data, Papanikolaou (2014) and Anink & Krikke (2011).
  properties: wet mass 1 kg, carbon content, fossil 0.0107327, dry mass 1 kg
  note on carbon content, fossil: A share of 16 w-% for the binders is taken into account. The binder used in this study is a mixture of phenol, formaldehyde and urea resins (ecoinvent v2.2 report 16_part XIV), and the C content was calculated as a weigthed average of phenol, formaldehyde and urea C content.
- aluminium, wrought alloy: 10389.7 kg; lognormal variance with pedigree 0.0912, pedigree (4,4,5,4,4)
  Other non-ferrous metal making up 0.05% of total lightweight mass is assumed to be aluminium (Jain et al., 2016). Ship lightweight mass calculated from IHSF data, Papanikolaou (2014) and Anink & Krikke (2011).
  properties: wet mass 1 kg, dry mass 1 kg
- asbestos, crysotile type: 162252 kg; lognormal variance with pedigree 0.0912, pedigree (4,4,5,4,4)
  (same comment as for glass wool mat)
  properties: dry mass 1 kg, wet mass 1 kg
- scrap aluminium: 0 kg; name waste_al; pedigree (1,1,1,1,1)
  (same comment as for aluminium, wrought alloy)
  production volume 0 kg
    Calculated from production volume of reference product using the relative outputs.
  property price 0 EUR2005; name waste_al_price_EUR2005
  properties: dry mass 1 kg, wet mass 1 kg
- sanitary ceramics: 162252 kg; lognormal variance with pedigree 0.0912, pedigree (4,4,5,4,4)
  (same comment as for glass wool mat)
  properties: wet mass 1 kg, dry mass 1 kg
- welding, arc, steel: 1.22988e7 m; lognormal variance with pedigree 0.0912, pedigree (4,4,5,4,4)
  Welding gas usage from Harish & Sunil (2014) per tonne steel, ratioed with "welding, arc, steel" dataset consumption of 0.028 kg gas per m (equating CO2 with total blanket gas). Ship lightweight mass calculated from IHSF data, Papanikolaou (2014) data and Anink & Krikke (2011).
- glued laminated timber, average glue mix: 0 m3; pedigree (1,1,1,1,1)
  "Joinery" (timber, bulkhead and deckhead panels, accommodation doors and frames, furniture and furnishings, composite timber products, etc.) is estimated to make up 1.3% of the lightweight mass (Jain et al., 2016). Joinery items are approximated by laminated timber. Ship lightweight mass calculated from IHSF data, Papanikolaou (2014) and Anink & Krikke (2011).
  properties: water content 0.0979228, wet mass 444 kg, carbon content, fossil 0.01791, price 298 EUR2005, carbon content, non-fossil 0.441932, dry mass 404.4 kg, heating value, net 5537.41 MJ
- polyethylene, high density, granulate: 45887.8 kg; lognormal variance with pedigree 0.0912, pedigree (4,4,5,4,4)
  (same comment as for polyurethane, flexible foam)
  properties: heating value, net 42.47 MJ, carbon content, fossil 0.857143, dry mass 1 kg, wet mass 1 kg
  note on carbon content, fossil: Polyethylene is formed out of a huge amount of ethylene monomers (C2H4) (ecoinvent v2.2 report 11_II). MW=28 g/mol
- heat, district or industrial, other than natural gas: 7.48676e6 MJ; lognormal variance with pedigree 0.0912, pedigree (4,4,5,4,4)
  EcoSpold01Location=RER
  Fuel use at shipyard (LPG) from Harish & Sunil (2015). Ship lightweight mass calculated from IHSF data, Papanikolaou (2014) and Anink & Krikke (2011).
  properties: heating value, net 1 MJ
- waste electric and electronic equipment: -238790 kg; name waste_elec; lognormal variance with pedigree 0.0912, pedigree (4,4,5,4,4)
  (same comment as for electronic component machinery, unspecified)
  production volume 4.84744e7 kg; = PV * (waste_elec / RP_amount_1)
    Calculated from production volume of reference product using the relative outputs.
  property price 0 EUR2005; name waste_elec_price_EUR2005
  properties: carbon content, fossil 0.0877555, carbon content, non-fossil 0.000485011, wet mass 1 kg, dry mass 1 kg
- marine engine: 1194.82 unit; lognormal variance with pedigree 0.0912, pedigree (4,4,5,4,4)
  Machinery, estimated to make up 6.2% of the lightweight (Jain et al., 2016). Ship lightweight mass calculated from IHSF data, Papanikolaou (2014) and Anink & Krikke (2011). One unit of "marine engine" is equivalent to 1 tonne of machinery.
  properties: lifetime 15 year, lifetime capacity [h] 8000 hour
- reinforcing steel: 1.83082e7 kg; lognormal variance with pedigree 0.0912, pedigree (4,4,5,4,4)
  EcoSpold01Location=RER
  Steel is estimated to make up 85% of total lightweight mass (Jain et al. (2016)). Ship lightweight mass calculated from IHSF data, Papanikolaou (2014) and Anink & Krikke (2011). Steel wastage percentage estimated by Papanikolaou (2014).
  properties: dry mass 1 kg, carbon content, fossil 0.004, wet mass 1 kg
- waste mineral wool: 0 kg; name waste_wool; pedigree (1,1,1,1,1)
  Minerals estimated to account for 2.5% of total lightweight mass (Jain et al., 2016). This is split equally over glass wool, asbestos and ceramics (assumption). Ship lightweight mass calculated from IHSF data, Papanikolaou (2014) and Anink & Krikke (2011). Waste mineral wool includes waste mineral wool and waste asbestos.
  production volume 0 kg
    Calculated from production volume of reference product using the relative outputs.
  property price 0 EUR2005; name waste_wool_price_EUR2005
  properties: dry mass 1 kg, wet mass 1 kg
- welding, gas, steel: 9.32731e7 m; lognormal variance with pedigree 0.0912, pedigree (4,4,5,4,4)
  (same comment as for welding, arc, steel)
- inert waste, for final disposal: 0 kg; name waste_inert; pedigree (1,1,1,1,1)
  Minerals estimated to account for 2.5% of total lightweight mass (Jain et al., 2016). This is split equally over glass wool, asbestos and ceramics (assumption). Ship lightweight mass calculated from IHSF data, Papanikolaou (2014) and Anink & Krikke (2011). Inert waste used as proxy for waste ceramic material.
  production volume 0 kg
    Calculated from production volume of reference product using the relative outputs.
  property price 0 EUR2005; name waste_inert_price_EUR2005
  properties: wet mass 1 kg, water content 0.00502513, dry mass 0.995 kg
- electricity, medium voltage: 6.17897e6 kWh; lognormal variance with pedigree 0.0926, pedigree (4,4,5,5,4)
  EcoSpold01Location=UCTE
  Average across various sources (LCA studies and shipyard data). A very wide range evident in the data (80 - 960 kWh/tonne) (Kameyama et al. (n.d.), Harish & Sunil (2014) and Nicolae et al. (2014), DSME (2014). Ship lightweight mass calculated from IHSF data, Papanikolaou (2014) and Anink & Krikke (2011). The electricity input is a global mix and thus does not necessarily represent the major shipbuilding locations. The uncertainty has been adjusted accordingly.
- polypropylene, granulate: 45887.8 kg; lognormal variance with pedigree 0.0912, pedigree (4,4,5,4,4)
  (same comment as for polyurethane, flexible foam)
  properties: wet mass 1 kg, carbon content, fossil 0.857143, heating value, net 32.78 MJ, dry mass 1 kg
  note on heating value, net: Value extracted from "treatment of waste polypropylene, open burning"
- alkyd paint, white, without solvent, in 60% solution state: 0 kg; pedigree (1,1,1,1,1)
  EcoSpold01Location=RER
  Paint usage data average of Kameyama et al. (n.d.), Harish & Sunil (2014) and Nicolae et al. (2014). Ship lightweight mass calculated from IHSF data, Papanikolaou (2014) and Anink & Krikke (2011).
  properties: dry mass 1 kg, heating value, net 10.3 MJ, carbon content, fossil 0.140367, wet mass 1 kg, carbon content, non-fossil 0.199629
  note on carbon content, fossil: C content was calculated as an addition of C content in the raw materials.
- polystyrene, expandable: 45887.8 kg; lognormal variance with pedigree 0.0912, pedigree (4,4,5,4,4)
  (same comment as for polyurethane, flexible foam)
  properties: heating value, net 38.67 MJ, dry mass 1 kg, carbon content, fossil 0.923077, wet mass 1 kg
- waste emulsion paint: 0 kg; name waste_paint; pedigree (1,1,1,1,1)
  Calculated from input quantity less emissions. Paint quantity based on: Ship lightweight mass calculated from IHSF data, Papanikolaou (2014) and Anink & Krikke (2011). Paint usage data estimated from Kameyama et al. (n.d.), Harish & Sunil (2014) and Nicolae et al. (2014). Paint emission data from OECD (2009).
  EcoSpold01Location=CH
  production volume 0 kg
    Calculated from production volume of reference product using the relative outputs.
  property price 0 EUR2005; name waste_paint_price_EUR2005
  properties: wet mass 1 kg, dry mass 1 kg, heating value, net 8.18 MJ, carbon content, fossil 0.27
  note on carbon content, fossil: Tab A.4, ecoinvent v2.2 report 13_I. C content has been calculated after data in the tables, and then referred to 1 kg DM
- polyvinylidenchloride, granulate: 0 kg; pedigree (1,1,1,1,1)
  (same comment as for polyurethane, flexible foam)
  properties: heating value, net 10.01 MJ, wet mass 1 kg, carbon content, fossil 0.387097, dry mass 1 kg
- bronze scrap, post-consumer: -29437.5 kg; lognormal variance with pedigree 0.0912, pedigree (4,4,5,4,4)
  (same comment as for bronze scrap, post-consumer)
  production volume 5.97581e6 kg
  properties: wet mass 1 kg, dry mass 1 kg
- zinc scrap, post-consumer: -131603 kg; lognormal variance with pedigree 0.0912, pedigree (4,4,5,4,4)
  (same comment as for zinc scrap, post-consumer)
  production volume 2.67154e7 kg
  properties: zinc content 1, wet mass 1 kg, dry mass 1 kg
- iron scrap, unsorted: -1.19482e6 kg; lognormal variance with pedigree 0.0912, pedigree (4,4,5,4,4)
  (same comment as for iron scrap, unsorted)
  production volume 2.42548e8 kg
  properties: wet mass 1 kg, dry mass 1 kg
- polyurethane, flexible foam: 7800.93, 38086.9 kg (2 entries); lognormal variance with pedigree 0.0912, pedigree (4,4,5,4,4)
  (same comment as for polyurethane, flexible foam)
- waste plastic, mixture: -22084.6, -1702.59, -703.232, -667.784, -25481.8, -284.098, -128.764, -178386 kg (8 entries); lognormal variance with pedigree 0.0912, pedigree (4,4,5,4,4)
  (same comment as for waste plastic, mixture)
  production volume 4.65762e7 kg
- scrap copper: -9612.44, -450.995, -20239.9 kg (3 entries); lognormal variance with pedigree 0.0912, pedigree (4,4,5,4,4)
  (same comment as for scrap copper)
  production volume 6.15157e6 kg
- scrap steel: -4.45797e6, -5648.08, -1.38446e7 kg (3 entries); lognormal variance with pedigree 0.0912, pedigree (4,4,5,4,4)
  (same comment as for scrap steel)
  production volume 3.71657e9 kg
- scrap aluminium: -3295.69, -154.626, -6939.38 kg (3 entries); lognormal variance with pedigree 0.0912, pedigree (4,4,5,4,4)
  (same comment as for aluminium, wrought alloy)
  production volume 2.10911e6 kg
- glued laminated timber, average glue mix: 181.846, 394.822 m3 (2 entries); lognormal variance with pedigree 0.0912, pedigree (4,4,5,4,4)
  (same comment as for glued laminated timber, average glue mix)
- waste mineral wool: -94059.4, -1073.29, -229372 kg (3 entries); lognormal variance with pedigree 0.0912, pedigree (4,4,5,4,4)
  (same comment as for waste mineral wool)
  production volume 6.58745e7 kg
- inert waste, for final disposal: -1049.47, -161203 kg (2 entries); lognormal variance with pedigree 0.0912, pedigree (4,4,5,4,4)
  (same comment as for inert waste, for final disposal)
  production volume 3.29373e7 kg
- alkyd paint, white, without solvent, in 60% solution state: 24278.9, 115255 kg (2 entries); lognormal variance with pedigree 0.0912, pedigree (4,4,5,4,4)
  (same comment as for alkyd paint, white, without solvent, in 60% solution state)
- waste emulsion paint: -11587, -3.63681, -122920 kg (3 entries); lognormal variance with pedigree 0.0912, pedigree (4,4,5,4,4)
  (same comment as for waste emulsion paint)
  production volume 2.73057e7 kg
- polyvinylidenchloride, granulate: 15170.2, 30717.7 kg (2 entries); lognormal variance with pedigree 0.0912, pedigree (4,4,5,4,4)
  (same comment as for polyurethane, flexible foam)

## Emissions to nature
- Hydrocarbons, unspecified [soil, unspecified]: 2511.61 kg; lognormal variance with pedigree 0.1306, pedigree (4,4,5,4,4)
  Based on: Ship lightweight mass calculated from IHSF data, Papanikolaou (2014) and Anink & Krikke (2011). Paint usage data estimated from Kameyama et al. (n.d.), Harish & Sunil (2014) and Nicolae et al. (2014). Paint emission data from OECD (2009). Unspecified hydrocarbons to land used as a proxy for paint emissions to land.
- Hydrocarbons, unspecified [water, unspecified]: 2511.61 kg; lognormal variance with pedigree 0.2106, pedigree (4,4,5,4,4)
  Based on: Ship lightweight mass calculated from IHSF data, Papanikolaou (2014) and Anink & Krikke (2011). Paint usage data estimated from Kameyama et al. (n.d.), Harish & Sunil (2014) and Nicolae et al. (2014). Paint emission data from OECD (2009). Unspecified hydrocarbons to land used as a proxy for paint emissions to water.
- NMVOC, non-methane volatile organic compounds, unspecified origin [air, unspecified]: 114164 kg; lognormal variance with pedigree 0.1306, pedigree (4,4,5,4,4)
  VOC percentage of 45% from OECD (2009). Paint usage data average of Kameyama et al. (n.d.), Harish & Sunil (2014) and Nicolae et al. (2014). Ship lightweight mass calculated from IHSF data, Papanikolaou (2014) and Anink & Krikke (2011).

## Sampling procedure
Literature studies.

## Extrapolations
This dataset has been extrapolated from year 2012 to the year of the calculation (2021). The uncertainty has been adjusted accordingly.
