# gas turbine construction, 80MW electrical, for compressed air energy storage

Dataset: EcoSpold 2, unit process
Geography: GLO
Time period: 2011-01-01 to 2021-12-31
Technology level: modern
Classification: ISIC rev.4 ecoinvent: 2811:Manufacture of engines and turbines, except aircraft, vehicle and cycle eng
Scenario: Business-as-Usual
System model: Allocation, cut-off by classification
Generated by: Heidi Hottenroth
Published in: Bouman, Evert A. 2016
Database: ecoinvent
isCopyrightProtected: true
accessRestrictedTo: 1

## General comment
This datasets represents the construction of a gas turbine. It basically consists of the compressor, the annular combustion chamber with 24 hybrid burners, the actual turbine section and the diffuser for the exhaust gas outlet. At the heart of the turbine are the rotor blades and guide vanes, which are mounted on the shaft and guide vane carriers in both the compressor and the turbine proper. The gas turbine is linearly scaled from a capacity of 265 MW (Siemens SGT5-4000F) to 80 MW as used for compressed air energy storage (CAES). The CAES system makes use of a gas turbine for heating up the outflow of air from the storage location.
according to Bouman, Evert A.; Øberg, Martha M.; Hertwich, Edgar G. (2016): Environmental impacts of balancing offshore wind power with compressed air energy storage (CAES). In: Energy 95, S. 91–98. DOI: 10.1016/j.energy.2015.11.041.
[This dataset is meant to replace the following datasets:
- gas turbine construction, 80MW electrical, for compressed air energy storage, GLO, 2015 - 2015]

## Included activities start
The activity starts with the raw materials for manufacturing of the gas turbine according to material composition. Proxies for metal processing data are included. Land use is not included.

## Included activities end
The activity ends with the decommissioning of the gas turbine according to material composition.

## Geography
data refers to a global manufacturer

## Technology
Power rating: 80 MW

## Time period
refers to publication date of literature sources

## Reference product
- gas turbine, 80MW, for compressed air energy storage: 1 unit; name RP; CPC 43143: Gas turbines other than turbo-jets and turbo-propellers; By-product classification allocatable product
  production volume 1 unit; name PV_RP
    In the time frame of the dataset no compressed air energy storage plant was realized.
  property price 87528.4 EUR2005; name RP_price_EUR2005
    Calculated based on inputs: The price of the product has been calculated as a sum of the values of the material and energy inputs for this product. This value is therefore a rough estimation. It may underestimate the real price since there are additional expenses when producing any product. These expences can include for example labour costs, treatment of waste materials and profit for the producer. Please consider carefully whether this level of data quality is acceptable for your application.
  properties: weight 0 kg

## By-products
- iron scrap, unsorted: 0 kg; CPC 39310: Slag, dross, scalings and other waste from the manufacture of iron or steel; By-product classification Recyclable; pedigree (1,1,1,1,1)
  Waste generated through dismantling of the product. Based on the amount of the corresponding material inputs.
  production volume 0 kg; = abs(BP_iron/RP)*PV_RP
    Calculated from production volume of reference product using the relative outputs.
  property price 0.149 EUR2005; name BP_iron_price_EUR2005
    Temporary price data. Calculated as 90% of purchasers price based on: estimated at 85% of sorted scrap
  property carbon content, fossil 0.04; = CCF_iron
  property carbon content 0.04
    carbon content on a dry matter basis (reserved; not for manual entry)
  properties: water in wet mass 0 kg, wet mass 1 kg, dry mass 1 kg, carbon content, non-fossil 0, water content 0, carbon allocation 0.04 kg

## Inputs from technosphere
- sheet rolling, aluminium: 41.7 kg; = alu; lognormal variance with pedigree 0.0986, pedigree (4,5,5,5,4)
  Calculated Value. Represents processing of material.
- aluminium, wrought alloy: 41.7 kg; name alu; lognormal variance with pedigree 0.0986, pedigree (4,5,5,5,4)
  Literature data.
  properties: dry mass 1 kg, wet mass 1 kg
- scrap copper: 0 kg; name BP_copper; pedigree (1,1,1,1,1)
  (same comment as for iron scrap, unsorted)
  production volume 0 kg
    Calculated from production volume of reference product using the relative outputs.
  property price 0 EUR2005; name BP_copper_price_EUR2005
  properties: wet mass 1 kg, dry mass 1 kg
- steel, chromium steel 18/8: 38700 kg; name steel_stainless; lognormal variance with pedigree 0.0986, pedigree (4,5,5,5,4)
  Literature data.
  property carbon content, fossil 0.0008; name CCF_stainless
  properties: dry mass 1 kg, wet mass 1 kg
  note on carbon content, fossil: Stainless steel model is the grade 304 steel (18/8 stainless, 18% chromium 8% nickel; max. 0.08% C)
- waste aluminium: -41.7 kg; name BP_aluminium; = (alu)*-1; lognormal variance with pedigree 0.0926, pedigree (3,5,5,5,4)
  (same comment as for iron scrap, unsorted)
  production volume 41.7 kg; = abs(BP_aluminium/RP)*PV_RP
    Calculated from production volume of reference product using the relative outputs.
  property price 0 EUR2005; name BP_aluminium_price_EUR2005
  properties: wet mass 1 kg, dry mass 1 kg
- injection moulding: 27.8 kg; = polyprop; lognormal variance with pedigree 0.0986, pedigree (4,5,5,5,4)
  Calculated Value. Represents processing of material.
- sheet rolling, copper: 41.7 kg; = copper; lognormal variance with pedigree 0.0986, pedigree (4,5,5,5,4)
  Calculated Value. Represents processing of material.
- steel, low-alloyed: 19600 kg; name steel_low; lognormal variance with pedigree 0.0986, pedigree (4,5,5,5,4)
  Literature data.
  property carbon content, fossil 0.005; name CCF_steel_low
  properties: dry mass 1 kg, wet mass 1 kg
- scrap steel: 0 kg; name BP_steel; pedigree (1,1,1,1,1)
  (same comment as for iron scrap, unsorted)
  production volume 0 kg
    Calculated from production volume of reference product using the relative outputs.
  property price 0 EUR2005; name BP_steel_price_EUR2005
  properties: wet mass 1 kg, dry mass 1 kg, carbon content, fossil 0.00227063
- sheet rolling, steel: 73200 kg; = steel_stainless + steel_low + steel_un; lognormal variance with pedigree 0.0986, pedigree (4,5,5,5,4)
  Calculated Value. Represents processing of material.
- copper, cathode: 41.7 kg; name copper; lognormal variance with pedigree 0.0986, pedigree (4,5,5,5,4)
  Literature data.
  properties: dry mass 1 kg, wet mass 1 kg, copper content 1
- steel, unalloyed: 14900 kg; name steel_un; lognormal variance with pedigree 0.0986, pedigree (4,5,5,5,4)
  Literature data.
  property carbon content, fossil 0.0025; name CCF_steel_un
  properties: wet mass 1 kg, dry mass 1 kg
- hazardous waste, for incineration: 0 kg; name BP_chem; pedigree (1,1,1,1,1)
  (same comment as for iron scrap, unsorted)
  production volume 0 kg
    Calculated from production volume of reference product using the relative outputs.
  property price 0 EUR2005; name BP_chem_price_EUR2005
  properties: carbon content, fossil 0.628, wet mass 1 kg, dry mass 1 kg, heating value, net 17 MJ
  note on carbon content, fossil: Tab A.6, ecoinvent v2.2 report 13_I. C content has been calculated after data in the tables, and then referred to 1 kg DM
  note on heating value, net: Value taken from the general comment of the treatment dataset.
- chemical, organic: 368 kg; name chem; lognormal variance with pedigree 0.0986, pedigree (4,5,5,5,4)
  Literature data.
  property carbon content, fossil 0.628; name CCF_chem_org
  properties: heating value, net 19.03 MJ, wet mass 1 kg, dry mass 1 kg
  note on carbon content, fossil: This dataset is an unweighted average of 20 organic substances (listed in Tab 88.1, ecoinvent v2.2 report 8, part II), being part of the top100 chemicals included in this database. The C-content has also been calculated as an unweighted average of the C content of the substances composing this dataset.
- cast iron: 20800 kg; name iron; lognormal variance with pedigree 0.0986, pedigree (4,5,5,5,4)
  Literature data.
  property carbon content, fossil 0.04; name CCF_iron
  properties: wet mass 1 kg, dry mass 1 kg
  note on carbon content, fossil: Cast iron is made by remelting pig iron in small furnaces (e.g. cupola furnaces or electric arc furnaces) and poured into moulds to make castings. It usually contains 2% to 6% carbon (ecoinvent v2.2 report 10_partII). An average content of 4% was considered
- metal working, average for steel product manufacturing: 73200 kg; = steel_stainless+steel_low+steel_un
  Calclulated Value. Represents processing of steel.
- polypropylene, granulate: 27.8 kg; name polyprop; lognormal variance with pedigree 0.0986, pedigree (4,5,5,5,4)
  Literature data.
  property carbon content, fossil 0.857143; name CCF_polyprop
  properties: dry mass 1 kg, heating value, net 32.78 MJ, wet mass 1 kg
  note on heating value, net: Value extracted from "treatment of waste polypropylene, open burning"
- waste polypropylene: 0 kg; name BP_polyprop; pedigree (1,1,1,1,1)
  (same comment as for iron scrap, unsorted)
  production volume 0 kg
    Calculated from production volume of reference product using the relative outputs.
  property price 0 EUR2005; name BP_polyprop_price_EUR2005
  properties: carbon content, fossil 0.857143, dry mass 1 kg, wet mass 1 kg, heating value, net 32.78 MJ
  note on heating value, net: Value assumed for all polypropylene products. Source: Phyllis2, database for (treated) biomass, algae, feedstocks for biogas production and biochar, https://phyllis.nl/Biomass/View/1186, ECN.TNO
- iron scrap, unsorted: -20800 kg; lognormal variance with pedigree 0.1346, pedigree (3,5,3,5,5)
  (same comment as for iron scrap, unsorted)
  production volume 20800 kg
  properties: wet mass 1 kg, carbon content, fossil 0.04, dry mass 1 kg
- scrap copper: -13.2276, -0.620609, -27.8518 kg (3 entries); lognormal variance with pedigree 0.0986, pedigree (4,5,5,5,4)
  (same comment as for iron scrap, unsorted)
  production volume 41.7 kg
- scrap steel: -17823.8, -22.5822, -55353.6 kg (3 entries); lognormal variance with pedigree 0.0986, pedigree (4,5,5,5,4)
  (same comment as for iron scrap, unsorted)
  production volume 73200 kg
- hazardous waste, for incineration: -118.496, -3.09741, -246.407 kg (3 entries); lognormal variance with pedigree 0.1346, pedigree (3,5,3,5,5)
  (same comment as for iron scrap, unsorted)
  production volume 368 kg
- waste polypropylene: -2.67588, -0.206295, -0.0852071, -0.0809121, -3.0875, -0.0344227, -0.0156017, -21.6142 kg (8 entries); lognormal variance with pedigree 0.0926, pedigree (3,5,5,5,4)
  (same comment as for iron scrap, unsorted)
  production volume 27.8 kg

## Sampling procedure
The inventory for raw materials is entirely based on Bouman, Evert A.; Øberg, Martha M.; Hertwich, Edgar G. (2016): Environmental impacts of balancing offshore wind power with compressed air energy storage (CAES). In: Energy 95, S. 91–98. DOI: 10.1016/j.energy.2015.11.041. The gas turbine model is a
downscaled version (to 80 MW) of a 265 MW turbine as described
in Parthey F., Lebenszyklusanalyse und Bestimmung von Einflussfaktoren zur nachhaltigen Produktgestaltung von GuD-Kraftwerken. Brandenburgische Technische Universität Cottbus; 2011

## Extrapolations
This dataset has been extrapolated from year 2015 to the year of the calculation (2021). The uncertainty has been adjusted accordingly.
