# refractory production, fireclay, packed

Dataset: EcoSpold 2, unit process
Geography: RoW
Time period: 1999-01-01 to 2021-12-31
Technology level: current
Classification: EcoSpold01Categories: construction materials/bricks
Classification: ISIC rev.4 ecoinvent: 2391:Manufacture of refractory products
Synonyms: Keramik; ceramics; lining; Ofenausmauerung
Tags: ConvertedDataset
Scenario: Business-as-Usual
System model: Allocation, cut-off by classification
Generated by: Tina Künniger
Published in: Kellenberger D. 2007
Database: ecoinvent
isCopyrightProtected: true
accessRestrictedTo: 1

## General comment
This dataset represents the production of 1 kg of refractory fireclay bricks.
Includes the whole manufacturing process, internal processes (transport, etc.), packing and infrastructure. No administration is included.
Refractory fireclay. Image source:http://www.northrefractories.com/wp-content/uploads/2012/11/general-fireclay-brick-blast-furnace.jpg

## Included activities start
From chamotte and clay, at the factory gate.

## Included activities end
The activity ends with the packed product, at factory. This dataset includes the whole manufacturing process, internal processes (transport, etc.), packing and infrastructure. This dataset doesn't include the administration.

## Geography
German, European and global modules used as proxy. Manufacturing data from Germany for German module

## Technology
The typical German technology for refractory fireclay production.
For the production of one ton of fireclay refractory 1.1 ton of chamotte and additionally 10% of clay (0.1 ton) is required. This results in a total amount of 1.2 kg clay for 1 kg of fireclay refractory. The raw materials are fractionated in different coarse size groups and one or several flour components. The grains and flours are mixed in a certain share and a fixing agent (lime milk) is added. The mixture is pressed to bricks, which are baked at 1200 to 1800°C.
Chamotte is burned and milled clay.

## Parameters
- fraction, cooling water, once-through system, to air: 0.004 dimensionless; name fraction_CW_OT_to_air; lognormal variance with pedigree 0.0413, pedigree (2,3,1,3,1)
  Calculated based on literature value (Scown, C.D., 2011, Water Footprint of U.S. Transportation Fuels and supplying information of the article) (Vionnet, S., Quantis Water Database - Technical Report, 2012).
- fraction, cooling water, to air: 0.3875 dimensionless; name fraction_CW_to_air; = (0.5*fraction_CW_OT_to_air)+(0.5*fraction_CW_R_to_air); lognormal variance with pedigree 0.092025, pedigree (4,4,3,2,4)
  Calculated value based on literature value (see comments of the other parametres present in this dataset) and expert opinion. In the case when no industry/literature data are available about the type of cooling or directly fraction, cooling water, to air specific for the process a default assumption is applied. It is assumed that the once-through cooling system is used in 50% of all cases and recirculating system is used in another 50% of all cases.
- fraction, cooling water, recirculating system, to air: 0.771 dimensionless; name fraction_CW_R_to_air; lognormal variance with pedigree 0.0413, pedigree (2,3,1,3,1)
  (same comment as for fraction, cooling water, once-through system, to air)
- fraction, cooling water, cooling pond system, to air: 0.032 dimensionless; name fraction_CW_CP_to_air; lognormal variance with pedigree 0.0413, pedigree (2,3,1,3,1)
  (same comment as for fraction, cooling water, once-through system, to air)

## Reference product
- refractory, fireclay, packed: 1 kg; name RP_amount_1; CPC 373: Refractory products and structural non-refractory clay products; By-product classification allocatable product
  EcoSpold01Location=DE
  Fireclay bricks have an Al2O3 content of 10 - 45 % according to ISO 1109. They are manufactured from chamotte and bonding-clay mixtures. The limit of 45 % Al2O3 represents the maximum Al2O3 content of the clay mineral with aluminium oxide (i.e., ignited kaolinite). The amounts of bonding clay and added water vary a factor that largely determines both the subsequent forming process (plastic, semidry, dry shaping) and the properties of the resulting fired bricks. Low-aluminium oxide or siliceous fireclay bricks may contain as additives granular SiO2 raw materials. Variation of the clays, grogs, and grain sizes permits the production of numerous brick types. Fireclay bricks contain up to ca. 3 % Fe2O3 (for low-iron bricks, <1%), ca. 3 % TiO2, <1% CaO + MgO, and alkali oxides, mainly K2O (c. 3.5%) and Na2O (usually <0.25%). High-quality bricks include <0.5% Na2O + K2O.
  Mullite, cristobalite, and/or quartz and a glassy phase (composition: ca. 80% SiO2, 10% Al2O3, the rest fluxes, mainly alkalies) are the usual components of fireclay bricks. The mullite content is generally proportional to the Al2O3 content of the bricks. The amount of cristobalite (0 - 25%) and of the glassy phase (20 - 60%) depends largely on the content of alkali oxides, which can be deduced from the phase diagram Al2O3 - SiO2 - K2O. With rising temperature, cristobalite dissolves in the glassy phase, increasing the amount of melt. On cooling, the cristobalite again crystallises to a greater or lesser extent from the melt. The amount of residual quartz depends on the firing temperature and the grain size of the quartz.
  The resulting highly viscous melt enhances both sintering and densification of the brick texture on firing. A high firing temperature is necessary with a low alkali content to produce a low-porosity brick. Otherwise the glassy phase begins to soften at about 950 °C, imparting a wide softening range under load.
  Attack by slag on fireclay bricks normally occurs in relatively small reaction zones; wear progresses by erosion of the resulting highly viscosity reaction zone. In contact with glass melts, alkali migrates into the brick texture and the bricks are slowly dissolved in the glass melt. Other forms of damage include alkali bursting (for bricks with > ca. 35% Al2O3), CO disintegration, and thermal spalling (dense bricks).
  The main applications of fireclay refractory are general furnace constructions, blast furnaces and hot-blast stoves, foundries, furnaces for the non-ferrous-metal industry, coke ovens, glass industry, and cement industry.
  production volume 5.06576e9 kg; name RP_PV_1; = (2542435.166*1000*0.66/1.2)/0.26
    Estimated value. According to Elzea Kogel, J, Trivedi, N.C., Barker, J.M. & Krukowski, S. T. (editors) (2006) Industrial Minerals and Rocks: Commodities, Markets and Uses, 7th edition, no precise estimates have been made so far on clay production, problems in these estimates are the exclusion of China and India in the majority of statistical references and the inclusion of different types of clays in different categories depending on the reporting geography. Kogel et al. estimate for 2002 World production of common clay to be hundreds of Mt, for refractory more than 20Mt , Kaolin 43 Mt mined and 26 Mt sold, Bentonite 10.3 Mt, Fuller’s earth uncertain 10Mt, ball clay 15.5 Mt and Hormites 2.1 Mt. As no precise estimate was found the World production volume for clay and kaolin production are estimated from European production volumes. For Bentonite and Kaolin World values are available from the European mineral statistics 2009-2013 (http://www.bgs.ac.uk/mineralsuk/statistics/europeanStatistics.html, accessed 08.02.2016) for which Eu production for Kaolin is 34.5% of World’s production and for Bentonite is the 16.4%. The remaining World values are scaled assuming that EU represents the 26% of World’s production, based on the average between Kaolin and Bentonite. Following the commodities are listed with their Prodcom codes, Prodcom name and production volume for EU 28 in tons: 08122210 “Bentonite” 2216788 tons, 08122230 “Fireclay” 2542435 tons, 08122250 “Common clays and shales for construction use (excluding bentonite, fireclay, expanded clays, kaolin and kaolinic clays); andalusite, kyanite and sillimanite; mullite; chamotte or dinas earths” 32000000 tons, and 08122160 “Kaolinitic clays (ball and plastic clays)” 2997294 tons. According to the European mineral statistics 2009-2013 (<http://www.bgs.ac.uk/mineralsuk/statistics/europeanStatistics.html>, accessed 08.02.2016), Europe (EU36) produces 9.1Mt of Kaolin, which is 34.5% of World production, of which 47.8% (16% of all World production) comes from Germany. The largest producer in 2013 was US with 23%, China represented the 12%, Brazil 8%, and Iran 6%. The European mineral statistics values are used for both Europe and the World estimates. The same source reports for EU36 Bentonite production of 2.73 Mt for 2013, which represents the 16.4% of World production. The values for Europe matches the values indicated from Eurostat and it used to estimate World’s production. Germany produces 13.1% of Europe’s bentonite 358844 tons. The volume of produced clay is assigned to the different activities based on USGS (2015) estimates of uses in the USA (<http://minerals.usgs.gov/minerals/pubs/commodity/clays/mcs-2015-clays.pdf>, accessed 08.02.2016) and according to input of clay per reference product. Of common clay, 39% is used for brick (for which 50% is assumed to be used for clay bricks and 50% light clay bricks), 23% lightweight aggregate, 31% cement, and 7% other uses (USGS specifies that 9% of common clay is used for lightweight concrete block production in the 2013 Minerals yearbook http://minerals.usgs.gov/minerals/pubs/commodity/clays/myb1-2013-clays.pdf, accessed 08.02.2016). Of ball clay, 39% is used for floor and wall tiles, 17% sanitary ware, and 44% other uses. Of bentonite 26% absorbents, 24% drilling mud, 15% foundry sand bond (assumed to represent plaster clay), 11% iron ore pelletising, and 24% other uses. Of fire clay, 34% for heavy clay products, and 66% for refractory and other products. Of fuller’s earth, 70% absorbents, and 30% for other uses. The US produce 15 to 25 % of refined clays (without common clay and shale). Comparing the estimated global values with the data for USGS (2015) for the production in USA, the US is responsible for 20% of Kaolin products, 34% of Bentonite and more than 10% of common clays. USGS (2015) reports USA to “probably” represent 15% to 25% of World production of refined clays excluding common clays.
  property price 0.63 EUR2005
    UN import prices. From UN trade database. Category: 'Refractory bricks, etc with >50% Mg, Ca or Cr as oxid.'
  property carbon content 0
    carbon content on a dry matter basis (reserved; not for manual entry)
  properties: wet mass 1 kg, water content 0, carbon content, non-fossil 0, water in wet mass 0 kg, carbon content, fossil 0, dry mass 1 kg, carbon allocation 0 kg

## Inputs from technosphere
- industrial machine, heavy, unspecified: 0.000167 kg; lognormal variance with pedigree 0.424, pedigree (5,4,5,5,1)
  EcoSpold01Location=RER
  Estimation. The infrastructure of all machines are considered. A production volume of 1.000.000 kg/year, a weight of 50t and a lifetime of 30 years are assumed.
- heat, district or industrial, natural gas: 0 MJ; pedigree (1,1,1,1,1)
  Estimation, based on personal communication from one company in Germany for the year 1999.
  EcoSpold01Location=RER
  properties: heating value, net 1 MJ
- lubricating oil: 1.31e-5 kg; lognormal variance with pedigree 0.14, pedigree (1,5,5,5,4)
  Literature value. Data was obtained from the "brick production" dataset.
  EcoSpold01Location=RER
  properties: carbon content, fossil 0.75, wet mass 1 kg, heating value, net 40.2 MJ, dry mass 1 kg
  note on carbon content, fossil: Lubricating oil is produced from diesel. C-content/dry mass of fats and oils considered 75%, from: ecoinvent v2.2 report, n 15a, pg 40
  note on heating value, net: Literature value, Source: IPCC 2006, 2006 IPCC Guidelines for National Greenhouse Gas Inventories, Prepared by the National Greenhouse Gas Inventories Programme, Eggleston H.S., Buendia L., Miwa K., Ngara T. and Tanabe K. (eds). Published: IGES, Japan
- municipal solid waste: 0 kg; name BP_amount_1; pedigree (1,1,1,1,1)
  Estimation. Primarily wood pallets and used oil are treated.
  EcoSpold01Location=CH
  production volume 0 kg
    Calculated from the production volume of refractory, fireclay, packed in proportion to the respective output amounts.
  properties: carbon content, non-fossil 0.261655, water content 0.297017, dry mass 0.771 kg, carbon content, fossil 0.171549, wet mass 1 kg, heating value, net 11.74 MJ
  note on carbon content, non-fossil: MSW composition in tab 4.1, ecoinvent v2.2 report 13_I. C content referred to 1 kg DM
  note on heating value, net: Value taken from the general comment of the treatment dataset.
- diesel, burned in building machine: 2 MJ; lognormal variance with pedigree 0.0546, pedigree (2,4,5,5,1)
  Estimation. Diesel is used for internal transports. As no data was available, the amount assumed was between the amount of the other refractory bricks datasets (high aluminium oxide refractory and basic refractory).
  EcoSpold01Location=GLO
  properties: heating value, net 1 MJ
- clay pit infrastructure: 2e-11 unit; lognormal variance with pedigree 0.44, pedigree (1,5,5,5,4)
  EcoSpold01Location=CH
  Proxy. Clay pit infrastructure is used as proxy. The amount has been copied from land-use "brick production". A production volume of 1.000.000 kg/year and a production time of 50 years are assumed.
- lime, hydrated, packed: 0.015 kg; lognormal variance with pedigree 0.0546, pedigree (2,4,5,5,1)
  EcoSpold01Location=CH
  Estimation, based on personal communication from one company in Germany for the year 1999.
  properties: water content 0.00300903, wet mass 1 kg, dry mass 0.997 kg
- clay: 1.2 kg; lognormal variance with pedigree 0.0546, pedigree (2,4,5,5,1)
  Proxy. Chamotte and clay are used as inputs. Chamotte is burned and milled clay, and clay is used as proxy.
  Estimation, based on personal communication from one company in Germany for the year 1999.
  EcoSpold01Location=CH
  properties: dry mass 0.965 kg, water content 0.0362694, wet mass 1 kg
- packing, clay product: 1 kg; lognormal variance with pedigree 0.0526, pedigree (3,5,5,5,1)
  Estimation. The packing of 1 kg of product is considered.
  EcoSpold01Location=CH
- electricity, medium voltage: 0 kWh; pedigree (1,1,1,1,1)
  Estimation, based on personal communication from one company in Germany for the year 1999.
  EcoSpold01Location=DE
- heat, district or industrial, natural gas: 0.155681, 0.00312158, 10.1012 MJ (3 entries); lognormal variance with pedigree 0.0546, pedigree (2,4,5,5,1)
  (same comment as for heat, district or industrial, natural gas)
- municipal solid waste: -1.94759e-6, -5.71328e-6, -3.51639e-6, -6.17816e-6, -6.23799e-6, -6.57358e-6, -7.31442e-6, -1.65638e-6, -5.97246e-6, -5.8393e-6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 kg (39 entries); lognormal variance with pedigree 0.0546, pedigree (2,4,5,5,1)
  Estimation. Primarily wood pallets and used oil are treated.
  EcoSpold01Location=CH
  production volume 2.53288e7 kg
- electricity, medium voltage: 9.37583e-5, 0.000789422, 0.00247855, 0.000148605, 0.000894964, 0.000389982, 0.00035891, 0.000653531, 0.000647422, 0.00035996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 kWh (46 entries); lognormal variance with pedigree 0.0546, pedigree (2,4,5,5,1)
  (same comment as for electricity, medium voltage)

## Inputs from nature
- Water, cooling, unspecified natural origin [natural resource, in water]: 2e-5 m3; name water_cooling_UNO_input; lognormal variance with pedigree 0.0546, pedigree (2,4,5,5,1)
  Estimation, based on personal communication from one company in Germany for the year 1999. Process and cooling water is used in the process.

## Emissions to nature
- Water [water, unspecified]: 1.225e-5 m3; name water_to_water_unspecified; = water_cooling_UNO_input*(1-fraction_CW_to_air); lognormal variance with pedigree 0.0827, pedigree (2,2,5,5,1)
  Calculated value based on literature values and expert opinion. See comments in the parametres' comment field.
  property water in wet mass 1000 kg; name WWM
  property fraction, origin: fresh water 0; name fraction_origin_fresh_water_Ww
  property fraction, origin: unspecified 1; name fraction_origin_unspecified_Ww
  property dry mass 0 kg; name DM
  property carbon content, fossil 0; name C_content_fossil
  property carbon content, non-fossil 0; name C_content_non_fossil
  property fraction, origin: salt water 0; name fraction_origin_salt_water_Ww
  property wet mass 1000 kg; name WM
- Water [air, unspecified]: 7.75e-6 m3; name water_to_air_unspecified; = (water_cooling_UNO_input*fraction_CW_to_air); lognormal variance with pedigree 0.0827, pedigree (2,2,5,5,1)
  (same comment as for Water)
  property fraction, origin: fresh water 0; name fraction_origin_fresh_water
  property fraction, origin: salt water 0; name fraction_origin_salt_water
  property fraction, origin: unspecified 1; name fraction_origin_unspecified

## Sampling procedure
Measured data of one German plant

## Extrapolations
See geography This dataset has been copied from an original dataset covering the geography DE. The uncertainty has been adjusted accordingly.

## Review by Roberto Dones 2003-08-06
passed
