# treatment of automobile catalyst

Dataset: EcoSpold 2, unit process
Geography: RoW
Time period: 1995-01-01 to 2021-12-31
Technology level: current
Classification: EcoSpold01Categories: metals/extraction
Classification: ISIC rev.4 ecoinvent: 2420:Manufacture of basic precious and other non-ferrous metals
Synonyms: platinumgroup metal; Platingruppenmetall
Tags: ConvertedDataset
Scenario: Business-as-Usual
System model: Allocation, cut-off by classification
Share of production covered: 4.6 %
Generated by: Mischa Classen
Published in: Althaus H.-J. 2000
Database: ecoinvent
isCopyrightProtected: true
accessRestrictedTo: 1

## General comment
This module describes the collecting of autocatalysts in Germany, the dismantling of the catalysts and the pyrometallurgical processing followed by a hydrometallurgical purification step. The multioutput-process "platinum group metal production, secondary, RER" delivers the co-products "platinum, secondary, at refinery", "palladium, secondary, at refinery" and "rhodium, secondary, at refinery". The smelter slag disposal is inventoried as disposal of inert material, thus neglecting potentially important (but unknown) heavy metal emissions.
[This dataset was already contained in the ecoinvent database version 2. It was not individually updated during the transfer to ecoinvent version 3. Life Cycle Impact Assessment results may still have changed, as they are affected by changes in the supply chain, i.e. in other datasets. This dataset was generated following the ecoinvent quality guidelines for version 2. It may have been subject to central changes described in the ecoinvent version 3 change report (http://www.ecoinvent.org/database/ecoinvent-version-3/reports-of-changes/), and the results of the central updates were reviewed extensively. The changes added e.g. consistent water flows and other information throughout the database. The documentation of this dataset can be found in the ecoinvent reports of version 2, which are still available via the ecoinvent website. The change report linked above covers all central changes that were made during the conversion process.]

## Included activities end
The module includes a collection step, with the transportation of the scrap to the intermediary dealer, a beneficiation step and a metallurgical step. Production, application and emissions of the most important agents are also included.

## Geography
Data for Germany are used in this module for Europe. Some agents used like lime or transport originate from data sets are valid only for Switzerland.

## Technology
After collection and transportation to the intermediary dealer, the scrap is ground in a mill. The resulting material is fed to specialised refineries. The metallurgical step consists of an arc-furnace. Same refining process as in primary production assumed (selective precipitation)

## Reference product
- spent automobile catalyst: 0 kg; CPC 39990: Other wastes n.e.c.; By-product classification Recyclable
  Assumed average recoverable PGM content 0.25% (ecoinvent v2.0 report 10, part V, Fig. 5.16)
  production volume 0 kg; name sa_catalyst_RP_PV; = ABS( sa_catalyst_RP)/ palladium_byP* palladium_byP_PV
    Calculated in relationship to the amount of palladium produced in this activity.
  properties: price 0 EUR2005
- palladium: 1 kg; name palladium_byP; CPC 4160: Other non-ferrous metals and articles thereof (including waste and scrap of some metals); cermets and articles […]; By-product classification allocatable product; CAS 7440-05-3
  EcoSpold01Location=RER
  production volume 2433.57 kg; name palladium_byP_PV; = 219000*0.083*0.2
  property true value 3.7224; name palladium_byP_true_value
  properties: price 5640 EUR2005, water in wet mass 0 kg, carbon content, fossil 0, dry mass 1 kg, carbon content, non-fossil 0, water content 0, wet mass 1 kg, carbon content 0, carbon allocation 0 kg

## By-products
- platinum: 0 kg; name platinum_byP; CPC 41330: Platinum, unwrought or in semi-manufactured forms, or in powder form; By-product classification allocatable product; CAS 7440-06-4
  EcoSpold01Location=RER
  production volume 4867.15 kg; = platinum_byP/ABS( sa_catalyst_RP)* sa_catalyst_RP_PV
    Calculated in relationship to the amount of palladium produced in this activity.
  property price 20600 EUR2005
    Temporary price data. Calculated as 90% of purchasers price based on: 2004 price from USGS (2007) Mineral commodity summaries 2007. <http://minerals.usgs.gov/minerals/pubs/mcs/2007/mcs2007.pdf> [Accessed 25 May 2010]
  property carbon content 0
    carbon content on a dry matter basis (reserved; not for manual entry)
  property true value 27.192; name platinum_byP_true_value
    allocation property applied in "true value" allocation // value calculated from revenue
  properties: carbon content, non-fossil 0, wet mass 1 kg, water in wet mass 0 kg, water content 0, dry mass 1 kg, carbon content, fossil 0, carbon allocation 0 kg
- rhodium: 0 kg; name rhodium_byP; CPC 4160: Other non-ferrous metals and articles thereof (including waste and scrap of some metals); cermets and articles […]; By-product classification allocatable product; CAS 7440-16-6
  EcoSpold01Location=RER
  production volume 1917.36 kg; = rhodium_byP/ABS( sa_catalyst_RP)* sa_catalyst_RP_PV
    Calculated in relationship to the amount of palladium produced in this activity.
  property price 23800 EUR2005
    (same comment as for platinum)
  property carbon content 0
    carbon content on a dry matter basis (reserved; not for manual entry)
  property true value 12.376; name rhodium_byP_true_value
    allocation property applied in "true value" allocation // value calculated from revenue
  properties: carbon content, fossil 0, wet mass 1 kg, water in wet mass 0 kg, dry mass 1 kg, carbon content, non-fossil 0, water content 0, carbon allocation 0 kg
- palladium: 0 kg; CPC 4160: Other non-ferrous metals and articles thereof (including waste and scrap of some metals); cermets and articles […]; By-product classification allocatable product; CAS 7440-05-3
  EcoSpold01Location=RER
  production volume 0 kg; name palladium_byP_PV; = 219000*0.083*0.2
    Calculated based on literature data and estimates. The annual global production volume of palladium in 2005 is 219 ton (http://minerals.usgs.gov/minerals/pubs/commodity/platinum/platimcs07.pdf). It is calculated, that the amount of secondary palladium is approximatelly 8.3%, i.e. 18.2 ton. It is estimated, that 20% of this amount is produced by treatment of automotive catalyst.
  property price 5640 EUR2005
    (same comment as for platinum)
  property carbon content 0
    carbon content on a dry matter basis (reserved; not for manual entry)
  properties: water in wet mass 0 kg, carbon content, fossil 0, dry mass 1 kg, carbon content, non-fossil 0, water content 0, wet mass 1 kg, carbon allocation 0 kg

## Inputs from technosphere
- lime, hydrated, loose weight: 26.0566 kg; lognormal variance with pedigree 0.1301, pedigree (4,2,5,5,4)
  EcoSpold01Location=CH
  properties: dry mass 0.997 kg, water content 0.00300903, wet mass 1 kg
- electricity, medium voltage: 0 kWh; pedigree (1,1,1,1,1)
  EcoSpold01Location=UCTE
- chemical factory, organics: 1.30283e-10 unit; lognormal variance with pedigree 0.4301, pedigree (4,2,5,5,4)
  EcoSpold01Location=RER
- heat, district or industrial, natural gas: 0 MJ; pedigree (1,1,1,1,1)
  EcoSpold01Location=RER
  properties: heating value, net 1 MJ
- copper, cathode: 0.325707 kg; lognormal variance with pedigree 0.1301, pedigree (4,2,5,5,4)
  EcoSpold01Location=RER
  properties: wet mass 1 kg, dry mass 1 kg
- inert waste, for final disposal: -145.265 kg; name inert_waste; lognormal variance with pedigree 0.0621, pedigree (3,2,5,5,3)
  EcoSpold01Location=CH
  production volume 4.11126e6 kg; = inert_waste/ABS( sa_catalyst_RP)* sa_catalyst_RP_PV
    Calculated in relationship to the amount of palladium produced in this activity.
  property price 0 EUR2005; name inert_waste_price_EUR2005
  properties: water content 0.00502513, dry mass 0.995 kg, wet mass 1 kg
- spent automobile catalyst: 130.283 kg
  (same comment as for spent automobile catalyst)
  production volume 3.68723e6 kg
- electricity, medium voltage: 4.43405, 0.85026, 14.2741, 207.604, 29.2619, 95.3396 kWh (6 entries); lognormal variance with pedigree 0.0621, pedigree (3,2,5,5,3)
  EcoSpold01Location=UCTE
- heat, district or industrial, natural gas: 3.64445, 236.467 MJ (2 entries); lognormal variance with pedigree 0.0621, pedigree (3,2,5,5,3)
  EcoSpold01Location=RER

## Emissions to nature
- Particulates, < 2.5 um [air, non-urban air or from high stacks]: 0.000781698 kg; lognormal variance with pedigree 0.0721, pedigree (3,2,5,5,3)
- Particulates, > 10 um [air, non-urban air or from high stacks]: 0.00263497 kg; lognormal variance with pedigree 0.1821, pedigree (3,2,5,5,3)
- Particulates, > 2.5 um, and < 10um [air, non-urban air or from high stacks]: 0.00193144 kg; lognormal variance with pedigree 0.3621, pedigree (3,2,5,5,3)
- Sulfur dioxide [air, non-urban air or from high stacks]: 0.00605816 kg; lognormal variance with pedigree 0.0621, pedigree (3,2,5,5,3)
- Nitrogen oxides [air, non-urban air or from high stacks]: 0.0114649 kg; lognormal variance with pedigree 0.1021, pedigree (3,2,5,5,3)
- Carbon dioxide, fossil [air, unspecified]: 11.4649 kg; lognormal variance with pedigree 0.1301, pedigree (4,2,5,5,4)

## Sampling procedure
Literature

## Extrapolations
see Geography and Technology This dataset has been copied from an original dataset covering the geography RER. The uncertainty has been adjusted accordingly.

## Review by Emilia Moreno Ruiz 2014-05-26
PV adjusted

## Review by Roland Hischier 2004-05-28
Passed.
