# batch dyeing, fibre, cotton

Dataset: EcoSpold 2, unit process
Geography: IN
Time period: 2016-04-01 to 2021-03-31
Technology level: current
Classification: EcoSpold01Categories: textiles/processing
Classification: ISIC rev.4 ecoinvent: 1313:Finishing of textiles
Scenario: Business-as-Usual
System model: Allocation, cut-off by classification
Generated by: Mireille Faist Emmenegger
Published in: Faist Emmenegger, M. 2018
Database: ecoinvent
isCopyrightProtected: true
accessRestrictedTo: 1

## General comment
This inventory dataset represents the process of dyeing 1 kg of cotton fabric in India.
Electricity consumption and chemicals used (wetting and sequencing agent, acetic acid and hydrogen peroxide, sodium hydroxide, dye chemicals, water, greige fabric and electricity) are considered as inputs. The dyeing process consists of following sequence.
The following processes are used to dye cotton fabric: bleaching, neutralisation, Dyeing, neutralisation, soaping, hot wash. hydro extraction, drying, conditioning, and utilities. The process involves immersing fabric in dyebath and the bath circulates around the fabric. Bath is heated by petcoke generated steam. This is followed by water extraction, drying and conditioning. The fabric is then folded and sent for further processing i.e. garment production
Batch Dyeing Process is the most popular and common method used for dyeing of textile materials. In this process, the dye gets slowly transferred from a comparatively large volume dyebath to the substrate or material that is to be dyed. In batch processes, textile substrates can be easily dyed at any stage of their assembly into the desired textile product. This includes fiber, yarn, fabric or garment. Some type of batch dyeing machines can function at temperatures only up to 100 Celsius. For example cotton, rayon, nylon, wool etc. can be dyed at 100 Celsius or lower temperatures. While polyester and some other synthetic fibers are dyed at 100 Centigrade or even higher temperatures. There are three general types of batch dyeing machines. The first type is the one where there is circulation of fabric. Second type is the one where the dyebath gets circulated while the material that is being dyed remains stationary, and finally the third type where both the bath and material to be dyed gets circulated. Examples of dyeing machines that utilizes batch dyeing process are Beck, Jet, Jigs, Beam Package dyeing machines etc.

## Included activities start
The activity starts with the loading of fabric. However, this is a service dataset. That means that the loaded fabric is not considered as an input of this process.

## Included activities end
This activity delivers the service of dyeing 1 kg cotton fabric. It has to be used with 1 kg of unbleached cotton fabric. The activity ends with dryed and conditionned fabric,

## Geography
Based on average annual data from an Apparel manufacturing unit located in Gurgaon (Haryana) North India.

## Technology
The following processes are used to dye cotton fabric: Preparing fabric for Dyeing (Ready for Dyeing) by adding bleaching chemicals, Dyeing, hydro extraction, drying, conditioning, and utilities. The process involves immersing fabric in dyebath and the bath circulates around the fabric. Bath is heated by electricity generated steam. This is followed by water extraction, drying and conditioning. The fabric is then folded and sent for further processing i.e. garment production

## Reference product
- batch dyeing, fibre, cotton: 1 kg; By-product classification allocatable product; CPC 97150: Dyeing and colouring services
  production volume 2.2165e7 kg; name PV_RP; = 44330000/2
    India produces about 22165 million sqm of cotton textile in a year. Considering that the fabric has an average weight of 0.002 kg/sqm. Annual production of cotton fabric is dyed fabric is 44330000 kg. It is assumed that 50% of this volume is dyed.
  property price 0.729209 EUR2005
    Calculated based on inputs: The price of the product has been calculated as a sum of the values of the material and energy inputs for this product. This value is therefore a rough estimation. It may underestimate the real price since there are additional expenses when producing any product. These expences can include for example labour costs, treatment of waste materials and profit for the producer. Please consider carefully whether this level of data quality is acceptable for your application.
  property carbon content 0.46
    carbon content on a dry matter basis (reserved; not for manual entry)
  properties: water content 0, carbon content, non-fossil 0.46, dry mass 1 kg, water in wet mass 0 kg, carbon content, fossil 0, wet mass 1 kg, carbon allocation 0.46 kg

## Inputs from technosphere
- tap water: 104 kg; name water; lognormal variance with pedigree 0.0046, pedigree (1,4,3,1,1)
  Used during the process
  properties: wet mass 1 kg, carbon content, fossil 0.00178991, water content 2962.17, dry mass 0.000337476 kg
  note on carbon content, fossil: Bicarbonate content is 2.93 mol/m3. CO2 content is 0.1 mol/m3 (ecoinvent v2.2 report 8, Tab 93.1).
- building, hall: 1.55665e-5 m2; = 8000/(10278500*50); lognormal variance with pedigree 0.3026, pedigree (2,1,3,1,1)
  total building area (square meters) divided by production per year and life time of the plant
- hydrogen peroxide, without water, in 50% solution state: 0.02 kg; lognormal variance with pedigree 0.0126, pedigree (4,4,3,1,1)
  For preparing Ready For Dyeing (RFD) solution
  properties: wet mass 1 kg, dry mass 1 kg, heating value, net 7.13 MJ
- soap: 0.005 kg; lognormal variance with pedigree 0.0126, pedigree (4,4,3,1,1)
  Used during the soaping process. Typically, soaps, such as phosphate-based detergents, are added during the soaping step to assist in removal of unreacted reactive dyes.
  properties: heating value, net 17.93 MJ, wet mass 1 kg, dry mass 0.87 kg, carbon content, non-fossil 0.692237, water content 0.149425
- wastewater from textile production: -0.0832 m3; name wastewater; = ((Water/1000)*80/100)*-1; lognormal variance with pedigree 0.0126, pedigree (4,4,3,1,1)
  considering 80% default wastewater generation
  production volume 1.84413e6 m3; = PV_RP*wastewater
    Calculated from production volume of reference product using the relative outputs.
  property price 0 EUR2005; name wastewater_price_EUR2005
- diesel, burned in diesel-electric generating set, 18.5kW: 15.47 MJ; lognormal variance with pedigree 0.0126, pedigree (4,4,3,1,1)
  Diesel used for power backup. Forumula includes diesel consumption in liters multiplied density of fule and its calorific value
- chemical, organic: 0.02625 kg; lognormal variance with pedigree 0.0126, pedigree (4,4,3,1,1)
  Sum of organic chemicals: wetting agent, anticreasing agent, sequencing agent and dyeing chemicals.
  properties: dry mass 1 kg, carbon content, fossil 0.628, wet mass 1 kg, heating value, net 19.03 MJ
  note on carbon content, fossil: This dataset is an unweighted average of 20 organic substances (listed in Tab 88.1, ecoinvent v2.2 report 8, part II), being part of the top100 chemicals included in this database. The C-content has also been calculated as an unweighted average of the C content of the substances composing this dataset.
- acetic acid, without water, in 98% solution state: 0.016 kg; lognormal variance with pedigree 0.0126, pedigree (4,4,3,1,1)
  used for both neutralisation and dyeing process
  properties: heating value, net 14.6 MJ, wet mass 1 kg, dry mass 1 kg, carbon content, fossil 0.400016
  note on heating value, net: Based on literature, page 10, Althaus H.-J., Chudacoff M., Hischier R., Jungbluth N., Osses M. and Primas A. (2007) Life Cycle Inventories of Chemicals. Final report ecoinvent data v2.0 No. 8. EMPA, Swiss Centre for Life Cycle Inventories, Dübendorf, CH, Online-Version under: www.ecoinvent.org.
- sodium hydroxide, without water, in 50% solution state: 0.18 kg; lognormal variance with pedigree 0.0126, pedigree (4,4,3,1,1)
  For preparing Ready For Dyeing (RFD) solution
  properties: heating value, net 3.03 MJ, wet mass 1 kg, dry mass 1 kg
- electricity, low voltage: 1.18 kWh; lognormal variance with pedigree 0.0046, pedigree (1,4,3,1,1)
  sum of electricity used for:
  dyeing machine
  boiler
  RO purification
- sodium chloride, powder: 0.6 kg; lognormal variance with pedigree 0.0126, pedigree (4,4,3,1,1)
  For preparing Ready For Dyeing (RFD) solution
  properties: dry mass 1 kg, wet mass 1 kg

## Emissions to nature
- Water [air, urban air close to ground]: 0.0208 m3; = (Water/1000)- (wastewater*-1); lognormal variance with pedigree 0.0126, pedigree (4,4,3,1,1)
  Considering 20% evaporation rate

## Sampling procedure
Field visit and interview. Data has been obtained from a dyeing plant located in NCR, North India based on the representativeness of currently used technology, and the company’s willingness to share the data.

## Extrapolations
This dataset has been extrapolated from year 2017 to the year of the calculation (2021). The uncertainty has been adjusted accordingly.
