# treatment of waste polystyrene, unsanitary landfill, moist infiltration class (300mm)

Dataset: EcoSpold 2, unit process
Geography: GLO
Time period: 2006-01-01 to 2021-12-31
Technology level: current
Classification: ISIC rev.4 ecoinvent: 3821:Treatment and disposal of non-hazardous waste
Synonyms: municipal waste landfill
Scenario: Business-as-Usual
System model: Allocation, cut-off by classification
Share of production covered: 1 %
Generated by: Avraam Symeonidis
Database: ecoinvent
isCopyrightProtected: true
accessRestrictedTo: 1

## General comment
This dataset represents the activity of waste disposal of waste polystyrene in a unsanitary landfill. Recommended use of this dataset: For PS, which goes to disposal as part of managed communal waste mixture. For Expanded PS (EPS) use other dataset. // Waste composition (wet, in ppm): upper heating value 38.88 MJ/kg; lower heating value 38.67 MJ/kg; H2O 2000; O 38852; H 78046; C 868490; S 678.75; N 1942.6; P n.a.; B n.a.; Cl 1132.1; Br 882.12; F 14.25; I n.a.; Ag n.a.; As 1.8418; Ba 180.79; Cd 23.336; Co 30.622; Cr 39.613; Cu 107.56; Hg 0.82311; Mn 77.469; Mo n.a.; Ni 19.968; Pb 14.935; Sb 41.65; Se 2.0357; Sn 25.403; V 279.32; Zn 834.61; Be 0.48468; Sc n.a.; Sr 85.789; Ti 969.36; Tl 0.38774; W n.a.; Si n.a.; Fe 3611.5; Ca n.a.; Al 193.87; K n.a.; Mg n.a.; Na 1420.6; . // Share of carbon in waste that is biogenic 0%. Share of metals in waste not oxidised and bulk-recyclable (exclude very small or thin parts) Iron: 0%; Alu: 0%; Copper: 0%. Overall degradability of waste during 100 years: 1%.

## Included activities start
from final waste deposition (without transports to the site)

## Included activities end
Waste-specific short-term emissions to air via landfill gas and landfill leachate. Waste-specific long-term emissions from landfill.

## Geography
Given name of landfill location is 'infiltration class 3 moist (2018)'. Landfill site with mean annual temperature (MAT) of 8 degC, mean annual precipitation (MAP) of 900 mm/year, and net infiltration of 300 mm/year.
Climate adjustments result in an alpha t (temperature) for permafrost areas of 0.999. Total climate adjustments with alpha pt of 0.999.

## Technology
This is an inventory for an unsanitary, sub-controlled landfill for municipal solid waste. Ultimate average landfill height is 15 meters. Operation phase duration is 25 years.Percentage of landfill gas directly emitted is 100w%.
Leachate of the landfill is not treated. Based on average waste composition and climate data the end of carbonate phase is estimated to be reached 5581 years after waste deposition.

## Reference product
- waste polystyrene: -1 kg; CPC 39270: Waste, parings and scrap of plastics; By-product classification Waste; CAS 9003-53-6; pedigree (1,1,1,1,1)
  main reference product of this activity (supply of disposal service).
  Uncertainty: Uncertainty is not adjusted, as this is the refence product
  production volume 1 kg
    The amount of the annual production volume is a placeholder value. The contribution of this technology to the different local markets can be found in the markets themselves.
  property price 0 EUR2005
    Waste products are assigned a price of zero as they are assumed to require further treatment.
  property heating value, net 38.67 MJ
    Value taken from the general comment of the treatment dataset.
  property carbon content 0.87023
    carbon content on a dry matter basis (reserved; not for manual entry)
  properties: dry mass 0.998 kg, wet mass 1 kg, water in wet mass 0.002 kg, carbon content, fossil 0.87023, water content 0.002004, heating value, gross 38.884 MJ, antimony content 4.1734e-5, nickel content 2.0008e-5, titanium content 0.0009713, oxygen content 0.03893, aluminium content 0.00019426, sulfur content 0.00068011, hydrogen content 0.078203, vanadium content 0.00027988, fluorine content 1.4278e-5, thallium content 3.8852e-7, lead content 1.4965e-5, nitrogen content 0.0019465, zinc content 0.00083628, barium content 0.00018115, sodium content 0.0014234, manganese content 7.7625e-5, tin content 2.5454e-5, cadmium content 2.3383e-5, mercury content 8.2476e-7, arsenic content 1.8455e-6, chlorine content 0.0011344, selenium content 2.0397e-6, bromine content 0.00088389, strontium content 8.596e-5, beryllium content 4.8565e-7, iron content 0.0036188, copper content 0.00010778, chromium content 3.9692e-5, cobalt content 3.0684e-5, carbon allocation 0.86849 kg

## Inputs from technosphere
- diesel, burned in building machine: 0.046738 MJ; lognormal variance with pedigree 0.088256, pedigree (1,1,4,1,1)
  for waste distribution and compaction.
  Uncertainty: Uncertainty calculated from uncertainty in base parameters.
  properties: heating value, net 1 MJ
- excavation, skid-steer loader: 0.00031708 m3; lognormal variance with pedigree 0.088256, pedigree (1,1,4,1,1)
  application of daily cover.
  Uncertainty: Uncertainty calculated from uncertainty in base parameters.

## Inputs from nature
- Occupation, dump site [natural resource, land]: 0.0023333 m2*year; lognormal variance with pedigree 0.088256, pedigree (1,1,4,1,1)
  for landfill operation phase and spontaneous renaturation.
  Uncertainty: Uncertainty calculated from uncertainty in base parameters.

## Emissions to nature
- Mercury [water, ground-]: 5.6317e-10 kg; lognormal variance with pedigree 0.58221, pedigree (1,1,4,1,1)
  burden from short-term leachate to groundwater in uncontrolled landfill in moist cimate.
  Uncertainty: Uncertainty calculated from unertainty of the waste composition of this waste, uncertainty in waste decomposition and short-term leaching in landfill
- Nitrite [water, ground-, long-term]: 4.2036e-5 kg; lognormal variance with pedigree 0.15092, pedigree (1,1,4,1,1)
  Emissions from long-term leachate (>100a) directly from MSW landfill and indirectly via incineration of treatement sludge from leachate treatement.
  Uncertainty: Uncertainty calculated depending on waste input and uncertainty of long-term transfer coefficents in landfill.
- Cobalt [air, non-urban air or from high stacks]: 2.4577e-11 kg; lognormal variance with pedigree 0.68495, pedigree (1,1,4,1,1)
  burden from direct release or incineration of landfill biogas; or windblown leachate evaporite in arid climates.
  Uncertainty: Uncertainty calculated from unertainty of the waste composition of this waste, uncertainty in waste decomposition and short-term leaching in landfill
- Nickel, ion [water, ground-]: 1.1595e-8 kg; lognormal variance with pedigree 0.48299, pedigree (1,1,4,1,1)
  (same comment as for Mercury)
- Nitrogen, organic bound [water, ground-, long-term]: 0.0012623 kg; lognormal variance with pedigree 0.15092, pedigree (1,1,4,1,1)
  (same comment as for Nitrite)
- Cadmium [air, non-urban air or from high stacks]: 2.7343e-10 kg; lognormal variance with pedigree 0.60666, pedigree (1,1,4,1,1)
  (same comment as for Cobalt)
- Copper, ion [water, ground-]: 5.261e-9 kg; lognormal variance with pedigree 0.50864, pedigree (1,1,4,1,1)
  (same comment as for Mercury)
- Ammonium, ion [water, ground-, long-term]: 0.00077233 kg; lognormal variance with pedigree 0.15092, pedigree (1,1,4,1,1)
  (same comment as for Nitrite)
- Copper [air, non-urban air or from high stacks]: 1.5031e-12 kg; lognormal variance with pedigree 0.77041, pedigree (1,1,4,1,1)
  (same comment as for Cobalt)
- Chromium VI [water, ground-]: 4.51e-9 kg; lognormal variance with pedigree 0.51392, pedigree (1,1,4,1,1)
  (same comment as for Mercury)
- Hydrogen sulfide [water, ground-, long-term]: 4.9224e-5 kg; lognormal variance with pedigree 0.18508, pedigree (1,1,4,1,1)
  (same comment as for Nitrite)
- Barium [air, non-urban air or from high stacks]: 5.1702e-10 kg; lognormal variance with pedigree 0.58475, pedigree (1,1,4,1,1)
  (same comment as for Cobalt)
- Cobalt [water, ground-]: 9.8309e-8 kg; lognormal variance with pedigree 0.41381, pedigree (1,1,4,1,1)
  (same comment as for Mercury)
- Sulfate [water, ground-, long-term]: 0.0018884 kg; lognormal variance with pedigree 0.18508, pedigree (1,1,4,1,1)
  (same comment as for Nitrite)
- Arsenic [air, non-urban air or from high stacks]: 4.632e-11 kg; lognormal variance with pedigree 0.66508, pedigree (1,1,4,1,1)
  (same comment as for Cobalt)
- Barium [water, ground-]: 2.0681e-6 kg; lognormal variance with pedigree 0.31596, pedigree (1,1,4,1,1)
  (same comment as for Mercury)
- DOC, Dissolved Organic Carbon [water, ground-, long-term]: 0.85982 kg; lognormal variance with pedigree 0.00816185, pedigree (1,1,4,1,1)
  (same comment as for Nitrite)
- Hydrogen fluoride [air, non-urban air or from high stacks]: 5.6733e-8 kg; lognormal variance with pedigree 0.43406, pedigree (1,1,4,1,1)
  (same comment as for Cobalt)
- Fluoride [water, ground-]: 1.0456e-8 kg; lognormal variance with pedigree 0.48654, pedigree (1,1,4,1,1)
  (same comment as for Mercury)
- COD, Chemical Oxygen Demand [water, ground-, long-term]: 0.94042 kg; lognormal variance with pedigree 0.00816185, pedigree (1,1,4,1,1)
  (same comment as for Nitrite)
- Bromine [air, non-urban air or from high stacks]: 3.1104e-7 kg; lognormal variance with pedigree 0.37377, pedigree (1,1,4,1,1)
  (same comment as for Cobalt)
- Cadmium, ion [water, ground-]: 4.1014e-8 kg; lognormal variance with pedigree 0.44195, pedigree (1,1,4,1,1)
  (same comment as for Mercury)
- TOC, Total Organic Carbon [water, ground-, long-term]: 0.85982 kg; lognormal variance with pedigree 0.00816185, pedigree (1,1,4,1,1)
  (same comment as for Nitrite)
- Hydrogen chloride [air, non-urban air or from high stacks]: 4.1045e-7 kg; lognormal variance with pedigree 0.36564, pedigree (1,1,4,1,1)
  (same comment as for Cobalt)
- Arsenic, ion [water, ground-]: 3.3042e-9 kg; lognormal variance with pedigree 0.5249, pedigree (1,1,4,1,1)
  (same comment as for Mercury)
- BOD5, Biological Oxygen Demand [water, ground-, long-term]: 0.22263 kg; lognormal variance with pedigree 0.00816185, pedigree (1,1,4,1,1)
  (same comment as for Nitrite)
- Nitrogen oxides [air, non-urban air or from high stacks]: 2.6612e-8 kg; lognormal variance with pedigree 0.30985, pedigree (1,1,4,1,1)
  burden from direct release or incineration of landfill biogas.
  Uncertainty: Uncertainty calculated from unertainty of the waste composition of this waste, uncertainty in waste decomposition and short-term leaching in landfill
- Bromine [water, ground-]: 2.2187e-5 kg; lognormal variance with pedigree 0.24116, pedigree (1,1,4,1,1)
  (same comment as for Mercury)
- Sulfur dioxide [air, non-urban air or from high stacks]: 8.8472e-7 kg; lognormal variance with pedigree 0.36222, pedigree (1,1,4,1,1)
  (same comment as for Nitrogen oxides)
- Nitrate [water, ground-]: 1.9443e-6 kg; lognormal variance with pedigree 0.21763, pedigree (1,1,4,1,1)
  (same comment as for Mercury)
- Methane, fossil [air, non-urban air or from high stacks]: 0.0062829 kg; lognormal variance with pedigree 0.11122, pedigree (1,1,4,1,1)
  (same comment as for Nitrogen oxides)
- Chloride [water, ground-]: 2.8476e-5 kg; lognormal variance with pedigree 0.23302, pedigree (1,1,4,1,1)
  (same comment as for Mercury)
- Sodium, ion [water, ground-, long-term]: 0.0013619 kg; lognormal variance with pedigree 0.16103, pedigree (1,1,4,1,1)
  (same comment as for Nitrite)
- Nitrite [water, ground-]: 1.0062e-6 kg; lognormal variance with pedigree 0.21763, pedigree (1,1,4,1,1)
  (same comment as for Mercury)
- Carbon dioxide, fossil [air, non-urban air or from high stacks]: 0.013603 kg; lognormal variance with pedigree 0.101086, pedigree (1,1,4,1,1)
  (same comment as for Nitrogen oxides)
- Nitrogen, organic bound [water, ground-]: 3.0217e-5 kg; lognormal variance with pedigree 0.21763, pedigree (1,1,4,1,1)
  (same comment as for Mercury)
- Hydrogen sulfide [water, ground-]: 1.839e-7 kg; lognormal variance with pedigree 0.3064, pedigree (1,1,4,1,1)
  (same comment as for Mercury)
- Aluminium [water, ground-, long-term]: 0.00019378 kg; lognormal variance with pedigree 0.22649, pedigree (1,1,4,1,1)
  (same comment as for Nitrite)
- Ammonium, ion [water, ground-]: 1.8488e-5 kg; lognormal variance with pedigree 0.21763, pedigree (1,1,4,1,1)
  (same comment as for Mercury)
- Thallium [water, ground-, long-term]: 3.8752e-7 kg; lognormal variance with pedigree 0.43088, pedigree (1,1,4,1,1)
  (same comment as for Nitrite)
- Sulfate [water, ground-]: 7.0547e-6 kg; lognormal variance with pedigree 0.3064, pedigree (1,1,4,1,1)
  (same comment as for Mercury)
- Iron, ion [water, ground-, long-term]: 0.003611 kg; lognormal variance with pedigree 0.13117, pedigree (1,1,4,1,1)
  (same comment as for Nitrite)
- COD, Chemical Oxygen Demand [water, ground-]: 0.00027634 kg; lognormal variance with pedigree 0.21176, pedigree (1,1,4,1,1)
  (same comment as for Mercury)
- Titanium, ion [water, ground-, long-term]: 0.00096888 kg; lognormal variance with pedigree 0.17342, pedigree (1,1,4,1,1)
  (same comment as for Nitrite)
- TOC, Total Organic Carbon [water, ground-]: 0.00025266 kg; lognormal variance with pedigree 0.21176, pedigree (1,1,4,1,1)
  (same comment as for Mercury)
- Strontium [water, ground-, long-term]: 8.5739e-5 kg; lognormal variance with pedigree 0.25361, pedigree (1,1,4,1,1)
  (same comment as for Nitrite)
- DOC, Dissolved Organic Carbon [water, ground-]: 0.00025266 kg; lognormal variance with pedigree 0.21176, pedigree (1,1,4,1,1)
  (same comment as for Mercury)
- Beryllium [water, ground-, long-term]: 4.844e-7 kg; lognormal variance with pedigree 0.42372, pedigree (1,1,4,1,1)
  (same comment as for Nitrite)
- Sodium [air, non-urban air or from high stacks]: 1.468e-8 kg; lognormal variance with pedigree 0.47488, pedigree (1,1,4,1,1)
  (same comment as for Cobalt)
- Vanadium, ion [water, ground-, long-term]: 9.4318e-5 kg; lognormal variance with pedigree 0.28802, pedigree (1,1,4,1,1)
  (same comment as for Nitrite)
- BOD5, Biological Oxygen Demand [water, ground-]: 6.542e-5 kg; lognormal variance with pedigree 0.21176, pedigree (1,1,4,1,1)
  (same comment as for Mercury)
- Tin, ion [water, ground-, long-term]: 2.5401e-5 kg; lognormal variance with pedigree 0.29409, pedigree (1,1,4,1,1)
  (same comment as for Nitrite)
- Heat, waste [water, ground-, long-term]: 38.496 MJ; lognormal variance with pedigree 0.020651, pedigree (1,1,4,1,1)
  burden from long-term decomposition of waste (>100a).
  Uncertainty: Uncertainty calculated from unertainty of the waste composition of this waste, uncertainty in waste decomposition and short-term leaching in landfill
- Zinc, ion [water, ground-, long-term]: 0.00083421 kg; lognormal variance with pedigree 0.17831, pedigree (1,1,4,1,1)
  (same comment as for Nitrite)
- Heat, waste [soil, industrial]: 0.24777 MJ; lognormal variance with pedigree 0.083834, pedigree (1,1,4,1,1)
  burden from short-term decomposition of waste (0-100a).
  Uncertainty: Uncertainty calculated from unertainty of the waste composition of this waste, uncertainty in waste decomposition and short-term leaching in landfill
- Lead [water, ground-, long-term]: 1.4934e-5 kg; lognormal variance with pedigree 0.3117, pedigree (1,1,4,1,1)
  (same comment as for Nitrite)
- Aluminium [air, non-urban air or from high stacks]: 2.4199e-11 kg; lognormal variance with pedigree 0.6828, pedigree (1,1,4,1,1)
  (same comment as for Cobalt)
- Antimony [water, ground-, long-term]: 4.9495e-6 kg; lognormal variance with pedigree 0.56116, pedigree (1,1,4,1,1)
  (same comment as for Nitrite)
- Iron [air, non-urban air or from high stacks]: 1.2387e-10 kg; lognormal variance with pedigree 0.62784, pedigree (1,1,4,1,1)
  (same comment as for Cobalt)
- Thallium [water, ground-]: 2.2516e-10 kg; lognormal variance with pedigree 0.61179, pedigree (1,1,4,1,1)
  (same comment as for Mercury)
- Selenium [water, ground-, long-term]: 6.6619e-7 kg; lognormal variance with pedigree 0.4552, pedigree (1,1,4,1,1)
  (same comment as for Nitrite)
- Thallium [air, non-urban air or from high stacks]: 5.6289e-14 kg; lognormal variance with pedigree 0.88243, pedigree (1,1,4,1,1)
  (same comment as for Cobalt)
- Sodium, ion [water, ground-]: 5.8719e-5 kg; lognormal variance with pedigree 0.21236, pedigree (1,1,4,1,1)
  (same comment as for Mercury)
- Nickel, ion [water, ground-, long-term]: 1.9956e-5 kg; lognormal variance with pedigree 0.30208, pedigree (1,1,4,1,1)
  (same comment as for Nitrite)
- Strontium [air, non-urban air or from high stacks]: 1.2454e-11 kg; lognormal variance with pedigree 0.70516, pedigree (1,1,4,1,1)
  (same comment as for Cobalt)
- Iron, ion [water, ground-]: 4.9547e-7 kg; lognormal variance with pedigree 0.3596, pedigree (1,1,4,1,1)
  (same comment as for Mercury)
- Mercury [water, ground-, long-term]: 8.2232e-7 kg; lognormal variance with pedigree 0.40665, pedigree (1,1,4,1,1)
  (same comment as for Nitrite)
- Titanium [air, non-urban air or from high stacks]: 1.21e-10 kg; lognormal variance with pedigree 0.62973, pedigree (1,1,4,1,1)
  (same comment as for Cobalt)
- Aluminium [water, ground-]: 9.6797e-8 kg; lognormal variance with pedigree 0.41235, pedigree (1,1,4,1,1)
  (same comment as for Mercury)
- Manganese [water, ground-, long-term]: 7.6583e-5 kg; lognormal variance with pedigree 0.25701, pedigree (1,1,4,1,1)
  (same comment as for Nitrite)
- Vanadium [air, non-urban air or from high stacks]: 7.3552e-11 kg; lognormal variance with pedigree 0.64708, pedigree (1,1,4,1,1)
  (same comment as for Cobalt)
- Titanium, ion [water, ground-]: 4.8398e-7 kg; lognormal variance with pedigree 0.35927, pedigree (1,1,4,1,1)
  (same comment as for Mercury)
- Cobalt [water, ground-, long-term]: 3.0524e-5 kg; lognormal variance with pedigree 0.28788, pedigree (1,1,4,1,1)
  (same comment as for Nitrite)
- Zinc [air, non-urban air or from high stacks]: 8.7758e-11 kg; lognormal variance with pedigree 0.64001, pedigree (1,1,4,1,1)
  (same comment as for Cobalt)
- Strontium [water, ground-]: 4.9816e-8 kg; lognormal variance with pedigree 0.43452, pedigree (1,1,4,1,1)
  (same comment as for Mercury)
- Copper, ion [water, ground-, long-term]: 0.00010756 kg; lognormal variance with pedigree 0.24608, pedigree (1,1,4,1,1)
  (same comment as for Nitrite)
- Tin [air, non-urban air or from high stacks]: 3.7378e-13 kg; lognormal variance with pedigree 0.81684, pedigree (1,1,4,1,1)
  (same comment as for Cobalt)
- Beryllium [water, ground-]: 2.8145e-10 kg; lognormal variance with pedigree 0.60463, pedigree (1,1,4,1,1)
  (same comment as for Mercury)
- Chromium VI [water, ground-, long-term]: 2.149e-7 kg; lognormal variance with pedigree 1.9802, pedigree (1,1,4,1,1)
  (same comment as for Nitrite)
- Beryllium [air, non-urban air or from high stacks]: 7.0362e-14 kg; lognormal variance with pedigree 0.87527, pedigree (1,1,4,1,1)
  (same comment as for Cobalt)
- Zinc, ion [water, ground-]: 3.9491e-7 kg; lognormal variance with pedigree 0.36593, pedigree (1,1,4,1,1)
  (same comment as for Mercury)
- Cadmium, ion [water, ground-, long-term]: 2.3295e-5 kg; lognormal variance with pedigree 0.2969, pedigree (1,1,4,1,1)
  (same comment as for Nitrite)
- Lead [air, non-urban air or from high stacks]: 2.9299e-13 kg; lognormal variance with pedigree 0.82562, pedigree (1,1,4,1,1)
  (same comment as for Cobalt)
- Vanadium, ion [water, ground-]: 2.9421e-7 kg; lognormal variance with pedigree 0.37591, pedigree (1,1,4,1,1)
  (same comment as for Mercury)
- Arsenic, ion [water, ground-, long-term]: 1.8384e-6 kg; lognormal variance with pedigree 0.38051, pedigree (1,1,4,1,1)
  (same comment as for Nitrite)
- Antimony [air, non-urban air or from high stacks]: 1.0967e-11 kg; lognormal variance with pedigree 0.71035, pedigree (1,1,4,1,1)
  (same comment as for Cobalt)
- Tin, ion [water, ground-]: 1.4951e-9 kg; lognormal variance with pedigree 0.55052, pedigree (1,1,4,1,1)
  (same comment as for Mercury)
- Barium [water, ground-, long-term]: 0.00017872 kg; lognormal variance with pedigree 0.22882, pedigree (1,1,4,1,1)
  (same comment as for Nitrite)
- Selenium [air, non-urban air or from high stacks]: 5.3604e-13 kg; lognormal variance with pedigree 0.80995, pedigree (1,1,4,1,1)
  (same comment as for Cobalt)
- Lead [water, ground-]: 8.7897e-10 kg; lognormal variance with pedigree 0.56814, pedigree (1,1,4,1,1)
  (same comment as for Mercury)
- Fluoride [water, ground-, long-term]: 1.4185e-5 kg; lognormal variance with pedigree 0.31326, pedigree (1,1,4,1,1)
  (same comment as for Nitrite)
- Nickel [air, non-urban air or from high stacks]: 2.8988e-12 kg; lognormal variance with pedigree 0.75363, pedigree (1,1,4,1,1)
  (same comment as for Cobalt)
- Selenium [water, ground-]: 2.1441e-9 kg; lognormal variance with pedigree 0.53878, pedigree (1,1,4,1,1)
  (same comment as for Mercury)
- Bromine [water, ground-, long-term]: 0.00085962 kg; lognormal variance with pedigree 0.17651, pedigree (1,1,4,1,1)
  (same comment as for Nitrite)
- Mercury [air, non-urban air or from high stacks]: 2.2527e-10 kg; lognormal variance with pedigree 0.61227, pedigree (1,1,4,1,1)
  (same comment as for Cobalt)
- Antimony [water, ground-]: 4.387e-8 kg; lognormal variance with pedigree 0.43918, pedigree (1,1,4,1,1)
  (same comment as for Mercury)
- Chloride [water, ground-, long-term]: 0.0011032 kg; lognormal variance with pedigree 0.16838, pedigree (1,1,4,1,1)
  (same comment as for Nitrite)
- Manganese [air, non-urban air or from high stacks]: 2.2155e-10 kg; lognormal variance with pedigree 0.61294, pedigree (1,1,4,1,1)
  (same comment as for Cobalt)
- Manganese [water, ground-]: 8.862e-7 kg; lognormal variance with pedigree 0.34415, pedigree (1,1,4,1,1)
  (same comment as for Mercury)
- Nitrate [water, ground-, long-term]: 8.1222e-5 kg; lognormal variance with pedigree 0.15092, pedigree (1,1,4,1,1)
  (same comment as for Nitrite)
- Chromium [air, non-urban air or from high stacks]: 1.1275e-12 kg; lognormal variance with pedigree 0.78176, pedigree (1,1,4,1,1)
  (same comment as for Cobalt)

## Extrapolations
This dataset has been extrapolated from year 2012 to the year of the calculation (2021). The uncertainty has been adjusted accordingly.
