# anchovy, capture by steel purse seiner and landing whole, fresh

Dataset: EcoSpold 2, unit process
Geography: PE
Time period: 2010-01-01 to 2021-12-31
Technology level: current
Classification: ISIC rev.4 ecoinvent: 0311:Marine fishing
Scenario: Business-as-Usual
System model: Allocation, cut-off by classification
Generated by: Angel Avadí
Published in: Avadí, A. 2018
Database: ecoinvent
isCopyrightProtected: false
accessRestrictedTo: 1

## General comment
This activity represents capture and landing of Peruvian anchoveta by steel purse seiners. The life cycle inventories were produced based on a large representative sample of Peruvian vessels and their activity. Data from a sample of 316 vessels opperated by the largest 7 fishing companies in the country (2008-2011) was extrapolated to characterise anchoveta landings by 661 Peruvian steel purse seiners.
The whole Peruvian anchoveta (Engraulis ringens) fishery is the largest monospecific fishery in the world and supports the first national industry worldwide in terms of production and exportation of fishmeal and fish oil (mostly devoted to feeds for aquaculture and animal husbandry). The fleet consists of three segments, the most productive segment being the steel-hulled industrial fishing vessels (approximately 660 units). Catches by the steel fleet represent approximately 81 % of the total anchoveta catches. Additionally, almost 690 wooden semi-industrial vessels (nicknamed “Vikingas”) also target anchoveta for reduction and approximately 840 small- and medium-scale wooden vessels target mainly anchoveta, in principle for direct human consumption.
System boundaries and relation between activities

## Included activities start
From vessel use and maintenance phases, including all upstream activities

## Geography
Anchoveta (Engraulis ringens) is captured in the Peruvian EEZ.

## Technology
Current technology deployed in Peru includes purse seining and advanced fish detection equipment, including satellital data. Landing by pumping fish from floating platforms.

## Time period
Data corresponds to the landings-weighted average of annual opperation for 2008 and 2010.

## Parameters
- net calorific value: 42.7 MJ/kg; name net_cal_value; triangular min 41.4, mostLikely 42.7, max 43.3, pedigree (3,5,3,5,5)
  Net calorific value of marine diesel oil (MDO)
  Uncertainty: Most likely value from Wild (2005) Determination of energy cost of electrical energy on board sea-going vessels: "The net calorific value of marine diesel oil (MDO) and marine gas oil (MGO) is 42,700 kJ/kg". Uncertainty data from 2006 IPCC Guidelines for National Greenhouse Gas Inventories, Vol 1, Table 1.2 Default net calorific values (NCVs) and lower and upper limits of the 95 percent confidence intervals (data for Gas/Diesel Oil)
- light ship weight: 510000 kg; name Weight_vessel
  Weight of the vessel without any load or fishing tackle
- annual landings per vessel: 7.657e6 kg; name landings_vessel_year; lognormal variance with pedigree 0.078767, pedigree (1,1,1,1,1)
  Average annual landings per individual vessel
  Uncertainty: Based on 561 datapoints on annual landings and fuel consumption from 316 vessels in 2008-2010
- marine fuel use efficiency: 16.6 kg; name FUE; lognormal variance with pedigree 0.018104, pedigree (1,1,1,1,1)
  Amount of marine fuel consumed per landed unit of fish
  Uncertainty: Based on 561 datapoints on annual landings and fuel consumption from 316 vessels in 2008-2010

## Reference product
- landed anchovy, fresh: 1 kg; name landed; source Pierre Fréon 2014; CPC 04261: Other wild pelagic fish, live, fresh or chilled; By-product classification allocatable product
  Fresh whole Peruvian anchoveta (Engraulis ringens) captured in the Eastern Pacific Ocean (EPO) and landed for the production of fishmeal and fish oil.
  production volume 4.212e9 kg; name RP_PV_1; = 5200000000*0.81
    5.2 million t landed annually, in average, in the period 2008-2010. 81% landed by steel vessels
  property ash content 0.02 kg; name anch_ash
    http://frida.fooddata.dk/ShowFood.php?foodid=1121&2
  property protein content 0.191; name anch_protein
    Data for Peruvian anchovies
  property fat content 0.088; name anch_fat
    Data for Peruvian anchovies
  property price 0.539258 EUR2005; name landed_price_EUR2005
    Calculated value based on data from United Nations Commodity Trade Statistics Database (comtrade.un.org). UN comtrade category: 30242 Fish; fresh or chilled, anchovies (Engraulis spp.), excluding fillets, livers, roes, and other fish meat of heading 0304. Year 2014. Using exchange rate of 1EURO = 1.209 USD. Average of price of import into 3 main markets (EU, US and CN).
  property carbon content, non-fossil 0.481541; = (1-anch_protein-anch_fat-anch_ash)*0.444+anch_protein*0.535+anch_fat*0.774
    Calculated from C_content = polysaccharids*0.444+protein*0.535+lipids*0.774 and polysaccharids = 1-(protein+lipids+ash)
  property carbon content 0.481541
    carbon content on a dry matter basis (reserved; not for manual entry)
  properties: wet mass 1 kg, water in wet mass 0.73798 kg, water content 2.81651, dry mass 0.26202 kg, energy content 7.9 MJ, carbon allocation 0.126173 kg

## Inputs from technosphere
All rows: source Pierre Fréon 2014
- diesel, burned in fishing vessel: 0.70882 MJ; = FUE*net_cal_value
  Landings-weighted average fuel use efficiency. Uncertainty data for fuel use efficiency described in the parameter definition
- lubricating oil: 8.06e-5 kg; name oil; triangular min 8.06e-5, mostLikely 8.06e-5, max 8.06e-5, pedigree (1,1,2,1,1)
  Lubricating oil for vessel engine
  Uncertainty: Data from a sample of 24 vessels. Table 1 in "Fréon et al (2014) Life cycle assessment of the Peruvian industrial anchoveta fleet: boundary setting in life cycle inventory analyses of complex and plural means of production"
  property carbon content, fossil 0.75; name oil_CCF
  properties: heating value, net 40.2 MJ, dry mass 1 kg, wet mass 1 kg
  note on heating value, net: Literature value, Source: IPCC 2006, 2006 IPCC Guidelines for National Greenhouse Gas Inventories, Prepared by the National Greenhouse Gas Inventories Programme, Eggleston H.S., Buendia L., Miwa K., Ngara T. and Tanabe K. (eds). Published: IGES, Japan
  note on carbon content, fossil: Lubricating oil is produced from diesel. C-content/dry mass of fats and oils considered 75%, from: ecoinvent v2.2 report, n 15a, pg 40
- antifouling paint emissions: -1.04e-5 kg; triangular min -1.04e-5, mostLikely -1.04e-5, max -1.04e-5, pedigree (1,1,2,1,1)
  Mass of solids from antifouling paint
  Uncertainty: Data from a sample of 22 vessels. Table 1 in "Fréon et al (2014) Life cycle assessment of the Peruvian industrial anchoveta fleet: boundary setting in life cycle inventory analyses of complex and plural means of production"
  production volume 43804.8 kg; = 0.0104*5200000*0.81
    10.4 g antifouling solids per landed t, 5.2 million t landed per year in 2008-2010. 81% landed by steel vessels
  properties: wet mass 1 kg, carbon content, non-fossil 0.21, carbon content, fossil 0.21, dry mass 1 kg
- purse seiner, steel: 0.00190302 kg; = Weight_vessel/(landings_vessel_year*lifetime)*1000
  Construction of a purse seiner, per 1000 kg of light ship weight (LSW). Regressions based on mainly primary data were created to relate the weight of each inventory item to a purse seiner's LSW. The list of inventory items (granularity) contribute >95% of environmental impacts, as described in the reference publication.
  property lifetime 35 year; name lifetime
  properties: lifetime capacity [h] 56000 hour
- waste mineral oil: -8.06e-5 kg; name BP_amount_1; = (oil)*-1
  Waste lubricating oil treated inland
  production volume 339487 kg; = RP_PV_1 * (BP_amount_1 / landed)
    Calculated from production volume of reference product using the relative outputs.
  property price 0 EUR2005; name BP_amount_1_price_EUR2005
  properties: water content 0.111111, carbon content, fossil 0.75, wet mass 1 kg, dry mass 0.9 kg, heating value, net 34.7 MJ
  note on carbon content, fossil: Tab A.6, ecoinvent v2.2 report 13_I. C content has been calculated after data in the tables, and then referred to 1 kg DM
  note on heating value, net: Value taken from the general comment of the treatment dataset.
- purse seiner maintenance, steel: 0.00190302 kg; = Weight_vessel/(landings_vessel_year*lifetime)*1000
  Maintenance of a purse seiner, per 1000 kg of light ship weight (LSW) over 35 years lifetime. Regressions based on mainly primary data were created to relate the weight of each inventory item to a purse seiner's LSW. The list of inventory items (granularity) contribute >95% of environmental impacts, as described in the reference publication.;activityLink introduced to establish a direct link to the corresponding regional supply of this product

## Inputs from nature
- Fish, pelagic, in ocean [natural resource, biotic]: 1.039 kg; name captured; source Pierre Fréon 2014; triangular min 1.039, mostLikely 1.039, max 1.039, pedigree (2,1,2,1,1)
  Fish captured, including discards.
  Uncertainty: Data from Torrejón J, Díaz E Limache J (2012) Descarte por exceso de captura en la pesquería del stock norte-centro de la anchoveta peruana (Engraulis ringens J.) entre el 2005 – 2011 (Discards due to overfishing in the Peruvian anchoveta north-central stock in 2005-2011). In: Indacochea A (ed) Libro de resúmenes digital. III
  CONCIMAR Congreso de Ciencias del Mar del Perú (p361) Retrieved from http://concimarperu2012.com/
  property ash content 0.015 kg; name fishp_ash
  property fat content 0.07; name fishp_fat
  property protein content 0.179; name fishp_protein

## Emissions to nature
- Discarded fish, pelagic, to ocean [water, ocean]: 0.039 kg; = captured-landed; source Pierre Fréon 2014
  Pelagic fish discarded by fisheries
  property protein content 0.179; name discardsp_protein
  property fat content 0.07; name discardsp_fat
  property ash content 0.015 kg; name discardsp_ash

## Sampling procedure
Data for a large sample of vessels from various large companies (annonymous) and institutions monitoring landings and operations (IMARPE, PRODUCE) was collected. Fuel use was based on data from 316 vessels, while other inventory items were obtained from smaller samples ranging from ~20 to 135 vessels.
Data was scaled on the basis of light ship weight (LSW). Vessels were segregated into coherent segments based on LSW and LCIs compiled per segment. Ocasionally, multiple linear regressions were used to fill data gaps, based on known attributes of all vessels. Finally, landings-weighted averages were computed to characterise the average landed tonne.

## Extrapolations
This dataset has been extrapolated from year 2020 to the year of the calculation (2021). The uncertainty has been adjusted accordingly.
