# treatment of waste plaster-cardboard sandwich, collection for final disposal

Dataset: EcoSpold 2, unit process
Geography: CH
Time period: 1994-01-01 to 2021-12-31
Technology level: current
Classification: EcoSpold01Categories: waste management/building demolition
Classification: ISIC rev.4 ecoinvent: 3821:Treatment and disposal of non-hazardous waste
Synonyms: calcium sulfate dihydrate (has CAS 10101-41-4); alabaster; natural gypsum (has CAS 13397-24-5; selenite
Tags: ConvertedDataset; Treatment
Scenario: Business-as-Usual
System model: Allocation, cut-off by classification
Generated by: Gabor Doka (obsolete)
Published in: Doka G. 2007
Database: ecoinvent
isCopyrightProtected: true
accessRestrictedTo: 1

## General comment
The waste contains 0.834kg gypsum (GSD=100.4%) and 0.166kg cardboard (GSD=104.1%) Waste density is 1000 kg/m3. Allocation of energy production in waste incineration: no substitution or expansion. Total burden allocated to waste disposal function of waste incinerator.
[This dataset was already contained in the ecoinvent database version 2. It was not individually updated during the transfer to ecoinvent version 3. Life Cycle Impact Assessment results may still have changed, as they are affected by changes in the supply chain, i.e. in other datasets. This dataset was generated following the ecoinvent quality guidelines for version 2. It may have been subject to central changes described in the ecoinvent version 3 change report (http://www.ecoinvent.org/database/ecoinvent-version-3/reports-of-changes/), and the results of the central updates were reviewed extensively. The changes added e.g. consistent water flows and other information throughout the database. The documentation of this dataset can be found in the ecoinvent reports of version 2, which are still available via the ecoinvent website. The change report linked above covers all central changes that were made during the conversion process.]

## Included activities end
energy for dismantling, particulate matter emissions from dismantling and handling, transport to dismantling facilities, final disposal of waste material,

## Geography
Specific to the technology mix encountered in Switzerland in late 1990ies

## Technology
Building demolition with skid-steer loaders.

## Reference product
- waste plaster-cardboard sandwich: -1 kg; By-product classification Waste; CPC 39990: Other wastes n.e.c.
  EcoSpold01Location=CH
  production volume 41 kg
    proportion from ecoinvent v2 report 13_V; value to be replaced by value to be calculated from the demand for this treatment activity
  property price 0 EUR2005
    Waste products are assigned a price of zero as they are assumed to require further treatment.
  property carbon content, non-fossil 0.0873963
    The waste contains 0.834kg gypsum (see Tab A.4 for details) and 0.166kg cardboard (see Tab A.3 for details), ecoinvent v2.2 report 13_I. C content has been calculated after data in the atbles, and then referred to 1 kg DM
  property heating value, net 1.74 MJ
    LHV is calculated based on the Carbon content of the product. More details can be found on the respective documentation.
  property carbon content 0.0873963
    carbon content on a dry matter basis (reserved; not for manual entry)
  properties: water in wet mass 0.177562 kg, dry mass 0.822438 kg, carbon content, fossil 0, water content 0.215897, wet mass 1 kg, carbon allocation 0.071878 kg

## Inputs from technosphere
- diesel, burned in building machine: 0.0359 MJ; lognormal variance with pedigree 0.07, pedigree (1,1,5,1,1)
  EcoSpold01Location=GLO
  energy for demolition. Uncertainty from range in (DAFSTB 1996)
  properties: heating value, net 1 MJ
- waste paperboard: -0.166 kg; lognormal variance with pedigree 0.04, pedigree (1,1,5,1,1)
  disposed masses. Uncertainty calculated from uncertainty of waste composition
  EcoSpold01Location=CH
  production volume 6.806 kg
    Calculated from the production volume of waste plaster-cardboard sandwich in proportion to the respective output amounts.
  properties: heating value, net 15.92 MJ, water content 0.243781, carbon content, non-fossil 0.483259, dry mass 0.804 kg, wet mass 1 kg
  note on heating value, net: Value taken from the general comment of the treatment dataset.
  note on carbon content, non-fossil: C content was calculated for 1 kg DM, using data in Tab A.3, ecoinvent v2.2 report 13_I.
- waste gypsum: -0.834 kg; lognormal variance with pedigree 0.04, pedigree (1,1,5,1,1)
  EcoSpold01Location=CH
  disposed masses. Uncertainty calculated from uncertainty of waste composition
  production volume 34.194 kg
    (same comment as for waste paperboard)
  properties: water content 0.240695, dry mass 0.806 kg, wet mass 1 kg

## Emissions to nature
- Particulates, > 10 um [air, urban air close to ground]: 8.35e-5 kg; lognormal variance with pedigree 0.0913, pedigree (2,3,5,3,1)
  Emission from dismantling and handling. from one extrapolated PM10 emission factor and generic PM fractions from measurements
  Uncertainty: & basic uncertainty of 1.5; from one extrapolated PM10 emission factor and generic PM fractions from measurements
- Particulates, > 2.5 um, and < 10um [air, urban air close to ground]: 6.34e-5 kg; lognormal variance with pedigree 0.1813, pedigree (2,3,5,3,1)
  Emission from dismantling and handling. from one extrapolated PM10 emission factor and generic PM fractions from measurements
  Uncertainty: & basic uncertainty of 2; from one extrapolated PM10 emission factor and generic PM fractions from measurements
- Particulates, < 2.5 um [air, urban air close to ground]: 1.66e-5 kg; lognormal variance with pedigree 0.3613, pedigree (2,3,5,3,1)
  Emission from dismantling and handling. from one extrapolated PM10 emission factor and generic PM fractions from measurements
  Uncertainty: & basic uncertainty of 3; from one extrapolated PM10 emission factor and generic PM fractions from measurements

## Sampling procedure
waste-specific calculation based on literature data

## Extrapolations
This dataset has been extrapolated from year 2002 to the year of the calculation (2021). The uncertainty has been adjusted accordingly.

## Review by Niels Jungbluth 2003-05-22
Passed. Calculation for standard deviation 95 of transport services differs from standard Pedigree approach in this project and figure obtained by this procedure (2.09). Uncertainty for estimation of distance is not included.
