# nutrient supply from fermentation filtrate

Dataset: EcoSpold 2, unit process
Geography: GLO
Time period: 2000-01-01 to 2021-12-31
Technology level: current
Classification: ISIC rev.4 ecoinvent: 0161:Support activities for crop production
Scenario: Business-as-Usual
System model: Allocation, cut-off by classification
Generated by: Avraam Symeonidis
Database: ecoinvent
isCopyrightProtected: true
accessRestrictedTo: 1

## General comment
This inventory describes the supply of nutrients from ''fermentation filtrate'' for fertiliser use.

No machinery expenditures or emissions to the environment are considered related to the actual application of this substance on soil during its agricultural use. The purpose of this activity is to connect the production of ''fermentation filtrate'' with its generic uses as fertiliser. The product '''fermentation filtrate'' is connected to the generic market for "organic nitrogen fertiliser, as N" and "organic phosphorus fertiliser, as P2O5" and "organic potassium fertiliser, as K2O" through this supplying activity. In the agricultural context, '''fermentation filtrate'' can be used directly as a fertilizer input to crop production, eventually with other chemicals; alternatively, a generic input of "organic nitrogen fertiliser, as N" and "organic phosphorus fertiliser, as P2O5" and "organic potassium fertiliser, as K2O" can be used instead, and this will represent the regional consumption mix for his type of nutrient. A way in between is allowed by using the generic input "organic nitrogen fertiliser, as N" and "organic phosphorus fertiliser, as P2O5" and "organic potassium fertiliser, as K2O" and link to the activity providing it from a specific chemical.

In all cases, emissions associated to the application of the fertilizer have to be calculated in the crop production activity.

## Included activities start
This inventory describes the supply of nutrients from ''poultry manure, fresh'' for fertiliser use.

## Geography
inventory based on composition of fermentation filtrate

## Reference product
- organic nitrogen fertiliser, as N: 0 kg; name nitrogen_fertiliser_output; CPC 34659: Fertilizers n.e.c.; By-product classification allocatable product
  The nutrient content is about 5% N; 2% P2O5; 0.5 %K2O; 14% CaO; organic content approx. 50%.
  production volume 5625 kg; name PV_RP_2; = 112500*nitrogen_fertiliser_output
    Production volume calculated based on the production volume of fermentation filtrate that is produced in citric acid production.
  property price 0.473 EUR2005; name nitrogen_fertiliser_output_price_EUR2005
    Set equal to the price of the corresponding inorganic fertiliser
  property nitrogen content 1
    Nitrogen content (on a dry matter basis) of organic nitrogen fertiliser, as N is calculated from the molecular formula of the substance (Nitrogen).
  property carbon content, fossil 0
    Carbon content, fossil is calculated based on the chemical formula of the substance.
  property carbon content 0
    carbon content on a dry matter basis (reserved; not for manual entry)
  property true value 0.02365; name nitrogen_fertiliser_output_true_value
    allocation property applied in "true value" allocation // value calculated from revenue
  properties: dry mass 1 kg, carbon content, non-fossil 0, wet mass 1 kg, water content 0, water in wet mass 0 kg, carbon allocation 0 kg
- organic potassium fertiliser, as K2O: 1 kg; name potassium_fertiliser_output; By-product classification allocatable product; CPC 34659: Fertilizers n.e.c.
  (same comment as for organic nitrogen fertiliser, as N)
  production volume 562.5 kg; name PV_RP_3_1; = 112500* potassium_fertiliser_output
    (same comment as for organic nitrogen fertiliser, as N)
  property price 0.188 EUR2005; name potassium_fertiliser_outpu_price_EUR2005
    Set equal to the price of the corresponding inorganic fertiliser
  property carbon content, fossil 0
    Carbon content, fossil is calculated based on the chemical formula of the substance.
  property potassium content 0.830148
    Potassium content (on a dry matter basis) of organic potassium fertiliser, as K2O is calculated from the molecular formula of the substance (Potassium).
  property oxygen content 0.169852
    Oxygen content (on a dry matter basis) of organic potassium fertiliser, as K2O is calculated from the molecular formula of the substance (Potassium).
  property carbon content 0
    carbon content on a dry matter basis (reserved; not for manual entry)
  property true value 0.00094; name potassium_fertiliser_output_true_value
    allocation property applied in "true value" allocation // value calculated from revenue
  properties: water content 0, water in wet mass 0 kg, wet mass 1 kg, carbon content, non-fossil 0, dry mass 1 kg, carbon allocation 0 kg

## By-products
- organic phosphorus fertiliser, as P2O5: 0 kg; name phosphorus_fertiliser_output; By-product classification allocatable product; CPC 34659: Fertilizers n.e.c.
  (same comment as for organic nitrogen fertiliser, as N)
  production volume 2250 kg; name PV_RP_1_1; = 112500*phosphorus_fertiliser_output
    (same comment as for organic nitrogen fertiliser, as N)
  property oxygen content 0.563579
    Oxygen content (on a dry matter basis) of organic phosphorus fertiliser, as P2O5 is calculated from the molecular formula of the substance (Phosphorus).
  property price 0.241 EUR2005; name phosphorus_fertiliser_outp_price_EUR2005
    Set equal to the price of the corresponding inorganic fertiliser
  property carbon content, fossil 0
    Carbon content, fossil is calculated based on the chemical formula of the substance.
  property phosphorus content 0.436421
    Phosphorus content (on a dry matter basis) of organic phosphorus fertiliser, as P2O5 is calculated from the molecular formula of the substance (Phosphorus).
  property carbon content 0
    carbon content on a dry matter basis (reserved; not for manual entry)
  property true value 0.00482; name phosphorus_fertiliser_outpu_true_value_0
    allocation property applied in "true value" allocation // value calculated from revenue
  properties: dry mass 1 kg, carbon content, non-fossil 0, wet mass 1 kg, water content 0, water in wet mass 0 kg, carbon allocation 0 kg

## Inputs from technosphere
- fermentation filtrate: 6.39238 kg; name FF
  combined production
  properties: nitrogen content 0.05, wet mass 1 kg, carbon content, non-fossil 0.5, oxygen content 0.112188, calcium content 0.100058, potassium content 0.00415, phosphorus content 0.00872, dry mass 1 kg
  note on nitrogen content: The nutrient content is about 5% N; 2% P2O5; 0.5 %K2O; 14% CaO; organic content approx. 50%.
  note on oxygen content: The nutrient content is about 5% N; 2% P2O5; 0.5 %K2O; 14% CaO; organic content approx. 50%. Therefore oxygen content is calculated from the content of P2O5, K2O and CaO.

## Sampling procedure
Dataset based on nutrient content of ash, from combustion of bagasse from sugar cane for fertiliser use
