# sweet corn production

Dataset: EcoSpold 2, unit process
Geography: US
Time period: 2006-01-01 to 2021-12-31
Technology level: current
Classification: ISIC rev.4 ecoinvent: 0111:Growing of cereals (except rice), leguminous crops and oil seeds
Tags: WFLDB
Scenario: Business-as-Usual
System model: Allocation, cut-off by classification
Generated by: Tuija Waldvogel
Published in: Nemecek T. 2015
Database: ecoinvent
isCopyrightProtected: true
accessRestrictedTo: 1

## General comment
This dataset represents the production of 1 kg of sweet corn. The average yield from 2006 - 2007 is 13.9 t/ha. The data are representative for sweet production in the United States in Washington state, that is used for the export market. Mineral NPK fertiliser input is 100-40-130 kg/ha. Organic fertilisers applied amount to 3 m3/ha of liquid manure and 3 t/ha of solid manure. Total active ingredients (a.i.) applied as pesticides amount to 6.3 kg a.i./ha.
The dataset was modelled within the project 'World Food LCA database (WFLDB)'. The aim of this project was to provide inventories of a broad variety of agricultural products and processes and to cover for each product at least 50% of the global export market. The export share of sweet corn produced in the United States amounts to 17% of the global export (tonnage exported in 2010). The production system regarded in this dataset aimed at representing sweet corn produced in the United States for the export market.
PEF-Quality: data quality rating (DQR) = 1.3 (i.e. excellent quality). This dataset refers to an average situation; for specific situations exchanges might differ substantially due to site specific parameters

## Included activities start
This activity starts with soil cultivation after the harvest of the previous crop.

## Included activities end
This activity ends with the harvest of sweet corn at farm gate. The dataset includes all machine operations, corresponding infrastructure, fuel use and sheds. Machine operations are: soil cultivation, sowing, fertilisation, pesticide application, harvesting, and on-farm transport. Further, direct field emissions and land use change are included. Heavy metal uptake by the crop is considered. The inputs of seeds, fertilisers and pesticides as well as packaging of fertilisers and pesticides are considered. The dataset doesn't include emissions from manure storage because these are within the system boundary of animal production.

## Technology
Conventional production

## Time period
Time period referring to the data source: 2006-2007. Based on expert opinion data is considered to be valid at least up to 2012.

## Parameters
- heavyMetalUptakeSwitch: 1 dimensionless
- LUC_crop_specific: 1 dimensionless
  This parameter allows to switch between a 'crop specific' and a 'country specific' approach when calculating the LUC of a crop. By default, the chosen approach is 'crop specific', so the value of the parameter is 1. If you want to apply a 'country specific' approach, turn the parameter to 0.

## Reference product
- sweet corn: 1 kg; By-product classification allocatable product; CPC 01290: Vegetables, fresh, n.e.c.
  Reference flow: Yield = 13900.0 kg/ha
  production volume 5.48e8 kg
    Source: FAOSTAT. Average, 2009-2012
  property price 0.88 EUR2005
    Calculated value based on data from United Nations Commodity Trade Statistics Database (comtrade.un.org). UN comtrade category: 200580 Sweet corn, prepared or preserved, not frozen/vinegar. Year: 2005. Using exchange rate of 1EURO = 1.209 USD. Average of price of import into 5 main markets (EU, US, JP, IN and CN).
  property carbon content, non-fossil 0.435017
    calculation: C-content of components according to ecoinvent report No. 15a. Source of composition: Souci, S.W., Fachmann, W., Kraut, H. (Hg.: Bundesminsiterium fur Ernahrung, Landwirtschaft und Forsten, Bonn) 'Die Zusammensetzung der Lebensmittel - Nahrwerttabellen', medpharm Scientific Publishers Stuttgart, CRC Press; 2000.
  property carbon content 0.435017
    carbon content on a dry matter basis (reserved; not for manual entry)
  properties: dry mass 0.581395 kg, water content 0.72, water in wet mass 0.418605 kg, carbon content, fossil 0, wet mass 1 kg, carbon allocation 0.252917 kg

## Inputs from technosphere
- urea: 0.0030846 kg; source Bill Easterwood  2015; lognormal variance with pedigree 0.124177, pedigree (2,1,4,1,1)
  The exchange has been updated from 'urea, as N' into 'urea' and therefore its amount has been scaled (multiplied) from 0.0014 kg by 2.1438 kg of 'urea' per kg of 'urea, as N'. Original comment of the exchange is: Calculated based on literature values or expert estimation: The total amount of nutrient (Personal written communication, Bill Easterwood , Yara, 2015) multiplied by the share of fertiliser type (Personal written communication, Bill Easterwood , Yara, 2015). See supporting documentation 'WFLDB-Documentation.pdf' chapter 'Fertiliser application' for L3 and L4 data (https://ecoquery.ecoinvent.org/File/Reports).
  Corresponds to 20.0 kg/ha
  properties: dry mass 1 kg, wet mass 1 kg, carbon content, fossil 0.2
- organophosphorus-compound, unspecified: 4.78928e-5 kg; lognormal variance with pedigree 0.0138498, pedigree (2,2,4,1,1)
  29ef97ec-9586-410008-b287-611892c0f310; Literature value or expert estimation (Williams II 2008).
  properties: carbon content, fossil 0.260898, wet mass 1 kg, dry mass 1 kg
- potassium chloride: 0.0111031 kg; source Bill Easterwood  2015; lognormal variance with pedigree 0.124177, pedigree (2,1,4,1,1)
  The exchange has been updated from 'potassium chloride, as K2O' into 'potassium chloride' and therefore its amount has been scaled (multiplied) from 0.007 kg by 1.5829 kg of 'potassium chloride' per kg of 'potassium chloride, as K2O'. Original comment of the exchange is: Calculated based on literature values or expert estimation: The total amount of nutrient (Personal written communication, Bill Easterwood , Yara, 2015) multiplied by the share of fertiliser type (Personal written communication, Bill Easterwood , Yara, 2015). See supporting documentation 'WFLDB-Documentation.pdf' chapter 'Fertiliser application' for L3 and L4 data (https://ecoquery.ecoinvent.org/File/Reports).
  Corresponds to 97.5 kg/ha
  properties: dry mass 1 kg, wet mass 1 kg
- atrazine: 0.000224179 kg; lognormal variance with pedigree 0.0138498, pedigree (2,2,4,1,1)
  (same comment as for organophosphorus-compound, unspecified)
  properties: wet mass 1 kg, dry mass 1 kg, carbon content, fossil 0.446512
- potassium sulfate: 0.00432546 kg; source Bill Easterwood  2015; lognormal variance with pedigree 0.124177, pedigree (2,1,4,1,1)
  The exchange has been updated from 'potassium sulfate, as K2O' into 'potassium sulfate' and therefore its amount has been scaled (multiplied) from 0.0023 kg by 1.85 kg of 'potassium sulfate' per kg of 'potassium sulfate, as K2O'. Original comment of the exchange is: Calculated based on literature values or expert estimation: The total amount of nutrient (Personal written communication, Bill Easterwood , Yara, 2015) multiplied by the share of fertiliser type (Personal written communication, Bill Easterwood , Yara, 2015). See supporting documentation 'WFLDB-Documentation.pdf' chapter 'Fertiliser application' for L3 and L4 data (https://ecoquery.ecoinvent.org/File/Reports).
  Corresponds to 32.5 kg/ha
  properties: wet mass 1 kg, dry mass 1 kg
- maize seed, Swiss integrated production, for sowing: 0.00179856 kg; lognormal variance with pedigree 0.124177, pedigree (2,1,4,1,1)
  29ef97ec-9586-410008-b287-611892c0f310; Literature value or expert estimation (Williams II 2008). Sowing density: 25kg/ha.
  properties: water content 0.136364, dry mass 0.88 kg, wet mass 1 kg, carbon content, non-fossil 0.46957
- manure, liquid, cattle: 0.165414 kg; source Bill Easterwood  2015; lognormal variance with pedigree 0.124177, pedigree (2,1,4,1,1)
  Calculated based on literature values: The total amount of manure (Personal written communication, Bill Easterwood , Yara, 2015) multiplied by the country-share of manure per animal category (FAOSTAT 2015). See supporting documentation 'WFLDB-Documentation.pdf' chapter 'Fertiliser application' (https://ecoquery.ecoinvent.org/File/Reports).
  Corresponds to 2.3 m3/ha
  properties: water content 12.333, wet mass 1 kg, carbon content, non-fossil 0.68, dry mass 0.075 kg
- irrigation: 0.057554 m3; lognormal variance with pedigree 0.124177, pedigree (2,1,4,1,1)
  29ef97ec-9586-410008-b287-611892c0f310; Calculated value: The total amount of water used for irrigation (Williams II 2008) multiplied by the country-share of irrigation technique (WFLDB-Guidelines.pdf, Appendix 6.1). See supporting documentation 'WFLDB-Documentation.pdf' chapter 'Water use for irrigation' (https://ecoquery.ecoinvent.org/File/Reports).
  properties: water content 9089.91, dry mass 0.11 kg, wet mass 1000 kg
- manure, liquid, swine: 0.043171 kg; source Bill Easterwood  2015; lognormal variance with pedigree 0.124177, pedigree (2,1,4,1,1)
  Calculated based on literature values: The total amount of manure (Personal written communication, Bill Easterwood , Yara, 2015) multiplied by the country-share of manure per animal category (FAOSTAT 2015). See supporting documentation 'WFLDB-Documentation.pdf' chapter 'Fertiliser application' (https://ecoquery.ecoinvent.org/File/Reports).
  Corresponds to 0.6 m3/ha
  properties: water content 19, wet mass 1 kg, dry mass 0.05 kg, carbon content, non-fossil 0.64
- urea ammonium nitrate mix: 0.0059952 kg
  The exchange has been updated from 'inorganic nitrogen fertiliser, as N' into 'urea ammonium nitrate' and therefore its amount has been scaled (multiplied) from 0.0018 kg by 3.3333 kg of 'urea ammonium nitrate' per kg of 'inorganic nitrogen fertiliser, as N'. Original comment of the exchange is: Calculated based on literature values or expert estimation: The total amount of nutrient (Personal written communication, Bill Easterwood , Yara, 2015) multiplied by the share of fertiliser type (Personal written communication, Bill Easterwood , Yara, 2015). See supporting documentation 'WFLDB-Documentation.pdf' chapter 'Fertiliser application' for L3 and L4 data (https://ecoquery.ecoinvent.org/File/Reports).
  Corresponds to 15.0 kg/ha
  properties: oxygen content 0.749063, nitrogen content 0.401231, water content 0.333333, wet mass 1 kg, dry mass 0.75 kg, carbon content, fossil 0.0879977, hydrogen content 0.095042
  note on oxygen content: Oxygen content (on a dry matter basis) of urea ammonium nitrate mix is calculated from the molecular formula of the substance (CH6N4O4).
  note on nitrogen content: Nitrogen content (on a dry matter basis) of urea ammonium nitrate mix is calculated from the molecular formula of the substance (CH6N4O4).
  note on carbon content, fossil: Carbon content, fossil is calculated based on the chemical formula of the substance.
  note on hydrogen content: Hydrogen content (on a dry matter basis) of urea ammonium nitrate mix is calculated from the molecular formula of the substance (CH6N4O4).
- inorganic nitrogen fertiliser, as N: 0, 0.00028777 kg (2 entries)
  Calculated based on literature values or expert estimation: The total amount of nutrient (Personal written communication, Bill Easterwood , Yara, 2015) multiplied by the share of fertiliser type (Personal written communication, Bill Easterwood , Yara, 2015). See supporting documentation 'WFLDB-Documentation.pdf' chapter 'Fertiliser application' for L3 and L4 data (https://ecoquery.ecoinvent.org/File/Reports).
  Corresponds to 15.0 kg/ha
  properties: wet mass 1 kg, dry mass 1 kg
- inorganic phosphorus fertiliser, as P2O5: 0, 0, 0.00100719, 0.00143885 kg (4 entries)
  Calculated based on literature values or expert estimation: The total amount of nutrient (Personal written communication, Bill Easterwood , Yara, 2015) multiplied by the share of fertiliser type (Personal written communication, Bill Easterwood , Yara, 2015). See supporting documentation 'WFLDB-Documentation.pdf' chapter 'Fertiliser application' for L3 and L4 data (https://ecoquery.ecoinvent.org/File/Reports).
  Corresponds to 14.0 kg/ha
  properties: wet mass 1 kg, dry mass 1 kg
- packaging, for pesticides: 0.000906906 kg; lognormal variance with pedigree 0.0592, pedigree (4,3,4,5,4)
  Total amount of active substance/s of pesticides needed for the production of sweet corn is calculated to be circa 4.53E-04 kg. Pesticide/s used in this dataset is/are: 'acetamide-anillide-compound, unspecified', 'atrazine', 'organophosphorus-compound, unspecified'. The total amount of active substance/s is doubled in order to account for the packaging of the dilluted product of pesticide/s that is/are applied. Therefore, 9.07E-04 kg of packaging for pesticides is justified with this exchange.
  properties: heating value, net 25.97 MJ, dry mass 1 kg, wet mass 1 kg, carbon content, fossil 0.85714, price 0.0642 EUR2005
- manure, solid, cattle: 0.126975 kg; source Bill Easterwood  2015; lognormal variance with pedigree 0.124177, pedigree (2,1,4,1,1)
  Calculated based on literature values: The total amount of manure (Personal written communication, Bill Easterwood , Yara, 2015) multiplied by the country-share of manure per animal category (FAOSTAT 2015). See supporting documentation 'WFLDB-Documentation.pdf' chapter 'Fertiliser application' (https://ecoquery.ecoinvent.org/File/Reports).
  Corresponds to 1760.0 kg/ha
  properties: dry mass 0.22 kg, wet mass 1 kg, water content 3.5454, carbon content, non-fossil 0.441
- poultry manure, fresh: 0.00362106 kg; source Bill Easterwood  2015; lognormal variance with pedigree 0.124177, pedigree (2,1,4,1,1)
  Calculated based on literature values: The total amount of manure (Personal written communication, Bill Easterwood , Yara, 2015) multiplied by the country-share of manure per animal category (FAOSTAT 2015). See supporting documentation 'WFLDB-Documentation.pdf' chapter 'Fertiliser application' (https://ecoquery.ecoinvent.org/File/Reports).
  Corresponds to 0.101 m3/ha
  properties: wet mass 1 kg, carbon content, non-fossil 0.33389, water content 1.63158, dry mass 0.38 kg
- tillage, cultivating, chiselling: 7.19424e-5 ha; lognormal variance with pedigree 0.124177, pedigree (2,1,4,1,1)
  (same comment as for organophosphorus-compound, unspecified)
- poultry manure, dried: 0.0888528 kg; source Bill Easterwood  2015; lognormal variance with pedigree 0.124177, pedigree (2,1,4,1,1)
  Calculated based on literature values: The total amount of manure (Personal written communication, Bill Easterwood , Yara, 2015) multiplied by the country-share of manure per animal category (FAOSTAT 2015). See supporting documentation 'WFLDB-Documentation.pdf' chapter 'Fertiliser application' (https://ecoquery.ecoinvent.org/File/Reports).
  Corresponds to 1240.0 kg/ha
  properties: phosphorus content 0.0167, copper content 4.38e-5, wet mass 1 kg, nitrogen content 0.532, potassium content 0.024, dry mass 0.865 kg, nickel content 4e-5, lead content 2.92e-6, carbon content, non-fossil 0.33389, cadmium content 2.92e-7, zinc content 0.000349, mercury content 2e-7, water content 0.156069
- tillage, rotary cultivator: 0.000143885 ha; lognormal variance with pedigree 0.124177, pedigree (2,1,4,1,1)
  (same comment as for organophosphorus-compound, unspecified)
- transport, freight, inland waterways, barge: 0.000301727 metric ton*km
  This represent the transport of fertilizers that are directly linked to their supplying activities, to better represent the fertilizer mix of the activity. Transport distance based on US BTS Commodity Flow Surveys 1993, 1997, 2002, 2007, US Dep. Of Transportation, Bureau of Transportation Statistics.
- fertilising, by broadcaster: 7.19424e-5 ha; lognormal variance with pedigree 0.124177, pedigree (2,1,4,1,1)
  (same comment as for organophosphorus-compound, unspecified)
- inorganic nitrogen fertiliser, as N: 0, 0.000431655 kg (2 entries)
  (same comment as for inorganic nitrogen fertiliser, as N)
  properties: dry mass 1 kg, wet mass 1 kg
- liquid manure spreading, by vacuum tanker: 0.000215827 m3; lognormal variance with pedigree 0.124177, pedigree (2,1,4,1,1)
  This amount corresponds to the input of liquid manure.
- calcium ammonium nitrate: 0.0039968 kg
  The exchange has been updated from 'calcium ammonium nitrate' into 'calcium ammonium nitrate' and therefore its amount has been scaled (multiplied) from 0.0011 kg by 3.7037 kg of 'calcium ammonium nitrate' per kg of 'calcium ammonium nitrate'. Original comment of the exchange is: Calculated based on literature values or expert estimation: The total amount of nutrient (Personal written communication, Bill Easterwood , Yara, 2015) multiplied by the share of fertiliser type (Personal written communication, Bill Easterwood , Yara, 2015). See supporting documentation 'WFLDB-Documentation.pdf' chapter 'Fertiliser application' for L3 and L4 data (https://ecoquery.ecoinvent.org/File/Reports).
  Corresponds to 15.0 kg/ha
  properties: hydrogen content 0.0335628, calcium content 0.333646, dry mass 1 kg, nitrogen content 0.233209, wet mass 1 kg, oxygen content 0.399581
  note on hydrogen content: Hydrogen content (on a dry matter basis) of calcium ammonium nitrate is calculated from the molecular formula of the substance (CH4CaN2O6).
  note on calcium content: Calcium content (on a dry matter basis) of calcium ammonium nitrate is calculated from the molecular formula of the substance (CH4CaN2O6).
  note on nitrogen content: Nitrogen content (on a dry matter basis) of calcium ammonium nitrate is calculated from the molecular formula of the substance (CH4CaN2O6).
  note on oxygen content: Oxygen content (on a dry matter basis) of calcium ammonium nitrate is calculated from the molecular formula of the substance (CH4CaN2O6).
- packaging, for fertilisers: 0.0388489 kg; lognormal variance with pedigree 0.0592, pedigree (4,3,4,5,4)
  Total amount of active substance/s of fertilisers needed for the production of 'sweet corn' is calculated to be circa 1.94E-02 kg. Fertiliser/s used in this dataset is/are: 'ammonium nitrate, as N', 'ammonium sulfate, as N', 'nitrogen fertiliser, as N', 'nitrogen fertiliser, as N', 'nitrogen fertiliser, as N', 'nitrogen fertiliser, as N', 'phosphate fertiliser, as P2O5', 'phosphate fertiliser, as P2O5', 'phosphate fertiliser, as P2O5', 'potassium chloride, as K2O', 'potassium sulfate, as K2O', 'urea, as N'. The total amount of active substance/s is doubled in order to account for the packaging of the dilluted product of fertiliser/s that is/are applied. Therefore, 3.88E-02 kg of packaging for fertilisers is justified with this exchange.
  properties: wet mass 1 kg, price 0.0642 EUR2005, carbon content, fossil 0.825301, heating value, net 25.01 MJ, dry mass 1 kg
  note on carbon content, fossil: Considering a chemical formula (C2H4)n for polyethylene, carbon content-fossil is calculated to be 0.856286 kg of Carbon per kg of dry mass.
- chopping, maize: 7.19424e-5 ha; lognormal variance with pedigree 0.124177, pedigree (2,1,4,1,1)
  (same comment as for organophosphorus-compound, unspecified)
- triple superphosphate: 0.00093838 kg
  The exchange has been updated from 'triple superphosphate' into 'triple superphosphate' and therefore its amount has been scaled (multiplied) from 0.0004 kg by 2.1739 kg of 'triple superphosphate' per kg of 'triple superphosphate'. Original comment of the exchange is: Calculated based on literature values or expert estimation: The total amount of nutrient (Personal written communication, Bill Easterwood , Yara, 2015) multiplied by the share of fertiliser type (Personal written communication, Bill Easterwood , Yara, 2015). See supporting documentation 'WFLDB-Documentation.pdf' chapter 'Fertiliser application' for L3 and L4 data (https://ecoquery.ecoinvent.org/File/Reports).
  Corresponds to 14.0 kg/ha
  properties: wet mass 1 kg, phosphorus content 0.200754, dry mass 1 kg
  note on phosphorus content: Phosphorus content (on a dry matter basis) of triple superphosphate is calculated from the molecular formula of the nutrient present in the substance.
- application of plant protection product, by field sprayer: 0.000359712 ha; lognormal variance with pedigree 0.124664, pedigree (2,2,4,1,1)
  (same comment as for organophosphorus-compound, unspecified)
- transport, freight train: 0.00178446 metric ton*km
  (same comment as for transport, freight, inland waterways, barge)
- solid manure loading and spreading, by hydraulic loader and spreader: 0.215827 kg; lognormal variance with pedigree 0.124177, pedigree (2,1,4,1,1)
  This amount corresponds the input of solid manure.
- transport, freight, lorry, unspecified: 0.000961511 metric ton*km
  This represent the transport of fertilizers that are directly linked to their supplying activities, to better represent the fertilizer mix of the activity. Transport distance based on US BTS Commodity Flow Surveys 1993, 1997, 2002, 2007, US Dep. Of Transportation, Bureau of Transportation Statistics. Of the total road transport, 6% is assumed to be by delivery van for goods with a large share of retail sale, and 3% for goods that are mainly sold via wholesale.
- transport, freight, sea, container ship: 0.00544468 metric ton*km
  This represent the transport of fertilizers that are directly linked to their supplying activities, to better represent the fertilizer mix of the activity. The total marine transport volume differentiated into major commodity groups based on data from FearnResearch (2001): Fearnley's Annual Review 2000. Oslo: Fearnley/AS, p. 1-78. The category 'Other cargo' accounts for 38% of total maritime transport volume and has been distributed on commodity groups based on the proportions of transport by rail and inland waterways.
  The total marine transport volume differentiated into major commodity groups based on data from FearnResearch (2001): Fearnley's Annual Review 2000. Oslo: Fearnley/AS, p. 1-78. The category 'Other cargo' accounts for 38% of total maritime transport volume and has been distributed on commodity groups based on the proportions in the marine import and export of the US in 2001-2010.
- transport, tractor and trailer, agricultural: 0.002 metric ton*km; lognormal variance with pedigree 0.162439, pedigree (4,1,4,1,1)
  29ef97ec-9586-410008-b287-611892c0f310; On-farm transport: Yield (in tonnes) multiplied by the average distance from field to farm. The distance was assumed to be 2 km (proxy).
- land use change, annual crop: 1.08921e-5 ha; = 1.08920863309e-05*LUC_crop_specific+0.0*(1-LUC_crop_specific)
  Calculated value. Land use change (LUC) combines land transformation areas calculated with the adapted 'Direct Land Use Change Assessment Tool' version 2014 developed by Blonk Consultants and the carbon losses from soil organic carbon (SOC) and vegetation (VEG) as calculated in ecoinvent v3. See 'WFLDB-Guidelines.pdf', available at https://ecoquery.ecoinvent.org/File/Reports.
- ammonium nitrate: 0.00411125 kg; source Bill Easterwood  2015; lognormal variance with pedigree 0.124177, pedigree (2,1,4,1,1)
  The exchange has been updated from 'ammonium nitrate, as N' into 'ammonium nitrate' and therefore its amount has been scaled (multiplied) from 0.0014 kg by 2.8573 kg of 'ammonium nitrate' per kg of 'ammonium nitrate, as N'. Original comment of the exchange is: Calculated based on literature values or expert estimation: The total amount of nutrient (Personal written communication, Bill Easterwood , Yara, 2015) multiplied by the share of fertiliser type (Personal written communication, Bill Easterwood , Yara, 2015). See supporting documentation 'WFLDB-Documentation.pdf' chapter 'Fertiliser application' for L3 and L4 data (https://ecoquery.ecoinvent.org/File/Reports).
  Corresponds to 20.0 kg/ha
  properties: dry mass 1 kg, wet mass 1 kg
- sowing: 7.19424e-5 ha; lognormal variance with pedigree 0.124177, pedigree (2,1,4,1,1)
  (same comment as for organophosphorus-compound, unspecified)
- ammonium sulfate: 0.000719424 kg; source Bill Easterwood  2015; lognormal variance with pedigree 0.124177, pedigree (2,1,4,1,1)
  Calculated based on literature values or expert estimation: The total amount of nutrient (Personal written communication, Bill Easterwood , Yara, 2015) multiplied by the share of fertiliser type (Personal written communication, Bill Easterwood , Yara, 2015). See supporting documentation 'WFLDB-Documentation.pdf' chapter 'Fertiliser application' for L3 and L4 data (https://ecoquery.ecoinvent.org/File/Reports).
  Corresponds to 10.0 kg/ha
  properties: wet mass 1 kg, dry mass 1 kg
- acetamide-anillide-compound, unspecified: 0.000181381 kg; lognormal variance with pedigree 0.0138498, pedigree (2,2,4,1,1)
  (same comment as for organophosphorus-compound, unspecified)
  properties: carbon content, fossil 0.659175, wet mass 1 kg, dry mass 1 kg

## Inputs from nature
- Occupation, annual crop [natural resource, land]: 0.206957 m2*year; lognormal variance with pedigree 0.0200616, pedigree (2,1,4,1,1)
  Related to the duration from harvest date of previous crop to harvest date of main crop: 105 days.
- Transformation, from arable land, unspecified use [natural resource, land]: 0.719424 m2; lognormal variance with pedigree 0.0442144, pedigree (2,1,4,1,1)
  10000 m2 divided by the life time of the crop.
- Transformation, to arable land, unspecified use [natural resource, land]: 0.719424 m2; lognormal variance with pedigree 0.0442144, pedigree (2,1,4,1,1)
  10000 m2 divided by the life time of the crop.
- Carbon dioxide, in air [natural resource, in air]: 0.445813 kg; lognormal variance with pedigree 0.0138498, pedigree (2,2,4,1,1)
  CO2 uptake by biomass
- Energy, gross calorific value, in biomass [natural resource, biotic]: 5.17712 MJ; lognormal variance with pedigree 0.0138498, pedigree (2,2,4,1,1)
  Gross energy content is related to MJ/kg dry matter of product. Source: ecoinvent data.

## Emissions to nature
- Nitrate [water, ground-]: 0.00915485 kg; source Faist Emmenegger M. 2009; lognormal variance with pedigree 0.175866, pedigree (2,2,4,1,1)
- Cadmium [soil, agricultural]: 1.98581e-7 kg; = 2.24381294964e-07 + ( - 2.58e-08)*heavyMetalUptakeSwitch; source Freiermuth R.  2006
  Comment on mathematicalRelation:
  2.24381294964e-07 from Calculated value - Freiermuth (2006). See 'WFLDB-Guidelines.pdf', available at https://ecoquery.ecoinvent.org/File/Reports.
  -2.58e-08 from Maize grains, heavy metals uptake model
  Heavy metal uptake can be excluded by setting the parameter heavyMetalUptakeSwitch to zero.
- Chromium [soil, agricultural]: 1.75099e-6 kg; = 2.02618705036e-06 + ( - 2.752e-07)*heavyMetalUptakeSwitch; source Freiermuth R.  2006
  Comment on mathematicalRelation:
  2.02618705036e-06 from Calculated value - Freiermuth (2006). See 'WFLDB-Guidelines.pdf', available at https://ecoquery.ecoinvent.org/File/Reports.
  -2.752e-07 from Maize grains, heavy metals uptake model
  Heavy metal uptake can be excluded by setting the parameter heavyMetalUptakeSwitch to zero.
- Copper [soil, agricultural]: 9.28993e-7 kg; = 3.07899280576e-06 + ( - 2.15e-06)*heavyMetalUptakeSwitch; source Freiermuth R.  2006
  Comment on mathematicalRelation:
  -2.15e-06 from Maize grains, heavy metals uptake model
  Heavy metal uptake can be excluded by setting the parameter heavyMetalUptakeSwitch to zero.
- Lead [soil, agricultural]: 1.57108e-7 kg; = 4.15107913669e-07 + ( - 2.58e-07)*heavyMetalUptakeSwitch; source Freiermuth R.  2006
  Comment on mathematicalRelation:
  4.15107913669e-07 from Calculated value - Freiermuth (2006). See 'WFLDB-Guidelines.pdf', available at https://ecoquery.ecoinvent.org/File/Reports.
  -2.58e-07 from Maize grains, heavy metals uptake model
  Heavy metal uptake can be excluded by setting the parameter heavyMetalUptakeSwitch to zero.
- Phosphate [water, ground-]: 4.45612e-6 kg; source Prasuhn V.  2006; lognormal variance with pedigree 0.175866, pedigree (2,2,4,1,1)
  Calculated value - Prasuhn (2006). See 'WFLDB-Guidelines.pdf', available at https://ecoquery.ecoinvent.org/File/Reports. This emission might be overestimated in case of basic soils.
- Mercury [soil, agricultural]: 2.89058e-8 kg; source Freiermuth R.  2006; lognormal variance with pedigree 0.175866, pedigree (2,2,4,1,1)
  Calculated value - Freiermuth (2006). See 'WFLDB-Guidelines.pdf', available at https://ecoquery.ecoinvent.org/File/Reports.
- Cadmium, ion [water, surface water]: 1.29086e-9 kg; source Freiermuth R.  2006; lognormal variance with pedigree 0.356938, pedigree (2,2,4,1,1)
  (same comment as for Mercury)
- Nickel [soil, agricultural]: 3.34199e-7 kg; = 1.33179856115e-06 + ( - 9.976e-07)*heavyMetalUptakeSwitch; source Freiermuth R.  2006
  Comment on mathematicalRelation:
  1.33179856115e-06 from Calculated value - Freiermuth (2006). See 'WFLDB-Guidelines.pdf', available at https://ecoquery.ecoinvent.org/File/Reports.
  -9.976e-07 from Maize grains, heavy metals uptake model
  Heavy metal uptake can be excluded by setting the parameter heavyMetalUptakeSwitch to zero.
- Chromium, ion [water, surface water]: 1.43806e-7 kg; source Freiermuth R.  2006; lognormal variance with pedigree 0.356938, pedigree (2,2,4,1,1)
  (same comment as for Mercury)
- Zinc [soil, agricultural]: 2.94741e-6 kg; = 2.14374100719e-05 + ( - 1.849e-05)*heavyMetalUptakeSwitch; source Freiermuth R.  2006
  Comment on mathematicalRelation:
  2.14374100719e-05 from Calculated value - Freiermuth (2006). See 'WFLDB-Guidelines.pdf', available at https://ecoquery.ecoinvent.org/File/Reports.
  -1.849e-05 from Maize grains, heavy metals uptake model
  Heavy metal uptake can be excluded by setting the parameter heavyMetalUptakeSwitch to zero.
- Atrazine [soil, agricultural]: 0.000224179 kg; lognormal variance with pedigree 0.0447216, pedigree (2,2,4,1,1)
  Calculated value - 100% emission in soil. See 'WFLDB-Guidelines.pdf', available at https://ecoquery.ecoinvent.org/File/Reports.
- Copper, ion [water, surface water]: 1.25475e-7 kg; source Freiermuth R.  2006; lognormal variance with pedigree 0.356938, pedigree (2,2,4,1,1)
  (same comment as for Mercury)
- Glufosinate [soil, agricultural]: 4.78928e-5 kg; lognormal variance with pedigree 0.0447216, pedigree (2,2,4,1,1)
  (same comment as for Atrazine)
- Lead [water, surface water]: 3.2123e-8 kg; source Freiermuth R.  2006; lognormal variance with pedigree 0.356938, pedigree (2,2,4,1,1)
  (same comment as for Mercury)
- Metolachlor [soil, agricultural]: 0.000181381 kg; lognormal variance with pedigree 0.0447216, pedigree (2,2,4,1,1)
  (same comment as for Atrazine)
- Mercury [water, surface water]: 4.27576e-10 kg; source Freiermuth R.  2006; lognormal variance with pedigree 0.356938, pedigree (2,2,4,1,1)
  (same comment as for Mercury)
- Nickel, ion [water, surface water]: 1.18784e-7 kg; source Freiermuth R.  2006; lognormal variance with pedigree 0.356938, pedigree (2,2,4,1,1)
  (same comment as for Mercury)
- Zinc, ion [water, surface water]: 2.52683e-7 kg; source Freiermuth R.  2006; lognormal variance with pedigree 0.356938, pedigree (2,2,4,1,1)
  (same comment as for Mercury)
- Cadmium, ion [water, ground-]: 8.46691e-10 kg; source Freiermuth R.  2006; lognormal variance with pedigree 0.356938, pedigree (2,2,4,1,1)
  Calculated value - Freiermuth (2006). See 'WFLDB-Guidelines.pdf', available at https://ecoquery.ecoinvent.org/File/Reports. This emission might be overestimated in case of basic soils.
- Chromium, ion [water, ground-]: 3.98e-7 kg; source Freiermuth R.  2006; lognormal variance with pedigree 0.356938, pedigree (2,2,4,1,1)
  (same comment as for Cadmium, ion)
- Carbon dioxide, fossil [air, non-urban air or from high stacks]: 0.00367086 kg; lognormal variance with pedigree 0.0138498, pedigree (2,2,4,1,1)
  Calculated value - CO2 emissions from urea and lime. See 'WFLDB-Guidelines.pdf', available at https://ecoquery.ecoinvent.org/File/Reports.
- Copper, ion [water, ground-]: 7.08381e-8 kg; source Freiermuth R.  2006; lognormal variance with pedigree 0.356938, pedigree (2,2,4,1,1)
  (same comment as for Cadmium, ion)
- Ammonia [air, non-urban air or from high stacks]: 0.00186043 kg; source EEA 2013; lognormal variance with pedigree 0.0447216, pedigree (2,2,4,1,1)
  Calculated value - EMEP/EEA (2013). See 'WFLDB-Guidelines.pdf', available at https://ecoquery.ecoinvent.org/File/Reports.
- Lead [water, ground-]: 3.11122e-9 kg; source Freiermuth R.  2006; lognormal variance with pedigree 0.356938, pedigree (2,2,4,1,1)
  (same comment as for Cadmium, ion)
- Nitrogen oxides [air, non-urban air or from high stacks]: 0.000323683 kg; source EEA 2013; lognormal variance with pedigree 0.124664, pedigree (2,2,4,1,1)
  Calculated value - EEA/EMEP (2013). See 'WFLDB-Guidelines.pdf', available at https://ecoquery.ecoinvent.org/File/Reports.
- Mercury [water, ground-]: 1.71058e-10 kg; source Freiermuth R.  2006; lognormal variance with pedigree 0.356938, pedigree (2,2,4,1,1)
  (same comment as for Cadmium, ion)
- Dinitrogen monoxide [air, non-urban air or from high stacks]: 0.000170044 kg; source IPCC 2006; lognormal variance with pedigree 0.124664, pedigree (2,2,4,1,1)
  Calculated value - IPCC (2006). See 'WFLDB-Guidelines.pdf', available at https://ecoquery.ecoinvent.org/File/Reports.
- Nickel, ion [water, ground-]: 3.31309e-11 kg; source Freiermuth R.  2006; lognormal variance with pedigree 0.356938, pedigree (2,2,4,1,1)
  (same comment as for Cadmium, ion)
- Water [air, non-urban air or from high stacks]: 0.035677 m3; lognormal variance with pedigree 0.124177, pedigree (2,1,4,1,1)
  Calculated value - Emission calculated from water balance. See 'WFLDB-Guidelines.pdf', available at https://ecoquery.ecoinvent.org/File/Reports.
- Zinc, ion [water, ground-]: 5.27899e-7 kg; source Freiermuth R.  2006; lognormal variance with pedigree 0.356938, pedigree (2,2,4,1,1)
  (same comment as for Cadmium, ion)
- Phosphate [water, surface water]: 1.26604e-5 kg; source Prasuhn V.  2006; lognormal variance with pedigree 0.175866, pedigree (2,2,4,1,1)
  Calculated value - Prasuhn (2006). See 'WFLDB-Guidelines.pdf', available at https://ecoquery.ecoinvent.org/File/Reports.
- Water [water, surface water]: 0.0175014 m3; lognormal variance with pedigree 0.124177, pedigree (2,1,4,1,1)
  (same comment as for Water)
- Phosphorus [water, surface water]: 1.47151e-6 kg; source Prasuhn V.  2006; lognormal variance with pedigree 0.175866, pedigree (2,2,4,1,1)
  Calculated value - Prasuhn (2006) and SQCB-Erosion. See 'WFLDB-Guidelines.pdf', available at https://ecoquery.ecoinvent.org/File/Reports.
- Water [water, ground-]: 0.00437532 m3; lognormal variance with pedigree 0.124177, pedigree (2,1,4,1,1)
  (same comment as for Water)

## Sampling procedure
WFLDB Methodological Guidelines for the Life Cycle Inventory of Agricultural Products in the latest version, available at: (Report section: https://v30.ecoquery.ecoinvent.org/File/Reports). Data sources: Data were categorised from level 0 (L0) to level (L4) as follows: L0 = estimate, proxy; L1 = statistical data (e.g. FAOSTAT); L2 = L1 adapted to crop and country;L3 = literature data or L1 resp. L2 data approved by experts; medium detailing (i.e. kg of total N-fertiliser); L4 = L3 data of high detailing (i.e. portion N-fertiliser types).In this dataset data were obtained for yield: L3; Fertilisers: L4; Pesticides: L4; Machinery: L4; Irrigation: L3. For information regarding the calculation of individual exchanges see supporting documentation WFLDB-Documentation.pdf.

## Extrapolations
This dataset has been extrapolated from year 2012 to the year of the calculation (2021). The uncertainty has been adjusted accordingly.

## Review by Assumpció ANTON 2016-05-30
Be aware that the use of statistics in input calculations could provide some specific inputs not common for specific crops, this should be corrected if better information is available and better reflexed in DQR . Currently, I would dissent for some of good marks provided, being a revision of criteria applied advisable.

Pesticides will need to be amended periodically checking for update of pesticides' ban.
