# chlorotoluron production

Dataset: EcoSpold 2, unit process
Geography: RoW
Time period: 2000-01-01 to 2021-12-31
Technology level: current
Classification: EcoSpold01Categories: agricultural means of production/pesticides
Classification: ISIC rev.4 ecoinvent: 2021:Manufacture of pesticides and other agrochemical products
Tags: ConvertedDataset
Scenario: Business-as-Usual
System model: Allocation, cut-off by classification
Share of production covered: 100 %
Generated by: Jürgen Sutter
Published in: Nemecek, T. 2007
Database: ecoinvent
isCopyrightProtected: true
accessRestrictedTo: 1

## General comment
Production of chlorotoluron including materials, energy uses, infrastructure and emissions.
[This dataset was already contained in the ecoinvent database version 2. It was not individually updated during the transfer to ecoinvent version 3. Life Cycle Impact Assessment results may still have changed, as they are affected by changes in the supply chain, i.e. in other datasets. This dataset was generated following the ecoinvent quality guidelines for version 2. It may have been subject to central changes described in the ecoinvent version 3 change report (http://www.ecoinvent.org/database/ecoinvent-version-3/reports-of-changes/), and the results of the central updates were reviewed extensively. The changes added e.g. consistent water flows and other information throughout the database. The documentation of this dataset can be found in the ecoinvent reports of version 2, which are still available via the ecoinvent website. The change report linked above covers all central changes that were made during the conversion process.]

## Geography
The inventory is modelled for Europe.

## Technology
pesticides

## Time period
Time of publications

## Parameters
- fraction, cooling water, once-through system, to air: 0.004 dimensionless; name fraction_CW_OT_to_air; lognormal variance with pedigree 0.0413, pedigree (2,3,1,3,1)
  Calculated based on literature value (Scown, C.D., 2011, Water Footprint of U.S. Transportation Fuels and supplying information of the article) (Vionnet, S., Quantis Water Database - Technical Report, 2012).
- fraction, cooling water, to air: 0.3875 dimensionless; name fraction_CW_to_air; = (0.5*fraction_CW_OT_to_air)+(0.5*fraction_CW_R_to_air); lognormal variance with pedigree 0.092025, pedigree (4,4,3,2,4)
  Calculated value based on literature value (see comments of the other parametres present in this dataset) and expert opinion. In the case when no industry/literature data are available about the type of cooling or directly fraction, cooling water, to air specific for the process a default assumption is applied. It is assumed that the once-through cooling system is used in 50% of all cases and recirculating system is used in another 50% of all cases.
- fraction, cooling water, cooling pond system, to air: 0.032 dimensionless; name fraction_CW_CP_to_air; lognormal variance with pedigree 0.0413, pedigree (2,3,1,3,1)
  (same comment as for fraction, cooling water, once-through system, to air)
- fraction, cooling water, recirculating system, to air: 0.771 dimensionless; name fraction_CW_R_to_air; lognormal variance with pedigree 0.0413, pedigree (2,3,1,3,1)
  (same comment as for fraction, cooling water, once-through system, to air)

## Reference product
- chlorotoluron: 1 kg; By-product classification allocatable product; CPC 34663: Herbicides, anti-sprouting products and plant-growth regulators; CAS 15545-48-9
  EcoSpold01Location=RER
  production volume 2.67763 kg
    This is a placeholder value that does not reflect real-world production volumes. This dataset does not currently require a real-world production volume to work in the database framework, and no actual data were collected yet. This has no negative effect on the results of the ecoinvent database.
  property price 2.1914 EUR2005
    Calculated based on inputs: The price of the product has been calculated as a sum of the values of the material and energy inputs for this product. This value is therefore a rough estimation. It may underestimate the real price since there are additional expenses when producing any product. These expences can include for example labour costs, treatment of waste materials and profit for the producer. Please consider carefully whether this level of data quality is acceptable for your application.
  property carbon content, fossil 0.56338
    C10H13ClN2O. MW=213 g/mol (ecoinvent v2.2 report Sutter 2010)
  property carbon content 0.56338
    carbon content on a dry matter basis (reserved; not for manual entry)
  properties: wet mass 1 kg, water content 0, dry mass 1 kg, carbon content, non-fossil 0, water in wet mass 0 kg, carbon allocation 0.56338 kg

## Inputs from technosphere
- toluene, liquid: 0.53257 kg; lognormal variance with pedigree 0.046, pedigree (4,5,4,5,1)
  EcoSpold01Location=RER
  Stoechiometric calculation
  Uncertainty: Stoechiometric calculation
  properties: wet mass 1 kg, heating value, net 38.17 MJ, dry mass 1 kg, carbon content, fossil 0.913043
- hydrogen, liquid: 0.03301 kg; lognormal variance with pedigree 0.046, pedigree (4,5,4,5,1)
  Stoechiometric calculation
  EcoSpold01Location=RER
  Uncertainty: Stoechiometric calculation
  properties: heating value, net 120.21 MJ, wet mass 1 kg, dry mass 1 kg
- heat, district or industrial, natural gas: 0 MJ; pedigree (1,1,1,1,1)
  Uncertainty: Estimation
  properties: heating value, net 1 MJ
- dimethyl sulfate: 0.22344 kg; lognormal variance with pedigree 0.046, pedigree (4,5,4,5,1)
  EcoSpold01Location=RER
  Stoechiometric calculation
  Uncertainty: Stoechiometric calculation
  properties: carbon content, fossil 0.190476, wet mass 1 kg, dry mass 1 kg, heating value, net 11.54 MJ
- chemical factory, organics: 1.7073e-9 unit; lognormal variance with pedigree 0.448, pedigree (4,5,5,5,5)
  EcoSpold01Location=RER
  Estimation
  Uncertainty: Estimation
- electricity, medium voltage: 0 kWh; pedigree (1,1,1,1,1)
  Estimation
  EcoSpold01Location=UCTE
  Uncertainty: Estimation
- sodium hydroxide, without water, in 50% solution state: 0.62655 kg; lognormal variance with pedigree 0.046, pedigree (4,5,4,5,1)
  EcoSpold01Location=RER
  Stoechiometric calculation
  Uncertainty: Stoechiometric calculation
  properties: heating value, net 3.03 MJ, dry mass 1 kg, wet mass 1 kg
- nitric acid, without water, in 50% solution state: 0 kg; pedigree (1,1,1,1,1)
  Stoechiometric calculation
  EcoSpold01Location=RER
  Uncertainty: Stoechiometric calculation
  properties: dry mass 1 kg, wet mass 1 kg
- chlorine, liquid: 0.38901 kg; lognormal variance with pedigree 0.046, pedigree (4,5,4,5,1)
  Stoechiometric calculation
  EcoSpold01Location=RER
  Uncertainty: Stoechiometric calculation
  properties: wet mass 1 kg, dry mass 1 kg
- phosgene, liquid: 0.5122 kg; lognormal variance with pedigree 0.046, pedigree (4,5,4,5,1)
  EcoSpold01Location=RER
  Stoechiometric calculation
  Uncertainty: Stoechiometric calculation
  properties: dry mass 1 kg, heating value, net 3.68 MJ, wet mass 1 kg, carbon content, fossil 0.122449
- heat, district or industrial, other than natural gas: 0 MJ; pedigree (1,1,1,1,1)
  Uncertainty: Estimation
  properties: heating value, net 1 MJ
- heat, district or industrial, natural gas: 0.137375, 8.91346 MJ (2 entries); lognormal variance with pedigree 0.046, pedigree (4,5,4,5,1)
  Uncertainty: Estimation
- electricity, medium voltage: 0.016169, 0.00310052, 0.0520512, 0.757038, 0.106705, 0.347661 kWh (6 entries); lognormal variance with pedigree 0.046, pedigree (4,5,4,5,1)
  Estimation
  EcoSpold01Location=UCTE
  Uncertainty: Estimation
- nitric acid, without water, in 50% solution state: 0.0702578, 0.0171437, 0.0426332, 0.130166, 0.0204276, 0.011538, 0.0170803, 0.0554432 kg (8 entries); lognormal variance with pedigree 0.046, pedigree (4,5,4,5,1)
  Stoechiometric calculation
  EcoSpold01Location=RER
  Uncertainty: Stoechiometric calculation
- heat, district or industrial, other than natural gas: 0.00204772, 5.04975 MJ (2 entries); lognormal variance with pedigree 0.046, pedigree (4,5,4,5,1)
  Uncertainty: Estimation

## Inputs from nature
- Water, cooling, unspecified natural origin [natural resource, in water]: 0.10244 m3; name water_cooling_UNO_input; source Gendorf 2000; lognormal variance with pedigree 0.046, pedigree (4,5,4,5,1)
  Estimation (24 kg cooling water per kg produced chemical per step).
  Uncertainty: Estimation

## Emissions to nature
- Nitrate [water, surface water]: 0.0071781 kg; lognormal variance with pedigree 0.188, pedigree (4,5,5,5,5)
  Estimation
  Uncertainty: Estimation
- Sodium, ion [water, surface water]: 0.36026 kg; lognormal variance with pedigree 0.798, pedigree (4,5,5,5,5)
  Estimation
  Uncertainty: Estimation
- Toluene [air, urban air close to ground]: 0.0010651 kg; lognormal variance with pedigree 0.188, pedigree (4,5,5,5,5)
  Estimation
  Uncertainty: Estimation
- Water [water, unspecified]: 0.0627445 m3; name water_to_water_unspecified; lognormal variance with pedigree 0.0507, pedigree (2,2,4,5,1)
  Calculated value based on literature values and expert opinion. See comments in the parametres' comment field.
  property carbon content, fossil 0; name C_content_fossil
  property carbon content, non-fossil 0; name C_content_non_fossil
  property wet mass 1000 kg; name WM
  property dry mass 0 kg; name DM
  property water in wet mass 1000 kg; name WWM
  property fraction, origin: fresh water 0; name fraction_origin_fresh_water_Ww
  property fraction, origin: unspecified 1; name fraction_origin_unspecified_Ww
  property fraction, origin: salt water 0; name fraction_origin_salt_water_Ww
- Toluene [water, surface water]: 0.0020238 kg; lognormal variance with pedigree 0.448, pedigree (4,5,5,5,5)
  Estimation
  Uncertainty: Estimation
- Hydrogen [air, urban air close to ground]: 6.602e-5 kg; lognormal variance with pedigree 0.188, pedigree (4,5,5,5,5)
  Estimation
  Uncertainty: Estimation
- Carbon dioxide, fossil [air, urban air close to ground]: 0.36107 kg; lognormal variance with pedigree 0.1786, pedigree (4,5,5,5,5)
  Estimation
  Uncertainty: Estimation
- Water [air, unspecified]: 0.0396955 m3; name water_to_air_unspecified; lognormal variance with pedigree 0.0507, pedigree (2,2,4,5,1)
  (same comment as for Water)
  property fraction, origin: salt water 0; name fraction_origin_salt_water
  property fraction, origin: fresh water 0; name fraction_origin_fresh_water
  property fraction, origin: unspecified 1; name fraction_origin_unspecified
- Chloride [water, surface water]: 0.56887 kg; lognormal variance with pedigree 0.448, pedigree (4,5,5,5,5)
  Estimation
  Uncertainty: Estimation
- Dimethylamine [water, surface water]: 0.0010725 kg; lognormal variance with pedigree 0.448, pedigree (4,5,5,5,5)
  Estimation
  Uncertainty: Estimation
- Chlorine [air, urban air close to ground]: 0.00077801 kg; lognormal variance with pedigree 0.188, pedigree (4,5,5,5,5)
  Estimation
  Uncertainty: Estimation

## Sampling procedure
Literature data

## Extrapolations
Transports and emissions are modelled with standard methods. This dataset has been copied from an original dataset covering the geography RER. The uncertainty has been adjusted accordingly.

## Review by Thomas Nemecek 2010-03-11
Passed.
none
