# treatment of wastewater from pig iron production, capacity 5E9l/year

Dataset: EcoSpold 2, unit process
Geography: RoW
Time period: 1994-01-01 to 2021-12-31
Technology level: current
Classification: ISIC rev.4 ecoinvent: 3700:Sewerage
Classification: EcoSpold01Categories: waste management/wastewater treatment
Tags: ConvertedDataset; Treatment
Scenario: Business-as-Usual
System model: Allocation, cut-off by classification
Generated by: Gabor Doka (obsolete)
Published in: Doka G. 2008
Database: ecoinvent
isCopyrightProtected: true
accessRestrictedTo: 1

## General comment
Wastewater purified in a medium size municipal wastewater treatment plant (capacity class 3), with an average capacity size of 24900 per-captia-equivalents PCE.
Wastewater contains (in kg/m3): COD: 0.0000203 (GSD=150%); TOC: 0.0000041 (GSD=150%); Cr: 0.000002 (GSD=150%); Cu: 0.0000042 (GSD=150%); Ni: 0.000003 (GSD=150%); Pb: 0.000002 (GSD=150%); Zn: 0.00002 (GSD=150%);
[This dataset was already contained in the ecoinvent database version 2. It was not individually updated during the transfer to ecoinvent version 3. Life Cycle Impact Assessment results may still have changed, as they are affected by changes in the supply chain, i.e. in other datasets. This dataset was generated following the ecoinvent quality guidelines for version 2. It may have been subject to central changes described in the ecoinvent version 3 change report (http://www.ecoinvent.org/database/ecoinvent-version-3/reports-of-changes/), and the results of the central updates were reviewed extensively. The changes added e.g. consistent water flows and other information throughout the database. The documentation of this dataset can be found in the ecoinvent reports of version 2, which are still available via the ecoinvent website. The change report linked above covers all central changes that were made during the conversion process.]

## Included activities end
Infrastructure materials for municipal wastewater treatment plant, transports, dismantling. Land use burdens.

## Geography
Specific to the technology mix encountered in Switzerland in 2000. Well applicable to modern treatment practices in Europe, North America or Japan.

## Technology
Three stage wastewater treatment (mechanical, biological, chemical) including sludge digestion (fermentation) according to the average technology in Switzerland

## Parameters
- fraction, process water, to air: 0.1 dimensionless; name fraction_PW_to_air; lognormal variance with pedigree 0.092025, pedigree (4,4,3,2,4)

## Reference product
- wastewater from pig iron production: -1 m3; name RP; By-product classification Waste; CPC 39920: Sewage sludge
  EcoSpold01Location=CH
  production volume 1.22548e8 m3; name RP_PV; = 1.18E+12*0.00012164
    Calculated based on literature data and assumptions.
    The amount of pig iron produced in the world in 2013 was 1.18E+12 kg (USGS, 2013, Mineral Yearbook, Iron and Steel). When producing 1kg of pig iron 0.00012164 m3 of wastewater is produced.
  property price 0 EUR2005; name RP_price_EUR2005
    Waste products are assigned a price of zero as they are assumed to require further treatment.
  property carbon content, fossil 1.2149e-5
    TOC = 0.0000041 kg/m3 (Tab A.19, ecoinvent v2.2 report 13_I). TOC was considered as Total Carbon.
  property carbon content 1.2149e-5
    carbon content on a dry matter basis (reserved; not for manual entry)
  properties: wet mass 1000 kg, carbon content, non-fossil 0, dry mass 0.337476 kg, water in wet mass 999.663 kg, water content 2962.17, carbon allocation 4.1e-6 kg

## Inputs from technosphere
- municipal waste incineration facility: 1.3189e-14 unit; lognormal variance with pedigree 0.052, pedigree (1,1,5,5,1)
  burden from sludge incineration. Uncertainty calculated from wastewater composition and treatment model
  EcoSpold01Location=CH
- wastewater treatment facility, capacity 5E9l/year: 5.6882e-9 unit; lognormal variance with pedigree 0.042, pedigree (1,1,5,5,1)
  uncertainty heeded in exchanges of the module
  EcoSpold01Location=CH
- electricity, low voltage: 0 kWh; pedigree (1,1,1,1,1)
  EcoSpold01Location=CH
  direct wastewater treatment plant burden. Uncertainty calculated from wastewater composition and treatment model
- liquid manure spreading, by vacuum tanker: 1.5371e-7 m3; lognormal variance with pedigree 0.042, pedigree (1,1,5,5,1)
  burden from sludge spreading. Uncertainty calculated from wastewater composition and treatment model
  EcoSpold01Location=CH
- heat, central or small-scale, other than natural gas: 0.0130228 MJ; lognormal variance with pedigree 0.042, pedigree (1,1,5,5,1)
  (same comment as for electricity, low voltage)
  properties: heating value, net 1 MJ
- residual material landfill: 2.2851e-14 unit; lognormal variance with pedigree 0.072, pedigree (1,1,5,5,1)
  (same comment as for municipal waste incineration facility)
- sewer grid, 5E9l/year, 110 km: 2.1782e-7 km; lognormal variance with pedigree 0.042, pedigree (1,1,5,5,1)
  uncertainty heeded in exchanges of the module
  EcoSpold01Location=CH
- waste plastic, mixture: 0 kg; name ByP_03; pedigree (1,1,1,1,1)
  (same comment as for electricity, low voltage)
  production volume 0 kg
    Calculated from the production volume of wastewater from pig iron production in proportion to the respective output amounts.
  property price 0 EUR2005; name ByP_03_price_EUR2005
  properties: heating value, net 30.79 MJ, carbon content, fossil 0.747344, water content 0.180638, wet mass 1 kg, dry mass 0.847 kg
  note on heating value, net: Value taken from the general comment of the treatment dataset.
  note on carbon content, fossil: C content in 1 kg DM was calculated using data in Tab A.2, ecoinvent v2.2 report 13_I
- hydrochloric acid, without water, in 30% solution state: 2.7844e-9 kg; lognormal variance with pedigree 0.212, pedigree (1,1,5,5,1)
  burden from sludge incineration. Uncertainty calculated from wastewater composition and treatment model
  EcoSpold01Location=RER
  properties: dry mass 1 kg, wet mass 1 kg, heating value, net 3.32 MJ
- chemical, inorganic: 4.6407e-9 kg; lognormal variance with pedigree 0.212, pedigree (1,1,5,5,1)
  EcoSpold01Location=GLO
  burden from sludge incineration. Uncertainty calculated from wastewater composition and treatment model
  properties: carbon content, fossil 0.003, wet mass 1 kg, dry mass 1 kg
  note on carbon content, fossil: This dataset is an unweighted average of 20 inorganic substances (listed in Tab 88.1, ecoinvent v2.2 report 8, part II), being part of the top100 chemicals included in this database. The C-content has also been calculated as an unweighted average of the C content of the substances composing this dataset.
- process-specific burdens, municipal waste incineration: 5.2756e-5 kg; lognormal variance with pedigree 0.052, pedigree (1,1,5,5,1)
  EcoSpold01Location=CH
  burden from sludge incineration. Uncertainty calculated from wastewater composition and treatment model
- waste cement, hydrated: -1.0969e-5 kg; name ByP_02; lognormal variance with pedigree 0.082, pedigree (1,1,5,5,1)
  (same comment as for municipal waste incineration facility)
  production volume 1344.23 kg; = ABS(ByP_02/RP)*RP_PV
    (same comment as for waste plastic, mixture)
  property price 0 EUR2005; name ByP_02_price_EUR2005
  properties: wet mass 1 kg, dry mass 1 kg
- iron (III) chloride, without water, in 40% solution state: 8.47e-7 kg; lognormal variance with pedigree 0.212, pedigree (1,1,5,5,1)
  direct wastewater treatment plant burden plus burden from sludge incineration. Uncertainty calculated from wastewater composition and treatment model
  EcoSpold01Location=CH
  properties: wet mass 1 kg, dry mass 1 kg
- slag landfill: 4.9758e-15 unit; lognormal variance with pedigree 0.072, pedigree (1,1,5,5,1)
  (same comment as for municipal waste incineration facility)
- electricity, high voltage: 0 kWh; pedigree (1,1,1,1,1)
  (same comment as for municipal waste incineration facility)
- heat, district or industrial, other than natural gas: 0 MJ; pedigree (1,1,1,1,1)
  (same comment as for process-specific burdens, municipal waste incineration)
  properties: heating value, net 1 MJ
- heat, district or industrial, natural gas: 0 MJ; pedigree (1,1,1,1,1)
  EcoSpold01Location=RER
  direct wastewater treatment plant burden. Uncertainty calculated from wastewater composition and treatment model
  properties: heating value, net 1 MJ
- process-specific burdens, slag landfill: 2.7989e-6 kg; lognormal variance with pedigree 0.072, pedigree (1,1,5,5,1)
  (same comment as for process-specific burdens, municipal waste incineration)
- process-specific burdens, residual material landfill: 1.0969e-5 kg; lognormal variance with pedigree 0.072, pedigree (1,1,5,5,1)
  (same comment as for process-specific burdens, municipal waste incineration)
- waste graphical paper: -0.0155 kg; name ByP_01; lognormal variance with pedigree 0.042, pedigree (1,1,5,5,1)
  direct wastewater treatment plant burden. Uncertainty calculated from wastewater composition and treatment model
  EcoSpold01Location=CH
  production volume 1.97441e6 kg; = ABS(ByP_01/RP)*RP_PV
    (same comment as for waste plastic, mixture)
  property price 0 EUR2005; name ByP_01_price_EUR2005
  properties: dry mass 0.888 kg, wet mass 1 kg, carbon content, non-fossil 0.454955, water content 0.126126, heating value, net 14.12 MJ
- cement, unspecified: 0 kg; pedigree (1,1,1,1,1)
  (same comment as for process-specific burdens, municipal waste incineration)
  properties: wet mass 1 kg, dry mass 1 kg
- electricity, low voltage: 0.00036235, 6.59769e-5, 0.00106231, 0.0163099, 0.00263865, 0.00757684 kWh (6 entries); lognormal variance with pedigree 0.042, pedigree (1,1,5,5,1)
  (same comment as for electricity, low voltage)
- waste plastic, mixture: -0.00190479, -0.000127271, -9.62528e-6, -5.25674e-5, -2.12366e-5, -4.99177e-5, -0.0133346 kg (7 entries); lognormal variance with pedigree 0.042, pedigree (1,1,5,5,1)
  (same comment as for electricity, low voltage)
  production volume 1.8995e6 kg
- electricity, high voltage: 9.47283e-8, 1.81603e-8, 3.07908e-7, 4.43376e-6, 7.03154e-7, 2.02699e-6 kWh (6 entries); lognormal variance with pedigree 0.492, pedigree (1,1,5,5,1)
  (same comment as for municipal waste incineration facility)
- heat, district or industrial, other than natural gas: 1.79349e-8, 4.42281e-5 MJ (2 entries); lognormal variance with pedigree 0.052, pedigree (1,1,5,5,1)
  (same comment as for process-specific burdens, municipal waste incineration)
- heat, district or industrial, natural gas: 0.000272391, 0.0176738 MJ (2 entries); lognormal variance with pedigree 0.042, pedigree (1,1,5,5,1)
  (same comment as for heat, district or industrial, natural gas)
- cement, unspecified: 1.54063e-7, 1.12841e-8, 3.21633e-8, 7.27383e-7, 2.1409e-8, 2.35134e-7, 2.84486e-8, 3.17751e-6 kg (8 entries); lognormal variance with pedigree 0.082, pedigree (1,1,5,5,1)
  (same comment as for process-specific burdens, municipal waste incineration)

## Emissions to nature
- Nickel [air, urban air close to ground]: 2.7083e-14 kg; lognormal variance with pedigree 0.322, pedigree (1,1,5,5,1)
  direct digester gas emission plus emission from sludge incineration. Uncertainty calculated from wastewater composition and treatment model
- Water [water, unspecified]: 0.9 m3; name water_to_water_unspecified; lognormal variance with pedigree 0.0827, pedigree (2,2,5,5,1)
  Calculated value based on water balance.
  property carbon content, non-fossil 0; name C_content_non_fossil
  property carbon content, fossil 0; name C_content_fossil
  property fraction, origin: unspecified 0; name fraction_origin_unspecified_Ww
  property wet mass 1000 kg; name WM
  property dry mass 0 kg; name DM
  property water in wet mass 1000 kg; name WWM
  property fraction, origin: salt water 0; name fraction_origin_salt_water_Ww
  property fraction, origin: fresh water 1; name fraction_origin_fresh_water_Ww
- Copper [soil, agricultural]: 1.4575e-6 kg; lognormal variance with pedigree 0.232, pedigree (1,1,5,5,1)
  emission from sludge spreading. Uncertainty calculated from wastewater composition and treatment model
- Zinc, ion [water, surface water]: 6.1834e-6 kg; lognormal variance with pedigree 0.192, pedigree (1,1,5,5,1)
  sewer overload discharge plus direct wastewater treatment plant emission plus emission from sludge incineration. Uncertainty calculated from wastewater composition and treatment model
- TOC, Total Organic Carbon [water, surface water]: 1.0539e-6 kg; lognormal variance with pedigree 0.042, pedigree (1,1,5,5,1)
  (same comment as for Zinc, ion)
- Lead [water, surface water]: 2.1983e-7 kg; lognormal variance with pedigree 0.182, pedigree (1,1,5,5,1)
  (same comment as for Zinc, ion)
- DOC, Dissolved Organic Carbon [water, ground-, long-term]: 5.4668e-9 kg; lognormal variance with pedigree 0.242, pedigree (1,1,5,5,1)
  emission from sludge incineration. Uncertainty calculated from wastewater composition and treatment model
- Chromium, ion [water, surface water]: 1.6684e-9 kg; lognormal variance with pedigree 0.242, pedigree (1,1,5,5,1)
  (same comment as for DOC, Dissolved Organic Carbon)
- Zinc [soil, agricultural]: 6.4745e-6 kg; lognormal variance with pedigree 0.232, pedigree (1,1,5,5,1)
  (same comment as for Copper)
- Nickel, ion [water, ground-, long-term]: 5.8754e-7 kg; lognormal variance with pedigree 0.222, pedigree (1,1,5,5,1)
  (same comment as for DOC, Dissolved Organic Carbon)
- Carbon dioxide, fossil [air, urban air close to ground]: 1.1417e-5 kg; lognormal variance with pedigree 0.112, pedigree (1,1,5,5,1)
  (same comment as for DOC, Dissolved Organic Carbon)
- Zinc [air, urban air close to ground]: 1.1997e-10 kg; lognormal variance with pedigree 0.272, pedigree (1,1,5,5,1)
  (same comment as for Nickel)
- Zinc, ion [water, ground-, long-term]: 1.1385e-7 kg; lognormal variance with pedigree 5.022, pedigree (1,1,5,5,1)
  (same comment as for DOC, Dissolved Organic Carbon)
- Nickel [soil, agricultural]: 5.5327e-7 kg; lognormal variance with pedigree 0.222, pedigree (1,1,5,5,1)
  (same comment as for Copper)
- Carbon monoxide, fossil [air, urban air close to ground]: 1.6682e-8 kg; lognormal variance with pedigree 0.302, pedigree (1,1,5,5,1)
  (same comment as for DOC, Dissolved Organic Carbon)
- TOC, Total Organic Carbon [water, ground-, long-term]: 5.4668e-9 kg; lognormal variance with pedigree 0.242, pedigree (1,1,5,5,1)
  (same comment as for DOC, Dissolved Organic Carbon)
- Chromium VI [water, surface water]: 1.0321e-6 kg; lognormal variance with pedigree 0.192, pedigree (1,1,5,5,1)
  (same comment as for Zinc, ion)
- Nickel, ion [water, surface water]: 1.8196e-6 kg; lognormal variance with pedigree 0.202, pedigree (1,1,5,5,1)
  (same comment as for Zinc, ion)
- Chromium [air, urban air close to ground]: 3.8706e-14 kg; lognormal variance with pedigree 0.322, pedigree (1,1,5,5,1)
  (same comment as for Nickel)
- COD, Chemical Oxygen Demand [water, ground-, long-term]: 1.3815e-8 kg; lognormal variance with pedigree 0.242, pedigree (1,1,5,5,1)
  (same comment as for DOC, Dissolved Organic Carbon)
- Lead [soil, agricultural]: 8.3412e-7 kg; lognormal variance with pedigree 0.232, pedigree (1,1,5,5,1)
  (same comment as for Copper)
- NMVOC, non-methane volatile organic compounds, unspecified origin [air, urban air close to ground]: 1.3898e-10 kg; lognormal variance with pedigree 0.382, pedigree (1,1,5,5,1)
  direct digester gas emission. Uncertainty calculated from wastewater composition and treatment model
- Methane, fossil [air, urban air close to ground]: 3.0787e-8 kg; lognormal variance with pedigree 0.262, pedigree (1,1,5,5,1)
  (same comment as for DOC, Dissolved Organic Carbon)
- COD, Chemical Oxygen Demand [water, surface water]: 3.9337e-6 kg; lognormal variance with pedigree 0.182, pedigree (1,1,5,5,1)
  (same comment as for Zinc, ion)
- BOD5, Biological Oxygen Demand [water, surface water]: 1.2919e-6 kg; lognormal variance with pedigree 0.052, pedigree (1,1,5,5,1)
  (same comment as for Zinc, ion)
- Chromium [soil, agricultural]: 4.6153e-7 kg; lognormal variance with pedigree 0.222, pedigree (1,1,5,5,1)
  (same comment as for Copper)
- Lead [air, urban air close to ground]: 3.5183e-11 kg; lognormal variance with pedigree 0.262, pedigree (1,1,5,5,1)
  (same comment as for Nickel)
- Lead [water, ground-, long-term]: 6.7405e-8 kg; lognormal variance with pedigree 6.432, pedigree (1,1,5,5,1)
  (same comment as for DOC, Dissolved Organic Carbon)
- Carbon [soil, agricultural]: 4.9358e-7 kg; lognormal variance with pedigree 0.232, pedigree (1,1,5,5,1)
  (same comment as for Copper)
- BOD5, Biological Oxygen Demand [water, ground-, long-term]: 4.519e-9 kg; lognormal variance with pedigree 0.242, pedigree (1,1,5,5,1)
  (same comment as for DOC, Dissolved Organic Carbon)
- DOC, Dissolved Organic Carbon [water, surface water]: 4.5921e-7 kg; lognormal variance with pedigree 0.172, pedigree (1,1,5,5,1)
  (same comment as for Zinc, ion)
- Copper, ion [water, surface water]: 1.0894e-6 kg; lognormal variance with pedigree 0.192, pedigree (1,1,5,5,1)
  (same comment as for Zinc, ion)
- Copper, ion [water, ground-, long-term]: 1.3363e-6 kg; lognormal variance with pedigree 0.242, pedigree (1,1,5,5,1)
  (same comment as for DOC, Dissolved Organic Carbon)
- Copper [air, urban air close to ground]: 1.2203e-11 kg; lognormal variance with pedigree 0.282, pedigree (1,1,5,5,1)
  (same comment as for Nickel)
- Chromium VI [water, ground-, long-term]: 5.5415e-8 kg; lognormal variance with pedigree 0.612, pedigree (1,1,5,5,1)
  (same comment as for DOC, Dissolved Organic Carbon)
- Water [air, unspecified]: 0.1 m3; name water_to_air_unspecified; lognormal variance with pedigree 0.0827, pedigree (2,2,5,5,1)
  Calculated value based on water balance.
  property fraction, origin: salt water 0; name fraction_origin_salt_water
  property fraction, origin: unspecified 1; name fraction_origin_unspecified
  property fraction, origin: fresh water 0; name fraction_origin_fresh_water

## Extrapolations
wastewater compositions from literature and/or estimates This dataset has been copied from an original dataset covering the geography CH. The uncertainty has been adjusted accordingly.

## Review by Niels Jungbluth 2009-01-22
passed.
