# treatment of waste wire plastic, municipal incineration

Dataset: EcoSpold 2, unit process
Geography: RoW
Time period: 2006-01-01 to 2021-12-31
Technology level: current
Classification: ISIC rev.4 ecoinvent: 3821:Treatment and disposal of non-hazardous waste
Synonyms: Siedlungsabfallverbrennung; Kehrichtverbrennung; municipal waste incineration
Scenario: Business-as-Usual
System model: Allocation, cut-off by classification
Share of production covered: 1.8 %
Generated by: Gabor Doka
Published in: Doka G. 2013
Database: ecoinvent
isCopyrightProtected: true
accessRestrictedTo: 1

## General comment
This dataset represents the activity of waste disposal of waste wire plastic in a municipal solid waste incinerator (MSWI) // Recommended use of this dataset: For disposal of small amounts of wiring isolation, which goes to incineration as wire in a part of a larger item or in small amounts only. Large amounts of separated wire will not be disposed in incinerators, but rather go to recycling. // // Waste composition (wet, in ppm): upper heating value 26.81 MJ/kg; lower heating value 25.95 MJ/kg; H2O 35500; O 22438; H 72167; C 530500; S 806.42; N 1069; P n.a.; B n.a.; Cl 305150; Br 50.232; F 14.281; I n.a.; Ag n.a.; As 1.8346; Ba 198.45; Cd 12.007; Co 21.87; Cr 31.397; Cu 24205; Hg 0.58871; Mn 63.112; Mo n.a.; Ni 14.22; Pb 17.077; Sb 32.095; Se 2.0277; Sn 252.09; V 860.3; Zn 141.51; Be 0.4828; Sc n.a.; Sr 85.455; Ti 965.59; Tl 0.38624; W n.a.; Si n.a.; Fe 2982.5; Ca 781.16; Al 193.12; K n.a.; Mg 28.932; Na 1415.1; // Share of carbon in waste that is biogenic 0%. // Share of metals in waste not oxidised and bulk-recyclable (exclude very small or thin parts) Iron: 0%; Alu: 0%; Copper: 0%. // One kg of this waste produces 0.05754 kg of slag and 0.1527 kg of residues, which are landfilled. Additional solidification with 0.06106 kg of cement. // Net energy production: 2.98MJ/kg electric energy and 6.49MJ/kg thermal energy. // Recovery of metal scrap to recycling: 0g iron scrap, 0g aluminium scrap, 0g copper scrap.

## Included activities start
waste incineration from waste reception gate and delivery into waste bunker at incinerator plant site (without transports to the incinerator)

## Included activities end
Waste-specific short-term emissions to water from leachate. Long-term emissions from landfill to ground water.

## Geography
Specific to the technology mix encountered in Switzerland in 2010. Well applicable to modern incineration practices in Europe, North America or Japan.

## Technology
average Swiss MSWI plants in 2010 (grate incinerators) with electrostatic precipitator for fly ash (ESP), wet flue gas scrubber and 25% SNCR , 42.77% SCR-high dust , 32.68% SCR-low dust -DeNOx facilities and 0% without Denox (weighted according to mass of burnt waste, representing Swiss average). Efficiency of iron scrap separation from slag : 58%. Efficiency of non-ferrous scrap separation from slag : 31%. Gross electric efficiency technology mix 15.84% and Gross thermal efficiency technology mix 28.51%

## Time period
Waste composition as given in literature reference, theoretical data or other source. Transfer coefficients for modern MSWI.

## Reference product
- waste wire plastic: -1 kg; By-product classification Waste; CPC 39270: Waste, parings and scrap of plastics
  Main reference product of this activity (supply of disposal service).
  production volume 4.3396e7 kg
    estimate of wire insulation in MSW based on unqualified assumption that 10% of copper in MSW in WTE is from wires, and total wire is 61.5w% insulation and 38.5w% copper (Doka 2007, part I, p.33)
  property heating value, net 25.95 MJ
    Value taken from the general comment of the treatment dataset.
  property price 0 EUR2005
    Waste products are assigned a price of zero as they are assumed to require further treatment.
  property carbon content 0.549508
    carbon content on a dry matter basis (reserved; not for manual entry)
  properties: water in wet mass 0.0355 kg, wet mass 1 kg, carbon content, fossil 0.549508, water content 0.0368066, dry mass 0.9645 kg, carbon content, non-fossil 0, carbon allocation 0.53 kg

## By-products
- heat, for reuse in municipal waste incineration only: 0 MJ; name E_th_prod_MSWI; By-product classification allocatable product; CPC 17300: Steam and hot water; pedigree (1,1,1,1,1)
  Net electricity generated from this waste and used in internal MSWI plant energy redistribution.
  Uncertainty: uncertainty is calculated from uncertainties in waste composition and uncertainties in energy efficiency and the uncertainty in internal energy demand
  production volume 2.8143e8 MJ
    calculated in proportion to reference product waste input to incinerator
  property true value relation 0.1842; name E_th_prod_MSWI_true_value_relation
    property to calculate "true value" from
  property exergy 0.1842 MJ; name E_th_prod_MSWI_exergy
    This exergy property is based on the exergy content of the product.
  property price 0.0106 EUR2005; name E_th_prod_MSWI_price_EUR2005
    Average European district heat price from Ecoheatcool and Euroheat 2005-2006, Ecoheat Work package 1: The European heat market. Final report. 10.6 EUR/GJ i s the price of district heat. http://www.solarthermalworld.org/files/Ecoheatcool%20WP1%20Web.pdf?download
- electricity, for reuse in municipal waste incineration only: 0 kWh; name E_el_prod_MSWI; CPC 17100: Electrical energy; By-product classification allocatable product; pedigree (1,1,1,1,1)
  (same comment as for heat, for reuse in municipal waste incineration only)
  production volume 3.5954e7 kWh
    calculated in proportion to reference product waste input to incinerator
  property exergy 3.6 MJ; name E_el_prod_MSWI_exergy
    This exergy property is based on the exergy content of the product.
  property true value relation 3.6; name E_el_prod_MSWI_true_value_relation
    property to calculate "true value" from
  property price 0.1 EUR2005; name E_el_prod_MSWI_price_EUR2005
    Estimated to be the same price as in case of electricity, medium voltage.

## Inputs from technosphere
- quicklime, milled, packed: 0.16236 kg; lognormal variance with pedigree 0.04701, pedigree (1,1,4,1,1)
  Auxilliary inputs for the flue gas treatment stage of the incinerator plant.
  Uncertainty: uncertainty calculated from uncertainty in average CaO input, of transfer coefficients in the incinerator, and the uncertainty of the waste composition of this waste
  properties: water content 0.010101, dry mass 0.99 kg, wet mass 1 kg
- ammonia, anhydrous, liquid: 0 kg; pedigree (1,1,1,1,1)
  Input to DeNOx stage (100% NH3).
  Uncertainty: uncertainty calculated from uncertainty in average DeNOx input, uncertainty in the share of thermal NOx, uncertainty of nitrogen content in average municipal waste and the uncertainty in nitrogen content in *this* waste.
  properties: dry mass 1 kg, wet mass 1 kg
- process-specific burdens, residual material landfill: 0 kg; pedigree (1,1,1,1,1)
  Mass-specific expenditures required for landfilling of incineration residues.
  Uncertainty: uncertainty is calculated from uncertainties in waste composition and transfer coefficients in incinerator
- sodium hydroxide, without water, in 50% solution state: 0.031313 kg; lognormal variance with pedigree 0.046251, pedigree (1,1,4,1,1)
  Auxilliary inputs for the flue gas treatment stage of the incinerator plant.
  Uncertainty: uncertainty calculated from uncertainty in average NaOH input, of transfer coefficients in the incinerator, and the uncertainty of the waste composition of this waste
  properties: heating value, net 3.03 MJ, dry mass 1 kg, wet mass 1 kg
- hydrochloric acid, without water, in 30% solution state: 0.0023778 kg; lognormal variance with pedigree 0.046683, pedigree (1,1,4,1,1)
  Auxilliary inputs for the wastewater treatment stage of the incinerator plant.
  Uncertainty: uncertainty calculated from uncertainty in average HCl input, of transfer coefficients in the incinerator, and the uncertainty of the waste composition of this waste
  properties: dry mass 1 kg, heating value, net 3.32 MJ, wet mass 1 kg
- chemical, inorganic: 0.0090463 kg; lognormal variance with pedigree 0.046683, pedigree (1,1,4,1,1)
  Auxilliary inputs for the wastewater treatment stage of the incinerator plant. Proxy for Polyelectrolyte.
  Uncertainty: uncertainty calculated from uncertainty in average Polyelectrolyte input, of transfer coefficients in the incinerator, and the uncertainty of the waste composition of this waste
  properties: dry mass 1 kg, wet mass 1 kg, carbon content, fossil 0.003
- slag landfill: 1.0041e-10 unit; lognormal variance with pedigree 0.077274, pedigree (1,1,4,1,1)
  Landfill infrastructure required for landfilling of bottom ash.
  Uncertainty: uncertainty is calculated from uncertainties in waste composition and transfer coefficients in incinerator
- waste cement, hydrated: 0 kg; pedigree (1,1,1,1,1)
  Hydrated cement output for solidification of landfilled residual material.
  Uncertainty: Uncertainty calculated from uncertainty of the waste composition of this waste and transfer coefficients in the incinerator and of the solidification recipe.
  production volume 0 kg
    calculated in proportion to reference product waste input to incinerator
  properties: wet mass 1 kg, dry mass 1 kg
- heat, district or industrial, natural gas: 0 MJ; pedigree (1,1,1,1,1)
  Input to DeNOx stage, to heat up flue gas in low-dust SCR.
  Uncertainty: uncertainty calculated from uncertainty in average DeNOx input, uncertainty in the share of thermal NOx, uncertainty of nitrogen content in average municipal waste and the uncertainty in nitrogen content in *this* waste.
  properties: heating value, net 1 MJ
- municipal waste incineration facility: 2.5e-10 unit
  Demands per kilogram waste.
- chromium oxide, flakes: 9.9087e-7 kg; lognormal variance with pedigree 0.56396, pedigree (1,1,4,1,1)
  Input to DeNOx stage.
  Uncertainty: uncertainty calculated from uncertainty in average DeNOx input, uncertainty in the share of thermal NOx, uncertainty of nitrogen content in average municipal waste and the uncertainty in nitrogen content in *this* waste.
  properties: wet mass 1 kg, dry mass 1 kg
- process-specific burdens, slag landfill: 0 kg; pedigree (1,1,1,1,1)
  Mass-specific expenditures required for landfilling of bottom ash.
  Uncertainty: uncertainty is calculated from uncertainties in waste composition and transfer coefficients in incinerator
- transport, freight, lorry, unspecified: 0 metric ton*km; pedigree (1,1,1,1,1)
  Transport services to transport incineration residues to landfills.
  Uncertainty: uncertainty calculated from uncertainty of the waste composition of this waste, uncertainty of transfer coefficients and the uncertainty in generic transportation distances
- titanium dioxide: 4.8553e-5 kg; lognormal variance with pedigree 0.56396, pedigree (1,1,4,1,1)
  Input to DeNOx stage (TiO2 catalyst carrier)
  Uncertainty: uncertainty calculated from uncertainty in average DeNOx input, uncertainty in the share of thermal NOx, uncertainty of nitrogen content in average municipal waste and the uncertainty in nitrogen content in *this* waste.
  properties: wet mass 1 kg, dry mass 1 kg
- chemical, organic: 1.2905e-5 kg; lognormal variance with pedigree 1.3145, pedigree (1,1,4,1,1)
  Auxilliary inputs for the wastewater treatment stage of the incinerator plant. Proxy for (pure) Trisodium-trimercapto-s-triazine (CAS 17766-26-6), used as 15% diluted solution, aka TMT15.
  Uncertainty: uncertainty calculated from uncertainty in average TMT15 input, of transfer coefficients in the incinerator, and the uncertainty of the waste composition of this waste
  properties: heating value, net 19.03 MJ, dry mass 1 kg, carbon content, fossil 0.628, wet mass 1 kg
- cement, unspecified: 0 kg; pedigree (1,1,1,1,1)
  Cement required for solidification of landfilled residual material.
  Uncertainty: Uncertainty calculated from uncertainty of the waste composition of this waste, of transfer coefficients in the incinerator and of the solidification recipe.
  properties: dry mass 1 kg, wet mass 1 kg
- water, decarbonised: 0 kg; pedigree (1,1,1,1,1)
  Incinerator process water used in flue gas scrubber stage.
  Uncertainty: uncertainty calculated from uncertainty in average water input, and the uncertainty of the waste composition of this waste
  properties: wet mass 1 kg
- residual material landfill: 3.1805e-10 unit; lognormal variance with pedigree 0.045001, pedigree (1,1,4,1,1)
  Landfill infrastructure required for landfilling of incineration residues.
  Uncertainty: uncertainty is calculated from uncertainties in waste composition and transfer coefficients in incinerator
- iron (III) chloride, without water, in 40% solution state: 0.00020424 kg; lognormal variance with pedigree 0.28452, pedigree (1,1,4,1,1)
  Auxilliary inputs for the wastewater treatment stage of the incinerator plant.
  Uncertainty: uncertainty calculated from uncertainty in average FeCl3 input, of transfer coefficients in the incinerator, and the uncertainty of the waste composition of this waste
  properties: dry mass 1 kg, wet mass 1 kg
- ammonia, anhydrous, liquid: 0.00016244, 1.39636e-5, 2.17238e-5, 4.30426e-5, 4.21704e-5, 4.41991e-6, 1.97586e-5, 0.000467431 kg (8 entries); lognormal variance with pedigree 0.26282, pedigree (1,1,4,1,1)
  (same comment as for ammonia, anhydrous, liquid)
- process-specific burdens, residual material landfill: 0.0431836, 0.109476 kg (2 entries); lognormal variance with pedigree 0.045001, pedigree (1,1,4,1,1)
  (same comment as for process-specific burdens, residual material landfill)
- waste cement, hydrated: -0.0431836, -0.109476 kg (2 entries); lognormal variance with pedigree 0.054085, pedigree (1,1,4,1,1)
  (same comment as for waste cement, hydrated)
  production volume 6.625e6 kg
- heat, district or industrial, natural gas: 0.00161298, 0.0386502, 0.104657 MJ (3 entries); lognormal variance with pedigree 0.26282, pedigree (1,1,4,1,1)
  (same comment as for heat, district or industrial, natural gas)
- process-specific burdens, slag landfill: 0.015977, 0.040504 kg (2 entries); lognormal variance with pedigree 0.077274, pedigree (1,1,4,1,1)
  (same comment as for process-specific burdens, slag landfill)
- transport, freight, lorry, unspecified: 0.000957378, 0.00014989, 0.00725843 metric ton*km (3 entries); lognormal variance with pedigree 0.03295, pedigree (1,1,4,1,1)
  (same comment as for transport, freight, lorry, unspecified)
- cement, unspecified: 0.00881753, 0.00183467, 0.000134377, 0.000383017, 0.00866206, 0.00025495, 0.0028001, 0.000338781, 0.0378395 kg (9 entries); lognormal variance with pedigree 0.054085, pedigree (1,1,4,1,1)
  (same comment as for cement, unspecified)
- water, decarbonised: 0.967027, 2.5162, 10.1484, 2.47819, 0.499591, 1.64275, 0.0906897, 1.29231, 3.01032, 18.8829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 kg (12 entries); lognormal variance with pedigree 0.28452, pedigree (1,1,4,1,1)
  (same comment as for water, decarbonised)

## Inputs from nature
- Oxygen [natural resource, in air]: 2.0487 kg; lognormal variance with pedigree 0.027511, pedigree (1,1,4,1,1)
  Oxygen from ambient air needed to combust and oxidise this waste. Net demand, i.e. without O2 leaving the plant in flue gas uncombusted.
  Uncertainty: uncertainty is calculated from uncertainties in waste composition and transfer coefficients to flue gas and soild residues in incinerator

## Emissions to nature
- Heat, waste [air, urban air close to ground]: 20.219 MJ; lognormal variance with pedigree 0.036071, pedigree (1,1,4,1,1)
  Waste heat generated from heating value of this waste plus any electricity required to process it.
  Uncertainty: uncertainty is calculated from uncertainties in waste composition and uncertainties in energy efficiency and the uncertainty in internal energy demand
- Chromium [air, urban air close to ground]: 2.7416e-8 kg; lognormal variance with pedigree 1.1416, pedigree (1,1,4,1,1)
  Emission to air from waste composition and transfer coefficients.
  Uncertainty: uncertainty is calculated from uncertainties in waste composition and transfer coefficients in incinerator
- Magnesium [air, urban air close to ground]: 3.0517e-8 kg; lognormal variance with pedigree 1.1563, pedigree (1,1,4,1,1)
  (same comment as for Chromium)
- Benzene, hexachloro- [air, urban air close to ground]: 4.5317e-11 kg; lognormal variance with pedigree 0.09468, pedigree (1,1,4,1,1)
  Incomplete combustion product emitted to air.
  Uncertainty: uncertainty calculated from uncertainty in average operation emissions, and the uncertainty of the flue gas volume from this waste.
- Iron, ion [water, ground-, long-term]: 0.0015046 kg; lognormal variance with pedigree 0.70292, pedigree (1,1,4,1,1)
  Long-term emissions from landfilling of incineration residues.
  Uncertainty: uncertainty is calculated from uncertainties in waste composition and transfer coefficients in incinerator and landfills.
- Chloride [water, ground-, long-term]: 0.070712 kg; lognormal variance with pedigree 0.049736, pedigree (1,1,4,1,1)
  (same comment as for Iron, ion)
- Sodium, ion [water, ground-, long-term]: 0.001019 kg; lognormal variance with pedigree 0.3115, pedigree (1,1,4,1,1)
  (same comment as for Iron, ion)
- Arsenic [air, urban air close to ground]: 1.4371e-8 kg; lognormal variance with pedigree 1.5056, pedigree (1,1,4,1,1)
  (same comment as for Chromium)
- Fluoride [water, surface water]: 1.092e-6 kg; lognormal variance with pedigree 0.79488, pedigree (1,1,4,1,1)
  Emissions to water from waste composition and transfer coefficients in incinerator and landfills.
  Uncertainty: uncertainty is calculated from uncertainties in waste composition and transfer coefficients in incinerator and landfills
- Sulfate [water, surface water]: 0.0004091 kg; lognormal variance with pedigree 0.33147, pedigree (1,1,4,1,1)
  (same comment as for Fluoride)
- Mercury [water, ground-, long-term]: 3.7495e-8 kg; lognormal variance with pedigree 3.1952, pedigree (1,1,4,1,1)
  (same comment as for Iron, ion)
- Water [water, surface water]: 0.00047325 m3; lognormal variance with pedigree 1.2115, pedigree (1,1,4,1,1)
  Process water released to surface water.
  Uncertainty: uncertainty calculated from uncertainty in process water input and the uncertainty of fraction to surface water.
- Strontium [water, surface water]: 5.3805e-8 kg; lognormal variance with pedigree 1.7026, pedigree (1,1,4,1,1)
  (same comment as for Fluoride)
- Carbon monoxide, fossil [air, urban air close to ground]: 3.6841e-5 kg; lognormal variance with pedigree 0.81153, pedigree (1,1,4,1,1)
  (same comment as for Benzene, hexachloro-)
- Vanadium [air, urban air close to ground]: 1.8246e-5 kg; lognormal variance with pedigree 0.6945, pedigree (1,1,4,1,1)
  (same comment as for Chromium)
- COD, Chemical Oxygen Demand [water, ground-, long-term]: 0.0039838 kg; lognormal variance with pedigree 0.026588, pedigree (1,1,4,1,1)
  (same comment as for Iron, ion)
- Lead [water, surface water]: 1.6335e-9 kg; lognormal variance with pedigree 1.0145, pedigree (1,1,4,1,1)
  (same comment as for Fluoride)
- Bromine [water, ground-, long-term]: 4.8416e-6 kg; lognormal variance with pedigree 1.0635, pedigree (1,1,4,1,1)
  (same comment as for Iron, ion)
- Tin, ion [water, surface water]: 6.6692e-9 kg; lognormal variance with pedigree 1.5211, pedigree (1,1,4,1,1)
  (same comment as for Fluoride)
- Barium [air, urban air close to ground]: 7.7895e-7 kg; lognormal variance with pedigree 0.89161, pedigree (1,1,4,1,1)
  (same comment as for Chromium)
- Tin [air, urban air close to ground]: 1.6467e-10 kg; lognormal variance with pedigree 0.921, pedigree (1,1,4,1,1)
  (same comment as for Chromium)
- Tin, ion [water, ground-, long-term]: 9.6481e-5 kg; lognormal variance with pedigree 1.7316, pedigree (1,1,4,1,1)
  (same comment as for Iron, ion)
- Sulfur dioxide [air, urban air close to ground]: 8.5759e-6 kg; lognormal variance with pedigree 0.70562, pedigree (1,1,4,1,1)
  (same comment as for Chromium)
- BOD5, Biological Oxygen Demand [water, ground-, long-term]: 0.0013031 kg; lognormal variance with pedigree 0.026588, pedigree (1,1,4,1,1)
  (same comment as for Iron, ion)
- COD, Chemical Oxygen Demand [water, surface water]: 0.00062057 kg; lognormal variance with pedigree 0.042257, pedigree (1,1,4,1,1)
  (same comment as for Fluoride)
- Benzo(a)pyrene [air, urban air close to ground]: 4.8229e-13 kg; lognormal variance with pedigree 0.41887, pedigree (1,1,4,1,1)
  (same comment as for Benzene, hexachloro-)
- Nitrogen oxides [air, urban air close to ground]: 0.00028853 kg; lognormal variance with pedigree 0.30461, pedigree (1,1,4,1,1)
  Sum of fuel-Nox and thermal-NOx emitted to air after DeNOx stage.
  Uncertainty: uncertainty calculated from uncertainty in average N-emissions and uncertainty in the share of thermal NOx and the uncertainty in nitrogen content in *this* waste.
- Hydrogen fluoride [air, urban air close to ground]: 9.6349e-8 kg; lognormal variance with pedigree 1.2399, pedigree (1,1,4,1,1)
  (same comment as for Chromium)
- Chromium, ion [water, surface water]: 2.4379e-9 kg; lognormal variance with pedigree 1.16, pedigree (1,1,4,1,1)
  (same comment as for Fluoride)
- Aluminium [water, surface water]: 2.0899e-8 kg; lognormal variance with pedigree 1.1187, pedigree (1,1,4,1,1)
  (same comment as for Fluoride)
- Selenium [water, surface water]: 6.8501e-7 kg; lognormal variance with pedigree 1.1822, pedigree (1,1,4,1,1)
  (same comment as for Fluoride)
- Vanadium, ion [water, surface water]: 1.3736e-6 kg; lognormal variance with pedigree 0.8529, pedigree (1,1,4,1,1)
  (same comment as for Fluoride)
- Selenium [air, urban air close to ground]: 2.4191e-8 kg; lognormal variance with pedigree 1.4912, pedigree (1,1,4,1,1)
  (same comment as for Chromium)
- Antimony [water, surface water]: 1.1062e-5 kg; lognormal variance with pedigree 1.1217, pedigree (1,1,4,1,1)
  (same comment as for Fluoride)
- Manganese [air, urban air close to ground]: 1.2053e-8 kg; lognormal variance with pedigree 1.0608, pedigree (1,1,4,1,1)
  (same comment as for Chromium)
- TOC, Total Organic Carbon [water, surface water]: 0.000271 kg; lognormal variance with pedigree 0.042365, pedigree (1,1,4,1,1)
  (same comment as for Fluoride)
- Manganese [water, ground-, long-term]: 3.8935e-5 kg; lognormal variance with pedigree 2.0154, pedigree (1,1,4,1,1)
  (same comment as for Iron, ion)
- Magnesium [water, ground-, long-term]: 2.5622e-5 kg; lognormal variance with pedigree 1.1034, pedigree (1,1,4,1,1)
  (same comment as for Iron, ion)
- Bromine [air, urban air close to ground]: 2.5091e-8 kg; lognormal variance with pedigree 1.0828, pedigree (1,1,4,1,1)
  (same comment as for Chromium)
- DOC, Dissolved Organic Carbon [water, surface water]: 0.000271 kg; lognormal variance with pedigree 0.042365, pedigree (1,1,4,1,1)
  (same comment as for Fluoride)
- Sodium [air, urban air close to ground]: 1.1618e-5 kg; lognormal variance with pedigree 0.62967, pedigree (1,1,4,1,1)
  (same comment as for Chromium)
- Iron [air, urban air close to ground]: 5.3451e-9 kg; lognormal variance with pedigree 0.58683, pedigree (1,1,4,1,1)
  (same comment as for Chromium)
- Cadmium [air, urban air close to ground]: 6.1203e-9 kg; lognormal variance with pedigree 1.2735, pedigree (1,1,4,1,1)
  (same comment as for Chromium)
- Lead [air, urban air close to ground]: 1.4069e-9 kg; lognormal variance with pedigree 1.2369, pedigree (1,1,4,1,1)
  (same comment as for Chromium)
- Cyanide [air, urban air close to ground]: 3.4253e-6 kg; lognormal variance with pedigree 1.4309, pedigree (1,1,4,1,1)
  Nitrogen species emitted to air after DeNOx stage.
  Uncertainty: uncertainty calculated from uncertainty in average N-emissions and uncertainty in the share of thermal NOx and the uncertainty in nitrogen content in *this* waste.
- Methane, fossil [air, urban air close to ground]: 3.2509e-7 kg; lognormal variance with pedigree 0.09468, pedigree (1,1,4,1,1)
  (same comment as for Benzene, hexachloro-)
- Sodium, ion [water, surface water]: 0.00038448 kg; lognormal variance with pedigree 0.31974, pedigree (1,1,4,1,1)
  (same comment as for Fluoride)
- Titanium [air, urban air close to ground]: 8.011e-7 kg; lognormal variance with pedigree 0.6945, pedigree (1,1,4,1,1)
  (same comment as for Chromium)
- Antimony [air, urban air close to ground]: 2.571e-11 kg; lognormal variance with pedigree 1.193, pedigree (1,1,4,1,1)
  (same comment as for Chromium)
- Fluoride [water, ground-, long-term]: 1.2804e-5 kg; lognormal variance with pedigree 0.73799, pedigree (1,1,4,1,1)
  (same comment as for Iron, ion)
- Cobalt [water, ground-, long-term]: 1.7815e-5 kg; lognormal variance with pedigree 1.0962, pedigree (1,1,4,1,1)
  (same comment as for Iron, ion)
- Hydrogen chloride [air, urban air close to ground]: 0.00017414 kg; lognormal variance with pedigree 0.06916, pedigree (1,1,4,1,1)
  (same comment as for Chromium)
- Calcium, ion [water, ground-, long-term]: 0.00058185 kg; lognormal variance with pedigree 0.65146, pedigree (1,1,4,1,1)
  (same comment as for Iron, ion)
- Cadmium, ion [water, ground-, long-term]: 8.7619e-7 kg; lognormal variance with pedigree 6.7064, pedigree (1,1,4,1,1)
  (same comment as for Iron, ion)
- Selenium [water, ground-, long-term]: 1.317e-6 kg; lognormal variance with pedigree 1.0888, pedigree (1,1,4,1,1)
  (same comment as for Iron, ion)
- Beryllium [water, ground-, long-term]: 4.4124e-7 kg; lognormal variance with pedigree 1.591, pedigree (1,1,4,1,1)
  (same comment as for Iron, ion)
- Lead [water, ground-, long-term]: 8.2564e-6 kg; lognormal variance with pedigree 4.3435, pedigree (1,1,4,1,1)
  (same comment as for Iron, ion)
- Benzene, pentachloro- [air, urban air close to ground]: 1.1451e-10 kg; lognormal variance with pedigree 0.09468, pedigree (1,1,4,1,1)
  (same comment as for Benzene, hexachloro-)
- Barium [water, ground-, long-term]: 9.9946e-5 kg; lognormal variance with pedigree 2.2453, pedigree (1,1,4,1,1)
  (same comment as for Iron, ion)
- Nitrate [water, ground-, long-term]: 3.8448e-5 kg; lognormal variance with pedigree 0.66242, pedigree (1,1,4,1,1)
  (same comment as for Iron, ion)
- Beryllium [water, surface water]: 3.0239e-10 kg; lognormal variance with pedigree 2.1853, pedigree (1,1,4,1,1)
  (same comment as for Fluoride)
- Cobalt [water, surface water]: 3.9623e-9 kg; lognormal variance with pedigree 1.483, pedigree (1,1,4,1,1)
  (same comment as for Fluoride)
- Chromium VI [water, surface water]: 8.7749e-7 kg; lognormal variance with pedigree 1.2018, pedigree (1,1,4,1,1)
  (same comment as for Fluoride)
- Sulfate [water, ground-, long-term]: 0.0019973 kg; lognormal variance with pedigree 0.40267, pedigree (1,1,4,1,1)
  (same comment as for Iron, ion)
- Nickel, ion [water, ground-, long-term]: 1.365e-5 kg; lognormal variance with pedigree 1.1996, pedigree (1,1,4,1,1)
  (same comment as for Iron, ion)
- Strontium [air, urban air close to ground]: 8.5455e-9 kg; lognormal variance with pedigree 1.024, pedigree (1,1,4,1,1)
  (same comment as for Chromium)
- Mercury [water, surface water]: 6.3935e-10 kg; lognormal variance with pedigree 1.1679, pedigree (1,1,4,1,1)
  (same comment as for Fluoride)
- Heat, waste [water, surface water]: 4.741 MJ; lognormal variance with pedigree 0.036071, pedigree (1,1,4,1,1)
  (same comment as for Heat, waste)
- Mercury [air, urban air close to ground]: 1.6692e-8 kg; lognormal variance with pedigree 1.6488, pedigree (1,1,4,1,1)
  (same comment as for Chromium)
- Toluene [air, urban air close to ground]: 4.3346e-8 kg; lognormal variance with pedigree 0.09468, pedigree (1,1,4,1,1)
  (same comment as for Benzene, hexachloro-)
- Nickel [air, urban air close to ground]: 1.7863e-8 kg; lognormal variance with pedigree 1.2515, pedigree (1,1,4,1,1)
  (same comment as for Chromium)
- Cadmium, ion [water, surface water]: 1.1509e-9 kg; lognormal variance with pedigree 1.0451, pedigree (1,1,4,1,1)
  (same comment as for Fluoride)
- Nickel, ion [water, surface water]: 9.5543e-9 kg; lognormal variance with pedigree 1.7775, pedigree (1,1,4,1,1)
  (same comment as for Fluoride)
- Aluminium [water, ground-, long-term]: 0.00013965 kg; lognormal variance with pedigree 0.80543, pedigree (1,1,4,1,1)
  (same comment as for Iron, ion)
- DOC, Dissolved Organic Carbon [water, ground-, long-term]: 0.0015764 kg; lognormal variance with pedigree 0.026588, pedigree (1,1,4,1,1)
  (same comment as for Iron, ion)
- Cobalt [air, urban air close to ground]: 3.9774e-8 kg; lognormal variance with pedigree 1.1856, pedigree (1,1,4,1,1)
  (same comment as for Chromium)
- Thallium [water, ground-, long-term]: 2.2538e-7 kg; lognormal variance with pedigree 1.2757, pedigree (1,1,4,1,1)
  (same comment as for Iron, ion)
- NMVOC, non-methane volatile organic compounds, unspecified origin [air, urban air close to ground]: 9.8633e-7 kg; lognormal variance with pedigree 0.09468, pedigree (1,1,4,1,1)
  (same comment as for Benzene, hexachloro-)
- Antimony [water, ground-, long-term]: 2.041e-5 kg; lognormal variance with pedigree 1.0868, pedigree (1,1,4,1,1)
  (same comment as for Iron, ion)
- Thallium [air, urban air close to ground]: 3.8624e-10 kg; lognormal variance with pedigree 1.7197, pedigree (1,1,4,1,1)
  (same comment as for Chromium)
- Water [air, urban air close to ground]: 0.0015199 m3; lognormal variance with pedigree 0.80738, pedigree (1,1,4,1,1)
  Water vapour from waste humidity, hydrogen oxidation and part of the process water.
  Uncertainty: Uncertainty calculated from uncertainty in waste composition, process water input and the uncertainty of fraction to air.
- Manganese [water, surface water]: 9.824e-9 kg; lognormal variance with pedigree 0.88945, pedigree (1,1,4,1,1)
  (same comment as for Fluoride)
- Zinc [air, urban air close to ground]: 9.4846e-8 kg; lognormal variance with pedigree 0.94306, pedigree (1,1,4,1,1)
  (same comment as for Chromium)
- Nitrate [water, surface water]: 1.3627e-5 kg; lognormal variance with pedigree 0.46075, pedigree (1,1,4,1,1)
  (same comment as for Fluoride)
- Benzene [air, urban air close to ground]: 2.1673e-8 kg; lognormal variance with pedigree 0.09468, pedigree (1,1,4,1,1)
  (same comment as for Benzene, hexachloro-)
- Barium [water, surface water]: 2.671e-8 kg; lognormal variance with pedigree 1.1807, pedigree (1,1,4,1,1)
  (same comment as for Fluoride)
- Arsenic, ion [water, surface water]: 1.2709e-6 kg; lognormal variance with pedigree 1.3848, pedigree (1,1,4,1,1)
  (same comment as for Fluoride)
- Magnesium [water, surface water]: 1.35e-7 kg; lognormal variance with pedigree 1.2352, pedigree (1,1,4,1,1)
  (same comment as for Fluoride)
- Thallium [water, surface water]: 2.3661e-10 kg; lognormal variance with pedigree 1.8741, pedigree (1,1,4,1,1)
  (same comment as for Fluoride)
- Copper, ion [water, surface water]: 3.1365e-6 kg; lognormal variance with pedigree 0.38961, pedigree (1,1,4,1,1)
  (same comment as for Fluoride)
- BOD5, Biological Oxygen Demand [water, surface water]: 0.00061259 kg; lognormal variance with pedigree 0.043141, pedigree (1,1,4,1,1)
  (same comment as for Fluoride)
- Particulates, < 2.5 um [air, urban air close to ground]: 2.5876e-6 kg; lognormal variance with pedigree 0.41887, pedigree (1,1,4,1,1)
  (same comment as for Benzene, hexachloro-)
- Zinc, ion [water, surface water]: 1.2767e-8 kg; lognormal variance with pedigree 0.76597, pedigree (1,1,4,1,1)
  (same comment as for Fluoride)
- Chloride [water, surface water]: 0.23427 kg; lognormal variance with pedigree 0.037748, pedigree (1,1,4,1,1)
  (same comment as for Fluoride)
- Strontium [water, ground-, long-term]: 8.5343e-5 kg; lognormal variance with pedigree 0.99048, pedigree (1,1,4,1,1)
  (same comment as for Iron, ion)
- TOC, Total Organic Carbon [water, ground-, long-term]: 0.0015764 kg; lognormal variance with pedigree 0.026588, pedigree (1,1,4,1,1)
  (same comment as for Iron, ion)
- Copper [air, urban air close to ground]: 2.217e-6 kg; lognormal variance with pedigree 0.30844, pedigree (1,1,4,1,1)
  (same comment as for Chromium)
- Zinc, ion [water, ground-, long-term]: 4.3032e-5 kg; lognormal variance with pedigree 3.0445, pedigree (1,1,4,1,1)
  (same comment as for Iron, ion)
- Ammonia [air, urban air close to ground]: 9.1115e-7 kg; lognormal variance with pedigree 0.30461, pedigree (1,1,4,1,1)
  (same comment as for Cyanide)
- Aluminium [air, urban air close to ground]: 1.5745e-10 kg; lognormal variance with pedigree 0.95777, pedigree (1,1,4,1,1)
  (same comment as for Chromium)
- Arsenic, ion [water, ground-, long-term]: 5.4939e-7 kg; lognormal variance with pedigree 1.4992, pedigree (1,1,4,1,1)
  (same comment as for Iron, ion)
- Chromium VI [water, ground-, long-term]: 2.8801e-6 kg; lognormal variance with pedigree 1.5912, pedigree (1,1,4,1,1)
  (same comment as for Iron, ion)
- Calcium, ion [water, surface water]: 8.6479e-6 kg; lognormal variance with pedigree 0.53055, pedigree (1,1,4,1,1)
  (same comment as for Fluoride)
- Dioxins, measured as 2,3,7,8-tetrachlorodibenzo-p-dioxin [air, urban air close to ground]: 4.3343e-14 kg; lognormal variance with pedigree 0.41887, pedigree (1,1,4,1,1)
  (same comment as for Benzene, hexachloro-)
- Calcium [air, urban air close to ground]: 6.1476e-6 kg; lognormal variance with pedigree 0.70898, pedigree (1,1,4,1,1)
  (same comment as for Chromium)
- Titanium, ion [water, ground-, long-term]: 0.00028866 kg; lognormal variance with pedigree 0.79915, pedigree (1,1,4,1,1)
  (same comment as for Iron, ion)
- Carbon dioxide, fossil [air, urban air close to ground]: 1.9334 kg; lognormal variance with pedigree 0.019794, pedigree (1,1,4,1,1)
  (same comment as for Chromium)
- Iron, ion [water, surface water]: 7.8405e-8 kg; lognormal variance with pedigree 0.81536, pedigree (1,1,4,1,1)
  (same comment as for Fluoride)
- Copper, ion [water, ground-, long-term]: 0.021621 kg; lognormal variance with pedigree 0.26909, pedigree (1,1,4,1,1)
  (same comment as for Iron, ion)
- Phenol, pentachloro- [air, urban air close to ground]: 9.4382e-12 kg; lognormal variance with pedigree 0.09468, pedigree (1,1,4,1,1)
  (same comment as for Benzene, hexachloro-)
- Particulates, > 2.5 um, and < 10um [air, urban air close to ground]: 1.3003e-8 kg; lognormal variance with pedigree 0.20007, pedigree (1,1,4,1,1)
  (same comment as for Benzene, hexachloro-)
- Vanadium, ion [water, ground-, long-term]: 0.00040103 kg; lognormal variance with pedigree 0.51656, pedigree (1,1,4,1,1)
  (same comment as for Iron, ion)
- Titanium, ion [water, surface water]: 3.6002e-7 kg; lognormal variance with pedigree 0.52058, pedigree (1,1,4,1,1)
  (same comment as for Fluoride)
- Dinitrogen monoxide [air, urban air close to ground]: 1.5944e-5 kg; lognormal variance with pedigree 1.4309, pedigree (1,1,4,1,1)
  (same comment as for Cyanide)
- Bromine [water, surface water]: 4.5366e-5 kg; lognormal variance with pedigree 0.51678, pedigree (1,1,4,1,1)
  (same comment as for Fluoride)
