# sawing, softwood

Dataset: EcoSpold 2, unit process
Geography: CH
Time period: 2011-01-01 to 2021-12-31
Technology level: current
Classification: ISIC rev.4 ecoinvent: 1610:Sawmilling and planing of wood
Tags: Swiss brush-up completed
Scenario: Business-as-Usual
System model: Allocation, cut-off by classification
Share of production covered: 100 %
Generated by: Frank Werner
Published in: BFS 2013
Database: ecoinvent
isCopyrightProtected: true
accessRestrictedTo: 1

## General comment
This dataset represents the service of sawing one m3 softwood at a sawmill.
The process chain in a sawmill is a net of interlinked processes; the process structure depends on the individual design and technologies in place for each sawmill. The structuring of the sawmilling processes is based on the identification of the core processes in a sawmill that are attributable to several co-products (such as upstream processes like forestry and transport of logs to the sawmill) sorting, storing and the sawing of the (debarked) log. Other processes are attributable directly to one of the co-products such as the chipping of residual wood (either after sawing or as part of the profile chipping), the chipping of the bark (the "debarking") or the suction of saw dust as collection and internal transport.

## Included activities start
The sawing process starts with the sorting of the log at the sawmill.

## Included activities end
This activity ends with sawn hardwood, at sawmill; the processing of all co-products form the sawing process are covered in separate datasets.The dataset does not include dust emissions to the environment because of lack of data.

## Geography
Represents average Swiss conditions.

## Parameters
- moisture content saw dust: 70 dimensionless; name moisture_sawdust
  moisture content of sawdust
- moisture content slab: 70 dimensionless; name moisture_slab
  moisture content of slab
- wood density, apparent: 658.24 kg/m3; name wood_d_apparent; = (1+moisture_sawnwood/100)* basic_wood_d
  kg wet matter/wet volume
- wood density, basic: 387.2 kg/m3; name basic_wood_d; = dry_wood_d*(1-30*shrinkage_ratio)
  kg oven-dry matter/wet volume
- moisture content sawnwood: 70 dimensionless; name moisture_sawnwood
  moisture content of sawnwood
- Bark ratio: 0.12 dimensionless; name bark
  ratio of the bark of the total stem volume
- share of slab: 27 dimensionless; name share_slab
  share of slabs/sidings/cut-offs produced from the debarked stem volume
- shrinkage ratio (u=30% - 0%): 0.004 dimensionless; name shrinkage_ratio
  shrinkage ratio between u=30% to 0%
- share of sawdust: 12 dimensionless; name share_sawdust
  share of sawdust produced from the debarked stem volume
- share of sawnwood: 61 dimensionless; name share_sawnwood
  share of sawnwood produced from the debarked stem volume
- wood density, dry: 440 kg/m3; name dry_wood_d
  kg oven-dry matter/oven-dry volume

## Reference product
- sawnwood, softwood, raw: 0 m3; name sawnwood_raw; source BFS 2013; By-product classification allocatable product; CPC 31101: Wood, sawn or chipped lengthwise, sliced or peeled, of a thickness exceeding 6 mm, of coniferous wood
  production volume 1.07942e6 m3; name p_sawnwood
    Swiss Federal Statistics; personal communication Holzindustrie Schweiz
  property price 160 EUR2005
    Expert judgement (Urs Luginbühl, Swiss Sawmilling industry, personal communication in June 2014). Cross-reference; FAOSTAT (accessed 20140428). The price is calculated by using data on total world import quantity (m3) and import value (1000 USD), year 2005. 109432798 m3 of Sawnwood (C) - coniferous was imported in the world in 2005. The import value was 22249842000 USD. The calculated price is thus (22249842000/109432798=203*0.8=) 164 Euro.
  property wet mass 658.24 kg; name WM; = basic_wood_d*(1+moisture_sawnwood/100)
  property water content 0.7; = moisture_sawnwood/100
  property water in wet mass 271.04 kg; = WM- basic_wood_d
  property heating value, net 5130.57 MJ
    LHV is calculated based on the Carbon content of the product. More details can be found on the respective documentation.The property is based on a value of 7.79MJ/kg
  property dry mass 387.2 kg; = basic_wood_d
  property carbon content 0.494
    carbon content on a dry matter basis (reserved; not for manual entry)
  property true value 160; name sawnwood_raw_true_value
    allocation property applied in "true value" allocation // value calculated from revenue
  properties: carbon content, fossil 0, carbon content, non-fossil 0.494, carbon allocation 191.277 kg
- slab and siding, softwood, wet, measured as dry mass: 1 kg; name m_slab; = sawnwood_raw/(share_sawnwood/100)* share_slab/100* basic_wood_d; source BFS 2013; CPC 31600: Builders' joinery and carpentry of wood (including cellular wood panels, assembled parquet panels, shingles an[…]; By-product classification allocatable product; pedigree (1,1,1,1,1)
  calculated by the share and basic density as the moisture content is over 30%
  production volume 1.84995e8 kg; = m_slab*p_sawnwood/sawnwood_raw
    Calculated from production volume of reference product using the relative outputs.
  property price 0.055 EUR2005
    Expert judgement (Urs Luginbühl, Swiss Sawmilling industry, personal communication in June 2014). Cross-reference; FAOSTAT (accessed 20140429). The price is calculated by using data on total world import quantity (m3) and import value (1000 USD), year 2005. 40461924 m3 of Chips and Particles was imported in the world in 2005. The import value was 3022227000 USD. The calculated price is thus (3022227000/40461924=74.7*0.8=) 62.2 Euro/m3. It is estimated, that the chips and particles are half hardwood (of density 650 kg/m3) and half softwood (of density 450 kg/m3), thus the remaining mixture has a density of 550 kg/m3. The recalculated price is (1/550*62.2=) 0.11 Euro/kg.
  property heating value, net 7.79 MJ
    LHV is calculated based on the Carbon content of the product. More details can be found on the respective documentation.
  property carbon content 0.494
    carbon content on a dry matter basis (reserved; not for manual entry)
  property true value 9.4261; name m_slab_true_value
    allocation property applied in "true value" allocation // value calculated from revenue
  properties: water in wet mass 0.7 kg, dry mass 1 kg, water content 0.7, wet mass 1.7 kg, carbon content, fossil 0, carbon content, non-fossil 0.494, carbon allocation 0.494 kg

## By-products
- bark: 0 kg; name m_bark; source BFS 2013; CPC 31230: Wood in chips or particles; By-product classification allocatable product; pedigree (1,1,1,1,1)
  calculated by the share and basic density as the moisture content is over 30%
  production volume 9.34319e7 kg; = m_bark*p_sawnwood/sawnwood_raw
    Calculated from production volume of reference product using the relative outputs.
  property heating value, net 7.37 MJ
    (same comment as for slab and siding, softwood, wet, measured as dry mass)
  property price 0.034 EUR2005
    Data on Import/Export (USD/kg) from UN data has been used. (http://data.un.org/Data.aspx?d=ComTrade&f=_l1Code%3a45, [accessed 10th June 2010]) Commodity: 'Sawdust, wood waste or scrap'. A density of 250 kg/m3 was used to convert from M3 to kg (data on density: http://wiki.answers.com/Q/What_is_the_density_of_sawdust, [Accessed 13 June 2010]).
  property carbon content 0.494
    carbon content on a dry matter basis (reserved; not for manual entry)
  property true value 2.94295; name m_bark_true_value
    allocation property applied in "true value" allocation // value calculated from revenue
  properties: wet mass 1.7 kg, carbon content, non-fossil 0.494, carbon content, fossil 0, dry mass 1 kg, water in wet mass 0.7 kg, water content 0.7, carbon allocation 0.494 kg
- sawdust, loose, wet, measured as dry mass: 0 kg; name m_sawdust; source BFS 2013; By-product classification allocatable product; CPC 3928: Sawdust and wood waste and scrap; pedigree (1,1,1,1,1)
  calculated by the share and basic density as the moisture content is over 30%
  production volume 8.222e7 kg; = m_sawdust*p_sawnwood/sawnwood_raw
    Calculated from production volume of reference product using the relative outputs.
  property heating value, net 7.79 MJ
    (same comment as for slab and siding, softwood, wet, measured as dry mass)
  property carbon content 0.494
    carbon content on a dry matter basis (reserved; not for manual entry)
  property true value 2.5898; name m_sawdust_true_value
    allocation property applied in "true value" allocation // value calculated from revenue
  properties: dry mass 1 kg, carbon content, non-fossil 0.494, price 0.034 EUR2005, water in wet mass 0.7 kg, water content 0.7, wet mass 1.7 kg, carbon content, fossil 0, carbon allocation 0.494 kg

## Inputs from technosphere
- sawlog and veneer log, softwood, measured as solid wood under bark: 0.000515277 m3; source BFS 2013; lognormal variance with pedigree 0.0336, pedigree (2,1,4,1,1)
  input of the log, from which 1 m3 of sawnwood is produced
  property basic wood density 387.405; name saw_veneer_logs_basic_wood_d
  property heating value, gross 0 MJ; name saw_veneer_logs_Gross_Heat_Value
  properties: wet mass 705.276 kg, heating value, net 4483.78 MJ, dry mass 440.233 kg, dry mass under bark 387.405 kg, water content 0.602, carbon content, non-fossil 0.494
  note on heating value, net: Value based on the dataset "softwood forestry, mixed species, sustainable forest management"The property is based on a value of 11.58MJ/kg
- lubricating oil: 3.36365e-5 kg; = 0.091+0.016; source Rüter, S. 2012; lognormal variance with pedigree 0.0411, pedigree (1,5,4,3,1)
  Lubricating oil plus motor oil
  properties: wet mass 1 kg, dry mass 1 kg, UVEK_relative_amount_1 1, UVEK_link_1 2866, carbon content, fossil 0.75, heating value, net 40.2 MJ
  note on UVEK_relative_amount_1: to be used only in special submissions in coordination with ecoinvent and the Swiss FOEN
  note on carbon content, fossil: Lubricating oil is produced from diesel. C-content/dry mass of fats and oils considered 75%, from: ecoinvent v2.2 report, n 15a, pg 40
  note on heating value, net: Literature value, Source: IPCC 2006, 2006 IPCC Guidelines for National Greenhouse Gas Inventories, Prepared by the National Greenhouse Gas Inventories Programme, Eggleston H.S., Buendia L., Miwa K., Ngara T. and Tanabe K. (eds). Published: IGES, Japan
- electricity, medium voltage: 0.00618345 kWh; name elec_midvol; source BFS 2013; lognormal variance with pedigree 0.0336, pedigree (2,1,4,1,1)
  data from industry, i.e. consumption of over-all electricity of the sawmill including the first sawing step, minus electricty consumed for the chipping of residual wood, the bark handling as well as for the suction of sawdust (i.e. processes that are covered in separate datasets).
  properties: UVEK_relative_amount_1 1, UVEK_link_1 1710
- waste mineral oil: -5.02975e-6 kg; source Rüter, S. 2012; lognormal variance with pedigree 0.0411, pedigree (1,5,4,3,1)
  waste motor oil; the lubricating oil is used in a dissipative way
  production volume 17270.7 kg
    Calculated from production volume of reference product using the relative outputs.
  properties: UVEK_relative_amount_1 -1, UVEK_link_8 4416, wet mass 1 kg, heating value, net 34.7 MJ, carbon content, fossil 0.864444, UVEK_link_1 1113, water content 0.111111, dry mass 0.9 kg
  note on UVEK_link_8: This link has been introduced to model transport specifically for the SAM model; to be used only in special submissions in coordination with ecoinvent and the Swiss FOEN.
  note on heating value, net: Value taken from the general comment of the treatment dataset.
  note on carbon content, fossil: Tab A.6, ecoinvent v2.2 report 13_I. C content has been calculated after data in the tables, and then referred to 1 kg DM
- sawmill: 6.88448e-11 unit; source BFS 2013; lognormal variance with pedigree 0.5586, pedigree (2,1,4,1,1)
  value taken from econvent 2.2 report Werner, F., T. Künniger, H.-J. Althaus and K. Richter (2007): Life cycle inventories of wood as fuel and construction material, Duebendorf, November 2002. Centre for life cycle inventories in the ETH domain, Duebendorf.
- diesel, burned in building machine: 0.011008 MJ; = 0.822*42.6; source Rüter, S. 2012; lognormal variance with pedigree 0.0337, pedigree (1,3,4,3,1)
  Diesel for internal transport
  properties: UVEK_link_1 732, UVEK_relative_amount_1 1, heating value, net 1 MJ

## Inputs from nature
- Carbon dioxide, non-fossil, resource correction [natural resource, in air]: 1.40117 kg; pedigree (1,1,1,1,1)
  This exchange has been added after economic allocation in order to re-balance the non-fossil carbon dioxide resource extraction.

## Sampling procedure
complementary literature and sampling from sawmills
