# clay brick production

Dataset: EcoSpold 2, unit process
Geography: RER
Time period: 1992-01-01 to 2021-12-31
Technology level: current
Classification: EcoSpold01Categories: construction materials/bricks
Classification: ISIC rev.4 ecoinvent: 2392:Manufacture of clay building materials
Synonyms: Ton; clay; Ziegel
Tags: ConvertedDataset
Scenario: Business-as-Usual
System model: Allocation, cut-off by classification
Generated by: Daniel Kellenberger (obsolete)
Published in: Kellenberger D. 2007
Database: ecoinvent
isCopyrightProtected: true
accessRestrictedTo: 1

## General comment
This dataset represents the production of 1 kg of brick. Data was obtained from literature values (average data from 12 Swiss brick plants) that were corrected and updated for some flows. Note that no hard coal coke is used within these 12 plants.
includes first ginding process, wet process (includes second ginding, mixing and plastifying), storage, forming (extruding molding method) and cutting, drying, firing, loading, packing and storage
not included: charge of the wastewater and solid waste, it's assumed that the waste heat is totally reused for drying, no hard coal coke is used within these 12 plants
Clay brick. Image source: http://nbss.co.za/wp-content/uploads/2015/06/clay-stock-bricks.jpg, accessed 20151211

## Included activities start
From reception of clay at the factory gate.

## Included activities end
This dataset ends with the storage of the produced and packed brick at the factory. This datset includes the first ginding process, wet process (second ginding, mixing and plastifying), storage, forming (an extruding molding method) and cutting, drying, firing, loading, packing and storage. The dataset doesn't include the charge of the wastewater and solid waste.

## Geography
Data was obtained from industries of Switzerland, Germany and Austria. certain exchanges are proxies (CH for RER), specially for the petrol consumption the proxy "operation, passenger car" has been used; data stem from Switzerland, Germany and Austria

## Technology
This dataset corresponds to a mix of different brick production technologies (different firing fuels) in Austria, Germany and Switzerland.

## Parameters
- fraction, tap water, to air: 0.15 dimensionless; name fraction_TW_to_air; = fraction_PW_to_air; lognormal variance with pedigree 0.092025, pedigree (4,4,3,2,4)
  Calculated value. See comment in the other parametres present in this dataset. Tap water is considered to be always used as process water, thus process water fractions to air are applied to all tap water input flows to calculate the amount of water consumed in the processes.
- fraction, process water, to air: 0.15 dimensionless; name fraction_PW_to_air; lognormal variance with pedigree 0.092025, pedigree (4,4,3,2,4)
  Literature value. In case when no industry/process specific data are available, default evaporation fraction value is used. This value is 15% and is based on literature (Statistics Canada, 2007 & Shaffer, K.H., 2008, Consumptive water use in the Great Lakes Basin, USGS & Shiklomanov, 2003, World Water Resources at the Beginning of the 21st Century) and has been approved by an expert.

## Reference product
- clay brick: 1 kg; source Hauck, D. 1997; CPC 373: Refractory products and structural non-refractory clay products; By-product classification allocatable product
  EcoSpold01Location=RER
  Ordinary bricks constitute the largest fraction of total brick production. They have a porous body. If there are no special requirements with regard to appearance or resistance to weathering, they are called inner-wall bricks, or backing bricks, and can be solid or hollow. For hollow bricks there are requirements for compression strength (4 - 28 MPa) and brick bulk density of 1.0 -2.2 kg/dm3. (The brick bulk density is calculated by dividing the mass of the dried brick by its volume including all channels, finger holes, and mortar pockets, or frogs.)
  One special variety of brick is the insulating brick used to reduce heat flow. For these the strength specification is between 2 and 28 MPa. The brick density must be only between 0.6 and 1.0 kg/dm3. Adding materials that burn during firing increases the porosity. Insulating brick can be as large as 49 × 30 × 23.8 cm.
  Progress is being made in producing room high building components. These are known as brick planks and are produced as monolithic pieces with an extrusion press.
  If the brick has surface and colour suitable for facing and it is able to withstand frost, the brick is classified as face brick, or facing brick. If the average compression strength is 3 45 MPa, the brick is ranked as extra strong.
  The main product of the Swiss industry is brick. It is usually plastered. If it is used for a visible brick wall aesthetic criterias as colour and structure of the surface have to be fulfilled and a good weathering resistance is necessary.
  production volume 4.62222e9 kg; = 32000000*1000*0.39*0.5/1.35
    Estimated value. Values for clay and kaolin production in Europe are retrieved from Eurostat (<http://ec.europa.eu/eurostat>, accessed 08.02.2016) for the year 2014. Following the commodities are listed with their Prodcom codes, Prodcom name and production volume for EU 28 in tons: 08122210 “Bentonite” 2216788 tons, 08122230 “Fireclay” 2542435 tons, 08122250 “Common clays and shales for construction use (excluding bentonite, fireclay, expanded clays, kaolin and kaolinic clays); andalusite, kyanite and sillimanite; mullite; chamotte or dinas earths” 32000000 tons, and 08122160 “Kaolinitic clays (ball and plastic clays)” 2997294 tons. According to the European mineral statistics 2009-2013 (<http://www.bgs.ac.uk/mineralsuk/statistics/europeanStatistics.html>, accessed 08.02.2016), Europe (EU36) produces 9.1Mt of Kaolin, which is 34.5% of World production, of which 47.8% (16% of all World production) comes from Germany. The largest producer in 2013 was US with 23%, China represented the 12%, Brazil 8%, and Iran 6%. The European mineral statistics values are used for both Europe and the World estimates. The same source reports for EU36 Bentonite production of 2.73 Mt for 2013, which represents the 16.4% of World production. The values for Europe matches the values indicated from Eurostat. Germany produces 13.1% of Europe’s bentonite 358844 tons. The volume of produced clay is assigned to the different activities based on USGS (2015) estimates of uses in the USA (<http://minerals.usgs.gov/minerals/pubs/commodity/clays/mcs-2015-clays.pdf>, accessed 08.02.2016) and according to input of clay per reference product. Of common clay, 39% is used for brick (for which 50% is assumed to be used for clay bricks and 50% light clay bricks), 23% lightweight aggregate, 31% cement, and 7% other uses (USGS specifies that 9% of common clay is used for lightweight concrete block production in the 2013 Minerals yearbook http://minerals.usgs.gov/minerals/pubs/commodity/clays/myb1-2013-clays.pdf, accessed 08.02.2016). Of ball clay, 39% is used for floor and wall tiles, 17% sanitary ware, and 44% other uses. Of bentonite 26% absorbents, 24% drilling mud, 15% foundry sand bond (assumed to represent plaster clay), 11% iron ore pelletising, and 24% other uses. Of fire clay, 34% for heavy clay products, and 66% for refractory and other products. Of fuller’s earth, 70% absorbents, and 30% for other uses. The US produce 15 to 25 % of refined clays (without common clay and shale).
  property price 0.083 EUR2005
    Upscale from EU by exchange rate. Afterwards apply the PPP (Purchasing power parity) factor of 0.83.
  property carbon content, fossil 0
    Made mainly from clay, sand and other aditives. All C contained in raw materials is emitted as CO2 ecoinvent v2.2 report 7, part IV
  property carbon content, non-fossil 0
    (same comment as for clay brick)
  property carbon content 0
    carbon content on a dry matter basis (reserved; not for manual entry)
  properties: dry mass 1 kg, water in wet mass 0 kg, wet mass 1 kg, water content 0, carbon allocation 0 kg

## Inputs from technosphere
- electricity, medium voltage: 0.0394 kWh; source Bruck, M. 1996; lognormal variance with pedigree 0.1381, pedigree (5,5,5,3,1)
  Estimation, based on literature values. Electricity comes from the electric supply company. It has been excluded one part of the plant's consumption as it's assumed that is produced by itself (by heat-generation from natural gas).
  EcoSpold01Location=UCTE
  Uncertainty: ;
- sheet rolling, chromium steel: 1.57e-7 kg; source Bruck, M. 1996; lognormal variance with pedigree 0.1381, pedigree (5,5,5,3,1)
  EcoSpold01Location=RER
  Literature value. Chromium steel is used in the process of steel forming.
  Uncertainty: ;
- limestone, crushed, for mill: 0.000396 kg; source Bruck, M. 1996; lognormal variance with pedigree 0.1381, pedigree (5,5,5,3,1)
  Proxy, Swiss module is used as proxy.
  Literature value, granulated lime is used in the production process.
  EcoSpold01Location=CH
  Uncertainty: ;
  properties: water content 0.00200401, wet mass 1 kg, carbon content, fossil 0.117492, dry mass 0.998 kg
  note on carbon content, fossil: Table 3.1, ecoinvent v2.2 report 7, part VII, pg 3. MW CaCO3=100, MW MgCO3=84
- pulverised lignite: 0.0245 MJ; source Bruck, M. 1996; lognormal variance with pedigree 0.1381, pedigree (5,5,5,3,1)
  Literature value. Coal dust is used to make brick porous. The net calorific value is 10,51 MJ/kg.
  EcoSpold01Location=DE
  Uncertainty: ;
  properties: wet mass 0.0460829 kg, water content 0.123596, dry mass 0.0410138 kg, carbon content, fossil 0.660674, heating value, net 8.8 MJ
  note on carbon content, fossil: 58.8% C and 11% water in wet mass (ecoinvent v2.1 report 6_VI Table 7.1)
- sheet rolling, steel: 1.57e-5 kg; source Bruck, M. 1996; lognormal variance with pedigree 0.1381, pedigree (5,5,5,3,1)
  Literature value. Steel band is used for the packing of bricks on pallets.
  EcoSpold01Location=RER
  Uncertainty: ;
- clay pit infrastructure: 2e-10 unit; lognormal variance with pedigree 0.408, pedigree (3,5,5,1,3)
  Estimated, based on improssions from a visit and an air photo of Brickworks Gasser in Rapperswill BE. The flow includes the infrastructure needed at the production place (i.e. buildings, acces) over 50 years.
  EcoSpold01Location=CH
  Uncertainty: ;
- light fuel oil: 0.00541 kg; source Bruck, M. 1996; lognormal variance with pedigree 0.1381, pedigree (5,5,5,3,1)
  Estimation, based on literature values. It is assumed that the data is "net calorific value" and the efficiency is 0.85. Natural gas is considered as a combustible.
  Further references:
  Frischknecht R., Jungbluth N., Althaus H.-J., Doka G., Dones R., Hellweg S., Hischier R., Humbert S., Margni M., Nemecek T. and Spielmann M. (2007) Implementation of Life Cycle Impact Assessment Methods. Final report ecoinvent Data v2.0 No. 3. Swiss Centre for Life Cycle Inventories, Dübendorf, CH, Online-Version under: www.ecoinvent.ch <http://www.ecoinvent.ch>.
  EcoSpold01Location=RER
  Uncertainty: ;
  properties: dry mass 1 kg, carbon content, fossil 0.862, wet mass 1 kg, heating value, net 42.6 MJ
- polyethylene, high density, granulate: 8.58e-7 kg; source Bruck, M. 1996; lognormal variance with pedigree 0.1381, pedigree (5,5,5,3,1)
  Literature value. A plastic band is used in the manufacturing process.
  EcoSpold01Location=RER
  Uncertainty: ;
  properties: wet mass 1 kg, dry mass 1 kg, carbon content, fossil 0.857143, heating value, net 42.47 MJ
  note on carbon content, fossil: Polyethylene is formed out of a huge amount of ethylene monomers (C2H4) (ecoinvent v2.2 report 11_II). MW=28 g/mol
- polystyrene, expandable: 0.000352 kg; source Bruck, M. 1996; lognormal variance with pedigree 0.1381, pedigree (5,5,5,3,1)
  EcoSpold01Location=RER
  Literature value. Polystyrol is used to make brick porous.
  Uncertainty: ;
  properties: heating value, net 38.67 MJ, wet mass 1 kg, carbon content, fossil 0.923077, dry mass 1 kg
  note on carbon content, fossil: Chemical formula of polystyrene is (C8H8)n (ecoinvent v2.2 report 11_II)
- EUR-flat pallet: 1.61e-5 unit; lognormal variance with pedigree 0.1381, pedigree (5,5,5,3,1)
  EcoSpold01Location=RER
  Estimation, based on personal communication: Thomas Ultizsch, Gütegemeinschaft Paletten of 03.09.02. The weight assumed is 22 kg.
  Uncertainty: ;
  properties: heating value, net 335.11 MJ, water content 0.2, carbon content, non-fossil 0.58833, carbon content, fossil 0.0311351, wet mass 22 kg, dry mass 18.3333 kg
  note on carbon content, non-fossil: C content in components of the pallet (ecoinvent v2.2 report 7_part XVIII)
- steel, low-alloyed, hot rolled: 3.06e-5 kg; source Bruck, M. 1996; lognormal variance with pedigree 0.1381, pedigree (5,5,5,3,1)
  Literature value. Steel band is used for the packing of bricks on pallets. A steel mould is used for extruding (forming) the steel.
  Proxy. Steel, low-allowed is used as proxy for roll sleeve and other steel parts of the process materials.
  EcoSpold01Location=RER
  Uncertainty: ;
  properties: dry mass 1 kg, carbon content, fossil 0.005, wet mass 1 kg
  note on carbon content, fossil: Low alloyed steel composition given in Tab. 3.2 ecoinvent v2.2 report 10_partII. Steel assumed to have a C content of 0.5%
- polystyrene scrap, post-consumer: 0 kg; source Bruck, M. 1996
  Literature value 0.000328kg. Polystyrol scrap is used to make brick porous.
  properties: carbon content, fossil 0.922579, wet mass 1 kg, dry mass 1 kg, heating value, net 38.67 MJ
  note on carbon content, fossil: Tab & Fig 6.12, ecoinvent v2.2 report 7, part XXI. Chemical formula of polystyrene is (C8H8)n
- tap water: 0.0272 kg; name tap_water_input; source Bruck, M. 1996; lognormal variance with pedigree 0.1381, pedigree (5,5,5,3,1)
  EcoSpold01Location=RER
  Literature value. Water is supplied from public water supply.
  Literature value. Water is supplied from public water supply.
  Uncertainty: ;
  properties: dry mass 0.000337476 kg, carbon content, fossil 0.00178991, wet mass 1 kg, water content 2962.17
  note on carbon content, fossil: Bicarbonate content is 2.93 mol/m3. CO2 content is 0.1 mol/m3 (ecoinvent v2.2 report 8, Tab 93.1).
- clay: 1.35 kg; source Bruck, M. 1996; lognormal variance with pedigree 0.1381, pedigree (5,5,5,3,1)
  Proxy. Swiss module used as proxy.
  EcoSpold01Location=CH
  Uncertainty: ;
  properties: dry mass 0.965 kg, wet mass 1 kg, water content 0.0362694
- sand: 0.0147 kg; source Bruck, M. 1996; lognormal variance with pedigree 0.1381, pedigree (5,5,5,3,1)
  Proxy. Swiss module used as proxy.
  EcoSpold01Location=CH
  Uncertainty: ;
  properties: wet mass 1 kg, dry mass 1 kg
- lime, packed: 0 kg; source Bruck, M. 1996; pedigree (1,1,1,1,1)
  Proxy. Swiss module "limestone, crushed" is assumed. Natural stone flour and granulated lime are used in the process.
  EcoSpold01Location=CH
  Uncertainty: ;
  properties: dry mass 0.998 kg, water content 0.00200401, wet mass 1 kg, carbon content, fossil 0.117492
- diesel, burned in building machine: 0.0297 MJ; source Bruck, M. 1996; lognormal variance with pedigree 0.1381, pedigree (5,5,5,3,1)
  EcoSpold01Location=GLO
  Estimation, based on literature values. Diesel is considered as a fuel input for the machinery. Diesel for mining is excluded as it is in the "clay pit" dataset.
  Uncertainty: ;
  properties: heating value, net 1 MJ
- wood chips, dry, measured as dry mass: 0.00480825 kg; = 1.0685E-05*450; source Bruck, M. 1996; lognormal variance with pedigree 0.0941, pedigree (5,5,5,3,1)
  Literature value. Recycled saw dust is used as to make bricks porous.
  Proxy. Swiss module used as proxy.
  Literature value. Saw dust is used as subtance to make porous. Dried matter content: 188.6 kg/m3. Humidity: 40%. Density: 1,4*188.6 kg/m3.
  properties: carbon content, non-fossil 0.494, dry mass 1 kg, wet mass 1.4 kg, water content 0.4, heating value, net 9.99 MJ
  note on carbon content, non-fossil: C content of dry mass is 0.494 kgC/kg dry wood (ecoinvent v2.2 report 9).
- packaging film, low density polyethylene: 0.000542 kg; source Bruck, M. 1996; lognormal variance with pedigree 0.1381, pedigree (5,5,5,3,1)
  EcoSpold01Location=RER
  Literature value. Polyethylene foil is used in the process.
  Uncertainty: ;
  properties: heating value, net 42.47 MJ, carbon content, fossil 0.857143, wet mass 1 kg, dry mass 1 kg
- transport, passenger car: 0.0166 km; source Bruck, M. 1996; lognormal variance with pedigree 0.1381, pedigree (5,5,5,3,1)
  Literature value. Petrol is used as fuel. certain exchanges are proxies (CH for RER), specially for the petrol consumption the proxy "operation, passenger car" has been used;
  Uncertainty: ;
- waste paper, sorted: 0 kg; source Bruck, M. 1996
  Literature value 0.0302kg. Paper degasifying matter is used to make brick porous.
  properties: wet mass 1 kg, carbon content, non-fossil 0.448889, water content 0.111111, dry mass 0.9 kg, heating value, net 14.11 MJ
  note on carbon content, non-fossil: The collected waste paper has a biogenic C content of 40.4% (average C-content of waste paper according to Doka 2004)
- heavy fuel oil: 0.000381 kg; source Bruck, M. 1996; lognormal variance with pedigree 0.1381, pedigree (5,5,5,3,1)
  (same comment as for light fuel oil)
  properties: carbon content, fossil 0.849, wet mass 1 kg, dry mass 1 kg, heating value, net 41.2 MJ
- natural gas, high pressure: 0 m3; source Bruck, M. 1996; pedigree (1,1,1,1,1)
  Estimation, based on literature values. It is assumed that the data is "net calorific value" and the efficiency is 0.87. Natural gas and propar are considered as a combustible.
  Further references:
  Frischknecht R., Jungbluth N., Althaus H.-J., Doka G., Dones R., Hellweg S., Hischier R., Humbert S., Margni M., Nemecek T. and Spielmann M. (2007) Implementation of Life Cycle Impact Assessment Methods. Final report ecoinvent Data v2.0 No. 3. Swiss Centre for Life Cycle Inventories, Dübendorf, CH, Online-Version under: www.ecoinvent.ch <http://www.ecoinvent.ch>.
  EcoSpold01Location=RER
  Uncertainty: ;
  properties: wet mass 0.84 kg, dry mass 0.84 kg, carbon content, fossil 0.602381, heating value, gross 39 MJ, heating value, net 39 MJ
  note on carbon content, fossil: An average C content of 0.506 kg C/ m3 has been assumed (this average has been calculated using data in Tab 3.5, ecoinvent v2.2 report 6_V
  note on heating value, net: Literature value, Source: United Nations Statistics Division (2018) International Recommendations for Energy Statistics (IRES). Available at: http://unstats.un.org/unsd/statcom/doc11/BG-IRES.pdf.
- lubricating oil: 1.32e-5 kg; source Bruck, M. 1996; lognormal variance with pedigree 0.1381, pedigree (5,5,5,3,1)
  EcoSpold01Location=RER
  Proxy, lubricating oil is used as proxy for gear lubricant, hydraulic oil and lubricating grease.
  Uncertainty: ;
  properties: wet mass 1 kg, dry mass 1 kg, carbon content, fossil 0.75, heating value, net 40.2 MJ
  note on carbon content, fossil: Lubricating oil is produced from diesel. C-content/dry mass of fats and oils considered 75%, from: ecoinvent v2.2 report, n 15a, pg 40
  note on heating value, net: Literature value, Source: IPCC 2006, 2006 IPCC Guidelines for National Greenhouse Gas Inventories, Prepared by the National Greenhouse Gas Inventories Programme, Eggleston H.S., Buendia L., Miwa K., Ngara T. and Tanabe K. (eds). Published: IGES, Japan
- lime, packed: 0.0233066, 0.000593387 kg (2 entries); source Bruck, M. 1996; lognormal variance with pedigree 0.1381, pedigree (5,5,5,3,1)
  (same comment as for lime, packed)
- natural gas, high pressure: 0.0315909, 0.000203969 m3 (2 entries); source Bruck, M. 1996; lognormal variance with pedigree 0.1381, pedigree (5,5,5,3,1)
  (same comment as for natural gas, high pressure)

## Inputs from nature
- Water, well, in ground [natural resource, in water]: 7.36e-5 m3; name water_well_in_ground_input; source Bruck, M. 1996; lognormal variance with pedigree 0.1381, pedigree (5,5,5,3,1)
  Proxy. Swiss module considered as proxy. Water is pumped on the company's ground.
  Uncertainty: ;

## Emissions to nature
- Water [air, unspecified]: 1.512e-5 m3; name water_to_air_unspecified; = (tap_water_input/1000*fraction_TW_to_air)+(water_well_in_ground_input*fraction_PW_to_air); lognormal variance with pedigree 0.0807, pedigree (2,2,5,1,1)
  Calculated value based on literature values and expert opinion. See comments in the parametres' comment field.
  property fraction, origin: salt water 0; name fraction_origin_salt_water
  property fraction, origin: unspecified 0; name fraction_origin_unspecified
  property fraction, origin: fresh water 1; name fraction_origin_fresh_water
- NMVOC, non-methane volatile organic compounds, unspecified origin [air, unspecified]: 7.63e-5 kg; source Bruck, M. 1996; lognormal variance with pedigree 0.2581, pedigree (5,5,5,3,1)
  Estimation, based on literature values. Total measured emissions within the system boundaries. It is assumed that an average NMVOC includes about 80% weight of C.
  Uncertainty: ;
- Hydrogen chloride [air, unspecified]: 1.22e-5 kg; source Bruck, M. 1996; lognormal variance with pedigree 0.1781, pedigree (5,5,5,3,1)
  Literature value. Total measured emissions within the system boundaries (mainly from combustion of the firing process).
  Uncertainty: ;
- Particulates, < 2.5 um [air, unspecified]: 1.4e-5 kg; source Bruck, M. 1996; lognormal variance with pedigree 0.4381, pedigree (5,5,5,3,1)
  Estimation, based on literature value. Total measured emissions within the system boundaries. It is assumed that the amount is 100% from combustion and therefore the share is calculated based on the emissions from the combustion. The share is based on EPA-Report: 75% of the total particulates.
  Further references:
  EPA (1998) Brick and Structural Clay Product Manufacturing, Emissions Factor Documentation for AP-42, Final Report, Section 11.3. EPA Contract 68-D2-0159, Work Assignment No. I-0, MRI Project No. 4601-01. U.S. Environmental Protection Agency (EPA), Office of Air Quality Planning and Standards, Research Triangle Park/NC, Online-Version under: <http://www.epa.gov/ttn/chief/ap42/>.
  Uncertainty: ;
- Benzene [air, unspecified]: 2.96e-6 kg; source Bruck, M. 1996; lognormal variance with pedigree 0.2581, pedigree (5,5,5,3,1)
  Literature value. Total measured emissions within the system boundaries.
  Uncertainty: ;
- Water [water, unspecified]: 8.568e-5 m3; name water_to_water_unspecified; = (tap_water_input/1000)*(1-fraction_TW_to_air)+water_well_in_ground_input*(1-fraction_PW_to_air); lognormal variance with pedigree 0.0807, pedigree (2,2,5,1,1)
  (same comment as for Water)
  property fraction, origin: unspecified 0; name fraction_origin_unspecified_Ww
  property fraction, origin: fresh water 1; name fraction_origin_fresh_water_Ww
  property water in wet mass 1000 kg; name WWM
  property carbon content, non-fossil 0; name C_content_non_fossil
  property wet mass 1000 kg; name WM
  property dry mass 0 kg; name DM
  property fraction, origin: salt water 0; name fraction_origin_salt_water_Ww
  property carbon content, fossil 0; name C_content_fossil
- Nitrogen oxides [air, unspecified]: 0.00026 kg; source Bruck, M. 1996; lognormal variance with pedigree 0.1781, pedigree (5,5,5,3,1)
  (same comment as for Hydrogen chloride)
- Sulfur dioxide [air, unspecified]: 9.98e-5 kg; source Bruck, M. 1996; lognormal variance with pedigree 0.2581, pedigree (5,5,5,3,1)
  Estimation, based on literature values. Total measured emissions within the system boundaries (mainly from combustion of the firing process).
  Further references:
  Berdowski J., Visschedijk A., Creemers E., Pulles T., Pacyna J., Fudala J. and Querreveld D. (1995) Co-ordinated European Programme on Particulate Matter Emission Inventories, Projections and Guidance (CEPMEIP) from <http://www.air.sk/tno/cepmeip/>.
  Uncertainty: ;
- Formaldehyde [air, unspecified]: 1.64e-5 kg; source Bruck, M. 1996; lognormal variance with pedigree 0.2581, pedigree (5,5,5,3,1)
  Literature value. Total measured emissions within the system boundaries.
  Uncertainty: ;
- Particulates, > 10 um [air, unspecified]: 4.68e-6 kg; source Bruck, M. 1996; lognormal variance with pedigree 0.1781, pedigree (5,5,5,3,1)
  Estimation, based on literature value. Total measured emissions within the system boundaries. The share is based on EPA-Report: 25% of the total particulates.
  Further references:
  EPA (1998) Brick and Structural Clay Product Manufacturing, Emissions Factor Documentation for AP-42, Final Report, Section 11.3. EPA Contract 68-D2-0159, Work Assignment No. I-0, MRI Project No. 4601-01. U.S. Environmental Protection Agency (EPA), Office of Air Quality Planning and Standards, Research Triangle Park/NC, Online-Version under: <http://www.epa.gov/ttn/chief/ap42/>.
  Uncertainty: ;
- Carbon dioxide, fossil [air, unspecified]: 0.18 kg; source Bruck, M. 1996; lognormal variance with pedigree 0.1381, pedigree (5,5,5,3,1)
  (same comment as for Hydrogen chloride)
- Hydrogen fluoride [air, unspecified]: 1.06e-5 kg; source Bruck, M. 1996; lognormal variance with pedigree 0.1781, pedigree (5,5,5,3,1)
  (same comment as for Sulfur dioxide)
- Carbon monoxide, fossil [air, unspecified]: 0.000391 kg; source Bruck, M. 1996; lognormal variance with pedigree 0.1381, pedigree (5,5,5,3,1)
  (same comment as for Sulfur dioxide)
- Phenol [air, unspecified]: 1.3e-7 kg; source Bruck, M. 1996; lognormal variance with pedigree 0.2581, pedigree (5,5,5,3,1)
  Literature value. Total measured emissions within the system boundaries.
  Uncertainty: ;

## Sampling procedure
The data relates to 12 brick production plants in Germany, Austria and Switzerland; The estimation of infrastructure relates to one company in Switzerland (Ziegelei Gasser AG in Rapperswil BE),

## Extrapolations
This dataset has been extrapolated from year 2002 to the year of the calculation (2021). The uncertainty has been adjusted accordingly.

## Review by Bo Weidema 2012-09-10
replaced inputs of production mixes with specified inputs

## Review by Roland Hischier 2011-09-22
Transfer of documentation done.

## Review by Roberto Dones 2005-07-19
passed
