# fattening of calves for beef production, feedlot

Dataset: EcoSpold 2, unit process
Geography: RoW
Time period: 2016-01-01 to 2021-12-31
Technology level: current
Classification: ISIC rev.4 ecoinvent: 0141:Raising of cattle and buffaloes
Scenario: Business-as-Usual
System model: Allocation, cut-off by classification
Generated by: [System]
Published in: Russo, V, 2017
Database: ecoinvent
isCopyrightProtected: true
accessRestrictedTo: 1

## General comment
This dataset represents the production of 1 kg of live weight of beef cattle in a large commercial feedlot. In order to be consistent with the structure of the ecoinvent database this global dataset was created as an exact copy of the local South African dataset. The production volume of the global dataset is derived from the global import of cattle heads (FAOSTAT, 2013), with cattle heads allocated in the same proportion as the South African product mix.

Weaned calves enter the feedlot at seven months of age and remain in the feedlot for a period of four and a half months. For the first third of their time at the feedlot (adaptation phase), the cattle spend four hours per day on pasture. After that cattle are kept wholly in pens (finishing phase). Manure is periodically collected from the pens and sold, with a portion of manure (assumed to be 10%) draining into anaerobic ponds. For consistency with other ecoinvent datasets, solid and liquid manure are considered to be by-products, although at the feedlot providing data for the dataset, only the dry manure is sold, with wet manure sprayed out onto the pasture.
Direct emissions from the cattle (enteric methane), as well as direct and indirect emissions from manure (ammonia, nitrous oxide and methane), are calculated using best available methods (IPCC) with regional adaptations. Manure is deposited in the pens (dry lots) where it accumulates until collected and sold, or it drains into collection ponds. During the adaption phase, manure is also deposited on pasture whilst grazing. This manure is not collected (i.e. cattle manure as an organic fertiliser of the pasture is only accounted for in terms of field emissions). Pasture is predominantly natural, thus there is no fertiliser, seed etc. included in the dataset although around 20% is irrigated. Emissions of heavy metals to soil and surface water estimated from manure left on pasture during grazing is after Nemecek and Schnetzer (2012). The factors applied in the equations are not South African specific and the calculated emissions are thus highly uncertain (especially leached emissions where South African conditions are likely to be very different).

## Included activities start
This activity starts with weaned calves entering the feedlot.

## Included activities end
This activity ends with the provision of weaned calves at the farm gate, ready to be sold for finishing at feedlots, as live weight. Culled breeding cattle and excess heifers are produced as by-products. Emissions from cattle and field emissions are included, as are their requirements (feed supplements and water). Pasture is natural, thus minimal maintenance is assumed to required (some tractor and trailer use is included, but no fertiliser, seed etc.).

## Geography
South African values: Not applicable worldwide.

## Technology
Data and assumptions reflect current farming practices in South Africa

## Time period
Period indicated in the reference.

## Parameters
- fraction, process water, to air: 0.15 dimensionless; name fraction_PW_to_air; lognormal variance with pedigree 0.094, pedigree (4,4,3,5,4)
  Literature value. In case when no industry/process specific data are available, default evaporation fraction value is used. This value is 15% and is based on literature (Statistics Canada, 2007 & Shaffer, K.H., 2008, Consumptive water use in the Great Lakes Basin, USGS & Shiklomanov, 2003, World Water Resources at the Beginning of the 21st Century) and has been approved by an expert.

## Reference product
- cattle for slaughtering, live weight: 1 kg; CPC 02111: Cattle; By-product classification allocatable product
  Cattle for slaughtering includes fattened steers.
  production volume 1.733e9 kg; name ref_product_pv
    According to FAOSTAT, the global import of cattle in 2013 amounts to 11,022,746 heads of cattle. Based on the South African product mix, feedlot cattle fattened from weaners account for 36% of heads of cattle. These cattle have an average weight per head of 485 kg.
    Reference: http://www.fao.org/faostat/en/#data/TA
  property price 2.025 EUR2005
    Calculated as an average of the regional prices (ZA and BR) which were provided by the data providers for the specific countries.
  property energy content 14.9367 MJ
    Energy content calculated from animal fat and protein composition and energy content for animal fat and protein of 39.3 and 23.6 MJ/kg, respectively.
    Johnson, I.R. et al. (2012). J. Anim. Sci. 90(13):4741-475.
    Williams, C.B. (2005). J. Anim. Sci. 83(6):1262-1266.
  property carbon content, non-fossil 0.4928
    Calculated from live weight empty body composition in fat and protein (
    Johnson, I.R. et al. (2012). J. Anim. Sci. 90(13):4741-475 ; Williams, C.B. (2005). J. Anim. Sci. 83(6):1262-1266) and from C content of nutrients (protein, fat) according to A.D. Kay and T. Vrede ("Evolutionary and Biochemical Aspects", in Global Ecology, 2010, Elsevier B.V., S.E. Jørgensen Ed.).
  property carbon content 0.4928
    carbon content on a dry matter basis (reserved; not for manual entry)
  properties: wet mass 1 kg, carbon content, fossil 0, dry mass 0.6 kg, water content 0.666667, water in wet mass 0.4 kg, carbon allocation 0.29568 kg

## By-products
- manure, liquid, cattle: 0 kg; CPC 34654: Excreta of animals useful for manure/fertilizer and fuel preparation; By-product classification Recyclable; pedigree (1,1,1,1,1)
  Manure draining from enclosures. A manure generation rate of 15 kg per head per day for commercial feedlot cattle is assumed based on the total manure generated and total heads of cattle at feedlots in South Africa (DEA, 2017). Cattle spend 4 hours per day on pasture during the adaptation stage, with the adaptation stage accounting for one third of the total time at the feedlot. 90% of manure deposited in the enclosures is assumed to accumulate and be periodically removed (i.e. 10% of manure is assumed to be washed into collection ponds). These figures are based on the practices at a representative feedlot in the region. Reference(s): DEA (2017) Unlocking Barriers and Opportunities for Land-use Based Climate-Change Mitigation Activities in South Africa, Department of Environmental Affairs of South Africa, Available at: https://www.environment.gov.za/sites/default/files/reports/unlockingbarriers_land-usebasedclimatechangemitigation.pdf. (Accessed September 2017).
  production volume 0 kg; = ref_product_pv* manure_liquid_byproduct
    Calculated from production volume of reference product using the relative outputs.
  property price 0.0042 EUR2005; name manure_liquid_byproduct_price_EUR2005
    World market value of manure, deflated with barley world market price and consumer price index, based on [http://www.gov.pe.ca/photos/original/af_NM_manconv.pdf].
  property carbon content 0.68
    carbon content on a dry matter basis (reserved; not for manual entry)
  properties: dry mass 0.075 kg, wet mass 1 kg, water content 12.333, carbon content, fossil 0, nitrogen content 0, water in wet mass 0.925 kg, carbon content, non-fossil 0.68, carbon allocation 0.051 kg
- manure, solid, cattle: 0 kg; CPC 34654: Excreta of animals useful for manure/fertilizer and fuel preparation; By-product classification Recyclable; pedigree (1,1,1,1,1)
  Manure deposited on dry lots excluding that left on pasture during grazing during the adaptation stage. A manure generation rate of 15 kg per head per day for commercial feedlot cattle is assumed based on the total manure generated and total heads of cattle at feedlots in South Africa (DEA, 2017). Cattle spend 4 hours per day on pasture during the adaptation stage, with the adaptation stage accounting for one third of the total time at the feedlot. 90% of manure deposited in the enclosures is assumed to accumulate and be periodically removed (i.e. 10% of manure is assumed to be washed into collection ponds). These figures are based on the practices at a representative feedlot in the region. Reference(s): DEA (2017) Unlocking Barriers and Opportunities for Land-use Based Climate-Change Mitigation Activities in South Africa, Department of Environmental Affairs of South Africa, Available at: https://www.environment.gov.za/sites/default/files/reports/unlockingbarriers_land-usebasedclimatechangemitigation.pdf. (Accessed September 2017).
  production volume 0 kg; = ref_product_pv* manure_solid_byproduct
    Calculated from production volume of reference product using the relative outputs.
  property price 0.0042 EUR2005
    (same comment as for manure, liquid, cattle)
  property carbon content 0.441
    carbon content on a dry matter basis (reserved; not for manual entry)
  properties: carbon content, non-fossil 0.441, carbon content, fossil 0, wet mass 1 kg, water in wet mass 0.8285 kg, nitrogen content 0.0277, water content 4.8309, dry mass 0.1715 kg, carbon allocation 0.0756315 kg

## Inputs from technosphere
- weaned calves, live weight: 0 kg; pedigree (1,1,1,1,1)
  Assumes an average entry weight of 230kg and average slaughter weight of 485kg (a daily weight gain of 1.9 kg in the feedlot). No losses are considered.
  properties: water content 0.66667, price 4.8 EUR2005, energy content 14.937 MJ, wet mass 1 kg, carbon content, non-fossil 0.4928, dry mass 0.6 kg
- alfalfa-grass silage: 0.0351 kg; lognormal variance with pedigree 0.0132, pedigree (2,4,4,5,1)
  Lucerne, assumed to be fed as silage. Quantity fed based on total mass of feed per day per head of cattle at the adaptation and finishing stages, and a breakdown of feed components at each stage. Data provided from a representative feedlot in South Africa. When changing the feed of ruminants, an adaptation stage, in this case 45 days, is necessary to allow the microflora in the rumen to adapt to the new feed. The adaptation stage includes 4 hours a day spent on pasture grazing and cattle feed consumption of 5.5 kg/(head.day). During the finishing stage no time is spent on pasture grazing, and feed consumption is increased to 10 kg/(head.day).
  properties: carbon content, non-fossil 0.484, water content 1.1739, energy content 18.55 MJ, dry mass 1 kg, wet mass 2.1739 kg
- rape meal: 0.137 kg; lognormal variance with pedigree 0.0132, pedigree (2,4,4,5,1)
  "Sun feed", comprised primarily of sunflower and/or canola oilseed cake, approximated by rape seed meal. Quantity fed based on total mass of feed per day per head of cattle at the adaptation and finishing stages, and a breakdown of feed components at each stage. Data provided from a representative feedlot in South Africa. When changing the feed of ruminants, an adaptation stage, in this case 45 days, is necessary to allow the microflora in the rumen to adapt to the new feed. The adaptation stage includes 4 hours a day spent on pasture grazing and cattle feed consumption of 5.5 kg/(head.day). During the finishing stage no time is spent on pasture grazing, and feed consumption is increased to 10 kg/(head.day).
  properties: wet mass 1 kg, water content 0.111111, dry mass 0.9 kg, carbon content, non-fossil 0.457233
- maize grain: 0 kg; pedigree (1,1,1,1,1)
  Maize grain fed at feedlot. Quantity based on total mass of feed per day per head of cattle at the adaptation and finishing stages, and a breakdown of feed components at each stage. Data provided from a representative feedlot in South Africa. When changing the feed of ruminants, an adaptation stage, in this case 45 days, is necessary to allow the microflora in the rumen to adapt to the new feed. The adaptation stage includes 4 hours a day spent on pasture grazing and cattle feed consumption of 5.5 kg/(head.day). During the finishing stage no time is spent on pasture grazing, and feed consumption is increased to 10 kg/(head.day).
  properties: dry mass 0.86 kg, carbon content, non-fossil 0.46957, water content 0.162791, wet mass 1 kg
- maize silage: 0 kg; pedigree (1,1,1,1,1)
  Silage fed at feedlot, assumed to be maize silage. Quantity fed based on total mass of feed per day per head of cattle at the adaptation and finishing stages, and a breakdown of feed components at each stage. Data provided from a representative feedlot in South Africa. When changing the feed of ruminants, an adaptation stage, in this case 45 days, is necessary to allow the microflora in the rumen to adapt to the new feed. The adaptation stage includes 4 hours a day spent on pasture grazing and cattle feed consumption of 5.5 kg/(head.day). During the finishing stage no time is spent on pasture grazing, and feed consumption is increased to 10 kg/(head.day).
  properties: carbon content, non-fossil 0.4773, wet mass 1 kg, energy content 6.6325 MJ, water content 1.85714, dry mass 0.35 kg
- wheat bran: 0.194 kg; lognormal variance with pedigree 0.0132, pedigree (2,4,4,5,1)
  Bran, a by-product of wheat milling, fed at feedlot. Quantity fed based on total mass of feed per day per head of cattle at the adaptation and finishing stages, and a breakdown of feed components at each stage. Data provided from a representative feedlot in South Africa. When changing the feed of ruminants, an adaptation stage, in this case 45 days, is necessary to allow the microflora in the rumen to adapt to the new feed. The adaptation stage includes 4 hours a day spent on pasture grazing and cattle feed consumption of 5.5 kg/(head.day). During the finishing stage no time is spent on pasture grazing, and feed consumption is increased to 10 kg/(head.day).
  properties: dry mass 0.87 kg, water content 0.149425, carbon content, non-fossil 0.475, wet mass 1 kg
  note on carbon content, non-fossil: Assumed carbon content, on a dry mass basis according to FAOSTAT. Reference: http://www.fao.org/forestry/17111/en
- lime: 0.026 kg; lognormal variance with pedigree 0.0132, pedigree (2,4,4,5,1)
  Limestone fed at feedlot. Based on total mass of feed per day per head of cattle at the adaptation and finishing stages, and a breakdown of feed components at each stage. Data provided from a representative feedlot in South Africa. When changing the feed of ruminants, an adaptation stage, in this case 45 days, is necessary to allow the microflora in the rumen to adapt to the new feed. The adaptation stage includes 4 hours a day spent on pasture grazing and cattle feed consumption of 5.5 kg/(head.day). During the finishing stage no time is spent on pasture grazing, and feed consumption is increased to 10 kg/(head.day).
  properties: wet mass 1 kg, carbon content, fossil 0.120005, dry mass 1 kg
- transport, tractor and trailer, agricultural: 0.00765 metric ton*km; lognormal variance with pedigree 0.1326, pedigree (2,4,4,5,1)
  Diesel consumption at a representative feedlot in South Africa is 39,000 litres per year. The equivalent tonne.km of tractor use were calculated using the diesel consumption of the dataset: transport, tractor and trailer, agricultural (43.6 g diesel/tonne*km)
- irrigation: 0 m3; pedigree (1,1,1,1,1)
  Municipal water used for irrigation of pasture. Based on primary data from representative feedlot in South Africa. 20% of the total pasture area is irrigated.
  properties: dry mass 0.11 kg, water content 9089.91, wet mass 1000 kg
- maize chop: 0.622 kg; lognormal variance with pedigree 0.0132, pedigree (2,4,4,5,1)
  Maize chop, a middlings product from dry maize milling, fed at feedlot. Quantity fed based on total mass of feed per day per head of cattle at the adaptation and finishing stages, and a breakdown of feed components at each stage. Data provided from a representative feedlot in South Africa. When changing the feed of ruminants, an adaptation stage, in this case 45 days, is necessary to allow the microflora in the rumen to adapt to the new feed. The adaptation stage includes 4 hours a day spent on pasture grazing and cattle feed consumption of 5.5 kg/(head.day). During the finishing stage no time is spent on pasture grazing, and feed consumption is increased to 10 kg/(head.day).
  properties: water content 0.119821, carbon content, non-fossil 0.46957, dry mass 0.893 kg, wet mass 1 kg
  note on carbon content, non-fossil: A gross energy content of 18.7 MJ/kg dry matter (DM) applied in this dataset, based on properties of "hominy feed" (Feedipedia, 2015). Reference(s): Feedipedia (2015) Animal Feed Resources Information System: Maize Bran and Hominy Feed, Available at: https://www.feedipedia.org/node/712. (Accessed October 2017).
- energy feed, gross: 1.895 MJ; lognormal variance with pedigree 0.0532, pedigree (2,4,4,5,4)
  DFG (defatted maize germ), a by-product of wet maize milling, is approximated by "energy feed, gross", applying a gross energy value of 20.7 MJ/kg DM and 96% dry matter content as fed (https://www.feedipedia.org/node/716). Quantity fed based on total mass of feed per day per head of cattle at the adaptation and finishing stages, and a breakdown of feed components at each stage. Data provided from a representative feedlot in South Africa. When changing the feed of ruminants, an adaptation stage, in this case 45 days, is necessary to allow the microflora in the rumen to adapt to the new feed. The adaptation stage includes 4 hours a day spent on pasture grazing and cattle feed consumption of 5.5 kg/(head.day). During the finishing stage no time is spent on pasture grazing, and feed consumption is increased to 10 kg/(head.day).
  properties: wet mass 1 kg, dry mass 1 kg
- urea: 0 kg; pedigree (1,1,1,1,1)
  The exchange has been updated from 'urea, as N' into 'urea' and therefore its amount has been scaled (multiplied) from 0.0156 kg by 2.1438 kg of 'urea' per kg of 'urea, as N'. Original comment of the exchange is: Municipal water consumption by a representative feedlot in South Africa. Municipal water is used in the washbay (service water) and for general purposes at the feedlot. Water needs are also met by withdrawals from a nearby river.
  properties: dry mass 1 kg, wet mass 1 kg, carbon content, fossil 0.2
- sodium chloride, powder: 0.0121 kg; lognormal variance with pedigree 0.0132, pedigree (2,4,4,5,1)
  Salt fed at feedlot. Based on total mass of feed per day per head of cattle at the adaptation and finishing stages, and a breakdown of feed components at each stage. Data provided from a representative feedlot in South Africa. When changing the feed of ruminants, an adaptation stage, in this case 45 days, is necessary to allow the microflora in the rumen to adapt to the new feed. The adaptation stage includes 4 hours a day spent on pasture grazing and cattle feed consumption of 5.5 kg/(head.day). During the finishing stage no time is spent on pasture grazing, and feed consumption is increased to 10 kg/(head.day).
  properties: wet mass 1 kg, dry mass 1 kg
- electricity, low voltage: 0 kWh; pedigree (1,1,1,1,1)
  Electricity consumption at a representative feedlot in South Africa. Value excludes electricity for irrigation (the highest use of electricity at the feedlot) and is primarily for mixing feeds.
- tap water: 0 kg; name wash_water; pedigree (1,1,1,1,1)
  Municipal water consumption by a representative feedlot in South Africa. Municipal water is used in the washbay (service water) and for general purposes at the feedlot. Water needs are also met by withdrawals from a nearby river.
  properties: carbon content, fossil 0.00178991, water content 2962.17, dry mass 0.000337476 kg, wet mass 1 kg
  note on carbon content, fossil: Bicarbonate content is 2.93 mol/m3. CO2 content is 0.1 mol/m3 (ecoinvent v2.2 report 8, Tab 93.1).
- manure, liquid, cattle: -0.394 kg; lognormal variance with pedigree 0.0166, pedigree (2,4,4,5,1)
  (same comment as for manure, liquid, cattle)
  production volume 6.82802e8 kg
  properties: dry mass 0.075 kg, wet mass 1 kg, water content 12.333, carbon content, non-fossil 0.68
- manure, solid, cattle: -3.549 kg; lognormal variance with pedigree 0.0166, pedigree (2,4,4,5,1)
  (same comment as for manure, solid, cattle)
  production volume 6.15042e9 kg
  properties: carbon content, non-fossil 0.441, price 0.0042 EUR2005, wet mass 1 kg, nitrogen content 0.0277, water content 4.8309, dry mass 0.1715 kg
- weaned calves, live weight: 0.0718925, 0.404108 kg (2 entries); lognormal variance with pedigree 0.0132, pedigree (2,4,4,5,1)
  (same comment as for weaned calves, live weight)
- maize grain: 0.0242186, 0.550781 kg (2 entries); lognormal variance with pedigree 0.0132, pedigree (2,4,4,5,1)
  (same comment as for maize grain)
- maize silage: 0.0305516, 0.659448 kg (2 entries); lognormal variance with pedigree 0.0132, pedigree (2,4,4,5,1)
  (same comment as for maize silage)
- irrigation: 0.000111428, 4.72978e-6, 1.89191e-7, 0.000996091, 1.63233e-5, 8.16231e-7, 4.63477e-5, 7.54394e-6, 0.00191417, 3.67949e-5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 m3 (16 entries); lognormal variance with pedigree 0.0132, pedigree (2,4,4,5,1)
  (same comment as for irrigation)
- urea: 0.0251131, 0.00461081, 0.00371939 kg (3 entries); lognormal variance with pedigree 0.0132, pedigree (2,4,4,5,1)
  (same comment as for urea)
- electricity, low voltage: 1.66609e-6, 3.62682e-5, 2.13339e-7, 5.61586e-7, 1.43603e-6, 1.28008e-7, 1.1314e-6, 7.28052e-7, 9.79218e-6, 2.54391e-5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 kWh (36 entries); lognormal variance with pedigree 0.0118, pedigree (2,3,4,5,1)
  (same comment as for electricity, low voltage)
- tap water: 0.00277317, 0.000333815, 0.000551684, 0.0139113, 0.000361899, 0.118874, 0.159194 kg (7 entries); lognormal variance with pedigree 0.0132, pedigree (2,4,4,5,1)
  (same comment as for tap water)

## Inputs from nature
- Transformation, to grassland, natural, for livestock grazing [natural resource, land]: 0.5093 m2; lognormal variance with pedigree 0.0206, pedigree (2,4,4,5,1)
  Area of the feedlot enclosures, excluding pasture. Based on a representative feedlot in South Africa and the number of cattle at the feedlot.
- Transformation, to unspecified [natural resource, land]: 0.0121 m2; lognormal variance with pedigree 0.0206, pedigree (2,4,4,5,1)
  (same comment as for Transformation, to grassland, natural, for livestock grazing)
- Transformation, to pasture, man made [natural resource, land]: 0.1239 m2; lognormal variance with pedigree 0.0206, pedigree (2,4,4,5,1)
  Area of cultivated pasture for grazing at a representative feedlot in South Africa.
- Occupation, pasture, man made [natural resource, land]: 0.0458 m2*year; lognormal variance with pedigree 0.0146, pedigree (2,4,4,5,1)
  Area of cultivated pasture at the feedlot. Based on representative feedlot in South Africa. Calculated from the total area of the site (excluding pasture), the number of cattle at the feedlot and time the cattle spend at the feedlot.
- Occupation, unspecified [natural resource, land]: 0.0045 m2*year; lognormal variance with pedigree 0.0146, pedigree (2,4,4,5,1)
  Area of the feedlot enclosures, i.e. excluding pasture. Based on representative feedlot in South Africa. Calculated from the total area of the site (excluding pasture), the number of cattle at the feedlot and time the cattle spend at the feedlot.
- Water, unspecified natural origin [natural resource, in ground]: 0.00416 m3; name drinking_water; lognormal variance with pedigree 0.0132, pedigree (2,4,4,5,1)
  Water extracted from river from a representative feedlot in the region, assumed to be primarily for cattle watering (drinking).
- Transformation, from grassland, natural, for livestock grazing [natural resource, land]: 0.6453 m2; lognormal variance with pedigree 0.0206, pedigree (2,4,4,5,1)
  Total area of the feedlot (enclosures and land for grazing). Based on a representative feedlot in South Africa. As cattle farming falls predominantly in the grasslands region of South Africa, this is taken as the pre-farm land type.
- Occupation, grassland, natural, for livestock grazing [natural resource, land]: 0.1884 m2*year; lognormal variance with pedigree 0.0146, pedigree (2,4,4,5,1)
  Area of natural pasture at the feedlot. Based on representative feedlot in South Africa. Calculated from the total area of the site (excluding pasture), the number of cattle at the feedlot and time the cattle spend at the feedlot.

## Emissions to nature
- Zinc [soil, agricultural]: 3.94e-6 kg; lognormal variance with pedigree 0.0526, pedigree (2,4,4,5,1)
  Emissions of heavy metals to soil and surface water estimated from manure left on pasture during grazing based on Nemecek and Schnetzer (2012). The factors applied in the equations are not South African specific and the calculated emissions are thus highly uncertain (especially leached emissions where South African conditions are likely to be very different). A daily manure generation rate of 15 tonnes/(head.year) for cattle in feedlots is applied in the calculations (DEA, 2017), with 4 hours per day spent on grazing for one-third of the total time spent at the feedlot (data from representative feedlot in South Africa). As the pasture is predominantly natural, no fertiliser, seed and pesticide applications have been taken into account. There is however removal of biomass through grazing. Reference(s): Nemecek and Schnetzer (2012) Methods of Assessment of Direct Field Emissions for LCIs of Agricultural Production Systems, Life cycle inventories of Swiss and European agricultural production systems. Reference(s): DEA (2017) Unlocking Barriers and Opportunities for Land-use Based Climate-Change Mitigation Activities in South Africa, Department of Environmental Affairs of South Africa, Available at: https://www.environment.gov.za/sites/default/files/reports/unlockingbarriers_land-usebasedclimatechangemitigation.pdf. (Accessed September 2017),
- Mercury [water, surface water]: 7.02e-11 kg; lognormal variance with pedigree 0.1026, pedigree (2,4,4,5,1)
  (same comment as for Zinc)
- Phosphorus [water, surface water]: 0.00252 kg; lognormal variance with pedigree 0.0526, pedigree (2,4,4,5,1)
  Emissions of phosphorous through soil erosion is from Nemecek and Schnetzer (2012). The factors applied in the equations are not South African specific and the calculated emissions are thus highly uncertain. Reference(s): Nemecek and Schnetzer (2012) Methods of Assessment of Direct Field Emissions for LCIs of Agricultural Production Systems, Life cycle inventories of Swiss and European agricultural production systems.
- Nickel [soil, agricultural]: 1.67e-7 kg; lognormal variance with pedigree 0.0526, pedigree (2,4,4,5,1)
  (same comment as for Zinc)
- Methane, non-fossil [air, non-urban air or from high stacks]: 0.0456 kg; source du Toit C.J.L. 2013; lognormal variance with pedigree 0.0206, pedigree (2,4,4,5,1)
  Methane from enteric fermentation and manure management. Calculated from methane emission factors for feedlot cattle in South Africa (58.9 kg/head/year and 0.87 kg/head/year for enteric and manure, respectively) (du Toit et al., 2013). Cattle are assumed to spend 135 days at the feedlot (value from a representative feedlot in South Africa). Reference(s): du Toit C.J.L., Meissner H.H. and van Niekerk W.A. (2013) Direct Methane and Nitrous Oxide Emissions of South African Dairy and Beef Cattle, South African Journal of Animal Science, Volume 43 (3), pp 320-339.
- Phosphate [water, surface water]: 0.00431 kg; lognormal variance with pedigree 0.0526, pedigree (2,4,4,5,1)
  Emissions of phosphates through run-off from manure deposited on pasture is from on Nemecek and Schnetzer (2012). The factors applied in the equations are not South African specific and the calculated emissions are thus highly uncertain (especially run-off emissions where South African conditions are likely to be very different). A daily manure generation rate of 15 tonnes/(head.year) for cattle in feedlots is applied in the calculations (DEA, 2017), with 4 hours per day spent on grazing for one-third of the total time spent at the feedlot (data from representative feedlot in South Africa). Reference(s): Nemecek and Schnetzer (2012) Methods of Assessment of Direct Field Emissions for LCIs of Agricultural Production Systems, Life cycle inventories of Swiss and European agricultural production systems. Reference(s): DEA (2017) Unlocking Barriers and Opportunities for Land-use Based Climate-Change Mitigation Activities in South Africa, Department of Environmental Affairs of South Africa, Available at: https://www.environment.gov.za/sites/default/files/reports/unlockingbarriers_land-usebasedclimatechangemitigation.pdf. (Accessed September 2017)
- Dinitrogen monoxide [air, non-urban air or from high stacks]: 0.00177 kg; source du Toit C.J.L. 2013; lognormal variance with pedigree 0.0156, pedigree (2,4,4,5,1)
  Direct and indirect emissions of N2O to the air from manure left in field during grazing, from manure accumulating in the dry lots and from manure washed into storage ponds (with the assumption that 10% of manure runs into storage ponds). Calculations following the IPCC guidelines using a combination of default IPCC and country specific input values. Emission factor per animal at adaptation phase and finishing phase, taking into account feed types and digestibilities, and livestock weight and weight gain from du Toit et al., (2013). Cattle are assumed to spend 135 days at the feedlot, with one-third time spent at the adaptation phase (partial grazing) and two-thirds at the finishing phase. Data from a representative feedlot in South Africa. Reference(s): IPCC Guidelines for National Greenhouse Gas Inventories‚ Prepared by the National Greenhouse Gas Inventories Programme‚ IGES, Japan; du Toit C.J.L., Meissner H.H. and van Niekerk W.A. (2013) Direct Methane and Nitrous Oxide Emissions of South African Dairy and Beef Cattle, South African Journal of Animal Science, Volume 43 (3), pp 320-339
- Mercury [soil, agricultural]: 1.2e-8 kg; lognormal variance with pedigree 0.0526, pedigree (2,4,4,5,1)
  (same comment as for Zinc)
- Ammonia [air, non-urban air or from high stacks]: 0.0201 kg; lognormal variance with pedigree 0.0206, pedigree (2,4,4,5,1)
  Ammonia emissions from manure left in field during grazing, from manure accumulating in the dry lots and from manure washed into storage ponds (with the assumption that 10% of manure runs into storage ponds). Calculations following the IPCC guidelines using a combination of default IPCC and country specific input values. Emission factor per animal at adaptation phase and finishing phase, taking into account feed types and digestibilities, and livestock weight and weight gain from du Toit et al., (2013). Cattle are assumed to spend 135 days at the feedlot, with one-third time spent at the adaptation phase (partial grazing) and two-thirds at the finishing phase. Data from a representative feedlot in South Africa. Reference(s): IPCC Guidelines for National Greenhouse Gas Inventories‚ Prepared by the National Greenhouse Gas Inventories Programme‚ IGES, Japan; du Toit C.J.L., Meissner H.H. and van Niekerk W.A. (2013) Direct Methane and Nitrous Oxide Emissions of South African Dairy and Beef Cattle, South African Journal of Animal Science, Volume 43 (3), pp 320-339
- Water [water, surface water]: 0.0002516 m3; = (wash_water*(1-fraction_PW_to_air))/1000
  Cattle drinking water is modelled as emitted to air and 15% of water used for other purposes (e.g. washing down stalls etc.) is assumed to be lost to evaporation, with the balance modelled as surface run-off.
- Copper, ion [water, surface water]: 2e-7 kg; lognormal variance with pedigree 0.1026, pedigree (2,4,4,5,1)
  (same comment as for Zinc)
- Chromium, ion [water, surface water]: 5.82e-7 kg; lognormal variance with pedigree 0.1026, pedigree (2,4,4,5,1)
  (same comment as for Zinc)
- Copper [soil, agricultural]: 5.5e-7 kg; lognormal variance with pedigree 0.0526, pedigree (2,4,4,5,1)
  (same comment as for Zinc)
- Cadmium, ion [water, surface water]: 4.92e-10 kg; lognormal variance with pedigree 0.1026, pedigree (2,4,4,5,1)
  (same comment as for Zinc)
- Cadmium [soil, agricultural]: 7.1e-9 kg; lognormal variance with pedigree 0.0526, pedigree (2,4,4,5,1)
  (same comment as for Zinc)
- Zinc, ion [water, surface water]: 1.01e-6 kg; lognormal variance with pedigree 0.1026, pedigree (2,4,4,5,1)
  (same comment as for Zinc)
- Lead [soil, agricultural]: 1.63e-7 kg; lognormal variance with pedigree 0.0526, pedigree (2,4,4,5,1)
  (same comment as for Zinc)
- Water [air, unspecified]: 0.0042044 m3; = drinking_water+(wash_water*fraction_PW_to_air)/1000
  Cattle drinking water is modelled as emitted to air and 15% of water used for other purposes (e.g. washing down stalls etc.) is assumed to be lost to evaporation (with the balance modelled as surface run-off).
- Lead [water, surface water]: 4.81e-9 kg; lognormal variance with pedigree 0.1026, pedigree (2,4,4,5,1)
  (same comment as for Zinc)

## Sampling procedure
Data from a large representative feedlot in South Africa provides most of the activity data for the dataset. However, where more representative data are available (such as emission factors for methane and nitrous oxide developed for South Africa's national greenhouse gas inventory) these are applied instead. Emissions of phosphates and heavy metals from manure are estimated according to Nemecek and Schnetzer (2011).
