# cyclohexanol production

Dataset: EcoSpold 2, unit process
Geography: RER
Time period: 2000-01-01 to 2021-12-31
Technology level: current
Classification: EcoSpold01Categories: chemicals/organics
Classification: ISIC rev.4 ecoinvent: 2011:Manufacture of basic chemicals
Tags: ConvertedDataset
Scenario: Business-as-Usual
System model: Allocation, cut-off by classification
Generated by: Roland Hischier
Published in: Althaus H.-J. 2007
Database: ecoinvent
isCopyrightProtected: true
accessRestrictedTo: 1

## General comment
The functional unit represent 1 kg of solid cyclohexanol. Large uncertainty of the process data due to weak data on the production process and missing data on process emissions.
[This dataset was already contained in the ecoinvent database version 2. It was not individually updated during the transfer to ecoinvent version 3. Life Cycle Impact Assessment results may still have changed, as they are affected by changes in the supply chain, i.e. in other datasets. This dataset was generated following the ecoinvent quality guidelines for version 2. It may have been subject to central changes described in the ecoinvent version 3 change report (http://www.ecoinvent.org/database/ecoinvent-version-3/reports-of-changes/), and the results of the central updates were reviewed extensively. The changes added e.g. consistent water flows and other information throughout the database. The documentation of this dataset can be found in the ecoinvent reports of version 2, which are still available via the ecoinvent website. The change report linked above covers all central changes that were made during the conversion process.]

## Included activities end
Raw materials and chemicals used for production, transport of materials to manufacturing plant, estimated emissions to air and water from production (incomplete), estimation of energy demand and infrastructure of the plant (approximation). Solid wastes omitted.

## Geography
Data used has no specific geographical origin (stoechiometry). Average europenan processes for raw materials, transport requirements and electricity mix used.

## Technology
Production is a 50:50 mix from hydrogenation of phenol and partial hydrogenation of benzene with a process yield of 98% (phenol) rsp. 95% (benzene). Inventory bases on stoechiometric calculations. The emissions to air (0.2 wt.% of raw material input) and water were estimated using mass balance. Treatment of the waste water in a internal waste water treatment plant assumed (elimination efficiency of 90% for C).

## Time period
date of published literature

## Parameters
- fraction, process water, to air: 0.205 dimensionless; name fraction_PW_to_air; lognormal variance with pedigree 0.092025, pedigree (4,4,3,2,4)
  Literature value (Statistics Canada, 2007 & Shaffer, K.H., 2008, Consumptive water use in the Great Lakes Basin, USGS) (Vionnet, S., Quantis Water Database - Technical Report, 2012).
- fraction, cooling water, once-through system, to air: 0.004 dimensionless; name fraction_CW_OT_to_air; lognormal variance with pedigree 0.0413, pedigree (2,3,1,3,1)
  Calculated based on literature value (Scown, C.D., 2011, Water Footprint of U.S. Transportation Fuels and supplying information of the article) (Vionnet, S., Quantis Water Database - Technical Report, 2012).
- fraction, cooling water, recirculating system, to air: 0.771 dimensionless; name fraction_CW_R_to_air; lognormal variance with pedigree 0.0413, pedigree (2,3,1,3,1)
  (same comment as for fraction, cooling water, once-through system, to air)
- fraction, cooling water, cooling pond system, to air: 0.032 dimensionless; name fraction_CW_CP_to_air; lognormal variance with pedigree 0.0413, pedigree (2,3,1,3,1)
  (same comment as for fraction, cooling water, once-through system, to air)
- fraction, cooling water, to air: 0.3875 dimensionless; name fraction_CW_to_air; = (0.5*fraction_CW_OT_to_air)+(0.5*fraction_CW_R_to_air); lognormal variance with pedigree 0.092025, pedigree (4,4,3,2,4)
  Calculated value based on literature value (see comments of the other parametres present in this dataset) and expert opinion. In the case when no industry/literature data are available about the type of cooling or directly fraction, cooling water, to air specific for the process a default assumption is applied. It is assumed that the once-through cooling system is used in 50% of all cases and recirculating system is used in another 50% of all cases.

## Reference product
- cyclohexanol: 1 kg; CPC 34139: Other alcohols, phenols, phenol-alcohols, and their halogenated, sulphonated, nitrated or nitrosated derivativ[…]; By-product classification allocatable product; CAS 108-93-0
  EcoSpold01Location=RER
  production volume 1.32237 kg
    This is a placeholder value that does not reflect real-world production volumes. This dataset does not currently require a real-world production volume to work in the database framework, and no actual data were collected yet. This has no negative effect on the results of the ecoinvent database. The placeholder value of this activity was scaled according to the nominal GDP of 2005 (source: United Nations, http://data.un.org/Glossary.aspx?q=GDP+%28current+US%24%29, accessed 20130726) to reflect an appropriate share of the global production volume, which is also a placeholder value.
  property price 1.38 EUR2005
    Calculated value based on data from United Nations Commodity Trade Statistics Database (comtrade.un.org). UN comtrade category: 290612 Cyclohexanol,methylcyclohexanol, dimethylcyclohexanol. Year 2005. Using exchange rate of 1EURO = 1.209 USD. Average of price of import into 5 main markets (EU, US, JP, IN and CN).
  property heating value, net 36.32 MJ
    LHV is calculated based on the elemental composition of the substance. Based on the CAS number of the substance (000108-93-0 ), which is found manually, the chemical formula of the substance is found to be: C6H12O, (PubChem 2020).
    Reference: Kim, S., Chen, J., Cheng, T., Gindulyte, A., He, J., He, S., Li, Q., Shoemaker, B. A., Thiessen, P. A., Yu, B., Zaslavsky, L., Zhang, J., & Bolton, E. E. (2019). PubChem 2019 update: improved access to chemical data. Nucleic acids research, 47(D1), D1102–D1109. https://doi.org/10.1093/nar/gky1033
  property carbon content 0.72
    carbon content on a dry matter basis (reserved; not for manual entry)
  properties: water in wet mass 0 kg, water content 0, carbon content, fossil 0.72, carbon content, non-fossil 0, dry mass 1 kg, wet mass 1 kg, carbon allocation 0.72 kg

## Inputs from technosphere
- benzene: 0.394 kg; lognormal variance with pedigree 0.1786, pedigree (4,5,5,5,5)
  EcoSpold01Location=RER
  Estimation based on process yield 90-99.8%
  Uncertainty: estimation based on process yield 90-99.8%
  properties: carbon content, fossil 0.923077, dry mass 1 kg, wet mass 1 kg, heating value, net 42.5 MJ
- heat, district or industrial, natural gas: 2 MJ; lognormal variance with pedigree 0.208, pedigree (5,5,5,1,4)
  Estimated with data from a large chem. plant
  EcoSpold01Location=RER
  Uncertainty: estimated with data from a large chem. plant
  properties: heating value, net 1 MJ
- hydrogen, liquid: 0.052 kg; lognormal variance with pedigree 0.1786, pedigree (4,5,5,5,5)
  (same comment as for benzene)
  properties: dry mass 1 kg, wet mass 1 kg, heating value, net 120.21 MJ
- phenol: 0.479 kg; lognormal variance with pedigree 0.1786, pedigree (4,5,5,5,5)
  (same comment as for benzene)
  properties: heating value, net 30.93 MJ, carbon content, fossil 0.765957, dry mass 1 kg, wet mass 1 kg
- chemical factory, organics: 4e-10 unit; lognormal variance with pedigree 0.5861, pedigree (4,5,5,3,5)
  EcoSpold01Location=RER
  Estimation
  Uncertainty: estimation
- electricity, medium voltage: 0.333 kWh; lognormal variance with pedigree 0.208, pedigree (5,5,5,1,4)
  EcoSpold01Location=UCTE
  Estimated with data from a large chem. plant
  Uncertainty: estimated with data from a large chem. plant

## Inputs from nature
- Water, unspecified natural origin [natural resource, in water]: 0.006 m3; name water_UNO_input; lognormal variance with pedigree 0.208, pedigree (5,5,5,1,4)
  Estimated with data from a large chem. plant
  Uncertainty: estimated with data from a large chem. plant
- Water, cooling, unspecified natural origin [natural resource, in water]: 0.024 m3; name water_cooling_UNO_input; lognormal variance with pedigree 0.208, pedigree (5,5,5,1,4)
  (same comment as for Water, unspecified natural origin)

## Emissions to nature
- Phenol [water, surface water]: 0.000862 kg; lognormal variance with pedigree 0.23, pedigree (5,5,5,5,4)
  Estimated from mass balance and WWTP effic.
  Uncertainty: estimated from mass balance and WWTP effic.
- Phenol [air, urban air close to ground]: 0.000958 kg; lognormal variance with pedigree 0.33, pedigree (5,5,5,5,5)
  Estimation
  Uncertainty: estimation
- COD, Chemical Oxygen Demand [water, surface water]: 0.00197 kg; lognormal variance with pedigree 0.23, pedigree (5,5,5,5,4)
  (same comment as for Phenol)
- Hydrogen [air, urban air close to ground]: 0.00103 kg; lognormal variance with pedigree 0.33, pedigree (5,5,5,5,5)
  Estimation
  Uncertainty: estimation
- TOC, Total Organic Carbon [water, surface water]: 0.00066 kg; lognormal variance with pedigree 0.23, pedigree (5,5,5,5,4)
  (same comment as for Phenol)
- Carbon dioxide, fossil [air, urban air close to ground]: 0.0436 kg; lognormal variance with pedigree 0.2, pedigree (5,5,5,5,4)
  (same comment as for Phenol)
- BOD5, Biological Oxygen Demand [water, surface water]: 0.00197 kg; lognormal variance with pedigree 0.23, pedigree (5,5,5,5,4)
  (same comment as for Phenol)
- DOC, Dissolved Organic Carbon [water, surface water]: 0.00066 kg; lognormal variance with pedigree 0.23, pedigree (5,5,5,5,4)
  (same comment as for Phenol)
- Benzene [air, urban air close to ground]: 0.0039 kg; lognormal variance with pedigree 0.33, pedigree (5,5,5,5,5)
  Estimation
  Uncertainty: estimation
- Water [water, unspecified]: 0.01947 m3; name water_to_water_unspecified; = water_cooling_UNO_input*(1-fraction_CW_to_air)+water_UNO_input*(1-fraction_PW_to_air); lognormal variance with pedigree 0.0807, pedigree (2,2,5,1,1)
  Calculated value based on literature values and expert opinion. See comments in the parametres' comment field.
  property fraction, origin: unspecified 1; name fraction_origin_unspecified_Ww
  property fraction, origin: salt water 0; name fraction_origin_salt_water_Ww
  property fraction, origin: fresh water 0; name fraction_origin_fresh_water_Ww
  property wet mass 1000 kg; name WM
  property dry mass 0 kg; name DM
  property carbon content, fossil 0; name C_content_fossil
  property carbon content, non-fossil 0; name C_content_non_fossil
  property water in wet mass 1000 kg; name WWM
- Water [air, unspecified]: 0.01053 m3; name water_to_air_unspecified; = (water_cooling_UNO_input*fraction_CW_to_air)+(water_UNO_input*fraction_PW_to_air); lognormal variance with pedigree 0.0807, pedigree (2,2,5,1,1)
  (same comment as for Water)
  property fraction, origin: fresh water 0; name fraction_origin_fresh_water
  property fraction, origin: salt water 0; name fraction_origin_salt_water
  property fraction, origin: unspecified 1; name fraction_origin_unspecified

## Sampling procedure
Process data based on stoechiometric calculations of few literature sources. Energy demand based on approximation from large chemical plant. Process emissions based on estimations only.

## Extrapolations
This dataset has been extrapolated from year 2000 to the year of the calculation (2021). The uncertainty has been adjusted accordingly.

## Review by Heiko Kunst 2003-06-20
Passed
Passed
