# chemi-thermomechanical pulp production

Dataset: EcoSpold 2, unit process
Geography: RER
Time period: 2000-01-01 to 2021-12-31
Technology level: current
Classification: ISIC rev.4 ecoinvent: 1701:Manufacture of pulp, paper and paperboard
Classification: EcoSpold01Categories: paper & cardboard/pulps
Synonyms: wood-containing pulp
Tags: ConvertedDataset
Scenario: Business-as-Usual
System model: Allocation, cut-off by classification
Generated by: Roland Hischier
Published in: Hischier R. 2007
Database: ecoinvent
isCopyrightProtected: true
accessRestrictedTo: 1

## General comment
This dataset characterises the average production of pulp following a chemi-thermomechanical process (CTMP) in Europe.

In the CTMP wood chips are impregnated with chemicals before they are mechanically defibrated in the refiner under high pressure (~about 3 bar) or at atmospheric pressure, mainly in two stages.

Bleaching has not been included because chemi-mechanical pulps cannot be brightened effectively by oxidative and reductive bleaching. During mechanical defibration, lignin is plasticised and remains in the pulp.
PULP MARKET: Of the total pulp production in Europe the largest part is sulfate /kraft-pulp, making up about 70% of total pulp production. Thermo-mechanical pulp is a type of mechanical pulp, which makes up around 25-28% of total pulp production, of which in turn the largest part, about 85%, is thermo-mechanical pulp and the rest chemi-thermomechanical pulp. Only a part of pulp production is sold on the market, the majority is produced at integrated pulp mills which directly process it further into (paper-) products. For mechanical pulp the share of market pulp is small, much in 2016 was 9%, the other 92% is integrated pulp.
The SOURCES of information are (1) a report of the Swedish EPA about the Swedish pulp and paper industry (Naturvardsverket, 2001), (2) an environmental report of a Norwegian CTMP mill (Södra, 2002), (3) the European IPPC documentation for the paper and pulp industry, which also contains information on Best Available Techniques (BAT) and the description and quantification of the present situation of the pulp and paper industry (European Commission, 2000), (4) information on the present situation of a Finnish CTMP mill and (5) the theoretical description of Patt et al. (1993).
Reference(s):
Naturvardsverket, 2001. Naturvardsverket (2001) Skogsindustrins utsläpp - avfallsmängder och energiförbrukning 2000. Report 5154. Naturvardsverket (Swedish EPA), Stockholm.
Södra (2002) Meeting Södra. Environmental Report 2001. Södra, Växjö (Sweden) as pdf-File under: www.sodra.com.
European Commission, 2000. European Commission (2000) Integrated Pollution Prevention and Control (IPPC) - Reference Document on Best Available Techniques in the Pulp and Pa-per Industry. Institute for Prospective Technological Studies, Sevilla.
Patt R., Kordsachia O., Süttinger R., Ohtani Y., Hoesch J. F., Ehrler P., Eich-inger R., Holik H., Hamm U., Rohmann M. E., Mummenhoff P., Petermann E., Miller R. F., Frank D., Wilken R., Baumgarten H. L. and Rentrop G.-H. (1993) Paper and Pulp. In: Ullmann's Encyclopedia of Industrial Chemistry, Vol. A.18. VCH Publisher Inc.

## Included activities start
The activity starts with the reception of residual softwood at the mill.

## Included activities end
The process includes raw material handling, pulping, drying, recovery cycles of chemicals and internal wastewater treatment. The activity ends when the chemi-thermomechanical pulp is ready to be sold.

## Geography
The dataset represents the average chemi-thermomechanical pulp production in Europe. Data are sourced from various European producers, for exaple, in Switzerland and Germany.

## Technology
Modern average technology.

## Time period
Data gathered between 2000-2002.

## Parameters
- fraction, process water, to air: 0.15 dimensionless; name fraction_PW_to_air; lognormal variance with pedigree 0.092025, pedigree (4,4,3,2,4)
  Literature value. In case when no industry/process specific data are available, default evaporation fraction value is used. This value is 15% and is based on literature (Statistics Canada, 2007 & Shaffer, K.H., 2008, Consumptive water use in the Great Lakes Basin, USGS & Shiklomanov, 2003, World Water Resources at the Beginning of the 21st Century) and has been approved by an expert.

## Reference product
- chemi-thermomechanical pulp: 1 kg; By-product classification allocatable product; CPC 321: Pulp, paper and paperboard
  EcoSpold01Location=RER
  production volume 1.359e8 kg; name apv; = 906000000*0.15
    The total production volume of mechanical pulp in Europe in 2016 was 10100000 tonnes, of which the largest part, 9240000 tonnes were integrated pulp and 906000 tonnes were market pulp (CEPI, 2018). Of the total mechancial pulp, the largest part, around 85% is thermomechanical pulp, the remaining 15% are chemi-thermomechanical pulp (FAO, 2018). This dataset represents only market chemi-thermomechanical pulp. The respective production volume was calculated multiplying the amount of market mechanical pulp with the fraction of chemi-thermomechanical pulp in mechanical pulp (15%).
    Reference(s):
    Confederation of European Paper Industries (CEPI), 2018, personal correspondence, 04.07.2018 (CEPI publishes the total annual pulp production volumes per type of pulp in "Key Statistics 2016", accessible at http://www.cepi.org/system/files/public/documents/publications/statistics/2017/KeyStatistics2016_Final.pdf (last accessed July 2018)).
    FAO, 2018, FAOSTAT, Forestry Production and Trade, data retrieved from http://www.fao.org/faostat/en/#data/FO, 4.7.2018
  property carbon content, non-fossil 0.494
    C content of dry mass is 0.494 kgC/kg dry wood (ecoinvent v2.2 report 6_IX & ecoinvent v2.2 report 9). No other C containing products in the formulation of the pulp.
  property price 0.37 EUR2005
    Export prices for the World+ according to: http://faostat.fao.org/site/626/DesktopDefault.aspx?PageID=626#ancor downloaded 6 May 2009; calculated as export value divided by export volume.
  property heating value, net 13.23 MJ
    LHV is calculated based on the Carbon content of the product. More details can be found on the respective documentation.
  property carbon content 0.494
    carbon content on a dry matter basis (reserved; not for manual entry)
  properties: water in wet mass 0.1 kg, wet mass 1 kg, water content 0.111111, carbon content, fossil 0, dry mass 0.9 kg, carbon allocation 0.4446 kg

## Inputs from technosphere
- municipal solid waste: -0.0007 kg; name a_msw; lognormal variance with pedigree 0.0413, pedigree (2,3,5,3,1)
  Average swedish data from SE-EPA
  EcoSpold01Location=CH
  Uncertainty: average swedish data from SE-EPA
  production volume 95130 kg; = a_msw*apv
    Calculated from the production volume of chemi-thermomechanical pulp in proportion to the respective output amounts.
  properties: dry mass 0.771 kg, wet mass 1 kg, carbon content, non-fossil 0.261655, water content 0.297017, carbon content, fossil 0.171549, heating value, net 11.74 MJ
  note on carbon content, non-fossil: MSW composition in tab 4.1, ecoinvent v2.2 report 13_I. C content referred to 1 kg DM
  note on heating value, net: Value taken from the general comment of the treatment dataset.
- hydrogen peroxide, without water, in 50% solution state: 0.025 kg; lognormal variance with pedigree 0.0421, pedigree (1,4,5,3,1)
  Data from 1 scandinavian mill
  EcoSpold01Location=RER
  Uncertainty: data from 1 scandinavian mill
  properties: wet mass 1 kg, dry mass 1 kg, heating value, net 7.13 MJ
- waste textile, soiled: -0.00468 kg; name a_wtex; lognormal variance with pedigree 0.0413, pedigree (2,3,5,3,1)
  EcoSpold01Location=CH
  Average swedish data from SE-EPA
  Uncertainty: average swedish data from SE-EPA
  production volume 636012 kg; = a_wtex*apv
    (same comment as for municipal solid waste)
  property price 0 EUR2005; name a_wtex_price_EUR2005
  properties: water content 0.333333, carbon content, non-fossil 0.570519, wet mass 1 kg, dry mass 0.75 kg, heating value, net 14.45 MJ
  note on carbon content, non-fossil: C content of 1 kg DM was calculated after data in Tab A.4, ecoinvent v2.2 report 13_I,
- waste graphical paper: -0.0144 kg; name a_wgp; lognormal variance with pedigree 0.0413, pedigree (2,3,5,3,1)
  (same comment as for waste textile, soiled)
  production volume 1.95696e6 kg; = a_wgp*apv
    (same comment as for municipal solid waste)
  property price 0 EUR2005; name a_wgp_price_EUR2005
  properties: heating value, net 14.12 MJ, carbon content, non-fossil 0.454955, dry mass 0.888 kg, wet mass 1 kg, water content 0.126126
- sodium silicate, spray powder, 80%: 0.019 kg; lognormal variance with pedigree 0.0421, pedigree (1,4,5,3,1)
  (same comment as for hydrogen peroxide, without water, in 50% solution state)
  properties: wet mass 1 kg, dry mass 1 kg
- pulp factory: 5e-11 unit; lognormal variance with pedigree 0.448, pedigree (4,5,5,5,5)
  Own assumption;activityLink introduced to establish a direct link to the corresponding regional supply of this product
  EcoSpold01Location=RER
  Uncertainty: own assumption
- sulfite: 0.025 kg; lognormal variance with pedigree 0.0421, pedigree (1,4,5,3,1)
  (same comment as for hydrogen peroxide, without water, in 50% solution state)
  properties: wet mass 1 kg, dry mass 1 kg
- EDTA, ethylenediaminetetraacetic acid: 0.002 kg; lognormal variance with pedigree 0.0421, pedigree (1,4,5,3,1)
  EcoSpold01Location=RER
  Data from 1 scandinavian mill
  Uncertainty: data from 1 scandinavian mill
  properties: carbon content, fossil 0.410959, wet mass 1 kg, dry mass 1 kg, heating value, net 19.09 MJ
- scrap steel: 0 kg; name a_ssteel; pedigree (1,1,1,1,1)
  (same comment as for municipal solid waste)
  production volume 0 kg
    (same comment as for municipal solid waste)
  property price 0 EUR2005; name a_ssteel_price_EUR2005
  properties: wet mass 1 kg, dry mass 1 kg
- waste plastic, mixture: -0.0454 kg; name a_wpm; lognormal variance with pedigree 0.0413, pedigree (2,3,5,3,1)
  (same comment as for municipal solid waste)
  production volume 6.16986e6 kg; = a_wpm*apv
    (same comment as for municipal solid waste)
  property price 0 EUR2005; name a_wpm_price_EUR2005
  properties: water content 0.180638, heating value, net 30.79 MJ, carbon content, fossil 0.747344, dry mass 0.847 kg, wet mass 1 kg
  note on carbon content, fossil: C content in 1 kg DM was calculated using data in Tab A.2, ecoinvent v2.2 report 13_I
- waste wood, untreated: -0.45252 kg; name a_ww; = (0.00252 + 0.45)*-1; lognormal variance with pedigree 0.0413, pedigree (2,3,5,3,1)
  Average swedish data from SE-EPA (0.00252) + 0.45 to balance the wood input.
  EcoSpold01Location=CH
  Uncertainty: average swedish data from SE-EPA
  production volume 6.14975e7 kg; = a_ww*apv
    (same comment as for municipal solid waste)
  property price 0 EUR2005; name a_ww_price_EUR2005
  properties: wet mass 1 kg, water content 0.25, dry mass 0.8 kg, carbon content, non-fossil 0.48632, heating value, net 13.99 MJ
  note on carbon content, non-fossil: Tab A.4, ecoinvent v2.2 report 13_I. C content has been referred to 1 kg DM,
- chemical, inorganic: 0.001 kg; lognormal variance with pedigree 0.0421, pedigree (1,4,5,3,1)
  Data from 1 scandinavian mill
  EcoSpold01Location=GLO
  Uncertainty: data from 1 scandinavian mill
  properties: wet mass 1 kg, dry mass 1 kg, carbon content, fossil 0.003
  note on carbon content, fossil: This dataset is an unweighted average of 20 inorganic substances (listed in Tab 88.1, ecoinvent v2.2 report 8, part II), being part of the top100 chemicals included in this database. The C-content has also been calculated as an unweighted average of the C content of the substances composing this dataset.
- electricity, medium voltage: 1.934 kWh; lognormal variance with pedigree 0.0407, pedigree (1,3,5,3,1)
  EcoSpold01Location=NORDEL
  Average from SE-EPA and CER of 2 mills
  Uncertainty: average from SE-EPA and CER of 2 mills
- heat, district or industrial, natural gas: 0.21375 MJ; lognormal variance with pedigree 0.0407, pedigree (1,3,5,3,1)
  Average from SE-EPA and CER of 2 mills
  EcoSpold01Location=RER
  Uncertainty: average from SE-EPA and CER of 2 mills
  properties: heating value, net 1 MJ
- wood ash mixture, pure: 0 kg; name a_woodash; pedigree (1,1,1,1,1)
  (same comment as for waste textile, soiled)
  production volume 0 kg
    (same comment as for municipal solid waste)
  property price 0 EUR2005; name a_woodash_price_EUR2005
  properties: wet mass 1 kg, dry mass 1 kg, carbon content, non-fossil 0.012
- residual softwood, wet: 0.003087 m3; lognormal variance with pedigree 0.0407, pedigree (1,3,5,3,1)
  EcoSpold01Location=RER
  Average from CER of 2 scandinavian mills
  Uncertainty: average from CER of 2 scandinavian mills
  properties: dry mass 450 kg, heating value, net 5962.7 MJ, water content 0.7, wet mass 765 kg, carbon content, non-fossil 0.494
  note on carbon content, non-fossil: C content of dry mass is 0.494 kgC/kg dry wood (ecoinvent v2.2 report 9)
- heat, district or industrial, other than natural gas: 1.23411 MJ; lognormal variance with pedigree 0.0407, pedigree (1,3,5,3,1)
  EcoSpold01Location=RER
  Average from SE-EPA and CER of 2 mills
  Uncertainty: average from SE-EPA and CER of 2 mills
  properties: heating value, net 1 MJ
- scrap steel: -0.00503362, -6.37742e-6 kg (2 entries); lognormal variance with pedigree 0.0413, pedigree (2,3,5,3,1)
  (same comment as for municipal solid waste)
  production volume 684936 kg
- wood ash mixture, pure: -0.00394883, -8.11739e-5 kg (2 entries); lognormal variance with pedigree 0.0413, pedigree (2,3,5,3,1)
  (same comment as for waste textile, soiled)
  production volume 547677 kg

## Inputs from nature
- Water, unspecified natural origin [natural resource, in water]: 0.02 m3; name water_UNO_input; lognormal variance with pedigree 0.0407, pedigree (1,3,5,3,1)
  Average from SE-EPA and CER of 2 mills
  Uncertainty: average from SE-EPA and CER of 2 mills

## Emissions to nature
- DOC, Dissolved Organic Carbon [water, surface water]: 0.00607407 kg; lognormal variance with pedigree 0.0807, pedigree (1,3,5,3,1)
  Calculated as equal to TOC.
  Uncertainty: average from SE-EPA and CER of 1 mill
- TOC, Total Organic Carbon [water, surface water]: 0.00607407 kg; lognormal variance with pedigree 0.0807, pedigree (1,3,5,3,1)
  Calculated by default as TOC (gC) = COD/2.7 (COD measured in g O2). Should more correctly be calculated from the carbon content of the specified emissions to water.
  Uncertainty: average from SE-EPA and CER of 1 mill
- Water [air, unspecified]: 0.003 m3; name water_to_air_unspecified; = (water_UNO_input*fraction_PW_to_air); lognormal variance with pedigree 0.0807, pedigree (2,2,5,1,1)
  Calculated value based on literature values and expert opinion. See comments in the parametres' comment field.
  property fraction, origin: salt water 0; name fraction_origin_salt_water
  property fraction, origin: fresh water 0; name fraction_origin_fresh_water
  property fraction, origin: unspecified 1; name fraction_origin_unspecified
- BOD5, Biological Oxygen Demand [water, surface water]: 0.00249 kg; lognormal variance with pedigree 0.0807, pedigree (1,3,5,3,1)
  Average from SE-EPA and CER of 1 mill
  Uncertainty: average from SE-EPA and CER of 1 mill
- Nitrogen oxides [air, urban air close to ground]: 0.0002 kg; lognormal variance with pedigree 0.0813, pedigree (2,3,5,3,1)
  Average swedish data from SE-EPA
  Uncertainty: average swedish data from SE-EPA
- Phosphorus [water, surface water]: 1e-5 kg; lognormal variance with pedigree 0.0807, pedigree (1,3,5,3,1)
  Average from SE-EPA and CER of 1 mill
  Uncertainty: average from SE-EPA and CER of 1 mill
- Nitrogen [water, surface water]: 0.0004 kg; lognormal variance with pedigree 0.0807, pedigree (1,3,5,3,1)
  Average from SE-EPA and CER of 1 mill
  Uncertainty: average from SE-EPA and CER of 1 mill
- Sulfur dioxide [air, urban air close to ground]: 1e-5 kg; lognormal variance with pedigree 0.0413, pedigree (2,3,5,3,1)
  Average swedish data from SE-EPA
  Uncertainty: average swedish data from SE-EPA
- Water [water, unspecified]: 0.017 m3; name water_to_water_unspecified; = water_UNO_input*(1-fraction_PW_to_air); lognormal variance with pedigree 0.0807, pedigree (2,2,5,1,1)
  (same comment as for Water)
  property dry mass 0 kg; name DM
  property wet mass 1000 kg; name WM
  property water in wet mass 1000 kg; name WWM
  property carbon content, non-fossil 0; name C_content_non_fossil
  property fraction, origin: salt water 0; name fraction_origin_salt_water_Ww
  property fraction, origin: fresh water 0; name fraction_origin_fresh_water_Ww
  property carbon content, fossil 0; name C_content_fossil
  property fraction, origin: unspecified 1; name fraction_origin_unspecified_Ww
- COD, Chemical Oxygen Demand [water, surface water]: 0.0164 kg; lognormal variance with pedigree 0.0807, pedigree (1,3,5,3,1)
  Average from SE-EPA and CER of 1 mill
  Uncertainty: average from SE-EPA and CER of 1 mill
- Suspended solids, unspecified [water, surface water]: 0.00096 kg; lognormal variance with pedigree 0.0807, pedigree (1,3,5,3,1)
  Average from SE-EPA and CER of 1 mill
  Uncertainty: average from SE-EPA and CER of 1 mill

## Sampling procedure
Data were collected from literature and industry data.

## Extrapolations
This dataset has been extrapolated from year 2000 to the year of the calculation (2021). The uncertainty has been adjusted accordingly.

## Review by Hans-Jörg Althaus 2003-08-06
Passed
