# shed construction, large, wood, non-insulated, fire-unprotected

Dataset: EcoSpold 2, unit process
Geography: CH
Time period: 2009-01-01 to 2021-12-31
Technology level: current
Classification: ISIC rev.4 ecoinvent: 4100:Construction of buildings
Tags: WFLDB
Scenario: Business-as-Usual
System model: Allocation, cut-off by classification
Generated by: Rita Schulze
Published in: Nemecek T. 2015
Database: ecoinvent
isCopyrightProtected: true
accessRestrictedTo: 1

## General comment
This dataset represents the construction material of 1 m2 useable surface of a not flame resistant shed, not to be used as a garage for motor vehicles.
Features of the model used: Building volume: 1478 m3; Useable space: 264 m2; Service life span: 50 years. Fire-unprotected: Ceiling with flammable material, thus not to be used as a garage for combustion engine; non-insulated: simple construction of wooden walls without insulation material; light basement with concrete.
This dataset refers to an average situation; for specific situations exchanges might differ substantially due to site specific parameters.

## Included activities start
The activity starts with the construction of the building.

## Included activities end
Elements included are: 3-sided closed shed, not flame-resistant, concrete floor, non insulated wood construction. Not included: flame-resistant garage component. The activity ends with the disposal of the building material.

## Technology
The calculation of the construction materials employed is based on Agroscope PBK+ (Modular Construction Standards for Farm Building Costs +) System (Dux 2004). Based on construction variants for model buildings, the necessary building materials for construction, repair and replacement are calculated with the aid of the PBK+ database. In addition, the consumption of energy and auxiliary materials during operation of the building can be determined.

## Parameters
- LUC_crop_specific: 1 dimensionless
  This parameter allows to switch between a 'crop specific' and a 'country specific' approach when calculating the LUC of a crop. By default, the chosen approach is 'crop specific', so the value of the parameter is 1. If you want to apply a 'country specific' approach, turn the parameter to 0.

## Reference product
- shed, large, wood, non-insulated, fire-unprotected: 1 m2; name RP_amount_1; CPC 53121: Industrial buildings; By-product classification allocatable product
  1 m2 usable suface
  production volume 307945 m2; name RP_PV_1
    Assumption: one shed (264m2) per farm, 50 years lifetime, 58'323 farms in CH
  property price 117.521 EUR2005
    Calculated based on inputs: The price of the product has been calculated as a sum of the values of the material and energy inputs for this product. This value is therefore a rough estimation. It may underestimate the real price since there are additional expenses when producing any product. These expences can include for example labour costs, treatment of waste materials and profit for the producer. Please consider carefully whether this level of data quality is acceptable for your application.
  properties: Surface 264 m2, lifetime 50 year

## Inputs from technosphere
- reinforcing steel: 7.5568 kg; lognormal variance with pedigree 0.0441216, pedigree (1,2,4,1,1)
  Corresponds to 99'749.76kg for the whole building with 50 years life time, 264 m2 usable space and 1478 m3 volume.
  properties: carbon content, fossil 0.004, dry mass 1 kg, wet mass 1 kg
- excavation, hydraulic digger: 0.34871 m3; lognormal variance with pedigree 0.0441216, pedigree (1,2,4,1,1)
  Corresponds to 4'602.97m3 for the whole building with 50 years life time, 264 m2 usable space and 1478 m3 volume.
- waste polyethylene: -0.026802 kg; lognormal variance with pedigree 0.0441216, pedigree (1,2,4,1,1)
  production volume 8250 kg
    Calculated from reference product production volume, reference product amount and byproduct amount.
  properties: wet mass 1 kg, dry mass 0.996 kg, water content 0.00401606, carbon content, fossil 0.825301, heating value, net 42.47 MJ
  note on heating value, net: Value taken from the general comment of the treatment dataset.
- sawnwood, softwood, dried (u=20%), planed: 0.16644 m3; lognormal variance with pedigree 0.0441216, pedigree (1,2,4,1,1)
  Corresponds to 2'197m3 for the whole building with 50 years life time, 264 m2 usable space and 1478 m3 volume.
  properties: water content 0.2, carbon content, non-fossil 0.494, wet mass 540 kg, dry mass 450 kg, heating value, net 6514.84 MJ
- fibre cement facing tile: 38.346 kg; lognormal variance with pedigree 0.0441216, pedigree (1,2,4,1,1)
  Corresponds to 506'167.2kg for the whole building with 50 years life time, 264 m2 usable space and 1478 m3 volume.
  properties: carbon content, fossil 0.0201818, carbon content, non-fossil 0.0115, dry mass 1 kg, wet mass 1 kg
- waste building wood, chrome preserved: -33.177 kg; lognormal variance with pedigree 0.0441216, pedigree (1,2,4,1,1)
  Corresponds to 437'936.4kg from the whole building with 50 years life time, 264 m2 usable space and 1478 m3 volume.
  production volume 1.02e7 kg
    (same comment as for waste polyethylene)
  properties: water content 0.25, carbon content, non-fossil 0.5, dry mass 0.8 kg, heating value, net 11.63 MJ, wet mass 1 kg
- sheet rolling, copper: 0.62058 kg; lognormal variance with pedigree 0.0441216, pedigree (1,2,4,1,1)
  Corresponds to 8'191.66kg for the whole building with 50 years life time, 264 m2 usable space and 1478 m3 volume.
- extrusion, plastic pipes: 0.026802 kg; lognormal variance with pedigree 0.0441216, pedigree (1,2,4,1,1)
  activityLink introduced to establish a direct link to the corresponding regional supply of this product
- waste wood, untreated: -56.7006 kg; lognormal variance with pedigree 0.0441216, pedigree (1,2,4,1,1)
  Corresponds to 748'447.92kg from the whole building with 50 years life time, 264 m2 usable space and 1478 m3 volume.
  production volume 1.74607e7 kg
    Calculated from the reference product amount and production volume
  properties: carbon content, non-fossil 0.48632, dry mass 0.8 kg, wet mass 1 kg, water content 0.25, heating value, net 13.99 MJ
- cast iron: 0.49245 kg; lognormal variance with pedigree 0.0441216, pedigree (1,2,4,1,1)
  Corresponds to 6'500.34kg for the whole building with 50 years life time, 264 m2 usable space and 1478 m3 volume.
  properties: carbon content, fossil 0.04, wet mass 1 kg, dry mass 1 kg
- zinc coat, pieces: 0.034213 m2; lognormal variance with pedigree 0.0441216, pedigree (1,2,4,1,1)
  Corresponds to 451.61m2 for the whole building with 50 years life time, 264 m2 usable space and 1478 m3 volume.
- fibre cement roof slate: 6.732 kg; lognormal variance with pedigree 0.0441216, pedigree (1,2,4,1,1)
  Corresponds to 88'862.4kg for the whole building with 50 years life time, 264 m2 usable space and 1478 m3 volume.
  properties: wet mass 1 kg, carbon content, fossil 0.0141818, dry mass 1 kg, carbon content, non-fossil 0.01288
- scrap copper: -0.62058 kg; name BP_amount_1
  Corresponds to 8191.66kg from the whole building with 50 years life time, 264 m2 usable space and 1478 m3 volume.
  production volume 191105 kg; = RP_PV_1 * (BP_amount_1 / RP_amount_1)
    Calculated from production volume of reference product using the relative outputs.
  property price 0 EUR2005; name BP_amount_1_price_EUR2005
  properties: wet mass 1 kg, dry mass 1 kg
- concrete, normal: 0.26527 m3; lognormal variance with pedigree 0.0441216, pedigree (1,2,4,1,1)
  Corresponds to 3'501.56m3 for the whole building with 50 years life time, 264 m2 usable space and 1478 m3 volume.
  properties: wet mass 2380 kg, dry mass 2190 kg, water content 0.086758
- waste brick: -45.078 kg; lognormal variance with pedigree 0.0441216, pedigree (1,2,4,1,1)
  Corresponds to 595'029.6kg from the whole building with 50 years life time, 264 m2 usable space and 1478 m3 volume.
  production volume 1.39e7 kg
    (same comment as for waste polyethylene)
  properties: wet mass 1 kg, dry mass 1 kg
- gravel, round: 369.84 kg; lognormal variance with pedigree 0.0441216, pedigree (1,2,4,1,1)
  Corresponds to 4'881'888kg for the whole building with 50 years life time, 264 m2 usable space and 1478 m3 volume. After the demolition of the shed, the gravel stays in the ground.
  properties: dry mass 1 kg, wet mass 1 kg
- copper, cathode: 0.62058 kg; lognormal variance with pedigree 0.0441216, pedigree (1,2,4,1,1)
  (same comment as for sheet rolling, copper)
  properties: dry mass 1 kg, wet mass 1 kg
- waste bulk iron, excluding reinforcement: -0.49245 kg; lognormal variance with pedigree 0.0441216, pedigree (1,2,4,1,1)
  Corresponds to 6500.34kg from the whole building with 50 years life time, 264 m2 usable space and 1478 m3 volume.
  production volume 152000 kg
    (same comment as for waste polyethylene)
  properties: dry mass 1 kg, wet mass 1 kg
- polyethylene, high density, granulate: 0.026802 kg; lognormal variance with pedigree 0.0441216, pedigree (1,2,4,1,1)
  properties: heating value, net 42.47 MJ, wet mass 1 kg, carbon content, fossil 0.857143, dry mass 1 kg
- electricity, low voltage: 2.4147 kWh; lognormal variance with pedigree 0.0551992, pedigree (3,2,4,1,1)
  Corresponds to 31'874.04kWh for the whole building with 50 years life time, 264 m2 usable space and 1478 m3 volume.
- waste concrete, not reinforced: -15.547 kg; lognormal variance with pedigree 0.0441216, pedigree (1,2,4,1,1)
  Corresponds to 205'220.4kg from the whole building with 50 years life time, 264 m2 usable space and 1478 m3 volume.
  production volume 4.79e6 kg
    (same comment as for waste polyethylene)
  properties: dry mass 1 kg, wet mass 1 kg
- lean concrete: 0.0070667 m3; lognormal variance with pedigree 0.0441216, pedigree (1,2,4,1,1)
  properties: water content 0.0528846, dry mass 2080 kg, wet mass 2190 kg
- excavation, skid-steer loader: 0.010945 m3; lognormal variance with pedigree 0.0441216, pedigree (1,2,4,1,1)
  Corresponds to 144.47m3 for the whole building with 50 years life time, 264 m2 usable space and 1478 m3 volume.;activityLink introduced to establish a direct link to the corresponding regional supply of this product
- waste reinforced concrete: -638.828 kg; lognormal variance with pedigree 0.0441216, pedigree (1,2,4,1,1)
  Corresponds to 8'432'535.84kg from the whole building with 50 years life time, 264 m2 usable space and 1478 m3 volume.
  production volume 1.97e8 kg
    (same comment as for waste polyethylene)
  properties: dry mass 0.99418 kg, water content 0.00585407, wet mass 1 kg

## Emissions to nature
- Heat, waste [air, non-urban air or from high stacks]: 8.6931 MJ; lognormal variance with pedigree 0.0104805, pedigree (1,2,4,1,1)
  Corresponds to 114'748.92MJ from the whole building with 50 years life time, 264 m2 usable space and 1478 m3 volume.

## Sampling procedure
This process is identical with the SALCA-process 'Shed, large, wood, non-insulated, fire-unprotected, at farm/m2/CH/I U' excluding land occupation and transformation processes .

## Extrapolations
This dataset has been extrapolated from year 2012 to the year of the calculation (2021). The uncertainty has been adjusted accordingly.
