# aluminium ingot, primary, to aluminium, wrought alloy market

Dataset: EcoSpold 2, unit process
Geography: GLO
Time period: 2015-01-01 to 2021-12-31
Technology level: current
Classification: ISIC rev.4 ecoinvent: 2420:Manufacture of basic precious and other non-ferrous metals
Scenario: Business-as-Usual
System model: Allocation, cut-off by classification
Share of production covered: 100 %
Generated by: Linlin Wu
Database: ecoinvent
isCopyrightProtected: true
accessRestrictedTo: 1

## General comment
Re-labelling activity to account for the fraction of globally produced primary aluminium used as wrought alloy.

## Reference product
- aluminium, wrought alloy: 1 kg; By-product classification allocatable product; CPC 4153: Semi-finished products of aluminium or aluminium alloys
  production volume 4.817e10 kg
    Based on International Aluminium Institute data on the relative share of primary aluminium in wrought alloy, the toal amount of wrought alloy produced globally, and the total amount of primary aluminium ingots produced globally.
  property price 1.44 EUR2005
    Estimated based on literature values and expert judgement. Aluminium ccast alloys are about 90% of the price of aluminium wrought alloys.
  property wet mass 1 kg; name WM
  property dry mass 1 kg; name DM
  property carbon content, non-fossil 0; name C_content_non_fossil
  property water in wet mass 0 kg; name WWM
  property water content 0; name water_content
  property carbon content, fossil 0; name C_content_fossil
  property carbon content 0
    carbon content on a dry matter basis (reserved; not for manual entry)
  properties: carbon allocation 0 kg

## Inputs from technosphere
- aluminium, primary, ingot: 0, 0.776995, 0.0819209, 0.141084 kg (4 entries)
  properties: dry mass 1 kg, wet mass 1 kg

## Sampling procedure
Literature

## Extrapolations
This dataset has been extrapolated from year 2015 to the year of the calculation (2021). The uncertainty has been adjusted accordingly.
