# air compressor production, screw-type compressor, 4kW

Dataset: EcoSpold 2, unit process
Geography: RER
Time period: 2006-01-01 to 2021-12-31
Technology level: current
Classification: ISIC rev.4 ecoinvent: 2813:Manufacture of other pumps, compressors, taps and valves
Classification: EcoSpold01Categories: mechanical engineering/compressed air equipment
Tags: ConvertedDataset
Scenario: Business-as-Usual
System model: Allocation, cut-off by classification
Share of production covered: 0 %
Generated by: Roland Steiner
Published in: Steiner, R. 2007
Database: ecoinvent
isCopyrightProtected: true
accessRestrictedTo: 1

## General comment
The weight of the compressor is 140 kg
[This dataset was already contained in the ecoinvent database version 2. It was not individually updated during the transfer to ecoinvent version 3. Life Cycle Impact Assessment results may still have changed, as they are affected by changes in the supply chain, i.e. in other datasets. This dataset was generated following the ecoinvent quality guidelines for version 2. It may have been subject to central changes described in the ecoinvent version 3 change report (http://www.ecoinvent.org/database/ecoinvent-version-3/reports-of-changes/), and the results of the central updates were reviewed extensively. The changes added e.g. consistent water flows and other information throughout the database. The documentation of this dataset can be found in the ecoinvent reports of version 2, which are still available via the ecoinvent website. The change report linked above covers all central changes that were made during the conversion process.]

## Included activities end
This dataset includes the materials and machining processes needed to produce a compressor. The disposal is also included.

## Geography
Geographical coverage encompasses the industrialised countries.

## Technology
Average technology

## Reference product
- air compressor, screw-type compressor, 4kW: 1 unit; name RP; CPC 43230: Air or vacuum pumps; air or other gas compressors; By-product classification allocatable product
  EcoSpold01Location=RER
  production volume 1.32237 unit; name PV_RP
    This is a placeholder value that does not reflect real-world production volumes. This dataset does not currently require a real-world production volume to work in the database framework, and no actual data were collected yet. This has no negative effect on the results of the ecoinvent database. The placeholder value of this activity was scaled according to the nominal GDP of 2005 (source: United Nations, http://data.un.org/Glossary.aspx?q=GDP+%28current+US%24%29, accessed 20130726) to reflect an appropriate share of the global production volume, which is also a placeholder value.
  property price 283.904 EUR2005
    Calculated based on inputs: The price of the product has been calculated as a sum of the values of the material and energy inputs for this product. This value is therefore a rough estimation. It may underestimate the real price since there are additional expenses when producing any product. These expences can include for example labour costs, treatment of waste materials and profit for the producer. Please consider carefully whether this level of data quality is acceptable for your application.

## By-products
- aluminium scrap, post-consumer: 0 kg; CPC 39363: Waste and scrap of aluminium; By-product classification Recyclable; pedigree (1,1,1,1,1)
  Waste generated through dismantling of the compressor. Based on the amount of the corresponding material inputs. For aluminium and steel a 90% recycling rate was assumed.
  Uncertainty: assumption
  production volume 0 kg; = abs((BP_alu_scrap/RP)*PV_RP)
    Calculated from production volume of reference product using the relative outputs.
  property price 0.685 EUR2005; name BP_alu_scrap_price_EUR2005
    Temporary price data. Calculated as 90% of purchasers price based on: estimated at 85% of new scrap
  property carbon content 0
    carbon content on a dry matter basis (reserved; not for manual entry)
  properties: water content 0, carbon content, fossil 0, carbon content, non-fossil 0, dry mass 1 kg, wet mass 1 kg, water in wet mass 0 kg, carbon allocation 0 kg
- copper scrap, sorted, pressed: 0 kg; CPC 39361: Waste and scrap of copper; By-product classification Recyclable; pedigree (1,1,1,1,1)
  Waste generated through dismantling of the compressor. Based on the amount of the corresponding material inputs.
  Uncertainty: assumption
  production volume 0 kg; = abs((BP_copper/RP)*PV_RP)
    Calculated from production volume of reference product using the relative outputs.
  property price 2.84 EUR2005; name BP_copper_price_EUR2005
    Temporary price data. Calculated as 90% of purchasers price based on: Source: USGS Mineral Yearbook 2007, Table 1 in <http://minerals.usgs.gov/minerals/pubs/commodity/recycle/myb1-2007-recyc.pdf>
  property carbon content 0
    carbon content on a dry matter basis (reserved; not for manual entry)
  properties: water in wet mass 0 kg, wet mass 1 kg, dry mass 1 kg, carbon content, fossil 0, water content 0, carbon content, non-fossil 0, carbon allocation 0 kg
- iron scrap, unsorted: 0 kg; CPC 39310: Slag, dross, scalings and other waste from the manufacture of iron or steel; By-product classification Recyclable; pedigree (1,1,1,1,1)
  (same comment as for aluminium scrap, post-consumer)
  production volume 0 kg; = abs((BP_iron_scrap/RP)*PV_RP)
    Calculated from production volume of reference product using the relative outputs.
  property price 0.149 EUR2005; name BP_iron_scrap_price_EUR2005
    Temporary price data. Calculated as 90% of purchasers price based on: estimated at 85% of sorted scrap
  property carbon content 0
    carbon content on a dry matter basis (reserved; not for manual entry)
  properties: wet mass 1 kg, carbon content, non-fossil 0, dry mass 1 kg, water in wet mass 0 kg, water content 0, carbon content, fossil 0, carbon allocation 0 kg

## Inputs from technosphere
- polystyrene, high impact: 10 kg; lognormal variance with pedigree 0.0521, pedigree (1,4,5,3,1)
  EcoSpold01Location=RER
  Manufacturer data
  Uncertainty: manufacturer data
  properties: carbon content, fossil 0.923077, wet mass 1 kg, dry mass 1 kg, heating value, net 38.67 MJ
  note on carbon content, fossil: Chemical formula of polystyrene is (C8H8)n (ecoinvent v2.2 report 11_II)
- steel, chromium steel 18/8, hot rolled: 16 kg; name steel_chrom; lognormal variance with pedigree 0.0521, pedigree (1,4,5,3,1)
  Manufacturer data
  EcoSpold01Location=RER
  Uncertainty: manufacturer data
  properties: dry mass 1 kg, carbon content, fossil 0.0008, wet mass 1 kg
  note on carbon content, fossil: Stainless steel model is the grade 304 steel (18/8 stainless, 18% chromium 8% nickel; max. 0.08% C)
- synthetic rubber: 3 kg; lognormal variance with pedigree 0.0521, pedigree (1,4,5,3,1)
  Manufacturer data
  EcoSpold01Location=RER
  Uncertainty: manufacturer data
  properties: wet mass 1 kg, dry mass 1 kg, carbon content, fossil 0.871949, heating value, net 26.42 MJ
  note on carbon content, fossil: EPDM (Ethylene-propene-diene terpolymer) rubber is a terpolymer of ethylene, propene, and a diene with the residual unsaturated portion of the diene in the side chain (ecoinvent v2.2 report 7-part XX & Ullmann). Chemical formula (deduced from Evidences of Solvent-Induced Miscibility in Polychloroprene-co-Ethylene-Propene Diene Terpolymer Blends, Dubey et al., Journal of Applied Polymer Science, 2009, 111:1884–1891): C20H35
- waste polystyrene: -10 kg; name BP_polystyrene; lognormal variance with pedigree 0.0586, pedigree (4,3,5,1,1)
  EcoSpold01Location=CH
  Assumption
  Uncertainty: assumption
  production volume 13.2237 kg; = abs((BP_polystyrene/RP)*PV_RP)
    Calculated from the production volume of air compressor, screw-type compressor, 4 kW in proportion to the respective output amounts.
  property price 0 EUR2005; name BP_polystyrene_price_EUR2005
  properties: heating value, net 38.67 MJ, dry mass 0.998 kg, water content 0.00200401, carbon content, fossil 0.922579, wet mass 1 kg
  note on heating value, net: Value taken from the general comment of the treatment dataset.
- injection moulding: 10 kg; lognormal variance with pedigree 0.0586, pedigree (4,3,5,1,1)
  Estimation
  EcoSpold01Location=RER
  Uncertainty: estimation
- printed wiring board, surface mounted, unspecified, Pb free: 0.1255 kg; = 0.251*0.5; lognormal variance with pedigree 0.0521, pedigree (1,4,5,3,1)
  manufacturer data
  This original value from production mix has been replaced by 2 flows. Each has 50% share in the production mix.
  Uncertainty: manufacturer data
  properties: wet mass 1 kg, carbon content, fossil 0.132522, dry mass 1 kg
- sheet rolling, aluminium: 20 kg; lognormal variance with pedigree 0.0586, pedigree (4,3,5,1,1)
  EcoSpold01Location=RER
  Estimation
  Uncertainty: estimation
- waste aluminium: -2 kg; name BP_alu_waste; = ((alu_cast + alu_wrought)*0.1)*-1; lognormal variance with pedigree 0.0586, pedigree (4,3,5,1,1)
  (same comment as for aluminium scrap, post-consumer)
  production volume 2.64474 kg; = abs((BP_alu_waste/RP)*PV_RP)
    Calculated from production volume of reference product using the relative outputs.
  property price 0 EUR2005; name BP_alu_waste_price_EUR2005
  properties: dry mass 1 kg, wet mass 1 kg
- wire drawing, copper: 20 kg; lognormal variance with pedigree 0.0586, pedigree (4,3,5,1,1)
  Estimation
  EcoSpold01Location=RER
  Uncertainty: estimation
- copper, cathode: 20 kg; name copper; lognormal variance with pedigree 0.0521, pedigree (1,4,5,3,1)
  EcoSpold01Location=RER
  Manufacturer data
  Uncertainty: manufacturer data
  properties: dry mass 1 kg, wet mass 1 kg
- cast iron: 30 kg; name iron; lognormal variance with pedigree 0.0521, pedigree (1,4,5,3,1)
  EcoSpold01Location=RER
  Manufacturer data
  Uncertainty: manufacturer data
  properties: wet mass 1 kg, dry mass 1 kg, carbon content, fossil 0.04
  note on carbon content, fossil: Cast iron is made by remelting pig iron in small furnaces (e.g. cupola furnaces or electric arc furnaces) and poured into moulds to make castings. It usually contains 2% to 6% carbon (ecoinvent v2.2 report 10_partII). An average content of 4% was considered
- sheet rolling, chromium steel: 16 kg; lognormal variance with pedigree 0.0521, pedigree (1,4,5,3,1)
  EcoSpold01Location=RER
  Manufacturer data
  Uncertainty: manufacturer data
- waste rubber, unspecified: 0 kg; name BP_rubber; pedigree (1,1,1,1,1)
  EcoSpold01Location=CH
  Assumption
  Uncertainty: assumption
  production volume 0 kg
    (same comment as for waste polystyrene)
  property price 0 EUR2005; name BP_rubber_price_EUR2005
  properties: wet mass 1 kg, dry mass 1 kg, carbon content, fossil 0.853, heating value, net 27.19 MJ
- sheet rolling, steel: 40 kg; lognormal variance with pedigree 0.0521, pedigree (1,4,5,3,1)
  EcoSpold01Location=RER
  Manufacturer data
  Uncertainty: manufacturer data
- aluminium, cast alloy: 6.4 kg; name alu_cast; = 20*0.32; lognormal variance with pedigree 0.0521, pedigree (1,4,5,3,1)
  manufacturer data
  The original flow from production mix has been replaced by 2 flows. aluminium cast alloy with share 0.32 and aluminium wrought alloy with share 0.68.
  Uncertainty: manufacturer data
  properties: wet mass 1 kg, dry mass 1 kg
- steel, low-alloyed, hot rolled: 40 kg; name steel_low; lognormal variance with pedigree 0.0521, pedigree (1,4,5,3,1)
  EcoSpold01Location=RER
  Manufacturer data
  Uncertainty: manufacturer data
  properties: carbon content, fossil 0.005, wet mass 1 kg, dry mass 1 kg
  note on carbon content, fossil: Low alloyed steel composition given in Tab. 3.2 ecoinvent v2.2 report 10_partII. Steel assumed to have a C content of 0.5%
- printed wiring board, surface mounted, unspecified, Pb containing: 0.1255 kg; = 0.251*0.5; lognormal variance with pedigree 0.0521, pedigree (1,4,5,3,1)
  (same comment as for printed wiring board, surface mounted, unspecified, Pb free)
  properties: carbon content, fossil 0.132522, wet mass 1 kg, dry mass 1 kg
- aluminium, wrought alloy: 13.6 kg; name alu_wrought; = 20*0.68; lognormal variance with pedigree 0.0521, pedigree (1,4,5,3,1)
  (same comment as for aluminium, cast alloy)
  properties: dry mass 1 kg, wet mass 1 kg
- scrap steel: 0 kg; name BP_scrap_steel; pedigree (1,1,1,1,1)
  (same comment as for aluminium scrap, post-consumer)
  production volume 0 kg
    Calculated from production volume of reference product using the relative outputs.
  property price 0 EUR2005; name BP_scrap_steel_price_EUR2005
  properties: wet mass 1 kg, dry mass 1 kg
- aluminium scrap, post-consumer: -18 kg; lognormal variance with pedigree 0.0586, pedigree (4,3,5,1,1)
  (same comment as for aluminium scrap, post-consumer)
  production volume 23.8026 kg
  properties: dry mass 1 kg, wet mass 1 kg
- copper scrap, sorted, pressed: -20 kg; lognormal variance with pedigree 0.0586, pedigree (4,3,5,1,1)
  (same comment as for copper scrap, sorted, pressed)
  production volume 26.4474 kg
  properties: wet mass 1 kg, dry mass 1 kg
- iron scrap, unsorted: -50.4 kg; lognormal variance with pedigree 0.0586, pedigree (4,3,5,1,1)
  (same comment as for aluminium scrap, post-consumer)
  production volume 66.6474 kg
  properties: wet mass 1 kg, dry mass 1 kg
- waste rubber, unspecified: -2.87913, -0.120866 kg (2 entries); lognormal variance with pedigree 0.0586, pedigree (4,3,5,1,1)
  EcoSpold01Location=CH
  Assumption
  Uncertainty: assumption
  production volume 3.96711 kg
- scrap steel: -5.59291, -0.00708602 kg (2 entries); lognormal variance with pedigree 0.0586, pedigree (4,3,5,1,1)
  (same comment as for aluminium scrap, post-consumer)
  production volume 7.40527 kg

## Extrapolations
This dataset has been extrapolated from year 2007 to the year of the calculation (2021). The uncertainty has been adjusted accordingly.

## Review by Emilia Moreno Ruiz 2013-01-08
correction of exchange name to“printed wiring board, surface mounted, [...]"

## Review by Sébastien Humbert 2007-09-05
passed
none
