# nickel sulfate production

Dataset: EcoSpold 2, unit process
Geography: GLO
Time period: 2006-01-01 to 2021-12-31
Technology level: current
Classification: ISIC rev.4 ecoinvent: 2011:Manufacture of basic chemicals
Synonyms: Nickel sulfate(1:1); Nickel(II) sulfate; Nickel(2+) sulfate; Nickel sulphate; Nickelous sulfate
Scenario: Business-as-Usual
System model: Allocation, cut-off by classification
Generated by: Tereza Levova
Database: ecoinvent
isCopyrightProtected: true
accessRestrictedTo: 1

## General comment
This dataset represents the production of nickel sulfate (NiSO4). Nickel sulfate is a highly soluble blue-coloured salt. Two forms of nickel sulfate are commercially available; hexahydrate (NiSO4*6H2O) and heptahydrate (NiSO4*7H2O). The main use of nickel sulfate is as the electrolyte in nickel electroplating baths. It is also used in electroless nickel plating, in catalyst manufacture, and in the production of other nickel compounds.
The data in this dataset were obtained via stochiometric calculations. The amount of energy and water consumed are estimated based on data from a large chemical plant (Gendorf 2016).
References:
Lascelles, K., Morgan, L. G., Nicholls, D. and Beyersmann, D. 2005. Nickel Compounds. Ullmann's Encyclopedia of Industrial Chemistry.
Gendorf (2016) Umwelterklärung 2015, Werk Gendorf Industriepark, www.gendorf.de.

## Included activities start
The activity starts when the raw materials enters the process.

## Included activities end
This activity ends with the production of nickel sulfate. It includes the consumption of raw materials and energy, infrastructure use and emissions.

## Geography
The data in this dataset are not geography-specific. Some values are based on data from a large chemical factory located in Germany. These are assumed to be valid for this geography.

## Technology
Most of the nickel sulfate is a by-product of electrolytic copper refining (Lascelles et al. 2005). Nickel sulfate is also produced by dissolving nickel or nickel oxide in sulfuric acid. This technology is presented in this dataset.
Chemical reaction:
I. Ni + 1/2 O2 -> NiO
II. NiO + H2SO4 -> NiSO4 + H2O
Reference:
Lascelles, K., Morgan, L. G., Nicholls, D. and Beyersmann, D. 2005. Nickel Compounds. Ullmann's Encyclopedia of Industrial Chemistry.

## Time period
This activity represents a basic chemical process and does not really change in time. Some values are based on data published by the Gendorf factory and are from the years 2011 to 2015. The time period has been adjusted accordingly. For more details, see the comments of the exchanges.

## Parameters
- efficiency: 0.95 dimensionless; name process_efficiency; lognormal variance with pedigree 0.0187, pedigree (4,4,1,3,3)
  Estimated value. The yield of chemical reaction.

## Reference product
- nickel sulfate: 1 kg; name nickel_sulfate_RP; CPC 34240: Phosphates of triammonium; salts and peroxysalts of inorganic acids and metals n.e.c.; By-product classification allocatable product; CAS 7786-81-4
  Nickel sulfate is a highly soluble blue-coloured salt. Two forms of nickel sulfate are commercially available; hexahydrate (NiSO4*6H2O) and heptahydrate (NiSO4*7H2O). The main use of nickel sulfate is as the electrolyte in nickel electroplating baths. It is also used in electroless nickel plating, in catalyst manufacture, and in the production of other nickel compounds.
  production volume 8e6 kg; name RP_PV; = 40000*1000*0.2
    Calculated based on literature (Ullmann's Encyclopedia). The worldwide production capacity of nickel sulfate is 40 000 t/year. Most of the nickel sulfate is produced as a by-product of electrolytic copper refining. It is estimated that 20% is produced via technology presented in this dataset.
  property price 3.00711 EUR2005; name nickel_sulfate_RP_price_EUR2005
    Value provided by the international Cobalt Institute as USD2012/kg. Converted to EUR2005 (USD2012/EUR2005 exchange rate: 0.82; Official Data Foundation [2020] and Macrotrends [2020]).
    References:
    Official Data Foundation (2020). Inflation Calculator [Online]. Available from: https://www.officialdata.org/us/inflation/2005?endYear=2019&amount=1 [Accessed 28/07/2020]
    Macrotrends (2020). Euro Dollar Exchange Rate (EUR USD) - Historical Chart [Online]. Available from: https://www.macrotrends.net/2548/euro-dollar-exchange-rate-historical-chart [Accessed 28/07/2020]
  property carbon content, fossil 0; name nickel_sulfate_RP_C_content_fossil
    fossil carbon content on a dry matter basis
  property dry mass 1 kg; name nickel_sulfate_RP_DM
  property carbon content, non-fossil 0; name nickel_sulfate_RP_C_content_non_fossil
    biogene carbon content on a dry matter basis
  property wet mass 1 kg; name nickel_sulfate_RP_WM
  property water in wet mass 0 kg; name nickel_sulfate_RP_WWM
  property water content 0; name nickel_sulfate_RP_water_content; = nickel_sulfate_RP_WWM/ nickel_sulfate_RP_DM
  property carbon content 0
    carbon content on a dry matter basis (reserved; not for manual entry)
  properties: carbon allocation 0 kg

## Inputs from technosphere
- nitrogen, liquid: 0 kg; pedigree (1,1,1,1,1)
  Calculated based on literature data published by the industry. This value is a 5-year average of data (2011 - 2015) published by the Gendorf factory (Gendorf, 2016, Umwelterklärung, www.gendorf.de), (Gendorf, 2015, Umwelterklärung, www.gendorf.de), (Gendorf, 2014, Umwelterklärung, www.gendorf.de). The amount of nitrogen used per kg of chemical substance produced is calculated using literature data published by the Gendorf factory based in Germany, which produces a wide range of chemical substances. The factory produced 1657400 tonnes of chemical substances in the year 2015 (Gendorf, 2016, Umwelterklärung, www.gendorf.de) and 740000 tonnes of intermediate products. The reported amount of nitrogen used in 2015 was 33512400 Nm3 (Gendorf, 2016, Umwelterklärung, www.gendorf.de). One Nm3 of nitrogen is equal to 1.2506 kg. The resulting amount of nitrogen - the 5-year average (2011 - 2015, weighted by production volume) is 0.019 kg/kg. Nitrogen is mainly used during the production of chemicals for 'blanketing', which is the process of applying gas to the vapour space of a container or vessel in order to control its composition.
  properties: dry mass 1 kg, wet mass 1 kg
- electricity, medium voltage: 0.416 kWh; source Gendorf 2000; lognormal variance with pedigree 0.0106, pedigree (2,3,2,4,3)
  Calculated based on literature data published by the industry. This value is a 5-year average of data (2011 - 2015) published by the Gendorf factory (Gendorf, 2016, Umwelterklärung, www.gendorf.de), (Gendorf, 2015, Umwelterklärung, www.gendorf.de), (Gendorf, 2014, Umwelterklärung, www.gendorf.de). The amount of electricity per kg of chemical substance produced is calculated using literature data published by the Gendorf factory based in Germany, which produces a wide range of chemical substances. The factory produced 1657400 tonnes of chemical substances in the year 2015 (Gendorf, 2016, Umwelterklärung, www.gendorf.de) and 740000 tonnes of intermediate products. The amount of electricity consumed in the year 2015 was 3498800 GJ (Gendorf, 2016, Umwelterklärung, www.gendorf.de). The resulting amount of electricity is 0.406 kWh/kg (year 2015) of chemical substance produced. The 5-year average (2011 - 2015, weighted by production volume) is 0.416 kWh/kg (1.5 MJ/kg). Cross-reference: the amount of chemicals produced (excluding intermediate products) in the EU-28 in the year 2011 was 327 million tonnes (Eurostat, http://ec.europa.eu/eurostat/statistics-explained/index.php/Chemicals_production_statistics, accessed 20170126). The chemical and petrochemical industry sector consumed 2.33 EJ of energy in 2011 (European Commission - Joint Research Centre, 2014, BAT on Common Waste water and Waste Gas Treatment/Management Systems in the Chemical Sector). The resulting energy (both heat and electricity) consumed per kg of chemicals produced in 2011 is thus 7.13 MJ/kg. This is higher than the value calculated using data published by Gendorf – 3.85 MJ/kg, but that is to be expected as the intermediate products are not accounted for.
- nickel, class 1: 0.399241 kg; name nickel_input; = 58.693/154.749*(1/process_efficiency)* nickel_sulfate_RP; lognormal variance with pedigree 0.0248, pedigree (4,5,2,1,3)
  Calculated value based on stoichiometric calculations.
  58.693 g/mol is the molar mass of nickel (Ni).
  154.749 g/mol is the molar mass of nickel sulfate (NiSO4).
  property wet mass 1 kg; name WM
  property water in wet mass 0 kg; name WWM
  property carbon content, fossil 0; name C_content_fossil
  property water content 0; name water_content
  property dry mass 1 kg; name DM
  property carbon content, non-fossil 0; name C_content_non_fossil
- tap water: 0.026 kg; lognormal variance with pedigree 0.0106, pedigree (2,3,2,4,3)
  Calculated based on literature data published by the industry. This value is a 5-year average of data (2011 - 2015) published by the Gendorf factory (Gendorf, 2016, Umwelterklärung, www.gendorf.de), (Gendorf, 2015, Umwelterklärung, www.gendorf.de), (Gendorf, 2014, Umwelterklärung, www.gendorf.de). The amount of tap water per kg of chemical substance produced is calculated using literature data published by the Gendorf factory based in Germany, which produces a wide range of chemical substances. The factory produced 1657400 tonnes of chemical substances in the year 2015 (Gendorf, 2016, Umwelterklärung, www.gendorf.de) and 740000 tonnes of intermediate products. The amount of tap water consumed in the year 2015 was 55100 tonnes (Gendorf, 2016, Umwelterklärung, www.gendorf.de). The resulting amount of tap water is 0.023 kg/kg of chemical product produced. The 5-year average (2011 - 2015, weighted by production volume) is 0.026 kg/kg.
  properties: carbon content, fossil 0.00178991, water content 2962.17, wet mass 1 kg, dry mass 0.000337476 kg
  note on carbon content, fossil: Bicarbonate content is 2.93 mol/m3. CO2 content is 0.1 mol/m3 (ecoinvent v2.2 report 8, Tab 93.1).
- chemical factory, organics: 4e-10 unit; source Gendorf 2000; lognormal variance with pedigree 0.31, pedigree (2,3,2,4,3)
  Calculated based on literature data published by the industry. For this activity, no information was readily available concerning infrastructure and land-use. Therefore, the infrastructure is estimated based on data from two chemical factories, the BASF site of Ludwigshafen and the chemical factory in Gendorf (which are both located in Germany), which produce a wide range of chemical substances. Based on this data, the following assumptions are made: the built area amounts to about 4.2 ha, the plant has an average output of 50'000 t/a and a lifespan of fifty years. The estimated infrastructure amount is therefore 4.00 E-10 units per kg of produced chemical.
  References:
  Althaus H.-J., Chudacoff M., Hischier R., Jungbluth N., Osses M. and Primas A. (2007) Life Cycle Inventories of Chemicals. ecoinvent report No. 8, v2.0. EMPA Dübendorf, Swiss Centre for Life Cycle Inventories, Dübendorf, CH.
  Gendorf (2000) Umwelterklärung 2000, Werk Gendorf. Werk Gendorf, Burgkirchen.
- heat, from steam, in chemical industry: 0 MJ; pedigree (1,1,1,1,1)
  Calculated based on literature data published by the industry. This value is a 5-year average of data (2011 - 2015) published by the Gendorf factory (Gendorf, 2016, Umwelterklärung, www.gendorf.de), (Gendorf, 2015, Umwelterklärung, www.gendorf.de), (Gendorf, 2014, Umwelterklärung, www.gendorf.de). The amount of heat used per kg of chemical substance produced is calculated using literature data published by the Gendorf factory based in Germany, which produces a wide range of chemical substances. The factory produced 1657400 tonnes of chemical substances in the year 2015 (Gendorf, 2016, Umwelterklärung, www.gendorf.de) and 740000 tonnes of intermediate products. The amount of heat in the year 2015 was 523500 GJ (Gendorf, 2016, Umwelterklärung, www.gendorf.de) of which 90% was obtained from natural gas and 10% from steam. The resulting amount of heat from steam is 0.22 MJ/kg of chemical product produced. The 5-year average (2011 - 2015, weighted by production volume) is 0.20 MJ/kg. Cross-reference: the amount of chemicals produced (excluding intermediate products) in the EU-28 in the year 2011 was 327 million tonnes (Eurostat, http://ec.europa.eu/eurostat/statistics-explained/index.php/Chemicals_production_statistics, accessed 20170126). The chemical and petrochemical industry sector consumed 2.33 EJ of energy in 2011 (European Commission - Joint Research Centre, 2014, BAT on Common Waste water and Waste Gas Treatment/Management Systems in the Chemical Sector). The resulting energy (both heat and electricity) consumed per kg of chemicals produced in 2011 is thus 7.13 MJ/kg. This is higher than the value calculated using data published by Gendorf – 3.85 MJ/kg, but that is to be expected as the intermediate products are not accounted for.
  properties: heating value, net 1 MJ
- sulfuric acid: 0 kg; name sulfuric_acid_input; pedigree (1,1,1,1,1)
  Calculated value based on stoichiometric calculations.
  98.072 g/mol is the molar mass of sulfuric acid (H2SO4).
  154.749 g/mol is the molar mass of nickel sulfate (NiSO4).
  properties: wet mass 1 kg, dry mass 1 kg
- wastewater, average: 0 m3; name BP_wastewater_average; pedigree (1,1,1,1,1)
  Calculated based on literature data published by the industry. This value is a 5-year average of data (2011 - 2015) published by the Gendorf factory (Gendorf, 2016, Umwelterklärung, www.gendorf.de), (Gendorf, 2015, Umwelterklärung, www.gendorf.de), (Gendorf, 2014, Umwelterklärung, www.gendorf.de). The amount of wastewater (which is later on treated in the municipal WWTP) per kg of chemical substance produced is calculated using literature data published by the Gendorf factory based in Germany, which produces a wide range of chemical substances. The factory produced 1657400 tonnes of chemical substances in the year 2015 (Gendorf, 2016, Umwelterklärung, www.gendorf.de) and 740000 tonnes of intermediate products. The amount of wastewater which is later on treated in the municipal WWTP in the year 2015 was 1200 tonnes (Gendorf, 2016, Umwelterklärung, www.gendorf.de). The resulting amount of wastewater is 2.7E-06 m3/kg of chemical product produced.
  production volume 0 m3
    Calculated from the production volume of nickel sulfate in proportion to the respective output amounts.
  property price 0 EUR2005; name BP_wastewater_average_price_EUR2005
  properties: dry mass 0.346837 kg, water content 2882.2, carbon content, non-fossil 0.194039, wet mass 1000 kg
  note on carbon content, non-fossil: 0.0673 kg TOC/m3 (Tab A.17, ecoinvent v2.2 report 13_I). TOC was considered as Total Carbon.
- heat, district or industrial, natural gas: 2.15 MJ; source Gendorf 2000; lognormal variance with pedigree 0.0106, pedigree (2,3,2,4,3)
  Calculated based on literature data published by the industry. This value is a 5-year average of data (2011 - 2015) published by the Gendorf factory (Gendorf, 2016, Umwelterklärung, www.gendorf.de), (Gendorf, 2015, Umwelterklärung, www.gendorf.de), (Gendorf, 2014, Umwelterklärung, www.gendorf.de). The amount of heat used per kg of chemical substance produced is calculated using literature data published by the Gendorf factory based in Germany, which produces a wide range of chemical substances. The factory produced 1657400 tonnes of chemical substances in the year 2015 (Gendorf, 2016, Umwelterklärung, www.gendorf.de) and 740000 tonnes of intermediate products. The amount of heat in the year 2015 was 523500 GJ (Gendorf, 2016, Umwelterklärung, www.gendorf.de) of which 90% was obtained from natural gas and 10% from steam. The resulting amount of heat from natural gas is 2.02 MJ/kg of chemical product produced. The 5-year average (2011 - 2015, weighted by production volume) is 2.15 MJ/kg. Cross-reference: the amount of chemicals produced (excluding intermediate products) in the EU-28 in the year 2011 was 327 million tonnes (Eurostat, http://ec.europa.eu/eurostat/statistics-explained/index.php/Chemicals_production_statistics, accessed 20170126). The chemical and petrochemical industry sector consumed 2.33 EJ of energy in 2011 (European Commission - Joint Research Centre, 2014, BAT on Common Waste water and Waste Gas Treatment/Management Systems in the Chemical Sector). The resulting energy (both heat and electricity) consumed per kg of chemicals produced in 2011 is thus 7.13 MJ/kg. This is higher than the value calculated using data published by Gendorf – 3.85 MJ/kg, but that is to be expected as the intermediate products are not accounted for.
  properties: heating value, net 1 MJ
- nitrogen, liquid: 0.00409211, 0.0149079 kg (2 entries); lognormal variance with pedigree 0.0106, pedigree (2,3,2,4,3)
  (same comment as for nitrogen, liquid)
- heat, from steam, in chemical industry: 0.0299772, 0.170023 MJ (2 entries); lognormal variance with pedigree 0.0106, pedigree (2,3,2,4,3)
  (same comment as for heat, from steam, in chemical industry)
- sulfuric acid: 0.0771751, 0.589929 kg (2 entries); lognormal variance with pedigree 0.0248, pedigree (4,5,2,1,3)
  (same comment as for sulfuric acid)
- wastewater, average: -8.43646e-7, -9.12666e-8, -1.76509e-6 m3 (3 entries); lognormal variance with pedigree 0.0106, pedigree (2,3,2,4,3)
  (same comment as for wastewater, average)
  production volume 21.6 m3

## Inputs from nature
- Water, river [natural resource, in water]: 0.00086 m3; lognormal variance with pedigree 0.0106, pedigree (2,3,2,4,3)
  Calculated based on literature data published by the industry. This value is a 5-year average of data (2011 - 2015) published by the Gendorf factory (Gendorf, 2016, Umwelterklärung, www.gendorf.de), (Gendorf, 2015, Umwelterklärung, www.gendorf.de), (Gendorf, 2014, Umwelterklärung, www.gendorf.de). The amount of groundwater and surface water (river) extracted per kg of chemical substance produced is calculated using literature data published by the Gendorf factory based in Germany, which produces a wide range of chemical substances. The factory produced 1657400 tonnes of chemical substances in the year 2015 (Gendorf, 2016, Umwelterklärung, www.gendorf.de) and 740000 tonnes of intermediate products. The amount of groundwater and surface water (river) extracted in the year 2015 was 19950000 tonnes and 21488100 tonnes respectively (Gendorf, 2016, Umwelterklärung, www.gendorf.de).
- Water, cooling, unspecified natural origin [natural resource, in water]: 0.0164 m3; lognormal variance with pedigree 0.0106, pedigree (2,3,2,4,3)
  Calculated based on literature data published by the industry. This value is a 5-year average of data (2011 - 2015) published by the Gendorf factory (Gendorf, 2016, Umwelterklärung, www.gendorf.de), (Gendorf, 2015, Umwelterklärung, www.gendorf.de), (Gendorf, 2014, Umwelterklärung, www.gendorf.de). The amount of water for cooling extracted per kg of chemical substance produced is calculated using literature data published by the Gendorf factory based in Germany, which produces a wide range of chemical substances. The factory produced 1657400 tonnes of chemical substances in the year 2015 (Gendorf, 2016, Umwelterklärung, www.gendorf.de) and 740000 tonnes of intermediate products. The reported amounts of water extracted as groundwater and surface water (river) are assumed to be used entirely for cooling purposes.
  property water in wet mass 999.89 kg; name water_cooling_UNO_input_WWM; = water_cooling_UNO_input_WM- water_cooling_UNO_input_DM
  property wet mass 1000 kg; name water_cooling_UNO_input_WM
  property water content 9081.65; name water_cooling_UNO_input_water_content; = water_cooling_UNO_input_WWM/ water_cooling_UNO_input_DM
  property dry mass 0.1101 kg; name water_cooling_UNO_input_DM
- Water, well, in ground [natural resource, in water]: 0.00083 m3; lognormal variance with pedigree 0.0106, pedigree (2,3,2,4,3)
  (same comment as for Water, river)

## Emissions to nature
- Nickel, ion [water, unspecified]: 0.00210127 kg; name nickel_emissions_water; = ((((1/process_efficiency)-1)*nickel_input))*0.1; lognormal variance with pedigree 0.0642, pedigree (4,5,2,1,3)
  Calculated value based on literature and estimates. In case of nickel (Ni), part of the unreacted volume evaporates is released as a part of wastewater. The efficiency of the waste water treatment plant (WWTP) is assumed to be 90%, i.e. 10% of the volume of nickel on the inflow to the WWTP is released to the environment.
- Water [air, unspecified]: 0.0014 m3; lognormal variance with pedigree 0.0106, pedigree (2,3,2,4,3)
  Calculated to ensure the water balance. In general, in the case of recirculating cooling systems, 77% of the water input evaporates to air. In case of once-through cooling systems, 4% of the water input evaporates to air. The process water has in the chemical industry an average evaporation rate of 20.5%. In the specific case of the Gendorf factory, the calculated evaporation rate based on the data published is 6.3%. This matches the qualitative information, that the majority of the cooling systems in Gendorf are once-through and that the amount of cooling water used is significantly higher than the amount of process water used (Gendorf, 2016, Umwelterklärung, www.gendorf.de).
- Sulfur [water, unspecified]: 0.00114778 kg; name sulfur_emissions_water; = ((((1/process_efficiency)-1)*sulfuric_acid_input))*(32.06/98.072)*0.1; lognormal variance with pedigree 0.0642, pedigree (4,5,2,1,3)
  Calculated value based on literature and estimates. In case of sulfuric acid (H2SO4), part of the unreacted volume is released as sulfur (S) as a part of wastewater. The efficiency of the waste water treatment plant (WWTP) is assumed to be 90%, i.e. 10% of the volume of sulfur on the inflow to the WWTP is released to the environment.
  32.06 g/mol is the molar mass of sulfur (S).
  98.072 g/mol is the molar mass of sulfuric acid (H2SO4).
- Nitrogen [air, unspecified]: 0.019 kg; lognormal variance with pedigree 0.0106, pedigree (2,3,2,4,3)
  Calculated value. The amount of nitrogen released to air is equal to the amount of nitrogen entering the activity.
- Water [water, unspecified]: 0.0167 m3; lognormal variance with pedigree 0.0106, pedigree (2,3,2,4,3)
  Calculated based on literature data published by the industry (Gendorf, 2016, Umwelterklärung, www.gendorf.de). The amount of water released back to the environment consists of the amount of process water treated in the internal WWTP and then released back to the environment and the amount of cooling water released back to the environment.

## Sampling procedure
Data based on stoichiometric calculations. Some values are calculated based on data from a large chemical factory located in Germany. For more details, see the comments of the exchanges.

## Extrapolations
This dataset has been extrapolated from year 2020 to the year of the calculation (2021). The uncertainty has been adjusted accordingly.

## Review by Emilia Moreno Ruiz 2017-08-08
This dataset was additionally reviewed in a separate review process by Eric Johnson of Atlantic Consulting as well as Emilia Moreno Ruiz and Gregor Wernet of ecoinvent.
