# fluorescent whitening agent production, DAS1, triazinylaminostilben type

Dataset: EcoSpold 2, unit process
Geography: RER
Time period: 1997-01-01 to 2021-12-31
Technology level: current
Classification: EcoSpold01Categories: washing agents/auxiliary agents
Classification: ISIC rev.4 ecoinvent: 2011:Manufacture of basic chemicals
Tags: ConvertedDataset
Scenario: Business-as-Usual
System model: Allocation, cut-off by classification
Share of production covered: 40 %
Generated by: Rainer Zah
Published in: Zah R. 2004
Database: ecoinvent
isCopyrightProtected: true
accessRestrictedTo: 1

## General comment
The dataset represents the production of 1 kg of fluorescent whitening agent triazinylaminostilben type from 4-nitrotoluene, phenol, and ethylene oxide.
Material and energy inputs as well as production of waste and emissions are from literature resources. Infrastructure and transport are estimation based on a large chemical plant.
Flow diagram of the production of the fluorescent white agent DAS-1 (triazinylaminostilbene type):
[This dataset was already contained in the ecoinvent database version 2. It was not individually updated during the transfer to ecoinvent version 3. Life Cycle Impact Assessment results may still have changed, as they are affected by changes in the supply chain, i.e. in other datasets. This dataset was generated following the ecoinvent quality guidelines for version 2. It may have been subject to central changes described in the ecoinvent version 3 change report (http://www.ecoinvent.org/database/ecoinvent-version-3/reports-of-changes/), and the results of the central updates were reviewed extensively. The changes added e.g. consistent water flows and other information throughout the database. The documentation of this dataset can be found in the ecoinvent reports of version 2, which are still available via the ecoinvent website. The change report linked above covers all central changes that were made during the conversion process.]

## Included activities start
From reception of precursors calcite, stylvite, and sodium chlorid at the factory gate.

## Included activities end
This activity ends with the production of 1 kg of fluroescent whitening agent triazinylaminostilben type. The dataset includes material and energy input, production of waste, emissions to air and water, transport and infrastructure.

## Geography
data from European main producer, used as European average

## Technology
The starting material for the triazinylaminostilbenes is 4,4‘-Dinitrostilbene-2,2‘-disulphonic acid, which is produced by oxidation of 4-nitrotoluene-2-sulphonic acid with sodium hypochlorite. A subsequent Béchamps reduction with iron fillings and HCl gives 4,4‘-diaminostilbene-2,2‘-disulphonic acid, that is reacted at both amino groups with cyanuric chloride. The two remaining Cl atoms in the cyanuric chloride rings then react one after another with two amines, in the case of DAS-1 with aniline and morpholine. Subsequent steps produce the desired -crystal modification and deliver the finished commercial product, that contains 67% active substance.

## Time period
year of reported data

## Parameters
- fraction, process water, to air: 0.4 dimensionless; name fraction_PW_to_air; lognormal variance with pedigree 0.092025, pedigree (4,4,3,2,4)
  Literature value (Statistics Canada, 2007 & Shaffer, K.H., 2008, Consumptive water use in the Great Lakes Basin, USGS) (Vionnet, S., Quantis Water Database - Technical Report, 2012).

## Reference product
- fluorescent whitening agent, DAS1, triazinylaminostilben type: 1 kg; name FWagent_RP; source Häussinger P. 2000; CPC 34310: Synthetic organic colouring matter and preparations based thereon; synthetic organic products of a kind used a[…]; By-product classification allocatable product; CAS 16090-02-1
  Fluorescent whitening agents (FWA) are colorless organic substances that are able to absorb ultraviolet radiance and to re-emit the absorbed energy as blue fluorescent light (400 - 500 nm). FWAs are used as additives in detergents. By coating the textile fibres during the washing process, they compensate the natural (but continuosly increasing) yellow touch of the textiles resulting in a high grade of whiteness.
  EcoSpold01Location=RER
  production volume 1.32237 kg; name FWagent_RP_PV
    This is a placeholder value that does not reflect real-world production volumes. This dataset does not currently require a real-world production volume to work in the database framework, and no actual data were collected yet. This has no negative effect on the results of the ecoinvent database. The placeholder value of this activity was scaled according to the nominal GDP of 2005 (source: United Nations, http://data.un.org/Glossary.aspx?q=GDP+%28current+US%24%29, accessed 20130726) to reflect an appropriate share of the global production volume, which is also a placeholder value.
  property carbon content, non-fossil 0
    4,4'-bis-[(4-anilino-6-morpholino-1,3,5-triazin-2-ly)amino]stilbene-2,2'-disulfonate (DAS-1, C40 H38 N12 Na2O8 S2) has a MW of 925 g/mol, (FWA-1, SIDS Publications, UNEP).
  property heating value, net 20.72 MJ
    LHV is calculated based on the elemental composition of the substance. Based on the CAS number of the substance (016090-02-1), the chemical formula of the substance is found to be: C40H38N12Na2O8S2, (PubChem 2020).
    Reference: Kim, S., Chen, J., Cheng, T., Gindulyte, A., He, J., He, S., Li, Q., Shoemaker, B. A., Thiessen, P. A., Yu, B., Zaslavsky, L., Zhang, J., & Bolton, E. E. (2019). PubChem 2019 update: improved access to chemical data. Nucleic acids research, 47(D1), D1102–D1109. https://doi.org/10.1093/nar/gky1033
  property carbon content, fossil 0.518919
    4,4'-bis-[(4-anilino-6-morpholino-1,3,5-triazin-2-ly)amino]stilbene-2,2'-disulfonate (DAS-1) has a MW of 925 g/mol, and 40 C atoms in its structure (FWA-1, SIDS Publications, UNEP).
  property carbon content 0.518919
    carbon content on a dry matter basis (reserved; not for manual entry)
  properties: wet mass 1 kg, price 1.57 EUR2005, water in wet mass 0 kg, water content 0, dry mass 1 kg, carbon allocation 0.518919 kg

## Inputs from technosphere
- hazardous waste, for incineration: 0 kg; name ByP_02; source Dall'Acqua S. 1995; pedigree (1,1,1,1,1)
  EcoSpold01Location=CH
  Literature value.
  Uncertainty: ;
  production volume 0 kg
    Calculated from the production volume of fluorescent whitening agent, DAS1, triazinylaminostilben type in proportion to the respective output amounts.
  property price 0 EUR2005; name ByP_02_price_EUR2005
  properties: heating value, net 17 MJ, wet mass 1 kg, dry mass 0.75 kg, carbon content, fossil 0.554667, water content 0.333333
  note on heating value, net: Value taken from the general comment of the treatment dataset.
  note on carbon content, fossil: Tab A.6, ecoinvent v2.2 report 13_I. C content has been calculated after data in the tables, and then referred to 1 kg DM
- chemical factory, organics: 1.2e-9 unit; source Frischknecht R. 2007; lognormal variance with pedigree 0.351225, pedigree (2,3,5,2,1)
  Estimation: estimation based on a large chemical plant. Standard value has been multiplied by 3, due to the many aggregated processes.
  EcoSpold01Location=RER
  Uncertainty: ;
- inert waste, for final disposal: -0.178 kg; name ByP_04; source Dall'Acqua S. 1995; lognormal variance with pedigree 0.051225, pedigree (2,3,5,2,1)
  Literature value.
  EcoSpold01Location=CH
  Uncertainty: ;
  production volume 0.235382 kg; = ByP_04/ FWagent_RP* FWagent_RP_PV
    (same comment as for hazardous waste, for incineration)
  property price 0 EUR2005; name ByP_04_price_EUR2005
  properties: wet mass 1 kg, dry mass 0.995 kg, water content 0.00502513
- average incineration residue: -0.0695 kg; name ByP_01; source Dall'Acqua S. 1995; lognormal variance with pedigree 0.051225, pedigree (2,3,5,2,1)
  Literature value.
  EcoSpold01Location=CH
  Uncertainty: ;
  production volume 0.0919047 kg; = ByP_01/ FWagent_RP* FWagent_RP_PV
    (same comment as for hazardous waste, for incineration)
  property price 0 EUR2005; name ByP_01_price_EUR2005
  properties: wet mass 1 kg, carbon content, fossil 0.0325466, dry mass 1 kg, carbon content, non-fossil 0.0511208
  note on carbon content, fossil: Tab A.1, ecoinvent v2.2 report 13_I. It is considered that 61.1% of the C has a biogenic origin
- municipal solid waste: -0.054 kg; name ByP_03; source Dall'Acqua S. 1995; lognormal variance with pedigree 0.051225, pedigree (2,3,5,2,1)
  Literature value.
  EcoSpold01Location=CH
  Uncertainty: ;
  production volume 0.0714079 kg; = ByP_03/ FWagent_RP* FWagent_RP_PV
    (same comment as for hazardous waste, for incineration)
  properties: carbon content, fossil 0.171549, wet mass 1 kg, carbon content, non-fossil 0.261655, dry mass 0.771 kg, water content 0.297017, heating value, net 11.74 MJ
  note on carbon content, fossil: MSW composition in tab 4.1, ecoinvent v2.2 report 13_I. C content referred to 1 kg DM
- hazardous waste, for incineration: -1.47153e-9, -3.8465e-11 kg (2 entries); source Dall'Acqua S. 1995; lognormal variance with pedigree 0.051225, pedigree (2,3,5,2,1)
  EcoSpold01Location=CH
  Literature value.
  Uncertainty: ;
  production volume 1.99678e-9 kg

## Inputs from nature
- Sylvite, in ground [natural resource, in ground]: 4.39e-5 kg; source Dall'Acqua S. 1995; lognormal variance with pedigree 0.051225, pedigree (2,3,5,2,1)
  25% Sylvite in sylvinite; Literature value.
  Uncertainty: ;
- Gas, natural, in ground [natural resource, in ground]: 1.68 m3; source Dall'Acqua S. 1995; lognormal variance with pedigree 0.051225, pedigree (2,3,5,2,1)
  Literature value.
  Uncertainty: ;
- Aluminium, in ground [natural resource, in ground]: 0.00122 kg; source Dall'Acqua S. 1995; lognormal variance with pedigree 0.051225, pedigree (2,3,5,2,1)
  24% Al in bauxite; 11% Al in ore; Literature value.
  Uncertainty: ;
- Coal, hard, unspecified, in ground [natural resource, in ground]: 1.23 kg; source Dall'Acqua S. 1995; lognormal variance with pedigree 0.051225, pedigree (2,3,5,2,1)
  Literature value.
  Uncertainty: ;
- Uranium, in ground [natural resource, in ground]: 7.53e-5 kg; source Dall'Acqua S. 1995; lognormal variance with pedigree 0.051225, pedigree (2,3,5,2,1)
  Literature value.
  Uncertainty: ;
- Wood, unspecified, standing [natural resource, biotic]: 1.17e-5 m3; source Dall'Acqua S. 1995; lognormal variance with pedigree 0.051225, pedigree (2,3,5,2,1)
  Literature value.
  Uncertainty: ;
- Water, unspecified natural origin [natural resource, in water]: 2.335 m3; name water_UNO_input; source EMPA - Swiss Federal Laboratories for Ma 1999; lognormal variance with pedigree 0.052625, pedigree (3,3,5,2,1)
  Calculated based on literature, (Vionnet, S., Quantis Water Database - Technical Report, 2012). Via 4.4 - Dinitrostilbene-2.2-disulphonic acid (produced with Hypochlorite-Oxidation) and 4.4_Di-aminostilbene-2.2-di-sulphonic acid, produced with Bechamps reduction.
  property water content 9081.65; name water_content
  property carbon content, non-fossil 0; name C_content_non_fossil
  property dry mass 0.1101 kg; name DM
  property water in wet mass 999.89 kg; name WWM
  property carbon content, fossil 0.0104329; name C_content_fossil
  property wet mass 1000 kg; name WM
- Sodium chloride, in ground [natural resource, in ground]: 2.27 kg; source Dall'Acqua S. 1995; lognormal variance with pedigree 0.051225, pedigree (2,3,5,2,1)
  Literature value.
  Uncertainty: ;
- Energy, potential (in hydropower reservoir), converted [natural resource, in water]: 4.62 MJ
- Phosphorus, in ground [natural resource, in ground]: 0.00612 kg; source Dall'Acqua S. 1995; lognormal variance with pedigree 0.051225, pedigree (2,3,5,2,1)
  18% P in apatite; 12% in ore; Literature value.
  Uncertainty: ;
- Oil, crude, in ground [natural resource, in ground]: 1.54 kg; source Dall'Acqua S. 1995; lognormal variance with pedigree 0.051225, pedigree (2,3,5,2,1)
  Literature value.
  Uncertainty: ;
- Iron, in ground [natural resource, in ground]: 0.286 kg; source Dall'Acqua S. 1995; lognormal variance with pedigree 0.051225, pedigree (2,3,5,2,1)
  46% Fe in siderite; 25% Fe in ore; Literature value.
  Uncertainty: ;
- Sand, unspecified, in ground [natural resource, in ground]: 0.00216 kg; source Dall'Acqua S. 1995; lognormal variance with pedigree 0.051225, pedigree (2,3,5,2,1)
  Literature value.
  Uncertainty: ;
- Calcite, in ground [natural resource, in ground]: 0.382 kg; source Dall'Acqua S. 1995; lognormal variance with pedigree 0.051225, pedigree (2,3,5,2,1)
  Literature value.
  Uncertainty: ;
- Coal, brown, in ground [natural resource, in ground]: 0.85 kg; source Dall'Acqua S. 1995; lognormal variance with pedigree 0.051225, pedigree (2,3,5,2,1)
  Literature value.
  Uncertainty: ;

## Emissions to nature
- Chlorinated solvents, unspecified [water, surface water]: 5.38e-8 kg; source Dall'Acqua S. 1995; lognormal variance with pedigree 0.351225, pedigree (2,3,5,2,1)
  Literature value.
  Uncertainty: ;
- Hydrocarbons, aromatic [air, urban air close to ground]: 5.06e-5 kg; source Dall'Acqua S. 1995; lognormal variance with pedigree 0.351225, pedigree (2,3,5,2,1)
  Literature value.
  Uncertainty: ;
- Lead [air, urban air close to ground]: 3.22e-6 kg; source Dall'Acqua S. 1995; lognormal variance with pedigree 0.701225, pedigree (2,3,5,2,1)
  Literature value.
  Uncertainty: ;
- Cadmium [air, urban air close to ground]: 7.63e-7 kg; source Dall'Acqua S. 1995; lognormal variance with pedigree 0.701225, pedigree (2,3,5,2,1)
  Literature value.
  Uncertainty: ;
- PAH, polycyclic aromatic hydrocarbons [water, surface water]: 5.76e-7 kg; source Dall'Acqua S. 1995; lognormal variance with pedigree 0.351225, pedigree (2,3,5,2,1)
  Literature value.
  Uncertainty: ;
- Methane, bromotrifluoro-, Halon 1301 [air, urban air close to ground]: 2.1e-7 kg; source Dall'Acqua S. 1995; lognormal variance with pedigree 0.171225, pedigree (2,3,5,2,1)
  Literature value.
  Uncertainty: ;
- Hydrocarbons, unspecified [water, surface water]: 0.00125 kg; source Dall'Acqua S. 1995; lognormal variance with pedigree 0.351225, pedigree (2,3,5,2,1)
  Literature value.
  Uncertainty: ;
- Phosphate [water, surface water]: 0.00218 kg; source Dall'Acqua S. 1995; lognormal variance with pedigree 0.091225, pedigree (2,3,5,2,1)
  Literature value.
  Uncertainty: ;
- Hydrogen fluoride [air, urban air close to ground]: 8.24e-5 kg; source Dall'Acqua S. 1995; lognormal variance with pedigree 0.091225, pedigree (2,3,5,2,1)
  Literature value.
  Uncertainty: ;
- PAH, polycyclic aromatic hydrocarbons [air, urban air close to ground]: 3.41e-7 kg; source Dall'Acqua S. 1995; lognormal variance with pedigree 0.171225, pedigree (2,3,5,2,1)
  Literature value.
  Uncertainty: ;
- Toluene [water, surface water]: 5.38e-6 kg; source Dall'Acqua S. 1995; lognormal variance with pedigree 0.351225, pedigree (2,3,5,2,1)
  Literature value.
  Uncertainty: ;
- Particulates, > 2.5 um, and < 10um [air, urban air close to ground]: 0.005375 kg; source Dall'Acqua S. 1995; lognormal variance with pedigree 0.091225, pedigree (2,3,5,2,1)
  Literature value.
  Uncertainty: ;
- DOC, Dissolved Organic Carbon [water, surface water]: 0.0976 kg; source Dall'Acqua S. 1995; lognormal variance with pedigree 0.091225, pedigree (2,3,5,2,1)
  Literature value.
  Uncertainty: ;
- Zinc, ion [water, surface water]: 2.06e-5 kg; source Dall'Acqua S. 1995; lognormal variance with pedigree 0.701225, pedigree (2,3,5,2,1)
  Literature value.
  Uncertainty: ;
- Zinc [air, urban air close to ground]: 4.67e-6 kg; source Dall'Acqua S. 1995; lognormal variance with pedigree 0.701225, pedigree (2,3,5,2,1)
  Literature value.
  Uncertainty: ;
- Carbon monoxide, fossil [air, urban air close to ground]: 0.00521 kg; source Dall'Acqua S. 1995; lognormal variance with pedigree 0.701225, pedigree (2,3,5,2,1)
  Literature value.
  Uncertainty: ;
- Chloride [water, surface water]: 0.922 kg; source Dall'Acqua S. 1995; lognormal variance with pedigree 0.091225, pedigree (2,3,5,2,1)
  Literature value.
  Uncertainty: ;
- Mercury [air, urban air close to ground]: 1.6e-7 kg; source Dall'Acqua S. 1995; lognormal variance with pedigree 0.701225, pedigree (2,3,5,2,1)
  Literature value.
  Uncertainty: ;
- Mercury [water, surface water]: 5.3e-9 kg; source Dall'Acqua S. 1995; lognormal variance with pedigree 0.701225, pedigree (2,3,5,2,1)
  Literature value.
  Uncertainty: ;
- Ammonia [air, urban air close to ground]: 0.0213 kg; source Dall'Acqua S. 1995; lognormal variance with pedigree 0.091225, pedigree (2,3,5,2,1)
  Literature value.
  Uncertainty: ;
- NMVOC, non-methane volatile organic compounds, unspecified origin [air, urban air close to ground]: 0.019 kg; source Dall'Acqua S. 1995; lognormal variance with pedigree 0.171225, pedigree (2,3,5,2,1)
  Literature value.
  Uncertainty: ;
- Hydrocarbons, aromatic [water, surface water]: 3.92e-5 kg; source Dall'Acqua S. 1995; lognormal variance with pedigree 0.351225, pedigree (2,3,5,2,1)
  Literature value.
  Uncertainty: ;
- Arsenic, ion [water, surface water]: 3.73e-6 kg; source Dall'Acqua S. 1995; lognormal variance with pedigree 0.701225, pedigree (2,3,5,2,1)
  Literature value.
  Uncertainty: ;
- Nickel [air, urban air close to ground]: 1.84e-5 kg; source Dall'Acqua S. 1995; lognormal variance with pedigree 0.701225, pedigree (2,3,5,2,1)
  Literature value.
  Uncertainty: ;
- Phenol [water, surface water]: 9.22e-6 kg; source Dall'Acqua S. 1995; lognormal variance with pedigree 0.351225, pedigree (2,3,5,2,1)
  Literature value.
  Uncertainty: ;
- Sulfur dioxide [air, urban air close to ground]: 0.0715 kg; source Dall'Acqua S. 1995; lognormal variance with pedigree 0.051225, pedigree (2,3,5,2,1)
  Literature value.
  Uncertainty: ;
- Barium [water, surface water]: 0.000256 kg; source Dall'Acqua S. 1995; lognormal variance with pedigree 0.701225, pedigree (2,3,5,2,1)
  Literature value.
  Uncertainty: ;
- Chromium, ion [water, surface water]: 1.91e-5 kg; source Dall'Acqua S. 1995; lognormal variance with pedigree 0.701225, pedigree (2,3,5,2,1)
  Literature value.
  Uncertainty: ;
- Antimony [water, surface water]: 2.05e-8 kg; source Dall'Acqua S. 1995; lognormal variance with pedigree 0.701225, pedigree (2,3,5,2,1)
  Literature value.
  Uncertainty: ;
- Fluoride [water, surface water]: 2.04e-5 kg; source Dall'Acqua S. 1995; lognormal variance with pedigree 0.091225, pedigree (2,3,5,2,1)
  Literature value.
  Uncertainty: ;
- Particulates, < 2.5 um [air, urban air close to ground]: 0.003125 kg; source Dall'Acqua S. 1995; lognormal variance with pedigree 0.091225, pedigree (2,3,5,2,1)
  Literature value.
  Uncertainty: ;
- Aluminium [water, surface water]: 0.00185 kg; source Dall'Acqua S. 1995; lognormal variance with pedigree 0.701225, pedigree (2,3,5,2,1)
  Literature value.
  Uncertainty: ;
- Copper, ion [water, surface water]: 9.67e-6 kg; source Dall'Acqua S. 1995; lognormal variance with pedigree 0.701225, pedigree (2,3,5,2,1)
  Literature value.
  Uncertainty: ;
- Particulates, > 10 um [air, urban air close to ground]: 0.004 kg; source Dall'Acqua S. 1995; lognormal variance with pedigree 0.091225, pedigree (2,3,5,2,1)
  Literature value.
  Uncertainty: ;
- BOD5, Biological Oxygen Demand [water, surface water]: 2.05e-5 kg; source Dall'Acqua S. 1995; lognormal variance with pedigree 0.091225, pedigree (2,3,5,2,1)
  Literature value.
  Uncertainty: ;
- Sulfide [water, surface water]: 3e-6 kg; source Dall'Acqua S. 1995; lognormal variance with pedigree 0.091225, pedigree (2,3,5,2,1)
  Literature value.
  Uncertainty: ;
- Dinitrogen monoxide [air, urban air close to ground]: 0.000203 kg; source Dall'Acqua S. 1995; lognormal variance with pedigree 0.091225, pedigree (2,3,5,2,1)
  Literature value.
  Uncertainty: ;
- Water [water, unspecified]: 1.401 m3; name water_to_water_unspecified; = water_UNO_input*(1-fraction_PW_to_air); lognormal variance with pedigree 0.0807, pedigree (2,2,5,1,1)
  Calculated value based on literature values and expert opinion. See comments in the parametres' comment field.
  property fraction, origin: salt water 0; name fraction_origin_salt_water_Ww
  property fraction, origin: unspecified 1; name fraction_origin_unspecified_Ww
  property fraction, origin: fresh water 0; name fraction_origin_fresh_water_Ww
- Solids, inorganic [water, surface water]: 1.32 kg; source Dall'Acqua S. 1995; lognormal variance with pedigree 0.091225, pedigree (2,3,5,2,1)
  Literature value.
  Uncertainty: ;
- Benzene [air, urban air close to ground]: 2.35e-5 kg; source Dall'Acqua S. 1995; lognormal variance with pedigree 0.351225, pedigree (2,3,5,2,1)
  Literature value.
  Uncertainty: ;
- Water [air, unspecified]: 0.934 m3; name water_to_air_unspecified; = (water_UNO_input*fraction_PW_to_air); lognormal variance with pedigree 0.0807, pedigree (2,2,5,1,1)
  (same comment as for Water)
  property fraction, origin: salt water 0; name fraction_origin_salt_water
  property fraction, origin: fresh water 0; name fraction_origin_fresh_water
  property fraction, origin: unspecified 1; name fraction_origin_unspecified
- Cadmium, ion [water, surface water]: 1.52e-7 kg; source Dall'Acqua S. 1995; lognormal variance with pedigree 0.701225, pedigree (2,3,5,2,1)
  Literature value.
  Uncertainty: ;
- Hydrogen chloride [air, urban air close to ground]: 0.00163 kg; source Dall'Acqua S. 1995; lognormal variance with pedigree 0.171225, pedigree (2,3,5,2,1)
  Literature value.
  Uncertainty: ;
- Iron, ion [water, surface water]: 0.00185 kg; source Dall'Acqua S. 1995; lognormal variance with pedigree 0.701225, pedigree (2,3,5,2,1)
  Literature value.
  Uncertainty: ;
- Nitrogen [water, surface water]: 0.015 kg; source Dall'Acqua S. 1995; lognormal variance with pedigree 0.091225, pedigree (2,3,5,2,1)
  Literature value.
  Uncertainty: ;
- Manganese [air, urban air close to ground]: 1.46e-6 kg; source Dall'Acqua S. 1995; lognormal variance with pedigree 0.091225, pedigree (2,3,5,2,1)
  Literature value.
  Uncertainty: ;
- Ammonium, ion [water, surface water]: 0.00208 kg; source Dall'Acqua S. 1995; lognormal variance with pedigree 0.091225, pedigree (2,3,5,2,1)
  Literature value.
  Uncertainty: ;
- Methane, fossil [air, urban air close to ground]: 0.0171 kg; source Dall'Acqua S. 1995; lognormal variance with pedigree 0.091225, pedigree (2,3,5,2,1)
  Literature value.
  Uncertainty: ;
- Radioactive species, other beta emitters [air, urban air close to ground]: 6490 kBq; source Dall'Acqua S. 1995; lognormal variance with pedigree 0.351225, pedigree (2,3,5,2,1)
  Literature value.
  Uncertainty: ;
- Chlorine [air, urban air close to ground]: 2.15e-10 kg; source Dall'Acqua S. 1995; lognormal variance with pedigree 0.091225, pedigree (2,3,5,2,1)
  Literature value.
  Uncertainty: ;
- Nitrogen oxides [air, urban air close to ground]: 0.0326 kg; source Dall'Acqua S. 1995; lognormal variance with pedigree 0.091225, pedigree (2,3,5,2,1)
  Literature value.
  Uncertainty: ;
- Lead [water, surface water]: 1.08e-5 kg; source Dall'Acqua S. 1995; lognormal variance with pedigree 0.701225, pedigree (2,3,5,2,1)
  Literature value.
  Uncertainty: ;
- Radioactive species, Nuclides, unspecified [water, surface water]: 59.4 kBq; source Dall'Acqua S. 1995; lognormal variance with pedigree 0.351225, pedigree (2,3,5,2,1)
  Literature value.
  Uncertainty: ;
- COD, Chemical Oxygen Demand [water, surface water]: 0.000122 kg; source Dall'Acqua S. 1995; lognormal variance with pedigree 0.091225, pedigree (2,3,5,2,1)
  Literature value.
  Uncertainty: ;
- Hydrocarbons, chlorinated [air, urban air close to ground]: 2.09e-9 kg; source Dall'Acqua S. 1995; lognormal variance with pedigree 0.171225, pedigree (2,3,5,2,1)
  Literature value.
  Uncertainty: ;
- Sulfate [water, surface water]: 0.152 kg; source Dall'Acqua S. 1995; lognormal variance with pedigree 0.091225, pedigree (2,3,5,2,1)
  Literature value.
  Uncertainty: ;
- Carbon dioxide, fossil [air, urban air close to ground]: 10.1 kg; source Dall'Acqua S. 1995; lognormal variance with pedigree 0.051225, pedigree (2,3,5,2,1)
  Literature value.
  Uncertainty: ;
- Nitrogen, organic bound [water, surface water]: 5.89e-6 kg; source Dall'Acqua S. 1995; lognormal variance with pedigree 0.091225, pedigree (2,3,5,2,1)
  Literature value.
  Uncertainty: ;
- Cyanide [water, surface water]: 1.92e-6 kg; source Dall'Acqua S. 1995; lognormal variance with pedigree 0.091225, pedigree (2,3,5,2,1)
  Literature value.
  Uncertainty: ;
- TOC, Total Organic Carbon [water, surface water]: 0.0989 kg; source Dall'Acqua S. 1995; lognormal variance with pedigree 0.091225, pedigree (2,3,5,2,1)
  Literature value.
  Uncertainty: ;
- Nitrate [water, surface water]: 0.00339 kg; source Dall'Acqua S. 1995; lognormal variance with pedigree 0.091225, pedigree (2,3,5,2,1)
  Literature value.
  Uncertainty: ;
- Nickel, ion [water, surface water]: 1.04e-5 kg; source Dall'Acqua S. 1995; lognormal variance with pedigree 0.701225, pedigree (2,3,5,2,1)
  Literature value.
  Uncertainty: ;

## Sampling procedure
aggregated data, calculated by the producing company itself

## Extrapolations
This dataset has been extrapolated from year 1997 to the year of the calculation (2021). The uncertainty has been adjusted accordingly.

## Review by Roland Hischier 2011-11-15
Transfer of documentation done.

## Review by Heiko Kunst 2007-11-15
passed.
