# natural gas, high pressure, import from GB

Dataset: EcoSpold 2, unit process
Geography: DK
Time period: 2012-01-01 to 2021-12-31
Technology level: current
Classification: ISIC rev.4 ecoinvent: 4930:Transport via pipeline
Scenario: Business-as-Usual
System model: Allocation, cut-off by classification
Share of production covered: 100 %
Generated by: Mireille Faist Emmenegger
Published in: Faist Emmenegger, Mireille 2015
Database: ecoinvent
isCopyrightProtected: true
accessRestrictedTo: 1

## General comment
This dataset describes the transport needed for an average export of British natural gas (expressed in tkm).
An average distance of 785 km is estimated for the export, of which are 235 km offshore pipeline.
.
Characteristics are based on the ecoinvent report v2 'Erdgas' from 2007: HV; 39.13 MJ/m-3; density, 0.79 kg/m-3, 0.67 kg CH4/m-3, 0.0059 kg CO2/m-3

## Included activities start
'Exit gate' of natural gas field.

## Included activities end
'Entry gate' of national market.

## Geography
The average weighted export distance is based on the trade movements 2012.

## Technology
The distance to the different countries is based on rough estimates using maps of pipeline networks.

## Reference product
- natural gas, high pressure: 1 m3; CPC 12020: Natural gas, liquefied or in the gaseous state; By-product classification allocatable product; CAS 14493-06-2
  production volume 1.36e6 m3
    m3 imported 2012 from GB to DK. Total amount of natural gas imports to Denmark according to Central Intelligence Agency (n.d.), The World Factbook, split on countries of origin according to supply mix shares as reported by Schori et al. (2012). Reference(s): Central Intelligence Agency (n.d.) The World Factbook. FIELD LISTING : NATURAL GAS - IMPORTS. Retrieved online from https://www.cia.gov/library/publications/resources/the-world-factbook/fields/2252.html#da, August 31, 2017. Schori S., Frischknecht R., 2012, Life Cycle Inventory of Natural Gas Supply. ESU-services Ltd., Zürich, CH, commissioned by the Swiss Federal Office of Energy SFOE.
  property heating value, net 39 MJ
    Literature value, Source: United Nations Statistics Division (2018) International Recommendations for Energy Statistics (IRES). Available at: http://unstats.un.org/unsd/statcom/doc11/BG-IRES.pdf.
  property price 0.166 EUR2005
    Temporary price data. Calculated as 90% of purchasers price based on: 2005 price for Europe-27 Import (US$ and kg) in UN Commodity Trade Statistics Database - Natural gas in gaseous state (http://data.un.org/Data.aspx?q=natural+gas&d=ComTrade&f=_l1Code%3a28%3bcmdCode%3a271121; accessed 4 January 2011), using density of natural gas of 0.8 kg/m3 for unit conversion.
  property carbon content, fossil 0.602381
    An average C content of 0.506 kg C/ m3 has been assumed (this average has been calculated using data in Tab 3.5, ecoinvent v2.2 report 6_V
  property carbon content 0.602381
    carbon content on a dry matter basis (reserved; not for manual entry)
  properties: water content 0, water in wet mass 0 kg, carbon content, non-fossil 0, dry mass 0.84 kg, heating value, gross 0 MJ, wet mass 0.84 kg, carbon allocation 0.506 kg

## Inputs from technosphere
- transport, pipeline, offshore, long distance, natural gas: 0.18565 metric ton*km; = 235*0.79/1000; lognormal variance with pedigree 0.1286, pedigree (2,1,4,1,1)
  An average distance of 235 km is estimated for off-shore pipeline transport based on the length of the interconnector pipelines between Great Britain and Belgium/the Netherlands.
  Uncertainty: A
- transport, pipeline, onshore, long distance, natural gas: 0.4345 metric ton*km; = 550*0.79/1000; lognormal variance with pedigree 0.1286, pedigree (2,1,4,1,1)
  Average distance deducting the offshore distance and multiplied by the density of natural gas..
  Uncertainty: A
- natural gas, high pressure: 0 m3; pedigree (1,1,1,1,1)
  average losses
  Uncertainty: a
  properties: wet mass 0.84 kg, heating value, net 39 MJ, dry mass 0.84 kg, carbon content, fossil 0.602381
  note on heating value, net: Literature value, Source: United Nations Statistics Division (2018) International Recommendations for Energy Statistics (IRES). Available at: http://unstats.un.org/unsd/statcom/doc11/BG-IRES.pdf.
  note on carbon content, fossil: An average C content of 0.506 kg C/ m3 has been assumed (this average has been calculated using data in Tab 3.5, ecoinvent v2.2 report 6_V
- natural gas, burned in gas motor, for storage: 0.0612 MJ; source Faist Emmenegger, M. 2007; lognormal variance with pedigree 0.0341, pedigree (4,1,4,3,3)
  Data from german industrial expert for 2001, standard technology
  Uncertainty: D
  properties: heating value, net 1 MJ
- natural gas, high pressure: 1.0001 m3; lognormal variance with pedigree 0.026, pedigree (4,1,4,1,1)
  average losses
  Uncertainty: a

## Emissions to nature
All rows: source Faist Emmenegger, M. 2007
- NMVOC, non-methane volatile organic compounds, unspecified origin [air, non-urban air or from high stacks]: 3.51e-6 kg; lognormal variance with pedigree 0.1286, pedigree (2,1,4,1,1)
  calculated based on average losses in storage (0.01%) and british gas composition
  Uncertainty: c
- Ethane [air, non-urban air or from high stacks]: 4.07e-6 kg; lognormal variance with pedigree 0.1286, pedigree (2,1,4,1,1)
  (same comment as for NMVOC, non-methane volatile organic compounds, unspecified origin)
- Mercury [air, non-urban air or from high stacks]: 2e-13 kg; lognormal variance with pedigree 0.0486, pedigree (2,1,4,1,1)
  (same comment as for NMVOC, non-methane volatile organic compounds, unspecified origin)
- Methane, fossil [air, non-urban air or from high stacks]: 6.67e-5 kg; lognormal variance with pedigree 0.1286, pedigree (2,1,4,1,1)
  (same comment as for NMVOC, non-methane volatile organic compounds, unspecified origin)
- Carbon dioxide, fossil [air, non-urban air or from high stacks]: 5.89e-7 kg; lognormal variance with pedigree 0.0086, pedigree (2,1,4,1,1)
  (same comment as for NMVOC, non-methane volatile organic compounds, unspecified origin)

## Sampling procedure
statistics

## Extrapolations
This dataset has been extrapolated from year 2012 to the year of the calculation (2021). The uncertainty has been adjusted accordingly.
