# airport construction

Dataset: EcoSpold 2, unit process
Geography: RoW
Time period: 1990-01-01 to 2021-12-31
Technology level: current
Classification: EcoSpold01Categories: transport systems/airplane
Classification: ISIC rev.4 ecoinvent: 4210:Construction of roads and railways
Scenario: Business-as-Usual
System model: Allocation, cut-off by classification
Generated by: Michael Spielmann (obsolete)
Published in: Spielmann M. 2007
Database: ecoinvent
isCopyrightProtected: true
accessRestrictedTo: 1

## General comment
Based on airport construction RER 2000. The dataset represents the construction, the maintenance and land use and the disposal of airport infrastructure of one entire airport. The data represents the airport in Zurich. The dataset of the maintenance and land use represents the maintenance and land use of one entire airport. The data used represents the situation at the Zurich airport and expressed in per year of operation.

## Included activities start
Based on airport construction RER 2000. The activity starts with the material for the construction (concrete, gravel and reinforcing steel). For the maintenance and land use data, the activity starts with the land transformation and occupation of the airport.

## Included activities end
The activity ends with the construction, the maintenance and land use and the disposal of airport infrastructure of one entire airport. The activity includes the material consumption for the construction (concrete, gravel and reinforcing steel), the energy consumption (diesel and electricity), the excavation, the building of the hall and until and including the building of the multi-storey. For the maintenance and land use data, the activity ends with the maintenance and land use of one airport. The activity includes the land transformation and occupation, the energy consumption (electricity, natural gas, light fuel oil, diesel and petrol), the consumption of propylene glicol and ethylene glicol for de-icing of aircrafts and sealed area, the water consumption (tap water), the emissions to air (carbon dioxide, carbon monoxide, NMVOC and nitrogen oxides), the emissions to water (BOD5, DOC, TOC and COD) and until and including the treatment of sewage.

## Geography
Extrapolated from 'airport construction, RER 2000': Data refers the conditions at the major airport in Switzerland.

## Technology
Construction expenditures for sealed area at airports (excluding built up area) data is available from Maibach et al. (1999). The data represents the airport in Zurich (now unique Airport) and is based on assumptions as follows:
• Foundation layer: 40 cm gravel and a life span of 100 years.
• Concrete floor: of 22 cm with a concrete reinforcement of 1.8 kg steel/m2. The lifespan of the concrete layer is assumed to be 30 33.3 years - thereby requiring 2 replacements over the lifetime of the foundation layer.
• Transport: The transport to the construction site is 25 km.
The data presented in Maibach et al. (1999) represents the condition in the early 1990’ties and assuming a sealed area of 190 ha. In 2000 the sealed area is reported with 330 ha. 40 ha, however, are built up land, so that the sealed non built up area of 290 ha is taken into account in this project. In consequence, the data presented is adjusted by a factor of 1.5 to represent current conditions.
For material and energy consumption due to the construction and disposal of buildings is employed generic modules as available from Kellenberger et al. (2003). For the type, height and specific area consumptions of single buildings no information was readily available. In order to facilitate a first estimate was made the following assumptions:
• 70% of the built up area is occupied with building halls
• 30% are multi storey buildings with an average of 5 floors. The assumed height between the floors is 2 7m Kellenberger et al. (2003) and these are also assumed to have a lifetime of 33.3yrs.
In addition to expenditures due to construction, expenditures due to refurbishment and demolition are accounted for.
The data of the maintenance and land use used for this module describe the situation at the Zurich airport as reported in the environmental report of the Zurich Airport Unique (2002) and expressed in per year of operation . Additional information was available from experts at the airport.
The data merely represent clearing services and infrastructure expenditures within the area of the airport. Air traffic related activities (e.g. traffic to and from the airport) and infrastructure (e.g. operation of multi storage car parks for passengers and airport staff) are not accounted for.
Clearing of the aircraft comprises various transport services (e.g. passenger transport for which a variety of vehicles are used). Whilst some of them are conventional road vehicles, also airport specific vehicles are in operation, for which no life cycle data is available. Thus, the emission data merely represent operation emissions. In addition, the yearly diesel consumption is accounted for, so are obtained emissions of the fuel chain.
Aircraft clearing further includes de-icing activities of both, sealed area and aircraft. Glycol brines are usually used for de icing. Propylene glycol and diethylen glycolare are used for de-icing of aircrafts. For de-icing of sealed area, a composition of isopropanol and ethylene glycol is used. The actually use of these materials differs significantly from year to year. Thus, the geometrical mean for 3 years.
Operation of airport infrastructure comprises the heat and electricity consumption for buildings and aircraft maintenance. Most of the heat consumed at the airport is generated on site using natural gas and oil. Also, water consumption, waste water and waste disposal are included.
In this project is distinguished between land transformation and land occupation Frischknecht et al. (2003).Whilst transformation directly changes the ecological quality of land, occupation postpones changes of the ecological quality.
Occupation refers to the time period for which the land is unavailable for other activities. The occupation intervention is expressed in terms of land use type, area and time. The unit is therefore square metres*year [m2/a]. In general, the airport may be classified as industrial area. In addition we further distinguish three subcategories. The category “industrial area, vegetation” includes the entire non-sealed area of the airport. Sealed area is further divided into built up land and traffic area comprising runways and parking area.
For transformation (the change of land use to be allocated to a certain user or user type) we assumed a life span of 100 years for the Zurich airport. We further assume that the expansions of existing airports are less important. Information on the initial use of the considered airport area has not been considered, since it is not considered as representative. Also, no information on the use of the airport area after a possible cut back has been available.
References:
Maibach M., Peter D. and Seiler B. (1999) Ökoinventar Transporte: Grundlagen für den ökologischen Vergleich von Transportsystemen und den Einbezug von Transportsystemen in Ökobilanzen. Technischer Schlussbericht. In: Schweizerischer Nationalfonds zur Förderung der wissenschaftlichen Forschung (ed. SPP Umwelt M.). 2nd Edition. INFRAS, Zürich
Unique (2002) Umweltbericht 2001 Flughafen Zürich from www.uniqueairport.com/umweltschutz.
Kellenberger D., Althaus H.-J. and Jungbluth N. (2003) Life Cycle Inventories of Building Products. Final report ecoinvent 2000 No. 7. EMPA Duebendorf, Swiss Centre for Life Cycle Inventories, Duebendorf, CH, Online-Version under: www.ecoinvent.ch.
Frischknecht R., Althaus H.-J., Doka G., R. D., Hirschier R., Hellweg S., Jungbluth N., Kellenberger D., Nemecek T., Rebitzer G. and Spielmann M. (2003) Overview and Methodology. Final report ecoinvent 2000 No. 1. ESU-services, Uster, Swiss Centre for Life Cycle Inventories, Duebendorf, CH, Online-Version under: www.ecoinvent.ch.

## Time period
The data represents the condition in the early 1990’ties. However, the data presented is adjusted by a factor of 1.5 to represent current conditions. The use of de-icing materials is calculated as the geometric mean of 3 years.

## Parameters
- fraction, tap water, to air: 0.15 dimensionless; name fraction_TW_to_air; = fraction_PW_to_air; lognormal variance with pedigree 0.092025, pedigree (4,4,3,2,4)
  Calculated value. See comment in the other parametres present in this dataset. Tap water is considered to be always used as process water, thus process water fractions to air are applied to all tap water input flows to calculate the amount of water consumed in the processes.
- fraction, process water, to air: 0.15 dimensionless; name fraction_PW_to_air; lognormal variance with pedigree 0.092025, pedigree (4,4,3,2,4)
  Literature value. In case when no industry/process specific data are available, default evaporation fraction value is used. This value is 15% and is based on literature (Statistics Canada, 2007 & Shaffer, K.H., 2008, Consumptive water use in the Great Lakes Basin, USGS & Shiklomanov, 2003, World Water Resources at the Beginning of the 21st Century) and has been approved by an expert.

## Reference product
- airport: 1 unit; name RP_amount_1; CPC 53213: Airfield runways; By-product classification allocatable product
  production volume 3.51309 unit; name RP_PV_1
    Calculated from total 'transport, freight, aircraft, intracontinental': 2.97E-11 (unit/tkm)', 'transport, freight, aircraft, intercontinental': 2.48E-12 (unit/tkm)', 'transport, passenger, aircraft, intracontinental': 2.97E-12 (unit/pkm), and 'transport, passenger, aircraft, intercontinental': 2.48E-13 (unit/pkm).
  property price 3.06047e9 EUR2005
    Calculated based on inputs: The price of the product has been calculated as a sum of the values of the material and energy inputs for this product. This value is therefore a rough estimation. It may underestimate the real price since there are additional expenses when producing any product. These expences can include for example labour costs, treatment of waste materials and profit for the producer. Please consider carefully whether this level of data quality is acceptable for your application.

## Inputs from technosphere
- excavation, skid-steer loader: 74700 m3; source Maibach M. 1999; lognormal variance with pedigree 0.1806, pedigree (4,3,5,5,1)
  Calculated value. The data presented in Maibach et al. (1999) represents the condition in the early 1990’ties and assuming a sealed area of 190 ha. In 2000 the sealed area is reported with 330 ha. 40 ha, however, are built up land, so that the sealed non built up area of 290 ha is taken into account in this project. In consequence, the data presented is adjusted by a factor of 1.5 to represent current conditions.
  Uncertainty: l
- propylene glycol, liquid: 1.64e8 kg; source Unique 2002; lognormal variance with pedigree 0.112, pedigree (1,1,5,5,1)
  Literature value. Aircraft clearing further includes de-icing activities of both, sealed area and aircraft. Glycol brines are usually used for de icing. Propylene glycol and diethylen glycolare are used for de-icing of aircrafts. For de-icing of sealed area, a composition of isopropanol and ethylene glycol is used. The actually use of these materials differs significantly from year to year. Thus, the geometrical mean for 3 years. Maintenance and land use
  properties: heating value, net 27.09 MJ, carbon content, fossil 0.473684, wet mass 1 kg, dry mass 1 kg
- decommissioned airport infrastructure, contaminated gravel: -1 unit; name BP_amount_1; lognormal variance with pedigree 0.162, pedigree (1,1,5,5,1)
  production volume 3.51309 unit; = RP_PV_1 * (BP_amount_1 / RP_amount_1)
    Calculated from production volume of reference product using the relative outputs.
  properties: carbon content, fossil 0.00149419, dry mass 1.13322e9 kg, wet mass 1.13322e9 kg, carbon content, non-fossil 0.009271
  note on carbon content, fossil: Calculated from C content in input materials in the infrastructure
- heat, district or industrial, other than natural gas: 0 MJ; source Unique 2002; pedigree (1,1,1,1,1)
  Calculated value. Operation of airport infrastructure comprises the heat and electricity consumption for buildings and aircraft maintenance. Most of the heat consumed at the airport is generated on site using natural gas and oil. Maintenance and land use
  Uncertainty: e
  properties: heating value, net 1 MJ
- reinforcing steel: 180000 kg; source Maibach M. 1999; lognormal variance with pedigree 0.0606, pedigree (4,3,5,5,1)
  (same comment as for excavation, skid-steer loader)
  properties: dry mass 1 kg, wet mass 1 kg, carbon content, fossil 0.004
- tap water: 0 kg; name tap_water_input; source Unique 2002; pedigree (1,1,1,1,1)
  Calculated value. Maintenance and land use
  Uncertainty: e
  properties: wet mass 1 kg, dry mass 0.000337476 kg, water content 2962.17, carbon content, fossil 0.00178991
  note on carbon content, fossil: Bicarbonate content is 2.93 mol/m3. CO2 content is 0.1 mol/m3 (ecoinvent v2.2 report 8, Tab 93.1).
- gravel, crushed: 0 kg; source Maibach M. 1999; pedigree (1,1,1,1,1)
  (same comment as for excavation, skid-steer loader)
  properties: wet mass 1 kg, dry mass 1 kg
- ethylene glycol: 4.1e7 kg; source Unique 2002; lognormal variance with pedigree 0.162, pedigree (1,1,5,5,1)
  (same comment as for propylene glycol, liquid)
  properties: heating value, net 23.44 MJ, carbon content, fossil 0.387097, dry mass 1 kg, wet mass 1 kg
- wastewater, unpolluted: -1.32e8 m3; name BP_amount_2; source Unique 2002; lognormal variance with pedigree 0.062, pedigree (1,4,5,5,3)
  Literature value. The data used for this module describe the situation at the Zurich airport as reported in the environmental report of the Zurich Airport Unique (2002) and expressed in per year of operation. Maintenance and land use
  Uncertainty: e
  production volume 4.63728e8 m3; = RP_PV_1 * (BP_amount_2 / RP_amount_1)
    Calculated from production volume of reference product using the relative outputs.
  properties: carbon content, fossil 0.00178991, wet mass 1000 kg, carbon content, non-fossil 0.00178991, water content 2962.17, dry mass 0.337476 kg
  note on carbon content, fossil: Assumed to be like in tap water. Bicarbonate content is 2.93 mol/m3. CO2 content is 0.1 mol/m3 (ecoinvent v2.2 report 8, Tab 93.1).
- diesel, burned in building machine: 2.5e7 MJ; source Maibach M. 1999; lognormal variance with pedigree 0.1806, pedigree (4,3,5,5,1)
  (same comment as for excavation, skid-steer loader)
  properties: heating value, net 1 MJ
- electricity, medium voltage: 0 kWh; source Maibach M. 1999; pedigree (1,1,1,1,1)
  3.57E+06 kWh of electricity is used for the construction of the airport. Calculated value. The data presented in Maibach et al. (1999) represents the condition in the early 1990’ties and assuming a sealed area of 190 ha. In 2000 the sealed area is reported with 330 ha. 40 ha, however, are built up land, so that the sealed non built up area of 290 ha is taken into account in this project. In consequence, the data presented is adjusted by a factor of 1.5 to represent current conditions.
  1.72E+10 kWh of electricity is used for the maintenance and land use of the airport. Calculated value. Operation of airport infrastructure comprises the heat and electricity consumption for buildings and aircraft maintenance. 2002, Unique, Umweltbericht 2001 Flughafen Zürich, 3 - SeparatePublication
  Uncertainty: l
- heat, district or industrial, natural gas: 0 MJ; source Unique 2002; pedigree (1,1,1,1,1)
  (same comment as for heat, district or industrial, other than natural gas)
  properties: heating value, net 1 MJ
- building, multi-storey: 1.62e6 m3; source Kellenberger D. 2003; lognormal variance with pedigree 0.3686, pedigree (4,3,5,5,3)
  Literature value. For material and energy consumption due to the construction and disposal of buildings is employed generic modules as available from Kellenberger et al. (2003). 30% are multi storey buildings with an average of 5 floors. The assumed height between the floors is 2.7m Kellenberger et al. (2003) and these are also assumed to have a lifetime of 33.3yrs.
  Uncertainty: s
- petrol, unleaded: 0 kg; source Unique 2002; pedigree (1,1,1,1,1)
  Calculated value. Maintenance and land use
  Uncertainty: e
  properties: carbon content, fossil 0.865, wet mass 1 kg, dry mass 1 kg, heating value, net 43.2 MJ
  note on heating value, net: Assumed equal to "petroleum". LHV for petroleum: Based on literature, page 7, Report6, part 4
- concrete, medium strength: 0 m3; source Maibach M. 1999; pedigree (1,1,1,1,1)
  Literature value. Construction expenditures for sealed area at airports (excluding built up area) data is available from Maibach et al. (1999). The data represents the airport in Zurich. Concrete floor: of 22 cm with a concrete reinforcement of 1.8 kg steel/m2. The lifespan of the concrete layer is assumed to be 33.3 years - thereby requiring 2 replacements over the lifetime of the foundation layer.
  Uncertainty: l
  properties: water content 0.086758, dry mass 2190 kg, wet mass 2380 kg
- building, hall: 280000 m2; source Kellenberger D. 2003; lognormal variance with pedigree 0.3686, pedigree (4,3,5,5,3)
  Literature value. For material and energy consumption due to the construction and disposal of buildings is employed generic modules as available from Kellenberger et al. (2003). 70% of the built up area is occupied with building halls.
  Uncertainty: s
- diesel: 0 kg; source Unique 2002; pedigree (1,1,1,1,1)
  Literature value. Expenditures due to clearing of aircrafts. Maintenance and land use
  Uncertainty: e
  properties: dry mass 1 kg, wet mass 1 kg, heating value, net 42.8 MJ, carbon content, fossil 0.865
  note on carbon content, fossil: C-content of diesel is 86.5% (ecoinvent v2.2 report 6_IV, Tab 3.14)
- heat, district or industrial, other than natural gas: 4.00481e6, 9.876e9 MJ (2 entries); source Unique 2002; lognormal variance with pedigree 0.062, pedigree (1,4,5,5,3)
  (same comment as for heat, district or industrial, other than natural gas)
- tap water: 2.41731e9, 2.90979e8, 4.80891e8, 1.21262e10, 3.15459e8, 8.97319e8, 1.38766e11 kg (7 entries); source Unique 2002; lognormal variance with pedigree 0.062, pedigree (1,4,5,5,3)
  Calculated value. Maintenance and land use
  Uncertainty: e
- gravel, crushed: 1.02403e6, 93750, 4.68799e6, 1.79942e7 kg (4 entries); source Maibach M. 1999; lognormal variance with pedigree 0.0606, pedigree (4,3,5,5,1)
  (same comment as for excavation, skid-steer loader)
- electricity, medium voltage: 2.16854e8, 4.15833e7, 6.98097e8, 1.01532e10, 1.4311e9, 4.66273e9 kWh (6 entries); source Maibach M. 1999; lognormal variance with pedigree 0.07, pedigree (4,4,5,5,3)
  (same comment as for electricity, medium voltage)
- heat, district or industrial, natural gas: 8.3055e8, 5.38895e10 MJ (2 entries); source Unique 2002; lognormal variance with pedigree 0.062, pedigree (1,4,5,5,3)
  (same comment as for heat, district or industrial, other than natural gas)
- petrol, unleaded: 1.84e6, 493450, 2.03932e6, 101317, 491847, 5.66341e7 kg (6 entries); source Unique 2002; lognormal variance with pedigree 0.062, pedigree (1,4,5,5,3)
  Calculated value. Maintenance and land use
  Uncertainty: e
- concrete, medium strength: 5349.21, 1957.46, 7587.48, 5576.43, 1529.42 m3 (5 entries); source Maibach M. 1999; lognormal variance with pedigree 0.0606, pedigree (4,3,5,5,1)
  (same comment as for concrete, medium strength)
- diesel: 1.38383e7, 665265, 2.79289e7, 1.9563e6, 2.82761e6, 2.75784e8 kg (6 entries); source Unique 2002; lognormal variance with pedigree 0.062, pedigree (1,4,5,5,3)
  (same comment as for diesel)

## Inputs from nature
- Transformation, from unspecified [natural resource, land]: 8.8e6 m2; source Unique 2002; lognormal variance with pedigree 0.182, pedigree (1,4,5,5,3)
  Literature value. For transformation (the change of land use to be allocated to a certain user or user type) we assumed a life span of 100 years for the Zurich airport. Is assumed that the expansions of existing airports are less important. Information on the initial use of the considered airport area has not been considered, since it is not considered as representative. Also, no information on the use of the airport area after a possible cut back has been available. Maintenance and land use
  Uncertainty: e
- Occupation, industrial area [natural resource, land]: 5.9e8 m2*year; lognormal variance with pedigree 0.102, pedigree (1,4,5,5,3)
  Oral communication. The figures are based on oral communication with Mr. Strahm (Masterplanung; uniqueairport, Zürich)
  Occupation refers to the time period for which the land is unavailable for other activities. The occupation intervention is expressed in terms of land use type, area and time. The unit is therefore square metres*year [m2/a]. In general, the airport may be classified as industrial area. In addition we further distinguish three subcategories. The category “industrial area, vegetation” includes the entire non-sealed area of the airport. Sealed area is further divided into built up land and traffic area comprising runways and parking area. Maintenance and land use
  Uncertainty: e
- Transformation, to traffic area, road network [natural resource, land]: 2.9e6 m2; source Unique 2002; lognormal variance with pedigree 0.182, pedigree (1,4,5,5,3)
  (same comment as for Transformation, from unspecified)
- Transformation, to industrial area [natural resource, land]: 5.9e6 m2; source Unique 2002; lognormal variance with pedigree 0.182, pedigree (1,4,5,5,3)
  (same comment as for Transformation, from unspecified)
- Occupation, traffic area, road network [natural resource, land]: 2.9e8 m2*year; lognormal variance with pedigree 0.102, pedigree (1,4,5,5,3)
  (same comment as for Occupation, industrial area)

## Emissions to nature
- BOD5, Biological Oxygen Demand [water, unspecified]: 6.81e7 kg; source Maibach M. 1999; lognormal variance with pedigree 0.842, pedigree (1,1,5,5,1)
  Estimated value. 20% of the amont of ethylene glycol and propylene glycol are accounted for. Maintenance and land use
- Water [air, unspecified]: 2.32941e7 m3; name water_to_air_unspecified; = (tap_water_input/1000)*fraction_TW_to_air; lognormal variance with pedigree 0.130025, pedigree (4,4,5,2,4)
  Calculated value based on literature values and expert opinion. See comments in the parametres' comment field.
  property fraction, origin: salt water 0; name fraction_origin_salt_water
  property fraction, origin: unspecified 0; name fraction_origin_unspecified
  property fraction, origin: fresh water 1; name fraction_origin_fresh_water
- Carbon dioxide, fossil [air, non-urban air or from high stacks]: 1.21e9 kg; source Unique 2002; lognormal variance with pedigree 0.062, pedigree (1,4,5,5,3)
  Calculated value. Data of aircraft clearing in the environmental report includes kerosene consumption caused by turbine starting and operation of auxiliary turbines. The consumption of kerosene is already accounted for in the operation of an aircraft. Thus, environmental exchanges due to kerosene use are excluded. This is achieved by calculating the CO2 emissions of the used diesel and gasoline and determine the share of CO2 emissions due to the burning of these fuels. About 1/3 of the CO2 emissions result from burning of diesel and gasoline fuels for on-site transport processes. Maintenance and land use
  Uncertainty: e
- Carbon monoxide, fossil [air, non-urban air or from high stacks]: 714000 kg; source Unique 2002; lognormal variance with pedigree 0.712, pedigree (1,4,5,5,3)
  (same comment as for Carbon dioxide, fossil)
- Nitrogen oxides [air, non-urban air or from high stacks]: 5.21e6 kg; source Unique 2002; lognormal variance with pedigree 0.102, pedigree (1,4,5,5,3)
  (same comment as for Carbon dioxide, fossil)
- COD, Chemical Oxygen Demand [water, unspecified]: 6.81e7 kg; source Maibach M. 1999; lognormal variance with pedigree 0.842, pedigree (1,1,5,5,1)
  (same comment as for BOD5, Biological Oxygen Demand)
- TOC, Total Organic Carbon [water, unspecified]: 2.02e7 kg; source Maibach M. 1999; lognormal variance with pedigree 0.842, pedigree (1,1,5,5,1)
  (same comment as for BOD5, Biological Oxygen Demand)
- DOC, Dissolved Organic Carbon [water, unspecified]: 2.02e7 kg; source Maibach M. 1999; lognormal variance with pedigree 0.842, pedigree (1,1,5,5,1)
  (same comment as for BOD5, Biological Oxygen Demand)
- NMVOC, non-methane volatile organic compounds, unspecified origin [air, non-urban air or from high stacks]: 2.37e7 kg; source Unique 2002; lognormal variance with pedigree 0.102, pedigree (1,4,5,5,3)
  Literature value. The major source of VOC accounted for as NMVOC are processes in the service garage. Maintenance and land use
  Uncertainty: e

## Sampling procedure
literature studies and oral communication.

## Extrapolations
This dataset has been copied from an original dataset covering the geography RER. The uncertainty has been adjusted accordingly.

## Review by Carl Vadenbo 2012-06-27
In preparation for the release of ecoinvent v3.0, the datasets 'airport RER' and 'operation, maintenance, airport RER' in ecoinvent v2.2 were merged and extrapolated into the dataset 'airport construction, GLO 1990-2000' and the output of 'decommissioned airport infrastructure' was added. The amounts of the exchanges were reviewed and were found to correspond to the disaggregated datasets. The uncertainty information has only been adjusted for geographical representativeness in GLO, and consequently needs to be revised before subsequent releases of the database. Despite this shortcoming, the new dataset was accepted for inclusion into the ecoinvent database on 2012.07.06.

## Review by Niels Jungbluth 2003-09-23
passed.
