# electricity, high voltage, production mix

Dataset: EcoSpold 2, unit process, production mix
Geography: PE
Time period: 2014-01-01 to 2021-12-31
Scenario: Business-as-Usual
System model: Allocation, cut-off by classification
Generated by: [System]
Database: ecoinvent
isCopyrightProtected: false
accessRestrictedTo: 1

## General comment
The shares of electricity technologies on this market are valid for the year 2018. They have been calculated by the data provider and don't correspond with the production volumes entered in the undefined datasets of the different electricity supplying technologies. The shares have been calculated based on statistics from 2018: IEA World Energy Statistics and Balances. OECD iLibrary, eISSN: 1683-4240, DOI: 10.1787/enestats-data-en. Grid losses are based on data from 2018 (also IEA World Energy Statistics and Balances).

## Technology
Average technology used to transmit and distribute electricity. Includes underground and overhead lines. Electricity production according to related technology datasets.
Definition of the voltage levels:
- High voltage level above 24 kV (large scale industry)
- Medium voltage level between 1 kV and 24 kV (medium to small scale industry, service sector
and public buildings)
- Low voltage level below 1 kV (Households)

## Reference product
- electricity, high voltage: 1 kWh; By-product classification allocatable product; CPC 17100: Electrical energy
  production volume 4.77293e10 kWh
  property price 0.0977 EUR2005
    Temporary price data. Calculated as 90% of purchasers price based on: 94% of the average price (to account for a 6% loss in transformation and transmission) for electricity for industrial consumersin 2005 (excluded taxes). From IEA.

## Inputs from technosphere
- electricity, high voltage: 0 kWh; pedigree (1,1,1,1,1)
  Calculated value/estimation. This value compensates for the losses during transmission/distribution on this electricity market. The calculation is made based on total electricity losses between net electricity available at the busbar and the use of electricity calculated based on the Subdirección de Gestión de la Información. COES, 2014. Electricity supply vs. transmission losses. COES, 2014.
  Total electricity supply: 41796 GWh
  Total demand: 40206 GWh
  Total transmission losses: 1590 GWh
  These total losses over the whole chain are then allocated to the different voltage levels as well as transformation and transmission losses based on generic data taken from the City of Zürich in 2009.
  Voltage level (definitions taken from Itten et al. 2014).
  High voltage level (>24 kV)
  Fraction of total consumption at high voltage level (generic, data taken from Switzerland): 4%.
  Total losses on high voltage level (generic, data taken from the City of Zürich in 2009): 39%
  Of which: Transmission: 33%
  Of which: Transformation: 6%
  Medium voltage level (1kV - 24 kV)
  Fraction of total consumption at medium voltage level (generic, data taken from Switzerland): 32%.
  Total losses on medium voltage level (generic, data taken from the City of Zürich in 2009): 13%
  Of which: Transmission: 5%
  Of which: Transformation: 8%
  Low voltage level (>1kV)
  Fraction of total consumption at low voltage level (generic, data taken from Switzerland): 64%.
  Total losses on medium voltage level (generic, data taken from the City of Zürich in 2009): 48%
  Of which: Transmission: 24%
  Of which: Transformation: 24%
  Calculation details:
  Loss coefficient: How much electricity has been lost referred to the previous amount of available electricity (1,48%)= [Total electricity supply (41796 GWh)- Amount of electricity available at HV (41176 GWh)]/ Total electricity supply (41796 GWh)
  Amount of electricity available at HV (41176 GWh)= Total electricity supply (41796 GWh)- Absolute losses on HV, transmission and transformation within HV grid (620 GWh)
  Absolute losses on HV, transmission and transformation within HV grid (620 GWh)= Total transmission losses (1590 GWh)* Total losses on high voltage level (39%)
  Sources:
  COES, 2014. Sub Dirección de Gestión de la Información. RA-SGI-0115. ESTADISTICA RELEVANTE DEL SISTEMA ELÉCTRICO INTERCONECTADO NACIONAL, (2014). Cap. 06 PRODUCCIÓN TERMOELÉCTRICA Y CONSUMO DE COMBUSTIBLE. Retrieved online from http://www.coes.org.pe/Portal/Publicaciones/Estadisticas/ 2014/PDF/11_OPERACION DEL SISTEMA DE TRANSMISION, CUADRO N° 11.3 PÉRDIDAS EN EL SISTEMA DE TRANSMISIÓN (page 7). August, 22 2017
  Itten R., Frischknecht R., Stucki M. 2014. Life Cycle Inventories of Electricity Mixes and Grid. Version 1.3. treeze, Uster, Switzerland
- electricity, high voltage: 0, 0, 0, 0, 0, 0, 0 kWh (7 entries)
  properties: price 0.0977 EUR2005
- electricity, high voltage: 0, 0, 0 kWh (3 entries)
  properties: exergy 3.6 MJ, price 0.0977 EUR2005
  note on exergy: allocation factor for electricity (=1) vs. heat, where heat is calculated as the termodynamic mean temperature Tm = (Tfeed-Treturn)/ln(Tfeed/Treturn), relative to the application temperature (Tu, typically = 293 K), i.e. (Tm-Tu)/Tm
- electricity, high voltage: 0.000542496 kWh
  production volume 2.47811e7 kWh
- electricity, high voltage: 0.595058 kWh
  production volume 2.71821e10 kWh
- electricity, high voltage: 0.311388 kWh
  production volume 1.42241e10 kWh
- electricity, high voltage: 0.0519285 kWh
  production volume 2.37208e9 kWh
- electricity, high voltage: 0.006225 kWh
  production volume 2.84356e8 kWh
- electricity, high voltage: 0.0298118 kWh
  production volume 1.3618e9 kWh
- electricity, high voltage: 0.00087743 kWh
  production volume 4.00808e7 kWh
- electricity, high voltage: 0.00416858 kWh
  production volume 1.9042e8 kWh

## Extrapolations
This dataset has been extrapolated from year 2017 to the year of the calculation (2021). The uncertainty has been adjusted accordingly.
