# electricity production, hydro, run-of-river

Dataset: EcoSpold 2, unit process
Geography: CA-QC
Time period: 1945-01-01 to 2021-12-31
Technology level: current
Classification: ISIC rev.4 ecoinvent: 3510:Electric power generation, transmission and distribution
Classification: EcoSpold01Categories: hydro power/power plants
Tags: Canada; hydro power
Scenario: Business-as-Usual
System model: Allocation, cut-off by classification
Generated by: Karin Treyer
Published in: Bolliger, R. 2007
Database: ecoinvent
isCopyrightProtected: true
accessRestrictedTo: 1

## General comment
A modifier This dataset represents the production of 1kWh of electricity in a run-of-river hydropower power plant in Quebec in 2008. This dataset is based on study on the production, transmission and distribution of electricity in Quebec in the 2008-2013 period. It represents an average of all the run-of-river power plants that belong to Hydro-Quebec, which is the main electricity provider in the region (about 95% of the total electricity produced). The inventory is based on a sample of 38 run-of-river power plants that combine for 13200MW, with different capacity (from 1800 MW to 4MW) and all the dams and derivations that were built to ensure the operation of the plants. Lifetime is assumed to be 100 years for the plant. Only main consumed products, wastes and emissions are included. Operation data were collected for the 2008-2013 period.
Baumann J. (1949) Kraftwerk Rupperswil-Auenstein. Verlag Kraftwerk
Rupperswil-Auenstein AG, Rupperswil.
Nordostschweizerische Kraftwerke AG (NOK) (1956) Das Kraftwerk
Wildegg-Brugg. In: Schweizerische Bauzeitung, 74 (4), 47-52; 74 (5), 63-67; 74
(6), 83-88; 74 (7), 93-99; 74 (8), 111-116; 74 (10), 145-147; 74 (12), 167-172.
Aegerter A., Dr. Bosshardt O. (1954) Das Kraftwerk Birsfelden. In: Wasser- und
Energiewirtschaft, 46 (5-7), 165-176.
Brux G. (1983) Das Donaukraftwerk Greifenstein. In: Wasser, Energie, Luft, 75
(1-2), 11-13.
Radag A. (1979) 50 Jahre Rheinkraftwerk Albbruck-Dogern Aktiengesellschaft.
Waldshut/Rhein, 1929-1979.
Bundesamt für Energiewirtschaft (2001) Elektrizitatsstatistik 2000. Bern,
Schweiz.
Schweiz.
[This dataset is meant to replace the following datasets:]

## Included activities start
From (potential) energy in water, entering the power plant and use of power plant infrastructure.

## Included activities end
The activity ends with 1 kWh of high voltage electricity produced at the power plant and arrived at the busbar.

The dataset includes main operation and maintenance activities and materials of the power plants, such as lubricating oil or mass of water passing through the turbines..

This dataset doesn"t include
- land use for access roads to the power plant, raw materials extraction, decommissioning and waste treatment as these activities are already included in the infrastructure datasets
- transformation of the electricity produced.
- minor activities, materials and wastes.

## Geography
Data collected for Quebec

## Technology
"All the technologies (type of dam, type of turbine, etc.) and capacities present in the region are included in the dataset.
Capacities range from 1800MW to 4MW.
Several type of dam and infrastructures are include but the operation was assumed to be equivalent for all of them and only related to the installed power."
References:
König F., von (1985) Bau von Wasserkraftanlagen. C.F. Müller, Karlsruhe.
König F., von (1985) Bau von Wasserkraftanlagen. C.F. Müller, Karlsruhe.

## Time period
Operation data were collected for the 2008-2013 period, but it is assumed valid for all the operation lifetime.
Production volume valid for 2014

## Parameters
- lifetime: 100 year; lognormal variance with pedigree 0.0014, pedigree (2,2,1,3,1)
  Estimation based on experiences.
  nan
- losses from gross electricity production: 0.01 dimensionless; name losses_gross_net; lognormal variance with pedigree 0.003225, pedigree (3,3,1,2,1)
  Literature value. Generic value taken from the IEA Electricity information 2014, part I, p. I.7: "The difference between gross and net electricity production is generally observed to be about 7% for conventional thermal stations, 1% for hydro stations and 6% for nuclear."
  IEA/OECD. 2014. Electricity Information 2014. International Energy Agency (IEA), Paris Cedex (FR).
  nan
  Uncertainty: G
- total net electricity: 1.73e11 kWh; name totalElectricity; lognormal variance with pedigree 0.001325, pedigree (2,2,1,2,1)
  Total electricity produced by Hydro-Quebec
  in 2014
- gross electricity production: 6.713e10 kWh; name gross_electricity; = 6.386e10+60%*5.45e9; lognormal variance with pedigree 0.0013, pedigree (2,2,1,1,1)
  Collected data from Hydro-Quebec. It includes both the self produced and the electricity purchased from private productors (40% of hydropower purchased comes from reservoir plants and 60% from run-of-river).
  Data for 2014:
  Self produced: 6.386e10kWh
  purchased:60%* 5.45e9kWh

## Reference product
- electricity, high voltage: 1 kWh; By-product classification allocatable product; CPC 17100: Electrical energy
  production volume 6.64587e10 kWh; name apv_electricity; = gross_electricity*(1-losses_gross_net)
    Calculated value
  property price 0.0977 EUR2005
    Temporary price data. Calculated as 90% of purchasers price based on: 94% of the average price (to account for a 6% loss in transformation and transmission) for electricity for industrial consumersin 2005 (excluded taxes). From IEA.

## Inputs from technosphere
- lubricating oil: 4.56893e-7 kg; name lubricating_oil; = 79042.5* (apv_electricity/ totalElectricity)/apv_electricity; lognormal variance with pedigree 0.25, pedigree (1,1,5,1,5)
  Estimated value. From Hydro-Quebec. It is assumed that the same quantity managed at the end of life is used
  properties: carbon content, fossil 0.75, heating value, net 40.2 MJ, wet mass 1 kg, dry mass 1 kg
  note on carbon content, fossil: Lubricating oil is produced from diesel. C-content/dry mass of fats and oils considered 75%, from: ecoinvent v2.2 report, n 15a, pg 40
  note on heating value, net: Literature value, Source: IPCC 2006, 2006 IPCC Guidelines for National Greenhouse Gas Inventories, Prepared by the National Greenhouse Gas Inventories Programme, Eggleston H.S., Buendia L., Miwa K., Ngara T. and Tanabe K. (eds). Published: IGES, Japan
- waste mineral oil: -4.56893e-7 kg; name waste_oil; = (lubricating_oil)*-1; lognormal variance with pedigree 0.132, pedigree (1,1,5,5,1)
  Measured value. From Hydro-Québec. It is assumed that the same quantity managed at the end of life is used
  production volume 30364.5 kg; = apv_electricity* waste_oil
    Calculated from the production volume of electricity, high voltage, hydro, run-of-river in proportion to the respective output amounts.
  property price 0 EUR2005; name waste_oil_price_EUR2005
  properties: heating value, net 34.7 MJ, carbon content, fossil 0.864444, dry mass 0.9 kg, water content 0.111111, wet mass 1 kg
  note on heating value, net: Value taken from the general comment of the treatment dataset.
  note on carbon content, fossil: Tab A.6, ecoinvent v2.2 report 13_I. C content has been calculated after data in the tables, and then referred to 1 kg DM
- transport, freight, lorry, unspecified: 5.63584e-5 metric ton*km; = 9.75e6*(apv_electricity/ totalElectricity)/apv_electricity; lognormal variance with pedigree 0.0032, pedigree (2,1,3,1,1)
  Measured value. Vehicles used for maintenance during operation
- transport, passenger car: 2.52023e-5 km; = 4.36e6*(apv_electricity/ totalElectricity)/apv_electricity; lognormal variance with pedigree 0.0032, pedigree (2,1,3,1,1)
  Measured value. Vehicles used for maintenance during operation
- transport, helicopter: 1.48362e-7 hour; = 9.24e7*(apv_electricity/ totalElectricity)/(apv_electricity*3600); lognormal variance with pedigree 0.0032, pedigree (2,1,3,1,1)
  Measured value. Vehicles used for maintenance during operation
- hydropower plant, run-of-river: 1.50469e-13 unit; = 1/(lifetime*apv_electricity); lognormal variance with pedigree 0.044, pedigree (1,1,3,5,1)
  Calculated value. Based on lifetime capacity
- transport, freight, light commercial vehicle: 2.98844e-5 metric ton*km; = 5.17e6* (apv_electricity/ totalElectricity)/apv_electricity; lognormal variance with pedigree 0.0032, pedigree (2,1,3,1,1)
  Measured value. Vehicles used for maintenance during operation

## Inputs from nature
- Transformation, from pasture, man made [natural resource, land]: 2.81e-5 m2; name transformation_pasture; lognormal variance with pedigree 0.176025, pedigree (1,5,5,2,3)
  Estimation. To estimate the area of the water courses (i.e. the section between the water inlet and the weir) the length and average width according to the map is multiplied. As a result an index (approximate value) is calculated where the facts that hydropower plants affect natural habitats and disturb ground water are accounted for. Averaged over the investigated sample and distributed over life time the specific land use amounts to 4,5 10^-3 m2a/kWh, the transformation of land amounts to 5,6 10^-3 m2a/kWh. Thereby major rivers show lower values than small ones.
  Due to the fact that the calculated value represents an index value, it is not a hundred per cent comparable with other information relating to areas. In Switzerland the area before operation of the run-of-river plant is defined as "transformation from pasture" and "transformation from shrub land". This is because of cultivated land reclamation reasons flood protection and drainage measures have been implemented in the past. Due to the fact that it is not allowed fertilizing the area bordering the river, this land is assumed to be shrub land. Thereby, a ratio of 50 % for shrub land and 50 % for pasture is estimated.
  The area after commissioning of the run-of-river plant is defined as "transformation to river, artificial". Land use for the weir and the power station is defined as "transformation to industrial area" at which 1 % of the value is defined for the water course. Land use for access roads can be neglected because most of the power plants are built on developed land.
  It has to be pointed out that run-of-river power plants do not necessarily have a negative impact on the ecological situation (e.g. new construction of the power plant Ruppoldingen).
- Transformation, from shrub land, sclerophyllous [natural resource, land]: 2.81e-5 m2; name transformation_shrub; lognormal variance with pedigree 0.176025, pedigree (1,5,5,2,3)
  Estimation. Data are adopted from the Swiss power plant sample as it stands, therefore uncertainty is increased.
  To estimate the area of the water courses (i.e. the section between the water inlet and the weir) the length and average width according to the map is multiplied. As a result an index (approximate value) is calculated where the facts that hydropower plants affect natural habitats and disturb ground water are accounted for. Averaged over the investigated sample and distributed over life time the specific land use amounts to 4,5 10^-3 m2a/kWh, the transformation of land amounts to 5,6 10^-3 m2a/kWh. Thereby major rivers show lower values than small ones.
  Due to the fact that the calculated value represents an index value, it is not a hundred per cent comparable with other information relating to areas. In Switzerland the area before operation of the run-of-river plant is defined as "transformation from pasture" and "transformation from shrub land". This is because of cultivated land reclamation reasons flood protection and drainage measures have been implemented in the past. Due to the fact that it is not allowed fertilizing the area bordering the river, this land is assumed to be shrub land. Thereby, a ratio of 50 % for shrub land and 50 % for pasture is estimated.
  The area after commissioning of the run-of-river plant is defined as "transformation to river, artificial". Land use for the weir and the power station is defined as "transformation to industrial area" at which 1 % of the value is defined for the water course. Land use for access roads can be neglected because most of the power plants are built on developed land.
  It has to be pointed out that run-of-river power plants do not necessarily have a negative impact on the ecological situation (e.g. new construction of the power plant Ruppoldingen).
- Energy, potential (in hydropower reservoir), converted [natural resource, in water]: 3.79 MJ; undefined min 3.79, max 3.79, standardDeviation95 0, pedigree (1,1,3,1,1)
  Reflects range average to best performance.
- Occupation, river, artificial [natural resource, land]: 0.00562 m2*year; = (transformation_pasture+ transformation_shrub)*lifetime; lognormal variance with pedigree 0.082, pedigree (1,1,5,5,1)
  Calculated value. Total surface multiplied by the lifetime
- Transformation, to river, artificial [natural resource, land]: 5.5638e-5 m2; = (transformation_pasture+ transformation_shrub)*.99; lognormal variance with pedigree 0.162, pedigree (1,1,5,5,1)
  Calculated value
- Transformation, to industrial area [natural resource, land]: 5.62e-7 m2; name transformation_to_industrial; = (transformation_pasture+ transformation_shrub)*.01; lognormal variance with pedigree 0.16, pedigree (4,1,3,5,3)
  Estimated value. It is assumed that 1% is occupied by the dams and infrastructures
- Water, turbine use, unspecified natural origin [natural resource, in water]: 13 m3; name water_turbine_use_UNO_input; lognormal variance with pedigree 0.0032, pedigree (2,1,3,1,1)
  Calculated value based on Hydro Quebec total turbined water and total hydropower production

## Emissions to nature
- Water [water, unspecified]: 13 m3; name water_to_water_unspecified; = water_turbine_use_UNO_input; lognormal variance with pedigree 0.130025, pedigree (4,4,5,2,4)
  Calculated value based on literature values and expert opinion. It has been estimated that there is no emission to air. All the turbine water which enters the activity is released back to water.
  property fraction, origin: salt water 0; name fraction_origin_salt_water
  property fraction, origin: fresh water 1; name fraction_origin_fresh_water
  property fraction, origin: unspecified 0; name fraction_origin_unspecified

## Sampling procedure
Data collection from the company including all its activities

## Extrapolations
This dataset has been extrapolated from year 2015 to the year of the calculation (2021). The uncertainty has been adjusted accordingly.

## Review by Carl Vadenbo 2015-06-01
The update of the whole electricity sector for the ecoinvent v3.2 database consist of hundreds of datasets. All these datasets have passed through a streamlined review processes where the underlying modelling of production volumes, technology shares and efficiencies was reviewed in detail prior to the datasets being submitted to the database.
