# integrated circuit production, logic type

Dataset: EcoSpold 2, unit process
Geography: GLO
Time period: 2000-01-01 to 2021-12-31
Technology level: current
Classification: EcoSpold01Categories: electronics/component
Classification: ISIC rev.4 ecoinvent: 2610:Manufacture of electronic components and boards
Synonyms: Silicon chip; Microcircuit; Microchip; Computer chip; Chip
Tags: ConvertedDataset
Scenario: Business-as-Usual
System model: Allocation, cut-off by classification
Generated by: Martin Lehmann
Published in: Hischier R. 2007
Database: ecoinvent
isCopyrightProtected: true
accessRestrictedTo: 1

## General comment
This dataset represents the production of 1 kg of a logic type integrated circuit, including the processes and materials required to package up a fabricated wafer into a logic type microchip. It is mainly based on literature data.
[This dataset was already contained in the ecoinvent database version 2. It was not individually updated during the transfer to ecoinvent version 3. Life Cycle Impact Assessment results may still have changed, as they are affected by changes in the supply chain, i.e. in other datasets. This dataset was generated following the ecoinvent quality guidelines for version 2. It may have been subject to central changes described in the ecoinvent version 3 change report (http://www.ecoinvent.org/database/ecoinvent-version-3/reports-of-changes/), and the results of the central updates were reviewed extensively. The changes added e.g. consistent water flows and other information throughout the database. The documentation of this dataset can be found in the ecoinvent reports of version 2, which are still available via the ecoinvent website. The change report linked above covers all central changes that were made during the conversion process.]

## Included activities start
From reception of plastics and metals at the factory gate.

## Included activities end
It includes all the processes required to produce a logic type microchip. Included are 'die separation', 'encapsulation', 'die attachment', 'lead bonding', 'plating', and 'marking'. These operations are represented by the material input of glass epoxy, metals, epoxy resin, doped silicon, glue, gold (wires) etc. and the assembly process energy used. No water is required for the assembly of the integrated circuit. Neither direct air emissions nor any waste are balanced for this packaging dataset.

## Geography
The data is based on two semiconductor companies in the USA and Western Europe representing international standard.

## Technology
The chip packaging technology operations are: backside preparation, die separation (scribing, sawing), die pick, die attach, inspection, lead bonding, preseal inspection, packaging sealing, plating, lead trim, marking and final test. In particular:
Die attaching: in the center of every package is an area where the chip is securely attached into the package, with the goals of creating a strong physical bond between the chip and the package, providing either an electrical conducting or insulating contact between the die and the package, and serving as a medium to transfer heat from the chip to the package.
Lead bonding: thin wires are bonded between the chip bonding pads and the inner leads of the package, the methods of connecting the chip to the package are: wire bonding, bump (ball) technology, and tape automated bonding (TAB).

## Reference product
- integrated circuit, logic type: 1 kg; source SEMI 2012; CPC 47160: Electronic integrated circuits; By-product classification allocatable product
  Logic circuits perform a specified logical operation on the incoming data - e.g. an onboard automobile computer. Logic circuits fall into two main categories: analog and digital. An analog circuit has an output that is proportional to the input. Digital circuits, on the other hand, feature a predetermined output in response to a variety of inputs. A wall light dimmer is an analog device. A standard on-off light switch is a digital device.
  Logic circuitry is built around the logic gate. A gate controls and directs passage through a barrier. Analog and digital gates are formed in a logic circuit by wiring together various components.
  A solid-state integrated circuit is composed of a number of separate functional areas. Each chip, regardless of the circuit function, has an input and encode section where the incoming signals are "coded" into a form that the circuit can understand. The majority of the circuit area contains the circuitry required to perform the circuit function, either memory or logic. After the data is manipulated by the circuit, it goes to a decode section where it is changed back into a form that is usable by the machine’s output mechanism.
  EcoSpold01Location=GLO
  production volume 1.33566e10 kg
    0.031415 m2 per wafer * 12 months/year * 10700000 wafers per month. Assumption: 50 % of wafer production goes for memory type IC, 50% for logic type IC. 4'033'686 m2*50%/0.000151 m2 wafer / kg logic IC; SEMI data for 2009 installed capacity; SEMI World Fab Forecast February 2012; Figure 2 at http://www.semi.org/en/node/40871
  property carbon content, fossil 0.221701
    Calculated as the addition of C contents in the product composition
  property price 1260.01 EUR2005
    Calculated based on inputs: The price of the product has been calculated as a sum of the values of the material and energy inputs for this product. This value is therefore a rough estimation. It may underestimate the real price since there are additional expenses when producing any product. These expences can include for example labour costs, treatment of waste materials and profit for the producer. Please consider carefully whether this level of data quality is acceptable for your application.
  property carbon content 0.221701
    carbon content on a dry matter basis (reserved; not for manual entry)
  properties: dry mass 1 kg, wet mass 1 kg, carbon content, non-fossil 0, water content 0, water in wet mass 0 kg, carbon allocation 0.221701 kg

## Inputs from technosphere
- tin: 0.063 kg; source ST Microelectronics 2004; lognormal variance with pedigree 0.0527, pedigree (2,4,5,3,1)
  EcoSpold01Location=RER
  Literature value. The mass fraction of tin was estimated based on the literature values of two logic type microchips. See ecoinvent v2 report "18_I_Electronics_components" (section 3.6) for more information.
  properties: dry mass 1 kg, wet mass 1 kg
- epoxy resin, liquid: 0 kg; source ST Microelectronics 2004; pedigree (1,1,1,1,1)
  Literature value. Estimated based on the literature values of two logic type microchips. See ecoinvent v2 report "18_I_Electronics_components" (section 3.6) for more information.
  EcoSpold01Location=RER
  properties: carbon content, fossil 0.42325, dry mass 1 kg, wet mass 1 kg, heating value, net 12.82 MJ
- lead: 0.037 kg; source ST Microelectronics 2004; lognormal variance with pedigree 0.0527, pedigree (2,4,5,3,1)
  Literature value. The mass fraction of lead was estimated based on the literature values of two logic type microchips. See ecoinvent v2 report "18_I_Electronics_components" (section 3.6) for more information.
  EcoSpold01Location=RER
  properties: dry mass 1 kg, wet mass 1 kg
- heat, district or industrial, other than natural gas: 493 MJ; source Williams E. D. 2002; lognormal variance with pedigree 0.0541, pedigree (3,4,5,3,1)
  EcoSpold01Location=RER
  Estimation, based on literature. A total energy consumption of 5.8 MJ per 2 g of chips is considered. 17% is heat.
  properties: heating value, net 1 MJ
- epoxy resin insulator, SiO2: 0.4365 kg; source ST Microelectronics 2004; lognormal variance with pedigree 0.0527, pedigree (2,4,5,3,1)
  (same comment as for epoxy resin, liquid)
  properties: dry mass 1 kg, heating value, net 5.13 MJ, carbon content, fossil 0.1693, wet mass 1 kg
  note on carbon content, fossil: Cast resin insulators are produced from epoxy resins, hardeners and a filling material. Aluminium oxide, dolomite and quartz powder are well-known filling materials.The filling material is assumed to be 60% of cast resin insulators (ecoinvent v2.2 report 8. Part 31)
- gold: 0.01082 kg; source ST Microelectronics 2004; lognormal variance with pedigree 0.0527, pedigree (2,4,5,3,1)
  Literature value. The mass fraction of gold was estimated based on the literature values of two logic type microchips. See ecoinvent v2 report "18_I_Electronics_components" (section 3.6) for more information.
  EcoSpold01Location=GLO
  properties: wet mass 1 kg, dry mass 1 kg
- silver: 0.0075 kg; source ST Microelectronics 2004; lognormal variance with pedigree 0.0527, pedigree (2,4,5,3,1)
  EcoSpold01Location=RER
  Literature value. The mass fraction of silver was estimated based on the literature values of two logic type microchips. See ecoinvent v2 report "18_I_Electronics_components" (section 3.6) for more information.
  properties: wet mass 1 kg, dry mass 1 kg
- wafer, fabricated, for integrated circuit: 0.018 m2; source Paul Teehan 2014; lognormal variance with pedigree 0.0527, pedigree (2,4,5,3,1)
  Literature value. This value was taken from the doctoral thesis "Integrative approaches to environmental life cycle assessment of consumer electronics and connected media" published by Paul Teehan in 2014. He obtained this value by measuring the silicon die area of 22 integrated circuits.
  EcoSpold01Location=GLO
  properties: wet mass 0.7 kg, dry mass 0.7 kg
- electronic component factory: 2e-8 unit; lognormal variance with pedigree 0.3707, pedigree (2,4,5,3,3)
  EcoSpold01Location=GLO
  Proxy. Due to a lack of more specific information, the infrastructure module representing an electronic component production plant was used.
- zinc: 0.00756 kg; source ST Microelectronics 2004; lognormal variance with pedigree 0.0527, pedigree (2,4,5,3,1)
  Zinc is taken as a proxy for Antimony oxide. Literature value. The mass fraction of Antimony oxide was estimated based on the literature values of two logic type microchips. See ecoinvent v2 report "18_I_Electronics_components" (section 3.6) for more information.
  EcoSpold01Location=RER
  properties: wet mass 1 kg, dry mass 1 kg
- nickel, class 1: 0.00328 kg; source ST Microelectronics 2004; lognormal variance with pedigree 0.0527, pedigree (2,4,5,3,1)
  Literature value. The mass fraction of nickel was estimated based on the literature values of two logic type microchips. See ecoinvent v2 report "18_I_Electronics_components" (section 3.6) for more information.
  EcoSpold01Location=GLO
  properties: dry mass 1 kg, wet mass 1 kg
- chemical, organic: 0.0086 kg; source ST Microelectronics 2004; lognormal variance with pedigree 0.0527, pedigree (2,4,5,3,1)
  EcoSpold01Location=GLO
  Chemical organics is taken as a proxy for TBBA. Literature value. The mass fraction of TBBA was estimated based on the literature values of two logic type microchips. See ecoinvent v2 report "18_I_Electronics_components" (section 3.6) for more information.
  properties: dry mass 1 kg, carbon content, fossil 0.628, wet mass 1 kg, heating value, net 19.03 MJ
  note on carbon content, fossil: This dataset is an unweighted average of 20 organic substances (listed in Tab 88.1, ecoinvent v2.2 report 8, part II), being part of the top100 chemicals included in this database. The C-content has also been calculated as an unweighted average of the C content of the substances composing this dataset.
- electricity, medium voltage: 668.61 kWh; source Williams E. D. 2002; lognormal variance with pedigree 0.0541, pedigree (3,4,5,3,1)
  EcoSpold01Location=UCTE
  Estimation, based on literature. A total energy consumption of 5.8 MJ per 2 g of chips is considered. 83% is electricity.
- copper, cathode: 0.082 kg; source ST Microelectronics 2004; lognormal variance with pedigree 0.0527, pedigree (2,4,5,3,1)
  EcoSpold01Location=GLO
  Literature value. The mass fraction of copper was estimated based on the literature values of two logic type microchips. See ecoinvent v2 report "18_I_Electronics_components" (section 3.6) for more information.
  properties: wet mass 1 kg, dry mass 1 kg
- glass fibre reinforced plastic, polyamide, injection moulded: 0.3169 kg; source ST Microelectronics 2004; lognormal variance with pedigree 0.0527, pedigree (2,4,5,3,1)
  EcoSpold01Location=RER
  Literature value. Estimated based on the literature values of two logic type microchips. See ecoinvent v2 report "18_I_Electronics_components" (section 3.6) for more information.
  properties: wet mass 1 kg, carbon content, fossil 0.446018, dry mass 1 kg
  note on carbon content, fossil: Polyamide resin assimilate to Nylon 66 (ecoinvent v2.2 report 7_XIII). Nylon 66 is derived from hexamethylene diamine and adipic acid and has the following structure: -(HN-(CH2)6-NH-CO-(CH2)4-CO)n- (ecoinvent v2.2 report 11_II), C12H22N2O2. MW=226 g/mol. Here Nylon 66 is – mainly for improved stiffness and stability – modified with glass fibres. The glass fibre content in the product is assumed of 30%. (ecoinvent v2.2 report 11_II)
- epoxy resin, liquid: 0.000435, 0.002065 kg (2 entries); source ST Microelectronics 2004; lognormal variance with pedigree 0.0527, pedigree (2,4,5,3,1)
  (same comment as for epoxy resin, liquid)

## Sampling procedure
Manufacturer information and "chemical content" publications by companies.

## Extrapolations
This dataset has been extrapolated from year 2006 to the year of the calculation (2021). The uncertainty has been adjusted accordingly.

## Review by Emilia Moreno Ruiz 2017-05-26
corrected units from "unit" to "kg" following author indications

## Review by Rolf Frischknecht 2007-11-14
passed.
-

## Review by Bo Weidema 2012-02-13
Excess waste amounts in previous dataset has now been corrected. Also a number of smaller improvements in documentation and names of exchanges.

## Review by Roland Hischier 2011-09-21
Transfer of documentation done.

## Review by Bo Weidema 2012-02-13
Passed.
