# energy use and operation emissions, electric bicycle, electricity from renewable energy products

Dataset: EcoSpold 2, unit process
Geography: CH
Time period: 2009-01-01 to 2021-12-31
Technology level: current
Classification: EcoSpold01Categories: transport systems/road
Classification: ISIC rev.4 ecoinvent: 4922:Other passenger land transport
Tags: ConvertedDataset
Scenario: Business-as-Usual
System model: Allocation, cut-off by classification
Generated by: Marianne Leuenberger
Published in: M. Leuenberger 2010
Database: ecoinvent
isCopyrightProtected: true
accessRestrictedTo: 1

## General comment
The data set reflects the average operation (1 kWh/100km) of a e-bike of 24kg total weight.
[This dataset was already contained in the ecoinvent database version 2. It was not individually updated during the transfer to ecoinvent version 3. Life Cycle Impact Assessment results may still have changed, as they are affected by changes in the supply chain, i.e. in other datasets. This dataset was generated following the ecoinvent quality guidelines for version 2. It may have been subject to central changes described in the ecoinvent version 3 change report (http://www.ecoinvent.org/database/ecoinvent-version-3/reports-of-changes/), and the results of the central updates were reviewed extensively. The changes added e.g. consistent water flows and other information throughout the database. The documentation of this dataset can be found in the ecoinvent reports of version 2, which are still available via the ecoinvent website. The change report linked above covers all central changes that were made during the conversion process.]

## Included activities end
This data set includes the electricity demand using certified electricity mix for bicycle operation.

## Geography
Data cover operation in Switerland

## Technology
eBike with four level support function of electric motor. Maximal speed 25km/h. Battery charged with certified electricity mix.

## Reference product
- energy use and operation emissions, electric bicycle, electricity from renewable energy products: 1 km; CPC 64119: Other land transportation services of passengers, n.e.c.; By-product classification allocatable product
  EcoSpold01Location=CH
  production volume 0.033668 km; = 4*0.008417
    Estimated. The swiss production volume is a dummy variable calculated using the nominal GDP of 2005 (source: United Nations, http://data.un.org/Glossary.aspx?q=GDP+%28current+US%24%29, accessed 20130726 and 20130312). Where global dummy variable is set to 4 and swiss GDP is 0.008417
    Gross domestic product (GDP) at current prices is GDP at prices of the current reporting period. Also known as nominal GDP.
  property price 0.000669 EUR2005
    Calculated based on inputs: The price of the product has been calculated as a sum of the values of the material and energy inputs for this product. This value is therefore a rough estimation. It may underestimate the real price since there are additional expenses when producing any product. These expences can include for example labour costs, treatment of waste materials and profit for the producer. Please consider carefully whether this level of data quality is acceptable for your application.

## Inputs from technosphere
- electricity, low voltage, renewable energy products: 0.01 kWh; lognormal variance with pedigree 0.008, pedigree (1,1,4,1,1)
  EcoSpold01Location=CH
  Company information: e-bike: 1kWh/100km, i.o.-scooter: 3 kWh/100km
  Uncertainty: Company information: e-bike: 1kWh/100km, i.o.-scooter: 3 kWh/100km

## Extrapolations
This dataset has been extrapolated from year 2009 to the year of the calculation (2021). The uncertainty has been adjusted accordingly.

## Review by Christian Bauer 2010-02-07
29.01.2010
passed
C:\Dokumente und Einstellungen\Marianne\Eigene Dateien\Projekte\277_Mobitool\Ecoinvent\Review\Upload 1\[Ecospold_Operation_ebikes-v1.1.xls]X-Process
