# clay pit operation

Dataset: EcoSpold 2, unit process
Geography: RoW
Time period: 1992-01-01 to 2021-12-31
Technology level: current
Classification: EcoSpold01Categories: construction materials/additives
Classification: ISIC rev.4 ecoinvent: 0810:Quarrying of stone, sand and clay
Synonyms: loam; Lehm
Tags: ConvertedDataset
Scenario: Business-as-Usual
System model: Allocation, cut-off by classification
Generated by: Daniel Kellenberger (obsolete)
Published in: Kellenberger D. 2007
Database: ecoinvent
isCopyrightProtected: true
accessRestrictedTo: 1

## General comment
This dataset represents the production of 1 kg of clay in a mine, assuming a thickness of the clay layer in nature of 30m. Different types of transformation in Europe, therefore "transformation, to unknown" has been chosen.
Clay pit. Image source: https://commons.wikimedia.org/wiki/File:Mettingen_Querenberg_Clay_Pit_02.jpg, accessed 20151211

## Included activities start
From clay at ground, unexcavated.

## Included activities end
The dataset ends with the transportation to first grinding machine. The dataset includes the land use and transformation and the recultivation of the area. The dataset doesn't include further treatments of the clay (i.e. water consumption).

## Geography
"recultivation, bauxite mine" has been used as Proxy

## Technology
typical technology for swiss clay mining

## Reference product
- clay: 1 kg; CPC 15400: Clays; By-product classification allocatable product
  EcoSpold01Location=CH
  Ullmann's encyclopaedia of industrial chemistry describes the situation referring to the primary raw material in full range.
  "A great variety of clay sediments are used, ranging from loose to compact in consistency. The principal raw materials are loams, clays, marls, mudstone, shale, and slate together with smaller quantities of boulder clay, loess, and sand. They can contain all types of suitable clay minerals (layered silicates), such as illite, sericite, kaolinite, chlorite, and montmorillonite. Quartz is an important component and is always present, and there can also be considerable amounts of calcite, dolomite, and iron compounds. The composition and particle size are the two principal factors that determine the nature of the products." (Hauck et al. (1997))
  Wendehorst & Vollenschaar (1998) write that the main component of the raw material clay (and therefore brick) is Kaolin. Kaolin approaches the formula of the mineral kaolinite (Al2O3.2SiO2.2H2O). As all other clays it is weathered feldspar rock containing several impurities like quartz, mica, residual feldspar, calcite, organic substances and/or Fe-oxides. The various geological and weathering conditions determine the type and composition of clay beds.
  Kaolins are primary clays formed by local decomposition of feldspar. They are mainly found in small depressions rather than in vast stratified layers and they are relatively free from mineral impurities like iron. Their grain is coarse and they are not plastic, compared to most sedimentary clays. Pure kaolins are very refractory and their melting point exceeds 1’760 °C. They are very difficult to use in genuine state because of their low plasticity and high melting point. Consequently other materials are added to make Kaolin more plastic and to lower its melting point.
  "Some constituents used as raw material for the production of clay products are harmful. These are mainly coarse pyrites and limestone inclusions because they can cause spalling and sulphur compounds, which can cause efflorescence. Other harmful constituents are large carbonaceous particles and plant remains.
  Whereas common bricks may be manufactured from fairly low-quality clays, large hollow bricks require adequate plasticity of the clay body. For hollow bricks, clays and marls are used primarily, sometimes mixed with loam and shale. Other products with a porous structure are produced from these raw materials, e.g., face bricks, paving bricks, roofing tiles, drainage pipes, and cable conduits. Clinker, with its impervious or nearly impervious structure is produced mainly from shale and stoneware clays. Shale clay tends to be used for the manufacture of clinker face bricks, high-compressive-strength solid or hollow bricks, paving bricks, and sewer channel bricks. Stoneware clays are the first choice for high-quality face bricks, for split clinker flags and flooring tiles".
  production volume 2.12169e11 kg; = (32000000*1000/0.58)/0.26
    Estimated value. According to Elzea Kogel, J, Trivedi, N.C., Barker, J.M. & Krukowski, S. T. (editors) (2006) Industrial Minerals and Rocks: Commodities, Markets and Uses, 7th edition, no precise estimates have been made so far on clay production, problems in these estimates are the exclusion of China and India in the majority of statistical references and the inclusion of different types of clays in different categories depending on the reporting geography. Kogel et al. estimate for 2002 World production of common clay to be hundreds of Mt, for refractory more than 20Mt , Kaolin 43 Mt mined and 26 Mt sold, Bentonite 10.3 Mt, Fuller’s earth uncertain 10Mt, ball clay 15.5 Mt and Hormites 2.1 Mt. As no precise estimate was found the World production volume for clay and kaolin production are estimated from European production volumes. For Bentonite and Kaolin World values are available from the European mineral statistics 2009-2013 (http://www.bgs.ac.uk/mineralsuk/statistics/europeanStatistics.html, accessed 08.02.2016) for which Eu production for Kaolin is 34.5% of World’s production and for Bentonite is the 16.4%. The remaining World values are scaled assuming that EU represents the 26% of World’s production, based on the average between Kaolin and Bentonite. Following the commodities are listed with their Prodcom codes, Prodcom name and production volume for EU 28 in tons: 08122210 “Bentonite” 2216788 tons, 08122230 “Fireclay” 2542435 tons, 08122250 “Common clays and shales for construction use (excluding bentonite, fireclay, expanded clays, kaolin and kaolinic clays); andalusite, kyanite and sillimanite; mullite; chamotte or dinas earths” 32000000 tons, and 08122160 “Kaolinitic clays (ball and plastic clays)” 2997294 tons. According to the European mineral statistics 2009-2013 (<http://www.bgs.ac.uk/mineralsuk/statistics/europeanStatistics.html>, accessed 08.02.2016), Europe (EU36) produces 9.1Mt of Kaolin, which is 34.5% of World production, of which 47.8% (16% of all World production) comes from Germany. The largest producer in 2013 was US with 23%, China represented the 12%, Brazil 8%, and Iran 6%. The European mineral statistics values are used for both Europe and the World estimates. The same source reports for EU36 Bentonite production of 2.73 Mt for 2013, which represents the 16.4% of World production. The values for Europe matches the values indicated from Eurostat and it used to estimate World’s production. Germany produces 13.1% of Europe’s bentonite 358844 tons. The volume of produced clay is assigned to the different activities based on USGS (2015) estimates of uses in the USA (<http://minerals.usgs.gov/minerals/pubs/commodity/clays/mcs-2015-clays.pdf>, accessed 08.02.2016) and according to input of clay per reference product. Of common clay, 39% is used for brick (for which 50% is assumed to be used for clay bricks and 50% light clay bricks), 23% lightweight aggregate, 31% cement, and 7% other uses (USGS specifies that 9% of common clay is used for lightweight concrete block production in the 2013 Minerals yearbook http://minerals.usgs.gov/minerals/pubs/commodity/clays/myb1-2013-clays.pdf, accessed 08.02.2016). Of ball clay, 39% is used for floor and wall tiles, 17% sanitary ware, and 44% other uses. Of bentonite 26% absorbents, 24% drilling mud, 15% foundry sand bond (assumed to represent plaster clay), 11% iron ore pelletising, and 24% other uses. Of fire clay, 34% for heavy clay products, and 66% for refractory and other products. Of fuller’s earth, 70% absorbents, and 30% for other uses. The US produce 15 to 25 % of refined clays (without common clay and shale). Comparing the estimated global values with the data for USGS (2015) for the production in USA, the US is responsible for 20% of Kaolin products, 34% of Bentonite and more than 10% of common clays. USGS (2015) reports USA to “probably” represent 15% to 25% of World production of refined clays excluding common clays.
  property carbon content, non-fossil 0
    The main component of clay is Kaolin (approx like kaolinite, Al2O3-2SiO2-2H2O), ecoinvent v2.2 report 7, part IV, pg 8
  property price 0.075 EUR2005
    Calculated value based on data from United Nations Commodity Trade Statistics Database (comtrade.un.org). UN comtrade category: 250840 Other clays(except expanded clay for insultaion). Year 2005. Using exchange rate of 1EURO = 1.209 USD. Average of price of import into 5 main markets (EU, US, JP, IN and CN). THe price of clay depends on the type. The price of expanded clay is: from United Nations Commodity Trade Statistics Database (comtrade.un.org). UN comtrade category: 6806 Slag wool, rock wool, insultaing materials not asbesto. Year 2005. Using exchange rate of 1EURO = 1.209 USD. Average of price of import into 5 main markets (EU, US, JP, IN and CN). The price of clay for plaster is: Calculated value based on data from United Nations Commodity Trade Statistics Database (comtrade.un.org). UN comtrade category: 250810 Bentonite. Year 2005. Using exchange rate of 1EURO = 1.209 USD. Average of price of import into 5 main markets (EU, US, JP, IN and CN). The price for clay for refractory production is: United Nations Commodity Trade Statistics Database (comtrade.un.org). UN comtrade category: 250830 Fire-clay. Year 2005. Using exchange rate of 1EURO = 1.209 USD. Average of price of import into 5 main markets (EU, US, JP, IN and CN).
  property carbon content, fossil 0
    (same comment as for clay)
  property carbon content 0
    carbon content on a dry matter basis (reserved; not for manual entry)
  properties: water in wet mass 0.035 kg, dry mass 0.965 kg, wet mass 1 kg, water content 0.0362694, carbon allocation 0 kg

## Inputs from technosphere
- clay pit infrastructure: 2.5e-10 unit; = 1/( lifetimecapacity_kg); lognormal variance with pedigree 0.36, pedigree (4,4,5,5,3)
  Calculated value. From specifics for clay pit construction GLO 2002 dataset : Data are estimated based on an air-picture and sketches of the process. The avarage yearly production volume is about 100'000 t, Total land occupation: 40'000m; about 20'000m2 buildings (1'000m2 multi storey and 19'000m2 hall), 15'000m2 paved roads, 5'000m2 vegetation. Assumed weight of machines: 2'000t and service life of 25 years.
  property lifetime 50 year; name lifetime_yr
  property lifetime capacity [kg] 4e9 kg; name lifetimecapacity_kg; = capacity_kg*lifetime_yr
  property capacity [kg] 8e7 kg; name capacity_kg
  note on lifetime: See dataset for clay pit construction: "This dataset is applied to a plant with a total produced amount per unit (50 years) of 4,000,000,000 kg (yearly production = 80,000,000 kg).."
- diesel, burned in building machine: 0.0297 MJ; lognormal variance with pedigree 0.0426, pedigree (1,3,5,5,1)
  EcoSpold01Location=GLO
  Literature vakue.This data considered the diesel compsumtion concerning the excavation.
  properties: heating value, net 1 MJ
- recultivation, bauxite mine: 1.67e-5 m2; lognormal variance with pedigree 0.2501, pedigree (5,2,5,5,3)
  EcoSpold01Location=GLO
  Proxy. The recultivation of a bauxite mine was used as a proxy.
  Estimation, based on a visit and an air photo of brickworks Gasser in Rapperswil BE.

## Inputs from nature
- Clay, unspecified, in ground [natural resource, in ground]: 1 kg; lognormal variance with pedigree 0.042, pedigree (1,1,5,5,1)
  Estimation, based on a visit and an air photo of brickworks Gasser in Rapperswil BE.
  The density of the clay is 20,000 kg/m3.
- Occupation, mineral extraction site [natural resource, land]: 0.000167 m2*year; lognormal variance with pedigree 0.1621, pedigree (5,2,5,5,1)
  Estimation, based on a visit and an air photo of brickworks Gasser in Rapperswil BE.
  The transition form mining to recultivation is fluid, as there is no exact time when a certain area is exploited and being recultivated. It was assumed that after 10 years a certain mineable area is exploted and clay is digged to in a nearby area, and then the exhausted area is recultivated. So, the total occupation is 10 times the land transportation (10 years * 1.667E-05 m2 = 1.667E-04 m2a).
- Transformation, to unspecified [natural resource, land]: 1.67e-5 m2; lognormal variance with pedigree 0.2421, pedigree (5,2,5,5,1)
  Estimation, based on a visit and an air photo of brickworks Gasser in Rapperswil BE.
  The dataset was extrapolated from the corresponding Swiss dataset. In Switzerland the transformation is to mineral extraction site. To reflect the different types of transformation globally, transformation to unspecified was chosen.
  The volume of the excavation amount of clay was based on an estimated thickness of the clay layer of 30m. Therefore, the total volume per m2 was 30 m3 of clay. As the density is 2.000 kg/m2, the total weight of 60,000 kg of excavated clay is obtained per m2. Thus per kg of clay, the land used is 1/60,000 m2. Regarding the soil removed before diggind, the layer is very small (maximum 0.5m) compared to the layer of clay and, therefore, is neglected.
- Transformation, from unspecified [natural resource, land]: 1.67e-5 m2; lognormal variance with pedigree 0.2421, pedigree (5,2,5,5,1)
  Estimation, based on a visit and an air photo of brickworks Gasser in Rapperswil BE.

## Extrapolations
See geography This dataset has been copied from an original dataset covering the geography CH. The uncertainty has been adjusted accordingly.

## Review by Roberto Dones 2003-07-04
Passed
