# furnace production, pellets, 25kW

Dataset: EcoSpold 2, unit process
Geography: CH
Time period: 2010-01-01 to 2021-12-31
Technology level: modern
Classification: ISIC rev.4 ecoinvent: 2815:Manufacture of ovens, furnaces and furnace burners
Classification: EcoSpold01Categories: wood energy/heating systems
Synonyms: wood fired boiler production; wood pellets boiler production
Tags: biomass power
Scenario: Business-as-Usual
System model: Allocation, cut-off by classification
Generated by: Marco Mina
Database: ecoinvent
isCopyrightProtected: true
accessRestrictedTo: 1

## General comment
This dataset represent the production and the disposal of a wood-pellets burning furnace for domestic heating system.

## Included activities start
From reception of furnace components at the factory gate

## Included activities end
This activity ends with the disposal of the device in the end of its lifetime. The dataset includes the most important materials used for the fabrication of the furnace, the accumulator hot water tank (800 liters), the automatic screw conveyor and the chimney flue pipes: steel, rock wool, concrete, polystyrene, plastics, electronic components, lubricating oil, paint. The dataset includes the concrete basement for the furnace, the land transformation and occupation and the energy and heat for the construction and the disposal of the device. The dataset doesn"t include the storage silo for pellets, since this boiler is has an internal pellet hopper

## Geography
Could be used for Central European conditions

## Technology
Boiler of modern technology available on the European and Swiss market. The model of reference is a wood pellets boiler, mod.SL-P from Austrian brand Lindner&Sommerauer. It was compared with other similar models from brands Oekofen and Hargassner. Represent the typical pellets boiler for a single house central heating.
Source of image: http://www.sl-heizung.at/
Dimensions: 1500 mm height, 1080 mm lenght, 700 mm depth. Main components of the furnace are: pellets hopper, small screw conveyor, combustion chamber, automatic fan system, ashes removal system, heat exchangers, electronic for control units, chimney flue pipes, water pipes collegaments, hot water accumulator tank (with external insulation).

## Time period
This model of furnace is commercialized since 2010 in Europe and Switzerland and is still available on the market (end 2011)

## Reference product
- furnace, pellets, 25kW: 1 unit; name RP_amount_1; By-product classification allocatable product; CPC 43420: Industrial or laboratory furnaces and ovens, except non-electric bakery ovens; other industrial or laboratory […]
  production volume 816 unit; name RP_PV_1
    extrapolated from Holzenergie Statistik report (estimation of the wood pellets boiler<50kW produced within the country)
  property capacity [MW] 0.025 MW; name capacity_MW
  property price 5918 EUR2005
    UNDATA "Industrial furnace, oven, incinerator non-electric ne" (http://data.un.org/Data.aspx?q=industrial+furnace&d=ComTrade&f=_l1Code%3a84%3bcmdCode%3a841780; EU I/E average price is 6.133EUR/kg). The prices are per kg and converted to per unit by summed weight of material concumption of the process in existing ecoinvent documentation from ecoinvent v.2.2 (about 760kg). For weight of concrete, it is separately added for from price per m3 used of each unit (14 m3; 'furnace production, pellet, 50kW') and apply EU&DK input output database 2003 (0.08 Euro2003/kg DS; density 2380 kg/m3<#concrete production, normal' in ecoinvent).
  property lifetime capacity [kWh] 4.38e6 kWh; name lifetime_capacity_kWh; = (lifetime*8760)*capacity_MW*1000
    calculated value.
  property lifetime 20 year; name lifetime

## Inputs from technosphere
- electronics scrap from control units: -4.5 kg; name BP_amount_6; lognormal variance with pedigree 0.0107, pedigree (1,2,4,5,1)
  disposal of the electronic parts
  production volume 3672 kg; = RP_PV_1* BP_amount_6
    Calculated from production volume of reference product using the relative outputs.
  property price 0 EUR2005; name BP_amount_8_price_EUR2005
  properties: dry mass 1 kg, lifetime 20 year, wet mass 1 kg, carbon content, non-fossil 0.00013442, carbon content, fossil 0.337146
- copper, cathode: 0.2 kg; source Ecoenergie srl/L&S Heizanlagenbau 2011; lognormal variance with pedigree 0.0612, pedigree (3,1,5,5,1)
  estimation
  properties: dry mass 1 kg, wet mass 1 kg
- waste polyethylene: -5.5 kg; name BP_amount_1; lognormal variance with pedigree 0.0107, pedigree (1,2,4,5,1)
  disposal of the plastic components
  production volume 4488 kg; = RP_PV_1* BP_amount_1
    Calculated from production volume of reference product using the relative outputs.
  property price 0 EUR2005; name BP_amount_4_price_EUR2005
  properties: wet mass 1 kg, dry mass 0.996 kg, water content 0.00401606, lifetime 20 year, carbon content, fossil 0.825301, heating value, net 42.47 MJ
  note on carbon content, fossil: C content in 1 kg DM was calculated using data in Tab A.1, ecoinvent v2.2 report 13_I
  note on heating value, net: Value taken from the general comment of the treatment dataset.
- steel, chromium steel 18/8, hot rolled: 30 kg; source Ecoenergie srl/L&S Heizanlagenbau 2011; lognormal variance with pedigree 0.0312, pedigree (3,4,4,5,1)
  estimation of the various components inside the furnace
  properties: dry mass 1 kg, carbon content, fossil 0.0008, wet mass 1 kg
  note on carbon content, fossil: Stainless steel model is the grade 304 steel (18/8 stainless, 18% chromium 8% nickel; max. 0.08% C)
- lubricating oil: 0.7 kg; source Ecoenergie srl/L&S Heizanlagenbau 2011; lognormal variance with pedigree 0.0312, pedigree (3,4,4,5,1)
  estimation - used for the manufacturing of the furnace and for the maintenance. It is just added to the internal part of the furnace
  properties: heating value, net 40.2 MJ, dry mass 1 kg, wet mass 1 kg, carbon content, fossil 0.75
  note on heating value, net: Literature value, Source: IPCC 2006, 2006 IPCC Guidelines for National Greenhouse Gas Inventories, Prepared by the National Greenhouse Gas Inventories Programme, Eggleston H.S., Buendia L., Miwa K., Ngara T. and Tanabe K. (eds). Published: IGES, Japan
  note on carbon content, fossil: Lubricating oil is produced from diesel. C-content/dry mass of fats and oils considered 75%, from: ecoinvent v2.2 report, n 15a, pg 40
- electricity, low voltage: 528 kWh; source Ecoenergie srl/L&S Heizanlagenbau 2011; lognormal variance with pedigree 0.127, pedigree (3,3,5,5,1)
  estimation - data derives from comparison between old dataset value, energy required for steel manufacturing (similar weight device) and personal comunication form a specialized technician
- concrete, normal: 0.04 m3; name concrete; source Ecoenergie srl/L&S Heizanlagenbau 2011; lognormal variance with pedigree 0.0298, pedigree (3,3,4,5,1)
  calculated value - basing on the space required for the furnace basement (about 0.8m2) the amount of concrete was calculated
  properties: dry mass 2190 kg, water content 0.086758, wet mass 2380 kg
- stone wool: 53 kg; source Ecoenergie srl/L&S Heizanlagenbau 2011; lognormal variance with pedigree 0.0312, pedigree (3,4,4,5,1)
  calculated value - summa of rock wool for the insulation of the chimney flue pipes (11 kg: 3m height, 25 cm diameter, thickness rockwool 3cm) and rockwool inside the furnace (42 kg = 324 dm3 * 0.13 kg/m3)
  properties: dry mass 1 kg, wet mass 1 kg, carbon content, fossil 0.015401
  note on carbon content, fossil: The chemical composition of the glass fibres used in the rock wool production is similar to the composition of naturally cooled volcano basalt and has a composition listed in Tab. 3.1 and 3.2 in ecoinvent v2.2 report 16, part XIV. Rock wool contains: a minimum of 96% mineral fibres,between 0.5 and 3.0 weight percent of phenolic resin depending on the specific product characteristics, and about 0.2 percent mineral oil (ecoinvent v2.2 report 16, part XIV). An average composition of 1.8% phenolic resin, 0.2% mineral oil, and 98% mineral fibres has been assumed and used to calculate C content of the rock wool
- waste polystyrene isolation, flame-retardant: -18 kg; name BP_amount_4; lognormal variance with pedigree 0.0107, pedigree (1,2,4,5,1)
  disposal of the insulation of the water storage
  production volume 14688 kg; = RP_PV_1 * (BP_amount_4 / RP_amount_1)
    Calculated from production volume of reference product using the relative outputs.
  property price 0 EUR2005; name BP_amount_7_price_EUR2005
  properties: water content 0.00199232, wet mass 1 kg, dry mass 0.998012 kg, carbon content, fossil 0.918145, heating value, net 38.67 MJ
  note on carbon content, fossil: Polystyrene isolation (EPS) is flame-retarded with hexa-bromo-cyclo-dodecan (C12H18Br6) and contains 0.67 w% bromine (ecoinvent v2.2 report 13_I, pg 39). The rest is polystyrene: (C8H8)n.
- sheet rolling, steel: 38 kg; source Ecoenergie srl/L&S Heizanlagenbau 2011; lognormal variance with pedigree 0.0312, pedigree (3,4,4,5,1)
  estimation
- waste mineral wool, for final disposal: -53 kg; name BP_amount_7; lognormal variance with pedigree 0.0107, pedigree (1,2,4,5,1)
  disposal of the insulation for the chimney flue pipes
  production volume 43248 kg; = RP_PV_1 * BP_amount_7
    Calculated from production volume of reference product using the relative outputs.
  property price 0 EUR2005; name BP_amount_3_price_EUR2005
  properties: dry mass 1 kg, lifetime 20 year, wet mass 1 kg
- electronics, for control units: 4.5 kg; source Ecoenergie srl/L&S Heizanlagenbau 2011; lognormal variance with pedigree 0.0284, pedigree (2,3,4,5,1)
  estimation
  properties: dry mass 1 kg, carbon content, non-fossil 0.00013442, wet mass 1 kg, carbon content, fossil 0.337146
  note on carbon content, non-fossil: The control unit has a composition of 46% steel (housing), 32% plastics, 14% printed wiring boards and 8% cables (various types).;
- scrap copper: -0.2 kg; name BP_amount_2; lognormal variance with pedigree 0.0107, pedigree (1,2,4,5,1)
  disposal of copper
  production volume 163.2 kg; = RP_PV_1 * (BP_amount_2 / RP_amount_1)
    Calculated from production volume of reference product using the relative outputs.
  property price 0 EUR2005; name BP_amount_6_price_EUR2005
  properties: wet mass 1 kg, dry mass 1 kg
- polystyrene foam slab: 18 kg; source Ecoenergie srl/L&S Heizanlagenbau 2011; lognormal variance with pedigree 0.0278, pedigree (1,3,4,5,1)
  calculated value - insulation of the accumulator hot water tanks
  properties: heating value, net 38.67 MJ, wet mass 1 kg, dry mass 1 kg, carbon content, fossil 0.859091
  note on carbon content, fossil: XPS consists in 91% of polystyrene, 7% of blowing agent and the re-maining 2% are flame retardants (bromine compounds) and other additives (ecoinvent v2.2 report 7, part XIV, pg69). The chemical formula of polystyrene is (C8H8)n. Here, the blowing agent is CO2.
- steel, low-alloyed, hot rolled: 463 kg; source Ecoenergie srl/L&S Heizanlagenbau 2011; lognormal variance with pedigree 0.0612, pedigree (3,4,5,1,1)
  calculated value - difference of summa of all other material from the total weight of the furnace
  properties: wet mass 1 kg, dry mass 1 kg, carbon content, fossil 0.005
  note on carbon content, fossil: Low alloyed steel composition given in Tab. 3.2 ecoinvent v2.2 report 10_partII. Steel assumed to have a C content of 0.5%
- waste concrete: -94 kg; name BP_amount_5; = (concrete*2350)*-1; lognormal variance with pedigree 0.0107, pedigree (1,2,4,5,1)
  disposal of the concrete for the furnace basement - around 0,04 m3 of concrete * 2350 kg/m3 (concrete density) = around 94 kg
  production volume 76704 kg; = RP_PV_1* BP_amount_5
    Calculated from production volume of reference product using the relative outputs.
  property price 0 EUR2005; name BP_amount_1_price_EUR2005
  properties: water content 1, dry mass 0.5 kg, lifetime 20 year, wet mass 1 kg
- alkyd paint, white, without solvent, in 60% solution state: 0.8 kg; name paint; source Ecoenergie srl/L&S Heizanlagenbau 2011; lognormal variance with pedigree 0.0312, pedigree (3,4,4,5,1)
  calculated value for the furnace cladding
  properties: wet mass 1 kg, carbon content, non-fossil 0.199629, dry mass 1 kg, carbon content, fossil 0.140367, heating value, net 10.3 MJ
  note on carbon content, non-fossil: C content was calculated as an addition of C content in the raw materials.
- heat, central or small-scale, other than natural gas: 1600 MJ; source Ecoenergie srl/L&S Heizanlagenbau 2011; lognormal variance with pedigree 0.127, pedigree (3,3,5,5,1)
  estimation - data comes from a comparison between old dataset value and communication with technician (total annual heating value in factory/production)
  properties: heating value, net 1 MJ
- polyethylene, high density, granulate: 5.5 kg; source Ecoenergie srl/L&S Heizanlagenbau 2011; lognormal variance with pedigree 0.0312, pedigree (3,4,4,5,1)
  estimation
  properties: carbon content, fossil 0.857143, wet mass 1 kg, heating value, net 42.47 MJ, dry mass 1 kg
  note on carbon content, fossil: Polyethylene is formed out of a huge amount of ethylene monomers (C2H4) (ecoinvent v2.2 report 11_II). MW=28 g/mol
- scrap steel: -493 kg; name BP_amount_3; lognormal variance with pedigree 0.0107, pedigree (1,2,4,5,1)
  disposal of steel and chromium steel in the furnace
  production volume 402288 kg; = RP_PV_1 * BP_amount_3
    Calculated from production volume of reference product using the relative outputs.
  property price 0 EUR2005; name BP_amount_5_price_EUR2005
  properties: lifetime 20 year, dry mass 1 kg, wet mass 1 kg
- waste mineral oil: -0.7 kg; name BP_amount_8; lognormal variance with pedigree 0.0107, pedigree (1,2,4,5,1)
  disposal of lubricating oil
  production volume 571.2 kg; = RP_PV_1 * (BP_amount_8 / RP_amount_1)
    Calculated from production volume of reference product using the relative outputs.
  property price 0 EUR2005; name BP_amount_2_price_EUR2005
  properties: heating value, net 34.7 MJ, water content 0.111111, dry mass 0.9 kg, carbon content, fossil 0.864444, wet mass 1 kg
  note on carbon content, fossil: Tab A.6, ecoinvent v2.2 report 13_I. C content has been calculated after data in the tables, and then referred to 1 kg DM

## Inputs from nature
- Transformation, from unspecified [natural resource, land]: 8.75 m2; name land_use; source Ecoenergie srl/L&S Heizanlagenbau 2011; lognormal variance with pedigree 0.0752, pedigree (4,5,5,5,1)
  calculated value - space required for the boiler from the furnace manual
- Transformation, to industrial area [natural resource, land]: 8.75 m2; source Ecoenergie srl/L&S Heizanlagenbau 2011; lognormal variance with pedigree 0.0738, pedigree (4,5,5,4,1)
  calculated value - space required for the boiler from the furnace manual
- Occupation, industrial area [natural resource, land]: 175 m2*year; = land_use*lifetime; source Ecoenergie srl/L&S Heizanlagenbau 2011; lognormal variance with pedigree 0.0732, pedigree (4,5,5,1,1)
  calculated value

## Sampling procedure
literature, furnace manual available for customers, investigation and personal communication from producer and technician

## Extrapolations
This dataset has been extrapolated from year 2011 to the year of the calculation (2021). The uncertainty has been adjusted accordingly.

## Review by Martin Kilga 2012-03-12
OK

## Review by Bo Weidema 2012-03-12
Passed. Documentation adequate, inputs relevant, mass balance correct, and correct handling of capacity utilisation.
