# heat and power co-generation, wood chips, 2000 kW, state-of-the-art 2014

Dataset: EcoSpold 2, unit process
Geography: CH
Time period: 2012-01-01 to 2021-12-31
Technology level: modern
Classification: EcoSpold01Categories: wood energy/cogeneration
Classification: ISIC rev.4 ecoinvent: 3530:Steam and air conditioning supply
Tags: wood power; with true value
Scenario: Business-as-Usual
System model: Allocation, cut-off by classification
Generated by: Christian Bauer
Published in: Bauer, C. 2007
Database: ecoinvent
isCopyrightProtected: true
accessRestrictedTo: 1

## General comment
This dataset represents the production of heat and electricity with wood chips in a state-of-the-art (as of 2014) co-generation plant with a capacity of 2000 kW (referring to fuel input) in Switzerland. Net capacities (referring to energy output): 1000 kW thermal and 200 kW electric. The technology corresponds to a modern unit to be installed in 2014 in Switzerland. Equipped with an electrostatic precipitator for PM emission reduction. It is assumed that the plant is operated mainly producing heat, i.e. following the heat demand. Heat is considered as the main product and therefore the reference product, whereas electricity is a by-product. Electricity is produced with an organic rankine cycle (ORC) steam generator. Emission data in this dataset are taken from measurements and literature as well as from communication with experts.

CO2 emissions were calculated out of the carbon content of the wood used as combustible. Carbon emitted in carbon monoxide was subtracted from the result.
Key emissions factors for CO, NOx, CH4, NMVOC and particles were updated according to latest data.

All other emission factors (per MJ fuel input) correspond to the 1000 kW boiler fuelled with wood chips from forest. Other exchanges correspond to the LCI data for the 1400 kW co-generation unit with further emission control in ecoinvent v2.2.

Wood chips from forest are used as fuel; these are assumed to be stored before combustion for a proper period in a silo in order to achieve an appropriate level of humidity for combustion. No external heat input for drying required.
[This dataset was already contained in the ecoinvent database version 2. It was not individually updated during the transfer to ecoinvent version 3. Life Cycle Impact Assessment results may still have changed, as they are affected by changes in the supply chain, i.e. in other datasets. This dataset was generated following the ecoinvent quality guidelines for version 2. It may have been subject to central changes described in the ecoinvent version 3 change report (http://www.ecoinvent.org/database/ecoinvent-version-3/reports-of-changes/), and the results of the central updates were reviewed extensively. The changes added e.g. consistent water flows and other information throughout the database. The documentation of this dataset can be found in the ecoinvent reports of version 2, which are still available via the ecoinvent website. The change report linked above covers all central changes that were made during the conversion process.]

## Included activities start
From wood chips ready to be burned in cogeneration unit (for heat and power production).

## Included activities end
This activity ends with heat and electricity produced.

This dataset includes the infrastructure, the wood input, the emissions to air and the disposal of the ashes. Also included are substances needed for operation: lubricating oil, organic chemicals, sodium chloride, chlorine and decarbonized water.

## Technology
Electric efficiency: 0.1; Thermal efficiency: 0.50;
Total efficiency: 0.6

## Parameters
- thermal efficiency: 0.5 dimensionless; name efficiency_thermal
  Thermal efficiency of the cogeration system, corresponding to annual operation including warm-up and cool-down
- electrical efficiency: 0.1 dimensionless; name efficiency_electrical
  Electric efficiency of the cogeration system, corresponding to annual operation including warm-up and cool-down

## Reference product
- heat, district or industrial, other than natural gas: 1 MJ; name heat_out; = 1*efficiency_thermal; source Thomas Nussbaumer 2014; By-product classification allocatable product; CPC 17300: Steam and hot water
  Thermal efficiency referring to the LHV of the fuel input
  EcoSpold01Location=CH
  production volume 0 MJ; name apv_heat
    The heat and electricity supply from wooden biomass is supplied to the markets by the activity "heat and power co-generation, wood chips, 6667 kW". This activity is available in case a smaller boiler size is of interest.
  property Corresponding fuel use 0.638217 MJ; name fuel_use; = 5.8061E-5*8442/0.768
    Lower heating value of the fuel input related to the heat/electricity output
  property true value relation 0.169678; name heat_true_value_relation
    property to calculate "true value" from
  property price 0.0106 EUR2005
    Average European district heat price from Ecoheatcool and Euroheat 2005-2006, Ecoheat Work package 1: The European heat market. Final report. 10.6 EUR/GJ i s the price of district heat. http://www.solarthermalworld.org/files/Ecoheatcool%20WP1%20Web.pdf?download
  property exergy 0.169678 MJ; name heat_exergy
    allocation factor for electricity (=1) vs. heat, where heat is calculated as the termodynamic mean temperature Tm = (Tfeed-Treturn)/ln(Tfeed/Treturn), relative to the application temperature (Tu, typically = 293 K), i.e. (Tm-Tu)/Tm
  property true value 0.00367828; name heat_out_true_value
    allocation property applied in "true value" allocation // value calculated from true value relation
  properties: heating value, net 1 MJ

## By-products
- electricity, high voltage: 0 kWh; name electricity_out; source Thomas Nussbaumer 2014; By-product classification allocatable product; CPC 17100: Electrical energy; pedigree (1,1,1,1,1)
  Electricl efficiency referring to the LHV of the fuel input
  EcoSpold01Location=CH
  production volume 0 kWh; name apv_el
    (same comment as for heat, district or industrial, other than natural gas)
  property price 0.0977 EUR2005; name electricity_price_EUR2005
    Temporary price data. Calculated as 90% of purchasers price based on: 94% of the average price (to account for a 6% loss in transformation and transmission) for electricity for industrial consumersin 2005 (excluded taxes). From IEA.
  property exergy 3.6 MJ; name electricity_exergy
    (same comment as for heat, district or industrial, other than natural gas)
  property true value relation 3.6; name electricity_true_value_relation
    property to calculate "true value" from
  property true value 0.00433561; name electricity_out_true_value
    (same comment as for heat, district or industrial, other than natural gas)

## Inputs from technosphere
- wood chips, wet, measured as dry mass: 0.0485701 kg; = 1/18.9; lognormal variance with pedigree 0.0227, pedigree (2,2,3,1,1)
  Calculated value.
  LHV of wood chips: 18.9 MJ/kg (dry mass)
  properties: carbon content, non-fossil 0.494, heating value, net 10.84 MJ, dry mass 1 kg, water content 1.1, wet mass 2.1 kg
  note on heating value, net: Value based on the dataset 'softwood forestry, mixed species, sustainable forest management'
- dust collector, electrostatic precipitator, for industrial use: 1.59371e-9 unit; = 1/(4000*2000*20*3.6); lognormal variance with pedigree 0.0927, pedigree (3,2,5,1,2)
  calculated value, assuming 4000h/a operation time, 20a lifetime, 2000kW (fuel input) capacity
- waste mineral oil: -3.47913e-6 kg; name waste_oil; = ((lubricating_oil) )*-1; source Bauer, C. 2007; lognormal variance with pedigree 0.0507, pedigree (3,2,5,1,2)
  literature
  production volume 0 kg; = apv_heat*waste_oil
    Calculated from production volume of reference product using the relative outputs.
  property price 0 EUR2005; name waste_oil_price_EUR2005
  properties: water content 0.111111, dry mass 0.9 kg, wet mass 1 kg, carbon content, fossil 0.864444, heating value, net 34.7 MJ
  note on carbon content, fossil: Tab A.6, ecoinvent v2.2 report 13_I. C content has been calculated after data in the tables, and then referred to 1 kg DM
  note on heating value, net: Value taken from the general comment of the treatment dataset.
- furnace, wood chips, with silo, 1000kW: 1.59371e-9 unit; = 1/(4000*2000*20*3.6); lognormal variance with pedigree 0.0927, pedigree (3,2,5,1,2)
  (same comment as for dust collector, electrostatic precipitator, for industrial use)
- municipal solid waste: -3.01096e-6 kg; name municipal_waste; source Bauer, C. 2007; lognormal variance with pedigree 0.0507, pedigree (3,2,5,1,2)
  literature
  production volume 0 kg; = apv_heat*municipal_waste
    Calculated from the production volume of heat, district or industrial, other than natural gas in proportion to the respective output amounts.
  property price 0 EUR2005; name municipal_waste_price_EUR2005
  properties: heating value, net 11.74 MJ, water content 0.297017, wet mass 1 kg, carbon content, fossil 0.171549, carbon content, non-fossil 0.261655, dry mass 0.771 kg
  note on carbon content, fossil: MSW composition in tab 4.1, ecoinvent v2.2 report 13_I. C content referred to 1 kg DM
- water, decarbonised: 0.000836276 kg; name water_decarbonised; lognormal variance with pedigree 0.0507, pedigree (3,2,5,1,2)
  literature
  properties: wet mass 1 kg
- wood ash mixture, pure: -0.000485609 kg; name wood_ash; source Bauer, C. 2007; lognormal variance with pedigree 0.0507, pedigree (3,2,5,1,2)
  literature
  production volume 0 kg; = apv_heat*wood_ash
    (same comment as for municipal solid waste)
  property price 0 EUR2005; name wood_ash_price_EUR2005
  properties: wet mass 1 kg, dry mass 1 kg, carbon content, non-fossil 0.012
- heat and power co-generation unit, organic Rankine cycle, 200kW electrical: 1.59371e-9 unit; = 1/(4000*2000*20*3.6); lognormal variance with pedigree 0.0927, pedigree (3,2,5,1,2)
  (same comment as for dust collector, electrostatic precipitator, for industrial use)
- wastewater, average: -8.36276e-7 m3; name sewage; = ((water_decarbonised/1000) )*-1; source Bauer, C. 2007; lognormal variance with pedigree 0.0507, pedigree (3,2,5,1,2)
  literature
  production volume 0 m3; = apv_heat*sewage
    (same comment as for municipal solid waste)
  property price 0 EUR2005; name sewage_price_EUR2005
  properties: water content 2882.2, carbon content, non-fossil 0.194039, dry mass 0.346837 kg, wet mass 1000 kg
  note on carbon content, non-fossil: 0.0673 kg TOC/m3 (Tab A.17, ecoinvent v2.2 report 13_I). TOC was considered as Total Carbon.
- chemical, organic: 6.09536e-6 kg; lognormal variance with pedigree 0.0507, pedigree (3,2,5,1,2)
  literature
  properties: wet mass 1 kg, dry mass 1 kg, heating value, net 19.03 MJ, carbon content, fossil 0.628
  note on carbon content, fossil: This dataset is an unweighted average of 20 organic substances (listed in Tab 88.1, ecoinvent v2.2 report 8, part II), being part of the top100 chemicals included in this database. The C-content has also been calculated as an unweighted average of the C content of the substances composing this dataset.
- chlorine, liquid: 3.47913e-7 kg; source Bauer, C. 2007; lognormal variance with pedigree 0.0507, pedigree (3,2,5,1,2)
  literature
  EcoSpold01Location=RER
  properties: dry mass 1 kg, wet mass 1 kg
- lubricating oil: 3.47913e-6 kg; name lubricating_oil; lognormal variance with pedigree 0.0507, pedigree (3,2,5,1,2)
  literature
  properties: wet mass 1 kg, carbon content, fossil 0.75, dry mass 1 kg, heating value, net 40.2 MJ
  note on carbon content, fossil: Lubricating oil is produced from diesel. C-content/dry mass of fats and oils considered 75%, from: ecoinvent v2.2 report, n 15a, pg 40
  note on heating value, net: Literature value, Source: IPCC 2006, 2006 IPCC Guidelines for National Greenhouse Gas Inventories, Prepared by the National Greenhouse Gas Inventories Programme, Eggleston H.S., Buendia L., Miwa K., Ngara T. and Tanabe K. (eds). Published: IGES, Japan
- ammonia, anhydrous, liquid: 8.72077e-9 kg; source Bauer, C. 2007; lognormal variance with pedigree 0.0507, pedigree (3,2,5,1,2)
  EcoSpold01Location=CH
  literature
  properties: dry mass 1 kg, wet mass 1 kg
- sodium chloride, powder: 4.35121e-6 kg; source Bauer, C. 2007; lognormal variance with pedigree 0.0507, pedigree (3,2,5,1,2)
  literature
  properties: wet mass 1 kg, dry mass 1 kg

## Emissions to nature
- Hydrocarbons, aliphatic, alkanes, unspecified [air, urban air close to ground]: 8.35358e-7 kg; source Bauer, C. 2007; lognormal variance with pedigree 0.0507, pedigree (3,2,5,1,2)
  literature
- Lead [air, urban air close to ground]: 2.29494e-8 kg; source Bauer, C. 2007; lognormal variance with pedigree 0.0507, pedigree (3,2,5,1,2)
  literature
- Methane, non-fossil [air, urban air close to ground]: 2.20314e-6 kg; source Thomas Nussbaumer 2014; lognormal variance with pedigree 0.0113, pedigree (2,2,3,1,2)
  expert estimation (see source)
- Chromium VI [air, urban air close to ground]: 3.6719e-11 kg; source Bauer, C. 2007; lognormal variance with pedigree 0.0507, pedigree (3,2,5,1,2)
  literature
- Benzene [air, urban air close to ground]: 8.35358e-7 kg; source Bauer, C. 2007; lognormal variance with pedigree 0.0507, pedigree (3,2,5,1,2)
  literature
- Fluorine [air, urban air close to ground]: 4.58988e-8 kg; source Bauer, C. 2007; lognormal variance with pedigree 0.0507, pedigree (3,2,5,1,2)
  literature
- Carbon dioxide, non-fossil [air, urban air close to ground]: 0.0881257 kg; source Bauer, C. 2007; lognormal variance with pedigree 0.0507, pedigree (3,2,5,1,2)
  literature
- Particulates, > 2.5 um, and < 10um [air, urban air close to ground]: 4.58988e-7 kg; source Thomas Nussbaumer 2014; lognormal variance with pedigree 0.0113, pedigree (2,2,3,1,2)
  expert estimation (see source)
- Formaldehyde [air, urban air close to ground]: 1.19337e-7 kg; source Bauer, C. 2007; lognormal variance with pedigree 0.0507, pedigree (3,2,5,1,2)
  literature
- Carbon monoxide, non-fossil [air, urban air close to ground]: 0.000229494 kg; source Thomas Nussbaumer 2014; lognormal variance with pedigree 0.0113, pedigree (2,2,3,1,2)
  expert estimation (see source)
- Hydrocarbons, aliphatic, unsaturated [air, urban air close to ground]: 2.84573e-6 kg; source Bauer, C. 2007; lognormal variance with pedigree 0.0507, pedigree (3,2,5,1,2)
  literature
- Water [air, urban air close to ground]: 5.33344e-5 m3; lognormal variance with pedigree 0.0352, pedigree (3,3,3,1,2)
  Estimation to ensure a correct water balance; the quantity of this exchange includes also water released during natural drying of the wood fuel prior to combustion.
- Phosphorus [air, urban air close to ground]: 2.75393e-7 kg; source Bauer, C. 2007; lognormal variance with pedigree 0.0507, pedigree (3,2,5,1,2)
  literature
- Calcium [air, urban air close to ground]: 5.37016e-6 kg; source Bauer, C. 2007; lognormal variance with pedigree 0.0507, pedigree (3,2,5,1,2)
  literature
- Phenol, pentachloro- [air, urban air close to ground]: 7.4356e-12 kg; source Bauer, C. 2007; lognormal variance with pedigree 0.0507, pedigree (3,2,5,1,2)
  literature
- m-Xylene [air, urban air close to ground]: 1.10157e-7 kg; source Bauer, C. 2007; lognormal variance with pedigree 0.0507, pedigree (3,2,5,1,2)
  literature
- Copper [air, urban air close to ground]: 2.01955e-8 kg; source Bauer, C. 2007; lognormal variance with pedigree 0.0507, pedigree (3,2,5,1,2)
  literature
- Magnesium [air, urban air close to ground]: 3.30471e-7 kg; source Bauer, C. 2007; lognormal variance with pedigree 0.0507, pedigree (3,2,5,1,2)
  literature
- Potassium [air, urban air close to ground]: 2.14806e-5 kg; source Bauer, C. 2007; lognormal variance with pedigree 0.0507, pedigree (3,2,5,1,2)
  literature
- Arsenic [air, urban air close to ground]: 9.17976e-10 kg; source Bauer, C. 2007; lognormal variance with pedigree 0.0507, pedigree (3,2,5,1,2)
  literature
- Mercury [air, urban air close to ground]: 2.75393e-10 kg; source Bauer, C. 2007; lognormal variance with pedigree 0.0507, pedigree (3,2,5,1,2)
  literature
- Dinitrogen monoxide [air, urban air close to ground]: 2.11134e-6 kg; source Bauer, C. 2007; lognormal variance with pedigree 0.0507, pedigree (3,2,5,1,2)
  literature
- Particulates, < 2.5 um [air, urban air close to ground]: 8.26178e-6 kg; source Thomas Nussbaumer 2014; lognormal variance with pedigree 0.0113, pedigree (2,2,3,1,2)
  expert estimation (see source)
- Acetaldehyde [air, urban air close to ground]: 5.59965e-8 kg; source Bauer, C. 2007; lognormal variance with pedigree 0.0507, pedigree (3,2,5,1,2)
  literature
- Ammonia [air, urban air close to ground]: 1.59728e-6 kg; source Bauer, C. 2007; lognormal variance with pedigree 0.0507, pedigree (3,2,5,1,2)
  literature
- Nickel [air, urban air close to ground]: 5.50785e-9 kg; source Bauer, C. 2007; lognormal variance with pedigree 0.0507, pedigree (3,2,5,1,2)
  literature
- Cadmium [air, urban air close to ground]: 6.42583e-10 kg; source Bauer, C. 2007; lognormal variance with pedigree 0.0507, pedigree (3,2,5,1,2)
  literature
- Dioxins, measured as 2,3,7,8-tetrachlorodibenzo-p-dioxin [air, urban air close to ground]: 2.84573e-14 kg; source Bauer, C. 2007; lognormal variance with pedigree 0.0507, pedigree (3,2,5,1,2)
  literature
- PAH, polycyclic aromatic hydrocarbons [air, urban air close to ground]: 1.01895e-8 kg; source Bauer, C. 2007; lognormal variance with pedigree 0.0507, pedigree (3,2,5,1,2)
  literature
- Benzene, hexachloro- [air, urban air close to ground]: 6.60943e-15 kg; source Bauer, C. 2007; lognormal variance with pedigree 0.0507, pedigree (3,2,5,1,2)
  literature
- Sulfur dioxide [air, urban air close to ground]: 2.29494e-6 kg; source Bauer, C. 2007; lognormal variance with pedigree 0.0507, pedigree (3,2,5,1,2)
  literature
- Benzo(a)pyrene [air, urban air close to ground]: 4.58988e-10 kg; source Bauer, C. 2007; lognormal variance with pedigree 0.0507, pedigree (3,2,5,1,2)
  literature
- NMVOC, non-methane volatile organic compounds, unspecified origin [air, urban air close to ground]: 5.14066e-6 kg; source Thomas Nussbaumer 2014; lognormal variance with pedigree 0.0113, pedigree (2,2,3,1,2)
  expert estimation (see source)
- Chlorine [air, urban air close to ground]: 1.65236e-7 kg; source Bauer, C. 2007; lognormal variance with pedigree 0.0507, pedigree (3,2,5,1,2)
  literature
- Zinc [air, urban air close to ground]: 2.75393e-7 kg; source Bauer, C. 2007; lognormal variance with pedigree 0.0507, pedigree (3,2,5,1,2)
  literature
- Sodium [air, urban air close to ground]: 1.19337e-6 kg; source Bauer, C. 2007; lognormal variance with pedigree 0.0507, pedigree (3,2,5,1,2)
  literature
- Nitrogen oxides [air, urban air close to ground]: 0.000137696 kg; source Thomas Nussbaumer 2014; lognormal variance with pedigree 0.0113, pedigree (2,2,3,1,2)
  expert estimation (see source)
- Manganese [air, urban air close to ground]: 1.56056e-7 kg; source Bauer, C. 2007; lognormal variance with pedigree 0.0507, pedigree (3,2,5,1,2)
  literature
- Chromium [air, urban air close to ground]: 3.63518e-9 kg; source Bauer, C. 2007; lognormal variance with pedigree 0.0507, pedigree (3,2,5,1,2)
  literature
- Benzene, ethyl- [air, urban air close to ground]: 2.75393e-8 kg; source Bauer, C. 2007; lognormal variance with pedigree 0.0507, pedigree (3,2,5,1,2)
  literature
- Toluene [air, urban air close to ground]: 2.75393e-7 kg; source Bauer, C. 2007; lognormal variance with pedigree 0.0507, pedigree (3,2,5,1,2)
  literature
- Bromine [air, urban air close to ground]: 5.50785e-8 kg; source Bauer, C. 2007; lognormal variance with pedigree 0.0507, pedigree (3,2,5,1,2)
  literature

## Sampling procedure
literature, expert judgement

## Review by Carl Vadenbo 2015-05-21
The update of the whole electricity sector for the ecoinvent v3.2 database consist of hundreds of datasets. All these datasets have passed through a streamlined review processes where the underlying modelling of production volumes, technology shares and efficiencies was reviewed in detail prior to the datasets being submitted to the database.
