# nutrient supply from NPK (15-15-15) fertiliser

Dataset: EcoSpold 2, unit process
Geography: RER
Time period: 2016-01-01 to 2021-12-31
Technology level: current
Classification: ISIC rev.4 ecoinvent: 0161:Support activities for crop production
Tags: combined production
Scenario: Business-as-Usual
System model: Allocation, cut-off by classification
Generated by: Avraam Symeonidis
Database: ecoinvent
isCopyrightProtected: true
accessRestrictedTo: 1

## General comment
This inventory describes the supply of nutrients from ''NPK (15-15-15) fertiliser'' for fertiliser use.
No machinery expenditures or emissions to the environment are considered related to the actual application of this substance on soil during its agricultural use. The purpose of this activity is to connect the chemical production of ''NPK (15-15-15) fertiliser'' with its generic uses as fertilizer. The product ''NPK (15-15-15) fertiliser'' is connected to the generic market for ''inorganic nitrogen fertiliser, as N'' and ''inorganic phosphorus fertiliser, as P2O5'' and ''inorganic potassium fertiliser, as K2O'' through this supplying activity. In the agricultural context, ''NPK (15-15-15) fertiliser'' can be used directly as a fertilizer input to crop production, eventually with other chemicals; alternatively, a generic input of ''inorganic nitrogen fertiliser, as N'' and ''inorganic phosphorus fertiliser, as P2O5'' and ''inorganic potassium fertiliser, as K2O'' can be used instead, and this will represent the regional consumption mix for his type of nutrient. A way in between is allowed by using the generic input ''inorganic nitrogen fertiliser, as N'' and ''inorganic phosphorus fertiliser, as P2O5'' and ''inorganic potassium fertiliser, as K2O'' and link to the activity providing it from a specific chemical.
In all cases, emissions associated to the application of the fertilizer have to be calculated in the crop production activity.

## Technology
Inventory based on composition of ''NPK (15-15-15) fertiliser''.

## Reference product
- inorganic phosphorus fertiliser, as P2O5: 1 kg; name RP2; By-product classification allocatable product; CPC 3462: Mineral or chemical fertilizers, phosphatic
  production volume 5.16552e8 kg
    The production volume has been extrapolated from the global production volume of this product in the database by employing GDP scaling. GDP for Europe is calculated to amount circa 25.6% of the global GDP. Original comment of the GLO dataset is: Esrimated value. Based on data from FAO, the global agricultural use of NPK fertilisers amounts to 19242189.42 t. It is assumed that 70% of this is NPK 15-15-15. The actual value here is calculated based on the nutrient content of the NPK fertiliser. References: Fertilizers by Product, FAOSTAT, 2020, Food and Agricultural Organization of the United Nations. Accessed at: http://www.fao.org/faostat/en/#data/RFB, on 12 of May 2020.References: United Nations, Statistics division, 2020, GDP/breakdown at current prices in US Dollars (all countries and regions), All countries and regions/subregions (totals) for all years - sorted by region/subregion, Available at: https://unstats.un.org/unsd/snaama/Downloads
  property phosphorus content 0.436421
    Phosphorus content (on a dry matter basis) of inorganic phosphorus fertiliser, as P2O5 is calculated from the molecular formula of the substance (Potassium).
  property oxygen content 0.563579
    Oxygen content (on a dry matter basis) of inorganic phosphorus fertiliser, as P2O5 is calculated from the molecular formula of the substance (Potassium).
  property carbon content, fossil 0
    Carbon content, fossil is calculated based on the chemical formula of the substance.
  property price 0.241 EUR2005; name RP2_price_EUR2005
    Temporary price data. Calculated as 90% of purchasers price based on: 2004 prices are calculated on basis of Import/Export data (tonnes and US$) from UN Trade Statistics Database (http://data.un.org/Browse.aspx?d=ComTrade, accessed 7/7-2010). N, P2O5, or K2O content (http://www.fertilizer.org/ifa/Home-Page/STATISTICS/Conversions-factors)
  property carbon content 0
    carbon content on a dry matter basis (reserved; not for manual entry)
  properties: dry mass 1 kg, wet mass 1 kg, water in wet mass 0 kg, carbon content, non-fossil 0, water content 0, carbon allocation 0 kg
- inorganic nitrogen fertiliser, as N: 0 kg; name RP; By-product classification allocatable product; CPC 3461: Mineral or chemical fertilizers, nitrogenous
  production volume 0 kg
    (same comment as for inorganic phosphorus fertiliser, as P2O5)
  property nitrogen content 1
    Nitrogen content (on a dry matter basis) of inorganic nitrogen fertiliser, as N is calculated from the molecular formula of the substance (Nitrogen).
  property carbon content, fossil 0
    Carbon content, fossil is calculated based on the chemical formula of the substance.
  property price 0.473 EUR2005; name RP_price_EUR2005
    (same comment as for inorganic phosphorus fertiliser, as P2O5)
  property carbon content 0
    carbon content on a dry matter basis (reserved; not for manual entry)
  properties: carbon content, non-fossil 0, dry mass 1 kg, wet mass 1 kg, water content 0, water in wet mass 0 kg, carbon allocation 0 kg
- inorganic potassium fertiliser, as K2O: 0 kg; name RP3; CPC 3463: Mineral or chemical fertilizers, potassic; By-product classification allocatable product
  production volume 0 kg
    (same comment as for inorganic phosphorus fertiliser, as P2O5)
  property price 0.188 EUR2005; name RP3_price_EUR2005
    Temporary price data. Calculated as 90% of purchasers price based on: 2004 import price calulated from FAOSTAT (http://faostat.fao.org/site/575/DesktopDefault.aspx?PageID=575#ancor [accessed 2011.01.27] Potash Fertilizers (K20 total nutrients) in kUSD/Mg
  property oxygen content 0.169852
    Oxygen content (on a dry matter basis) of inorganic potassium fertiliser, as K2O is calculated from the molecular formula of the substance (Potassium).
  property potassium content 0.830148
    Potassium content (on a dry matter basis) of inorganic potassium fertiliser, as K2O is calculated from the molecular formula of the substance (Potassium).
  property carbon content, fossil 0
    Carbon content, fossil is calculated based on the chemical formula of the substance.
  property carbon content 0
    carbon content on a dry matter basis (reserved; not for manual entry)
  properties: carbon content, non-fossil 0, wet mass 1 kg, water content 0, water in wet mass 0 kg, dry mass 1 kg, carbon allocation 0 kg

## Inputs from technosphere
- NPK (15-15-15) fertiliser: 2.90947 kg; = (RP+RP2+RP3)*0+1; lognormal variance with pedigree 0.1702, pedigree (3,5,2,1,4)
  Combined production mathematical formula. Input is sub-divided with regards to the nutrient present in the substance.
  properties: potassium content 0.15, nitrogen content 0.15, dry mass 1 kg, wet mass 1 kg, phosphorus content 0.15
  note on potassium content: Potassium content (on a dry matter basis) of NPK (15-15-15) fertiliser is calculated from the molecular formula of the substance ().
  note on nitrogen content: Nitrogen content (on a dry matter basis) of NPK (15-15-15) fertiliser is calculated from the molecular formula of the substance ().
  note on phosphorus content: Phosphorus content (on a dry matter basis) of NPK (15-15-15) fertiliser is calculated from the molecular formula of the substance ().
