# maintenance, goods wagon

Dataset: EcoSpold 2, unit process
Geography: RER
Time period: 1993-01-01 to 2021-12-31
Technology level: current
Classification: ISIC rev.4 ecoinvent: 3315:Repair of transport equipment, except motor vehicles
Classification: EcoSpold01Categories: transport systems/train
Tags: ConvertedDataset
Scenario: Business-as-Usual
System model: Allocation, cut-off by classification
Generated by: Michael Spielmann (obsolete)
Published in: Spielmann M. 2007
Database: ecoinvent
isCopyrightProtected: true
accessRestrictedTo: 1

## General comment
The dataset represents the maintenance of a goods wagon.
[This dataset was already contained in the ecoinvent database version 2. It was not individually updated during the transfer to ecoinvent version 3. Life Cycle Impact Assessment results may still have changed, as they are affected by changes in the supply chain, i.e. in other datasets. This dataset was generated following the ecoinvent quality guidelines for version 2. It may have been subject to central changes described in the ecoinvent version 3 change report (http://www.ecoinvent.org/database/ecoinvent-version-3/reports-of-changes/), and the results of the central updates were reviewed extensively. The changes added e.g. consistent water flows and other information throughout the database. The documentation of this dataset can be found in the ecoinvent reports of version 2, which are still available via the ecoinvent website. The change report linked above covers all central changes that were made during the conversion process.]

## Included activities start
Service starts with material expenditures for maintenance.

## Included activities end
The dataset ends with the maintenance of one goods wagon. The dataset includes material consumption, transport, energy and fuel consumption and disposal.

## Geography
Maintenance data reflect the situation in Switzerland

## Technology
The energy consumption for the wagon maintenance is assumed to be the same as for wagon manufacturing. The material consumption merely reflects the scheduled maintenance of mechanical parts. In this project new SBB data has been available for the stationary energy and material consumption of goods transportation equipment maintenance. Is assumed that the data comprises expenditures for both, locomotives and wagons. Are employed the figures for 2001, representing expenditures of all SBB goods transportation service garages. In order to allocate the maintenance expenditures between locomotives and wagons, are allocated 95% of the maintenance expenditures to wagon maintenance and 5% to locomotive maintenance. This allocation is based on the average vehicle weight (the weight of a locomotive is 3 times higher than an average wagon) and the number of vehicles in the rail equipment. Furthermore is assumed that the frequency of maintenance is the same for either type. The specific waste due to maintenance activities has been calculated by pursuing the same approach as for the calculation of energy and material expenditures. The sludge is assumed to contain lubricates which result from cleaning activities. For dismantled metals, for instance used break shoes, is applied a cut off allocation, since they are recycled.
References:
Frischknecht R., Bollens U., Bosshart S., Ciot M., Ciseri L., Doka G., Dones R., Gantner U. and Hischier R. (1996) Ökoinventare von Energiesystemen: Grundlagen für den ökologischen Vergleich von Energiesystemen und den Einbezug von Energiesystemen in Ökobilanzen für die Schweiz. Auflage No. 3. Gruppe Energie - Stoffe - Umwelt (ESU), Eidgenössische Technische Hochschule Zuerich und Sektion Ganzheitliche Systemanalysen, Paul Scherrer Institut, Villigen, Bundesamt für Energie (Hrsg.), Bern

## Time period
The energy data represents conditions in 2001. For some materials data from 1993 has been employed.

## Reference product
- maintenance, goods wagon: 1 unit; CPC 87149: Maintenance and repair services of other transport equipment; By-product classification allocatable product
  EcoSpold01Location=RER
  production volume 1.32237 unit
    This is a placeholder value that does not reflect real-world production volumes. This dataset does not currently require a real-world production volume to work in the database framework, and no actual data were collected yet. This has no negative effect on the results of the ecoinvent database. The placeholder value of this activity was scaled according to the nominal GDP of 2005 (source: United Nations, http://data.un.org/Glossary.aspx?q=GDP+%28current+US%24%29, accessed 20130726) to reflect an appropriate share of the global production volume, which is also a placeholder value.
  property price 10150.8 EUR2005
    Calculated based on inputs: The price of the product has been calculated as a sum of the values of the material and energy inputs for this product. This value is therefore a rough estimation. It may underestimate the real price since there are additional expenses when producing any product. These expences can include for example labour costs, treatment of waste materials and profit for the producer. Please consider carefully whether this level of data quality is acceptable for your application.

## Inputs from technosphere
- alkyd paint, white, without solvent, in 60% solution state: 39 kg; lognormal variance with pedigree 0.0521, pedigree (3,1,5,3,1)
  EcoSpold01Location=RER
  Calculated value. Oral communication.
  Uncertainty: oral communication
  properties: carbon content, fossil 0.140367, dry mass 1 kg, wet mass 1 kg, carbon content, non-fossil 0.199629, heating value, net 10.3 MJ
  note on carbon content, fossil: C content was calculated as an addition of C content in the raw materials.
- polyvinylchloride, suspension polymerised: 34.8936 kg; lognormal variance with pedigree 0.0881, pedigree (5,5,5,3,1)
  Calculated value. Oral communication.
  EcoSpold01Location=RER
  Uncertainty: oral communication
  properties: wet mass 1 kg, heating value, net 21.5 MJ, carbon content, fossil 0.387097, dry mass 1 kg
  note on carbon content, fossil: Monomer is vynyl chloride, C2H3Cl (ecoinvent v2.2 report 11_II). MW=62 g/mol
- waste mineral oil: 0 kg; pedigree (1,1,1,1,1)
  Calculated value. Oral communication.
  EcoSpold01Location=CH
  Uncertainty: oral communication
  production volume 0 kg
    Calculated from the production volume of maintenance, goods wagon in proportion to the respective output amounts.
  properties: heating value, net 34.7 MJ, carbon content, fossil 0.864444, wet mass 1 kg, water content 0.111111, dry mass 0.9 kg
  note on heating value, net: Value taken from the general comment of the treatment dataset.
  note on carbon content, fossil: Tab A.6, ecoinvent v2.2 report 13_I. C content has been calculated after data in the tables, and then referred to 1 kg DM
- heat, district or industrial, natural gas: 68590 MJ; lognormal variance with pedigree 0.0521, pedigree (3,1,5,3,1)
  EcoSpold01Location=RER
  Uncertainty: oral communication
  properties: heating value, net 1 MJ
- waste wood, untreated: -296 kg; lognormal variance with pedigree 0.0521, pedigree (3,1,5,3,1)
  EcoSpold01Location=CH
  Calculated value. Oral communication.
  Uncertainty: oral communication
  production volume 296 kg
    (same comment as for waste mineral oil)
  properties: water content 0.25, carbon content, non-fossil 0.48632, dry mass 0.8 kg, wet mass 1 kg, heating value, net 13.99 MJ
  note on carbon content, non-fossil: Tab A.4, ecoinvent v2.2 report 13_I. C content has been referred to 1 kg DM,
- lubricating oil: 222 kg; lognormal variance with pedigree 0.0521, pedigree (3,1,5,3,1)
  (same comment as for polyvinylchloride, suspension polymerised)
  properties: wet mass 1 kg, heating value, net 40.2 MJ, carbon content, fossil 0.75, dry mass 1 kg
  note on heating value, net: Literature value, Source: IPCC 2006, 2006 IPCC Guidelines for National Greenhouse Gas Inventories, Prepared by the National Greenhouse Gas Inventories Programme, Eggleston H.S., Buendia L., Miwa K., Ngara T. and Tanabe K. (eds). Published: IGES, Japan
  note on carbon content, fossil: Lubricating oil is produced from diesel. C-content/dry mass of fats and oils considered 75%, from: ecoinvent v2.2 report, n 15a, pg 40
- cast iron: 3510 kg; lognormal variance with pedigree 0.0687, pedigree (4,3,5,3,1)
  (same comment as for polyvinylchloride, suspension polymerised)
  properties: carbon content, fossil 0.04, wet mass 1 kg, dry mass 1 kg
  note on carbon content, fossil: Cast iron is made by remelting pig iron in small furnaces (e.g. cupola furnaces or electric arc furnaces) and poured into moulds to make castings. It usually contains 2% to 6% carbon (ecoinvent v2.2 report 10_partII). An average content of 4% was considered
- polyvinylchloride, emulsion polymerised: 5.1064 kg; lognormal variance with pedigree 0.0881, pedigree (5,5,5,3,1)
  (same comment as for polyvinylchloride, suspension polymerised)
  properties: heating value, net 21.5 MJ, carbon content, fossil 0.387097, wet mass 1 kg, dry mass 1 kg
- heat, district or industrial, other than natural gas: 352526 MJ; lognormal variance with pedigree 0.0521, pedigree (3,1,5,3,1)
  EcoSpold01Location=RER
  Uncertainty: oral communication
  properties: heating value, net 1 MJ
- electricity, medium voltage: 11000 kWh; lognormal variance with pedigree 0.0521, pedigree (3,1,5,3,1)
  Calculated value. Oral communication.
  EcoSpold01Location=UCTE
  Uncertainty: oral communication
- waste mineral oil: -1805.31, -44.6922 kg (2 entries); lognormal variance with pedigree 0.0521, pedigree (3,1,5,3,1)
  (same comment as for waste mineral oil)
  production volume 1850 kg

## Sampling procedure
Maintenance expenditures for all SBB service garages available in form of oral communication.

## Extrapolations
This dataset has been extrapolated from year 2001 to the year of the calculation (2021). The uncertainty has been adjusted accordingly.

## Review by Niels Jungbluth 2003-07-23
passed

## Review by Roland Hischier 2011-09-23
Transfer of documentation done.
