# barite production

Dataset: EcoSpold 2, unit process
Geography: RER
Time period: 1978-01-01 to 2021-12-31
Technology level: current
Classification: ISIC rev.4 ecoinvent: 0729:Mining of other non-ferrous metal ores
Synonyms: Baritop; Barite; Barotrast; Barosperse; Barium Sulfate
Scenario: Business-as-Usual
System model: Allocation, cut-off by classification
Generated by: Niels Jungbluth
Published in: Jungbluth, N. 2007
Database: ecoinvent
isCopyrightProtected: true
accessRestrictedTo: 1

## General comment
This dataset represents the production of 1 kg of barite. Barite is the mineralogical name for barium sulfate. Barite refers here to the first marketable product, which includes crude barite that usually has undergone simple beneficiation processes, such as jigging, tabling, and washing, or more complex processes, such as flotation, heavy-media separation, or magnetic separation. Most barite ores require some upgrading to minimum commercial purity or density levels.
Barite is primarily used as a weighting agent in oil and gas well drilling fluids or 'mud'.
The inventory is based on literature data and estimations.
References:
Jungbluth N. (2007) Erdöl. In: Sachbilanzen von Energiesystemen: Grundlagen für den ökologischen Vergleich von Energiesystemen und den Einbezug von Energiesystemen in Ökobilanzen für die Schweiz (ed. Dones R.). Swiss Centre for Life Cycle Inventories, Dübendorf, CH.
Bonel K. A., British Geological Survey (2005) Barytes

## Included activities start
From extraction of barite ore in the ground.

## Included activities end
This activity ends with the production of barite that has undergone beneficiation in order to be marketable. The dataset includes infrastructure use, energy consumption, water use and particle emissions. Land use is included in infrastructure, for which the infrastructure for a bentonite quarry has been used as a proxy.

## Geography
The data is based originally on a publication in the US.

## Technology
Barite is mined both in open pit and underground mines. About 60 to 120 kg of Barite can be yielded from one cubic meter of ore. The ore is transported via lorry (usually less than 5km) to a washing installation. Subsequently, it is separated from the water and grinded wet or dry. Between 65% and 85% of barite contained in the ore can be extracted. This dataset includes resource extraction and processing of the material.

## Time period
Time of publication.

## Parameters
- fraction, process water, to air: 0.205 dimensionless; name fraction_PW_to_air; lognormal variance with pedigree 0.092025, pedigree (4,4,3,2,4)
  Literature value (Statistics Canada, 2007 & Shaffer, K.H., 2008, Consumptive water use in the Great Lakes Basin, USGS) (Vionnet, S., Quantis Water Database - Technical Report, 2012).

## Reference product
- barite: 1 kg; name RP; CPC 4160: Other non-ferrous metals and articles thereof (including waste and scrap of some metals); cermets and articles […]; By-product classification allocatable product; CAS 7727-43-7
  Barite is the mineralogical name for barium sulfate. Barite refers here to the first marketable product, which includes crude barite that usually has undergone simple beneficiation processes, such as jigging, tabling, and washing, or more complex processes, such as flotation, heavy-media separation, or magnetic separation. Most barite ores require some upgrading to minimum commercial purity or density levels. Barite is primarily used as a weighting agent in oil and gas well drilling fluids or 'mud'.
  production volume 1.80218e8 kg; name RP_PV; = (70000 + 39218 + 16000 + 55000)*1000
    The production volume of barite in Europe (Bulgaria, Germany, Slovakia and the United Kingdom) in 2018 was 180'218 metric tons (USGS 2021).
    References:
    USGS (2021). Barite Statistics and Information, Advance Data Release of the 2019 Annual Tables. https://prd-wret.s3.us-west-2.amazonaws.com/assets/palladium/production/atoms/files/myb1-2019-barit-adv.xlsx
  property price 0.127312 EUR2005
    Price calculated based on estimated prices reported in the USGS Mineral Commodity Summaries for Barite from 2011 to 2019 (https://www.usgs.gov/centers/nmic/barite-statistics-and-information). The prices given in USD were converted to EUR based on the annual exchange rates published by the European Central Bank (https://sdw.ecb.europa.eu/quickview.do?SERIES_KEY=120.EXR.A.USD.EUR.SP00.A), and then adjusted for inflation relative to 2005 by using the Harmonised Index of Consumer Prices (HICP) of the euro area, published by eurostat (https://ec.europa.eu/eurostat/databrowser/view/PRC_HICP_AIND/default/table).
  property carbon content 0
    carbon content on a dry matter basis (reserved; not for manual entry)
  properties: carbon content, fossil 0, water content 0, wet mass 1 kg, carbon content, non-fossil 0, water in wet mass 0 kg, dry mass 1 kg, carbon allocation 0 kg

## Inputs from technosphere
- transport, freight, lorry 16-32 metric ton, EURO5: 0.0085 metric ton*km; lognormal variance with pedigree 0.1786, pedigree (4,5,5,5,5)
  Literature value. This exchange accounts for the transport of the ore from the mine to the washing installation (commonly less than 5 km) (Jungbluth, 2007), i.e. transport within the boundaries of the production activity.
  Reference:
  Jungbluth N. (2007) Erdöl. In: Sachbilanzen von Energiesystemen: Grundlagen für den ökologischen Vergleich von Energiesystemen und den Einbezug von Energiesystemen in Ökobilanzen für die Schweiz (ed. Dones R.). Swiss Centre for Life Cycle Inventories, Dübendorf, CH.
- heat, district or industrial, other than natural gas: 0.008189 MJ; lognormal variance with pedigree 0.1786, pedigree (4,5,5,5,5)
  Rough estimation. Value based on bentonite quarry operation.
  Uncertainty: R
  properties: heating value, net 1 MJ
- diesel, burned in building machine: 0.0921 MJ; lognormal variance with pedigree 0.1786, pedigree (4,5,5,5,5)
  Rough estimation. Value based on bentonite quarry operation.
  Uncertainty: R
  properties: heating value, net 1 MJ
- excavation, hydraulic digger: 0.0085 m3; lognormal variance with pedigree 0.2086, pedigree (5,5,5,1,5)
  Rough estimation according to Jungbluth (2007).
  Reference:
  Jungbluth N. (2007) Erdöl. In: Sachbilanzen von Energiesystemen: Grundlagen für den ökologischen Vergleich von Energiesystemen und den Einbezug von Energiesystemen in Ökobilanzen für die Schweiz (ed. Dones R.). Swiss Centre for Life Cycle Inventories, Dübendorf, CH.
  Uncertainty: R
- electricity, medium voltage: 0.000714 kWh; lognormal variance with pedigree 0.1786, pedigree (4,5,5,5,5)
  Rough estimation. Value based on bentonite quarry operation.
- bentonite quarry infrastructure: 5.78e-11 unit; lognormal variance with pedigree 0.2086, pedigree (5,5,5,1,5)
  Rough estimation. Bentonite quarry infrastructure is used as proxy for barite quarry infrastructure.
  Reference:
  Jungbluth N. (2007) Erdöl. In: Sachbilanzen von Energiesystemen: Grundlagen für den ökologischen Vergleich von Energiesystemen und den Einbezug von Energiesystemen in Ökobilanzen für die Schweiz (ed. Dones R.). Swiss Centre for Life Cycle Inventories, Dübendorf, CH.
  Uncertainty: R

## Inputs from nature
- Barium, in ground [natural resource, in ground]: 1.35 kg; lognormal variance with pedigree 0.0506, pedigree (4,4,5,1,1)
  15% BaSO4 in ore; Literature value.
  Reference:
  Jungbluth N. (2007) Erdöl. In: Sachbilanzen von Energiesystemen: Grundlagen für den ökologischen Vergleich von Energiesystemen und den Einbezug von Energiesystemen in Ökobilanzen für die Schweiz (ed. Dones R.). Swiss Centre for Life Cycle Inventories, Dübendorf, CH.
  Uncertainty: L
- Water, unspecified natural origin [natural resource, in water]: 0.14 m3; name water_UNO_input; lognormal variance with pedigree 0.0506, pedigree (4,4,5,1,1)
  Literature value.
  Reference:
  Jungbluth N. (2007) Erdöl. In: Sachbilanzen von Energiesystemen: Grundlagen für den ökologischen Vergleich von Energiesystemen und den Einbezug von Energiesystemen in Ökobilanzen für die Schweiz (ed. Dones R.). Swiss Centre for Life Cycle Inventories, Dübendorf, CH.
  Uncertainty: L

## Emissions to nature
- Water [air, unspecified]: 0.0287 m3; = (water_UNO_input*fraction_PW_to_air); lognormal variance with pedigree 0.0807, pedigree (2,2,5,1,1)
  Calculated as a fraction of the input of water. For more details, refer to the mathematical relation and the parameters.
  property fraction, origin: unspecified 1; name fraction_origin_unspecified
  property fraction, origin: fresh water 0; name fraction_origin_fresh_water
  property fraction, origin: salt water 0; name fraction_origin_salt_water
- Particulates, > 10 um [air, non-urban air or from high stacks]: 0.00085 kg; lognormal variance with pedigree 0.06, pedigree (4,4,5,1,1)
  (same comment as for Water, unspecified natural origin)
- Water [water, unspecified]: 0.1113 m3; = water_UNO_input*(1-fraction_PW_to_air); lognormal variance with pedigree 0.0807, pedigree (2,2,5,1,1)
  (same comment as for Water)
  property fraction, origin: salt water 0; name fraction_origin_salt_water_Ww
  property carbon content, non-fossil 0; name C_content_non_fossil
  property wet mass 1000 kg; name WM
  property fraction, origin: unspecified 1; name fraction_origin_unspecified_Ww
  property dry mass 0 kg; name DM
  property water in wet mass 1000 kg; name WWM
  property fraction, origin: fresh water 0; name fraction_origin_fresh_water_Ww
  property carbon content, fossil 0; name C_content_fossil

## Sampling procedure
Literature and estimations.

## Extrapolations
This dataset has been extrapolated from year 2007 to the year of the calculation (2021). The uncertainty has been adjusted accordingly.

## Review by Emilia Moreno Ruiz 2017-09-01
This dataset was additionally reviewed in a separate review process by Eric Johnson of Atlantic Consulting as well as Emilia Moreno Ruiz and Gregor Wernet of ecoinvent.
