# electronic component production, active, unspecified

Dataset: EcoSpold 2, unit process
Geography: GLO
Time period: 1994-01-01 to 2021-12-31
Technology level: current
Classification: ISIC rev.4 ecoinvent: 2610:Manufacture of electronic components and boards
Classification: EcoSpold01Categories: electronics/component
Scenario: Business-as-Usual
System model: Allocation, cut-off by classification
Generated by: Roland Hischier
Published in: Hischier R. 2007
Database: ecoinvent
isCopyrightProtected: true
accessRestrictedTo: 1

## General comment
This dataset represents the production of 1 kg of active electronic components, for all those cases, where no information is given about the active component type. It is an unweighted mean value of: diodes, transistors and integrated circuits datasets.Hence, the uncertainty values are accordingly high.
[This dataset was already contained in the ecoinvent database version 2. It was not individually updated during the transfer to ecoinvent version 3. Life Cycle Impact Assessment results may still have changed, as they are affected by changes in the supply chain, i.e. in other datasets. This dataset was generated following the ecoinvent quality guidelines for version 2. It may have been subject to central changes described in the ecoinvent version 3 change report (http://www.ecoinvent.org/database/ecoinvent-version-3/reports-of-changes/), and the results of the central updates were reviewed extensively. The changes added e.g. consistent water flows and other information throughout the database. The documentation of this dataset can be found in the ecoinvent reports of version 2, which are still available via the ecoinvent website. The change report linked above covers all central changes that were made during the conversion process.]

## Included activities start
From reception of mix of various components at the factory gate.

## Included activities end
This dataset includes the mix of various components.

## Geography
Data represent a global valuable average composition of active electronic components.

## Technology
see general comments

## Reference product
- electronic component, active, unspecified: 1 kg; CPC 471: Electronic valves and tubes; electronic components; parts thereof; By-product classification allocatable product
  Average composition of active electronic components, based on the composition of three different types of printed wiring board for all those cases, where active components are not further specified.
  EcoSpold01Location=GLO
  production volume 1 kg
    Dummy value to be replaced by measured, estimated or calculated value
  property price 745.975 EUR2005
    Calculated based on inputs: The price of the product has been calculated as a sum of the values of the material and energy inputs for this product. This value is therefore a rough estimation. It may underestimate the real price since there are additional expenses when producing any product. These expences can include for example labour costs, treatment of waste materials and profit for the producer. Please consider carefully whether this level of data quality is acceptable for your application.
  property carbon content, fossil 0.16746
    Calculated as the addition of C contents in the product composition
  property carbon content 0.16746
    carbon content on a dry matter basis (reserved; not for manual entry)
  properties: wet mass 1 kg, dry mass 1 kg, carbon content, non-fossil 0, water content 0, water in wet mass 0 kg, carbon allocation 0.16746 kg

## Inputs from technosphere
All rows: source Behrendt S 1998; lognormal variance with pedigree 0.3306, pedigree (5,3,5,1,5)
- diode, glass-, for surface-mounting: 0.00653327 kg
  Estimation, based on literature and own assumptions.
  Uncertainty: calculated from Desktop PC, Laptop and TV mainboards
  properties: wet mass 1 kg, dry mass 1 kg, carbon content, fossil 0.00928779
  note on carbon content, fossil: Calculated as the addition of C contents in the product composition
- integrated circuit, memory type: 0.309 kg
  Estimation, based on literature and own assumptions.
  EcoSpold01Location=GLO
  Uncertainty: calculated from Desktop PC, Laptop and TV mainboards
  properties: carbon content, fossil 0.113389, dry mass 1 kg, wet mass 1 kg
- transistor, surface-mounted: 0.0389996 kg
  (same comment as for diode, glass-, for surface-mounting)
  properties: wet mass 1 kg, dry mass 1 kg, carbon content, fossil 0.083636
  note on carbon content, fossil: Calculated as the addition of C contents in the product composition, and referred to 1 kg DM transistor.
- transistor, wired, big size, through-hole mounting: 0.0389996 kg
  (same comment as for diode, glass-, for surface-mounting)
  properties: carbon content, fossil 0.0946006, wet mass 1 kg, dry mass 1 kg
- transistor, wired, small size, through-hole mounting: 0.0389996 kg
  (same comment as for diode, glass-, for surface-mounting)
  properties: dry mass 1 kg, wet mass 1 kg, carbon content, fossil 0.080338
- integrated circuit, logic type: 0.55 kg
  EcoSpold01Location=GLO
  Estimation, based on literature and own assumptions.
  Uncertainty: calculated from Desktop PC, Laptop and TV mainboards
  properties: wet mass 1 kg, carbon content, fossil 0.221701, dry mass 1 kg
- light emitting diode: 0.0102833 kg
  (same comment as for integrated circuit, memory type)
  properties: wet mass 1 kg, carbon content, fossil 0.0203273, dry mass 1 kg
- diode, glass-, for through-hole mounting: 0.00653327 kg
  (same comment as for diode, glass-, for surface-mounting)
  properties: wet mass 1 kg, dry mass 1 kg, carbon content, fossil 0.0203273

## Sampling procedure
Literature & own estimations

## Extrapolations
This dataset has been extrapolated from year 2007 to the year of the calculation (2021). The uncertainty has been adjusted accordingly.

## Review by Rolf Frischknecht 2007-09-21
passed.
-

## Review by Roland Hischier 2011-09-20
Transfer of documentation done.
