# expanded perlite production

Dataset: EcoSpold 2, unit process
Geography: CH
Time period: 1995-01-01 to 2021-12-31
Technology level: current
Classification: ISIC rev.4 ecoinvent: 2399:Manufacture of other non-metallic mineral products n.e.c.
Classification: EcoSpold01Categories: insulation materials/production
Tags: ConvertedDataset
Scenario: Business-as-Usual
System model: Allocation, cut-off by classification
Generated by: Daniel Kellenberger (obsolete)
Published in: Kellenberger D. 2004
Database: ecoinvent
isCopyrightProtected: true
accessRestrictedTo: 1

## General comment
Expanded by shock heating at a temperature of 870 – 1090 °C. It is assumed that light fuel oil is used for heating. Density of expanded perlite: 60 - 300kg/m3
[This dataset was already contained in the ecoinvent database version 2. It was not individually updated during the transfer to ecoinvent version 3. Life Cycle Impact Assessment results may still have changed, as they are affected by changes in the supply chain, i.e. in other datasets. This dataset was generated following the ecoinvent quality guidelines for version 2. It may have been subject to central changes described in the ecoinvent version 3 change report (http://www.ecoinvent.org/database/ecoinvent-version-3/reports-of-changes/), and the results of the central updates were reviewed extensively. The changes added e.g. consistent water flows and other information throughout the database. The documentation of this dataset can be found in the ecoinvent reports of version 2, which are still available via the ecoinvent website. The change report linked above covers all central changes that were made during the conversion process.]

## Included activities end
includes the raw material, the transport to the finishing plant and some internal transports, the heating energy carrier, some packaging materials, the infrastructure and the emissions

## Geography
For some exchanges CH, RER and OCE modules have been used as proxy.

## Technology
Basic principle is a heating of the perlite grains to high temperature. The volume increase is 15 – 30 fold

## Parameters
- fraction, process water, to air: 0.15 dimensionless; name fraction_PW_to_air; lognormal variance with pedigree 0.092025, pedigree (4,4,3,2,4)
  Literature value. In case when no industry/process specific data are available, default evaporation fraction value is used. This value is 15% and is based on literature (Statistics Canada, 2007 & Shaffer, K.H., 2008, Consumptive water use in the Great Lakes Basin, USGS & Shiklomanov, 2003, World Water Resources at the Beginning of the 21st Century) and has been approved by an expert.
- fraction, tap water, to air: 0.15 dimensionless; name fraction_TW_to_air; = fraction_PW_to_air; lognormal variance with pedigree 0.092025, pedigree (4,4,3,2,4)
  Calculated value. See comment in the other parametres present in this dataset. Tap water is considered to be always used as process water, thus process water fractions to air are applied to all tap water input flows to calculate the amount of water consumed in the processes.

## Reference product
- expanded perlite: 1 kg; By-product classification allocatable product; CPC 37990: Non-metallic mineral products n.e.c. (including mineral wool, expanded mineral materials, worked mica, article[…]
  production volume 0.0336675 kg
    This is a placeholder value that does not reflect real-world production volumes. This dataset does not currently require a real-world production volume to work in the database framework, and no actual data were collected yet. This has no negative effect on the results of the ecoinvent database. The placeholder value of this activity was scaled according to the nominal GDP of 2005 (source: United Nations, http://data.un.org/Glossary.aspx?q=GDP+%28current+US%24%29, accessed 20130726) to reflect an appropriate share of the global production volume, which is also a placeholder value.
  property carbon content, fossil 0
    75% SiO2, 15% Al2O3 (ecoinvent v2.2 report 7, part XXI, pg4). Considered as perlite
  property carbon content, non-fossil 0
    75% SiO2, 15% Al2O3 (ecoinvent v2.2 report 7, part XXI, pg4). Considered as perlite
  property carbon content 0
    carbon content on a dry matter basis (reserved; not for manual entry)
  properties: price 1.77 EUR2005, water content 0, water in wet mass 0 kg, dry mass 1 kg, wet mass 1 kg, carbon allocation 0 kg

## Inputs from technosphere
- silicone product: 0.05 kg; lognormal variance with pedigree 0.1061, pedigree (4,5,5,3,1)
  properties: heating value, net 9.83 MJ, carbon content, fossil 0.324324, dry mass 1 kg, wet mass 1 kg
  note on carbon content, fossil: The term silicones is used for compounds in which silicon atoms are linked via oxygen atoms, each silicon atom bearing one or several organic groups. In industrially important silicones, these groups are usually methyl or phenyl (ecoinvent v2.2 report 8_part71 & Ullmann). The chemical formula was considered to be [Si(CH3)2O]n (Ullmann).
- inert waste: -0.0003 kg; lognormal variance with pedigree 0.04, pedigree (1,1,5,1,1)
  estimation
  production volume 0.0003 kg
    Calculated from the production volume of expanded perlite in proportion to the respective output amounts.
  properties: dry mass 1 kg, wet mass 1 kg
- clay pit infrastructure: 2e-10 unit; lognormal variance with pedigree 0.69, pedigree (1,1,5,1,1)
  This exchange has an activity link directly to the producing activity because the product is primarily consumed in the same geographical area where it is produced.
- containerboard, linerboard: 0.00144 kg; lognormal variance with pedigree 0.078, pedigree (4,5,5,5,1)
  properties: carbon content, non-fossil 0.408159, dry mass 0.945 kg, heating value, net 15.92 MJ, carbon content, fossil 0.00169774, water content 0.0582011, wet mass 1 kg
  note on carbon content, non-fossil: Biogenic C content was calculated after biogenic C contents of chemicals used in the production of board (ecoinvent v2.2 report 11_III, part 10). The cellulose content in 1 kg of paper (on a wet mas basis) was estimated as (1-chemical content), C content of cellulose was considered 0.44 kgC/kg dry mass (ecoinvent v2.2 report, n 15a, pg 40)
  note on carbon content, fossil: Fossil C content was calculated after fossil C contents of chemicals used in the production of board (ecoinvent v2.2 report 11_III, part 10)
- tap water: 0.0005 kg; name tap_water_input; lognormal variance with pedigree 0.076, pedigree (4,5,5,1,1)
  properties: carbon content, fossil 0.00178991, water content 2962.17, wet mass 1 kg, dry mass 0.000337476 kg
  note on carbon content, fossil: Bicarbonate content is 2.93 mol/m3. CO2 content is 0.1 mol/m3 (ecoinvent v2.2 report 8, Tab 93.1).
- packaging film, low density polyethylene: 0.0115 kg; lognormal variance with pedigree 0.078, pedigree (4,5,5,5,1)
  properties: wet mass 1 kg, dry mass 1 kg, heating value, net 42.47 MJ, carbon content, fossil 0.857143
  note on carbon content, fossil: Polyethylene is formed out of a huge amount of ethylene monomers (C2H4) (ecoinvent v2.2 report 11_II). MW=28 g/mol
- electricity, medium voltage: 0.065 kWh; lognormal variance with pedigree 0.076, pedigree (4,5,5,1,1)
- heat, district or industrial, other than natural gas: 8.075 MJ; lognormal variance with pedigree 0.69, pedigree (1,1,5,1,1)
  properties: heating value, net 1 MJ
- perlite: 1.02 kg; lognormal variance with pedigree 0.076, pedigree (4,5,5,1,1)
  properties: wet mass 1 kg, dry mass 1 kg

## Emissions to nature
- Water [water, unspecified]: 4.25e-7 m3; name water_to_water_unspecified; = (tap_water_input/1000)*(1-fraction_TW_to_air); lognormal variance with pedigree 0.0807, pedigree (2,2,5,1,1)
  Calculated value based on literature values and expert opinion. See comments in the parametres' comment field.
  property carbon content, fossil 0; name C_content_fossil
  property dry mass 0 kg; name DM
  property carbon content, non-fossil 0; name C_content_non_fossil
  property wet mass 1000 kg; name WM
  property fraction, origin: fresh water 1; name fraction_origin_fresh_water_Ww
  property fraction, origin: unspecified 0; name fraction_origin_unspecified_Ww
  property fraction, origin: salt water 0; name fraction_origin_salt_water_Ww
  property water in wet mass 1000 kg; name WWM
- Water [air, unspecified]: 7.5e-8 m3; name water_to_air_unspecified; = (tap_water_input/1000*fraction_TW_to_air); lognormal variance with pedigree 0.0807, pedigree (2,2,5,1,1)
  (same comment as for Water)
  property fraction, origin: unspecified 0; name fraction_origin_unspecified
  property fraction, origin: salt water 0; name fraction_origin_salt_water
  property fraction, origin: fresh water 1; name fraction_origin_fresh_water

## Sampling procedure
Literature

## Extrapolations
This dataset has been extrapolated from year 2000 to the year of the calculation (2021). The uncertainty has been adjusted accordingly.

## Review by Roberto Dones 2004-04-15
passed
