# carton board box production service, with offset printing

Dataset: EcoSpold 2, unit process
Geography: CH
Time period: 1993-01-01 to 2021-12-31
Technology level: current
Classification: EcoSpold01Categories: paper & cardboard/cardboard & corrugated board
Classification: ISIC rev.4 ecoinvent: 1702:Manufacture of corrugated paper and paperboard and of containers of paper a
Tags: ConvertedDataset
Scenario: Business-as-Usual
System model: Allocation, cut-off by classification
Generated by: Roland Hischier
Published in: Hischier R. 2007
Database: ecoinvent
isCopyrightProtected: true
accessRestrictedTo: 1

## General comment
The input of cartonboard is not included into this module allowing the user to establish its own cartonboard boxes. Per kg of used cartonboard, 0.83 kg of this module are needed.
[This dataset was already contained in the ecoinvent database version 2. It was not individually updated during the transfer to ecoinvent version 3. Life Cycle Impact Assessment results may still have changed, as they are affected by changes in the supply chain, i.e. in other datasets. This dataset was generated following the ecoinvent quality guidelines for version 2. It may have been subject to central changes described in the ecoinvent version 3 change report (http://www.ecoinvent.org/database/ecoinvent-version-3/reports-of-changes/), and the results of the central updates were reviewed extensively. The changes added e.g. consistent water flows and other information throughout the database. The documentation of this dataset can be found in the ecoinvent reports of version 2, which are still available via the ecoinvent website. The change report linked above covers all central changes that were made during the conversion process.]

## Included activities end
This module includes the production of boxes out of cartonboard. It contains the steps of cutting, folding and printing with an offset machine and therefore inks and glues are considered as well as the electricity consumption.

## Geography
Average data from 6 producers in Switzerland

## Technology
Average of the used technology within the examined Swiss producers

## Parameters
- fraction, process water, to air: 0.15 dimensionless; name fraction_PW_to_air; lognormal variance with pedigree 0.092025, pedigree (4,4,3,2,4)
  Literature value. In case when no industry/process specific data are available, default evaporation fraction value is used. This value is 15% and is based on literature (Statistics Canada, 2007 & Shaffer, K.H., 2008, Consumptive water use in the Great Lakes Basin, USGS & Shiklomanov, 2003, World Water Resources at the Beginning of the 21st Century) and has been approved by an expert.

## Reference product
- carton board box production, with offset printing: 1 kg; CPC 32153: Cartons, boxes, cases, record sleeves and other packing containers (except bags) of paper, paperboard, cellulo[…]; By-product classification allocatable product
  EcoSpold01Location=CH
  production volume 0.0336675 kg
    This is a placeholder value that does not reflect real-world production volumes. This dataset does not currently require a real-world production volume to work in the database framework, and no actual data were collected yet. This has no negative effect on the results of the ecoinvent database. The placeholder value of this activity was scaled according to the nominal GDP of 2005 (source: United Nations, http://data.un.org/Glossary.aspx?q=GDP+%28current+US%24%29, accessed 20130726) to reflect an appropriate share of the global production volume, which is also a placeholder value.
  properties: price 0.85 EUR2005

## Inputs from technosphere
- bilge oil: -0.00016 kg; lognormal variance with pedigree 0.0507, pedigree (1,3,5,3,1)
  EcoSpold01Location=CH
  Average from 6 Swiss producers
  Uncertainty: average from 6 Swiss producers
  production volume 0.00016 kg
    Calculated from the production volume of carton board box production, with offset printing in proportion to the respective output amounts.
  properties: water content 9, wet mass 1 kg, heating value, net 1.92 MJ, carbon content, fossil 0.84, dry mass 0.1 kg
  note on heating value, net: Value taken from the general comment of the treatment dataset.
  note on carbon content, fossil: Tab A.6, ecoinvent v2.2 report 13_I. C content has been calculated after data in the tables, and then referred to 1 kg DM
- lubricating oil: 0.0002 kg; lognormal variance with pedigree 0.0507, pedigree (1,3,5,3,1)
  Average from 6 Swiss producers
  EcoSpold01Location=RER
  Uncertainty: average from 6 Swiss producers
  properties: heating value, net 40.2 MJ, wet mass 1 kg, carbon content, fossil 0.75, dry mass 1 kg
  note on heating value, net: Literature value, Source: IPCC 2006, 2006 IPCC Guidelines for National Greenhouse Gas Inventories, Prepared by the National Greenhouse Gas Inventories Programme, Eggleston H.S., Buendia L., Miwa K., Ngara T. and Tanabe K. (eds). Published: IGES, Japan
  note on carbon content, fossil: Lubricating oil is produced from diesel. C-content/dry mass of fats and oils considered 75%, from: ecoinvent v2.2 report, n 15a, pg 40
- heat, district or industrial, natural gas: 1.1305 MJ; lognormal variance with pedigree 0.0507, pedigree (1,3,5,3,1)
  EcoSpold01Location=RER
  Average from 6 Swiss producers
  Uncertainty: average from 6 Swiss producers
  properties: heating value, net 1 MJ
- paper, woodfree, coated: 0.0543 kg; lognormal variance with pedigree 0.0507, pedigree (1,3,5,3,1)
  (same comment as for heat, district or industrial, natural gas)
  properties: water content 0.0582011, carbon content, fossil 0.0590617, carbon content, non-fossil 0.22775, dry mass 0.945 kg, wet mass 1 kg, heating value, net 14.11 MJ
  note on carbon content, fossil: Fossil C content was calculated after fossil C contents of chemicals used in the production of the paper (in Tab 8.72 & 8.73 ecoinvent v2.2 report 11_III, part 8).
  note on carbon content, non-fossil: Biogenic C content was calculated after biogenic C contents of chemicals used in the production of the paper (in Tab 8.72 & 8.73 ecoinvent v2.2 report 11_III, part 8). The cellulose content in 1 kg of paper (on a wet mas basis) was estimated as (1-chemical content), C content of cellulose was considered 0.44 kgC/kg dry mass (ecoinvent v2.2 report, n 15a, pg 40)
- hazardous waste, for underground deposit: -0.00105 kg; lognormal variance with pedigree 0.0507, pedigree (1,3,5,3,1)
  EcoSpold01Location=DE
  Average from 6 Swiss producers
  Uncertainty: average from 6 Swiss producers
  production volume 0.00105 kg
    (same comment as for bilge oil)
  properties: dry mass 1 kg, wet mass 1 kg, carbon content, fossil 0.554667
  note on carbon content, fossil: Tab A.6, ecoinvent v2.2 report 13_I, average hazardous waste composition was used, and referred to 0% water mass. No waste-specific emission are currently inventoried for underground deposits. Accordingly, no waste composition must be specified. For generic, average waste to underground deposit deposition in a 200 liter steel drum without cement solidification is assumed (ecoinvent v2.2 report 13_I).
- solvent, organic: 0.0022 kg; lognormal variance with pedigree 0.0507, pedigree (1,3,5,3,1)
  EcoSpold01Location=GLO
  Average from 6 Swiss producers
  Uncertainty: average from 6 Swiss producers
  properties: dry mass 1 kg, wet mass 1 kg, carbon content, fossil 0.63072, heating value, net 19.11 MJ
  note on carbon content, fossil: Mixture of 15 of the most often used solvents (list in ecoinvent v2.2 report 11-III, pg 293). C content was calculated as an unweighted average of C content of the different solvents
- electricity, medium voltage: 0.325 kWh; lognormal variance with pedigree 0.0507, pedigree (1,3,5,3,1)
  Average from 6 Swiss producers
  EcoSpold01Location=CH
  Uncertainty: average from 6 Swiss producers
- heat, district or industrial, other than natural gas: 0.6479 MJ; lognormal variance with pedigree 0.0507, pedigree (1,3,5,3,1)
  (same comment as for lubricating oil)
  properties: heating value, net 1 MJ
- municipal solid waste: -0.038 kg; lognormal variance with pedigree 0.0507, pedigree (1,3,5,3,1)
  (same comment as for bilge oil)
  production volume 0.038 kg
    (same comment as for bilge oil)
  properties: dry mass 0.771 kg, carbon content, non-fossil 0.609371, heating value, net 11.74 MJ, water content 0.297017, wet mass 1 kg, carbon content, fossil 0.171549
  note on carbon content, non-fossil: MSW composition in tab 4.1, ecoinvent v2.2 report 13_I. C content referred to 1 kg DM
- chemical, organic: 0.00023 kg; lognormal variance with pedigree 0.0507, pedigree (1,3,5,3,1)
  (same comment as for solvent, organic)
  properties: wet mass 1 kg, dry mass 1 kg, carbon content, fossil 0.628, heating value, net 19.03 MJ
  note on carbon content, fossil: This dataset is an unweighted average of 20 organic substances (listed in Tab 88.1, ecoinvent v2.2 report 8, part II), being part of the top100 chemicals included in this database. The C-content has also been calculated as an unweighted average of the C content of the substances composing this dataset.
- packaging box factory: 1.43e-9 unit; lognormal variance with pedigree 0.448, pedigree (4,5,5,5,5)
  Own assumption
  EcoSpold01Location=RER
  Uncertainty: own assumption
- printing ink, offset, without solvent, in 47.5% solution state: 0.0183 kg; lognormal variance with pedigree 0.0507, pedigree (1,3,5,3,1)
  (same comment as for heat, district or industrial, natural gas)
  properties: dry mass 1 kg, carbon content, non-fossil 0.221773, heating value, net 20.51 MJ, wet mass 1 kg, carbon content, fossil 0.455266
  note on carbon content, non-fossil: C content was calculated as an addition of C content in the raw materials.
- polyethylene, high density, granulate: 0.0108 kg; lognormal variance with pedigree 0.0507, pedigree (1,3,5,3,1)
  (same comment as for heat, district or industrial, natural gas)
  properties: dry mass 1 kg, carbon content, fossil 0.857143, wet mass 1 kg, heating value, net 42.47 MJ
  note on carbon content, fossil: Polyethylene is formed out of a huge amount of ethylene monomers (C2H4) (ecoinvent v2.2 report 11_II). MW=28 g/mol
- rosin size, for paper production: 0.0052 kg; lognormal variance with pedigree 0.0507, pedigree (1,3,5,3,1)
  (same comment as for lubricating oil)
  properties: wet mass 1 kg, dry mass 1 kg, carbon content, non-fossil 0.515474, heating value, net 15.62 MJ
  note on carbon content, non-fossil: Mixture of rosin size (approximated by soap) (75%) and alkali (shown as sodium hydroxide) (25%). (ecoinvent v2.2 report 11-III, pg 299).
- liquefied petroleum gas: 0.0001 kg; lognormal variance with pedigree 0.0507, pedigree (1,3,5,3,1)
  (same comment as for electricity, medium voltage)
  properties: carbon content, fossil 0.821863, dry mass 1 kg, heating value, net 45.5 MJ, wet mass 1 kg
  note on heating value, net: Indicative value. Reference: Fuels - Higher and Lower Calorific Values, available at: https://www.engineeringtoolbox.com/fuels-higher-calorific-values-d_169.html

## Inputs from nature
- Water, unspecified natural origin [natural resource, in water]: 2.5e-6 m3; name water_UNO_input; lognormal variance with pedigree 0.0507, pedigree (1,3,5,3,1)
  Average from 6 Swiss producers
  Uncertainty: average from 6 Swiss producers

## Emissions to nature
- Water [water, unspecified]: 2.125e-6 m3; name water_to_water_unspecified; = water_UNO_input*(1-fraction_PW_to_air); lognormal variance with pedigree 0.0807, pedigree (2,2,5,1,1)
  Calculated value based on literature values and expert opinion. See comments in the parametres' comment field.
  property dry mass 0 kg; name DM
  property fraction, origin: fresh water 0; name fraction_origin_fresh_water_Ww
  property fraction, origin: unspecified 1; name fraction_origin_unspecified_Ww
  property carbon content, non-fossil 0; name C_content_non_fossil
  property water in wet mass 1000 kg; name WWM
  property fraction, origin: salt water 0; name fraction_origin_salt_water_Ww
  property carbon content, fossil 0; name C_content_fossil
  property wet mass 1000 kg; name WM
- NMVOC, non-methane volatile organic compounds, unspecified origin [air, urban air close to ground]: 0.00134 kg; lognormal variance with pedigree 0.0907, pedigree (1,3,5,3,1)
  Average from 6 Swiss producers
  Uncertainty: average from 6 Swiss producers
- COD, Chemical Oxygen Demand [water, surface water]: 9.45e-5 kg; lognormal variance with pedigree 0.0907, pedigree (1,3,5,3,1)
  Calculated as COD (g O2) = 2.7*TOC (gC).
  Uncertainty: average from 6 Swiss producers
- Ammonia [air, urban air close to ground]: 7.1e-5 kg; lognormal variance with pedigree 0.0907, pedigree (1,3,5,3,1)
  Average from 6 Swiss producers
  Uncertainty: average from 6 Swiss producers
- TOC, Total Organic Carbon [water, surface water]: 3.5e-5 kg; lognormal variance with pedigree 0.0907, pedigree (1,3,5,3,1)
  Average from 6 Swiss producers
  Uncertainty: average from 6 Swiss producers
- DOC, Dissolved Organic Carbon [water, surface water]: 3.5e-5 kg; lognormal variance with pedigree 0.0907, pedigree (1,3,5,3,1)
  Calculated as equal to TOC.
  Uncertainty: average from 6 Swiss producers
- BOD5, Biological Oxygen Demand [water, surface water]: 0.000189 kg; lognormal variance with pedigree 0.0907, pedigree (1,3,5,3,1)
  Calculated as 0.5*COD.
  Uncertainty: average from 6 Swiss producers
- Water [air, unspecified]: 3.75e-7 m3; name water_to_air_unspecified; = (water_UNO_input*fraction_PW_to_air); lognormal variance with pedigree 0.0807, pedigree (2,2,5,1,1)
  (same comment as for Water)
  property fraction, origin: unspecified 1; name fraction_origin_unspecified
  property fraction, origin: salt water 0; name fraction_origin_salt_water
  property fraction, origin: fresh water 0; name fraction_origin_fresh_water

## Extrapolations
This dataset has been extrapolated from year 1993 to the year of the calculation (2021). The uncertainty has been adjusted accordingly.

## Review by Hans-Jörg Althaus 2003-08-26
Passed
