# containerboard production, fluting medium, semichemical

Dataset: EcoSpold 2, unit process
Geography: RER
Time period: 2009-01-01 to 2021-12-31
Technology level: current
Classification: EcoSpold01Categories: paper & cardboard/cardboard & corrugated board
Classification: ISIC rev.4 ecoinvent: 1702:Manufacture of corrugated paper and paperboard and of containers of paper a
Scenario: Business-as-Usual
System model: Allocation, cut-off by classification
Share of production covered: 90 %
Generated by: Angeline de Beaufort
Published in: FEFCO Corrugated Packaging 2015
Database: ecoinvent
isCopyrightProtected: true
accessRestrictedTo: 1

## General comment
Semichemical fluting medium is a grade of corrugated base paper, which forms the corrugated middle layer in the production of corrugated board, where is covered between two outer layers of linerboard (e.g. kraftliner or testliner). According to the common sector terminology, semichemical fluting is made from virgin material as opposed to “wellenstoff”, which is used interchangeably with semichemical fluting but is made from recycled material, i.e. uses recovered paper as raw material.
Data for the production of semichemical fluting medium were provided by the industry association of corrugated packaging manufacturers in Europe (The European Federation of Corrugated Board Manufacturers, FEFCO) and represent 90% of the fluting medium produced in European mills, as well as 90% of fluting medium consumed in in the production of corrugated board. Primary data were provided by large mills in Austria, Finland, France, Portugal, Poland and Sweden. Together these mills produced 4 740 000 tonnes of paper products (not only semichemical fluting) in 2014. Thereby each mill has a production volume of about 85 000 to 700 000 tonnes net saleable paper product (FEFCO, 2015.). FEFCO. 2015. European Database for Corrugated Board Life Cycle Studies 2015. Reference(s): http://www.fefco.org/sites/default/files/lca-report-2015.pdf, accessed 6. February 2018.
In FEFCO 2015 fuel consumption and the related emission to air include only steam and net electricity used on site. Sold electricity is not reported as a sold product and the associated input and output data are not included in the inventory. The fuel consumption and emissions to air associated with the total heat production and the net electricity used on site were allocated to the paper production.
"[This dataset is meant to replace the following datasets:
- corrugated board base paper production, semichemical fluting, RER, 1995 - 2005]"
The production volume is valid for the year 2015. Inventory data were collected for the year 2014.

## Included activities start
The process for the production of semichemical fluting starts with the reception of wood and wood chips at the mill gate.

## Included activities end
Processes include chipping, screening of chips, cooking to pulp for (semichemical cooking process), which is a slightly alkaline cooking process with sodium sulphite and sodium carbonate as active cooking chemicals with a pulp yield of around 80%.The pulp produced is defiberized in refiners, screened and washed before being sent to the paper mill. Semichemical fluting is normally a one ply product and therefore requires a paper machine with one head box and normally also one wire.

## Geography
Data for main producers in Europe (Austria, Finland, France, Portugal, Slovakia and Sweden.).

## Technology
Average of present used technology

## Parameters
- fraction, process water, to air: 0.15 dimensionless; name fraction_PW_to_air; lognormal variance with pedigree 0.092025, pedigree (4,4,3,2,4)
  Literature value. In case when no industry/process specific data are available, default evaporation fraction value is used. This value is 15% and is based on literature (Statistics Canada, 2007 & Shaffer, K.H., 2008, Consumptive water use in the Great Lakes Basin, USGS & Shiklomanov, 2003, World Water Resources at the Beginning of the 21st Century) and has been approved by an expert.

## Reference product
- containerboard, fluting medium: 1 kg; name flutingAmount; source FEFCO Corrugated Packaging 2015; By-product classification allocatable product; CPC 32151: Corrugated paper and paperboard
  Initial data expressed in tonne of net saleable product.
  production volume 1.17878e9 kg; name flutingProductionVolume; = 22279000000*(0.05/0.945)
    Calculated by splitting the total shipment of corrugated packaging materials in Europe in 2015 as reported by FEFCO (2015) (2.23*10^10 kg) according to the reported shares of the consumption of testliner, kraftliner, other recycled liner, semi-chemical fluting and wellentsoff (=recycled fluting), respectively. The sum of shares was scaled to sum up to 100%. Reference(s): FEFCO. 2015. Annual Statistics 2015. http://www.fefco.org/sites/default/files/documents/Fefco_AnnualEvaluation_2015.pdf, accessed 6. February 2018
  property price 0.598 EUR2005; name flutingAmount_price_EUR2005
    Export prices for the World+ according to: http://faostat.fao.org/site/626/DesktopDefault.aspx?PageID=626#ancor downloaded 28 April 2009; calculated as export value divided by export volume.
  property carbon content 0.46
    carbon content on a dry matter basis (reserved; not for manual entry)
  property true value 598; name flutingAmount_true_value
    allocation property applied in "true value" allocation // value calculated from revenue
  properties: heating value, net 15.92 MJ, water content 0.08, carbon content, non-fossil 0.46, dry mass 0.92592 kg, wet mass 1 kg, water in wet mass 0.074074 kg, carbon allocation 0.425923 kg

## By-products
- turpentine: 0 kg; name BP_amount_2; By-product classification allocatable product; CPC 34400: Activated natural mineral products; animal black; tall oil; terpenic oils produced by the treatment of conifer[…]; CAS 8006-64-2; pedigree (1,1,1,1,1)
  Reported by FEFCO (2015) as sold byproducts: 0.75 kg turpentine per tonne of semichemical fluting.
  production volume 884087 kg; = flutingProductionVolume * (BP_amount_2 / flutingAmount)
    Calculated from production volume of reference product using the relative outputs.
  property heating value, net 26.74 MJ
    LHV is calculated based on the Carbon content of the product. More details can be found on the respective documentation.
  property price 1.826 EUR2005; name BP_amount_2_price_EUR2005
    Average price for imports in 2005 to USA, China, India, Japan and EU-28 according to UN comtrade. Accessible online at https://comtrade.un.org/data/, 11.6.2018
  property carbon content 0.882353
    carbon content on a dry matter basis (reserved; not for manual entry)
  property true value 1.3695; name BP_amount_2_true_value
    allocation property applied in "true value" allocation // value calculated from revenue
  properties: dry mass 1 kg, carbon content, non-fossil 0.882353, water in wet mass 0 kg, carbon content, fossil 0, water content 0, wet mass 1 kg, carbon allocation 0.882353 kg
- residual hardwood, wet: 0 m3; name barkResidueAmount; source FEFCO Corrugated Packaging 2015; CPC 39283: Non-agglomerated wood waste and scrap; By-product classification allocatable product; pedigree (1,1,1,1,1)
  Reported as for residues/bark, wood. Assumed all hardwood, which represents 95% of wood input (by weight). Density based on assummed water content on a dry mass basis of 70%..
  Uncertainty: Uncertainty accounts for both the uncertainty associated with the waste mass value reported by FEFCO and the density value used to convert the exchange value to a volume basis.
  production volume 480.047 m3; = flutingProductionVolume * (barkResidueAmount / flutingAmount)
    Calculated from production volume of reference flow.
  property dry mass 650 kg; name barkResidueAmount_DM
  property price 41.8 EUR2005; name barkResidueAmount_price_EUR2005
    Temporary price data. Calculated as 90% of purchasers price based on: 2004 World Export prices from FaoStat http://faostat.fao.org/site/626/DesktopDefault.aspx?PageID=626#ancor downloaded 29 April 2009; calculated as export value divided by export volume. Commodity: 'wood residues'.
  property carbon content, non-fossil 0.494; name barkResidueAmount_C_content_non_fossil
    biogene carbon content on a dry matter basis
  property water in wet mass 455 kg; name barkResidueAmount_WWM
  property water content 0.7; name barkResidueAmount_water_content
  property heating value, net 8612.79 MJ
    LHV is calculated based on the Carbon content of the product. More details can be found on the respective documentation.The property is based on a value of 7.79MJ/kg
  property wet mass 1105 kg; name barkResidueAmount_WM
  property carbon content 0.494
    carbon content on a dry matter basis (reserved; not for manual entry)
  property true value 0.0170226; name barkResidueAmount_true_value
    allocation property applied in "true value" allocation // value calculated from revenue
  properties: carbon allocation 321.1 kg
- tall oil, crude: 0 kg; name BP_amount_1; By-product classification allocatable product; CPC 34400: Activated natural mineral products; animal black; tall oil; terpenic oils produced by the treatment of conifer[…]; CAS 8002-26-4; pedigree (1,1,1,1,1)
  Reported by FEFCO (2015) as sold byproducts: 4.3 kg tall oil per tonne of semichemical fluting.
  production volume 5.06877e6 kg; = flutingProductionVolume * (BP_amount_1 / flutingAmount)
    Calculated from production volume of reference product using the relative outputs.
  property price 0.652995 EUR2005; name BP_amount_1_price_EUR2005
    Estimated value. Set to be 90% of tall oil, refined, comment: Average price for imports in 2005 to USA, China, India, Japan and EU-28 according to UN comtrade. Accessible online at https://comtrade.un.org/data/, 11.6.2018
  property heating value, net 23.82 MJ
    (same comment as for turpentine)
  property carbon content 0.786
    carbon content on a dry matter basis (reserved; not for manual entry)
  property true value 2.80788; name BP_amount_1_true_value
    allocation property applied in "true value" allocation // value calculated from revenue
  properties: carbon content, fossil 0, wet mass 1 kg, water in wet mass 0 kg, water content 0, dry mass 1 kg, carbon content, non-fossil 0.786, carbon allocation 0.786 kg

## Inputs from technosphere
- limestone residue: -0.00153168 kg; name wasteCalciumCarbonateAmount; source FEFCO Corrugated Packaging 2015; lognormal variance with pedigree 0.0032, pedigree (1,3,3,1,1)
  Reported as "Calcium carbonate" 75% dry content
  production volume 1.81818e6 kg; = flutingProductionVolume*wasteCalciumCarbonateAmount/flutingAmount
    Calculated from production volume of reference flow.
  property price 0 EUR2005; name wasteCalciumCarbonateAmoun_price_EUR2005
  property dry mass 0.75 kg; name wasteCalciumCarbonateAmount_DM
  property carbon content, fossil 0.12; name wasteCalciumCarbonate_C_content_fossil_0
  property wet mass 1 kg; name wasteCalciumCarbonateAmount_WM
  property water content 0.333333; name wasteCalciumCarbonateAmo_water_content_0
  property water in wet mass 0.25 kg; name wasteCalciumCarbonateAmount_WWM
- hydrochloric acid, without water, in 30% solution state: 0.00028798 kg; source FEFCO Corrugated Packaging 2015; lognormal variance with pedigree 0.0112, pedigree (1,3,3,1,3)
  This value was taken over from FEFCO 2009.
  properties: wet mass 1 kg, dry mass 1 kg, heating value, net 3.32 MJ
- lignite ash: -0.00483807 kg; name BP_amount_4; lognormal variance with pedigree 0.0027, pedigree (1,2,3,1,1)
  Estimation based on fuel input data and emission factors from corresponding fuel combustion ecoinvent datasets. Note(1): Within the process, energy is recovered through the burning of black liquor (4.96GJ/tonne) and bark (3.13GJ/tonne) from the wood. This inherent energy makes up a large part of this process’ energy supply. As it is supplied from within the system boundaries, it does not have a corresponding input exchange. Emissions from the combustion of the internally generated biomass (bark) is approximated with the combustion of wood chips. No comprehensive data for the emissions from the balck liquor recovery process were available. The approximation of this rather complex recovery process with biomass combustion is inappropriate. Therefore emissions from the recovery process are only reflected in the key emission values (particulates, CO2, CO, NOx, Sox, H2S) reported by FEFCO (2015) but not with a complete emission profile. This constitutes a data gap. Note(2): emissions from peat combustion were approximated with those of lignite combustion, LPG with natural gas combustion and diesel with LFO combustion.
  production volume 5.74303e6 kg; = flutingProductionVolume * (BP_amount_4 / flutingAmount)
    Calculated from production volume of reference product using the relative outputs.
  property price 0 EUR2005; name BP_amount_4_price_EUR2005
  properties: dry mass 1 kg, wet mass 1 kg
- steel, chromium steel 18/8: 1.98607e-5 kg; source FEFCO Corrugated Packaging 2015; lognormal variance with pedigree 0.0112, pedigree (1,3,3,1,3)
  This value was taken over from FEFCO 2009. Proxy for packaging steel.
- core board: 0.00292449 kg; source FEFCO Corrugated Packaging 2015; lognormal variance with pedigree 0.0112, pedigree (1,3,3,1,3)
  Reported as paper consumption for corrugated board production. Cores and core plugs summed.
  properties: wet mass 1 kg, dry mass 0.945 kg, carbon content, non-fossil 0.430314, heating value, net 12.19 MJ, water content 0.0582011
- quicklime, milled, loose: 0.00178616 kg; source FEFCO Corrugated Packaging 2015; lognormal variance with pedigree 0.0112, pedigree (1,3,3,1,3)
  Reported as CaO.
  properties: water content 0.010101, dry mass 0.99 kg, wet mass 1 kg
- sulfate pulp, unbleached: 2.06714e-5 kg; lognormal variance with pedigree 0.0032, pedigree (1,3,3,1,1)
  Reported by FEFCO (2015) as consumption of purchased pulp: 0.000021 t unbleached pulp per t of product.
  properties: wet mass 1 kg, dry mass 0.9 kg, carbon content, non-fossil 0.494, heating value, net 13.23 MJ, price 0.355 EUR2005, water content 0.111111
  note on carbon content, non-fossil: C content of dry mass of sulfate pulp is 0.494 kgC/kg dry wood (ecoinvent v2.2 report 6_IX & ecoinvent v2.2 report 9). No other C containing products in the formulation of the pulp.
- waste paperboard, sorted: 0.0993035 kg; source FEFCO Corrugated Packaging 2015; lognormal variance with pedigree 0.0033, pedigree (2,2,3,1,1)
  Due to reporting issues resulting in a fibre-inbalance in the FEFCO 2015 data, this amount is based on the FEFCO 2012 LCI study. FEFCO 2012 reports an input of 1.01t pulpwood per t of product and 0.1t of recovered paper. (FEFCO 2015 reported as Recovered Paper "Mixed Grades" (7kg), "Corrugated and Kraft, pre-consumer" (35kg) and Corrugated and Kraft, post-consumer (46kg). Average dry mass 0.804kgdry mass/kg.)
  properties: carbon content, non-fossil 0.483259, wet mass 1 kg, water content 0.243781, dry mass 0.804 kg, heating value, net 15.92 MJ
- municipal solid waste: -0.00546603 kg; name BP_amount_5; source FEFCO Corrugated Packaging 2015; lognormal variance with pedigree 0.0032, pedigree (1,3,3,1,1)
  Waste reported as "residue, rejects, paper-related" (1.2 kg), representing paper clips, tags, adhesive labels, fibres etc. and "residue, rejects, other" (3.5 kg), representing e.g. glass, sand, plastics. The average dry mass of the rejects is about 55%.
  production volume 6.48846e6 kg; = flutingProductionVolume * (BP_amount_5 / flutingAmount)
    Calculated from production volume of reference product using the relative outputs.
  property dry mass 0.5 kg; name MSW_DM
  property water content 1; name MSW_water_content
  properties: carbon content, non-fossil 0.261655, carbon content, fossil 0.171549, heating value, net 11.74 MJ, wet mass 1 kg
  note on carbon content, non-fossil: MSW composition in tab 4.1, ecoinvent v2.2 report 13_I. C content referred to 1 kg DM
  note on heating value, net: Value taken from the general comment of the treatment dataset.
- sulfur: 0.0082191 kg; source FEFCO Corrugated Packaging 2015; lognormal variance with pedigree 0.0112, pedigree (1,3,3,1,3)
  FEFCO 2015.
  properties: dry mass 1 kg, wet mass 1 kg
- light fuel oil: 0.000209305 kg; = 0.009*1000/42.7; source FEFCO Corrugated Packaging 2015; lognormal variance with pedigree 0.0118, pedigree (2,3,3,1,3)
  Reported as 0.009 GJ /ton net saleable product. Converted to kg using the lower heating value (42.7 MJ/kg) reported in "Dones R. et al.(2007) Life Cycle Inventories of Energy Systems: Results for Current Systems in Switzerland and other UCTE Countries. Final report ecoinvent data v2.0, No. 5. Swiss Centre for Life Cycle Inventories, Dübendorf, CH."
  Uncertainty: Uncertainty accounts for both the uncertainty associated with the fuel consumption value reported by FEFCO and the lower heating value used to convert the exchange value to a mass basis.
  properties: wet mass 1 kg, heating value, net 42.6 MJ, dry mass 1 kg, carbon content, fossil 0.862
- hard coal ash: -0.00125138 kg; name BP_amount_3; lognormal variance with pedigree 0.0027, pedigree (1,2,3,1,1)
  (same comment as for lignite ash)
  production volume 1.48545e6 kg; = flutingProductionVolume * (BP_amount_3 / flutingAmount)
    Calculated from production volume of reference product using the relative outputs.
  property price 0 EUR2005; name BP_amount_3_price_EUR2005
  properties: dry mass 1 kg, wet mass 1 kg
- paper mill, integrated: 5.40211e-11 unit; lognormal variance with pedigree 0.1692, pedigree (4,3,5,1,5)
  Assumption.
- wood chips, dry, measured as dry mass: 0.114329 kg; = (0.0017+0.035)*1000+1.44*1000/18.36; source FEFCO Corrugated Packaging 2015; lognormal variance with pedigree 0.0032, pedigree (1,3,3,1,1)
  Of that 78.43kg are reported as biofuels and used as energy input, the remaining 36.7kg are reported as saw mill residues and used as raw material input. Sawmill residues are reported iin tonne bone dry weight (0.0017+0.035 tonne for softwood and hardwood, respectively), bioguels are reported as bark, scrap wood and tall oil in GJ/tonne product. For the biodfuel part, the average lower heating value of wood chips is calculated as 18.36MJ/kg dry mass.
  properties: heating value, net 9.99 MJ, carbon content, non-fossil 0.494, water content 0.4, wet mass 1.4 kg, dry mass 1 kg
  note on carbon content, non-fossil: C content of dry mass is 0.494 kgC/kg dry wood (ecoinvent v2.2 report 9).
- sodium hydroxide, without water, in 50% solution state: 0.0125283 kg; source FEFCO Corrugated Packaging 2015; lognormal variance with pedigree 0.0112, pedigree (1,3,3,1,3)
  FEFCO 2015.
  properties: heating value, net 3.03 MJ, wet mass 1 kg, dry mass 1 kg
- soda ash, dense: 0.00601122 kg; source FEFCO Corrugated Packaging 2015; lognormal variance with pedigree 0.0112, pedigree (1,3,3,1,3)
  Reported as Na2CO3 (soda)
  properties: wet mass 1 kg, dry mass 1 kg, carbon content, fossil 0.11321, heating value, net 3.43 MJ
- ethoxylated alcohol (AE3): 0.000125496 kg; source FEFCO Corrugated Packaging 2015; lognormal variance with pedigree 0.0112, pedigree (1,3,3,1,3)
  Proxy for defoamer, unspecified.
  properties: dry mass 1 kg, wet mass 1 kg, carbon content, non-fossil 0.48522, heating value, net 21 MJ, carbon content, fossil 0.20795
- heavy fuel oil: 0.00635934 kg; = 0.26*1000/40.6; source FEFCO Corrugated Packaging 2015; lognormal variance with pedigree 0.0118, pedigree (2,3,3,1,3)
  Reported as 0.26 GJ /ton net saleable product. Converted to kg using the lower heating value (40.6 MJ/kg) reported in "Dones R. et al.(2007) Life Cycle Inventories of Energy Systems: Results for Current Systems in Switzerland and other UCTE Countries. Final report ecoinvent data v2.0, No. 5. Swiss Centre for Life Cycle Inventories, Dübendorf, CH."
  Uncertainty: Uncertainty accounts for both the uncertainty associated with the fuel consumption value reported by FEFCO and the lower heating value used to convert the exchange value to a mass basis.
  properties: heating value, net 41.2 MJ, wet mass 1 kg, dry mass 1 kg, carbon content, fossil 0.849
- sludge from pulp and paper production: 0 kg; name sludgeTotalAmount; source FEFCO Corrugated Packaging 2015; pedigree (1,1,1,1,1)
  Reported as residue, inorganic sludges (7.1kg, 65% dry content) and organic sludges (48.3 kg, 35% dry content).
  production volume 0 kg
    Calculated from production volume of reference flow.
  property price 0 EUR2005; name sludgeTotalAmount_price_EUR2005
  property water content 0.635296; name sludgeTotalAmount_water_content
  property dry mass 0.61151 kg; name sludgeTotalAmount_DM
  property carbon content, non-fossil 0.21; name sludgeTotalAmount_C_content_non_fossil
  property water in wet mass 0.38849 kg; name sludgeTotalAmount_WWM
  property wet mass 1 kg; name sludgeTotalAmount_WM
  properties: heating value, net 2.65 MJ
- pulpwood, hardwood, measured as solid wood under bark: 0 m3; source FEFCO Corrugated Packaging 2015; pedigree (1,1,1,1,1)
  Due to reporting issues resulting in a fibre-inbalance in the FEFCO 2015 data, this amount is based on the FEFCO 2012 LCI study. FEFCO 2012 reports an input of 1.01t pulpwood per t of product and 0.1t of recovered paper. The amount of pulpwood was split over hardwood and softwood according to the shares given in the 2015 FEFCO data. FEFCO 2015: 0.004t pulpwood soft, 0.91t pulpwood hard.
  property dry mass 603.667 kg; name DM_hardwood
  properties: carbon content, non-fossil 0.494, wet mass 1086.6 kg, heating value, net 6071.3 MJ, water content 0.8
  note on heating value, net: Value based on "hardwood forestry, mixed species, sustainable forest management"The property is based on a value of 11.58MJ/kg
- lubricating oil: 0.000139025 kg; source FEFCO Corrugated Packaging 2015; lognormal variance with pedigree 0.0112, pedigree (1,3,3,1,3)
  This value was taken over from FEFCO 2009. Reported as lubricants.
  properties: dry mass 1 kg, wet mass 1 kg, heating value, net 40.2 MJ, carbon content, fossil 0.75
  note on heating value, net: Literature value, Source: IPCC 2006, 2006 IPCC Guidelines for National Greenhouse Gas Inventories, Prepared by the National Greenhouse Gas Inventories Programme, Eggleston H.S., Buendia L., Miwa K., Ngara T. and Tanabe K. (eds). Published: IGES, Japan
- sulfur dioxide, liquid: 0.00158768 kg; source FEFCO Corrugated Packaging 2015; lognormal variance with pedigree 0.0112, pedigree (1,3,3,1,3)
  Reported as SO2
  properties: wet mass 1 kg, dry mass 1 kg
- hard coal: 0.0149302 kg; = 0.43*1000/28.6; source FEFCO Corrugated Packaging 2015; lognormal variance with pedigree 0.0118, pedigree (2,3,3,1,3)
  Reported as 0.43 GJ /ton net saleable product. Converted to kg using the lower heating value (28.6 MJ/kg) reported in "Röder A., Bauer C. and Dones R. (2007) Kohle. In: Sachbilanzen von Energiesystemen: Grundlagen für den ökologischen Vergleich von Energiesystemen und den Einbezug von Energiesystemen in Ökobilanzen für die Schweiz (ed. Dones R.). Swiss Centre for Life Cycle Inventories, Dübendorf, CH."
  Uncertainty: Uncertainty accounts for both the uncertainty associated with the fuel consumption value reported by FEFCO and the lower heating value used to convert the exchange value to a mass basis.
  properties: heating value, net 27.91 MJ, dry mass 0.94 kg, wet mass 1 kg, water content 0.0638298, carbon content, fossil 0.845
  note on heating value, net: Based on the Characterization factor of Hard coal in the CED method
- packaging film, low density polyethylene: 5.95821e-6 kg; source FEFCO Corrugated Packaging 2015; lognormal variance with pedigree 0.0032, pedigree (1,3,3,1,1)
  Proxy for PE for packaging.
  properties: carbon content, fossil 0.85714, dry mass 1 kg, heating value, net 42.47 MJ, wet mass 1 kg
- waste mineral oil: 0 kg; name wasteLubricantsOilAmount; source FEFCO Corrugated Packaging 2015; pedigree (1,1,1,1,1)
  Reported as residue, lubricants and oil.
  production volume 0 kg
    Calculated from production volume of reference flow.
  property price 0 EUR2005; name wasteLubricantsOilAmount_price_EUR2005
  property dry mass 1 kg; name wasteLubricantsOilAmount_DM
  property carbon content, fossil 0.86444; name wasteLubricantsOilAmo_C_content_fossil_0
  property water in wet mass 0 kg; name wasteLubricantsOilAmount_WWM
  property water content 0; name wasteLubricantsOilAmount_water_content
  property wet mass 1 kg; name wasteLubricantsOilAmount_WM
  properties: heating value, net 34.7 MJ
- electricity, medium voltage: 0.317219 kWh; = 1.15/0.0036; lognormal variance with pedigree 0.0032, pedigree (1,3,3,1,1)
  Reported as 1.15 GJ/tonne net saleable product.
- corrugated board box: 0.00258189 kg; source FEFCO Corrugated Packaging 2015; lognormal variance with pedigree 0.0032, pedigree (1,3,3,1,1)
  Proxy for paper and board for packaging
  properties: heating value, net 12.86 MJ, water content 0.0582011, carbon content, non-fossil 0.45025, dry mass 0.945 kg, wet mass 1 kg, carbon content, fossil 0.00365437
- pulpwood, softwood, measured as solid wood under bark: 0 m3; source FEFCO Corrugated Packaging 2015; pedigree (1,1,1,1,1)
  (same comment as for pulpwood, hardwood, measured as solid wood under bark)
  property dry mass 425.216 kg; name DM_softwood
  properties: wet mass 1020.52 kg, heating value, net 4483.78 MJ, water content 1.4, carbon content, non-fossil 0.494
  note on heating value, net: Value based on "softwood forestry, mixed species, sustainable forest management"The property is based on a value of 11.58MJ/kg
- retention aid, for paper production: 0.000166096 kg; source FEFCO Corrugated Packaging 2015; lognormal variance with pedigree 0.0112, pedigree (1,3,3,1,3)
  Proxy for retention agents.
  properties: dry mass 1 kg, carbon content, fossil 0.5, heating value, net 15.15 MJ, wet mass 1 kg
- peat: 0.229075 kg; = 2.03*1000/8.8; source FEFCO Corrugated Packaging 2015; lognormal variance with pedigree 0.0118, pedigree (2,3,3,1,3)
  Reported as 2 GJ /ton net saleable product. Converted to kg using the lower heating value (8.8 MJ/kg) reported in "Röder A., Bauer C. and Dones R. (2007) Kohle. In: Sachbilanzen von Energiesystemen: Grundlagen für den ökologischen Vergleich von Energiesystemen und den Einbezug von Energiesystemen in Ökobilanzen für die Schweiz (ed. Dones R.). Swiss Centre for Life Cycle Inventories, Dübendorf, CH."
  Uncertainty: Uncertainty accounts for both the uncertainty associated with the fuel consumption value reported by FEFCO and the lower heating value used to convert the exchange value to a mass basis.
  properties: carbon content, fossil 0.59, water content 1.38095, wet mass 1 kg, dry mass 0.42 kg, heating value, net 10 MJ
  note on heating value, net: Indicative value. Reference: Nature and Management of Tropical Peat Soils, FAO Soils Bulletin 59, available at: http://www.fao.org/3/x5872e/x5872e00.htm#Contents
- diesel, low-sulfur: 0.000487237 kg; = 0.021*1000/42.8; source FEFCO Corrugated Packaging 2015; lognormal variance with pedigree 0.0118, pedigree (2,3,3,1,3)
  Reported as 0.021 GJ /tonne net saleable product. Converted to kg using the lower heating value (42.8 MJ/kg) reported in "Dones R. et al.(2007) Life Cycle Inventories of Energy Systems: Results for Current Systems in Switzerland and other UCTE Countries. Final report ecoinvent data v2.0, No. 5. Swiss Centre for Life Cycle Inventories, Dübendorf, CH."
  Uncertainty: Uncertainty accounts for both the uncertainty associated with the fuel consumption value reported by FEFCO and the lower heating value used to convert the exchange value to a mass basis.
  properties: dry mass 1 kg, carbon content, fossil 0.865, wet mass 1 kg, heating value, net 42.8 MJ
- ash from paper production sludge: 0 kg; name inorganicAshAmount; source FEFCO Corrugated Packaging 2015; pedigree (1,1,1,1,1)
  Reported as residue, inorganic ashes.
  production volume 0 kg
    Calculated from production volume of reference flow.
  property carbon content, non-fossil 0.0092; name inorganicAshAmoun_C_content_non_fossil_0
  property dry mass 0.8 kg; name inorganicAshAmount_DM
  property wet mass 1 kg; name inorganicAshAmount_WM
  property price 0 EUR2005; name inorganicAshAmount_price_EUR2005
  properties: water content 0.25
- sulfuric acid: 0.00160613 kg; source FEFCO Corrugated Packaging 2015; lognormal variance with pedigree 0.0112, pedigree (1,3,3,1,3)
  FEFCO 2015
  properties: wet mass 1 kg, dry mass 1 kg
- sludge from pulp and paper production: -0.000602907, -0.0544075 kg (2 entries); source FEFCO Corrugated Packaging 2015; lognormal variance with pedigree 0.0038, pedigree (1,3,3,1,2)
  (same comment as for sludge from pulp and paper production)
  production volume 6.53002e7 kg
  properties: water content 0.635296, dry mass 0.61151 kg, carbon content, non-fossil 0.21, wet mass 1 kg, heating value, net 2.65 MJ
- pulpwood, hardwood, measured as solid wood under bark: 0.00175291, 4.86998e-5 m3 (2 entries); source FEFCO Corrugated Packaging 2015; lognormal variance with pedigree 0.0032, pedigree (1,3,3,1,1)
  (same comment as for pulpwood, hardwood, measured as solid wood under bark)
  properties: carbon content, non-fossil 0.494, wet mass 1086.6 kg, heating value, net 6071.3 MJ, water content 0.8, dry mass 603.667 kg
- waste mineral oil: -7.21525e-5, -1.78621e-6 kg (2 entries); source FEFCO Corrugated Packaging 2015; lognormal variance with pedigree 0.0032, pedigree (1,3,3,1,1)
  Reported as residue, lubricants and oil.
  production volume 87769 kg
  properties: dry mass 1 kg, heating value, net 34.7 MJ, carbon content, fossil 0.86444, wet mass 1 kg
- pulpwood, softwood, measured as solid wood under bark: 1.10744e-5, 1.3532e-7 m3 (2 entries); source FEFCO Corrugated Packaging 2015; lognormal variance with pedigree 0.0032, pedigree (1,3,3,1,1)
  (same comment as for pulpwood, hardwood, measured as solid wood under bark)
  properties: wet mass 1020.52 kg, heating value, net 4483.78 MJ, dry mass 425.216 kg, water content 1.4, carbon content, non-fossil 0.494
- ash from paper production sludge: -0.00547805, -0.000143193 kg (2 entries); source FEFCO Corrugated Packaging 2015; lognormal variance with pedigree 0.0032, pedigree (1,3,3,1,1)
  Reported as residue, inorganic ashes.
  production volume 6.67271e6 kg
  properties: carbon content, non-fossil 0.0092, water content 0.25, dry mass 0.8 kg, wet mass 1 kg

## Inputs from nature
- Carbon dioxide, non-fossil, resource correction [natural resource, in air]: -0.00429591 kg; pedigree (1,1,1,1,1)
  This exchange has been added after economic allocation in order to re-balance the non-fossil carbon dioxide resource extraction.
- Water, river [natural resource, in water]: 0.0338338 m3; name water_river_input; source FEFCO Corrugated Packaging 2015; lognormal variance with pedigree 0.0038, pedigree (1,3,3,1,2)
  Reported as input of surface water (FEFCO, 2015).
- Water, well, in ground [natural resource, in water]: 6.59705e-7 m3; name water_well_in_ground_input; source FEFCO Corrugated Packaging 2015; lognormal variance with pedigree 0.0112, pedigree (1,3,3,1,3)
  Reported as input of ground water (FEFCO, 2015).

## Emissions to nature
- Ethane [air, unspecified]: 3.08852e-5 kg; lognormal variance with pedigree 0.0526, pedigree (3,3,3,1,3)
  (same comment as for lignite ash)
- Formaldehyde [air, unspecified]: 9.86376e-7 kg; lognormal variance with pedigree 0.0526, pedigree (3,3,3,1,3)
  (same comment as for lignite ash)
- Hydrocarbons, aliphatic, unsaturated [air, unspecified]: 2.47849e-5 kg; lognormal variance with pedigree 0.0526, pedigree (3,3,3,1,3)
  Estimation based on fuel input data and emission factors from corresponding fuel combustion ecoinvent datasets. Note(1): Within the process, energy is recovered through the burning of black liquor (4.96GJ/tonne) and bark (3.13GJ/tonne) from the wood. This inherent energy makes up a large part of this process’ energy supply. As it is supplied from within the system boundaries, it does not have a corresponding input exchange. Emissions from the combustion of the internally generated biomass (bark) is approximated with the combustion of wood chips. No comprehensive data for the emissions from the balck liquor recovery process were available. The approximation of this rather complex recovery process with biomass combustion is inappropriate. Therefore emissions from the recovery process are only reflected in the key emission values (particulates, CO2, CO, NOx, Sox, H2S) reported by FEFCO (2015) but not with a complete emission profile. This constitutes a data gap. Note(2): emissions from peat combustion were approximated with those of lignite combustion, LPG with natural gas combustion and diesel with LFO combustion.
  Uncertainty: estimation - based on respective heating modules (ecoinvent). Uncertainty accounts for the fact that some proxies for inexisting fuel combustion datasets were used (e.g. natural gas combustion emission factors for LPG, diesel for light fuel oil, lignite for peat).
- Selenium [air, unspecified]: 1.59991e-7 kg; lognormal variance with pedigree 0.0526, pedigree (3,3,3,1,3)
  (same comment as for Hydrocarbons, aliphatic, unsaturated)
- Nitrogen oxides [air, unspecified]: 0.00140163 kg; source FEFCO Corrugated Packaging 2015; lognormal variance with pedigree 0.0426, pedigree (1,3,3,1,1)
  As reported, i.e. not calculated using emission factors, contrary to most combustion emissions.
- Chromium VI [air, unspecified]: 2.8266e-9 kg; lognormal variance with pedigree 0.6626, pedigree (3,3,3,1,3)
  (same comment as for Hydrocarbons, aliphatic, unsaturated)
- Radium-226 [air, unspecified]: 3.74319e-5 kBq; lognormal variance with pedigree 0.3126, pedigree (3,3,3,1,3)
  (same comment as for Hydrocarbons, aliphatic, unsaturated)
- Water [water, surface water]: 0.030089 m3; name water_to_water_surface; = 14.9+15.4; lognormal variance with pedigree 0.0112, pedigree (1,3,3,1,3)
  Accounts for both "thermally polluted" (14.9m3) and "chemically polluted" (15.4 m3) water output, after treatment.
- Phenol [air, unspecified]: 1.00793e-6 kg; lognormal variance with pedigree 0.0526, pedigree (3,3,3,1,3)
  (same comment as for Hydrocarbons, aliphatic, unsaturated)
- Iodine [air, unspecified]: 9.66409e-8 kg; lognormal variance with pedigree 0.0526, pedigree (3,3,3,1,3)
  (same comment as for Hydrocarbons, aliphatic, unsaturated)
- Thorium [air, unspecified]: 6.92793e-9 kg; lognormal variance with pedigree 0.0526, pedigree (3,3,3,1,3)
  (same comment as for Hydrocarbons, aliphatic, unsaturated)
- Barium [air, unspecified]: 5.64383e-7 kg; lognormal variance with pedigree 0.0526, pedigree (3,3,3,1,3)
  (same comment as for Hydrocarbons, aliphatic, unsaturated)
- Hydrogen sulfide [air, unspecified]: 8.65182e-5 kg; = 0.082*(34/32); source FEFCO Corrugated Packaging 2015; lognormal variance with pedigree 0.0426, pedigree (1,3,3,1,1)
  Reported as S (0.082kg). Converted stoichiometrically to H2S.
- Zinc [air, unspecified]: 1.45824e-6 kg; lognormal variance with pedigree 0.6646, pedigree (3,3,3,5,3)
  (same comment as for Hydrocarbons, aliphatic, unsaturated)
- Beryllium [air, unspecified]: 5.64383e-9 kg; lognormal variance with pedigree 0.0526, pedigree (3,3,3,1,3)
  (same comment as for Hydrocarbons, aliphatic, unsaturated)
- Radon-220 [air, unspecified]: 8.49495e-6 kBq; lognormal variance with pedigree 0.3126, pedigree (3,3,3,1,3)
  (same comment as for Hydrocarbons, aliphatic, unsaturated)
- Nickel [air, unspecified]: 2.77446e-7 kg; lognormal variance with pedigree 0.6626, pedigree (3,3,3,1,3)
  (same comment as for lignite ash)
- Titanium [air, unspecified]: 6.73555e-7 kg; lognormal variance with pedigree 0.6626, pedigree (3,3,3,1,3)
  (same comment as for Hydrocarbons, aliphatic, unsaturated)
- Cobalt [air, unspecified]: 8.62851e-8 kg; lognormal variance with pedigree 0.6626, pedigree (3,3,3,1,3)
  (same comment as for Hydrocarbons, aliphatic, unsaturated)
- Sulfur oxides [air, unspecified]: 0.000849767 kg; source FEFCO Corrugated Packaging 2015; lognormal variance with pedigree 0.0032, pedigree (1,3,3,1,1)
  (same comment as for Nitrogen oxides)
- Thorium-232 [air, unspecified]: 1.07832e-5 kBq; lognormal variance with pedigree 0.3126, pedigree (3,3,3,1,3)
  (same comment as for Hydrocarbons, aliphatic, unsaturated)
- Hydrogen fluoride [air, unspecified]: 8.0633e-7 kg; lognormal variance with pedigree 0.0526, pedigree (3,3,3,1,3)
  (same comment as for Hydrocarbons, aliphatic, unsaturated)
- Mercury [air, unspecified]: 2.56614e-8 kg; lognormal variance with pedigree 0.6626, pedigree (3,3,3,1,3)
  (same comment as for Hydrocarbons, aliphatic, unsaturated)
- Ethene [air, unspecified]: 6.17703e-5 kg; lognormal variance with pedigree 0.0526, pedigree (3,3,3,1,3)
  (same comment as for lignite ash)
- Water [air, unspecified]: 0.00454858 m3; = 0.000488854+4.58; lognormal variance with pedigree 0.0427, pedigree (2,2,3,1,1)
  About 4.58 m3 calculated as water evaporated to air to close the water balance. This is about 13% of the water inputs. 0.000488854 estimation based on fuel input data and emission factors from corresponding fuel combustion ecoinvent datasets. Note(1): Within the process, energy is recovered through the burning of black liquor and bark from the wood. This inherent energy makes up a large part of this process’ energy supply. As it is supplied from within the system boundaries, it is not reported as part of the fuel input. . Emissions from the combustion of these internal fuels are reflected in the key emission values (particulates, CO2, CO, NOx, Sox, H2S) reported by FEFCO (2015). According to FEFCO (2015) the total energy input for the process of Semichemical Fluting production is around 12 GJ/tonne. Note(2): emissions from peat combustion were approximated with those of lignite combustion, LPG with natural gas combustion and diesel with LFO combustion.
- Lead [air, unspecified]: 2.63339e-7 kg; lognormal variance with pedigree 0.6546, pedigree (3,3,3,1,1)
  (same comment as for lignite ash)
- Chromium, ion [water, unspecified]: 5.39065e-9 kg; lognormal variance with pedigree 0.6626, pedigree (4,4,3,1,2)
  This value is qualified as "not representative" in FEFCO (2015) because only a few mills were able to report this figure. Moreover, mills were not able to report substances in the input water, hence this figure represents gross rather than net emissions. The value is a straight average over the reporting mills.
- Benzo(a)pyrene [air, unspecified]: 4.26654e-8 kg; lognormal variance with pedigree 0.0526, pedigree (3,3,3,1,3)
  (same comment as for Hydrocarbons, aliphatic, unsaturated)
- Nitrogen [water, unspecified]: 0.000343702 kg; source FEFCO Corrugated Packaging 2015; lognormal variance with pedigree 0.0426, pedigree (1,3,3,1,1)
  Reported as total nitrogen.
- Arsenic [air, unspecified]: 1.20746e-7 kg; lognormal variance with pedigree 0.0526, pedigree (3,3,3,1,3)
  (same comment as for lignite ash)
- Ammonia [air, unspecified]: 8.08899e-6 kg; lognormal variance with pedigree 0.0526, pedigree (3,3,3,1,3)
  (same comment as for lignite ash)
- Thallium [air, unspecified]: 9.35784e-10 kg; lognormal variance with pedigree 0.0526, pedigree (3,3,3,1,3)
  (same comment as for Hydrocarbons, aliphatic, unsaturated)
- Dioxins, measured as 2,3,7,8-tetrachlorodibenzo-p-dioxin [air, unspecified]: 1.57612e-13 kg; lognormal variance with pedigree 0.0526, pedigree (3,3,3,1,3)
  (same comment as for lignite ash)
- Benzene, hexachloro- [air, urban air close to ground]: 3.36359e-14 kg; lognormal variance with pedigree 0.0526, pedigree (3,3,3,1,3)
  (same comment as for lignite ash)
- Boron [air, unspecified]: 2.31853e-5 kg; lognormal variance with pedigree 0.6626, pedigree (3,3,3,1,3)
  (same comment as for Hydrocarbons, aliphatic, unsaturated)
- DOC, Dissolved Organic Carbon [water, unspecified]: 0.00282354 kg; lognormal variance with pedigree 0.0466, pedigree (3,3,3,5,1)
  No data available for DOC. DOC=TOC as proposed by ecoinvent Data Quality Guidelines.
- NMVOC, non-methane volatile organic compounds, unspecified origin [air, unspecified]: 8.48704e-5 kg; lognormal variance with pedigree 0.0526, pedigree (3,3,3,1,3)
  (same comment as for lignite ash)
- Particulates, < 2.5 um [air, unspecified]: 0.000471567 kg; lognormal variance with pedigree 0.3126, pedigree (3,3,3,1,3)
  (same comment as for Hydrocarbons, aliphatic, unsaturated)
- Ethanol [air, unspecified]: 7.74584e-8 kg; lognormal variance with pedigree 0.0526, pedigree (3,3,3,1,3)
  (same comment as for lignite ash)
- Dinitrogen monoxide [air, unspecified]: 1.3343e-5 kg; lognormal variance with pedigree 0.0526, pedigree (3,3,3,1,3)
  (same comment as for lignite ash)
- Manganese [air, unspecified]: 8.54717e-7 kg; lognormal variance with pedigree 0.6626, pedigree (3,3,3,1,3)
  (same comment as for Hydrocarbons, aliphatic, unsaturated)
- Antimony [air, unspecified]: 5.16831e-8 kg; lognormal variance with pedigree 0.4126, pedigree (3,3,3,1,3)
  (same comment as for Hydrocarbons, aliphatic, unsaturated)
- Methane, non-fossil [air, unspecified]: 2.10224e-5 kg; lognormal variance with pedigree 0.0112, pedigree (1,3,3,1,3)
  (same comment as for lignite ash)
- Hydrogen chloride [air, unspecified]: 2.45232e-5 kg; lognormal variance with pedigree 0.0526, pedigree (3,3,3,1,3)
  (same comment as for Hydrocarbons, aliphatic, unsaturated)
- Pentane [air, unspecified]: 6.24567e-9 kg; lognormal variance with pedigree 0.0526, pedigree (3,3,3,1,3)
  (same comment as for Hydrocarbons, aliphatic, unsaturated)
- Phosphorus [water, unspecified]: 6.44035e-6 kg; source FEFCO Corrugated Packaging 2015; lognormal variance with pedigree 0.0426, pedigree (1,3,3,1,1)
  FEFCO 2015.
- Bromine [air, unspecified]: 3.1503e-7 kg; lognormal variance with pedigree 0.0526, pedigree (3,3,3,1,3)
  (same comment as for Hydrocarbons, aliphatic, unsaturated)
- Aluminium [air, unspecified]: 2.86059e-5 kg; lognormal variance with pedigree 0.6626, pedigree (3,3,3,1,3)
  (same comment as for Hydrocarbons, aliphatic, unsaturated)
- Propene [air, unspecified]: 1.02951e-5 kg; lognormal variance with pedigree 0.0526, pedigree (3,3,3,1,3)
  (same comment as for Hydrocarbons, aliphatic, unsaturated)
- Suspended solids, unspecified [water, unspecified]: 0.000873578 kg; source FEFCO Corrugated Packaging 2015; lognormal variance with pedigree 0.0426, pedigree (1,3,3,1,1)
  FEFCO 2015.
- Xylene [air, unspecified]: 6.69549e-6 kg; lognormal variance with pedigree 0.0546, pedigree (3,3,3,5,3)
  (same comment as for Hydrocarbons, aliphatic, unsaturated)
- TOC, Total Organic Carbon [water, unspecified]: 0.00282354 kg; source FEFCO Corrugated Packaging 2015; lognormal variance with pedigree 0.0446, pedigree (1,3,3,5,1)
  FEFCO 2015.
- Acetone [air, unspecified]: 3.87293e-8 kg; lognormal variance with pedigree 0.0526, pedigree (3,3,3,1,3)
  (same comment as for Hydrocarbons, aliphatic, unsaturated)
- Lead-210 [air, unspecified]: 0.000145049 kBq; lognormal variance with pedigree 0.3126, pedigree (3,3,3,1,3)
  (same comment as for Hydrocarbons, aliphatic, unsaturated)
- Hydrocarbons, aromatic [air, unspecified]: 3.96215e-8 kg; lognormal variance with pedigree 0.0526, pedigree (3,3,3,1,3)
  (same comment as for Hydrocarbons, aliphatic, unsaturated)
- Acetaldehyde [air, unspecified]: 3.237e-7 kg; lognormal variance with pedigree 0.0526, pedigree (3,3,3,1,3)
  (same comment as for Hydrocarbons, aliphatic, unsaturated)
- COD, Chemical Oxygen Demand [water, unspecified]: 0.00713849 kg; source FEFCO Corrugated Packaging 2015; lognormal variance with pedigree 0.0426, pedigree (1,3,3,1,1)
  (same comment as for Nitrogen oxides)
- Methane, fossil [air, unspecified]: 0.000609878 kg; lognormal variance with pedigree 0.0526, pedigree (3,3,3,1,3)
  (same comment as for Hydrocarbons, aliphatic, unsaturated)
- m-Xylene [air, urban air close to ground]: 5.60597e-7 kg; lognormal variance with pedigree 0.0526, pedigree (3,3,3,1,3)
  (same comment as for lignite ash)
- Copper [air, unspecified]: 1.88309e-7 kg; lognormal variance with pedigree 0.6626, pedigree (3,3,3,1,3)
  (same comment as for lignite ash)
- Vanadium [air, unspecified]: 5.42659e-7 kg; lognormal variance with pedigree 0.0546, pedigree (3,3,3,5,3)
  (same comment as for Hydrocarbons, aliphatic, unsaturated)
- Carbon monoxide, non-fossil [air, urban air close to ground]: 0.00233582 kg; lognormal variance with pedigree 0.0526, pedigree (3,3,3,1,3)
  (same comment as for lignite ash)
- Molybdenum [air, unspecified]: 9.32119e-8 kg; lognormal variance with pedigree 0.6626, pedigree (3,3,3,1,3)
  (same comment as for Hydrocarbons, aliphatic, unsaturated)
- Particulates, > 10 um [air, unspecified]: 0.000111988 kg; lognormal variance with pedigree 0.0526, pedigree (3,3,3,1,3)
  FEFCO 2015 reports 0.076kg of dust emissions, these were added to the PM emissions which were estimated from the on-site fuel use.
  Uncertainty: This emission was calculated from the ecoinvent emission factor of combustion of energy. Some energy sources do not have emission factor (LPG, peat and diesel) so other factors were used ( natural gas, lignite and light fuel oil).
- Uranium [air, unspecified]: 1.12718e-8 kg; lognormal variance with pedigree 0.0526, pedigree (3,3,3,1,3)
  (same comment as for Hydrocarbons, aliphatic, unsaturated)
- Benzene, ethyl- [air, urban air close to ground]: 1.40149e-7 kg; lognormal variance with pedigree 0.0526, pedigree (3,3,3,1,3)
  (same comment as for lignite ash)
- Benzene [air, unspecified]: 1.45467e-5 kg; lognormal variance with pedigree 0.0526, pedigree (3,3,3,1,3)
  (same comment as for Hydrocarbons, aliphatic, unsaturated)
- Polonium-210 [air, unspecified]: 0.000266486 kBq; lognormal variance with pedigree 0.3126, pedigree (3,3,3,1,3)
  (same comment as for Hydrocarbons, aliphatic, unsaturated)
- BOD5, Biological Oxygen Demand [water, unspecified]: 0.000642353 kg; source FEFCO Corrugated Packaging 2015; lognormal variance with pedigree 0.0426, pedigree (1,3,3,1,1)
  FEFCO 2015.
- Hydrocarbons, aliphatic, alkanes, unspecified [air, unspecified]: 1.47154e-5 kg; lognormal variance with pedigree 0.0526, pedigree (3,3,3,1,3)
  (same comment as for Hydrocarbons, aliphatic, unsaturated)
- Hydrogen sulfide [air, urban air close to ground]: 2.01586e-7 kg; lognormal variance with pedigree 0.0526, pedigree (3,3,3,1,3)
  (same comment as for lignite ash)
- Chlorine [air, urban air close to ground]: 8.40896e-7 kg; lognormal variance with pedigree 0.0526, pedigree (3,3,3,1,3)
  (same comment as for lignite ash)
- Chromium [air, unspecified]: 1.70799e-7 kg; lognormal variance with pedigree 0.6626, pedigree (3,3,3,1,3)
  (same comment as for lignite ash)
- Carbon dioxide, fossil [air, unspecified]: 0.328884 kg; source FEFCO Corrugated Packaging 2015; lognormal variance with pedigree 0.0032, pedigree (1,3,3,1,1)
  (same comment as for Nitrogen oxides)
- Sodium [air, unspecified]: 1.11155e-5 kg; lognormal variance with pedigree 0.0526, pedigree (3,3,3,1,3)
  (same comment as for Hydrocarbons, aliphatic, unsaturated)
- Carbon dioxide, non-fossil [air, unspecified]: 0.745842 kg; source FEFCO Corrugated Packaging 2015; lognormal variance with pedigree 0.0032, pedigree (1,3,3,1,1)
  (same comment as for Nitrogen oxides)
- Silicon [air, unspecified]: 0.000250737 kg; lognormal variance with pedigree 0.0526, pedigree (3,3,3,1,3)
  (same comment as for Hydrocarbons, aliphatic, unsaturated)
- Ethyne [air, unspecified]: 1.02951e-5 kg; lognormal variance with pedigree 0.0526, pedigree (3,3,3,1,3)
  (same comment as for lignite ash)
- Radium-228 [air, unspecified]: 4.53845e-5 kBq; lognormal variance with pedigree 0.3126, pedigree (3,3,3,1,3)
  (same comment as for Hydrocarbons, aliphatic, unsaturated)
- Toluene [air, unspecified]: 3.46914e-6 kg; lognormal variance with pedigree 0.0526, pedigree (3,3,3,1,3)
  (same comment as for Hydrocarbons, aliphatic, unsaturated)
- Nickel, ion [water, unspecified]: 4.62056e-7 kg; lognormal variance with pedigree 0.6626, pedigree (4,4,3,1,2)
  (same comment as for Chromium, ion)
- Cadmium [air, unspecified]: 1.94943e-8 kg; lognormal variance with pedigree 0.0526, pedigree (3,3,3,1,3)
  (same comment as for lignite ash)
- Propane [air, unspecified]: 2.05985e-5 kg; lognormal variance with pedigree 0.0526, pedigree (3,3,3,1,3)
  (same comment as for Hydrocarbons, aliphatic, unsaturated)
- Tin [air, unspecified]: 4.34476e-9 kg; lognormal variance with pedigree 0.6626, pedigree (3,3,3,1,3)
  (same comment as for Hydrocarbons, aliphatic, unsaturated)
- Magnesium [air, unspecified]: 1.85974e-5 kg; lognormal variance with pedigree 0.6626, pedigree (3,3,3,1,3)
  (same comment as for Hydrocarbons, aliphatic, unsaturated)
- Strontium [air, unspecified]: 6.1619e-7 kg; lognormal variance with pedigree 0.0526, pedigree (3,3,3,1,3)
  (same comment as for Hydrocarbons, aliphatic, unsaturated)
- PAH, polycyclic aromatic hydrocarbons [air, unspecified]: 5.20222e-8 kg; lognormal variance with pedigree 0.3126, pedigree (3,3,3,1,3)
  (same comment as for lignite ash)
- Butane [air, unspecified]: 9.36851e-9 kg; lognormal variance with pedigree 0.0526, pedigree (3,3,3,1,3)
  (same comment as for Hydrocarbons, aliphatic, unsaturated)
- Methanol [air, unspecified]: 1.31679e-7 kg; lognormal variance with pedigree 0.0526, pedigree (3,3,3,1,3)
  (same comment as for Hydrocarbons, aliphatic, unsaturated)
- Uranium-238 [air, unspecified]: 3.13276e-5 kBq; lognormal variance with pedigree 0.3126, pedigree (3,3,3,1,3)
  (same comment as for Hydrocarbons, aliphatic, unsaturated)
- Scandium [air, unspecified]: 1.81773e-9 kg; lognormal variance with pedigree 0.0526, pedigree (3,3,3,1,3)
  (same comment as for Hydrocarbons, aliphatic, unsaturated)
- Potassium-40 [air, unspecified]: 3.94903e-5 kBq; lognormal variance with pedigree 0.3126, pedigree (3,3,3,1,3)
  (same comment as for Hydrocarbons, aliphatic, unsaturated)
- Thorium-228 [air, unspecified]: 1.72907e-5 kBq; lognormal variance with pedigree 0.3126, pedigree (3,3,3,1,3)
  (same comment as for Hydrocarbons, aliphatic, unsaturated)
- Carbon monoxide, fossil [air, unspecified]: 0.00206659 kg; source FEFCO Corrugated Packaging 2015; lognormal variance with pedigree 0.6526, pedigree (1,3,3,1,1)
  (same comment as for Nitrogen oxides)
- Particulates, > 2.5 um, and < 10um [air, unspecified]: 0.000112933 kg; lognormal variance with pedigree 0.1326, pedigree (3,3,3,1,3)
  (same comment as for Hydrocarbons, aliphatic, unsaturated)
- Fluorine [air, urban air close to ground]: 2.33583e-7 kg; lognormal variance with pedigree 0.0526, pedigree (3,3,3,1,3)
  (same comment as for lignite ash)
- Potassium [air, unspecified]: 0.000112924 kg; lognormal variance with pedigree 0.6626, pedigree (3,3,3,1,3)
  (same comment as for Hydrocarbons, aliphatic, unsaturated)
- Iron [air, unspecified]: 2.95347e-5 kg; lognormal variance with pedigree 0.6626, pedigree (3,3,3,1,3)
  (same comment as for Hydrocarbons, aliphatic, unsaturated)
- Phosphorus [air, unspecified]: 1.63237e-6 kg; lognormal variance with pedigree 0.0526, pedigree (3,3,3,1,3)
  (same comment as for Hydrocarbons, aliphatic, unsaturated)
- Phenol, pentachloro- [air, urban air close to ground]: 3.78403e-11 kg; lognormal variance with pedigree 0.0526, pedigree (3,3,3,1,3)
  (same comment as for lignite ash)
- Calcium [air, unspecified]: 0.000129702 kg; lognormal variance with pedigree 0.0526, pedigree (3,3,3,1,3)
  (same comment as for Hydrocarbons, aliphatic, unsaturated)
- Radon-222 [air, unspecified]: 8.49495e-6 kBq; lognormal variance with pedigree 0.3126, pedigree (3,3,3,1,3)
  (same comment as for Hydrocarbons, aliphatic, unsaturated)
- Acetic acid [air, unspecified]: 1.54916e-7 kg; lognormal variance with pedigree 0.0526, pedigree (3,3,3,1,3)
  Estimation based on fuel input data and emission factors from corresponding fuel combustion ecoinvent datasets. Note(1): Within the process, energy is recovered through the burning of black liquor (4.96GJ/tonne) and bark (3.13GJ/tonne) from the wood. This inherent energy makes up a large part of this process’ energy supply. As it is supplied from within the system boundaries, it does not have a corresponding input exchange. Emissions from the combustion of the internally generated biomass (bark) is approximated with the combustion of wood chips. No comprehensive data for the emissions from the balck liquor recovery process were available. The approximation of this rather complex recovery process with biomass combustion is inappropriate. Therefore emissions from the recovery process are only reflected in the key emission values (particulates, CO2, CO, NOx, Sox, H2S) reported by FEFCO (2015) but not with a complete emission profile. This constitutes a data gap. Note(2): emissions from peat combustion were approximated with those of lignite combustion, LPG with natural gas combustion and diesel with LFO combustion.
  Uncertainty: This emission was calculated from the ecoinvent emission factor of combustion of energy. Some energy sources do not have emission factor (LPG, peat and diesel) so other factors were used ( natural gas, lignite and light fuel oil).

## Sampling procedure
Data were collected from the producers by Cepi ContainerBoard (the European Confederation of Paper Industries) and checked by technical experts.
The data for Semichemical Fluting and Kraftliner jointly represent more than 90% of the total annual production of corrugated base papers from primary fibres in Europe. The data for Semichemical Fluting and Kraftliner also jointly represent 90% of the total consumption of these grades for corrugated board production in Europe. Reference(s): FEFCO. 2015. European Database for Corrugated Board Life Cycle Studies 2015. <http://www.fefco.org/sites/default/files/lca-report-2015.pdf>, accessed 6. February 2018.

## Extrapolations
Additional air emissions from the combustion of fossil fuels estimated based on industrial heating datasets from the ecoinvent database and matched as follows:
light fuel oil: heat production, light fuel oil, at industrial furnace 1MW, Europe without Switzerland
heavy fuel oil: heat production, heavy fuel oil, at industrial furnace 1MW, Europe without Switzerland
hard coal: heat production, at hard coal industrial furnace 1-10MW, Europe without Switzerland
natural gas: heat production, natural gas, at industrial furnace >100kW, Europe without Switzerland
lignite briquettes and peat: heat production, lignite briquette, at stove 5-15kW, Europe without Switzerland
wood chips: heat production, wood chips from industry, at furnace 1000kW, CH
