# coffee green bean production, robusta

Dataset: EcoSpold 2, unit process
Geography: VN
Time period: 2012-01-01 to 2021-12-31
Technology level: current
Classification: ISIC rev.4 ecoinvent: 0127:Growing of beverage crops
Tags: WFLDB
Scenario: Business-as-Usual
System model: Allocation, cut-off by classification
Generated by: Laura Peano
Published in: Nemecek T. 2015
Database: ecoinvent
isCopyrightProtected: true
accessRestrictedTo: 1

## General comment
This dataset represents the production of 1 kg of green coffee beans (Robusta). Robusta is a variety of coffee that has a stronger, harsher taste, with a grain-like overtone and peanutty aftertaste. It contains twice as much caffeine as Arabica beans, and is generally considered to be of inferior quality compared to Arabica. Robusta is mostly grown in Africa, South-East Asia, India and Brazil. The reference flow is the average yield per ha and year, from 2012 - 2014: yield (2500 kg/ha) obtained under irrigated conditions (total amount of water 833 m3/ha). The data are representative for Robusta green coffee beans production in Vietnam used for the export market. Mineral NPK fertiliser input is 331-127-249 kg/ha. No organic fertilisers are applied. Total active ingredients (a.i.) applied as pesticides amount to 0.5 kg a.i./ha.
The dataset was modelled within the project 'World Food LCA database (WFLDB)'. The aim of this project was to provide inventories of a broad variety of agricultural products and processes and to cover for each product at least 50% of the global export market. The export share of coffee produced in Vietnam amounts to 13.1% of the global export (tonnage exported in 2010). The production system regarded in this dataset aimed at representing Robusta green coffee beans produced in Vietnam for the export market.
Statistical data from FAO used to assess land use change is incomplete for Vietnam. The original land use of 93.8% of perennial cropland transformed in the last 20 years is unknown. To avoid a potentially significant underestimation of land use change impacts, the conservative assumption was made that the unknown land transformation share shall be attributed to transformation from forest land (primary and secondary).
PEF-Quality: data quality rating (DQR) = 2.2 (i.e. good quality)
This dataset refers to an average situation; for specific situations exchanges might differ substantially due to site specific parameters.

## Included activities start
This activity starts with the nursery producing fruit tree seedlings, i.e.grafted young trees to be planted.

## Included activities end
This activity ends with the waste treatment after the clearing of the orchard (rooting up the trees). The dataset includes all activities during a year in the productive phase of the orchard including the establishment phase per year of lifetime (20 years), the clearing of the orchard including waste treatment.
The establishment phase of the orchard includes tree nursery, soil cultivation, planting trees, installation of trellis system (posts and wires) and irrigation. Fertiliser and pesticide use in a year of the establishment phase is assumed to be half of the amount of a year in the productive phase.
The productive phase of the orchard includes machine operations, corresponding infrastructure, fuel use and sheds. Machine operations in the productive phase are: soil cultivation (mulching, mowing), fertiliser application, harvesting and irrigation. Further, direct field emissions and land use change are included. At the end of the productive phase the orchard is cleared by rooting up the trees.
The inputs of seedlings, fertilisers and pesticides as well as packaging of fertilisers and pesticides are considered. Green coffee beans are sun-dried. Heavy metal uptake by the crop is considered.

## Technology
Conventional production

## Parameters
- LUC_crop_specific: 1 dimensionless
  This parameter allows to switch between a 'crop specific' and a 'country specific' approach when calculating the LUC of a crop. By default, the chosen approach is 'crop specific', so the value of the parameter is 1. If you want to apply a 'country specific' approach, turn the parameter to 0.
- heavyMetalUptakeSwitch: 1 dimensionless

## Reference product
- coffee, green bean: 1 kg; CPC 01610: Coffee, green; By-product classification allocatable product
  Yield = 2500.0 kg/ha
  production volume 1.25129e9 kg
    Source: FAOSTAT. Average, 2009-2012. Assumption: 100% Robusta
  property price 1.6 EUR2005
    Calculated value based on data from United Nations Commodity Trade Statistics Database (comtrade.un.org). UN comtrade category: 90111 Coffee, not roasted, not decaffeinated. Year: 2005. Using exchange rate of 1EURO = 1.209 USD. Average of price of import into 5 main markets (EU, US, JP, IN and CN).
  property carbon content, non-fossil 0.490083
    calculation: C-content of components according to ecoinvent report No. 15a. Source of composition: Souci, S.W., Fachmann, W., Kraut, H. (Hg.: Bundesminsiterium fur Ernahrung, Landwirtschaft und Forsten, Bonn) 'Die Zusammensetzung der Lebensmittel - Nahrwerttabellen', medpharm Scientific Publishers Stuttgart, CRC Press; 2000.
  property carbon content 0.490083
    carbon content on a dry matter basis (reserved; not for manual entry)
  properties: carbon content, fossil 0, water content 0.102, water in wet mass 0.092559 kg, dry mass 0.907441 kg, wet mass 1 kg, carbon allocation 0.444722 kg

## Inputs from technosphere
- irrigation: 0.332998 m3; source Nedcoffee 2014; lognormal variance with pedigree 0.118177, pedigree (2,1,3,1,1)
  Calculated value: The total amount of water used for irrigation (Personal written communication, Herma Mulder, Nedcoffee., 2014) multiplied by the country-share of irrigation technique (Personal written communication, Herma Mulder, Nedcoffee., 2014). See supporting documentation 'WFLDB-Documentation.pdf' chapter 'Water use for irrigation' (https://ecoquery.ecoinvent.org/File/Reports).
  properties: dry mass 0.11 kg, wet mass 1000 kg, water content 9089.91
- land use change, perennial crop: 0.00034452 ha; = 0.00034452*LUC_crop_specific+0.00011992*(1-LUC_crop_specific)
  Calculated value. Land use change (LUC) combines land transformation areas calculated with the adapted 'Direct Land Use Change Assessment Tool' version 2014 developed by Blonk Consultants and the carbon losses from soil organic carbon (SOC) and vegetation (VEG) as calculated in ecoinvent v3. See 'WFLDB-Guidelines.pdf', available at https://ecoquery.ecoinvent.org/File/Reports.
- compost: 1.176 kg; source Nedcoffee 2014; lognormal variance with pedigree 0.118177, pedigree (2,1,3,1,1)
  Literature value or expert estimation (Personal written communication, Herma Mulder, Nedcoffee., 2014).
  Corresponds to 2940.0 kg/ha
  properties: wet mass 1 kg, lead content 4.9e-5, potassium content 0.01, phosphorus content 0.0035, nickel content 1.63e-5, cadmium content 3.6e-7, zinc content 0.000184, copper content 5.77e-5, carbon content, non-fossil 0.183645, water content 1, mercury content 1.2e-7, dry mass 0.5 kg, chromium content 2.23e-5, nitrogen content 0.014
- diesel, burned in agricultural machinery: 0.10206 MJ; source Nedcoffee 2014; lognormal variance with pedigree 0.118177, pedigree (2,1,3,1,1)
  Literature value or expert estimation (Personal written communication, Herma Mulder, Nedcoffee., 2014). Diesel, for coffee processing (depulping).
- establishing orchard: 0.02 unit; source Nedcoffee 2014
  Literature value or expert estimation (Personal written communication, Herma Mulder, Nedcoffee., 2014). This is the number of trees per ha divided by the lifetime years of the orchard.
- inorganic phosphorus fertiliser, as P2O5: 0.0508 kg; source Nedcoffee 2014
  Calculated based on literature values or expert estimation: The total amount of nutrient (Personal written communication, Herma Mulder, Nedcoffee., 2014) multiplied by the share of fertiliser type (Personal written communication, Herma Mulder, Nedcoffee., 2014). See supporting documentation 'WFLDB-Documentation.pdf' chapter 'Fertiliser application' for L3 and L4 data (https://ecoquery.ecoinvent.org/File/Reports).
  Corresponds to 92.7 kg/ha
  properties: wet mass 1 kg, dry mass 1 kg
- biowaste: -3.35 kg; lognormal variance with pedigree 0.325577, pedigree (5,5,5,5,5)
  production volume 4.19181e9 kg
    Calculated from the reference product amount and production volume
  properties: wet mass 1 kg, carbon content, non-fossil 0.1624, water content 1.5, dry mass 0.4 kg, heating value, net 4.29 MJ
  note on heating value, net: Value taken from the general comment of the treatment dataset.
- fruit tree seedling, for planting: 0.02 unit; source Nedcoffee 2014
  (same comment as for establishing orchard)
  properties: water content 0.73, wet mass 1 kg, carbon content, non-fossil 0.439481, dry mass 0.578035 kg
  note on carbon content, non-fossil: calculation: C-content of components according to ecoinvent report No. 15a. Source of composition: https://ndb.nal.usda.gov/ndb/search/. Unspecific seedling used as proxy.
- cyclic N-compound: 0.0002 kg; lognormal variance with pedigree 0.00784984, pedigree (2,2,3,1,1)
  properties: dry mass 1 kg, wet mass 1 kg, carbon content, fossil 0.641962
- waste wood, untreated: -0.3999 kg; lognormal variance with pedigree 0.118177, pedigree (2,1,3,1,1)
  Wood from trees after 1-2 years of sorrage at the field (20% water) per lifetime year (20 years) of the orchard
  production volume 5.00389e8 kg
    Calculated from the reference product amount and production volume
  properties: wet mass 1 kg, heating value, net 13.99 MJ, water content 0.25, dry mass 0.8 kg, carbon content, non-fossil 0.48632
- lime: 0.64864 kg; source Nedcoffee 2014; lognormal variance with pedigree 0.118177, pedigree (2,1,3,1,1)
  Calculated based on literature values or expert estimation: The total amount of nutrient (Personal written communication, Herma Mulder, Nedcoffee., 2014) multiplied by the share of fertiliser type (Personal written communication, Herma Mulder, Nedcoffee., 2014). See supporting documentation 'WFLDB-Documentation.pdf' chapter 'Fertiliser application' for L3 and L4 data (https://ecoquery.ecoinvent.org/File/Reports).
  Corresponds to 1620.0 kg/ha
  properties: carbon content, fossil 0.120005, dry mass 1 kg, wet mass 1 kg
- packaging, for fertilisers: 1.86288 kg; lognormal variance with pedigree 0.0532, pedigree (4,3,3,5,4)
  Total amount of active substance/s of fertilisers needed for the production of 'coffee, green bean' is calculated to be circa 9.31E-01 kg. Fertiliser/s used in this dataset is/are: 'ammonium nitrate, as N', 'lime', 'nitrogen fertiliser, as N', 'phosphate fertiliser, as P2O5', 'potassium chloride, as K2O'. The total amount of active substance/s is doubled in order to account for the packaging of the dilluted product of fertiliser/s that is/are applied. Therefore, 1.86E+00 kg of packaging for fertilisers is justified with this exchange.
  properties: price 0.0642 EUR2005, wet mass 1 kg, heating value, net 25.01 MJ, dry mass 1 kg, carbon content, fossil 0.825301
  note on carbon content, fossil: Considering a chemical formula (C2H4)n for polyethylene, carbon content-fossil is calculated to be 0.856286 kg of Carbon per kg of dry mass.
- trellis system, wooden poles, soft wood, tar impregnated: 0.0004 ha; lognormal variance with pedigree 0.127577, pedigree (3,1,3,1,3)
  Used to attach trees in orchards with a tree density of more than 500 trees per ha. Trellis system are included as a conservative approach.
- packaging, for pesticides: 0.0004 kg; lognormal variance with pedigree 0.0532, pedigree (4,3,3,5,4)
  Total amount of active substance/s of pesticides needed for the production of coffee, green bean is calculated to be circa 2.00E-04 kg. Pesticide/s used in this dataset is/are: 'cyclic N-compound'. The total amount of active substance/s is doubled in order to account for the packaging of the dilluted product of pesticide/s that is/are applied. Therefore, 4.00E-04 kg of packaging for pesticides is justified with this exchange.
  properties: heating value, net 25.97 MJ, wet mass 1 kg, carbon content, fossil 0.85714, dry mass 1 kg, price 0.0642 EUR2005
- potassium chloride: 0.157657 kg; source Nedcoffee 2014; lognormal variance with pedigree 0.118177, pedigree (2,1,3,1,1)
  The exchange has been updated from 'potassium chloride, as K2O' into 'potassium chloride' and therefore its amount has been scaled (multiplied) from 0.0996 kg by 1.5829 kg of 'potassium chloride' per kg of 'potassium chloride, as K2O'. Original comment of the exchange is: Calculated based on literature values or expert estimation: The total amount of nutrient (Personal written communication, Herma Mulder, Nedcoffee., 2014) multiplied by the share of fertiliser type (Personal written communication, Herma Mulder, Nedcoffee., 2014). See supporting documentation 'WFLDB-Documentation.pdf' chapter 'Fertiliser application' for L3 and L4 data (https://ecoquery.ecoinvent.org/File/Reports).
  Corresponds to 249.0 kg/ha
  properties: wet mass 1 kg, dry mass 1 kg
- inorganic nitrogen fertiliser, as N: 0.04634 kg; source Nedcoffee 2014
  Calculated based on literature values or expert estimation: The total amount of nutrient (Personal written communication, Herma Mulder, Nedcoffee., 2014) multiplied by the share of fertiliser type (Personal written communication, Herma Mulder, Nedcoffee., 2014). See supporting documentation 'WFLDB-Documentation.pdf' chapter 'Fertiliser application' for L3 and L4 data (https://ecoquery.ecoinvent.org/File/Reports).
  Corresponds to 116.0 kg/ha
  properties: wet mass 1 kg, dry mass 1 kg
- planting tree: 0.02 unit; source Nedcoffee 2014
  Literature value expert estimation. This is the number of trees per ha (i.e. 1000 trees/ha) divided by the lifetime years of the orchard (i.e. 20 years).
- ammonium nitrate: 0.245901 kg; source Nedcoffee 2014
  The exchange has been updated from 'ammonium nitrate, as N' into 'ammonium nitrate' and therefore its amount has been scaled (multiplied) from 0.0861 kg by 2.8573 kg of 'ammonium nitrate' per kg of 'ammonium nitrate, as N'. Original comment of the exchange is: Calculated based on literature values or expert estimation: The total amount of nutrient (Personal written communication, Herma Mulder, Nedcoffee., 2014) multiplied by the share of fertiliser type (Personal written communication, Herma Mulder, Nedcoffee., 2014). See supporting documentation 'WFLDB-Documentation.pdf' chapter 'Fertiliser application' for L3 and L4 data (https://ecoquery.ecoinvent.org/File/Reports).
  Corresponds to 215.0 kg/ha
  properties: dry mass 1 kg, wet mass 1 kg

## Inputs from nature
- Energy, gross calorific value, in biomass [natural resource, biotic]: 16.4024 MJ; lognormal variance with pedigree 0.00784984, pedigree (2,2,3,1,1)
- Carbon dioxide, in air [natural resource, in air]: 1.54836 kg; lognormal variance with pedigree 0.00784984, pedigree (2,2,3,1,1)
  CO2 uptake by biomass
- Transformation, from permanent crop, irrigated [natural resource, land]: 0.2 m2; = 10000/2500/20
  Calculated value: 10000 m2 divided by the yield and the life time of the perennial crop (20 years).
- Occupation, permanent crop, irrigated [natural resource, land]: 4.0108 m2*year; lognormal variance with pedigree 0.0140616, pedigree (2,1,3,1,1)
  Related to the duration from harvest date of previous crop to harvest date of main crop.
- Transformation, to permanent crop, irrigated [natural resource, land]: 0.2 m2; = 10000/2500/20
  (same comment as for Transformation, from permanent crop, irrigated)
- Water, unspecified natural origin [natural resource, in ground]: 0.011436 m3; lognormal variance with pedigree 0.118177, pedigree (2,1,3,1,1)
  Literature data or expert estimate: water for depulping

## Emissions to nature
- Zinc [soil, agricultural]: 0.000156675 kg; = 0.0001854315736 + ( - 2.8756654e-05)*heavyMetalUptakeSwitch; source Freiermuth R.  2006
  Comment on mathematicalRelation:
  0.0001854315736 from Calculated value - Freiermuth (2006). See 'WFLDB-Guidelines.pdf', available at https://ecoquery.ecoinvent.org/File/Reports.
  -2.8756654e-05 from Crop, default, heavy metals uptake model
  Heavy metal uptake can be excluded by setting the parameter heavyMetalUptakeSwitch to zero.
- Chromium, ion [water, ground-]: 8.42291e-6 kg; source Freiermuth R.  2006; lognormal variance with pedigree 0.350938, pedigree (2,2,3,1,1)
  Calculated value - Freiermuth (2006). See 'WFLDB-Guidelines.pdf', available at https://ecoquery.ecoinvent.org/File/Reports.
- Carbon dioxide, fossil [air, non-urban air or from high stacks]: 0.285405 kg; lognormal variance with pedigree 0.00784984, pedigree (2,2,3,1,1)
  Calculated value - CO2 emissions from urea and lime. See 'WFLDB-Guidelines.pdf', available at https://ecoquery.ecoinvent.org/File/Reports.
- Cadmium, ion [water, surface water]: 5.39596e-8 kg; source Freiermuth R.  2006; lognormal variance with pedigree 0.350938, pedigree (2,2,3,1,1)
  (same comment as for Chromium, ion)
- Copper, ion [water, ground-]: 1.42015e-6 kg; source Freiermuth R.  2006; lognormal variance with pedigree 0.350938, pedigree (2,2,3,1,1)
  (same comment as for Chromium, ion)
- Cadmium, ion [water, ground-]: 1.93399e-8 kg; source Freiermuth R.  2006; lognormal variance with pedigree 0.350938, pedigree (2,2,3,1,1)
  (same comment as for Chromium, ion)
- Zinc, ion [water, surface water]: 1.08829e-5 kg; source Freiermuth R.  2006; lognormal variance with pedigree 0.350938, pedigree (2,2,3,1,1)
  (same comment as for Chromium, ion)
- Nickel, ion [water, surface water]: 4.18307e-6 kg; source Freiermuth R.  2006; lognormal variance with pedigree 0.350938, pedigree (2,2,3,1,1)
  (same comment as for Chromium, ion)
- Mercury [water, surface water]: 1.30482e-8 kg; source Freiermuth R.  2006; lognormal variance with pedigree 0.350938, pedigree (2,2,3,1,1)
  (same comment as for Chromium, ion)
- Phosphorus [water, surface water]: 0.000121736 kg; source Prasuhn V.  2006; lognormal variance with pedigree 0.169866, pedigree (2,2,3,1,1)
  Calculated value - Prasuhn (2006) and SQCB-Erosion. See 'WFLDB-Guidelines.pdf', available at https://ecoquery.ecoinvent.org/File/Reports.
- Cadmium [soil, agricultural]: 7.38805e-6 kg; = 7.4792324e-06 + ( - 9.118292e-08)*heavyMetalUptakeSwitch; source Freiermuth R.  2006
  Comment on mathematicalRelation:
  7.4792324e-06 from Calculated value - Freiermuth (2006). See 'WFLDB-Guidelines.pdf', available at https://ecoquery.ecoinvent.org/File/Reports.
  -9.118292e-08 from Crop, default, heavy metals uptake model
  Heavy metal uptake can be excluded by setting the parameter heavyMetalUptakeSwitch to zero.
- Water [water, ground-]: 0.035984 m3; lognormal variance with pedigree 0.118177, pedigree (2,1,3,1,1)
  Calculated value - Emission calculated from water balance. See 'WFLDB-Guidelines.pdf', available at https://ecoquery.ecoinvent.org/File/Reports.
- Phosphate [water, surface water]: 0.000405308 kg; source Prasuhn V.  2006; lognormal variance with pedigree 0.169866, pedigree (2,2,3,1,1)
  Calculated value - Prasuhn (2006). See 'WFLDB-Guidelines.pdf', available at https://ecoquery.ecoinvent.org/File/Reports.
- Zinc, ion [water, ground-]: 1.12723e-5 kg; source Freiermuth R.  2006; lognormal variance with pedigree 0.350938, pedigree (2,2,3,1,1)
  (same comment as for Chromium, ion)
- Water [air, non-urban air or from high stacks]: 0.1532 m3; lognormal variance with pedigree 0.118177, pedigree (2,1,3,1,1)
  (same comment as for Water)
- Nickel, ion [water, ground-]: 2.48295e-10 kg; source Freiermuth R.  2006; lognormal variance with pedigree 0.350938, pedigree (2,2,3,1,1)
  (same comment as for Chromium, ion)
- Dinitrogen monoxide [air, non-urban air or from high stacks]: 0.00260885 kg; source IPCC 2006; lognormal variance with pedigree 0.118664, pedigree (2,2,3,1,1)
  Calculated value - IPCC (2006). See 'WFLDB-Guidelines.pdf', available at https://ecoquery.ecoinvent.org/File/Reports.
- Mercury [water, ground-]: 1.1919e-9 kg; source Freiermuth R.  2006; lognormal variance with pedigree 0.350938, pedigree (2,2,3,1,1)
  (same comment as for Chromium, ion)
- Copper, ion [water, surface water]: 7.00858e-6 kg; source Freiermuth R.  2006; lognormal variance with pedigree 0.350938, pedigree (2,2,3,1,1)
  (same comment as for Chromium, ion)
- Nitrogen oxides [air, non-urban air or from high stacks]: 0.00522034 kg; source EEA 2013; lognormal variance with pedigree 0.118664, pedigree (2,2,3,1,1)
  Calculated value - EEA/EMEP (2013). See 'WFLDB-Guidelines.pdf', available at https://ecoquery.ecoinvent.org/File/Reports.
- Lead [water, ground-]: 1.99268e-7 kg; source Freiermuth R.  2006; lognormal variance with pedigree 0.350938, pedigree (2,2,3,1,1)
  (same comment as for Chromium, ion)
- Ammonia [air, non-urban air or from high stacks]: 0.00842064 kg; source EEA 2013; lognormal variance with pedigree 0.0387216, pedigree (2,2,3,1,1)
  Calculated value - EMEP/EEA (2013). See 'WFLDB-Guidelines.pdf', available at https://ecoquery.ecoinvent.org/File/Reports.
- Nickel [soil, agricultural]: 2.20706e-5 kg; = 2.30086612e-05 + ( - 9.380508e-07)*heavyMetalUptakeSwitch; source Freiermuth R.  2006
  Comment on mathematicalRelation:
  2.30086612e-05 from Calculated value - Freiermuth (2006). See 'WFLDB-Guidelines.pdf', available at https://ecoquery.ecoinvent.org/File/Reports.
  -9.380508e-07 from Crop, default, heavy metals uptake model
  Heavy metal uptake can be excluded by setting the parameter heavyMetalUptakeSwitch to zero.
- Mercury [soil, agricultural]: 2.16728e-7 kg; = 2.531468e-07 + ( - 3.6419288e-08)*heavyMetalUptakeSwitch; source Freiermuth R.  2006
  Comment on mathematicalRelation:
  2.531468e-07 from Calculated value - Freiermuth (2006). See 'WFLDB-Guidelines.pdf', available at https://ecoquery.ecoinvent.org/File/Reports.
  Heavy metal uptake can be excluded by setting the parameter heavyMetalUptakeSwitch to zero.
- Lead [soil, agricultural]: 3.15729e-5 kg; = 3.20585532e-05 + ( - 4.8561146e-07)*heavyMetalUptakeSwitch; source Freiermuth R.  2006
  Comment on mathematicalRelation:
  -4.8561146e-07 from Crop, default, heavy metals uptake model
  Heavy metal uptake can be excluded by setting the parameter heavyMetalUptakeSwitch to zero.
- Copper [soil, agricultural]: 3.59237e-5 kg; = 4.1874672e-05 + ( - 5.9509562e-06)*heavyMetalUptakeSwitch; source Freiermuth R.  2006
  Comment on mathematicalRelation:
  4.1874672e-05 from Calculated value - Freiermuth (2006). See 'WFLDB-Guidelines.pdf', available at https://ecoquery.ecoinvent.org/File/Reports.
  -5.9509562e-06 from Crop, default, heavy metals uptake model
  Heavy metal uptake can be excluded by setting the parameter heavyMetalUptakeSwitch to zero.
- Phosphate [water, ground-]: 7.37499e-5 kg; source Prasuhn V.  2006; lognormal variance with pedigree 0.169866, pedigree (2,2,3,1,1)
  (same comment as for Phosphate)
- Chromium [soil, agricultural]: 0.000139426 kg; = 0.0001399158072 + ( - 4.8941e-07)*heavyMetalUptakeSwitch; source Freiermuth R.  2006
  Comment on mathematicalRelation:
  0.0001399158072 from Calculated value - Freiermuth (2006). See 'WFLDB-Guidelines.pdf', available at https://ecoquery.ecoinvent.org/File/Reports.
  -4.8941e-07 from Crop, default, heavy metals uptake model
  Heavy metal uptake can be excluded by setting the parameter heavyMetalUptakeSwitch to zero.
- BOD5, Biological Oxygen Demand [water, ground-]: 0.5 kg; lognormal variance with pedigree 0.118177, pedigree (2,1,3,1,1)
  Calculated value - Expert estimate for organic matter in waste water (0.5 kg BOD5/kg green coffee). See 'WFLDB-Guidelines.pdf', available at https://ecoquery.ecoinvent.org/File/Reports.
- Chromium, ion [water, surface water]: 4.87534e-6 kg; source Freiermuth R.  2006; lognormal variance with pedigree 0.350938, pedigree (2,2,3,1,1)
  (same comment as for Chromium, ion)
- TOC, Total Organic Carbon [water, ground-]: 0.37037 kg
  Calculated value - Best estimates: DOC = TOC ; COD (g O2) = 2.7*TOC (g C) and BOD5 = 0.5*COD. See 'WFLDB-Guidelines.pdf', available at https://ecoquery.ecoinvent.org/File/Reports.
- Water [water, surface water]: 0.15538 m3; lognormal variance with pedigree 0.118177, pedigree (2,1,3,1,1)
  (same comment as for Water)
- DOC, Dissolved Organic Carbon [water, ground-]: 0.37037 kg
  (same comment as for TOC, Total Organic Carbon)
- COD, Chemical Oxygen Demand [water, ground-]: 1 kg
  (same comment as for TOC, Total Organic Carbon)
- Hexaconazole [soil, agricultural]: 0.0002 kg; lognormal variance with pedigree 0.0387216, pedigree (2,2,3,1,1)
  Calculated value - 100% emission in soil. See 'WFLDB-Guidelines.pdf', available at https://ecoquery.ecoinvent.org/File/Reports.
- Nitrate [water, ground-]: 0.104243 kg; source Faist Emmenegger M. 2009; lognormal variance with pedigree 0.169866, pedigree (2,2,3,1,1)
- Lead [water, surface water]: 3.75814e-6 kg; source Freiermuth R.  2006; lognormal variance with pedigree 0.350938, pedigree (2,2,3,1,1)
  (same comment as for Chromium, ion)

## Sampling procedure
WFLDB Methodological Guidelines for the Life Cycle Inventory of Agricultural Products in the latest version, available at: https://ecoquery.ecoinvent.org/File/Reports. Data sources: Data were categorised from level 0 (L0) to level (L4) as follows: L0 = estimate, proxy; L1 = statistical data (e.g. FAOSTAT); L2 = L1 adapted to crop and country; L3 = literature data or L1 resp. L2 data approved by experts; medium detailing (i.e. kg of total N-fertiliser); L4 = L3 data of high detailing (i.e. portion N-fertiliser types).In this dataset data were obtained for yield: L3; Fertilisers: L4; Pesticides: L1; Machinery: L0; Irrigation: L2. For information regarding the calculation of individual exchanges see supporting documentation WFLDB-Documentation.pdf

## Extrapolations
This dataset has been extrapolated from year 2014 to the year of the calculation (2021). The uncertainty has been adjusted accordingly.

## Review by Assumpció ANTON 2016-05-30
Be aware that the use of statistics in input calculations could provide some specific inputs not common for specific crops, this should be corrected if better information is available and better reflexed in DQR . Currently, I would dissent for some of good marks provided, being a revision of criteria applied advisable.

Pesticides will need to be amended periodically checking for update of pesticides' ban.
