# steel production, electric, low-alloyed

Dataset: EcoSpold 2, unit process
Geography: AT
Time period: 2017-01-01 to 2021-12-31
Technology level: current
Classification: EcoSpold01Categories: metals/extraction
Classification: ISIC rev.4 ecoinvent: 2410:Manufacture of basic iron and steel
Scenario: Business-as-Usual
System model: Allocation, cut-off by classification
Share of production covered: 100 %
Generated by: Alexander Passer
Published in: Truger, Barbara 2020
Database: ecoinvent
isCopyrightProtected: true
accessRestrictedTo: 1

## General comment
This dataset describes the steel production for reinforcing steel in Austria from secondary steel (iron scrap) in an electric arc furnace. The iron scrap is melted in the electric arc furnace and alloys are added. After the melting process in the furnace, the steel is cast into billets. The billets can then be hot rolled and used as reinforcing steel in construction. The hot rolling is not included in this dataset.
There are three co-products that are used in other industries: Slag is sold as material in road construction. Scale (material formed through oxidation of the cooling billet) can be used in steel production, cement production, and refractory production. Heat is used in the communal district heating grid.

## Included activities start
The electric arc furnace production route of reinforcing steel starts with the arrival of iron scrap in the steel factory.

## Included activities end
Steel making process and casting into billets.

## Geography
The dataset is representative for Austria.

## Technology
The electric arc furnace production route of reinforcing steel starts with the arrival of iron scrap in the steel factory. The iron scrap is melted in the electric arc furnace and alloys (approximately 1% manganese (Mn), 0.2% silicon (Si) and in some cases microalloy (for example 0.01% vanadium (V)). After the melting process in the furnace, the steel is cast into billets. These billets are processed by hot rolling into rebars and coils for reinforcing steel. Rebars have a diameter of 8-40mm and a length of 6-30m. Coils have a diameter of 8-16mm and weigh 1.7, 3.0 or 5.0. The average steel grade is B550 or B500 (550 or 500 MPa).

## Time period
The process is expected to be valid for the next 10 years. The energy efficiency and emissions may improve in the next years.

## Reference product
- heat, district or industrial, other than natural gas: 1 MJ; = heat_prod/ steel_prod; By-product classification allocatable product; CPC 17300: Steam and hot water; pedigree (1,1,1,1,1)
  Based on measured value (production volume). Heat (high temperature) is used in the communal district heating grid.
  production volume 2.10074e8 MJ; name heat_prod
    Production volume in the factory in 2017.
  property price 0.0106 EUR2005
    Average European district heat price from Ecoheatcool and Euroheat 2005-2006, Ecoheat Work package 1: The European heat market. Final report. 10.6 EUR/GJ i s the price of district heat. http://www.solarthermalworld.org/files/Ecoheatcool%20WP1%20Web.pdf?download
  property corresponding fuel use, propane, furnace >100kW 1.05263 MJ; = 1/0.95
    Lower heating value of the fuel input related to the heat/electricity output, taken directly from ecoinvent v3.0 dataset "heat production, natural gas, at industrial furnace >100kW, GLO 2000".
  property true value 0.00534133
    allocation property applied in "true value" allocation // value calculated from revenue
  properties: heating value, net 1 MJ
- steel, low-alloyed: 0 kg; name RP1; By-product classification allocatable product; CPC 41122: Alloy steel in ingots or other primary forms and semi-finished products of alloy steel; pedigree (1,1,1,1,1)
  production volume 4.16898e8 kg; name steel_prod
    Production volume in the factory in 2017.
  property price 0.468 EUR2005; name RP1_price_EUR2005
    Calculated from EU prices by use of exchange rates.
  property heating value, net 0 MJ
    Non combustible products are assumed to have an LHV equal to zero (0).
  property carbon content 0.005
    carbon content on a dry matter basis (reserved; not for manual entry)
  property true value 0.468; name RP1_true_value
    allocation property applied in "true value" allocation // value calculated from revenue
  properties: water in wet mass 0 kg, water content 0, wet mass 1 kg, carbon content, fossil 0.005, carbon content, non-fossil 0, dry mass 1 kg, carbon allocation 0.005 kg

## By-products
- iron scrap, unsorted: 0 kg; CPC 39310: Slag, dross, scalings and other waste from the manufacture of iron or steel; By-product classification Recyclable; pedigree (1,1,1,1,1)
  Based on measured value (production volume). During the cooling of the billet, there is a material loss through oxidation at the surface. This material loss is called scale. Scale is first stored and then sold. It can be used in steel production, cement production, and refractory production. Iron scrap is used as a proxy and represents the mill scale used internally.
  production volume 0 kg; name scale_prod
    Production volume in the factory in 2017.
  properties: water content 0.191327, price 0.149 EUR2005, water in wet mass 0.1606 kg, carbon content, fossil 5.1e-6, dry mass 0.8394 kg, carbon content, non-fossil 0, wet mass 1 kg, carbon content 5.1e-6, carbon allocation 4.28094e-6 kg
- electric arc furnace slag, for recovery: 0 kg; CPC 39310: Slag, dross, scalings and other waste from the manufacture of iron or steel; By-product classification Recyclable; pedigree (1,1,1,1,1)
  Based on measured value (production volume). Slag is sold als material in road construction.
  production volume 0 kg
    Production volume in the factory in 2017.
  property titanium content 0.00359799
    The value of 'titanium content' is documented in Turner & Symeonidis, 2020.
    Reference: Turner David & Symeonidis Avraam, 2020, Life cycle inventories of the treatment of iron and steelmaking by-products, ecoinvent association, Zürich, Switzerland
  property mercury content 4.0201e-8
    The value of 'mercury content' is documented in Turner & Symeonidis, 2020.
    Reference: Turner David & Symeonidis Avraam, 2020, Life cycle inventories of the treatment of iron and steelmaking by-products, ecoinvent association, Zürich, Switzerland
  property nickel content 0.000533668
    The value of 'nickel content' is documented in Turner & Symeonidis, 2020.
    Reference: Turner David & Symeonidis Avraam, 2020, Life cycle inventories of the treatment of iron and steelmaking by-products, ecoinvent association, Zürich, Switzerland
  property arsenic content 1.26633e-6
    The value of 'arsenic content' is documented in Turner & Symeonidis, 2020.
    Reference: Turner David & Symeonidis Avraam, 2020, Life cycle inventories of the treatment of iron and steelmaking by-products, ecoinvent association, Zürich, Switzerland
  property magnesium content 0.0431156
    The value of 'magnesium content' is documented in Turner & Symeonidis, 2020.
    Reference: Turner David & Symeonidis Avraam, 2020, Life cycle inventories of the treatment of iron and steelmaking by-products, ecoinvent association, Zürich, Switzerland
  property sulfur content 0.00126633
    The value of 'sulfur content' is documented in Turner & Symeonidis, 2020.
    Reference: Turner David & Symeonidis Avraam, 2020, Life cycle inventories of the treatment of iron and steelmaking by-products, ecoinvent association, Zürich, Switzerland
  property tin content 1.00503e-5
    The value of 'tin content' is documented in Turner & Symeonidis, 2020.
    Reference: Turner David & Symeonidis Avraam, 2020, Life cycle inventories of the treatment of iron and steelmaking by-products, ecoinvent association, Zürich, Switzerland
  property aluminium content 0.0432161
    The value of 'aluminium content' is documented in Turner & Symeonidis, 2020.
    Reference: Turner David & Symeonidis Avraam, 2020, Life cycle inventories of the treatment of iron and steelmaking by-products, ecoinvent association, Zürich, Switzerland
  property copper content 0.00110553
    The value of 'copper content' is documented in Turner & Symeonidis, 2020.
    Reference: Turner David & Symeonidis Avraam, 2020, Life cycle inventories of the treatment of iron and steelmaking by-products, ecoinvent association, Zürich, Switzerland
  property potassium content 0.00355779
    The value of 'potassium content' is documented in Turner & Symeonidis, 2020.
    Reference: Turner David & Symeonidis Avraam, 2020, Life cycle inventories of the treatment of iron and steelmaking by-products, ecoinvent association, Zürich, Switzerland
  property fluorine content 0.0201005
    The value of 'fluorine content' is documented in Turner & Symeonidis, 2020.
    Reference: Turner David & Symeonidis Avraam, 2020, Life cycle inventories of the treatment of iron and steelmaking by-products, ecoinvent association, Zürich, Switzerland
  property thallium content 1.10553e-5
    The value of 'thallium content' is documented in Turner & Symeonidis, 2020.
    Reference: Turner David & Symeonidis Avraam, 2020, Life cycle inventories of the treatment of iron and steelmaking by-products, ecoinvent association, Zürich, Switzerland
  property molybdenum content 0.000507538
    The value of 'molybdenum content' is documented in Turner & Symeonidis, 2020.
    Reference: Turner David & Symeonidis Avraam, 2020, Life cycle inventories of the treatment of iron and steelmaking by-products, ecoinvent association, Zürich, Switzerland
  property antimony content 4.0201e-6
    The value of 'antimony content' is documented in Turner & Symeonidis, 2020.
    Reference: Turner David & Symeonidis Avraam, 2020, Life cycle inventories of the treatment of iron and steelmaking by-products, ecoinvent association, Zürich, Switzerland
  property lead content 0.00081005
    The value of 'lead content' is documented in Turner & Symeonidis, 2020.
    Reference: Turner David & Symeonidis Avraam, 2020, Life cycle inventories of the treatment of iron and steelmaking by-products, ecoinvent association, Zürich, Switzerland
  property chromium content 0.0116583
    The value of 'chromium content' is documented in Turner & Symeonidis, 2020.
    Reference: Turner David & Symeonidis Avraam, 2020, Life cycle inventories of the treatment of iron and steelmaking by-products, ecoinvent association, Zürich, Switzerland
  property zinc content 0.00108543
    The value of 'zinc content' is documented in Turner & Symeonidis, 2020.
    Reference: Turner David & Symeonidis Avraam, 2020, Life cycle inventories of the treatment of iron and steelmaking by-products, ecoinvent association, Zürich, Switzerland
  property silicon content 0.0912563
    The value of 'silicon content' is documented in Turner & Symeonidis, 2020.
    Reference: Turner David & Symeonidis Avraam, 2020, Life cycle inventories of the treatment of iron and steelmaking by-products, ecoinvent association, Zürich, Switzerland
  property carbon content, fossil 0.0041407
    The value of 'carbon content, fossil' is documented in Turner & Symeonidis, 2020.
    Reference: Turner David & Symeonidis Avraam, 2020, Life cycle inventories of the treatment of iron and steelmaking by-products, ecoinvent association, Zürich, Switzerland
  property phosphorus content 0.00201005
    The value of 'phosphorus content' is documented in Turner & Symeonidis, 2020.
    Reference: Turner David & Symeonidis Avraam, 2020, Life cycle inventories of the treatment of iron and steelmaking by-products, ecoinvent association, Zürich, Switzerland
  property calcium content 0.244221
    The value of 'calcium content' is documented in Turner & Symeonidis, 2020.
    Reference: Turner David & Symeonidis Avraam, 2020, Life cycle inventories of the treatment of iron and steelmaking by-products, ecoinvent association, Zürich, Switzerland
  property barium content 0.00109548
    The value of 'barium content' is documented in Turner & Symeonidis, 2020.
    Reference: Turner David & Symeonidis Avraam, 2020, Life cycle inventories of the treatment of iron and steelmaking by-products, ecoinvent association, Zürich, Switzerland
  property oxygen content 0.400947
    The value of 'oxygen content' is documented in Turner & Symeonidis, 2020.
    Reference: Turner David & Symeonidis Avraam, 2020, Life cycle inventories of the treatment of iron and steelmaking by-products, ecoinvent association, Zürich, Switzerland
  property heating value, net 0 MJ
    Non combustible products are assumed to have an LHV equal to zero (0).
  property manganese content 0.0244221
    The value of 'manganese content' is documented in Turner & Symeonidis, 2020.
    Reference: Turner David & Symeonidis Avraam, 2020, Life cycle inventories of the treatment of iron and steelmaking by-products, ecoinvent association, Zürich, Switzerland
  property silver content 8.44221e-6
    The value of 'silver content' is documented in Turner & Symeonidis, 2020.
    Reference: Turner David & Symeonidis Avraam, 2020, Life cycle inventories of the treatment of iron and steelmaking by-products, ecoinvent association, Zürich, Switzerland
  property iron content 0.098593
    The value of 'iron content' is documented in Turner & Symeonidis, 2020.
    Reference: Turner David & Symeonidis Avraam, 2020, Life cycle inventories of the treatment of iron and steelmaking by-products, ecoinvent association, Zürich, Switzerland
  property cobalt content 4.82412e-6
    The value of 'cobalt content' is documented in Turner & Symeonidis, 2020.
    Reference: Turner David & Symeonidis Avraam, 2020, Life cycle inventories of the treatment of iron and steelmaking by-products, ecoinvent association, Zürich, Switzerland
  property beryllium content 1.10553e-6
    The value of 'beryllium content' is documented in Turner & Symeonidis, 2020.
    Reference: Turner David & Symeonidis Avraam, 2020, Life cycle inventories of the treatment of iron and steelmaking by-products, ecoinvent association, Zürich, Switzerland
  property selenium content 1.80905e-5
    The value of 'selenium content' is documented in Turner & Symeonidis, 2020.
    Reference: Turner David & Symeonidis Avraam, 2020, Life cycle inventories of the treatment of iron and steelmaking by-products, ecoinvent association, Zürich, Switzerland
  property cadmium content 7.63819e-6
    The value of 'cadmium content' is documented in Turner & Symeonidis, 2020.
    Reference: Turner David & Symeonidis Avraam, 2020, Life cycle inventories of the treatment of iron and steelmaking by-products, ecoinvent association, Zürich, Switzerland
  property sodium content 0.00132663
    The value of 'sodium content' is documented in Turner & Symeonidis, 2020.
    Reference: Turner David & Symeonidis Avraam, 2020, Life cycle inventories of the treatment of iron and steelmaking by-products, ecoinvent association, Zürich, Switzerland
  property carbon content, non-fossil 0
    The value of 'carbon content, non-fossil' is documented in Turner & Symeonidis, 2020.
    Reference: Turner David & Symeonidis Avraam, 2020, Life cycle inventories of the treatment of iron and steelmaking by-products, ecoinvent association, Zürich, Switzerland
  property vanadium content 0.00136683
    The value of 'vanadium content' is documented in Turner & Symeonidis, 2020.
    Reference: Turner David & Symeonidis Avraam, 2020, Life cycle inventories of the treatment of iron and steelmaking by-products, ecoinvent association, Zürich, Switzerland
  property carbon content 0.0041407
    carbon content on a dry matter basis (reserved; not for manual entry)
  properties: water in wet mass 0.005 kg, wet mass 1 kg, price 0 EUR2005, water content 0.00502513, dry mass 0.995 kg, carbon allocation 0.00412 kg

## Inputs from technosphere
- nitrogen, liquid: 6.48212e-5 kg; lognormal variance with pedigree 0.0026, pedigree (1,1,3,1,1)
  Measured value
  properties: wet mass 1 kg, dry mass 1 kg
- inert waste, for final disposal: -0.000166519 kg; = (waste_prod/ steel_prod)*-1; lognormal variance with pedigree 0.0032, pedigree (2,1,3,1,1)
  Based on measured value (production volume).
  EcoSpold01Location=CH
  production volume 3.1e6 kg; name waste_prod
    Production volume in the factory in 2017
  properties: wet mass 1 kg, water content 0.00502513, dry mass 0.995 kg
- wastewater, average: -1.74759e-7 m3; = (wastewater/ steel_prod)*-1; lognormal variance with pedigree 0.0032, pedigree (2,1,3,1,1)
  Calculation based on measured value
  production volume 3253.4 m3; name wastewater
    Calculated from production volume of reference product using the relative outputs.
  properties: dry mass 0.346837 kg, carbon content, non-fossil 0.194039, wet mass 1000 kg, water content 2882.2
  note on carbon content, non-fossil: 0.0673 kg TOC/m3 (Tab A.17, ecoinvent v2.2 report 13_I). TOC was considered as Total Carbon.
- fluorspar, 97% purity: 1.50264e-5 kg; lognormal variance with pedigree 0.0026, pedigree (1,1,3,1,1)
  Measured value
  properties: wet mass 1 kg, dry mass 1 kg
- iron scrap, unsorted: 0.0250813 kg; lognormal variance with pedigree 0.0026, pedigree (1,1,3,1,1)
  Measured value
  properties: wet mass 1 kg, dry mass 1 kg
- anode, for metal electrolysis: 4.06675e-5 kg; lognormal variance with pedigree 0.0026, pedigree (1,1,3,1,1)
  EcoSpold01Location=RER
  Measured value
  properties: dry mass 1 kg, wet mass 1 kg, carbon content, fossil 0.98
  note on carbon content, fossil: The main component of the anode is carbon, coming from bitumen and petroleum coke (ecoinvent v2.2 report 10). The C content in those components of the anode has been taken into account to calculate the anode final C content.
- refractory, basic, packed: 0.000241721 kg; lognormal variance with pedigree 0.0026, pedigree (1,1,3,1,1)
  Measured value
  EcoSpold01Location=DE
  properties: dry mass 1 kg, wet mass 1 kg
- electric arc furnace converter: 8.9576e-13 unit; lognormal variance with pedigree 0.5, pedigree (5,5,5,5,5)
  EcoSpold01Location=RER
  Extrapolated value from dataset "steel production, electric, low-alloyed [RER]" . activityLink introduced to establish a direct link to the corresponding regional supply of this product
- ferrosilicon: 5.60298e-5 kg; lognormal variance with pedigree 0.0026, pedigree (1,1,3,1,1)
  Measured value
  properties: wet mass 1 kg, heating value, net 3.03 MJ, carbon content, fossil 0.1, dry mass 1 kg
- lubricating oil: 3.06798e-6 kg; lognormal variance with pedigree 0.0026, pedigree (1,1,3,1,1)
  Measured value
  properties: carbon content, fossil 0.75, dry mass 1 kg, wet mass 1 kg, heating value, net 40.2 MJ
  note on carbon content, fossil: Lubricating oil is produced from diesel. C-content/dry mass of fats and oils considered 75%, from: ecoinvent v2.2 report, n 15a, pg 40
  note on heating value, net: Literature value, Source: IPCC 2006, 2006 IPCC Guidelines for National Greenhouse Gas Inventories, Prepared by the National Greenhouse Gas Inventories Programme, Eggleston H.S., Buendia L., Miwa K., Ngara T. and Tanabe K. (eds). Published: IGES, Japan
- hard coal: 0.000202061 kg; lognormal variance with pedigree 0.0026, pedigree (1,1,3,1,1)
  EcoSpold01Location=UCTE
  Measured value
  properties: dry mass 0.94 kg, water content 0.0638298, heating value, net 27.91 MJ, carbon content, fossil 0.9752, wet mass 1 kg
  note on heating value, net: Based on the Characterization factor of Hard coal in the CED method
  note on carbon content, fossil: C content 75-94% (specified in Tab 1.1, report 6, part VI). A mean content of 0.845 kg C/ kg dry hard coal was considered
- natural gas, high pressure: 0.000204032 m3; lognormal variance with pedigree 0.0026, pedigree (1,1,3,1,1)
  Measured value
  EcoSpold01Location=RER
  properties: heating value, gross 39 MJ, wet mass 0.84 kg, carbon content, fossil 0.602381, heating value, net 39 MJ, dry mass 0.84 kg
  note on carbon content, fossil: An average C content of 0.506 kg C/ m3 has been assumed (this average has been calculated using data in Tab 3.5, ecoinvent v2.2 report 6_V
  note on heating value, net: Literature value, Source: United Nations Statistics Division (2018) International Recommendations for Energy Statistics (IRES). Available at: http://unstats.un.org/unsd/statcom/doc11/BG-IRES.pdf.
- calcium carbide, technical grade: 3.09037e-6 kg; lognormal variance with pedigree 0.0026, pedigree (1,1,3,1,1)
  Measured value
  properties: dry mass 1 kg, carbon content, fossil 0.375, heating value, net 11.36 MJ, wet mass 1 kg
- aluminium, primary, ingot: 4.25486e-7 kg; lognormal variance with pedigree 0.0026, pedigree (1,1,3,1,1)
  Measured value
  Uncertainty: extrapolated from table 10.3 in "Overview and methodology. Data quality guidelinefor the ecoinvent database version 3."
  properties: wet mass 1 kg, dry mass 1 kg
- ferromanganese, high-coal, 74.5% Mn: 0.000209205 kg; lognormal variance with pedigree 0.0026, pedigree (1,1,3,1,1)
  Measured value
  properties: dry mass 1 kg, carbon content, fossil 0.075, heating value, net 2.27 MJ, wet mass 1 kg
- quicklime, in pieces, loose: 0.000676858 kg; lognormal variance with pedigree 0.0026, pedigree (1,1,3,1,1)
  Measured value
  EcoSpold01Location=CH
  properties: wet mass 1 kg, dry mass 0.99 kg, water content 0.010101
- argon, liquid: 2.10503e-6 kg; lognormal variance with pedigree 0.0026, pedigree (1,1,3,1,1)
  Measured value
  properties: dry mass 1 kg, wet mass 1 kg
- electric arc furnace dust: -0.000359896 kg; = (dust_prod/ steel_prod)*-1; lognormal variance with pedigree 0.0032, pedigree (2,1,3,1,1)
  EcoSpold01Location=CH
  Based on measured value (production volume).
  production volume 6.7e6 kg; name dust_prod
    Production volume in the factory in 2017.
  properties: dry mass 0.846 kg, water content 0.182033, wet mass 1 kg, carbon content, fossil 0.01339
- sulfur dioxide, liquid: 8.39775e-6 kg; lognormal variance with pedigree 0.0026, pedigree (1,1,3,1,1)
  Measured value
  properties: dry mass 1 kg, wet mass 1 kg
- silica sand: 2.05801e-5 kg; lognormal variance with pedigree 0.0026, pedigree (1,1,3,1,1)
  Measured value
  properties: dry mass 0.99 kg, water content 0.010101, wet mass 1 kg
- oxygen, liquid: 0.00108601 kg; lognormal variance with pedigree 0.0026, pedigree (1,1,3,1,1)
  EcoSpold01Location=RER
  Measured value
  properties: wet mass 1 kg, dry mass 1 kg
- electricity, high voltage: 0.010328 kWh; lognormal variance with pedigree 0.0026, pedigree (1,1,3,1,1)
  Measured value
- iron scrap, unsorted: -0.000106357 kg; lognormal variance with pedigree 0.0032, pedigree (2,1,3,1,1)
  (same comment as for iron scrap, unsorted)
  production volume 1.98e6 kg
  properties: water content 0.191327, price 0.149 EUR2005, carbon content, fossil 5.1e-6, dry mass 0.8394 kg, wet mass 1 kg
- electric arc furnace slag, for recovery: -0.00389439 kg; lognormal variance with pedigree 0.0032, pedigree (2,1,3,1,1)
  (same comment as for electric arc furnace slag, for recovery)
  production volume 7.25e7 kg
  properties: magnesium content 0.0431156, wet mass 1 kg, aluminium content 0.0432161, fluorine content 0.0201005, water content 0.00502513, dry mass 0.995 kg, chromium content 0.0116583, silicon content 0.0912563, calcium content 0.244221, oxygen content 0.400947, manganese content 0.0244221, iron content 0.098593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
  note on magnesium content: The value of 'magnesium content' is documented in Turner & Symeonidis, 2020. Reference: Turner David & Symeonidis Avraam, 2020, Life cycle inventories of the treatment of iron and steelmaking by-products, ecoinvent association, Zürich, Switzerland
  note on aluminium content: The value of 'aluminium content' is documented in Turner & Symeonidis, 2020. Reference: Turner David & Symeonidis Avraam, 2020, Life cycle inventories of the treatment of iron and steelmaking by-products, ecoinvent association, Zürich, Switzerland
  note on fluorine content: The value of 'fluorine content' is documented in Turner & Symeonidis, 2020. Reference: Turner David & Symeonidis Avraam, 2020, Life cycle inventories of the treatment of iron and steelmaking by-products, ecoinvent association, Zürich, Switzerland
  note on chromium content: The value of 'chromium content' is documented in Turner & Symeonidis, 2020. Reference: Turner David & Symeonidis Avraam, 2020, Life cycle inventories of the treatment of iron and steelmaking by-products, ecoinvent association, Zürich, Switzerland
  note on silicon content: The value of 'silicon content' is documented in Turner & Symeonidis, 2020. Reference: Turner David & Symeonidis Avraam, 2020, Life cycle inventories of the treatment of iron and steelmaking by-products, ecoinvent association, Zürich, Switzerland
  note on calcium content: The value of 'calcium content' is documented in Turner & Symeonidis, 2020. Reference: Turner David & Symeonidis Avraam, 2020, Life cycle inventories of the treatment of iron and steelmaking by-products, ecoinvent association, Zürich, Switzerland
  note on oxygen content: The value of 'oxygen content' is documented in Turner & Symeonidis, 2020. Reference: Turner David & Symeonidis Avraam, 2020, Life cycle inventories of the treatment of iron and steelmaking by-products, ecoinvent association, Zürich, Switzerland
  note on manganese content: The value of 'manganese content' is documented in Turner & Symeonidis, 2020. Reference: Turner David & Symeonidis Avraam, 2020, Life cycle inventories of the treatment of iron and steelmaking by-products, ecoinvent association, Zürich, Switzerland
  note on iron content: The value of 'iron content' is documented in Turner & Symeonidis, 2020. Reference: Turner David & Symeonidis Avraam, 2020, Life cycle inventories of the treatment of iron and steelmaking by-products, ecoinvent association, Zürich, Switzerland

## Inputs from nature
- Water, cooling, unspecified natural origin [natural resource, in water]: 2.86887e-6 m3; name water_cooling_UNO_input; source Byers, W. 2003; lognormal variance with pedigree 0.0032, pedigree (2,1,3,1,1)
  Measured value
  property carbon content, fossil 0.0104329; name C_content_fossil
  property dry mass 0.1101 kg; name DM
  property wet mass 1000 kg; name WM
  property water content 9081.65; name water_content
  property water in wet mass 999.89 kg; name WWM
  property carbon content, non-fossil 0; name C_content_non_fossil

## Emissions to nature
- Arsenic [air, unspecified]: 4.63556e-10 kg; lognormal variance with pedigree 0.6526, pedigree (2,1,3,1,1)
  Calculated value, based on measurements at dust separation at factory
  Uncertainty: extrapolated from table 10.3 in "Overview and methodology. Data quality guidelinefor the ecoinvent database version 3."
- Copper, ion [water, unspecified]: 2.9784e-12 kg; lognormal variance with pedigree 0.6526, pedigree (2,1,3,1,1)
  Calculated value, based on emission measurements
  Uncertainty: extrapolated from table 10.3 in "Overview and methodology. Data quality guidelinefor the ecoinvent database version 3."
- Water [air, unspecified]: 2.69411e-6 m3; name water_to_air_unspecified_1; = water_cooling_UNO_input-(wastewater/steel_prod); lognormal variance with pedigree 0.0426, pedigree (2,1,3,1,1)
  Calculated value based on measured water input and output values.
  property fraction, origin: salt water 0; name fraction_origin_salt_water
  property fraction, origin: fresh water 0; name fraction_origin_fresh_water
  property fraction, origin: unspecified 1; name fraction_origin_unspecified
- Tellurium [air, unspecified]: 5.48653e-10 kg; lognormal variance with pedigree 0.6526, pedigree (2,1,3,1,1)
  (same comment as for Arsenic)
- Nickel, ion [water, unspecified]: 6.65101e-12 kg; lognormal variance with pedigree 0.6526, pedigree (2,1,3,1,1)
  (same comment as for Copper, ion)
- Zinc, ion [water, unspecified]: 8.39775e-12 kg; lognormal variance with pedigree 0.6526, pedigree (2,1,3,1,1)
  (same comment as for Copper, ion)
- Particulates, > 2.5 um, and < 10um [air, unspecified]: 2.46334e-8 kg; lognormal variance with pedigree 0.1226, pedigree (2,1,3,1,1)
  Calculated value, based on measurements at dust separation at factory
- Lead [air, unspecified]: 2.73207e-10 kg; lognormal variance with pedigree 0.6526, pedigree (2,1,3,1,1)
  Calculated value, based on measurements at dust separation at factory
- Dioxins, measured as 2,3,7,8-tetrachlorodibenzo-p-dioxin [air, unspecified]: 1.69522e-14 kg; lognormal variance with pedigree 0.3026, pedigree (2,1,3,1,1)
  Calculated value, based on measurements at dust separation at factory
- Phosphorus [water, unspecified]: 1.9214e-11 kg; lognormal variance with pedigree 0.0426, pedigree (2,1,3,1,1)
  (same comment as for Copper, ion)
- Titanium [air, unspecified]: 2.73207e-10 kg; lognormal variance with pedigree 0.0426, pedigree (2,1,3,1,1)
  (same comment as for Arsenic)
- Chromium [air, unspecified]: 6.83017e-10 kg; lognormal variance with pedigree 0.6526, pedigree (2,1,3,1,1)
  Calculated value, based on measurements at dust separation at factory
- Chromium VI [air, unspecified]: 2.41855e-10 kg; lognormal variance with pedigree 0.6526, pedigree (2,1,3,1,1)
  (same comment as for Arsenic)
- Sulfur dioxide [air, unspecified]: 1.04132e-5 kg; lognormal variance with pedigree 0.0032, pedigree (2,1,3,1,1)
  Calculated value, based on measurements at dust separation at factory
- Sulfate [water, unspecified]: 4.99386e-8 kg; lognormal variance with pedigree 0.0426, pedigree (2,1,3,1,1)
  (same comment as for Copper, ion)
- Vanadium [air, unspecified]: 6.83017e-10 kg; lognormal variance with pedigree 0.6526, pedigree (2,1,3,1,1)
  (same comment as for Arsenic)
- Nitrogen oxides [air, unspecified]: 2.50813e-6 kg; lognormal variance with pedigree 0.0426, pedigree (2,1,3,1,1)
  Calculated value, based on measurements at dust separation at factory
- Carbon dioxide, fossil [air, unspecified]: 0.00120763 kg; = 22481867/steel_prod; lognormal variance with pedigree 0.0026, pedigree (1,1,3,1,1)
  (same comment as for aluminium, primary, ingot)
- Copper [air, unspecified]: 6.83017e-10 kg; lognormal variance with pedigree 0.6526, pedigree (2,1,3,1,1)
  Calculated value, based on measurements at dust separation at factory
- Selenium [air, unspecified]: 2.73207e-10 kg; lognormal variance with pedigree 0.6526, pedigree (2,1,3,1,1)
  (same comment as for Arsenic)
- Cadmium [air, unspecified]: 2.73207e-10 kg; lognormal variance with pedigree 0.6526, pedigree (2,1,3,1,1)
  Calculated value, based on measurements at dust separation at factory
- Cobalt [air, unspecified]: 2.73207e-10 kg; lognormal variance with pedigree 0.6526, pedigree (2,1,3,1,1)
  (same comment as for Arsenic)
- Nickel [air, unspecified]: 6.83017e-10 kg; lognormal variance with pedigree 0.6526, pedigree (2,1,3,1,1)
  Calculated value, based on measurements at dust separation at factory
- Manganese [air, unspecified]: 6.83017e-10 kg; lognormal variance with pedigree 0.6526, pedigree (2,1,3,1,1)
  (same comment as for Arsenic)
- Antimony [air, unspecified]: 4.0981e-10 kg; lognormal variance with pedigree 0.6526, pedigree (2,1,3,1,1)
  (same comment as for Arsenic)
- Tin [air, unspecified]: 6.83017e-10 kg; lognormal variance with pedigree 0.6526, pedigree (2,1,3,1,1)
  (same comment as for Arsenic)

## Sampling procedure
The data was provided directly by the steel production company. For the year 2017, the input material flows were given in absolute numbers and per tonne of produced steel. Emission data were measured in the factory's dust separation unit and extrapolated to emissions per year and per tonne of steel. CO2-emissions were calculated separately based on carbon bearing inputs. The CO2-calculation was approved by the Technical Inspection Agency (TÜV) and used as a basis for emission trading.

## Extrapolations
The emissions to air were extrapolated from three measurements to cover the whole year 2017.
In case the company did not provide accurate data, data from the dataset "steel production, electric, low-alloyed [RER]" were used.
