# forwarding, forwarder

Dataset: EcoSpold 2, unit process
Geography: RER
Time period: 2012-01-01 to 2021-12-31
Technology level: current
Classification: ISIC rev.4 ecoinvent: 0220:Logging
Synonyms: mechanical harvesting
Tags: Swiss brush-up completed
Scenario: Business-as-Usual
System model: Allocation, cut-off by classification
Generated by: Frank Werner
Database: ecoinvent
isCopyrightProtected: true
accessRestrictedTo: 1

## General comment
The inventory refers to 1 productive machine hour (PMS) - referring to the operational time of the machine including breaks up to 15 minutes - of a forwarder class II (10 - 12 t) with an average engine power of 110 kW and a total weight of 11,049 kg.
A forwarder is a forestry vehicle that carries felled logs from the stump to a roadside landing. Unlike a skidder, a forwarder carries logs clear of the ground, which can reduce soil impacts but tends to limit the size of the logs it can move. Forwarders are typically employed together with harvesters in cut-to-length logging operations.

## Included activities start
Service beginning with the transport of the machinery to the logging site.

## Included activities end
Includes the input of machinery infrastructure, the input of diesel fuel, lubricants/greases as well as their disposal, and the emissions into air from diesel consumption. Wood is not included in the dataset.

## Geography
Emission profile according to European legislation

## Technology
Average european technology

## Parameters
- load factor: 0.5 dimensionless; name LF; lognormal variance with pedigree 0.5526, pedigree (3,3,1,1,1)
  according to Lambrecht et al. 2004
- share of EURO IIIa: 0.5 dimensionless; name EURO_IIIa; lognormal variance with pedigree 0.592, pedigree (5,4,1,1,1)
  assuming that the relevant share of foresassuming that the relevant share of forest machinery belongs to vehicle types tier EURO IIIa and EURO IIIb as define in the Guideline 97/68/EG by the European Commission.
- diesel consumption: 11 l/hour; name diesel_consumption; lognormal variance with pedigree 0.592, pedigree (5,4,1,1,1)
  according to Jirousek et al. 2007 (see general comments field for total of evaulated literature)
- engine power: 110 kW; name EP; lognormal variance with pedigree 0.5526, pedigree (3,3,1,1,1)
  according to Jirousek et al. 2007
- share of EURO IIIb: 0.5 dimensionless; name EURO_IIIb; = 1-EURO_IIIa; lognormal variance with pedigree 0.867056, pedigree (1,1,1,1,1)
  (same comment as for share of EURO IIIa)
- lifetime of machine, productive machine hours: 17600 hour; name total_PMH; lognormal variance with pedigree 0.5526, pedigree (3,3,1,1,1)
  Oral personal communication, P. Wiss, Präsident des Verbandes Forstunternehmer Schweiz

## Reference product
- forwarding, forwarder: 1 hour; CPC 8614: Support and operation services to forestry and logging; By-product classification allocatable product
  production volume 4.08443e6 hour; name p_forwarding; = 10000*total_PMH/10/71707302*16641109
    annual production of machinery: 10000 times total productive machine hours, weighted by RER GDP/Global GDP
  property price 6.76747 EUR2005
    Calculated based on inputs: The price of the product has been calculated as a sum of the values of the material and energy inputs for this product. This value is therefore a rough estimation. It may underestimate the real price since there are additional expenses when producing any product. These expences can include for example labour costs, treatment of waste materials and profit for the producer. Please consider carefully whether this level of data quality is acceptable for your application.

## Inputs from technosphere
- waste mineral oil: 0 kg; name w_mineral_oil; source Klvac R. 2003; pedigree (1,1,1,1,1)
  hydraulic oil and engine oil/grease; adjusted for water content of waste oil
  production volume 0 kg
    Calculated from production volume of reference product using the relative outputs.
  property wet mass 1 kg; name WM
  property water content 0.111111; name WC_oil
  property dry mass 0.9 kg; name DM_oil
  properties: heating value, net 34.7 MJ, UVEK_relative_amount_1 -1, carbon content, fossil 0.864444, UVEK_link_1 1113
  note on heating value, net: Value taken from the general comment of the treatment dataset.
  note on UVEK_relative_amount_1: to be used only in special submissions in coordination with ecoinvent and the Swiss FOEN
- lubricating oil: 0.35432 kg; name m_lubricating_oil; = (0.213+0.199)*0.86; source Klvac R. 2003; lognormal variance with pedigree 0.0662, pedigree (2,3,5,1,1)
  hydraulic oil and engine oil/grease; estimate based on Klvac et al. (2003); value per l converted to kg
  properties: dry mass 1 kg, UVEK_relative_amount_1 1, UVEK_link_1 2866, heating value, net 40.2 MJ, wet mass 1 kg, carbon content, fossil 0.75
  note on heating value, net: Literature value, Source: IPCC 2006, 2006 IPCC Guidelines for National Greenhouse Gas Inventories, Prepared by the National Greenhouse Gas Inventories Programme, Eggleston H.S., Buendia L., Miwa K., Ngara T. and Tanabe K. (eds). Published: IGES, Japan
- transport, freight, lorry 16-32 metric ton, EURO5: 34.5281 metric ton*km; = 11049/1000*25/8; source Spielmann, M. 2007; lognormal variance with pedigree 0.3926, pedigree (3,3,5,1,1)
  transport of forest machinery calculated for the weight of the machinery, transported over 25 km and 8 productive machine hours (PMH) per day
  properties: UVEK_link_1 4388, UVEK_relative_amount_1 1
- diesel, low-sulfur: 9.24 kg; name m_diesel; = diesel_consumption*0.84; source Jirsousek R. 2007; lognormal variance with pedigree 0.033, pedigree (1,1,4,1,1)
  Density of diesel: 0.84 kg/l
  property carbon content, fossil 0.865; name C_content_fossil
  property water in wet mass 0 kg; name WWM
  property carbon content, non-fossil 0; name C_content_non_fossil
  property water content 0; name water_content
  properties: wet mass 1 kg, UVEK_link_1 740, dry mass 1 kg, heating value, net 42.8 MJ, UVEK_relative_amount_1 1
- forwarder: 5.68182e-5 unit; = 1/total_PMH; lognormal variance with pedigree 0.558, pedigree (1,1,4,1,1)
  assuming a service life of 17600 PMH (according to Spielmann et al. 2007)
- waste mineral oil: -0.384178, -0.00951072 kg (2 entries); source Klvac R. 2003; lognormal variance with pedigree 0.0342, pedigree (2,3,4,1,1)
  hydraulic oil and engine oil/grease; adjusted for water content of waste oil
  production volume 1.608e6 kg
  properties: wet mass 1 kg, heating value, net 34.7 MJ, UVEK_relative_amount_1 -1, carbon content, fossil 0.864444, water content 0.111111, UVEK_link_1 1113, dry mass 0.9 kg

## Emissions to nature
- Nickel [air, unspecified]: 6.48574e-7 kg; name nickel; = m_diesel*0.00000000164*42.8; source Kellenberger D. 2007; lognormal variance with pedigree 0.808, pedigree (1,1,4,1,1)
  value per MJ taken from ecoinvent 3.4 dataset "diesel, burned in building machine, GLO 2001" converted to input of diesel as mass (42.8 MJ/kg lower heating value)
- Selenium [air, unspecified]: 9.25404e-8 kg; = m_diesel*0.000000000234*42.8; source Kellenberger D. 2007; lognormal variance with pedigree 0.808, pedigree (1,1,4,1,1)
  (same comment as for Nickel)
- Methane, fossil [air, non-urban air or from high stacks]: 0.0004554 kg; = (EURO_IIIa* EP* LF*(IF(EP>130;0.012;0.012))+EURO_IIIb* EP* LF*(IF(EP>130;0.00456;0.00456)))/1000; source Lambrecht U. 2004; lognormal variance with pedigree 0.208, pedigree (1,1,4,1,1)
  emission model calculating hourly specific emissions as "engine power x load factor x base emission factor" as proposed by Lambrecht et al. (2004) and applied in Spielmann et al. (2007); values for base emission factors for VOC for mobile machinery classes EURO IIIa and EURO IIIb are taken from European Directive 2004/ 26/EC, of which 2.4% are assumed to be methane.
- Particulates, > 10 um [air, non-urban air or from high stacks]: 0.000535721 kg; = (EURO_IIIa* EP* LF*(IF(EP>130;0.2;0.3))+EURO_IIIb* EP* LF*(IF(EP>130;0.025;0.025)))/1000/(0.0000943+0.00000628+0.00000419)*0.00000628; source Lambrecht U. 2004; lognormal variance with pedigree 0.208, pedigree (1,1,4,1,1)
  emission model calculating hourly specific emissions as "engine power x load factor x base emission factor" as proposed by Lambrecht et al. (2004) and applied in Spielmann et al. (2007); values for base emission factors for particles for mobile machine classes EURO IIIa and EUROIIIb are taken from European Directive 2004/ 26/EC. The proportional distribution accross particle classes is made based on the ecoinvent v3 dataset "Diesel, burned in building machine/GLO".
- NMVOC, non-methane volatile organic compounds, unspecified origin [air, non-urban air or from high stacks]: 0.0185075 kg; name nmvoc; = (EURO_IIIa* EP* LF*(IF(EP>130;0.488;0.488))+EURO_IIIb* EP* LF*(IF(EP>130;0.185;0.185)))/1000; source Lambrecht U. 2004; lognormal variance with pedigree 0.208, pedigree (1,1,4,1,1)
  emission model calculating hourly specific emissions as "engine power x load factor x base emission factor" as proposed by Lambrecht et al. (2004) and applied in Spielmann et al. (2007); values for base emission factors for VOC for vehicle classes EURO IIIa and EURO IIIb are taken from Guideline 97/68/EG, of which 97.6% are assumed to be NMVOC.
- Cadmium [air, unspecified]: 9.25404e-8 kg; = m_diesel*0.000000000234*42.8; source Kellenberger D. 2007; lognormal variance with pedigree 0.808, pedigree (1,1,4,1,1)
  (same comment as for Nickel)
- Copper [air, unspecified]: 1.57002e-5 kg; = m_diesel*0.0000000397*42.8; source Kellenberger D. 2007; lognormal variance with pedigree 0.208, pedigree (1,1,4,1,1)
  (same comment as for Nickel)
- Ammonia [air, unspecified]: 0.000184685 kg; = m_diesel*0.000000467*42.8; source Kellenberger D. 2007; lognormal variance with pedigree 0.208, pedigree (1,1,4,1,1)
  (same comment as for Nickel)
- Zinc [air, unspecified]: 9.25404e-6 kg; = m_diesel*0.0000000234*42.8; source Kellenberger D. 2007; lognormal variance with pedigree 0.808, pedigree (1,1,4,1,1)
  (same comment as for Nickel)
- Particulates, > 2.5 um, and < 10um [air, non-urban air or from high stacks]: 0.000357432 kg; = (EURO_IIIa* EP* LF*(IF(EP>130;0.2;0.3))+EURO_IIIb* EP* LF*(IF(EP>130;0.025;0.025)))/1000/(0.0000943+0.00000628+0.00000419)*0.00000419; source Lambrecht U. 2004; lognormal variance with pedigree 0.358, pedigree (1,1,4,1,1)
  (same comment as for Particulates, > 10 um)
- Carbon monoxide, fossil [air, unspecified]: 0.102823 kg; = m_diesel*0.00026*42.8; source Kellenberger D. 2007; lognormal variance with pedigree 0.208, pedigree (1,1,4,1,1)
  (same comment as for Nickel)
- Benzo(a)pyrene [air, unspecified]: 2.77226e-7 kg; = m_diesel*0.000000000701*42.8; source Kellenberger D. 2007; lognormal variance with pedigree 0.558, pedigree (1,1,4,1,1)
  (same comment as for Nickel)
- Dinitrogen monoxide [air, unspecified]: 0.00110732 kg; = m_diesel*0.0000028*42.8; source Kellenberger D. 2007; lognormal variance with pedigree 0.208, pedigree (1,1,4,1,1)
  (same comment as for Nickel)
- Dioxins, measured as 2,3,7,8-tetrachlorodibenzo-p-dioxin [air, unspecified]: 5.53661e-13 kg; = m_diesel*0.0000000000000014*42.8; source Kellenberger D. 2007; lognormal variance with pedigree 0.558, pedigree (1,1,4,1,1)
  (same comment as for Nickel)
- PAH, polycyclic aromatic hydrocarbons [air, unspecified]: 3.10446e-5 kg; name pah; = m_diesel*0.0000000785*42.8; source Kellenberger D. 2007; lognormal variance with pedigree 0.558, pedigree (1,1,4,1,1)
  (same comment as for Nickel)
- Particulates, < 2.5 um [air, non-urban air or from high stacks]: 0.00804435 kg; = (EURO_IIIa* EP* LF*(IF(EP>130;0.2;0.3))+EURO_IIIb* EP* LF*(IF(EP>130;0.025;0.025)))/1000/(0.0000943+0.00000628+0.00000419)*0.0000943; source Lambrecht U. 2004; lognormal variance with pedigree 0.558, pedigree (1,1,4,1,1)
  (same comment as for Particulates, > 10 um)
- Carbon dioxide, fossil [air, non-urban air or from high stacks]: 28.8695 kg; = m_diesel*0.073*42.8; source Kellenberger D. 2007; lognormal variance with pedigree 0.033, pedigree (1,1,4,1,1)
  calculated from diesel input as 3.113 kg CO2/kg diesel as inventoried in the ecoinvent dataset diesel, burned in building machine
- Nitrogen oxides [air, non-urban air or from high stacks]: 0.187 kg; = (EURO_IIIa* EP* LF*(IF(EP>130;3.5;3.5))+EURO_IIIb* EP* LF*(IF(EP>130;2;3.3)))/1000; source Lambrecht U. 2004; lognormal variance with pedigree 0.208, pedigree (1,1,4,1,1)
  emission model calculating hourly specific emissions as "engine power x load factor x base emission factor" as proposed by Lambrecht et al. (2004) and applied in Spielmann et al. (2007); values for base emission factors for NOx for mobile machine class EUROIIIb are taken from the European Directive 2004/ 26/EC; for mobile machine class EURO IIIa values for base emission factors for NOx are calculated based on an assumed reduction of VOC emissions as compared to "Tier 2" limit for VOC of 1.0 g/kWh (following Spielmann et al. 2007).

## Sampling procedure
Material and fuel input from literature sources (see general comments field); air-borne emissions taken from existing dataset on diesel consumption in building machines or - where emission levels beyond applicable European legislation - estimated with emissions model based on emission limits established in European Directive 2004/ 26/EC for non-road mobile machinery types EURO IIIa and IIIb (according to Lambrecht et al 2004 and e.g. applied in Spielmann et al. 2007).

## Extrapolations
This dataset has been extrapolated from year 2012 to the year of the calculation (2021). The uncertainty has been adjusted accordingly.
