# steel production, converter, unalloyed

Dataset: EcoSpold 2, unit process
Geography: RoW
Time period: 2013-01-01 to 2023-12-31
Technology level: modern
Classification: ISIC rev.4 ecoinvent: 2410:Manufacture of basic iron and steel
Scenario: Business-as-Usual
System model: Allocation, cut-off by classification
Generated by: Johannes Müller
Published in: Remus, R. 2013
Database: ecoinvent
isCopyrightProtected: true
accessRestrictedTo: 1

## General comment
"Background:
This activity represents the production of primary steel (carbon; unalloyed) in a basic oxygen furnace (BOF), a discontinuous process involving the following steps: 1) pretreatment of hot metal (pig iron) from the blast furnace (desulphurisation, deslagging, etc.); 2) mixing of charge, weighing, transfer and reladling ; 3) oxidation in the BOF (decarburisation and oxidation of impurities); 4) secondary metallurgical treatment in a ladle furnace; and 5) casting (continuous and/or ingot).

Modelling approach:
Data on were mostly taken from the IPPC Best Available Technology report from the European Commission (Remus et al., 2013); note that where only data ranges were provided, the geometric mean of reported values was used here. The proportion of each by-product that is recycled internally (i.e. returned as an input to the process after it has been produced) is based on measured data from plants worldwide reported by worldsteel (2010): slag (including desulphurisation slag, BOF slag, slag from secondary metallurgy and slag from continuous casting), 14%; spittings, 100%; dust and sludge, 22%; and mill scale, 89%.
The ratio of pig iron to iron scrap inputs was based on average data from European steelmakers. The values were then adjusted to ensure Fe balance. This ratio is, however, highly variable among regions, globally, and the value used may not be representative of a) the average global situation or b) the situation in other regions. We advise caution when appliying these data elsewhere.
References:
Remus, R., Aguado-Monsonet, M. A., Roudier, S. & Samcho, L. D. (2013). JRC reference report - Best available techniques (BAT) reference document for iron and steel production. Joint Research Centre - European Commission, Luxemboug.
Worldsteel (2010). Steel industry by-products. World Steel Association: Brussels, Belgium."

## Included activities start
At the gate of the steelmaking plant with the arrival of the hot metal (pig iron).

## Included activities end
At the gate of the steelmaking plant with the cast steel ready for transport to manufacturers and fabricators.

## Geography
Data are taken from basic oxygen furnace plants across Europe and are considered representative of the average situation globally.

## Technology
Represents average European technology; LD converter and secondary metallurgy

## Time period
Data are mostly compiled from reports published between 2005 and 2010 but are considered representative of modern operations.

## Parameters
- fraction, cooling water, to air: 0.56 dimensionless; name fraction_CW_to_air; lognormal variance with pedigree 0.041425, pedigree (2,3,2,2,1)
- fraction, process water, to air: 0.095 dimensionless; name fraction_PW_to_air; lognormal variance with pedigree 0.092025, pedigree (4,4,3,2,4)
- fraction, cooling water, cooling pond system, to air: 0.032 dimensionless; name fraction_CW_CP_to_air; lognormal variance with pedigree 0.0413, pedigree (2,3,1,3,1)
  Calculated based on literature value (Scown, C.D., 2011, Water Footprint of U.S. Transportation Fuels and supplying information of the article) (Vionnet, S., Quantis Water Database - Technical Report, 2012).
- fraction, cooling water, once-through system, to air: 0.004 dimensionless; name fraction_CW_OT_to_air; lognormal variance with pedigree 0.0413, pedigree (2,3,1,3,1)
  (same comment as for fraction, cooling water, cooling pond system, to air)
- fraction, cooling water, recirculating system, to air: 0.771 dimensionless; name fraction_CW_R_to_air; lognormal variance with pedigree 0.0413, pedigree (2,3,1,3,1)
  (same comment as for fraction, cooling water, cooling pond system, to air)

## Reference product
- steel, unalloyed: 1 kg; name RP; By-product classification allocatable product; CPC 41121: Non-alloy steel in ingots or other primary forms, and semi-finished products of non-alloy steel
  production volume 1.13718e12 kg; name PV
    Calculated based on the amount of crude steel produced globally through the BOF route in 2019 (worldsteel, 2020).
    89% of the steel produced is unalloyed and 11% is alloyed (Gerbens-Leenes et al. 2018). Based on the amount of stainless (chromium) steel produced globally (ISSF 2021), 8.2% of the steel produced is low-alloyed and 2.8% is stainless. Therefore, out of the steel that is not stainless steel, 91.6% is unalloyed and 8.4% is low-alloyed.
    References:
    P.W. Gerbens-Leenes, A.Y. Hoekstra, R. Bosman (2018). The blue and grey water footprint of construction materials: Steel, cement and glass. Water Resources and Industry, Volume 19. https://doi.org/10.1016/j.wri.2017.11.002.
    worldsteel (2020). Steel Statistical Yearbook 2020 [online]. Available from: https://www.worldsteel.org/en/dam/jcr:5001dac8-0083-46f3-aadd-35aa357acbcc/Steel%2520Statistical%2520Yearbook%25202020%2520%2528concise%2520version%2529.pdf (accessed 20.07.2021).
  property heating value, net 0 MJ
    Non combustible products are assumed to have an LHV equal to zero (0).
  property carbon content, fossil 0.0025
    Unalloyed steels or carbon steels are those in which the level of an individual element in no case reaches or exceeds the limiting concentration given in Tab. 3.1 ecoinvent v2.2 report 10_partII. Assumed to have a C content of 0.25%
  property carbon content 0.0025
    carbon content on a dry matter basis (reserved; not for manual entry)
  properties: price 0.468 EUR2005, water content 0, water in wet mass 0 kg, dry mass 1 kg, carbon content, non-fossil 0, wet mass 1 kg, carbon allocation 0.0025 kg

## Inputs from technosphere
- pig iron: 0.864621 kg; lognormal variance with pedigree 0.0034, pedigree (2,3,2,5,1)
  The ratio of pig iron to iron scrap inputs was based on average data from European steelmakers. The values were then adjusted to ensure Fe balance. This ratio is, however, highly variable among regions, globally, and the value used may not be representative of a) the average global situation or b) the situation in other regions. We advise caution when appliying these data elsewhere.
  properties: iron content 0.92, wet mass 1 kg, carbon content, fossil 0.045, dry mass 1 kg
  note on carbon content, fossil: Pig iron is the iron produced in the blast furnace. It is an alloy of 94% Fe and more than 2% C (world average 4.5%). (ecoinvent v2.2 report 10_partII)
- blast oxygen furnace converter: 1.3333e-11 unit; lognormal variance with pedigree 0.5, pedigree (5,5,5,5,5)
  Source: Classen et al. (2009)
- wastewater from pig iron production: -0.00134164 m3; name BP_6; lognormal variance with pedigree 0.0912, pedigree (2,3,5,5,3)
  geometric mean of Remus et al. (2013) data range
  production volume 1.52569e9 m3; = PV*(BP_6/abs(RP))
    Calculated from the production volume of steel, chromium steel 18/8 in proportion to the respective output amounts.
  property price 0 EUR2005; name BP_6_price_EUR2005
  properties: dry mass 0.337476 kg, carbon content, fossil 1.2149e-5, wet mass 1000 kg, water content 2962.17
- compressed air, 600 kPa gauge: 0.0144222 m3; lognormal variance with pedigree 0.0572, pedigree (2,3,5,5,3)
  geometric mean of Remus et al. (2013) data range
- electricity, medium voltage: 0 kWh; pedigree (1,1,1,1,1)
  Calculated as weighted average of values obtained from the literature, with national crude steel production through the basic oxygen furnace route in 2017 used as a weighting factor. Literature sources used: Bieda, 2012; Burchart-Korol, 2013; He and Wang, 2017; Ma et al., 2018; Remus et al., 2013; Renzulli et al., 2016; Soni, 2018; Worrell et al., 2009
  References:
  Bieda, B., 2012. Life cycle inventory processes of the ArcelorMittal Poland (AMP) S.A. in Kraków, Poland—basic oxygen furnace steel production. The International Journal of Life Cycle Assessment 17, 463–470. https://doi.org/10.1007/s11367-011-0370-y
  Burchart-Korol, D., 2013. Life cycle assessment of steel production in Poland: a case study. Journal of Cleaner Production 54, 235–243. https://doi.org/10.1016/j.jclepro.2013.04.031
  He, K., Wang, L., 2017. A review of energy use and energy-efficient technologies for the iron and steel industry. Renewable and Sustainable Energy Reviews 70, 1022–1039. https://doi.org/10.1016/j.rser.2016.12.007
  Ma, X., Ye, L., Qi, C., Yang, D., Shen, X., Hong, J., 2018. Life cycle assessment and water footprint evaluation of crude steel production: A case study in China. Journal of Environmental Management 224, 10–18. https://doi.org/10.1016/j.jenvman.2018.07.027
  Remus R., Aguado-Monsonet M., Roudier S., Sancho L., 2013. Best Available Techniques (BAT) Reference Document for Iron and Steel Production. Industrial Emissions Directive 2010/75/EU (Integrated Pollution Prevention and Control). JRC Reference report, JRC 69967
  Renzulli, P., Notarnicola, B., Tassielli, G., Arcese, G., di Capua, R., 2016. Life Cycle Assessment of Steel Produced in an Italian Integrated Steel Mill. Sustainability 8, 719. https://doi.org/10.3390/su8080719
  Soni, H., 2018. Iron ore, iron and steel production, India. SRI project report
  Worrell, E., Van Gent, Blinde, P., Maarten, N. Blomen, E., Masanet, E., 2009. Energy Efficiency Improvement and Cost Saving Opportunities for the U.S. Iron and Steel Industry An ENERGY STAR(R) Guide for Energy and Plant Managers.
- dolomite: 0.00442218 kg; lognormal variance with pedigree 0.0034, pedigree (2,3,2,5,1)
  geometric mean of Remus et al. (2013) data range
  properties: heating value, net 3.95 MJ, dry mass 1 kg, wet mass 1 kg, carbon content, fossil 0.130435
- natural gas, high pressure: 0 m3; pedigree (1,1,1,1,1)
  geometric mean of Remus et al. (2013) data range
  properties: wet mass 0.84 kg, heating value, gross 39 MJ, heating value, net 39 MJ, carbon content, fossil 0.602381, dry mass 0.84 kg
  note on heating value, net: Literature value, Source: United Nations Statistics Division (2018) International Recommendations for Energy Statistics (IRES). Available at: http://unstats.un.org/unsd/statcom/doc11/BG-IRES.pdf.
  note on carbon content, fossil: An average C content of 0.506 kg C/ m3 has been assumed (this average has been calculated using data in Tab 3.5, ecoinvent v2.2 report 6_V
- iron scrap, sorted, pressed: 0.232111 kg; lognormal variance with pedigree 0.0034, pedigree (2,3,2,5,1)
  geometric mean of Remus et al. (2013) data range. Adjusted with RMS to balance Fe-Content.
  properties: wet mass 1 kg, iron content 0.92, dry mass 1 kg
- basic oxygen furnace secondary metallurgy slag: -0.0003008 kg; name BOF_SM_slag_amount; lognormal variance with pedigree 0.004425, pedigree (2,3,3,2,2)
  Amount reported by worldsteel (2010) and is representative of the average global situation in 2009. Also based on worldsteel (2010), an internal recovery (recycling) rate of 14% is assumed. Source: Worldsteel (2010). Steel industry by-products. World Steel Association: Brussels, Belgium.
  production volume 3.42064e8 kg; = PV * BOF_SM_slag_amount / RP
    Calculated from production volume of reference product using the relative outputs.
  property price 0 EUR2005; name BOF_SM_slag_amount_price_EUR2005
  properties: iron content 0.0199153, sulfur content 0.00614898, dry mass 0.995 kg, wet mass 1 kg, silicon content 0.0601451, oxygen content 0.476841, magnesium content 0.0427775, calcium content 0.312637, manganese content 0.00556519, water content 0.00502513, fluorine content 0.0129487, aluminium content 0.0530427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
  note on iron content: The value of 'iron content' is documented in Turner & Symeonidis, 2020. Reference: Turner David & Symeonidis Avraam, 2020, Life cycle inventories of the treatment of iron and steelmaking by-products, ecoinvent association, Zürich, Switzerland
  note on sulfur content: The value of 'sulfur content' is documented in Turner & Symeonidis, 2020. Reference: Turner David & Symeonidis Avraam, 2020, Life cycle inventories of the treatment of iron and steelmaking by-products, ecoinvent association, Zürich, Switzerland
  note on silicon content: The value of 'silicon content' is documented in Turner & Symeonidis, 2020. Reference: Turner David & Symeonidis Avraam, 2020, Life cycle inventories of the treatment of iron and steelmaking by-products, ecoinvent association, Zürich, Switzerland
  note on oxygen content: The value of 'oxygen content' is documented in Turner & Symeonidis, 2020. Reference: Turner David & Symeonidis Avraam, 2020, Life cycle inventories of the treatment of iron and steelmaking by-products, ecoinvent association, Zürich, Switzerland
  note on magnesium content: The value of 'magnesium content' is documented in Turner & Symeonidis, 2020. Reference: Turner David & Symeonidis Avraam, 2020, Life cycle inventories of the treatment of iron and steelmaking by-products, ecoinvent association, Zürich, Switzerland
  note on calcium content: The value of 'calcium content' is documented in Turner & Symeonidis, 2020. Reference: Turner David & Symeonidis Avraam, 2020, Life cycle inventories of the treatment of iron and steelmaking by-products, ecoinvent association, Zürich, Switzerland
  note on manganese content: The value of 'manganese content' is documented in Turner & Symeonidis, 2020. Reference: Turner David & Symeonidis Avraam, 2020, Life cycle inventories of the treatment of iron and steelmaking by-products, ecoinvent association, Zürich, Switzerland
  note on fluorine content: The value of 'fluorine content' is documented in Turner & Symeonidis, 2020. Reference: Turner David & Symeonidis Avraam, 2020, Life cycle inventories of the treatment of iron and steelmaking by-products, ecoinvent association, Zürich, Switzerland
  note on aluminium content: The value of 'aluminium content' is documented in Turner & Symeonidis, 2020. Reference: Turner David & Symeonidis Avraam, 2020, Life cycle inventories of the treatment of iron and steelmaking by-products, ecoinvent association, Zürich, Switzerland
- mill scale: -6.63e-5 kg; name BOF_millScale_amount; lognormal variance with pedigree 0.004425, pedigree (2,3,3,2,2)
  Amount reported by worldsteel (2010) and is representative of the average global situation in 2009. Also based on worldsteel (2010), an internal recovery (recycling) rate of 89% is assumed. Source: Worldsteel (2010). Steel industry by-products. World Steel Association: Brussels, Belgium.
  production volume 7.5395e7 kg; = PV *BOF_millScale_amount / RP
    Calculated from production volume of reference product using the relative outputs.
  property price 0 EUR2005; name BOF_millScale_amount_price_EUR2005
  property thallium content 8.02705e-7; name BOF_millScale_amount_Tl_content
  property boron content 5.07146e-6; name BOF_millScale_amount_B_content
  property oxygen content 0.163753; name BOF_millScale_amount_O_content
  property silver content 3.1105e-6; name BOF_millScale_amount_Ag_content
  property magnesium content 0.000860419; name BOF_millScale_amount_Mg_content
  property beryllium content 8.02705e-7; name BOF_millScale_amount_Be_content
  property carbon content, fossil 0.00761696; name BOF_millScale_amount_C_content_fossil
  property sodium content 0.00141069; name BOF_millScale_amount_Na_content
  property phosphorus content 0.000181101; name BOF_millScale_amount_P_content
  properties: chromium content 0.00123831, dry mass 0.905505 kg, nickel content 0.00131647, manganese content 0.00850218, wet mass 1 kg, potassium content 0.0023911, tungsten content 0.00751569, aluminium content 0.00121815, water content 0.104356, iron content 0.696142, calcium content 0.0101925, silicon content 0.00184691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
  note on chromium content: The value of 'chromium content' is documented in Turner & Symeonidis, 2020. Reference: Turner David & Symeonidis Avraam, 2020, Life cycle inventories of the treatment of iron and steelmaking by-products, ecoinvent association, Zürich, Switzerland
  note on nickel content: The value of 'nickel content' is documented in Turner & Symeonidis, 2020. Reference: Turner David & Symeonidis Avraam, 2020, Life cycle inventories of the treatment of iron and steelmaking by-products, ecoinvent association, Zürich, Switzerland
  note on potassium content: The value of 'potassium content' is documented in Turner & Symeonidis, 2020. Reference: Turner David & Symeonidis Avraam, 2020, Life cycle inventories of the treatment of iron and steelmaking by-products, ecoinvent association, Zürich, Switzerland
  note on tungsten content: The value of 'tungsten content' is documented in Turner & Symeonidis, 2020. Reference: Turner David & Symeonidis Avraam, 2020, Life cycle inventories of the treatment of iron and steelmaking by-products, ecoinvent association, Zürich, Switzerland
- oxygen, liquid: 0.078054 kg; lognormal variance with pedigree 0.0034, pedigree (2,3,2,5,1)
  geometric mean of Remus et al. (2013) data range
  properties: wet mass 1 kg, dry mass 1 kg
- quicklime, in pieces, loose: 0.044833 kg; lognormal variance with pedigree 0.0034, pedigree (2,3,2,5,1)
  geometric mean of Remus et al. (2013) data range
  properties: dry mass 0.99 kg, wet mass 1 kg, water content 0.010101
- iron ore concentrate: 0.000622896 kg; lognormal variance with pedigree 0.0034, pedigree (2,3,2,5,1)
  geometric mean of Remus et al. (2013) data range
  property iron content 0.65; name prod_ironOre65_kg_Fe_content
  properties: dry mass 1 kg, wet mass 1 kg
- basic oxygen furnace slag: -0.104898 kg; name BOF_slag_amount; lognormal variance with pedigree 0.004425, pedigree (2,3,3,2,2)
  (same comment as for basic oxygen furnace secondary metallurgy slag)
  production volume 1.19287e11 kg; = PV * BOF_slag_amount/ RP
    Calculated from production volume of reference product using the relative outputs.
  property price 0 EUR2005; name BOF_slag_amount_price_EUR2005
  properties: calcium content 0.324525, silicon content 0.0600014, wet mass 1 kg, manganese content 0.0250783, magnesium content 0.0350101, iron content 0.182475, phosphorus content 0.0102096, dry mass 0.995 kg, oxygen content 0.329259, water content 0.00502513, vanadium content 0.00554358, aluminium content 0.0101034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
  note on phosphorus content: The value of 'phosphorus content' is documented in Turner & Symeonidis, 2020. Reference: Turner David & Symeonidis Avraam, 2020, Life cycle inventories of the treatment of iron and steelmaking by-products, ecoinvent association, Zürich, Switzerland
  note on vanadium content: The value of 'vanadium content' is documented in Turner & Symeonidis, 2020. Reference: Turner David & Symeonidis Avraam, 2020, Life cycle inventories of the treatment of iron and steelmaking by-products, ecoinvent association, Zürich, Switzerland
- inert waste, for final disposal: -0.000565685 kg; name BOF_inert_amount; lognormal variance with pedigree 0.004425, pedigree (2,3,3,2,2)
  Represents used refractories, etc.
  production volume 6.43285e8 kg; = PV*(BOF_inert_amount/abs(RP))
    Calculated from production volume of reference product using the relative outputs.
  property price 0 EUR2005; name BOF_inert_amount_price_EUR2005
  properties: water content 0.00502513, dry mass 0.995 kg, wet mass 1 kg
- ferromanganese, high-coal, 74.5% Mn: 0.006 kg; lognormal variance with pedigree 0.0034, pedigree (2,3,2,5,1)
  Source: Classen et al. (2009)
  properties: heating value, net 2.27 MJ, iron content 0.15, dry mass 1 kg, wet mass 1 kg, carbon content, fossil 0.075
- coke: 0.000183216 MJ; lognormal variance with pedigree 0.0034, pedigree (2,3,2,5,1)
  geometric mean of Remus et al. (2013) data range
  properties: heating value, net 28.6 MJ, dry mass 0.0328671 kg, water content 0.0638298, carbon content, fossil 0.869149, wet mass 0.034965 kg
  note on carbon content, fossil: 81.7% C and 6% water in wet mass (ecoinvent v2.1 report 6_VI Table 7.1)
- basic oxygen furnace sludge: -0.0003008 kg; name BOF_sludge_amount; lognormal variance with pedigree 0.004425, pedigree (2,3,3,2,2)
  Amount reported by worldsteel (2010) and is representative of the average global situation in 2009. Also based on worldsteel (2010), an internal recovery (recycling) rate of 22% is assumed. Source: Worldsteel (2010). Steel industry by-products. World Steel Association: Brussels, Belgium.
  production volume 3.42064e8 kg; = PV * BOF_sludge_amount / RP
    Calculated from production volume of reference product using the relative outputs.
  property price 0 EUR2005; name BOF_sludge_amount_price_EUR2005
  properties: carbon content, fossil 0.00588235, aluminium content 0.00224181, water content 0.470588, wet mass 1 kg, magnesium content 0.00196609, manganese content 0.00169783, calcium content 0.0202279, zinc content 0.0109474, dry mass 0.68 kg, iron content 0.608767, oxygen content 0.0208176, silicon content 0.00570528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
  note on carbon content, fossil: The value of 'carbon content, fossil' is documented in Turner & Symeonidis, 2020. Reference: Turner David & Symeonidis Avraam, 2020, Life cycle inventories of the treatment of iron and steelmaking by-products, ecoinvent association, Zürich, Switzerland
  note on zinc content: The value of 'zinc content' is documented in Turner & Symeonidis, 2020. Reference: Turner David & Symeonidis Avraam, 2020, Life cycle inventories of the treatment of iron and steelmaking by-products, ecoinvent association, Zürich, Switzerland
- basic oxygen furnace dust: 0 kg; name BOF_dust_amount; pedigree (1,1,1,1,1)
  (same comment as for basic oxygen furnace sludge)
  production volume 0 kg
    Calculated from production volume of reference product using the relative outputs.
  property price 0 EUR2005; name BOF_dust_amount_price_EUR2005
  properties: oxygen content 0.312189, carbon content, fossil 0.0181399, wet mass 1 kg, manganese content 0.0049, dry mass 0.999 kg, antimony content 0.0031, calcium content 0.0868734, magnesium content 0.00854209, zinc content 0.00713417, iron content 0.528324, aluminium content 0.0128653, silicon content 0.0100985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
  note on antimony content: The value of 'antimony content' is documented in Turner & Symeonidis, 2020. Reference: Turner David & Symeonidis Avraam, 2020, Life cycle inventories of the treatment of iron and steelmaking by-products, ecoinvent association, Zürich, Switzerland
- electricity, medium voltage: 0.000630259, 0.000120857, 0.00202893, 0.029509, 0.00415931, 0.0135516 kWh (6 entries); lognormal variance with pedigree 0.0034, pedigree (2,3,2,5,1)
  (same comment as for electricity, medium voltage)
- natural gas, high pressure: 1.59555e-5, 2.38417e-5, 3.96898e-5, 0.000324061, 5.47039e-5, 0.000743934 m3 (6 entries); lognormal variance with pedigree 0.0034, pedigree (2,3,2,5,1)
  geometric mean of Remus et al. (2013) data range
- basic oxygen furnace dust: -0.00814183, -0.0112542 kg (2 entries); lognormal variance with pedigree 0.004425, pedigree (2,3,3,2,2)
  (same comment as for basic oxygen furnace sludge)
  production volume 2.20567e10 kg

## Inputs from nature
- Water, cooling, unspecified natural origin [natural resource, in water]: 0.00577581 m3; name water_cooling_UNO_input; source Byers, W. 2003; lognormal variance with pedigree 0.0152, pedigree (2,3,3,5,1)
  geometric mean of Remus et al. (2013) data range
  property water content 9081.65; name water_content
  property carbon content, fossil 0.0104329; name C_content_fossil
  property carbon content, non-fossil 0; name C_content_non_fossil
  property water in wet mass 999.89 kg; name WWM
  property dry mass 0.1101 kg; name DM
  property wet mass 1000 kg; name WM

## Emissions to nature
- Iron [air, unspecified]: 4.115e-5 kg; lognormal variance with pedigree 0.7012, pedigree (2,3,5,5,3)
  geometric mean of Remus et al. (2013) data range
- Manganese [air, unspecified]: 6.84105e-7 kg; lognormal variance with pedigree 0.6534, pedigree (2,3,2,5,1)
  geometric mean of Remus et al. (2013) data range
- Carbon dioxide, fossil [air, unspecified]: 0.0627089 kg; lognormal variance with pedigree 0.0034, pedigree (2,3,2,5,1)
  geometric mean of Remus et al. (2013) data range
- Particulates, < 2.5 um [air, unspecified]: 4.47437e-5 kg; lognormal variance with pedigree 0.3034, pedigree (2,3,2,5,1)
  geometric mean of Remus et al. (2013) data range
- Lead [air, unspecified]: 4.08167e-7 kg; lognormal variance with pedigree 0.6534, pedigree (2,3,2,5,1)
  geometric mean of Remus et al. (2013) data range
- Heat, waste [air, unspecified]: 0.204696 MJ; lognormal variance with pedigree 0.0912, pedigree (2,3,5,5,3)
  Calculated from energy balanced model
- Chromium [air, unspecified]: 2.73861e-8 kg; lognormal variance with pedigree 0.6534, pedigree (2,3,2,5,1)
  geometric mean of Remus et al. (2013) data range
- Dioxins, measured as 2,3,7,8-tetrachlorodibenzo-p-dioxin [air, unspecified]: 6.35767e-14 kg; lognormal variance with pedigree 0.3034, pedigree (2,3,2,5,1)
  geometric mean of Remus et al. (2013) data range
- Carbon monoxide, fossil [air, unspecified]: 0.00168214 kg; lognormal variance with pedigree 0.6534, pedigree (2,3,2,5,1)
  geometric mean of Remus et al. (2013) data range
- Nitrogen oxides [air, unspecified]: 2.12368e-5 kg; lognormal variance with pedigree 0.0434, pedigree (2,3,2,5,1)
  geometric mean of Remus et al. (2013) data range
- PAH, polycyclic aromatic hydrocarbons [air, unspecified]: 1e-8 kg; lognormal variance with pedigree 0.3034, pedigree (2,3,2,5,1)
  geometric mean of Remus et al. (2013) data range
- Copper [air, unspecified]: 1.38684e-7 kg; lognormal variance with pedigree 0.6534, pedigree (2,3,2,5,1)
  geometric mean of Remus et al. (2013) data range
- Water [air, unspecified]: 0.00611841 m3; name water_to_air_unspecified; lognormal variance with pedigree 0.0427, pedigree (2,2,1,5,1)
  Source: Classen et al. (2009)
  property fraction, origin: salt water 0; name fraction_origin_salt_water
  property fraction, origin: unspecified 1; name fraction_origin_unspecified
  property fraction, origin: fresh water 0; name fraction_origin_fresh_water

## Sampling procedure
Data were taken from direct measurements at blast furnace plants across Europe.

Note that there may be mass imbalances in the dataset. This is because the values represent the average situation in steelmaking many different plants and have not been augmented or adjusted. Similarily, these values represent the situation post-ventilation/off-gas management, i.e. it is not the mass of carbon, for instance, that is produced that is reported but the amount that is actually, on average, emitted to the environment considering an average mix of steelmaking, technologies, off-gas management approaches, and internal recovery (recycling) or utilisation rates at integrated steelmakers in Europe.

It should also be noted that data on radionucleid emissions to air, e.g. of Pollonium 210 and Lead 210, were not available and have therefore not been inventoried here.

## Extrapolations
This dataset is extrapolated from data collected from European sites; the uncertainty has been adjusted accordingly.
