# weed control, by brush cutter, pasture

Dataset: EcoSpold 2, unit process
Geography: RoW
Time period: 2012-01-01 to 2021-12-31
Technology level: current
Classification: ISIC rev.4 ecoinvent: 0162:Support activities for animal production
Classification: EcoSpold01Categories: agricultural means of production/work processes
Synonyms: mowing
Scenario: Business-as-Usual
System model: Allocation, cut-off by classification
Generated by: [System]
Published in: Dias, F. R. T. 2017
Database: ecoinvent
isCopyrightProtected: true
accessRestrictedTo: 1

## General comment
This dataset represents an example of a typical mechanical weed control, by brush cutter. The functional unit (FU) is one ha. The operation time is 0.3 h/FU and the fuel consumption is 17.0 liters per hour.

## Included activities start
From agricultural field foreseen to be processed.

## Included activities end
The dataset includes the diesel fuel consumption and the amount of agricultural machinery and of the shed, which has to be attributed to the mechanical weed control. Also taken into consideration is the amount of emissions to the air from combustion and the emission to the soil from tyre abrasion during the work process. The dataset doesn't include the dust other than from combustion and noise. This activity ends with weed control, transfer back to the shed and uncoupling of the implement from the tractor.

## Geography
The inventory is extrapolated from farming processes in Brazil.

## Technology
Current technology about sowing operation during agricultural processes.

## Time period
Most of the data used to modelling this activity were collected in the last few years (2012-2016).

## Reference product
- weed control, by brush cutter, pasture: 1 ha; CPC 86122: Support services to farm animal husbandry; By-product classification allocatable product
  production volume 4.46286e8 ha; = 3,32E+09/7
    Global area of permanent meadows and pasture, year 2014, according to the FAOSTAT data. Its was assumed that this operation occurs every 7 years. See more in: http://www.fao.org/faostat/en/#data/RL.
  property price 3.02652 EUR2005
    Calculated based on inputs: The price of the product has been calculated as a sum of the values of the material and energy inputs for this product. This value is therefore a rough estimation. It may underestimate the real price since there are additional expenses when producing any product. These expences can include for example labour costs, treatment of waste materials and profit for the producer. Please consider carefully whether this level of data quality is acceptable for your application.

## Inputs from technosphere
- shed: 0.00267 m2; lognormal variance with pedigree 0.306, pedigree (1,4,3,5,1)
  Proxy, based on ecoinvent database.
- agricultural machinery, unspecified: 0.096 kg; source Nemecek, T. 2007; lognormal variance with pedigree 0.006, pedigree (1,4,3,5,1)
  Related to the implement (rotary cutter with 2 blades; weight 800 kg) coupled to the tractor.
- diesel: 0 kg; name diesel_consumption; source Dias, F. R. T. 2017; pedigree (1,1,1,1,1)
  Amount for typical system from Dias et al. (2017).
  properties: carbon content, fossil 0.865, dry mass 1 kg, wet mass 1 kg, heating value, net 42.8 MJ
  note on carbon content, fossil: C-content of diesel is 86.5% (ecoinvent v2.2 report 6_IV, Tab 3.14)
- tractor, 4-wheel, agricultural: 0.187 kg; source Nemecek, T. 2007; lognormal variance with pedigree 0.006, pedigree (1,4,3,5,1)
  Proxy, based on ecoinvent database. Power 80 hp; weight 3740 kg.
- diesel: 0.0078741, 0.330567, 0.0231549, 0.0334676, 0.690752, 3.26418 kg (6 entries); source Dias, F. R. T. 2017; lognormal variance with pedigree 0.006, pedigree (1,4,3,5,1)
  Amount for typical system from Dias et al. (2017).

## Emissions to nature
All rows: source Nemecek, T. 2007
- Carbon monoxide, fossil [air, non-urban air or from high stacks]: 0.0056985 kg; lognormal variance with pedigree 0.656, pedigree (1,4,3,5,1)
  Emissions from diesel combustion were calculated based on the emissions factor described in Nemecek and Kagi (2007).
- Benzene [air, non-urban air or from high stacks]: 3.1755e-5 kg; lognormal variance with pedigree 0.0621, pedigree (1,2,3,5,3)
  (same comment as for Carbon monoxide, fossil)
- Lead [soil, agricultural]: 1.8e-5 kg; lognormal variance with pedigree 0.046, pedigree (1,4,3,5,1)
  Emissions of heavy metals from tyre abrasion were calculated based on Nemecek and Kagi (2007).
- Selenium [air, non-urban air or from high stacks]: 4.35e-8 kg; lognormal variance with pedigree 0.0621, pedigree (1,2,3,5,3)
  (same comment as for Carbon monoxide, fossil)
- Copper [air, non-urban air or from high stacks]: 7.395e-6 kg; lognormal variance with pedigree 0.6621, pedigree (1,2,3,5,3)
  (same comment as for Carbon monoxide, fossil)
- PAH, polycyclic aromatic hydrocarbons [air, non-urban air or from high stacks]: 1.43115e-5 kg; lognormal variance with pedigree 0.3221, pedigree (1,2,3,5,3)
  (same comment as for Carbon monoxide, fossil)
- Particulates, < 2.5 um [air, non-urban air or from high stacks]: 0.0343215 kg; lognormal variance with pedigree 0.3221, pedigree (1,2,3,5,3)
  (same comment as for Carbon monoxide, fossil)
- Zinc [air, non-urban air or from high stacks]: 4.35e-6 kg; lognormal variance with pedigree 0.6621, pedigree (1,2,3,5,3)
  (same comment as for Carbon monoxide, fossil)
- Cadmium [air, non-urban air or from high stacks]: 4.35e-8 kg; lognormal variance with pedigree 0.6621, pedigree (1,2,3,5,3)
  (same comment as for Carbon monoxide, fossil)
- Benzo(a)pyrene [air, non-urban air or from high stacks]: 1.305e-7 kg; lognormal variance with pedigree 0.6621, pedigree (1,2,3,5,3)
  (same comment as for Carbon monoxide, fossil)
- Dinitrogen monoxide [air, non-urban air or from high stacks]: 0.000522 kg; lognormal variance with pedigree 0.0621, pedigree (1,2,3,5,3)
  (same comment as for Carbon monoxide, fossil)
- Nitrogen oxides [air, non-urban air or from high stacks]: 0.05568 kg; lognormal variance with pedigree 0.046, pedigree (1,4,3,5,1)
  (same comment as for Carbon monoxide, fossil)
- Zinc [soil, agricultural]: 0.000111 kg; lognormal variance with pedigree 0.046, pedigree (1,4,3,5,1)
  (same comment as for Lead)
- Ammonia [air, non-urban air or from high stacks]: 8.7e-5 kg; lognormal variance with pedigree 0.0621, pedigree (1,2,3,5,3)
  (same comment as for Carbon monoxide, fossil)
- Nickel [air, non-urban air or from high stacks]: 3.045e-7 kg; lognormal variance with pedigree 0.6621, pedigree (1,2,3,5,3)
  (same comment as for Carbon monoxide, fossil)
- Carbon dioxide, fossil [air, non-urban air or from high stacks]: 13.572 kg; lognormal variance with pedigree 0.0221, pedigree (1,2,3,5,3)
  (same comment as for Carbon monoxide, fossil)
- Cadmium [soil, agricultural]: 4.15e-6 kg; lognormal variance with pedigree 0.046, pedigree (1,4,3,5,1)
  (same comment as for Lead)
- NMVOC, non-methane volatile organic compounds, unspecified origin [air, non-urban air or from high stacks]: 0.0036018 kg; lognormal variance with pedigree 0.046, pedigree (1,4,3,5,1)
  (same comment as for Carbon monoxide, fossil)
- Sulfur dioxide [air, non-urban air or from high stacks]: 0.0043935 kg; lognormal variance with pedigree 0.0221, pedigree (1,2,3,5,3)
  (same comment as for Carbon monoxide, fossil)
- Chromium [air, non-urban air or from high stacks]: 2.175e-7 kg; lognormal variance with pedigree 0.6621, pedigree (1,2,3,5,3)
  (same comment as for Carbon monoxide, fossil)
- Methane, fossil [air, non-urban air or from high stacks]: 0.00056115 kg; lognormal variance with pedigree 0.0621, pedigree (1,2,3,5,3)
  (same comment as for Carbon monoxide, fossil)

## Extrapolations
Extrapolated from Brazilian data, uncertainty adjusted accordingly.

## Review by Jens Lansche 2017-12-14
Emissions calculated according to Nemecek and Kägi, 2007. Extrapolated to GLO from conditions in BR. All review comments considered.
