# harvesting, by complete harvester, beets

Dataset: EcoSpold 2, unit process
Geography: RoW
Time period: 1991-01-01 to 2021-12-31
Technology level: current
Classification: ISIC rev.4 ecoinvent: 0161:Support activities for crop production
Classification: EcoSpold01Categories: agricultural means of production/work processes
Tags: ConvertedDataset
Scenario: Business-as-Usual
System model: Allocation, cut-off by classification
Generated by: Silvio Blaser
Published in: Nemecek, T. 2007
Database: ecoinvent
isCopyrightProtected: true
accessRestrictedTo: 1

## General comment
Complete harvester, big, with bunker, 1-row, without leaf salvage. "Medium" module for sugar beets (6.8 Th/ha) and fodder beets (7.7 Th/ha). For sugar beets 1-row complete harvester is rare, more frequent is the 6-row self driver, beet production not included. FU is one ha harvested.
[This dataset was already contained in the ecoinvent database version 2. It was not individually updated during the transfer to ecoinvent version 3. Life Cycle Impact Assessment results may still have changed, as they are affected by changes in the supply chain, i.e. in other datasets. This dataset was generated following the ecoinvent quality guidelines for version 2. It may have been subject to central changes described in the ecoinvent version 3 change report (http://www.ecoinvent.org/database/ecoinvent-version-3/reports-of-changes/), and the results of the central updates were reviewed extensively. The changes added e.g. consistent water flows and other information throughout the database. The documentation of this dataset can be found in the ecoinvent reports of version 2, which are still available via the ecoinvent website. The change report linked above covers all central changes that were made during the conversion process.]

## Included activities end
The inventory takes into account the diesel fuel consumption and the amount of agricultural machinery and of the shed, which has to be attributed to the harvesting. Also taken into consideration is the amount of emissions to the air from combustion and the emission to the soil from tyre abrasion during the work process. The following activities where considered part of the work process: preliminary work at the farm, like attaching the adequate machine to the tractor; transfer to field (with an assumed distance of 1 km); field work (for a parcel of land of 1 ha surface); transfer to farm and concluding work, like uncoupling the machine. The overlapping during the field work is considered. The amount of harvested beets is not taken into account. Not included are dust other than from combustion and noise.

## Geography
The inventories are based on measurements made by the FAT, in Switzerland.

## Technology
Emissions and fuel consumption by the newest models of tractors set into operation during the period from 1999 to 2001.

## Time period
Measurements were made in the last few years (1999-2001).

## Reference product
- harvesting, by complete harvester, beets: 1 ha; By-product classification allocatable product; CPC 86119: Other support services to crop production
  EcoSpold01Location=CH
  production volume 5.04998e6 ha
    FAOSTAT data year 2011: area of sugar beets
  property price 79.6823 EUR2005
    Calculated based on inputs: The price of the product has been calculated as a sum of the values of the material and energy inputs for this product. This value is therefore a rough estimation. It may underestimate the real price since there are additional expenses when producing any product. These expences can include for example labour costs, treatment of waste materials and profit for the producer. Please consider carefully whether this level of data quality is acceptable for your application.

## Inputs from technosphere
- tractor, 4-wheel, agricultural: 5.89 kg; lognormal variance with pedigree 0.044, pedigree (1,4,5,5,1)
  EcoSpold01Location=CH
- agricultural machinery, unspecified: 7.39 kg; lognormal variance with pedigree 0.044, pedigree (1,4,5,5,1)
  EcoSpold01Location=CH
- diesel: 0 kg; pedigree (1,1,1,1,1)
  EcoSpold01Location=CH
  properties: heating value, net 42.8 MJ, carbon content, fossil 0.865, wet mass 1 kg, dry mass 1 kg
  note on carbon content, fossil: C-content of diesel is 86.5% (ecoinvent v2.2 report 6_IV, Tab 3.14)
- shed: 0.0198 m2; lognormal variance with pedigree 0.344, pedigree (1,4,5,5,1)
  EcoSpold01Location=CH
- diesel: 3.73993, 0.179794, 15.7062, 7.54804, 0.528709, 0.764187, 74.5331 kg (7 entries); lognormal variance with pedigree 0.044, pedigree (1,4,5,5,1)
  EcoSpold01Location=CH

## Emissions to nature
- Particulates, < 2.5 um [air, non-urban air or from high stacks]: 0.552 kg; lognormal variance with pedigree 0.3601, pedigree (1,2,5,5,3)
- Cadmium [air, non-urban air or from high stacks]: 1.03e-6 kg; lognormal variance with pedigree 0.7001, pedigree (1,2,5,5,3)
- Chromium [air, non-urban air or from high stacks]: 5.17e-6 kg; lognormal variance with pedigree 0.7001, pedigree (1,2,5,5,3)
- Carbon monoxide, fossil [air, non-urban air or from high stacks]: 0.864 kg; lognormal variance with pedigree 0.694, pedigree (1,4,5,5,1)
- Cadmium [soil, agricultural]: 3.12e-6 kg; lognormal variance with pedigree 0.084, pedigree (1,4,5,5,1)
- Carbon dioxide, fossil [air, non-urban air or from high stacks]: 322 kg; lognormal variance with pedigree 0.0601, pedigree (1,2,5,5,3)
- Benzo(a)pyrene [air, non-urban air or from high stacks]: 3.1e-6 kg; lognormal variance with pedigree 0.7001, pedigree (1,2,5,5,3)
- Benzene [air, non-urban air or from high stacks]: 0.000755 kg; lognormal variance with pedigree 0.1001, pedigree (1,2,5,5,3)
- Nickel [air, non-urban air or from high stacks]: 7.24e-6 kg; lognormal variance with pedigree 0.7001, pedigree (1,2,5,5,3)
- Ammonia [air, non-urban air or from high stacks]: 0.00207 kg; lognormal variance with pedigree 0.1001, pedigree (1,2,5,5,3)
- Lead [soil, agricultural]: 1.38e-5 kg; lognormal variance with pedigree 0.084, pedigree (1,4,5,5,1)
- Selenium [air, non-urban air or from high stacks]: 1.03e-6 kg; lognormal variance with pedigree 0.1001, pedigree (1,2,5,5,3)
- PAH, polycyclic aromatic hydrocarbons [air, non-urban air or from high stacks]: 0.00034 kg; lognormal variance with pedigree 0.3601, pedigree (1,2,5,5,3)
- Sulfur dioxide [air, non-urban air or from high stacks]: 0.104 kg; lognormal variance with pedigree 0.0601, pedigree (1,2,5,5,3)
- Nitrogen oxides [air, non-urban air or from high stacks]: 4.06 kg; lognormal variance with pedigree 0.084, pedigree (1,4,5,5,1)
- NMVOC, non-methane volatile organic compounds, unspecified origin [air, non-urban air or from high stacks]: 0.202 kg; lognormal variance with pedigree 0.084, pedigree (1,4,5,5,1)
- Methane, fossil [air, non-urban air or from high stacks]: 0.0133 kg; lognormal variance with pedigree 0.1001, pedigree (1,2,5,5,3)
- Zinc [air, non-urban air or from high stacks]: 0.000103 kg; lognormal variance with pedigree 0.7001, pedigree (1,2,5,5,3)
- Copper [air, non-urban air or from high stacks]: 0.000176 kg; lognormal variance with pedigree 0.7001, pedigree (1,2,5,5,3)
- Zinc [soil, agricultural]: 0.00821 kg; lognormal variance with pedigree 0.084, pedigree (1,4,5,5,1)
- Dinitrogen monoxide [air, non-urban air or from high stacks]: 0.0124 kg; lognormal variance with pedigree 0.1001, pedigree (1,2,5,5,3)

## Sampling procedure
Data on fuel consumption and emissions of CO, HC and NOx are expert estimations based on measurements for comparable activities (rotary tedder). The other emissions were calculated basing on literature data and the measured fuel consumption.

## Extrapolations
Processes are typical procedures for Switzerland around the year 2000, they are not statistical average processes. This dataset has been copied from an original dataset covering the geography CH. The uncertainty has been adjusted accordingly.

## Review by Roland Hischier 2003-08-06
Passed.
