# paraffin production

Dataset: EcoSpold 2, unit process
Geography: RoW
Time period: 1995-01-01 to 2021-12-31
Technology level: current
Classification: ISIC rev.4 ecoinvent: 1920:Manufacture of refined petroleum products
Classification: EcoSpold01Categories: chemicals/organics
Synonyms: Wachs; wax
Tags: ConvertedDataset
Scenario: Business-as-Usual
System model: Allocation, cut-off by classification
Generated by: Roland Hischier
Published in: Zah R. 2007
Database: ecoinvent
isCopyrightProtected: true
accessRestrictedTo: 1

## General comment
data based on the ECOSOL study of the European surfactant industry. Allocations in multioutput processes were made, using the relative mass outputs of products.
[This dataset was already contained in the ecoinvent database version 2. It was not individually updated during the transfer to ecoinvent version 3. Life Cycle Impact Assessment results may still have changed, as they are affected by changes in the supply chain, i.e. in other datasets. This dataset was generated following the ecoinvent quality guidelines for version 2. It may have been subject to central changes described in the ecoinvent version 3 change report (http://www.ecoinvent.org/database/ecoinvent-version-3/reports-of-changes/), and the results of the central updates were reviewed extensively. The changes added e.g. consistent water flows and other information throughout the database. The documentation of this dataset can be found in the ecoinvent reports of version 2, which are still available via the ecoinvent website. The change report linked above covers all central changes that were made during the conversion process.]

## Included activities end
This module contains material and energy input, production of waste and emissions for the production of n-paraffins out of crude oil. Water consumption and infrastructure have been estimated.

## Geography
Data based on the European paraffin production

## Technology
Average technology, typical for European production conditions in the mid 90s

## Time period
data of published literature

## Parameters
- fraction, cooling water, once-through system, to air: 0.004 dimensionless; name fraction_CW_OT_to_air; lognormal variance with pedigree 0.0413, pedigree (2,3,1,3,1)
  Calculated based on literature value (Scown, C.D., 2011, Water Footprint of U.S. Transportation Fuels and supplying information of the article) (Vionnet, S., Quantis Water Database - Technical Report, 2012).
- fraction, process water, to air: 0.205 dimensionless; name fraction_PW_to_air; lognormal variance with pedigree 0.092025, pedigree (4,4,3,2,4)
- fraction, cooling water, cooling pond system, to air: 0.032 dimensionless; name fraction_CW_CP_to_air; lognormal variance with pedigree 0.0413, pedigree (2,3,1,3,1)
  (same comment as for fraction, cooling water, once-through system, to air)
- fraction, cooling water, recirculating system, to air: 0.771 dimensionless; name fraction_CW_R_to_air; lognormal variance with pedigree 0.0413, pedigree (2,3,1,3,1)
  (same comment as for fraction, cooling water, once-through system, to air)
- fraction, cooling water, to air: 0.3875 dimensionless; name fraction_CW_to_air; = (0.5*fraction_CW_OT_to_air)+(0.5*fraction_CW_R_to_air); lognormal variance with pedigree 0.092025, pedigree (4,4,3,2,4)
  Calculated value based on literature value (see comments of the other parametres present in this dataset) and expert opinion. In the case when no industry/literature data are available about the type of cooling or directly fraction, cooling water, to air specific for the process a default assumption is applied. It is assumed that the once-through cooling system is used in 50% of all cases and recirculating system is used in another 50% of all cases.

## Reference product
- paraffin: 1 kg; By-product classification allocatable product; CPC 33500: Petroleum jelly; paraffin wax, micro- crystalline petroleum wax, slack wax, ozokerite, lignite wax, peat wax, […]; CAS 8002-74-2
  EcoSpold01Location=RER
  production volume 2.67763 kg
    This is a placeholder value that does not reflect real-world production volumes. This dataset does not currently require a real-world production volume to work in the database framework, and no actual data were collected yet. This has no negative effect on the results of the ecoinvent database.
  property carbon content, fossil 0.847059
    An average composition of C12H26 (molecular weight of 170 g/mol) was assumed for n-parafins, after ecoinvent v2.2 report 8, part II, pg 398
  property carbon content, non-fossil 0
    Paraffins are produced out of crude oil (ecoinvent v2.2 report 8, part II, Fig 58.1)
  property heating value, net 41.5 MJ
    Indicative value. Reference: Fuels - Higher and Lower Calorific Values, available at: https://www.engineeringtoolbox.com/fuels-higher-calorific-values-d_169.html
  property carbon content 0.847059
    carbon content on a dry matter basis (reserved; not for manual entry)
  properties: price 0.615 EUR2005, water content 0, wet mass 1 kg, dry mass 1 kg, water in wet mass 0 kg, carbon allocation 0.847059 kg

## Inputs from technosphere
- chemical factory, organics: 4e-10 unit; lognormal variance with pedigree 0.52, pedigree (5,5,5,5,4)
  EcoSpold01Location=RER
  Estimated from a large chem. plant
  Uncertainty: estimated from a large chem. plant
- municipal solid waste: 0 kg; pedigree (1,1,1,1,1)
  Data from ECOSOL study (Literature)
  EcoSpold01Location=CH
  Uncertainty: data from ECOSOL study (Literature)
  production volume 0 kg
    Calculated from the production volume of paraffin in proportion to the respective output amounts.
  properties: water content 0.297017, carbon content, non-fossil 0.261655, carbon content, fossil 0.171549, wet mass 1 kg, dry mass 0.771 kg, heating value, net 11.74 MJ
  note on carbon content, non-fossil: MSW composition in tab 4.1, ecoinvent v2.2 report 13_I. C content referred to 1 kg DM
  note on heating value, net: Value taken from the general comment of the treatment dataset.
- heat, district or industrial, other than natural gas: 0 MJ; pedigree (1,1,1,1,1)
  Estimation, based on ECOSOL data
  EcoSpold01Location=RER
  Uncertainty: estimation, based on ECOSOL data
  properties: heating value, net 1 MJ
- electricity, medium voltage: 0 kWh; pedigree (1,1,1,1,1)
  EcoSpold01Location=UCTE
  Estimation, based on ECOSOL data
  Uncertainty: estimation, based on ECOSOL data
- heat, district or industrial, natural gas: 0 MJ; pedigree (1,1,1,1,1)
  EcoSpold01Location=RER
  Estimation, based on ECOSOL data
  Uncertainty: estimation, based on ECOSOL data
  properties: heating value, net 1 MJ
- municipal solid waste: -6.9408e-6, -1.74891e-6, -2.49929e-6, -0.00490881 kg (4 entries); lognormal variance with pedigree 0.0606, pedigree (2,5,5,5,1)
  (same comment as for municipal solid waste)
  production volume 0.01476 kg
- heat, district or industrial, other than natural gas: 0.000821634, 2.02618 MJ (2 entries); lognormal variance with pedigree 0.078, pedigree (4,5,5,5,1)
  (same comment as for heat, district or industrial, other than natural gas)
- electricity, medium voltage: 0.000325214, 6.2362e-5, 0.00104693, 0.0152266, 0.0021462, 0.00699265 kWh (6 entries); lognormal variance with pedigree 0.078, pedigree (4,5,5,5,1)
  (same comment as for electricity, medium voltage)
- heat, district or industrial, natural gas: 0.0420436, 2.72796 MJ (2 entries); lognormal variance with pedigree 0.078, pedigree (4,5,5,5,1)
  (same comment as for heat, district or industrial, natural gas)

## Inputs from nature
- Water, cooling, unspecified natural origin [natural resource, in water]: 0.024 m3; name water_cooling_UNO_input; lognormal variance with pedigree 0.21, pedigree (5,5,5,5,4)
  Estimated from a large chem. plant
  Uncertainty: estimated from a large chem. plant
- Oil, crude, in ground [natural resource, in ground]: 1.08 kg; lognormal variance with pedigree 0.0606, pedigree (2,5,5,5,1)
  Data from ECOSOL study (Literature)
  Uncertainty: data from ECOSOL study (Literature)
- Water, unspecified natural origin [natural resource, in water]: 0.006 m3; name water_UNO_input; lognormal variance with pedigree 0.21, pedigree (5,5,5,5,4)
  Estimated from a large chem. plant
  Uncertainty: estimated from a large chem. plant

## Emissions to nature
- Particulates, > 2.5 um, and < 10um [air, urban air close to ground]: 9.03e-5 kg; lognormal variance with pedigree 0.1806, pedigree (2,5,5,5,1)
  Data from ECOSOL study (Literature)
  Uncertainty: data from ECOSOL study (Literature)
- Fluoride [water, surface water]: 5.42e-7 kg; lognormal variance with pedigree 0.1006, pedigree (2,5,5,5,1)
  Data from ECOSOL study (Literature)
  Uncertainty: data from ECOSOL study (Literature)
- Water [water, unspecified]: 0.01947 m3; name water_to_water_unspecified; lognormal variance with pedigree 0.0827, pedigree (2,2,5,5,1)
  Calculated value based on literature values and expert opinion. See comments in the parametres' comment field.
  property fraction, origin: unspecified 1; name fraction_origin_unspecified_Ww
  property fraction, origin: salt water 0; name fraction_origin_salt_water_Ww
  property fraction, origin: fresh water 0; name fraction_origin_fresh_water_Ww
  property carbon content, non-fossil 0; name C_content_non_fossil
  property carbon content, fossil 0; name C_content_fossil
  property dry mass 0 kg; name DM
  property wet mass 1000 kg; name WM
  property water in wet mass 1000 kg; name WWM
- Suspended solids, unspecified [water, surface water]: 9.7e-6 kg; lognormal variance with pedigree 0.1006, pedigree (2,5,5,5,1)
  Data from ECOSOL study (Literature)
  Uncertainty: data from ECOSOL study (Literature)
- Water [air, unspecified]: 0.01053 m3; name water_to_air_unspecified; lognormal variance with pedigree 0.0827, pedigree (2,2,5,5,1)
  (same comment as for Water)
  property fraction, origin: unspecified 1; name fraction_origin_unspecified
  property fraction, origin: salt water 0; name fraction_origin_salt_water
  property fraction, origin: fresh water 0; name fraction_origin_fresh_water
- Nickel, ion [water, surface water]: 2.32e-7 kg; lognormal variance with pedigree 0.7106, pedigree (2,5,5,5,1)
  Data from ECOSOL study (Literature)
  Uncertainty: data from ECOSOL study (Literature)
- Sulfide [water, surface water]: 7.71e-8 kg; lognormal variance with pedigree 0.1006, pedigree (2,5,5,5,1)
  Data from ECOSOL study (Literature)
  Uncertainty: data from ECOSOL study (Literature)
- Carbon monoxide, fossil [air, urban air close to ground]: 4e-5 kg; lognormal variance with pedigree 0.7106, pedigree (2,5,5,5,1)
  Data from ECOSOL study (Literature)
  Uncertainty: data from ECOSOL study (Literature)
- TOC, Total Organic Carbon [water, surface water]: 3.11111e-5 kg; lognormal variance with pedigree 0.1006, pedigree (2,5,5,5,1)
  Calculated by default as TOC (gC) = COD/2.7 (COD measured in g O2). Should more correctly be calculated from the carbon content of the specified emissions to water.
  Uncertainty: data from ECOSOL study (Literature)
- Particulates, > 10 um [air, urban air close to ground]: 6.72e-5 kg; lognormal variance with pedigree 0.1006, pedigree (2,5,5,5,1)
  Data from ECOSOL study (Literature)
  Uncertainty: data from ECOSOL study (Literature)
- Zinc, ion [water, surface water]: 7.71e-8 kg; lognormal variance with pedigree 0.7106, pedigree (2,5,5,5,1)
  Data from ECOSOL study (Literature)
  Uncertainty: data from ECOSOL study (Literature)
- DOC, Dissolved Organic Carbon [water, surface water]: 3.11111e-5 kg; lognormal variance with pedigree 0.1006, pedigree (2,5,5,5,1)
  Calculated as equal to TOC.
  Uncertainty: data from ECOSOL study (Literature)
- Chromium, ion [water, surface water]: 2.32e-7 kg; lognormal variance with pedigree 0.7106, pedigree (2,5,5,5,1)
  Data from ECOSOL study (Literature)
  Uncertainty: data from ECOSOL study (Literature)
- Sulfur dioxide [air, urban air close to ground]: 0.00158 kg; lognormal variance with pedigree 0.0606, pedigree (2,5,5,5,1)
  Data from ECOSOL study (Literature)
  Uncertainty: data from ECOSOL study (Literature)
- BOD5, Biological Oxygen Demand [water, surface water]: 2e-5 kg; lognormal variance with pedigree 0.1006, pedigree (2,5,5,5,1)
  Data from ECOSOL study (Literature)
  Uncertainty: data from ECOSOL study (Literature)
- NMVOC, non-methane volatile organic compounds, unspecified origin [air, urban air close to ground]: 0.00082 kg; lognormal variance with pedigree 0.1006, pedigree (2,5,5,5,1)
  Data from ECOSOL study (Literature)
  Uncertainty: data from ECOSOL study (Literature)
- Particulates, < 2.5 um [air, urban air close to ground]: 5.25e-5 kg; lognormal variance with pedigree 0.3706, pedigree (2,5,5,5,1)
  Data from ECOSOL study (Literature)
  Uncertainty: data from ECOSOL study (Literature)
- Oils, unspecified [water, surface water]: 1.4e-6 kg; lognormal variance with pedigree 0.3706, pedigree (2,5,5,5,1)
  Data from ECOSOL study (Literature)
  Uncertainty: data from ECOSOL study (Literature)
- Carbon dioxide, fossil [air, urban air close to ground]: 0.311 kg; lognormal variance with pedigree 0.0606, pedigree (2,5,5,5,1)
  Data from ECOSOL study (Literature)
  Uncertainty: data from ECOSOL study (Literature)
- Phosphate [water, surface water]: 1.61e-6 kg; lognormal variance with pedigree 0.1006, pedigree (2,5,5,5,1)
  Data from ECOSOL study (Literature)
  Uncertainty: data from ECOSOL study (Literature)
- Nitrogen oxides [air, urban air close to ground]: 0.00172 kg; lognormal variance with pedigree 0.1006, pedigree (2,5,5,5,1)
  Data from ECOSOL study (Literature)
  Uncertainty: data from ECOSOL study (Literature)
- Phenol [water, surface water]: 1.65e-7 kg; lognormal variance with pedigree 0.1006, pedigree (2,5,5,5,1)
  Data from ECOSOL study (Literature)
  Uncertainty: data from ECOSOL study (Literature)
- Iron, ion [water, surface water]: 3.86e-7 kg; lognormal variance with pedigree 0.7106, pedigree (2,5,5,5,1)
  Data from ECOSOL study (Literature)
  Uncertainty: data from ECOSOL study (Literature)
- COD, Chemical Oxygen Demand [water, surface water]: 8.4e-5 kg; lognormal variance with pedigree 0.1006, pedigree (2,5,5,5,1)
  Data from ECOSOL study (Literature)
  Uncertainty: data from ECOSOL study (Literature)
- Aluminium [water, surface water]: 7.71e-8 kg; lognormal variance with pedigree 0.7106, pedigree (2,5,5,5,1)
  Data from ECOSOL study (Literature)
  Uncertainty: data from ECOSOL study (Literature)
- Ammonium, ion [water, surface water]: 2.23e-6 kg; lognormal variance with pedigree 0.1006, pedigree (2,5,5,5,1)
  Data from ECOSOL study (Literature)
  Uncertainty: data from ECOSOL study (Literature)

## Extrapolations
data out of ECOSOL study of European Surfactant Industry. Common translation rules used, reported in Chemical report (Althaus et al. 2003). This dataset has been copied from an original dataset covering the geography RER. The uncertainty has been adjusted accordingly.

## Review by Heiko Kunst 2003-06-20
Passed
Passed
