# borax production, anhydrous, powder

Dataset: EcoSpold 2, unit process
Geography: RoW
Time period: 2000-01-01 to 2021-12-31
Technology level: current
Classification: ISIC rev.4 ecoinvent: 2011:Manufacture of basic chemicals
Classification: EcoSpold01Categories: chemicals/inorganics
Tags: ConvertedDataset
Scenario: Business-as-Usual
System model: Allocation, cut-off by classification
Generated by: Roland Hischier
Published in: Althaus H.-J. 2007
Database: ecoinvent
isCopyrightProtected: true
accessRestrictedTo: 1

## General comment
The functional unit represent 1 kg of anhydrous borax powder. Large uncertainty of the process data due to weak data on the production process and missing data on process emissions.
[This dataset was already contained in the ecoinvent database version 2. It was not individually updated during the transfer to ecoinvent version 3. Life Cycle Impact Assessment results may still have changed, as they are affected by changes in the supply chain, i.e. in other datasets. This dataset was generated following the ecoinvent quality guidelines for version 2. It may have been subject to central changes described in the ecoinvent version 3 change report (http://www.ecoinvent.org/database/ecoinvent-version-3/reports-of-changes/), and the results of the central updates were reviewed extensively. The changes added e.g. consistent water flows and other information throughout the database. The documentation of this dataset can be found in the ecoinvent reports of version 2, which are still available via the ecoinvent website. The change report linked above covers all central changes that were made during the conversion process.]

## Included activities end
Raw materials and chemicals used for production, transport of materials to manufacturing plant, estimated emissions to air and water from production (incomplete), estimation of energy demand and infrastructure of the plant (approximation). Solid wastes omitted.

## Geography
Data used has no specific geographical origin (stoechiometry). Average europenan processes for raw materials, transport requirements and electricity mix used.

## Technology
Production out of sodium borates by melting technology, using a rotary kiln and a subsequent fusion furnace. The overall process yield is assumed as 98%. Input amount bases on stoechiometric calculations. The energy consumption is estimated based on filament glass production in Europe.

## Time period
date of published literature

## Reference product
- borax, anhydrous, powder: 1 kg; By-product classification allocatable product; CPC 34270: Cyanides, cyanide oxides and complex cyanides; fulminates, cyanates and thiocyanates; silicates; borates; perb[…]; CAS 1330-43-4
  EcoSpold01Location=RER
  production volume 3.75711e8 kg
    Upscaled from European supply values by a factor 5 (from information in the document used for the obtention of the European values). European values were obtained from Table 6.1 in Assessment of the Risk to Consumers from Borates and the Impact of Potential Restrictions on their Marketing and Use, November 2008, prepared for DG Enterprise and Industry (European Commission) by Risk & Policy Analysts Limited (http://ec.europa.eu/enterprise/sectors/chemicals/files/docs_studies/final_report_borates_en.pdf). Hydrated borax is not considered in this dataset (ecoinvent report 8, part 16). Global production volumes of borax decahydrate and pentahydrate are 739.5 million kg and 7364 million kg, respectively (from the same table). From information in the text, it has been assumed that quantities in the Table are expressed in B2O3 eq.
  property price 0.51 EUR2005
    Calculated value based on data from United Nations Commodity Trade Statistics Database (comtrade.un.org). UN comtrade category: 284011 Disodium tetraborate (refined borax) anhydrous. Year 2005. Using exchange rate of 1EURO = 1.209 USD. Average of price of import into 5 main markets (EU, US, JP, IN and CN).
  property carbon content 0
    carbon content on a dry matter basis (reserved; not for manual entry)
  properties: dry mass 1 kg, water content 0, wet mass 1 kg, carbon content, non-fossil 0, carbon content, fossil 0, water in wet mass 0 kg, carbon allocation 0 kg

## Inputs from technosphere
- electricity, medium voltage: 0 kWh; pedigree (1,1,1,1,1)
  Estimated with data from a large chem. plant
  EcoSpold01Location=UCTE
  Uncertainty: estimated with data from a large chem. plant
- heat, district or industrial, natural gas: 0 MJ; pedigree (1,1,1,1,1)
  EcoSpold01Location=RER
  Estimated with data from a large chem. plant
  Uncertainty: estimated with data from a large chem. plant
  properties: heating value, net 1 MJ
- packaging glass factory: 1.25e-10 unit; lognormal variance with pedigree 0.588, pedigree (4,5,5,5,5)
  EcoSpold01Location=RER
  Estimation
  Uncertainty: estimation
- sodium borates: 1.71 kg; lognormal variance with pedigree 0.1786, pedigree (4,5,5,5,5)
  Estimation based on process yield 90-99.8%
  EcoSpold01Location=US
  Uncertainty: estimation based on process yield 90-99.8%
  properties: wet mass 1 kg, dry mass 1 kg
- electricity, medium voltage: 0.0118993, 0.00228177, 0.0383062, 0.55713, 0.0785277, 0.255855 kWh (6 entries); lognormal variance with pedigree 0.21, pedigree (5,5,5,5,4)
  (same comment as for electricity, medium voltage)
- heat, district or industrial, natural gas: 0.206423, 13.3936 MJ (2 entries); lognormal variance with pedigree 0.21, pedigree (5,5,5,5,4)
  (same comment as for heat, district or industrial, natural gas)

## Sampling procedure
Process data based on stoechiometric calculations of few literature sources. Energy demand based on approximation from other sector (glass production).

## Extrapolations
This dataset has been copied from an original dataset covering the geography RER. The uncertainty has been adjusted accordingly.

## Review by Heiko Kunst 2003-06-27
Passed.
