# bamboo forestry, sustainable forest management

Dataset: EcoSpold 2, unit process
Geography: RoW
Time period: 2010-01-01 to 2021-12-31
Technology level: current
Classification: ISIC rev.4 ecoinvent: 0230:Gathering of non-wood forest products
Scenario: Business-as-Usual
System model: Allocation, cut-off by classification
Generated by: Edwin Zea Escamilla
Database: ecoinvent
isCopyrightProtected: true
accessRestrictedTo: 1

## General comment
This dataset is a weighted average of the existing local datasets (BR, CN, CO, PH). It represents the global production of 1 Kg of bamboo culm which is the stem of bamboo. Although bamboo culm is not itself considered a construction material, the culm is used for the production of bamboo pole which can be used directly for the construction of columns, beams, or struts and other bamboo-based construction materials. Each species of bamboo yields different numbers of culms per year. This number can be influenced by fertiliser use and natural events (Liu et al., 2011). The culms can be extracted manually or using a chainsaw but lack a direct application as a construction material because their high water content (u= ca. 80 %), and when untreated their service life is approximately three years (De Flander and Rovers, 2009; Riaño et al., 2002). The production takes place at a bamboo forest or intermediary processing facility. The figures origin from mainly calculations and literature values. This dataset was developed with the support of the International Organization for Bamboo and Rattan INBAR.
Ref:
De Flander, K. and R. Rovers, One laminated bamboo-frame house per hectare per year. Construction and Building Materials, 2009. 23(1): p. 210-218.
Liu, J., et al., Seasonal soil CO2 efflux dynamics after land use change from a natural forest to Moso bamboo plantations in subtropical China. Forest Ecology and Management, 2011. 262(6): p. 1131-1137.
Riaño, N.M., et al., Plant growth and biomass distribution on Guadua angustifolia Kunth in relation to ageing in the Valle del Cauca – Colombia. Bamboo Science and Culture, 2002. 16(1): p. 43-51.
Zea Escamilla, E. and Habert, G., Environmental impacts from the production of bamboo based construction materials representing the global production diversity. Journal of Cleaner Production, 2013

## Included activities start
From transformation of land into Bamboo Forest and reception of fertilisers

## Included activities end
This activity ends with Bamboo Culm (u=80%) at forest. The dataset includes the CO2 absorption from air and the land use for the bamboo to grow. Since branches and leaves stay on the ground in the forest, i.e. do not leave the system, they are neglected in this dataset. The dataset does not include infrastructure, soil preparation, changes in carbon content in soil, use of pesticides, irrigation, and plantation of seedling, and leaching of pesticides and fertilisers,
All transport for this product is included in the respective market activity. At the plantation there is no mechanical transport, since plantations are rather small and the bamboo groove is very dense and cannot be easily accessed by vehicles. The culms will be trimmed and the pulled/transported to a collection point, where they can be picked up.

## Technology
Current production technology

## Reference product
- bamboo culm: 1 kg; CPC 03: Forestry and logging products; By-product classification allocatable product
  production volume 1.10216e8 kg; = 1.53*870205426.23
    The production volume is a rough estimate based on the annual production volume bamboo pole assuming that all bamboo culms are further processed into bamboo poles. 1.53 Kg of bamboo culm is required to produce 1 Kg of bamboo pole.
    All production volumes of bamboo products are calculated based on production volumes of glued laminated bamboo and woven bamboo mat panels, which are the end products of the bamboo production chain (as represented in the ecoinvent database). These are based on export data retrieved from INBAR (at <http://trade.inbar.int:10444/>, last accessed in December 2020).
  property price 0.107527 EUR2005
    Based on expert judgement, price given as 0.13 USD/kg. Converted with an exchange rate of 1EURO = 1.209 USD.
  property dry mass 0.555556 kg; name DM_culm
  property carbon content, non-fossil 0.494; name CC_culm
    biogenic carbon content on a dry matter basis
  property heating value, net 9.87 MJ
    LHV is calculated based on Carbon and water in wet mass content.
  property wet mass 1 kg; name WM_culm
  property carbon content 0.494
    carbon content on a dry matter basis (reserved; not for manual entry)
  properties: water content 0.8, carbon content, fossil 0, water in wet mass 0.444444 kg, carbon allocation 0.274444 kg

## Inputs from technosphere
- inorganic nitrogen fertiliser, as N: 0 kg; pedigree (1,1,1,1,1)
  Considered as part of typical fertilizing mixture on managed bamboo plantations
  properties: wet mass 1 kg, dry mass 1 kg
- power sawing, with catalytic converter: 0.000333333 hour; = (0.02/60)*WM_culm; lognormal variance with pedigree 0.005, pedigree (2,3,3,4,2)
  0.02 minutes sawing per kg of bamboo culm
- inorganic phosphorus fertiliser, as P2O5: 0 kg; pedigree (1,1,1,1,1)
  Considered as part of typical fertilizing mixture on managed bamboo plantations
  properties: dry mass 1 kg, wet mass 1 kg
- inorganic potassium fertiliser, as K2O: 0 kg; pedigree (1,1,1,1,1)
  Considered as part of typical fertilizing mixture on managed bamboo plantations
  properties: wet mass 1 kg, dry mass 1 kg
- inorganic nitrogen fertiliser, as N: 1.2144e-5, 1.74554e-5, 1.56011e-5, 3.27297e-5, 4.05678e-7, 2.42906e-6, 8.63943e-7, 8.38901e-8, 2.33515e-6, 4.34851e-5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 kg (26 entries); lognormal variance with pedigree 0.005, pedigree (2,3,3,4,2)
  Considered as part of typical fertilizing mixture on managed bamboo plantations
- inorganic phosphorus fertiliser, as P2O5: 6.37039e-6, 8.26503e-6, 6.61809e-6, 1.09189e-5, 4.49901e-7, 1.18592e-6, 2.40621e-7, 5.25727e-8, 4.37769e-7, 1.414e-5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 kg (26 entries); lognormal variance with pedigree 0.005, pedigree (2,3,3,4,2)
  Considered as part of typical fertilizing mixture on managed bamboo plantations
- inorganic potassium fertiliser, as K2O: 1.79773e-6, 8.90852e-6, 1.80689e-5, 1.59926e-5, 2.31301e-6, 3.8512e-6, 3.20615e-6, 1.4504e-7, 4.88556e-6, 7.68942e-5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 kg (26 entries); lognormal variance with pedigree 0.005, pedigree (2,3,3,4,2)
  Considered as part of typical fertilizing mixture on managed bamboo plantations

## Inputs from nature
- Wood, unspecified, standing [natural resource, biotic]: 0.00322155 m3; = DM_culm/ DM_wood_standing; lognormal variance with pedigree 0.1313, pedigree (4,2,3,4,5)
  This input is used as a proxy to reflect bamboo, standing. The water properties have been adjusted according to the properties of bamboo
  property dry mass 172.45 kg; name DM_wood_standing
- Transformation, to forest, intensive [natural resource, land]: 0.0255843 m2; = 10000/(19543.2581*20); lognormal variance with pedigree 0.1332, pedigree (3,3,3,4,3)
  Value has been calculated based on an average yearly harvest of 19180.33 per hectare. The value has been calculated as weighted average of the regional datasets. A rotation period of 5 years is assumed but only 25% of the culms are extracted during this time period. Thus, only after 20 years the whole area will be harvested.
- Energy, gross calorific value, in biomass [natural resource, biotic]: 10.7056 MJ; = DM_culm*19.27; lognormal variance with pedigree 0.042425, pedigree (2,3,5,2,2)
  dry mass of the culm x gross calorific value of bamboo
- Transformation, from pasture, man made [natural resource, land]: 0.0255843 m2; = 10000/(19543.2581*20); lognormal variance with pedigree 0.1332, pedigree (3,3,3,4,3)
  (same comment as for Transformation, to forest, intensive)
- Carbon dioxide, in air [natural resource, in air]: 1.0063 kg; = DM_culm* CC_culm/(12/44); lognormal variance with pedigree 0.005, pedigree (2,3,3,4,2)
  Carbon uptake from air into the product calculated based on the carbon content and dry mass of the product. Scaled to the molar mass from C to CO2. Branches and leaves are not taken into account, since they do not leave the system.
- Occupation, forest, intensive [natural resource, land]: 0.511685 m2*year; = 10000/(19543.2581); lognormal variance with pedigree 0.0532, pedigree (3,3,3,4,3)
  Value has been calculated based on an average yearly harvest of 19180.33 per hectare. The value has been calculated as weighted average of the regional datasets.

## Emissions to nature
- Carbon dioxide, fossil [air, unspecified]: 0.00127594 kg; source IPCC 2006; lognormal variance with pedigree 0.005, pedigree (2,3,3,4,2)
  Carbon dioxide released from urea application, according to IPCC (2006). All Carbon in urea is assumed to form CO2 which is then emitted to air. Urea is a component of the inorganic nitrogen fertiliser. The amount of CO2 emissions was calculated as a weighted average of the existing local datasets
  property carbon content, fossil 0.272916; name C_content_CO2

## Sampling procedure
The dataset is mostly based on literature values and was developed with the support of the International Organization for Bamboo and Rattan INBAR

## Extrapolations
The amounts of flows are weighted averages over all existing local production datasets available for this specific product. The weights are the annual production volumes of the local datasets relative to the sum of all local annual production volumes.

The input of bamboo is approximated with “wood, unspecified, standing”. The properties have been modified in order to reflect bamboo
