# inductor production, auxilliaries and energy use

Dataset: EcoSpold 2, unit process
Geography: GLO
Time period: 1998-01-01 to 2021-12-31
Technology level: current
Classification: EcoSpold01Categories: electronics/component
Classification: ISIC rev.4 ecoinvent: 2610:Manufacture of electronic components and boards
Scenario: Business-as-Usual
System model: Allocation, cut-off by classification
Generated by: Roland Hischier
Published in: Hischier R. 2007
Database: ecoinvent
isCopyrightProtected: true
accessRestrictedTo: 1

## General comment
This dataset represents the average production efforts for the production of 1 kg of inductors over all types of inductors. There is no distinction between the different types of inductors produced. Data for auxiliaries, energy, emissions and waste are taken from the Swedish LCI database and based on estimations from the capacitor production. As the raw material input is taken into account in the respective inductor datasets this dataset here has no input of raw materials.

## Included activities start
From reception of electronic components, raw materials and auxiliares at the factory gate.

## Included activities end
This module includes auxillary and energy consumption, emissions (air, water) and waste amounts, as well as an estimation of the efforts for transportation and of the infrastructure for the production of inductors.

## Geography
Data from literature and one global producer – here representing the global situation.

## Technology
Most inductors are constructed as a coil out of conducting material (e.g. copper wire) that is wrapped around a core of air or of ferromagnetic material. The higher the permeability of the core material, the higher is the inductance of the component. One part of the inductors is constructed as enamel coated wire wrapped around a ferrite bobbin with wire exposed on the outside. Some inductors have an adjustable core, which enables changing of the inductance. Those inductors that are used to block very high frequencies can contain a wire passing through a ferrite cylinder or bead.
average production comprising the following steps: core mounting; epxoy-curing; winding; welding; molding; marking; bending; testing and final control.

## Parameters
- fraction, cooling water, to air: 0.3875 dimensionless; name fraction_CW_to_air; = (0.5*fraction_CW_OT_to_air)+(0.5*fraction_CW_R_to_air); lognormal variance with pedigree 0.092025, pedigree (4,4,3,2,4)
  Calculated value based on literature value (see comments of the other parametres present in this dataset) and expert opinion. In the case when no industry/literature data are available about the type of cooling or directly fraction, cooling water, to air specific for the process a default assumption is applied. It is assumed that the once-through cooling system is used in 50% of all cases and recirculating system is used in another 50% of all cases.
- fraction, cooling water, once-through system, to air: 0.004 dimensionless; name fraction_CW_OT_to_air; lognormal variance with pedigree 0.0413, pedigree (2,3,1,3,1)
  Calculated based on literature value (Scown, C.D., 2011, Water Footprint of U.S. Transportation Fuels and supplying information of the article) (Vionnet, S., Quantis Water Database - Technical Report, 2012).
- fraction, process water, to air: 0.061 dimensionless; name fraction_PW_to_air; lognormal variance with pedigree 0.092025, pedigree (4,4,3,2,4)
  Literature value (Statistics Canada, 2007 & Shaffer, K.H., 2008, Consumptive water use in the Great Lakes Basin, USGS) (Vionnet, S., Quantis Water Database - Technical Report, 2012).
- fraction, cooling water, cooling pond system, to air: 0.032 dimensionless; name fraction_CW_CP_to_air; lognormal variance with pedigree 0.0413, pedigree (2,3,1,3,1)
  (same comment as for fraction, cooling water, once-through system, to air)
- fraction, cooling water, recirculating system, to air: 0.771 dimensionless; name fraction_CW_R_to_air; lognormal variance with pedigree 0.0413, pedigree (2,3,1,3,1)
  (same comment as for fraction, cooling water, once-through system, to air)

## Reference product
- inductor, auxilliaries and energy use: 1 kg; CPC 471: Electronic valves and tubes; electronic components; parts thereof; By-product classification allocatable product
  EcoSpold01Location=GLO
  An inductor is a passive electrical device employed in electrical circuits for its property of inductance. An inductor can take many forms. Synonyms for the term "inductor" that are in use are "coil" and "choke" (Wikipedia, 2007). While a capacitor opposes changes in voltage, an inductor opposes changes in current. An ideal inductor would offer no resistance to a constant direct current; however, only superconducting inductors have truly zero electrical resistance.
  production volume 1 kg
    Dummy value to be replaced by measured, estimated or calculated value
  properties: price 20 EUR2005

## Inputs from technosphere
- acetone, liquid: 0 kg; source CPM 2006; pedigree (1,1,1,1,1)
  Estimation. An average input of about 0.99 kg of auxiliaries per kg of produced capacitors is calculated. The substances with the highest amount have been chosen here.
  EcoSpold01Location=RER
  Uncertainty: assumption from conclusion by analogy (using capacitors)
  properties: wet mass 1 kg, heating value, net 31.32 MJ, dry mass 1 kg, carbon content, fossil 0.62069
- wastewater, average: 0 m3; pedigree (1,1,1,1,1)
  EcoSpold01Location=CH
  Estimation, due to a lack of respective emission information.
  Uncertainty: average from literature & CER
  production volume 0 m3
    Calculated from the production volume of inductor, auxilliaries and energy use in proportion to the respective output amounts.
  properties: carbon content, non-fossil 0.194039, water content 2882.2, wet mass 1000 kg, dry mass 0.346837 kg
  note on carbon content, non-fossil: 0.0673 kg TOC/m3 (Tab A.17, ecoinvent v2.2 report 13_I). TOC was considered as Total Carbon.
- spent solvent mixture: 0 kg; source EPCOS 2006; pedigree (1,1,1,1,1)
  Proxy. A total output of 1.13 kg of waste per kg of produced capacitors is calculated. Auxiliaries are emitted 100% either as emissions (air, water, soil) or as waste - i.e. 0.48 kg of waste are non-used input materials - and for 50% here of this byproduct is used as a proxy.
  Further references:
  CPM (2006) LCI@CPM datastore - various datasets about electronic components. Download of December 12, 2006, from <http://databases.imi.chalmers.se/nukes/index.html>.
  EcoSpold01Location=CH
  Uncertainty: average from literature & CER
  production volume 0 kg
    (same comment as for wastewater, average)
  properties: dry mass 0.835 kg, heating value, net 21.7 MJ, water content 0.197605, wet mass 1 kg, carbon content, fossil 0.571257
  note on heating value, net: Value taken from the general comment of the treatment dataset.
  note on carbon content, fossil: Tab A.7, ecoinvent v2.2 report 13_I. C content has been calculated after data in the tables, and then referred to 1 kg DM
- electronic component factory: 1e-12 unit; lognormal variance with pedigree 0.5761, pedigree (4,5,5,3,5)
  EcoSpold01Location=GLO
  Expert assumption. Original value of 2E-08 was based a a wafer fabrication facility. It is assumed a factory produces more components than this in its lifetime.
  Uncertainty: rough estimation of infrastructure
- electricity, medium voltage: 48 kWh; source CPM 2006; lognormal variance with pedigree 0.0527, pedigree (2,4,5,3,1)
  Calculated, average value.
  EcoSpold01Location=UCTE
  Uncertainty: value from literature
- methyl ethyl ketone: 0 kg; source CPM 2006; pedigree (1,1,1,1,1)
  (same comment as for acetone, liquid)
  properties: heating value, net 33.63 MJ, wet mass 1 kg, dry mass 1 kg, carbon content, fossil 0.666667
- waste plastic, mixture: 0 kg; source EPCOS 2006; pedigree (1,1,1,1,1)
  Proxy. A total output of 1.13 kg of waste per kg of produced capacitors is calculated. Auxiliaries are emitted 100% either as emissions (air, water, soil) or as waste - i.e. 0.48 kg of waste are non-used input materials - and for 50% here of this byproduct is used as a proxy.
  Further references:
  CPM (2006) LCI@CPM datastore - various datasets about electronic components. Download of December 12, 2006, from <http://databases.imi.chalmers.se/nukes/index.html>.
  EcoSpold01Location=CH
  Uncertainty: assumption, based on literature & CER
  production volume 0 kg
    (same comment as for wastewater, average)
  properties: carbon content, fossil 0.747344, dry mass 0.847 kg, water content 0.180638, heating value, net 30.79 MJ, wet mass 1 kg
  note on carbon content, fossil: C content in 1 kg DM was calculated using data in Tab A.2, ecoinvent v2.2 report 13_I
- heat, district or industrial, natural gas: 0.0875 MJ; lognormal variance with pedigree 0.0527, pedigree (2,4,5,3,1)
  EcoSpold01Location=RER
  Calculated, from the emissions of CO2.
  Uncertainty: calculated from value in liteerature
  properties: heating value, net 1 MJ
- waste, from silicon wafer production, inorganic: -0.24 kg; source EPCOS 2006; lognormal variance with pedigree 0.134, pedigree (3,4,5,1,4)
  (same comment as for waste plastic, mixture)
  production volume 0.24 kg
    (same comment as for wastewater, average)
  properties: wet mass 1 kg, water content 0.103753, dry mass 0.906 kg, carbon content, fossil 0.0347572
- chemical, organic: 0.099 kg; source CPM 2006; lognormal variance with pedigree 0.134, pedigree (3,4,5,1,4)
  Estimation. An average input of about 0.99 kg of auxiliaries per kg of produced capacitors is calculated. The substances with the highest amount have been chosen here.
  EcoSpold01Location=GLO
  Uncertainty: assumption from conclusion by analogy (using capacitors)
  properties: wet mass 1 kg, dry mass 1 kg, carbon content, fossil 0.628, heating value, net 19.03 MJ
  note on carbon content, fossil: This dataset is an unweighted average of 20 organic substances (listed in Tab 88.1, ecoinvent v2.2 report 8, part II), being part of the top100 chemicals included in this database. The C-content has also been calculated as an unweighted average of the C content of the substances composing this dataset.
- ethyl acetate: 0.396 kg; source CPM 2006; lognormal variance with pedigree 0.134, pedigree (3,4,5,1,4)
  EcoSpold01Location=RER
  Estimation. An average input of about 0.99 kg of auxiliaries per kg of produced capacitors is calculated. The substances with the highest amount have been chosen here.
  Uncertainty: assumption from conclusion by analogy (using capacitors)
  properties: heating value, net 31.32 MJ, wet mass 1 kg, dry mass 1 kg, carbon content, fossil 0.545455
- acetone, liquid: 0.0263016, 0.0726984 kg (2 entries); source CPM 2006; lognormal variance with pedigree 0.134, pedigree (3,4,5,1,4)
  (same comment as for acetone, liquid)
- wastewater, average: -0.0468692, -0.00507037, -0.0980604 m3 (3 entries); lognormal variance with pedigree 0.134, pedigree (3,4,5,1,4)
  (same comment as for wastewater, average)
  production volume 0.15 m3
- spent solvent mixture: -0.181427, -0.00425055, -0.464322 kg (3 entries); source EPCOS 2006; lognormal variance with pedigree 0.134, pedigree (3,4,5,1,4)
  (same comment as for spent solvent mixture)
  production volume 0.65 kg
- methyl ethyl ketone: 0.108492, 0.287508 kg (2 entries); source CPM 2006; lognormal variance with pedigree 0.134, pedigree (3,4,5,1,4)
  (same comment as for acetone, liquid)
- waste plastic, mixture: -0.0231011, -0.00178096, -0.000735601, -0.000698522, -0.0266546, -0.000297174, -0.000134691, -0.186597 kg (8 entries); source EPCOS 2006; lognormal variance with pedigree 0.134, pedigree (3,4,5,1,4)
  (same comment as for waste plastic, mixture)
  production volume 0.24 kg

## Inputs from nature
- Water, unspecified natural origin [natural resource, in water]: 0.15 m3; name water_UNO_input; source EPCOS 2007; lognormal variance with pedigree 0.134, pedigree (3,4,5,1,4)
  Proxy, the estimation for capacitors is used.
  Proxy, the estimation for capacitors is used.
  Uncertainty: average from literature & CER
- Water, cooling, unspecified natural origin [natural resource, in water]: 0.13 m3; name water_cooling_UNO_input; source EPCOS 2007; lognormal variance with pedigree 0.134, pedigree (3,4,5,1,4)
  Proxy, the estimation for capacitors is used.
  Proxy, the estimation for capacitors is used.
  Uncertainty: assumption from conclusion by analogy (using capacitors)

## Emissions to nature
- NMVOC, non-methane volatile organic compounds, unspecified origin [air, urban air close to ground]: 0.034 kg; source EPCOS 2006; lognormal variance with pedigree 0.244, pedigree (3,4,5,1,4)
  Proxy, an average output of 0.34 kg of air emissions per kg of produced capacitors is used. The output amount is split up assuming that the emissions have a similar distribution like the auxiliaries input.
  Uncertainty: calculated from input of auxillaries
- Acetone [air, urban air close to ground]: 0.034 kg; source EPCOS 2006; lognormal variance with pedigree 0.244, pedigree (3,4,5,1,4)
  (same comment as for NMVOC, non-methane volatile organic compounds, unspecified origin)
- Ethyl acetate [air, urban air close to ground]: 0.136 kg; source EPCOS 2006; lognormal variance with pedigree 0.244, pedigree (3,4,5,1,4)
  (same comment as for NMVOC, non-methane volatile organic compounds, unspecified origin)
- Water [air, unspecified]: 0.059525 m3; name water_to_air_unspecified; = (water_cooling_UNO_input*fraction_CW_to_air)+(water_UNO_input*fraction_PW_to_air); lognormal variance with pedigree 0.0807, pedigree (2,2,5,1,1)
  Calculated value based on literature values and expert opinion. See comments in the parametres' comment field.
  property fraction, origin: unspecified 1; name fraction_origin_unspecified
  property fraction, origin: fresh water 0; name fraction_origin_fresh_water
  property fraction, origin: salt water 0; name fraction_origin_salt_water
- Water [water, unspecified]: 0.070475 m3; name water_to_water_unspecified; = water_cooling_UNO_input*(1-fraction_CW_to_air)+water_UNO_input*(1-fraction_PW_to_air)-0.15; lognormal variance with pedigree 0.0807, pedigree (2,2,5,1,1)
  (same comment as for Water)
  property fraction, origin: salt water 0; name fraction_origin_salt_water_Ww
  property dry mass 0 kg; name DM
  property carbon content, fossil 0; name C_content_fossil
  property carbon content, non-fossil 0; name C_content_non_fossil
  property fraction, origin: unspecified 1; name fraction_origin_unspecified_Ww
  property fraction, origin: fresh water 0; name fraction_origin_fresh_water_Ww
  property water in wet mass 1000 kg; name WWM
  property wet mass 1000 kg; name WM
- Methyl ethyl ketone [air, urban air close to ground]: 0.136 kg; source EPCOS 2006; lognormal variance with pedigree 0.244, pedigree (3,4,5,1,4)
  (same comment as for NMVOC, non-methane volatile organic compounds, unspecified origin)

## Sampling procedure
own estimation

## Extrapolations
This dataset has been extrapolated from year 2005 to the year of the calculation (2021). The uncertainty has been adjusted accordingly.

## Review by Roland Hischier 2011-09-21
Transfer of documentation done.

## Review by Rolf Frischknecht 2007-09-14
passed
