# ethoxylated alcohol (AE>20) production, palm oil

Dataset: EcoSpold 2, unit process
Geography: RER
Time period: 2015-01-01 to 2021-12-31
Technology level: current
Classification: ISIC rev.4 ecoinvent: 2023:Manufacture of soap and detergents, cleaning and polishing preparations, pe
Synonyms: non-ionic surfactants
Scenario: Business-as-Usual
System model: Allocation, cut-off by classification
Share of production covered: 40 %
Generated by: Lucia Valsasina
Database: ecoinvent
isCopyrightProtected: true
accessRestrictedTo: 1

## General comment
This dataset represents the production of 1 kg of ethoxylated alcohol with eleven polyether units (AE21) from C16-C18 fatty alcohol. Ethoxylated alcohols are non-ionic surfactants produced from the reaction of ethylene oxide and alcohol.
Ethoxilated alcohols are mainly used to produce detergents, in the cosmetic industry, in agricultural and textile products, and they can also be used in paints. Because of their structural variety, AE have very different physical and chemical properties. In comparison with other tensides like anionic surfactants, alcohol ethoxylates exhibit a better fat soil removal capacity, especially at low temperatures.
Reference:
Zah R., Hischier R. (2007) Life Cycle Inventories of Detergents. ecoinvent report No. 12. Swiss Centre for Life Cycle Inventories, Dübendorf, 2007.
For more information on the model please refer to the dedicate ecoinvent report, access it in the Report section of ecoQuery (http://www.ecoinvent.org/login-databases.html)

## Included activities start
From reception of fatty alcohol , ethylene oxide, and nitrogen at the factory gate.

## Included activities end
This activity ends with 1 kg of ethoxylated alcohol (AE21). The dataset includes material and energy input, transport, infrastructure, production of waste and emissions to water and air. The datset doesn't include water consumption.

## Geography
Data based on the European ethoxylated alcohols production

## Technology
Alcohol ethoxylates (AE) are produced by the reaction of fatty alcohols with ethylene oxide leading to a condensation of polyethylene glycolether groups on the alcohol chains. The fatty alcohols can be derived from petrochemical, palm kernel, or coconut oil. The reaction takes place at temperatures ranging from 150°C to 200°C. The grade of ethoxylation, e.g. the specific number of polyether units condensed to the alcohol chains, is controlled by the concentration of ethylene oxide in the ethoxylation process.
This is an average technology for the production of AE representing typical European production mix in the mid 90s.
Reference:
Schul W. (1995) A Life-Cycle Inventory for the Production of Detergent Range Alcohol Ethoxylates in Europe. In: Tenside, Surfactants, Detergents, 32(2), pp. 171-192.
Stalmans M., Berenbold H., Berna J. L., Cavalli L., Dillarstone A., Franke M., Hirsinger F., Janzen D., Kosswig K., Postlethwaite D., Rappert T., Renta C., Scharer D., Schick K.-P., Schul W., Thomas H. and Sloten R. V. (1995) European Life-Cycle Inventory for Detergent Surfactants Production. In: Tenside, Surfactants, Detergents, 32(2), pp. 84-109

## Time period
data of published literature

## Reference product
- ethoxylated alcohol (AE>20): 1 kg; name RP; By-product classification allocatable product; CPC 35310: Organic surface active agents, except soap
  Ethoxylated alcohols are non-ionic surfactants produced from the reaction of ethylene oxide and alcohol.
  Ethoxilated alcohols are mainly used to produce detergents, in the cosmetic industry, in agricultural and textile products, and they can also be used in paints. Because of their structural variety, AE have very different physical and chemical properties. In comparison with other tensides like anionic surfactants, alcohol ethoxylates exhibit a better fat soil removal capacity, especially at low temperatures.
  Reference:
  Zah R., Hischier R. (2007) Life Cycle Inventories of Detergents. ecoinvent report No. 12. Swiss Centre for Life Cycle Inventories, Dübendorf, 2007.
  production volume 252300 kg; name RP_PV; = 17.4%*50%*1%*290000000
    "Estimated value. The European production volume is estimated based on information from Cefic (European Chemical Industry Council) and the American Chemistry Council.
    According to Cefic (2016) the global sales of chemicals in the year 2015 was 3 534 billion euros. The reported share of sales per region are: EU28 14.7%; Other Europe (Switzerland, Norway, Turkey, Russia and Ukraine) 2.7%; NAFTA (US, Canada and Mexico) 16.5%; Latin America 3.8%; China 39.9%; Japan 3.9%; Republic of Korea 3.2%; India 2.2%; Rest of Asia 11.9%; Rest of the World 1.3%, Switzerland 1%. Cefic also reports the US total sales, which amount to 518.7 billion euros out of the global 3 534 billion euros (14.7%). The same share is reported by the American Chemistry Council (2016), according to which the USA sales account for 15% of global sales for the year 2016.
    Estimated value. According to HERA (2009) the global production volume is estimated to be 290000000 kg for the year of 2003. Moreover, it is assumed that 50% of ethoxylated alcohols originate from vegetable oil sources whilst the remaining 50% comes from petrochemical origins. It is furthermore assumed that the amount of it, that is produced from palm coconut oil is relative to the actual share of palm oil in the vegetable oil market, a value calculated from FAOSTAT assuming that palm (51%), palm kernel (6%), coconut (3%) and soybean oil (41%) formulate the market of vegatable oils. In addition, according to HERA 2009, the distribution of AE>20 on household products is 1%.
    Reference:
    HERA 2009, Human & Environmental Risk Assessment on ingredients of European household cleaning products, Alcohol Ethoxylates, September 2009.
    FAOSTAT, 2017, Food and Agricultural Organization of the United Nations. Accessible at: http://www.fao.org/faostat/en/#data/QD
    Cefic 2016. Facts and figures 2016 of the European chemical industry. Accessible at: http://www.cefic.org/Facts-and-Figures/Chemicals-Industry-Profile/
    American Chemistry Council 2016. Outlook: U.S. Chemical Industry Continues to Outpace Industrial Output; Accounts for More Than One-Half of Construction Spending by Manufacturing Sector. Accessible at: https://www.americanchemistry.com/Media/PressReleasesTranscripts/ACC-news-releases/US-Chemical-Industry-Continues-to-Outpace-Industrial-Output.html"
  property heating value, net 29.26 MJ
    LHV is calculated based on the elemental composition of the representative substance polysorbate 80. Based on the CAS number of the substance (009005-65-6), the chemical formula of the substance is found to be: C64H124O26, (PubChem 2020).
    Reference: Kim, S., Chen, J., Cheng, T., Gindulyte, A., He, J., He, S., Li, Q., Shoemaker, B. A., Thiessen, P. A., Yu, B., Zaslavsky, L., Zhang, J., & Bolton, E. E. (2019). PubChem 2019 update: improved access to chemical data. Nucleic acids research, 47(D1), D1102–D1109. https://doi.org/10.1093/nar/gky1033
  property price 1.48031 EUR2005; name RP_price_EUR2005
    Calculated based on inputs: The price of the product has been calculated as a sum of the values of the material and energy inputs for this product. This value is therefore a rough estimation. It may underestimate the real price since there are additional expenses when producing any product. These expences can include for example labour costs, treatment of waste materials and profit for the producer. Please consider carefully whether this level of data quality is acceptable for your application.
  property carbon content 0.527
    carbon content on a dry matter basis (reserved; not for manual entry)
  properties: dry mass 1 kg, carbon content, fossil 0, carbon content, non-fossil 0.527, water in wet mass 0 kg, water content 0, wet mass 1 kg, carbon allocation 0.527 kg

## Inputs from technosphere
- electricity, medium voltage: 0.0624 kWh; lognormal variance with pedigree 0.010025, pedigree (2,3,2,2,3)
  Literature value. Please see Zah R., Hischier R. (2007) Life Cycle Inventories of Detergents. ecoinvent report No. 12. Swiss Centre for Life Cycle Inventories, Dübendorf, 2007. Avilable on the ecoinvent website (http://www.ecoinvent.org/login-databases.html)
- nitrogen, liquid: 0.019 kg; lognormal variance with pedigree 0.010025, pedigree (2,3,2,2,3)
  Calculated based on literature data published by the industry. This value is a 5-year average of data (2011 - 2015) published by the Gendorf factory (Gendorf, 2016, Umwelterklärung, www.gendorf.de), (Gendorf, 2015, Umwelterklärung, www.gendorf.de), (Gendorf, 2014, Umwelterklärung, www.gendorf.de). The amount of nitrogen used per kg of chemical substance produced is calculated using literature data published by the Gendorf factory based in Germany, which produces a wide range of chemical substances. The factory produced 1657400 tonnes of chemical substances in the year 2015 (Gendorf, 2016, Umwelterklärung, www.gendorf.de) and 740000 tonnes of intermediate products. The reported amount of nitrogen used in 2015 was 33512400 Nm3 (Gendorf, 2016, Umwelterklärung, www.gendorf.de). One Nm3 of nitrogen is equal to 1.2506 kg. The resulting amount of nitrogen - the 5-year average (2011 - 2015, weighted by production volume) is 0.019 kg/kg. Nitrogen is mainly used during the production of chemicals for 'blanketing', which is the process of applying gas to the vapour space of a container or vessel in order to control its composition.
  properties: dry mass 1 kg, wet mass 1 kg
- ethylene oxide: 0.92505 kg; lognormal variance with pedigree 0.010025, pedigree (2,3,2,2,3)
  (same comment as for electricity, medium voltage)
  properties: dry mass 1 kg, carbon content, fossil 0.545455, wet mass 1 kg, heating value, net 27.53 MJ
- heat, from steam, in chemical industry: 0.7 MJ; lognormal variance with pedigree 0.010025, pedigree (2,3,2,2,3)
  (same comment as for electricity, medium voltage)
  properties: heating value, net 1 MJ
- chemical factory, organics: 4e-10 unit; lognormal variance with pedigree 0.309425, pedigree (2,3,2,2,3)
  Calculated based on literature data published by the industry. For this activity, no information was readily available concerning infrastructure and land-use. Therefore, the infrastructure is estimated based on data from two chemical factories, the BASF site of Ludwigshafen and the chemical factory in Gendorf (which are both located in Germany), which produce a wide range of chemical substances. Based on this data, the following assumptions are made: the built area amounts to about 4.2 ha, the plant has an average output of 50'000 t/a and a lifespan of fifty years. The estimated infrastructure amount is therefore 4.00 E-10 units per kg of produced chemical.
  References:
  Althaus H.-J., Chudacoff M., Hischier R., Jungbluth N., Osses M. and Primas A. (2007) Life Cycle Inventories of Chemicals. ecoinvent report No. 8, v2.0. EMPA Dübendorf, Swiss Centre for Life Cycle Inventories, Dübendorf, CH.
  Gendorf (2000) Umwelterklärung 2000, Werk Gendorf. Werk Gendorf, Burgkirchen.
- fatty alcohol: 0.186334 kg; lognormal variance with pedigree 0.010025, pedigree (2,3,2,2,3)
  (same comment as for electricity, medium voltage)
  properties: wet mass 1 kg, carbon content, non-fossil 0.743434, dry mass 1 kg, carbon content, fossil 0.0408973, heating value, net 41.01 MJ

## Emissions to nature
- Hydrocarbons, unspecified [water, surface water]: 5.68e-8 kg; lognormal variance with pedigree 0.0106, pedigree (2,3,2,4,3)
  (same comment as for electricity, medium voltage)
- Particulates, > 10 um [air, urban air close to ground]: 0.00108 kg; lognormal variance with pedigree 0.0106, pedigree (2,3,2,4,3)
  (same comment as for electricity, medium voltage)
- Acidity, unspecified [water, surface water]: 4.4e-7 kg; lognormal variance with pedigree 0.0106, pedigree (2,3,2,4,3)
  (same comment as for electricity, medium voltage)
- BOD5, Biological Oxygen Demand [water, unspecified]: 3.43166e-5 kg; lognormal variance with pedigree 0.218, pedigree (4,5,5,5,5)
  Calculated value. The BOD, COD, TOC and BOD5 are calculated based on the amount and type of emissions released to water in the same activity.
- Dissolved solids [water, surface water]: 0.00167 kg; lognormal variance with pedigree 0.0106, pedigree (2,3,2,4,3)
  (same comment as for electricity, medium voltage)
- Oils, unspecified [water, surface water]: 1.23e-5 kg; lognormal variance with pedigree 0.0106, pedigree (2,3,2,4,3)
  (same comment as for electricity, medium voltage)
- TOC, Total Organic Carbon [water, unspecified]: 9.45177e-6 kg; lognormal variance with pedigree 0.218, pedigree (4,5,5,5,5)
  (same comment as for BOD5, Biological Oxygen Demand)
- Chromium, ion [water, surface water]: 7.24e-7 kg; lognormal variance with pedigree 0.0106, pedigree (2,3,2,4,3)
  (same comment as for electricity, medium voltage)
- NMVOC, non-methane volatile organic compounds, unspecified origin [air, urban air close to ground]: 0.00303 kg; lognormal variance with pedigree 0.0106, pedigree (2,3,2,4,3)
  (same comment as for electricity, medium voltage)
- DOC, Dissolved Organic Carbon [water, unspecified]: 9.45177e-6 kg; lognormal variance with pedigree 0.218, pedigree (4,5,5,5,5)
  (same comment as for BOD5, Biological Oxygen Demand)
- Carbon monoxide, fossil [air, urban air close to ground]: 3.25e-5 kg; lognormal variance with pedigree 0.0106, pedigree (2,3,2,4,3)
  (same comment as for electricity, medium voltage)
- Nitrogen oxides [air, urban air close to ground]: 0.000115 kg; lognormal variance with pedigree 0.0106, pedigree (2,3,2,4,3)
  (same comment as for electricity, medium voltage)
- Zinc, ion [water, surface water]: 1.79e-7 kg; lognormal variance with pedigree 0.0106, pedigree (2,3,2,4,3)
  (same comment as for electricity, medium voltage)
- Carbon dioxide, non-fossil [air, urban air close to ground]: 0.223 kg; lognormal variance with pedigree 0.0106, pedigree (2,3,2,4,3)
  (same comment as for electricity, medium voltage)
- Nitrogen [water, surface water]: 3.28e-5 kg; lognormal variance with pedigree 0.0106, pedigree (2,3,2,4,3)
  (same comment as for electricity, medium voltage)
- Suspended solids, unspecified [water, surface water]: 0.000214 kg; lognormal variance with pedigree 0.0106, pedigree (2,3,2,4,3)
  (same comment as for electricity, medium voltage)
- Carbon dioxide, fossil [air, urban air close to ground]: 0.0108 kg; lognormal variance with pedigree 0.0106, pedigree (2,3,2,4,3)
  (same comment as for electricity, medium voltage)
- Methane, fossil [air, urban air close to ground]: 0.00782 kg; lognormal variance with pedigree 0.0106, pedigree (2,3,2,4,3)
  (same comment as for electricity, medium voltage)
- Sulfur dioxide [air, urban air close to ground]: 0.000374 kg; lognormal variance with pedigree 0.0106, pedigree (2,3,2,4,3)
  (same comment as for electricity, medium voltage)
- Ammonium, ion [water, surface water]: 1.52e-9 kg; lognormal variance with pedigree 0.0106, pedigree (2,3,2,4,3)
  (same comment as for electricity, medium voltage)
- Iron, ion [water, surface water]: 6.15e-9 kg; lognormal variance with pedigree 0.0106, pedigree (2,3,2,4,3)
  (same comment as for electricity, medium voltage)
- Phenol [water, surface water]: 9.47e-10 kg; lognormal variance with pedigree 0.0106, pedigree (2,3,2,4,3)
  (same comment as for electricity, medium voltage)
- Aldehydes, unspecified [air, urban air close to ground]: 1.19e-5 kg; lognormal variance with pedigree 0.0106, pedigree (2,3,2,4,3)
  (same comment as for electricity, medium voltage)
- COD, Chemical Oxygen Demand [water, unspecified]: 3.43166e-5 kg; lognormal variance with pedigree 0.218, pedigree (4,5,5,5,5)
  (same comment as for BOD5, Biological Oxygen Demand)

## Sampling procedure
data out of ECOSOL study of European Surfactant Industry. Common translation rules used, reported in Chemical report (Althaus et al. 2003).

## Extrapolations
This dataset has been extrapolated from year 2020 to the year of the calculation (2021). The uncertainty has been adjusted accordingly.

## Review by Emilia Moreno Ruiz 2017-08-09
This dataset was additionally reviewed in a separate review process by Eric Johnson of Atlantic Consulting as well as Emilia Moreno Ruiz and Gregor Wernet of ecoinvent.
