# polyurethane production, flexible foam, TDI-based, flame retardant

Dataset: EcoSpold 2, unit process
Geography: RER
Time period: 1997-01-01 to 2021-12-31
Technology level: current
Classification: ISIC rev.4 ecoinvent: 2013:Manufacture of plastics and synthetic rubber in primary forms
Synonyms: flexible polyurethane foams FPF PU
Scenario: Business-as-Usual
System model: Allocation, cut-off by classification
Generated by: EUROPUR
Published in: EUROPUR 2015
Database: ecoinvent
isCopyrightProtected: true
accessRestrictedTo: 1

## General comment
This dataset represents the production of 1 kg of one possible composition of polyurethane (PUR) flexible foam (density 40 to 54 kg/m³). Flexible polyurethane foam is used to manufacture mattresses, upholstered furniture and car seats, but also acoustic insulation boards, carpet underlays, household sponges, clothing and sportswear, packaging and many other applications. More specifically, the high density TDI-based grades are typically used in furniture and bedding, whereas the low-density TDI-based grades are preferred for insulation, packaging, building and footwear. Especially for applications in the automotive industry, a flame retardant (such as melamine) is often added to the flexible PU foam. This dataset models the production of PUR foam from polyol and toluene diisocyanate (TDI). The inventory is estimated based on industrial data.
References:
Adam, N., Avar, G., Blankenheim, H., Friederichs, W., Giersig, M., Weigand, E., Halfmann, M., Wittbecker, F.-W., Larimer, D.-R., Maier, U., Meyer-Ahrens, S., Noble, K.-L. and Wussow, H.-G. 2005. Polyurethanes. Ullmann's Encyclopedia of Industrial Chemistry.
König, A.; Fehrenbacher, U.; Hirth, T. (2008): Flexible Polyurethane Foam with the Flame-retardant Melamine, Journal of Cellular Plastics, 44, 469 - 480.
[This dataset is meant to replace the following datasets:]

## Included activities start
From reception of raw materials at the factory gate.

## Included activities end
This activity ends with the production of 1 kg of PUR flexible foam.

## Geography
Typical composition for European conditions.

## Technology
Polyurethane is made by reacting diisocyanates and polyols. To generate PU foam, addition of water to the main reagents causes a side reaction producing carbon dioxide, which acts as a blowing agent. Flexible slabstock polyurethane foams are produced as large blocks using a continuous process with minimal human handling. Continuous foam machines are the standard in Europe today.
Reference:
The full report can be accessed here: https://www.europur.org/images/20150821_EPD_EUROPUR_PU_foam.pdf (last accessed 2020-12-14).

## Time period
Time of publications.

## Parameters
- fraction, process water, to air: 0.205 dimensionless; name fraction_PW_to_air; lognormal variance with pedigree 0.092025, pedigree (4,4,3,2,4)
  Literature value (Statistics Canada, 2007 & Shaffer, K.H., 2008, Consumptive water use in the Great Lakes Basin, USGS) (Vionnet, S., Quantis Water Database - Technical Report, 2012).

## Reference product
- polyurethane, flexible foam, flame retardant: 1 kg; name RP; By-product classification allocatable product; CAS 9009-54-5
  production volume 8.5e6 kg; name RP_PV
    The amount of total production of flexible polyurethane foam in 2018 in EU28 was of 1.7 million t, information taken from Austin, A. 2019. The European flexible PU foam market report for 2018. PU magazine vol 16, NO.4 - August/September 2019. The figures were provided by Europur. According to the article roughly half of the amount of MDI compared to TDI was consumed to produce flexible foam. Based on the amount of MDI/TDI consumed in the process, the split between MDI and TDI based polyurethane foams has been calculated. A 50/50 split was assumed among the two types of TDI products. 5% of overall foams are assumed to be flame retardant based on lack of data, assuming flame retardant foams belong to the "other" category in figure 2 of the article.
  property price 1.29 EUR2005; name RP_price_EUR2005
    Calculated from EU prices by use of exchange rates.
  property carbon content 0.63383
    carbon content on a dry matter basis (reserved; not for manual entry)
  properties: water in wet mass 0 kg, dry mass 1 kg, carbon content, non-fossil 0, water content 0, wet mass 1 kg, carbon content, fossil 0.63383, carbon allocation 0.63383 kg

## By-products
- waste paper, unsorted: 0 kg; By-product classification Recyclable; CPC 39240: Waste and scrap of paper or paperboard; pedigree (1,1,1,1,1)
  production volume 0 kg; = RP_PV * ( BP_waste_paper / RP)
    Calculated from production volume of reference product using the relative outputs.
  property price 0.093 EUR2005; name BP_waste_paper_price_EUR2005
    Temporary price data. Calculated as 90% of purchasers price based on: Assumed to be 10% less than for sorted waste paper
  properties: heating value, net 14.11 MJ, water in wet mass 0 kg

## Inputs from technosphere
- glycerine: 0.000364 kg; lognormal variance with pedigree 0.0015, pedigree (2,2,2,1,1)
  properties: heating value, net 22.38 MJ, wet mass 1 kg, carbon content, non-fossil 0.391304, dry mass 1 kg
- polyol: 0.679 kg; lognormal variance with pedigree 0.0015, pedigree (2,2,2,1,1)
  properties: dry mass 1 kg, carbon content, fossil 0.640856, heating value, net 19.42 MJ, wet mass 1 kg
- water, deionised: 0 kg; pedigree (1,1,1,1,1)
  properties: wet mass 1 kg
- diethanolamine: 0.00541 kg; lognormal variance with pedigree 0.0015, pedigree (2,2,2,1,1)
  properties: dry mass 1 kg, wet mass 1 kg, carbon content, fossil 0.457143, heating value, net 26.52 MJ
- diethylene glycol: 0.000121 kg; lognormal variance with pedigree 0.0015, pedigree (2,2,2,1,1)
  properties: dry mass 1 kg, wet mass 1 kg, carbon content, fossil 0.45283, heating value, net 25.14 MJ
- silicon, metallurgical grade: 0.0214789 kg; lognormal variance with pedigree 0.0015, pedigree (2,2,2,1,1)
  properties: dry mass 1 kg, wet mass 1 kg
- chemical, organic: 0.00147 kg; lognormal variance with pedigree 0.0415, pedigree (2,2,2,1,4)
  Chemical, organic includes: Bis(2-dimethylaminoethyl) ether (BDMAEE), Red Pigment, Tin(II) 2-ethylhexanoate and Zinc 2-ethylhexanoate.
  properties: dry mass 1 kg, wet mass 1 kg, carbon content, fossil 0.628, heating value, net 19.03 MJ
  note on carbon content, fossil: This dataset is an unweighted average of 20 organic substances (listed in Tab 88.1, ecoinvent v2.2 report 8, part II), being part of the top100 chemicals included in this database. The C-content has also been calculated as an unweighted average of the C content of the substances composing this dataset.
- triphenyl phosphate: 0.04105 kg; lognormal variance with pedigree 0.0415, pedigree (2,2,2,1,4)
  properties: heating value, net 25.65 MJ
- waste paint: 0 kg; name BP_waste_paint; pedigree (1,1,1,1,1)
  production volume 0 kg
    Calculated from production volume of reference product using the relative outputs.
  property price 0 EUR2005; name BP_waste_paint_price_EUR2005
  properties: dry mass 1 kg, carbon content, fossil 0.65, wet mass 1 kg, heating value, net 19.7 MJ
- nitrogen, liquid: 0.00219 kg; lognormal variance with pedigree 0.0015, pedigree (2,2,2,1,1)
  properties: dry mass 1 kg, wet mass 1 kg
- urea: 0.00174 kg; lognormal variance with pedigree 0.0015, pedigree (2,2,2,1,1)
  properties: dry mass 1 kg, carbon content, fossil 0.2, wet mass 1 kg
- glucose: 0.00266 kg; lognormal variance with pedigree 0.0015, pedigree (2,2,2,1,1)
  properties: heating value, net 20.19 MJ
- waste plastic, mixture: -0.00658 kg; name BP_waste_plastic; lognormal variance with pedigree 0.0015, pedigree (2,2,2,1,1)
  production volume 55930 kg; = RP_PV * ( BP_waste_plastic / RP)
    Calculated from production volume of reference product using the relative outputs.
  property price 0 EUR2005; name BP_waste_plastic_price_EUR2005
  properties: carbon content, fossil 0.747344, water content 0.180638, dry mass 0.847 kg, wet mass 1 kg, heating value, net 30.79 MJ
  note on heating value, net: Value taken from the general comment of the treatment dataset.
- N-methyl-2-pyrrolidone: 0.000132928 kg; lognormal variance with pedigree 0.0015, pedigree (2,2,2,1,1)
  properties: carbon content, fossil 0.585366, dry mass 1 kg, wet mass 1 kg, heating value, net 29.36 MJ
- compressed air, 1000 kPa gauge: 0.000437 m3; lognormal variance with pedigree 0.0015, pedigree (2,2,2,1,1)
- packaging film, low density polyethylene: 0.00166 kg; lognormal variance with pedigree 0.0015, pedigree (2,2,2,1,1)
  properties: wet mass 1 kg, dry mass 1 kg, heating value, net 42.47 MJ, carbon content, fossil 0.857143
- waste polyurethane: -0.00240522 kg; name BP_waste_polyurethane; lognormal variance with pedigree 0.0015, pedigree (2,2,2,1,1)
  production volume 20444.4 kg; = RP_PV * ( BP_waste_polyurethane / RP)
    Calculated from production volume of reference product using the relative outputs.
  property price 0 EUR2005; name BP_waste_polyurethane_price_EUR2005
  properties: heating value, net 30.67 MJ, wet mass 1 kg, carbon content, fossil 0.64128, water content 0.00200401, dry mass 0.998 kg
- cyclic N-compound: 0.000317389 kg; lognormal variance with pedigree 0.0015, pedigree (2,2,2,1,1)
  properties: dry mass 1 kg, carbon content, fossil 0.641962, wet mass 1 kg
- electricity, medium voltage: 0.0254 kWh; lognormal variance with pedigree 0.0015, pedigree (2,2,2,1,1)
- lime, hydrated, packed: 0.0194 kg; lognormal variance with pedigree 0.0015, pedigree (2,2,2,1,1)
  properties: wet mass 1 kg, dry mass 0.997 kg, water content 0.00300903
- paper, woodcontaining, supercalendered: 0.00623542 kg; lognormal variance with pedigree 0.0015, pedigree (2,2,2,1,1)
  properties: heating value, net 14.11 MJ, carbon content, fossil 0.0109646, water content 0.0582011, carbon content, non-fossil 0.289073, dry mass 0.945 kg, wet mass 1 kg
- heat, district or industrial, natural gas: 0.0333241 MJ; lognormal variance with pedigree 0.0015, pedigree (2,2,2,1,1)
  properties: heating value, net 1 MJ
- toluene diisocyanate: 0.258604 kg; lognormal variance with pedigree 0.0015, pedigree (2,2,2,1,1)
  properties: carbon content, fossil 0.62069, heating value, net 22.98 MJ, wet mass 1 kg, dry mass 1 kg
- melamine: 0.0179558 kg; lognormal variance with pedigree 0.0015, pedigree (2,2,2,1,1)
  properties: dry mass 1 kg, wet mass 1 kg, carbon content, fossil 0.285714, heating value, net 14.42 MJ
- chemical factory, organics: 4e-10 unit; lognormal variance with pedigree 0.31, pedigree (2,3,2,4,3)
- waste paper, unsorted: -0.00099 kg; lognormal variance with pedigree 0.0015, pedigree (2,2,2,1,1)
  production volume 8415 kg
  properties: heating value, net 14.11 MJ
- water, deionised: 0.0145476, 5.23679e-5 kg (2 entries); lognormal variance with pedigree 0.0015, pedigree (2,2,2,1,1)
- waste paint: -0.00013253, -3.977e-7 kg (2 entries); lognormal variance with pedigree 0.0015, pedigree (2,2,2,1,1)
  production volume 1129.89 kg

## Emissions to nature
- Particulates, > 2.5 um, and < 10um [air, unspecified]: 2.28e-8 kg; lognormal variance with pedigree 0.3009, pedigree (2,2,2,1,1)
- Carbon dioxide, fossil [air, unspecified]: 0.0413 kg; lognormal variance with pedigree 0.0015, pedigree (2,2,2,1,1)
- NMVOC, non-methane volatile organic compounds, unspecified origin [air, unspecified]: 1.78e-7 kg; lognormal variance with pedigree 0.0409, pedigree (2,2,2,1,1)

## Sampling procedure
Data based on industry report and expert judgement.

## Extrapolations
This dataset has been extrapolated from year 2020 to the year of the calculation (2021). The uncertainty has been adjusted accordingly.
