# titanium dioxide production, sulfate process

Dataset: EcoSpold 2, unit process
Geography: RoW
Time period: 2005-01-01 to 2021-12-31
Technology level: current
Classification: ISIC rev.4 ecoinvent: 2011:Manufacture of basic chemicals
Synonyms: Titanium oxide; TITANIUM DIOXIDE; Titafrance; Hombitan; Flamenco; dioxotitanium Anatase Brookite; Titanium oxide (TiO2); Titanium(IV) oxide; Titania; Titanium White; Titandioxid; Rutile
Scenario: Business-as-Usual
System model: Allocation, cut-off by classification
Generated by: Sofia Parada Tur
Published in: European Comission 2007
Database: ecoinvent
isCopyrightProtected: true
accessRestrictedTo: 1

## General comment
This dataset represents the production of 1 kg of titanium dioxide using concentrated sulfuric acid. Titanium dioxide (TiO2) is available as a white powder. It is stable and nontoxic. Titanium dioxide exists in natural minerals (rutile).
This dataset is based on data published by the European Commission (2007).
References:
European Commission (2007) Reference Document on Best Available Techniques for the Manufacture of Large Volume Inorganic Chemicals - Solids and Others industry. Integrated Pollution Prevention and Control. European Commission, Institute for Prospective Technological Studies, Edificio Expo.

## Included activities start
From reception of raw materials at the factory gate.

## Included activities end
This activity ends with the production of titanium dioxide. The dataset includes all raw materials, energy use, infrastructure, process emissions and waste.

## Geography
Average values of European producers. The inventory is assumed to be representative of the global production.

## Technology
The present inventory uses low concentration ore ilmenite. The presence of iron in ilmenite leads to the cogeneration of iron sulfate. The sulfate process consists of the following sequential stages
1. raw material import and preparation. The ore is stored in covered silos to avoid drying in case it becomes wet. It is then ground using large ball mills to produce particles typically 40-60 um for efficient dissolution with concentrated sulfuric acid. The main emissions at this stage are dust. This is collected by discharging the gas through bag filters.
2. Digestion: reporting by EU producers indicates operation in batches is commonly used. The ilmenite is mixed with highly concentrated sulfuric acid (80-95%) and this is necessary to digest the feedstock containing TiO2. A highly exothermic reaction is initated by the addition of a measured quantity of steam at around 140°C. The equation is summarized as: FeTiO3 + 2H2SO4 = TiOSO4 + 2H2O + FeSO4 The off-gases contain small quantities of dust, sulfur dioxide and acid fumes, which are removed by scrubbing. The resulting solid cake is dissolved in water and acid recycled from subsequent washing step. The primary intermediate from the reaction is titanyl suphate (TiOSO4),
3. Reduction: the digester liquor is contacted with scrap iron. This process generates a small amount of H2, which is returned to the air.
4. Clarification and crystallization: titanyl sufate is recovered from the solution and neutralised with lime before going to landfill. This material can be also used as inert filler. The clarified solution is pumped to bacth cooler/crystalisers to remove the bulk of the iron sulfate as the solid heptahydrate 'copperas'. This is widely used in water treatment and other industries. The iron-depleted product liquor is concentrated in evaporators.
5. Hydrolysis (hydrate precipitation). The reaction is:
TiOSO4 + 2H2O = TiO(OH)2 + H2SO4
Precipitation of the hydrated TiO2 is achieved by boiling the liquor for some hours followed by cooling to 60°C. At this stage of the process, the spenc acid with a concentration of 20-25% H2SO4 and 10-15% soluble salts (mainly iron, aluminium and mangesium sulfates) arises and is either recycled or neutralised with lime to produce gypsum which is preferntially sold at local markets as a commercial product.
6. Calcination: The rotary kilns are directly fired with oil or gas. Scrubbing calciner gas treatment has been upgraded in the past in order to reduce SO2 emissions. SO2 is normally reduced to form sulfuric acid and then recycled in the process.
7. Finishing. The resulting solid is cooled, milled, coated, washed, dried and micronised.
References:
European Commission (2007) Reference Document on Best Available Techniques for the Manufacture of Large Volume Inorganic Chemicals - Solids and Others industry. Integrated Pollution Prevention and Control. European Commission, Institute for Prospective Technological Studies, Edificio Expo.

## Time period
Reference year of the production volume.

## Parameters
- fraction of cooling water which evaporates to air: 0.3875 dimensionless; name fraction_CW_to_air; = (0.5*fraction_CW_OT_to_air)+(0.5*fraction_CW_R_to_air); lognormal variance with pedigree 0.0413, pedigree (2,3,1,3,1)
  Calculated value based on literature value (see comments of the other parametres present in this dataset) and expert opinion. In the case when no industry/literature data are available about the type of cooling or directly fraction, cooling water, to air specific for the process a default assumption is applied. It is assumed that the once-through cooling system is used in 50% of all cases and recirculating system is used in another 50% of all cases. Fraction of cooling water which evaporates to air, i.e. is consumed.
- fraction, process water, to air: 0.15 dimensionless; name fraction_PW_to_air; lognormal variance with pedigree 0.092025, pedigree (4,4,3,2,4)
  Literature value. In case when no industry/process specific data are available, default evaporation fraction value is used. This value is 15% and is based on literature (Statistics Canada, 2007 & Shaffer, K.H., 2008, Consumptive water use in the Great Lakes Basin, USGS & Shiklomanov, 2003, World Water Resources at the Beginning of the 21st Century) and has been approved by an expert.
- fraction of cooling water which evaporates to air, once-through cooling system: 0.004 dimensionless; name fraction_CW_OT_to_air; lognormal variance with pedigree 0.0413, pedigree (2,3,1,3,1)
  Calculated based on literature value (Scown, C.D., 2011, Water Footprint of U.S. Transportation Fuels and supplying information of the article) supplied by Quantis.
- fraction of cooling water which evaporates to air, recirculating cooling system: 0.771 dimensionless; name fraction_CW_R_to_air; lognormal variance with pedigree 0.0413, pedigree (2,3,1,3,1)
  (same comment as for fraction of cooling water which evaporates to air, once-through coolin)

## Reference product
- titanium dioxide: 1 kg; name titanium_dioxide; source European Comission 2007; CPC 14290: Other non-ferrous metal ores and concentrates (other than uranium or thorium ores and concentrates); By-product classification allocatable product; CAS 13463-67-7
  Titanium dioxide commonly appears in the form of a white powder. Titanium dioxide produced by the sulfate process is preferred for paper, ink, rubber and a variety of specialty applications.
  production volume 1.55623e9 kg; name RP_PV; = 6.3*1E9*0.5
    According to Iluka (2019), the global production capacity for titanium dioxide pigment using both the chloride and sulfate processes was estimated to be 6.3 million tonnes in 2018. The production capacity is used as best estimate of the production volume.
    Furthermore, the split between sulfate and chloride is approximately 50:50 (Iluka 2019).
    Reference:
    Iluka (2019). Mineral Sands Industry Information. https://www.iluka.com/CMSPages/GetFile.aspx?guid=bd24ecdc-5b71-4681-9340-87c85555cca5
  property price 105.11 EUR2005
    Calculated as five year geometric mean of prices from USGS Minerals Yearbooks' 2011-2015 (US price used as a proxy for GLO price)
  property carbon content 0
    carbon content on a dry matter basis (reserved; not for manual entry)
  properties: carbon content, non-fossil 0, water in wet mass 0 kg, water content 0, carbon content, fossil 0, dry mass 1 kg, wet mass 1 kg, carbon allocation 0 kg

## Inputs from technosphere
- lime, hydrated, packed: 0.363 kg; = 363/1000; source European Comission 2007; lognormal variance with pedigree 0.0028, pedigree (1,3,2,5,1)
  Industrial value. In average 363 kg of hydrated lime is needed for 1 tonne of TiO2. Material for finishing and abatement system of aqueous emissions.
  properties: wet mass 1 kg, dry mass 0.997 kg, water content 0.00300903
- iron scrap, sorted, pressed: 0.15 kg; = 150/1000; source European Comission 2007; lognormal variance with pedigree 0.0034, pedigree (1,3,2,5,1)
  Industrial value. in average 150 kg of scrap iron is needed for 1 tonne of TiO2. The usage is primarily dependent on the amount of ferric iron in the system.
  property water content 0; name water_content
  property carbon content, fossil 0; name C_content_fossil
  property water in wet mass 0 kg; name WWM
  property carbon content, non-fossil 0; name C_content_non_fossil
  property dry mass 1 kg; name DM
  property wet mass 1 kg; name WM
- lime, packed: 1.38 kg; name lime_amount; = 1380/1000; source European Comission 2007; lognormal variance with pedigree 0.0028, pedigree (1,3,2,5,1)
  Industrial value. Neutralisation material
  Uncertainty: a
  properties: carbon content, fossil 0.117492, dry mass 0.998 kg, water content 0.00200401, wet mass 1 kg
  note on carbon content, fossil: Table 3.1, ecoinvent v2.2 report 7, part VII, pg 3. MW CaCO3=100, MW MgCO3=84
- sodium hydroxide, without water, in 50% solution state: 0.09 kg; = 90/1000; source European Comission 2007; lognormal variance with pedigree 0.0028, pedigree (1,3,2,5,1)
  Industrial value. Average NaOH used for the abatement systems of aqueous emissions and the finishing step. Values given in kg per tonne TiO2
  Uncertainty: a
  properties: dry mass 1 kg, heating value, net 3.03 MJ, wet mass 1 kg
- sulfuric acid: 2.362 kg; = 2362/1E3; source European Comission 2007; lognormal variance with pedigree 0.0028, pedigree (1,3,2,5,1)
  Industrial values. 2362 kg of new sulfuric acid in average is used per tonne of TiO2. Of the new sulfuric acid, in average 1067 kg/tonne TiO2 is recycled and used again in the process. In total, 3250 kg sulfuric acid/tonne TiO2 is used
  Uncertainty: t
  properties: dry mass 1 kg, wet mass 1 kg
- electricity, medium voltage: 0 kWh; source European Comission 2007; pedigree (1,1,1,1,1)
  Industrial value. Average electricity consumption in 3 main steps of production; 1. ore preparation to calcination 2. finishing 3. effluent treatment. Original values measured in GJ/tonne TiO2
  Uncertainty: p
- residue from TiO2 production, sulfate process: -0.424 kg; name residue; = (307/1000+117/1000)*-1; source European Comission 2007; lognormal variance with pedigree 0.0048, pedigree (3,3,2,5,1)
  Industrial value. Neutralised residue after step of clarification & crystallisation and after abatement of aqueous emissions.
  Uncertainty: d
  production volume 6.59839e8 kg; = RP_PV*residue/ABS(titanium_dioxide)
    Calculated from the production volume of titanium dioxide in proportion to the respective output amounts.
  property price 0 EUR2005; name residue_price_EUR2005
  properties: wet mass 1 kg, dry mass 0.7 kg, water content 0.428571
- aluminium sulfate, powder: 0.021 kg; = 21/1000; source European Comission 2007; lognormal variance with pedigree 0.0034, pedigree (1,3,2,5,1)
  Industrial value. In average 21 kg of aluminium sulfate is needed for 1 tonne of TiO2. Material for finishing and abatement system of aqueous emissions.
  properties: dry mass 1 kg, wet mass 1 kg
- chemical factory, organics: 4e-10 unit; source European Comission 2007; lognormal variance with pedigree 0.31, pedigree (2,3,2,4,3)
  Calculated based on literature data published by the industry. For this activity, no information was readily available concerning infrastructure and land-use. Therefore, the infrastructure is estimated based on data from two chemical factories, the BASF site of Ludwigshafen and the chemical factory in Gendorf (which are both located in Germany), which produce a wide range of chemical substances. Based on this data, the following assumptions are made: the built area amounts to about 4.2 ha, the plant has an average output of 50'000 t/a and a lifespan of fifty years. The estimated infrastructure amount is therefore 4.00 E-10 units per kg of produced chemical.
  References:
  Althaus H.-J., Chudacoff M., Hischier R., Jungbluth N., Osses M. and Primas A. (2007) Life Cycle Inventories of Chemicals. ecoinvent report No. 8, v2.0. EMPA Dübendorf, Swiss Centre for Life Cycle Inventories, Dübendorf, CH.
  Gendorf (2000) Umwelterklärung 2000, Werk Gendorf. Werk Gendorf, Burgkirchen.
- heat, district or industrial, other than natural gas: 0 MJ; source European Comission 2007; pedigree (1,1,1,1,1)
  Industrial value. This exchanges accounts for energy obtained from heavy fuel oil, coal, coke and steam.
  properties: heating value, net 1 MJ
- hydrogen peroxide, without water, in 50% solution state: 0.012 kg; = 12/1000; source European Comission 2007; lognormal variance with pedigree 0.0034, pedigree (1,3,2,5,1)
  Industrial value. In average 12 kg of hydrogen peroxide is needed for 1 tonne of TiO2. Material for finishing and abatement system of aqueous emissions.
  properties: heating value, net 7.13 MJ, dry mass 1 kg, wet mass 1 kg
- wastewater, average: -0.06545 m3; name sewage; = ((process_water/1000)*(1- fraction_PW_to_air))*-1; lognormal variance with pedigree 0.212, pedigree (5,5,5,5,5)
  Calculated value. Proxy to model waste process water.
  production volume 1.01855e8 m3; = RP_PV*sewage/ABS(titanium_dioxide)
    (same comment as for residue from TiO2 production, sulfate process)
  property price 0 EUR2005; name sewage_price_EUR2005
  properties: carbon content, non-fossil 0.194039, dry mass 0.346837 kg, wet mass 1000 kg, water content 2882.2
  note on carbon content, non-fossil: 0.0673 kg TOC/m3 (Tab A.17, ecoinvent v2.2 report 13_I). TOC was considered as Total Carbon.
- tap water: 0 kg; name process_water; source European Comission 2007; pedigree (1,1,1,1,1)
  Industrial value. water imported into site for TiO2 processing and effluent treatment, except for cooling water. Original value in m3/tonne TiO2
  properties: dry mass 0.000337476 kg, carbon content, fossil 0.00178991, water content 2962.17, wet mass 1 kg
- calcium chloride: 0.015 kg; = 15/1000; source European Comission 2007; lognormal variance with pedigree 0.0034, pedigree (1,3,2,5,1)
  Industrial value. In average 15 kg of calciium chloride is needed for 1 tonne of TiO2. Material for finishing and abatement system of aqueous emissions.
  properties: dry mass 1 kg, wet mass 1 kg
- heat, district or industrial, natural gas: 0 MJ; source European Comission 2007; pedigree (1,1,1,1,1)
  Industrial value. Natural gas use.
  Uncertainty: f
  properties: heating value, net 1 MJ
- waste gypsum: -3.849 kg; name gypsum; = (3849/1000)*-1; source European Comission 2007; lognormal variance with pedigree 0.0034, pedigree (1,3,2,5,1)
  Industrial value. Red gypsum from neutraliastion with limestone/lime
  production volume 5.98991e9 kg; = RP_PV*gypsum/ABS(titanium_dioxide)
    (same comment as for residue from TiO2 production, sulfate process)
  property price 0 EUR2005; name gypsum_price_EUR2005
  properties: dry mass 0.806 kg, water content 0.240695, wet mass 1 kg
- ilmenite, 54% titanium dioxide: 2.09444 kg; = 1131/1000/0.54; source European Comission 2007; lognormal variance with pedigree 0.0008, pedigree (1,3,2,1,1)
  Industrial value. Averate throughput of TiO2 (in ilmenite) is 1131 kg/tonne TiO2 pigment, with a variation of +/- 8%.
  properties: dry mass 1 kg, wet mass 1 kg
- aluminium hydroxide: 0.03 kg; = 30/1000; source European Comission 2007; lognormal variance with pedigree 0.0034, pedigree (1,3,2,5,1)
  Industrial value. In average 30 kg of aluminium hydroxide is needed for 1 tonne of TiO2. Material for finishing and abatement system of aqueous emissions.
  properties: dry mass 1 kg, wet mass 1 kg
- hazardous waste, for incineration: -0.007 kg; name hazardous_waste; = (7/1000)*-1; source European Comission 2007; lognormal variance with pedigree 0.0054, pedigree (3,3,2,5,1)
  Industrial value from one single plant. Special waste including acid plant catalyst, solvents, oils and greses and miscelaneaous industrail wastes
  production volume 1.08936e7 kg; = RP_PV*hazardous_waste/ABS(titanium_dioxide)
    (same comment as for residue from TiO2 production, sulfate process)
  property price 0 EUR2005; name hazardous_waste_price_EUR2005
  properties: carbon content, fossil 0.554667, heating value, net 17 MJ, wet mass 1 kg, dry mass 0.75 kg, water content 0.333333
  note on carbon content, fossil: Tab A.6, ecoinvent v2.2 report 13_I. C content has been calculated after data in the tables, and then referred to 1 kg DM
  note on heating value, net: Value taken from the general comment of the treatment dataset.
- electricity, medium voltage: 0.0147061, 0.00281999, 0.0473417, 0.688543, 0.0970505, 0.316205 kWh (6 entries); source European Comission 2007; lognormal variance with pedigree 0.0028, pedigree (1,3,2,5,1)
  (same comment as for electricity, medium voltage)
- heat, district or industrial, other than natural gas: 0.0079853, 19.692 MJ (2 entries); source European Comission 2007; lognormal variance with pedigree 0.0034, pedigree (1,3,2,5,1)
  (same comment as for heat, district or industrial, other than natural gas)
- tap water: 1.19858, 0.144277, 0.238442, 6.01256, 0.156415, 0.444921, 68.8048 kg (7 entries); source European Comission 2007; lognormal variance with pedigree 0.0048, pedigree (1,3,2,5,1)
  (same comment as for tap water)
- heat, district or industrial, natural gas: 0.189727, 12.3103 MJ (2 entries); source European Comission 2007; lognormal variance with pedigree 0.0028, pedigree (1,3,2,5,1)
  Industrial value. Natural gas use.
  Uncertainty: f

## Inputs from nature
- Water, cooling, unspecified natural origin [natural resource, in water]: 0.246 m3; name cooling_water; = 246/1000; source European Comission 2007; lognormal variance with pedigree 0.0128, pedigree (1,3,2,5,1)
  Industrial value, Cooling water is obtained from sea or river; original value in m3/tonne TiO2

## Emissions to nature
- Cadmium, ion [water, unspecified]: 7.99e-7 kg; = 0.000799/1000; source European Comission 2007; lognormal variance with pedigree 0.0428, pedigree (1,3,2,5,1)
  Industrial value. Average aqueous emissions during acid recycling or neutralisation
- Lead [water, unspecified]: 0.0003 kg; = 0.1*3/1000; source European Comission 2007; lognormal variance with pedigree 0.0028, pedigree (1,3,2,5,1)
  Industrial value. Average aqueous emissions of 'other metals' of 3 kg/t TiO2 during acid recycling or neutralisation - thereof 10% assumed for this substance.
- Particulates, > 2.5 um, and < 10um [air, unspecified]: 0.000446 kg; = 0.04/1000 +0.24/1000 +0.01/1000+0.156/1000; source European Comission 2007; lognormal variance with pedigree 0.0428, pedigree (1,3,2,5,1)
  Industrial value. Average dust emissions. Sum of respective emissions in raw material import + preparation step, calcination step and finishing step.
- Mercury [water, unspecified]: 3.1e-7 kg; = 0.00031/1000; source European Comission 2007; lognormal variance with pedigree 0.0028, pedigree (1,3,2,5,1)
  Industrial value. Average aqueous emissions during acid recycling or neutralisation
- Nitrogen oxides [air, unspecified]: 0.00063 kg; = 0.03/1000+0.6/1000; source European Comission 2007; lognormal variance with pedigree 0.0428, pedigree (1,3,2,5,1)
  Industrial value. Average nitrogen oxides emissions.
- Sulfur dioxide [air, unspecified]: 0.00397 kg; = 0.47/1000+3.5/1000; source European Comission 2007; lognormal variance with pedigree 0.0428, pedigree (1,3,2,5,1)
  Industrial value. Emission during digestion step (SO2) and catalytic oxidation step.
- Nickel, ion [water, unspecified]: 0.0003 kg; = 0.1*3/1000; source European Comission 2007; lognormal variance with pedigree 0.0028, pedigree (1,3,2,5,1)
  (same comment as for Lead)
- Sulfate [water, unspecified]: 0.274 kg; = 274/1000; source European Comission 2007; lognormal variance with pedigree 0.0428, pedigree (1,3,2,5,1)
  Industrial value. Aqueous emissions during acid recycling or neutralisation
- Water [water, unspecified]: 0.150675 m3; = cooling_water* (1-fraction_CW_to_air); lognormal variance with pedigree 0.1648, pedigree (3,3,2,5,5)
  Calculated as a fraction of the input of water. For more details, refer to the mathematical relation and the parameters.
- Water [air, unspecified]: 0.106875 m3; = (cooling_water* fraction_CW_to_air)+(process_water/1000*fraction_PW_to_air); lognormal variance with pedigree 0.0448, pedigree (3,3,2,5,1)
  (same comment as for Water)
- Titanium, ion [water, unspecified]: 0.0015 kg; = 0.5*3/1000; source European Comission 2007; lognormal variance with pedigree 0.0028, pedigree (1,3,2,5,1)
  Industrial value. Average aqueous emissions of 'other metals' of 3 kg/t TiO2 during acid recycling or neutralisation - thereof 50% assumed for this substance.
- Suspended solids, unspecified [water, unspecified]: 0.012 kg; = 12/1000; source European Comission 2007; lognormal variance with pedigree 0.0428, pedigree (1,3,2,5,1)
  Industrial value. Average aqueous emissions during acid recycling or neutralisation
- Hydrogen sulfide [air, unspecified]: 3e-6 kg; = 0.003/1000; source European Comission 2007; lognormal variance with pedigree 0.0028, pedigree (1,3,2,5,1)
  Industrial value. Emission during digestion step.
- Iron, ion [water, unspecified]: 0.018 kg; = 18/1000; source European Comission 2007; lognormal variance with pedigree 0.0028, pedigree (1,3,2,5,1)
  Industrial value. Average aqueous emissions during acid recycling or neutralisation
  Uncertainty: w
- Chromium, ion [water, unspecified]: 0.0003 kg; = 0.1*3/1000; source European Comission 2007; lognormal variance with pedigree 0.0028, pedigree (1,3,2,5,1)
  (same comment as for Lead)
- Zinc, ion [water, unspecified]: 0.0003 kg; = 0.1*3/1000; source European Comission 2007; lognormal variance with pedigree 0.0028, pedigree (1,3,2,5,1)
  (same comment as for Lead)
- Carbon dioxide, fossil [air, unspecified]: 0.6072 kg; = lime_amount*0.44; source European Comission 2007; lognormal variance with pedigree 0.0088, pedigree (4,3,2,1,1)
  Calculated value. From the amount of lime consumed in the process (1 kg lime equals 0.44 kg of emitted carbon dioxide).
- Hydrogen [air, unspecified]: 0.001 kg; = 1/1000; source European Comission 2007; lognormal variance with pedigree 0.0428, pedigree (1,3,2,5,1)
  Industrial value. Emissions during reduction step
- Copper, ion [water, unspecified]: 0.0003 kg; = 0.1*3/1000; source European Comission 2007; lognormal variance with pedigree 0.0028, pedigree (1,3,2,5,1)
  (same comment as for Lead)

## Sampling procedure
Reported industrial emissions.

## Extrapolations
All ore input is reported as 'ilmenite' (although the input is a mix of ilmenite and TiO2-enriched slag), resulting in an underestimation of the actual impacts due to this production process. This dataset has been copied from an original dataset covering the geography RER. The uncertainty has been adjusted accordingly.
