# lightweight concrete block production, pumice

Dataset: EcoSpold 2, unit process
Geography: DE
Time period: 1995-01-01 to 2021-12-31
Technology level: current
Classification: ISIC rev.4 ecoinvent: 2399:Manufacture of other non-metallic mineral products n.e.c.
Classification: EcoSpold01Categories: construction materials/concrete
Tags: ConvertedDataset
Scenario: Business-as-Usual
System model: Allocation, cut-off by classification
Generated by: Daniel Kellenberger (obsolete)
Published in: Kellenberger D. 2004
Database: ecoinvent
isCopyrightProtected: true
accessRestrictedTo: 1

## General comment
Hardening is assumed to be by air-drying. It is assumed that there is wastewater and solid waste, but as no exact description on the composition of the wastewater and solid waste is available a proxy for each ("treatment, concrete production effluent, to wastewater treatment, class 3" and "disposal, municipal solid waste, 22.9% water, to municipal incineration") is used. The lifespan of the plant is assumed to be 50 years.
[This dataset was already contained in the ecoinvent database version 2. It was not individually updated during the transfer to ecoinvent version 3. Life Cycle Impact Assessment results may still have changed, as they are affected by changes in the supply chain, i.e. in other datasets. This dataset was generated following the ecoinvent quality guidelines for version 2. It may have been subject to central changes described in the ecoinvent version 3 change report (http://www.ecoinvent.org/database/ecoinvent-version-3/reports-of-changes/), and the results of the central updates were reviewed extensively. The changes added e.g. consistent water flows and other information throughout the database. The documentation of this dataset can be found in the ecoinvent reports of version 2, which are still available via the ecoinvent website. The change report linked above covers all central changes that were made during the conversion process.]

## Included activities end
includes the raw materials, their transport to the finishing plant, the additional washing, the air-drying, the packing, the infrastructure and the disposal of wastewater and some solid household (e.g. packing material) waste

## Geography
For some exchanges CH, RER and GLO modules have been used as proxy.

## Technology
The raw material mixture (aggregates, cement and water) of lightweight concrete blocks are poured into a mould then squeezed and finaly hardened by air (assumption for this study)

## Parameters
- fraction, process water, to air: 0.15 dimensionless; name fraction_PW_to_air; lognormal variance with pedigree 0.092025, pedigree (4,4,3,2,4)
  Literature value. In case when no industry/process specific data are available, default evaporation fraction value is used. This value is 15% and is based on literature (Statistics Canada, 2007 & Shaffer, K.H., 2008, Consumptive water use in the Great Lakes Basin, USGS & Shiklomanov, 2003, World Water Resources at the Beginning of the 21st Century) and has been approved by an expert.
- fraction, tap water, to air: 0.15 dimensionless; name fraction_TW_to_air; = fraction_PW_to_air; lognormal variance with pedigree 0.092025, pedigree (4,4,3,2,4)
  Calculated value. See comment in the other parametres present in this dataset. Tap water is considered to be always used as process water, thus process water fractions to air are applied to all tap water input flows to calculate the amount of water consumed in the processes.

## Reference product
- lightweight concrete block, pumice: 1 kg; CPC 379: Other non-metallic mineral products n.e.c.; By-product classification allocatable product
  EcoSpold01Location=DE
  production volume 0.242058 kg
    This is a placeholder value that does not reflect real-world production volumes. This dataset does not currently require a real-world production volume to work in the database framework, and no actual data were collected yet. This has no negative effect on the results of the ecoinvent database. The placeholder value of this activity was scaled according to the nominal GDP of 2005 (source: United Nations, http://data.un.org/Glossary.aspx?q=GDP+%28current+US%24%29, accessed 20130726) to reflect an appropriate share of the global production volume, which is also a placeholder value.
  property price 0.0775 EUR2005
    Data are not easily available. Therefore, an average price of products supplied by the activities in the same ISIC 3 code has been applied.This price is obtained as '_49 Concrete, asphalt and other mineral products, EU27 virgin, EU27' in the 'EU & DK Input Output Database' (available in SimaPro). The price is assumed to be valid for both RER2003, RER 2004, world 2003 and world 2004.
  property carbon content, non-fossil 0
    Pumice in cement. Tab 6.11, ecoinvent v2.2 report 7, part XXI
  property carbon content, fossil 0
    Pumice in cement. Tab 6.11, ecoinvent v2.2 report 7, part XXI
  property carbon content 0
    carbon content on a dry matter basis (reserved; not for manual entry)
  properties: water content 0, water in wet mass 0 kg, wet mass 1 kg, dry mass 1 kg, carbon allocation 0 kg

## Inputs from technosphere
- municipal solid waste: -0.000125 kg; lognormal variance with pedigree 0.69, pedigree (1,1,5,1,1)
  estimated
  EcoSpold01Location=CH
  production volume 0.000125 kg
    Calculated from the production volume of lightweight concrete block, pumice in proportion to the respective output amounts.
  properties: heating value, net 11.74 MJ, carbon content, non-fossil 0.261655, water content 0.297017, dry mass 0.771 kg, carbon content, fossil 0.171549, wet mass 1 kg
  note on heating value, net: Value taken from the general comment of the treatment dataset.
  note on carbon content, non-fossil: MSW composition in tab 4.1, ecoinvent v2.2 report 13_I. C content referred to 1 kg DM
- electricity, medium voltage: 0.0106 kWh; lognormal variance with pedigree 0.1001, pedigree (3,5,5,3,1)
  EcoSpold01Location=UCTE
- packing, clay product: 1 kg; lognormal variance with pedigree 0.69, pedigree (1,1,5,1,1)
  estimated
  EcoSpold01Location=CH
- pumice: 1.4 kg; lognormal variance with pedigree 0.1001, pedigree (3,5,5,3,1)
  EcoSpold01Location=DE
  properties: wet mass 1 kg, dry mass 1 kg
- wastewater from concrete production: -8.33e-5 m3; name wastewater_output; lognormal variance with pedigree 0.69, pedigree (1,1,5,1,1)
  estimated
  EcoSpold01Location=CH
  production volume 8.33e-5 m3
    (same comment as for municipal solid waste)
  property price 0 EUR2005; name wastewater_output_price_EUR2005
  properties: water content 2225.48, carbon content, fossil 0.027074, wet mass 1000 kg, dry mass 0.449139 kg
  note on carbon content, fossil: TOC =0.01216 kg/m3 (Tab A.20, ecoinvent v2.2 report 13_I). TOC was considered as Total Carbon.
- cement, Portland: 0.222 kg; lognormal variance with pedigree 0.1001, pedigree (3,5,5,3,1)
  EcoSpold01Location=CH
  properties: dry mass 1 kg, wet mass 1 kg
- diesel, burned in building machine: 0.0151 MJ; lognormal variance with pedigree 0.1001, pedigree (3,5,5,3,1)
  EcoSpold01Location=GLO
  properties: heating value, net 1 MJ
- clay pit infrastructure: 1.67e-10 unit; lognormal variance with pedigree 0.69, pedigree (1,1,5,1,1)
  estimated
  EcoSpold01Location=CH
- tap water: 1.114 kg; name tap_water_input; source Dansk Teknologisk Institut 1995; lognormal variance with pedigree 0.052625, pedigree (3,3,5,2,1)
  Calculated based on literature, (Vionnet, S., Quantis Water Database - Technical Report, 2012).
  EcoSpold01Location=RER
  properties: wet mass 1 kg, carbon content, fossil 0.00178991, dry mass 0.000337476 kg, water content 2962.17
  note on carbon content, fossil: Bicarbonate content is 2.93 mol/m3. CO2 content is 0.1 mol/m3 (ecoinvent v2.2 report 8, Tab 93.1).

## Emissions to nature
- Water [water, unspecified]: 0.0008636 m3; name water_to_water_unspecified; = (tap_water_input/1000)*(1-fraction_TW_to_air)-(wastewater_output*-1); lognormal variance with pedigree 0.0807, pedigree (2,2,5,1,1)
  Calculated value based on literature values and expert opinion. See comments in the parametres' comment field.
  property fraction, origin: fresh water 1; name fraction_origin_fresh_water_Ww
  property fraction, origin: salt water 0; name fraction_origin_salt_water_Ww
  property fraction, origin: unspecified 0; name fraction_origin_unspecified_Ww
  property carbon content, fossil 0; name C_content_fossil
  property carbon content, non-fossil 0; name C_content_non_fossil
  property wet mass 1000 kg; name WM
  property dry mass 0 kg; name DM
  property water in wet mass 1000 kg; name WWM
- Water [air, unspecified]: 0.0001671 m3; name water_to_air_unspecified; = (tap_water_input/1000*fraction_TW_to_air); lognormal variance with pedigree 0.0807, pedigree (2,2,5,1,1)
  (same comment as for Water)
  property fraction, origin: fresh water 1; name fraction_origin_fresh_water
  property fraction, origin: salt water 0; name fraction_origin_salt_water
  property fraction, origin: unspecified 0; name fraction_origin_unspecified

## Sampling procedure
Literature

## Extrapolations
This dataset has been extrapolated from year 2000 to the year of the calculation (2021). The uncertainty has been adjusted accordingly.

## Review by Roberto Dones 2004-04-05
passed
