# nutrient supply from urea ammonium nitrate mix

Dataset: EcoSpold 2, unit process
Geography: RNA
Time period: 2016-01-01 to 2021-12-31
Technology level: current
Classification: ISIC rev.4 ecoinvent: 0161:Support activities for crop production
Scenario: Business-as-Usual
System model: Allocation, cut-off by classification
Generated by: Avraam Symeonidis
Database: ecoinvent
isCopyrightProtected: true
accessRestrictedTo: 1

## General comment
This inventory describes the supply of nutrients from ''urea ammonium nitrate mix'' for fertiliser use.
No machinery expenditures or emissions to the environment are considered related to the actual application of this substance on soil during its agricultural use. The purpose of this activity is to connect the chemical production of ''urea ammonium nitrate mix'' with its generic use as fertilizer. The product ''urea ammonium nitrate mix'' is connected to the generic market for ''inorganic nitrogen fertiliser, as N'' through this supplying activity. In the agricultural context, ''urea ammonium nitrate mix'' can be used directly as a fertilizer input to crop production, eventually with other chemicals; alternatively, a generic input of ''inorganic nitrogen fertiliser, as N'' can be used instead, and this will represent the regional consumption mix for his type of nutrient. A way in between is allowed by using the generic input ''inorganic nitrogen fertiliser, as N'' and link to the activity providing it from a specific chemical.
In all cases, emissions associated to the application of the fertilizer have to be calculated in the crop production activity.

## Technology
Inventory based on composition of ''urea ammonium nitrate mix''.

## Reference product
- inorganic nitrogen fertiliser, as N: 1 kg; name RP; By-product classification allocatable product; CPC 3461: Mineral or chemical fertilizers, nitrogenous
  production volume 3.55183e9 kg; = 34013939*1000*0.401231*0.260255848113447
    The production volume has been extrapolated from the global production volume of this product in the database by employing GDP scaling. GDP for Northern America is calculated to amount circa 26% of the global GDP. Original comment of the GLO dataset is: The average annual global production volume between 2014 and 2019 was 34'013'939 t. The Nn content of urea ammonium nitrate mix is 0.401231. Thus 13647446759 Kg of inorganic nitrogen fertiliser as N were produced from urea ammonium nitrate mix.References: United Nations, Statistics division, 2020, GDP/breakdown at current prices in US Dollars (all countries and regions), All countries and regions/subregions (totals) for all years - sorted by region/subregion,
    Available at: https://unstats.un.org/unsd/snaama/Downloads
  property carbon content, fossil 0
    Carbon content, fossil is calculated based on the chemical formula of the substance.
  property nitrogen content 1
    Nitrogen content (on a dry matter basis) of inorganic nitrogen fertiliser, as N is calculated from the molecular formula of the substance (Nitrogen).
  property price 0.473 EUR2005; name RP_price_EUR2005
    Temporary price data. Calculated as 90% of purchasers price based on: 2004 prices are calculated on basis of Import/Export data (tonnes and US$) from UN Trade Statistics Database (http://data.un.org/Browse.aspx?d=ComTrade, accessed 7/7-2010). N, P2O5, or K2O content (http://www.fertilizer.org/ifa/Home-Page/STATISTICS/Conversions-factors)
  property carbon content 0
    carbon content on a dry matter basis (reserved; not for manual entry)
  properties: water content 0, wet mass 1 kg, dry mass 1 kg, carbon content, non-fossil 0, water in wet mass 0 kg, carbon allocation 0 kg

## Inputs from technosphere
- urea ammonium nitrate mix: 3.32311 kg; lognormal variance with pedigree 0.1702, pedigree (3,5,2,1,4)
  properties: water content 0.333333, carbon content, fossil 0.0879977, oxygen content 0.749063, hydrogen content 0.095042, dry mass 0.75 kg, wet mass 1 kg, nitrogen content 0.401231
  note on carbon content, fossil: Carbon content, fossil is calculated based on the chemical formula of the substance.
  note on oxygen content: Oxygen content (on a dry matter basis) of urea ammonium nitrate mix is calculated from the molecular formula of the substance (CH6N4O4).
  note on hydrogen content: Hydrogen content (on a dry matter basis) of urea ammonium nitrate mix is calculated from the molecular formula of the substance (CH6N4O4).
  note on nitrogen content: Nitrogen content (on a dry matter basis) of urea ammonium nitrate mix is calculated from the molecular formula of the substance (CH6N4O4).

## Extrapolations
This dataset has been extrapolated from year 2019 to the year of the calculation (2021). The uncertainty has been adjusted accordingly.
