# distribution network construction, electricity, low voltage

Dataset: EcoSpold 2, unit process
Geography: RoW
Time period: 1988-01-01 to 2021-12-31
Technology level: current
Classification: ISIC rev.4 ecoinvent: 4220:Construction of utility projects
Classification: EcoSpold01Categories: electricity/distribution
Tags: ConvertedDataset
Scenario: Business-as-Usual
System model: Allocation, cut-off by classification
Share of production covered: 100 %
Generated by: Pablo Tirado
Published in: Dones R. 2007
Database: ecoinvent
isCopyrightProtected: true
accessRestrictedTo: 1

## General comment
This dataset describes the infrastructure (poles, cables etc.) of the electricity distribution network. It includes the medium-to-low voltage switching stations.
[This dataset was already contained in the ecoinvent database version 2. It was not individually updated during the transfer to ecoinvent version 3. Life Cycle Impact Assessment results may still have changed, as they are affected by changes in the supply chain, i.e. in other datasets. This dataset was generated following the ecoinvent quality guidelines for version 2. It may have been subject to central changes described in the ecoinvent version 3 change report (http://www.ecoinvent.org/database/ecoinvent-version-3/reports-of-changes/), and the results of the central updates were reviewed extensively. The changes added e.g. consistent water flows and other information throughout the database. The documentation of this dataset can be found in the ecoinvent reports of version 2, which are still available via the ecoinvent website. The change report linked above covers all central changes that were made during the conversion process.]

## Geography
The calculations are based on Swiss data

## Technology
Switching stations use SF6.

## Reference product
- distribution network, electricity, low voltage: 1 km; name amount_RP; CPC 532: Civil engineering works; By-product classification allocatable product
  EcoSpold01Location=CH
  production volume 86115.7 km; name apv_RP; = 391.05*7.00e13/3.11e11
    Gross approximation of the production volume based on an estimate of the Quebec production volume (802,54 km, value from Hydro Quebec network and lifetime) scaled to GLO by the ratio of global and Quebec GDP for 2011 (7e13/3.11e11). It should be replaced as soon as better data is found.
  property price 929713 EUR2005
    Assumed to be eqaul to 'transmission network, electricity, medium voltage'.

## Inputs from technosphere
- sanitary ceramics: 0.0348391 kg; name ceramic; = 7.8416*391.05/ apv_RP; lognormal variance with pedigree 0.1712, pedigree (3,5,5,4,2)
  This flow is considered as a regional specificity of Quebec. The flow is scaled using the production volumes (Quebec and GLO) to avoid its accounting of this specificity in the other regions."
  properties: dry mass 1 kg, wet mass 1 kg
- sulfur hexafluoride, liquid: 0.0868 kg; lognormal variance with pedigree 0.0621, pedigree (3,2,5,5,3)
  Literature and estimations
  EcoSpold01Location=RER
  Uncertainty: literature and estimations
  properties: dry mass 1 kg, wet mass 1 kg
- aluminium, wrought alloy: 1.13671 kg; name aluminium; = 255.85*391.05/ apv_RP; lognormal variance with pedigree 0.1712, pedigree (3,5,5,4,2)
  (same comment as for sanitary ceramics)
  properties: dry mass 1 kg, wet mass 1 kg
- steel, unalloyed: 2290.84 kg; name steel; = 2300*((apv_rp-391.05)/ apv_RP)+237.17*391.05/ apv_RP; lognormal variance with pedigree 0.0621, pedigree (3,2,5,5,3)
  EcoSpold01Location=RER
  Literature and estimations
  Uncertainty: literature and estimations
  properties: wet mass 1 kg, dry mass 1 kg, carbon content, fossil 0.0025
  note on carbon content, fossil: Unalloyed steels or carbon steels are those in which the level of an individual element in no case reaches or exceeds the limiting concentration given in Tab. 3.1 ecoinvent v2.2 report 10_partII. Assumed to have a C content of 0.25%
- diesel, burned in building machine: 0.0530788 MJ; = 11.947*391.05/ apv_RP; lognormal variance with pedigree 0.1712, pedigree (3,5,5,4,2)
  (same comment as for sanitary ceramics)
  properties: heating value, net 1 MJ
- waste polyvinylchloride: 0 kg; name waste_PVC; pedigree (1,1,1,1,1)
  Estimates
  EcoSpold01Location=CH
  Uncertainty: estimates
  production volume 0 kg
    Calculated from the production volume of distribution network, electricity, low voltage in proportion to the respective output amounts.
  property price 0 EUR2005; name waste_PVC_price_EUR2005
  properties: water content 0.00200401, carbon content, fossil 0.440882, heating value, net 21.51 MJ, wet mass 1 kg, dry mass 0.998 kg
  note on carbon content, fossil: C content in 1 kg DM was calculated using data in Tab A.1, ecoinvent v2.2 report 13_I
  note on heating value, net: Value taken from the general comment of the treatment dataset.
- building, multi-storey: 2.17 m3; lognormal variance with pedigree 0.14, pedigree (5,5,5,5,1)
  Estimates
  EcoSpold01Location=RER
  Uncertainty: estimates
- copper, cathode: 1871.91 kg; name copper; = 1880*((apv_rp-391.05)/ apv_RP)+58.906*391.05/ apv_RP; lognormal variance with pedigree 0.0621, pedigree (3,2,5,5,3)
  EcoSpold01Location=RER
  Literature and estimations
  Uncertainty: literature and estimations
  properties: dry mass 1 kg, wet mass 1 kg
- concrete, normal: 0 m3; pedigree (1,1,1,1,1)
  EcoSpold01Location=CH
  Literature and estimations
  Uncertainty: literature and estimations
  properties: water content 0.086758, dry mass 2190 kg, wet mass 2380 kg
- light fuel oil: 0 kg; name oil; pedigree (1,1,1,1,1)
  Literature and estimations
  EcoSpold01Location=RER
  Uncertainty: literature and estimations
  properties: carbon content, fossil 0.862, dry mass 1 kg, heating value, net 42.6 MJ, wet mass 1 kg
- lead: 224 kg; lognormal variance with pedigree 0.0621, pedigree (3,2,5,5,3)
  EcoSpold01Location=RER
  Literature and estimations
  Uncertainty: literature and estimations
  properties: dry mass 1 kg, wet mass 1 kg
- waste mineral oil: -237.026 kg; name waste_oil; = (oil*((apv_rp-391.05)/ apv_RP)+239.98*391.05/ apv_RP)*-1; lognormal variance with pedigree 0.44, pedigree (5,5,5,5,1)
  EcoSpold01Location=CH
  Estimates
  Uncertainty: estimates
  production volume 1.86424e7 kg; = waste_oil*apv_rp/amount_rp
    (same comment as for waste polyvinylchloride)
  property price 0 EUR2005; name waste_oil_price_EUR2005
  properties: heating value, net 34.7 MJ, dry mass 0.9 kg, carbon content, fossil 0.864444, wet mass 1 kg, water content 0.111111
  note on carbon content, fossil: Tab A.6, ecoinvent v2.2 report 13_I. C content has been calculated after data in the tables, and then referred to 1 kg DM
- packaging film, low density polyethylene: 74.7 kg; name PE; lognormal variance with pedigree 0.0621, pedigree (3,2,5,5,3)
  Literature and estimations
  EcoSpold01Location=RER
  Uncertainty: literature and estimations
  properties: carbon content, fossil 0.857143, wet mass 1 kg, dry mass 1 kg, heating value, net 42.47 MJ
  note on carbon content, fossil: Polyethylene is formed out of a huge amount of ethylene monomers (C2H4) (ecoinvent v2.2 report 11_II). MW=28 g/mol
- scrap steel: -24.9371 kg; name scrap_steel; = (1154*1902/ apv_RP)*-1; lognormal variance with pedigree 0.1712, pedigree (3,5,5,4,2)
  (same comment as for sanitary ceramics)
  production volume 0 kg; = apv_RP * (scrap_steel / amount_RP)
    Value has been set to zero because it was not significant and below 0.05% of the production volume of this product in the GLO dataset.
  property price 0 EUR2005; name scrap_steel_price_EUR2005
  properties: wet mass 1 kg, dry mass 1 kg
- polyvinylchloride, suspension polymerised: 538.234 kg; name PVC_suspension; lognormal variance with pedigree 0.0621, pedigree (3,2,5,5,3)
  EcoSpold01Location=RER
  Literature and estimations
  Uncertainty: literature and estimations
  properties: carbon content, fossil 0.387097, heating value, net 21.5 MJ, dry mass 1 kg, wet mass 1 kg
  note on carbon content, fossil: Monomer is vynyl chloride, C2H3Cl (ecoinvent v2.2 report 11_II). MW=62 g/mol
- scrap copper: -1863.85 kg; name scrap_copper; = (copper*((apv_rp-391.05)/ apv_RP)+58.906*391.05/ apv_RP)*-1; lognormal variance with pedigree 0.1712, pedigree (3,5,5,4,2)
  Estimated value.
  production volume 1.63507e8 kg; = apv_RP * (scrap_copper / amount_RP)
    Calculated from production volume of reference product using the relative outputs.
  property price 0 EUR2005; name scrap_copper_price_EUR2005
  properties: wet mass 1 kg, dry mass 1 kg
- waste polyethylene: 0 kg; name waste_PE; pedigree (1,1,1,1,1)
  EcoSpold01Location=CH
  Estimates
  Uncertainty: estimates
  production volume 0 kg
    (same comment as for waste polyvinylchloride)
  property price 0 EUR2005; name waste_PE_price_EUR2005
  properties: water content 0.00401606, dry mass 0.996 kg, carbon content, fossil 0.825301, heating value, net 42.47 MJ, wet mass 1 kg
- gravel, crushed: 0 kg; name gravel; pedigree (1,1,1,1,1)
  (same comment as for sanitary ceramics)
  properties: dry mass 1 kg, wet mass 1 kg
- waste wood pole, chrome preserved: -1471.21 kg; name waste_wood; = ((wood*wood_WM)*((apv_rp-391.05)/ apv_RP)+1740.4*391.05/ apv_RP)*-1; lognormal variance with pedigree 0.44, pedigree (5,5,5,5,1)
  Estimated value. It is assumed that the same quantity that enter is produced as a waste
  EcoSpold01Location=CH
  Uncertainty: estimates
  production volume 1.13273e8 kg; = waste_wood*apv_rp/amount_rp
    (same comment as for waste polyvinylchloride)
  property price 0 EUR2005; name waste_wood_price_EUR2005
  properties: water content 0.25, carbon content, non-fossil 0.483676, heating value, net 13.99 MJ, dry mass 0.8 kg, wet mass 1 kg
  note on carbon content, non-fossil: Tab A.4, ecoinvent v2.2 report 13_I. C content has been referred to 1 kg DM,
- scrap aluminium: -1.13671 kg; name scrap_alu; = (255.85*391.05/ apv_RP)*-1; lognormal variance with pedigree 0.1712, pedigree (3,5,5,4,2)
  (same comment as for sanitary ceramics)
  production volume 76382.9 kg; = apv_RP * (scrap_alu / amount_RP)
    Calculated from production volume of reference product using the relative outputs.
  property price 0 EUR2005; name scrap_alu_price_EUR2005
  properties: wet mass 1 kg, dry mass 1 kg
- waste concrete: 0 kg; name waste_concrete; pedigree (1,1,1,1,1)
  EcoSpold01Location=CH
  Estimates
  Uncertainty: estimates
  production volume 0 kg
    (same comment as for waste polyvinylchloride)
  property price 0 EUR2005; name waste_concrete_price_EUR2005
  properties: wet mass 1 kg, water content 1, dry mass 0.5 kg
- sawlog and veneer log, softwood, debarked, measured as solid wood: 1.92158 m3; name wood; = 1.92*((apv_rp-391.05)/ apv_RP)+2.275*391.05/ apv_RP; lognormal variance with pedigree 0.0621, pedigree (3,2,5,5,3)
  Literature and estimations
  EcoSpold01Location=RER
  Uncertainty: literature and estimations
  property wet mass 765 kg; name wood_WM
  properties: heating value, net 5962.7 MJ, water content 0.7, carbon content, non-fossil 0.494, dry mass 450 kg
  note on carbon content, non-fossil: C content of dry mass is 0.494 kgC/kg dry wood (ecoinvent v2.2 report 9)
- wood preservation, vacuum pressure method, organic salts, Cr-free, outdoor use, ground contact: 0.0467477 kg; = 10.522*391.05/ apv_RP; lognormal variance with pedigree 0.1712, pedigree (3,5,5,4,2)
  (same comment as for sanitary ceramics)
- wood preservation, vacuum pressure method, inorganic salt, containing Cr, outdoor use, ground contact: 34.2281 kg; = 34.2*((apv_rp-391.05)/ apv_RP)+40.533*391.05/ apv_RP; lognormal variance with pedigree 0.0621, pedigree (3,2,5,5,3)
  Literature and estimations
  Uncertainty: literature and estimations
- inert waste, for final disposal: -69.8619 kg; name inert_waste; = ((ceramic+ gravel)*((apv_rp-391.05)/ apv_RP)+7879.8*391.05/ apv_RP)*-1; lognormal variance with pedigree 0.44, pedigree (5,5,5,5,1)
  Estimated value. It is assumed that the same quantity that enter is produced as a waste
  Uncertainty: estimates
  production volume 5.41478e6 kg; = apv_RP * ( inert_waste / amount_RP)
    Calculated from production volume of reference product using the relative outputs.
  property price 0 EUR2005; name inert_waste_price_EUR2005
  properties: wet mass 1 kg, dry mass 0.995 kg, water content 0.00502513
- polyvinylchloride, emulsion polymerised: 78.7662 kg; name PVC_emulsion; lognormal variance with pedigree 0.0621, pedigree (3,2,5,5,3)
  EcoSpold01Location=RER
  Literature and estimations
  Uncertainty: literature and estimations
  properties: heating value, net 21.5 MJ, dry mass 1 kg, carbon content, fossil 0.387097, wet mass 1 kg
- excavation, hydraulic digger: 40.2639 m3; = 40.4*((apv_rp-391.05)/ apv_RP)+9.7596*391.05/ apv_RP; lognormal variance with pedigree 0.0781, pedigree (4,2,5,5,3)
  Estimates
  EcoSpold01Location=RER
  Uncertainty: estimates
- building, hall, steel construction: 0.0557 m2; lognormal variance with pedigree 0.14, pedigree (5,5,5,5,1)
  EcoSpold01Location=CH
  Estimates
  Uncertainty: estimates
- waste polyvinylchloride: -68.6362, -4.58601, -0.346832, -1.89419, -0.765229, -1.79871, -58.4813, -480.492 kg (8 entries); lognormal variance with pedigree 0.44, pedigree (5,5,5,5,1)
  Estimates
  EcoSpold01Location=CH
  Uncertainty: estimates
  production volume 5.43063e7 kg
- concrete, normal: 0.035067, 0.00365393, 0.0295811, 0.0166394, 0.00237668, 1.39268 m3 (6 entries); lognormal variance with pedigree 0.0621, pedigree (3,2,5,5,3)
  EcoSpold01Location=CH
  Literature and estimations
  Uncertainty: literature and estimations
- light fuel oil: 31.244, 4.50589, 127.958, 63.0579, 4.18445, 6.06311 kg (6 entries); lognormal variance with pedigree 0.0621, pedigree (3,2,5,5,3)
  Literature and estimations
  EcoSpold01Location=RER
  Uncertainty: literature and estimations
- waste polyethylene: -8.30977, -0.555227, -0.0419909, -0.229328, -0.0926461, -0.217769, -7.08031, -58.173 kg (8 entries); lognormal variance with pedigree 0.44, pedigree (5,5,5,5,1)
  EcoSpold01Location=CH
  Estimates
  Uncertainty: estimates
  production volume 6.57485e6 kg
- gravel, crushed: 1.51075, 6.91617, 26.5468 kg (3 entries); lognormal variance with pedigree 0.1712, pedigree (3,5,5,4,2)
  (same comment as for sanitary ceramics)
- waste concrete: -222.802, -3037.2 kg (2 entries); lognormal variance with pedigree 0.44, pedigree (5,5,5,5,1)
  EcoSpold01Location=CH
  Estimates
  Uncertainty: estimates
  production volume 2.86934e8 kg

## Inputs from nature
- Occupation, industrial area [natural resource, land]: 44.6 m2*year; lognormal variance with pedigree 0.26, pedigree (5,5,5,5,1)
  Estimates
  Uncertainty: estimates
- Transformation, from forest, unspecified [natural resource, land]: 0.659 m2; lognormal variance with pedigree 0.14, pedigree (5,5,5,5,1)
  Estimates
  Uncertainty: estimates
- Transformation, from annual crop [natural resource, land]: 0.826 m2; lognormal variance with pedigree 0.18, pedigree (5,5,5,5,1)
  Estimates
  Uncertainty: estimates
- Transformation, to industrial area [natural resource, land]: 1.49 m2; lognormal variance with pedigree 0.14, pedigree (5,5,5,5,1)
  Estimates
  Uncertainty: estimates

## Emissions to nature
- Arsenic [soil, unspecified]: 5.3532e-5 kg; = 0.012049*391.05/ apv_RP; lognormal variance with pedigree 0.1712, pedigree (3,5,5,4,2)
  (same comment as for sanitary ceramics)
- NMVOC, non-methane volatile organic compounds, unspecified origin [air, unspecified]: 0.134987 kg; = 30.383*391.05/ apv_RP; lognormal variance with pedigree 0.1712, pedigree (3,5,5,4,2)
  (same comment as for sanitary ceramics)
- Fluoride [soil, unspecified]: 2.73 kg; lognormal variance with pedigree 0.0946, pedigree (3,3,5,5,1)
  Information from LCA on wooden poles
  Uncertainty: information from LCA on wooden poles
- Phenol, pentachloro- [air, unspecified]: 0.000682512 kg; = 0.15362*391.05/ apv_RP; lognormal variance with pedigree 0.1712, pedigree (3,5,5,4,2)
  (same comment as for sanitary ceramics)
- Copper [soil, unspecified]: 2.50883 kg; = 2.52*((apv_rp-391.05)/ apv_RP)+0.0048196*391.05/ apv_RP; lognormal variance with pedigree 0.0946, pedigree (3,3,5,5,1)
  Information from LCA on wooden poles
  Uncertainty: information from LCA on wooden poles
- Sulfur hexafluoride [air, unspecified]: 0.0017 kg; lognormal variance with pedigree 0.082, pedigree (1,1,5,5,1)
  Statistics
  Uncertainty: statistics
- Hydrocarbons, unspecified [soil, unspecified]: 0.0212342 kg; = 4.7794*391.05/ apv_RP; lognormal variance with pedigree 0.1712, pedigree (3,5,5,4,2)
  (same comment as for sanitary ceramics)
- Phenol, pentachloro- [soil, unspecified]: 2.2751e-5 kg; = 0.0051208*391.05/ apv_RP; lognormal variance with pedigree 0.1712, pedigree (3,5,5,4,2)
  (same comment as for sanitary ceramics)
- Boron [soil, unspecified]: 0.714 kg; lognormal variance with pedigree 0.0946, pedigree (3,3,5,5,1)
  Information from LCA on wooden poles
  Uncertainty: information from LCA on wooden poles
- Chromium VI [soil, unspecified]: 4.02206 kg; = 4.04*((apv_rp-391.05)/ apv_RP)+0.0030122*391.05/ apv_RP; lognormal variance with pedigree 0.0946, pedigree (3,3,5,5,1)
  Information from LCA on wooden poles
  Uncertainty: information from LCA on wooden poles

## Sampling procedure
statistics

## Extrapolations
Infrastructure is extrapolated to the entire Swiss territory on the basis of statistics available for smaller areas and of data representativeness This dataset has been copied from an original dataset covering the geography CH. The uncertainty has been adjusted accordingly.

## Review by Christian Bauer 2014-01-05
This dataset was thoroughfully reviewed and complies with the Data Quality Guidelines.

## Review by Emilia Moreno Ruiz 2015-09-17
broken formula fixed

## Review by Emilia Moreno Ruiz 2014-05-29
updated to fit to the new wood preservation data

## Review by Gerald Rebitzer (obsolete) 2003-08-10
passed
