# hard coal, import from ZA

Dataset: EcoSpold 2, unit process
Geography: IN
Time period: 2014-01-01 to 2021-12-31
Technology level: current
Classification: ISIC rev.4 ecoinvent: 0510:Mining of hard coal
Scenario: Business-as-Usual
System model: Allocation, cut-off by classification
Generated by: Philippa Notten
Published in: Notten P.J. 2017
Database: ecoinvent
isCopyrightProtected: true
accessRestrictedTo: 1

## General comment
This dataset describes the transport needed for the export of South African hard coal to India. Average coal losses and related emissions during transport and storage are included. These are based on generic estimates as no geography-specific data were available. The coal is transported from the mines by train to the coal export terminal in Richards Bay (RBCT) on the East Coast of South Africa. RBCT accounts for the handling of 95% of South Africa's export coal. Average distances of 550 km and 9,250 km are estimated for train and transoceanic freight transport, respectively.
Around 30% of South Africa’s annual coal production is exported, with 31.9 million tonnes of hard coal exported to India in 2014 (accounting for 41% of total coal exports in 2014). Exports to India are of South Africa's lower grades of export coal and, as such, are supplied predominantly by lower grade washed coal products (particularly the middlings product) and to a lessor degree, higher grade unwashed coal (unwashed coal estimated to supply 5% of the exports to Indial). Exports to India are predominantly of the RB3 and RB2 (5,700) export grades, with calorific values in the range of 22 - 25 MJ/kg (LHV 5,500 kCal/kg), ash contents of up to 23% and volatile matter around 22%. South African coals are naturally low in sulphur (<1%).

## Included activities start
Starting at the gate of the hard coal mine, this dataset includes the transport, re-loading and storage within the exporting country and transoceanic freight shipping.

## Included activities end
This activity ends at the border of the importing country. The average transport within the importing country is not included in this dataset, it is covered in the respective market for hard coal.

## Geography
South African values: not applicable worldwide

## Technology
The coal is transported from the mines by train to the Richards Bay coal export terminal on the East coast of South Africa. An average rail transport distance of 550 km is derived from a weighted average of the production volumes by coalfield and the distance from the respective coalfields to the Richards Bay Coal Terminal. A distance of 9,250 km transoceanic freight transport is estimated as the average distance along freight shipping routes between Richards Bay and the major ports importing coal in India.

## Time period
The trade volumes represented in this dataset are based on 2014 Trademap export statistics retrieved online from www.trademap.org

## Parameters
- lifetime of coal terminal, south africa: 100 year; name terminal_lifetime; lognormal variance with pedigree 0.472, pedigree (4,4,5,5,5)
  Own assumption
- total coal exports, richards bay coal terminal: 7.13e10 kg; name terminal_export_volume; lognormal variance with pedigree 0.0013, pedigree (2,2,1,1,1)
  Total coal exported through Richards Bay Coal Terminal in 2014. References: RBCT (2015) Sustainability Report 2015, Richards Bay Coal Terminal. Available at: https://www.rbct.co.za/wp-content/uploads/2016/06/Sustainability-Report-2015.pdf. (Accessed: July 2017).

## Reference product
- hard coal: 1 kg; CPC 11010: Hard coal; By-product classification allocatable product
  production volume 3.09911e10 kg
    Total export sales of hard coal (anthracite and bituminous) from ZA to IN for 2014 in kg. Calculated based on % of total exports from ITC (2017) and total export sales from annual government reporting (South Africa's Mineral Industry 2014/15).
    References:
    ITC (2017) Trademap Database, Available at: http://www.trademap.org/. (Accessed July 2017).
    DMR (2015) South Africa's Mineral Industry 2014/15, Department of Mineral Resources. Available at: <http://www.dmr.gov.za/.> (Accessed: Accessed June 2017).
  property ash content 0.157407 kg; name ash_content; = 0.17/(1+WWM)
    17% ash content on a dry matter basis. Reference value based on export specifications for RB2 5700 and RB3, the grades of coal exported to India (Global Coal, undated). Reference(s): Global Coal (2017) SCoTA Specifications. Available at: https://www.globalcoal.com/scota/specifications.cfm#RB2-5700. (Accessed August 2017).
  property dry mass 0.92 kg; name DM
  property heating value, net 25 MJ; name CV
    Hard coal exported to India is composed of a mix of low grade [RB3] and medium grade coal [RB2 5700]. A weighted average was assumed based on the % breakdown of volume by grade and the calorific value (CV) of each grade, resulting in an average CV of 24 MJ/kg.
  property price 0.036 EUR2005
    Steam coal import costs in EU in IEA key world energy statistics 2003-2004.
  property carbon content, fossil 0.52; name c_content
    A fixed carbon content of 0.52 kg C/ kg dry hard coal was applied, Reference value based on export specifications for RB2 5700 and RB3, the grades of coal exported to India (Global Coal, undated). Reference(s): Global Coal (2017) SCoTA Specifications. Available at: https://www.globalcoal.com/scota/specifications.cfm#RB2-5700. (Accessed August 2017).
  property wet mass 1 kg; name WM
  property water in wet mass 0.08 kg; name WWM; = WM-DM
  property sulfur content 0.01; name S_content
    Sulfur content on a dry matter basis. 1% is the maximum value based on export specifications for RB2 5700, the grade of coal exported to India (Global Coal, undated). Reference(s): Global Coal (2017) SCoTA Specifications. Available at: https://www.globalcoal.com/scota/specifications.cfm#RB2-5700. (Accessed August 2017).
  property water content 0.0869565; = WWM/DM
  property carbon content 0.52
    carbon content on a dry matter basis (reserved; not for manual entry)
  properties: carbon content, non-fossil 0, carbon allocation 0.4784 kg

## Inputs from technosphere
- transport, freight, conveyor belt: 0.02296 metric ton*km; = 0.056*0.41; lognormal variance with pedigree 0.126, pedigree (3,4,3,1,1)
  Conveyor belt use associated with coal handling estimated from that of the Richards Bay Coal Terminal. As at 2014, RBCT reported the use of 56km belting and structures with a capacity of 90 million tonnes coal per year. Exports to India account for 41% of total coal exports from SA.
  Source: RBCT (2014) Company Website, Richards Bay Coal Terminal. Available at: https://www.rbct.co.za/faq-6/. (Accessed July 2017).
- hard coal: 0.959082 kg; name input_and_losses_washed; = 1.00956*0.95; lognormal variance with pedigree 0.0532, pedigree (3,5,5,5,2)
  Coal exports to India are medium grade and low grade (RB2(5700) and RB3), with CV of 22-25 MJ/kg and ash content 17-23%. As such this market is supplied predominantly by lower grade washed coal products (particularly the middlings product) and to a lessor degree higher grade unwashed coal (estimated at 5% of the supply to Indial). Product losses are assumed to arise only from particulate emissions. Due to a lack of site specific data, this value is based on emission factors for loading, unloading, transit and stockpiling stages. Up to 14% of coal arriving at the export terminal is loaded directly onto waiting ships, thus emissions associated with stockpiling 14% of the coal was exluded. Losses on the Indian side taken from the Indian CERC (Central Electricity regulatory Commision) guidelines which gives a loss of 0.8 % as transit and handling loss for non pit-head power plants.Source: Emission factors for loading, unloading and transit via rail and ship from Chadwick, M. J., Highton, N.H. and Lindman, N. (1987) Environmental Impacts of Coal Mining and Utilization: A Complete Revision of Environmental Implications of Expanded Coal Utilization. Emissions factors for loading/unloading of stockpile and during stockpiling due to wind erosion from NPI (2012) Emission Estimation Technique Manual for Mining. Version 3.1, National Pollution Inventory, Available at: http://www.npi.gov.au/system/files/resources/7e04163a-12ba-6864-d19a-f57d960aae58/files/mining.pdf. (Accessed on: July 2017). Percentage of coal loaded directly onto ships from RBCT (2014) Company Website: Infrastructure, Richards Bay Coal Terminal. Available at: https://www.rbct.co.za/operations-6/infrastructure/. (Accessed July 2017).
  properties: carbon content, fossil 0.52, ash content 0.157407 kg, dry mass 0.92 kg, wet mass 1 kg, heating value, net 25 MJ, water content 0.0869565, sulfur content 0.01
  note on carbon content, fossil: A fixed carbon content of 0.52 kg C/ kg dry hard coal was applied, Reference value based on export specifications for RB2 5700 and RB3, the grades of coal exported to India (Global Coal, undated). Reference(s): Global Coal (2017) SCoTA Specifications. Available at: https://www.globalcoal.com/scota/specifications.cfm#RB2-5700. (Accessed August 2017).
  note on ash content: Ash content on a dry matter basis. Reference value based on export specifications for RB2 5700 and RB3, the grades of coal exported to India (Global Coal, undated). Reference(s): Global Coal (2017) SCoTA Specifications. Available at: https://www.globalcoal.com/scota/specifications.cfm#RB2-5700. (Accessed August 2017).
  note on heating value, net: Hard coal exported to India is composed of a mix of low grade [RB3} and 94% medium grade coal [RB2 5700]. A weighted average was assumed based on the % breakdown of volume by grade and the calorific value (CV) of each grade, resulting in an average CV of 24 MJ/kg.
  note on sulfur content: Sulfur content on a dry matter basis. 1% is the maximum value based on export specifications for RB2 5700, the grade of coal exported to India (Global Coal, undated). Reference(s): Global Coal (2017) SCoTA Specifications. Available at: https://www.globalcoal.com/scota/specifications.cfm#RB2-5700. (Accessed August 2017).
- hard coal: 0.050478 kg; name input_and_losses_crushed; = 1.00956*0.05; lognormal variance with pedigree 0.0532, pedigree (3,5,5,5,2)
  Coal exports to India are medium grade and low grade (RB2(5700) and RB3), with CV of 22-25 MJ/kg and ash content 17-23%. As such this market is supplied predominantly by lower grade washed coal products (particularly the middlings product) and to a lessor degree higher grade unwashed coal (estimated at 5% of the supply to Indial). Product losses are assumed to arise only from particulate emissions. Due to a lack of site specific data, this value is based on emission factors for loading, unloading, transit and stockpiling stages. Up to 14% of coal arriving at the export terminal is loaded directly onto waiting ships, thus emissions associated with stockpiling 14% of the coal was exluded. Losses on the Indian side taken from the Indian CERC (Central Electricity regulatory Commision) guidelines which gives a loss of 0.8 % as transit and handling loss for non pit-head power plants.
  Sources:
  Emission factors for loading, unloading and transit via rail and ship from Chadwick, M. J., Highton, N.H. and Lindman, N. (1987) Environmental Impacts of Coal Mining and Utilization: A Complete Revision of Environmental Implications of Expanded Coal Utilization;
  Emissions factors for loading/unloading of stockpile and during stockpiling due to wind erosion from NPI (2012) Emission Estimation Technique Manual for Mining. Version 3.1, National Pollution Inventory, Available at: http://www.npi.gov.au/system/files/resources/7e04163a-12ba-6864-d19a-f57d960aae58/files/mining.pdf. (Accessed on: July 2017);
  Percentage of coal loaded directly onto ships from RBCT (2014) Company Website: Infrastructure, Richards Bay Coal Terminal. Available at: https://www.rbct.co.za/operations-6/infrastructure/. (Accessed July 2017).
  properties: heating value, net 27.91 MJ, carbon content, fossil 0.845, dry mass 0.94 kg, water content 0.0638298, wet mass 1 kg
  note on heating value, net: Based on the Characterization factor of Hard coal in the CED method
  note on carbon content, fossil: C content 75-94% (specified in Tab 1.1, report 6, part VI). A mean content of 0.845 kg C/ kg dry hard coal was considered
- transport, freight train: 0.55 metric ton*km; lognormal variance with pedigree 0.1221, pedigree (1,2,3,1,1)
  This is the weighted average transport distance from the four major coal fields producing export grade coal i.e. Witbank (82.4%), Highveld (9.1%), Ermelo (8.4%) and Waterberg (0.1%) to the primary coal exporting port, Richards Bay Coal Terminal (RBCT).
  Source: The distances were estimated using Google Maps, while the breakdown of export coal by coalfield was determined from industry data (SACRM, 2011).
- transport, freight, sea, bulk carrier for dry goods: 9.25 metric ton*km; lognormal variance with pedigree 0.1246, pedigree (3,3,3,1,1)
  This is an estimate of the average distance for sea transport of hard coal exports from South Africa's primary coal export terminal (RBCT) to major Indian coal importing ports (East India are Paradip, Haldia, Gangavaram and Chennai while in West India are Mundra, GOA, Cochin and Dahej).
  Sources: Major ports online from opensea.pro, 2017, <https://opensea.pro/blog/shipping-coal>, accessed July 2017; distance approximated based on Ports.com <http://ports.com/sea-route/>.

## Emissions to nature
- Manganese [water, ground-]: 2e-10 kg; source Dones R. 2007; lognormal variance with pedigree 0.748, pedigree (4,5,5,5,4)
  Estimated value not geography specific (generic value used in other ecoinvent coal market datasets). This represents the leaching of Manganese to ground water during storage in open stockpiles. For a lack of more recent data this value is an estimation according to Dones et al. (2007) based on three studies conducted in the 1980s by Kok et al. (1989), ORNL (1980) and Zahner (1980). 500 liters of leachate per m2 of storage area are assumed for an average storage time of two months, an average pile height of 6m and a bulk density of 700kg/m3. High uncertainty for estimates of leachate emissions has to be assumed.
  Reference(s): Dones, R., Bauer, C., Röder, A. (2007) Kohle. In: Dones, R. (Ed.) et al., Sachbilanzen von Energiesystemen: Grundlagen für den ökologischen Vergleich von Energiesystemen und den Einbezug von Energiesystemen in Ökobilanzen für die Schweiz. Final report ecoinvent No. 6-VI, Paul Scherrer Institut Villigen, Swiss Centre for Life Cycle Inventories, Dübendorf, CH.
  Kok A., Bolt N., Jelgersma R. (1989) Spontaneous heating and stockpiling losses of coal. In: Kema Scientific & Technical Reports 7 (2):63-89.
  ORNL (1980) A Methodology and a Preliminary Data Base for Examining the Health Risks of Electricity Generation from Uranium and Coal Fuels. Oak Ridge, USA.
  Zahner Ph. (1985) Le stockage du charbon et du coke en plein air: pollution et protection des eaux. Les cahiers de l'environnement No 38, OFPE, Bern.
- Arsenic, ion [water, ground-]: 0.0001 kg; source Dones R. 2007; lognormal variance with pedigree 0.218, pedigree (4,5,5,5,4)
  Estimated value not geography specific (generic value used in other ecoinvent coal market datasets). This represents the leaching of Nickel to ground water during storage in open stockpiles. For a lack of more recent data this value is an estimation according to Dones et al. (2007) based on three studies conducted in the 1980s by Kok et al. (1989), ORNL (1980) and Zahner (1980). 500 liters of leachate per m2 of storage area are assumed for an average storage time of two months, an average pile height of 6m and a bulk density of 700kg/m3. High uncertainty for estimates of leachate emissions has to be assumed.
  Reference(s): Dones, R., Bauer, C., Röder, A. (2007) Kohle. In: Dones, R. (Ed.) et al., Sachbilanzen von Energiesystemen: Grundlagen für den ökologischen Vergleich von Energiesystemen und den Einbezug von Energiesystemen in Ökobilanzen für die Schweiz. Final report ecoinvent No. 6-VI, Paul Scherrer Institut Villigen, Swiss Centre for Life Cycle Inventories, Dübendorf, CH.
  Kok A., Bolt N., Jelgersma R. (1989) Spontaneous heating and stockpiling losses of coal. In: Kema Scientific & Technical Reports 7 (2):63-89.
  ORNL (1980) A Methodology and a Preliminary Data Base for Examining the Health Risks of Electricity Generation from Uranium and Coal Fuels. Oak Ridge, USA.
  Zahner Ph. (1985) Le stockage du charbon et du coke en plein air: pollution et protection des eaux. Les cahiers de l'environnement No 38, OFPE, Bern.
- Sulfate [water, ground-]: 1e-5 kg; source Dones R. 2007; lognormal variance with pedigree 0.308, pedigree (4,5,5,5,4)
  Estimated value not geography specific (generic value used in other ecoinvent coal market datasets). This represents the leaching of Sulfate to ground water during storage in open stockpiles. For a lack of more recent data this value is an estimation according to Dones et al. (2007) based on three studies conducted in the 1980s by Kok et al. (1989), ORNL (1980) and Zahner (1980). 500 liters of leachate per m2 of storage area are assumed for an average storage time of two months, an average pile height of 6m and a bulk density of 700kg/m3. High uncertainty for estimates of leachate emissions has to be assumed.
  Reference(s): Dones, R., Bauer, C., Röder, A. (2007) Kohle. In: Dones, R. (Ed.) et al., Sachbilanzen von Energiesystemen: Grundlagen für den ökologischen Vergleich von Energiesystemen und den Einbezug von Energiesystemen in Ökobilanzen für die Schweiz. Final report ecoinvent No. 6-VI, Paul Scherrer Institut Villigen, Swiss Centre for Life Cycle Inventories, Dübendorf, CH.
  Kok A., Bolt N., Jelgersma R. (1989) Spontaneous heating and stockpiling losses of coal. In: Kema Scientific & Technical Reports 7 (2):63-89.
  ORNL (1980) A Methodology and a Preliminary Data Base for Examining the Health Risks of Electricity Generation from Uranium and Coal Fuels. Oak Ridge, USA.
  Zahner Ph. (1985) Le stockage du charbon et du coke en plein air: pollution et protection des eaux. Les cahiers de l'environnement No 38, OFPE, Bern.
- Copper, ion [water, ground-]: 2e-9 kg; source Dones R. 2007; lognormal variance with pedigree 1.428, pedigree (4,5,5,5,4)
  Estimated value not geography specific (generic value used in other ecoinvent coal market datasets). This represents the leaching of Copper to ground water during storage in open stockpiles. For a lack of more recent data this value is an estimation according to Dones et al. (2007) based on three studies conducted in the 1980s by Kok et al. (1989), ORNL (1980) and Zahner (1980). 500 liters of leachate per m2 of storage area are assumed for an average storage time of two months, an average pile height of 6m and a bulk density of 700kg/m3. High uncertainty for estimates of leachate emissions has to be assumed.
  Reference(s): Dones, R., Bauer, C., Röder, A. (2007) Kohle. In: Dones, R. (Ed.) et al., Sachbilanzen von Energiesystemen: Grundlagen für den ökologischen Vergleich von Energiesystemen und den Einbezug von Energiesystemen in Ökobilanzen für die Schweiz. Final report ecoinvent No. 6-VI, Paul Scherrer Institut Villigen, Swiss Centre for Life Cycle Inventories, Dübendorf, CH.
  Kok A., Bolt N., Jelgersma R. (1989) Spontaneous heating and stockpiling losses of coal. In: Kema Scientific & Technical Reports 7 (2):63-89.
  ORNL (1980) A Methodology and a Preliminary Data Base for Examining the Health Risks of Electricity Generation from Uranium and Coal Fuels. Oak Ridge, USA.
  Zahner Ph. (1985) Le stockage du charbon et du coke en plein air: pollution et protection des eaux. Les cahiers de l'environnement No 38, OFPE, Bern.
- Nickel, ion [water, ground-]: 4e-10 kg; source Dones R. 2007; lognormal variance with pedigree 0.748, pedigree (4,5,5,5,4)
  (same comment as for Arsenic, ion)
- BOD5, Biological Oxygen Demand [water, ground-]: 1e-7 kg; source Dones R. 2007; lognormal variance with pedigree 0.398, pedigree (4,5,5,5,4)
  Estimated value not geography specific (generic value used in other ecoinvent coal market datasets). This represents the BOD caused by leaching to ground water during storage in open stockpiles. For a lack of more recent data this value is an estimation according to Dones et al. (2007) based on three studies conducted in the 1980ies by Kok et al. (1989), ORNL (1980) and Zahner (1980). 500 liters of leachate per m2 of storage area are assumed for an average storage time of two months, an average pile height of 6m and a bulk density of 700kg/m3. High uncertainty for estimates of leachate emissions has to be assumed.
  Reference(s): Dones, R., Bauer, C., Röder, A. (2007) Kohle. In: Dones, R. (Ed.) et al., Sachbilanzen
  von Energiesystemen: Grundlagen für den ökologischen Vergleich von
  Energiesystemen und den Einbezug von Energiesystemen in Ökobilanzen für die
  Schweiz. Final report ecoinvent No. 6-VI, Paul Scherrer Institut Villigen, Swiss Centre
  for Life Cycle Inventories, Dübendorf, CH.
  Kok A., Bolt N., Jelgersma R. (1989) Spontaneous heating and stockpiling losses of
  coal. In: Kema Scientific & Technical Reports 7 (2):63-89.
  ORNL (1980) A Methodology and a Preliminary Data Base for Examining the Health
  Risks of Electricity Generation from Uranium and Coal Fuels. Oak Ridge, USA.
  Zahner Ph. (1985) Le stockage du charbon et du coke en plein air: pollution et
  protection des eaux. Les cahiers de l'environnement No 38, OFPE, Bern.
- Chloride [water, ground-]: 2e-6 kg; source Dones R. 2007; lognormal variance with pedigree 0.748, pedigree (4,5,5,5,4)
  Estimated value not geography specific (generic value used in other ecoinvent coal market datasets). This represents the leaching of Chloride to ground water during storage in open stockpiles. For a lack of more recent data this value is an estimation according to Dones et al. (2007) based on three studies conducted in the 1980s by Kok et al. (1989), ORNL (1980) and Zahner (1980). 500 liters of leachate per m2 of storage area are assumed for an average storage time of two months, an average pile height of 6m and a bulk density of 700kg/m3. High uncertainty for estimates of leachate emissions has to be assumed.
  Reference(s): Dones, R., Bauer, C., Röder, A. (2007) Kohle. In: Dones, R. (Ed.) et al., Sachbilanzen von Energiesystemen: Grundlagen für den ökologischen Vergleich von Energiesystemen und den Einbezug von Energiesystemen in Ökobilanzen für die Schweiz. Final report ecoinvent No. 6-VI, Paul Scherrer Institut Villigen, Swiss Centre for Life Cycle Inventories, Dübendorf, CH.
  Kok A., Bolt N., Jelgersma R. (1989) Spontaneous heating and stockpiling losses of coal. In: Kema Scientific & Technical Reports 7 (2):63-89.
  ORNL (1980) A Methodology and a Preliminary Data Base for Examining the Health Risks of Electricity Generation from Uranium and Coal Fuels. Oak Ridge, USA.
  Zahner Ph. (1985) Le stockage du charbon et du coke en plein air: pollution et protection des eaux. Les cahiers de l'environnement No 38, OFPE, Bern.
- Particulates, > 10 um [air, unspecified]: 0.00956 kg; = (input_and_losses_washed+input_and_losses_crushed)-1; lognormal variance with pedigree 0.0432, pedigree (2,3,3,1,1)
  Due to a lack of site specific data, this value is based on emission factors for loading, unloading, transit and stockpiling stages. Up to 14% of coal arriving at the export terminal is loaded directly onto waiting ships, thus emissions associated with stockpiling 14% of the coal was exluded. Losses on the Indian side taken from the Indian CERC (Central Electricity regulatory Commision) guidelines which gives a loss of 0.8 % as transit and handling loss for non pit-head power plants (personal communication),
  Sources:
  Emission factors for loading, unloading and transit via rail and ship from Chadwick, M. J., Highton, N.H. and Lindman, N. (1987) Environmental Impacts of Coal Mining and Utilization: A Complete Revision of Environmental Implications of Expanded Coal Utilization; Emissions factors for loading/unloading of stockpile and during stockpiling due to wind erosion from NPI (2012) Emission Estimation Technique Manual for Mining. Version 3.1, National Pollution Inventory, Available at: http://www.npi.gov.au/system/files/resources/7e04163a-12ba-6864-d19a-f57d960aae58/files/mining.pdf. (Accessed on: July 2017).;
  Percentage of coal loaded directly onto ships from RBCT (2014) Company Website: Infrastructure, Richards Bay Coal Terminal. Available at: https://www.rbct.co.za/operations-6/infrastructure/. (Accessed July 2017).
- COD, Chemical Oxygen Demand [water, ground-]: 1e-7 kg; source Dones R. 2007; lognormal variance with pedigree 0.398, pedigree (4,5,5,5,4)
  Estimated value not geography specific (generic value used in other ecoinvent coal market datasets). This represents the COD due to leaching to ground water during storage in open stockpiles. For a lack of more recent data this value is an estimation according to Dones et al. (2007) based on three studies conducted in the 1980ies by Kok et al. (1989), ORNL (1980) and Zahner (1980). 500 liters of leachate per m2 of storage area are assumed for an average storage time of two months, an average pile height of 6m and a bulk density of 700kg/m3. High uncertainty for estimates of leachate emissions has to be assumed.
  Reference(s): Dones, R., Bauer, C., Röder, A. (2007) Kohle. In: Dones, R. (Ed.) et al., Sachbilanzen
  von Energiesystemen: Grundlagen für den ökologischen Vergleich von
  Energiesystemen und den Einbezug von Energiesystemen in Ökobilanzen für die
  Schweiz. Final report ecoinvent No. 6-VI, Paul Scherrer Institut Villigen, Swiss Centre
  for Life Cycle Inventories, Dübendorf, CH.
  Kok A., Bolt N., Jelgersma R. (1989) Spontaneous heating and stockpiling losses of
  coal. In: Kema Scientific & Technical Reports 7 (2):63-89.
  ORNL (1980) A Methodology and a Preliminary Data Base for Examining the Health
  Risks of Electricity Generation from Uranium and Coal Fuels. Oak Ridge, USA.
  Zahner Ph. (1985) Le stockage du charbon et du coke en plein air: pollution et
  protection des eaux. Les cahiers de l'environnement No 38, OFPE, Bern.
- Selenium [water, ground-]: 2e-10 kg; source Dones R. 2007; lognormal variance with pedigree 0.748, pedigree (4,5,5,5,4)
  (same comment as for Arsenic, ion)
- DOC, Dissolved Organic Carbon [water, ground-]: 3.7037e-8 kg; source Dones R. 2007; lognormal variance with pedigree 0.398, pedigree (4,5,5,5,4)
  Estimated value not geography specific (generic value used in other ecoinvent coal market datasets). This represents the DOC due to leaching to ground water during storage in open stockpiles. For a lack of more recent data this value is Calculated as equal to TOC. Value for TOC according to Dones et al. (2007). 500 liters of leachate per m2 of storage area are assumed for an average storage time of two months, an average pile height of 6m and a bulk density of 700kg/m3. High uncertainty for estimates of leachate emissions has to be assumed.
  Reference(s): Dones, R., Bauer, C., Röder, A. (2007) Kohle. In: Dones, R. (Ed.) et al., Sachbilanzen
  von Energiesystemen: Grundlagen für den ökologischen Vergleich von
  Energiesystemen und den Einbezug von Energiesystemen in Ökobilanzen für die
  Schweiz. Final report ecoinvent No. 6-VI, Paul Scherrer Institut Villigen, Swiss Centre
  for Life Cycle Inventories, Dübendorf, CH.
- Dissolved solids [water, ground-]: 4e-11 kg; source Dones R. 2007; lognormal variance with pedigree 0.218, pedigree (4,5,5,5,4)
  (same comment as for Arsenic, ion)
- TOC, Total Organic Carbon [water, ground-]: 3.7037e-8 kg; source Dones R. 2007; lognormal variance with pedigree 0.398, pedigree (4,5,5,5,4)
  Estimated value not geography specific (generic value used in other ecoinvent coal market datasets). This represents the TOC due to leaching to ground water during storage in open stockpiles. For a lack of more recent data this value is "Calculated by default as TOC (gC) = COD/2.7 (COD measured in g O2). Should more correctly be calculated from the carbon content of the specified emissions to water." according to Dones et al. (2007). 500 liters of leachate per m2 of storage area are assumed for an average storage time of two months, an average pile height of 6m and a bulk density of 700kg/m3. High uncertainty for estimates of leachate emissions has to be assumed.
  Reference(s): Dones, R., Bauer, C., Röder, A. (2007) Kohle. In: Dones, R. (Ed.) et al., Sachbilanzen
  von Energiesystemen: Grundlagen für den ökologischen Vergleich von
  Energiesystemen und den Einbezug von Energiesystemen in Ökobilanzen für die
  Schweiz. Final report ecoinvent No. 6-VI, Paul Scherrer Institut Villigen, Swiss Centre
  for Life Cycle Inventories, Dübendorf, CH.
- Chromium, ion [water, ground-]: 2e-10 kg; source Dones R. 2007; lognormal variance with pedigree 1.428, pedigree (4,5,5,5,4)
  (same comment as for Arsenic, ion)
- Lead [water, ground-]: 2e-7 kg; source Dones R. 2007; lognormal variance with pedigree 0.308, pedigree (4,5,5,5,4)
  Estimated value not geography specific (generic value used in other ecoinvent coal market datasets). This represents the leaching of Lead to ground water during storage in open stockpiles. For a lack of more recent data this value is an estimation according to Dones et al. (2007) based on three studies conducted in the 1980s by Kok et al. (1989), ORNL (1980) and Zahner (1980). 500 liters of leachate per m2 of storage area are assumed for an average storage time of two months, an average pile height of 6m and a bulk density of 700kg/m3. High uncertainty for estimates of leachate emissions has to be assumed.
  Reference(s): Dones, R., Bauer, C., Röder, A. (2007) Kohle. In: Dones, R. (Ed.) et al., Sachbilanzen von Energiesystemen: Grundlagen für den ökologischen Vergleich von Energiesystemen und den Einbezug von Energiesystemen in Ökobilanzen für die Schweiz. Final report ecoinvent No. 6-VI, Paul Scherrer Institut Villigen, Swiss Centre for Life Cycle Inventories, Dübendorf, CH.
  Kok A., Bolt N., Jelgersma R. (1989) Spontaneous heating and stockpiling losses of coal. In: Kema Scientific & Technical Reports 7 (2):63-89.
  ORNL (1980) A Methodology and a Preliminary Data Base for Examining the Health Risks of Electricity Generation from Uranium and Coal Fuels. Oak Ridge, USA.
  Zahner Ph. (1985) Le stockage du charbon et du coke en plein air: pollution et protection des eaux. Les cahiers de l'environnement No 38, OFPE, Bern.
- Tin, ion [water, ground-]: 2e-10 kg; source Dones R. 2007; lognormal variance with pedigree 0.398, pedigree (4,5,5,5,4)
  Estimated value not geography specific (generic value used in other ecoinvent coal market datasets). This represents the leaching of Tin to ground water during storage in open stockpiles. For a lack of more recent data this value is an estimation according to Dones et al. (2007) based on three studies conducted in the 1980s by Kok et al. (1989), ORNL (1980) and Zahner (1980). 500 liters of leachate per m2 of storage area are assumed for an average storage time of two months, an average pile height of 6m and a bulk density of 700kg/m3. High uncertainty for estimates of leachate emissions has to be assumed.
  Reference(s): Dones, R., Bauer, C., Röder, A. (2007) Kohle. In: Dones, R. (Ed.) et al., Sachbilanzen von Energiesystemen: Grundlagen für den ökologischen Vergleich von Energiesystemen und den Einbezug von Energiesystemen in Ökobilanzen für die Schweiz. Final report ecoinvent No. 6-VI, Paul Scherrer Institut Villigen, Swiss Centre for Life Cycle Inventories, Dübendorf, CH.
  Kok A., Bolt N., Jelgersma R. (1989) Spontaneous heating and stockpiling losses of coal. In: Kema Scientific & Technical Reports 7 (2):63-89.
  ORNL (1980) A Methodology and a Preliminary Data Base for Examining the Health Risks of Electricity Generation from Uranium and Coal Fuels. Oak Ridge, USA.
  Zahner Ph. (1985) Le stockage du charbon et du coke en plein air: pollution et protection des eaux. Les cahiers de l'environnement No 38, OFPE, Bern.
- Cadmium, ion [water, ground-]: 1e-11 kg; source Dones R. 2007; lognormal variance with pedigree 0.748, pedigree (4,5,5,5,4)
  Estimated value not geography specific (generic value used in other ecoinvent coal market datasets). This represents the leaching of Cadmium to ground water during storage in open stockpiles. For a lack of more recent data this value is an estimation according to Dones et al. (2007) based on three studies conducted in the 1980s by Kok et al. (1989), ORNL (1980) and Zahner (1980). 500 liters of leachate per m2 of storage area are assumed for an average storage time of two months, an average pile height of 6m and a bulk density of 700kg/m3. High uncertainty for estimates of leachate emissions has to be assumed.
  Reference(s): Dones, R., Bauer, C., Röder, A. (2007) Kohle. In: Dones, R. (Ed.) et al., Sachbilanzen von Energiesystemen: Grundlagen für den ökologischen Vergleich von Energiesystemen und den Einbezug von Energiesystemen in Ökobilanzen für die Schweiz. Final report ecoinvent No. 6-VI, Paul Scherrer Institut Villigen, Swiss Centre for Life Cycle Inventories, Dübendorf, CH.
  Kok A., Bolt N., Jelgersma R. (1989) Spontaneous heating and stockpiling losses of coal. In: Kema Scientific & Technical Reports 7 (2):63-89.
  ORNL (1980) A Methodology and a Preliminary Data Base for Examining the Health Risks of Electricity Generation from Uranium and Coal Fuels. Oak Ridge, USA.
  Zahner Ph. (1985) Le stockage du charbon et du coke en plein air: pollution et protection des eaux. Les cahiers de l'environnement No 38, OFPE, Bern.
- Solids, inorganic [water, ground-]: 4e-5 kg; source Dones R. 2007; lognormal variance with pedigree 0.748, pedigree (4,5,5,5,4)
  Estimated value not geography specific (generic value used in other ecoinvent coal market datasets). This represents the leaching of inorganic solids to ground water during storage in open stockpiles. For a lack of more recent data this value is an estimation according to Dones et al. (2007) based on three studies conducted in the 1980ies by Kok et al. (1989), ORNL (1980) and Zahner (1980). 500 liters of leachate per m2 of storage area are assumed for an average storage time of two months, an average pile height of 6m and a bulk density of 700kg/m3. High uncertainty for estimates of leachate emissions has to be assumed.
  Reference(s): Dones, R., Bauer, C., Röder, A. (2007) Kohle. In: Dones, R. (Ed.) et al., Sachbilanzen
  von Energiesystemen: Grundlagen für den ökologischen Vergleich von
  Energiesystemen und den Einbezug von Energiesystemen in Ökobilanzen für die
  Schweiz. Final report ecoinvent No. 6-VI, Paul Scherrer Institut Villigen, Swiss Centre
  for Life Cycle Inventories, Dübendorf, CH.
  Kok A., Bolt N., Jelgersma R. (1989) Spontaneous heating and stockpiling losses of
  coal. In: Kema Scientific & Technical Reports 7 (2):63-89.
  ORNL (1980) A Methodology and a Preliminary Data Base for Examining the Health
  Risks of Electricity Generation from Uranium and Coal Fuels. Oak Ridge, USA.
  Zahner Ph. (1985) Le stockage du charbon et du coke en plein air: pollution et
  protection des eaux. Les cahiers de l'environnement No 38, OFPE, Bern.
- Iron, ion [water, ground-]: 1e-9 kg; source Dones R. 2007; lognormal variance with pedigree 0.748, pedigree (4,5,5,5,4)
  Estimated value not geography specific (generic value used in other ecoinvent coal market datasets). This represents the leaching of Iron to ground water during storage in open stockpiles. For a lack of more recent data this value is an estimation according to Dones et al. (2007) based on three studies conducted in the 1980s by Kok et al. (1989), ORNL (1980) and Zahner (1980). 500 liters of leachate per m2 of storage area are assumed for an average storage time of two months, an average pile height of 6m and a bulk density of 700kg/m3. High uncertainty for estimates of leachate emissions has to be assumed.
  Reference(s): Dones, R., Bauer, C., Röder, A. (2007) Kohle. In: Dones, R. (Ed.) et al., Sachbilanzen von Energiesystemen: Grundlagen für den ökologischen Vergleich von Energiesystemen und den Einbezug von Energiesystemen in Ökobilanzen für die Schweiz. Final report ecoinvent No. 6-VI, Paul Scherrer Institut Villigen, Swiss Centre for Life Cycle Inventories, Dübendorf, CH.
  Kok A., Bolt N., Jelgersma R. (1989) Spontaneous heating and stockpiling losses of coal. In: Kema Scientific & Technical Reports 7 (2):63-89.
  ORNL (1980) A Methodology and a Preliminary Data Base for Examining the Health Risks of Electricity Generation from Uranium and Coal Fuels. Oak Ridge, USA.
  Zahner Ph. (1985) Le stockage du charbon et du coke en plein air: pollution et protection des eaux. Les cahiers de l'environnement No 38, OFPE, Bern.

## Sampling procedure
Trade volumes are based on export data for 2014 according to the International Trade Centre (ITC) and South Africa's Department of Minerals and Resources (DMR). 95% of South Africa's export coal is exported through the Richards Bay coal terminal on the East Coast of South Africa. The distance that the coal is railed to the port for export is calculated from a weighted average of the average distance from the respective coalfields producing coal for export and the production volumes of export grade coal from each coalfield. The distances were estimated using Google Maps, while the production volumes were sourced from industry data. The average coal losses were assumed to be due wholly to particulate emissions during transport and storage of coal were estimated according to Chadwick et al., (1987) and NPI (2012). Due to a lack of site specific information, emissions to ground water (arising from leachate from coal stockpiles) have not been updated and use the same generic estimates as the other ecoivent coal mining datasets (i.e. they are estimated with high uncertainty according to Dones et al. (2007), based on three studies conducted in the 1980s by Kok et al. (1989), ORNL (1980) and Zahner (1980)). Conveyor belt usage was calculated on the basis of publically available data reported by the Richards Bay Coal Terminal (RBCT, 2014).
Reference(s): Chadwick, M. J., Highton, N.H. and Lindman, N. (1987) Environmental Impacts of Coal Mining and Utilization: A Complete Revision of Environmental Implications of Expanded Coal Utilization; NPI (2012) Emission Estimation Technique Manual for Mining. Version 3.1, National Pollution Inventory, Available at: http://www.npi.gov.au/system/files/resources/7e04163a-12ba-6864-d19a-f57d960aae58/files/mining.pdf. (Accessed on: July 2017); Dones, R., Bauer, C., Röder, A. (2007) Kohle. In: Dones, R. (Ed.) et al., Sachbilanzen von Energiesystemen: Grundlagen für den ökologischen Vergleich von Energiesystemen und den Einbezug von Energiesystemen in Ökobilanzen für die Schweiz. Final report ecoinvent No. 6-VI, Paul Scherrer Institut Villigen, Swiss Centre for Life Cycle Inventories, Dübendorf, CH; Kok A., Bolt N., Jelgersma R. (1989) Spontaneous heating and stockpiling losses of coal. In: Kema Scientific & Technical Reports 7 (2):63-89; ORNL (1980) A Methodology and a Preliminary Data Base for Examining the Health Risks of Electricity Generation from Uranium and Coal Fuels. Oak Ridge, USA; Zahner Ph. (1985) Le stockage du charbon et du coke en plein air: pollution et protection des eaux. Les cahiers de l'environnement No 38, OFPE, Bern; ITC (2017) Trademap Database, Available at: http://www.trademap.org/. (Accessed July 2017); DMR (2015) Operating and Developing Coal Mines in the Republic of South Africa 2015, Department of Mineral Resources. Available at: http://www.dmr.gov.za/. (Accessed: June 2017); RBCT (2014) Company Website, Richards Bay Coal Terminal. Available at: https://www.rbct.co.za/faq-6/. (Accessed July 2017).

## Extrapolations
This dataset has been extrapolated from year 2014 to the year of the calculation (2021). The uncertainty has been adjusted accordingly.

## Review by Christian Bauer 2017-11-24
passed
