# gypsum quarry operation

Dataset: EcoSpold 2, unit process
Geography: CH
Time period: 1997-01-01 to 2021-12-31
Technology level: current
Classification: EcoSpold01Categories: construction materials/others
Classification: ISIC rev.4 ecoinvent: 0810:Quarrying of stone, sand and clay
Synonyms: Gipsstein; Kalziumsulfat dihydrat; anhydrite; calcium sulphate dihydrate
Tags: combined production; ConvertedDataset
Scenario: Business-as-Usual
System model: Allocation, cut-off by classification
Generated by: Hans-Jörg Althaus
Published in: Kellenberger D. 2007
Database: ecoinvent
isCopyrightProtected: true
accessRestrictedTo: 1

## General comment
The multi-output-process 'mining, gypsum' delivers the co-products 'gypsum, mineral, at mine' and 'anhydrite rock, at mine'. Allocation is done by weight. In some mines anhydrite is not exploited but left in the mine. Since the electricity consumption has a relevant share on the total energy consumption, the choice of the energy mix is important. For gypsum mined in countries with high fossil share in the electricity mix this module has to be adopted accordingly.
[This dataset was already contained in the ecoinvent database version 2. It was not individually updated during the transfer to ecoinvent version 3. Life Cycle Impact Assessment results may still have changed, as they are affected by changes in the supply chain, i.e. in other datasets. This dataset was generated following the ecoinvent quality guidelines for version 2. It may have been subject to central changes described in the ecoinvent version 3 change report (http://www.ecoinvent.org/database/ecoinvent-version-3/reports-of-changes/), and the results of the central updates were reviewed extensively. The changes added e.g. consistent water flows and other information throughout the database. The documentation of this dataset can be found in the ecoinvent reports of version 2, which are still available via the ecoinvent website. The change report linked above covers all central changes that were made during the conversion process.]

## Included activities end
mining and crushing of gypsum and anhydrite

## Geography
data for Switzerland

## Technology
open pit mining; composition of products: 65% gypsum, 34% anhydrite, 1% others.

## Parameters
- sum of reference products: 1 kg; name sum_RP
  It's the addition of the different reference product's amount

## Reference product
- anhydrite rock: 1 kg; name anhydrite_rock; = anhydrite_rock_PV/(anhydrite_rock_PV+ gypsum_PV); CPC 15200: Gypsum; anhydrite; limestone flux; limestone and other calcareous stone, of a kind used for the manufacture of[…]; By-product classification allocatable product
  The amount was calculated relative to the production volumes.
  production volume 8.5e7 kg; name anhydrite_rock_PV
    2005 production volume of gypsum+anhydrite was obtained from USGS (minerals.usgs.gov/minerals/pubs/commodity/gypsum/myb1-2006-gypsu.xls).
    It was considered that 34% was anhydrite and 65% gypsum (ecoinvent v2.2 report 7)
  property price 0.005 EUR2005; name anhydrite_rock_price_EUR2005
    Temporary price data. Calculated as 90% of purchasers price based on: Same price as for gypsum has been assumed
  property carbon content 0
    carbon content on a dry matter basis (reserved; not for manual entry)
  properties: wet mass 1 kg, carbon content, fossil 0, dry mass 1 kg, water content 0, water in wet mass 0 kg, carbon content, non-fossil 0, carbon allocation 0 kg
- gypsum, mineral: 0 kg; name gypsum; By-product classification allocatable product; CPC 15200: Gypsum; anhydrite; limestone flux; limestone and other calcareous stone, of a kind used for the manufacture of[…]
  The amount was calculated relative to the production volumes.
  production volume 0 kg; name gypsum_PV
    (same comment as for anhydrite rock)
  property price 0.005 EUR2005; name gypsum_price_EUR2005
    Temporary price data. Calculated as 90% of purchasers price based on: 2004 prices for gypsum, crude, at mine in USGS (2007) Mineral commodity summaries 2007. <http://minerals.usgs.gov/minerals/pubs/mcs/2007/mcs2007.pdf> [Accessed 25 May 2010] and USGS (2009a) Mineral commodity summaries 2009. <http://minerals.usgs.gov/minerals/pubs/mcs/2009/mcs2009.pdf> [Accessed 25 May 2010]; The prices from USGS are assumed to be World/USA prices because they were collected from USA, major producer countries or global market (e.g. London, Metal Exchange).
  property carbon content 0
    carbon content on a dry matter basis (reserved; not for manual entry)
  properties: carbon content, non-fossil 0, dry mass 1 kg, water in wet mass 0 kg, wet mass 1 kg, carbon content, fossil 0, water content 0, carbon allocation 0 kg

## Inputs from technosphere
- recultivation, limestone mine: 1.85e-5 m2; = (1.85E-05/sum_RP)*( anhydrite_rock+gypsum); lognormal variance with pedigree 0.19, pedigree (4,4,5,1,1)
  This exchange has an activity link directly to the producing activity because the product is primarily consumed in the same geographical area where it is produced.
- blasting: 7.73e-5 kg; = (7.73E-05/sum_RP)*( anhydrite_rock+gypsum); lognormal variance with pedigree 0.07, pedigree (1,4,5,1,3)
  Calculated value.
- conveyor belt: 1.05e-8 m; = (1.05E-08/sum_RP)*( anhydrite_rock+gypsum); lognormal variance with pedigree 0.44, pedigree (5,4,5,1,3)
  Calculated value.
- industrial machine, heavy, unspecified: 4.63e-6 kg; = (4.63E-06/sum_RP)*( anhydrite_rock+gypsum); lognormal variance with pedigree 0.372, pedigree (3,4,5,1,3)
  Calculated value.
- electricity, medium voltage: 0.000916 kWh; = (0.000916/sum_RP)*( anhydrite_rock+gypsum); lognormal variance with pedigree 0.072, pedigree (3,4,5,1,3)
  Calculated value.
- limestone quarry infrastructure: 5.26e-11 unit; = (5.26E-11/sum_RP)*( anhydrite_rock+gypsum); lognormal variance with pedigree 0.372, pedigree (3,4,5,1,3)
  (same comment as for recultivation, limestone mine)
- diesel, burned in building machine: 0.018 MJ; = (0.018/sum_RP)*( anhydrite_rock+gypsum); lognormal variance with pedigree 0.19, pedigree (1,4,5,1,3)
  Calculated value.
  properties: heating value, net 1 MJ

## Inputs from nature
- Gypsum, in ground [natural resource, in ground]: 1 kg; = (1/sum_RP)*( anhydrite_rock+gypsum); lognormal variance with pedigree 0.04, pedigree (1,1,5,1,1)
  definition
- Transformation, from unspecified [natural resource, land]: 1.85e-5 m2; = (1.85E-05/sum_RP)*( anhydrite_rock+gypsum); lognormal variance with pedigree 0.19, pedigree (4,4,5,1,1)
  Calculated value.
- Transformation, to mineral extraction site [natural resource, land]: 1.85e-5 m2; = (1.85E-05/sum_RP)*( anhydrite_rock+gypsum); lognormal variance with pedigree 0.19, pedigree (4,4,5,1,1)
  Calculated value.
- Occupation, mineral extraction site [natural resource, land]: 0.000185 m2*year; = (0.000185/sum_RP)*( anhydrite_rock+gypsum); lognormal variance with pedigree 0.11, pedigree (4,4,5,1,1)
  Calculated value.

## Emissions to nature
- Particulates, > 10 um [air, non-urban air or from high stacks]: 0.00112 kg; = (0.00112/sum_RP)*( anhydrite_rock+gypsum); lognormal variance with pedigree 0.1681, pedigree (1,5,5,3,4)
  Calculated value.
- Particulates, < 2.5 um [air, non-urban air or from high stacks]: 8e-5 kg; = (8E-05/sum_RP)*( anhydrite_rock+gypsum); lognormal variance with pedigree 0.4281, pedigree (1,5,5,3,4)
  Calculated value.
- Particulates, > 2.5 um, and < 10um [air, non-urban air or from high stacks]: 0.0004 kg; = (0.0004/sum_RP)*( anhydrite_rock+gypsum); lognormal variance with pedigree 0.2481, pedigree (1,5,5,3,4)
  Calculated value.

## Sampling procedure
environmental report, literature

## Review by Roberto Dones 2005-07-19
passed

## Review by Bo Weidema 2012-05-31
Passed. Formulas have been added to enable automatic sub-division of this combined production dataset, following ecoinvent v3 procedures (thus avoiding allocation).
