# treatment of waste plastic, industrial electronics, municipal incineration

Dataset: EcoSpold 2, unit process
Geography: RoW
Time period: 2006-01-01 to 2021-12-31
Technology level: current
Classification: ISIC rev.4 ecoinvent: 3821:Treatment and disposal of non-hazardous waste
Synonyms: Siedlungsabfallverbrennung; Kehrichtverbrennung; municipal waste incineration
Scenario: Business-as-Usual
System model: Allocation, cut-off by classification
Share of production covered: 1.8 %
Generated by: Gabor Doka
Published in: Doka G. 2013
Database: ecoinvent
isCopyrightProtected: true
accessRestrictedTo: 1

## General comment
This dataset represents the activity of waste disposal of waste plastic, industrial electronics in a municipal solid waste incinerator (MSWI) // Recommended use of this dataset: For plastic parts from industrial electronics, which go to disposal as part of communal waste mixture, either after a separation procedure, or in small amounts as illegal disposal of a larger item of waste electronics (WEEE). // // Waste composition (wet, in ppm): upper heating value 36.24 MJ/kg; lower heating value 34.78 MJ/kg; H2O 7213.7; O 62000; H 73000; C 808000; S 400; N 13500; P 400; B n.a.; Cl 6400; Br 4200; F 370; I n.a.; Ag n.a.; As 5; Ba 217; Cd 186; Co 29.478; Cr 71; Cu 3194.1; Hg 0.3; Mn 9.8; Mo 4; Ni 299; Pb 165; Sb 4795.2; Se 1.9596; Sn 139; V 1; Zn 520; Be 0.46656; Sc n.a.; Sr 82.582; Ti 4767; Tl 0.37325; W n.a.; Si 2383; Fe 1673; Ca 3047; Al 2773; K 1; Mg n.a.; Na 151; // Share of carbon in waste that is biogenic 0%. // Share of metals in waste not oxidised and bulk-recyclable (exclude very small or thin parts) Iron: 0%; Alu: 0%; Copper: 0%. // One kg of this waste produces 0.04613 kg of slag and 0.02153 kg of residues, which are landfilled. Additional solidification with 0.00861 kg of cement. // Net energy production: 4.49MJ/kg electric energy and 8.69MJ/kg thermal energy. // Recovery of metal scrap to recycling: 0g iron scrap, 0g aluminium scrap, 0g copper scrap.

## Included activities start
waste incineration from waste reception gate and delivery into waste bunker at incinerator plant site (without transports to the incinerator)

## Included activities end
Waste-specific short-term emissions to water from leachate. Long-term emissions from landfill to ground water.

## Geography
Specific to the technology mix encountered in Switzerland in 2010. Well applicable to modern incineration practices in Europe, North America or Japan.

## Technology
average Swiss MSWI plants in 2010 (grate incinerators) with electrostatic precipitator for fly ash (ESP), wet flue gas scrubber and 25% SNCR , 42.77% SCR-high dust , 32.68% SCR-low dust -DeNOx facilities and 0% without Denox (weighted according to mass of burnt waste, representing Swiss average). Efficiency of iron scrap separation from slag : 58%. Efficiency of non-ferrous scrap separation from slag : 31%. Gross electric efficiency technology mix 15.84% and Gross thermal efficiency technology mix 28.51%

## Time period
Waste composition as given in literature reference, theoretical data or other source. Transfer coefficients for modern MSWI.

## Reference product
- waste plastic, industrial electronics: -1 kg; CPC 39270: Waste, parings and scrap of plastics; By-product classification Waste
  Main reference product of this activity (supply of disposal service).
  production volume 5.2351e8 kg
    based on estimate on MSW in WTE globally and estimate of share of WEEE residues in Swiss MSW based on sums of estimates of WEEE residues (from mechanical separation of desktop and laptop computers, cathode ray tube displays, liquid crystal displays, laser printers, industrial devices, IT accessories, and residues from shredder fraction from manual dismantling of WEEE) and specific plastics content in those residues (from Hischier et al. 2007-V)
  property price 0 EUR2005
    Waste products are assigned a price of zero as they are assumed to require further treatment.
  property carbon content 0.81386
    carbon content on a dry matter basis (reserved; not for manual entry)
  properties: heating value, net 34.78 MJ, carbon content, non-fossil 0, water content 0.180638, carbon content, fossil 0.81386, wet mass 1 kg, dry mass 0.847 kg, water in wet mass 0.153 kg, carbon allocation 0.689339 kg

## By-products
- electricity, for reuse in municipal waste incineration only: 0 kWh; name E_el_prod_MSWI; CPC 17100: Electrical energy; By-product classification allocatable product; pedigree (1,1,1,1,1)
  Net electricity generated from this waste and used in internal MSWI plant energy redistribution.
  Uncertainty: uncertainty is calculated from uncertainties in waste composition and uncertainties in energy efficiency and the uncertainty in internal energy demand
  production volume 6.5261e8 kWh
    calculated in proportion to reference product waste input to incinerator
  property exergy 3.6 MJ; name E_el_prod_MSWI_exergy
    This exergy property is based on the exergy content of the product.
  property true value relation 3.6; name E_el_prod_MSWI_true_value_relation
    property to calculate "true value" from
  property price 0.1 EUR2005; name E_el_prod_MSWI_price_EUR2005
    Estimated to be the same price as in case of electricity, medium voltage.
- heat, for reuse in municipal waste incineration only: 0 MJ; name E_th_prod_MSWI; By-product classification allocatable product; CPC 17300: Steam and hot water; pedigree (1,1,1,1,1)
  (same comment as for electricity, for reuse in municipal waste incineration only)
  production volume 4.5484e9 MJ
    calculated in proportion to reference product waste input to incinerator
  property exergy 0.1842 MJ; name E_th_prod_MSWI_exergy
    This exergy property is based on the exergy content of the product.
  property true value relation 0.1842; name E_th_prod_MSWI_true_value_relation
    property to calculate "true value" from
  property price 0.0106 EUR2005; name E_th_prod_MSWI_price_EUR2005
    Average European district heat price from Ecoheatcool and Euroheat 2005-2006, Ecoheat Work package 1: The European heat market. Final report. 10.6 EUR/GJ i s the price of district heat. http://www.solarthermalworld.org/files/Ecoheatcool%20WP1%20Web.pdf?download

## Inputs from technosphere
- chromium oxide, flakes: 3.0114e-6 kg; lognormal variance with pedigree 1.0412, pedigree (1,1,4,1,1)
  Input to DeNOx stage.
  Uncertainty: uncertainty calculated from uncertainty in average DeNOx input, uncertainty in the share of thermal NOx, uncertainty of nitrogen content in average municipal waste and the uncertainty in nitrogen content in *this* waste.
  properties: dry mass 1 kg, wet mass 1 kg
- ammonia, anhydrous, liquid: 0 kg; pedigree (1,1,1,1,1)
  Input to DeNOx stage (100% NH3).
  Uncertainty: uncertainty calculated from uncertainty in average DeNOx input, uncertainty in the share of thermal NOx, uncertainty of nitrogen content in average municipal waste and the uncertainty in nitrogen content in *this* waste.
  properties: dry mass 1 kg, wet mass 1 kg
- cement, unspecified: 0 kg; pedigree (1,1,1,1,1)
  Cement required for solidification of landfilled residual material.
  Uncertainty: Uncertainty calculated from uncertainty of the waste composition of this waste, of transfer coefficients in the incinerator and of the solidification recipe.
  properties: wet mass 1 kg, dry mass 1 kg
- waste cement, hydrated: 0 kg; pedigree (1,1,1,1,1)
  Hydrated cement output for solidification of landfilled residual material.
  Uncertainty: Uncertainty calculated from uncertainty of the waste composition of this waste and transfer coefficients in the incinerator and of the solidification recipe.
  production volume 0 kg
    calculated in proportion to reference product waste input to incinerator
  properties: wet mass 1 kg, dry mass 1 kg
- sodium hydroxide, without water, in 50% solution state: 0.00089664 kg; lognormal variance with pedigree 0.2661, pedigree (1,1,4,1,1)
  Auxilliary inputs for the flue gas treatment stage of the incinerator plant.
  Uncertainty: uncertainty calculated from uncertainty in average NaOH input, of transfer coefficients in the incinerator, and the uncertainty of the waste composition of this waste
  properties: wet mass 1 kg, heating value, net 3.03 MJ, dry mass 1 kg
- titanium dioxide: 0.00014756 kg; lognormal variance with pedigree 1.0412, pedigree (1,1,4,1,1)
  Input to DeNOx stage (TiO2 catalyst carrier)
  Uncertainty: uncertainty calculated from uncertainty in average DeNOx input, uncertainty in the share of thermal NOx, uncertainty of nitrogen content in average municipal waste and the uncertainty in nitrogen content in *this* waste.
  properties: wet mass 1 kg, dry mass 1 kg
- process-specific burdens, residual material landfill: 0 kg; pedigree (1,1,1,1,1)
  Mass-specific expenditures required for landfilling of incineration residues.
  Uncertainty: uncertainty is calculated from uncertainties in waste composition and transfer coefficients in incinerator
- transport, freight, lorry, unspecified: 0 metric ton*km; pedigree (1,1,1,1,1)
  Transport services to transport incineration residues to landfills.
  Uncertainty: uncertainty calculated from uncertainty of the waste composition of this waste, uncertainty of transfer coefficients and the uncertainty in generic transportation distances
- heat, district or industrial, natural gas: 0 MJ; pedigree (1,1,1,1,1)
  Input to DeNOx stage, to heat up flue gas in low-dust SCR.
  Uncertainty: uncertainty calculated from uncertainty in average DeNOx input, uncertainty in the share of thermal NOx, uncertainty of nitrogen content in average municipal waste and the uncertainty in nitrogen content in *this* waste.
  properties: heating value, net 1 MJ
- process-specific burdens, slag landfill: 0 kg; pedigree (1,1,1,1,1)
  Mass-specific expenditures required for landfilling of bottom ash.
  Uncertainty: uncertainty is calculated from uncertainties in waste composition and transfer coefficients in incinerator
- quicklime, milled, packed: 0.0039676 kg; lognormal variance with pedigree 0.33976, pedigree (1,1,4,1,1)
  Auxilliary inputs for the flue gas treatment stage of the incinerator plant.
  Uncertainty: uncertainty calculated from uncertainty in average CaO input, of transfer coefficients in the incinerator, and the uncertainty of the waste composition of this waste
  properties: water content 0.010101, wet mass 1 kg, dry mass 0.99 kg
- municipal waste incineration facility: 2.5e-10 unit
  Demands per kilogram waste.
- iron (III) chloride, without water, in 40% solution state: 0.00014468 kg; lognormal variance with pedigree 0.26384, pedigree (1,1,4,1,1)
  Auxilliary inputs for the wastewater treatment stage of the incinerator plant.
  Uncertainty: uncertainty calculated from uncertainty in average FeCl3 input, of transfer coefficients in the incinerator, and the uncertainty of the waste composition of this waste
  properties: dry mass 1 kg, wet mass 1 kg
- residual material landfill: 4.4846e-11 unit; lognormal variance with pedigree 0.061282, pedigree (1,1,4,1,1)
  Landfill infrastructure required for landfilling of incineration residues.
  Uncertainty: uncertainty is calculated from uncertainties in waste composition and transfer coefficients in incinerator
- water, decarbonised: 0 kg; pedigree (1,1,1,1,1)
  Incinerator process water used in flue gas scrubber stage.
  Uncertainty: uncertainty calculated from uncertainty in average water input, and the uncertainty of the waste composition of this waste
  properties: wet mass 1 kg
- slag landfill: 7.9129e-11 unit; lognormal variance with pedigree 0.051873, pedigree (1,1,4,1,1)
  Landfill infrastructure required for landfilling of bottom ash.
  Uncertainty: uncertainty is calculated from uncertainties in waste composition and transfer coefficients in incinerator
- chemical, inorganic: 0.00029467 kg; lognormal variance with pedigree 0.22707, pedigree (1,1,4,1,1)
  Auxilliary inputs for the wastewater treatment stage of the incinerator plant. Proxy for Polyelectrolyte.
  Uncertainty: uncertainty calculated from uncertainty in average Polyelectrolyte input, of transfer coefficients in the incinerator, and the uncertainty of the waste composition of this waste
  properties: wet mass 1 kg, carbon content, fossil 0.003, dry mass 1 kg
- chemical, organic: 5.3924e-5 kg; lognormal variance with pedigree 0.77002, pedigree (1,1,4,1,1)
  Auxilliary inputs for the wastewater treatment stage of the incinerator plant. Proxy for (pure) Trisodium-trimercapto-s-triazine (CAS 17766-26-6), used as 15% diluted solution, aka TMT15.
  Uncertainty: uncertainty calculated from uncertainty in average TMT15 input, of transfer coefficients in the incinerator, and the uncertainty of the waste composition of this waste
  properties: dry mass 1 kg, heating value, net 19.03 MJ, carbon content, fossil 0.628, wet mass 1 kg
- hydrochloric acid, without water, in 30% solution state: 7.7451e-5 kg; lognormal variance with pedigree 0.22707, pedigree (1,1,4,1,1)
  Auxilliary inputs for the wastewater treatment stage of the incinerator plant.
  Uncertainty: uncertainty calculated from uncertainty in average HCl input, of transfer coefficients in the incinerator, and the uncertainty of the waste composition of this waste
  properties: wet mass 1 kg, heating value, net 3.32 MJ, dry mass 1 kg
- ammonia, anhydrous, liquid: 0.000493681, 4.24378e-5, 6.60222e-5, 0.000130813, 0.000128163, 1.34328e-5, 6.00497e-5, 0.0014206 kg (8 entries); lognormal variance with pedigree 0.682, pedigree (1,1,4,1,1)
  (same comment as for ammonia, anhydrous, liquid)
- cement, unspecified: 0.00124332, 0.000258698, 1.89478e-5, 5.40076e-5, 0.0012214, 3.59493e-5, 0.00039483, 4.777e-5, 0.00533558 kg (9 entries); lognormal variance with pedigree 0.070366, pedigree (1,1,4,1,1)
  (same comment as for cement, unspecified)
- waste cement, hydrated: -0.00608916, -0.0154368 kg (2 entries); lognormal variance with pedigree 0.070366, pedigree (1,1,4,1,1)
  (same comment as for waste cement, hydrated)
  production volume 1.1269e7 kg
- process-specific burdens, residual material landfill: 0.00608916, 0.0154368 kg (2 entries); lognormal variance with pedigree 0.061282, pedigree (1,1,4,1,1)
  (same comment as for process-specific burdens, residual material landfill)
- transport, freight, lorry, unspecified: 0.000302295, 4.73283e-5, 0.00229188 metric ton*km (3 entries); lognormal variance with pedigree 0.033829, pedigree (1,1,4,1,1)
  (same comment as for transport, freight, lorry, unspecified)
- heat, district or industrial, natural gas: 0.00490194, 0.11746, 0.318058 MJ (3 entries); lognormal variance with pedigree 0.682, pedigree (1,1,4,1,1)
  (same comment as for heat, district or industrial, natural gas)
- process-specific burdens, slag landfill: 0.0125907, 0.0319193 kg (2 entries); lognormal variance with pedigree 0.051873, pedigree (1,1,4,1,1)
  (same comment as for process-specific burdens, slag landfill)
- water, decarbonised: 0.0314982, 0.0819583, 0.330557, 0.0807203, 0.0162728, 0.0535081, 0.00295397, 0.0420934, 0.0980529, 0.615059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 kg (12 entries); lognormal variance with pedigree 0.26384, pedigree (1,1,4,1,1)
  (same comment as for water, decarbonised)

## Inputs from nature
- Oxygen [natural resource, in air]: 2.781 kg; lognormal variance with pedigree 0.0168474, pedigree (1,1,4,1,1)
  Oxygen from ambient air needed to combust and oxidise this waste. Net demand, i.e. without O2 leaving the plant in flue gas uncombusted.
  Uncertainty: uncertainty is calculated from uncertainties in waste composition and transfer coefficients to flue gas and soild residues in incinerator

## Emissions to nature
- Mercury [air, urban air close to ground]: 8.5061e-9 kg; lognormal variance with pedigree 1.7409, pedigree (1,1,4,1,1)
  Emission to air from waste composition and transfer coefficients.
  Uncertainty: uncertainty is calculated from uncertainties in waste composition and transfer coefficients in incinerator
- Cadmium, ion [water, ground-, long-term]: 1.3573e-5 kg; lognormal variance with pedigree 6.3443, pedigree (1,1,4,1,1)
  Long-term emissions from landfilling of incineration residues.
  Uncertainty: uncertainty is calculated from uncertainties in waste composition and transfer coefficients in incinerator and landfills.
- Chromium [air, urban air close to ground]: 6.1998e-8 kg; lognormal variance with pedigree 1.0387, pedigree (1,1,4,1,1)
  (same comment as for Mercury)
- Arsenic [air, urban air close to ground]: 3.9166e-8 kg; lognormal variance with pedigree 1.3755, pedigree (1,1,4,1,1)
  (same comment as for Mercury)
- Particulates, < 2.5 um [air, urban air close to ground]: 1.5015e-6 kg; lognormal variance with pedigree 0.3724, pedigree (1,1,4,1,1)
  Incomplete combustion product emitted to air.
  Uncertainty: uncertainty calculated from uncertainty in average operation emissions, and the uncertainty of the flue gas volume from this waste.
- Carbon dioxide, fossil [air, urban air close to ground]: 2.9448 kg; lognormal variance with pedigree 0.0094329, pedigree (1,1,4,1,1)
  (same comment as for Mercury)
- Thallium [water, ground-, long-term]: 2.178e-7 kg; lognormal variance with pedigree 1.2795, pedigree (1,1,4,1,1)
  (same comment as for Cadmium, ion)
- Titanium, ion [water, surface water]: 1.7774e-6 kg; lognormal variance with pedigree 0.39253, pedigree (1,1,4,1,1)
  Emissions to water from waste composition and transfer coefficients in incinerator and landfills.
  Uncertainty: uncertainty is calculated from uncertainties in waste composition and transfer coefficients in incinerator and landfills
- Molybdenum [water, surface water]: 1.0925e-6 kg; lognormal variance with pedigree 0.9688, pedigree (1,1,4,1,1)
  (same comment as for Titanium, ion)
- Phenol, pentachloro- [air, urban air close to ground]: 5.4768e-12 kg; lognormal variance with pedigree 0.074092, pedigree (1,1,4,1,1)
  (same comment as for Particulates, < 2.5 um)
- Particulates, > 2.5 um, and < 10um [air, urban air close to ground]: 7.5452e-9 kg; lognormal variance with pedigree 0.16874, pedigree (1,1,4,1,1)
  (same comment as for Particulates, < 2.5 um)
- Phosphate [water, surface water]: 2.2488e-7 kg; lognormal variance with pedigree 0.58212, pedigree (1,1,4,1,1)
  (same comment as for Titanium, ion)
- Lead [water, surface water]: 1.5783e-8 kg; lognormal variance with pedigree 0.75946, pedigree (1,1,4,1,1)
  (same comment as for Titanium, ion)
- TOC, Total Organic Carbon [water, ground-, long-term]: 0.002401 kg; lognormal variance with pedigree 0.021285, pedigree (1,1,4,1,1)
  (same comment as for Cadmium, ion)
- Bromine [water, ground-, long-term]: 0.00040481 kg; lognormal variance with pedigree 0.49034, pedigree (1,1,4,1,1)
  (same comment as for Cadmium, ion)
- Chloride [water, ground-, long-term]: 0.0014831 kg; lognormal variance with pedigree 0.42836, pedigree (1,1,4,1,1)
  (same comment as for Cadmium, ion)
- Manganese [water, ground-, long-term]: 6.0458e-6 kg; lognormal variance with pedigree 2.2383, pedigree (1,1,4,1,1)
  (same comment as for Cadmium, ion)
- Cobalt [air, urban air close to ground]: 5.361e-8 kg; lognormal variance with pedigree 1.149, pedigree (1,1,4,1,1)
  (same comment as for Mercury)
- Vanadium, ion [water, surface water]: 1.5966e-9 kg; lognormal variance with pedigree 1.5453, pedigree (1,1,4,1,1)
  (same comment as for Titanium, ion)
- DOC, Dissolved Organic Carbon [water, ground-, long-term]: 0.002401 kg; lognormal variance with pedigree 0.021285, pedigree (1,1,4,1,1)
  (same comment as for Cadmium, ion)
- Heat, waste [water, surface water]: 6.1242 MJ; lognormal variance with pedigree 0.022853, pedigree (1,1,4,1,1)
  Waste heat generated from heating value of this waste plus any electricity required to process it.
  Uncertainty: uncertainty is calculated from uncertainties in waste composition and uncertainties in energy efficiency and the uncertainty in internal energy demand
- Heat, waste [air, urban air close to ground]: 26.647 MJ; lognormal variance with pedigree 0.022853, pedigree (1,1,4,1,1)
  (same comment as for Heat, waste)
- Cadmium, ion [water, surface water]: 1.7827e-8 kg; lognormal variance with pedigree 0.77353, pedigree (1,1,4,1,1)
  (same comment as for Titanium, ion)
- Thallium [water, surface water]: 2.2866e-10 kg; lognormal variance with pedigree 1.8782, pedigree (1,1,4,1,1)
  (same comment as for Titanium, ion)
- Nitrate [water, surface water]: 0.00017209 kg; lognormal variance with pedigree 0.24555, pedigree (1,1,4,1,1)
  (same comment as for Titanium, ion)
- Calcium, ion [water, ground-, long-term]: 0.0022696 kg; lognormal variance with pedigree 0.48633, pedigree (1,1,4,1,1)
  (same comment as for Cadmium, ion)
- Aluminium [water, surface water]: 3.001e-7 kg; lognormal variance with pedigree 0.88627, pedigree (1,1,4,1,1)
  (same comment as for Titanium, ion)
- Zinc, ion [water, surface water]: 4.6916e-8 kg; lognormal variance with pedigree 0.63997, pedigree (1,1,4,1,1)
  (same comment as for Titanium, ion)
- Potassium, ion [water, ground-, long-term]: 7.7738e-7 kg; lognormal variance with pedigree 0.98472, pedigree (1,1,4,1,1)
  (same comment as for Cadmium, ion)
- NMVOC, non-methane volatile organic compounds, unspecified origin [air, urban air close to ground]: 5.7234e-7 kg; lognormal variance with pedigree 0.074092, pedigree (1,1,4,1,1)
  (same comment as for Particulates, < 2.5 um)
- Barium [water, ground-, long-term]: 0.00010929 kg; lognormal variance with pedigree 2.2376, pedigree (1,1,4,1,1)
  (same comment as for Cadmium, ion)
- Hydrogen chloride [air, urban air close to ground]: 3.6522e-6 kg; lognormal variance with pedigree 0.45282, pedigree (1,1,4,1,1)
  (same comment as for Mercury)
- Sodium [air, urban air close to ground]: 1.2397e-6 kg; lognormal variance with pedigree 0.92835, pedigree (1,1,4,1,1)
  (same comment as for Mercury)
- Silicon [water, ground-, long-term]: 0.00024068 kg; lognormal variance with pedigree 5.2355, pedigree (1,1,4,1,1)
  (same comment as for Cadmium, ion)
- Benzene [air, urban air close to ground]: 1.2576e-8 kg; lognormal variance with pedigree 0.074092, pedigree (1,1,4,1,1)
  (same comment as for Particulates, < 2.5 um)
- Hydrogen fluoride [air, urban air close to ground]: 2.4963e-6 kg; lognormal variance with pedigree 0.80739, pedigree (1,1,4,1,1)
  (same comment as for Mercury)
- Lead [water, ground-, long-term]: 7.9776e-5 kg; lognormal variance with pedigree 4.049, pedigree (1,1,4,1,1)
  (same comment as for Cadmium, ion)
- Chloride [water, surface water]: 0.0049134 kg; lognormal variance with pedigree 0.34556, pedigree (1,1,4,1,1)
  (same comment as for Titanium, ion)
- Fluoride [water, ground-, long-term]: 0.00033173 kg; lognormal variance with pedigree 0.43967, pedigree (1,1,4,1,1)
  (same comment as for Cadmium, ion)
- Benzo(a)pyrene [air, urban air close to ground]: 2.7986e-13 kg; lognormal variance with pedigree 0.3724, pedigree (1,1,4,1,1)
  (same comment as for Particulates, < 2.5 um)
- Nickel [air, urban air close to ground]: 3.7561e-7 kg; lognormal variance with pedigree 0.84026, pedigree (1,1,4,1,1)
  (same comment as for Mercury)
- Mercury [water, surface water]: 3.2581e-10 kg; lognormal variance with pedigree 1.2397, pedigree (1,1,4,1,1)
  (same comment as for Titanium, ion)
- Tin, ion [water, ground-, long-term]: 5.3198e-5 kg; lognormal variance with pedigree 1.8033, pedigree (1,1,4,1,1)
  (same comment as for Cadmium, ion)
- Copper, ion [water, ground-, long-term]: 0.0028531 kg; lognormal variance with pedigree 0.50641, pedigree (1,1,4,1,1)
  (same comment as for Cadmium, ion)
- Titanium [air, urban air close to ground]: 3.9549e-6 kg; lognormal variance with pedigree 0.48845, pedigree (1,1,4,1,1)
  (same comment as for Mercury)
- Beryllium [water, surface water]: 2.9222e-10 kg; lognormal variance with pedigree 2.1896, pedigree (1,1,4,1,1)
  (same comment as for Titanium, ion)
- Molybdenum [air, urban air close to ground]: 5.2632e-9 kg; lognormal variance with pedigree 1.4117, pedigree (1,1,4,1,1)
  (same comment as for Mercury)
- Sulfate [water, surface water]: 0.00020292 kg; lognormal variance with pedigree 0.38166, pedigree (1,1,4,1,1)
  (same comment as for Titanium, ion)
- Chromium VI [water, ground-, long-term]: 6.513e-6 kg; lognormal variance with pedigree 1.4894, pedigree (1,1,4,1,1)
  (same comment as for Cadmium, ion)
- Silicon [water, surface water]: 5.8426e-7 kg; lognormal variance with pedigree 0.74346, pedigree (1,1,4,1,1)
  (same comment as for Titanium, ion)
- Iron, ion [water, surface water]: 4.3981e-8 kg; lognormal variance with pedigree 0.87301, pedigree (1,1,4,1,1)
  (same comment as for Titanium, ion)
- Chromium, ion [water, surface water]: 5.513e-9 kg; lognormal variance with pedigree 1.0514, pedigree (1,1,4,1,1)
  (same comment as for Titanium, ion)
- Water [water, surface water]: 0.00047391 m3; lognormal variance with pedigree 1.1287, pedigree (1,1,4,1,1)
  Process water released to surface water.
  Uncertainty: uncertainty calculated from uncertainty in process water input and the uncertainty of fraction to surface water.
- Copper, ion [water, surface water]: 4.1389e-7 kg; lognormal variance with pedigree 0.55069, pedigree (1,1,4,1,1)
  (same comment as for Titanium, ion)
- Strontium [air, urban air close to ground]: 8.2582e-9 kg; lognormal variance with pedigree 1.0313, pedigree (1,1,4,1,1)
  (same comment as for Mercury)
- Zinc, ion [water, ground-, long-term]: 0.00015813 kg; lognormal variance with pedigree 2.8777, pedigree (1,1,4,1,1)
  (same comment as for Cadmium, ion)
- Molybdenum [water, ground-, long-term]: 2.9022e-6 kg; lognormal variance with pedigree 1.3948, pedigree (1,1,4,1,1)
  (same comment as for Cadmium, ion)
- Bromine [air, urban air close to ground]: 2.0979e-6 kg; lognormal variance with pedigree 0.50235, pedigree (1,1,4,1,1)
  (same comment as for Mercury)
- Nitrate [water, ground-, long-term]: 0.00048555 kg; lognormal variance with pedigree 0.34771, pedigree (1,1,4,1,1)
  (same comment as for Cadmium, ion)
- Chromium VI [water, surface water]: 1.9843e-6 kg; lognormal variance with pedigree 1.0985, pedigree (1,1,4,1,1)
  (same comment as for Titanium, ion)
- Benzene, hexachloro- [air, urban air close to ground]: 2.6296e-11 kg; lognormal variance with pedigree 0.074092, pedigree (1,1,4,1,1)
  (same comment as for Particulates, < 2.5 um)
- Potassium [air, urban air close to ground]: 4.9405e-9 kg; lognormal variance with pedigree 1.5917, pedigree (1,1,4,1,1)
  (same comment as for Mercury)
- Cobalt [water, surface water]: 5.3406e-9 kg; lognormal variance with pedigree 1.4477, pedigree (1,1,4,1,1)
  (same comment as for Titanium, ion)
- Arsenic, ion [water, surface water]: 3.4636e-6 kg; lognormal variance with pedigree 1.2584, pedigree (1,1,4,1,1)
  (same comment as for Titanium, ion)
- Sodium, ion [water, ground-, long-term]: 0.00010873 kg; lognormal variance with pedigree 0.49352, pedigree (1,1,4,1,1)
  (same comment as for Cadmium, ion)
- BOD5, Biological Oxygen Demand [water, surface water]: 0.00093304 kg; lognormal variance with pedigree 0.032943, pedigree (1,1,4,1,1)
  (same comment as for Titanium, ion)
- Sulfur dioxide [air, urban air close to ground]: 4.2538e-6 kg; lognormal variance with pedigree 0.79787, pedigree (1,1,4,1,1)
  (same comment as for Mercury)
- Manganese [air, urban air close to ground]: 1.8716e-9 kg; lognormal variance with pedigree 1.31, pedigree (1,1,4,1,1)
  (same comment as for Mercury)
- Cadmium [air, urban air close to ground]: 9.4806e-8 kg; lognormal variance with pedigree 0.91365, pedigree (1,1,4,1,1)
  (same comment as for Mercury)
- DOC, Dissolved Organic Carbon [water, surface water]: 0.00041277 kg; lognormal variance with pedigree 0.032441, pedigree (1,1,4,1,1)
  (same comment as for Titanium, ion)
- Vanadium [air, urban air close to ground]: 2.1209e-8 kg; lognormal variance with pedigree 1.5846, pedigree (1,1,4,1,1)
  (same comment as for Mercury)
- Dioxins, measured as 2,3,7,8-tetrachlorodibenzo-p-dioxin [air, urban air close to ground]: 2.5151e-14 kg; lognormal variance with pedigree 0.3724, pedigree (1,1,4,1,1)
  (same comment as for Particulates, < 2.5 um)
- Calcium [air, urban air close to ground]: 2.398e-5 kg; lognormal variance with pedigree 0.5303, pedigree (1,1,4,1,1)
  (same comment as for Mercury)
- Ammonia [air, urban air close to ground]: 2.7691e-6 kg; lognormal variance with pedigree 0.73755, pedigree (1,1,4,1,1)
  Nitrogen species emitted to air after DeNOx stage.
  Uncertainty: uncertainty calculated from uncertainty in average N-emissions and uncertainty in the share of thermal NOx and the uncertainty in nitrogen content in *this* waste.
- Beryllium [water, ground-, long-term]: 4.2641e-7 kg; lognormal variance with pedigree 1.5953, pedigree (1,1,4,1,1)
  (same comment as for Cadmium, ion)
- Aluminium [water, ground-, long-term]: 0.0020053 kg; lognormal variance with pedigree 0.48218, pedigree (1,1,4,1,1)
  (same comment as for Cadmium, ion)
- Selenium [water, ground-, long-term]: 1.2727e-6 kg; lognormal variance with pedigree 1.0926, pedigree (1,1,4,1,1)
  (same comment as for Cadmium, ion)
- Bromine [water, surface water]: 0.0037931 kg; lognormal variance with pedigree 0.20323, pedigree (1,1,4,1,1)
  (same comment as for Titanium, ion)
- Manganese [water, surface water]: 1.5255e-9 kg; lognormal variance with pedigree 1.0927, pedigree (1,1,4,1,1)
  (same comment as for Titanium, ion)
- Toluene [air, urban air close to ground]: 2.5152e-8 kg; lognormal variance with pedigree 0.074092, pedigree (1,1,4,1,1)
  (same comment as for Particulates, < 2.5 um)
- TOC, Total Organic Carbon [water, surface water]: 0.00041277 kg; lognormal variance with pedigree 0.032441, pedigree (1,1,4,1,1)
  (same comment as for Titanium, ion)
- Vanadium, ion [water, ground-, long-term]: 4.6615e-7 kg; lognormal variance with pedigree 1.2125, pedigree (1,1,4,1,1)
  (same comment as for Cadmium, ion)
- Nickel, ion [water, ground-, long-term]: 0.00028701 kg; lognormal variance with pedigree 0.79996, pedigree (1,1,4,1,1)
  (same comment as for Cadmium, ion)
- Phosphate [water, ground-, long-term]: 5.3597e-5 kg; lognormal variance with pedigree 4.906, pedigree (1,1,4,1,1)
  (same comment as for Cadmium, ion)
- Tin [air, urban air close to ground]: 9.0796e-11 kg; lognormal variance with pedigree 1.00191, pedigree (1,1,4,1,1)
  (same comment as for Mercury)
- Mercury [water, ground-, long-term]: 1.9107e-8 kg; lognormal variance with pedigree 3.2667, pedigree (1,1,4,1,1)
  (same comment as for Cadmium, ion)
- Lead [air, urban air close to ground]: 1.3594e-8 kg; lognormal variance with pedigree 0.9357, pedigree (1,1,4,1,1)
  (same comment as for Mercury)
- Strontium [water, ground-, long-term]: 8.2474e-5 kg; lognormal variance with pedigree 0.99503, pedigree (1,1,4,1,1)
  (same comment as for Cadmium, ion)
- Titanium, ion [water, ground-, long-term]: 0.0014251 kg; lognormal variance with pedigree 0.62456, pedigree (1,1,4,1,1)
  (same comment as for Cadmium, ion)
- Methane, fossil [air, urban air close to ground]: 1.8864e-7 kg; lognormal variance with pedigree 0.074092, pedigree (1,1,4,1,1)
  (same comment as for Particulates, < 2.5 um)
- Calcium, ion [water, surface water]: 3.3732e-5 kg; lognormal variance with pedigree 0.40483, pedigree (1,1,4,1,1)
  (same comment as for Titanium, ion)
- Thallium [air, urban air close to ground]: 3.7325e-10 kg; lognormal variance with pedigree 1.7268, pedigree (1,1,4,1,1)
  (same comment as for Mercury)
- Zinc [air, urban air close to ground]: 3.4854e-7 kg; lognormal variance with pedigree 0.77445, pedigree (1,1,4,1,1)
  (same comment as for Mercury)
- Cyanide [air, urban air close to ground]: 4.3258e-5 kg; lognormal variance with pedigree 1.1139, pedigree (1,1,4,1,1)
  (same comment as for Ammonia)
- Sodium, ion [water, surface water]: 4.1027e-5 kg; lognormal variance with pedigree 0.49003, pedigree (1,1,4,1,1)
  (same comment as for Titanium, ion)
- Nickel, ion [water, surface water]: 2.009e-7 kg; lognormal variance with pedigree 1.3845, pedigree (1,1,4,1,1)
  (same comment as for Titanium, ion)
- BOD5, Biological Oxygen Demand [water, ground-, long-term]: 0.0019848 kg; lognormal variance with pedigree 0.021285, pedigree (1,1,4,1,1)
  (same comment as for Cadmium, ion)
- Aluminium [air, urban air close to ground]: 2.2609e-9 kg; lognormal variance with pedigree 0.6082, pedigree (1,1,4,1,1)
  (same comment as for Mercury)
- Iron, ion [water, ground-, long-term]: 0.00084401 kg; lognormal variance with pedigree 0.7755, pedigree (1,1,4,1,1)
  (same comment as for Cadmium, ion)
- Potassium, ion [water, surface water]: 2.1768e-7 kg; lognormal variance with pedigree 1.0498, pedigree (1,1,4,1,1)
  (same comment as for Titanium, ion)
- Benzene, pentachloro- [air, urban air close to ground]: 6.6444e-11 kg; lognormal variance with pedigree 0.074092, pedigree (1,1,4,1,1)
  (same comment as for Particulates, < 2.5 um)
- Phosphorus [air, urban air close to ground]: 4.065e-7 kg; lognormal variance with pedigree 0.80366, pedigree (1,1,4,1,1)
  (same comment as for Mercury)
- Cobalt [water, ground-, long-term]: 2.4012e-5 kg; lognormal variance with pedigree 1.0578, pedigree (1,1,4,1,1)
  (same comment as for Cadmium, ion)
- Barium [water, surface water]: 2.9207e-8 kg; lognormal variance with pedigree 1.1705, pedigree (1,1,4,1,1)
  (same comment as for Titanium, ion)
- Sulfate [water, ground-, long-term]: 0.0009907 kg; lognormal variance with pedigree 0.46502, pedigree (1,1,4,1,1)
  (same comment as for Cadmium, ion)
- Arsenic, ion [water, ground-, long-term]: 1.4973e-6 kg; lognormal variance with pedigree 1.368, pedigree (1,1,4,1,1)
  (same comment as for Cadmium, ion)
- Tin, ion [water, surface water]: 3.6773e-9 kg; lognormal variance with pedigree 1.591, pedigree (1,1,4,1,1)
  (same comment as for Titanium, ion)
- Antimony [water, surface water]: 0.0016528 kg; lognormal variance with pedigree 0.47897, pedigree (1,1,4,1,1)
  (same comment as for Titanium, ion)
- Strontium [water, surface water]: 5.1996e-8 kg; lognormal variance with pedigree 1.7071, pedigree (1,1,4,1,1)
  (same comment as for Titanium, ion)
- Barium [air, urban air close to ground]: 8.5174e-7 kg; lognormal variance with pedigree 0.87693, pedigree (1,1,4,1,1)
  (same comment as for Mercury)
- Water [air, urban air close to ground]: 0.0014995 m3; lognormal variance with pedigree 0.74347, pedigree (1,1,4,1,1)
  Water vapour from waste humidity, hydrogen oxidation and part of the process water.
  Uncertainty: Uncertainty calculated from uncertainty in waste composition, process water input and the uncertainty of fraction to air.
- Dinitrogen monoxide [air, urban air close to ground]: 0.00020135 kg; lognormal variance with pedigree 1.1139, pedigree (1,1,4,1,1)
  (same comment as for Ammonia)
- Iron [air, urban air close to ground]: 2.9983e-9 kg; lognormal variance with pedigree 0.66561, pedigree (1,1,4,1,1)
  (same comment as for Mercury)
- Copper [air, urban air close to ground]: 2.9255e-7 kg; lognormal variance with pedigree 0.55141, pedigree (1,1,4,1,1)
  (same comment as for Mercury)
- COD, Chemical Oxygen Demand [water, ground-, long-term]: 0.0060678 kg; lognormal variance with pedigree 0.021285, pedigree (1,1,4,1,1)
  (same comment as for Cadmium, ion)
- Antimony [air, urban air close to ground]: 3.8413e-9 kg; lognormal variance with pedigree 0.53733, pedigree (1,1,4,1,1)
  (same comment as for Mercury)
- Selenium [water, surface water]: 6.6198e-7 kg; lognormal variance with pedigree 1.1862, pedigree (1,1,4,1,1)
  (same comment as for Titanium, ion)
- Carbon monoxide, fossil [air, urban air close to ground]: 2.1378e-5 kg; lognormal variance with pedigree 0.746, pedigree (1,1,4,1,1)
  (same comment as for Particulates, < 2.5 um)
- Antimony [water, ground-, long-term]: 0.0030494 kg; lognormal variance with pedigree 0.44904, pedigree (1,1,4,1,1)
  (same comment as for Cadmium, ion)
- Selenium [air, urban air close to ground]: 2.3377e-8 kg; lognormal variance with pedigree 1.4984, pedigree (1,1,4,1,1)
  (same comment as for Mercury)
- Silicon [air, urban air close to ground]: 3.7116e-9 kg; lognormal variance with pedigree 0.6225, pedigree (1,1,4,1,1)
  (same comment as for Mercury)
- Nitrogen oxides [air, urban air close to ground]: 0.00087688 kg; lognormal variance with pedigree 0.73755, pedigree (1,1,4,1,1)
  Sum of fuel-Nox and thermal-NOx emitted to air after DeNOx stage.
  Uncertainty: uncertainty calculated from uncertainty in average N-emissions and uncertainty in the share of thermal NOx and the uncertainty in nitrogen content in *this* waste.
- COD, Chemical Oxygen Demand [water, surface water]: 0.00094519 kg; lognormal variance with pedigree 0.032378, pedigree (1,1,4,1,1)
  (same comment as for Titanium, ion)
- Fluoride [water, surface water]: 2.8291e-5 kg; lognormal variance with pedigree 0.4871, pedigree (1,1,4,1,1)
  (same comment as for Titanium, ion)
