# cement production, pozzolana and fly ash 6-14%

Dataset: EcoSpold 2, unit process
Geography: BR
Time period: 2016-01-01 to 2021-12-31
Technology level: current
Classification: ISIC rev.4 ecoinvent: 2394:Manufacture of cement, lime and plaster
Synonyms: composite cement; CP II-Z; blended cement
Tags: combined production
Scenario: Business-as-Usual
System model: Allocation, cut-off by classification
Share of production covered: 70 %
Generated by: Fernanda Belizario Silva
Published in: Silva, F. B. 2017
Database: ecoinvent
isCopyrightProtected: true
accessRestrictedTo: 1

## General comment
The dataset describes the production of blended Portland cement production with the addition of pozzolan material in Brazil. There are three types of blended cement in Brazil (CP II) depending on the supplementary cementitious materials (SCM): slag (E), pozzolan (Z) and limestone filler (F). CP II-Z has between 6% to 14% of pozzolan in mass composition. The three Blended cement types are specified by Brazilian standards (ABNT NBR 11578:1991).
The Pozzolan is a siliceous material with no (or low) cementing property, but when finely ground and in the presence of water, reacts with the calcium hydroxide produced by clinker"s hydration to form a cementing material. The pozzolanic reaction is slow compared with Ordinary Portland cement hydration; therefore, heat liberation and strength development are slow in concrete. The pozzolanic reaction is very efficient in filling up concrete pores, improving strength and impermeability of concrete. Pozzolans can be natural materials, such as volcanic stones with natural pozzolanic activity/; or artificial materials, including manufactured products (e.g. calcined clay) or byproducts from other industries (e.g. fly ash from coal thermal power plants).
Six types of Portland and blended cement types represent Brazilian production. The table below presents the different cement types and compositions according to Brazilian standards (NBR 11578:1991, NBR 5735:1991, NBR 5736:1991, NBR 5733:1991).
The CP II cement types are the most consumed cement in Brazil. CP II represents 62.1% of the market according to the National Union of the Cement Industry (SNIC, 2013). Its applications range from reinforced and ordinary concrete to coating mortars. This cement provides a slower rate of hydration heat emission than ordinary Portland Cement. Properties attained by using low pozzolanic content in concrete are less permeability, ionic diffusivity, capillary porosity, which increase stability and durability. The CP II-Z cement consists of clinker, calcium sulfate, milled limestone and 6-14% pozzolana and fly ash. (see composition in the table).
This dataset contains information from clinker stockpile to cement ready to be shipped in bulk. After the clinker is cooled from the rotary kiln, it is ground in ball or roller mills to particles under 75 μm size. Then it goes to silos where it is mixed with calcium sulphate (gypsum) and SCMs. The mixed cement goes to a finishing mill and then it is stored in cement silos, ready to be shipped in bulk or packed.
This dataset uses “hard coal ash” as a proxy for fly ash, "silica sand" as a proxy for natural pozzolans and "nickel smelter slag" as a proxy for slags from metallurgical processes of nickel, copper and manganese.

## Included activities start
The activity starts with the reception of raw materials in the cement plant. In plants which are integrated with clinker production, clinker is stored in the silo after cooling in the upstream process (clinker production /BR).

## Included activities end
The activity includes the drying of raw materials, the grinding and mixing of raw materials for cement production in the cement mill (with grinding aids) and ends with cement stored in silos, ready to be shipped. Waste or particulate emission are not considered due to the lack of data. The dataset does not include packaging and administration.

## Geography
This dataset represents production of cement blended with pozzolan 6-14% for Brazil.

## Technology
Current technology for cement production in Brazil.

## Time period
Time period corresponds to data collection period (2016).

## Reference product
- cement, pozzolana and fly ash 6-14%: 1 kg; name cement; By-product classification allocatable product; CPC 37440: Portland cement, aluminous cement, slag cement and similar hydraulic cements, except in the form of clinkers; EcoSpold01Categories construction materials/binder
  Cement’s bulk density ranges from 2,8 g/cm³ to 3,2 g/cm³.
  production volume 1.19143e10 kg; name APV_cement
    There is no specific CP II-Z total production available for Brazilian market, so the total production of CP II was divided equally by the tree cements grouped under this class. The share of CP II (62,1%) in the market was applied to the total cement production in 2016. Data provided by SNIC.
  property price 0.0615 EUR2005
    2005 import and export prices (total trades (USD) divided by total weight (kg) in China, India, USA, Japan, Russia and Europe, major producers and consumers (http://www.cementchina.net/freport/showfre.asp?id=749) from UN Commodity Trade Statistics Database (http://data.un.org/Explorer.aspxDatabase [Accessed 2 July 2010]). Commodity: Cement (portland, aluminious, slag or hydraulic)
  property carbon content 0
    carbon content on a dry matter basis (reserved; not for manual entry)
  properties: water in wet mass 0 kg, wet mass 1 kg, dry mass 1 kg, carbon content, non-fossil 0, water content 0, carbon content, fossil 0, carbon allocation 0 kg
- nickel smelter slag: 0 kg; name ni_slag; By-product classification Waste; CPC 39362: Waste and scrap of nickel
  Measured value. Weighted average of values informed by manufacturers. Secondary raw material for cement production. "Nickel smelter slag" is used as a proxy for metallurgical slags (nickel, copper, manganese). Variance of log-transformed data = 0,550.
  production volume 0 kg
    Calculated from production volume of reference product.
  property price 0 EUR2005; name ni_slag_price_EUR2005
    Waste products are assigned a price of zero as they are assumed to require further treatment.
  property heating value, net 0 MJ
    Non combustible products are assumed to have an LHV equal to zero (0).
  property carbon content 0.00345
    carbon content on a dry matter basis (reserved; not for manual entry)
  properties: water content 0, carbon content, fossil 0.00345, dry mass 1 kg, carbon content, non-fossil 0, water in wet mass 0 kg, wet mass 1 kg, carbon allocation 0.00345 kg
- hard coal ash: 0 kg; name flyash; By-product classification Waste; CPC 39: Wastes or scraps
  Measured value. Weighted average of values informed by manufacturers. Secondary raw material for cement production. "Hard coal ash" is used as a proxy for fly ash. Variance of log-transformed data = 0,476.
  production volume 0 kg
    Calculated from production volume of reference product.
  property price 0 EUR2005; name flyash_price_EUR2005
    (same comment as for nickel smelter slag)
  property carbon content 0
    carbon content on a dry matter basis (reserved; not for manual entry)
  properties: water in wet mass 0 kg, carbon content, non-fossil 0, water content 0, wet mass 1 kg, carbon content, fossil 0, dry mass 1 kg, carbon allocation 0 kg

## Inputs from technosphere
- limestone, crushed, for mill: 0.1 kg; = 0,10*cement; lognormal variance with pedigree 0.0067, pedigree (2,2,3,1,1)
  Measured value. Weighted average of values informed by manufacturers. Raw material for cement production.
  Uncertainty: B
  properties: carbon content, fossil 0.117492, wet mass 1 kg, dry mass 1 kg
- scrap steel: -7.1e-5 kg; = (steel)*-1; lognormal variance with pedigree 0.4077, pedigree (2,2,3,1,1)
  Estimation based on corresponding input.
  Uncertainty: B
  production volume 845914 kg; = APV_cement * (steel / cement)
    Calculated from production volume of reference product using the relative outputs.
  properties: carbon content, fossil 0.005, dry mass 1 kg, wet mass 1 kg
- diethylene glycol: 0.000247 kg; = 2,47e-4*cement; lognormal variance with pedigree 0.1887, pedigree (2,2,3,1,1)
  Measured value. Weighted average of values informed by manufacturers. Grinding aid for cement production.
  Uncertainty: B
  properties: heating value, net 25.14 MJ, dry mass 1 kg, wet mass 1 kg, carbon content, fossil 0.45283
- waste rubber, unspecified: -8.8e-6 kg; = (rubber)*-1; lognormal variance with pedigree 0.6687, pedigree (2,2,3,1,1)
  Estimation based on corresponding input.
  Uncertainty: B
  production volume 104846 kg; = APV_cement * (rubber / cement)
    Calculated from production volume of reference product using the relative outputs.
  properties: heating value, net 27.19 MJ, dry mass 1 kg, carbon content, fossil 0.853, wet mass 1 kg
  note on heating value, net: Value taken from the general comment of the treatment dataset.
- clinker: 0.74 kg; = 0,74*cement+ flyash*0+ ni_slag*0; lognormal variance with pedigree 0.0032, pedigree (2,2,3,1,1)
  (same comment as for limestone, crushed, for mill)
  properties: dry mass 1 kg, wet mass 1 kg
- heat, district or industrial, other than natural gas: 0.0155 MJ; = 1,55e-2*cement; lognormal variance with pedigree 2.2247, pedigree (2,2,3,1,1)
  Measured value. Weighted average of values informed by manufacturers. Heat for drying of raw materials.
  Uncertainty: B
  properties: heating value, net 1 MJ, corresponding fuel use, propane, furnace >100kW 1.05263 MJ
  note on corresponding fuel use, propane, furnace >100kW: Lower heating value of the fuel input related to the heat/electricity output, taken directly from ecoinvent v3.0 dataset "heat production, natural gas, at industrial furnace >100kW, GLO 2000".
- waste mineral oil: -5.5e-6 kg; = (oil)*-1; lognormal variance with pedigree 0.5037, pedigree (2,2,3,1,1)
  Estimation based on corresponding input.
  Uncertainty: B
  production volume 65528.5 kg; = APV_cement * (oil / cement)
    Calculated from production volume of reference product using the relative outputs.
  properties: heating value, net 34.7 MJ, dry mass 0.9 kg, wet mass 1 kg, water content 0.111111, carbon content, fossil 0.864444
  note on carbon content, fossil: Tab A.6, ecoinvent v2.2 report 13_I. C content has been calculated after data in the tables, and then referred to 1 kg DM
- steel, low-alloyed: 7.1e-5 kg; name steel; = 7,1e-5*cement; lognormal variance with pedigree 0.4077, pedigree (2,2,3,1,1)
  Measured value. Weighted average of values informed by manufacturers. Replacement of wearing parts of process equipment.
  Uncertainty: B
  property carbon content, fossil 0.005; name CC_steel
  properties: dry mass 1 kg, wet mass 1 kg
- calcined clay: 0.03 kg; = 0,03*cement; lognormal variance with pedigree 1.3467, pedigree (2,2,3,1,1)
  (same comment as for limestone, crushed, for mill)
  properties: dry mass 1 kg, wet mass 1 kg
- wastewater, average: -1.45e-6 m3; name wastewater; = (1,45e-6*cement)*-1; lognormal variance with pedigree 0.6807, pedigree (2,2,3,1,1)
  Estimation. Calculated as: (tap_water /1000)* cement. All tap water was considered to leave the process as an effluent.
  Uncertainty: B
  production volume 17275.7 m3; = APV_cement * (wastewater/ cement)
    Calculated from production volume of reference product using the relative outputs.
  property price 0 EUR2005; name wastewater_price_EUR2005
  properties: wet mass 1000 kg, dry mass 0.346837 kg, water content 2882.2, carbon content, non-fossil 0.194039
  note on carbon content, non-fossil: 0.0673 kg TOC/m3 (Tab A.17, ecoinvent v2.2 report 13_I). TOC was considered as Total Carbon.
- gypsum, mineral: 0.04 kg; = (0,03+0,01)*cement; lognormal variance with pedigree 0.0517, pedigree (2,2,3,1,1)
  Measured value. Weighted average of values informed by manufacturers. 0,03 kg is mineral gypsum (primary raw material) and 0,01 kg is phosphogypsum (secondary raw material, by-product of phosphoric acid production); "gypsum, mineral" is used as proxy because phosphogypsum was not available in the ecoinvent database during dataset development.
  Uncertainty: B
  properties: dry mass 1 kg, wet mass 1 kg
- synthetic rubber: 8.8e-6 kg; name rubber; = 8,8e-6*cement; lognormal variance with pedigree 0.6687, pedigree (2,2,3,1,1)
  (same comment as for steel, low-alloyed)
  properties: dry mass 1 kg, heating value, net 26.42 MJ, wet mass 1 kg, carbon content, fossil 0.871949
  note on carbon content, fossil: EPDM (Ethylene-propene-diene terpolymer) rubber is a terpolymer of ethylene, propene, and a diene with the residual unsaturated portion of the diene in the side chain (ecoinvent v2.2 report 7-part XX & Ullmann). Chemical formula (deduced from Evidences of Solvent-Induced Miscibility in Polychloroprene-co-Ethylene-Propene Diene Terpolymer Blends, Dubey et al., Journal of Applied Polymer Science, 2009, 111:1884-1891): C20H35
- cement factory: 2.73e-11 unit; = 2,73e-11*cement; source Werner F. 2014; lognormal variance with pedigree 0.32, pedigree (3,5,4,5,1)
  Literature value from the dataset cement production, Portland /CH (accessed 20170810)
  Uncertainty: V
- lubricating oil: 5.5e-6 kg; name oil; = 5,5e-6*cement; lognormal variance with pedigree 0.5037, pedigree (2,2,3,1,1)
  Measured value. Weighted average of values informed by manufacturers. Maintenance of process equipment.
  Uncertainty: B
  properties: wet mass 1 kg, carbon content, fossil 0.75, dry mass 1 kg, heating value, net 40.2 MJ
  note on carbon content, fossil: Lubricating oil is produced from diesel. C-content/dry mass of fats and oils considered 75%, from: ecoinvent v2.2 report, n 15a, pg 40
  note on heating value, net: Literature value, Source: IPCC 2006, 2006 IPCC Guidelines for National Greenhouse Gas Inventories, Prepared by the National Greenhouse Gas Inventories Programme, Eggleston H.S., Buendia L., Miwa K., Ngara T. and Tanabe K. (eds). Published: IGES, Japan
- heat, district or industrial, natural gas: 0.00503 MJ; = 5,03e-3*cement; lognormal variance with pedigree 3.0997, pedigree (2,2,3,1,1)
  (same comment as for heat, district or industrial, other than natural gas)
  properties: heating value, net 1 MJ
- electricity, medium voltage: 0.051 kWh; = 0,051*cement; lognormal variance with pedigree 0.0237, pedigree (2,2,3,1,1)
  Measured value. Weighted average of values informed by manufacturers. Electricity for grinding and factory operation.
  Uncertainty: B
- tap water: 0.00145 kg; = 1,45e-3*cement; lognormal variance with pedigree 0.6807, pedigree (2,2,3,1,1)
  Measured value. Weighted average of values informed by manufacturers. Water for sanitary purposes.
  Uncertainty: B
  properties: carbon content, fossil 0.00178991, water content 2962.17, wet mass 1 kg, dry mass 0.000337476 kg
  note on carbon content, fossil: Bicarbonate content is 2.93 mol/m3. CO2 content is 0.1 mol/m3 (ecoinvent v2.2 report 8, Tab 93.1).
- silica sand: 0.02 kg; = 0,02*cement; lognormal variance with pedigree 0.8247, pedigree (2,2,3,1,1)
  Measured value. Weighted average of values informed by manufacturers. Raw material for cement production. "Silica sand" is used as a proxy for natural pozzolans.
  Uncertainty: B
  properties: dry mass 0.99 kg, water content 0.010101, wet mass 1 kg
- water, harvested from rainwater: 0.00397 kg; name rainwater_input; = 3,97e-3*cement; lognormal variance with pedigree 1.6317, pedigree (2,2,3,1,1)
  Measured value. Weighted average of values informed by manufacturers. Water for equipment cooling and dust control.
  Uncertainty: B
  properties: water content 2940.2, dry mass 0.00034 kg, carbon content, fossil 0.0017899, wet mass 1 kg

## Inputs from nature
- Water, well, in ground [natural resource, in water]: 5.65e-5 m3; name water_well_input; = 5,65e-5*cement; lognormal variance with pedigree 0.4167, pedigree (2,2,3,1,1)
  (same comment as for water, harvested from rainwater)
- Water, river [natural resource, in water]: 0.000124 m3; name water_river_input; = 1,24e-4*cement; lognormal variance with pedigree 0.2767, pedigree (2,2,3,1,1)
  (same comment as for water, harvested from rainwater)
- Water, unspecified natural origin [natural resource, in water]: 2.03e-6 m3; name water_unsp_input; = 2,03e-6*cement; lognormal variance with pedigree 1.7187, pedigree (2,2,3,1,1)
  (same comment as for water, harvested from rainwater)

## Emissions to nature
- Water [air, unspecified]: 0.000187 m3; = 1,87e-4*cement; lognormal variance with pedigree 0.1087, pedigree (2,2,3,1,1)
  Estimation. Calculated as: ( water_unsp_input+ water_well_input+ water_river_input+ (rainwater_input/1000))*cement. All water input except for tap water was considered to leave the system as evaporated water, as water is used for cooling and dust control.
  Uncertainty: B

## Sampling procedure
Data represent circa 70% of the Brazilian cement production in 2016, which is considered a good representativeness level. Data were provided by six cement manufacturers, via confidential questionnaires, regarding the production of cement during the year of 2016.
Raw materials flows are the weighted average of the cement composition informed by each cement manufacturer. The weighing factor used is the total cement production volume, since manufacturers did not report the production volumes of each cement type due to confidentiality. Basic uncertainty was calculated based on the sample"s weighted standard deviation and represents variation of composition between manufacturers/factories.
For other input flows (grinding aids, materials for equipment maintenance, fuels, electricity, water consumption), the weighted average of each manufacturer"s unit flows was calculated. Except for the grinding aids, all other flows are not distinguished by cement type, as their consumption is reported for the whole cement plant, which usually produces more than one cement type.
Water consumption was usually reported for the whole integrated cement plants (clinker + cement production operations). Based on literature and expert opinion, the total water volume was divided equally between the clinker and the cement production processes and then converted into unit flows.
Raw materials and fuel inputs were considered to be dry. As water is mainly used for cooling and dust control, it was considered that all water evaporates, except for the "tap water" input, which was considered to be used as drinking water and whose output is modelled as an effluent.
Fuel consumption was informed by manufacturers in terms of volume or mass. They were converted into energy using their lower heating values and modelled as a heat input, to simplify the dataset and allow the consideration of corresponding air emissions.
Infrastructure input flow (cement factory) was extrapolated from "cement Portland/CH" dataset (accessed 08.10.2017).
The amounts of the exchanges were calculated considering the weighted average of the sample. No conversion to the geometric mean of the lognormal distribution was done, for consistency reasons with other ecoinvent datasets.

## Extrapolations
Data represent 70% of Brazilian cement production. This sample is extrapolated to represent the production in the whole country. The main values are considered representative for a typical production of Portland cement blended with pozolan in Brazil.
