# heat production, light fuel oil, at boiler 10kW, non-modulating

Dataset: EcoSpold 2, unit process
Geography: RoW
Time period: 1991-01-01 to 2021-12-31
Technology level: current
Classification: ISIC rev.4 ecoinvent: 3530:Steam and air conditioning supply
Classification: EcoSpold01Categories: oil/heating systems
Tags: ConvertedDataset
Scenario: Business-as-Usual
System model: Allocation, cut-off by classification
Generated by: Niels Jungbluth
Published in: Jungbluth, N. 2007
Database: ecoinvent
isCopyrightProtected: true
accessRestrictedTo: 1

## General comment
Inventory for the operation of a light fuel oil boiler. Data related to input.
[This dataset was already contained in the ecoinvent database version 2. It was not individually updated during the transfer to ecoinvent version 3. Life Cycle Impact Assessment results may still have changed, as they are affected by changes in the supply chain, i.e. in other datasets. This dataset was generated following the ecoinvent quality guidelines for version 2. It may have been subject to central changes described in the ecoinvent version 3 change report (http://www.ecoinvent.org/database/ecoinvent-version-3/reports-of-changes/), and the results of the central updates were reviewed extensively. The changes added e.g. consistent water flows and other information throughout the database. The documentation of this dataset can be found in the ecoinvent reports of version 2, which are still available via the ecoinvent website. The change report linked above covers all central changes that were made during the conversion process.]

## Included activities end
Direct air emissions from combustion, waste and electricity use.

## Geography
Assumption for operation in Switzerland.

## Technology
Non-modulating boiler sold in 2000.

## Time period
New data for regulated emissions like NOx, particles, other figures are partly based on older literature data.

## Reference product
- heat, central or small-scale, other than natural gas: 1 MJ; CPC 17300: Steam and hot water; By-product classification allocatable product
  EcoSpold01Location=CH
  production volume 2.91417e12 MJ
    Assumption. The original value from the dataset was altered in order to model the correct shares of central or small-scale heat producing datasets on the market for heat, central or small-scale, other than natural gas. See talk pages for further discussion.
    //Original comment from global dataset//:
    Total heat from oil calculated from IEA Oil statistics for 2007 (http://www.iea.org/stats/oildata.asp?COUNTRY_CODE=29 ; residential, commercial and agriculture), using default IEA MJ/kg conversion factors, dividing the total evenly over 4 boiler types, multiplied by conversion efficiency of specific boiler type (0.94), all on a net heat value basis.
  property price 0.0106 EUR2005
    Average European district heat price from Ecoheatcool and Euroheat 2005-2006, Ecoheat Work package 1: The European heat market. Final report. 10.6 EUR/GJ i s the price of district heat. http://www.solarthermalworld.org/files/Ecoheatcool%20WP1%20Web.pdf?download
  properties: heating value, net 1 MJ, Corresponding fuel use 1.06383 MJ

## Inputs from technosphere
- oil boiler, 10kW: 7.03596e-7 unit; lognormal variance with pedigree 0.3546, pedigree (3,3,5,5,1)
  EcoSpold01Location=CH
  Estimation 2100h use per year
  Uncertainty: Estimation 2100h use per year
- oil storage, 3000l: 4.69064e-7 unit; lognormal variance with pedigree 0.3546, pedigree (3,3,5,5,1)
  EcoSpold01Location=CH
  Calculated
  Uncertainty: Calculated
- electricity, low voltage: 0 kWh; pedigree (1,1,1,1,1)
  EcoSpold01Location=CH
  Literature
  Uncertainty: Literature
- chimney: 1.40723e-6 m; lognormal variance with pedigree 0.3546, pedigree (3,3,5,5,1)
  EcoSpold01Location=CH
  Calculated
  Uncertainty: Calculated
- light fuel oil: 0 kg; pedigree (1,1,1,1,1)
  Literature
  EcoSpold01Location=CH
  Uncertainty: Literature
  properties: dry mass 1 kg, carbon content, fossil 0.862, wet mass 1 kg, heating value, net 42.6 MJ
- electricity, low voltage: 4.95717e-5, 9.02606e-6, 0.000145331, 0.00223129, 0.000360984, 0.00103656 kWh (6 entries); lognormal variance with pedigree 0.0446, pedigree (3,3,5,5,1)
  EcoSpold01Location=CH
  Literature
  Uncertainty: Literature
- light fuel oil: 0.0010458, 0.000150822, 0.00211068, 0.000140062, 0.000202945, 0.0212646 kg (6 entries); lognormal variance with pedigree 0.0446, pedigree (3,3,5,5,1)
  Literature
  EcoSpold01Location=CH
  Uncertainty: Literature

## Emissions to nature
- Hydrogen chloride [air, urban air close to ground]: 1e-7 kg; lognormal variance with pedigree 0.0946, pedigree (3,3,5,5,1)
  Literature
  Uncertainty: Literature
- Acetaldehyde [air, urban air close to ground]: 2.18085e-8 kg; lognormal variance with pedigree 0.8546, pedigree (3,3,5,5,1)
  Literature, basic uncertainity estimated = 6
  Uncertainty: Literature, basic uncertainity estimated = 6
- Mercury [air, urban air close to ground]: 5.31915e-10 kg; lognormal variance with pedigree 0.6946, pedigree (3,3,5,5,1)
  Literature
  Uncertainty: Literature
- Hydrocarbons, aliphatic, alkanes, unspecified [air, urban air close to ground]: 2.65957e-7 kg; lognormal variance with pedigree 0.8546, pedigree (3,3,5,5,1)
  (same comment as for Acetaldehyde)
- Hydrocarbons, aliphatic, unsaturated [air, urban air close to ground]: 2.12766e-8 kg; lognormal variance with pedigree 0.8546, pedigree (3,3,5,5,1)
  (same comment as for Acetaldehyde)
- Carbon monoxide, fossil [air, urban air close to ground]: 9.57447e-6 kg; lognormal variance with pedigree 0.932, pedigree (1,1,5,5,1)
  Deviation calculated
- Ethyne [air, urban air close to ground]: 1.06383e-8 kg; lognormal variance with pedigree 0.8546, pedigree (3,3,5,5,1)
  (same comment as for Acetaldehyde)
- Sulfur dioxide [air, urban air close to ground]: 4.98298e-5 kg; lognormal variance with pedigree 0.0446, pedigree (3,3,5,5,1)
  Calculated
  Uncertainty: Calculated
- Formaldehyde [air, urban air close to ground]: 6.38298e-9 kg; lognormal variance with pedigree 0.8546, pedigree (3,3,5,5,1)
  (same comment as for Acetaldehyde)
- Propanal [air, urban air close to ground]: 6.38298e-9 kg; lognormal variance with pedigree 0.8546, pedigree (3,3,5,5,1)
  (same comment as for Acetaldehyde)
- Toluene [air, urban air close to ground]: 1.06383e-8 kg; lognormal variance with pedigree 0.8546, pedigree (3,3,5,5,1)
  (same comment as for Acetaldehyde)
- Pentane [air, urban air close to ground]: 1.06383e-7 kg; lognormal variance with pedigree 0.8546, pedigree (3,3,5,5,1)
  (same comment as for Acetaldehyde)
- Methane, fossil [air, urban air close to ground]: 2.12766e-7 kg; lognormal variance with pedigree 0.8546, pedigree (3,3,5,5,1)
  (same comment as for Acetaldehyde)
- Acetone [air, urban air close to ground]: 5.31915e-8 kg; lognormal variance with pedigree 0.8546, pedigree (3,3,5,5,1)
  (same comment as for Acetaldehyde)
- Hydrocarbons, aromatic [air, urban air close to ground]: 2.12766e-8 kg; lognormal variance with pedigree 0.8546, pedigree (3,3,5,5,1)
  (same comment as for Acetaldehyde)
- Butane [air, urban air close to ground]: 1.59574e-7 kg; lognormal variance with pedigree 0.8546, pedigree (3,3,5,5,1)
  (same comment as for Acetaldehyde)
- Nitrogen oxides [air, urban air close to ground]: 2.92553e-5 kg; lognormal variance with pedigree 0.112, pedigree (1,1,5,5,1)
  Deviation calculated
- Hydrogen fluoride [air, urban air close to ground]: 9.57447e-9 kg; lognormal variance with pedigree 0.0946, pedigree (3,3,5,5,1)
  Literature
  Uncertainty: Literature
- Propane [air, urban air close to ground]: 3.19149e-8 kg; lognormal variance with pedigree 0.8546, pedigree (3,3,5,5,1)
  (same comment as for Acetaldehyde)
- Benzene [air, urban air close to ground]: 2.12766e-8 kg; lognormal variance with pedigree 0.8546, pedigree (3,3,5,5,1)
  (same comment as for Acetaldehyde)
- PAH, polycyclic aromatic hydrocarbons [air, urban air close to ground]: 4.89362e-10 kg; lognormal variance with pedigree 0.3546, pedigree (3,3,5,5,1)
  Literature
  Uncertainty: Literature
- Ethene [air, urban air close to ground]: 5.31915e-8 kg; lognormal variance with pedigree 0.8546, pedigree (3,3,5,5,1)
  (same comment as for Acetaldehyde)
- Benzaldehyde [air, urban air close to ground]: 6.38298e-9 kg; lognormal variance with pedigree 0.8546, pedigree (3,3,5,5,1)
  (same comment as for Acetaldehyde)
- Dioxins, measured as 2,3,7,8-tetrachlorodibenzo-p-dioxin [air, urban air close to ground]: 0 kg; pedigree (1,1,1,1,1)
  Literature
  Uncertainty: Literature
- Zinc [air, urban air close to ground]: 7.44681e-10 kg; lognormal variance with pedigree 0.6946, pedigree (3,3,5,5,1)
  Literature
  Uncertainty: Literature
- Carbon dioxide, fossil [air, urban air close to ground]: 0.0787234 kg; lognormal variance with pedigree 0.0446, pedigree (3,3,5,5,1)
  Literature
  Uncertainty: Literature
- Ethane [air, urban air close to ground]: 2.12766e-8 kg; lognormal variance with pedigree 0.8546, pedigree (3,3,5,5,1)
  (same comment as for Acetaldehyde)
- Copper [air, urban air close to ground]: 7.44681e-10 kg; lognormal variance with pedigree 0.6946, pedigree (3,3,5,5,1)
  Literature
  Uncertainty: Literature
- Dinitrogen monoxide [air, urban air close to ground]: 7.44681e-7 kg; lognormal variance with pedigree 0.5246, pedigree (3,3,5,5,1)
  Literature, basic uncertainty estimated = 4
  Uncertainty: Literature, basic uncertainty estimated = 4
- Acrolein [air, urban air close to ground]: 1.2234e-8 kg; lognormal variance with pedigree 0.8546, pedigree (3,3,5,5,1)
  (same comment as for Acetaldehyde)
- Propene [air, urban air close to ground]: 2.12766e-8 kg; lognormal variance with pedigree 0.8546, pedigree (3,3,5,5,1)
  (same comment as for Acetaldehyde)
- Particulates, < 2.5 um [air, urban air close to ground]: 5.31915e-7 kg; lognormal variance with pedigree 0.3546, pedigree (3,3,5,5,1)
  Literature, basic uncertainty estimated = 3
  Uncertainty: Literature, basic uncertainty estimated = 3

## Sampling procedure
Data published in literature based on measurements.

## Extrapolations
Some information from other European countries has been used to determine the emission factors. This dataset has been copied from an original dataset covering the geography CH. The uncertainty has been adjusted accordingly.

## Review by Michael Spielmann (obsolete) 2006-02-16
passed
none
