# electric connector production, wire clamp

Dataset: EcoSpold 2, unit process
Geography: GLO
Time period: 2004-01-01 to 2021-12-31
Technology level: current
Classification: EcoSpold01Categories: electronics/component
Classification: ISIC rev.4 ecoinvent: 2610:Manufacture of electronic components and boards
Scenario: Business-as-Usual
System model: Allocation, cut-off by classification
Generated by: Roland Hischier
Published in: Hischier R. 2007
Database: ecoinvent
isCopyrightProtected: true
accessRestrictedTo: 1

## General comment
This dataset represents the production of 1 kg of clamp connection type connectors for electronics in general. It is based on the assumption that a typical clamp type connector for 3 wires has an average weight of 9.0 g. The data represent a current clamp type connector for three wires used in the electronics industry in general. Material data are taken from datasheets of producers of such capacitors and from the literature. Infrastructure and production efforts are based on own assumptions and taken from the Swedish LCI database and have thus, accordingly higher uncertainty.
[This dataset was already contained in the ecoinvent database version 2. It was not individually updated during the transfer to ecoinvent version 3. Life Cycle Impact Assessment results may still have changed, as they are affected by changes in the supply chain, i.e. in other datasets. This dataset was generated following the ecoinvent quality guidelines for version 2. It may have been subject to central changes described in the ecoinvent version 3 change report (http://www.ecoinvent.org/database/ecoinvent-version-3/reports-of-changes/), and the results of the central updates were reviewed extensively. The changes added e.g. consistent water flows and other information throughout the database. The documentation of this dataset can be found in the ecoinvent reports of version 2, which are still available via the ecoinvent website. The change report linked above covers all central changes that were made during the conversion process.]

## Included activities start
From reception of metals and plastics at the factory gate.

## Included activities end
This dataset includes raw material input and production efforts for the production of clamp type connectors.

## Geography
Data represent a global valuable composition of 3-wired clamp type connectors.

## Technology
average connector production technology, based on literature and assumptions

## Reference product
- electric connector, wire clamp: 1 kg; By-product classification allocatable product; CPC 471: Electronic valves and tubes; electronic components; parts thereof
  Clamp connection, used e.g. for the fixation of cables on a printed wiring board or for the fixation of power cables on electronic components.
  EcoSpold01Location=GLO
  production volume 1 kg
    Dummy value to be replaced by measured, estimated or calculated value
  property price 13.8262 EUR2005
    Calculated based on inputs: The price of the product has been calculated as a sum of the values of the material and energy inputs for this product. This value is therefore a rough estimation. It may underestimate the real price since there are additional expenses when producing any product. These expences can include for example labour costs, treatment of waste materials and profit for the producer. Please consider carefully whether this level of data quality is acceptable for your application.
  property carbon content, fossil 0.19653
    Calculated as the addition of C contents in the product composition
  property carbon content 0.19653
    carbon content on a dry matter basis (reserved; not for manual entry)
  properties: water content 0, water in wet mass 0 kg, carbon content, non-fossil 0, dry mass 1 kg, wet mass 1 kg, carbon allocation 0.19653 kg

## Inputs from technosphere
- printed wiring board mounting facility: 2.08e-7 unit; lognormal variance with pedigree 0.5761, pedigree (4,5,5,3,5)
  EcoSpold01Location=GLO
  Proxy. Due to a lack of more specific information the dataset of the printed wiring board mounting plant was used.
  Uncertainty: rough estimation of infrastructure
- epoxy resin, liquid: 0 kg; source ABB 2006; pedigree (1,1,1,1,1)
  Estimation. The split to individual materials was estimaded based on literature.
  EcoSpold01Location=RER
  Uncertainty: estimation, based on total weight & qualitative information
  properties: dry mass 1 kg, carbon content, fossil 0.42325, wet mass 1 kg, heating value, net 12.82 MJ
- copper, cathode: 0.66667 kg; source ABB 2006; lognormal variance with pedigree 0.0761, pedigree (4,5,5,3,1)
  (same comment as for epoxy resin, liquid)
  properties: wet mass 1 kg, dry mass 1 kg
- electricity, medium voltage: 6.51 kWh; source CPM 2006; lognormal variance with pedigree 0.1341, pedigree (3,4,5,3,4)
  EcoSpold01Location=UCTE
  Literature Value.
  Uncertainty: literature value as first approximation used
- polycarbonate: 0.16667 kg; source ABB 2006; lognormal variance with pedigree 0.0761, pedigree (4,5,5,3,1)
  (same comment as for epoxy resin, liquid)
  properties: heating value, net 29.57 MJ, dry mass 1 kg, carbon content, fossil 0.755906, wet mass 1 kg
  note on carbon content, fossil: Polycarbonate means here 2,2-bis(4-hydroxyphenyl)propane polycarbonate – also called bisphenol A polycarbonate ( -(O-C6H4-C(CH3)2-C6H4-O-CO)n- (ecoinvent v2.2 report 11_II), C16H14O3, MW=254 g/mol.
- epoxy resin, liquid: 0.0290006, 0.137669 kg (2 entries); source ABB 2006; lognormal variance with pedigree 0.0761, pedigree (4,5,5,3,1)
  (same comment as for epoxy resin, liquid)

## Sampling procedure
literature

## Extrapolations
This dataset has been extrapolated from year 2006 to the year of the calculation (2021). The uncertainty has been adjusted accordingly.

## Review by Rolf Frischknecht 2007-11-08
passed.
