# treatment of wastewater from lorry production, capacity 4.7E10l/year

Dataset: EcoSpold 2, unit process
Geography: CH
Time period: 1994-01-01 to 2021-12-31
Technology level: current
Classification: ISIC rev.4 ecoinvent: 3700:Sewerage
Classification: EcoSpold01Categories: waste management/wastewater treatment
Tags: ConvertedDataset; Treatment
Scenario: Business-as-Usual
System model: Allocation, cut-off by classification
Generated by: Gabor Doka (obsolete)
Published in: Doka G. 2008
Database: ecoinvent
isCopyrightProtected: true
accessRestrictedTo: 1

## General comment
Wastewater purified in a large municipal wastewater treatment plant (capacity class 1), with an average capacity size of 233000 per-captia-equivalents PCE.
Wastewater contains (in kg/m3): Stot.: 0.000114 (GSD=224.1%); Cl: 0.000114 (GSD=224.1%); Ni: 0.00027 (GSD=224.1%); Pb: 0.000044 (GSD=224.1%); Zn: 0.000484 (GSD=224.1%);
[This dataset was already contained in the ecoinvent database version 2. It was not individually updated during the transfer to ecoinvent version 3. Life Cycle Impact Assessment results may still have changed, as they are affected by changes in the supply chain, i.e. in other datasets. This dataset was generated following the ecoinvent quality guidelines for version 2. It may have been subject to central changes described in the ecoinvent version 3 change report (http://www.ecoinvent.org/database/ecoinvent-version-3/reports-of-changes/), and the results of the central updates were reviewed extensively. The changes added e.g. consistent water flows and other information throughout the database. The documentation of this dataset can be found in the ecoinvent reports of version 2, which are still available via the ecoinvent website. The change report linked above covers all central changes that were made during the conversion process.]

## Included activities end
Infrastructure materials for municipal wastewater treatment plant, transports, dismantling. Land use burdens.

## Geography
Specific to the technology mix encountered in Switzerland in 2000. Well applicable to modern treatment practices in Europe, North America or Japan.

## Technology
Three stage wastewater treatment (mechanical, biological, chemical) including sludge digestion (fermentation) according to the average technology in Switzerland

## Parameters
- fraction, process water, to air: 0.1 dimensionless; name fraction_PW_to_air; lognormal variance with pedigree 0.092025, pedigree (4,4,3,2,4)
  Literature value (Statistics Canada, 2007 & Shaffer, K.H., 2008, Consumptive water use in the Great Lakes Basin, USGS) (Vionnet, S., Quantis Water Database - Technical Report, 2012).

## Reference product
- wastewater from lorry production: -1 m3; name RP_amount_1; CPC 39920: Sewage sludge; By-product classification Waste
  production volume 0.0336675 m3; name RP_PV_1
    This is a placeholder value that does not reflect real-world production volumes. This dataset does not currently require a real-world production volume to work in the database framework, and no actual data were collected yet. This has no negative effect on the results of the ecoinvent database. The placeholder value of this activity was scaled according to the nominal GDP of 2005 (source: United Nations, http://data.un.org/Glossary.aspx?q=GDP+%28current+US%24%29, accessed 20130726) to reflect an appropriate share of the global production volume, which is also a placeholder value.
  property price 0 EUR2005; name RP_amount_1_price_EUR2005
    Waste products are assigned a price of zero as they are assumed to require further treatment.
  property carbon content 0
    carbon content on a dry matter basis (reserved; not for manual entry)
  properties: dry mass 0.337476 kg, water in wet mass 999.663 kg, water content 2962.17, carbon content, fossil 0, carbon content, non-fossil 0, wet mass 1000 kg, carbon allocation 0 kg

## Inputs from technosphere
- sewer grid, 4.7E10l/year, 583 km: 1.2376e-7 km; lognormal variance with pedigree 0.04, pedigree (1,1,5,1,1)
  uncertainty heeded in exchanges of the module
- heat, district or industrial, other than natural gas: 0.0013173 MJ; lognormal variance with pedigree 0.14, pedigree (1,1,5,1,1)
  burden from sludge incineration. Uncertainty calculated from wastewater composition and treatment model
  properties: heating value, net 1 MJ
- cement, unspecified: 0.00013519 kg; lognormal variance with pedigree 0.08, pedigree (1,1,5,1,1)
  (same comment as for heat, district or industrial, other than natural gas)
  properties: dry mass 1 kg, wet mass 1 kg
- slag landfill: 1.6581e-13 unit; lognormal variance with pedigree 0.07, pedigree (1,1,5,1,1)
  (same comment as for heat, district or industrial, other than natural gas)
- process-specific burdens, municipal waste incineration: 0.0015707 kg; lognormal variance with pedigree 0.14, pedigree (1,1,5,1,1)
  burden from sludge incineration. Uncertainty calculated from wastewater composition and treatment model;activityLink introduced to establish a direct link to the corresponding regional supply of this product
- municipal waste incineration facility: 3.9267e-13 unit; lognormal variance with pedigree 0.14, pedigree (1,1,5,1,1)
  (same comment as for heat, district or industrial, other than natural gas)
- waste graphical paper: -0.0155 kg; name BP_amount_1; lognormal variance with pedigree 0.04, pedigree (1,1,5,1,1)
  direct wastewater treatment plant burden. Uncertainty calculated from wastewater composition and treatment model
  production volume 0.000521847 kg; = BP_amount_1* RP_PV_1/ABS( RP_amount_1)
    Calculated from the production volume of wastewater from lorry production in proportion to the respective output amounts.
  property price 0 EUR2005; name BP_amount_1_price_EUR2005
  properties: heating value, net 14.12 MJ, dry mass 0.888 kg, wet mass 1 kg, water content 0.126126, carbon content, non-fossil 0.454955
  note on heating value, net: Value taken from the general comment of the treatment dataset.
- wastewater treatment facility, capacity 4.7E10l/year: 6.0643e-10 unit; lognormal variance with pedigree 0.04, pedigree (1,1,5,1,1)
  uncertainty heeded in exchanges of the module
- electricity, low voltage: 0.028217 kWh; lognormal variance with pedigree 0.04, pedigree (1,1,5,1,1)
  (same comment as for waste graphical paper)
- waste cement, hydrated: -0.00033798 kg; name BP_amount_2; lognormal variance with pedigree 0.08, pedigree (1,1,5,1,1)
  (same comment as for heat, district or industrial, other than natural gas)
  production volume 1.1379e-5 kg; = BP_amount_2* RP_PV_1/ABS( RP_amount_1)
    (same comment as for waste graphical paper)
  property price 0 EUR2005; name BP_amount_2_price_EUR2005
  properties: wet mass 1 kg, dry mass 1 kg
- electricity, high voltage: 0.00022582 kWh; lognormal variance with pedigree 0.58, pedigree (1,1,5,1,1)
  (same comment as for heat, district or industrial, other than natural gas)
- chemical, inorganic: 1.4593e-7 kg; lognormal variance with pedigree 0.67, pedigree (1,1,5,1,1)
  (same comment as for heat, district or industrial, other than natural gas)
  properties: dry mass 1 kg, wet mass 1 kg, carbon content, fossil 0.003
  note on carbon content, fossil: This dataset is an unweighted average of 20 inorganic substances (listed in Tab 88.1, ecoinvent v2.2 report 8, part II), being part of the top100 chemicals included in this database. The C-content has also been calculated as an unweighted average of the C content of the substances composing this dataset.
- waste plastic, mixture: -0.0155 kg; name BP_amount_3; lognormal variance with pedigree 0.04, pedigree (1,1,5,1,1)
  (same comment as for waste graphical paper)
  production volume 0.000521847 kg; = BP_amount_3* RP_PV_1/ABS( RP_amount_1)
    (same comment as for waste graphical paper)
  property price 0 EUR2005; name BP_amount_3_price_EUR2005
  properties: dry mass 0.847 kg, carbon content, fossil 0.747344, wet mass 1 kg, water content 0.180638, heating value, net 30.79 MJ
  note on carbon content, fossil: C content in 1 kg DM was calculated using data in Tab A.2, ecoinvent v2.2 report 13_I
- liquid manure spreading, by vacuum tanker: 1.9807e-6 m3; lognormal variance with pedigree 0.05, pedigree (1,1,5,1,1)
  burden from sludge spreading. Uncertainty calculated from wastewater composition and treatment model
  This exchange has an activity link directly to the producing activity because the product is primarily consumed in the same geographical area where it is produced.
- process-specific burdens, residual material landfill: 0.00033798 kg; lognormal variance with pedigree 0.07, pedigree (1,1,5,1,1)
  (same comment as for process-specific burdens, municipal waste incineration)
- process-specific burdens, slag landfill: 9.3268e-5 kg; lognormal variance with pedigree 0.07, pedigree (1,1,5,1,1)
  (same comment as for process-specific burdens, municipal waste incineration)
- sodium hydroxide, without water, in 50% solution state: 1.0008e-6 kg; lognormal variance with pedigree 0.45, pedigree (1,1,5,1,1)
  (same comment as for heat, district or industrial, other than natural gas)
  properties: dry mass 1 kg, wet mass 1 kg, heating value, net 3.03 MJ
- heat, district or industrial, natural gas: 0.0185789 MJ; lognormal variance with pedigree 0.04, pedigree (1,1,5,1,1)
  (same comment as for waste graphical paper)
  properties: heating value, net 1 MJ
- hydrochloric acid, without water, in 30% solution state: 8.756e-8 kg; lognormal variance with pedigree 0.67, pedigree (1,1,5,1,1)
  (same comment as for heat, district or industrial, other than natural gas)
  properties: wet mass 1 kg, dry mass 1 kg, heating value, net 3.32 MJ
- heat, central or small-scale, other than natural gas: 0.0134805 MJ; lognormal variance with pedigree 0.04, pedigree (1,1,5,1,1)
  (same comment as for waste graphical paper)
  properties: heating value, net 1 MJ
- residual material landfill: 7.0412e-13 unit; lognormal variance with pedigree 0.07, pedigree (1,1,5,1,1)
  (same comment as for heat, district or industrial, other than natural gas)
- iron (III) chloride, without water, in 40% solution state: 2.6404e-5 kg; lognormal variance with pedigree 0.67, pedigree (1,1,5,1,1)
  direct wastewater treatment plant burden plus burden from sludge incineration. Uncertainty calculated from wastewater composition and treatment model
  properties: dry mass 1 kg, wet mass 1 kg

## Emissions to nature
- Methane, fossil [air, urban air close to ground]: 6.2827e-9 kg; lognormal variance with pedigree 0.19, pedigree (1,1,5,1,1)
  emission from sludge incineration. Uncertainty calculated from wastewater composition and treatment model
- Lead [soil, agricultural]: 1.1069e-5 kg; lognormal variance with pedigree 0.72, pedigree (1,1,5,1,1)
  emission from sludge spreading. Uncertainty calculated from wastewater composition and treatment model
- Nickel [soil, agricultural]: 3.0035e-5 kg; lognormal variance with pedigree 0.71, pedigree (1,1,5,1,1)
  (same comment as for Lead)
- Sulfur dioxide [air, urban air close to ground]: 2.1978e-6 kg; lognormal variance with pedigree 0.71, pedigree (1,1,5,1,1)
  direct digester gas emission plus emission from sludge incineration. Uncertainty calculated from wastewater composition and treatment model
- Zinc, ion [water, ground-, long-term]: 3.7192e-6 kg; lognormal variance with pedigree 5.51, pedigree (1,1,5,1,1)
  (same comment as for Methane, fossil)
- Carbon monoxide, fossil [air, urban air close to ground]: 2.1943e-7 kg; lognormal variance with pedigree 0.79, pedigree (1,1,5,1,1)
  (same comment as for Methane, fossil)
- Nickel, ion [water, surface water]: 0.00016378 kg; lognormal variance with pedigree 0.67, pedigree (1,1,5,1,1)
  sewer overload discharge plus direct wastewater treatment plant emission plus emission from sludge incineration. Uncertainty calculated from wastewater composition and treatment model
- Water [air, unspecified]: 0.1 m3; name water_to_air_unspecified; lognormal variance with pedigree 0.0807, pedigree (2,2,5,1,1)
  Calculated value based on water balance.
  property fraction, origin: salt water 0; name fraction_origin_salt_water
  property fraction, origin: unspecified 1; name fraction_origin_unspecified
  property fraction, origin: fresh water 0; name fraction_origin_fresh_water
- Nickel [air, urban air close to ground]: 3.2903e-12 kg; lognormal variance with pedigree 0.81, pedigree (1,1,5,1,1)
  (same comment as for Sulfur dioxide)
- Sulfate [water, surface water]: 0.00033444 kg; lognormal variance with pedigree 0.68, pedigree (1,1,5,1,1)
  (same comment as for Nickel, ion)
- Water [water, unspecified]: 0.9 m3; name water_to_water_unspecified; lognormal variance with pedigree 0.0807, pedigree (2,2,5,1,1)
  Calculated value based on water balance.
  property wet mass 1000 kg; name WM
  property fraction, origin: unspecified 0; name fraction_origin_unspecified_Ww
  property water in wet mass 1000 kg; name WWM
  property fraction, origin: salt water 0; name fraction_origin_salt_water_Ww
  property carbon content, fossil 0; name C_content_fossil
  property dry mass 0 kg; name DM
  property carbon content, non-fossil 0; name C_content_non_fossil
  property fraction, origin: fresh water 1; name fraction_origin_fresh_water_Ww
- Nickel, ion [water, ground-, long-term]: 7.1379e-5 kg; lognormal variance with pedigree 0.71, pedigree (1,1,5,1,1)
  (same comment as for Methane, fossil)
- Lead [water, ground-, long-term]: 2.0017e-6 kg; lognormal variance with pedigree 6.92, pedigree (1,1,5,1,1)
  (same comment as for Methane, fossil)
- Lead [air, urban air close to ground]: 1.0443e-9 kg; lognormal variance with pedigree 0.75, pedigree (1,1,5,1,1)
  (same comment as for Sulfur dioxide)
- Lead [water, surface water]: 4.8364e-6 kg; lognormal variance with pedigree 0.61, pedigree (1,1,5,1,1)
  (same comment as for Nickel, ion)
- Zinc [soil, agricultural]: 9.4507e-5 kg; lognormal variance with pedigree 0.71, pedigree (1,1,5,1,1)
  (same comment as for Lead)
- Zinc, ion [water, surface water]: 0.00014965 kg; lognormal variance with pedigree 0.65, pedigree (1,1,5,1,1)
  (same comment as for Nickel, ion)
- Sulfate [water, ground-, long-term]: 6.8621e-6 kg; lognormal variance with pedigree 0.71, pedigree (1,1,5,1,1)
  (same comment as for Methane, fossil)
- Zinc [air, urban air close to ground]: 3.919e-9 kg; lognormal variance with pedigree 0.76, pedigree (1,1,5,1,1)
  (same comment as for Sulfur dioxide)
- Chloride [water, surface water]: 0.000114 kg; lognormal variance with pedigree 0.67, pedigree (1,1,5,1,1)
  (same comment as for Nickel, ion)
- Sulfur [soil, agricultural]: 1.0779e-6 kg; lognormal variance with pedigree 0.72, pedigree (1,1,5,1,1)
  (same comment as for Lead)

## Extrapolations
This dataset has been extrapolated from year 2000 to the year of the calculation (2021). The uncertainty has been adjusted accordingly.

## Review by Niels Jungbluth 2009-01-22
passed.
