# sugarcane processing, modern annexed plant

Dataset: EcoSpold 2, unit process
Geography: BR
Time period: 2012-01-01 to 2021-12-31
Technology level: modern
Classification: ISIC rev.4 ecoinvent: 1072:Manufacture of sugar
Synonyms: sugarcane biorefinery
Scenario: Business-as-Usual
System model: Allocation, cut-off by classification
Share of production covered: 100 %
Generated by: Mateus Chagas
Published in: Mateus F. Chagas 2015
Database: ecoinvent
isCopyrightProtected: true
accessRestrictedTo: 1

## General comment
This dataset represents a modern sugarcane mill processing of 4 million metric tonnes of sugarcane stalks per year for the production of raw sugar, ethanol (anhydrous and hydrated) and electricity. The plant operates 200 days per season.
The industrial process diverts 50% of sugarcane juice for row sugar production and the other 50%, along with molasses (a by-product of sugar crystallization process), is diverted to ethanol production process. Plant configuration includes reduction of overall energy consumption to maximize of electricity output. It considers high-pressure boilers (65 bar, 485°C), application of thermal integration strategies reducing 20% of low-pressure steam demand, electrical drives in the crushing mills and molecular sieves for anhydrous ethanol production.
Overall process efficiencies assumed were 96% for sugars extraction, 89.5% for ethanol fermentation and 76.5% for sugar recovery as raw sugar. Each 1000 kg of cane stalks yields 51.4 kg of raw sugar, 32.6 L of hydrated ethanol (93% w/w), 22.8 L of anhydrous ethanol (99.6% w/w); and 111.3 kWh of surplus electricity.

## Included activities start
This activity starts when sugarcane arrives at the industrial area.

## Included activities end
The dataset includes the sugarcane conversion into raw sugar, ethanol and surplus electricity. Processing equipment, chemical inputs, industrial area, water use treatment, and emissions to air are included in the inventory. Sugarcane processed arrives with 5% of vegetal impurities (sugarcane straw) and 1% of mineral impurities (dirt). No additional sugarcane straw recovery and industrial use is considered.
The activity ends when products are available at factory gate.

## Geography
The inventory is modeled for Brazil.

## Technology
This dataset represents a modern large-scale sugarcane mill facilitiy existing in Brazil. It includes technologies aiming at maximizing exports of surplus electricity to the grid, while producing raw sugar and ethanol.

## Time period
Time period where the technology is being implemented and used in Brazil.

## Reference product
- ethanol, without water, in 95% solution state, from fermentation: 1 kg; source Mateus F. Chagas 2015; CPC 35491: Biodiesel; By-product classification allocatable product; CAS 64-17-5
  Hydrated ethanol produced in modern annexed plants in Brazil.
  production volume 4.0975e9 kg
    Hydrated ethanol produced in modern annexed plants, based on total Brazilian production.
    It was considered the percentege of sugarcane crushed in annexed mills related to total sugarcane crushed in annexed and autonomous plants(73.8%), based on CONAB (2017) data.
    The participation of modern plants in the Brazilian sugarcane sector was estimated based on surplus electricity commercialization. Modern plants were classified considering the plants comercializing larger amouts of electricity (more than 27.5 kWh per metric tonne of sugarcane - the national average in 2014).
  property heating value, net 31.58 MJ
    LHV is calculated based on the elemental composition of the substance. Based on the CAS number of the substance (000064-17-5), the chemical formula of the substance is found to be: C2H6O, (PubChem 2020).
    Reference: Kim, S., Chen, J., Cheng, T., Gindulyte, A., He, J., He, S., Li, Q., Shoemaker, B. A., Thiessen, P. A., Yu, B., Zaslavsky, L., Zhang, J., & Bolton, E. E. (2019). PubChem 2019 update: improved access to chemical data. Nucleic acids research, 47(D1), D1102–D1109. https://doi.org/10.1093/nar/gky1033
  property price 0.324 EUR2005
    Temporary price data. Calculated as 90% of purchasers price based on: 2005 prices from FAPRI2007, 2009. Agricultural outlook. (http://www.fapri.missouri.edu/outreach/publications/ag_outlook.asp?current_page=outreach; accessed 22/06/10). Unit conversion from US gallon to kg - 1 gallon = 3.7856 liter * 0.789 kg/liter (ethanol density) = 2.9868 kg
  property carbon content 0.521739
    carbon content on a dry matter basis (reserved; not for manual entry)
  property true value 7.8408
    allocation property applied in "true value" allocation // value calculated from revenue
  properties: carbon content, non-fossil 0.521739, water content 0, dry mass 1 kg, wet mass 1 kg, water in wet mass 0 kg, carbon content, fossil 0, carbon allocation 0.521739 kg
- sugar, from sugarcane: 0 kg; source Mateus F. Chagas 2015; By-product classification allocatable product; CPC 23511: Cane sugar
  Sugar produced in modern annexed plants in Brazil.
  production volume 8.69829e9 kg
    Sugar produced in modern annexed plants, based on total Brazilian production.
    It was considered the percentege of sugarcane crushed in annexed mills related to total sugarcane crushed in annexed and autonomous plants(73.8%), based on CONAB (2017) data.
    The participation of modern plants in the Brazilian sugarcane sector was estimated based on surplus electricity commercialization. Modern plants were classified considering the plants comercializing larger amouts of electricity (more than 27.5 kWh per metric tonne of sugarcane - the national average in 2014).
  property price 0.436 EUR2005
    Calculated value based on data from United Nations Commodity Trade Statistics Database (comtrade.un.org). UN comtrade category: 170199 Refined sugar, in solid form, nes, pure sucrose. Year 2005. Using exchange rate of 1EURO = 1.209 USD. Average of price of import into 5 main markets (EU, US, JP, IN and CN). The price of raw sugar, from sugarcane calcualted using the values from the comtrade database is 0.319 EUR/kg, but there are not many values available so the resulting number has very high uncertainty.
  property carbon content 0.44
    carbon content on a dry matter basis (reserved; not for manual entry)
  property true value 22.4104
    allocation property applied in "true value" allocation // value calculated from revenue
  properties: carbon content, non-fossil 0.44, carbon content, fossil 0, water content 0, wet mass 1 kg, water in wet mass 0 kg, dry mass 1 kg, carbon allocation 0.44 kg

## By-products
All rows: source Mateus F. Chagas 2015
- ash, from combustion of bagasse from sugarcane: 0 kg; CPC 86119: Other support services to crop production; By-product classification Recyclable; pedigree (1,1,1,1,1)
  Ash production. Based on computer simulation of the process validated using literature and industry data.
  production volume 0 kg
    Ash produced in modern annexed plants.
  property carbon content 0
    carbon content on a dry matter basis (reserved; not for manual entry)
  properties: price 0 EUR2005, water content 0, carbon content, fossil 0, wet mass 1 kg, dry mass 1 kg, water in wet mass 0 kg, carbon content, non-fossil 0, carbon allocation 0 kg
- ethanol, without water, in 99.7% solution state, from fermentation: 0 kg; CPC 35491: Biodiesel; By-product classification allocatable product; CAS 64-17-5
  Anhydrous ethanol produced in modern annexed plants in Brazil.
  production volume 3.03223e9 kg
    Anhydrous ethanol produced in modern annexed plants, based on total Brazilian production.
    It was considered the percentege of sugarcane crushed in annexed mills related to total sugarcane crushed in annexed and autonomous plants(73.8%), based on CONAB (2017) data.
    The participation of modern plants in the Brazilian sugarcane sector was estimated based on surplus electricity commercialization. Modern plants were classified considering the plants comercializing larger amouts of electricity (more than 27.5 kWh per metric tonne of sugarcane - the national average in 2014).
  property heating value, net 31.58 MJ
    (same comment as for ethanol, without water, in 95% solution state, from fermentation)
  property price 0.436 EUR2005
    Calculated using world prices in FAPRI2007, 2009. Agricultural outlook. The prices in 2003 and 2004 were assumed to be the same as the most recent year (2005). (http://www.fapri.missouri.edu/outreach/publications/ag_outlook.asp?current_page=outreach; accessed 22/06/10). Unit conversion from US gallon to kg - 1 gallon = 3.7856 liter * 0.789 kg/liter (ethanol density) = 2.9868 kg (from http://www.peteducation.com/category.cfm?c=0+1305 and http://en.wikipedia.org/wiki/Ethanol accessed 25/6/10).
  property carbon content 0.521739
    carbon content on a dry matter basis (reserved; not for manual entry)
  property true value 7.8044
    allocation property applied in "true value" allocation // value calculated from revenue
  properties: carbon content, fossil 0, water in wet mass 0 kg, wet mass 1 kg, water content 0, carbon content, non-fossil 0.521739, dry mass 1 kg, carbon allocation 0.521739 kg
- electricity, high voltage: 0 kWh; By-product classification allocatable product; CPC 17100: Electrical energy
  Electricity production from sugarcane bagasse in Brazil.
  production volume 1.88405e10 kWh
    Electricity produced in modern annexed plants.
    It was considered the percentege of sugarcane crushed in annexed mills related to total sugarcane crushed in annexed and autonomous plants(73.8%), based on CONAB (2017) data.
    The participation of modern plants in the Brazilian sugarcane sector was estimated based on surplus electricity commercialization. Modern plants were classified considering the plants comercializing larger amouts of electricity (more than 27.5 kWh per metric tonne of sugarcane - the national average in 2014).
  property price 0.0977 EUR2005
    Temporary price data. Calculated as 90% of purchasers price based on: 94% of the average price (to account for a 6% loss in transformation and transmission) for electricity for industrial consumersin 2005 (excluded taxes). From IEA.
  property true value 10.874
    allocation property applied in "true value" allocation // value calculated from revenue
- filter cake, from sugarcane juice filtration: 0 kg; By-product classification Recyclable; CPC 39149: Beet-pulp and other waste of sugar manufacture; pedigree (1,1,1,1,1)
  Filter cake production. Based on computer simulation of the process validated using literature and industry data. Value in wet basis (moisture content 65%).
  production volume 0 kg
    Filter cake produced in modern annexed plants.
  property price 0.03 EUR2005
    Estimated based on the prioce of "compost", comment: Temporary price data. Calculated as 90% of purchasers price based on: Estimation done using the following sources: <http://www.wmaa.asn.au/uploads/documents/MarkWinser_1May2007.pdf>; <http://www.swlf.ait.ac.th/UpdData/International/Composting%20and%20anaerobic%20digestion_%20comparions%20for%20Europe%20and%20Asia.pdf>; <http://www.epa.gov/osw/conserve/rrr/composting/basic.htm>, accessed 2011.06.16. This choice is made as both products end up in the same generic market and have similar characteristics.
  property carbon content 0.6514
    carbon content on a dry matter basis (reserved; not for manual entry)
  properties: carbon content, fossil 0, dry mass 0.35 kg, wet mass 1 kg, water in wet mass 0.65 kg, water content 1.85714, carbon content, non-fossil 0.6514, carbon allocation 0.22799 kg
- vinasse, from fermentation of sugarcane: 0 kg; CPC 39149: Beet-pulp and other waste of sugar manufacture; By-product classification Recyclable; pedigree (1,1,1,1,1)
  Vinasse production (not including flegmasse). Based on computer simulation of the process validated using literature and industry data.
  production volume 0 kg
    Vinasse produced in modern annexed plants.
  property price 0.027 EUR2005
    Temporary price data. Calculated as 90% of purchasers price based on: Calculated relative to the price of sugar beet pulp based on the difference in dry matter content 5.54%/25%
  property carbon content 0.1288
    carbon content on a dry matter basis (reserved; not for manual entry)
  properties: dry mass 0.0554348 kg, carbon content, non-fossil 0.1288, wet mass 1 kg, water content 17.0392, carbon content, fossil 0, water in wet mass 0.944565 kg, carbon allocation 0.00714 kg

## Inputs from technosphere
All rows: source Mateus F. Chagas 2015
- aluminium sulfate, powder: 4.02603e-5 kg; lognormal variance with pedigree 0.0033, pedigree (2,2,3,1,1)
  Chemicals used for the water treatment in a typical Brazilian sugarcane processing plant (LDC Bioenergia, 2010). Treatment of captured water and recycled water in closed circuits (parameterized by water catchment) were considered.
  properties: wet mass 1 kg, dry mass 1 kg
- sugarcane: 6.62176 kg; lognormal variance with pedigree 0.0033, pedigree (2,2,3,1,1)
  Processed sugarcane. Based on computer simulation of the process validated using literature and industry data.
  properties: water content 2.9216, dry mass 0.255 kg, wet mass 1 kg, carbon content, non-fossil 0.533566
- sodium hypochlorite, without water, in 15% solution state: 0.000299303 kg; lognormal variance with pedigree 0.0033, pedigree (2,2,3,1,1)
  (same comment as for aluminium sulfate, powder)
  properties: dry mass 1 kg, wet mass 1 kg
- acetic acid, without water, in 98% solution state: 9.07181e-7 kg; lognormal variance with pedigree 0.0033, pedigree (2,2,3,1,1)
  (same comment as for aluminium sulfate, powder)
  properties: dry mass 1 kg, wet mass 1 kg, carbon content, fossil 0.400016, heating value, net 14.6 MJ
  note on heating value, net: Based on literature, page 10, Althaus H.-J., Chudacoff M., Hischier R., Jungbluth N., Osses M. and Primas A. (2007) Life Cycle Inventories of Chemicals. Final report ecoinvent data v2.0 No. 8. EMPA, Swiss Centre for Life Cycle Inventories, Dübendorf, CH, Online-Version under: www.ecoinvent.org.
- sodium hydroxide, without water, in 50% solution state: 1.47665e-6 kg; lognormal variance with pedigree 0.0033, pedigree (2,2,3,1,1)
  (same comment as for aluminium sulfate, powder)
  properties: heating value, net 3.03 MJ, wet mass 1 kg, dry mass 1 kg
- zeolite, powder: 4.85375e-5 kg; lognormal variance with pedigree 0.0033, pedigree (2,2,3,1,1)
  Replacement of zeolites in dehydration system. Based on computer simulation of the process validated using literature and industry data.
  properties: wet mass 1 kg, dry mass 1 kg
- hydrochloric acid, without water, in 30% solution state: 4.88024e-7 kg; lognormal variance with pedigree 0.0033, pedigree (2,2,3,1,1)
  (same comment as for aluminium sulfate, powder)
  properties: wet mass 1 kg, heating value, net 3.32 MJ, dry mass 1 kg
- quicklime, milled, packed: 0.0054166 kg; lognormal variance with pedigree 0.0033, pedigree (2,2,3,1,1)
  Quicklime used for juice treatment. Based on computer simulation of the process validated using literature and industry data.
  properties: water content 0.010101, wet mass 1 kg, dry mass 0.99 kg
- chemical, organic: 2.67585e-7 kg; = 0.00000781+0.0000326; lognormal variance with pedigree 0.0033, pedigree (2,2,3,1,1)
  Chemicals used for the water treatment in a typical Brazilian sugarcane processing plant (LDC Bioenergia, 2010). Treatment of captured water and recycled water in closed circuits (parameterized by water catchment) were considered. The amount contains also an amount to approximate the substance of 2-bromo-2-nitropropane-1,3-diol. Amount of this substance was: 0.0000326 kg
  properties: carbon content, fossil 0.628, wet mass 1 kg, dry mass 1 kg, heating value, net 19.03 MJ
  note on carbon content, fossil: This dataset is an unweighted average of 20 organic substances (listed in Tab 88.1, ecoinvent v2.2 report 8, part II), being part of the top100 chemicals included in this database. The C-content has also been calculated as an unweighted average of the C content of the substances composing this dataset.
- soda ash, dense: 2.87384e-5 kg; lognormal variance with pedigree 0.0033, pedigree (2,2,3,1,1)
  (same comment as for aluminium sulfate, powder)
  properties: heating value, net 3.43 MJ, carbon content, fossil 0.113208, dry mass 1 kg, wet mass 1 kg
- formaldehyde: 8.93937e-8 kg; lognormal variance with pedigree 0.0033, pedigree (2,2,3,1,1)
  (same comment as for aluminium sulfate, powder)
  properties: heating value, net 20.19 MJ, wet mass 1 kg, carbon content, fossil 0.4, dry mass 1 kg
- phosphoric acid, industrial grade, without water, in 85% solution state: 0.00117205 kg; lognormal variance with pedigree 0.0033, pedigree (2,2,3,1,1)
  Phosphoric acid used for juice treatment. Based on computer simulation of the process validated using literature and industry data.
  properties: wet mass 1 kg, dry mass 1 kg
- dimethylamine: 2.30437e-6 kg; lognormal variance with pedigree 0.0033, pedigree (2,2,3,1,1)
  (same comment as for aluminium sulfate, powder)
  properties: heating value, net 13.47 MJ, carbon content, fossil 0.533333, dry mass 1 kg, wet mass 1 kg
- phosphane: 1.46341e-6 kg; lognormal variance with pedigree 0.0033, pedigree (2,2,3,1,1)
  (same comment as for aluminium sulfate, powder)
  properties: dry mass 1 kg, wet mass 1 kg
- monoethanolamine: 8.14476e-7 kg; lognormal variance with pedigree 0.0033, pedigree (2,2,3,1,1)
  (same comment as for aluminium sulfate, powder)
  properties: dry mass 1 kg, carbon content, fossil 0.393443, wet mass 1 kg, heating value, net 25.8 MJ
- metal working, average for steel product manufacturing: 0.00231099 kg; lognormal variance with pedigree 0.3426, pedigree (3,3,5,1,1)
  Economic investment was used to estimate the amount of equipment and infrastructure. Baseline values were taken from Macedo et al. (2004) and Macedo et al. (2008), using a scaling factor to adjust plant capacity.
- sodium dichromate: 2.58911e-6 kg; lognormal variance with pedigree 0.0033, pedigree (2,2,3,1,1)
  (same comment as for aluminium sulfate, powder)
  properties: dry mass 1 kg, wet mass 1 kg
- sulfuric acid: 0.00221829 kg; = 0.265+ 7.00E-02; lognormal variance with pedigree 0.0033, pedigree (2,2,3,1,1)
  Sulphuric acid used for yeast treatment in fermentation process and water treatment. Based on computer simulation of the process validated using literature and industry data. Treatment of captured water and recycled water in closed circuits (parameterized by water catchment) were considered.
  properties: wet mass 1 kg, dry mass 1 kg
- lubricating oil: 8.60828e-5 kg; lognormal variance with pedigree 0.0033, pedigree (2,2,3,1,1)
  Lubrication oil for reception, preparation and milling equipments. Based on computer simulation of the process validated using literature and industry data.
  properties: heating value, net 40.2 MJ, dry mass 1 kg, carbon content, fossil 0.75, wet mass 1 kg
  note on heating value, net: Literature value, Source: IPCC 2006, 2006 IPCC Guidelines for National Greenhouse Gas Inventories, Prepared by the National Greenhouse Gas Inventories Programme, Eggleston H.S., Buendia L., Miwa K., Ngara T. and Tanabe K. (eds). Published: IGES, Japan
  note on carbon content, fossil: Lubricating oil is produced from diesel. C-content/dry mass of fats and oils considered 75%, from: ecoinvent v2.2 report, n 15a, pg 40
- dithiocarbamate-compound: 4.14522e-6 kg; lognormal variance with pedigree 0.0033, pedigree (2,2,3,1,1)
  (same comment as for aluminium sulfate, powder)
  properties: dry mass 1 kg, wet mass 1 kg, carbon content, fossil 0.179339
- magnesium sulfate: 8.60828e-8 kg; lognormal variance with pedigree 0.0033, pedigree (2,2,3,1,1)
  (same comment as for aluminium sulfate, powder)
  properties: wet mass 1 kg, dry mass 1 kg
- chemical, inorganic: 1.96666e-6 kg; lognormal variance with pedigree 0.0033, pedigree (2,2,3,1,1)
  Antibiotic for fermentation process. Based on computer simulation of the process validated using literature and industry data.
  properties: dry mass 1 kg, wet mass 1 kg, carbon content, fossil 0.003
  note on carbon content, fossil: This dataset is an unweighted average of 20 inorganic substances (listed in Tab 88.1, ecoinvent v2.2 report 8, part II), being part of the top100 chemicals included in this database. The C-content has also been calculated as an unweighted average of the C content of the substances composing this dataset.
- paraffin: 1.77529e-5 kg; = 2.55E-03 + 1.31E-04; lognormal variance with pedigree 0.0033, pedigree (2,2,3,1,1)
  Flocculating polymer used for juice treatment and water treatment. Based on computer simulation of the process validated using literature and industry data. Treatment of captured water and recycled water in closed circuits (parameterized by water catchment) were considered.
  properties: heating value, net 41.5 MJ, wet mass 1 kg, dry mass 1 kg, carbon content, fossil 0.847059
  note on heating value, net: Indicative value. Reference: Fuels - Higher and Lower Calorific Values, available at: https://www.engineeringtoolbox.com/fuels-higher-calorific-values-d_169.html
- sodium metasilicate pentahydrate, 58% active substance, powder: 1.66868e-6 kg; lognormal variance with pedigree 0.0033, pedigree (2,2,3,1,1)
  (same comment as for aluminium sulfate, powder)
  properties: heating value, net 5.71 MJ, dry mass 1 kg, wet mass 1 kg
- calcium chloride: 2.95993e-6 kg; lognormal variance with pedigree 0.0033, pedigree (2,2,3,1,1)
  (same comment as for aluminium sulfate, powder)
  properties: dry mass 1 kg, wet mass 1 kg
- concrete, normal: 3.09236e-6 m3; lognormal variance with pedigree 0.3426, pedigree (3,3,5,1,1)
  (same comment as for metal working, average for steel product manufacturing)
  properties: wet mass 2380 kg, water content 0.086758, dry mass 2190 kg
- iron (III) chloride, without water, in 40% solution state: 2.37059e-5 kg; lognormal variance with pedigree 0.0033, pedigree (2,2,3,1,1)
  (same comment as for aluminium sulfate, powder)
  properties: wet mass 1 kg, dry mass 1 kg
- building, hall, steel construction: 6.46946e-7 m2; lognormal variance with pedigree 0.3426, pedigree (3,3,5,1,1)
  (same comment as for metal working, average for steel product manufacturing)
- pesticide, unspecified: 8.60828e-8 kg; lognormal variance with pedigree 0.0033, pedigree (2,2,3,1,1)
  Chemicals (biocides) used for the water treatment in a typical Brazilian sugarcane processing plant (LDC Bioenergia, 2010). Treatment of captured water and recycled water in closed circuits (parameterized by water catchment) were considered.
  properties: wet mass 1 kg, dry mass 1 kg, carbon content, fossil 0.486978
- metal working, average for chromium steel product manufacturing: 0.000134422 kg; lognormal variance with pedigree 0.3426, pedigree (3,3,5,1,1)
  (same comment as for metal working, average for steel product manufacturing)
- sodium sulfate, anhydrite: 0.000406576 kg; lognormal variance with pedigree 0.0033, pedigree (2,2,3,1,1)
  (same comment as for aluminium sulfate, powder)
  properties: dry mass 1 kg, wet mass 1 kg
- ash, from combustion of bagasse from sugarcane: -0.0476767 kg; lognormal variance with pedigree 0.0033, pedigree (2,2,3,1,1)
  (same comment as for ash, from combustion of bagasse from sugarcane)
  production volume 1.2236e9 kg
  properties: wet mass 1 kg, dry mass 1 kg
- filter cake, from sugarcane juice filtration: -0.201964 kg; lognormal variance with pedigree 0.0033, pedigree (2,2,3,1,1)
  (same comment as for filter cake, from sugarcane juice filtration)
  production volume 5.15792e9 kg
  properties: dry mass 0.35 kg, wet mass 1 kg, price 0.03 EUR2005, water content 1.85714, carbon content, non-fossil 0.6514
- vinasse, from fermentation of sugarcane: -2.9149 kg; lognormal variance with pedigree 0.0033, pedigree (2,2,3,1,1)
  (same comment as for vinasse, from fermentation of sugarcane)
  production volume 7.45229e10 kg
  properties: dry mass 0.0554348 kg, carbon content, non-fossil 0.1288, wet mass 1 kg, water content 17.0392, price 0.027 EUR2005

## Inputs from nature
- Occupation, industrial area [natural resource, land]: 5.79404e-5 m2*year; source Mateus F. Chagas 2015; lognormal variance with pedigree 0.0826, pedigree (3,3,5,1,1)
  Industrial area plant based on data from MACEDO et al., 2008.
- Transformation, to industrial area [natural resource, land]: 1.13894e-6 m2; source Mateus F. Chagas 2015; lognormal variance with pedigree 0.1626, pedigree (3,3,5,1,1)
  Transformation of area occupied by the industrial plant based on data from MACEDO et al., 2008. The occupation was calculated considering a life span of 25 years.
- Water, well, in ground [natural resource, in water]: 0.00662176 m3; source Mateus F. Chagas 2015; lognormal variance with pedigree 0.0033, pedigree (2,2,3,1,1)
  Water catchment. Based on computer simulation of the process validated using literature and industry data.
- Transformation, from arable land, unspecified use [natural resource, land]: 1.13894e-6 m2; source Mateus F. Chagas 2015; lognormal variance with pedigree 0.1626, pedigree (3,3,5,1,1)
  (same comment as for Transformation, to industrial area)

## Emissions to nature
All rows: source Mateus F. Chagas 2015
- Phosphoric acid [air, non-urban air or from high stacks]: 3.51615e-10 kg; lognormal variance with pedigree 0.0446, pedigree (3,3,3,1,1)
  Emissions from sugar drying process, based on process simulation results.
- Particulates, > 10 um [air, non-urban air or from high stacks]: 1.35746e-5 kg; lognormal variance with pedigree 0.0446, pedigree (3,3,3,1,1)
  Emissions from sugar drying process, based on process simulation results.
- Carbon dioxide, non-fossil [air, non-urban air or from high stacks]: 1.98815 kg; = 257.46 + 42.08 + 7.05E-01; lognormal variance with pedigree 0.0033, pedigree (2,2,3,1,1)
  Emissions from sugarcane bagasse combustion, from fermentation and distillation process. Emissions from sugarcane bagasse combustion in the boilers of cogeneration units were estimated according to GREET (2010) emission factors, except carbon dioxide emissions, which are based on process simulation results. Emissions from fermentation and distillation process were based on process simulation results.
- Sulfur oxides [air, unspecified]: 5.8139e-5 kg; lognormal variance with pedigree 0.0446, pedigree (3,3,3,1,1)
  Emissions from sugarcane bagasse combustion in the boilers of cogeneration units were estimated according to GREET (2010) emission factors, except carbon dioxide emissions, which are based on process simulation results.
- Particulates, > 2.5 um, and < 10um [air, non-urban air or from high stacks]: 0.00122506 kg; = 1.85E-01 + 5.10E-06; lognormal variance with pedigree 0.1246, pedigree (3,3,3,1,1)
  Emissions from sugarcane bagasse combustion and from sugar drying process. Emissions from combustion in the boilers of cogeneration units were estimated according to GREET (2010) emission factors, except carbon dioxide emissions, which are based on process simulation results. Emissions from sugar drying processos were based on process simulation results.
- Carbon monoxide, non-fossil [air, non-urban air or from high stacks]: 0.00108597 kg; lognormal variance with pedigree 0.0446, pedigree (3,3,3,1,1)
  (same comment as for Sulfur oxides)
- NMVOC, non-methane volatile organic compounds, unspecified origin [air, non-urban air or from high stacks]: 7.54967e-5 kg; = 1.14E-02 + 1.31E-06; lognormal variance with pedigree 0.0446, pedigree (3,3,3,1,1)
  (same comment as for Particulates, > 2.5 um, and < 10um)
- Methane, non-fossil [air, non-urban air or from high stacks]: 0.000448955 kg; lognormal variance with pedigree 0.0446, pedigree (3,3,3,1,1)
  (same comment as for Sulfur oxides)
- Particulates, < 2.5 um [air, non-urban air or from high stacks]: 0.000614499 kg; lognormal variance with pedigree 0.3046, pedigree (3,3,3,1,1)
  (same comment as for Sulfur oxides)
- Dinitrogen monoxide [air, non-urban air or from high stacks]: 5.98607e-5 kg; lognormal variance with pedigree 0.0446, pedigree (3,3,3,1,1)
  (same comment as for Sulfur oxides)
- Nitrogen oxides [air, non-urban air or from high stacks]: 0.00108597 kg; lognormal variance with pedigree 0.0446, pedigree (3,3,3,1,1)
  (same comment as for Sulfur oxides)
- Ethanol [air, non-urban air or from high stacks]: 0.000482064 kg; lognormal variance with pedigree 0.0427, pedigree (2,2,3,1,1)
  Emissions from distillation process, based on process simulation results.

## Sampling procedure
The main source of information on inputs and unit operation parameters is based on literature. These data were validated using computer process simulation to check mass and energy balances. Further information is obtained in Bonomi et al. (2016).

## Extrapolations
Figures in the inventory represent average data for a modern large-scale annexed plant.

## Review by Eric Johnson 2018-03-28
water imbalance to be fixed independently
