# electricity production, wind, 1-3MW turbine, onshore

Dataset: EcoSpold 2, unit process
Geography: CA-NF
Time period: 2005-01-01 to 2021-12-31
Technology level: modern
Classification: ISIC rev.4 ecoinvent: 3510:Electric power generation, transmission and distribution
Tags: Canada; wind power
Scenario: Business-as-Usual
System model: Allocation, cut-off by classification
Generated by: Karin Treyer
Published in: Burger, B. 2007
Database: ecoinvent
isCopyrightProtected: true
accessRestrictedTo: 1

## General comment
This dataset represents the production of high voltage electricity at onshore grid-connected wind power plants with a capacity between 1 (excluded) and 3 (included) MW in Canada - Newfoundland and Labrador in 2013. It includes operation and maintenance expenditures as well as infrastructure inputs. Wind load hours have been adapted to local conditions (see parameters).
At the moment, the class of onshore 1-3MW wind turbines is approximated with a 2 MW onshore wind turbine consisting of the infrastructure datasets for the "wind turbine construction" and the "network connection construction". The wind turbine"s parts are defined to be everything except for the network connection, i.e. rotor, nacelle, tower, and foundation.
According to The Wind Power Database (2014), total installed wind capacity on-and offshore in Canada - Newfoundland and Labrador in the end of 2014 amounted to 9106.29 MW. Out of it, 0% were installed offshore, which are modelled with a 2 MW wind turbine. Percentages of the three onshore wind power plant classes modelled in ecoinvent referring to the total installed capacity (175 windfarms by 12/2014): <1MW 3.3%; 1-3MW 96.6%; >3MW 0.1% [Retreived from The Wind Power. 2014. Wind power and wind farms database. www.thewindpower.net, Status December 2014]. Values are valid for TOTAL Canada, not for this specific province/territory.
[This dataset is meant to replace the following datasets:]

## Included activities start
From operation of the wind power plant to high voltage electricity at the plant. According to (European Communities 2001), electricity produced with wind turbines in a wind power plant is connected to medium voltage or high voltage systems, depending on the size of the windfarm. Normally, each wind turbine contains a transformer from low voltage to medium voltage. The network connection additionally transforms the electricity to high voltage electricity. It is assumed here, that there are no stand-alone grid-connected small wind turbines and that all electricity is connected to the network in form of high voltage electricity.

Source:
European Communities. 2001. Wind Turbine Grid Connection and Interaction. Deutsches Windenergie-Institut /Tech-wise A/S /DM Energy, p. 7 Tab.2.1

## Included activities end
This activity ends with the production of 1kWh of high voltage electricity produced at the power plant and delivered to the grid.

This dataset includes
- the operation and maintenance of the wind power plant
- change of lubricating oil every year

This dataset doesn"t include
- raw materials extraction, decommissioning and waste treatment as these activities are already included in infrastructure datasets
- transformation of the electricity produced in order to deliver in to the grid as this is already included in the infrastructure datasets.

## Technology
Technology of a 2MW Vestas V80 wind power plant modelled with a dataset for the wind turbine (moving+fixed parts) and a network connection each.
See dataset "wind turbine construction, 2MW, onshore" for detailed technical information.

## Parameters
- Percentage of onshore wind power plant class capacity on total: 0.966085 dimensionless; name percentage_class_onshore; lognormal variance with pedigree 0.0037, pedigree (3,2,1,1,2)
  Literature value/calculated value. Percentage of installed capacity with onshore wind turbines 1-3MW on total installed wind capacity installed in total Canada (not specific for this province/territory) (see general comment for percentages in other size classes).
  Source:
  The Wind Power. 2014. Windpower and wind farms database. www.thewindpower.net, Status December 2014
  Percentage of the wind power plant class energy production on total wind power production in a country. Classes: <1MW, 1-3MW, >3MW. Values for onshore wind power plants.
- Installed capacity: 6201 MW; name capacity_installed; lognormal variance with pedigree 0.0012, pedigree (2,1,1,1,1)
  Literature value. Total installed capacity in Canada in 2012. NOTE: This is the installed capacity per the end of the year 2012 as given by WWEA, which is then set into relation with the amount of electricity produced in 2012. The value in the general comment represents the installed capacity per December 2014 as given by The Wind Power database and is used in relation to the installed capacity on-and offshore in each turbine size class.
  Source: WWEA. 2012. Annual Report - World Wind Energy Report 2012. The World Wind Energy Association. www.wwindea.org
  Installed capacity of a certain technology in a certain region/location.
- Wind load hours: 1805.66 hour; name wind_load_hours; = 11310000000*(1- losses_gross_net)/(capacity_installed*1000); lognormal variance with pedigree 0.050625, pedigree (5,3,1,2,3)
  Calculated value/Literature value. Wind load hours in Canada (not only in this province/territory but in the total CA).
  Net electricity production in 2012 with wind power according to the IEA Electricity information 2014 in Canada divided by the total installed capacity 2012 in Canada.
  IEA. 2014. Electricity Information 2014. ISBN 978-92-64-21692-1. International Energy Agency (IEA), Paris Cedex (FR).
  nan
- use of lubricating oil for maintenance: 157.5 kg; name lubricating_oil_maintenance; = 63*(2/0.8); lognormal variance with pedigree 0.0912, pedigree (4,4,5,4,4)
  Estimation of the use of maintenance lubricating oil per year, extrapolated from the 800 kW turbine in (Burger & Bauer 2007) (63 kg per year) with the rate of capacities.
  nan
- gross electricity production: 1.91904e8 kWh; name gross_electricity; lognormal variance with pedigree 0.0012, pedigree (2,1,1,1,1)
  Calculated value based on two literature values from StatCan and installed power (Canadian average) for the year 2013. It includes electricity utilities and industrial producers.
  Electric power generation, by class of electricity producer, annual (Megawatt hour) [http://www5.statcan.gc.ca/cansim/a34?lang=eng&id=1270007&searchTypeByValue=1&mode=tableSummary&p2=35]
  Electricity generated from fuels, by electric utility thermal plants, annual (Megawatt hour) [http://www5.statcan.gc.ca/cansim/a34?lang=eng&id=1270006&searchTypeByValue=1&mode=tableSummary&p2=35]
  nan
- distance: 200 km; lognormal variance with pedigree 0.1016, pedigree (4,5,5,4,4)
  Estimation. Maintenance transport to the power plant. One person travels two times per year over a distance of 200 km each time, one time for check only with a car, one time for change of the lubricating oil with a lorry.
  nan
- losses from gross electricity production: 0.01 dimensionless; name losses_gross_net; lognormal variance with pedigree 0.0113, pedigree (3,3,1,3,3)
  Estimation. The factor for the loss of electricity from gross to net electricity production is an assumption based on experiences, statistics and expertise (1% losses for wind).
  nan

## Reference product
- electricity, high voltage: 1 kWh; name amount_RP; By-product classification allocatable product; CPC 17100: Electrical energy
  production volume 1.83542e8 kWh; name APV_electricity; = gross_electricity* (1-losses_gross_net)* percentage_class_onshore
    Calculated value
  property price 0.0977 EUR2005
    Temporary price data. Calculated as 90% of purchasers price based on: 94% of the average price (to account for a 6% loss in transformation and transmission) for electricity for industrial consumersin 2005 (excluded taxes). From IEA.

## Inputs from technosphere
- wind turbine, 2MW, onshore: 1.38454e-8 unit; = 1/(lifetime*(capacity_MW*1000)*wind_load_hours); lognormal variance with pedigree 0.227, pedigree (5,5,5,5,5)
  Calculated value
  property lifetime 20 year; name lifetime
  property capacity [MW] 2 MW; name capacity_MW
  note on lifetime: Estimation/literature value. Today, wind turbine producers often use a lifetime of 20 years for all parts of the wind turbine in their financial calculataions, even if it can be assumed that the foundation could have a longer lifetime.
- waste mineral oil: -4.36129e-5 kg; name waste_min_oil_10; = (lubricating_oil)*-1; lognormal variance with pedigree 0.002, pedigree (1,1,3,1,1)
  Calculated value. The same amount as lubricating oil use.
  production volume 8004.77 kg; = APV_electricity* waste_min_oil_10
    Calculated from production volume of reference product using the relative outputs.
    Due to reasons of the parent-child relationship, a safety amount of 400000kg waste mineral oil was added.
  property price 0 EUR2005; name waste_min_oil_10_price_EUR2005
  properties: heating value, net 34.7 MJ, carbon content, fossil 0.864444, wet mass 1 kg, water content 0.111111, dry mass 0.9 kg
  note on heating value, net: Value taken from the general comment of the treatment dataset.
  note on carbon content, fossil: Tab A.6, ecoinvent v2.2 report 13_I. C content has been calculated after data in the tables, and then referred to 1 kg DM
- transport, freight, lorry 7.5-16 metric ton, EURO3: 2.41534e-12 metric ton*km; = ((lubricating_oil/1000)/2)*(distance*2*lifetime/(lifetime*(capacity_MW*1000)*wind_load_hours)); undefined min 2.11326e-12, max 2.11326e-12, standardDeviation95 0, pedigree (1,1,3,1,1)
  Calculated value. Two maintenance transports to the power plant with 200 km each. Once a year, the lubricating oil is transported and changed.
- lubricating oil: 4.36129e-5 kg; name lubricating_oil; = lubricating_oil_maintenance*lifetime/(lifetime*(capacity_MW*1000)*wind_load_hours); lognormal variance with pedigree 0.002, pedigree (1,1,3,1,1)
  Calculated value/Estimation. Estimated consumption of 157.5 kg lubrication oil per year, extrapolated from the 800 kW turbine in (Burger & Bauer 2004) with the rate of capacities are assumed for maintainance.
  properties: dry mass 1 kg, wet mass 1 kg, heating value, net 40.2 MJ, carbon content, fossil 0.75
  note on heating value, net: Literature value, Source: IPCC 2006, 2006 IPCC Guidelines for National Greenhouse Gas Inventories, Prepared by the National Greenhouse Gas Inventories Programme, Eggleston H.S., Buendia L., Miwa K., Ngara T. and Tanabe K. (eds). Published: IGES, Japan
  note on carbon content, fossil: Lubricating oil is produced from diesel. C-content/dry mass of fats and oils considered 75%, from: ecoinvent v2.2 report, n 15a, pg 40
- wind turbine network connection, 2MW, onshore: 1.38454e-8 unit; = 1/(lifetime*(capacity_MW*1000)*wind_load_hours); lognormal variance with pedigree 0.227, pedigree (5,5,5,5,5)
  Calculated value
  properties: lifetime 20 year

## Inputs from nature
- Energy, kinetic (in wind), converted [natural resource, in air]: 3.87 MJ; undefined min 3.87, max 3.87, standardDeviation95 0, pedigree (1,1,3,1,1)

## Sampling procedure
Literature, calculations

## Extrapolations
This dataset has been extrapolated from year 2015 to the year of the calculation (2021). The uncertainty has been adjusted accordingly.

## Review by Carl Vadenbo 2015-05-28
The update of the whole electricity sector for the ecoinvent v3.2 database consist of hundreds of datasets. All these datasets have passed through a streamlined review processes where the underlying modelling of production volumes, technology shares and efficiencies was reviewed in detail prior to the datasets being submitted to the database.
