# mounting, surface mount technology, Pb-containing solder

Dataset: EcoSpold 2, unit process
Geography: GLO
Time period: 2005-01-01 to 2021-12-31
Technology level: current
Classification: EcoSpold01Categories: electronics/module
Classification: ISIC rev.4 ecoinvent: 2610:Manufacture of electronic components and boards
Tags: ConvertedDataset
Scenario: Business-as-Usual
System model: Allocation, cut-off by classification
Generated by: Roland Hischier
Published in: Hischier R. 2007
Database: ecoinvent
isCopyrightProtected: true
accessRestrictedTo: 1

## General comment
This dataset represents the soldering material input and production efforts for 1 m2 of mounted PWB. It is based on surface mounting components on a PWB in average conditions out of five different laboratory scale trials in two European electronic devices producing companies. Main data are taken from literature (report from a European research project in the field of lead-free soldering). Infrastructure and transportation efforts are based on own assumptions.
[This dataset was already contained in the ecoinvent database version 2. It was not individually updated during the transfer to ecoinvent version 3. Life Cycle Impact Assessment results may still have changed, as they are affected by changes in the supply chain, i.e. in other datasets. This dataset was generated following the ecoinvent quality guidelines for version 2. It may have been subject to central changes described in the ecoinvent version 3 change report (http://www.ecoinvent.org/database/ecoinvent-version-3/reports-of-changes/), and the results of the central updates were reviewed extensively. The changes added e.g. consistent water flows and other information throughout the database. The documentation of this dataset can be found in the ecoinvent reports of version 2, which are still available via the ecoinvent website. The change report linked above covers all central changes that were made during the conversion process.]

## Included activities start
From reception of solder paste and unmounted PWB at the factory gate.

## Included activities end
This dataset includes soldering material input, energy consumption and waste, as well as an estimation of emissions to air, the efforts for transportation and of the infrastructure for the mounting process of surface mount components. Input of PWB and components are not included in this dataset.

## Geography
Data from a European study- representing global valuable values for the mounting activities in the electronics industry.

## Technology
Information from two global electronics producing companies in the framework of a European study, using the so-called reflow soldering technique.

## Reference product
- mounting, surface mount technology, Pb-containing solder: 1 m2; source Geibig J. R. 2005; CPC 88741: Electronic component and board manufacturing services; By-product classification allocatable product
  EcoSpold01Location=GLO
  The process of solder application differs for paste and bar solders, as paste solder is used for surface mount technology in a so-called reflow process, while bar solder is used in a so-called wave soldering process for through-hole mounting.
  production volume 1 m2
    Dummy value to be replaced by measured, estimated or calculated value
  property price 11 EUR2005
    Calculated from prices on inputs to the activity. Transport prices are excluded. The missing price on transportation is compensated by multiplying with 1.1.

## Inputs from technosphere
- scrap tin sheet: 0 kg; source Alvarado Ascencio C. 2005; pedigree (1,1,1,1,1)
  Estimation, based on literature.
  EcoSpold01Location=CH
  Uncertainty: data from literature
  production volume 0 kg
    Calculated from the production volume of mounting, surface mount technology, Pb-containing solder in proportion to the respective output amounts.
  properties: wet mass 1 kg, dry mass 1 kg
- printed wiring board mounting facility: 2.08e-7 unit; lognormal variance with pedigree 0.5761, pedigree (4,5,5,3,5)
  Estimation, assuming an output of ca. 60’000 m2 or 192’000 kg per year during 25 years.
  EcoSpold01Location=GLO
  Uncertainty: rough estimation of infrastructure
- solder, paste, Sn63Pb37, for electronics industry: 0.080645 kg; source Alvarado Ascencio C. 2005; lognormal variance with pedigree 0.0513, pedigree (2,3,5,3,1)
  Estimation, based on literature reporting values from several different PWB mounting trials on laboratory scale.
  EcoSpold01Location=GLO
  Uncertainty: data from literature
  properties: dry mass 1 kg, wet mass 1 kg
- electricity, medium voltage: 3.3629 kWh; source Alvarado Ascencio C. 2005; lognormal variance with pedigree 0.0513, pedigree (2,3,5,3,1)
  Estimation, based on literature reporting values from several different PWB mounting trials on laboratory scale.
  EcoSpold01Location=UCTE
  Uncertainty: data from literature
- scrap tin sheet: -8.40153e-5, -0.00556118 kg (2 entries); source Alvarado Ascencio C. 2005; lognormal variance with pedigree 0.1713, pedigree (2,3,5,3,1)
  Estimation, based on literature.
  EcoSpold01Location=CH
  Uncertainty: data from literature
  production volume 0.0056452 kg

## Emissions to nature
- Formaldehyde [air, urban air close to ground]: 0.00345 kg; lognormal variance with pedigree 0.1787, pedigree (4,3,5,3,1)
  Estimation, based on the assumption that 100% of the non-metal parts of the solder paste are emitted during the reflow heating as emissions to air.
  Uncertainty: calculated from input of flux material
- 2-Propanol [air, urban air close to ground]: 0.00345 kg; lognormal variance with pedigree 0.1787, pedigree (4,3,5,3,1)
  (same comment as for Formaldehyde)
- Formic acid [air, urban air close to ground]: 0.000375 kg; lognormal variance with pedigree 0.1787, pedigree (4,3,5,3,1)
  (same comment as for Formaldehyde)
- Monoethanolamine [air, urban air close to ground]: 0.000225 kg; lognormal variance with pedigree 0.1787, pedigree (4,3,5,3,1)
  (same comment as for Formaldehyde)

## Sampling procedure
own estimation

## Extrapolations
This dataset has been extrapolated from year 2005 to the year of the calculation (2021). The uncertainty has been adjusted accordingly.

## Review by Rolf Frischknecht 2007-11-08
passed.
