# treatment of used lorry, 28 metric ton

Dataset: EcoSpold 2, unit process
Geography: RoW
Time period: 1990-01-01 to 2021-12-31
Technology level: current
Classification: ISIC rev.4 ecoinvent: 3830:Materials recovery
Classification: EcoSpold01Categories: transport systems/road
Tags: ConvertedDataset; Treatment
Scenario: Business-as-Usual
System model: Allocation, cut-off by classification
Generated by: Michael Spielmann (obsolete)
Published in: Spielmann M. 2007
Database: ecoinvent
isCopyrightProtected: true
accessRestrictedTo: 1

## General comment
For the disposal of steel aluminium and cooper a cut off allocation is applied.
[This dataset was already contained in the ecoinvent database version 2. It was not individually updated during the transfer to ecoinvent version 3. Life Cycle Impact Assessment results may still have changed, as they are affected by changes in the supply chain, i.e. in other datasets. This dataset was generated following the ecoinvent quality guidelines for version 2. It may have been subject to central changes described in the ecoinvent version 3 change report (http://www.ecoinvent.org/database/ecoinvent-version-3/reports-of-changes/), and the results of the central updates were reviewed extensively. The changes added e.g. consistent water flows and other information throughout the database. The documentation of this dataset can be found in the ecoinvent reports of version 2, which are still available via the ecoinvent website. The change report linked above covers all central changes that were made during the conversion process.]

## Included activities end
The inventory includes disposal processes for bulk materials. For the disposal of tyres a cut off allocation is applied. However, the transportation of tyres to the cement works is taken into account

## Geography
Data represent Swiss conditions

## Technology
no technologies are specified

## Time period
Data represents conditions of the 1990ties

## Reference product
- used lorry, 28 metric ton: -1 unit; CPC 39990: Other wastes n.e.c.; By-product classification Waste
  EcoSpold01Location=CH
  production volume 3.96633 unit
    This is a placeholder value that does not reflect real-world production volumes. This dataset does not currently require a real-world production volume to work in the database framework, and no actual data were collected yet. This has no negative effect on the results of the ecoinvent database.
  property carbon content, non-fossil 0.00122856
    Calculated from C content in input materials in the infrastructure
  property carbon content, fossil 0.113682
    Calculated from C content in input materials in the infrastructure
  property price 0 EUR2005
    Waste products are assigned a price of zero as they are assumed to require further treatment.
  property carbon content 0.11491
    carbon content on a dry matter basis (reserved; not for manual entry)
  properties: water content 0, wet mass 10200 kg, water in wet mass 0 kg, dry mass 10200 kg, carbon allocation 1172.08 kg

## Inputs from technosphere
- zinc in car shredder residue: -32.6 kg; lognormal variance with pedigree 0.046, pedigree (3,4,5,5,1)
  Data is derived from material composition of a lorry.
  EcoSpold01Location=CH
  Uncertainty: Data is derived from material composition of a lorry.
  production volume 97.8 kg
    Calculated from the production volume of used lorry, 28 metric ton in proportion to the respective output amounts.
  properties: dry mass 1 kg, wet mass 1 kg
- waste glass: 0 kg; pedigree (1,1,1,1,1)
  EcoSpold01Location=CH
  Data is derived from material composition of a lorry.
  Uncertainty: Data is derived from material composition of a lorry.
  production volume 0 kg
    (same comment as for zinc in car shredder residue)
  properties: heating value, net 0.05 MJ, dry mass 1 kg, wet mass 1 kg
  note on heating value, net: Value extracted from "treatment of waste glass, open dump, very wet infiltration class (1000mm)"
- waste plastic, mixture: 0 kg; pedigree (1,1,1,1,1)
  Material composition
  EcoSpold01Location=CH
  Uncertainty: material composition
  production volume 0 kg
    (same comment as for zinc in car shredder residue)
  properties: water content 0.180638, dry mass 0.847 kg, wet mass 1 kg, heating value, net 30.79 MJ, carbon content, fossil 0.747344
  note on heating value, net: Value taken from the general comment of the treatment dataset.
  note on carbon content, fossil: C content in 1 kg DM was calculated using data in Tab A.2, ecoinvent v2.2 report 13_I
- waste mineral oil: 0 kg; pedigree (1,1,1,1,1)
  (same comment as for zinc in car shredder residue)
  production volume 0 kg
    (same comment as for zinc in car shredder residue)
  properties: dry mass 0.9 kg, carbon content, fossil 0.864444, water content 0.111111, wet mass 1 kg, heating value, net 34.7 MJ
  note on carbon content, fossil: Tab A.6, ecoinvent v2.2 report 13_I. C content has been calculated after data in the tables, and then referred to 1 kg DM
- waste emulsion paint: 0 kg; pedigree (1,1,1,1,1)
  (same comment as for zinc in car shredder residue)
  production volume 0 kg
    (same comment as for zinc in car shredder residue)
  properties: dry mass 1 kg, carbon content, fossil 0.27, wet mass 1 kg, heating value, net 8.18 MJ
  note on carbon content, fossil: Tab A.4, ecoinvent v2.2 report 13_I. C content has been calculated after data in the tables, and then referred to 1 kg DM
- waste glass: -5.89124, -0.542983, -0.0123185, -0.0506595, -0.0769293, -0.226683, -11.0793, -55.5199 kg (8 entries); lognormal variance with pedigree 0.046, pedigree (3,4,5,5,1)
  (same comment as for waste glass)
  production volume 220.2 kg
- waste plastic, mixture: -41.7157, -2.78728, -0.210798, -1.15125, -0.465091, -1.09322, -35.5437, -292.033 kg (8 entries); lognormal variance with pedigree 0.046, pedigree (3,4,5,5,1)
  Material composition
  EcoSpold01Location=CH
  Uncertainty: material composition
  production volume 1125 kg
- waste mineral oil: -7.48961, -19.6104 kg (2 entries); lognormal variance with pedigree 0.046, pedigree (3,4,5,5,1)
  (same comment as for zinc in car shredder residue)
  production volume 81.3 kg
- waste emulsion paint: -5.6252, -59.6748 kg (2 entries); lognormal variance with pedigree 0.046, pedigree (3,4,5,5,1)
  (same comment as for zinc in car shredder residue)
  production volume 195.9 kg

## Sampling procedure
Data is based on the material consumption of vehicles. For the transportation of used tyres an expert estimate is used.

## Extrapolations
none This dataset has been copied from an original dataset covering the geography CH. The uncertainty has been adjusted accordingly.

## Review by Niels Jungbluth 2003-08-27
passed.
