# operation, computer, desktop, with cathode ray tube display, home use

Dataset: EcoSpold 2, unit process
Geography: Europe without Switzerland
Time period: 2012-01-01 to 2021-12-31
Technology level: old
Classification: ISIC rev.4 ecoinvent: 8219:Photocopying, document preparation and other specialized office support act
Classification: EcoSpold01Categories: electronics/services
Synonyms: PC; CRT
Scenario: Business-as-Usual
System model: Allocation, cut-off by classification
Generated by: Tereza Levova
Published in: Hischier R. 2007
Database: ecoinvent
isCopyrightProtected: true
accessRestrictedTo: 1

## General comment
The computer desktop home use is calculated according to the share between active (3.14 hrs/day), standby (2.62 hrs/day) and off (18.24 hrs/day) modes taken from survey information. This dataset describes the application of a CRT monitor.

## Included activities end
Describes the use of a desktop computer with a CRT monitor. Calculated per 1 hour of computer use at home.

## Geography
The data is based on information in Japan. For the computer electricity use data information from various international manufacturers and computer types has been processed.

## Technology
No technology involved, except for the production of the desktop computer, which is described in another dataset.

## Parameters
- fraction of computers (desktop) sold with cathode ray tube display: 0.36 % (obsolete); name fraction_computer_desktop_CRT_display; lognormal variance with pedigree 0.0566, pedigree (4,5,5,1,1)
  Literature value (ecoinvent report v2 no.18 IV).
- number of hours in a day when computer (desktop) is in standby mode - home use: 2.62 dimensionless; name no_hours_computer_desktop_SM_home_use; lognormal variance with pedigree 0.0127, pedigree (4,4,3,3,1)
  Literature value (Williams, 2005).
- number of hours in a day when computer (desktop) is in active mode - home use: 3.14 dimensionless; name no_hours_computer_desktop_AM_home_use; lognormal variance with pedigree 0.0127, pedigree (4,4,3,3,1)
  Literature value (Williams, 2005).
- number of hours in a day when computer (desktop) is in off mode - home use: 18.24 dimensionless; name no_hours_computer_desktop_OM_home_use; lognormal variance with pedigree 0.0127, pedigree (4,4,3,3,1)
  Literature value (Williams, 2005).
- number of computers (desktop) sold in 4 years: 4.79462e8 dimensionless; name no_computer_desktop_sold_4years; lognormal variance with pedigree 0.0166, pedigree (4,5,1,1,1)
  Calculated value. Number of computers (desktop) sold in 4 years (from 2002 - 2005 included). Using annual growth of 5.92%. Literature value (http://www.etforecasts.com/products/ES_pcww1203.htm); worldwide sales of desktop computers in millions in 2005 was 130.4 mill. units. Calculated values (using annual growth of 5.92%); 123.1 mil. (2004), 116.2 mil. (2003) and 109.7 mil. (2002).
- fraction of computers desktop sold for home use: 0.1 dimensionless; name fraction_computer_desktop_home_use; lognormal variance with pedigree 0.2106, pedigree (5,5,5,5,5)
  Estimation
- number of days in a year computer desktop home use: 365 dimensionless; name no_days_computer_desktop_home_use; lognormal variance with pedigree 0.1786, pedigree (4,5,5,5,5)
  Estimation (based on assumptions made in ecoinvent report no.18 IV ecoinvent database v2). Number of days in the year when computer (desktop) is used in a home.

## Reference product
- operation, computer, desktop, home use: 1 hour; = op_CRT_active_input+ op_CRT_off_input+ op_CRT_standby_input; By-product classification allocatable product; CPC 85: Support services
  production volume 3.77339e10 hour; = ((no_computer_desktop_sold_4years*fraction_computer_desktop_CRT_display*fraction_computer_desktop_home_use*no_days_computer_desktop_home_use* no_hours_computer_desktop_AM_home_use)+( no_computer_desktop_sold_4years* fraction_computer_desktop_CRT_display*fraction_computer_desktop_home_use* no_days_computer_desktop_home_use* no_hours_computer_desktop_OM_home_use)+( no_computer_desktop_sold_4years* fraction_computer_desktop_CRT_display*fraction_computer_desktop_home_use* no_days_computer_desktop_home_use* no_hours_computer_desktop_SM_home_use))*(1.41E+13/5.65E+13)
    Calculated value based on literature values and estimates. See comments of the parametres used to calculate this values. Computer (desktop) lifetime is estimated to be 4 years (based on ecoinvent report v2 18, IV). The amount of computers (desktop) sold in total in 4 years is calculated. 36% are sold with CRT screen and 64% with LCD screen. It is assumed that 90% of those computers are being used in an office and 10% in a home. Computers used in home are assumed to be used 3.14 hours in active mode, 18.24 hours in off mode and 2.62 hours in standby mode. The swiss production volume is extrapolated from the global one using GDP (IMF, 2012, http://www.imf.org/external/pubs/ft/weo/2010/01/weodata/index.aspx). GDP (PPP) world = 5.65E+13 USD in 2005, GDP (PPP) Europe - Switzerland = 1.41E+13 USD in 2005.
  property price 0.0202103 EUR2005
    Calculated based on inputs: The price of the product has been calculated as a sum of the values of the material and energy inputs for this product. This value is therefore a rough estimation. It may underestimate the real price since there are additional expenses when producing any product. These expences can include for example labour costs, treatment of waste materials and profit for the producer. Please consider carefully whether this level of data quality is acceptable for your application.

## Inputs from technosphere
- operation, computer, desktop, with cathode ray tube display, standby mode: 0.109167 hour; name op_CRT_standby_input; = 1- op_CRT_active_input- op_CRT_off_input; source Williams E. D. 2005; lognormal variance with pedigree 0.036625, pedigree (2,5,4,2,1)
  Literature value (Williams, 2005) state that computer, while used at home, is used 3.14 hours a day in the active mode, 18.24 hours in the off mode and approximatelly 2.74 hours a day in standby mode. In order to have a sum of 24 hours a day the standby use is adjusted to (24-18.24-3.14=) 2.62 hours a day.
- operation, computer, desktop, with cathode ray tube display, off mode: 0.76 hour; name op_CRT_off_input; = (1/24)*18.24; source Williams E. D. 2005; lognormal variance with pedigree 0.036625, pedigree (2,5,4,2,1)
  (same comment as for operation, computer, desktop, with cathode ray tube display, standby m)
- operation, computer, desktop, with cathode ray tube display, active mode: 0.130833 hour; name op_CRT_active_input; = (1/24)*3.14; source Williams E. D. 2005; lognormal variance with pedigree 0.036625, pedigree (2,5,4,2,1)
  (same comment as for operation, computer, desktop, with cathode ray tube display, standby m)

## Sampling procedure
Producers, literature, survey and own assumptions

## Extrapolations
This dataset has been extrapolated from year 2012 to the year of the calculation (2021). The uncertainty has been adjusted accordingly.
