# diphenylether-compound production

Dataset: EcoSpold 2, unit process
Geography: RER
Time period: 2000-01-01 to 2021-12-31
Technology level: current
Classification: EcoSpold01Categories: agricultural means of production/pesticides
Classification: ISIC rev.4 ecoinvent: 2021:Manufacture of pesticides and other agrochemical products
Tags: ConvertedDataset
Scenario: Business-as-Usual
System model: Allocation, cut-off by classification
Share of production covered: 100 %
Generated by: Jürgen Sutter
Published in: Sutter, J. 2007
Database: ecoinvent
isCopyrightProtected: true
accessRestrictedTo: 1

## General comment
This dataset represents the production of diphenylether-compounds (1 kg of active ingredient). Raw materials are modelled with a stoichiometric calculation. Energy consumption is modelled with data from a similar process. The emissions are estimated. Infrastructure is included with a default value.
[This dataset was already contained in the ecoinvent database version 2. It was not individually updated during the transfer to ecoinvent version 3. Life Cycle Impact Assessment results may still have changed, as they are affected by changes in the supply chain, i.e. in other datasets. This dataset was generated following the ecoinvent quality guidelines for version 2. It may have been subject to central changes described in the ecoinvent version 3 change report (http://www.ecoinvent.org/database/ecoinvent-version-3/reports-of-changes/), and the results of the central updates were reviewed extensively. The changes added e.g. consistent water flows and other information throughout the database. The documentation of this dataset can be found in the ecoinvent reports of version 2, which are still available via the ecoinvent website. The change report linked above covers all central changes that were made during the conversion process.]

## Included activities start
From reception of precursors (acetaldehyde, ammonia, 2-butanol, carbon monoxide, chlorine, ethylene, hydrochloric acid, hydrogen, hydrogen fluoride, hydrogen peroxide, nitric acid, o-dichlorobenzene, oxygen, p-dichlorobenzene, phenol, propylene, sodium hydroxide, sulfur, sulfur dioxide, toluene, and water decarbonised) at the factory gate.

## Included activities end
This activity ends with diphenylether-compounds at the factory gate. The dataset includes the input materials, energy uses, infrastructure and emissions. The dataset doesn't include emulsives, additives etc.

## Geography
The inventory is modelled for Europe.

## Technology
Diphenylethers are produced by reacting a chloroaromate with a hydroxyaromate.

The dataset diphenylether-compounds was calculated from the arithmetic mean of all inputs and outputs of the production of aclonifen, diflufenican, and fluazifop-butyl.

Aclonifen is produced in four steps from o-dichlorobenzene:
C6H4Cl2 + Cl2 → C6H3Cl3 + HCl
C6H3Cl3 + HNO3 → C6H2Cl3NO2 + H2O
C6H2Cl3NO2 + NH3 → C6H4Cl2N2O2 + HCl
C6H4Cl2N2O2 + C6H5ONa → C12H9ClN2O3 + NaCl
A precursor that is used for the aclonifen production is sodium phenolate (C6H5ONa).

Sodium phenolate (C6H5ONa) is produced from phenol and sodium hydroxide:
C6H6O + NaOH → C6H5ONa + H2O

Diflufenican is produced in eight steps from acetaldehyde:
3 C2H4O → C6H12O3
4 C6H12O3 + 3 NH3 → 3 C8H11N + 12 H2O
C8H11N + 8 HNO3 → C7H5NO4 + 7 H2O + 5 NO + CO2 + 3 NO2
C7H5NO4 → C6H5NO2 + CO2
C6H5NO2 + Cl2 → C6H4NO2Cl + HCl
C6H4NO2Cl + C7H5F3O → C13H8F3NO3 + HCl
C13H8F3NO3 + SOCl2 → C13H7F3NClO2 + HCl + SO2
C13H7F3NClO2 + C6H5NF2 → C19H11F5N2O2 + HCl
Precursors that are used for the diflufenican production are trifluoromethyl phenol (C6H5NF2), thionyl chloride (SOCl2), and 2,4-difluoro aniline (C6H2F2NO2).

3-Trifluoromethyl phenol (C6H5NF2) is produced in five steps from toluene:
C7H8 + Cl2 → C7H7Cl
C7H7Cl + NaOH → C7H7ONa
C7H7ONa + HCl → C7H8O + NaCl
C7H8O + 3 Cl2 → C7H5Cl3O + 3 HCl
C7H5Cl3O + 3 HF → C7H5F3O + 3 HCl

Thionyl chloride (SOCl2) is produced in two steps from sulphur:
S + Cl2 → SCl2
SCl2 + SO2 + Cl2 → 2 SOCl2

2,4-Difluoro aniline (C6H2F2NO2) is produced in four steps from p-dichlorobenzene:
C6H4Cl2 + Cl2 → C6H3Cl3 + HCl
C6H3Cl3 + HNO3 → C6H2Cl3NO2 + H2O
C6H2Cl3NO2 + 2 HF → C6H2ClF2NO2 + 2 HCl
C6H2ClF2NO2 + H2 → C6H2F2NO2 + HCl

Fluazifop-butyl is produced in five steps from ethylene:
C2H4 + CO + H2O → C3H6O2
C3H6O2 + Cl2 → C3H5ClO2 + HCl
C3H5ClO2 + C4H10O → C7H14ClO2 + H2O
C7H14ClO2 + C6H6O2 → C13H18O4 + HCl
C13H18O4 + C6H3ClF3N → C19H20F3NO4 + HCl
Precursors that are used for the fluazifop-butyl production are hydroquinone (C6H6O2) and 3-trifluoromethyl-5-chloro pyridine (C6H3ClF3N).

Hydroquinone (C6H6O2) is produced from phenol and hydrogen peroxide:
C6H6O + H2O2 → C6H6O2 + H2O

3-Trifluoromethyl-5-chloro pyridine (C6H3ClF3N) is produced in four steps from propene:
C3H6 + O2 → C3H4O + H2O
2 C3H4O + NH3 → C6H7N + 2 H2O
C6H7N + 4 Cl2 → C6H3Cl4N + 4 HCl
C6H3Cl4N + 3 HF → C6H3ClF3N + 3 HCl

## Time period
Time of publications

## Parameters
- fraction, water, decarbonised, to air: 0.3875 dimensionless; name fraction_WDC_to_air; = fraction_CW_to_air; lognormal variance with pedigree 0.092025, pedigree (4,4,3,2,4)
  Calculated value. See comments in the other parametres present in this dataset. Decarbonised water is considered to be always used as cooling water, thus cooling water fractions to air are applied to all carbonised water input flows to calculate the amount of water consumed in the processes.
- fraction, cooling water, cooling pond system, to air: 0.032 dimensionless; name fraction_CW_CP_to_air; lognormal variance with pedigree 0.0413, pedigree (2,3,1,3,1)
  Calculated based on literature value (Scown, C.D., 2011, Water Footprint of U.S. Transportation Fuels and supplying information of the article) (Vionnet, S., Quantis Water Database - Technical Report, 2012).
- fraction, cooling water, recirculating system, to air: 0.771 dimensionless; name fraction_CW_R_to_air; lognormal variance with pedigree 0.0413, pedigree (2,3,1,3,1)
  (same comment as for fraction, cooling water, cooling pond system, to air)
- fraction, cooling water, to air: 0.3875 dimensionless; name fraction_CW_to_air; = (0.5*fraction_CW_OT_to_air)+(0.5*fraction_CW_R_to_air); lognormal variance with pedigree 0.092025, pedigree (4,4,3,2,4)
  Calculated value based on literature value (see comments of the other parametres present in this dataset) and expert opinion. In the case when no industry/literature data are available about the type of cooling or directly fraction, cooling water, to air specific for the process a default assumption is applied. It is assumed that the once-through cooling system is used in 50% of all cases and recirculating system is used in another 50% of all cases.
- fraction, cooling water, once-through system, to air: 0.004 dimensionless; name fraction_CW_OT_to_air; lognormal variance with pedigree 0.0413, pedigree (2,3,1,3,1)
  (same comment as for fraction, cooling water, cooling pond system, to air)

## Reference product
- diphenylether-compound: 1 kg; CPC 34663: Herbicides, anti-sprouting products and plant-growth regulators; By-product classification allocatable product; CAS 101-84-8
  Diphenylethers-compounds can have different modes of action as herbicides. Aclonifen is an inhibitor of carotenoid biosynthesis; diflufenican is an inhibitor of the phytoene desaturase (PDS); and fluazifop-P-butyl is an inhibitor of acetyl CoA carboxylase.
  EcoSpold01Location=RER
  production volume 1.36523e6 kg
    Unknown
    The addition of the consumption volumes in the US in 2002 (from USGS, 2002 Pesticide use Maps) of the diphenylether-compounds acifluorfen, fluazifop, fomesafen, lactofen, oxyfluorfen has been used to estimate the production volumes of this type of pesticide in the Europe. For that, it has been extrapolated to a Global production mix using the ha of Arable land and Permanent crops of US versus the ha of Arable land and Permanent crops in the Europe in 2002 (299/179 million ha; FAOSTAT).
  property carbon content, fossil 0.560061
    C content of diphenylether-compounds was calculated after the C content of thepesticides aclonifen and diflufenican classified as diphenylether-compound in Tab 2.25 of Sutter 2010
  property price 8.66 EUR2005
    Calculated value based on data from United Nations Commodity Trade Statistics Database (comtrade.un.org). UN comtrade category: 290950 Ether-phenols, ether-alcool-phenols and derivatives. Year 2005. Using exchange rate of 1EURO = 1.209 USD. Average of price of import into 5 main markets (EU, US, JP, IN and CN).
  property carbon content 0.560061
    carbon content on a dry matter basis (reserved; not for manual entry)
  properties: dry mass 1 kg, wet mass 1 kg, carbon content, non-fossil 0, water content 0, water in wet mass 0 kg, carbon allocation 0.560061 kg

## Inputs from technosphere
- heat, district or industrial, other than natural gas: 6.50638 MJ; source Gendorf 2000; lognormal variance with pedigree 0.044, pedigree (4,5,4,1,1)
  Estimation, assuming a default value, originated from calculation of avarage consumption of electricity and heat per kg of product (3.2 MJ kg-1), and a resulting amount of heat of 2 MJ for every reaction step per kg reaction product, considering that the demand is made up of a mix that inlcudes 12% steam from external energy sources. Additionally, reaction steps are approximated with energy consumption data, assuming that inventory flows can be estimated using process data for basic operation steps, available for specific organic chemicals.
  Further references:
  Kim S., Overcash M.: Energy in chemical manufacturing processes: gate-to-gate information for life cycle assessment. In: Journal of Chemical Technology & Biotechnology vol. 78, no. 9: 995-1005(11). 2003
  Uncertainty: Estimation
  properties: heating value, net 1 MJ
- acetaldehyde: 0.21757 kg; source Unger T A 1996; lognormal variance with pedigree 0.044, pedigree (4,5,4,1,1)
  Stoichiometric calculation, assuming an efficiency of 95% per reaction step.
  Further references:
  Eckert et al. 2006. Marc Eckert, Gerald Fleischmann, Reinhard Jira, Hermann M. Bolt, Klaus Golka: Acetaldehyde. In: Ullmann's Encyclopedia of Industrial Chemistry, Seventh Edition, 2009 Electronic Release (ed. Fiedler E., Grossmann G., Kersebohm D., Weiss G. and Witte C.). 7 th Electronic Release Edition. Wiley InterScience, New York, Article Online Posting Date: December 15, 2006. Online-Version under: DOI: 10.1002/14356007.a01_031.pub2
  Shimizu et al. 2000. Shinkichi Shimizu, Nanao Watanabe, Toshiaki Kataoka, Takayuki Shoji, Nobuyuki Abe, Sinji Morishita, Hisao Ichimura: Pyridine and Pyridine Derivatives. In: Ullmann's Encyclopedia of Industrial Chemistry, Seventh Edition, 2009 Electronic Release (ed. Fiedler E., Grossmann G., Kersebohm D., Weiss G. and Witte C.). 7 th Electronic Release Edition. Wiley InterScience, New York, Article Online Posting Date: June 15, 2000. Online-Version under: DOI: 10.1002/14356007.a22_399
  EcoSpold01Location=RER
  Uncertainty: Stoechiometric calculation
  properties: carbon content, fossil 0.545296, wet mass 1 kg, dry mass 1 kg, heating value, net 27.53 MJ
- heat, district or industrial, natural gas: 11.6569 MJ; source Gendorf 2000; lognormal variance with pedigree 0.044, pedigree (4,5,4,1,1)
  Estimation, assuming a default value, originated from calculation of avarage consumption of electricity and heat per kg of product (3.2 MJ kg-1), and a resulting amount of heat of 2 MJ for every reaction step per kg reaction product, considering that the demand is made up of a mix that includes 50% natural gas. Additionally, reaction steps are approximated with energy consumption data, assuming that inventory flows can be estimated using process data for basic operation steps, available for specific organic chemicals.
  Further references:
  Kim S., Overcash M.: Energy in chemical manufacturing processes: gate-to-gate information for life cycle assessment. In: Journal of Chemical Technology & Biotechnology vol. 78, no. 9: 995-1005(11). 2003
  Uncertainty: Estimation
  properties: heating value, net 1 MJ
- propylene: 0.09448 kg; source Unger T A 1996; lognormal variance with pedigree 0.044, pedigree (4,5,4,1,1)
  EcoSpold01Location=RER
  Stoichiometric calculation, assuming an efficiency of 95% per reaction step.
  Uncertainty: Stoechiometric calculation
  properties: carbon content, fossil 0.857143, wet mass 1 kg, dry mass 1 kg, heating value, net 43.22 MJ
- sodium hydroxide, without water, in 50% solution state: 1.2911 kg; source Unger T A 1996; lognormal variance with pedigree 0.044, pedigree (4,5,4,1,1)
  EcoSpold01Location=RER
  Stoichiometric calculation, assuming an efficiency of 100%.
  Further references:
  Kim et al. 2003. Kim S., Overcash M.: Energy in chemical manufacturing processes: gate-to-gate information for life cycle assessment. In: Journal of Chemical Technology & Biotechnology vol. 78, no. 9: 995-1005(11). 2003
  Uncertainty: Stoechiometric calculation
  properties: dry mass 1 kg, wet mass 1 kg, heating value, net 3.03 MJ
- sulfur: 0.015788 kg; source Kim S. 2003; lognormal variance with pedigree 0.044, pedigree (4,5,4,1,1)
  Stoichiometric calculation, assuming an efficiency of 95% per reaction step.
  EcoSpold01Location=RER
  Uncertainty: Stoechiometric calculation
  properties: dry mass 1 kg, wet mass 1 kg
- 2-butanol: 0.075117 kg; source Unger T A 1996; lognormal variance with pedigree 0.044, pedigree (4,5,4,1,1)
  (same comment as for sulfur)
  properties: heating value, net 35.99 MJ, carbon content, fossil 0.648649, wet mass 1 kg, dry mass 1 kg
- hydrogen peroxide, without water, in 50% solution state: 0.034513 kg; source Unger T A 1996; lognormal variance with pedigree 0.044, pedigree (4,5,4,1,1)
  (same comment as for propylene)
  properties: wet mass 1 kg, dry mass 1 kg, heating value, net 7.13 MJ
- oxygen, liquid: 0.071985 kg; source Unger T A 1996; lognormal variance with pedigree 0.044, pedigree (4,5,4,1,1)
  Stoichiometric calculation, assuming an efficiency of 100% per reaction step.
  EcoSpold01Location=RER
  Uncertainty: Stoechiometric calculation
  properties: wet mass 1 kg, dry mass 1 kg
- hydrochloric acid, without water, in 30% solution state: 0.049335 kg; source Unger T A 1996; lognormal variance with pedigree 0.044, pedigree (4,5,4,1,1)
  Stoichiometric calculation, assuming an efficiency of 100%.
  Further references:
  Kim et al. 2003. Kim S., Overcash M.: Energy in chemical manufacturing processes: gate-to-gate information for life cycle assessment. In: Journal of Chemical Technology & Biotechnology vol. 78, no. 9: 995-1005(11). 2003
  EcoSpold01Location=RER
  Uncertainty: Stoechiometric calculation
  properties: heating value, net 3.32 MJ, dry mass 1 kg, wet mass 1 kg
- carbon monoxide: 0.031493 kg; source Unger T A 1996; lognormal variance with pedigree 0.044, pedigree (4,5,4,1,1)
  (same comment as for propylene)
  properties: heating value, net 12.99 MJ, dry mass 1 kg, wet mass 1 kg, carbon content, fossil 0.428571
  note on carbon content, fossil: CO. It is assumed that CO is produced from partial combustion of heavy heating oil.
- chlorine, liquid: 1.0181 kg; source Unger T A 1996; lognormal variance with pedigree 0.044, pedigree (4,5,4,1,1)
  EcoSpold01Location=RER
  Stoichiometric calculation, assuming an efficiency of 95% per reaction step.
  Further references:
  Booth 2000. Gerald Booth: Nitro Compounds, Aromatic. In: Ullmann's Encyclopedia of Industrial Chemistry, Seventh Edition, 2009 Electronic Release (ed. Fiedler E., Grossmann G., Kersebohm D., Weiss G. and Witte C.). 7 th Electronic Release Edition. Wiley InterScience, New York, Article Online Posting Date: June 15, 2000. Online-Version under: DOI: 10.1002/14356007.a17_411
  Eckert et al. 2006. Marc Eckert, Gerald Fleischmann, Reinhard Jira, Hermann M. Bolt, Klaus Golka: Acetaldehyde. In: Ullmann's Encyclopedia of Industrial Chemistry, Seventh Edition, 2009 Electronic Release (ed. Fiedler E., Grossmann G., Kersebohm D., Weiss G. and Witte C.). 7 th Electronic Release Edition. Wiley InterScience, New York, Article Online Posting Date: December 15, 2006. Online-Version under: DOI: 10.1002/14356007.a01_031.pub2
  Kim et al. 2003. Kim S., Overcash M.: Energy in chemical manufacturing processes: gate-to-gate information for life cycle assessment. In: Journal of Chemical Technology & Biotechnology vol. 78, no. 9: 995-1005(11). 2003
  Shimizu et al. 2000. Shinkichi Shimizu, Nanao Watanabe, Toshiaki Kataoka, Takayuki Shoji, Nobuyuki Abe, Sinji Morishita, Hisao Ichimura: Pyridine and Pyridine Derivatives. In: Ullmann's Encyclopedia of Industrial Chemistry, Seventh Edition, 2009 Electronic Release (ed. Fiedler E., Grossmann G., Kersebohm D., Weiss G. and Witte C.). 7 th Electronic Release Edition. Wiley InterScience, New York, Article Online Posting Date: June 15, 2000. Online-Version under: DOI: 10.1002/14356007.a22_399
  Uncertainty: Stoechiometric calculation
  properties: wet mass 1 kg, dry mass 1 kg
- hydrogen fluoride: 0.15965 kg; source Unger T A 1996; lognormal variance with pedigree 0.044, pedigree (4,5,4,1,1)
  Stoichiometric calculation, assuming an efficiency of 95% per reaction step.
  Further references:
  Booth 2000. Gerald Booth: Nitro Compounds, Aromatic. In: Ullmann's Encyclopedia of Industrial Chemistry, Seventh Edition, 2009 Electronic Release (ed. Fiedler E., Grossmann G., Kersebohm D., Weiss G. and Witte C.). 7 th Electronic Release Edition. Wiley InterScience, New York, Article Online Posting Date: June 15, 2000. Online-Version under: DOI: 10.1002/14356007.a17_411
  Kim et al. 2003. Kim S., Overcash M.: Energy in chemical manufacturing processes: gate-to-gate information for life cycle assessment. In: Journal of Chemical Technology & Biotechnology vol. 78, no. 9: 995-1005(11). 2003
  EcoSpold01Location=GLO
  Uncertainty: Stoechiometric calculation
  properties: dry mass 1 kg, heating value, net 6.06 MJ, wet mass 1 kg
- water, decarbonised: 0 kg; name water_decarbonised_input; source Unger T A 1996; pedigree (1,1,1,1,1)
  Stoichiometric calculation, assuming an efficiency of 100%.
  EcoSpold01Location=RER
  Uncertainty: Stoechiometric calculation
  properties: wet mass 1 kg
- p-dichlorobenzene: 0.15318 kg; source Unger T A 1996; lognormal variance with pedigree 0.044, pedigree (4,5,4,1,1)
  Stoichiometric calculation, assuming an efficiency of 95% per reaction step.
  Further references:
  Booth 2000. Gerald Booth: Nitro Compounds, Aromatic. In: Ullmann's Encyclopedia of Industrial Chemistry, Seventh Edition, 2009 Electronic Release (ed. Fiedler E., Grossmann G., Kersebohm D., Weiss G. and Witte C.). 7 th Electronic Release Edition. Wiley InterScience, New York, Article Online Posting Date: June 15, 2000. Online-Version under: DOI: 10.1002/14356007.a17_411
  Kim et al. 2003. Kim S., Overcash M.: Energy in chemical manufacturing processes: gate-to-gate information for life cycle assessment. In: Journal of Chemical Technology & Biotechnology vol. 78, no. 9: 995-1005(11). 2003
  EcoSpold01Location=RER
  Uncertainty: Stoechiometric calculation
  properties: heating value, net 18.15 MJ, wet mass 1 kg, dry mass 1 kg, carbon content, fossil 0.493151
- ammonia, anhydrous, liquid: 0.067716 kg; source Unger T A 1996; lognormal variance with pedigree 0.044, pedigree (4,5,4,1,1)
  EcoSpold01Location=RER
  Stoichiometric calculation, assuming an efficiency of 95% per reaction step.
  Further references:
  Eckert et al. 2006. Marc Eckert, Gerald Fleischmann, Reinhard Jira, Hermann M. Bolt, Klaus Golka: Acetaldehyde. In: Ullmann's Encyclopedia of Industrial Chemistry, Seventh Edition, 2009 Electronic Release (ed. Fiedler E., Grossmann G., Kersebohm D., Weiss G. and Witte C.). 7 th Electronic Release Edition. Wiley InterScience, New York, Article Online Posting Date: December 15, 2006. Online-Version under: DOI: 10.1002/14356007.a01_031.pub2
  Shimizu et al. 2000. Shinkichi Shimizu, Nanao Watanabe, Toshiaki Kataoka, Takayuki Shoji, Nobuyuki Abe, Sinji Morishita, Hisao Ichimura: Pyridine and Pyridine Derivatives. In: Ullmann's Encyclopedia of Industrial Chemistry, Seventh Edition, 2009 Electronic Release (ed. Fiedler E., Grossmann G., Kersebohm D., Weiss G. and Witte C.). 7 th Electronic Release Edition. Wiley InterScience, New York, Article Online Posting Date: June 15, 2000. Online-Version under: DOI: 10.1002/14356007.a22_399
  Uncertainty: Stoechiometric calculation
  properties: wet mass 1 kg, dry mass 1 kg
- electricity, medium voltage: 2.07783 kWh; source Gendorf 2000; lognormal variance with pedigree 0.044, pedigree (4,5,4,1,1)
  Estimation, assuming a default value, originated from calculation of avarage consumption of electricity and heat per kg of product (3.2 MJ kg-1), and a resulting amount of electricity of 0,333 kW for every reaction step per kg reaction product, considering that the demand is made up of a mix that inlcudes 38% electricity. Additionally, reaction steps are approximated with energy consumption data, assuming that inventory flows can be estimated using process data for basic operation steps, available for specific organic chemicals.
  Further references:
  Kim S., Overcash M.: Energy in chemical manufacturing processes: gate-to-gate information for life cycle assessment. In: Journal of Chemical Technology & Biotechnology vol. 78, no. 9: 995-1005(11). 2003
  EcoSpold01Location=UCTE
  Uncertainty: Estimation
- chemical factory, organics: 2.5961e-9 unit; lognormal variance with pedigree 0.448, pedigree (4,5,5,5,5)
  Estimation, based on a production capacity of 50,000 t per year and a plant life time of 50 years, therefore an amount of 4X10-10 units per kg of produced chemical is aded to the unit process of the respective chemical. The amount is accounted for each production step. This might be an overestimation in some multistep syntheses.
  EcoSpold01Location=RER
  Uncertainty: Estimation
- nitric acid, without water, in 50% solution state: 0.75845 kg; source Unger T A 1996; lognormal variance with pedigree 0.044, pedigree (4,5,4,1,1)
  (same comment as for chlorine, liquid)
  properties: wet mass 1 kg, dry mass 1 kg
- hydrogen, liquid: 0.0074994 kg; source Unger T A 1996; lognormal variance with pedigree 0.044, pedigree (4,5,4,1,1)
  EcoSpold01Location=RER
  Stoichiometric calculation, assuming an efficiency of 95% per reaction step.
  Further references:
  Booth 2000. Gerald Booth: Nitro Compounds, Aromatic. In: Ullmann's Encyclopedia of Industrial Chemistry, Seventh Edition, 2009 Electronic Release (ed. Fiedler E., Grossmann G., Kersebohm D., Weiss G. and Witte C.). 7 th Electronic Release Edition. Wiley InterScience, New York, Article Online Posting Date: June 15, 2000. Online-Version under: DOI: 10.1002/14356007.a17_411
  Kim et al. 2003. Kim S., Overcash M.: Energy in chemical manufacturing processes: gate-to-gate information for life cycle assessment. In: Journal of Chemical Technology & Biotechnology vol. 78, no. 9: 995-1005(11). 2003
  Uncertainty: Stoechiometric calculation
  properties: dry mass 1 kg, wet mass 1 kg, heating value, net 120.21 MJ
- o-dichlorobenzene: 0.26441 kg; source Unger T A 1996; lognormal variance with pedigree 0.044, pedigree (4,5,4,1,1)
  (same comment as for propylene)
  properties: wet mass 1 kg, dry mass 1 kg, heating value, net 18.15 MJ, carbon content, fossil 0.493151
- toluene, liquid: 0.11258 kg; source Unger T A 1996; lognormal variance with pedigree 0.044, pedigree (4,5,4,1,1)
  Stoichiometric calculation, assuming an efficiency of 95% per reaction step.
  Further references:
  Kim et al. 2003. Kim S., Overcash M.: Energy in chemical manufacturing processes: gate-to-gate information for life cycle assessment. In: Journal of Chemical Technology & Biotechnology vol. 78, no. 9: 995-1005(11). 2003
  EcoSpold01Location=RER
  Uncertainty: Stoechiometric calculation
  properties: wet mass 1 kg, dry mass 1 kg, carbon content, fossil 0.913043, heating value, net 38.17 MJ
- phenol: 0.22307 kg; source Unger T A 1996; lognormal variance with pedigree 0.044, pedigree (4,5,4,1,1)
  (same comment as for propylene)
  properties: carbon content, fossil 0.765957, wet mass 1 kg, dry mass 1 kg, heating value, net 30.93 MJ
- ethylene: 0.031493 kg; source Unger T A 1996; lognormal variance with pedigree 0.044, pedigree (4,5,4,1,1)
  (same comment as for sulfur)
  properties: dry mass 1 kg, carbon content, fossil 0.857143, wet mass 1 kg, heating value, net 43.22 MJ
- sulfur dioxide, liquid: 0.031576 kg; source Kim S. 2003; lognormal variance with pedigree 0.044, pedigree (4,5,4,1,1)
  (same comment as for sulfur)
  properties: dry mass 1 kg, wet mass 1 kg
- water, decarbonised: 0.0101135, 0.00203884, 0.0067041, 6.42179e-6, 0.000370106 kg (5 entries); source Unger T A 1996; lognormal variance with pedigree 0.044, pedigree (4,5,4,1,1)
  (same comment as for water, decarbonised)

## Inputs from nature
- Water, cooling, unspecified natural origin [natural resource, in water]: 0.15574 m3; name water_cooling_UNO_input; source Gendorf 2000; lognormal variance with pedigree 0.044, pedigree (4,5,4,1,1)
  Estimation (24 kg cooling water per kg produced chemical per step).
  Uncertainty: Estimation

## Emissions to nature
- Propene [air, urban air close to ground]: 0.00018896 kg; lognormal variance with pedigree 0.188, pedigree (4,5,5,5,5)
  Estimation, based on the assumption that 0.2% of volatile input materials is emitted to air occurring from the purge vent, the destillation vent and fugitive emission sources.
  Uncertainty: Estimation
- Hydrogen [air, urban air close to ground]: 1.4999e-5 kg; lognormal variance with pedigree 0.188, pedigree (4,5,5,5,5)
  (same comment as for Propene)
- Carbon dioxide, fossil [air, urban air close to ground]: 0.59732 kg; lognormal variance with pedigree 0.1786, pedigree (4,5,5,5,5)
  Estimation, based on the assumption that 0.2% of volatile input materials is emitted to air occurring from the purge vent, the destillation vent and fugitive emission sources. Remaining gases like CH4 or CO are oxidated to CO2. The carbon contained in the removed carbon compounds from wastewater treatment was accounted as CO2 emissions to air (assuming a removal efficiency of 90%).
  Uncertainty: Estimation
- Toluene, 2-chloro [air, urban air close to ground]: 0.00030529 kg; lognormal variance with pedigree 0.188, pedigree (4,5,5,5,5)
  (same comment as for Propene)
- Toluene [air, urban air close to ground]: 0.00022516 kg; lognormal variance with pedigree 0.188, pedigree (4,5,5,5,5)
  (same comment as for Propene)
- Chlorine [air, urban air close to ground]: 0.0016107 kg; lognormal variance with pedigree 0.188, pedigree (4,5,5,5,5)
  (same comment as for Propene)
- Nitrate [water, surface water]: 0.035737 kg; lognormal variance with pedigree 0.188, pedigree (4,5,5,5,5)
  Estimation, assuming that the remaining amount of unreacted input materials leave the production process with the wastewater, wich is further treated in an internal wastewater plant. For the nitrogen containing compounds within the wastewater a removal efficiency of 50% was assumed. The nitrogen emitted to air (N2) is neglected.
  Uncertainty: Estimation
- Toluene, 2-chloro [water, surface water]: 0.00073271 kg; lognormal variance with pedigree 0.448, pedigree (4,5,5,5,5)
  Estimation, assuming that the remaining amount of unreacted input materials leave the production process with the wastewater, wich is further treated in an internal wastewater plant.
  Uncertainty: Estimation
- Propane [air, urban air close to ground]: 0.00015023 kg; lognormal variance with pedigree 0.188, pedigree (4,5,5,5,5)
  (same comment as for Propene)
- Sulfur dioxide [air, urban air close to ground]: 0.061574 kg; lognormal variance with pedigree 0.1786, pedigree (4,5,5,5,5)
  (same comment as for Propene)
- Phenol [water, surface water]: 0.00070449 kg; lognormal variance with pedigree 0.448, pedigree (4,5,5,5,5)
  (same comment as for Toluene, 2-chloro)
- Water [air, unspecified]: 0.0603567 m3; name water_to_air_unspecified; = (water_decarbonised_input/1000*fraction_WDC_to_air)+(water_cooling_UNO_input*fraction_CW_to_air); lognormal variance with pedigree 0.0487, pedigree (2,2,4,1,1)
  Calculated value based on literature values and expert opinion. See comments in the parametres' comment field.
  property fraction, origin: salt water 0; name fraction_origin_salt_water
  property fraction, origin: fresh water 0.000123479; name fraction_origin_fresh_water
  property fraction, origin: unspecified 0.999877; name fraction_origin_unspecified
- Toluene [water, surface water]: 9.0066e-5 kg; lognormal variance with pedigree 0.448, pedigree (4,5,5,5,5)
  (same comment as for Toluene, 2-chloro)
- Water [water, unspecified]: 0.0954025 m3; name water_to_water_unspecified; = (water_decarbonised_input/1000)*(1-fraction_WDC_to_air)+water_cooling_UNO_input*(1-fraction_CW_to_air); lognormal variance with pedigree 0.0487, pedigree (2,2,4,1,1)
  (same comment as for Water)
  property carbon content, non-fossil 0; name C_content_non_fossil
  property dry mass 0 kg; name DM
  property carbon content, fossil 0; name C_content_fossil
  property wet mass 1000 kg; name WM
  property fraction, origin: unspecified 0.999877; name fraction_origin_unspecified_Ww
  property fraction, origin: salt water 0; name fraction_origin_salt_water_Ww
  property fraction, origin: fresh water 0.000123479; name fraction_origin_fresh_water_Ww
  property water in wet mass 1000 kg; name WWM
- Ammonium, ion [water, surface water]: 0.0016252 kg; lognormal variance with pedigree 0.188, pedigree (4,5,5,5,5)
  (same comment as for Nitrate)
- Ethene [air, urban air close to ground]: 6.2987e-5 kg; lognormal variance with pedigree 0.188, pedigree (4,5,5,5,5)
  (same comment as for Propene)
- Ammonia [air, urban air close to ground]: 0.00013543 kg; lognormal variance with pedigree 0.218, pedigree (4,5,5,5,5)
  (same comment as for Propene)
- Acetaldehyde [water, surface water]: 0.00078326 kg; lognormal variance with pedigree 0.448, pedigree (4,5,5,5,5)
  (same comment as for Toluene, 2-chloro)
- Sodium, ion [water, surface water]: 0.76885 kg; lognormal variance with pedigree 0.798, pedigree (4,5,5,5,5)
  (same comment as for Toluene, 2-chloro)
- Fluoride [water, surface water]: 0.0099334 kg; lognormal variance with pedigree 0.188, pedigree (4,5,5,5,5)
  (same comment as for Toluene, 2-chloro)
- Butanol [water, surface water]: 0.00036056 kg; lognormal variance with pedigree 0.448, pedigree (4,5,5,5,5)
  (same comment as for Toluene, 2-chloro)
- Phenol [air, urban air close to ground]: 0.00044615 kg; lognormal variance with pedigree 0.188, pedigree (4,5,5,5,5)
  (same comment as for Propene)
- Propionic acid [water, surface water]: 0.00037954 kg; lognormal variance with pedigree 0.448, pedigree (4,5,5,5,5)
  (same comment as for Toluene, 2-chloro)
- Nitrogen oxides [air, urban air close to ground]: 0.15744 kg; lognormal variance with pedigree 0.188, pedigree (4,5,5,5,5)
  (same comment as for Propene)
- Sulfur [water, surface water]: 0.00078941 kg; lognormal variance with pedigree 0.188, pedigree (4,5,5,5,5)
  (same comment as for Toluene, 2-chloro)
- Propene [water, surface water]: 0.0004535 kg; lognormal variance with pedigree 0.448, pedigree (4,5,5,5,5)
  (same comment as for Toluene, 2-chloro)
- Acetaldehyde [air, urban air close to ground]: 0.00043514 kg; lognormal variance with pedigree 0.188, pedigree (4,5,5,5,5)
  (same comment as for Propene)
- Chloride [water, surface water]: 1.1176 kg; lognormal variance with pedigree 0.448, pedigree (4,5,5,5,5)
  (same comment as for Toluene, 2-chloro)
- Carbon monoxide, fossil [air, urban air close to ground]: 6.2987e-5 kg; lognormal variance with pedigree 0.798, pedigree (4,5,5,5,5)
  (same comment as for Propene)
- Propionic acid [air, urban air close to ground]: 0.00015814 kg; lognormal variance with pedigree 0.188, pedigree (4,5,5,5,5)
  (same comment as for Propene)
- Ethylene oxide [water, surface water]: 0.00015117 kg; lognormal variance with pedigree 0.448, pedigree (4,5,5,5,5)
  (same comment as for Toluene, 2-chloro)
- Butanol [air, urban air close to ground]: 0.00015023 kg; lognormal variance with pedigree 0.188, pedigree (4,5,5,5,5)
  (same comment as for Propene)

## Sampling procedure
Literature data

## Extrapolations
This dataset has been extrapolated from year 2010 to the year of the calculation (2021). The uncertainty has been adjusted accordingly.

## Review by Roland Hischier 2011-11-14
Transfer of documentation done.

## Review by Thomas Nemecek 2010-03-11
Passed.
none
