# light clay brick production

Dataset: EcoSpold 2, unit process
Geography: DE
Time period: 1992-01-01 to 2021-12-31
Technology level: current
Classification: EcoSpold01Categories: construction materials/bricks
Classification: ISIC rev.4 ecoinvent: 2392:Manufacture of clay building materials
Tags: ConvertedDataset
Scenario: Business-as-Usual
System model: Allocation, cut-off by classification
Generated by: Daniel Kellenberger (obsolete)
Published in: Kellenberger D. 2004
Database: ecoinvent
isCopyrightProtected: true
accessRestrictedTo: 1

## General comment
technical drying by heat from liquid gas (natural gas used as proxy). It is assumed that there is wastewater but as no data is available it is not included. The lifespan of the plant is assumed to be 50 years.

## Included activities end
includes the raw materials clay, straw and water, their transport to the finishing plant, the drying energy, the packaging and the infrastructure. Beside the product, some solid household (e.g. packing material) waste is taken into account.

## Geography
For some exchanges CH, RER and GLO modules have been used as proxy.

## Technology
The raw materials (clay and straw) are mixed with water and poured into a mould. The drying process is technical with the use of a natural gas heater

## Parameters
- fraction, tap water, to air: 0.5 dimensionless; name fraction_TW_to_air; = fraction_PW_to_air; lognormal variance with pedigree 0.092025, pedigree (4,4,3,2,4)
  Calculated value. See comment in the other parametres present in this dataset. Tap water is considered to be always used as process water, thus process water fractions to air are applied to all tap water input flows to calculate the amount of water consumed in the processes.
- fraction, process water, to air: 0.5 dimensionless; name fraction_PW_to_air; lognormal variance with pedigree 0.092025, pedigree (4,4,3,2,4)
  Literature value (Statistics Canada, 2007 & Shaffer, K.H., 2008, Consumptive water use in the Great Lakes Basin, USGS) (Vionnet, S., Quantis Water Database - Technical Report, 2012).

## Reference product
- light clay brick: 1 kg; name RP_amount_1; CPC 373: Refractory products and structural non-refractory clay products; By-product classification allocatable product
  EcoSpold01Location=DE
  production volume 7.00359e8 kg; name RP_PV_1; = 3627503*1000*0.39*0.5/1.01
    Estimated value. Values for clay and kaolin production in Germany are retrieved from Eurostat (http://ec.europa.eu/eurostat, accessed 08.02.2016) for the year 2014. Following the commodities are listed with their Prodcom codes, Prodcom name and production volume for EU 28 in tons: 08122210 “Bentonite” 358844 tons (in Eurostat this values is confidential the estimate is from the European mineral statistics 2009-2013 (http://www.bgs.ac.uk/mineralsuk/statistics/europeanStatistics.html, accessed 08.02.2016), 08122230 “Fireclay” 568118 tons, 08122250 “Common clays and shales for construction use (excluding bentonite, fireclay, expanded clays, kaolin and kaolinic clays); andalusite, kyanite and sillimanite; mullite; chamotte or dinas earths” 3627503 tons, and 08122160 “Kaolinitic clays (ball and plastic clays)” 435353 tons. According to the European mineral statistics 2009-2013 (http://www.bgs.ac.uk/mineralsuk/statistics/europeanStatistics.html, accessed 08.02.2016), Europe (EU36) produces 9.1Mt of Kaolin, which is 34.5% of World production, of which 47.8% (16% of all World production) comes from Germany. The largest producer in 2013 was US with 23%, China represented the 12%, Brazil 8%, and Iran 6%. The European mineral statistics values are used for both Europe and the World estimates. The same source reports for EU36 Bentonite production of 2.73 Mt for 2013, which represents the 16.4% of World production. The values for Europe matches the values indicated from Eurostat. Germany produces 13.1% of Europe’s bentonite 358844 tons. The volume of produced clay is assigned to the different activities based on USGS (2015) estimates of uses in the USA (http://minerals.usgs.gov/minerals/pubs/commodity/clays/mcs-2015-clays.pdf, accessed 08.02.2016) and according to input of clay per reference product. Of common clay, 39% is used for brick (for which 50% is assumed to be used for clay bricks and 50% light clay bricks), 23% lightweight aggregate, 31% cement, and 7% other uses (USGS specifies that 9% of common clay is used for lightweight concrete block production in the 2013 Minerals yearbook http://minerals.usgs.gov/minerals/pubs/commodity/clays/myb1-2013-clays.pdf, accessed 08.02.2016). Of ball clay, 39% is used for floor and wall tiles, 17% sanitary ware, and 44% other uses. Of bentonite 26% absorbents, 24% drilling mud, 15% foundry sand bond (assumed to represent plaster clay), 11% iron ore pelletising, and 24% other uses. Of fire clay, 34% for heavy clay products, and 66% for refractory and other products. Of fuller’s earth, 70% absorbents, and 30% for other uses. The US produce 15 to 25 % of refined clays (without common clay and shale).
  property carbon content, fossil 0
    Made from clay (85%) and straw (15%) ecoinvent v2.2 report 7, part XXI, Tab 6.14 & pg 8. Straw C content in DM was considered 0.43 kg C
  property carbon content, non-fossil 0.06804
    (same comment as for light clay brick)
  property carbon content 0.06804
    carbon content on a dry matter basis (reserved; not for manual entry)
  properties: price 0.0826 EUR2005, heating value, net 0 MJ, water in wet mass 0 kg, dry mass 1 kg, wet mass 1 kg, water content 0, carbon allocation 0.06804 kg

## Inputs from technosphere
- heat, district or industrial, natural gas: 1.78 MJ; lognormal variance with pedigree 0.1001, pedigree (3,5,5,3,1)
  EcoSpold01Location=RER
  properties: heating value, net 1 MJ
- clay pit infrastructure: 1.67e-10 unit; lognormal variance with pedigree 0.69, pedigree (1,1,5,1,1)
  estimated
  EcoSpold01Location=CH
- electricity, medium voltage: 0.00556 kWh; lognormal variance with pedigree 0.1001, pedigree (3,5,5,3,1)
  EcoSpold01Location=DE
- straw: 0.162 kg; lognormal variance with pedigree 0.07, pedigree (3,5,5,1,1)
  property carbon content, non-fossil 0.437377; name C_content_non_fossil
  property dry mass 0.85 kg; name DM
  property water content 0.176471; name water_content
  property water in wet mass 0.15 kg; name WWM
  property carbon content, fossil 0; name C_content_fossil
  property wet mass 1 kg; name WM
  properties: heating value, net 14.25 MJ
  note on heating value, net: Literature value, Source: Phyllis2, database for (treated) biomass, algae, feedstocks for biogas production and biochar, https://phyllis.nl/Biomass/View/1271, ECN.TNO
- tap water: 0.113 kg; name tap_water_input; lognormal variance with pedigree 0.1001, pedigree (3,5,5,3,1)
  EcoSpold01Location=RER
  properties: carbon content, fossil 0.00178991, water content 2962.17, wet mass 1 kg, dry mass 0.000337476 kg
  note on carbon content, fossil: Bicarbonate content is 2.93 mol/m3. CO2 content is 0.1 mol/m3 (ecoinvent v2.2 report 8, Tab 93.1).
- diesel, burned in building machine: 0.0158 MJ; lognormal variance with pedigree 0.1001, pedigree (3,5,5,3,1)
  EcoSpold01Location=GLO
  properties: heating value, net 1 MJ
- inert waste, for final disposal: -0.000125 kg; name BP_amount_1; lognormal variance with pedigree 0.1001, pedigree (3,5,5,3,1)
  EcoSpold01Location=CH
  production volume 87544.9 kg; = BP_amount_1* RP_PV_1/ RP_amount_1
    Calculated from the production volume of light clay brick in proportion to the respective output amounts.
  property price 0 EUR2005; name BP_amount_1_price_EUR2005
  properties: water content 0.00502513, dry mass 0.995 kg, wet mass 1 kg
- clay: 1.01 kg; lognormal variance with pedigree 0.07, pedigree (3,5,5,1,1)
  EcoSpold01Location=CH
  properties: wet mass 1 kg, water content 0.0362694, dry mass 0.965 kg
- packing, clay product: 1 kg; lognormal variance with pedigree 0.69, pedigree (1,1,5,1,1)
  estimated
  EcoSpold01Location=CH

## Emissions to nature
- Water [air, unspecified]: 5.65e-5 m3; name water_to_air_unspecified; = (tap_water_input/1000*fraction_TW_to_air); lognormal variance with pedigree 0.0807, pedigree (2,2,5,1,1)
  Calculated value based on literature values and expert opinion. See comments in the parametres' comment field.
  property fraction, origin: salt water 0; name fraction_origin_salt_water
  property fraction, origin: fresh water 1; name fraction_origin_fresh_water
  property fraction, origin: unspecified 0; name fraction_origin_unspecified
- Water [water, unspecified]: 5.65e-5 m3; name water_to_water_unspecified; = (tap_water_input/1000)*(1-fraction_TW_to_air); lognormal variance with pedigree 0.0807, pedigree (2,2,5,1,1)
  (same comment as for Water)
  property fraction, origin: fresh water 1; name fraction_origin_fresh_water_Ww
  property fraction, origin: salt water 0; name fraction_origin_salt_water_Ww
  property fraction, origin: unspecified 0; name fraction_origin_unspecified_Ww

## Sampling procedure
Literature

## Extrapolations
This dataset has been extrapolated from year 1995 to the year of the calculation (2021). The uncertainty has been adjusted accordingly.

## Review by Roberto Dones 2004-04-05
passed

## Review by Bo Weidema 2012-07-19
input of "straw, production mix" changed to "straw"
