# treatment of lignite ash, opencast refill

Dataset: EcoSpold 2, unit process
Geography: SI
Time period: 1996-01-01 to 2021-12-31
Technology level: current
Classification: EcoSpold01Categories: waste management/others
Classification: ISIC rev.4 ecoinvent: 3822:Treatment and disposal of hazardous waste
Synonyms: ashes form lignite incineration disposed as backfill in opencast lignite mines
Tags: Treatment; ConvertedDataset
Scenario: Business-as-Usual
System model: Allocation, cut-off by classification
Generated by: Gabor Doka (obsolete)
Published in: Doka G. 2008
Database: ecoinvent
isCopyrightProtected: true
accessRestrictedTo: 1

## General comment
backfilled waste composition is (in ppm): H2O n.a.; O n.a.; H n.a.; C n.a.; S 32611; N n.a.; P 102.93; B 543.21; Cl 3.87; Br 4.128; F 12.9; I 0.516; Ag n.a.; As 12.684; Ba 258; Cd 1.5491; Co 38.7; Cr 36.12; Cu 15.427; Hg 0.025867; Mn 51.6; Mo 18.013; Ni 38.467; Pb 12.732; Sb 10.239; Se 4.2964; Sn 4.128; V 90.064; Zn 71.108; Be 2.58; Sc 1.29; Sr 180.36; Ti 258; Tl 0.05133; W 2.58; Si 123840; Fe 13932; Ca 51600; Al 12126; K 1548; Mg 7739.9; Na 2322;
[This dataset was already contained in the ecoinvent database version 2. It was not individually updated during the transfer to ecoinvent version 3. Life Cycle Impact Assessment results may still have changed, as they are affected by changes in the supply chain, i.e. in other datasets. This dataset was generated following the ecoinvent quality guidelines for version 2. It may have been subject to central changes described in the ecoinvent version 3 change report (http://www.ecoinvent.org/database/ecoinvent-version-3/reports-of-changes/), and the results of the central updates were reviewed extensively. The changes added e.g. consistent water flows and other information throughout the database. The documentation of this dataset can be found in the ecoinvent reports of version 2, which are still available via the ecoinvent website. The change report linked above covers all central changes that were made during the conversion process.]

## Included activities end
This module contains only direct emissions from lignite ash used as backfill in opencast lignite mines: short-term emissions (0-100a) and long-term emissions (>100a) both to ground water. E.g. land-use and energy consumption is *not* included.

## Geography
Ash composition calculated from country-specific coal composition (SI) and technology-specific transfer coefficients in power plant.

## Technology
Lignite ash as backfill in lignite opencast mine (together with tailings)

## Reference product
- lignite ash: -1 kg; CPC 39: Wastes or scraps; By-product classification Waste
  EcoSpold01Location=SI
  production volume 1.89173e8 kg
    Estimated. Electricity and synthetic natural gas production are responsible for more than 90% of lignite use (https://www.lignite.com/about-lignite/lignite-uses/, accessed 20151008) . The production volume is calculated as the sum of lignite ashes resulting from electricity and heat and power co-generation production from lignite, in the respective country.
  property price 0 EUR2005
    Waste products are assigned a price of zero as they are assumed to require further treatment.
  property carbon content 0
    carbon content on a dry matter basis (reserved; not for manual entry)
  properties: water in wet mass 0 kg, water content 0, heating value, net 0 MJ, wet mass 1 kg, carbon content, non-fossil 0, dry mass 1 kg, carbon content, fossil 0, carbon allocation 0 kg

## Emissions to nature
- Lead [water, ground-, long-term]: 1.2731e-5 kg; lognormal variance with pedigree 1.28, pedigree (1,1,5,1,1)
  Long-term emission from lignite ash backfill. Uncertainty derived from uncertainty in ash composition and uncertainty in transfer coefficients.
- Sodium, ion [water, ground-, long-term]: 0.00071325 kg; lognormal variance with pedigree 0.6, pedigree (1,1,5,1,1)
  (same comment as for Lead)
- Mercury [water, ground-]: 5.1142e-12 kg; lognormal variance with pedigree 2.94, pedigree (1,1,5,1,1)
  Short-term emission from lignite ash backfill. Uncertainty derived from uncertainty in ash composition and uncertainty in transfer coefficients.
- Silicon [water, ground-, long-term]: 0.088306 kg; lognormal variance with pedigree 0.17, pedigree (1,1,5,1,1)
  (same comment as for Lead)
- Scandium [water, ground-]: 3.6457e-7 kg; lognormal variance with pedigree 1.62, pedigree (1,1,5,1,1)
  (same comment as for Mercury)
- Chloride [water, ground-, long-term]: 1.662e-6 kg; lognormal variance with pedigree 1.44, pedigree (1,1,5,1,1)
  (same comment as for Lead)
- Iodide [water, ground-]: 5.16e-7 kg; lognormal variance with pedigree 1.69, pedigree (1,1,5,1,1)
  (same comment as for Mercury)
- Aluminium [water, ground-, long-term]: 0.012111 kg; lognormal variance with pedigree 0.38, pedigree (1,1,5,1,1)
  (same comment as for Lead)
- Chromium VI [water, ground-]: 5.4476e-6 kg; lognormal variance with pedigree 1.22, pedigree (1,1,5,1,1)
  (same comment as for Mercury)
- Antimony [water, ground-]: 3.9488e-6 kg; lognormal variance with pedigree 1.33, pedigree (1,1,5,1,1)
  (same comment as for Mercury)
- Copper, ion [water, ground-, long-term]: 1.5425e-5 kg; lognormal variance with pedigree 1.25, pedigree (1,1,5,1,1)
  (same comment as for Lead)
- Cadmium, ion [water, ground-]: 4.4051e-11 kg; lognormal variance with pedigree 2.67, pedigree (1,1,5,1,1)
  (same comment as for Mercury)
- Tungsten [water, ground-]: 9.9498e-7 kg; lognormal variance with pedigree 1.51, pedigree (1,1,5,1,1)
  (same comment as for Mercury)
- Molybdenum [water, ground-]: 1.8013e-5 kg; lognormal variance with pedigree 1.23, pedigree (1,1,5,1,1)
  (same comment as for Mercury)
- Arsenic, ion [water, ground-, long-term]: 1.2684e-14 kg; lognormal variance with pedigree 1.3, pedigree (1,1,5,1,1)
  (same comment as for Lead)
- Copper, ion [water, ground-]: 2.4875e-9 kg; lognormal variance with pedigree 2.14, pedigree (1,1,5,1,1)
  (same comment as for Mercury)
- Chromium VI [water, ground-, long-term]: 3.5823e-6 kg; lognormal variance with pedigree 1.2, pedigree (1,1,5,1,1)
  (same comment as for Lead)
- Cadmium, ion [water, ground-, long-term]: 1.5491e-6 kg; lognormal variance with pedigree 1.55, pedigree (1,1,5,1,1)
  (same comment as for Lead)
- Vanadium, ion [water, ground-]: 5.5354e-7 kg; lognormal variance with pedigree 1.44, pedigree (1,1,5,1,1)
  (same comment as for Mercury)
- Fluoride [water, ground-, long-term]: 1.1217e-5 kg; lognormal variance with pedigree 1.27, pedigree (1,1,5,1,1)
  (same comment as for Lead)
- Sulfate [water, ground-, long-term]: 0.071498 kg; lognormal variance with pedigree 0.28, pedigree (1,1,5,1,1)
  (same comment as for Lead)
- Antimony [water, ground-, long-term]: 6.2903e-6 kg; lognormal variance with pedigree 1.31, pedigree (1,1,5,1,1)
  (same comment as for Lead)
- Manganese [water, ground-, long-term]: 5.1598e-5 kg; lognormal variance with pedigree 1.09, pedigree (1,1,5,1,1)
  (same comment as for Lead)
- Beryllium [water, ground-, long-term]: 2.5761e-6 kg; lognormal variance with pedigree 1.49, pedigree (1,1,5,1,1)
  (same comment as for Lead)
- Fluoride [water, ground-]: 1.6829e-6 kg; lognormal variance with pedigree 1.37, pedigree (1,1,5,1,1)
  (same comment as for Mercury)
- Beryllium [water, ground-]: 3.9124e-9 kg; lognormal variance with pedigree 2.09, pedigree (1,1,5,1,1)
  (same comment as for Mercury)
- Magnesium [water, ground-]: 3.6836e-6 kg; lognormal variance with pedigree 1.19, pedigree (1,1,5,1,1)
  (same comment as for Mercury)
- Thallium [water, ground-, long-term]: 5.1252e-8 kg; lognormal variance with pedigree 1.99, pedigree (1,1,5,1,1)
  (same comment as for Lead)
- Tungsten [water, ground-, long-term]: 1.585e-6 kg; lognormal variance with pedigree 1.49, pedigree (1,1,5,1,1)
  (same comment as for Lead)
- Phosphate [water, ground-]: 2.9533e-7 kg; lognormal variance with pedigree 1.66, pedigree (1,1,5,1,1)
  (same comment as for Mercury)
- Strontium [water, ground-, long-term]: 0.00018009 kg; lognormal variance with pedigree 0.92, pedigree (1,1,5,1,1)
  (same comment as for Lead)
- Iron, ion [water, ground-, long-term]: 0.0093102 kg; lognormal variance with pedigree 0.41, pedigree (1,1,5,1,1)
  (same comment as for Lead)
- Phosphate [water, ground-, long-term]: 0.0001769 kg; lognormal variance with pedigree 1.08, pedigree (1,1,5,1,1)
  (same comment as for Lead)
- Vanadium, ion [water, ground-, long-term]: 4.8441e-5 kg; lognormal variance with pedigree 1.11, pedigree (1,1,5,1,1)
  (same comment as for Lead)
- Thallium [water, ground-]: 7.7839e-11 kg; lognormal variance with pedigree 2.59, pedigree (1,1,5,1,1)
  (same comment as for Mercury)
- Barium [water, ground-, long-term]: 0.00025799 kg; lognormal variance with pedigree 0.88, pedigree (1,1,5,1,1)
  (same comment as for Lead)
- Boron [water, ground-]: 4.2561e-6 kg; lognormal variance with pedigree 1.17, pedigree (1,1,5,1,1)
  (same comment as for Mercury)
- Bromine [water, ground-]: 4.0582e-6 kg; lognormal variance with pedigree 1.42, pedigree (1,1,5,1,1)
  (same comment as for Mercury)
- Manganese [water, ground-]: 1.7853e-9 kg; lognormal variance with pedigree 2.19, pedigree (1,1,5,1,1)
  (same comment as for Mercury)
- Potassium, ion [water, ground-, long-term]: 0.00067447 kg; lognormal variance with pedigree 0.65, pedigree (1,1,5,1,1)
  (same comment as for Lead)
- Sulfate [water, ground-]: 0.026335 kg; lognormal variance with pedigree 0.32, pedigree (1,1,5,1,1)
  (same comment as for Mercury)
- Strontium [water, ground-]: 2.7351e-7 kg; lognormal variance with pedigree 1.52, pedigree (1,1,5,1,1)
  (same comment as for Mercury)
- Boron [water, ground-, long-term]: 0.0003395 kg; lognormal variance with pedigree 0.83, pedigree (1,1,5,1,1)
  (same comment as for Lead)
- Cobalt [water, ground-, long-term]: 3.8672e-5 kg; lognormal variance with pedigree 1.13, pedigree (1,1,5,1,1)
  (same comment as for Lead)
- Titanium, ion [water, ground-, long-term]: 0.00025768 kg; lognormal variance with pedigree 0.88, pedigree (1,1,5,1,1)
  (same comment as for Lead)
- Iron, ion [water, ground-]: 1.1657e-7 kg; lognormal variance with pedigree 1.65, pedigree (1,1,5,1,1)
  (same comment as for Mercury)
- Nickel, ion [water, ground-, long-term]: 3.8409e-5 kg; lognormal variance with pedigree 1.13, pedigree (1,1,5,1,1)
  (same comment as for Lead)
- Potassium, ion [water, ground-]: 0.00087352 kg; lognormal variance with pedigree 0.65, pedigree (1,1,5,1,1)
  (same comment as for Mercury)
- Tin, ion [water, ground-, long-term]: 4.1276e-6 kg; lognormal variance with pedigree 1.42, pedigree (1,1,5,1,1)
  (same comment as for Lead)
- Aluminium [water, ground-]: 1.5077e-5 kg; lognormal variance with pedigree 1.01, pedigree (1,1,5,1,1)
  (same comment as for Mercury)
- Selenium [water, ground-, long-term]: 2.6395e-6 kg; lognormal variance with pedigree 1.43, pedigree (1,1,5,1,1)
  (same comment as for Lead)
- Bromine [water, ground-, long-term]: 6.9807e-8 kg; lognormal variance with pedigree 1.45, pedigree (1,1,5,1,1)
  (same comment as for Lead)
- Lead [water, ground-]: 2.7661e-10 kg; lognormal variance with pedigree 2.43, pedigree (1,1,5,1,1)
  (same comment as for Mercury)
- Barium [water, ground-]: 8.9265e-9 kg; lognormal variance with pedigree 1.97, pedigree (1,1,5,1,1)
  (same comment as for Mercury)
- Molybdenum [water, ground-, long-term]: 2.4511e-11 kg; lognormal variance with pedigree 1.25, pedigree (1,1,5,1,1)
  (same comment as for Lead)
- Arsenic, ion [water, ground-]: 1.2684e-5 kg; lognormal variance with pedigree 1.28, pedigree (1,1,5,1,1)
  (same comment as for Mercury)
- Mercury [water, ground-, long-term]: 2.5862e-8 kg; lognormal variance with pedigree 2.07, pedigree (1,1,5,1,1)
  (same comment as for Lead)
- Titanium, ion [water, ground-]: 3.2079e-7 kg; lognormal variance with pedigree 1.5, pedigree (1,1,5,1,1)
  (same comment as for Mercury)
- Zinc, ion [water, ground-, long-term]: 7.1104e-5 kg; lognormal variance with pedigree 1.05, pedigree (1,1,5,1,1)
  (same comment as for Lead)
- Nickel, ion [water, ground-]: 5.8333e-8 kg; lognormal variance with pedigree 1.73, pedigree (1,1,5,1,1)
  (same comment as for Mercury)
- Zinc, ion [water, ground-]: 3.6504e-9 kg; lognormal variance with pedigree 2.09, pedigree (1,1,5,1,1)
  (same comment as for Mercury)
- Iodide [water, ground-, long-term]: 5.16e-14 kg; lognormal variance with pedigree 1.72, pedigree (1,1,5,1,1)
  (same comment as for Lead)
- Selenium [water, ground-]: 1.6569e-6 kg; lognormal variance with pedigree 1.44, pedigree (1,1,5,1,1)
  (same comment as for Mercury)
- Chloride [water, ground-]: 2.208e-6 kg; lognormal variance with pedigree 1.44, pedigree (1,1,5,1,1)
  (same comment as for Mercury)
- Magnesium [water, ground-, long-term]: 0.0077363 kg; lognormal variance with pedigree 0.44, pedigree (1,1,5,1,1)
  (same comment as for Lead)
- Sodium, ion [water, ground-]: 0.0016087 kg; lognormal variance with pedigree 0.59, pedigree (1,1,5,1,1)
  (same comment as for Mercury)
- Cobalt [water, ground-]: 2.7713e-8 kg; lognormal variance with pedigree 1.82, pedigree (1,1,5,1,1)
  (same comment as for Mercury)
- Scandium [water, ground-, long-term]: 9.2542e-7 kg; lognormal variance with pedigree 1.58, pedigree (1,1,5,1,1)
  (same comment as for Lead)
- Calcium, ion [water, ground-]: 1.9529e-5 kg; lognormal variance with pedigree 1, pedigree (1,1,5,1,1)
  (same comment as for Mercury)
- Tin, ion [water, ground-]: 3.2764e-10 kg; lognormal variance with pedigree 2.41, pedigree (1,1,5,1,1)
  (same comment as for Mercury)
- Silicon [water, ground-]: 0.00069877 kg; lognormal variance with pedigree 0.58, pedigree (1,1,5,1,1)
  (same comment as for Mercury)
- Calcium, ion [water, ground-, long-term]: 0.05158 kg; lognormal variance with pedigree 0.22, pedigree (1,1,5,1,1)
  (same comment as for Lead)

## Sampling procedure
country-specific calculation based on literature data

## Extrapolations
This dataset has been extrapolated from year 2000 to the year of the calculation (2021). The uncertainty has been adjusted accordingly.

## Review by Niels Jungbluth 2009-01-22
passed.
