# ethanol production from rye

Dataset: EcoSpold 2, unit process
Geography: RER
Time period: 2002-01-01 to 2021-12-31
Technology level: current
Classification: EcoSpold01Categories: biomass/fuels
Classification: ISIC rev.4 ecoinvent: 2011:Manufacture of basic chemicals
Tags: ConvertedDataset
Scenario: Business-as-Usual
System model: Allocation, cut-off by classification
Share of production covered: 0 %
Generated by: Edgard Gnansounou
Published in: Jungbluth N. 2007
Database: ecoinvent
isCopyrightProtected: true
accessRestrictedTo: 1

## General comment
Inventory refers to the production of 1 kg hydrated ethanol 95% (dry basis, i.e. 1.05 kg hydrated ethanol wet basis), respectively 1 kg of DDGS (wet basis) from rye grains. The multioutput-process 'rye, in distillery' delivers the co-products 'ethanol, 95% in H2O, from rye, at distillery' and 'DDGS, from rye, at distillery'. Economic allocation with allocation factor for common stages of 97.7% to ethanol. Allocation is done according to carbon balance for CO2 emissions.
[This dataset was already contained in the ecoinvent database version 2. It was not individually updated during the transfer to ecoinvent version 3. Life Cycle Impact Assessment results may still have changed, as they are affected by changes in the supply chain, i.e. in other datasets. This dataset was generated following the ecoinvent quality guidelines for version 2. It may have been subject to central changes described in the ecoinvent version 3 change report (http://www.ecoinvent.org/database/ecoinvent-version-3/reports-of-changes/), and the results of the central updates were reviewed extensively. The changes added e.g. consistent water flows and other information throughout the database. The documentation of this dataset can be found in the ecoinvent reports of version 2, which are still available via the ecoinvent website. The change report linked above covers all central changes that were made during the conversion process.]

## Included activities end
This dataset includes the transport of rye grains to the distillery, and the processing of rye grains to hydrated ethanol (95%) and DDGS (92% dry matter). System boundary is at the distillery. Dehydration to anhydrous ethanol is not included.

## Geography
Data is from the etha+ project (Alcosuisse, CH), adapted to RER context

## Technology
The process is similar to that of wheat-to-ethanol or yet dry-milling corn-to-ethanol. The production of DDGS from stillage includes separation of draff, concentration, drying and granulation. DDGS are used as animal feed.

## Time period
Data from 2002 to 2006, current technology for the production of ethanol from starch-based feedstocks

## Parameters
- fraction, cooling water, recirculating system, to air: 0.771 dimensionless; name fraction_CW_R_to_air; lognormal variance with pedigree 0.0413, pedigree (2,3,1,3,1)
  Calculated based on literature value (Scown, C.D., 2011, Water Footprint of U.S. Transportation Fuels and supplying information of the article) (Vionnet, S., Quantis Water Database - Technical Report, 2012).
- fraction, cooling water, to air: 0.3875 dimensionless; name fraction_CW_to_air; = (0.5*fraction_CW_OT_to_air)+(0.5*fraction_CW_R_to_air); lognormal variance with pedigree 0.092025, pedigree (4,4,3,2,4)
  Calculated value based on literature value (see comments of the other parametres present in this dataset) and expert opinion. In the case when no industry/literature data are available about the type of cooling or directly fraction, cooling water, to air specific for the process a default assumption is applied. It is assumed that the once-through cooling system is used in 50% of all cases and recirculating system is used in another 50% of all cases.
- fraction, tap water, to air: 0 dimensionless; name fraction_TW_to_air; = fraction_PW_to_air
  Calculated value. See comment in the other parametres present in this dataset. Tap water is considered to be always used as process water, thus process water fractions to air are applied to all tap water input flows to calculate the amount of water consumed in the processes.
- fraction, cooling water, cooling pond system, to air: 0.032 dimensionless; name fraction_CW_CP_to_air; lognormal variance with pedigree 0.0413, pedigree (2,3,1,3,1)
  (same comment as for fraction, cooling water, recirculating system, to air)
- fraction, process water, to air: 0 dimensionless; name fraction_PW_to_air
  Estimated value, expert opinion (Vionnet, S., Quantis Water Database - Technical Report, 2012).
- fraction, cooling water, once-through system, to air: 0.004 dimensionless; name fraction_CW_OT_to_air; lognormal variance with pedigree 0.0413, pedigree (2,3,1,3,1)
  (same comment as for fraction, cooling water, recirculating system, to air)

## Reference product
- Distiller's Dried Grains with Solubles: 1 kg; name BP_amount_1; CPC 23319: Preparations used in animal feeding n.e.c.; By-product classification allocatable product
  production volume 1.41208e7 kg; = RP_PV_1 * (BP_amount_1 / RP_amount_1)
    Production volume of ethanol for use as a fuel was 620 Ml in 2004 in RER
    Calculated from the production volume of ethanol, without water, in 95% solution state, from fermentation in proportion to the respective output amounts.
  property carbon content, non-fossil 0.4885
    Assumed to be like Distillers Grain Corn with Solubles. Composition data obtained from (http://beefmagazine.com/images/2009%20feed%20table.pdf). First, composition data were refered to 1 kg dry mass. Then, C-contents were calculated considering a C-content/dry mass of 46% in carbohydrates (including fibres), 53% in proteins and 75% in fats. All data from "Evolutionary and Biochemical Aspects", A.D. Kay and T. Vrede (in Global Ecology, 2010, Elsevier B.V., S.E. Jørgensen Ed.).
  property price 0.00365 EUR2005
    Temporary price data.The price of ethanol, without water, in 95% solution state, from fermentation is 0.324 Euro (calculated as 90% of purchasers price based on: 2005 prices from FAPRI2007, 2009. Agricultural outlook. (http://www.fapri.missouri.edu/outreach/publications/ag_outlook.asp?current_page=outreach; accessed 22/06/10). Unit conversion from US gallon to kg - 1 gallon = 3.7856 liter * 0.789 kg/liter (ethanol density) = 2.9868 kg). When producing 0.30638kg of ethanol, without water, in 95% solution state, from fermentation, 0.32067kg of Distiller's Dried Grains with Solubles is produced as a by-product. The economic allocation factor in eiv2.2 was 98.837% for ethanol and 1.163% for Distiller's Dried Grains with Solubles. Following this assumption the price of the Distiller's Dried Grains with Solubles is calculated to be ((0.01163*0.324*0.30638)/(0.32067-0.01163*0.32067)=) 0.003643 Euro.
  property carbon content 0.4885
    carbon content on a dry matter basis (reserved; not for manual entry)
  property true value 0.00129181; name BP_amount_1_true_value
    allocation property applied in "true value" allocation // value calculated from revenue
  properties: water in wet mass 0.08 kg, water content 0.0869565, carbon content, fossil 0, dry mass 0.92 kg, wet mass 1 kg, carbon allocation 0.44942 kg
- ethanol, without water, in 95% solution state, from fermentation: 0 kg; name RP_amount_1; CPC 35491: Biodiesel; By-product classification allocatable product; CAS 64-17-5
  EcoSpold01Location=RER
  production volume 1.17197e7 kg; name RP_PV_1; = 3.5451E+07*0.33059
    Estimated. The european production volume is extrapolated from the global production volume using the nominal GDP of 2005 (source: United Nations, http://data.un.org/Glossary.aspx?q=GDP+%28current+US%24%29, accessed 20130726 and 20130312).
  property carbon content, non-fossil 0.521739
    Assumed to be like Distillers Grain Corn with Solubles. Composition data obtained from (http://beefmagazine.com/images/2009%20feed%20table.pdf). First, composition data were refered to 1 kg dry mass. Then, C-contents were calculated considering a C-content/dry mass of 46% in carbohydrates (including fibres), 53% in proteins and 75% in fats. All data from "Evolutionary and Biochemical Aspects", A.D. Kay and T. Vrede (in Global Ecology, 2010, Elsevier B.V., S.E. Jørgensen Ed.).
    C2H6O
  property price 0.324 EUR2005
    Temporary price data. Calculated as 90% of purchasers price based on: 2005 prices from FAPRI2007, 2009. Agricultural outlook. (http://www.fapri.missouri.edu/outreach/publications/ag_outlook.asp?current_page=outreach; accessed 22/06/10). Unit conversion from US gallon to kg - 1 gallon = 3.7856 liter * 0.789 kg/liter (ethanol density) = 2.9868 kg
  property heating value, net 31.58 MJ
    LHV is calculated based on the elemental composition of the substance. Based on the CAS number of the substance (000064-17-5), the chemical formula of the substance is found to be: C2H6O, (PubChem 2020).
    Reference: Kim, S., Chen, J., Cheng, T., Gindulyte, A., He, J., He, S., Li, Q., Shoemaker, B. A., Thiessen, P. A., Yu, B., Zaslavsky, L., Zhang, J., & Bolton, E. E. (2019). PubChem 2019 update: improved access to chemical data. Nucleic acids research, 47(D1), D1102–D1109. https://doi.org/10.1093/nar/gky1033
  property carbon content 0.521739
    carbon content on a dry matter basis (reserved; not for manual entry)
  property true value 0.0951718; name RP_amount_1_true_value
    allocation property applied in "true value" allocation // value calculated from revenue
  properties: dry mass 1 kg, water content 0, carbon content, fossil 0, water in wet mass 0 kg, wet mass 1 kg, carbon allocation 0.521739 kg

## Inputs from technosphere
- ammonium sulfate: 0.000113011 kg; lognormal variance with pedigree 0.0501, pedigree (1,2,5,1,1)
  Etha+ project Alcosuisse, industrial data
  EcoSpold01Location=RER
  Uncertainty: etha+ project Alcosuisse, industrial data
  properties: dry mass 1 kg, wet mass 1 kg
- sulfuric acid: 0.000282526 kg; lognormal variance with pedigree 0.0501, pedigree (1,2,5,1,1)
  EcoSpold01Location=RER
  Etha+ project Alcosuisse, industrial data
  Uncertainty: etha+ project Alcosuisse, industrial data
  properties: dry mass 1 kg, wet mass 1 kg
- rye grain: 0.0378381 kg; lognormal variance with pedigree 0.0501, pedigree (1,2,5,1,1)
  (same comment as for sulfuric acid)
  properties: carbon content, non-fossil 0.465305, water content 0.176471, wet mass 1 kg, dry mass 0.85 kg
  note on carbon content, non-fossil: Assumed to be like Distillers Grain Corn with Solubles. Composition data obtained from (http://beefmagazine.com/images/2009%20feed%20table.pdf). First, composition data were refered to 1 kg dry mass. Then, C-contents were calculated considering a C-content/dry mass of 46% in carbohydrates (including fibres), 53% in proteins and 75% in fats. All data from "Evolutionary and Biochemical Aspects", A.D. Kay and T. Vrede (in Global Ecology, 2010, Elsevier B.V., S.E. Jørgensen Ed.). Composition data obtained from Rye, in (http://www.nal.usda.gov/fnic/foodcomp/search/). First, composition data were refered to 1 kg dry mass. Then, C-contents were calculated considering a C-content/dry mass of 46% in carbohydrates (including fibres), 53% in proteins and 75% in fats. All data from "Evolutionary and Biochemical Aspects", A.D. Kay and T. Vrede (in Global Ecology, 2010, Elsevier B.V., S.E. Jørgensen Ed.).
- wastewater, from residence: -3.3475e-5 m3; name wastewater_output; lognormal variance with pedigree 0.0501, pedigree (1,2,5,1,1)
  Etha+ project Alcosuisse, industrial data
  EcoSpold01Location=CH
  Uncertainty: etha+ project Alcosuisse, industrial data
  production volume 35297.7 m3; = wastewater_output/ RP_amount_1* RP_PV_1
    Calculated from the production volume of ethanol, without water, in 95% solution state, from fermentation in proportion to the respective output amounts.
  property price 0 EUR2005; name wastewater_output_price_EUR2005
  properties: wet mass 1000 kg, carbon content, non-fossil 0.199421, dry mass 0.337476 kg, water content 2962.17
  note on carbon content, non-fossil: Assumed to be like Distillers Grain Corn with Solubles. Composition data obtained from (http://beefmagazine.com/images/2009%20feed%20table.pdf). First, composition data were refered to 1 kg dry mass. Then, C-contents were calculated considering a C-content/dry mass of 46% in carbohydrates (including fibres), 53% in proteins and 75% in fats. All data from "Evolutionary and Biochemical Aspects", A.D. Kay and T. Vrede (in Global Ecology, 2010, Elsevier B.V., S.E. Jørgensen Ed.). 0.0673 kg TOC/m3 (Tab A.17, ecoinvent v2.2 report 13_I). TOC was considered as Total Carbon.
- transport, tractor and trailer, agricultural: 0.000378381 metric ton*km; lognormal variance with pedigree 0.1701, pedigree (1,2,5,1,1)
  EcoSpold01Location=CH
  Etha+ project Alcosuisse, industrial data
  Uncertainty: etha+ project Alcosuisse, industrial data
- soda ash, light, crystalline, heptahydrate: 0.000423787 kg; lognormal variance with pedigree 0.0501, pedigree (1,2,5,1,1)
  (same comment as for sulfuric acid)
  properties: heating value, net 3.43 MJ, dry mass 1 kg, wet mass 1 kg, carbon content, fossil 0.0517241
- electricity, medium voltage: 0.0046242 kWh; lognormal variance with pedigree 0.0501, pedigree (1,2,5,1,1)
  EcoSpold01Location=UCTE
  Etha+ project Alcosuisse, industrial data
  Uncertainty: etha+ project Alcosuisse, industrial data
- ethanol fermentation plant: 5.6042e-12 unit; lognormal variance with pedigree 0.3501, pedigree (1,2,5,1,1)
  (same comment as for wastewater, from residence)
- inorganic nitrogen fertiliser, as N: 0.000113011 kg; lognormal variance with pedigree 0.0501, pedigree (1,2,5,1,1)
  (same comment as for sulfuric acid)
  properties: wet mass 1 kg, dry mass 1 kg
- tap water: 0.0473695 kg; name tap_water_input; lognormal variance with pedigree 0.0501, pedigree (1,2,5,1,1)
  (same comment as for sulfuric acid)
  properties: water content 2962.17, carbon content, fossil 0.00178991, dry mass 0.000337476 kg, wet mass 1 kg
  note on carbon content, fossil: Bicarbonate content is 2.93 mol/m3. CO2 content is 0.1 mol/m3 (ecoinvent v2.2 report 8, Tab 93.1).
- heat, district or industrial, natural gas: 0.156992 MJ; lognormal variance with pedigree 0.0501, pedigree (1,2,5,1,1)
  (same comment as for ammonium sulfate)
  properties: heating value, net 1 MJ

## Inputs from nature
- Carbon dioxide, in air [natural resource, in air]: 0.0162159 kg; lognormal variance with pedigree 0.04, pedigree (1,1,5,1,1)
  Calculation, to close carbon balance
  Uncertainty: Calculation, to close carbon balance
- Water, cooling, unspecified natural origin [natural resource, in water]: 1.42051e-6 m3; name water_cooling_UNO_input
  property water content 9081.65; name water_content
  property wet mass 1000 kg; name WM
  property carbon content, non-fossil 0; name C_content_non_fossil
  property carbon content, fossil 0.0104329; name C_content_fossil
  property water in wet mass 999.89 kg; name WWM
  property dry mass 0.1101 kg; name DM

## Emissions to nature
- Water [water, unspecified]: 1.47646e-5 m3; name water_to_water_unspecified; = (tap_water_input/1000)*(1-fraction_TW_to_air)+water_cooling_UNO_input*(1-fraction_CW_to_air)- (wastewater_output*-1); lognormal variance with pedigree 0.0807, pedigree (2,2,5,1,1)
  Calculated value based on literature values and expert opinion. See comments in the parametres' comment field.
- Carbon dioxide, non-fossil [air, urban air close to ground]: 0.0276233 kg; lognormal variance with pedigree 0.04, pedigree (1,1,5,1,1)
  Calculation, to close carbon balance
  Uncertainty: Calculation, to close carbon balance
- Water [air, unspecified]: 5.50446e-7 m3; name water_to_air_unspecified; = (tap_water_input/1000*fraction_TW_to_air)+(water_cooling_UNO_input*fraction_CW_to_air); lognormal variance with pedigree 0.0807, pedigree (2,2,5,1,1)
  (same comment as for Water)

## Sampling procedure
Data is from the etha+ project (Alcosuisse, CH), technology by French ethanol plant supplier, modelling by ENERS (CH)

## Review by Niels Jungbluth 2006-08-15
Passed.
none

## Review by Emilia Moreno Ruiz 2012-03-19
name change from "Distiller's Dried Grains with Solubles, from rye" to "Distiller's Dried Grains with Solubles"
