# delimbing, with excavator-based processor

Dataset: EcoSpold 2, unit process
Geography: RoW
Time period: 2012-01-01 to 2021-12-31
Technology level: current
Classification: ISIC rev.4 ecoinvent: 0220:Logging
Classification: EcoSpold01Categories: construction processes/machinery
Scenario: Business-as-Usual
System model: Allocation, cut-off by classification
Generated by: [System]
Database: ecoinvent
isCopyrightProtected: true
accessRestrictedTo: 1

## General comment
The inventory refers to 1 productive machine hour (PMH) - referring to the operational time of the machine including breaks up to 15 minutes - for delimbing and sorting with an excavator based processor with a total weight of 20,000 kg, a diesel consumption of 15 - 17 l/PMH, and an engine power of 120 kW
Productivity depends on the specific circumstances of the harvesting operation and is specified in the respective datasets.
The following sources have been consulted for the elaboration and plausibilisation of the dataset:
Anonymous (2004): DIRECTIVE 2004/26/EC OF THE EUROPEAN PARLIAMENT AND OF THE COUNCIL of 21 April 2004 amending Directive 97/68/EC on the approximation of the laws of the Member States relating to measures against the emission of gaseous and particulate pollutants from internal combustion engines to be installed in non-road mobile machinery. Official Journal of the European Union: 30.4.2004
Lambrecht, U., H. Helms, K. Kuller and W. Knörr (2004): Entwicklung eines Modells zur Berechnung der Luftschadstoffemissionen und des Kraftstoffverbrauchs von Verbrennungsmotoren in mobilen Geräten und Maschinen; Endbericht. IFEU - Institut für Energie- und Umweltforschung Heidelberg GmbH, Heidelberg.
Spielmann, M., L. Barreto, V. Erni, F. Frutig and O. Thees (2007): Life cycle assessment of energy wood chip supply chains; a case study of near future supply of forest wood chips in Switzerland (unpublished). Paul Scherrer Institute (PSI), Swiss Federal Institute for Forest, Snow and Landscape Research (WSL), Villigen, Birmensdorf.

## Included activities start
Service beginning with the transport of the machinery to the logging site.

## Included activities end
Includes the input of machinery infrastructure, the input of diesel fuel, lubricants/greases as well as their disposal, and the emissions into air from diesel consumption. Wood is not included in the dataset.

## Geography
Emission profile according to European legislation

## Technology
Average european technology

## Parameters
- share of EURO IIIb: 0.490338 dimensionless; name EURO_IIIb; lognormal variance with pedigree 0.719098, pedigree (1,1,1,1,1)
  assuming that the relevant share of forest machinery belongs to vehicle types tier EURO IIIa and EURO IIIb as define in the Guideline 97/68/EG by the European Commission.
- load factor: 0.5 dimensionless; name LF; lognormal variance with pedigree 0.5526, pedigree (3,3,1,1,1)
  according to Lambrecht 2004
- lifetime of machine, productive machine hours: 17600 hour; name total_PMH; lognormal variance with pedigree 0.5526, pedigree (3,3,1,1,1)
  own estimate based on assumed service life of other forest machinery according to Spielmann et al. 2007
- engine power: 120 kW; name EP; lognormal variance with pedigree 0.5526, pedigree (3,3,1,1,1)
  trader's information for a Doosan DX 210W
- diesel consumption: 16 l/hour; name diesel_consumption; lognormal variance with pedigree 0.592, pedigree (5,4,1,1,1)
  according to Aebiom 2008
- share of EURO IIIa: 0.5 dimensionless; name EURO_IIIa; lognormal variance with pedigree 0.592, pedigree (5,4,1,1,1)
  assuming that the relevant share of foresassuming that the relevant share of forest machinery belongs to vehicle types tier EURO IIIa and EURO IIIb as define in the Guideline 97/68/EG by the European Commission.
- scaling factor: 7.58392 dimensionless; name scaling_factor

## Reference product
- delimbing/sorting, excavator-based processor: 1 hour; = 0.131857918293758 * scaling_factor; CPC 8614: Support and operation services to forestry and logging; By-product classification allocatable product
  Amount was scaled to 1.
  production volume 6.75778e6 hour; name p_harvesting; = 5000*total_PMH/10
    annual production of machinery: 5000 times total productive machine hours
  property price 10.0769 EUR2005
    Calculated based on inputs: The price of the product has been calculated as a sum of the values of the material and energy inputs for this product. This value is therefore a rough estimation. It may underestimate the real price since there are additional expenses when producing any product. These expences can include for example labour costs, treatment of waste materials and profit for the producer. Please consider carefully whether this level of data quality is acceptable for your application.

## Inputs from technosphere
- hydraulic digger: 0.000133333 unit; = 1.75810558411805E-05 * scaling_factor; lognormal variance with pedigree 0.56, pedigree (1,1,4,5,1)
  adjusting the infrastucture input of an exacator or 15 t to 20 t
  Amount was scaled to the amount of reference product.
- diesel, low-sulfur: 0 kg; name m_diesel; source Jirsousek R. 2007; pedigree (1,1,1,1,1)
  conversion of l/PMH to kg/PMH; values for l/PMH range from 8 - 16 l/PMH (see references in "general comments" field)
  Amount was scaled to the amount of reference product.
  property water content 0; name water_content
  property carbon content, fossil 0.865; name C_content_fossil
  property water in wet mass 0 kg; name WWM
  property carbon content, non-fossil 0; name C_content_non_fossil
  properties: dry mass 1 kg, heating value, net 42.8 MJ
- waste mineral oil: -0.569511 kg; name w_mineral_oil; = (0.0750945495562762 * scaling_factor)*-1; source Klvac R. 2003; lognormal variance with pedigree 1.88726, pedigree (1,1,4,5,1)
  hydraulic oil and engine oil/grease; adjusted for water content of waste oil
  Amount was scaled to the amount of reference product.
  production volume 3.84863e6 kg; = w_mineral_oil*p_harvesting
    calculated
  property price 0 EUR2005; name w_mineral_oil_price_EUR2005
  property water content 0.111111; name WC_oil
  property wet mass 1 kg; name w_mineral_oil_WM
  property dry mass 0.9 kg; name DM_oil
  properties: heating value, net 34.7 MJ, carbon content, fossil 0.864444
  note on heating value, net: Value taken from the general comment of the treatment dataset.
- lubricating oil: 0.51256 kg; name m_lubricating_oil; = 0.0675850946006486 * scaling_factor; source Klvac R. 2003; lognormal variance with pedigree 0.0682, pedigree (2,3,5,5,1)
  hydraulic oil and engine oil/grease; estimate based on Klvac et al. (2003); value per l converted to kg; values taken from dataset of harvester
  Amount was scaled to the amount of reference product.
  properties: heating value, net 40.2 MJ, dry mass 1 kg, carbon content, fossil 0.75
  note on heating value, net: Literature value, Source: IPCC 2006, 2006 IPCC Guidelines for National Greenhouse Gas Inventories, Prepared by the National Greenhouse Gas Inventories Programme, Eggleston H.S., Buendia L., Miwa K., Ngara T. and Tanabe K. (eds). Published: IGES, Japan
- transport, freight, lorry 16-32 metric ton, EURO5: 0 metric ton*km; source Spielmann, M. 2007; pedigree (1,1,1,1,1)
  transport of forest machinery calculated for the weight of the machinery, transported over 25 km and 8 productive machine hours (PMH) per day
  Amount was scaled to the amount of reference product.
- diesel, low-sulfur: 0.469047, 0.473513, 0.946711, 0.0314048, 0.212428, 11.3043 kg (6 entries); source Jirsousek R. 2007; lognormal variance with pedigree 0.0113577, pedigree (1,1,4,5,1)
  (same comment as for diesel, low-sulfur)
  properties: dry mass 1 kg, carbon content, fossil 0.865, heating value, net 42.8 MJ
- transport, freight, lorry 16-32 metric ton, EURO5: 9.25192, 53.2481 metric ton*km (2 entries); source Spielmann, M. 2007; lognormal variance with pedigree 0.0696, pedigree (3,3,5,5,1)
  (same comment as for transport, freight, lorry 16-32 metric ton, EURO5)

## Emissions to nature
- Dinitrogen monoxide [air, non-urban air or from high stacks]: 0.00160789 kg; = 0.000212012531410519 * scaling_factor; source Kellenberger D. 2007; lognormal variance with pedigree 0.01, pedigree (1,1,4,5,1)
  value per MJ taken from ecoinvent 2.2 dataset *diesel in building machine" converted to input of diesel as mass
  Amount was scaled to the amount of reference product.
- Nickel [air, non-urban air or from high stacks]: 9.43196e-7 kg; = 1.24367795390385E-07 * scaling_factor; source Kellenberger D. 2007; lognormal variance with pedigree 0.01, pedigree (1,1,4,5,1)
  (same comment as for Dinitrogen monoxide)
- NMVOC, non-methane volatile organic compounds, unspecified origin [air, non-urban air or from high stacks]: 0.0213348 kg; = 0.00281316109523844 * scaling_factor; source Lambrecht U. 2004; lognormal variance with pedigree 0.0116547, pedigree (1,1,4,5,1)
  emission model calculating hourly specific emissions as "engine power x load factor x base emission factor" as proposed by Lambrecht et al. (2004) and applied in Spielmann et al. (2007); values for base emission factors for VOC for vehicle classes EURO IIIa and EURO IIIb are taken from Guideline 97/68/EG, of which 97.6% are assumed to be NMVOC.
  Amount was scaled to the amount of reference product.
- Dioxins, measured as 2,3,7,8-tetrachlorodibenzo-p-dioxin [air, non-urban air or from high stacks]: 8.05167e-13 kg; = 1.06167630211304E-13 * scaling_factor; source Kellenberger D. 2007; lognormal variance with pedigree 0.01, pedigree (1,1,4,5,1)
  (same comment as for Dinitrogen monoxide)
- Methane, fossil [air, non-urban air or from high stacks]: 0.000593619 kg; = 7.82734223106129E-05 * scaling_factor; source Lambrecht U. 2004; lognormal variance with pedigree 0.0100018, pedigree (1,1,4,5,1)
  emission model calculating hourly specific emissions as "engine power x load factor x base emission factor" as proposed by Lambrecht et al. (2004) and applied in Spielmann et al. (2007); values for base emission factors for VOC for mobile machinery classes EURO IIIa and EURO IIIb are taken from European Directive 2004/ 26/EC, of which 2.4% are assumed to be methane.
  Amount was scaled to the amount of reference product.
- Copper [air, non-urban air or from high stacks]: 2.28322e-5 kg; = 3.01061065670626E-06 * scaling_factor; source Kellenberger D. 2007; lognormal variance with pedigree 0.01, pedigree (1,1,4,5,1)
  (same comment as for Dinitrogen monoxide)
- Particulates, > 10 um [air, non-urban air or from high stacks]: 0.000670205 kg; = 8.83718921928906E-05 * scaling_factor; source Lambrecht U. 2004; lognormal variance with pedigree 0.0100021, pedigree (1,1,4,5,1)
  emission model calculating hourly specific emissions as "engine power x load factor x base emission factor" as proposed by Lambrecht et al. (2004) and applied in Spielmann et al. (2007); values for base emission factors for particles for mobile machine classes EURO IIIa and EUROIIIb are taken from European Directive 2004/ 26/EC. The proportional distribution accross particle classes is made based on the ecoinvent v3 dataset "Diesel, burned in building machine/GLO".
  Amount was scaled to the amount of reference product.
- Carbon dioxide, fossil [air, non-urban air or from high stacks]: 41.9198 kg; = 5.52745901148176 * scaling_factor; source Kellenberger D. 2007; lognormal variance with pedigree 0.01, pedigree (1,1,4,5,1)
  calculated from diesel input as 3.113 kg CO2/kg diesel as inventoried in the ecoinvent dataset diesel, burned in building machine
  Amount was scaled to the amount of reference product.
- Cadmium [air, non-urban air or from high stacks]: 1.34578e-7 kg; = 1.77451610496037E-08 * scaling_factor; source Kellenberger D. 2007; lognormal variance with pedigree 0.01, pedigree (1,1,4,5,1)
  (same comment as for Dinitrogen monoxide)
- Particulates, < 2.5 um [air, non-urban air or from high stacks]: 0.0103622 kg; = 0.00136634236401168 * scaling_factor; source Lambrecht U. 2004; lognormal variance with pedigree 0.0105623, pedigree (1,1,4,5,1)
  (same comment as for Particulates, > 10 um)
- Carbon monoxide, fossil [air, non-urban air or from high stacks]: 0.149531 kg; = 0.0197168456106707 * scaling_factor; source Kellenberger D. 2007; lognormal variance with pedigree 0.01, pedigree (1,1,4,5,1)
  (same comment as for Dinitrogen monoxide)
- Benzo(a)pyrene [air, non-urban air or from high stacks]: 4.03159e-7 kg; = 5.31596491272316E-08 * scaling_factor; source Kellenberger D. 2007; lognormal variance with pedigree 0.01, pedigree (1,1,4,5,1)
  (same comment as for Dinitrogen monoxide)
- Zinc [air, non-urban air or from high stacks]: 1.34578e-5 kg; = 1.77451610496037E-06 * scaling_factor; source Kellenberger D. 2007; lognormal variance with pedigree 0.01, pedigree (1,1,4,5,1)
  (same comment as for Dinitrogen monoxide)
- Nitrogen oxides [air, non-urban air or from high stacks]: 0.248211 kg; = 0.0327286387327613 * scaling_factor; source Lambrecht U. 2004; lognormal variance with pedigree 0.39382, pedigree (1,1,4,5,1)
  emission model calculating hourly specific emissions as "engine power x load factor x base emission factor" as proposed by Lambrecht et al. (2004) and applied in Spielmann et al. (2007); values for base emission factors for NOx for mobile machine class EUROIIIb are taken from the European Directive 2004/ 26/EC; for mobile machine class EURO IIIa values for base emission factors for NOx are calculated based on an assumed reduction of VOC emissions as compared to "Tier 2" limit for VOC of 1.0 g/kWh (following Spielmann et al. 2007).
  Amount was scaled to the amount of reference product.
  property dry mass 1 kg; name DM
- Ammonia [air, non-urban air or from high stacks]: 0.000268581 kg; = 3.54144880776279E-05 * scaling_factor; source Kellenberger D. 2007; lognormal variance with pedigree 0.01, pedigree (1,1,4,5,1)
  (same comment as for Dinitrogen monoxide)
- Selenium [air, non-urban air or from high stacks]: 1.34578e-7 kg; = 1.77451610496037E-08 * scaling_factor; source Kellenberger D. 2007; lognormal variance with pedigree 0.01, pedigree (1,1,4,5,1)
  (same comment as for Dinitrogen monoxide)
- Particulates, > 2.5 um, and < 10um [air, non-urban air or from high stacks]: 0.00043678 kg; = 5.75928851261691E-05 * scaling_factor; source Lambrecht U. 2004; lognormal variance with pedigree 0.0100016, pedigree (1,1,4,5,1)
  (same comment as for Particulates, > 10 um)
- PAH, polycyclic aromatic hydrocarbons [air, non-urban air or from high stacks]: 4.51469e-5 kg; = 5.95297069399098E-06 * scaling_factor; source Kellenberger D. 2007; lognormal variance with pedigree 0.01, pedigree (1,1,4,5,1)
  (same comment as for Dinitrogen monoxide)

## Sampling procedure
Material and fuel input from literature sources (see general comments field); air-borne emissions taken from existing dataset on diesel consumption in building machines or - where emission levels beyond applicable European legislation - estimated with emissions model based on emission limits established in European Directive 2004/ 26/EC for non-road mobile machinery types EURO IIIa and IIIb (according to Lambrecht et al 2004 and e.g. applied in Spielmann et al. 2007).
