# methanol production

Dataset: EcoSpold 2, unit process
Geography: GLO
Time period: 1994-01-01 to 2021-12-31
Technology level: current
Classification: ISIC rev.4 ecoinvent: 2011:Manufacture of basic chemicals
Synonyms: Wood spirit; Carbinol; Methyl alcohol; Methylol; Wood alcohol
Scenario: Business-as-Usual
System model: Allocation, cut-off by classification
Share of production covered: 50 %
Generated by: Alex Primas
Published in: Althaus H.-J. 2007
Database: ecoinvent
isCopyrightProtected: true
accessRestrictedTo: 1

## General comment
This dataset represents the production of 1 kg of methanol from natural gas. Methanol (CH3OH) is a clear, colourless, volatile liquid with a faint alcohol-like odour. Methanol is the simplest of the alcohols, having only one carbon atom, and is completely miscible in water. Methanol easily dissolves in other alcohols and chlorinated hydrocarbons, but has limited solubility in diesel fuel, vegetable oils, and aliphatic hydrocarbons.
As of 2000, more than 70% of the methanol produced worldwide is used in chemical syntheses. In order of importance the produced methanol was used as follows:
- Formaldehyde: 34% of production.
- Methyl tert-butyl ether (MTBE): 28% of production.
- Acetic acid: 10% of production.
- Methyl methacrylate (MMA): 3% of production.
- Dimethyl terephthalate (DMT). 2% of production.
Only a small proportion is used for energy production (2% of production), although this use has great potential.
Commercial production of methanol is based on synthesis gas mixtures (carbon monoxide and hydrogen) derived primarily from natural gas.
This dataset represents the production of methanol using the steam reforming process. The inventory is based on data from literature and reports on plant design or efficiency.
References:
Althaus H.-J., Chudacoff M., Hischier R., Jungbluth N., Osses M. and Primas A. (2007) Life Cycle Inventories of Chemicals. ecoinvent report No. 8, v2.0. EMPA Dübendorf, Swiss Centre for Life Cycle Inventories, Dübendorf, CH.

## Included activities start
The activity starts when the raw materials enter the process.

## Included activities end
This activity ends with the production of methanol. The dataset includes the consumption of raw materials and energy, estimated catalyst use, emissions to air and water from the process, as well as the infrastructure use. The use of CO2 is not included and the hydrogen that is produced during the process is assumed to be burned in the furnace.

## Geography
Data from various plants at different locations.

## Technology
For normal methanol synthesis, reforming is performed in one step in a tubular reactor at 850 – 900 °C in order to leave as little methane as possible in the synthesis gas. For large methanol synthesis plants, Lurgi has introduced a two-step combination (combined reforming process) that gives better results. In the primary tubular reformer, lower temperature (ca. 800 °C) but higher pressure (2.5-4.0 MPa instead of 1.5-2.5 MPa) are applied.
More recently, Lurgi developed another two-step gas production scheme. It is based on catalytic autothermal reforming with an adiabatic performer and has economical advantages for very large methanol plants. At locations where no carbon dioxide is available most of the methanol plants are based on the following gas production technologies, depending on their capacities: steam reforming for capacities up to 2000 t d-1 or combined reforming from 1800 to 2500 t d-1 (Ullmann 2001). For the energy and resource flows in this inventory a modern steam reforming process was taken as average technology. To estimate best and worst case values, also values from combined reforming and autothermal reforming were investigated.
Methanol produced using a low pressure steam reforming process (ICI LPM) accounts for approximately 60% of the world capacity (Synetix 2000a). Besides steam reforming, combined reforming has gained importance due to the production of methanol in large plants at remote locations.
The reaction of the steam-reforming route can be formulated for methane, the major constituent of natural gas, as follows:
Synthesis gas preparation:
CH4 + H2O → CO + 3 H2; ΔH = 206 kJ mol-1
CO + H2O → CO2 + H2; ΔH = - 41 kJ mol-1
Methanol synthesis:
CO + 2 H2 → CH3OH; ΔH = -98 kJ mol-1
CO2 + 3 H2 → CH3OH + H2O; ΔH = -58 kJ mol-1
For an average plant the total carbon efficiency is around 75%, 81% for the synthesis gas preparation and 93% for the methanol synthesis (Le Blanc et al. 1994, p. 114). For steam reformers usually a steam to carbon ratio of 3:1 to 3.5:1 is used.
As methanol production is a highly integrated process with a complicated steam system, heat recovery and often also internal electricity production (out of excess steam), there were only data of the efficiency and energy consumption of the total process available. Therefore the process was not divided into a reforming process, a synthesis process and a purification process for estimating the energy and resource flows. Also the energy and resource flows in the methanol production plants are site specific (dependent on the local availability of resources such as CO2, O2, or electricity). In this inventory typical values for a methanol plant using steam-reforming technology were used.
The main resource for methanol production is natural gas, which acts as feedstock and fuel. A natural gas based methanol plant consumes typically 29-37 MJ (LHV) of natural gas per kg of methanol. This gas is needed as feedstock for the produced methanol (20 MJ kg-1 LHV) and also used as fuel for the utilities of the plant.
From the converted feed, 1 kg methanol and 0.06 kg hydrogen is yielded. It was assumed that the purged hydrogen was also burned in the furnace. The only emission to air considered from burning hydrogen is NOX. The energy amount generated is not considered, because the process of the furnace is specified for natural gas as fuel. The NOX emissions of the hydrogen burning were therefore calculated separately.
References:
Althaus H.-J., Chudacoff M., Hischier R., Jungbluth N., Osses M. and Primas A. (2007) Life Cycle Inventories of Chemicals. ecoinvent report No. 8, v2.0. EMPA Dübendorf, Swiss Centre for Life Cycle Inventories, Dübendorf, CH.

## Time period
Time of publications.

## Parameters
- fraction, cooling water, to air: 0.3875 dimensionless; name fraction_CW_to_air; = (0.5*fraction_CW_OT_to_air)+(0.5*fraction_CW_R_to_air); lognormal variance with pedigree 0.092025, pedigree (4,4,3,2,4)
  Calculated value based on literature value (see comments of the other parametres present in this dataset) and expert opinion. In the case when no industry/literature data are available about the type of cooling or directly fraction, cooling water, to air specific for the process a default assumption is applied. It is assumed that the once-through cooling system is used in 50% of all cases and recirculating system is used in another 50% of all cases.
- fraction, cooling water, recirculating system, to air: 0.771 dimensionless; name fraction_CW_R_to_air; lognormal variance with pedigree 0.0413, pedigree (2,3,1,3,1)
  Calculated based on literature value (Scown, C.D., 2011, Water Footprint of U.S. Transportation Fuels and supplying information of the article) (Vionnet, S., Quantis Water Database - Technical Report, 2012).
- fraction, process water, to air: 0.205 dimensionless; name fraction_PW_to_air; lognormal variance with pedigree 0.092025, pedigree (4,4,3,2,4)
  Literature value (Statistics Canada, 2007 & Shaffer, K.H., 2008, Consumptive water use in the Great Lakes Basin, USGS) (Vionnet, S., Quantis Water Database - Technical Report, 2012).
- fraction, cooling water, once-through system, to air: 0.004 dimensionless; name fraction_CW_OT_to_air; lognormal variance with pedigree 0.0413, pedigree (2,3,1,3,1)
  (same comment as for fraction, cooling water, recirculating system, to air)
- fraction, water, deionised, to air: 0.205 dimensionless; name fraction_WDI_to_air; = fraction_PW_to_air; lognormal variance with pedigree 0.092025, pedigree (4,4,3,2,4)
  Calculated value. See comment in the other parametres present in this dataset. Deionised water is considered to be always used as process water, thus process water fractions to air are applied to all deionised water input flows to calculate the amount of water consumed in the processes.
- fraction, cooling water, cooling pond system, to air: 0.032 dimensionless; name fraction_CW_CP_to_air; lognormal variance with pedigree 0.0413, pedigree (2,3,1,3,1)
  (same comment as for fraction, cooling water, recirculating system, to air)

## Reference product
- methanol: 1 kg; name RP; CPC 34139: Other alcohols, phenols, phenol-alcohols, and their halogenated, sulphonated, nitrated or nitrosated derivativ[…]; By-product classification allocatable product; CAS 67-56-1
  Methanol (CH3OH) is a clear, colourless, volatile liquid with a faint alcohol-like odour. Methanol is the simplest of the alcohols, having only one carbon atom, and is completely miscible in water. Methanol easily dissolves in other alcohols and chlorinated hydrocarbons, but has limited solubility in diesel fuel, vegetable oils, and aliphatic hydrocarbons.
  As of 2000, more than 70% of the methanol produced worldwide is used in chemical syntheses. In order of importance the produced methanol was used as follows:
  - Formaldehyde: 34% of production.
  - Methyl tert-butyl ether (MTBE): 28% of production.
  - Acetic acid: 10% of production.
  - Methyl methacrylate (MMA): 3% of production.
  - Dimethyl terephthalate (DMT). 2% of production.
  Only a small proportion is used for energy production (2% of production), although this use has great potential.
  References:
  Althaus H.-J., Chudacoff M., Hischier R., Jungbluth N., Osses M. and Primas A. (2007) Life Cycle Inventories of Chemicals. ecoinvent report No. 8, v2.0. EMPA Dübendorf, Swiss Centre for Life Cycle Inventories, Dübendorf, CH.
  production volume 3.8e10 kg; name RP_PV
    28.2 Mt world wide in 2000
    Average total demand according to http://www.cmaiglobal.com/Marketing/news/WMA07.pdf
  property heating value, net 26.49 MJ
    LHV is calculated based on the elemental composition of the substance. Based on the CAS number of the substance (000067-56-1), the chemical formula of the substance is found to be: CH4O, (PubChem 2020).
    Reference: Kim, S., Chen, J., Cheng, T., Gindulyte, A., He, J., He, S., Li, Q., Shoemaker, B. A., Thiessen, P. A., Yu, B., Zaslavsky, L., Zhang, J., & Bolton, E. E. (2019). PubChem 2019 update: improved access to chemical data. Nucleic acids research, 47(D1), D1102–D1109. https://doi.org/10.1093/nar/gky1033
  property price 0.22 EUR2005
    Calculated value based on data from United Nations Commodity Trade Statistics Database (comtrade.un.org). UN comtrade category: 290511 Methyl alcohol. Using exchange rate of 1EURO = 1.209 USD. Average of price of import into 5 main markets (EU, US, JP, IN and CN).
  property carbon content 0.375
    carbon content on a dry matter basis (reserved; not for manual entry)
  properties: water content 0, carbon content, non-fossil 0, wet mass 1 kg, water in wet mass 0 kg, carbon content, fossil 0.375, dry mass 1 kg, carbon allocation 0.375 kg

## Inputs from technosphere
- natural gas, high pressure: 0.651795 m3; lognormal variance with pedigree 0.04, pedigree (1,1,5,1,1)
  Data from several sources, energy split estim.
  Uncertainty: D
  properties: dry mass 0.84 kg, wet mass 0.84 kg, carbon content, fossil 0.602381, heating value, net 39 MJ, heating value, gross 39 MJ
  note on carbon content, fossil: An average C content of 0.506 kg C/ m3 has been assumed (this average has been calculated using data in Tab 3.5, ecoinvent v2.2 report 6_V
  note on heating value, net: Literature value, Source: United Nations Statistics Division (2018) International Recommendations for Energy Statistics (IRES). Available at: http://unstats.un.org/unsd/statcom/doc11/BG-IRES.pdf.
- zinc: 3e-5 kg; lognormal variance with pedigree 0.2861, pedigree (4,5,5,3,5)
  Estimated from weak data
  Uncertainty: E
  properties: dry mass 1 kg, wet mass 1 kg
- electricity, medium voltage: 0.074 kWh; lognormal variance with pedigree 0.1127, pedigree (3,3,5,3,4)
  Data dependent on technology
  Uncertainty: D
- molybdenum: 1e-5 kg; lognormal variance with pedigree 0.2861, pedigree (4,5,5,3,5)
  Estimated from weak data
  Uncertainty: E
  properties: wet mass 1 kg, dry mass 1 kg
- water, deionised: 0 kg; name water_deionised_input; pedigree (1,1,1,1,1)
  Data dependent on technology
  Uncertainty: D
  properties: wet mass 1 kg
- copper oxide: 9e-5 kg; lognormal variance with pedigree 0.2861, pedigree (4,5,5,3,5)
  Estimated from weak data
  Uncertainty: E
  properties: dry mass 1 kg, wet mass 1 kg
- methanol factory: 3.72e-11 unit; lognormal variance with pedigree 0.3693, pedigree (2,3,5,3,3)
  Data from one several plants used
  Uncertainty: D
- nickel, class 1: 2e-5 kg; lognormal variance with pedigree 0.2861, pedigree (4,5,5,3,5)
  Estimated from weak data
  Uncertainty: E
  properties: dry mass 1 kg, wet mass 1 kg
- aluminium oxide, non-metallurgical: 0 kg; pedigree (1,1,1,1,1)
  Estimated from weak data
  Uncertainty: E
  properties: dry mass 1 kg, wet mass 1 kg
- heat, district or industrial, natural gas: 6.93 MJ; lognormal variance with pedigree 0.0413, pedigree (2,3,5,3,1)
  Data from several sources, energy split estim.
  Uncertainty: D
  properties: heating value, net 1 MJ
- water, deionised: 0.200004, 0.000719965, 0.649276 kg (3 entries); lognormal variance with pedigree 0.1127, pedigree (3,3,5,3,4)
  Data dependent on technology
  Uncertainty: D
- aluminium oxide, non-metallurgical: 0.000205251, 3.47489e-5 kg (2 entries); lognormal variance with pedigree 0.2861, pedigree (4,5,5,3,5)
  Estimated from weak data
  Uncertainty: E

## Inputs from nature
- Water, cooling, unspecified natural origin [natural resource, in water]: 0.00816 m3; name water_cooling_UNO_input; lognormal variance with pedigree 0.1213, pedigree (2,3,5,3,4)
  Data dependent on technology, average used
  Uncertainty: D

## Emissions to nature
- Chloride [water, unspecified]: 2e-6 kg; lognormal variance with pedigree 0.1801, pedigree (3,5,5,3,4)
  Weak data of one source
  Uncertainty: W
- Nitrogen oxides [air, non-urban air or from high stacks]: 0.00015 kg; lognormal variance with pedigree 0.2913, pedigree (2,3,5,3,5)
  Calculated difference, dependent on technology
  Uncertainty: C
- Water [water, unspecified]: 0.00567375 m3; = (water_deionised_input/1000)*(1-fraction_WDI_to_air)+water_cooling_UNO_input*(1-fraction_CW_to_air); lognormal variance with pedigree 0.0807, pedigree (2,2,5,1,1)
  Calculated as a fraction of the input of water. For more details, refer to the mathematical relation and the parameters.
  property wet mass 1000 kg; name WM
  property water in wet mass 1000 kg; name WWM
  property fraction, origin: salt water 0; name fraction_origin_salt_water_Ww
  property fraction, origin: unspecified 0.880899; name fraction_origin_unspecified_Ww
  property fraction, origin: fresh water 0.119101; name fraction_origin_fresh_water_Ww
  property dry mass 0 kg; name DM
  property carbon content, non-fossil 0; name C_content_non_fossil
  property carbon content, fossil 0; name C_content_fossil
- BOD5, Biological Oxygen Demand [water, unspecified]: 0.00018 kg; lognormal variance with pedigree 0.1801, pedigree (3,5,5,3,4)
  Weak data of one source
  Uncertainty: W
- Methanol [water, unspecified]: 3e-5 kg; lognormal variance with pedigree 0.4401, pedigree (3,5,5,3,4)
  Weak data of one source
  Uncertainty: W
- TOC, Total Organic Carbon [water, unspecified]: 0.00024 kg; lognormal variance with pedigree 0.1801, pedigree (3,5,5,3,4)
  Weak data of one source
  Uncertainty: W
- AOX, Adsorbable Organic Halogen as Cl [water, unspecified]: 1e-6 kg; lognormal variance with pedigree 0.1801, pedigree (3,5,5,3,4)
  Weak data of one source
  Uncertainty: W
- Methanol [air, non-urban air or from high stacks]: 0.00053 kg; lognormal variance with pedigree 0.1627, pedigree (2,4,5,3,4)
  Data from one source, current technology
  Uncertainty: D
- Water [air, unspecified]: 0.00333625 m3; = (water_deionised_input/1000*fraction_WDI_to_air)+(water_cooling_UNO_input*fraction_CW_to_air); lognormal variance with pedigree 0.0807, pedigree (2,2,5,1,1)
  (same comment as for Water)
  property fraction, origin: salt water 0; name fraction_origin_salt_water
  property fraction, origin: unspecified 0.947771; name fraction_origin_unspecified
  property fraction, origin: fresh water 0.0522293; name fraction_origin_fresh_water
- Methane, fossil [air, non-urban air or from high stacks]: 0.00098 kg; lognormal variance with pedigree 0.1627, pedigree (2,4,5,3,4)
  Data from one source, current technology
  Uncertainty: D
- Suspended solids, unspecified [water, unspecified]: 2e-5 kg; lognormal variance with pedigree 0.1801, pedigree (3,5,5,3,4)
  Weak data of one source
  Uncertainty: W
- DOC, Dissolved Organic Carbon [water, unspecified]: 0.00024 kg; lognormal variance with pedigree 0.1801, pedigree (3,5,5,3,4)
  Weak data of one source
  Uncertainty: W
- Sulfur dioxide [air, non-urban air or from high stacks]: 1.38e-5 kg; lognormal variance with pedigree 0.2513, pedigree (2,3,5,3,5)
  Calculated difference, dependent on technology
  Uncertainty: C
- Formaldehyde [water, unspecified]: 0.0001 kg; lognormal variance with pedigree 0.4401, pedigree (3,5,5,3,4)
  Weak data of one source
  Uncertainty: W
- Phosphorus [water, unspecified]: 1e-5 kg; lognormal variance with pedigree 0.1801, pedigree (3,5,5,3,4)
  Weak data of one source
  Uncertainty: W
- COD, Chemical Oxygen Demand [water, unspecified]: 0.00049 kg; lognormal variance with pedigree 0.1801, pedigree (3,5,5,3,4)
  Weak data of one source
  Uncertainty: W
- Phenol [water, unspecified]: 1e-5 kg; lognormal variance with pedigree 0.4401, pedigree (3,5,5,3,4)
  Weak data of one source
  Uncertainty: W

## Sampling procedure
Production asessed with mixed data from literature and plant reports on plant design or efficiency. Representativity of the data concerning energy seems good. Representativity concerning the actual average emission levels is much lower. It was assumed that the data cover about 50-60% of the production. About 90% of the worldwide production is from natural gas. 60% of the natural gas operated plants work with the steam reforming process.

## Extrapolations
This dataset has been extrapolated from year 2001 to the year of the calculation (2021). The uncertainty has been adjusted accordingly.

## Review by Gregor Wernet 2017-08-04
This dataset was additionally reviewed in a separate review process by Eric Johnson of Atlantic Consulting as well as Emilia Moreno Ruiz and Gregor Wernet of ecoinvent.
