# fleece production, polyethylene

Dataset: EcoSpold 2, unit process
Geography: RoW
Time period: 1993-01-01 to 2021-12-31
Technology level: current
Classification: ISIC rev.4 ecoinvent: 1399:Manufacture of other textiles n.e.c.
Classification: EcoSpold01Categories: plastics/polymers
Tags: ConvertedDataset
Scenario: Business-as-Usual
System model: Allocation, cut-off by classification
Generated by: Roland Hischier
Published in: Althaus H.-J. 2007
Database: ecoinvent
isCopyrightProtected: true
accessRestrictedTo: 1

## General comment
The functional unit represents 1 kg of fleece out of polyethylene.
[This dataset was already contained in the ecoinvent database version 2. It was not individually updated during the transfer to ecoinvent version 3. Life Cycle Impact Assessment results may still have changed, as they are affected by changes in the supply chain, i.e. in other datasets. This dataset was generated following the ecoinvent quality guidelines for version 2. It may have been subject to central changes described in the ecoinvent version 3 change report (http://www.ecoinvent.org/database/ecoinvent-version-3/reports-of-changes/), and the results of the central updates were reviewed extensively. The changes added e.g. consistent water flows and other information throughout the database. The documentation of this dataset can be found in the ecoinvent reports of version 2, which are still available via the ecoinvent website. The change report linked above covers all central changes that were made during the conversion process.]

## Included activities end
Raw materials and chemicals used for production, transport of materials to manufacturing plant, energy consumption and waste amounts from a company. Infrastructure of the plant as an approximation.

## Geography
data from 1 Swiss company are used for the European average

## Technology
technology used within Europe in the beginning of the 90s

## Time period
time to which data refer

## Parameters
- fraction, cooling water, to air: 0.3875 dimensionless; name fraction_CW_to_air; = (0.5*fraction_CW_OT_to_air)+(0.5*fraction_CW_R_to_air); lognormal variance with pedigree 0.092025, pedigree (4,4,3,2,4)
  Calculated value based on literature value (see comments of the other parametres present in this dataset) and expert opinion. In the case when no industry/literature data are available about the type of cooling or directly fraction, cooling water, to air specific for the process a default assumption is applied. It is assumed that the once-through cooling system is used in 50% of all cases and recirculating system is used in another 50% of all cases.
- fraction, cooling water, recirculating system, to air: 0.771 dimensionless; name fraction_CW_R_to_air; lognormal variance with pedigree 0.0413, pedigree (2,3,1,3,1)
  Calculated based on literature value (Scown, C.D., 2011, Water Footprint of U.S. Transportation Fuels and supplying information of the article) (Vionnet, S., Quantis Water Database - Technical Report, 2012).
- fraction, cooling water, cooling pond system, to air: 0.032 dimensionless; name fraction_CW_CP_to_air; lognormal variance with pedigree 0.0413, pedigree (2,3,1,3,1)
  (same comment as for fraction, cooling water, recirculating system, to air)
- fraction, cooling water, once-through system, to air: 0.004 dimensionless; name fraction_CW_OT_to_air; lognormal variance with pedigree 0.0413, pedigree (2,3,1,3,1)
  (same comment as for fraction, cooling water, recirculating system, to air)

## Reference product
- fleece, polyethylene: 1 kg; CPC 27922: Nonwovens; By-product classification allocatable product
  EcoSpold01Location=RER
  production volume 2.67763 kg
    This is a placeholder value that does not reflect real-world production volumes. This dataset does not currently require a real-world production volume to work in the database framework, and no actual data were collected yet. This has no negative effect on the results of the ecoinvent database.
  property carbon content, fossil 0.857143
    Polyethylene is formed out of a huge amount of ethylene monomers (C2H4) (ecoinvent v2.2 report 11_II). MW=28 g/mol
  property price 0.923 EUR2005
    Produced from 'Polyethylene, HDPE, granulate'. The price is assumed to be 25% higher than the price of 'Polyethylene, HDPE, granulate,'
  property carbon content 0.857143
    carbon content on a dry matter basis (reserved; not for manual entry)
  properties: dry mass 1 kg, wet mass 1 kg, carbon content, non-fossil 0, water in wet mass 0 kg, heating value, net 42.47 MJ, water content 0, carbon allocation 0.857143 kg

## Inputs from technosphere
- cement, unspecified: 0 kg; pedigree (1,1,1,1,1)
  EcoSpold01Location=CH
  Data from 1 Swiss company
  Uncertainty: data from 1 Swiss company
  properties: dry mass 1 kg, wet mass 1 kg
- core board: 0.024 kg; lognormal variance with pedigree 0.0726, pedigree (2,4,5,5,3)
  EcoSpold01Location=RER
  Data from 1 Swiss company
  Uncertainty: data from 1 Swiss company
  properties: water content 0.0582011, carbon content, non-fossil 0.430314, dry mass 0.945 kg, wet mass 1 kg, heating value, net 12.19 MJ
  note on carbon content, non-fossil: Biogenic C content was calculated after biogenic C contents of chemicals used in the production of board (ecoinvent v2.2 report 11_III, part 13). The cellulose content in 1 kg of paper (on a wet mas basis) was estimated as (1-chemical content), C content of cellulose was considered 0.44 kgC/kg dry mass (ecoinvent v2.2 report, n 15a, pg 40)
- electricity, medium voltage: 0 kWh; pedigree (1,1,1,1,1)
  Data from 1 Swiss company
  EcoSpold01Location=UCTE
  Uncertainty: data from 1 Swiss company
- chemical factory, organics: 4e-10 unit; lognormal variance with pedigree 0.588, pedigree (4,5,5,5,5)
  EcoSpold01Location=RER
  Estimation
  Uncertainty: estimation
- heat, district or industrial, natural gas: 0 MJ; pedigree (1,1,1,1,1)
  Data from 1 Swiss company
  EcoSpold01Location=RER
  Uncertainty: data from 1 Swiss company
  properties: heating value, net 1 MJ
- waste polyethylene: 0 kg; pedigree (1,1,1,1,1)
  EcoSpold01Location=CH
  Data from 1 Swiss company
  Uncertainty: data from 1 Swiss company
  production volume 0 kg
    Calculated from the production volume of fleece, polyethylene in proportion to the respective output amounts.
  properties: heating value, net 42.47 MJ, water content 0.00401606, wet mass 1 kg, carbon content, fossil 0.825301, dry mass 0.996 kg
  note on heating value, net: Value taken from the general comment of the treatment dataset.
  note on carbon content, fossil: C content in 1 kg DM was calculated using data in Tab A.1, ecoinvent v2.2 report 13_I
- packaging film, low density polyethylene: 0.023 kg; lognormal variance with pedigree 0.0726, pedigree (2,4,5,5,3)
  EcoSpold01Location=RER
  Data from 1 Swiss company
  Uncertainty: data from 1 Swiss company
  properties: dry mass 1 kg, wet mass 1 kg, carbon content, fossil 0.857143, heating value, net 42.47 MJ
  note on carbon content, fossil: Polyethylene is formed out of a huge amount of ethylene monomers (C2H4) (ecoinvent v2.2 report 11_II). MW=28 g/mol
- polyethylene, high density, granulate: 1.1 kg; lognormal variance with pedigree 0.0726, pedigree (2,4,5,5,3)
  EcoSpold01Location=RER
  Data from 1 Swiss company
  Uncertainty: data from 1 Swiss company
  properties: carbon content, fossil 0.857143, dry mass 1 kg, heating value, net 42.47 MJ, wet mass 1 kg
- chemical, organic: 0.0055 kg; lognormal variance with pedigree 0.0726, pedigree (2,4,5,5,3)
  Data from 1 Swiss company
  EcoSpold01Location=GLO
  Uncertainty: data from 1 Swiss company
  properties: dry mass 1 kg, carbon content, fossil 0.628, wet mass 1 kg, heating value, net 19.03 MJ
  note on carbon content, fossil: This dataset is an unweighted average of 20 organic substances (listed in Tab 88.1, ecoinvent v2.2 report 8, part II), being part of the top100 chemicals included in this database. The C-content has also been calculated as an unweighted average of the C content of the substances composing this dataset.
- cement, unspecified: 2.45804e-5, 1.80035e-6, 5.13158e-6, 0.000116052, 3.41576e-6, 3.75152e-5, 4.53892e-6, 0.000506965 kg (8 entries); lognormal variance with pedigree 0.0726, pedigree (2,4,5,5,3)
  EcoSpold01Location=CH
  Data from 1 Swiss company
  Uncertainty: data from 1 Swiss company
- electricity, medium voltage: 0.00302525, 0.000580112, 0.00973887, 0.141643, 0.0199647, 0.0650479 kWh (6 entries); lognormal variance with pedigree 0.0726, pedigree (2,4,5,5,3)
  Data from 1 Swiss company
  EcoSpold01Location=UCTE
  Uncertainty: data from 1 Swiss company
- heat, district or industrial, natural gas: 0.0338473, 2.19615 MJ (2 entries); lognormal variance with pedigree 0.0726, pedigree (2,4,5,5,3)
  Data from 1 Swiss company
  EcoSpold01Location=RER
  Uncertainty: data from 1 Swiss company
- waste polyethylene: -0.012289, -0.000821102, -6.20986e-5, -0.000339144, -0.000137011, -0.000322049, -0.0860296 kg (7 entries); lognormal variance with pedigree 0.0726, pedigree (2,4,5,5,3)
  EcoSpold01Location=CH
  Data from 1 Swiss company
  Uncertainty: data from 1 Swiss company
  production volume 0.3 kg

## Inputs from nature
- Water, cooling, unspecified natural origin [natural resource, in water]: 0.024 m3; name water_cooling_UNO_input; source Gendorf 2000; lognormal variance with pedigree 0.21, pedigree (5,5,5,5,4)
  Estimation. Data approximated from a large chemical plant site in Germany producing 2.05 Mt a-1 (intermediates included) of different chemicals.
  Uncertainty: estimated with data from a large chem. Plant

## Emissions to nature
- Water [water, unspecified]: 0.0147 m3; name water_to_water_unspecified; lognormal variance with pedigree 0.0827, pedigree (2,2,5,5,1)
  Calculated value based on literature values and expert opinion. See comments in the parametres' comment field.
  property fraction, origin: fresh water 0; name fraction_origin_fresh_water_Ww
  property fraction, origin: salt water 0; name fraction_origin_salt_water_Ww
  property fraction, origin: unspecified 1; name fraction_origin_unspecified_Ww
  property water in wet mass 1000 kg; name WWM
  property dry mass 0 kg; name DM
  property carbon content, non-fossil 0; name C_content_non_fossil
  property carbon content, fossil 0; name C_content_fossil
  property wet mass 1000 kg; name WM
- Hydrocarbons, aliphatic, alkanes, unspecified [air, urban air close to ground]: 0.000275 kg; lognormal variance with pedigree 0.33, pedigree (5,5,5,5,5)
  Estimation
  Uncertainty: estimation
- Water [air, unspecified]: 0.0093 m3; name water_to_air_unspecified; lognormal variance with pedigree 0.0827, pedigree (2,2,5,5,1)
  (same comment as for Water)
  property fraction, origin: unspecified 1; name fraction_origin_unspecified
  property fraction, origin: salt water 0; name fraction_origin_salt_water
  property fraction, origin: fresh water 0; name fraction_origin_fresh_water

## Sampling procedure
Process data based on data from 1 Swiss company, used here as average data for European situation.

## Extrapolations
see geography This dataset has been copied from an original dataset covering the geography RER. The uncertainty has been adjusted accordingly.

## Review by Hans-Jörg Althaus 2003-06-28
passed
