# trichloropropane production

Dataset: EcoSpold 2, unit process
Geography: GLO
Time period: 1987-01-01 to 2021-12-31
Technology level: outdated
Classification: EcoSpold01Categories: chemicals/inorganics
Classification: ISIC rev.4 ecoinvent: 2011:Manufacture of basic chemicals
Synonyms: glycerol trichlorohydrin; propane; allyl trichloride; 1,2,3-trichloro-; trichlorohydrin; TCP
Scenario: Business-as-Usual
System model: Allocation, cut-off by classification
Generated by: Sofia Parada Tur
Published in: Müller, Dieter, J. et al. 1987
Database: ecoinvent
isCopyrightProtected: true
accessRestrictedTo: 1

## General comment
This dataset represents the production of 1,2,3-trichloropropane by means of the reaction of allyl chloride and sulfuryl chloride. The reaction yield is assumed to be 85% based on literature review. The system includes the process with consumption of raw materials, energy and infrastructure. It also includes the emissions to air and water.

## Included activities start
From the reception of trichloropropane and sodium hydride at the factory gate.

## Included activities end
This activity ends with the production of trichloropropane including materials, energy uses, infrastructure and emissions.

## Geography
the chemical reaction is assumed to be valid in a GLO context

## Technology
1,2,3-trichloropropane is prepared by reacting allyl chloride with sulfuryl chloride with and unexpected high yield of 80-90% by conducting the reaction in the presence of catalytically effective amount of amines and/or phosphines as catalysts. For this inventory it is assumed a yield of 85%.
The stoichiometric reaction is as follows: C3H5Cl + SO2Cl2 = C3H5Cl3 + SO2

## Time period
Time of publication.

## Parameters
- fraction, cooling water, recirculating system, to air: 0.771 dimensionless; name fraction_CW_R_to_air; lognormal variance with pedigree 0.0413, pedigree (2,3,1,3,1)
  Calculated based on literature value (Scown, C.D., 2011, Water Footprint of U.S. Transportation Fuels and supplying information of the article) (Vionnet, S., Quantis Water Database - Technical Report, 2012).
- fraction, cooling water, once-through system, to air: 0.004 dimensionless; name fraction_CW_OT_to_air; lognormal variance with pedigree 0.0413, pedigree (2,3,1,3,1)
  (same comment as for fraction, cooling water, recirculating system, to air)
- fraction, cooling water, to air: 0.3875 dimensionless; name fraction_CW_to_air; = (0.5*fraction_CW_OT_to_air)+(0.5*fraction_CW_R_to_air); lognormal variance with pedigree 0.092025, pedigree (4,4,3,2,4)
  Calculated value based on literature value (see comments of the other parametres present in this dataset) and expert opinion. In the case when no industry/literature data are available about the type of cooling or directly fraction, cooling water, to air specific for the process a default assumption is applied. It is assumed that the once-through cooling system is used in 50% of all cases and recirculating system is used in another 50% of all cases.
- fraction, cooling water, cooling pond system, to air: 0.032 dimensionless; name fraction_CW_CP_to_air; lognormal variance with pedigree 0.0413, pedigree (2,3,1,3,1)
  (same comment as for fraction, cooling water, recirculating system, to air)

## Reference product
- sulfur dioxide, liquid: 1 kg; name sulfur_dioxide_output; = (1*(1* sulfur_dioxide_output_MW)/(1* trichloropropane_output_MW)); By-product classification allocatable product; CPC 34210: Hydrogen, nitrogen, oxygen, carbon dioxide and rare gases; inorganic oxygen compounds of non-metals n.e.c.; CAS 7446-09-5; pedigree (1,1,1,1,1)
  Based on stoichiometric equation; yield of 85%.
  production volume 3.67486e6 kg; = trichloropropane_annual_production* sulfur_dioxide_output
    Calculated from production volume of reference product using the relative outputs.
  property price 0.131 EUR2005; name sulfur_dioxide_output_price_EUR2005
    From UN trade database. http://data.un.org/ Import data from the largest economies of the world are used (Brazil, India, USA, China, Japan and EU-27).
  property molecular weight 64.06 g/mol; name sulfur_dioxide_output_MW
  property carbon content 0
    carbon content on a dry matter basis (reserved; not for manual entry)
  property true value 0.0569712; name sulfur_dioxide_output_true_value
    allocation property applied in "true value" allocation // value calculated from revenue
  properties: water content 0, carbon content, fossil 0, carbon content, non-fossil 0, water in wet mass 0 kg, dry mass 1 kg, wet mass 1 kg, carbon allocation 0 kg
- trichloropropane: 0 kg; name trichloropropane_output; By-product classification allocatable product; CPC 341: Basic organic chemicals; CAS 96-18-4
  production volume 8.45e6 kg; name trichloropropane_annual_production; = (5E+7 - 1.62E+7)/4
    According to ATSDR ( http://www.atsdr.cdc.gov/toxprofiles/tp57-c4.pdf ), there are at least 5 production routes for trichloropropane. The main route among them is the epichlorohydrin production.
    No specific production volumes were found for the present reaction, but we know how much is produced as byproduct in its main route (epichlorohydrin production), namely 1.62E+7 kg in year 2005.
    We also know that less than 50,000 metric tons of 1,2,3-trichloropropane are produced worldwide annually (source: DOW). In this inventory we assume 50,000 tonnes as the total annual production.
    It was assumed that the amount not being already produced in the epichlorohydrin production route is distributed equially among the other 4 production routes, being 1 of them the present reaction.
  property price 0.954 EUR2005; name trichloropropane_output_price_EUR2005
    Temporary price data. Calculated as 90% of purchasers price based on: Based on price relationship to epichlorohydrin in Ecoinvent report nr. 17, Table 24.6
  property molecular weight 147.3 g/mol; name trichloropropane_output_MW
  property heating value, net 11.52 MJ
    LHV is calculated based on the elemental composition of the substance. Based on the CAS number of the substance (000096-18-4), the chemical formula of the substance is found to be: C3H5Cl3, (PubChem 2020).
    Reference: Kim, S., Chen, J., Cheng, T., Gindulyte, A., He, J., He, S., Li, Q., Shoemaker, B. A., Thiessen, P. A., Yu, B., Zaslavsky, L., Zhang, J., & Bolton, E. E. (2019). PubChem 2019 update: improved access to chemical data. Nucleic acids research, 47(D1), D1102–D1109. https://doi.org/10.1093/nar/gky1033
  property carbon content 0.246575
    carbon content on a dry matter basis (reserved; not for manual entry)
  property true value 0.954; name trichloropropane_output_true_value
    allocation property applied in "true value" allocation // value calculated from revenue
  properties: carbon content, non-fossil 0, water content 0, dry mass 1 kg, carbon content, fossil 0.246575, water in wet mass 0 kg, wet mass 1 kg, carbon allocation 0.246575 kg

## Inputs from technosphere
- electricity, medium voltage: 0.0431496 kWh; = 0.333* trichloropropane_output; source Gendorf 2000; lognormal variance with pedigree 0.1706, pedigree (4,4,5,1,5)
  Estimation based on Gendorf, 2000
  Uncertainty: Chauvel 1989
- sulfuryl chloride: 0.139684 kg; name sulfuryl_chloride_input; = (1/0.85)*(1*(1* sulfuryl_chloride_input_MW)/(1* trichloropropane_output_MW)); lognormal variance with pedigree 0.0646, pedigree (4,5,5,1,3)
  Based on stoichiometric equation; yield of 85%.
  property molecular weight 134.97 g/mol; name sulfuryl_chloride_input_MW
  properties: dry mass 1 kg, wet mass 1 kg
- heat, district or industrial, natural gas: 0.259157 MJ; = 2* trichloropropane_output; source Gendorf 2000; lognormal variance with pedigree 0.1786, pedigree (4,5,5,5,5)
  Estimation. These values were approximated with data from an large chemical plant site in Germany producing 2.05 Mt a-1 (intermediates included) of different chemicals. The values for the energy consumption per kg of product of this plant (3.2 MJ kg-1) were used as approximation for the energy consumption of the sodium persulfate production. This total energy demand contains a split of 50% natural gas, 38% electricity and 12% steam from external energy sources. For this inventory all energy used for heat or steam was assumed to be natural gas.
  Uncertainty: Estimation
  properties: heating value, net 1 MJ
- allyl chloride: 0 kg; name allyl_chloride_input; pedigree (1,1,1,1,1)
  Based on stoichiometric equation; yield of 85%.
  property carbon content, fossil 0.473684; name allyl_chloride_input_C_content_fossil
  property molecular weight 76.52 g/mol; name allyl_chloride_input_MW
  properties: heating value, net 22.19 MJ, wet mass 1 kg, dry mass 1 kg
- chemical factory, organics: 5.18313e-11 unit; = 4E-10* trichloropropane_output; source Gendorf 2000; lognormal variance with pedigree 0.47, pedigree (4,4,5,1,5)
  Estimation based on Gendorf, 2000
  Uncertainty: Estimation
- allyl chloride: 0.0403163, 0.0388765 kg (2 entries); lognormal variance with pedigree 0.0646, pedigree (4,5,5,1,3)
  Based on stoichiometric equation; yield of 85%.
  properties: heating value, net 22.19 MJ, wet mass 1 kg, dry mass 1 kg, carbon content, fossil 0.473684, molecular weight 76.52 g/mol

## Inputs from nature
- Water, cooling, unspecified natural origin [natural resource, in water]: 0.00310988 m3; name water_cooling_input; = 0.024* trichloropropane_output; source Gendorf 2000; lognormal variance with pedigree 0.1706, pedigree (4,4,5,1,5)
  Data from a large chemical plant in Germany (Gendorf, 2000), calculated based on overal cooling water consumption per kilogram of product. This plant produces several different products.
  Uncertainty: Chauvel 1989

## Emissions to nature
- BOD5, Biological Oxygen Demand [water, surface water]: 2.856e-6 kg; name BOD_emissions_water; = 0.05* COD_emissions_water; lognormal variance with pedigree 0.2106, pedigree (5,5,5,5,5)
  BOD is assumed to be 0.05*COD.
- Allyl chloride [water, unspecified]: 0.00209231 kg; name allyl_chloride_emissions_water; = (((1/0.85)-1)*0.915)*0.1; lognormal variance with pedigree 0.2106, pedigree (5,5,5,5,5)
  The non reacted allyl chloride will leave as emissions to water. It is assumed that 10% of the non reacted allyl chloride will be emitted to the environment in water.
  The formula is:
  mass of allyl chloride to water =( ((1/0.85)-1)*input mass of allyl chloride)*0.1
- COD, Chemical Oxygen Demand [water, surface water]: 5.71201e-5 kg; name COD_emissions_water; = 2.73E-2* allyl_chloride_emissions_water; lognormal variance with pedigree 0.2106, pedigree (5,5,5,5,5)
  The COD is modelled based on the knowledge of molecular structure of acetic acid and ammonium.
- TOC, Total Organic Carbon [water, surface water]: 1.57551e-5 kg; name TOC_emissions_water; = 7.53E-3* allyl_chloride_emissions_water; lognormal variance with pedigree 0.2106, pedigree (5,5,5,5,5)
  The TOC is modelled based on the knowledge of molecular structure of acetic acid and ammonium.
- Water [water, unspecified]: 0.0019048 m3; name water_to_water_unspecified; = water_cooling_input*(1-fraction_CW_to_air); lognormal variance with pedigree 0.130025, pedigree (4,4,5,2,4)
  Calculated value based on literature values and expert opinion. See comments in the parametres' comment field.
  property fraction, origin: salt water 0; name fraction_origin_salt_water_Ww
  property fraction, origin: unspecified 1; name fraction_origin_unspecified_Ww
  property fraction, origin: fresh water 0; name fraction_origin_fresh_water_Ww
- DOC, Dissolved Organic Carbon [water, surface water]: 5.71201e-5 kg; name DOC_emissions_water; = 2.73E-2* allyl_chloride_emissions_water; lognormal variance with pedigree 0.2106, pedigree (5,5,5,5,5)
  (same comment as for COD, Chemical Oxygen Demand)
- Water [air, unspecified]: 0.00120508 m3; name water_to_air_unspecified; = water_cooling_input*fraction_CW_to_air; lognormal variance with pedigree 0.130025, pedigree (4,4,5,2,4)
  (same comment as for Water)
  property fraction, origin: salt water 0; name fraction_origin_salt_water
  property fraction, origin: unspecified 1; name fraction_origin_unspecified
  property fraction, origin: fresh water 0; name fraction_origin_fresh_water
- Carbon dioxide, fossil [air, urban air close to ground]: 0.0218504 kg; name carbon_dioxide_emissions_air; = ((((1/0.85)-1)* allyl_chloride_input) *0.9)* allyl_chloride_input_C_content_fossil*( carbon_dioxide_emissions_air_MW/12); lognormal variance with pedigree 0.216, pedigree (5,5,5,5,5)
  Regarding the 15% non-reacted allyl chloride (reaction yield is 85%), this is assumed to leave the production process with wastewater. It is further assumed that 90% of this wastewater will be treated in internal wastewater treatment. The carbon contained in the removed allyl chloride is accounted as CO2 emissions.
  Furthermore, we assume that none of the allyl chloride used in the reaction will be emitted into the air.
  The equation for calculating CO2 emissions is as follows:
  CO2 emissions = ((((1/0.85)-1)*mass input allyl chloride) - ally chloride emissions to air) * 0.9 * allyl chloride carbon content (fossil) * (molecular weight CO2/molecular weight C)
  property molecular weight 44.01 g/mol; name carbon_dioxide_emissions_air_MW
- Sulfate [water, unspecified]: 0.00175388 kg; name sulfate_emissions_water; = (((1/0.85)-1)* 0.767)*0.1; lognormal variance with pedigree 0.2106, pedigree (5,5,5,5,5)
  The non reacted sulfuryl chloride (15%) will leave the process in the form of chlorine and sulfate as emissions to water. It is further assumed that of the water emissions, 90% will be treated internally and 10% will end up in the environment.
  The input mass of chlorine is calculated based on the molar mass of sulfuryl chloride and chlorine and the input mass of sulfuryl chloride.
  The formula is:
  input mass as sulfur dioxide=( ((1/0.85)-1)*input mass of sulfur dioxide)*0.1
  Calculating the input mass of sulfuryl chloride as sulfur dioxide:
  input mass of sulfur dioxide = mass of sulfuryl chloride*(Molecular mass sulfur dioxide/Molecular mass sulfuryl chloride)*(1 mol sulfur dioxide/1 mol sulfuryl chloride)
  Calculating the output of sulfate from oxidation of sulfur dioxide
  output mass of sulfate= input mass as sulfur dioxide *(Molecular mass sulfate/Molecular mass sulfur dioxide)*(1 mol sulfate/1 mol sulfur dioxide)
- Chlorine [water, unspecified]: 0.00129426 kg; name chlorine_emissions_water; = (((1/0.85)-1)* 0.566)*0.1; lognormal variance with pedigree 0.2106, pedigree (5,5,5,5,5)
  The non reacted sulfuryl chloride (15%) will leave the process in the form of chlorine and sulfate as emissions to water. It is further assumed that of the water emissions, 90% will be treated internally and 10% will end up in the environment.
  The input mass of chlorine is calculated based on the molar mass of sulfuryl chloride and chlorine and the input mass of sulfuryl chloride.
  The formula is:
  mass of chlorine to water =( ((1/0.85)-1)*input mass as chlorine)*0.1
  Calculating the input mass as chlorine:
  input mass as chlorine=input mass of sulfuryl chloride*(Molecular mass chlorine/Molecular mass sulfuryl chloride)*(2 mol chlorine/1 mol SO2Cl2)
  property molecular weight 35.45 g/mol; name mol_weight

## Extrapolations
Energy consumptions and emissions as well as Infrastructure are estimated based on standard values.

## Review by Bo Weidema 2012-02-03
passed

## Review by Eric Johnson 2012-02-03
I'm satisfied with the revisions made by the author.
