# frit production, for cathode ray tube display

Dataset: EcoSpold 2, unit process
Geography: GLO
Time period: 2001-01-01 to 2021-12-31
Technology level: old
Classification: EcoSpold01Categories: electronics/component
Classification: ISIC rev.4 ecoinvent: 2310:Manufacture of glass and glass products
Tags: ConvertedDataset
Scenario: Business-as-Usual
System model: Allocation, cut-off by classification
Generated by: Roland Hischier
Published in: Hischier R. 2007
Database: ecoinvent
isCopyrightProtected: true
accessRestrictedTo: 1

## General comment
This dataset represents the production of 1 kg of frit for cathode ray tube display production. Data represent a typical frit composition, used in the production of cathode ray tubes. Main data about frit composition are taken from literature. All further parts (energy, infrastructure) are estimated, based on other datasets and/or the quality guidelines of the ecoinvent database.
[This dataset was already contained in the ecoinvent database version 2. It was not individually updated during the transfer to ecoinvent version 3. Life Cycle Impact Assessment results may still have changed, as they are affected by changes in the supply chain, i.e. in other datasets. This dataset was generated following the ecoinvent quality guidelines for version 2. It may have been subject to central changes described in the ecoinvent version 3 change report (http://www.ecoinvent.org/database/ecoinvent-version-3/reports-of-changes/), and the results of the central updates were reviewed extensively. The changes added e.g. consistent water flows and other information throughout the database. The documentation of this dataset can be found in the ecoinvent reports of version 2, which are still available via the ecoinvent website. The change report linked above covers all central changes that were made during the conversion process.]

## Included activities start
From reception of raw materials and auxiliaries at the factory gate.

## Included activities end
This dataset includes the material and energy efforts for the production of frit used in the CRT tube production. Estimations for infrastructure of the raw materials are included as well. Emissions to air and water as well as waste are not taken into account.

## Geography
Literature data are used to establish a global valuable dataset

## Technology
Average production composed of: CRT frit, according to literature

## Reference product
- frit, for cathode ray tube display: 1 kg; CPC 35110: Paints and varnishes and related products; By-product classification allocatable product
  EcoSpold01Location=GLO
  Computer monitors or displays are the visual interface between a computer and the user / operator. The CRT technology has been invented by the German physicist Karl Ferdinand Braun in 1897. It is the display technology that has been for a long time used in almost all computer displays, video monitors, televisions, radar displays and oscilloscopes. The CRT technically refers to any electronic vacuum tube employing a focused beam of electrons. Cathode rays work thereby in the form of streams of high speed electrons emitted from the heating of a cathode inside a vacuum tube, at its rear end. The emitted electrons form a beam within the tube due to the voltage difference applied across the two electrodes (the CRT screen typically forms the anode). The beam is then perturbed (deflected), either by a magnetic or an electric field, to trace over ('scan') the inside surface of the screen (anode). The screen is covered with a phosphorescent coating (often transition metals or rare earth elements), which emits visible light when excited by the electrons. Early computer displays used so-called vector monitors, a type of CRT similar to an oscilloscope but typically using magnetic, rather than electrostatic, deflection. Here, the beam traces straight lines between arbitrary points, repeatedly refreshing the display as quickly as possible. Vector displays for computers were limited in that they could display only a shape's outline (advanced vector systems could provide a limited amount of shading), and only a limited amount of crudely-drawn text (the number of shapes and/or textual characters drawn was severely limited, because the speed of refresh was roughly inversely proportional to how many vectors needed to be drawn). Other graphical displays used 'storage tubes'. Such CRTs inherently stored the image, and did not require periodic refreshing. Furthermore, displays for early computers that needed to display more text than was practical by using vectors, or that required high speed for photographic output, used a so-called Charactron CRT. This type incorporates a perforated metal character mask (stencil), which shapes a wide electron beam to form a character on the screen. The system selects a character on the mask using one set of deflection circuits, and selects the position to draw the character at using a second set. The beam is activated briefly to draw the character at that position. Many of these early computer displays used "slow", or long-persistence, phosphors to reduce flicker for the operator. While it reduces eyestrain for relatively static displays, the drawback of long-persistence phosphor is that when the display is changed, it produces a visible afterimage that can take up to several seconds to fade. This makes all these technologies inappropriate for animation, or for real-time dynamic information displays.
  Modern colour tubes use three different phosphors which emit red, green, and blue light respectively. They are packed either in strips or clusters. Such colour CRTs have thus three electron guns, one for each primary colour, arranged either in a straight line or in a triangular configuration (the guns are usually constructed as a single unit). The beam of each gun reaches the dots of exactly one colour; a grille or mask absorbs those electrons that would otherwise hit the wrong phosphor. Since each beam starts at a slightly different location within the tube, and all three beams are perturbed in essentially the same way, a particular deflection charge will cause the beams to hit a slightly different location on the screen (called a 'subpixel'). The so-called dot pitch defines thereby the "native resolution" of such displays. Despite all the advantages that new, flat display technologies seem to have, colour CRTs still find adherents in computer gaming due to their high refresh rates and higher resolution per initial cost. CRT's are also still popular in the printing and broadcasting industries as well as in the profe
  production volume 1 kg
    Dummy value to be replaced by measured, estimated or calculated value
  property carbon content, fossil 0
    Tab. 5.6 gives an overview of the major elements that can be found in a typical frit composition (ecoinvent v2.2 report 18_III-part5)
  property carbon content, non-fossil 0
    (same comment as for frit, for cathode ray tube display)
  property carbon content 0
    carbon content on a dry matter basis (reserved; not for manual entry)
  properties: water content 0, price 0.802 EUR2005, dry mass 1 kg, wet mass 1 kg, water in wet mass 0 kg, carbon allocation 0 kg

## Inputs from technosphere
- heat, district or industrial, natural gas: 9.7284 MJ; lognormal variance with pedigree 0.1387, pedigree (4,3,5,3,4)
  EcoSpold01Location=RER
  Proxy, due to a lack of specific information, energy amount of funnel glass production is used.
  Uncertainty: Estimation, based on funel glass production
  properties: heating value, net 1 MJ
- packaging glass factory: 1.25e-10 unit; lognormal variance with pedigree 0.4381, pedigree (1,5,5,3,4)
  EcoSpold01Location=RER
  Proxy, due to a lack of specific information, the infrastructure module established in the framework of packaging glass is used.
  Uncertainty: Estimation from packaging glass production
- silica sand: 0.02 kg; source Techneglas 2006; lognormal variance with pedigree 0.0506, pedigree (1,3,5,1,1)
  Literature Value.
  EcoSpold01Location=DE
  Uncertainty: Data from Producer
  properties: water content 0.010101, wet mass 1 kg, dry mass 0.99 kg
- electricity, medium voltage: 0.24806 kWh; lognormal variance with pedigree 0.1387, pedigree (4,3,5,3,4)
  EcoSpold01Location=UCTE
  Proxy, due to a lack of specific information, energy amount of funnel glass production is used.
  Uncertainty: Estimation, based on funel glass production
- borax, anhydrous, powder: 0.09 kg; source Techneglas 2006; lognormal variance with pedigree 0.0506, pedigree (1,3,5,1,1)
  Proxy with literature value, to represent boric oxide, borax anhydrous is used.
  EcoSpold01Location=RER
  Uncertainty: Data from Producer
  properties: wet mass 1 kg, dry mass 1 kg
- zinc concentrate: 0.12 kg; source Techneglas 2006; lognormal variance with pedigree 0.0506, pedigree (1,3,5,1,1)
  Proxy with literature value, to represent zinc oxide, zinc concentrate is used.
  EcoSpold01Location=GLO
  Uncertainty: Data from Producer
  properties: wet mass 1 kg, dry mass 1 kg
- barite: 0.02 kg; source Techneglas 2006; lognormal variance with pedigree 0.0506, pedigree (1,3,5,1,1)
  Proxy with literature value, to represent barium oxide, barite is used.
  EcoSpold01Location=RER
  Uncertainty: Data from Producer
  properties: wet mass 1 kg, dry mass 1 kg
- lead: 0.4125 kg; = 0.75*0.55; lognormal variance with pedigree 0.7007, pedigree (1,3,5,3,1)
  Proxy with literature value, to represent lead oxide, lead concentrate is used. The concentration of lead in lead concentrate is 0.55kg/kg.
  Uncertainty: Data from 1 European production site
  properties: wet mass 1 kg, dry mass 1 kg

## Sampling procedure
literature & own estimations

## Extrapolations
This dataset has been extrapolated from year 2007 to the year of the calculation (2021). The uncertainty has been adjusted accordingly.

## Review by Jürgen Sutter 2007-11-08
passed.
