# dehydrogenation of butan-1,4-diol

Dataset: EcoSpold 2, unit process
Geography: RER
Time period: 2000-01-01 to 2021-12-31
Technology level: current
Classification: ISIC rev.4 ecoinvent: 2011:Manufacture of basic chemicals
Classification: EcoSpold01Categories: chemicals/inorganics
Scenario: Business-as-Usual
System model: Allocation, cut-off by classification
Generated by: David FitzGerald
Published in: Sutter, J. 2007
Database: ecoinvent
isCopyrightProtected: true
accessRestrictedTo: 1

## General comment
This data represents the multioutput-process "butane-1,4-diol dehydrogenation." This process delivers the co-products butyrolactone and hydrogen. The raw materials, auxilliaries and energy consumption are modelled with stoichiometric calculations. The emissions are estimated. Infrastructure is included with a default value.
[This dataset is meant to replace the following datasets:]

## Included activities start
From the reception of butane-1,4-diol at the factory gate.

## Included activities end
This activity ends with the production of butyrolacetone and hydrogen via the dehydrogenation of 1 kg of butane-1,4-diol. This dataset includes the input materials, energy uses, infrastructure and emissions.

## Geography
This dataset is copy of the dataset covering the geography GLO. It is assumed to be representative of the production in RER.

## Technology
The Reppe process is the most important process to produce butyrolactone. It involves the endothermic dehydrogenation of 1,4-butanediol in the gas phase. This process is used by BASF, ISP, and Lyondell.
Preheated 1,4-butanediol vapor is introduced into a hot stream of circulating hydrogen and passed at atmospheric pressure through a bed of copper catalyst at temperatures between 180 and 240°C. The yield of butyrolactone is approximately 95 %. The reaction takes place via γ-hydroxybutyraldehyde.
The byproduct hydrogen off-gas requires only simple purification before reuse (e.g., catalytic methanization of carbon monoxide impurities). The crude butyrolactone separated from the recycle gas stream contains small amounts of byproducts, including 1,4-butanediol, butyric acid, and high boilers, from which butyrolactone is separated by distillation.

## Time period
Time of publications.

## Parameters
- fraction, cooling water, once-through system, to air: 0.004 dimensionless; name fraction_CW_OT_to_air; lognormal variance with pedigree 0.0413, pedigree (2,3,1,3,1)
  Calculated based on literature value (Scown, C.D., 2011, Water Footprint of U.S. Transportation Fuels and supplying information of the article) (Vionnet, S., Quantis Water Database - Technical Report, 2012).
- molecular weight, H2: 2.01588 g/mol; name H2_MW
- butyrolactone_MW: 86.0892 g/mol
- fraction, cooling water, cooling pond system, to air: 0.032 dimensionless; name fraction_CW_CP_to_air; lognormal variance with pedigree 0.0413, pedigree (2,3,1,3,1)
  (same comment as for fraction, cooling water, once-through system, to air)
- fraction, cooling water, to air: 0.3875 dimensionless; name fraction_CW_to_air; = (0.5*fraction_CW_OT_to_air)+(0.5*fraction_CW_R_to_air); lognormal variance with pedigree 0.092025, pedigree (4,4,3,2,4)
  Calculated value based on literature value (see comments of the other parametres present in this dataset) and expert opinion. In the case when no industry/literature data are available about the type of cooling or directly fraction, cooling water, to air specific for the process a default assumption is applied. It is assumed that the once-through cooling system is used in 50% of all cases and recirculating system is used in another 50% of all cases.
- yield of dehydrogenation of butan-1,4-diol: 0.952 dimensionless; name butyrolactone_yield
- butan-1,4-diol, molecular weight: 90.121 g/mol; name butandiol_MW
- fraction, cooling water, recirculating system, to air: 0.771 dimensionless; name fraction_CW_R_to_air; lognormal variance with pedigree 0.0413, pedigree (2,3,1,3,1)
  (same comment as for fraction, cooling water, once-through system, to air)

## Reference product
- hydrogen, liquid: 1 kg; name hydrogen_amount; = butyrolactone_amount/ butyrolactone_MW*2* H2_MW; CPC 34210: Hydrogen, nitrogen, oxygen, carbon dioxide and rare gases; inorganic oxygen compounds of non-metals n.e.c.; By-product classification allocatable product; CAS 1333-74-0
  EcoSpold01Location=GLO
  Stoechiometric calculation
  production volume 733395 kg; = RP_PV_1/ butyrolactone_MW*2* H2_MW
    Calculated from output of butyrolactone
  property price 2.68 EUR2005
    Calculated value based on data from United Nations Commodity Trade Statistics Database (comtrade.un.org). UN comtrade category: 280410 Hydrogen. Year 2005. Using exchange rate of 1EURO = 1.209 USD. Average of price of import into 5 main markets (EU, US, JP, IN and CN). Cross reference; Literature (http://www.ttcorp.com/pdf/marketReport.pdf). The price of hydrogen, liquid is 5-10 USD/kg.
  property heating value, net 120.21 MJ
    LHV is calculated based on the elemental composition of the substance. Based on the CAS number of the substance (001333-74-0), the chemical formula of the substance is found to be: H2, (PubChem 2020).
    Reference: Kim, S., Chen, J., Cheng, T., Gindulyte, A., He, J., He, S., Li, Q., Shoemaker, B. A., Thiessen, P. A., Yu, B., Zaslavsky, L., Zhang, J., & Bolton, E. E. (2019). PubChem 2019 update: improved access to chemical data. Nucleic acids research, 47(D1), D1102–D1109. https://doi.org/10.1093/nar/gky1033
  property carbon content 0
    carbon content on a dry matter basis (reserved; not for manual entry)
  property true value 0.125511; name hydrogen_amount_true_value
    allocation property applied in "true value" allocation // value calculated from revenue
  properties: carbon content, non-fossil 0, water content 0, wet mass 1 kg, water in wet mass 0 kg, carbon content, fossil 0, dry mass 1 kg, carbon allocation 0 kg
- butyrolactone: 0 kg; name butyrolactone_amount; CPC 341: Basic organic chemicals; By-product classification allocatable product; CAS 96-48-0
  Butyrolactone is a colorless, slightly hygroscopic liquid having a faint odor. Butyrolactone is miscible in all proportions with water, alcohols, esters, ethers, ketones, and aromatic hydrocarbons. It has limited miscibility with linear and cyclic aliphatic hydrocarbons. It is an excellent solvent for numerous polymers and a selective solvent for lower hydrocarbons.
  Standard-grade butyrolactone is about 99.7 % pure. The main impurities in the Reppe-based process are 1,4-butanediol, butyric acid, and water; in the maleic ester based processes, dimethyl succinate, 4-hydroxybutyl butyl ether, and water. Electronic-grade butyrolactone is about 99.9 % pure and is subject to stringent restrictions regarding the content of specific ions such as Fe ions, Na+, Cl-, NO3-.
  The main use of butyrolactone is as an intermediate in the synthesis of N-methylpyrrolidone (NMP), pyrrolidone, herbicides, growth regulators, and the rubber additive thiodibutyric acid. Butyrolactone is used as a solvent for polymers and as a polymerization catalyst; in hairwave compositions and sun lotions; and in pharmaceuticals. It is also used in printing inks, e.g., for ink-jet printing, as an extractant in the petroleum industry, as a stabilizer for chlorohydrocarbons and phosphorus-based pesticides, and as a nematocide. More recent applications are in the electronics field as a cosolvent for capacitor electrolytes and as a cosolvent for photoresists.
  EcoSpold01Location=GLO
  production volume 1.566e7 kg; name RP_PV_1
    Estimated value. The European production volume is extrapolated from the global production volume based on reports from Cefic (European Chemical Industry Council), and the American Chemistry Council. According to Cefic (2016) the global sales of chemicals in the year 2015 was 3 534 billion euros. The reported share of sales per region are: EU28 14.7%; Other Europe (Switzerland, Norway, Turkey, Russia and Ukraine) 2.7%; NAFTA (US, Canada and Mexico) 16.5%; Latin America 3.8%; China 39.9%; Japan 3.9%; Republic of Korea 3.2%; India 2.2%; Rest of Asia 11.9%; Rest of the World 1.3%, Switzerland 1%. Cefic also reports the US total sales, which amount to 518.7 billion euros out of the global 3 534 billion euros (14.7%). The same share is reported by the American Chemistry Council (2016), according to which the USA sales account for 15% of global sales for the year 2016.
    According to Weissermel and Arpe (2003), the global production volume was 90'000'000 kg in 1999 (data for developed economies only). Since no data were found for the European production, this value was scaled accordingly.
    Reference(s):
    Cefic 2016. Facts and figures 2016 of the European chemical industry. Accessible at: http://www.cefic.org/Facts-and-Figures/Chemicals-Industry-Profile/
    American Chemistry Council 2016. Outlook: U.S. Chemical Industry Continues to Outpace Industrial Output; Accounts for More Than One-Half of Construction Spending by Manufacturing Sector. Accessible at: https://www.americanchemistry.com/Media/PressReleasesTranscripts/ACC-news-releases/US-Chemical-Industry-Continues-to-Outpace-Industrial-Output.html
    Klaus Weissermel, Hans-Jürgen Arpe (2003) Industrial organic chemistry, Wiley.
  property price 18 EUR2005
    Temporary price data. Calculated as 90% of purchasers price based on: ecoinvent v2 report 'Bioenergy', chapter 'Biogas', page 188
  property heating value, net 25.35 MJ
    LHV is calculated based on the elemental composition of the substance. Based on the CAS number of the substance (000096-48-0), the chemical formula of the substance is found to be: C4H6O2, (PubChem 2020).
    Reference: Kim, S., Chen, J., Cheng, T., Gindulyte, A., He, J., He, S., Li, Q., Shoemaker, B. A., Thiessen, P. A., Yu, B., Zaslavsky, L., Zhang, J., & Bolton, E. E. (2019). PubChem 2019 update: improved access to chemical data. Nucleic acids research, 47(D1), D1102–D1109. https://doi.org/10.1093/nar/gky1033
  property carbon content 0.55814
    carbon content on a dry matter basis (reserved; not for manual entry)
  property true value 18; name butyrolactone_amount_true_value
    allocation property applied in "true value" allocation // value calculated from revenue
  properties: water content 0, wet mass 1 kg, water in wet mass 0 kg, carbon content, fossil 0.55814, carbon content, non-fossil 0, dry mass 1 kg, carbon allocation 0.55814 kg

## Inputs from technosphere
- electricity, medium voltage: 0.0522821 kWh; = 3.2*( butyrolactone_amount+ hydrogen_amount)*(1-0.62)/3.6; source Gendorf 2000; lognormal variance with pedigree 0.1786, pedigree (4,5,5,5,5)
  EcoSpold01Location=UCTE
  Estimation. Data from a chemical plant site in Germany production 2.05 Mt a-1 (intermediates included) of different chemicals.
  3.2 MJ per kg produced. 62% assumed to come from natural gas, rest from electricity
  Uncertainty: Estimation
- heat, district or industrial, natural gas: 0.307088 MJ; = 3.2*( butyrolactone_amount+ hydrogen_amount)*0.62; source Gendorf 2000; lognormal variance with pedigree 0.1786, pedigree (4,5,5,5,5)
  Estimation. Data from a chemical plant site in Germany production 2.05 Mt a-1 (intermediates included) of different chemicals.
  3.2 MJ per kg produced. 62% assumed to come from natural gas.
  EcoSpold01Location=RER
  Uncertainty: Estimation
  properties: heating value, net 1 MJ
- butane-1,4-diol: 0.162587 kg; name butanediol_input; = butyrolactone_amount/ butyrolactone_MW* butandiol_MW/ butyrolactone_yield; source Frischknecht R. 2007; lognormal variance with pedigree 0.076, pedigree (4,5,5,1,1)
  Stoichiometric calculation. Calculated with an assumed yield of 95 %
  EcoSpold01Location=RER
  Uncertainty: Stoechiometric calculation
  properties: dry mass 1 kg, wet mass 1 kg, carbon content, fossil 0.533333, heating value, net 29.6 MJ
- chemical factory, organics: 5.91432e-11 unit; lognormal variance with pedigree 0.448, pedigree (4,5,5,5,5)
  EcoSpold01Location=RER
  Estimation. This module assumes a built area of about 4.2 ha, an average output of 50'000 t/a, and plant life of fifty years.;activityLink introduced to establish a direct link to the corresponding regional supply of this product
  Uncertainty: Estimation

## Inputs from nature
- Water, cooling, unspecified natural origin [natural resource, in water]: 0.00371478 m3; name water_cooling_UNO_input; = .024*( butyrolactone_amount+ hydrogen_amount); source Gendorf 2000; lognormal variance with pedigree 0.1786, pedigree (4,5,5,5,5)
  Estimation. Data from a chemical plant site in Germany production 2.05 Mt a-1 (intermediates included) of different chemicals. 24 kg per kg of product.
  Uncertainty: Estimation

## Emissions to nature
- TOC, Total Organic Carbon [water, surface water]: 0.000399216 kg
  Calculation. This data was calculated from the amount of butanediol in the treated waste water assuming a carbon conversion of 96% for COD. The worst case scenario TOC=DOC was used.
  It is assumed that the manufacturing plants are located in an urban/industrial area and consequently the emissions are categorised as emanating in a high population density area.
  Water emissions are assumed to be emitted into rivers.
- BOD5, Biological Oxygen Demand [water, surface water]: 0.00140169 kg
  Calculation. Calculated from the amount butanediol in the treated waste water assuming a carbon conversion of 96% for COD. The worst case scenario BOD=COD was used.
  It is assumed that the manufacturing plants are located in an urban/industrial area and consequently the emissions are categorised as emanating in a high population density area.
  Water emissions are assumed to be emitted into rivers
- DOC, Dissolved Organic Carbon [water, surface water]: 0.000399216 kg
  Calculation. Calculated from the amount butanediol in the treated waste water assuming a carbon conversion of 96% for COD. The worst case scenario BOD=COD was used.
  It is assumed that the manufacturing plants are located in an urban/industrial area and consequently the emissions are categorised as emanating in a high population density area.
  Water emissions are assumed to be emitted into rivers.
- 1,4-Butanediol [air, urban air close to ground]: 0.000325173 kg; name butanediol_output_air; = .002* butanediol_input; lognormal variance with pedigree 0.218, pedigree (4,5,5,5,5)
  Estimation. Air emissions occurring from the purge vent, the distillation vent and fugitive emission sources were estimated to 0.2% of the raw material input.
  It is assumed that the manufacturing plants are located in an urban/industrial area and consequently the emissions are categorised as emanating in a high population density area.
  Uncertainty: Estimation
- Carbon dioxide, fossil [air, unspecified]: 0.00328634 kg; = butanediol_output_water*9/ butandiol_MW*(12+16*2)
  Calculation based on assumptions. What has not left the process is transformed in CO2 by the waste water treatment.
- Water [air, unspecified]: 0.00143948 m3; name water_to_air_unspecified; = (water_cooling_UNO_input*fraction_CW_to_air); lognormal variance with pedigree 0.0807, pedigree (2,2,5,1,1)
  Calculated value based on literature values and expert opinion. See comments in the parametres' comment field.
- 1,4-Butanediol [water, surface water]: 0.000747899 kg; name butanediol_output_water; = ( butanediol_input- butyrolactone_amount/ butyrolactone_MW* butandiol_MW- butanediol_output_air)*.1; lognormal variance with pedigree 0.218, pedigree (4,5,5,5,5)
  Calculation: what has not left the process through fugitive emissions is assumed to leave through waste water. 90% is assumed to be removed by the treatment.
  It is assumed that the manufacturing plants are located in an urban/industrial area and consequently the emissions are categorised as emanating in a high population density area.
  The emissions into water are assumed to be emitted into rivers.
  Uncertainty: Estimation
- Water [water, unspecified]: 0.0022753 m3; name water_to_water_unspecified; = water_cooling_UNO_input*(1-fraction_CW_to_air); lognormal variance with pedigree 0.0807, pedigree (2,2,5,1,1)
  (same comment as for Water)
  property dry mass 0 kg; name DM
  property carbon content, fossil 0; name C_content_fossil
  property water in wet mass 1000 kg; name WWM
  property carbon content, non-fossil 0; name C_content_non_fossil
  property wet mass 1000 kg; name WM
- COD, Chemical Oxygen Demand [water, surface water]: 0.00140169 kg
  Calculation. This data was calculated from the amount of butanediol in the treated waste water assuming a carbon conversion of 96% for COD. The worst case scenario BOD=COD was used.
  It is assumed that the manufacturing plants are located in an urban/industrial area and consequently the emissions are categorised as emanating in a high population density area.
  Water emissions are assumed to be emitted into rivers.

## Sampling procedure
Literature data
