# cocoa bean production, sun-dried

Dataset: EcoSpold 2, unit process
Geography: ID
Time period: 2009-01-01 to 2021-12-31
Technology level: current
Classification: ISIC rev.4 ecoinvent: 0127:Growing of beverage crops
Tags: WFLDB
Scenario: Business-as-Usual
System model: Allocation, cut-off by classification
Generated by: Cecile Guignard
Published in: Nemecek T. 2015
Database: ecoinvent
isCopyrightProtected: true
accessRestrictedTo: 1

## General comment
This dataset represents the production of 1 kg of cocoa beans. The reference flow is the average yield per ha and year, from 2009 - 2012: yield (493 kg/ha) obtained under non-irrigated conditions. The data are representative for cocoa beans production in Indonesia used for the export market. Mineral NPK fertiliser input is 66-88-55 kg/ha. No organic fertilisers are applied. Total active ingredients (a.i.) applied as pesticides amount to 7.7 kg a.i./ha.
The dataset was modelled within the project 'World Food LCA database (WFLDB)'. The aim of this project was to provide inventories of a broad variety of agricultural products and processes and to cover for each product at least 50% of the global export market. The export share of cocoa beans produced in Indonesia amounts to 16 % of the global export (tonnage exported in 2010). The production system regarded in this dataset aimed at representing cocoa beans produced Indonesia for the export market.
PEF-Quality: data quality rating (DQR) = 2.2 (i.e. good quality). This dataset refers to an average situation; for specific situations exchanges might differ substantially due to site specific parameters

## Included activities start
This activity starts with the nursery producing fruit tree seedlings, i.e.grafted young trees to be planted.

## Included activities end
This activity ends with the waste treatment after the clearing of the orchard (rooting up the trees). The dataset includes all activities during a year in the productive phase of the orchard including the establishment phase per year of lifetime (50 years), the clearing of the orchard including waste treatment.
The establishment phase of the orchard includes tree nursery, soil cultivation, planting trees, sowing grass and irrigation. Fertiliser and pesticide use in a year of the establishment phase is assumed to be half of the amount of a year in the productive phase.
The productive phase of the orchard includes fertiliser and pesticide application, harvesting and irrigation. Machine use and infrastructure are excluded as most of the work is assumed to be manual work. Further, direct field emissions and land use change are included. At the end of the productive phase the orchard is cleared by rooting up the trees. On-site fermentation and sun-drying of the cocoa beans are included.
Waste treatment after the clearing of the orchard includes the incineration of tree wood. The inputs of seedlings, fertilisers and pesticides as well as packaging of fertilisers and pesticides are considered. Heavy metal uptake by the crop is considered.

## Technology
Conventional production

## Parameters
- heavyMetalUptakeSwitch: 1 dimensionless
- LUC_crop_specific: 1 dimensionless
  This parameter allows to switch between a 'crop specific' and a 'country specific' approach when calculating the LUC of a crop. By default, the chosen approach is 'crop specific', so the value of the parameter is 1. If you want to apply a 'country specific' approach, turn the parameter to 0.

## Reference product
- cocoa bean: 1 kg; CPC 01640: Cocoa beans; By-product classification allocatable product
  Yield = 493.22 kg/ha
  production volume 7.76727e8 kg
    Source: FAOSTAT. Average, 2009-2012
  property price 1.4 EUR2005
    Calculated value based on data from United Nations Commodity Trade Statistics Database (comtrade.un.org). UN comtrade category: 1801 Cocoa beans, whole or broken, raw or roasted. Year: 2005. Using exchange rate of 1EURO = 1.209 USD. Average of price of import into 5 main markets (EU, US, JP, IN and CN).
  property carbon content, non-fossil 0.535987
    calculation: C-content of components according to ecoinvent report No. 15a. Source of composition: http://www.fao.org/ag/aga/agap/frg/afris/Data/521.HTM.
  property carbon content 0.535987
    carbon content on a dry matter basis (reserved; not for manual entry)
  properties: dry mass 0.94697 kg, carbon content, fossil 0, water in wet mass 0.0530303 kg, wet mass 1 kg, water content 0.056, carbon allocation 0.507563 kg

## Inputs from technosphere
- planting tree: 0.0141924 unit; source FAO 2004; lognormal variance with pedigree 0.124177, pedigree (2,1,4,1,1)
  Literature value or expert estimation (FAO 2004). This is the number of trees per ha (i.e. 350 trees per ha) divided by the lifetime years of the orchard (i.e. 50 years)
- potassium chloride: 0.131601 kg; source FAO 2015; lognormal variance with pedigree 0.124177, pedigree (2,1,4,1,1)
  The exchange has been updated from 'potassium chloride, as K2O' into 'potassium chloride' and therefore its amount has been scaled (multiplied) from 0.0831 kg by 1.5829 kg of 'potassium chloride' per kg of 'potassium chloride, as K2O'. Original comment of the exchange is: Calculated based on literature values or expert estimation: The total amount of nutrient (FAO 2015) multiplied by the country-share of fertiliser type (IFA 2014). See supporting documentation 'WFLDB-Documentation.pdf' chapter 'Fertiliser application' for L3 and L4 data (https://ecoquery.ecoinvent.org/File/Reports).
  Corresponds to 41.0 kg/ha
  properties: dry mass 1 kg, wet mass 1 kg
- potassium sulfate: 0.000415925 kg; source FAO 2015; lognormal variance with pedigree 0.124177, pedigree (2,1,4,1,1)
  The exchange has been updated from 'potassium sulfate, as K2O' into 'potassium sulfate' and therefore its amount has been scaled (multiplied) from 0.0002 kg by 1.85 kg of 'potassium sulfate' per kg of 'potassium sulfate, as K2O'. Original comment of the exchange is: Calculated based on literature values or expert estimation: The total amount of nutrient (FAO 2015) multiplied by the country-share of fertiliser type (IFA 2014). See supporting documentation 'WFLDB-Documentation.pdf' chapter 'Fertiliser application' for L3 and L4 data (https://ecoquery.ecoinvent.org/File/Reports).
  Corresponds to 0.111 kg/ha
  properties: dry mass 1 kg, wet mass 1 kg
- waste wood, untreated: -0.811156 kg; lognormal variance with pedigree 0.124177, pedigree (2,1,4,1,1)
  Wood from trees after 1-2 years of sorrage at the field (20% water) per lifetime year (estimated 50 years in this dataset) of the orchard
  production volume 6.30047e8 kg
    Calculated from the reference product amount and production volume
  properties: wet mass 1 kg, water content 0.25, dry mass 0.8 kg, carbon content, non-fossil 0.48632, heating value, net 13.99 MJ
  note on heating value, net: Value taken from the general comment of the treatment dataset.
- fruit tree seedling, for planting: 0.0141924 unit; source FAO 2004; lognormal variance with pedigree 0.124177, pedigree (2,1,4,1,1)
  Literature value or expert estimation (FAO 2004). This is the number of trees per ha divided by the lifetime years of the orchard.
  properties: dry mass 0.578035 kg, wet mass 1 kg, water content 0.73, carbon content, non-fossil 0.439481
  note on carbon content, non-fossil: calculation: C-content of components according to ecoinvent report No. 15a. Source of composition: https://ndb.nal.usda.gov/ndb/search/. Unspecific seedling used as proxy.
- acetamide-anillide-compound, unspecified: 0.007575 kg; source Ntiamoah, A 2008; lognormal variance with pedigree 0.0138498, pedigree (2,2,4,1,1)
  Literature value or expert estimation (Ntiamoah et al. 2008, Afrane et al. 2011).
  properties: wet mass 1 kg, dry mass 1 kg, carbon content, fossil 0.659175
- packaging, for pesticides: 0.0312801 kg; lognormal variance with pedigree 0.0592, pedigree (4,3,4,5,4)
  Total amount of active substance/s of pesticides needed for the production of cocoa bean is calculated to be circa 1.56E-02 kg. Pesticide/s used in this dataset is/are: 'acetamide-anillide-compound, unspecified', 'copper oxide', 'cyclic N-compound', 'organophosphorus-compound, unspecified'. The total amount of active substance/s is doubled in order to account for the packaging of the dilluted product of pesticide/s that is/are applied. Therefore, 3.13E-02 kg of packaging for pesticides is justified with this exchange.
  properties: dry mass 1 kg, price 0.0642 EUR2005, heating value, net 25.97 MJ, wet mass 1 kg, carbon content, fossil 0.85714
- inorganic phosphorus fertiliser, as P2O5: 0.156571 kg; source FAO 2015; lognormal variance with pedigree 0.124177, pedigree (2,1,4,1,1)
  Calculated based on literature values or expert estimation: The total amount of nutrient (FAO 2015) multiplied by the country-share of fertiliser type (IFA 2014). See supporting documentation 'WFLDB-Documentation.pdf' chapter 'Fertiliser application' for L3 and L4 data (https://ecoquery.ecoinvent.org/File/Reports).
  Corresponds to 77.2 kg P2O5/ha
  properties: dry mass 1 kg, wet mass 1 kg
- packaging, for fertilisers: 0.845464 kg; lognormal variance with pedigree 0.0592, pedigree (4,3,4,5,4)
  Total amount of active substance/s of fertilisers needed for the production of 'cocoa bean' is calculated to be circa 4.23E-01 kg. Fertiliser/s used in this dataset is/are: 'ammonium sulfate, as N', 'nitrogen fertiliser, as N', 'phosphate fertiliser, as P2O5', 'phosphate rock, as P2O5, beneficiated, dry', 'potassium chloride, as K2O', 'potassium fertiliser, as K2O', 'potassium sulfate, as K2O', 'urea, as N'. The total amount of active substance/s is doubled in order to account for the packaging of the dilluted product of fertiliser/s that is/are applied. Therefore, 8.45E-01 kg of packaging for fertilisers is justified with this exchange.
  properties: wet mass 1 kg, price 0.0642 EUR2005, carbon content, fossil 0.825301, dry mass 1 kg, heating value, net 25.01 MJ
  note on carbon content, fossil: Considering a chemical formula (C2H4)n for polyethylene, carbon content-fossil is calculated to be 0.856286 kg of Carbon per kg of dry mass.
- establishing orchard: 0.0141924 unit; source FAO 2004; lognormal variance with pedigree 0.124177, pedigree (2,1,4,1,1)
  (same comment as for fruit tree seedling, for planting)
- transport, tractor and trailer, agricultural: 0.002 metric ton*km; lognormal variance with pedigree 0.162439, pedigree (4,1,4,1,1)
  On-farm transport: Yield (in tonnes) multiplied by the average distance from field to farm. The distance was assumed to be 2 km (proxy).
- land use change, perennial crop: 0.00183042 ha; = 0.00183042050201*LUC_crop_specific+0.000668667126232*(1-LUC_crop_specific)
  Calculated value. Land use change (LUC) combines land transformation areas calculated with the adapted 'Direct Land Use Change Assessment Tool' version 2014 developed by Blonk Consultants and the carbon losses from soil organic carbon (SOC) and vegetation (VEG) as calculated in ecoinvent v3. See 'WFLDB-Guidelines.pdf', available at https://ecoquery.ecoinvent.org/File/Reports.
- ammonium sulfate: 0.00996452 kg; source FAO 2015; lognormal variance with pedigree 0.124177, pedigree (2,1,4,1,1)
  Calculated based on literature values or expert estimation: The total amount of nutrient (FAO 2015) multiplied by the country-share of fertiliser type (IFA 2014). See supporting documentation 'WFLDB-Documentation.pdf' chapter 'Fertiliser application' for L3 and L4 data (https://ecoquery.ecoinvent.org/File/Reports).
  Corresponds to 4.91 kg/ha
  properties: wet mass 1 kg, dry mass 1 kg
- inorganic nitrogen fertiliser, as N: 0.0690769 kg; source FAO 2015; lognormal variance with pedigree 0.124177, pedigree (2,1,4,1,1)
  Calculated based on literature values or expert estimation: The total amount of nutrient (FAO 2015) multiplied by the country-share of fertiliser type (IFA 2014). See supporting documentation 'WFLDB-Documentation.pdf' chapter 'Fertiliser application' for L3 and L4 data (https://ecoquery.ecoinvent.org/File/Reports).
  Corresponds to 34.0 kg N/ha
  properties: wet mass 1 kg, dry mass 1 kg
- copper oxide: 0.007575 kg; source Ntiamoah, A 2008; lognormal variance with pedigree 0.0138498, pedigree (2,2,4,1,1)
  Literature value or expert estimation (Ntiamoah et al. 2008, Afrane et al. 2011).
  properties: wet mass 1 kg, dry mass 1 kg
- urea: 0.115253 kg; source FAO 2015; lognormal variance with pedigree 0.124177, pedigree (2,1,4,1,1)
  The exchange has been updated from 'urea, as N' into 'urea' and therefore its amount has been scaled (multiplied) from 0.0538 kg by 2.1438 kg of 'urea' per kg of 'urea, as N'. Original comment of the exchange is: Calculated based on literature values or expert estimation: The total amount of nutrient (FAO 2015) multiplied by the country-share of fertiliser type (IFA 2014). See supporting documentation 'WFLDB-Documentation.pdf' chapter 'Fertiliser application' for L3 and L4 data (https://ecoquery.ecoinvent.org/File/Reports).
  Corresponds to 26.5 kg/ha
  properties: carbon content, fossil 0.2, wet mass 1 kg, dry mass 1 kg
- organophosphorus-compound, unspecified: 0.000163342 kg; source Ntiamoah, A 2008; lognormal variance with pedigree 0.0138498, pedigree (2,2,4,1,1)
  Literature value or expert estimation (Ntiamoah et al. 2008, Afrane et al. 2011).
  properties: dry mass 1 kg, wet mass 1 kg, carbon content, fossil 0.260898
- cyclic N-compound: 0.000326683 kg; source Ntiamoah, A 2008; lognormal variance with pedigree 0.0138498, pedigree (2,2,4,1,1)
  Literature value or expert estimation (Ntiamoah et al. 2008, Afrane et al. 2011).
  properties: wet mass 1 kg, dry mass 1 kg, carbon content, fossil 0.641962
- phosphate rock, beneficiated: 0.0695367 kg; source FAO 2015; lognormal variance with pedigree 0.124177, pedigree (2,1,4,1,1)
  The exchange has been updated from 'phosphate rock, as P2O5, beneficiated, dry' into 'phosphate rock, beneficiated' and therefore its amount has been scaled (multiplied) from 0.0223 kg by 3.125 kg of 'phosphate rock, beneficiated' per kg of 'phosphate rock, as P2O5, beneficiated, dry'. Original comment of the exchange is: Calculated based on literature values or expert estimation: The total amount of nutrient (FAO 2015) multiplied by the country-share of fertiliser type (IFA 2014). See supporting documentation 'WFLDB-Documentation.pdf' chapter 'Fertiliser application' for L3 and L4 data (https://ecoquery.ecoinvent.org/File/Reports).
  Corresponds to 11.0 kg P2O5/ha
  properties: dry mass 1 kg, wet mass 1 kg
- inorganic potassium fertiliser, as K2O: 0.0277422 kg; source FAO 2015; lognormal variance with pedigree 0.124177, pedigree (2,1,4,1,1)
  Calculated based on literature values or expert estimation: The total amount of nutrient (FAO 2015) multiplied by the country-share of fertiliser type (IFA 2014). See supporting documentation 'WFLDB-Documentation.pdf' chapter 'Fertiliser application' for L3 and L4 data (https://ecoquery.ecoinvent.org/File/Reports).
  properties: wet mass 1 kg, dry mass 1 kg

## Inputs from nature
- Transformation, from permanent crop, irrigated [natural resource, land]: 0.40568 m2; = 10000/493/50
  Calculated value: 10000 m2 divided by the yield and the life time of the perennial crop (50 years).
- Occupation, permanent crop, irrigated [natural resource, land]: 20.3297 m2*year; lognormal variance with pedigree 0.0200616, pedigree (2,1,4,1,1)
  Related to the duration from harvest date of previous crop to harvest date of main crop.
- Transformation, to permanent crop, irrigated [natural resource, land]: 0.40568 m2; = 10000/493/50
  (same comment as for Transformation, from permanent crop, irrigated)
- Carbon dioxide, in air [natural resource, in air]: 1.84206 kg; lognormal variance with pedigree 0.0138498, pedigree (2,2,4,1,1)
  CO2 uptake by biomass
- Energy, gross calorific value, in biomass [natural resource, biotic]: 23.602 MJ; lognormal variance with pedigree 0.0138498, pedigree (2,2,4,1,1)

## Emissions to nature
- Dinitrogen monoxide [air, non-urban air or from high stacks]: 0.00491777 kg; source IPCC 2006; lognormal variance with pedigree 0.124664, pedigree (2,2,4,1,1)
  Calculated value - IPCC (2006). See 'WFLDB-Guidelines.pdf', available at https://ecoquery.ecoinvent.org/File/Reports.
- Zinc, ion [water, ground-]: 3.14707e-5 kg; source Freiermuth R.  2006; lognormal variance with pedigree 0.356938, pedigree (2,2,4,1,1)
  Calculated value - Freiermuth (2006). See 'WFLDB-Guidelines.pdf', available at https://ecoquery.ecoinvent.org/File/Reports.
- Phosphate [water, surface water]: 0.00190102 kg; source Prasuhn V.  2006; lognormal variance with pedigree 0.175866, pedigree (2,2,4,1,1)
  Calculated value - Prasuhn (2006). See 'WFLDB-Guidelines.pdf', available at https://ecoquery.ecoinvent.org/File/Reports.
- Cadmium [soil, agricultural]: 1.20892e-5 kg; = 1.21850289931e-05 + ( - 9.58538258789e-08)*heavyMetalUptakeSwitch; source Freiermuth R.  2006
  Comment on mathematicalRelation:
  1.21850289931e-05 from Calculated value - Freiermuth (2006). See 'WFLDB-Guidelines.pdf', available at https://ecoquery.ecoinvent.org/File/Reports.
  -9.58538258789e-08 from Crop, default, heavy metals uptake model
  Heavy metal uptake can be excluded by setting the parameter heavyMetalUptakeSwitch to zero.
- Chromium [soil, agricultural]: 5.62594e-5 kg; = 5.67738534528e-05 + ( - 5.14480353595e-07)*heavyMetalUptakeSwitch; source Freiermuth R.  2006
  Comment on mathematicalRelation:
  5.67738534528e-05 from Calculated value - Freiermuth (2006). See 'WFLDB-Guidelines.pdf', available at https://ecoquery.ecoinvent.org/File/Reports.
  -5.14480353595e-07 from Crop, default, heavy metals uptake model
  Heavy metal uptake can be excluded by setting the parameter heavyMetalUptakeSwitch to zero.
- Copper [soil, agricultural]: 0.00780486 kg; = 0.00781111877053 + ( - 6.25579789952e-06)*heavyMetalUptakeSwitch; source Freiermuth R.  2006
  Comment on mathematicalRelation:
  0.00781111877053 from Calculated value - Freiermuth (2006). See 'WFLDB-Guidelines.pdf', available at https://ecoquery.ecoinvent.org/File/Reports.
  -6.25579789952e-06 from Crop, default, heavy metals uptake model
  Heavy metal uptake can be excluded by setting the parameter heavyMetalUptakeSwitch to zero.
- Lead [soil, agricultural]: 1.15121e-5 kg; = 1.20226268197e-05 + ( - 5.1048723085e-07)*heavyMetalUptakeSwitch; source Freiermuth R.  2006
  Comment on mathematicalRelation:
  1.20226268197e-05 from Calculated value - Freiermuth (2006). See 'WFLDB-Guidelines.pdf', available at https://ecoquery.ecoinvent.org/File/Reports.
  -5.1048723085e-07 from Crop, default, heavy metals uptake model
  Heavy metal uptake can be excluded by setting the parameter heavyMetalUptakeSwitch to zero.
- Imidacloprid [soil, agricultural]: 0.000166481 kg; lognormal variance with pedigree 0.0447216, pedigree (2,2,4,1,1)
  Calculated value - 100% emission in soil. Amount of pesticides: Ntiamoah and Afrane (2008), type of pesticides: Afrane and Ntiamoah (2011). See 'WFLDB-Guidelines.pdf', available at https://ecoquery.ecoinvent.org/File/Reports.
- Nitrate [water, ground-]: 0.729982 kg; source Faist Emmenegger M. 2009; lognormal variance with pedigree 0.175866, pedigree (2,2,4,1,1)
- Nickel [soil, agricultural]: 1.18153e-5 kg; = 1.28013868051e-05 + ( - 9.86103077734e-07)*heavyMetalUptakeSwitch; source Freiermuth R.  2006
  Comment on mathematicalRelation:
  1.28013868051e-05 from Calculated value - Freiermuth (2006). See 'WFLDB-Guidelines.pdf', available at https://ecoquery.ecoinvent.org/File/Reports.
  -9.86103077734e-07 from Crop, default, heavy metals uptake model
  Heavy metal uptake can be excluded by setting the parameter heavyMetalUptakeSwitch to zero.
- Zinc [soil, agricultural]: 8.7004e-5 kg; = 0.00011723368882 + ( - 3.02297327764e-05)*heavyMetalUptakeSwitch; source Freiermuth R.  2006
  Comment on mathematicalRelation:
  0.00011723368882 from Calculated value - Freiermuth (2006). See 'WFLDB-Guidelines.pdf', available at https://ecoquery.ecoinvent.org/File/Reports.
  Heavy metal uptake can be excluded by setting the parameter heavyMetalUptakeSwitch to zero.
- Phosphate [water, ground-]: 0.000373809 kg; source Prasuhn V.  2006; lognormal variance with pedigree 0.175866, pedigree (2,2,4,1,1)
  (same comment as for Phosphate)
- Cadmium, ion [water, surface water]: 1.1163e-7 kg; source Freiermuth R.  2006; lognormal variance with pedigree 0.356938, pedigree (2,2,4,1,1)
  (same comment as for Zinc, ion)
- Chromium, ion [water, surface water]: 1.0237e-5 kg; source Freiermuth R.  2006; lognormal variance with pedigree 0.356938, pedigree (2,2,4,1,1)
  (same comment as for Zinc, ion)
- Metalaxyl-M [soil, agricultural]: 0.00772057 kg; lognormal variance with pedigree 0.0447216, pedigree (2,2,4,1,1)
  (same comment as for Imidacloprid)
- Copper, ion [water, surface water]: 1.58763e-5 kg; source Freiermuth R.  2006; lognormal variance with pedigree 0.356938, pedigree (2,2,4,1,1)
  (same comment as for Zinc, ion)
- Mercury [soil, agricultural]: 8.14061e-8 kg; = 1.19691010097e-07 + ( - 3.82848903126e-08)*heavyMetalUptakeSwitch; source Freiermuth R.  2006
  Comment on mathematicalRelation:
  1.19691010097e-07 from Calculated value - Freiermuth (2006). See 'WFLDB-Guidelines.pdf', available at https://ecoquery.ecoinvent.org/File/Reports.
  Heavy metal uptake can be excluded by setting the parameter heavyMetalUptakeSwitch to zero.
- Lead [water, surface water]: 2.89708e-6 kg; source Freiermuth R.  2006; lognormal variance with pedigree 0.356938, pedigree (2,2,4,1,1)
  (same comment as for Zinc, ion)
- Mercury [water, surface water]: 1.80445e-8 kg; source Freiermuth R.  2006; lognormal variance with pedigree 0.356938, pedigree (2,2,4,1,1)
  (same comment as for Zinc, ion)
- Nickel, ion [water, surface water]: 6.36349e-6 kg; source Freiermuth R.  2006; lognormal variance with pedigree 0.356938, pedigree (2,2,4,1,1)
  (same comment as for Zinc, ion)
- Pirimiphos methyl [soil, agricultural]: 0.000166481 kg; lognormal variance with pedigree 0.0447216, pedigree (2,2,4,1,1)
  (same comment as for Imidacloprid)
- Zinc, ion [water, surface water]: 1.33425e-5 kg; source Freiermuth R.  2006; lognormal variance with pedigree 0.356938, pedigree (2,2,4,1,1)
  (same comment as for Zinc, ion)
- Phosphorus [water, surface water]: 0.00027065 kg; source Prasuhn V.  2006; lognormal variance with pedigree 0.175866, pedigree (2,2,4,1,1)
  Calculated value - Prasuhn (2006) and SQCB-Erosion. See 'WFLDB-Guidelines.pdf', available at https://ecoquery.ecoinvent.org/File/Reports.
- Cadmium, ion [water, ground-]: 9.12047e-8 kg; source Freiermuth R.  2006; lognormal variance with pedigree 0.356938, pedigree (2,2,4,1,1)
  (same comment as for Zinc, ion)
- Chromium, ion [water, ground-]: 4.03207e-5 kg; source Freiermuth R.  2006; lognormal variance with pedigree 0.356938, pedigree (2,2,4,1,1)
  (same comment as for Zinc, ion)
- Thiamethoxam [soil, agricultural]: 0.000166481 kg; lognormal variance with pedigree 0.0447216, pedigree (2,2,4,1,1)
  (same comment as for Imidacloprid)
- Copper, ion [water, ground-]: 7.31418e-6 kg; source Freiermuth R.  2006; lognormal variance with pedigree 0.356938, pedigree (2,2,4,1,1)
  (same comment as for Zinc, ion)
- Carbon dioxide, fossil [air, non-urban air or from high stacks]: 0.126605 kg; lognormal variance with pedigree 0.0138498, pedigree (2,2,4,1,1)
  Calculated value - CO2 emissions from urea and lime. See 'WFLDB-Guidelines.pdf', available at https://ecoquery.ecoinvent.org/File/Reports.
- Lead [water, ground-]: 3.50209e-7 kg; source Freiermuth R.  2006; lognormal variance with pedigree 0.356938, pedigree (2,2,4,1,1)
  (same comment as for Zinc, ion)
- Ammonia [air, non-urban air or from high stacks]: 0.0209075 kg; source EEA 2013; lognormal variance with pedigree 0.0447216, pedigree (2,2,4,1,1)
  Calculated value - EMEP/EEA (2013). See 'WFLDB-Guidelines.pdf', available at https://ecoquery.ecoinvent.org/File/Reports.
- Mercury [water, ground-]: 2.61141e-9 kg; source Freiermuth R.  2006; lognormal variance with pedigree 0.356938, pedigree (2,2,4,1,1)
  (same comment as for Zinc, ion)
- Nitrogen oxides [air, non-urban air or from high stacks]: 0.0052362 kg; source EEA 2013; lognormal variance with pedigree 0.124664, pedigree (2,2,4,1,1)
  Calculated value - EEA/EMEP (2013). See 'WFLDB-Guidelines.pdf', available at https://ecoquery.ecoinvent.org/File/Reports.
- Nickel, ion [water, ground-]: 3.20364e-10 kg; source Freiermuth R.  2006; lognormal variance with pedigree 0.356938, pedigree (2,2,4,1,1)
  (same comment as for Zinc, ion)

## Sampling procedure
WFLDB Methodological Guidelines for the Life Cycle Inventory of Agricultural Products in the latest version, available at: https://ecoquery.ecoinvent.org/File/Reports. Data sources: Data were categorised from level 0 (L0) to level (L4) as follows: L0 = estimate, proxy; L1 = statistical data (e.g. FAOSTAT); L2 = L1 adapted to crop and country; L3 = literature data or L1 resp. L2 data approved by experts; medium detailing (i.e. kg of total N-fertiliser); L4 = L3 data of high detailing (i.e. portion N-fertiliser types).In this dataset data were obtained for yield: L3; Fertilisers: L4; Pesticides: L1; Machinery: L0; Irrigation: L2. For information regarding the calculation of individual exchanges see supporting documentation WFLDB-Documentation.pdf

## Extrapolations
This dataset has been extrapolated from year 2012 to the year of the calculation (2021). The uncertainty has been adjusted accordingly.

## Review by Assumpció ANTON 2016-05-30
Be aware that the use of statistics in input calculations could provide some specific inputs not common for specific crops, this should be corrected if better information is available and better reflexed in DQR . Currently, I would dissent for some of good marks provided, being a revision of criteria applied advisable.

Pesticides will need to be amended periodically checking for update of pesticides' ban.
