# treatment of aluminium in car shredder residue, municipal incineration with fly ash extraction

Dataset: EcoSpold 2, unit process
Geography: CH
Time period: 2006-01-01 to 2021-12-31
Technology level: current
Classification: ISIC rev.4 ecoinvent: 3821:Treatment and disposal of non-hazardous waste
Synonyms: municipal waste incineration; Siedlungsabfallverbrennung; Kehrichtverbrennung
Scenario: Business-as-Usual
System model: Allocation, cut-off by classification
Share of production covered: 100 %
Generated by: Gabor Doka
Published in: Doka G. 2015
Database: ecoinvent
isCopyrightProtected: true
accessRestrictedTo: 1

## General comment
This dataset represents the activity of waste disposal of aluminium in car shredder residue in a municipal solid waste incinerator (MSWI) // Recommended use of this dataset: For disposal of rather fine or dusty aluminium, which goes to incineration as part of Automotive Shredder Residue (ASR). Due to fine grain size of the particles, 50% burnability is assumed, therefore not suited for less fine aluminium parts in waste. Pure, isolated aluminium fractions will not be disposed in incinerators, but rather go to recycling. // Inventoried waste contains 50% Al in ASR burnable; 50% Al in ASR inert; . // Waste composition (wet, in ppm): H2O n.a.; O n.a.; H n.a.; C n.a.; S n.a.; N n.a.; P n.a.; B n.a.; Cl 4825; Br n.a.; F n.a.; I n.a.; Ag n.a.; As n.a.; Ba n.a.; Cd 3; Co n.a.; Cr n.a.; Cu 8.5; Hg n.a.; Mn n.a.; Mo n.a.; Ni n.a.; Pb 25.5; Sb n.a.; Se n.a.; Sn n.a.; V n.a.; Zn 29; Be n.a.; Sc n.a.; Sr n.a.; Ti n.a.; Tl n.a.; W n.a.; Si n.a.; Fe n.a.; Ca n.a.; Al 995110; K n.a.; Mg n.a.; Na n.a.; // Share of carbon in waste that is biogenic 60.4%. // Share of metals in waste not oxidised and bulk-recyclable (exclude very small or thin parts) Iron: 0%; Alu: 50%; Copper: 0%. // Recovery of metal scrap from bottom ash to recycling: 0g iron scrap, 140.35g aluminium scrap, 0g copper scrap. From this waste, the FLUWA process in the technology mix recovers 0.000153kg (DM) of a hydroxide sludge to be recycled in zinc furnaces. // Ultimately one kg of this waste produces 1.501 kg of bottom ash (can include some washed ash) and 0.09173 kg of residues, which are landfilled (technology mix). Additional solidification of residues with 0.03669 kg of cement.Net energy production: 0MJ/kg electric energy and 0MJ/kg thermal energy. //

## Included activities start
waste incineration from waste reception gate and delivery into waste bunker at incinerator plant site (without transports to the incinerator)

## Included activities end
Waste-specific short-term emissions to water from leachate. Long-term emissions from landfill to ground water.

## Geography
Specific to the technology mix encountered in Switzerland in 2012.

## Technology
average Swiss MSWI plants in 2010 (grate incinerators) with electrostatic precipitator for fly ash (ESP), wet flue gas scrubber and 25% SNCR , 42.77% SCR-high dust , 32.68% SCR-low dust -DeNOx facilities and 0% without Denox (weighted according to mass of burnt waste, representing Swiss average). Efficiency of iron scrap separation from slag : 58%. Efficiency of non-ferrous scrap separation from slag : 31%. The technology mix for this dataset includes a filter ash treatment (FLUWA) of a share of 46.22%. Gross electric efficiency technology mix 15.84% and Gross thermal efficiency technology mix 28.51%

## Time period
Waste composition as given in literature reference, theoretical data or other source. Transfer coefficients for modern MSWI.

## Reference product
- aluminium in car shredder residue: -1 kg; CPC 39363: Waste and scrap of aluminium; By-product classification Waste; CAS 7429-90-5
  Main reference product of this activity (supply of disposal service).
  production volume 97082 kg
    based on corresponding global production volume of MSW fraction in conventional MSWI (wo fly ash extraction) and scaled down to annual Swiss incinerated MSW mass of 3.02 mio. tonnes.
  property price 0 EUR2005
    Waste products are assigned a price of zero as they are assumed to require further treatment.
  properties: wet mass 1 kg, chlorine content 0.004825, cadmium content 3e-6, dry mass 1 kg, aluminium content 0.99511, lead content 2.55e-5, copper content 8.5e-6, zinc content 2.9e-5

## By-products
- metalliferous hydroxide sludge: 0 kg; By-product classification Recyclable; CPC 1429: Other non-ferrous metal ores and concentrates (other than uranium or thorium ores and concentrates); pedigree (1,1,1,1,1)
  Metalliferous hydroxide sludge from filter ash leaching (FLUWA).
  Uncertainty: uncertainty is calculated from uncertainties in waste composition and transfer coefficients to filter ash in incinerator and the uncertainty of the transfer coefficients of the FLUWA process.
  production volume 0 kg
    calculated in proportion to reference product waste input to incinerator
  property price 0.0042 EUR2005
    World market value of manure, deflated with barley world market price and consumer price index, based on [http://www.gov.pe.ca/photos/original/af_NM_manconv.pdf].
  property heating value, net 0 MJ
    Non combustible products are assumed to have an LHV equal to zero (0).
  properties: water in wet mass 0.75 kg, water content 3, wet mass 1 kg, dry mass 0.25 kg, lead content 0.0015015, aluminium content 0.22396, zinc content 0.016682, oxygen content 0.37511, cadmium content 0.0033338, copper content 1.1518e-5, chlorine content 0.3794
- aluminium scrap, post-consumer, prepared for melting: 0 kg; By-product classification Recyclable; CPC 39363: Waste and scrap of aluminium; pedigree (1,1,1,1,1)
  Aluminium scrap recovered from this waste.
  Uncertainty: uncertainty calculated from uncertainty in waste composition, uncertainty of share of recyclable metal, uncertainty of transfer coefficient to bottom ash, uncertainty of the efficiency of scrap removal in MSWI plant.
  production volume 0 kg
    calculated in proportion to reference product waste input to incinerator
  property price 0.806 EUR2005
    Temporary price data. Calculated as 90% of purchasers price based on: 2005 import and export prices (total trades (USD) divided by total weight (kg) in biggest economies of the world: EU27, USA, Brasil, China, India, Japan and Russia) from UN Commodity Trade Statistics Database (http://data.un.org/Explorer.aspxDatabase [Accessed 2011.06.17]). Commodity: Waste or scrap, aluminium
  property carbon content 0
    carbon content on a dry matter basis (reserved; not for manual entry)
  properties: carbon content, non-fossil 0, water in wet mass 0 kg, wet mass 1 kg, carbon content, fossil 0, dry mass 1 kg, water content 0, carbon allocation 0 kg

## Inputs from technosphere
- sodium hydroxide, without water, in 50% solution state: 0.0021363 kg; lognormal variance with pedigree 0.020999, pedigree (1,1,4,1,1)
  Auxilliary inputs for the flue gas treatment stage of the incinerator plant, and partially in the filter ash treatment (FLUWA).
  Uncertainty: uncertainty calculated from uncertainty in average NaOH input, of transfer coefficients in the incinerator, and the uncertainty of the waste composition of this waste
  properties: wet mass 1 kg, dry mass 1 kg, heating value, net 3.03 MJ
- process-specific burdens, residual material landfill: 0.18288 kg; lognormal variance with pedigree 0.00864249, pedigree (1,1,4,1,1)
  Mass-specific expenditures required for landfilling of incineration residues.;activityLink introduced to establish a direct link to the corresponding regional supply of this product
  Uncertainty: uncertainty is calculated from uncertainties in waste composition and transfer coefficients in incinerator
- ammonia, anhydrous, liquid: 0.0002881 kg; lognormal variance with pedigree 0.16475, pedigree (1,1,4,1,1)
  Input to DeNOx stage (100% NH3).
  Uncertainty: uncertainty calculated from uncertainty in average DeNOx input, uncertainty in the share of thermal NOx, uncertainty of nitrogen content in average municipal waste and the uncertainty in nitrogen content in *this* waste.
  properties: wet mass 1 kg, dry mass 1 kg
- electricity, for reuse in municipal waste incineration only: 0.098389 kWh; name E_el_prod_MSWI; lognormal variance with pedigree 0.00859512, pedigree (1,1,4,1,1)
  Net electricity required to incinerate this waste (subsidiesed from high-calorific waste fractions).
  Uncertainty: uncertainty is calculated from uncertainties in waste composition and uncertainties in energy efficiency and the uncertainty in internal energy demand
- waste cement, hydrated: -0.091729 kg; lognormal variance with pedigree 0.0177265, pedigree (1,1,4,1,1)
  Hydrated cement output for solidification of landfilled residual material.
  Uncertainty: Uncertainty calculated from uncertainty of the waste composition of this waste and transfer coefficients in the incinerator and of the solidification recipe.
  production volume 8905.2 kg
    calculated in proportion to reference product waste input to incinerator
  properties: dry mass 1 kg, wet mass 1 kg
- heat, for reuse in municipal waste incineration only: 0.40001 MJ; name E_th_prod_MSWI; lognormal variance with pedigree 0.00859512, pedigree (1,1,4,1,1)
  Net heat required to incinerate this waste (subsidiesed from high-calorific waste fractions).
  Uncertainty: uncertainty is calculated from uncertainties in waste composition and uncertainties in energy efficiency and the uncertainty in internal energy demand
- cement, unspecified: 0.036692 kg; lognormal variance with pedigree 0.0177265, pedigree (1,1,4,1,1)
  Cement required for solidification of landfilled residual material.
  Uncertainty: Uncertainty calculated from uncertainty of the waste composition of this waste, of transfer coefficients in the incinerator and of the solidification recipe.
  properties: wet mass 1 kg, dry mass 1 kg
- residual material landfill: 3.8101e-10 unit; lognormal variance with pedigree 0.00864249, pedigree (1,1,4,1,1)
  Landfill infrastructure required for landfilling of incineration residues.
  Uncertainty: uncertainty is calculated from uncertainties in waste composition and transfer coefficients in incinerator
- hydrogen peroxide, without water, in 50% solution state: 0.0066302 kg; lognormal variance with pedigree 0.0102953, pedigree (1,1,4,1,1)
  Auxilliary oxidising agent for filter ash treatment (FLUWA).
  Uncertainty: uncertainty calculated from uncertainty in of transfer coefficients in the incinerator, and the uncertainty of the waste composition of this waste
  properties: heating value, net 7.13 MJ, wet mass 1 kg, dry mass 1 kg
- chemical, inorganic: 4.8084e-5 kg; lognormal variance with pedigree 0.34468, pedigree (1,1,4,1,1)
  Auxilliary inputs for the wastewater treatment stage of the incinerator plant. Proxy for Polyelectrolyte.
  Uncertainty: uncertainty calculated from uncertainty in average Polyelectrolyte input, of transfer coefficients in the incinerator, and the uncertainty of the waste composition of this waste
  properties: dry mass 1 kg, carbon content, fossil 0.003, wet mass 1 kg
- chromium oxide, flakes: 3.6837e-7 kg; lognormal variance with pedigree 0.52151, pedigree (1,1,4,1,1)
  Input to DeNOx stage. Active component in SCR catalyst (vanadium pentoxide, V2O5), here approximated with the available chromium trioxide.
  Uncertainty: uncertainty calculated from uncertainty in average DeNOx input, uncertainty in the share of thermal NOx, uncertainty of nitrogen content in average municipal waste and the uncertainty in nitrogen content in *this* waste.
  properties: dry mass 1 kg, wet mass 1 kg
- process-specific burdens, slag landfill: 1.5014 kg; lognormal variance with pedigree 0.0116921, pedigree (1,1,4,1,1)
  Mass-specific expenditures required for landfilling of bottom ash.;activityLink introduced to establish a direct link to the corresponding regional supply of this product
  Uncertainty: uncertainty is calculated from uncertainties in waste composition and transfer coefficients in incinerator
- chemical, organic: 2.1235e-7 kg; lognormal variance with pedigree 1.4354, pedigree (1,1,4,1,1)
  Auxilliary inputs for the wastewater treatment stage of the incinerator plant. Proxy for (pure) Trisodium-trimercapto-s-triazine (CAS 17766-26-6), used as 15% diluted solution, aka TMT15.
  Uncertainty: uncertainty calculated from uncertainty in average TMT15 input, of transfer coefficients in the incinerator, and the uncertainty of the waste composition of this waste
  properties: heating value, net 19.03 MJ, wet mass 1 kg, carbon content, fossil 0.628, dry mass 1 kg
- heat, district or industrial, natural gas: 0.053874 MJ; lognormal variance with pedigree 0.16475, pedigree (1,1,4,1,1)
  Input to DeNOx stage, to heat up flue gas in low-dust SCR.
  Uncertainty: uncertainty calculated from uncertainty in average DeNOx input, uncertainty in the share of thermal NOx, uncertainty of nitrogen content in average municipal waste and the uncertainty in nitrogen content in *this* waste.
  properties: heating value, net 1 MJ
- municipal waste incineration facility: 2.5e-10 unit
  Demands per kilogram waste.
- iron (III) chloride, without water, in 40% solution state: 2.5675e-7 kg; lognormal variance with pedigree 0.67039, pedigree (1,1,4,1,1)
  Auxilliary inputs for the wastewater treatment stage of the incinerator plant.
  Uncertainty: uncertainty calculated from uncertainty in average FeCl3 input, of transfer coefficients in the incinerator, and the uncertainty of the waste composition of this waste
  properties: wet mass 1 kg, dry mass 1 kg
- titanium dioxide: 1.805e-5 kg; lognormal variance with pedigree 0.52151, pedigree (1,1,4,1,1)
  Input to DeNOx stage (TiO2 catalyst carrier)
  Uncertainty: uncertainty calculated from uncertainty in average DeNOx input, uncertainty in the share of thermal NOx, uncertainty of nitrogen content in average municipal waste and the uncertainty in nitrogen content in *this* waste.
  properties: wet mass 1 kg, dry mass 1 kg
- slag landfill: 2.6691e-9 unit; lognormal variance with pedigree 0.0116921, pedigree (1,1,4,1,1)
  Landfill infrastructure required for landfilling of bottom ash.
  Uncertainty: uncertainty is calculated from uncertainties in waste composition and transfer coefficients in incinerator
- hydrochloric acid, without water, in 30% solution state: 0.0026176 kg; lognormal variance with pedigree 0.0102822, pedigree (1,1,4,1,1)
  Auxilliary inputs for the wastewater treatment stage of the incinerator plant.
  Uncertainty: uncertainty calculated from uncertainty in average HCl input, of transfer coefficients in the incinerator, and the uncertainty of the waste composition of this waste
  properties: dry mass 1 kg, wet mass 1 kg, heating value, net 3.32 MJ
- transport, freight, lorry, unspecified: 0.065818 metric ton*km; lognormal variance with pedigree 0.0110797, pedigree (1,1,4,1,1)
  Transport services to transport incineration residues to landfills and filter ash to external treatments (FLUWA).
  Uncertainty: uncertainty calculated from uncertainty of the waste composition of this waste, uncertainty of transfer coefficients and the uncertainty in generic transportation distances
- water, decarbonised: 0.57004 kg; lognormal variance with pedigree 0.67039, pedigree (1,1,4,1,1)
  Incinerator process water used in flue gas scrubber stage.
  Uncertainty: uncertainty calculated from uncertainty in average water input, and the uncertainty of the waste composition of this waste
  properties: wet mass 1 kg
- metalliferous hydroxide sludge: -0.00061319 kg; lognormal variance with pedigree 0.063661, pedigree (1,1,4,1,1)
  (same comment as for metalliferous hydroxide sludge)
  production volume 59.53 kg
  properties: price 0.0042 EUR2005, water content 3, wet mass 1 kg, dry mass 0.25 kg, lead content 0.0015015, aluminium content 0.22396, zinc content 0.016682, oxygen content 0.37511, cadmium content 0.0033338, copper content 1.1518e-5, chlorine content 0.3794
- aluminium scrap, post-consumer, prepared for melting: -0.14035 kg; lognormal variance with pedigree 0.0179628, pedigree (1,1,4,1,1)
  (same comment as for aluminium scrap, post-consumer, prepared for melting)
  production volume 13625 kg
  properties: wet mass 1 kg, dry mass 1 kg, price 0.806 EUR2005

## Inputs from nature
- Oxygen [natural resource, in air]: 0.88661 kg; lognormal variance with pedigree 0.00800601, pedigree (1,1,4,1,1)
  Oxygen from ambient air needed to combust and oxidise this waste. Net demand, i.e. without O2 leaving the plant in flue gas uncombusted.
  Uncertainty: uncertainty is calculated from uncertainties in waste composition and transfer coefficients to flue gas and soild residues in incinerator

## Emissions to nature
- Calcium, ion [water, surface water]: 2.6125e-6 kg; lognormal variance with pedigree 0.90914, pedigree (1,1,4,1,1)
  Emissions to water from waste composition and transfer coefficients in incinerator and landfills.
  Uncertainty: uncertainty is calculated from uncertainties in waste composition and transfer coefficients in incinerator and landfills
- Iron, ion [water, surface water]: 7.0612e-9 kg; lognormal variance with pedigree 1.2913, pedigree (1,1,4,1,1)
  (same comment as for Calcium, ion)
- Aluminium [water, ground-, long-term]: 0.67346 kg; lognormal variance with pedigree 0.018013, pedigree (1,1,4,1,1)
  Long-term emissions from landfilling of incineration residues.
  Uncertainty: uncertainty is calculated from uncertainties in waste composition and transfer coefficients in incinerator and landfills.
- Zinc, ion [water, ground-, long-term]: 2.1031e-5 kg; lognormal variance with pedigree 1.3106, pedigree (1,1,4,1,1)
  (same comment as for Aluminium)
- Silicon [water, surface water]: 8.4993e-6 kg; lognormal variance with pedigree 0.55671, pedigree (1,1,4,1,1)
  (same comment as for Calcium, ion)
- Thallium [water, surface water]: 1.1446e-11 kg; lognormal variance with pedigree 0.72642, pedigree (1,1,4,1,1)
  (same comment as for Calcium, ion)
- Zinc, ion [water, surface water]: 1.3516e-9 kg; lognormal variance with pedigree 1.4116, pedigree (1,1,4,1,1)
  (same comment as for Calcium, ion)
- Vanadium, ion [water, surface water]: 5.5834e-9 kg; lognormal variance with pedigree 0.54562, pedigree (1,1,4,1,1)
  (same comment as for Calcium, ion)
- Water [water, surface water]: 0.000132391 m3; lognormal variance with pedigree 2.7549, pedigree (1,1,4,1,1)
  Process water released to surface water.
  Uncertainty: uncertainty calculated from uncertainty in process water input and the uncertainty of fraction to surface water.
- Tin, ion [water, surface water]: 4.1357e-12 kg; lognormal variance with pedigree 1.1159, pedigree (1,1,4,1,1)
  (same comment as for Calcium, ion)
- Heat, waste [air, urban air close to ground]: 0.28829 MJ; lognormal variance with pedigree 0.00898726, pedigree (1,1,4,1,1)
  Waste heat generated from heating value of this waste plus any electricity required to process it.
  Uncertainty: uncertainty is calculated from uncertainties in waste composition and uncertainties in energy efficiency and the uncertainty in internal energy demand
- Antimony [water, surface water]: 3.0556e-9 kg; lognormal variance with pedigree 0.037563, pedigree (1,1,4,1,1)
  (same comment as for Calcium, ion)
- Heat, waste [water, surface water]: 0.065914 MJ; lognormal variance with pedigree 0.00898726, pedigree (1,1,4,1,1)
  (same comment as for Heat, waste)
- Lead [water, surface water]: 1.1056e-9 kg; lognormal variance with pedigree 1.329, pedigree (1,1,4,1,1)
  (same comment as for Calcium, ion)
- Water [air, urban air close to ground]: 0.00025375 m3; lognormal variance with pedigree 2.7661, pedigree (1,1,4,1,1)
  Water vapour from waste humidity, hydrogen oxidation and part of the process water.
  Uncertainty: Uncertainty calculated from uncertainty in waste composition, process water input and the uncertainty of fraction to air.
- Particulates, > 2.5 um, and < 10um [air, urban air close to ground]: 2.3595e-8 kg; lognormal variance with pedigree 0.86435, pedigree (1,1,4,1,1)
  Incomplete combustion product emitted to air.
  Uncertainty: uncertainty calculated from uncertainty in average operation emissions, and the uncertainty of the flue gas volume from this waste.
- Nickel, ion [water, surface water]: 5.6291e-10 kg; lognormal variance with pedigree 0.72642, pedigree (1,1,4,1,1)
  (same comment as for Calcium, ion)
- Iron, ion [water, ground-, long-term]: 4.2296e-6 kg; lognormal variance with pedigree 7.0197, pedigree (1,1,4,1,1)
  (same comment as for Aluminium)
- Benzo(a)pyrene [air, urban air close to ground]: 8.7518e-13 kg; lognormal variance with pedigree 1.2807, pedigree (1,1,4,1,1)
  (same comment as for Particulates, > 2.5 um, and < 10um)
- Manganese [water, surface water]: 8.2352e-11 kg; lognormal variance with pedigree 1.2256, pedigree (1,1,4,1,1)
  (same comment as for Calcium, ion)
- Phenol, pentachloro- [air, urban air close to ground]: 1.7127e-11 kg; lognormal variance with pedigree 0.61882, pedigree (1,1,4,1,1)
  (same comment as for Particulates, > 2.5 um, and < 10um)
- Mercury [water, surface water]: 7.3924e-14 kg; lognormal variance with pedigree 0.9951, pedigree (1,1,4,1,1)
  (same comment as for Calcium, ion)
- Benzene, hexachloro- [air, urban air close to ground]: 8.2234e-11 kg; lognormal variance with pedigree 0.61882, pedigree (1,1,4,1,1)
  (same comment as for Particulates, > 2.5 um, and < 10um)
- Copper, ion [water, surface water]: 5.3964e-10 kg; lognormal variance with pedigree 1.6712, pedigree (1,1,4,1,1)
  (same comment as for Calcium, ion)
- Benzene, pentachloro- [air, urban air close to ground]: 2.0779e-10 kg; lognormal variance with pedigree 0.61882, pedigree (1,1,4,1,1)
  (same comment as for Particulates, > 2.5 um, and < 10um)
- Chromium VI [water, surface water]: 7.161e-8 kg; lognormal variance with pedigree 0.1757, pedigree (1,1,4,1,1)
  (same comment as for Calcium, ion)
- Toluene [air, urban air close to ground]: 7.8657e-8 kg; lognormal variance with pedigree 0.61882, pedigree (1,1,4,1,1)
  (same comment as for Particulates, > 2.5 um, and < 10um)
- Cobalt [water, surface water]: 4.9277e-11 kg; lognormal variance with pedigree 0.82494, pedigree (1,1,4,1,1)
  (same comment as for Calcium, ion)
- Carbon monoxide, fossil [air, urban air close to ground]: 2.6467e-5 kg; lognormal variance with pedigree 1.9222, pedigree (1,1,4,1,1)
  (same comment as for Particulates, > 2.5 um, and < 10um)
- Benzene [air, urban air close to ground]: 3.9329e-8 kg; lognormal variance with pedigree 0.61882, pedigree (1,1,4,1,1)
  (same comment as for Particulates, > 2.5 um, and < 10um)
- Cadmium, ion [water, surface water]: 1.0384e-9 kg; lognormal variance with pedigree 2.008, pedigree (1,1,4,1,1)
  (same comment as for Calcium, ion)
- Dioxins, measured as 2,3,7,8-tetrachlorodibenzo-p-dioxin [air, urban air close to ground]: 7.8652e-14 kg; lognormal variance with pedigree 1.2807, pedigree (1,1,4,1,1)
  (same comment as for Particulates, > 2.5 um, and < 10um)
- Arsenic, ion [water, surface water]: 3.4413e-7 kg
  Emissions to water from waste composition and transfer coefficients in incinerator and landfills.
- Chloride [water, surface water]: 0.004133 kg; lognormal variance with pedigree 0.19953, pedigree (1,1,4,1,1)
  (same comment as for Calcium, ion)
- NMVOC, non-methane volatile organic compounds, unspecified origin [air, urban air close to ground]: 1.7898e-6 kg; lognormal variance with pedigree 0.61882, pedigree (1,1,4,1,1)
  (same comment as for Particulates, > 2.5 um, and < 10um)
- Thallium [water, ground-, long-term]: 6.8564e-9 kg; lognormal variance with pedigree 0.26601, pedigree (1,1,4,1,1)
  (same comment as for Aluminium)
- Aluminium [air, urban air close to ground]: 4.0566e-7 kg; lognormal variance with pedigree 0.085079, pedigree (1,1,4,1,1)
  Emission to air from waste composition and transfer coefficients.
  Uncertainty: uncertainty is calculated from uncertainties in waste composition and transfer coefficients in incinerator
- Zinc [air, urban air close to ground]: 9.7189e-9 kg; lognormal variance with pedigree 1.1636, pedigree (1,1,4,1,1)
  (same comment as for Aluminium)
- Lead [air, urban air close to ground]: 1.0504e-9 kg; lognormal variance with pedigree 1.193, pedigree (1,1,4,1,1)
  (same comment as for Aluminium)
- Copper [air, urban air close to ground]: 3.8926e-10 kg; lognormal variance with pedigree 1.3391, pedigree (1,1,4,1,1)
  (same comment as for Aluminium)
- Cadmium [air, urban air close to ground]: 7.6456e-10 kg; lognormal variance with pedigree 1.4624, pedigree (1,1,4,1,1)
  (same comment as for Aluminium)
- Hydrogen chloride [air, urban air close to ground]: 1.3767e-6 kg; lognormal variance with pedigree 0.49188, pedigree (1,1,4,1,1)
  (same comment as for Aluminium)
- Ammonia [air, urban air close to ground]: 3.3873e-7 kg; lognormal variance with pedigree 0.21245, pedigree (1,1,4,1,1)
  Nitrogen species emitted to air after DeNOx stage.
  Uncertainty: uncertainty calculated from uncertainty in average N-emissions and uncertainty in the share of thermal NOx and the uncertainty in nitrogen content in *this* waste.
- Nitrogen oxides [air, urban air close to ground]: 0.00010727 kg; lognormal variance with pedigree 0.21245, pedigree (1,1,4,1,1)
  Sum of fuel-Nox and thermal-NOx emitted to air after DeNOx stage.
  Uncertainty: uncertainty calculated from uncertainty in average N-emissions and uncertainty in the share of thermal NOx and the uncertainty in nitrogen content in *this* waste.
- Calcium, ion [water, ground-, long-term]: 0.0015649 kg; lognormal variance with pedigree 1.4527, pedigree (1,1,4,1,1)
  (same comment as for Aluminium)
- Vanadium, ion [water, ground-, long-term]: 1.7486e-6 kg; lognormal variance with pedigree 0.02524, pedigree (1,1,4,1,1)
  (same comment as for Aluminium)
- Methane, fossil [air, urban air close to ground]: 2.3355e-7 kg; lognormal variance with pedigree 0.61882, pedigree (1,1,4,1,1)
  (same comment as for Particulates, > 2.5 um, and < 10um)
- Tin, ion [water, ground-, long-term]: 2.4773e-9 kg; lognormal variance with pedigree 3.9403, pedigree (1,1,4,1,1)
  (same comment as for Aluminium)
- Antimony [water, ground-, long-term]: 5.609e-9 kg; lognormal variance with pedigree 0.013413, pedigree (1,1,4,1,1)
  (same comment as for Aluminium)
- Lead [water, ground-, long-term]: 2.173e-5 kg; lognormal variance with pedigree 1.7655, pedigree (1,1,4,1,1)
  (same comment as for Aluminium)
- Nickel, ion [water, ground-, long-term]: 3.3718e-7 kg; lognormal variance with pedigree 0.26601, pedigree (1,1,4,1,1)
  (same comment as for Aluminium)
- Methane, non-fossil [air, urban air close to ground]: 3.5638e-7 kg; lognormal variance with pedigree 0.61882, pedigree (1,1,4,1,1)
  (same comment as for Particulates, > 2.5 um, and < 10um)
- Manganese [water, ground-, long-term]: 4.9329e-8 kg; lognormal variance with pedigree 5.7591, pedigree (1,1,4,1,1)
  (same comment as for Aluminium)
- Mercury [water, ground-, long-term]: 4.428e-11 kg; lognormal variance with pedigree 2.3387, pedigree (1,1,4,1,1)
  (same comment as for Aluminium)
- Copper, ion [water, ground-, long-term]: 8.2684e-6 kg; lognormal variance with pedigree 1.2831, pedigree (1,1,4,1,1)
  (same comment as for Aluminium)
- Particulates, < 2.5 um [air, urban air close to ground]: 4.6955e-6 kg; lognormal variance with pedigree 1.2807, pedigree (1,1,4,1,1)
  (same comment as for Particulates, > 2.5 um, and < 10um)
- Silicon [water, ground-, long-term]: 0.0037707 kg; lognormal variance with pedigree 0.00800076, pedigree (1,1,4,1,1)
  (same comment as for Aluminium)
- Chromium VI [water, ground-, long-term]: 2.2621e-7 kg; lognormal variance with pedigree 0.0146401, pedigree (1,1,4,1,1)
  (same comment as for Aluminium)
- Cobalt [water, ground-, long-term]: 2.9517e-8 kg; lognormal variance with pedigree 0.78792, pedigree (1,1,4,1,1)
  (same comment as for Aluminium)
- Cadmium, ion [water, ground-, long-term]: 1.7398e-6 kg; lognormal variance with pedigree 2.4933, pedigree (1,1,4,1,1)
  (same comment as for Aluminium)
- Arsenic, ion [water, ground-, long-term]: 0 kg; pedigree (1,1,1,1,1)
  (same comment as for Aluminium)
- Chloride [water, ground-, long-term]: 0.0006325 kg; lognormal variance with pedigree 0.27074, pedigree (1,1,4,1,1)
  (same comment as for Aluminium)
- Carbon monoxide, non-fossil [air, urban air close to ground]: 4.0386e-5 kg; lognormal variance with pedigree 1.9222, pedigree (1,1,4,1,1)
  (same comment as for Particulates, > 2.5 um, and < 10um)
- Aluminium [water, surface water]: 3.7582e-5 kg; lognormal variance with pedigree 0.5371, pedigree (1,1,4,1,1)
  (same comment as for Calcium, ion)

## Extrapolations
This dataset has been extrapolated from year 2012 to the year of the calculation (2021). The uncertainty has been adjusted accordingly.
