# keyboard production

Dataset: EcoSpold 2, unit process
Geography: GLO
Time period: 1998-01-01 to 2021-12-31
Technology level: current
Classification: EcoSpold01Categories: electronics/devices
Classification: ISIC rev.4 ecoinvent: 2620:Manufacture of computers and peripheral equipment
Tags: ConvertedDataset
Scenario: Business-as-Usual
System model: Allocation, cut-off by classification
Generated by: Martin Lehmann
Published in: Hischier R. 2007
Database: ecoinvent
isCopyrightProtected: false
accessRestrictedTo: 1

## General comment
This dataset represents the production of 1 unit of standard keyboard. It is based on a typical keyboard with a weight of 1.18 kg and 102 keys, representing a typical keyboard used at home or in an office. The dataset is a construct of different datasets. Main data are based on one source by Atlantic Consulting & IPU (1998) describing a keyboard from 1998. The information is based on an international study from the end of 1990's.
[This dataset was already contained in the ecoinvent database version 2. It was not individually updated during the transfer to ecoinvent version 3. Life Cycle Impact Assessment results may still have changed, as they are affected by changes in the supply chain, i.e. in other datasets. This dataset was generated following the ecoinvent quality guidelines for version 2. It may have been subject to central changes described in the ecoinvent version 3 change report (http://www.ecoinvent.org/database/ecoinvent-version-3/reports-of-changes/), and the results of the central updates were reviewed extensively. The changes added e.g. consistent water flows and other information throughout the database. The documentation of this dataset can be found in the ecoinvent reports of version 2, which are still available via the ecoinvent website. The change report linked above covers all central changes that were made during the conversion process.]

## Included activities start
From reception of raw materials and auxiliares at the factory gate.

## Included activities end
This dataset includes materials (mainly metals and plastics) with their respective manufacturing processes (e.g. electroplating for steel base sheet or injection moulding of ABS-plastic parts), infrastructure and electric consumption. The water consumption, emissions and waste during production have not been taken into account due to lack of information.

## Geography
The data is based on information by a research and consulting institution in 1998 describing a keyboard for a desktop computer. The keyboard looked at is available all over the world. Therefore a global dataset is justifiable.

## Technology
The production of a computer keyboard includes the electroplating process of the steel base sheet with zinc plus the injection moulding of the ABS-plastic parts (upper and lower shell; wheel).

## Reference product
- keyboard: 1 unit; By-product classification allocatable product; CPC 45261: Input peripherals (keyboard, joystick, mouse etc.)
  EcoSpold01Location=GLO
  The standard keyboard inventoried consists of 102 keys. The QWERTY is the most common modern-day keyboard layout on English language computer and typewriter keyboards. It takes its name from the first six letters seen in the keyboard’s top first row of letters. (Wikipedia, 2007)
  production volume 1 unit
    Dummy value to be replaced by measured, estimated or calculated value
  property carbon content, fossil 0.57577
    Calculated as the addition of C contents in the product composition, then referred to 1 kg DM
  property price 35.8279 EUR2005
    Calculated based on inputs: The price of the product has been calculated as a sum of the values of the material and energy inputs for this product. This value is therefore a rough estimation. It may underestimate the real price since there are additional expenses when producing any product. These expences can include for example labour costs, treatment of waste materials and profit for the producer. Please consider carefully whether this level of data quality is acceptable for your application.
  property carbon content 0.57577
    carbon content on a dry matter basis (reserved; not for manual entry)
  properties: carbon content, non-fossil 0, wet mass 1.18 kg, water in wet mass 0 kg, dry mass 1.18 kg, water content 0, carbon allocation 0.679409 kg

## Inputs from technosphere
- extrusion, plastic pipes: 0.0371 kg; source Atlantic Consulting 1998; lognormal variance with pedigree 0.0701, pedigree (1,4,5,3,3)
  Literature Value.
  EcoSpold01Location=RER
- copper, cathode: 0.0329 kg; source Atlantic Consulting 1998; lognormal variance with pedigree 0.0701, pedigree (1,4,5,3,3)
  EcoSpold01Location=RER
  Literature Value.
  properties: wet mass 1 kg, dry mass 1 kg
- used IT accessory: -1.25 kg; source Atlantic Consulting 1998; lognormal variance with pedigree 0.0701, pedigree (1,4,5,3,3)
  Literature Value.
  EcoSpold01Location=CH
  production volume 1.25 kg
    Calculated from the production volume of keyboard in proportion to the respective output amounts.
  properties: carbon content, fossil 0.470164, dry mass 1 kg, wet mass 1 kg
  note on carbon content, fossil: The composition of the IT accessory is an average of the keyboard, optical mouse and external power adapter (for laptop) composition (ecoinvent v2.2 report 18_V, pg 67). The C content was calculated from Tab 4.43 and 4.44: 16.19% is cables and 83.81 goes to mechanical treatment. According to the European company, 1 kg cable is split up into 0.66 kg of copper and 0.34 kg of plastics (ecoinvent v2.2 report 18_V, pg 97). Plastic C content was calculated using data in Tab A.2, ecoinvent v2.2 report 13_I. From shredder, only plastic and other (others was also considered plastic (from pg 70, ecoinvent v2.2 report 18_V)) were considered to have a carbon content, and it was calculated using data in Tab A.2, ecoinvent v2.2 report 13_I.
- wire drawing, copper: 0.0329 kg; source Atlantic Consulting 1998; lognormal variance with pedigree 0.0701, pedigree (1,4,5,3,3)
  EcoSpold01Location=RER
  Literature Value.
- polyvinylchloride, suspension polymerised: 0.00413156 kg; source Atlantic Consulting 1998; lognormal variance with pedigree 0.0701, pedigree (1,4,5,3,3)
  EcoSpold01Location=RER
  Literature Value.
  properties: dry mass 1 kg, carbon content, fossil 0.387097, wet mass 1 kg, heating value, net 21.5 MJ
  note on carbon content, fossil: Monomer is vynyl chloride, C2H3Cl (ecoinvent v2.2 report 11_II). MW=62 g/mol
- acrylonitrile-butadiene-styrene copolymer: 0.77 kg; source Atlantic Consulting 1998; lognormal variance with pedigree 0.0701, pedigree (1,4,5,3,3)
  Literature Value.
  EcoSpold01Location=RER
  properties: heating value, net 35.58 MJ, carbon content, fossil 0.853081, dry mass 1 kg, wet mass 1 kg
  note on carbon content, fossil: ABS is the abbreviation originating from its monomers acrylonitrile, butadiene and styrene. It was assumed that every monomer was present in the same proportion, so the basic ABS monomer was considered (C8H8·C4H6·C3H3N), and the MW=104+54+53=211 g/mol
- printed wiring board, surface mounted, unspecified, Pb containing: 0.018 kg; = 0.06*0.3; lognormal variance with pedigree 0.0701, pedigree (1,4,5,3,3)
  Proxy with estimation, to represent electric function unit, printed wiring board is used. It is based on own assumption.
  This original value from production mix has been replaced by 2 flows. Pb-containing has a share of 0.3, Pb-free has a share of 0.7.
  property water in wet mass 0 kg; name WWM
  property carbon content, fossil 0.132522; name C_content_fossil
  property dry mass 1 kg; name DM
  property water content 0; name water_content
  property carbon content, non-fossil 0; name C_content_non_fossil
  property wet mass 1 kg; name WM
- electricity, medium voltage: 1.1111 kWh; source Stachura 2006; lognormal variance with pedigree 0.0421, pedigree (1,4,5,3,1)
  EcoSpold01Location=UCTE
  Estimation, based on literature is assumed similar to a computer mouse
- printed wiring board, surface mounted, unspecified, Pb free: 0.042 kg; = 0.06*0.7; lognormal variance with pedigree 0.0701, pedigree (1,4,5,3,3)
  (same comment as for printed wiring board, surface mounted, unspecified, Pb containing)
  properties: carbon content, fossil 0.132522, dry mass 1 kg, wet mass 1 kg
- zinc coat, pieces: 0.0698 m2; source Atlantic Consulting 1998; lognormal variance with pedigree 0.0701, pedigree (1,4,5,3,3)
  Literature Value.
  EcoSpold01Location=RER
- injection moulding: 0.77 kg; source Atlantic Consulting 1998; lognormal variance with pedigree 0.0701, pedigree (1,4,5,3,3)
  Literature Value.
  EcoSpold01Location=RER
- steel, chromium steel 18/8, hot rolled: 0.28 kg; source Atlantic Consulting 1998; lognormal variance with pedigree 0.0701, pedigree (1,4,5,3,3)
  EcoSpold01Location=RER
  Literature Value.
  properties: wet mass 1 kg, carbon content, fossil 0.0008, dry mass 1 kg
  note on carbon content, fossil: Stainless steel model is the grade 304 steel (18/8 stainless, 18% chromium 8% nickel; max. 0.08% C)
- printed wiring board mounting facility: 2.4544e-7 unit; lognormal variance with pedigree 0.3701, pedigree (1,4,5,3,3)
  Calculated Value, based on the annual production volume (192 t) for a printed wiring board mounting plant and a life-span of 25 years.
  EcoSpold01Location=GLO

## Sampling procedure
Literature data and own assumptions for processing calculations.

## Extrapolations
This dataset has been extrapolated from year 2006 to the year of the calculation (2021). The uncertainty has been adjusted accordingly.

## Review by Roland Hischier 2011-09-22
Transfer of documentation done.

## Review by Jürgen Sutter 2007-11-08
passed.
-
