# suction, shavings, hardwood

Dataset: EcoSpold 2, unit process
Geography: Europe without Switzerland
Time period: 2012-01-01 to 2021-12-31
Technology level: current
Classification: ISIC rev.4 ecoinvent: 1610:Sawmilling and planing of wood
Tags: Swiss brush-up completed
Scenario: Business-as-Usual
System model: Allocation, cut-off by classification
Generated by: Frank Werner
Database: ecoinvent
isCopyrightProtected: true
accessRestrictedTo: 1

## General comment
This data represents the service of collecting shavings from the planing of hardwood, expressed per kg dry mass and transporting it to its silo via aspiration.

## Included activities start
The activity starts with the shavings at the planing machine.

## Included activities end
This activity ends with the shavings collected at a silo at the sawmill site. The dataset does not include direct wood dust emissions. The infrasturcture for the pipes and pumps as well as for the silo are assumed be part of the infrastructure DS for the sawmill.

## Geography
Represents average Swiss conditions assumed to be represenative for Europe

## Reference product
- shavings, hardwood, loose, measured as dry mass: 0 kg; source BFS 2013; By-product classification allocatable product; CPC 39283: Non-agglomerated wood waste and scrap
  production volume 0 kg; name p_shavings; = 2055720/60*(12688-60)
    Scaled from the PV estimates of the Swiss sawmilling chain based UNECE data for 2013 for the production volumes of Switzerland (60'000 m3) and the production volume of Europe without Switzerland ( 12'748 m3 - 60'000 m3).
  property heating value, net 12.61 MJ
    LHV is calculated based on the Carbon content of the product. More details can be found on the respective documentation.
  property price 0.113 EUR2005
    Calculated based on data from FAOSTAT (accessed 20140429). The price is calculated by using data on total world import quantity (m3) and import value (1000 USD), year 2005. 40461924 m3 of Chips and Particles was imported in the world in 2005. The import value was 3022227000 USD. The calculated price is thus (3022227000/40461924=74.7*0.8=) 62.2 Euro/m3. It is estimated, that the chips and particles are half hardwood (of density 650 kg/m3) and half softwood (of density 450 kg/m3), thus the remaining mixture has a density of 550 kg/m3. The recalculated price is (1/550*62.2=) 0.11 Euro/kg. Using the same approach the calculated price for 2010 was 0.123 Euro/kg.
  property carbon content 0.494
    carbon content on a dry matter basis (reserved; not for manual entry)
  properties: water in wet mass 0.1 kg, dry mass 1 kg, wet mass 1.1 kg, carbon content, non-fossil 0.494, water content 0.1, carbon content, fossil 0, carbon allocation 0.494 kg
- shavings, hardwood, measured as dry mass: 1 kg; source BFS 2013; CPC 39283: Non-agglomerated wood waste and scrap; By-product classification allocatable product; pedigree (1,1,1,1,1)
  shavings recollected from the planing process where they are generated as loose shavings.
  production volume 4.32661e8 kg; = 2055720/60*(12688-60)
  properties: heating value, net 13.38 MJ, price 0.113 EUR2005, wet mass 1.1 kg, dry mass 1 kg, water content 0.1, water in wet mass 0.1 kg, carbon content, non-fossil 0.494, carbon content, fossil 0, carbon content 0.494, carbon allocation 0.494 kg

## By-products
- shavings, hardwood, measured as dry mass: 0 kg; source BFS 2013; CPC 39283: Non-agglomerated wood waste and scrap; By-product classification allocatable product; pedigree (1,1,1,1,1)
  shavings recollected from the planing process where they are generated as loose shavings.
  production volume 0 kg; = 2055720/60*(12688-60)
    (same comment as for shavings, hardwood, loose, measured as dry mass)
  property heating value, net 13.38 MJ
    (same comment as for shavings, hardwood, loose, measured as dry mass)
  property price 0.113 EUR2005
    (same comment as for shavings, hardwood, loose, measured as dry mass)
  property carbon content 0.494
    carbon content on a dry matter basis (reserved; not for manual entry)
  properties: wet mass 1.1 kg, dry mass 1 kg, water content 0.1, water in wet mass 0.1 kg, carbon content, non-fossil 0.494, carbon content, fossil 0, carbon allocation 0.494 kg

## Inputs from technosphere
- electricity, medium voltage: 0.0349 kWh; source BFS 2013; lognormal variance with pedigree 0.0331, pedigree (1,1,4,3,1)
  electricity needed for the suction of shavings from the planing process and their transport to a bunker/silo.
  properties: UVEK_relative_amount_1 1, UVEK_link_1 1779
  note on UVEK_relative_amount_1: to be used only in special submissions in coordination with ecoinvent and the Swiss FOEN
- shavings, hardwood, loose, measured as dry mass: 1 kg; source BFS 2013
  production volume 4.32661e8 kg
  properties: heating value, net 12.61 MJ, dry mass 1 kg, wet mass 1.1 kg, carbon content, non-fossil 0.494, price 0.113 EUR2005, water content 0.1

## Sampling procedure
complementary literature and sampling from sawmills; CH data used to approximate European processes

## Extrapolations
This dataset has been extrapolated from year 2013 to the year of the calculation (2021). The uncertainty has been adjusted accordingly.
