# mint production

Dataset: EcoSpold 2, unit process
Geography: US
Time period: 2007-01-01 to 2021-12-31
Technology level: current
Classification: ISIC rev.4 ecoinvent: 0128:Growing of spices, aromatic, drug and pharmaceutical crops
Tags: WFLDB
Scenario: Business-as-Usual
System model: Allocation, cut-off by classification
Generated by: Tuija Waldvogel
Published in: Nemecek T. 2015
Database: ecoinvent
isCopyrightProtected: true
accessRestrictedTo: 1

## General comment
This dataset represents the production of 1 kg mint. The average yield from 2007 - 2008 is 63 t/ha. The data are representative for mint production in the United States of America (Idaho and Mississippi) used for the export market. Mineral NPK fertiliser input is 225-80-100 kg/ha. No organic fertilisers are applied. Total active ingredients (a.i.) applied as pesticides amount to 2 kg a.i./ha.
The dataset was modelled within the project 'World Food LCA database (WFLDB)'. The aim of this project was to provide inventories of a broad variety of agricultural products and processes and to cover for each product at least 50% of the global export market. The production system regarded in this dataset aimed at representing mint produced in the United States of America for the export market.
PEF-Quality: data quality rating (DQR) = 1.8 (i.e. very good quality). This dataset refers to an average situation; for specific situations exchanges might differ substantially due to site specific parameters

## Included activities start
This activity starts with the nursery producing seedlings, i.e. seedlings from roots.

## Included activities end
This activity ends with the clearing of the field (removing of mint plants). The dataset includes all activities of a year in the productive phase of the field including the establishment phase per year of lifetime (4 years), and the clearing of the field.
The establishment phase of the field includes seedlings nursery, soil cultivation, planting, herbicide use and irrigation.
The productive phase of the field includes machine operations, fuel use and sheds. Machine operations in the productive phase are: soil cultivation, fertiliser and pesticide application, harvesting, transport on farm and irrigation. Further, direct field emissions and land use change are included. At the end of the productive phase the field is cleared by removing the mint plants.
Heavy metal uptake by the crop is considered. The inputs of seedlings, fertilisers and pesticides as well as packaging of fertilisers and pesticides are considered. The dataset doesn't include drying.

## Technology
Conventional production

## Parameters
- heavyMetalUptakeSwitch: 1 dimensionless
- LUC_crop_specific: 1 dimensionless
  This parameter allows to switch between a 'crop specific' and a 'country specific' approach when calculating the LUC of a crop. By default, the chosen approach is 'crop specific', so the value of the parameter is 1. If you want to apply a 'country specific' approach, turn the parameter to 0.

## Reference product
- mint: 1 kg; By-product classification allocatable product; CPC 01930: Plants and parts of plants used primarily in perfumery, in pharmacy, or for insecticidal, fungicidal or simila[…]
  Reference flow: Yield = 63000.0 kg/ha and year
  production volume 2e9 kg
    Assumption: IN & US contribute 50% of world production; yield: 40t/ha
  property price 2.24 EUR2005
    Literature data (FAOSTAT). Price of pepermint produced in Spain in 2008.
  property carbon content, non-fossil 0.445396
    calculation: C-content of components according to ecoinvent report No. 15a. Source of composition: Souci, S.W., Fachmann, W., Kraut, H. (Hg.: Bundesminsiterium fur Ernahrung, Landwirtschaft und Forsten, Bonn) 'Die Zusammensetzung der Lebensmittel - Nahrwerttabellen', medpharm Scientific Publishers Stuttgart, CRC Press; 2000.
  property carbon content 0.445396
    carbon content on a dry matter basis (reserved; not for manual entry)
  properties: water content 0.681, water in wet mass 0.405116 kg, dry mass 0.594884 kg, wet mass 1 kg, carbon content, fossil 0, carbon allocation 0.264959 kg

## Inputs from technosphere
- ammonia, anhydrous, liquid: 0.00243698 kg; source Brown B. 2003; lognormal variance with pedigree 0.156177, pedigree (2,1,5,1,1)
  Calculated based on literature values or expert estimation: The total amount of nutrient (Brown et al. 2003) multiplied by the country-share of fertiliser type (IFA 2014). See supporting documentation 'WFLDB-Documentation.pdf' chapter 'Fertiliser application' for L3 and L4 data (https://ecoquery.ecoinvent.org/File/Reports).
  Corresponds to 154.0 kg/ha
  properties: dry mass 1 kg, wet mass 1 kg
- transport, tractor and trailer, agricultural: 0.002 metric ton*km; lognormal variance with pedigree 0.194439, pedigree (4,1,5,1,1)
  On-farm transport: Yield (in tonnes) multiplied by the average distance from field to farm. The distance was assumed to be 2 km (proxy).
- tillage, cultivating, chiselling: 3.96825e-6 ha; source Zheljazkov V.D. 2010; lognormal variance with pedigree 0.156177, pedigree (2,1,5,1,1)
  Literature value or expert estimation (Zheljazkov et al. 2010b). Tillage is done once in four years.
- ammonium nitrate: 0.000302359 kg; source Brown B. 2003; lognormal variance with pedigree 0.156177, pedigree (2,1,5,1,1)
  The exchange has been updated from 'ammonium nitrate, as N' into 'ammonium nitrate' and therefore its amount has been scaled (multiplied) from 0.0001 kg by 2.8573 kg of 'ammonium nitrate' per kg of 'ammonium nitrate, as N'. Original comment of the exchange is: Calculated based on literature values or expert estimation: The total amount of nutrient (Brown et al. 2003) multiplied by the country-share of fertiliser type (IFA 2014). See supporting documentation 'WFLDB-Documentation.pdf' chapter 'Fertiliser application' for L3 and L4 data (https://ecoquery.ecoinvent.org/File/Reports).
  Corresponds to 6.67 kg/ha
  properties: dry mass 1 kg, wet mass 1 kg
- cyclic N-compound: 2.38095e-5 kg; source Zheljazkov V.D. 2010; lognormal variance with pedigree 0.0458498, pedigree (2,2,5,1,1)
  Literature value or expert estimation (Zheljazkov et al. 2010a).
  properties: carbon content, fossil 0.641962, wet mass 1 kg, dry mass 1 kg
- fertilising, by broadcaster: 3.1746e-5 ha; source Zheljazkov V.D. 2010; lognormal variance with pedigree 0.156177, pedigree (2,1,5,1,1)
  Literature value or expert estimation (Zheljazkov et al. 2010a).
- ammonium sulfate: 8.17667e-5 kg; source Brown B. 2003; lognormal variance with pedigree 0.156177, pedigree (2,1,5,1,1)
  Calculated based on literature values or expert estimation: The total amount of nutrient (Brown et al. 2003) multiplied by the country-share of fertiliser type (IFA 2014). See supporting documentation 'WFLDB-Documentation.pdf' chapter 'Fertiliser application' for L3 and L4 data (https://ecoquery.ecoinvent.org/File/Reports).
  Corresponds to 5.15 kg/ha
  properties: dry mass 1 kg, wet mass 1 kg
- glyphosate: 7.93651e-6 kg; source Zheljazkov V.D. 2010; lognormal variance with pedigree 0.0458498, pedigree (2,2,5,1,1)
  Literature value or expert estimation (Zheljazkov et al. 2010b).
  properties: wet mass 1 kg, dry mass 1 kg, carbon content, fossil 0.214286
- chopping, maize: 3.1746e-5 ha; source Brown B. 2003; lognormal variance with pedigree 0.156177, pedigree (2,1,5,1,1)
  Proxy: Similar crop and country used.
- urea: 0.000883892 kg; source Brown B. 2003; lognormal variance with pedigree 0.156177, pedigree (2,1,5,1,1)
  The exchange has been updated from 'urea, as N' into 'urea' and therefore its amount has been scaled (multiplied) from 0.0004 kg by 2.1438 kg of 'urea' per kg of 'urea, as N'. Original comment of the exchange is: Calculated based on literature values or expert estimation: The total amount of nutrient (Brown et al. 2003) multiplied by the country-share of fertiliser type (IFA 2014). See supporting documentation 'WFLDB-Documentation.pdf' chapter 'Fertiliser application' for L3 and L4 data (https://ecoquery.ecoinvent.org/File/Reports).
  Corresponds to 26.0 kg/ha
  properties: carbon content, fossil 0.2, dry mass 1 kg, wet mass 1 kg
- mint seedling, for planting: 0.440921 unit; source Zheljazkov V.D. 2010; lognormal variance with pedigree 0.156177, pedigree (2,1,5,1,1)
  Literature value or expert estimation (Zheljazkov et al. 2010a).
  properties: water content 0.73, wet mass 1 kg, carbon content, non-fossil 0.439481, dry mass 0.578035 kg
  note on carbon content, non-fossil: calculation: C-content of components according to ecoinvent report No. 15a. Source of composition: https://ndb.nal.usda.gov/ndb/search/. Unspecific seedling used as proxy.
- packaging, for pesticides: 6.34921e-5 kg; lognormal variance with pedigree 0.0912, pedigree (4,3,5,5,4)
  Total amount of active substance/s of pesticides needed for the production of mint is calculated to be circa 3.17E-05 kg. Pesticide/s used in this dataset is/are: 'cyclic N-compound', 'glyphosate'. The total amount of active substance/s is doubled in order to account for the packaging of the dilluted product of pesticide/s that is/are applied. Therefore, 6.35E-05 kg of packaging for pesticides is justified with this exchange.
  properties: carbon content, fossil 0.85714, price 0.0642 EUR2005, dry mass 1 kg, wet mass 1 kg, heating value, net 25.97 MJ
- tillage, ploughing: 3.96825e-6 ha; source Zheljazkov V.D. 2010; lognormal variance with pedigree 0.156177, pedigree (2,1,5,1,1)
  (same comment as for tillage, cultivating, chiselling)
- phosphate rock, beneficiated: 1.76295e-5 kg; source Zheljazkov V.D. 2010; lognormal variance with pedigree 0.156177, pedigree (2,1,5,1,1)
  The exchange has been updated from 'phosphate rock, as P2O5, beneficiated, dry' into 'phosphate rock, beneficiated' and therefore its amount has been scaled (multiplied) from 0 kg by 3.125 kg of 'phosphate rock, beneficiated' per kg of 'phosphate rock, as P2O5, beneficiated, dry'. Original comment of the exchange is: Calculated based on literature values or expert estimation: The total amount of nutrient (Zheljazkov et al. 2010a) multiplied by the country-share of fertiliser type (IFA 2014). See supporting documentation 'WFLDB-Documentation.pdf' chapter 'Fertiliser application' for L3 and L4 data (https://ecoquery.ecoinvent.org/File/Reports).
  Corresponds to 0.355 kg/ha
  properties: dry mass 1 kg, wet mass 1 kg
- irrigation: 0.209524 m3; source Fuchs S.J. 2000; lognormal variance with pedigree 0.156177, pedigree (2,1,5,1,1)
  Calculated value: The total amount of water used for irrigation (Fuchs et al. 2000) multiplied by the country-share of irrigation technique (Fuchs et al. 2000). See supporting documentation 'WFLDB-Documentation.pdf' chapter 'Water use for irrigation' (https://ecoquery.ecoinvent.org/File/Reports).
  properties: water content 9089.91, dry mass 0.11 kg, wet mass 1000 kg
- planting: 3.96825e-6 ha; source Zheljazkov V.D. 2010; lognormal variance with pedigree 0.156177, pedigree (2,1,5,1,1)
  Literature value or expert estimation (Zheljazkov et al. 2010b).
- potassium chloride: 0.00183498 kg; source Zheljazkov V.D. 2010; lognormal variance with pedigree 0.156177, pedigree (2,1,5,1,1)
  The exchange has been updated from 'potassium chloride, as K2O' into 'potassium chloride' and therefore its amount has been scaled (multiplied) from 0.0012 kg by 1.5829 kg of 'potassium chloride' per kg of 'potassium chloride, as K2O'. Original comment of the exchange is: Calculated based on literature values or expert estimation: The total amount of nutrient (Zheljazkov et al. 2010a) multiplied by the country-share of fertiliser type (IFA 2014). See supporting documentation 'WFLDB-Documentation.pdf' chapter 'Fertiliser application' for L3 and L4 data (https://ecoquery.ecoinvent.org/File/Reports).
  properties: wet mass 1 kg, dry mass 1 kg
- inorganic nitrogen fertiliser, as N: 0.000964644 kg; source Brown B. 2003; lognormal variance with pedigree 0.156177, pedigree (2,1,5,1,1)
  Calculated based on literature values or expert estimation: The total amount of nutrient (Brown et al. 2003) multiplied by the country-share of fertiliser type (IFA 2014). See supporting documentation 'WFLDB-Documentation.pdf' chapter 'Fertiliser application' for L3 and L4 data (https://ecoquery.ecoinvent.org/File/Reports).
  Corresponds to 7.22 kg/ha
  properties: dry mass 1 kg, wet mass 1 kg
- inorganic potassium fertiliser, as K2O: 0.000374619 kg; source Zheljazkov V.D. 2010; lognormal variance with pedigree 0.156177, pedigree (2,1,5,1,1)
  Calculated based on literature values or expert estimation: The total amount of nutrient (Zheljazkov et al. 2010a) multiplied by the country-share of fertiliser type (IFA 2014). See supporting documentation 'WFLDB-Documentation.pdf' chapter 'Fertiliser application' for L3 and L4 data (https://ecoquery.ecoinvent.org/File/Reports).
  properties: wet mass 1 kg, dry mass 1 kg
- potassium sulfate: 9.88439e-5 kg; source Zheljazkov V.D. 2010; lognormal variance with pedigree 0.156177, pedigree (2,1,5,1,1)
  The exchange has been updated from 'potassium sulfate, as K2O' into 'potassium sulfate' and therefore its amount has been scaled (multiplied) from 0.0001 kg by 1.85 kg of 'potassium sulfate' per kg of 'potassium sulfate, as K2O'. Original comment of the exchange is: Calculated based on literature values or expert estimation: The total amount of nutrient (Zheljazkov et al. 2010a) multiplied by the country-share of fertiliser type (IFA 2014). See supporting documentation 'WFLDB-Documentation.pdf' chapter 'Fertiliser application' for L3 and L4 data (https://ecoquery.ecoinvent.org/File/Reports).
  properties: dry mass 1 kg, wet mass 1 kg
- inorganic phosphorus fertiliser, as P2O5: 0.0012642 kg; source Brown B. 2003; lognormal variance with pedigree 0.156177, pedigree (2,1,5,1,1)
  Calculated based on literature values or expert estimation: The total amount of nutrient (Brown et al. 2003) multiplied by the country-share of fertiliser type (IFA 2014). See supporting documentation 'WFLDB-Documentation.pdf' chapter 'Fertiliser application' for L3 and L4 data (https://ecoquery.ecoinvent.org/File/Reports).
  Corresponds to 19.8 kg/ha
  properties: wet mass 1 kg, dry mass 1 kg
- application of plant protection product, by field sprayer: 2.38095e-5 ha; source Zheljazkov V.D. 2010; lognormal variance with pedigree 0.156664, pedigree (2,2,5,1,1)
  Literature value or expert estimation (Zheljazkov et al. 2010a). 1.5 treatments a long the crop period has been considered as an average of 4 years.
- packaging, for fertilisers: 0.0137173 kg; lognormal variance with pedigree 0.0912, pedigree (4,3,5,5,4)
  Total amount of active substance/s of fertilisers needed for the production of 'mint' is calculated to be circa 6.86E-03 kg. Fertiliser/s used in this dataset is/are: 'ammonia, liquid', 'ammonium nitrate, as N', 'ammonium sulfate, as N', 'nitrogen fertiliser, as N', 'phosphate fertiliser, as P2O5', 'phosphate rock, as P2O5, beneficiated, dry', 'potassium chloride, as K2O', 'potassium fertiliser, as K2O', 'potassium sulfate, as K2O', 'urea, as N'. The total amount of active substance/s is doubled in order to account for the packaging of the dilluted product of fertiliser/s that is/are applied. Therefore, 1.37E-02 kg of packaging for fertilisers is justified with this exchange.
  properties: dry mass 1 kg, carbon content, fossil 0.825301, price 0.0642 EUR2005, wet mass 1 kg, heating value, net 25.01 MJ
  note on carbon content, fossil: Considering a chemical formula (C2H4)n for polyethylene, carbon content-fossil is calculated to be 0.856286 kg of Carbon per kg of dry mass.

## Inputs from nature
- Transformation, to arable land, unspecified use [natural resource, land]: 0.00793651 m2; lognormal variance with pedigree 0.0762144, pedigree (2,1,5,1,1)
  10000 m2 divided by the life time of the crop.
- Transformation, from arable land, unspecified use [natural resource, land]: 0.00793651 m2; lognormal variance with pedigree 0.0762144, pedigree (2,1,5,1,1)
  10000 m2 divided by the life time of the crop.
- Occupation, annual crop [natural resource, land]: 0.159159 m2*year; lognormal variance with pedigree 0.0520616, pedigree (2,1,5,1,1)
  Related to the duration from harvest date of previous crop to harvest date of main crop: 366 days.
- Carbon dioxide, in air [natural resource, in air]: 0.520968 kg; lognormal variance with pedigree 0.0458498, pedigree (2,2,5,1,1)
  CO2 uptake by biomass
- Energy, gross calorific value, in biomass [natural resource, biotic]: 6.23603 MJ; lognormal variance with pedigree 0.0458498, pedigree (2,2,5,1,1)
  Gross energy content is related to MJ/kg dry matter of product. Source: ecoinvent data.

## Emissions to nature
- Ammonia [air, non-urban air or from high stacks]: 0.000258079 kg; source EEA 2013; lognormal variance with pedigree 0.0767216, pedigree (2,2,5,1,1)
  Calculated value - EMEP/EEA (2013). See 'WFLDB-Guidelines.pdf', available at https://ecoquery.ecoinvent.org/File/Reports.
- Zinc, ion [water, ground-]: 2.88714e-7 kg; source Freiermuth R.  2006; lognormal variance with pedigree 0.388938, pedigree (2,2,5,1,1)
  Calculated value - Freiermuth (2006). See 'WFLDB-Guidelines.pdf', available at https://ecoquery.ecoinvent.org/File/Reports. This emission might be overestimated in case of basic soils.
- Nitrogen oxides [air, non-urban air or from high stacks]: 0.000140816 kg; source EEA 2013; lognormal variance with pedigree 0.156664, pedigree (2,2,5,1,1)
  Calculated value - EEA/EMEP (2013). See 'WFLDB-Guidelines.pdf', available at https://ecoquery.ecoinvent.org/File/Reports.
- Mercury [water, ground-]: 1.51654e-11 kg; source Freiermuth R.  2006; lognormal variance with pedigree 0.388938, pedigree (2,2,5,1,1)
  (same comment as for Zinc, ion)
- Dinitrogen monoxide [air, non-urban air or from high stacks]: 6.16707e-5 kg; source IPCC 2006; lognormal variance with pedigree 0.156664, pedigree (2,2,5,1,1)
  Calculated value - IPCC (2006). See 'WFLDB-Guidelines.pdf', available at https://ecoquery.ecoinvent.org/File/Reports.
- Water [water, surface water]: 0.0921905 m3; lognormal variance with pedigree 0.156177, pedigree (2,1,5,1,1)
  Calculated value - Emission calculated from water balance. See 'WFLDB-Guidelines.pdf', available at https://ecoquery.ecoinvent.org/File/Reports.
- Water [air, non-urban air or from high stacks]: 0.0942857 m3; lognormal variance with pedigree 0.156177, pedigree (2,1,5,1,1)
  (same comment as for Water)
- Water [water, ground-]: 0.0230476 m3; lognormal variance with pedigree 0.156177, pedigree (2,1,5,1,1)
  (same comment as for Water)
- Chromium, ion [water, surface water]: 1.64111e-7 kg; source Freiermuth R.  2006; lognormal variance with pedigree 0.388938, pedigree (2,2,5,1,1)
  Calculated value - Freiermuth (2006). See 'WFLDB-Guidelines.pdf', available at https://ecoquery.ecoinvent.org/File/Reports.
- Phosphate [water, surface water]: 1.0243e-5 kg; source Prasuhn V.  2006; lognormal variance with pedigree 0.207866, pedigree (2,2,5,1,1)
  Calculated value - Prasuhn (2006). See 'WFLDB-Guidelines.pdf', available at https://ecoquery.ecoinvent.org/File/Reports.
- Cadmium [soil, agricultural]: 5.26992e-8 kg; = 8.50904761905e-08 + ( - 3.239126e-08)*heavyMetalUptakeSwitch; source Freiermuth R.  2006
  Comment on mathematicalRelation:
  8.50904761905e-08 from Calculated value - Freiermuth (2006). See 'WFLDB-Guidelines.pdf', available at https://ecoquery.ecoinvent.org/File/Reports.
  Heavy metal uptake can be excluded by setting the parameter heavyMetalUptakeSwitch to zero.
- Chromium [soil, agricultural]: 4.26574e-7 kg; = 6.00428571429e-07 + ( - 1.73855e-07)*heavyMetalUptakeSwitch; source Freiermuth R.  2006
  Comment on mathematicalRelation:
  6.00428571429e-07 from Calculated value - Freiermuth (2006). See 'WFLDB-Guidelines.pdf', available at https://ecoquery.ecoinvent.org/File/Reports.
  -1.73855e-07 from Crop, default, heavy metals uptake model
  Heavy metal uptake can be excluded by setting the parameter heavyMetalUptakeSwitch to zero.
- Copper [soil, agricultural]: -2.10612e-6 kg; = 7.86047619048e-09 + ( - 2.1139811e-06)*heavyMetalUptakeSwitch; source Freiermuth R.  2006
  Comment on mathematicalRelation:
  7.86047619048e-09 from Calculated value - Freiermuth (2006). See 'WFLDB-Guidelines.pdf', available at https://ecoquery.ecoinvent.org/File/Reports.
  -2.1139811e-06 from Crop, default, heavy metals uptake model
  Heavy metal uptake can be excluded by setting the parameter heavyMetalUptakeSwitch to zero.
- Lead [soil, agricultural]: -1.0522e-7 kg; = 6.72857142857e-08 + ( - 1.7250563e-07)*heavyMetalUptakeSwitch; source Freiermuth R.  2006
  Comment on mathematicalRelation:
  6.72857142857e-08 from Calculated value - Freiermuth (2006). See 'WFLDB-Guidelines.pdf', available at https://ecoquery.ecoinvent.org/File/Reports.
  -1.7250563e-07 from Crop, default, heavy metals uptake model
  Heavy metal uptake can be excluded by setting the parameter heavyMetalUptakeSwitch to zero.
- Mercury [soil, agricultural]: -1.11358e-8 kg; = 1.80158730159e-09 + ( - 1.2937364e-08)*heavyMetalUptakeSwitch; source Freiermuth R.  2006
  Comment on mathematicalRelation:
  1.80158730159e-09 from Calculated value - Freiermuth (2006). See 'WFLDB-Guidelines.pdf', available at https://ecoquery.ecoinvent.org/File/Reports.
  -1.2937364e-08 from Crop, default, heavy metals uptake model
  Heavy metal uptake can be excluded by setting the parameter heavyMetalUptakeSwitch to zero.
- Phosphate [water, ground-]: 3.41429e-6 kg; source Prasuhn V.  2006; lognormal variance with pedigree 0.207866, pedigree (2,2,5,1,1)
  Calculated value - Prasuhn (2006). See 'WFLDB-Guidelines.pdf', available at https://ecoquery.ecoinvent.org/File/Reports. This emission might be overestimated in case of basic soils.
- Zinc [soil, agricultural]: -8.99935e-6 kg; = 1.21598412698e-06 + ( - 1.0215337e-05)*heavyMetalUptakeSwitch; source Freiermuth R.  2006
  Comment on mathematicalRelation:
  1.21598412698e-06 from Calculated value - Freiermuth (2006). See 'WFLDB-Guidelines.pdf', available at https://ecoquery.ecoinvent.org/File/Reports.
  -1.0215337e-05 from Crop, default, heavy metals uptake model
  Heavy metal uptake can be excluded by setting the parameter heavyMetalUptakeSwitch to zero.
- Nickel [soil, agricultural]: -2.26856e-7 kg; = 1.06371428571e-07 + ( - 3.332274e-07)*heavyMetalUptakeSwitch; source Freiermuth R.  2006
  Comment on mathematicalRelation:
  1.06371428571e-07 from Calculated value - Freiermuth (2006). See 'WFLDB-Guidelines.pdf', available at https://ecoquery.ecoinvent.org/File/Reports.
  Heavy metal uptake can be excluded by setting the parameter heavyMetalUptakeSwitch to zero.
- Glyphosate [soil, agricultural]: 7.93651e-6 kg; lognormal variance with pedigree 0.0767216, pedigree (2,2,5,1,1)
  Calculated value - 100% emission in soil. See 'WFLDB-Guidelines.pdf', available at https://ecoquery.ecoinvent.org/File/Reports.
- Cadmium, ion [water, surface water]: 1.74429e-9 kg; source Freiermuth R.  2006; lognormal variance with pedigree 0.388938, pedigree (2,2,5,1,1)
  (same comment as for Chromium, ion)
- Terbacil [soil, agricultural]: 2.38095e-5 kg; lognormal variance with pedigree 0.0767216, pedigree (2,2,5,1,1)
  (same comment as for Glyphosate)
- Copper, ion [water, surface water]: 2.20841e-7 kg; source Freiermuth R.  2006; lognormal variance with pedigree 0.388938, pedigree (2,2,5,1,1)
  (same comment as for Chromium, ion)
- Lead [water, surface water]: 4.43079e-8 kg; source Freiermuth R.  2006; lognormal variance with pedigree 0.388938, pedigree (2,2,5,1,1)
  (same comment as for Chromium, ion)
- Mercury [water, surface water]: 3.61333e-10 kg; source Freiermuth R.  2006; lognormal variance with pedigree 0.388938, pedigree (2,2,5,1,1)
  (same comment as for Chromium, ion)
- Nickel, ion [water, surface water]: 1.13856e-7 kg; source Freiermuth R.  2006; lognormal variance with pedigree 0.388938, pedigree (2,2,5,1,1)
  (same comment as for Chromium, ion)
- Zinc, ion [water, surface water]: 2.46698e-7 kg; source Freiermuth R.  2006; lognormal variance with pedigree 0.388938, pedigree (2,2,5,1,1)
  (same comment as for Chromium, ion)
- Cadmium, ion [water, ground-]: 7.0619e-10 kg; source Freiermuth R.  2006; lognormal variance with pedigree 0.388938, pedigree (2,2,5,1,1)
  (same comment as for Zinc, ion)
- Phosphorus [water, surface water]: 4.39143e-6 kg; source Prasuhn V.  2006; lognormal variance with pedigree 0.207866, pedigree (2,2,5,1,1)
  Calculated value - Prasuhn (2006) and SQCB-Erosion. See 'WFLDB-Guidelines.pdf', available at https://ecoquery.ecoinvent.org/File/Reports.
- Chromium, ion [water, ground-]: 3.20317e-7 kg; source Freiermuth R.  2006; lognormal variance with pedigree 0.388938, pedigree (2,2,5,1,1)
  (same comment as for Zinc, ion)
- Copper, ion [water, ground-]: 5.04175e-8 kg; source Freiermuth R.  2006; lognormal variance with pedigree 0.388938, pedigree (2,2,5,1,1)
  (same comment as for Zinc, ion)
- Carbon dioxide, fossil [air, non-urban air or from high stacks]: 0.000970984 kg; lognormal variance with pedigree 0.0458498, pedigree (2,2,5,1,1)
  Calculated value - CO2 emissions from urea and lime. See 'WFLDB-Guidelines.pdf', available at https://ecoquery.ecoinvent.org/File/Reports.
- Lead [water, ground-]: 2.65413e-9 kg; source Freiermuth R.  2006; lognormal variance with pedigree 0.388938, pedigree (2,2,5,1,1)
  (same comment as for Zinc, ion)

## Sampling procedure
WFLDB Methodological Guidelines for the Life Cycle Inventory of Agricultural Products in the latest version, available at: (Report section: https://v30.ecoquery.ecoinvent.org/File/Reports). Data sources: Data were categorised from level 0 (L0) to level (L4) as follows: L0 = estimate, proxy; L1 = statistical data (e.g. FAOSTAT); L2 = L1 adapted to crop and country; L3 = literature data or L1 resp. L2 data approved by experts; medium detailing (i.e. kg of total N-fertiliser); L4 = L3 data of high detailing (i.e. portion N-fertiliser types).In this dataset data were obtained for yield: L3; Fertilisers: L3; Pesticides: L4; Machinery: L4; Irrigation: L3. For information regarding the calculation of individual exchanges see supporting documentation WFLDB-Documentation.pdf.

## Extrapolations
This dataset has been extrapolated from year 2008 to the year of the calculation (2021). The uncertainty has been adjusted accordingly.

## Review by Assumpció ANTON 2016-05-30
Be aware that the use of statistics in input calculations could provide some specific inputs not common for specific crops, this should be corrected if better information is available and better reflexed in DQR . Currently, I would dissent for some of good marks provided, being a revision of criteria applied advisable.

Pesticides will need to be amended periodically checking for update of pesticides' ban.
