# hydroformylation of butene

Dataset: EcoSpold 2, unit process
Geography: RoW
Time period: 1989-01-01 to 2021-12-31
Technology level: current
Classification: EcoSpold01Categories: chemicals/organics
Classification: ISIC rev.4 ecoinvent: 2011:Manufacture of basic chemicals
Tags: combined production
Scenario: Business-as-Usual
System model: Allocation, cut-off by classification
Share of production covered: 100 %
Generated by: Bo Weidema
Published in: Sutter, J. 2007
Database: ecoinvent
isCopyrightProtected: true
accessRestrictedTo: 1

## General comment
This data represents the multioutput-process "hydroformulation of butene." This process delivers the co-products 1-pentanol, 2-methyl-1-butanol and 3-methyl-1-butanol based off of 1 kg of butene. The raw materials are modelled with stoichiometric calculations. The energy consumption and auxilliaries are modelled with data from a similar process. The emissions are estimated. Infrastructure is included with a default value.
[This dataset was already contained in the ecoinvent database version 2. It was not individually updated during the transfer to ecoinvent version 3. Life Cycle Impact Assessment results may still have changed, as they are affected by changes in the supply chain, i.e. in other datasets. This dataset was generated following the ecoinvent quality guidelines for version 2. It may have been subject to central changes described in the ecoinvent version 3 change report (http://www.ecoinvent.org/database/ecoinvent-version-3/reports-of-changes/), and the results of the central updates were reviewed extensively. The changes added e.g. consistent water flows and other information throughout the database. The documentation of this dataset can be found in the ecoinvent reports of version 2, which are still available via the ecoinvent website. The change report linked above covers all central changes that were made during the conversion process.]

## Included activities start
From the reception of butene at the factory gate.

## Included activities end
This activity includes the hydroformylation by a carbon monoxide and hydrogen stream and the subsequent hydrogenation resulting in the production of the three isomers 1-pentanol, 2-methyl-1-butanol and 3-methyl-1-butanol.

## Geography
The inventory is modelled for Europe.

## Technology
Hydroformylation of butenes (1-butene, 2-butene, and isobutene, all with the gross formula C4H8) with a CO (50% mass of butenes) and H (7% mass of butenes) gas stream, yields the amyl alcohols (C5H12O).
The C4-olefins are reacted with a carbon monoxide – hydrogen mixture under the catalytic action of cobalt- or rhodium- containing compounds to yield C5-aldehydes. Hydrogenation of the latter gives the corresponding C5-alcohols.
a) Oxo reactor (100 – 200 °C, 10 – 45 MPa); b) Separator; c) Catalyst removal (decobalting); d) Hydrogenation unit (50 – 250 °C, 0.3 – 24 MPa); e) Catalyst recovery
Raffinate I from various cracking processes (after the separation of 1,3-butadiene) is used as raw material and contains ca. 44 – 49 vol % isobutene, 24 – 28 vol % 1-butene, 19 – 21 vol % 2-butene, and 8 – 11 vol % C4-hydrocarbons. Further processing of this C4-raffinate converts isobutene by reaction with methanol to methyl tert-butyl ether. The remaining C4-olefin mixture (raffinate II) is the most important raw material in the industrial production of 1-pentanol and 2-methyl-1-butanol.
Cobalt-catalyzed hydroformylation of n-butenes and subsequent hydrogenation yield a mixture containing ca. 70 % 1-pentanol and 30 % 2-methyl-1-butanol. If rhodium – triphenylphosphane is used as catalyst, a mixture containing up to 90 % 1-pentanol and 10 % 2-methyl-1-butanol is obtained.
2-Butene can be converted to mixtures of C5-aldehydes of varying composition, depending on the rhodium-containing catalyst system and reaction conditions. Thus, a ratio of 1.13:1 of 1-pentanal to 2-methylbutanal is obtained with a rhodium – phosphite catalyst at 130 °C; a ratio of 0.2:1 is obtained by hydroformylation with a rhodium – tricyclohexylphosphane catalyst at 110 °C. The dependence of the n:i ratio on catalyst species and temperature during conversion of 1-butene and 2-butene with a rhodium –triarylphosphane catalyst system is given in.
References:
Lappe, P., Hoffmann, T.: Pentanols. In: Ullmann's Encyclopedia of Industrial Chemistry, Seventh Edition, 2004 Electronic Release (ed. Fiedler E., Grossmann G., Kersebohm D., Weiss G. and Witte C.). 7 th Electronic Release Edition. Wiley InterScience, New York, Online-Version under: http://www.mrw.interscience.wiley.com/ueic/articles

## Time period
Time of publications.

## Parameters
- sum of reference products: 1.57056 kg; name sum_RP; = (56.12+28.02+4)/56.12
  Stoichiometric output per kg butene calculated as the molar weight of the 3 components, butene, CO and 2H2 divided by the amount of butene
- efficiency: 0.95 dimensionless; name process_efficiency
  process efficiency (output relative to input)

## Reference product
- 1-pentanol: 1 kg; name x1; = (sum_RP*process_efficiency)*x1_PV/( x3_PV+ x2_PV+ x1_PV); By-product classification allocatable product; CPC 34139: Other alcohols, phenols, phenol-alcohols, and their halogenated, sulphonated, nitrated or nitrosated derivativ[…]; CAS 71-41-0
  1-Pentanol is a colourless liquid of characteristic odor. It is only sparingly miscible with water at 20 °C. However, it is almost completely miscible with most organic solvents.
  1-Pentanol is particularly useful as a solvent, extracting agent, and starting material for lubricant additives (zinc dipentyl dithiophosphates) and for auxiliaries in flotation (xanthates). It is used as solvent in the reaction of substituted diamines with diisocyanates and for the production of sulfurized olefins, polyacrylates, and pyridine-2,3-dicarboxylic acid derivatives. 1-Pentanol is employed as an extracting agent in the purification of phosphoric acid and the separation of strontium chloride from aqueous metal chloride solutions.
  Other industrially important application of 1-pentanol are the synthesis of starting materials for the production of liquid crystals, dyes, flavorings, and special catalysts.
  1-Pentanol is used as starting material for several syntheses in the pharmaceutical industry. Examples include the production of isoindolinone derivatives, 2-alkylbenzimidazoles, and condensed pyridine - pyrazine derivatives. In the plant protection sector it is used as starting material in the synthesis of cyclopropanecarboxylates and phenylurea derivatives.
  1-Pentanol is employed in the production of many esters that are applied in different fields.
  EcoSpold01Location=RER
  production volume 7.176e7 kg; name x1_PV
    Data regarding Primary Amyl Alcohol production were obtained from The Dow Chemical Company (Product Safety Assessment DOW™ Primary Amyl Alcohol, May 2009. Webpage accessed 2011/03/08). The share of 1-pentanol was considered 46% (mass).
  property heating value, net 37.14 MJ
    LHV is calculated based on the elemental composition of the substance. Based on the CAS number of the substance (000071-41-0), the chemical formula of the substance is found to be: C5H12O, (PubChem 2020).
    Reference: Kim, S., Chen, J., Cheng, T., Gindulyte, A., He, J., He, S., Li, Q., Shoemaker, B. A., Thiessen, P. A., Yu, B., Zaslavsky, L., Zhang, J., & Bolton, E. E. (2019). PubChem 2019 update: improved access to chemical data. Nucleic acids research, 47(D1), D1102–D1109. https://doi.org/10.1093/nar/gky1033
  property dry mass 1 kg; name x1_DM
  property price 1.15 EUR2005; name x1_price_EUR2005
    Temporary price data. Calculated as 90% of purchasers price based on: 2004 import and export prices (total trades (USD) divided by total weight (kg) in EU27, USA, China, Japan and India) from UN Commodity Trade Statistics Database (http://data.un.org/Explorer.aspxDatabase [Accessed 2 July 2010]). Commodity: Pentanol isomers
  property wet mass 1 kg; name x1_WM
  property carbon content, fossil 0.68182; name x1_C_content_fossil
    fossil carbon content on a dry matter basis
  property carbon content 0.68182
    carbon content on a dry matter basis (reserved; not for manual entry)
  properties: carbon allocation 0.68182 kg
- 3-methyl-1-butanol: 0 kg; name x3; CPC 34139: Other alcohols, phenols, phenol-alcohols, and their halogenated, sulphonated, nitrated or nitrosated derivativ[…]; By-product classification allocatable product; CAS 123-51-3
  3-methyl-1-butanol is a colourless liquid of characteristic odor. It is only sparingly miscible with water at 20 °C. However, it is almost completely miscible with most organic solvents.
  3-Methyl-1-butanol is used mainly as a solvent and extracting agent in several practical applications. An important use is in the production of di(3-methylbutyl) ether; the latter is a component of a catalyst system used for the industrial production of polypropylene. Other uses of 3-methyl-1-butanol in catalysis are discussed in.
  3-Methyl-1-butanol is used in the production of herbicides based on 1,2,4-triazolecarboxamides, N-methyl- 4-pyridone derivatives, and substituted phenylhydrazones. It is also employed for the synthesis of fragrances and flavors: 3-methyl-1-butanol reacts e.g., with ethylidenenorbornene to give the corresponding norbornyl ether, with bicyclopentadiene to yield tricyclo[5.2.1.02.6]dec-3-en-8(9)-yl-3-methylbutyl ether, and with vanillin alcohol to give the corresponding vanillin ether derivative.
  3-Methyl-1-butanol is also used for the production of various additives, corrosion inhibitors, and azo dyes. It is a component of surfactants.
  EcoSpold01Location=RER
  production volume 0 kg; name x3_PV
    Data regarding Primary Amyl Alcohol production were obtained from The Dow Chemical Company (Product Safety Assessment DOW™ Primary Amyl Alcohol, May 2009. Webpage accessed 2011/03/08). The share of 3-methyl-1-butanol was considered 34% (mass).
  property price 1.15 EUR2005; name x3_price_EUR2005
    (same comment as for 1-pentanol)
  property wet mass 1 kg; name x3_WM
  property dry mass 1 kg; name x3_DM
  property carbon content, fossil 0.68182; name x3_C_content_fossil
    fossil carbon content on a dry matter basis
  property heating value, net 37.14 MJ
    LHV is calculated based on the elemental composition of the substance. Based on the CAS number of the substance (000123-51-3), the chemical formula of the substance is found to be: C5H12O, (PubChem 2020).
    Reference: Kim, S., Chen, J., Cheng, T., Gindulyte, A., He, J., He, S., Li, Q., Shoemaker, B. A., Thiessen, P. A., Yu, B., Zaslavsky, L., Zhang, J., & Bolton, E. E. (2019). PubChem 2019 update: improved access to chemical data. Nucleic acids research, 47(D1), D1102–D1109. https://doi.org/10.1093/nar/gky1033
  property carbon content 0.68182
    carbon content on a dry matter basis (reserved; not for manual entry)
  properties: carbon allocation 0.68182 kg
- 2-methyl-1-butanol: 0 kg; name x2; CPC 341: Basic organic chemicals; By-product classification allocatable product; CAS 137-32-6
  EcoSpold01Location=RER
  2-Methyl-1-butanol (CAS-No. 137-32-6, C5H11OH) is a colourless liquid of characteristic odour. It is only sparingly miscible with water at 20 °C. However, it is almost completely miscible with most organic solvents.
  2-Methyl-1-butanol, like 1-pentanol, is used mainly as a solvent and an extracting agent and for the production of various esters. Other important applications of 2-methyl-1-butanol include its use in the production of flotation reagents, liquid crystals, plant protection agents, fragrances, and corrosion inhibitors. 2-Methyl-1-butanol is also part of the catalyst system employed in the polymerization of caprolactam; it is used as a fuel additive and in the extraction of crude oil. A mixture of 1-pentanol and 2-methyl-1-butanol is generally used in practical applications instead of either of the pure alcohols.
  production volume 0 kg; name x2_PV
    Data regarding Primary Amyl Alcohol production were obtained from The Dow Chemical Company (Product Safety Assessment DOW™ Primary Amyl Alcohol, May 2009. Webpage accessed 2011/03/08). The share of 1-pentanol was considered 20% (mass).
  property carbon content, fossil 0.68182; name x2_C_content_fossil
    fossil carbon content on a dry matter basis
  property heating value, net 37.14 MJ
    LHV is calculated based on the elemental composition of the substance. Based on the CAS number of the substance (000137-32-6), the chemical formula of the substance is found to be: C5H12O, (PubChem 2020).
    Reference: Kim, S., Chen, J., Cheng, T., Gindulyte, A., He, J., He, S., Li, Q., Shoemaker, B. A., Thiessen, P. A., Yu, B., Zaslavsky, L., Zhang, J., & Bolton, E. E. (2019). PubChem 2019 update: improved access to chemical data. Nucleic acids research, 47(D1), D1102–D1109. https://doi.org/10.1093/nar/gky1033
  property price 1.15 EUR2005; name x2_price_EUR2005
    (same comment as for 1-pentanol)
  property wet mass 1 kg; name x2_WM
  property dry mass 1 kg; name x2_DM
  property carbon content 0.68182
    carbon content on a dry matter basis (reserved; not for manual entry)
  properties: carbon allocation 0.68182 kg

## Inputs from technosphere
- heat, district or industrial, other than natural gas: 0 MJ; source Chauvel, A. 1989; pedigree (1,1,1,1,1)
  Estimation. Estimated with data from the production of isobutanol from the hydroformylation of propylene. This process is considered to be similar to the hydroformylation of butene.
  EcoSpold01Location=RER
  Uncertainty: Estimation
  properties: heating value, net 1 MJ
- hydrogen, liquid: 0.0477709 kg; name hydrogen_input; = butene_input*4/56.12; source Frischknecht R. 2007; lognormal variance with pedigree 0.078, pedigree (4,5,5,5,1)
  Calculation. Raw materials are calculated with a yield of 95%.
  EcoSpold01Location=RER
  Uncertainty: Estimation
  properties: wet mass 1 kg, dry mass 1 kg, heating value, net 120.21 MJ
- chemical factory, organics: 2.49029e-10 unit; = 0.00000000037156*(x1+x2+x3)/(process_efficiency*sum_RP); lognormal variance with pedigree 0.448, pedigree (4,5,5,5,5)
  EcoSpold01Location=RER
  Estimation. This module assumes a built area of about 4.2 ha, an average output of 50'000 t/a, and plant life of fifty years.
  Uncertainty: Estimation
- electricity, medium voltage: 0 kWh; source Chauvel, A. 1989; pedigree (1,1,1,1,1)
  EcoSpold01Location=UCTE
  Estimation. Estimated with data from the production of isobutanol from the hydroformylation of propylene. This process is considered to be similar to the hydroformylation of butene.
  Uncertainty: Estimation
- butene, mixed: 0.670226 kg; name butene_input; = (x1+x2+x3)/(sum_RP*process_efficiency); source Frischknecht R. 2007; lognormal variance with pedigree 0.078, pedigree (4,5,5,5,1)
  Calculation. Raw materials are calculated with a yield of 95%.
  EcoSpold01Location=RER
  Uncertainty: Stoechiometric calculation
  properties: carbon content, fossil 0.857143, dry mass 1 kg, wet mass 1 kg, heating value, net 45.3 MJ
  note on carbon content, fossil: With mixed butenes, the four isomers 1-butene, cis-2-butene, trans-2-butene and isobutene are summed up. They are unsaturated olefinic hydrocarbons with the formula C4H8 (ecoinvent v2.2 report 11_II). MW=56
  note on heating value, net: Indicative value. Reference: Fuels - Higher and Lower Calorific Values, available at: https://www.engineeringtoolbox.com/fuels-higher-calorific-values-d_169.html
- water, deionised: 1.29494 kg; = 1.9321*(x1+x2+x3)/(process_efficiency*sum_RP); source Chauvel, A. 1989; lognormal variance with pedigree 0.086, pedigree (4,5,5,5,3)
  EcoSpold01Location=CH
  Estimation. Estimated with data from the production of isobutanol from the hydroformylation of propylene. This process is considered to be similar to the hydroformylation of butene.
  Uncertainty: Estimation
  properties: wet mass 1 kg
- heat, district or industrial, natural gas: 0 MJ; source Chauvel, A. 1989; pedigree (1,1,1,1,1)
  Estimation. Estimated with data from the production of isobutanol from the hydroformylation of propylene. This process is considered to be similar to the hydroformylation of butene.
  Uncertainty: Estimation
  properties: heating value, net 1 MJ
- carbon monoxide: 0.334635 kg; name CO_input; = butene_input*28.02/56.12; source Frischknecht R. 2007; lognormal variance with pedigree 0.078, pedigree (4,5,5,5,1)
  EcoSpold01Location=RER
  Calculation. Raw materials are calculated with a yield of 95%.
  Uncertainty: Stoechiometric calculation
  properties: wet mass 1 kg, carbon content, fossil 0.428571, dry mass 1 kg, heating value, net 12.99 MJ
  note on carbon content, fossil: CO. It is assumed that CO is produced from partial combustion of heavy heating oil.
- nitrogen, liquid: 0.00647843 kg; = 9.66604E-03*(x1+x2+x3)/(process_efficiency*sum_RP); source Chauvel, A. 1989; lognormal variance with pedigree 0.078, pedigree (4,5,5,5,1)
  (same comment as for heat, district or industrial, other than natural gas)
  properties: wet mass 1 kg, dry mass 1 kg
- heat, district or industrial, other than natural gas: 0.00779863, 19.2317 MJ (2 entries); source Chauvel, A. 1989; lognormal variance with pedigree 0.086, pedigree (4,5,5,5,3)
  (same comment as for heat, district or industrial, other than natural gas)
- electricity, medium voltage: 0.00752644, 0.00144325, 0.0242291, 0.352391, 0.0496697, 0.161831 kWh (6 entries); source Chauvel, A. 1989; lognormal variance with pedigree 0.086, pedigree (4,5,5,5,3)
  (same comment as for electricity, medium voltage)
- heat, district or industrial, natural gas: 0.205389, 13.3265 MJ (2 entries); source Chauvel, A. 1989; lognormal variance with pedigree 0.086, pedigree (4,5,5,5,3)
  (same comment as for heat, district or industrial, natural gas)

## Inputs from nature
- Water, cooling, unspecified natural origin [natural resource, in water]: 0.155392 m3; = 0.23185*(x1+x2+x3)/(sum_RP*process_efficiency); source Chauvel, A. 1989; lognormal variance with pedigree 0.086, pedigree (4,5,5,5,3)
  (same comment as for heat, district or industrial, natural gas)
  property water content 9081.65; name water_content
  property water in wet mass 999.89 kg; name WWM

## Emissions to nature
- COD, Chemical Oxygen Demand [water, surface water]: 0.0106164 kg; = butene_to_water*3.3; lognormal variance with pedigree 0.188, pedigree (4,5,5,5,5)
  Calculated from the amount of butene in the treated waste water.
  It is assumed that the manufacturing plants are located in an urban/industrial area and consequently the emissions are categorised as emanating in a high population density area.
  Water emissions are assumed to be emitted into rivers.
  Uncertainty: Calculated from the water emissions
- Carbon monoxide, fossil [air, urban air close to ground]: 0.00066927 kg; = CO_input*0.002; lognormal variance with pedigree 0.798, pedigree (4,5,5,5,5)
  Estimation. Air emissions occurring from the purge vent, the distillation vent and fugitive emission sources were estimated to 0.2% of the butene and the carbon monoxide input and 5% of the hydrogen input. The remaining CO is oxidated to CO2
  The carbon contained in the removed butene during waste water treatment was accounted as CO2 emissions to air.
  It is assumed that the manufacturing plants are located in an urban/industrial area and consequently the emissions are categorised as emanating in a high population density area.
  Uncertainty: Estimation
- DOC, Dissolved Organic Carbon [water, surface water]: 0.00276669 kg; = butene_to_water*0.86; lognormal variance with pedigree 0.188, pedigree (4,5,5,5,5)
  DOC assumed equal to TOC.
  It is assumed that the manufacturing plants are located in an urban/industrial area and consequently the emissions are categorised as emanating in a high population density area.
  Water emissions are assumed to be emitted into rivers.
  Uncertainty: Calculated from the water emissions
- Butene [water, surface water]: 0.00321708 kg; name butene_to_water; = butene_input*((1-process_efficiency)-0.002)*0.1; lognormal variance with pedigree 0.448, pedigree (4,5,5,5,5)
  Estimation. The remaining amount of unreacted butene (4.8 % of the input) was assumed to leave the production process with the waste water. Further it was assumed that this waste water is treated in a internal waste water plant. The removal efficiency for butene was assumed with 90%. The carbon contained in the
  removed butene was accounted as CO2 emissions to air.
  It is assumed that the manufacturing plants are located in an urban/industrial area and consequently the emissions are categorised as emanating in a high population density area.
  The emissions into water are assumed to be emitted into rivers.
  Uncertainty: Estimation
  property carbon content, fossil 0.85628; name butene_to_water_C_content_fossil
  property dry mass 1 kg; name butene_to_water_DM
  property wet mass 1 kg; name butene_to_water_WM
- TOC, Total Organic Carbon [water, surface water]: 0.00276669 kg; = butene_to_water*0.86; lognormal variance with pedigree 0.188, pedigree (4,5,5,5,5)
  Calculation from the amount of butene in the treated waste water.
  It is assumed that the manufacturing plants are located in an urban/industrial area and consequently the emissions are categorised as emanating in a high population density area.
  Water emissions are assumed to be emitted into rivers.
  Uncertainty: Calculated from the water emissions
- Butene [air, urban air close to ground]: 0.00134045 kg; = butene_input*0.002; lognormal variance with pedigree 0.188, pedigree (4,5,5,5,5)
  (same comment as for Carbon monoxide, fossil)
  property carbon content, fossil 0.85628; name C_content_fossil
  property wet mass 1 kg; name WM
  property dry mass 1 kg; name DM
- BOD5, Biological Oxygen Demand [water, surface water]: 0.000530819 kg; = butene_to_water*3.3*0.05; lognormal variance with pedigree 0.188, pedigree (4,5,5,5,5)
  BOD assumed to be 0.05*COD due to waste water treatment.
  It is assumed that the manufacturing plant is located in an urban/industrial area and consequently the emissions are categorised as emanating in a high population density area.
  The emissions into water are assumed to be emitted into rivers.
  Uncertainty: Calculated from the water emissions
- Carbon dioxide, fossil [air, urban air close to ground]: 0.0479458 kg; = CO_input*((1-process_efficiency)-0.002)*44/28+butene_input*((1-process_efficiency)-0.002)*0.9*44/56.11; lognormal variance with pedigree 0.1786, pedigree (4,5,5,5,5)
  Air emissions occurring from the purge vent, the distillation vent and fugitive emission sources were estimated to 0.2% of the butene and the carbon monoxide input and 5% of the hydrogen input. 4.8% of the carbon monoxide is oxidised to CO2. 4.8% of the butene is in treated waste water, with 90% efficiency, i.e. 90% of the 4.8% is oxidised to CO2.
  Uncertainty: Calculated from the water treatment
- Hydrogen [air, urban air close to ground]: 0.00238854 kg; = hydrogen_input*(1-process_efficiency); lognormal variance with pedigree 0.188, pedigree (4,5,5,5,5)
  Estimation. Air emissions occurring from the purge vent, the distillation vent and fugitive emission sources were estimated to 0.2% of the butene and the carbon monoxide input and 1% of the hydrogen input. The remaining CO is oxidated to CO2
  The carbon contained in the removed butene during waste water treatment was accounted as CO2 emissions to air.
  It is assumed that the manufacturing plants are located in an urban/industrial area and consequently the emissions are categorised as emanating in a high population density area.
  Uncertainty: Estimation

## Sampling procedure
Literature data
