# synthetic gas factory construction

Dataset: EcoSpold 2, unit process
Geography: CH
Time period: 2004-01-01 to 2021-12-31
Technology level: current
Classification: EcoSpold01Categories: biomass/fuels
Classification: ISIC rev.4 ecoinvent: 4290:Construction of other civil engineering projects
Synonyms: town gas; synthesis gas; syngas; producer gas
Tags: ConvertedDataset
Scenario: Business-as-Usual
System model: Allocation, cut-off by classification
Share of production covered: 0 %
Generated by: Arnaud Dauriat
Published in: Jungbluth N. 2007
Database: ecoinvent
isCopyrightProtected: true
accessRestrictedTo: 1

## General comment
Lifetime is assumed to be 50 years. Typical biomass gasifier of 5 MWth output (i.e. 7.2-7.6 MWth input) capacity, processing 32-35 t/day of wood (dry matter) to 80'000-83'000 Nm3/day of syngas (330 day/yr).
[This dataset was already contained in the ecoinvent database version 2. It was not individually updated during the transfer to ecoinvent version 3. Life Cycle Impact Assessment results may still have changed, as they are affected by changes in the supply chain, i.e. in other datasets. This dataset was generated following the ecoinvent quality guidelines for version 2. It may have been subject to central changes described in the ecoinvent version 3 change report (http://www.ecoinvent.org/database/ecoinvent-version-3/reports-of-changes/), and the results of the central updates were reviewed extensively. The changes added e.g. consistent water flows and other information throughout the database. The documentation of this dataset can be found in the ecoinvent reports of version 2, which are still available via the ecoinvent website. The change report linked above covers all central changes that were made during the conversion process.]

## Included activities end
This infrastructure process includes land use, buildings and facilities (including dismantling) of a typical biomass gasifier. Process includes the dryer, the comminution equipment, the gasifier and the gas treatment and conditioning facility.

## Geography
CH, not site-specific

## Technology
Swiss production of syngas is limited to pilot-scale fixed-bed gasifiers (Pyroforce, Xylowatt). Data is not specific to the technology (i.e. fixed bed or fluidised bed).

## Reference product
- synthetic gas factory: 1 unit; CPC 53269: Other constructions for manufacturing; By-product classification allocatable product
  EcoSpold01Location=CH
  production volume 0.0336675 unit
    This is a placeholder value that does not reflect real-world production volumes. This dataset does not currently require a real-world production volume to work in the database framework, and no actual data were collected yet. This has no negative effect on the results of the ecoinvent database. The placeholder value of this activity was scaled according to the nominal GDP of 2005 (source: United Nations, http://data.un.org/Glossary.aspx?q=GDP+%28current+US%24%29, accessed 20130726) to reflect an appropriate share of the global production volume, which is also a placeholder value.
  property price 2.96138e6 EUR2005
    Convert from EU 27 price to the world by currency exchange rate.

## Inputs from technosphere
All rows: lognormal variance with pedigree 0.140025, pedigree (3,5,5,2,4)
- waste concrete, not reinforced: -856800 kg
  EcoSpold01Location=CH
  Calculation according to consumption and density of steel
  Uncertainty: Calculation according to consumption and density of steel
  production volume 856800 kg
    Calculated from the production volume of synthetic gas factory in proportion to the respective output amounts.
  properties: wet mass 1 kg, dry mass 1 kg
- aluminium, wrought alloy: 489.6 kg
  EcoSpold01Location=RER
  Adapted from 'Industrial furnace, coal, 1-10 MW', factor 2, 50 yrs lifetime
  Uncertainty: Adapted from 'Industrial furnace, coal, 1-10 MW', factor 2, 50 yrs lifetime
  properties: dry mass 1 kg, wet mass 1 kg
- heat, district or industrial, other than natural gas: 1.08e6 MJ
  Adapted from 'Industrial furnace, coal, 1-10 MW', factor 2, 50 yrs lifetime
  EcoSpold01Location=CH
  Uncertainty: Adapted from 'Industrial furnace, coal, 1-10 MW', factor 2, 50 yrs lifetime
  properties: heating value, net 1 MJ
- copper, cathode: 1800 kg
  (same comment as for aluminium, wrought alloy)
  properties: dry mass 1 kg, wet mass 1 kg
- concrete, normal: 360 m3
  (same comment as for heat, district or industrial, other than natural gas)
  properties: water content 0.086758, wet mass 2380 kg, dry mass 2190 kg
- diesel, burned in building machine: 1.08e6 MJ
  EcoSpold01Location=GLO
  Adapted from 'Industrial furnace, coal, 1-10 MW', factor 2, 50 yrs lifetime
  Uncertainty: Adapted from 'Industrial furnace, coal, 1-10 MW', factor 2, 50 yrs lifetime
  properties: heating value, net 1 MJ
- electricity, medium voltage: 60000 kWh
  EcoSpold01Location=CH
  Adapted from 'Industrial furnace, coal, 1-10 MW', factor 2, 50 yrs lifetime
  Uncertainty: Adapted from 'Industrial furnace, coal, 1-10 MW', factor 2, 50 yrs lifetime
- reinforcing steel: 54000 kg
  Adapted from 'Industrial furnace, coal, 1-10 MW', factor 2, 50 yrs lifetime
  EcoSpold01Location=RER
  Uncertainty: Adapted from 'Industrial furnace, coal, 1-10 MW', factor 2, 50 yrs lifetime
  properties: carbon content, fossil 0.004, wet mass 1 kg, dry mass 1 kg
- steel, low-alloyed, hot rolled: 18000 kg
  (same comment as for reinforcing steel)
  properties: dry mass 1 kg, carbon content, fossil 0.005, wet mass 1 kg
  note on carbon content, fossil: Low alloyed steel composition given in Tab. 3.2 ecoinvent v2.2 report 10_partII. Steel assumed to have a C content of 0.5%
- aluminium, cast alloy: 230.4 kg
  (same comment as for aluminium, wrought alloy)
  properties: dry mass 1 kg, wet mass 1 kg
- waste reinforcement steel: -54000 kg
  Adapted from ecoinvent process 'Industrial furnace, coal, 1-10 MW'
  EcoSpold01Location=CH
  Uncertainty: Adapted from ecoinvent process 'Industrial furnace, coal, 1-10 MW'
  production volume 54000 kg
    (same comment as for waste concrete, not reinforced)
  properties: wet mass 1 kg, dry mass 1 kg

## Inputs from nature
- Occupation, construction site [natural resource, land]: 9600 m2*year; lognormal variance with pedigree 0.170025, pedigree (3,5,5,2,4)
  Adapted from 'Industrial furnace, coal, 1-10 MW', factor 2, 50 yrs lifetime
  Uncertainty: Adapted from 'Industrial furnace, coal, 1-10 MW', factor 2, 50 yrs lifetime
- Transformation, to industrial area [natural resource, land]: 4800 m2; lognormal variance with pedigree 0.250025, pedigree (3,5,5,2,4)
  (same comment as for Occupation, construction site)
- Transformation, from unspecified [natural resource, land]: 4800 m2; lognormal variance with pedigree 0.250025, pedigree (3,5,5,2,4)
  (same comment as for Occupation, construction site)
- Occupation, industrial area [natural resource, land]: 240000 m2*year; lognormal variance with pedigree 0.170025, pedigree (3,5,5,2,4)
  (same comment as for Occupation, construction site)

## Sampling procedure
Dataser was adapted from ecoinvent process 'industrial furnace, coal, 1-10 MW'.

## Extrapolations
This dataset has been extrapolated from year 2006 to the year of the calculation (2021). The uncertainty has been adjusted accordingly.

## Review by Niels Jungbluth 2005-12-02
Passed.
