# fibre, silk, short to generic market for silky fibres

Dataset: EcoSpold 2, unit process
Geography: GLO
Time period: 2020-01-01 to 2021-12-31
Technology level: current
Classification: ISIC rev.4 ecoinvent: 2030:Manufacture of man-made fibres
Scenario: Business-as-Usual
System model: Allocation, cut-off by classification
Generated by: Avraam Symeonidis
Database: ecoinvent
isCopyrightProtected: true
accessRestrictedTo: 1

## General comment
This is a renaming activity. It's purpose is to link 'fibre, silk' to the generic 'market for silky fibres'.

## Included activities start
Activity starts with the reception of 'fibre, silk'.

## Included activities end
Activity ends with the 'silky fibres' being ready for transportation.

## Reference product
- silky fibre: 1 kg; CPC 26220: Artificial staple fibres, carded, combed or otherwise processed for spinning; By-product classification allocatable product
  production volume 1.21243e8 kg; = 606216000*0.2
    Assumed 20% of the global production volume of fibre, silk, short. Expert judgement.
  property heating value, net 12.12 MJ
    LHV is calculated based on the Carbon content of the product. More details can be found on the respective documentation.
  property carbon content 0.4
    carbon content on a dry matter basis (reserved; not for manual entry)
  properties: carbon content, fossil 0.23, water content 0, price 11.7644 EUR2005, dry mass 1 kg, wet mass 1 kg, carbon content, non-fossil 0.17, water in wet mass 0 kg, carbon allocation 0.4 kg

## Inputs from technosphere
- fibre, silk, short: 1 kg
  properties: carbon content, non-fossil 0.3769, wet mass 1 kg, dry mass 0.97 kg, heating value, net 11 MJ, water content 0.0309278
  note on carbon content, non-fossil: "Carbon content on a dry mass basis. All carbon is assumed to be biogenic due to the nature of the product. Carbon content of cotton is 0.44 kg of non-fossil carbon per kg of dry mass of cotton. Value is calculated based on the the composition of silk which is 64% cellulose. The data uses composition of silk fibers accessed on 10/11/2017 on: http://textilefashionstudy.com/chemical-composition-of-silk-fiber-silk-natural-fiber/ "

## Extrapolations
This dataset has been extrapolated from year 2020 to the year of the calculation (2021). The uncertainty has been adjusted accordingly.
