# treatment of used door, inner, glass-wood, collection for final disposal

Dataset: EcoSpold 2, unit process
Geography: CH
Time period: 2005-01-01 to 2021-12-31
Technology level: current
Classification: ISIC rev.4 ecoinvent: 3821:Treatment and disposal of non-hazardous waste
Classification: EcoSpold01Categories: waste management/building demolition
Tags: Treatment; ConvertedDataset
Scenario: Business-as-Usual
System model: Allocation, cut-off by classification
Generated by: Martin Lehmann
Published in: Kellenberger D. 2007
Database: ecoinvent
isCopyrightProtected: true
accessRestrictedTo: 1

## General comment
The dataset can be applied for a standard inner door (wood-glass) disposal process in Switzerland.
[This dataset was already contained in the ecoinvent database version 2. It was not individually updated during the transfer to ecoinvent version 3. Life Cycle Impact Assessment results may still have changed, as they are affected by changes in the supply chain, i.e. in other datasets. This dataset was generated following the ecoinvent quality guidelines for version 2. It may have been subject to central changes described in the ecoinvent version 3 change report (http://www.ecoinvent.org/database/ecoinvent-version-3/reports-of-changes/), and the results of the central updates were reviewed extensively. The changes added e.g. consistent water flows and other information throughout the database. The documentation of this dataset can be found in the ecoinvent reports of version 2, which are still available via the ecoinvent website. The change report linked above covers all central changes that were made during the conversion process.]

## Included activities end
The dataset describes the disposal of a glass-wood inner door in a municipal incineration. All the materials (steel parts, aluminium, rubber, plastics, paints and wood) are disposed in a municipal solid waste incineration. Glass also goes into a MSWI, but can be recovered there.

## Geography
Dataset represents standard in Europe and/or Switzerland.

## Technology
The technology in this dataset represents standard incineration technology in Europe.

## Reference product
- used door, inner, glass-wood: -1 m2; name RP_amount_1; By-product classification Waste; CPC 39: Wastes or scraps
  EcoSpold01Location=CH
  production volume 0.0336675 m2; name RP_PV_1
    This is a placeholder value that does not reflect real-world production volumes. This dataset does not currently require a real-world production volume to work in the database framework, and no actual data were collected yet. This has no negative effect on the results of the ecoinvent database. The placeholder value of this activity was scaled according to the nominal GDP of 2005 (source: United Nations, http://data.un.org/Glossary.aspx?q=GDP+%28current+US%24%29, accessed 20130726) to reflect an appropriate share of the global production volume, which is also a placeholder value.
  property price 0 EUR2005; name RP_amount_1_price_EUR2005
    Waste products are assigned a price of zero as they are assumed to require further treatment.
  property carbon content 0.629793
    carbon content on a dry matter basis (reserved; not for manual entry)
  properties: dry mass 26.22 kg, wet mass 27.6 kg, water in wet mass 1.38 kg, carbon content, fossil 0.0665144, water content 0.0526316, carbon content, non-fossil 0.563279, carbon allocation 16.5132 kg

## Inputs from technosphere
All rows: lognormal variance with pedigree 0.0507, pedigree (1,3,5,3,1)
- scrap aluminium: -0.0945 kg; name BP_amount_7
  EcoSpold01Location=CH
  production volume 0.00318158 kg; = BP_amount_7* RP_PV_1/ABS( RP_amount_1)
    Calculated from the production volume of used door, inner, glass-wood in proportion to the respective output amounts.
  property price 0 EUR2005; name BP_amount_7_price_EUR2005
  properties: dry mass 1 kg, wet mass 1 kg
- used double glazing, U<1.1W/m2K, laminated safety glass: -0.38 m2; name BP_amount_4
  EcoSpold01Location=CH
  production volume 0.0127937 m2; = BP_amount_4* RP_PV_1/ABS( RP_amount_1)
    (same comment as for scrap aluminium)
  property price 0 EUR2005; name BP_amount_4_price_EUR2005
  properties: wet mass 27.56 kg, dry mass 27.56 kg, carbon content, fossil 0.0175264
- waste wood, untreated: -7.02 kg; name BP_amount_2
  EcoSpold01Location=CH
  production volume 0.236346 kg; = BP_amount_2* RP_PV_1/ABS( RP_amount_1)
    (same comment as for scrap aluminium)
  property price 0 EUR2005; name BP_amount_2_price_EUR2005
  properties: wet mass 1 kg, dry mass 0.8 kg, water content 0.25, heating value, net 13.99 MJ, carbon content, non-fossil 0.48632
  note on heating value, net: Value taken from the general comment of the treatment dataset.
  note on carbon content, non-fossil: Tab A.4, ecoinvent v2.2 report 13_I. C content has been referred to 1 kg DM,
- waste rubber, unspecified: -0.142 kg; name BP_amount_8
  EcoSpold01Location=CH
  production volume 0.00478079 kg; = BP_amount_8* RP_PV_1/ABS( RP_amount_1)
    (same comment as for scrap aluminium)
  property price 0 EUR2005; name BP_amount_8_price_EUR2005
  properties: heating value, net 27.19 MJ, dry mass 1 kg, wet mass 1 kg, carbon content, fossil 0.853
- waste plastic, mixture: -0.464 kg; name BP_amount_5
  EcoSpold01Location=CH
  production volume 0.0156217 kg; = BP_amount_5* RP_PV_1/ABS( RP_amount_1)
    (same comment as for scrap aluminium)
  property price 0 EUR2005; name BP_amount_5_price_EUR2005
  properties: dry mass 0.847 kg, wet mass 1 kg, heating value, net 30.79 MJ, carbon content, fossil 0.747344, water content 0.180638
  note on carbon content, fossil: C content in 1 kg DM was calculated using data in Tab A.2, ecoinvent v2.2 report 13_I
- waste fibreboard: -10.8 kg; name BP_amount_1
  EcoSpold01Location=CH
  production volume 0.363609 kg; = BP_amount_1* RP_PV_1/ABS( RP_amount_1)
    (same comment as for scrap aluminium)
  property price 0 EUR2005; name BP_amount_1_price_EUR2005
  properties: water content 0.187014, carbon content, non-fossil 0.439195, dry mass 0.84245 kg, heating value, net 12.69 MJ, carbon content, fossil 0.0731794, wet mass 1 kg
  note on carbon content, non-fossil: The waste contains 0.925kg untreated wood (Tab A.4 for details) and 0.075kg polyurethane (Tab A.1 for details), (ecoinvent v2.2 report 13_I)
- waste emulsion paint: -0.798 kg; name BP_amount_6
  activityLink introduced to establish a direct link to the corresponding regional supply of this product
  EcoSpold01Location=CH
  production volume 0.0268667 kg; = BP_amount_6* RP_PV_1/ABS( RP_amount_1)
    (same comment as for scrap aluminium)
  property price 0 EUR2005; name BP_amount_6_price_EUR2005
  properties: carbon content, fossil 0.27, wet mass 1 kg, dry mass 1 kg, heating value, net 8.18 MJ
  note on carbon content, fossil: Tab A.4, ecoinvent v2.2 report 13_I. C content has been calculated after data in the tables, and then referred to 1 kg DM
- scrap steel: -0.324 kg; name BP_amount_3
  EcoSpold01Location=CH
  activityLink introduced to establish a direct link to the corresponding regional supply of this product
  production volume 0.0109083 kg; = BP_amount_3* RP_PV_1/ABS( RP_amount_1)
    (same comment as for scrap aluminium)
  property price 0 EUR2005; name BP_amount_3_price_EUR2005
  properties: wet mass 1 kg, dry mass 1 kg

## Sampling procedure
Calculation from waste composition

## Extrapolations
This dataset has been extrapolated from year 2005 to the year of the calculation (2021). The uncertainty has been adjusted accordingly.

## Review by Rolf Frischknecht 2007-11-07
passed
