# treatment of waste cooking oil, purified, esterification

Dataset: EcoSpold 2, unit process
Geography: CA-QC
Time period: 2012-01-01 to 2021-12-31
Technology level: current
Classification: ISIC rev.4 ecoinvent: 3830:Materials recovery
Classification: EcoSpold01Categories: biomass/fuels
Tags: single enterprise data
Scenario: Business-as-Usual
System model: Allocation, cut-off by classification
Share of production covered: 40 %
Generated by: François Saunier
Database: ecoinvent
isCopyrightProtected: true
accessRestrictedTo: 1

## General comment
This dataset represents the treatment of purified vegetable cooking oil by esterification with methanol to produce methyl ester and glycerine. The transesterification is base-catalysed with sodium methoxide and sodium hydroxide.
This dataset could be too used for the esterification of waste animal fat into methyl ester and glycerine. The studied plant treats both types of waste.
Data have been collected for the annual production of the esterification plant and adapted to production of one liter of vegetable oil methyl esther. To fit with the current ecoinvent datasets, collected data have been divided between a purification step and an esterification step.This dataset considers only the esterification step.

## Included activities start
From reception of purified cooking oil and chemicals at factory gate.

## Included activities end
This activity ends at esterification plant with the produced methyl ester and glycerine.
The dataset includes the esterification process of purified oil into methyl ester and glycerine, the intermediate storage of the oil and products and treatment of specific wastewater effluents.

## Geography
Data from one biodiesel producer in the Quebec region.

## Technology
Typical waste oil esterification plant designed for methyl ester production (for the vehicle fuels market), Quebec context. Based on industrial data from one biodiesel producer in the Quebec region with a low production volume (2 000 000 litres of biodiesel per year). The transesterification is base-catalysed with sodium methoxide and sodium hydroxide.

## Time period
Data from 2012, current technology in Quebec.

## Reference product
- glycerine: 1 kg; = glycerine_production_l * glycerine_density; CPC 34570: Glycerol; By-product classification allocatable product; CAS 56-81-5; pedigree (1,1,1,1,1)
  EcoSpold01Location=CH
  See Properties.
  Uncertainty: Calculated variable. Uncertainty will be determined from propagation of uncertainty factors of underlying variables. Uncertainty of actual relation between variables not accounted for at this time, although this could be included in a future update.
  production volume 617720 kg; = PV_biodiesel * glycerine / biodiesel
    Calculated from the biodiesel production volume using the relative outputs.
  property heating value, net 22.38 MJ
    LHV is calculated based on the elemental composition of the substance. Based on the CAS number of the substance (000056-81-5), the chemical formula of the substance is found to be: C3H8O3, (PubChem 2020).
    Reference: Kim, S., Chen, J., Cheng, T., Gindulyte, A., He, J., He, S., Li, Q., Shoemaker, B. A., Thiessen, P. A., Yu, B., Zaslavsky, L., Zhang, J., & Bolton, E. E. (2019). PubChem 2019 update: improved access to chemical data. Nucleic acids research, 47(D1), D1102–D1109. https://doi.org/10.1093/nar/gky1033
  property price 0.792 EUR2005; name glycerine_price_EUR2005
    Temporary price data. Calculated as 90% of purchasers price based on: 2004 import and export prices (total trades (USD) divided by total weight (kg) in EU27, USA, China, Japan and India) from UN data - Glycerol (glycerine), nes including synthetic glycerol (http://data.un.org/Data.aspx?q=glycerine&d=ComTrade&f=_l1Code%3a16%3bcmdCode%3a152090; accessed 1 July 10)
  property production in l 0.1 l; name glycerine_production_l
    Measured value of glycerine production at plant.
  property density 1.261 kg/l; name glycerine_density
    Density of glycerine. Data from litterature.
  property carbon content 0.391304
    carbon content on a dry matter basis (reserved; not for manual entry)
  property true value 0.0998712; name glycerine_true_value
    allocation property applied in "true value" allocation // value calculated from revenue
  properties: dry mass 1 kg, carbon content, fossil 0, carbon content, non-fossil 0.391304, water content 0, wet mass 1 kg, water in wet mass 0 kg, carbon allocation 0.391304 kg
- used vegetable cooking oil, purified: 0 kg; CPC 39120: Bran and other residues from the working of cereals or legumes; vegetable materials and vegetable waste, veget[…]; By-product classification Recyclable
  production volume 0 kg; = PV_biodiesel *(-1)* purified_oil / biodiesel
    Calculated from the biodiesel production volume using the relative outputs.
  property price 0.362 EUR2005; name purified_oil_price_EUR2005
    Temporary price data. Calculated as 90% of purchasers price based on: Assumed equal to palm oil
  property heating value, net 38.4 MJ
    Values is approximated from HHV from "vegetable oil, crude". Source: Radovanovic,M.; Zivanovic,T.; Stojiljkovic,D.; Jovanovic,V.; Jerinic,N.; Knezevic,S. et.al. Utilization of sunflower husk as a fuel for industrial boilers - 20 years experience. Proc. 5th Eur. Conf. on Industrial Furnaces&Boilers 2000,vol.2,p.221-233.
    Available at: https://phyllis.nl/Biomass/View/2152
  property carbon content 0.75
    carbon content on a dry matter basis (reserved; not for manual entry)
  properties: water in wet mass 0 kg, carbon content, fossil 0.003, dry mass 1 kg, wet mass 1 kg, water content 0, carbon content, non-fossil 0.747, carbon allocation 0.75 kg
- fatty acid methyl ester: 0 kg; name biodiesel; By-product classification allocatable product; CPC 35491: Biodiesel; pedigree (1,1,1,1,1)
  See Properties.
  Uncertainty: Calculated variable. Uncertainty will be determined from propagation of uncertainty factors of underlying variables. Uncertainty of actual relation between variables not accounted for at this time, although this could be included in a future update.
  production volume 4.35e6 kg; name PV_biodiesel
  property price 0.817 EUR2005; name biodiesel_price_EUR2005
  property production in l 1 l; name biodiesel_production_l
  property density 0.888 kg/l; name biodiesel_density
  property true value 0.725496; name biodiesel_true_value
  properties: carbon content, non-fossil 0.732, carbon content, fossil 0.041, water content 0, wet mass 1 kg, water in wet mass 0 kg, dry mass 1 kg, heating value, net 37.2 MJ, carbon content 0.773, carbon allocation 0.773 kg

## By-products
- fatty acid methyl ester: 0 kg; By-product classification allocatable product; CPC 35491: Biodiesel; pedigree (1,1,1,1,1)
  (same comment as for fatty acid methyl ester)
  production volume 0 kg; name PV_biodiesel
    Based on data provider's production volume and his estimated share of the Québec region biodiesel market.
  property heating value, net 37.2 MJ
    Based on literature, report 17, page 439. Jungbluth, N., Chudacoff, M., Dauriat, A., Dinkel, F., Doka, G., Faist Emmenegger, M., Gnansounou, E., Kljun, N., Schleiss, K., Spielmann, M., Stettler, C., Sutter, J. 2007: Life Cycle Inventories of Bioenergy. ecoinvent report No. 17, Swiss Centre for Life Cycle Inventories, Dübendorf, CH.
  property carbon content 0.773
    carbon content on a dry matter basis (reserved; not for manual entry)
  properties: carbon content, non-fossil 0.732, carbon content, fossil 0.041, water content 0, wet mass 1 kg, water in wet mass 0 kg, dry mass 1 kg, carbon allocation 0.773 kg

## Inputs from technosphere
- wastewater, from residence: -0.000248337 m3; name wastewater; lognormal variance with pedigree 0.0112, pedigree (2,4,4,1,1)
  EcoSpold01Location=CH
  Proxy. Composition unknow. Measured value.
  Uncertainty: Measured data from industry under study.
  production volume 1267.77 m3; = PV_biodiesel * wasteWater / biodiesel
    Calculated from the biodiesel production volume using the relative outputs.
  property price 0 EUR2005; name wastewater_price_EUR2005
  properties: wet mass 1000 kg, water content 2962.17, dry mass 0.337476 kg, carbon content, non-fossil 0.199421
  note on carbon content, non-fossil: In Tab 17.4, ecoinvent v2.2 report n 17 0.0673 kg TOC/m3 (Tab A.17, ecoinvent v2.2 report 13_I). TOC was considered as Total Carbon.
- water, deionised: 0.000436534 kg; name water_deionised; = (sodium_hydroxide_use_l*sodium_hydroxide_density*(1-sodium_hydroxide_concentration))+(sulfuric_acid_use_l*sulfuric_acid_density*(1-sulfuric_acid_concentration))*water_deionised_density; lognormal variance with pedigree 0.008, pedigree (1,1,4,1,1)
  Calculated value. Water for chemicals dillution.
  Uncertainty: Calculated variable. Uncertainty will be determined from propagation of uncertainty factors of underlying variables. Uncertainty of actual relation between variables not accounted for at this time, although this could be included in a future update.
  property density 1 kg/l; name water_deionised_density
  properties: wet mass 1 kg
- vegetable oil esterification facility: 7.26096e-10 unit; lognormal variance with pedigree 0.3846, pedigree (3,3,5,5,4)
  Calculated value, according to feed capacity (2 000 000 tonnes of methyl ester) and lifetime of the plant (50 years).
  EcoSpold01Location=CH
- municipal solid waste: -0.000959573 kg; name solidWaste; lognormal variance with pedigree 0.0112, pedigree (2,4,4,1,1)
  Measured value. Reported as "general facility wastes".
  production volume 4898.65 kg; = PV_biodiesel * solidWaste / biodiesel
    Calculated from the biodiesel production volume using the relative outputs.
  property price 0 EUR2005; name solidWaste_price_EUR2005
  properties: heating value, net 11.74 MJ, carbon content, non-fossil 0.261655, dry mass 0.771 kg, carbon content, fossil 0.171549, water content 0.297017, wet mass 1 kg
  note on heating value, net: Value taken from the general comment of the treatment dataset.
  note on carbon content, non-fossil: MSW composition in tab 4.1, ecoinvent v2.2 report 13_I. C content referred to 1 kg DM
- tap water: 0.248337 kg; = (wastewater*-1)*1000; lognormal variance with pedigree 0.0112, pedigree (2,4,4,1,1)
  Calculated value, based on wastewater maesured value
  EcoSpold01Location=CH
  Uncertainty: Measured data from industry under study.
  properties: dry mass 0.000337476 kg, carbon content, fossil 0.00178991, water content 2962.17, wet mass 1 kg
  note on carbon content, fossil: In Tab 17.4, ecoinvent v2.2 report n 17 Bicarbonate content is 2.93 mol/m3. CO2 content is 0.1 mol/m3 (ecoinvent v2.2 report 8, Tab 93.1).
- sodium hydroxide, without water, in 50% solution state: 0.000365909 kg; name sodium_hydroxide; = sodium_hydroxide_use_l*sodium_hydroxide_density*sodium_hydroxide_concentration; lognormal variance with pedigree 0.008, pedigree (1,1,4,1,1)
  (same comment as for fatty acid methyl ester)
  property density 1.5253 kg/l; name sodium_hydroxide_density
  property concentration 0.5; name sodium_hydroxide_concentration
  property consumption in litre 0.0005 l; name sodium_hydroxide_use_l
  properties: heating value, net 3.03 MJ, wet mass 1 kg, dry mass 1 kg
  note on density: Density for a 50% sodium hydroxide solution at 20C. Data from litterature :http://www.handymath.com/cgi-bin/naohtble3.cgi?submit=Entry
- heat, district or industrial, natural gas: 0.214004 MJ; = 0.4*m3Fuel_input*Net_Heat_Value*36.3/fuel_use; lognormal variance with pedigree 0.008, pedigree (1,1,4,1,1)
  EcoSpold01Location=RER
  Calculated based on reported fuel input (measured value), the Net Heating Value of the fuel and efficiency (1/fuel_use). 40% of energy consumption on site is associated to the esterification step (estimation from industrial).
  Uncertainty: Calculated variable. Uncertainty will be determined from propagation of uncertainty factors of underlying variables. Uncertainty of actual relation between variables not accounted for at this time, although this could be included in a future update.
  property m3Fuel_input 0.016 m3; name m3Fuel_input
  property heating value, net 1 MJ; name Net_Heat_Value
  property Corresponding fuel use 1.0417 MJ; name fuel_use
  note on heating value, net: Net (lower) heating (calorific) value. Value Taken from Table 5.1 of report "Overview and methodology, Data quality guideline for the ecoinvent database version 3" (ecoinvent report No. 1 (v3), 2011)
  note on Corresponding fuel use: Lower heating value of the fuel input related to the heat/electricity output. Assume a 96% energy efficiency based on Section 5.3.6 of report "Life cycle Inventories of Energy Systems, Results for Current Systems in Switzerland and other UCTE Countries" (ecoinvent report No. 5, 2007)
- sodium methoxide: 0.0422212 kg; name sodium_methoxide; = sodium_methoxide_use_l*sodium_methoxide_density; lognormal variance with pedigree 0.008, pedigree (1,1,4,1,1)
  (same comment as for fatty acid methyl ester)
  property density 1.1 kg/l; name sodium_methoxide_density
  property consumption in litre 0.04 l; name sodium_methoxide_use_l
  properties: wet mass 1 kg, dry mass 1 kg, heating value, net 13.47 MJ, carbon content, fossil 0.222222
  note on density: Density of sodium methoxide at 20C. Data from litterature : http://www.alkalimetals.com/msds/SODIUM%20METHOXIDE_MSDS.pdf
- methanol: 0.227995 kg; = methanol_use_l*methanol_density; lognormal variance with pedigree 0.008, pedigree (1,1,4,1,1)
  See Properties.
  EcoSpold01Location=CH
  Uncertainty: Calculated variable. Uncertainty will be determined from propagation of uncertainty factors of underlying variables. Uncertainty of actual relation between variables not accounted for at this time, although this could be included in a future update.
  property consumption in litre 0.3 l; name methanol_use_l
  property density 0.792 kg/l; name methanol_density
  properties: carbon content, fossil 0.375, wet mass 1 kg, dry mass 1 kg, heating value, net 26.49 MJ
  note on density: Density of methanol at 20C. Data from litterature : http://www.engineeringtoolbox.com/methanol-properties-d_1209.html
- electricity, medium voltage: 0.0287872 kWh; = 0.4*0.075; lognormal variance with pedigree 0.0113, pedigree (2,4,4,3,1)
  EcoSpold01Location=CH
  Measured value. 40% of energy consumption on site is associated to the esterification step (estimation from industrial).
  Uncertainty: Measured data from industry under study.
- sulfuric acid: 0.0034606 kg; = sulfuric_acid_use_l*sulfuric_acid_density*sulfuric_acid_concentration; lognormal variance with pedigree 0.008, pedigree (1,1,4,1,1)
  (same comment as for fatty acid methyl ester)
  property concentration 0.98; name sulfuric_acid_concentration
  property consumption in litre 0.002 l; name sulfuric_acid_use_l
  property density 1.84 kg/l; name sulfuric_acid_density
  properties: dry mass 1 kg, wet mass 1 kg
  note on density: Density of sulfuric acid at 25C. Data from litterature: http://www.chemicalbook.com/ProductChemicalPropertiesCB9675634_EN.htm
- used vegetable cooking oil, purified: 0.790496 kg
  production volume 4.03551e6 kg
  properties: carbon content, fossil 0.003, dry mass 1 kg, wet mass 1 kg, carbon content, non-fossil 0.747, heating value, net 38.4 MJ
  note on heating value, net: Values is approximated from HHV from "vegetable oil, crude". Source: Radovanovic,M.; Zivanovic,T.; Stojiljkovic,D.; Jovanovic,V.; Jerinic,N.; Knezevic,S. et.al. Utilization of sunflower husk as a fuel for industrial boilers - 20 years experience. Proc. 5th Eur. Conf. on Industrial Furnaces&Boilers 2000,vol.2,p.221-233. Available at: https://phyllis.nl/Biomass/View/2152

## Sampling procedure
Industrial data from one biodiesel producer in the Quebec region.

## Extrapolations
Data from one biodiesel producer used to represent the total Quebec region production.
Energy consumption of the plant has been divided between purification and esterification seps based on industrial expertise.
