# dryer production

Dataset: EcoSpold 2, unit process
Geography: GLO
Time period: 2007-01-01 to 2021-12-31
Technology level: current
Classification: ISIC rev.4 ecoinvent: 2750:Manufacture of domestic appliances
Synonyms: clothes dryer; tumble dryer
Scenario: Business-as-Usual
System model: Allocation, cut-off by classification
Generated by: Viachaslau Filimonau
Published in: Fulvio, A. 2015
Database: ecoinvent
isCopyrightProtected: true
accessRestrictedTo: 1

## General comment
This activity represents the production and disposal of an average domestic dryer. The appliance is 50 kg in mass and has the envisaged lifetime of 12.5 years. It is manufactured in Europe.The figures on material inputs from technosphere and energy required to produce an average dryer are taken from Fulvio and Peiro 2015. The figure on the annual production volume is assumed to be equal to the annual world sales and is extrapolated from Euromonitor International 2011 and ETSAP 2012.

## Included activities start
This activity starts with the reception of materials at the factory.

## Included activities end
The activity includes the processes of material and energy use in manufacturing of an average dryer. The inventory additionally accounts for disposal of all materials. Packaging is not included.

## Geography
Geography GLO was chosen because the dataset aims to represent the production of an average dryer. The literature sources used refer to manufacturing in Europe.

## Time period
The literature sources used refer to the underpinning technology as being current.

## Reference product
- dryer: 1 unit; name RP_amount_1; By-product classification allocatable product; CPC 4481: Domestic electric appliances; non-electric refrigerators and clothes drying machines
  production volume 1.33e7 unit; name RP_PV_1
    The figure on global annual production is assumed to equate to the number of global sales of domestic dryers. This has been calculated as follows: Euromonitor International 2011 (Source: Euromonitor International 2011. Poland to over-take Italy and Germany as Europe's biggest producer of major appliances. 14 August 2011. Available from: https://blog.euromonitor.com/2011/08/poland-to-overtake-italy-and-germany-as-europes-biggest-producer-of-major-appliances.html Accessed 14 January 2018) suggests that EU accounted for 33% of global volume of sales of tumble dryers in 2010. Concurrently, ETSAP 2012 (Source: ETSAP 2012. Dryers. Technology brief R09. June 2012. Available from: https://iea-etsap.org/E-TechDS/PDF/R09_Dryers_FINAL_GSOK.pdf Accessed 14 January 2018) states that the annual sales of tumble dryers in Europe were in the range of 4.1-4.4 million units (2005). The global annual production volume can thus be calculated as 4.4 million x 100 / 33 = 13.3 million.
  property lifetime capacity [h] 2493.75 hour; = 133*12.5*1.5
    Set equal to the lifetime capcity of a washign machine, assuming that they are used in combination. The lifetime of a washing machine is assumed to be 10 years, while the dryer is assumed to be 12.5 years. Comment for washing machine lifetime capacity: Literature source assumed: "10 years lifespan with 133 washing cycles per year". Based on the estimate from Yuan et al. 2016. Source: Yuan et al. 2016, 2016, Yuan, Z., Zhang, Y., and Liu, X., Life cycle assessment of horizontal-axis washing machines in China, International Journal of Life Cycle Asse, 21, 15-28. A cycle is estimated to last 1.5hours.
  property weight 50 kg; name weight
    Source: Fulvio and Peiro 2015, 2015, Fulvio, A., Peiro, L.T., Environmental footprint and material efficiency support for product policy, 3 - SeparatePublication, Fulvio, A., and Peiro, L.T., 2015. Environmental footprint and material efficiency support for product policy. JRC Science and Policy Report EUR27200EN. European Commission, March 2015. Available from: http://publications.jrc.ec.europa.eu/repository/bitstream/JRC95187/lb-na-27200-en-n.pdf Accessed 14 January 2018
  property price 600 EUR2005; name RP_amount_1_price_EUR2005
    Estimated value. The price is taken from MediaWorld, a shop for electronics, website (retrieved from: https://www.mediaworld.it/mw/SearchDisplay?searchTerm=asciugatrice&categoryId=&search=WCS&storeId=20000&catalogId=20000&langId=-4&pageSize=25&beginIndex=0&sType=SimpleSearch&resultCatEntryType=2&showResultsPage=true&searchSource=Q&pageView=, accessed 13Feb2018). The range of prices varies greatly from 300 to over 1000 euros. A representative price of 600 was chosen. The choice is based on the most common price for an average appliance, and accounting for profit margins. According to an article from Blokhin "What profit margin is average for a company in the electronics sector?" (Source: Investopedia, retrieved from: https://www.investopedia.com/ask/answers/051215/what-profit-margin-average-company-electronics-sector.asp, 13Feb2018) the average profit margin made in the electronics sector in 2015 was of 9%.
  property lifetime 12.5 year
    (same comment as for dryer)

## Inputs from technosphere
- copper, cathode: 1.15 kg; name copper; lognormal variance with pedigree 0.0438, pedigree (1,4,5,4,2)
  Data from Fulvio and Peiro 2015.
  properties: wet mass 1 kg, dry mass 1 kg
- used printed wiring boards: -0.2 kg; name BP_amount_1; = (PWB)*-1; lognormal variance with pedigree 0.0438, pedigree (1,4,5,4,2)
  The amount is set equal to the input amount for the respective material. Data from Fulvio and Peiro 2015.
  production volume 2.66e6 kg; = RP_PV_1 * (BP_amount_1 / RP_amount_1)
    Calculated from production volume of reference product using the relative outputs.
  property price 0 EUR2005; name BP_amount_1_price_EUR2005
  properties: carbon content, fossil 0.193742, dry mass 1 kg, wet mass 1 kg, carbon content, non-fossil 0.000960142
- polyvinylchloride, bulk polymerised: 7.95 kg; name PVC; lognormal variance with pedigree 0.0438, pedigree (1,4,5,4,2)
  Used here to describe 'plastics' as provided in the original literature source. Data from Fulvio and Peiro 2015.
  properties: wet mass 1 kg, carbon content, fossil 0.387097, heating value, net 21.5 MJ, dry mass 1 kg
  note on carbon content, fossil: Monomer is vynyl chloride, C2H3Cl (ecoinvent v2.2 report 11_II). MW=62 g/mol
- metal working factory: 2.29e-8 unit; = 4.58E-10*50; lognormal variance with pedigree 0.3432, pedigree (1,4,5,4,2)
  Estimated value.The input of infrastructure is approximated with the exchange 'metal working factory', this was chosen as metal is the main material constituting the final product. The general comment for the activity 'metal working faculty, GLO' [accessed 19.01.2018] specifies: '4.58E-10 units of this process are needed to produce 1 kg of final product. Additionally, the dataset for 'metal working factory' needs to be used together with the 'energy and auxilliary inputs, metal working factory', 1 kg of this exchange is required per 1 kg of final product.
- steel, low-alloyed: 35 kg; name steel; lognormal variance with pedigree 0.0438, pedigree (1,4,5,4,2)
  Contains regular steel and stainless steel. Data from Fulvio and Peiro 2015.
  properties: dry mass 1 kg, carbon content, fossil 0.005, wet mass 1 kg
- waste wood, untreated: 0 kg; name BP_amount_3; pedigree (1,1,1,1,1)
  Used here to describe all waste wood. The amount is set equal to the input amount for the respective material. Data from Fulvio and Peiro 2015.
  production volume 0 kg
    Calculated from production volume of reference product using the relative outputs.
  property price 0 EUR2005; name BP_amount_3_price_EUR2005
  properties: heating value, net 13.99 MJ, wet mass 1 kg, carbon content, non-fossil 0.48632, dry mass 0.8 kg, water content 0.25
  note on heating value, net: Value taken from the general comment of the treatment dataset.
- scrap copper: 0 kg; name BP_amount_7; pedigree (1,1,1,1,1)
  The amount is set equal to the input amount for the respective material. Contains scrap brass. Data from Fulvio and Peiro 2015.
  production volume 0 kg
    Calculated from production volume of reference product using the relative outputs.
  property price 0 EUR2005; name BP_amount_7_price_EUR2005
  properties: dry mass 1 kg, wet mass 1 kg
- printed wiring board, surface mounted, unspecified, Pb free: 0.2 kg; name PWB; lognormal variance with pedigree 0.0438, pedigree (1,4,5,4,2)
  Data from Fulvio and Peiro 2015.
  properties: dry mass 1 kg, wet mass 1 kg, carbon content, fossil 0.132522
- synthetic rubber: 0.45 kg; name rubber; lognormal variance with pedigree 0.0438, pedigree (1,4,5,4,2)
  Data from Fulvio and Peiro 2015.
  properties: heating value, net 26.42 MJ, carbon content, fossil 0.871949, dry mass 1 kg, wet mass 1 kg
  note on carbon content, fossil: EPDM (Ethylene-propene-diene terpolymer) rubber is a terpolymer of ethylene, propene, and a diene with the residual unsaturated portion of the diene in the side chain (ecoinvent v2.2 report 7-part XX & Ullmann). Chemical formula (deduced from Evidences of Solvent-Induced Miscibility in Polychloroprene-co-Ethylene-Propene Diene Terpolymer Blends, Dubey et al., Journal of Applied Polymer Science, 2009, 111:1884–1891): C20H35
- waste rubber, unspecified: 0 kg; name BP_amount_4; pedigree (1,1,1,1,1)
  (same comment as for used printed wiring boards)
  production volume 0 kg
    Calculated from production volume of reference product using the relative outputs.
  property price 0 EUR2005; name BP_amount_4_price_EUR2005
  properties: wet mass 1 kg, dry mass 1 kg, heating value, net 27.19 MJ, carbon content, fossil 0.853
- waste polyvinylchloride: 0 kg; name BP_amount_5; pedigree (1,1,1,1,1)
  Used here in place of waste 'plastics' as provided in the original literature source. The amount is set equal to the input amount for the respective material. Data from Fulvio and Peiro 2015.
  production volume 0 kg
    Calculated from production volume of reference product using the relative outputs.
  property price 0 EUR2005; name BP_amount_5_price_EUR2005
  properties: water content 0.00200401, heating value, net 21.51 MJ, carbon content, fossil 0.440882, wet mass 1 kg, dry mass 0.998 kg
- used cable: -0.9 kg; name BP_amount_2; = (cable)*-1; lognormal variance with pedigree 0.0438, pedigree (1,4,5,4,2)
  (same comment as for used printed wiring boards)
  production volume 1.197e7 kg; = RP_PV_1 * (BP_amount_2 / RP_amount_1)
    Calculated from production volume of reference product using the relative outputs.
  property price 0 EUR2005; name BP_amount_2_price_EUR2005
  properties: carbon content, fossil 0.27472, wet mass 1 kg, dry mass 1 kg
  note on carbon content, fossil: According to the European company, 1 kg cable is split up into 0.66 kg of copper and 0.34 kg of plastics (ecoinvent v2.2 report 18_V, pg 97). Plastic C content (0.808) was calculated using data in Tab A.2, ecoinvent v2.2 report 13_I.
- electricity, medium voltage: 30 kWh; lognormal variance with pedigree 0.0438, pedigree (1,4,5,4,2)
  Data from Fulvio and Peiro 2015.
- aluminium, cast alloy: 1.05 kg; name aluminium; lognormal variance with pedigree 0.0438, pedigree (1,4,5,4,2)
  Data from Fulvio and Peiro 2015.
  properties: dry mass 1 kg, wet mass 1 kg
- scrap steel: 0 kg; name BP_amount_8; pedigree (1,1,1,1,1)
  The amount is set equal to the input amount for the respective material. Contains regular steel and stainless steel. Data from Fulvio and Peiro 2015.
  production volume 0 kg
    Calculated from production volume of reference product using the relative outputs.
  property price 0 EUR2005; name BP_amount_8_price_EUR2005
  properties: dry mass 1 kg, wet mass 1 kg
- cable, unspecified: 0.9 kg; name cable; lognormal variance with pedigree 0.0438, pedigree (1,4,5,4,2)
  This product represents average, unspecified cable. Data from Fulvio and Peiro 2015.
  properties: wet mass 1 kg, dry mass 1 kg, carbon content, fossil 0.28196, heating value, net 8.54 MJ
- brass: 0 kg; pedigree (1,1,1,1,1)
  In terms of outputs, assumed to have gone to scrap copper. Data from Fulvio and Peiro 2015.
  properties: wet mass 1 kg, dry mass 1 kg
- plywood: 0 m3; pedigree (1,1,1,1,1)
  Data from Fulvio and Peiro 2015. Used here to describe all 'wood' as presented in the original literature source. Convertion to volume from mass (2.25 kg) assuming wood density 600kg/m3.
  properties: carbon content, fossil 0.09783, dry mass 768.6 kg, carbon content, non-fossil 0.409818, heating value, net 11688.9 MJ, water content 0.070778, wet mass 823 kg, price 400 EUR2005
- energy and auxilliary inputs, metal working factory: 0 kg; pedigree (1,1,1,1,1)
  (same comment as for metal working factory)
- scrap aluminium: 0 kg; name BP_amount_6; pedigree (1,1,1,1,1)
  (same comment as for used printed wiring boards)
  production volume 0 kg
    Calculated from production volume of reference product using the relative outputs.
  property price 0 EUR2005; name BP_amount_6_price_EUR2005
  properties: wet mass 1 kg, dry mass 1 kg
- waste wood, untreated: -0.215688, -0.0169696, -0.0476624, -0.0113836, -0.136669, -0.00720064, -0.00124067, -1.81319 kg (8 entries); lognormal variance with pedigree 0.0438, pedigree (1,4,5,4,2)
  (same comment as for waste wood, untreated)
  production volume 2.9925e7 kg
- scrap copper: -0.380649, -0.0178592, -0.801491 kg (3 entries); lognormal variance with pedigree 0.0438, pedigree (1,4,5,4,2)
  (same comment as for scrap copper)
  production volume 1.596e7 kg
- waste rubber, unspecified: -0.220374, -0.00925128, -0.220374 kg (3 entries); lognormal variance with pedigree 0.0438, pedigree (1,4,5,4,2)
  (same comment as for used printed wiring boards)
  production volume 5.985e6 kg
- waste polyvinylchloride: -0.765225, -0.0589943, -0.0243668, -0.0231385, -0.882935, -0.0098439, -0.00446164, -6.18103 kg (8 entries); lognormal variance with pedigree 0.0438, pedigree (1,4,5,4,2)
  (same comment as for waste polyvinylchloride)
  production volume 1.05735e8 kg
- scrap steel: -8.52233, -0.0107975, -26.4669 kg (3 entries); lognormal variance with pedigree 0.0438, pedigree (1,4,5,4,2)
  (same comment as for scrap steel)
  production volume 4.655e8 kg
- brass: 0.00025, 0.04975 kg (2 entries); lognormal variance with pedigree 0.0438, pedigree (1,4,5,4,2)
  (same comment as for brass)
- plywood: 0.000168787, 0.00358121 m3 (2 entries); lognormal variance with pedigree 0.0438, pedigree (1,4,5,4,2)
  (same comment as for plywood)
- energy and auxilliary inputs, metal working factory: 4.17552e-9, 1.87245e-8 kg (2 entries); lognormal variance with pedigree 0.0438, pedigree (1,4,5,4,2)
  (same comment as for metal working factory)
- scrap aluminium: -0.333068, -0.0156268, -0.701305 kg (3 entries); lognormal variance with pedigree 0.0438, pedigree (1,4,5,4,2)
  (same comment as for used printed wiring boards)
  production volume 1.3965e7 kg

## Sampling procedure
Manufacturing data are taken from Fulvio and Peiro 2015. Source: Fulvio, A., and Peiro, L.T., 2015. Environmental footprint and material efficiency support for product policy. JRC Science and Policy Report EUR27200EN. European Commission, March 2015. Available from: http://publications.jrc.ec.europa.eu/repository/bitstream/JRC95187/lb-na-27200-en-n.pdf (Accessed 14 January 2018). Data on the annual production volume are assumed to be equal to the annual volume of unit sales and extrapolated from Euromonitor International 2011 (Source: Euromonitor International 2011. Poland to over-take Italy and Germany as Europe's biggest producer of major appliances. 14 August 2011. Available from: https://blog.euromonitor.com/2011/08/poland-to-overtake-italy-and-germany-as-europes-biggest-producer-of-major-appliances.html (Accessed 14 January 2018)) and ETSAP 2012 (Source: ETSAP 2012. Dryers. Technology brief R09. June 2012. Available from: https://iea-etsap.org/E-TechDS/PDF/R09_Dryers_FINAL_GSOK.pdf (Accessed 14 January 2018)).

## Extrapolations
This dataset has been extrapolated from year 2018 to the year of the calculation (2021). The uncertainty has been adjusted accordingly.
