# chemical factory construction

Dataset: EcoSpold 2, unit process
Geography: RoW
Time period: 2000-01-01 to 2021-12-31
Technology level: current
Classification: ISIC rev.4 ecoinvent: 4290:Construction of other civil engineering projects
Classification: EcoSpold01Categories: construction processes/buildings
Synonyms: chemical installation
Tags: ConvertedDataset
Scenario: Business-as-Usual
System model: Allocation, cut-off by classification
Generated by: Roland Hischier
Published in: Althaus H.-J. 2007
Database: ecoinvent
isCopyrightProtected: true
accessRestrictedTo: 1

## General comment
The total weight is based on information about two chemical sites - the composition of material based on information about a destillation unit.
[This dataset was already contained in the ecoinvent database version 2. It was not individually updated during the transfer to ecoinvent version 3. Life Cycle Impact Assessment results may still have changed, as they are affected by changes in the supply chain, i.e. in other datasets. This dataset was generated following the ecoinvent quality guidelines for version 2. It may have been subject to central changes described in the ecoinvent version 3 change report (http://www.ecoinvent.org/database/ecoinvent-version-3/reports-of-changes/), and the results of the central updates were reviewed extensively. The changes added e.g. consistent water flows and other information throughout the database. The documentation of this dataset can be found in the ecoinvent reports of version 2, which are still available via the ecoinvent website. The change report linked above covers all central changes that were made during the conversion process.]

## Included activities end
This module includes the composition of the facilities for the production of chemicals (compromising storage facilities on-site, synthesis equipement, product separation and refinement installations).

## Geography
estimated composition of the facilities of a chemical plant, based on European information

## Technology
estimated composition of the facilities of a chemical plant, based on a destillation unit

## Parameters
- fraction, process water, to air: 0.15 dimensionless; name fraction_PW_to_air; lognormal variance with pedigree 0.092025, pedigree (4,4,3,2,4)

## Reference product
- chemical factory: 1 kg; CPC 53269: Other constructions for manufacturing; By-product classification allocatable product
  production volume 2.67763 kg
    This is a placeholder value that does not reflect real-world production volumes. This dataset does not currently require a real-world production volume to work in the database framework, and no actual data were collected yet. This has no negative effect on the results of the ecoinvent database.
  property price 4.68782 EUR2005
    Calculated based on inputs: The price of the product has been calculated as a sum of the values of the material and energy inputs for this product. This value is therefore a rough estimation. It may underestimate the real price since there are additional expenses when producing any product. These expences can include for example labour costs, treatment of waste materials and profit for the producer. Please consider carefully whether this level of data quality is acceptable for your application.

## Inputs from technosphere
- chemical, inorganic: 0.0574 kg; lognormal variance with pedigree 0.086, pedigree (4,5,5,5,3)
  Estimate, mainly from Literature
  Uncertainty: E
  properties: carbon content, fossil 0.003, wet mass 1 kg, dry mass 1 kg
  note on carbon content, fossil: This dataset is an unweighted average of 20 inorganic substances (listed in Tab 88.1, ecoinvent v2.2 report 8, part II), being part of the top100 chemicals included in this database. The C-content has also been calculated as an unweighted average of the C content of the substances composing this dataset.
- brazing solder, cadmium free: 0.0494 kg; lognormal variance with pedigree 0.086, pedigree (4,5,5,5,3)
  Estimate, mainly from Literature
  Uncertainty: E
  properties: dry mass 1 kg, wet mass 1 kg
- electricity, medium voltage: 0 kWh; pedigree (1,1,1,1,1)
  Estimate, mainly from Literature
  Uncertainty: E
- concrete, normal: 0 m3; pedigree (1,1,1,1,1)
  Estimate, mainly from Literature
  Uncertainty: E
  properties: water content 0.086758, wet mass 2380 kg, dry mass 2190 kg
- electronics, for control units: 0.043 kg; lognormal variance with pedigree 0.086, pedigree (4,5,5,5,3)
  Estimate, mainly from Literature
  Uncertainty: E
  properties: carbon content, non-fossil 0.00013442, dry mass 1 kg, wet mass 1 kg, carbon content, fossil 0.337146
  note on carbon content, non-fossil: The control unit has a composition of 46% steel (housing), 32% plastics, 14% printed wiring boards and 8% cables (various types).;
- heat, district or industrial, other than natural gas: 0 MJ; pedigree (1,1,1,1,1)
  Estimate, mainly from Literature
  Uncertainty: E
  properties: heating value, net 1 MJ
- steel, low-alloyed, hot rolled: 0.423 kg; lognormal variance with pedigree 0.086, pedigree (4,5,5,5,3)
  Estimate, mainly from Literature
  Uncertainty: E
  properties: dry mass 1 kg, wet mass 1 kg, carbon content, fossil 0.005
  note on carbon content, fossil: Low alloyed steel composition given in Tab. 3.2 ecoinvent v2.2 report 10_partII. Steel assumed to have a C content of 0.5%
- steel, chromium steel 18/8, hot rolled: 0.249 kg; lognormal variance with pedigree 0.086, pedigree (4,5,5,5,3)
  Estimate, mainly from Literature
  Uncertainty: E
  properties: dry mass 1 kg, wet mass 1 kg, carbon content, fossil 0.0008
  note on carbon content, fossil: Stainless steel model is the grade 304 steel (18/8 stainless, 18% chromium 8% nickel; max. 0.08% C)
- stone wool: 0.00823 kg; lognormal variance with pedigree 0.086, pedigree (4,5,5,5,3)
  Estimate, mainly from Literature
  Uncertainty: E
  properties: dry mass 1 kg, wet mass 1 kg, carbon content, fossil 0.015401
  note on carbon content, fossil: The chemical composition of the glass fibres used in the rock wool production is similar to the composition of naturally cooled volcano basalt and has a composition listed in Tab. 3.1 and 3.2 in ecoinvent v2.2 report 16, part XIV. Rock wool contains: a minimum of 96% mineral fibres,between 0.5 and 3.0 weight percent of phenolic resin depending on the specific product characteristics, and about 0.2 percent mineral oil (ecoinvent v2.2 report 16, part XIV). An average composition of 1.8% phenolic resin, 0.2% mineral oil, and 98% mineral fibres has been assumed and used to calculate C content of the rock wool
- electricity, medium voltage: 0.072858, 0.013971, 0.234545, 3.41124, 0.480816, 1.56657 kWh (6 entries); lognormal variance with pedigree 0.086, pedigree (4,5,5,5,3)
  Estimate, mainly from Literature
  Uncertainty: E
- concrete, normal: 2.62358e-6, 2.73374e-7, 2.21315e-6, 1.2449e-6, 5.2718e-6, 1.77815e-7, 0.000104195 m3 (7 entries); lognormal variance with pedigree 0.086, pedigree (4,5,5,5,3)
  Estimate, mainly from Literature
  Uncertainty: E
- heat, district or industrial, other than natural gas: 0.0019335, 4.76807 MJ (2 entries); lognormal variance with pedigree 0.086, pedigree (4,5,5,5,3)
  Estimate, mainly from Literature
  Uncertainty: E

## Inputs from nature
- Water, unspecified natural origin [natural resource, in water]: 0.0505 m3; name water_UNO_input; source Jungbluth, N. 2007; lognormal variance with pedigree 0.086, pedigree (4,5,5,5,3)
  Estimation based on different sources. Additional sources:
  Jungbluth N., Chudacoff M., Dauriat A., Dinkel F., Doka G., Faist Emmenegger M., Gnansounou E., Kljun N., Spielmann M., Stettler C. and Sutter J. (2007) Life Cycle Inventories of Bioenergy. Final report ecoinvent data v2.0 No. 17. ESU-services, Swiss Centre for Life Cycle Inventories, Dübendorf, CH, Online-Version under: www.ecoinvent.org.
  Jungbluth N. and Tuchschmid M. (2007) Photovoltaics. In: Sachbilanzen von Energiesystemen: Grundlagen für den ökologischen Vergleich von Energiesystemen und den Einbezug von Energiesystemen in Ökobilanzen für die Schweiz (ed. Dones R.). pp. 180. Final report ecoinvent Data v2.0 No. 6, Paul Scherrer Institut Villigen, Swiss Centre for Life Cycle Inventories, Dübendorf, CH. Online-Version under: www.ecoinvent.org.
  Estimation based on different sources. Additional sources:
  Jungbluth N., Chudacoff M., Dauriat A., Dinkel F., Doka G., Faist Emmenegger M., Gnansounou E., Kljun N., Spielmann M., Stettler C. and Sutter J. (2007) Life Cycle Inventories of Bioenergy. Final report ecoinvent data v2.0 No. 17. ESU-services, Swiss Centre for Life Cycle Inventories, Dübendorf, CH, Online-Version under: www.ecoinvent.org.
  Jungbluth N. and Tuchschmid M. (2007) Photovoltaics. In: Sachbilanzen von Energiesystemen: Grundlagen für den ökologischen Vergleich von Energiesystemen und den Einbezug von Energiesystemen in Ökobilanzen für die Schweiz (ed. Dones R.). pp. 180. Final report ecoinvent Data v2.0 No. 6, Paul Scherrer Institut Villigen, Swiss Centre for Life Cycle Inventories, Dübendorf, CH. Online-Version under: www.ecoinvent.org.
  Uncertainty: E

## Emissions to nature
- Water [air, unspecified]: 0.007575 m3; name water_to_air_unspecified; lognormal variance with pedigree 0.0827, pedigree (2,2,5,5,1)
  Calculated value based on literature values and expert opinion. See comments in the parametres' comment field.
  property fraction, origin: fresh water 0; name fraction_origin_fresh_water
  property fraction, origin: unspecified 1; name fraction_origin_unspecified
  property fraction, origin: salt water 0; name fraction_origin_salt_water
- Water [water, unspecified]: 0.042925 m3; name water_to_water_unspecified; lognormal variance with pedigree 0.0827, pedigree (2,2,5,5,1)
  (same comment as for Water)
  property fraction, origin: unspecified 1; name fraction_origin_unspecified_Ww
  property fraction, origin: fresh water 0; name fraction_origin_fresh_water_Ww
  property wet mass 1000 kg; name WM
  property water in wet mass 1000 kg; name WWM
  property carbon content, fossil 0; name C_content_fossil
  property dry mass 0 kg; name DM
  property fraction, origin: salt water 0; name fraction_origin_salt_water_Ww
  property carbon content, non-fossil 0; name C_content_non_fossil

## Extrapolations
This dataset has been copied from an original dataset covering the geography RER. The uncertainty has been adjusted accordingly.

## Review by Heiko Kunst 2003-06-20
Passed
Passed
