# treatment of wastewater from vegetable oil refinery

Dataset: EcoSpold 2, unit process
Geography: GLO
Time period: 2000-01-01 to 2021-12-31
Technology level: current
Classification: ISIC rev.4 ecoinvent: 3700:Sewerage
Scenario: Business-as-Usual
System model: Allocation, cut-off by classification
Generated by: Avraam Symeonidis
Database: ecoinvent
isCopyrightProtected: true
accessRestrictedTo: 1

## General comment
The dataset represents the treatment of wastewater from a vegetable oil refinery. The composition of the wastewater is derived from literature and averaged from three different sources. The emission model is well described and documented in Source 4.
Source 1: Pandey, R. A., Sanyal, P. B., Chattopadhyay, N., & Kaul, S. N. (2003). Treatment and reuse of wastes of a vegetable oil refinery, 37.
Source 2: Dohare, D., & Meshram, R. (2014). Biological Treatment of Edible Oil Refinery Wastewater using Activated Sludge Process and Sequencing Batch Reactors - A Review. International Journal of Engineering Sciences & Research Technology, 3(12), 251-260.
Source 3: Cho Cho Mar, Yong Fan, Fu-Li Li & Guang-Rong Hu (2016): Bioremediation of wastewater from edible oil refinery factory using Oleaginous Microalga Desmodesmus sp. S1, International Journal of Phytoremediation, DOI: 10.1080/15226514.2016.1193466
Source 4: Doka G., 2008, Life Cycle Inventories of Waste Treatment Services, Final report ecoinvent data v2.1, 13, 0, Dübendorf, CH, Swiss Centre for LCI, Empa - TSL, 4 - MeasurementOnSite, CD-ROM
Wastewater purified in a moderatly large municipal wastewater treatment plant (capacity class 2), with an average capacity size of 71100 per-captia-equivalents PCE.
Wastewater contains (in kg/m3): COD: 42.05 (GSD=122.5%); BOD: 2.156 (GSD=122.5%); SO4-S: 0.0006676 (GSD=122.5%); S part.: 0.0084 (GSD=122.5%); NO3-N: 0.01875 (GSD=122.5%); TKN: 0.00608 (GSD=122.5%); PO4-P: 0.5709 (GSD=122.5%); Cd: 0.00003 (GSD=223.8%); Cu: 0.00003 (GSD=223.8%); Mn: 0.00039 (GSD=224.1%); Ni: 0.00025 (GSD=223.8%); Pb: 0.00002 (GSD=223.8%); Zn: 0.00129 (GSD=223.8%); Fe: 0.01562 (GSD=224.1%); Al: 0.00619 (GSD=224.1%);

## Included activities start
Activity starts with the reception of the wastewater in the wastewater treatment plant.

## Included activities end
Activity ends with the treated water being discharged in a water body. The process also contains digestion of sludge, disposal of any digested sludge and subsequent disposal processes.

## Reference product
- wastewater from vegetable oil refinery: -1 m3; By-product classification Waste; CPC 94110: Sewerage and sewage treatment services
  production volume 8.70051e9 m3; name PV_RP; = 120539001*1000*0.802*0.09
    The total sum of all the vegetable oils, crude produced in 2005 is according to FAO 1.21E+11 kg. According to literature (USDA, http://usda.mannlib.cornell.edu/MannUsda/viewDocumentInfo.do?documentID=1290 and http://lipidlibrary.aocs.org/market/nonfood.htm) 19.8% of vegetable oil, crude produced is further processed to be used for non-food products. The remaining 80.2 % is refined into vegetable oil, refined and used during food production. Based on "soybean oil refinery operation" when 1 kg of soybean oil, refined is produced 0.09m3 of wastewater is produced as a by-product.
  property price 0 EUR2005
    Waste products are assigned a price of zero as they are assumed to require further treatment.
  property carbon content 0.993118
    carbon content on a dry matter basis (reserved; not for manual entry)
  properties: water in wet mass 999.128 kg, water content 1146.05, wet mass 1000 kg, dry mass 0.871801 kg, carbon content, fossil 0, carbon content, non-fossil 0.993118, carbon allocation 0.865801 kg

## Inputs from technosphere
- transport, freight, lorry 16-32 metric ton, EURO3: 0 metric ton*km; pedigree (1,1,1,1,1)
  direct wastewater treatment plant burden plus burden from sludge incineration. Uncertainty calculated from wastewater composition and treatment model
- chemical, inorganic: 5.57283e-5 kg; lognormal variance with pedigree 0.170978, pedigree (1,1,5,5,1)
  burden from sludge incineration. Uncertainty calculated from wastewater composition and treatment model
  properties: dry mass 1 kg, carbon content, fossil 0.003, wet mass 1 kg
  note on carbon content, fossil: This dataset is an unweighted average of 20 inorganic substances (listed in Tab 88.1, ecoinvent v2.2 report 8, part II), being part of the top100 chemicals included in this database. The C-content has also been calculated as an unweighted average of the C content of the substances composing this dataset.
- heat, for reuse in municipal waste incineration only: 0 MJ; name E_th_prod_MSWI; pedigree (1,1,1,1,1)
  (same comment as for chemical, inorganic)
- sodium hydroxide, without water, in 50% solution state: 0.00327411 kg; lognormal variance with pedigree 0.163005, pedigree (1,1,5,5,1)
  (same comment as for chemical, inorganic)
  properties: wet mass 1 kg, dry mass 1 kg, heating value, net 3.03 MJ
- process-specific burdens, slag landfill: 0 kg; pedigree (1,1,1,1,1)
  (same comment as for chemical, inorganic)
- municipal waste incineration facility: 8.5384e-9 unit; lognormal variance with pedigree 0.147543, pedigree (1,1,5,5,1)
  (same comment as for chemical, inorganic)
- slag landfill: 6.86725e-9 unit; lognormal variance with pedigree 0.162159, pedigree (1,1,5,5,1)
  (same comment as for chemical, inorganic)
- chemical, organic: 4.58674e-5 kg; lognormal variance with pedigree 0.269245, pedigree (1,1,5,5,1)
  (same comment as for chemical, inorganic)
  properties: dry mass 1 kg, wet mass 1 kg, heating value, net 19.03 MJ, carbon content, fossil 0.628
  note on carbon content, fossil: This dataset is an unweighted average of 20 organic substances (listed in Tab 88.1, ecoinvent v2.2 report 8, part II), being part of the top100 chemicals included in this database. The C-content has also been calculated as an unweighted average of the C content of the substances composing this dataset.
- hydrochloric acid, without water, in 30% solution state: 0 kg; pedigree (1,1,1,1,1)
  (same comment as for chemical, inorganic)
  properties: heating value, net 3.32 MJ, dry mass 1 kg, wet mass 1 kg
- waste plastic, mixture: 0 kg; name BP3; pedigree (1,1,1,1,1)
  direct wastewater treatment plant burden. Uncertainty calculated from wastewater composition and treatment model
  production volume 0 kg
    Calculated in proportion to the respective reference product production volume.
  property price 0 EUR2005; name BP3_price_EUR2005
  properties: carbon content, fossil 0.747344, water content 0.180638, heating value, net 30.79 MJ, wet mass 1 kg, dry mass 0.847 kg
  note on heating value, net: Value taken from the general comment of the treatment dataset.
- waste graphical paper: 0 kg; name BP2; pedigree (1,1,1,1,1)
  (same comment as for waste plastic, mixture)
  production volume 0 kg
    Calculated in proportion to the respective reference product production volume.
  property price 0 EUR2005; name BP2_price_EUR2005
  properties: wet mass 1 kg, heating value, net 14.12 MJ, dry mass 0.888 kg, water content 0.126126, carbon content, non-fossil 0.454955
- chromium oxide, flakes: 1.88141e-8 kg; lognormal variance with pedigree 0.243308, pedigree (1,1,5,5,1)
  (same comment as for chemical, inorganic)
  properties: wet mass 1 kg, dry mass 1 kg
- transport, freight train: 4.31045 metric ton*km; lognormal variance with pedigree 0.0665634, pedigree (1,1,5,5,1)
  (same comment as for transport, freight, lorry 16-32 metric ton, EURO3)
- residual material landfill: 1.00411e-9 unit; lognormal variance with pedigree 0.162397, pedigree (1,1,5,5,1)
  (same comment as for chemical, inorganic)
- waste cement, hydrated: 0 kg; name BP1; pedigree (1,1,1,1,1)
  (same comment as for chemical, inorganic)
  production volume 0 kg
    Calculated in proportion to the respective reference product production volume.
  property price 0 EUR2005; name BP1_price_EUR2005
  properties: wet mass 1 kg, dry mass 1 kg
- cement, unspecified: 0.192789 kg; lognormal variance with pedigree 0.165203, pedigree (1,1,5,5,1)
  (same comment as for chemical, inorganic)
  properties: dry mass 1 kg, wet mass 1 kg
- titanium dioxide: 0 kg; pedigree (1,1,1,1,1)
  (same comment as for chemical, inorganic)
  properties: wet mass 1 kg, dry mass 1 kg
- process-specific burdens, municipal waste incineration: 0 kg; pedigree (1,1,1,1,1)
  (same comment as for chemical, inorganic)
- sewer grid, 1.1E10l/year, 242 km: 1.68317e-7 km; lognormal variance with pedigree 0.142, pedigree (1,1,5,5,1)
  uncertainty heeded in exchanges of the module
- quicklime, milled, packed: 0 kg; pedigree (1,1,1,1,1)
  (same comment as for chemical, inorganic)
  properties: wet mass 1 kg, water content 0.010101, dry mass 0.99 kg
- iron sulfate: 0 kg; pedigree (1,1,1,1,1)
  (same comment as for waste plastic, mixture)
  properties: wet mass 1 kg, dry mass 1 kg
- electricity, for reuse in municipal waste incineration only: 0 kWh; pedigree (1,1,1,1,1)
  (same comment as for chemical, inorganic)
- electricity, low voltage: 2.64702 kWh; lognormal variance with pedigree 0.239545, pedigree (1,1,5,5,1)
  (same comment as for waste plastic, mixture)
- heat, district or industrial, natural gas: 0.00314079 MJ; lognormal variance with pedigree 0.192366, pedigree (1,1,5,5,1)
  (same comment as for chemical, inorganic)
  properties: heating value, net 1 MJ
- iron (III) chloride, without water, in 40% solution state: 3.70148 kg; lognormal variance with pedigree 0.16918, pedigree (1,1,5,5,1)
  (same comment as for transport, freight, lorry 16-32 metric ton, EURO3)
  properties: dry mass 1 kg, wet mass 1 kg
- wastewater treatment facility, capacity 1.1E10l/year: 1.9883e-9 unit; lognormal variance with pedigree 0.142, pedigree (1,1,5,5,1)
  uncertainty heeded in exchanges of the module
- aluminium sulfate, powder: 0 kg; pedigree (1,1,1,1,1)
  (same comment as for waste plastic, mixture)
  properties: dry mass 1 kg, wet mass 1 kg
- ammonia, anhydrous, liquid: 0 kg; pedigree (1,1,1,1,1)
  (same comment as for chemical, inorganic)
  properties: dry mass 1 kg, wet mass 1 kg
- process-specific burdens, residual material landfill: 0 kg; pedigree (1,1,1,1,1)
  (same comment as for chemical, inorganic)
- transport, freight, lorry 16-32 metric ton, EURO3: 0.116351, 0.0979425, 0.908097 metric ton*km (3 entries); lognormal variance with pedigree 0.0456686, pedigree (1,1,5,5,1)
  (same comment as for transport, freight, lorry 16-32 metric ton, EURO3)
- heat, for reuse in municipal waste incineration only: 0.00309786, 0.0212425, 0.0146042, 0.0577973, 0.749241, 2.61318, 0.182331, 0.128429, 0.0103557, 0.242253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 MJ (26 entries); lognormal variance with pedigree 0.0455053, pedigree (1,1,5,5,1)
  (same comment as for chemical, inorganic)
- process-specific burdens, slag landfill: 1.0835, 0.032513, 2.74682 kg (3 entries); lognormal variance with pedigree 0.162159, pedigree (1,1,5,5,1)
  (same comment as for chemical, inorganic)
- hydrochloric acid, without water, in 30% solution state: 6.10967e-6, 2.73273e-5 kg (2 entries); lognormal variance with pedigree 0.170978, pedigree (1,1,5,5,1)
  (same comment as for chemical, inorganic)
- waste plastic, mixture: -0.00149195, -0.00011502, -4.75075e-5, -4.51128e-5, -0.00172145, -1.91925e-5, -8.6988e-6, -0.0120511 kg (8 entries); lognormal variance with pedigree 0.145441, pedigree (1,1,5,5,1)
  (same comment as for waste plastic, mixture)
  production volume 1.34858e8 kg
- waste graphical paper: -0.001662, -0.000103342, -0.000373419, -6.74013e-5, -0.000676746, -3.64114e-5, -9.03633e-6, -0.0125716 kg (8 entries); lognormal variance with pedigree 0.145441, pedigree (1,1,5,5,1)
  (same comment as for waste plastic, mixture)
  production volume 1.34858e8 kg
- waste cement, hydrated: -0.13519, -0.0040567, -0.342725 kg (3 entries); lognormal variance with pedigree 0.165203, pedigree (1,1,5,5,1)
  (same comment as for chemical, inorganic)
  production volume 4.1934e9 kg
- titanium dioxide: 3.07296e-7, 6.14593e-7 kg (2 entries); lognormal variance with pedigree 0.243308, pedigree (1,1,5,5,1)
  (same comment as for chemical, inorganic)
- process-specific burdens, municipal waste incineration: 9.57986, 0.287467, 24.2863 kg (3 entries); lognormal variance with pedigree 0.147543, pedigree (1,1,5,5,1)
  (same comment as for chemical, inorganic)
- quicklime, milled, packed: 1.38839e-6, 0.000163565 kg (2 entries); lognormal variance with pedigree 0.177645, pedigree (1,1,5,5,1)
  (same comment as for chemical, inorganic)
- iron sulfate: 0.894975, 1.81221 kg (2 entries); lognormal variance with pedigree 0.169181, pedigree (1,1,5,5,1)
  (same comment as for waste plastic, mixture)
- electricity, for reuse in municipal waste incineration only: 0.000729541, 0.00500256, 0.00343926, 0.0136111, 0.176445, 0.000291816, 0.0429387, 0.0302447, 0.00243875, 0.0570501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 kWh (26 entries); lognormal variance with pedigree 0.236847, pedigree (1,1,5,5,1)
  (same comment as for chemical, inorganic)
- aluminium sulfate, powder: 0.127309, 0.604353 kg (2 entries); lognormal variance with pedigree 0.169181, pedigree (1,1,5,5,1)
  (same comment as for waste plastic, mixture)
- ammonia, anhydrous, liquid: 5.17935e-7, 3.4617e-6, 8.05773e-7, 1.56417e-6, 1.59652e-6, 7.3288e-7, 6.02516e-6, 1.63942e-7, 1.73378e-5 kg (9 entries); lognormal variance with pedigree 0.192366, pedigree (1,1,5,5,1)
  (same comment as for chemical, inorganic)
- process-specific burdens, residual material landfill: 0.13519, 0.0040567, 0.342725 kg (3 entries); lognormal variance with pedigree 0.162397, pedigree (1,1,5,5,1)
  (same comment as for chemical, inorganic)

## Emissions to nature
- Cadmium, ion [water, surface water]: 1.52317e-5 kg; lognormal variance with pedigree 0.692, pedigree (1,1,5,5,1)
  sewer overload discharge plus direct wastewater treatment plant emission plus emission from sludge incineration. Uncertainty calculated from wastewater composition and treatment model
- Manganese [water, surface water]: 0.000197936 kg; lognormal variance with pedigree 0.692, pedigree (1,1,5,5,1)
  (same comment as for Cadmium, ion)
- Phosphate [water, ground-, long-term]: 0.0424296 kg; lognormal variance with pedigree 0.692, pedigree (1,1,5,5,1)
  emission from sludge incineration. Uncertainty calculated from wastewater composition and treatment model
- Nickel [air, urban air close to ground]: 4.24681e-12 kg; lognormal variance with pedigree 0.282022, pedigree (1,1,5,5,1)
  direct digester gas emission plus emission from sludge incineration. Uncertainty calculated from wastewater composition and treatment model
- COD, Chemical Oxygen Demand [water, surface water]: 8.14795 kg; lognormal variance with pedigree 0.082, pedigree (1,1,5,5,1)
  (same comment as for Cadmium, ion)
- Lead [water, ground-, long-term]: 1.26833e-6 kg; lognormal variance with pedigree 0.692, pedigree (1,1,5,5,1)
  (same comment as for Phosphate)
- Methane, non-fossil [air, urban air close to ground]: 0.138717 kg; lognormal variance with pedigree 0.178957, pedigree (1,1,5,5,1)
  (same comment as for Nickel)
- Nitrate [water, ground-, long-term]: 2.29323e-5 kg; lognormal variance with pedigree 0.692, pedigree (1,1,5,5,1)
  (same comment as for Phosphate)
- Dinitrogen monoxide [air, urban air close to ground]: 6.92519e-5 kg; lognormal variance with pedigree 0.15884, pedigree (1,1,5,5,1)
  direct wastewater treatment plant emission plus direct digester gas emission plus emission from sludge incineration plus emission from sludge spreading. Uncertainty calculated from wastewater composition and treatment model
- Carbon monoxide, non-fossil [air, urban air close to ground]: 0.0469753 kg; lognormal variance with pedigree 0.182261, pedigree (1,1,5,5,1)
  (same comment as for Nickel)
- Sulfate [water, ground-, long-term]: 0.0162109 kg; lognormal variance with pedigree 0.692, pedigree (1,1,5,5,1)
  (same comment as for Phosphate)
- Nitrite [water, surface water]: 0.000139489 kg; lognormal variance with pedigree 0.082, pedigree (1,1,5,5,1)
  direct wastewater treatment plant emission. Uncertainty calculated from wastewater composition and treatment model
- BOD5, Biological Oxygen Demand [water, surface water]: 0.204631 kg; lognormal variance with pedigree 0.082, pedigree (1,1,5,5,1)
  (same comment as for Cadmium, ion)
- Phosphate [water, surface water]: 0.615905 kg; lognormal variance with pedigree 0.082, pedigree (1,1,5,5,1)
  sewer overload discharge plus direct wastewater treatment plant emission plus emission from sludge incineration plus emission from sludge spreading. Uncertainty calculated from wastewater composition and treatment model
- Zinc, ion [water, ground-, long-term]: 1.38179e-5 kg; lognormal variance with pedigree 0.692, pedigree (1,1,5,5,1)
  (same comment as for Phosphate)
- Phosphorus [air, urban air close to ground]: 0.000362288 kg; lognormal variance with pedigree 0.173921, pedigree (1,1,5,5,1)
  (same comment as for Nickel)
- TOC, Total Organic Carbon [water, surface water]: 2.18309 kg; lognormal variance with pedigree 0.082, pedigree (1,1,5,5,1)
  (same comment as for Cadmium, ion)
- Chloride [water, surface water]: 2.42689 kg; lognormal variance with pedigree 0.082, pedigree (1,1,5,5,1)
  (same comment as for Cadmium, ion)
- Copper, ion [water, ground-, long-term]: 1.79602e-5 kg; lognormal variance with pedigree 0.692, pedigree (1,1,5,5,1)
  (same comment as for Phosphate)
- TOC, Total Organic Carbon [water, ground-, long-term]: 0.0466227 kg; lognormal variance with pedigree 0.692, pedigree (1,1,5,5,1)
  (same comment as for Phosphate)
- Copper, ion [water, surface water]: 7.78215e-6 kg; lognormal variance with pedigree 0.692, pedigree (1,1,5,5,1)
  (same comment as for Cadmium, ion)
- Manganese [air, urban air close to ground]: 1.04585e-12 kg; lognormal variance with pedigree 0.285587, pedigree (1,1,5,5,1)
  (same comment as for Nickel)
- BOD5, Biological Oxygen Demand [water, ground-, long-term]: 0.0385395 kg; lognormal variance with pedigree 0.692, pedigree (1,1,5,5,1)
  (same comment as for Phosphate)
- DOC, Dissolved Organic Carbon [water, surface water]: 2.03915 kg; lognormal variance with pedigree 0.082, pedigree (1,1,5,5,1)
  (same comment as for Cadmium, ion)
- Ammonium, ion [water, surface water]: 0.00238835 kg; lognormal variance with pedigree 0.082, pedigree (1,1,5,5,1)
  (same comment as for Nitrite)
- Aluminium [water, surface water]: 0.000381342 kg; lognormal variance with pedigree 0.692, pedigree (1,1,5,5,1)
  (same comment as for Cadmium, ion)
- Carbon dioxide, non-fossil [air, urban air close to ground]: 58.6233 kg; lognormal variance with pedigree 0.15767, pedigree (1,1,5,5,1)
  direct wastewater treatment plant emission plus direct digester gas emission plus emission from sludge incineration. Uncertainty calculated from wastewater composition and treatment model
- Nickel, ion [water, surface water]: 0.000151662 kg; lognormal variance with pedigree 0.692, pedigree (1,1,5,5,1)
  (same comment as for Cadmium, ion)
- Aluminium [air, urban air close to ground]: 0.000189562 kg; lognormal variance with pedigree 0.17271, pedigree (1,1,5,5,1)
  (same comment as for Nickel)
- Cyanide [air, urban air close to ground]: 5.74535e-7 kg; lognormal variance with pedigree 0.196429, pedigree (1,1,5,5,1)
  (same comment as for Phosphate)
- Nitrate [water, surface water]: 0.0798596 kg; lognormal variance with pedigree 0.082, pedigree (1,1,5,5,1)
  (same comment as for Cadmium, ion)
- Manganese [water, ground-, long-term]: 0.000165398 kg; lognormal variance with pedigree 0.692, pedigree (1,1,5,5,1)
  (same comment as for Phosphate)
- Lead [air, urban air close to ground]: 6.61444e-10 kg; lognormal variance with pedigree 0.274101, pedigree (1,1,5,5,1)
  (same comment as for Nickel)
- NMVOC, non-methane volatile organic compounds, unspecified origin [air, urban air close to ground]: 0.000629911 kg; lognormal variance with pedigree 0.201001, pedigree (1,1,5,5,1)
  direct digester gas emission. Uncertainty calculated from wastewater composition and treatment model
- COD, Chemical Oxygen Demand [water, ground-, long-term]: 0.117823 kg; lognormal variance with pedigree 0.692, pedigree (1,1,5,5,1)
  (same comment as for Phosphate)
- Aluminium [water, ground-, long-term]: 0.0897993 kg; lognormal variance with pedigree 0.692, pedigree (1,1,5,5,1)
  (same comment as for Phosphate)
- Ammonia [air, urban air close to ground]: 2.0438e-5 kg; lognormal variance with pedigree 0.16804, pedigree (1,1,5,5,1)
  direct digester gas emission plus emission from sludge incineration plus emission from sludge spreading. Uncertainty calculated from wastewater composition and treatment model
- Nickel, ion [water, ground-, long-term]: 9.21287e-5 kg; lognormal variance with pedigree 0.692, pedigree (1,1,5,5,1)
  (same comment as for Phosphate)
- Sulfur dioxide [air, urban air close to ground]: 0.00373247 kg; lognormal variance with pedigree 0.170936, pedigree (1,1,5,5,1)
  (same comment as for Nickel)
- DOC, Dissolved Organic Carbon [water, ground-, long-term]: 0.0466227 kg; lognormal variance with pedigree 0.692, pedigree (1,1,5,5,1)
  (same comment as for Phosphate)
- Zinc, ion [water, surface water]: 0.000398903 kg; lognormal variance with pedigree 0.692, pedigree (1,1,5,5,1)
  (same comment as for Cadmium, ion)
- Sulfate [water, surface water]: 2.3328 kg; lognormal variance with pedigree 0.692, pedigree (1,1,5,5,1)
  (same comment as for Cadmium, ion)
- Cadmium [air, urban air close to ground]: 8.20257e-10 kg; lognormal variance with pedigree 0.272799, pedigree (1,1,5,5,1)
  (same comment as for Nickel)
- Iron, ion [water, surface water]: 0.00870666 kg; lognormal variance with pedigree 0.692, pedigree (1,1,5,5,1)
  (same comment as for Cadmium, ion)
- Zinc [air, urban air close to ground]: 1.45601e-8 kg; lognormal variance with pedigree 0.275003, pedigree (1,1,5,5,1)
  (same comment as for Nickel)
- Iron, ion [water, ground-, long-term]: 1.06697 kg; lognormal variance with pedigree 0.692, pedigree (1,1,5,5,1)
  (same comment as for Phosphate)
- Iron [air, urban air close to ground]: 7.60462e-5 kg; lognormal variance with pedigree 0.179231, pedigree (1,1,5,5,1)
  (same comment as for Nickel)
- Nitrogen [water, surface water]: 0.000169199 kg; lognormal variance with pedigree 0.692, pedigree (1,1,5,5,1)
  (same comment as for Nitrite)
- Nitrogen oxides [air, urban air close to ground]: 0.000199701 kg; lognormal variance with pedigree 0.162313, pedigree (1,1,5,5,1)
  (same comment as for Nickel)
- Lead [water, surface water]: 2.1985e-6 kg; lognormal variance with pedigree 0.692, pedigree (1,1,5,5,1)
  (same comment as for Cadmium, ion)
- Copper [air, urban air close to ground]: 1.64014e-10 kg; lognormal variance with pedigree 0.276026, pedigree (1,1,5,5,1)
  (same comment as for Nickel)
- Cadmium, ion [water, ground-, long-term]: 1.48252e-7 kg; lognormal variance with pedigree 0.692, pedigree (1,1,5,5,1)
  (same comment as for Phosphate)

## Sampling procedure
Wastewater composition derived from literature.

## Extrapolations
This dataset has been extrapolated from year 2001 to the year of the calculation (2021). The uncertainty has been adjusted accordingly.
