# cookstove production, gas or electric

Dataset: EcoSpold 2, unit process
Geography: GLO
Time period: 1997-01-01 to 2021-12-31
Technology level: current
Classification: ISIC rev.4 ecoinvent: 2750:Manufacture of domestic appliances
Synonyms: gas cookstove; electric cookstove; stove
Scenario: Business-as-Usual
System model: Allocation, cut-off by classification
Generated by: Viachaslau Filimonau
Published in: Jungbluth, N. 1997
Database: ecoinvent
isCopyrightProtected: true
accessRestrictedTo: 1

## General comment
This activity represents the production and disposal of an average gas or electric cookstove.The appliance is 57.9 kg in mass and has power of 2.5 kW. It has the envisaged lifetime of 15 years and is manufactured in Europe.The figures on material inputs from technosphere and energy required to produce an average cookstove are taken from Jungbluth 1997. The figure on the annual production volume is extrapolated from the US combined production volume of gas and electric stoves.

## Included activities start
This activity starts with the reception of materials at the factory.

## Included activities end
The activity includes the processes of material and energy use in manufacturing of an average, gas or electric cookstove. The inventory additionally accounts for disposal of all materials. Packaging is not included.

## Geography
Geography GLO was chosen because the dataset aims to represent the production of an average, gas or electric cookstove. The literature sources used refer to manufacturing in Europe.

## Time period
The literature sources used refer to the underpinning technology as being current.

## Reference product
- cookstove: 1 unit; name RP_amount_1; CPC 4482: Domestic cooking and heating equipment, non-electric; By-product classification allocatable product
  production volume 3.775e7 unit; name RP_PV_1
    The figure on the annual world production volume is extrapolated from the US combined production volume of gas and electric stoves (Source: Statista 2017. Electric/gas cooking appliances and microwaves unit shipments in the United States from 2013 to 2016 (in millions). Available from: https://www.statista.com/statistics/271530/shipments-of-cooking-appliances-in-the-us-since-2009/ Accessed 14 January 2018) using the nominal GDP of 2014 (Source: Eurostat 2016. The EU in the world - economy and finance. Available from: http://ec.europa.eu/eurostat/statistics-explained/index.php/The_EU_in_the_world_-_economy_and_finance Accessed 14 January 2018). Gross domestic product (GDP) at current prices is GDP at prices of the current reporting period, also known as nominal GDP. The US combined production volume of gas and electric stoves in 2016 is 8.38 million units. The US controbution to global GDP in 2014 is 22.2%. Consequently, the global production volume of gas and electric cookstoves can be estimated as 8.38 million x 100 / 22.2 = 37.75 million units.
  property price 400 EUR2005; name RP_amount_1_price_EUR2005
    Estimated value. The price is taken from MediaWorld, a shop for electronics, website (retrieved from: https://www.mediaworld.it/mw/SearchDisplay?searchTerm=forno&categoryId=&search=WCS&storeId=20000&catalogId=20000&langId=-4&beginIndex=0&sType=SimpleSearch&resultCatEntryType=2&showResultsPage=true&searchSource=Q&pageView=&pageNumber=3&pageSize=25, accessed 13Feb2018). The range of prices varies greatly from 300 to over 1000 euros. A representative price of 400 was chosen. The choice is based on the most common price for an average appliance, and accounting for profit margins. According to an article from Blokhin "What profit margin is average for a company in the electronics sector?" (Source: Investopedia, retrieved from: https://www.investopedia.com/ask/answers/051215/what-profit-margin-average-company-electronics-sector.asp, 13Feb2018) the average profit margin made in the electronics sector in 2015 was of 9%.
  property lifetime 15 year
    Source; Jungbluth 1997, 1997, Jungbluth, N., Life-cycle-assessment for stoves and ovens. UNS working paper No.16, 3 - SeparatePublication
  property weight 57.9 kg; name weight
    (same comment as for cookstove)
  property lifetime capacity [kWh] 33750 kWh; = 2250*15
    Estimated value. Based on the estimate of kWh/yr used for cooking in an average household reported in (U.S. Congress, Office of Technology Assessment, Fueling Development:Energy Technologies for Developing Countries, OTA-E-516. Washington, DC:U.S. Government Printing Office, April 1992), times the assumed 15 years lifetime (Source; Jungbluth 1997, 1997, Jungbluth, N., Life-cycle-assessment for stoves and ovens. UNS working paper No.16, 3 - SeparatePublication). The range is double-checked with the online source http://www.falconfoodservice.com, n.d..
    What to Consider when Buying Induction, retrieved from: http://www.falconfoodservice.com/InfoCentre/Advice/BuyingGuides/BuyingInduction.aspx, accessed 6March2018

## Inputs from technosphere
- flat glass, uncoated: 0 kg; name glass; pedigree (1,1,1,1,1)
  Data from Jungbluth 1997.
  properties: dry mass 1 kg, wet mass 1 kg
- waste paint: 0 kg; name BP_amount_3; pedigree (1,1,1,1,1)
  The amount is set equal to the input amount for the respective material. Data from Jungbluth 1997.
  production volume 0 kg
    Calculated from production volume of reference product using the relative outputs.
  property price 0 EUR2005; name BP_amount_3_price_EUR2005
  properties: wet mass 1 kg, carbon content, fossil 0.65, dry mass 1 kg, heating value, net 19.7 MJ
- metal working factory: 2.65182e-8 unit; = 4.58E-10*57.9; lognormal variance with pedigree 0.3438, pedigree (2,4,5,4,2)
  Estimated value.The input of infrastructure is approximated with the exchange 'metal working factory', this was chosen as metal is the main material constituting the final product. The general comment for the activity 'metal working faculty, GLO' [accessed 19.01.2018] specifies: '4.58E-10 units of this process are needed to produce 1 kg of final product. Additionally, the dataset for 'metal working factory' needs to be used together with the 'energy and auxilliary inputs, metal working factory', 1 kg of this exchange is required per 1 kg of final product.
- steel, low-alloyed: 43 kg; name steel; lognormal variance with pedigree 0.0444, pedigree (2,4,5,4,2)
  Data from Jungbluth 1997.
  properties: carbon content, fossil 0.005, dry mass 1 kg, wet mass 1 kg
- scrap copper: 0 kg; name BP_amount_4; pedigree (1,1,1,1,1)
  The amount is set equal to the input amount for the respective material. Data from Jungbluth 1997. Also contains scrap zinc.
  production volume 0 kg
    Calculated from production volume of reference product using the relative outputs.
  property price 0 EUR2005; name BP_amount_4_price_EUR2005
  properties: wet mass 1 kg, dry mass 1 kg
- energy and auxilliary inputs, metal working factory: 0 kg; pedigree (1,1,1,1,1)
  (same comment as for metal working factory)
- scrap steel: 0 kg; name BP_amount_7; pedigree (1,1,1,1,1)
  (same comment as for waste paint)
  production volume 0 kg
    Calculated from production volume of reference product using the relative outputs.
  property price 0 EUR2005; name BP_amount_7_price_EUR2005
  properties: wet mass 1 kg, dry mass 1 kg
- copper, cathode: 0.18 kg; name copper; lognormal variance with pedigree 0.0444, pedigree (2,4,5,4,2)
  Data from Jungbluth 1997.
  properties: wet mass 1 kg, dry mass 1 kg
- zinc: 0.2 kg; lognormal variance with pedigree 0.0444, pedigree (2,4,5,4,2)
  In terms of outputs, assumed to have gone to scrap copper. Data from Jungbluth 1997.
  properties: wet mass 1 kg, dry mass 1 kg
- electricity, medium voltage: 30 kWh; lognormal variance with pedigree 0.0444, pedigree (2,4,5,4,2)
  Data from Jungbluth 1997. Converted from 0.000108 TJ as presented in the original source.
- alkyd paint, white, without solvent, in 60% solution state: 0 kg; name paint; pedigree (1,1,1,1,1)
  Data from Jungbluth 1997.
  properties: dry mass 1 kg, carbon content, non-fossil 0.199629, carbon content, fossil 0.140367, wet mass 1 kg, heating value, net 10.3 MJ
  note on carbon content, non-fossil: C content was calculated as an addition of C content in the raw materials.
- waste mineral wool: 0 kg; name BP_amount_1; pedigree (1,1,1,1,1)
  The amount is set equal to the input amount for the respective material. Data from Jungbluth 1997. Contains waste glass wool mat.
  production volume 0 kg
    Calculated from production volume of reference product using the relative outputs.
  property price 0 EUR2005; name BP_amount_1_price_EUR2005
  properties: wet mass 1 kg, dry mass 1 kg
- scrap aluminium: 0 kg; name BP_amount_5; pedigree (1,1,1,1,1)
  (same comment as for waste paint)
  production volume 0 kg
    Calculated from production volume of reference product using the relative outputs.
  property price 0 EUR2005; name BP_amount_5_price_EUR2005
  properties: dry mass 1 kg, wet mass 1 kg
- waste polyvinylchloride: 0 kg; name BP_amount_2; pedigree (1,1,1,1,1)
  (same comment as for waste paint)
  production volume 0 kg
    Calculated from production volume of reference product using the relative outputs.
  property price 0 EUR2005; name BP_amount_2_price_EUR2005
  properties: carbon content, fossil 0.440882, wet mass 1 kg, water content 0.00200401, dry mass 0.998 kg, heating value, net 21.51 MJ
  note on heating value, net: Value taken from the general comment of the treatment dataset.
- waste glass: 0 kg; name BP_amount_6; pedigree (1,1,1,1,1)
  (same comment as for waste paint)
  production volume 0 kg
    Calculated from production volume of reference product using the relative outputs.
  property price 0 EUR2005; name BP_amount_6_price_EUR2005
  properties: heating value, net 0.05 MJ, wet mass 1 kg, dry mass 1 kg
  note on heating value, net: Value extracted from "treatment of waste glass, open dump, very wet infiltration class (1000mm)"
- polyvinylchloride, bulk polymerised: 0.12 kg; name PVC; lognormal variance with pedigree 0.0444, pedigree (2,4,5,4,2)
  Data from Jungbluth 1997.
  properties: dry mass 1 kg, heating value, net 21.5 MJ, carbon content, fossil 0.387097, wet mass 1 kg
  note on carbon content, fossil: Monomer is vynyl chloride, C2H3Cl (ecoinvent v2.2 report 11_II). MW=62 g/mol
- aluminium, cast alloy: 0.09 kg; name aluminium; lognormal variance with pedigree 0.0444, pedigree (2,4,5,4,2)
  Data from Jungbluth 1997.
  properties: dry mass 1 kg, wet mass 1 kg
- glass wool mat: 1.1 kg; name glass_wool_mat; lognormal variance with pedigree 0.0444, pedigree (2,4,5,4,2)
  Used here in place of mineral wool. In terms of outputs, assumed to have gone to waste mineral wool. Data from Jungbluth 1997.
  properties: dry mass 1 kg, wet mass 1 kg, carbon content, fossil 0.0107327
  note on carbon content, fossil: A share of 16 w-% for the binders is taken into account. The binder used in this study is a mixture of phenol, formaldehyde and urea resins (ecoinvent v2.2 report 16_part XIV), and the C content was calculated as a weigthed average of phenol, formaldehyde and urea C content.
- flat glass, uncoated: 1.02457, 4.97543 kg (2 entries); lognormal variance with pedigree 0.0444, pedigree (2,4,5,4,2)
  Data from Jungbluth 1997.
- waste paint: -0.64501, -0.00193556, -6.55305 kg (3 entries); lognormal variance with pedigree 0.0444, pedigree (2,4,5,4,2)
  (same comment as for waste paint)
  production volume 2.718e8 kg
- scrap copper: -0.120539, -0.00565543, -0.253806 kg (3 entries); lognormal variance with pedigree 0.0444, pedigree (2,4,5,4,2)
  (same comment as for scrap copper)
  production volume 1.4345e7 kg
- energy and auxilliary inputs, metal working factory: 4.83525e-9, 2.16829e-8 kg (2 entries); lognormal variance with pedigree 0.0444, pedigree (2,4,5,4,2)
  (same comment as for metal working factory)
- scrap steel: -10.4703, -0.0132655, -32.5164 kg (3 entries); lognormal variance with pedigree 0.0444, pedigree (2,4,5,4,2)
  (same comment as for waste paint)
  production volume 1.62325e9 kg
- alkyd paint, white, without solvent, in 60% solution state: 1.2528, 5.9472 kg (2 entries); lognormal variance with pedigree 0.0444, pedigree (2,4,5,4,2)
  Data from Jungbluth 1997.
- waste mineral wool: -0.318841, -0.00363821, -0.777521 kg (3 entries); lognormal variance with pedigree 0.0444, pedigree (2,4,5,4,2)
  (same comment as for waste mineral wool)
  production volume 4.1525e7 kg
- scrap aluminium: -0.0285487, -0.00133944, -0.0601119 kg (3 entries); lognormal variance with pedigree 0.0444, pedigree (2,4,5,4,2)
  (same comment as for waste paint)
  production volume 3.3975e6 kg
- waste polyvinylchloride: -0.0115506, -0.00089048, -0.0003678, -0.000349261, -0.0133273, -0.000148587, -6.73456e-5, -0.0932986 kg (8 entries); lognormal variance with pedigree 0.0444, pedigree (2,4,5,4,2)
  (same comment as for waste paint)
  production volume 4.53e6 kg
- waste glass: -0.913376, -0.0443183, -0.00413484, -0.0185019, -0.480844, -0.00627898, -0.00100543, -4.53154 kg (8 entries); lognormal variance with pedigree 0.0444, pedigree (2,4,5,4,2)
  (same comment as for waste paint)
  production volume 2.265e8 kg

## Sampling procedure
Manufacturing data are taken from Jungbluth 1997. Source: Jungbluth, N., 1997. Life-cycle-assessment for stoves and ovens. UNS working paper No.16. Available from: http://esu-services.ch/fileadmin/download/jungbluth-1997-WP16-LCA-cooking.pdf (Accessed 20 January 2018). The figure on the annual world production volume is extrapolated from the US combined production volume of gas and electric stoves. Source: Statista 2017. Electric/gas cooking appliances and microwaves unit shipments in the United States from 2013 to 2016 (in millions). Available from: https://www.statista.com/statistics/271530/shipments-of-cooking-appliances-in-the-us-since-2009/ (Accessed 14 January 2018). For extrapolation, the nominal GDP of 2014 was used. Source: Eurostat 2016. The EU in the world - economy and finance. Available from: http://ec.europa.eu/eurostat/statistics-explained/index.php/The_EU_in_the_world_-_economy_and_finance (Accessed 14 January 2018). Gross domestic product (GDP) at current prices is GDP at prices of the current reporting period, also known as nominal GDP. The US combined production volume of gas and electric stoves in 2016 is 8.38 million units. The US contribution to global GDP in 2014 is 22.2%. Consequently, the global production volume of gas and electric cookstoves can be estimated as 8.38 million x 100 / 22.2 = 37.75 million units.

## Extrapolations
This dataset has been extrapolated from year 2018 to the year of the calculation (2021). The uncertainty has been adjusted accordingly.
