# hydrogen fluoride production

Dataset: EcoSpold 2, unit process
Geography: RoW
Time period: 1979-01-01 to 2021-12-31
Technology level: current
Classification: ISIC rev.4 ecoinvent: 2011:Manufacture of basic chemicals
Synonyms: Fluorhydric acid; Hydrogen fluoride; 7664-39-3; Hydrofluoride; Fluorane
Scenario: Business-as-Usual
System model: Allocation, cut-off by classification
Share of production covered: 10 %
Generated by: Niels Jungbluth
Published in: Jungbluth, N. 2007
Database: ecoinvent
isCopyrightProtected: true
accessRestrictedTo: 1

## General comment
This dataset represents the production of 1 kg of hydrogen fluoride from fluorspar and sulfuric acid. Hydrogen fluoride is a colourless gas or colourless fuming liquid with a pungent odour. It is used in the production of aluminum and chlorofluorocarbons, and in the glass etching and chemical industries. The energy and material inputs are estimated based on literature values and expert judgement. The infrastructure is approximated with a default value.
References:
Aigueperse, J., Mollard, P., Devilliers, D., Chemla, M., Faron, R., Romano, R. and Cuer, J. P. 2000. Fluorine Compounds, Inorganic. Ullmann's Encyclopedia of Industrial Chemistry.
National Center for Biotechnology Information. PubChem Compound Database; CID=14917, https://pubchem.ncbi.nlm.nih.gov/compound/14917 (last accessed on 2017-01-04).
Krieger T. and Roekens-Guibert H. (2006) Environmental impacts of Tedlar (R) PVF film for use in photovoltaic modules. In proceedings from: 21th European Photovoltaic Solar Energy Conference, Dresden, DE, 4-8.9.2006, retrieved from: http://www2.dupont.com/Photovoltaics/en_US/news_events/event20060904.html.

## Included activities start
From reception of sulfuric acid and fluorspar at the factory gate.

## Included activities end
This activity ends with the production of 1 kg of hydrogen fluoride. The dataset doesn't include waste or emissions apart from sulfur dioxide.

## Geography
Hydrogen fluoride is produced in different countries. This dataset is assumed to be a realistic representation of the average production process for hydrogen fluoride.

## Technology
Hydrogen fluoride is mainly produced from the decomposition of fluorspar with sulphuric acid according to the following reaction (Aigueperse et al. 2000):
CaF2 + H2SO4 → CaSO4 (s) + 2 HF
The main raw material is acid spar containing about 97% CaF2. This is produced through flotation of grinded fluorspar. The endothermic reaction is taking place in a revolving oven that is heated from the outside. Waste gases are cleaned with sulphuric acid from dust and water. Then the hydrogen fluoride is condensed in a chain of coolers. With an after washing with concentrated sulphuric acid the remaining hydrogen fluoride is absorbed and recycled in the oven. The waste gases from the washer (mainly SiF4) are purified in a hydrolisator (Aigueperse et al. 2000):
3 SiF4 + 2 H2O → 2 H2SiF6 + SiO2
Hexafluoride silica acid (H2SiF6) is fed to the further processing. The by-product calcium sulphate can be neutralized with lime, then it can be processes to synthetic anhydrite (gypsum).
Reference:
Aigueperse, J., Mollard, P., Devilliers, D., Chemla, M., Faron, R., Romano, R. and Cuer, J. P. 2000. Fluorine Compounds, Inorganic. Ullmann's Encyclopedia of Industrial Chemistry.

## Time period
Period during which the literature sources were published and during which the data are assumed to be valid.

## Reference product
- hydrogen fluoride: 1 kg; name RP; CPC 34231: Chemical elements n.e.c.; inorganic acids except phosphoric, nitric and sulphonitric; inorganic oxygen compoun[…]; By-product classification allocatable product; CAS 7664-39-3
  Hydrogen fluoride is a colourless gas or colourless fuming liquid with a pungent odour. It is used in the production of aluminum and chlorofluorocarbons, and in the glass etching and chemical industries.
  References:
  Aigueperse, J., Mollard, P., Devilliers, D., Chemla, M., Faron, R., Romano, R. and Cuer, J. P. 2000. Fluorine Compounds, Inorganic. Ullmann's Encyclopedia of Industrial Chemistry.
  National Center for Biotechnology Information. PubChem Compound Database; CID=14917, https://pubchem.ncbi.nlm.nih.gov/compound/14917 (last accessed on 2017-01-04).
  Krieger T. and Roekens-Guibert H. (2006) Environmental impacts of Tedlar (R) PVF film for use in photovoltaic modules. In proceedings from: 21th European Photovoltaic Solar Energy Conference, Dresden, DE, 4-8.9.2006, retrieved from: http://www2.dupont.com/Photovoltaics/en_US/news_events/event20060904.html.
  production volume 3.625e8 kg; name RP_PV
    Estimated based on literature value. 2.5E+8kg of hydrogen fluoride (HF) has been produced in Europe in 2010 (http://www.eurofluor.org/introduction/). This value is scaled to global production volume using a factor of 3.9 (International Monetary Fund, GDP - PPP). It is estimated, that 50% of the production is produced in this technology.
  property price 2 EUR2005
    Estimated based on expert judgement and knowledge of the market for chemicals.
  property heating value, net 6.06 MJ
    LHV is calculated based on the elemental composition of the substance. Based on the CAS number of the substance (007664-39-3), the chemical formula of the substance is found to be: HF, (PubChem 2020).
    Reference: Kim, S., Chen, J., Cheng, T., Gindulyte, A., He, J., He, S., Li, Q., Shoemaker, B. A., Thiessen, P. A., Yu, B., Zaslavsky, L., Zhang, J., & Bolton, E. E. (2019). PubChem 2019 update: improved access to chemical data. Nucleic acids research, 47(D1), D1102–D1109. https://doi.org/10.1093/nar/gky1033
  property carbon content 0
    carbon content on a dry matter basis (reserved; not for manual entry)
  properties: water in wet mass 0 kg, water content 0, wet mass 1 kg, carbon content, fossil 0, carbon content, non-fossil 0, dry mass 1 kg, carbon allocation 0 kg

## Inputs from technosphere
- electricity, medium voltage: 0 kWh; pedigree (1,1,1,1,1)
  Estimated value based on expert judgement.
- heat, district or industrial, natural gas: 0 MJ; pedigree (1,1,1,1,1)
  Estimated value based on expert judgement.
  properties: heating value, net 1 MJ
- chemical factory, organics: 4e-10 unit; lognormal variance with pedigree 0.31, pedigree (2,3,2,4,3)
  Calculated based on literature data published by the industry. For this activity, no information was readily available concerning infrastructure and land-use. Therefore, the infrastructure is estimated based on data from two chemical factories, the BASF site of Ludwigshafen and the chemical factory in Gendorf (which are both located in Germany), which produce a wide range of chemical substances. Based on this data, the following assumptions are made: the built area amounts to about 4.2 ha, the plant has an average output of 50'000 t/a and a lifespan of fifty years. The estimated infrastructure amount is therefore 4.00 E-10 units per kg of produced chemical.
  References:
  Althaus H.-J., Chudacoff M., Hischier R., Jungbluth N., Osses M. and Primas A. (2007) Life Cycle Inventories of Chemicals. ecoinvent report No. 8, v2.0. EMPA Dübendorf, Swiss Centre for Life Cycle Inventories, Dübendorf, CH.
  Gendorf (2000) Umwelterklärung 2000, Werk Gendorf. Werk Gendorf, Burgkirchen.
- sulfuric acid: 2.5 kg; lognormal variance with pedigree 0.1786, pedigree (4,5,5,5,5)
  Estimated value based on expert judgement.
  properties: wet mass 1 kg, dry mass 1 kg
- fluorspar, 97% purity: 2.053 kg; lognormal variance with pedigree 0.001425, pedigree (2,3,2,2,1)
  Literature value (Krieger and Roekens-Guibert 2006).
  Uncertainty: K
  properties: wet mass 1 kg, dry mass 1 kg
- electricity, medium voltage: 0.0031513, 0.000604283, 0.0101447, 0.147545, 0.0207965, 0.0677582 kWh (6 entries); lognormal variance with pedigree 0.1786, pedigree (4,5,5,5,5)
  Estimated value based on expert judgement.
- heat, district or industrial, natural gas: 0.106247, 6.89375 MJ (2 entries); lognormal variance with pedigree 0.1786, pedigree (4,5,5,5,5)
  Estimated value based on expert judgement.

## Emissions to nature
- Sulfur dioxide [air, unspecified]: 0.0003 kg; lognormal variance with pedigree 0.0627, pedigree (3,3,5,3,1)
  Estimated value based on literature.
  Uncertainty: H

## Sampling procedure
Estimations based on literature and expert judgement.

## Review by Gregor Wernet 2017-08-04
This dataset was additionally reviewed in a separate review process by Eric Johnson of Atlantic Consulting as well as Emilia Moreno Ruiz and Gregor Wernet of ecoinvent.
