# transport, passenger, electric bicycle

Dataset: EcoSpold 2, unit process
Geography: CH
Time period: 2005-01-01 to 2021-12-31
Technology level: current
Classification: EcoSpold01Categories: transport systems/road
Classification: ISIC rev.4 ecoinvent: 4922:Other passenger land transport
Synonyms: e-bike
Tags: ConvertedDataset
Scenario: Business-as-Usual
System model: Allocation, cut-off by classification
Generated by: Marianne Leuenberger
Published in: M. Leuenberger 2010
Database: ecoinvent
isCopyrightProtected: true
accessRestrictedTo: 1

## General comment
The data set reflects the transport of one person on one kilometer on an electric bicycle. Capacity utilisation: 1 person
[This dataset was already contained in the ecoinvent database version 2. It was not individually updated during the transfer to ecoinvent version 3. Life Cycle Impact Assessment results may still have changed, as they are affected by changes in the supply chain, i.e. in other datasets. This dataset was generated following the ecoinvent quality guidelines for version 2. It may have been subject to central changes described in the ecoinvent version 3 change report (http://www.ecoinvent.org/database/ecoinvent-version-3/reports-of-changes/), and the results of the central updates were reviewed extensively. The changes added e.g. consistent water flows and other information throughout the database. The documentation of this dataset can be found in the ecoinvent reports of version 2, which are still available via the ecoinvent website. The change report linked above covers all central changes that were made during the conversion process.]

## Included activities end
This data includes the operation, maintenance and disposal of an electric bicycle and the use of the road infrastructure. For e-bike operation Swiss consumer mix is used.

## Geography
Data for transport in Switzerland

## Technology
Transport using Swiss consumer mix. Life expectancy: 15000km

## Reference product
- transport, passenger, electric bicycle: 1 person*km; By-product classification allocatable product; CPC 64119: Other land transportation services of passengers, n.e.c.
  EcoSpold01Location=CH
  production volume 0.0336675 person*km
    This is a placeholder value that does not reflect real-world production volumes. This dataset does not currently require a real-world production volume to work in the database framework, and no actual data were collected yet. This has no negative effect on the results of the ecoinvent database. The placeholder value of this activity was scaled according to the nominal GDP of 2005 (source: United Nations, http://data.un.org/Glossary.aspx?q=GDP+%28current+US%24%29, accessed 20130726) to reflect an appropriate share of the global production volume, which is also a placeholder value.
  property price 0.161363 EUR2005
    Calculated based on inputs: The price of the product has been calculated as a sum of the values of the material and energy inputs for this product. This value is therefore a rough estimation. It may underestimate the real price since there are additional expenses when producing any product. These expences can include for example labour costs, treatment of waste materials and profit for the producer. Please consider carefully whether this level of data quality is acceptable for your application.

## Inputs from technosphere
- energy use and operation emissions, electric bicycle: 1 km; lognormal variance with pedigree 0.128, pedigree (1,1,4,1,1)
  EcoSpold01Location=CH
  Defined by laws and physics;activityLink introduced to establish a direct link to the corresponding regional supply of this product
  Uncertainty: defined by laws and physics
- used electric bicycle: -6.6667e-5 unit; lognormal variance with pedigree 0.3086, pedigree (2,1,4,1,1)
  EcoSpold01Location=CH
  Estimation: eBike 15'000km
  Uncertainty: Estimation: eBike 15'000km
  production volume 6.6667e-5 unit
    Calculated from the production volume of transport, passenger, electric bicycle in proportion to the respective output amounts.
  properties: carbon content, fossil 0.128436, dry mass 24 kg, wet mass 24 kg
  note on carbon content, fossil: Calculated from C content in input materials in the infrastructure
- maintenance, electric bicycle: 6.6667e-5 unit; lognormal variance with pedigree 0.3086, pedigree (2,1,4,1,1)
  EcoSpold01Location=CH
  Estimation: eBike 15'000km
  Uncertainty: Estimation: eBike 15'000km
- electric bicycle: 6.6667e-5 unit; lognormal variance with pedigree 0.3086, pedigree (2,1,4,1,1)
  EcoSpold01Location=RER
  Estimation: eBike 15'000km
  Uncertainty: Estimation: eBike 15'000km
- road: 5.2899e-5 m*year; lognormal variance with pedigree 0.428, pedigree (4,1,5,1,4)
  Allocation of road use according to gross ton kilometre performance
  EcoSpold01Location=CH
  Uncertainty: allocation of road use according to gross ton kilometre performance

## Sampling procedure
Literature

## Extrapolations
This dataset has been extrapolated from year 2009 to the year of the calculation (2021). The uncertainty has been adjusted accordingly.

## Review by Christian Bauer 2010-02-07
29.01.2010
passed
C:\Dokumente und Einstellungen\Marianne\Eigene Dateien\Projekte\277_Mobitool\Ecoinvent\Review\Upload 1\[Ecospold_Transport_ebikes-v1.1.xls]X-Process
