# lath, hardwood, raw, kiln drying to u=20%

Dataset: EcoSpold 2, unit process
Geography: Europe without Switzerland
Time period: 2011-01-01 to 2021-12-31
Technology level: current
Classification: ISIC rev.4 ecoinvent: 1610:Sawmilling and planing of wood
Tags: Swiss brush-up completed
Scenario: Business-as-Usual
System model: Allocation, cut-off by classification
Generated by: Frank Werner
Published in: Bauer, C. 2007
Database: ecoinvent
isCopyrightProtected: true
accessRestrictedTo: 1

## General comment
This dataset represents the service of kiln drying of one m3 sawn hardwood lath. The wood chip used in the process is considered to be supplied internally which are generated from slabs and sidings when sawing. Characteristics of the of wood chips to be burned: Dry wood density 640 kg/m3; the low heating value 4208 MJ/m3, humidity when burned is estimated to be around 50%, which is achieved after some weeks of drying in the storage. Wood chips will be able to supply the entire thermal demand for drying, Air emission factors as well as the boiler efficiency represent average annual operation including start and stop (warm-up and shut-down). The boiler used is considered to be 300 kW and emission profile refers to the facility. Shrinkage ratio of between the moisture content of u=30% - 0% is 0.004 %/%.
Within ecoinvent, three products - boards, beams and laths - are distinguished:

## Included activities start
Kiln drying process starting from sawn hardwood, at the sawmill site, assumed to lose some water before the start of the kiln drying process.

## Included activities end
This activity ends with kiln dried hardwood lath, at sawmill. The dataset includes kiln drying of wet wood assumed as u=50% down to u=20%, and shrinkage. The dataset does not include air emissions released from the wood, as the emissions are assume to be comparable to emissions from natural drying during decomposition/rotting.

## Geography
Represents average Swiss conditions assumed to be represenative for Europe

## Parameters
- emission of dinitrogen monoxide: 3.06667e-6 kg/MJ; name N2O; = 2.3E-06*scaling_factor
  updated emission profile (amount of emission in kg/MJ heat) based on personal communication, PSI, 2014
- moisture content wood chip: 50 dimensionless; name moisture_woodchip
  moisture content of wood chip
- emission of cadmium: 9.33333e-10 kg/MJ; name cadmium; = 0.0000000007*scaling_factor
  (same comment as for emission of dinitrogen monoxide)
- emission of arsenic: 1.33333e-9 kg/MJ; name arsenic; = 0.000000001*scaling_factor
  (same comment as for emission of dinitrogen monoxide)
- moisture content lath: 20 dimensionless; name moisture_lath
  moisture content of lath
- emission of dioxin measured as 2,3,7,8-tetrachlorodibenzo-p-dioxin: 4.13333e-14 kg/MJ; name tetrachloro; = 0.000000000000031*scaling_factor
  (same comment as for emission of dinitrogen monoxide)
- emission of zinc: 4e-7 kg/MJ; name zinc; = 0.0000003*scaling_factor
  (same comment as for emission of dinitrogen monoxide)
- emission of benzene, ethyl: 4e-8 kg/MJ; name ben_ethyl; = 0.00000003*scaling_factor
  (same comment as for emission of dinitrogen monoxide)
- emission of bromine: 8e-8 kg/MJ; name bro; = 0.00000006*scaling_factor
  (same comment as for emission of dinitrogen monoxide)
- emission of acetaldehyde: 8.13333e-8 kg/MJ; name acet; = 0.000000061*scaling_factor
  (same comment as for emission of dinitrogen monoxide)
- total heat: 672 MJ; name heat_woodchip
  total thermal energy required for the drying process per m3 of output
- emission of Methane, non-fossil: 3.2e-6 kg/MJ; name Methane_nonfossil; = 0.0000024*scaling_factor
  (same comment as for emission of dinitrogen monoxide)
- emission of Mercury: 4e-10 kg/MJ; name mercury; = 0.0000000003*scaling_factor
  (same comment as for emission of dinitrogen monoxide)
- wood density, basic: 588.8 kg/m3; name basic_wood_d; = dry_wood_d*(1-moisture_lath*shrinkage_ratio)
  kg oven-dry matter/wet volume
- emission of ammonia: 2.30667e-6 kg/MJ; name ammonia; = 0.00000173*scaling_factor
  (same comment as for emission of dinitrogen monoxide)
- emission of chromium 4: 5.33333e-11 kg/MJ; name chroIV; = 0.00000000004*scaling_factor
  (same comment as for emission of dinitrogen monoxide)
- emission of Particulates >2.5 to <10: 6.66667e-6 kg/MJ; name Particulates2_5_to_10; = 5E-06 * scaling_factor
  (same comment as for emission of dinitrogen monoxide)
- emission of Nickel: 8e-9 kg/MJ; name nickel; = 0.000000006*scaling_factor
  (same comment as for emission of dinitrogen monoxide)
- emission of Phosphorus: 4e-7 kg/MJ; name Phosphorus; = 0.0000003*scaling_factor
  (same comment as for emission of dinitrogen monoxide)
- emission of copper: 2.93333e-8 kg/MJ; name copper; = 0.000000022*scaling_factor
  (same comment as for emission of dinitrogen monoxide)
- emission of Phenol, pentachloro-: 1.08e-11 kg/MJ; name Phenol_pentachloro; = 0.0000000000081*scaling_factor
  (same comment as for emission of dinitrogen monoxide)
- emission of polycyclic aromatic hydrocarbons: 1.48e-8 kg/MJ; name pah; = 0.0000000111*scaling_factor
  (same comment as for emission of dinitrogen monoxide)
- emission of benzo(a)pyrene: 6.66667e-10 kg/MJ; name benzo; = 0.0000000005*scaling_factor
  (same comment as for emission of dinitrogen monoxide)
- emission of non-methane volatile organic compounds, unspecified origin: 1.4e-5 kg/MJ; name nmvoc; = 10.5E-06 * scaling_factor
  (same comment as for emission of dinitrogen monoxide)
- emission of sodium: 1.73333e-6 kg/MJ; name sodium; = 0.0000013*scaling_factor
  (same comment as for emission of dinitrogen monoxide)
- wood density, dry: 640 kg/m3; name dry_wood_d
  kg oven-dry matter/oven-dry volume
- emission of Formaldehyde: 1.73333e-7 kg/MJ; name Formaldehyde; = 0.00000013*scaling_factor
  (same comment as for emission of dinitrogen monoxide)
- emission of chromium: 5.28e-9 kg/MJ; name chromium; = 0.00000000396*scaling_factor
  (same comment as for emission of dinitrogen monoxide)
- emission of Particulates 2.5: 0.00012 kg/MJ; name Particulate2_5; = 90E-06*scaling_factor
  (same comment as for emission of dinitrogen monoxide)
- emission of Manganese: 2.26667e-7 kg/MJ; name manganese; = 0.00000017*scaling_factor
  (same comment as for emission of dinitrogen monoxide)
- emission of chlorine: 2.4e-7 kg/MJ; name ch; = 0.00000018*scaling_factor
  (same comment as for emission of dinitrogen monoxide)
- emission of carbon monoxide, non-fossil: 0.000333333 kg/MJ; name co; = 2.5E-04*scaling_factor
  (same comment as for emission of dinitrogen monoxide)
- emission of Magnesium: 4.8e-7 kg/MJ; name magnesium; = 0.00000036*scaling_factor
  (same comment as for emission of dinitrogen monoxide)
- emission of sulfur dioxide: 3.33333e-6 kg/MJ; name so2; = 0.0000025*scaling_factor
  (same comment as for emission of dinitrogen monoxide)
- scaling factor: 1.33333 dimensionless; name scaling_factor; = 1/0.75; lognormal variance with pedigree 0.0016, pedigree (2,1,1,1,1)
  The scaling factor corresponds to the inverse of the average annual efficiency of the heating system, including start/stop (warm up and cool down). Therefore, this efficiency will be lower than figures provided by manufacturers. The estimated value was provided by T.Nussbaumer, Verenum, and represents the average installed boiler in this size category in Switzerland.
- emission of Hydrocarbons, aliphatic, unsaturated: 4.13333e-6 kg/MJ; name Hydrocarbons_aliphatic; = 0.0000031*scaling_factor
  (same comment as for emission of dinitrogen monoxide)
- emission of lead: 3.33333e-8 kg/MJ; name lead; = 0.000000025*scaling_factor
  (same comment as for emission of dinitrogen monoxide)
- emission of benzene: 1.21333e-6 kg/MJ; name benzene; = 0.00000091*scaling_factor
  (same comment as for emission of dinitrogen monoxide)
- wood ash: 0.000666667 kg/MJ; name woodash; = 0.0005*scaling_factor
  generation of wood ash per MJ
- emission of m-Xylene: 1.6e-7 kg/MJ; name mxylene; = 0.00000012*scaling_factor
  (same comment as for emission of dinitrogen monoxide)
- emission of Particulates >10: 6.66667e-6 kg/MJ; name Particulates_higher_10; = 5E-06 * scaling_factor
  (same comment as for emission of dinitrogen monoxide)
- emission of benzene, hexachloro: 9.6e-15 kg/MJ; name ben_hexa; = 0.0000000000000072*scaling_factor
  (same comment as for emission of dinitrogen monoxide)
- emission of calcium: 7.8e-6 kg/MJ; name calcium; = 0.00000585*scaling_factor
  (same comment as for emission of dinitrogen monoxide)
- shrinkage ratio (u=30% - 0%): 0.004 dimensionless; name shrinkage_ratio
  shrinkage ratio between u=30% to 0%
- emission of Nitrogen oxides: 0.00024 kg/MJ; name no2; = 0.00018*scaling_factor
  (same comment as for emission of dinitrogen monoxide)
- furnace, wood chip: 2.31481e-8 unit/MJ; name furnace_energy; = 1/(300*20*2000*3.6)
  inventory of furnace over MJ heating demand
- emission of Potassium: 3.12e-5 kg/MJ; name Potassium; = 0.0000234*scaling_factor
  (same comment as for emission of dinitrogen monoxide)
- emission of Fluorine: 6.66667e-8 kg/MJ; name Fluorine; = 0.00000005*scaling_factor
  (same comment as for emission of dinitrogen monoxide)
- emission of Hydrocarbons, aliphatic, alkanes, unspecified: 1.21333e-6 kg/MJ; name Hydrocarbons_aliphatic_alkanes; = 0.00000091*scaling_factor
  (same comment as for emission of dinitrogen monoxide)
- emission of toluene: 4e-7 kg/MJ; name toluene; = 0.0000003*scaling_factor
  (same comment as for emission of dinitrogen monoxide)

## Reference product
- sawnwood, lath, hardwood, raw, dried (u=20%): 1 m3; name lath_raw_kiln; By-product classification allocatable product; CPC 31102: Wood, sawn or chipped lengthwise, sliced or peeled, of a thickness exceeding 6 mm, of non-coniferous wood
  production volume 564300 m3; name p_sawnwood_dried; = 2681.184/60*(12688-60)
    Scaled from the PV estimates of the Swiss sawmilling chain based UNECE data for 2013 for the production volumes of Switzerland (60'000 m3) and the production volume of Europe without Switzerland ( 12'748 m3 - 60'000 m3).
  property heating value, net 8524.3 MJ
    LHV is calculated based on the Carbon content of the product. More details can be found on the respective documentation.The property is based on a value of 12.06MJ/kg
  property dry mass 588.8 kg; = basic_wood_d
  property wet mass 706.56 kg; = basic_wood_d*(1+ water_content)
  property price 265 EUR2005
    Expert judgement (Urs Luginbühl, Swiss Sawmilling industry, personal communication in June 2014). Cross-reference; FAOSTAT (accessed 20140428). The price is calculated by using data on total world import quantity (m3) and import value (1000 USD), year 2005. 25656806 m3 of Sawnwood (NC) - coniferous was imported in the world in 2005. The import value was 9652714000 USD. The calculated price is thus (9652714000/25656806=376*0.8=) 303 Euro.
  property water in wet mass 117.76 kg; name WWM_dried; = basic_wood_d*water_content
  property water content 0.2; name water_content
  property carbon content 0.494
    carbon content on a dry matter basis (reserved; not for manual entry)
  properties: carbon content, fossil 0, carbon content, non-fossil 0.494, carbon allocation 290.867 kg

## Inputs from technosphere
- wood ash mixture, pure: -0.448 kg; name w_wood_ash; = (woodash* heat_woodchip)*-1; lognormal variance with pedigree 0.0337, pedigree (2,1,4,3,1)
  calculated from the input wood chips for heat production, based on an updated profile for industrial wood combustion according to PSI (CH)
  production volume 252806 kg; = 1201.170432/60*(12688-60)
    (same comment as for sawnwood, lath, hardwood, raw, dried (u=20%))
  properties: dry mass 1 kg, UVEK_link_3 1129, wet mass 1 kg, UVEK_link_2 1127, carbon content, non-fossil 0.012, UVEK_link_1 1128, UVEK_relative_amount_3 -1
  note on UVEK_link_3: to be used only in special submissions in coordination with ecoinvent and the Swiss FOEN
- technical wood drying facility: 3.66e-6 unit; name wooddrying; lognormal variance with pedigree 0.5587, pedigree (2,1,4,3,1)
  data taken from ecoinvent 2.2
- electricity, medium voltage: 20 kWh; name elec_midvol; lognormal variance with pedigree 0.0337, pedigree (2,1,4,3,1)
  electricity consumption of the drying facility
  properties: UVEK_relative_amount_1 1, UVEK_link_1 1779
- sawnwood, hardwood, raw: 1.04167 m3; name sawnwood_raw; = lath_raw_kiln/(1- (30-moisture_lath)*shrinkage_ratio); source Rudi Wagenführ 2000; lognormal variance with pedigree 0.0342, pedigree (2,1,4,4,1)
  Processed internally within the sawmill
  property water in wet mass 394.24 kg; name WWM_raw
  properties: heating value, net 7462.65 MJ, water content 0.7, carbon content, non-fossil 0.494, dry mass 563.2 kg, wet mass 957.44 kg
- wood chips, wet, measured as dry mass: 51.4351 kg; name woodchip_hard; = heat_woodchip/woodchip_hard_Net_Heat_Value/(1+moisture_woodchip/100)*scaling_factor; lognormal variance with pedigree 0.0342, pedigree (2,1,4,4,1)
  used for heat generation; measured data from industry
  property heating value, gross 19.6 MJ; name woodchip_hard_Gross_Heat_Value
  property dry mass 1 kg; name woodchip_hard_DM
  property water content 0.5; name woodchip_hard_water_content; = moisture_woodchip/100
  property heating value, net 11.6133 MJ; name woodchip_hard_Net_Heat_Value; = woodchip_hard_Gross_Heat_Value - 1.32 - 20* woodchip_hard_water_content/(1+ woodchip_hard_water_content)
  property wet mass 1.5 kg; name woodchip_hard_WM; = woodchip_hard_DM + woodchip_hard_WWM
  property carbon content, non-fossil 0.494; name woodchip_hard_C_content_non_fossil
  property water in wet mass 0.5 kg; name woodchip_hard_WWM; = woodchip_hard_DM*woodchip_hard_water_content
  note on heating value, gross: gross (upper) heating (calorific) value according to ecoinvent guidelines 2.2
  note on heating value, net: Value based on the dataset 'softwood forestry, mixed species, sustainable forest management'
- furnace, wood chips, with silo, 300kW: 1.55556e-5 unit; name furnace; = furnace_energy* heat_woodchip; lognormal variance with pedigree 0.5592, pedigree (2,1,4,4,1)
  infrastructure; value taken from ecoinvent 2.2 report Bauer, C. (2007): Holzenergie. In: R. Dones (ed.): Sachbilanzen von Energiesystemen: Grundlagen für den ökologischen Vergleich von Energiesystemen und den Einbezug von Energiesystemen in Ökobilanzen für die Schweiz, Final report ecoinvent 2000 No. 6, Paul Scherrer Institut Villigen, Swiss Centre for Life Cycle Inventories, Duebendorf, CH.
  properties: UVEK_link_1 999999, UVEK_relative_amount_1 1

## Emissions to nature
- Calcium [air, urban air close to ground]: 0.0052416 kg; = calcium* heat_woodchip; lognormal variance with pedigree 0.2087, pedigree (2,1,4,3,1)
  calculated from the input wood chips for heat production, based on an updated emissions profile for industrial wood combustion according to PSI (CH)
- Manganese [air, urban air close to ground]: 0.00015232 kg; = manganese* heat_woodchip; lognormal variance with pedigree 0.2087, pedigree (2,1,4,3,1)
  (same comment as for Calcium)
- Arsenic [air, urban air close to ground]: 8.96e-7 kg; = arsenic* heat_woodchip; lognormal variance with pedigree 0.2087, pedigree (2,1,4,3,1)
  (same comment as for Calcium)
- Nitrogen oxides [air, urban air close to ground]: 0.16128 kg; = no2* heat_woodchip; lognormal variance with pedigree 0.2087, pedigree (2,1,4,3,1)
  (same comment as for Calcium)
- Benzene [air, urban air close to ground]: 0.00081536 kg; = benzene* heat_woodchip; lognormal variance with pedigree 0.2087, pedigree (2,1,4,3,1)
  (same comment as for Calcium)
- Phenol, pentachloro- [air, urban air close to ground]: 7.2576e-9 kg; = Phenol_pentachloro* heat_woodchip; lognormal variance with pedigree 0.3587, pedigree (2,1,4,3,1)
  (same comment as for Calcium)
- Hydrocarbons, aliphatic, alkanes, unspecified [air, urban air close to ground]: 0.00081536 kg; = Hydrocarbons_aliphatic_alkanes* heat_woodchip; lognormal variance with pedigree 0.2087, pedigree (2,1,4,3,1)
  (same comment as for Calcium)
- NMVOC, non-methane volatile organic compounds, unspecified origin [air, urban air close to ground]: 0.009408 kg; = nmvoc* heat_woodchip; lognormal variance with pedigree 0.2087, pedigree (2,1,4,3,1)
  (same comment as for Calcium)
- Zinc [air, urban air close to ground]: 0.0002688 kg; = zinc* heat_woodchip; lognormal variance with pedigree 0.8087, pedigree (2,1,4,3,1)
  (same comment as for Calcium)
- m-Xylene [air, urban air close to ground]: 0.00010752 kg; = mxylene* heat_woodchip; lognormal variance with pedigree 0.3587, pedigree (2,1,4,3,1)
  (same comment as for Calcium)
- Hydrocarbons, aliphatic, unsaturated [air, urban air close to ground]: 0.0027776 kg; = Hydrocarbons_aliphatic* heat_woodchip; lognormal variance with pedigree 0.2087, pedigree (2,1,4,3,1)
  (same comment as for Calcium)
- Methane, non-fossil [air, urban air close to ground]: 0.0021504 kg; = Methane_nonfossil* heat_woodchip; lognormal variance with pedigree 0.2087, pedigree (2,1,4,3,1)
  (same comment as for Calcium)
- Benzene, ethyl- [air, urban air close to ground]: 2.688e-5 kg; = ben_ethyl* heat_woodchip; lognormal variance with pedigree 0.2087, pedigree (2,1,4,3,1)
  (same comment as for Calcium)
- Phosphorus [air, urban air close to ground]: 0.0002688 kg; = Phosphorus* heat_woodchip; lognormal variance with pedigree 0.2087, pedigree (2,1,4,3,1)
  (same comment as for Calcium)
- Sulfur dioxide [air, urban air close to ground]: 0.00224 kg; = so2* heat_woodchip; lognormal variance with pedigree 0.0337, pedigree (2,1,4,3,1)
  (same comment as for Calcium)
- Magnesium [air, urban air close to ground]: 0.00032256 kg; = magnesium* heat_woodchip; lognormal variance with pedigree 0.2087, pedigree (2,1,4,3,1)
  (same comment as for Calcium)
- Mercury [air, urban air close to ground]: 2.688e-7 kg; = mercury* heat_woodchip; lognormal variance with pedigree 0.8087, pedigree (2,1,4,3,1)
  (same comment as for Calcium)
- Toluene [air, urban air close to ground]: 0.0002688 kg; = toluene* heat_woodchip; lognormal variance with pedigree 0.3587, pedigree (2,1,4,3,1)
  (same comment as for Calcium)
- Acetaldehyde [air, urban air close to ground]: 5.4656e-5 kg; = acet* heat_woodchip; lognormal variance with pedigree 0.2087, pedigree (2,1,4,3,1)
  (same comment as for Calcium)
- Nickel [air, urban air close to ground]: 5.376e-6 kg; = nickel* heat_woodchip; lognormal variance with pedigree 0.8087, pedigree (2,1,4,3,1)
  (same comment as for Calcium)
- Copper [air, urban air close to ground]: 1.9712e-5 kg; = copper* heat_woodchip; lognormal variance with pedigree 0.2087, pedigree (2,1,4,3,1)
  (same comment as for Calcium)
- Sodium [air, urban air close to ground]: 0.0011648 kg; = sodium* heat_woodchip; lognormal variance with pedigree 0.2087, pedigree (2,1,4,3,1)
  (same comment as for Calcium)
- Particulates, < 2.5 um [air, urban air close to ground]: 0.08064 kg; = Particulate2_5* heat_woodchip; lognormal variance with pedigree 0.5587, pedigree (2,1,4,3,1)
  (same comment as for Calcium)
- Benzene, hexachloro- [air, urban air close to ground]: 6.4512e-12 kg; = ben_hexa* heat_woodchip; lognormal variance with pedigree 0.2087, pedigree (2,1,4,3,1)
  (same comment as for Calcium)
- Cadmium [air, urban air close to ground]: 6.272e-7 kg; = cadmium* heat_woodchip; lognormal variance with pedigree 0.8087, pedigree (2,1,4,3,1)
  (same comment as for Calcium)
- Particulates, > 2.5 um, and < 10um [air, unspecified]: 0.00448 kg; = Particulates2_5_to_10*heat_woodchip; lognormal variance with pedigree 0.3587, pedigree (2,1,4,3,1)
  (same comment as for Calcium)
- Chlorine [air, urban air close to ground]: 0.00016128 kg; = ch* heat_woodchip; lognormal variance with pedigree 0.2087, pedigree (2,1,4,3,1)
  (same comment as for Calcium)
- Carbon dioxide, non-fossil [air, urban air close to ground]: 93.1662 kg; = woodchip_hard*0.494/12*44; lognormal variance with pedigree 0.0337, pedigree (2,1,4,3,1)
  calculated from parameters based on wood input oven-dry x carbon content x molar relationship of CO2/C
- PAH, polycyclic aromatic hydrocarbons [air, urban air close to ground]: 9.9456e-6 kg; = pah* heat_woodchip; lognormal variance with pedigree 0.5587, pedigree (2,1,4,3,1)
  (same comment as for Calcium)
- Bromine [air, urban air close to ground]: 5.376e-5 kg; = bro* heat_woodchip; lognormal variance with pedigree 0.8087, pedigree (2,1,4,3,1)
  (same comment as for Calcium)
- Lead [air, urban air close to ground]: 2.24e-5 kg; = lead* heat_woodchip; lognormal variance with pedigree 0.8087, pedigree (2,1,4,3,1)
  (same comment as for Calcium)
- Fluorine [air, urban air close to ground]: 4.48e-5 kg; = Fluorine* heat_woodchip; lognormal variance with pedigree 0.2087, pedigree (2,1,4,3,1)
  (same comment as for Calcium)
- Chromium VI [air, urban air close to ground]: 3.584e-8 kg; = chroIV* heat_woodchip; lognormal variance with pedigree 0.8087, pedigree (2,1,4,3,1)
  (same comment as for Calcium)
- Formaldehyde [air, urban air close to ground]: 0.00011648 kg; = Formaldehyde* heat_woodchip; lognormal variance with pedigree 0.2087, pedigree (2,1,4,3,1)
  (same comment as for Calcium)
- Potassium [air, urban air close to ground]: 0.0209664 kg; = Potassium* heat_woodchip; lognormal variance with pedigree 0.2087, pedigree (2,1,4,3,1)
  (same comment as for Calcium)
- Water [air, unspecified]: 0.292907 m3; = (sawnwood_raw*WWM_raw-lath_raw_kiln*WWM_dried)/1000
  difference in water in wet mass in kg, converted to m3
- Dinitrogen monoxide [air, urban air close to ground]: 0.0020608 kg; = N2O* heat_woodchip; lognormal variance with pedigree 0.2087, pedigree (2,1,4,3,1)
  (same comment as for Calcium)
- Ammonia [air, urban air close to ground]: 0.00155008 kg; = ammonia* heat_woodchip; lognormal variance with pedigree 0.2087, pedigree (2,1,4,3,1)
  (same comment as for Calcium)
- Dioxins, measured as 2,3,7,8-tetrachlorodibenzo-p-dioxin [air, urban air close to ground]: 2.7776e-11 kg; = tetrachloro* heat_woodchip; lognormal variance with pedigree 0.5587, pedigree (2,1,4,3,1)
  (same comment as for Calcium)
- Benzo(a)pyrene [air, urban air close to ground]: 4.48e-7 kg; = benzo* heat_woodchip; lognormal variance with pedigree 0.5587, pedigree (2,1,4,3,1)
  (same comment as for Calcium)
- Carbon monoxide, non-fossil [air, urban air close to ground]: 0.224 kg; = co* heat_woodchip; lognormal variance with pedigree 0.2087, pedigree (2,1,4,3,1)
  (same comment as for Calcium)
- Chromium [air, urban air close to ground]: 3.54816e-6 kg; = chromium* heat_woodchip; lognormal variance with pedigree 0.8087, pedigree (2,1,4,3,1)
  (same comment as for Calcium)

## Sampling procedure
complementary literature and sampling from sawmills; CH data used to approximate European processes

## Extrapolations
This dataset has been extrapolated from year 2013 to the year of the calculation (2021). The uncertainty has been adjusted accordingly.
