# treatment of used light commercial vehicle

Dataset: EcoSpold 2, unit process
Geography: CH
Time period: 1990-01-01 to 2021-12-31
Technology level: current
Classification: ISIC rev.4 ecoinvent: 3830:Materials recovery
Classification: EcoSpold01Categories: transport systems/road
Tags: ConvertedDataset; Treatment
Scenario: Business-as-Usual
System model: Allocation, cut-off by classification
Generated by: Michael Spielmann (obsolete)
Published in: Spielmann M. 2007
Database: ecoinvent
isCopyrightProtected: true
accessRestrictedTo: 1

## General comment
For the disposal of steel, aluminium and cooper and tyres a cut off allocation is applied.
[This dataset was already contained in the ecoinvent database version 2. It was not individually updated during the transfer to ecoinvent version 3. Life Cycle Impact Assessment results may still have changed, as they are affected by changes in the supply chain, i.e. in other datasets. This dataset was generated following the ecoinvent quality guidelines for version 2. It may have been subject to central changes described in the ecoinvent version 3 change report (http://www.ecoinvent.org/database/ecoinvent-version-3/reports-of-changes/), and the results of the central updates were reviewed extensively. The changes added e.g. consistent water flows and other information throughout the database. The documentation of this dataset can be found in the ecoinvent reports of version 2, which are still available via the ecoinvent website. The change report linked above covers all central changes that were made during the conversion process.]

## Included activities end
The inventory includes disposal processes for bulk materials. For the disposal of tyres a cut off allocation is applied. However, the transportation of tyres to the cement works is taken into account

## Geography
Data represent Swiss conditions

## Technology
no technologies are specified

## Time period
Data represents conditions of the 1990ties

## Reference product
- used light commercial vehicle: -1 unit; CPC 39990: Other wastes n.e.c.; By-product classification Waste
  EcoSpold01Location=CH
  production volume 0.0336675 unit
    This is a placeholder value that does not reflect real-world production volumes. This dataset does not currently require a real-world production volume to work in the database framework, and no actual data were collected yet. This has no negative effect on the results of the ecoinvent database. The placeholder value of this activity was scaled according to the nominal GDP of 2005 (source: United Nations, http://data.un.org/Glossary.aspx?q=GDP+%28current+US%24%29, accessed 20130726) to reflect an appropriate share of the global production volume, which is also a placeholder value.
  property price 0 EUR2005
    Waste products are assigned a price of zero as they are assumed to require further treatment.
  property carbon content, non-fossil 0.00156582
    Calculated from C content in input materials in the infrastructure, upscaled to actual weight of the vehicule
  property carbon content, fossil 0.104049
    (same comment as for used light commercial vehicle)
  property carbon content 0.105615
    carbon content on a dry matter basis (reserved; not for manual entry)
  properties: water content 0, wet mass 2500 kg, water in wet mass 0 kg, dry mass 2500 kg, carbon allocation 264.037 kg

## Inputs from technosphere
- waste emulsion paint: -12 kg; lognormal variance with pedigree 0.0427, pedigree (3,3,5,3,1)
  EcoSpold01Location=CH
  Material composition
  Uncertainty: material composition
  production volume 12 kg
    Calculated from the production volume of used van, < 3.5 metric ton in proportion to the respective output amounts.
  properties: heating value, net 8.18 MJ, carbon content, fossil 0.27, dry mass 1 kg, wet mass 1 kg
  note on carbon content, fossil: Tab A.4, ecoinvent v2.2 report 13_I. C content has been calculated after data in the tables, and then referred to 1 kg DM
- zinc in car shredder residue: -14.4 kg; lognormal variance with pedigree 0.0427, pedigree (3,3,5,3,1)
  Material composition
  EcoSpold01Location=CH
  Uncertainty: material composition
  production volume 14.4 kg
    (same comment as for waste emulsion paint)
  properties: dry mass 1 kg, wet mass 1 kg
- waste plastic, mixture: -27 kg; lognormal variance with pedigree 0.0427, pedigree (3,3,5,3,1)
  Material composition
  EcoSpold01Location=CH
  Uncertainty: material composition
  production volume 27 kg
    (same comment as for waste emulsion paint)
  properties: carbon content, fossil 0.747344, water content 0.180638, dry mass 0.847 kg, wet mass 1 kg, heating value, net 30.79 MJ
  note on carbon content, fossil: C content in 1 kg DM was calculated using data in Tab A.2, ecoinvent v2.2 report 13_I
  note on heating value, net: Value taken from the general comment of the treatment dataset.
- waste glass: -45 kg; lognormal variance with pedigree 0.0427, pedigree (3,3,5,3,1)
  EcoSpold01Location=CH
  Material composition
  Uncertainty: material composition
  production volume 45 kg
    (same comment as for waste emulsion paint)
  properties: wet mass 1 kg, dry mass 1 kg, heating value, net 0.05 MJ
  note on heating value, net: Value extracted from "treatment of waste glass, open dump, very wet infiltration class (1000mm)"

## Sampling procedure
data is based on the material consumption of vehicles. For the transportation of used tyres an expert estimate is used.

## Extrapolations
This dataset has been extrapolated from year 2000 to the year of the calculation (2021). The uncertainty has been adjusted accordingly.

## Review by Niels Jungbluth 2003-08-27
passed.
