# treatment of spent solvent mixture, hazardous waste incineration

Dataset: EcoSpold 2, unit process
Geography: RoW
Time period: 1997-01-01 to 2021-12-31
Technology level: current
Classification: ISIC rev.4 ecoinvent: 3822:Treatment and disposal of hazardous waste
Synonyms: waste solvents mixture from chemical production
Tags: ConvertedDataset; Treatment
Scenario: Business-as-Usual
System model: Allocation, cut-off by classification
Share of production covered: 39 %
Generated by: Gabor Doka
Published in: Doka G. 2008
Database: ecoinvent
isCopyrightProtected: true
accessRestrictedTo: 1

## General comment
Inventoried waste contains 100% waste solvents mixture; . waste composition (wet, in ppm): upper heating value 23.68 MJ/kg; lower heating value 21.7 MJ/kg; H2O 165000; O 200000; H 81660; C 477000; S 6420; N 10360; P 1000; B n.a.; Cl 24448; Br 2505.2; F 44.921; I 100.24; Ag n.a.; As n.a.; Ba n.a.; Cd n.a.; Co 4.1029; Cr n.a.; Cu 5.1445; Hg n.a.; Mn n.a.; Mo n.a.; Ni 4.2554; Pb n.a.; Sb n.a.; Se n.a.; Sn n.a.; V n.a.; Zn 41.844; Be n.a.; Sc n.a.; Sr n.a.; Ti n.a.; Tl n.a.; W n.a.; Si 31321; Fe 84.652; Ca n.a.; Al n.a.; K n.a.; Mg n.a.; Na n.a.; Share of carbon in waste that is biogenic 0%. Net energy produced in HWI: 17.11MJ/kg thermal energy and 1.27MJ/kg electric energy. Allocation of energy production: no substitution or expansion. 100% of burden allocated to waste disposal function of HWI. One kg of this waste produces 0.07563 kg of residues, which are landfilled. Additional solidification with 0.03025 kg of cement.
[This dataset is meant to replace the following datasets:]

## Included activities end
waste-specific air and water emissions from incineration, auxiliary material consumption for flue gas cleaning. Short-term emissions to river water and long-term emissions to ground water from residual material landfill (from solidified fly ashes and scrubber slugde). Process energy demands for HWI.

## Geography
Specific to the technology encountered in Switzerland in 2000. Well applicable to modern incineration practices in Europe or North America or Japan.

## Technology
Swiss HWI plant in 2000 with wet flue gas scrubber and low-dust SCR DeNOx facility. Gross thermal efficiency 74.4% and gross electric efficiency 10%.

## Time period
Transfer coefficients for modern Swiss MSWI. Emission speciation based on early 90ies data.

## Reference product
- spent solvent mixture: -1 kg; name RP; CPC 39950: Wastes from chemical or allied industries; By-product classification Waste
  production volume 9.81575e9 kg; name PV_RP; = 250000 * 1000 * 0.5 / 0.00847
    Extrapolated from the data for Switzerland, based on the GDP in 2005. The relative GDP of Switzerland in 2005 was 0.008417 (world GDP is considered to be 1). According to Capello et al. (2005), about 250’000 tonnes of solvents are used per annum in Switzerland. It was assumed that 50% of the used solvent in Switzerland is incinerated for treatment. Capello, C. (2006). Environmental assessment of waste-solvent treatment in the Swiss chemical industry. ETH. <http://www.sust-chem.ethz.ch/tools/ecosolvent/analysis_chem_life_cycle> (Accessed 23-03-2015).
  property price 0 EUR2005; name RP_price_EUR2005
    Waste products are assigned a price of zero as they are assumed to require further treatment.
  property carbon content, fossil 0.571257
    Tab A.7, ecoinvent v2.2 report 13_I. C content has been calculated after data in the tables, and then referred to 1 kg DM
  property heating value, net 21.7 MJ
    Value taken from the general comment of the treatment dataset.
  property carbon content 0.571257
    carbon content on a dry matter basis (reserved; not for manual entry)
  properties: water in wet mass 0.165 kg, carbon content, non-fossil 0, water content 0.197605, dry mass 0.835 kg, wet mass 1 kg, carbon allocation 0.477 kg

## Inputs from technosphere
- calcium chloride: 0.0034676 kg; lognormal variance with pedigree 0.742, pedigree (1,1,5,5,1)
  uncertainty calculated from uncertainty in average auxiliary material input, and the unertainty of the waste composition of this waste
  properties: wet mass 1 kg, dry mass 1 kg
- titanium dioxide: 1.4836e-5 kg; lognormal variance with pedigree 1.272, pedigree (1,1,5,5,1)
  uncertainty calculated from uncertainty in average DeNOx input, uncertainty in the share of thermal NOx, uncertainty of nitrogen content in average municipal waste and the unertainty in nitrogen content in *this* waste.
  properties: dry mass 1 kg, wet mass 1 kg
- ammonia, anhydrous, liquid: 0 kg; pedigree (1,1,1,1,1)
  (same comment as for titanium dioxide)
  properties: dry mass 1 kg, wet mass 1 kg
- chemical, inorganic: 0.00027895 kg; lognormal variance with pedigree 0.152, pedigree (1,1,5,5,1)
  Proxy for Polyelectrolyte. uncertainty calculated from uncertainty in average auxiliary material input, and the unertainty of the waste composition of this waste
  properties: wet mass 1 kg, carbon content, fossil 0.003, dry mass 1 kg
  note on carbon content, fossil: This dataset is an unweighted average of 20 inorganic substances (listed in Tab 88.1, ecoinvent v2.2 report 8, part II), being part of the top100 chemicals included in this database. The C-content has also been calculated as an unweighted average of the C content of the substances composing this dataset.
- waste cement, hydrated: -0.07563 kg; name BP; lognormal variance with pedigree 0.112, pedigree (1,1,5,5,1)
  Hydrated cement for solidification of landfilled residual material. Uncertainty calculated from unertainty of the waste composition of this waste and transfer coefficients in the incinerator and of the solidification recipe.
  production volume 7.42365e8 kg; name WS_BP_PV; = PV_RP*BP/ABS(RP)
    Calculated from the production volume of spent solvent mixture, 16.5% water in proportion to the respective output amounts.
  property price 0 EUR2005; name BP_price_EUR2005
  properties: dry mass 1 kg, wet mass 1 kg
- sodium hydroxide, without water, in 50% solution state: 0.046084 kg; lognormal variance with pedigree 0.212, pedigree (1,1,5,5,1)
  (same comment as for calcium chloride)
  properties: wet mass 1 kg, dry mass 1 kg, heating value, net 3.03 MJ
- process-specific burdens, hazardous waste incineration plant: 1 kg; lognormal variance with pedigree 0.042, pedigree (1,1,5,5,1)
  demands per kilogram waste. uncertainty is heeded in the module
- cement, unspecified: 0 kg; pedigree (1,1,1,1,1)
  Cement for solidification of landfilled residual material. Uncertainty calculated from unertainty of the waste composition of this waste, of transfer coefficients in the incinerator and of the solidification recipe.
  properties: dry mass 1 kg, wet mass 1 kg
- iron (III) chloride, without water, in 40% solution state: 3.2063e-5 kg; lognormal variance with pedigree 0.822, pedigree (1,1,5,5,1)
  (same comment as for calcium chloride)
  properties: wet mass 1 kg, dry mass 1 kg
- chromium: 3.0278e-7 kg; lognormal variance with pedigree 1.272, pedigree (1,1,5,5,1)
  Proxy for vanadium pentoxide V2O5 in SCR catalyst. uncertainty calculated from uncertainty in average DeNOx input, uncertainty in the share of thermal NOx, uncertainty of nitrogen content in average municipal waste and the unertainty in nitrogen content in *this* waste.
  properties: wet mass 1 kg, dry mass 1 kg
- residual material landfill: 1.5756e-10 unit; lognormal variance with pedigree 0.102, pedigree (1,1,5,5,1)
  uncertainty is calculated from uncertainties in waste composition and transfer coefficients in incinerator
- quicklime, milled, packed: 0.0062205 kg; lognormal variance with pedigree 0.222, pedigree (1,1,5,5,1)
  (same comment as for calcium chloride)
  properties: wet mass 1 kg, dry mass 0.99 kg, water content 0.010101
- process-specific burdens, residual material landfill: 0.07563 kg; lognormal variance with pedigree 0.102, pedigree (1,1,5,5,1)
  (same comment as for residual material landfill)
- heat, central or small-scale, other than natural gas: 1.222 MJ; lognormal variance with pedigree 1.412, pedigree (1,1,5,5,1)
  Uncertainty dependent on total energy required and heating value present, using experimental GSd for substraction from uc=A*GSDa^2-B
  properties: heating value, net 1 MJ
- hazardous waste incineration facility: 1.25e-9 unit; lognormal variance with pedigree 0.042, pedigree (1,1,5,5,1)
  demands per kilogram waste. uncertainty is heeded in the module
- heat, district or industrial, natural gas: 0 MJ; pedigree (1,1,1,1,1)
  (same comment as for titanium dioxide)
  properties: heating value, net 1 MJ
- hydrogen peroxide, without water, in 50% solution state: 2.8873e-5 kg; lognormal variance with pedigree 0.492, pedigree (1,1,5,5,1)
  (same comment as for calcium chloride)
  properties: dry mass 1 kg, wet mass 1 kg, heating value, net 7.13 MJ
- hydrochloric acid, without water, in 30% solution state: 0.00016737 kg; lognormal variance with pedigree 0.152, pedigree (1,1,5,5,1)
  (same comment as for calcium chloride)
  properties: dry mass 1 kg, heating value, net 3.32 MJ, wet mass 1 kg
- ammonia, anhydrous, liquid: 7.9196e-5, 6.80785e-6, 1.05913e-5, 2.0985e-5, 2.05598e-5, 2.15489e-6, 9.63314e-6, 0.000227892 kg (8 entries); lognormal variance with pedigree 0.892, pedigree (1,1,5,5,1)
  (same comment as for titanium dioxide)
- cement, unspecified: 0.0010623, 7.78059e-5, 0.000221772, 0.00501545, 0.000147619, 0.0016213, 0.000196159, 0.0219096 kg (8 entries); lognormal variance with pedigree 0.112, pedigree (1,1,5,5,1)
  (same comment as for cement, unspecified)
- heat, district or industrial, natural gas: 0.00279928, 0.181629 MJ (2 entries); lognormal variance with pedigree 0.992, pedigree (1,1,5,5,1)
  (same comment as for titanium dioxide)

## Emissions to nature
- Ammonia [air, urban air close to ground]: 1.0246e-5 kg; lognormal variance with pedigree 0.932, pedigree (1,1,5,5,1)
  uncertainty calculated from uncertainty in average N-emissions, uncertainty in the share of thermal NOx, uncertainty of nitrogen content in average municipal waste and the unertainty in nitrogen content in *this* waste.
- Fluoride [water, surface water]: 4.4838e-5 kg; lognormal variance with pedigree 1.112, pedigree (1,1,5,5,1)
  uncertainty is calculated from uncertainties in waste composition and transfer coefficients in incinerator and landfills
- Sulfur dioxide [air, urban air close to ground]: 7.704e-6 kg; lognormal variance with pedigree 0.482, pedigree (1,1,5,5,1)
  (same comment as for residual material landfill)
- Iodide [water, surface water]: 0.00010022 kg; lognormal variance with pedigree 1.002, pedigree (1,1,5,5,1)
  (same comment as for Fluoride)
- Iodine [air, urban air close to ground]: 2.0048e-8 kg; lognormal variance with pedigree 1.032, pedigree (1,1,5,5,1)
  (same comment as for residual material landfill)
- Nitrate [water, ground-, long-term]: 0.00037216 kg; lognormal variance with pedigree 0.412, pedigree (1,1,5,5,1)
  Long-term emissions from landfilling of incineration residues. uncertainty is calculated from uncertainties in waste composition and transfer coefficients in incinerator and landfills.
- Bromine [water, ground-, long-term]: 8.3772e-7 kg; lognormal variance with pedigree 0.612, pedigree (1,1,5,5,1)
  (same comment as for Nitrate)
- TOC, Total Organic Carbon [water, ground-, long-term]: 0.0033905 kg; lognormal variance with pedigree 0.112, pedigree (1,1,5,5,1)
  (same comment as for Nitrate)
- Hydrogen chloride [air, urban air close to ground]: 7.5414e-6 kg; lognormal variance with pedigree 0.332, pedigree (1,1,5,5,1)
  (same comment as for residual material landfill)
- Nitrate [water, surface water]: 0.00013252 kg; lognormal variance with pedigree 0.302, pedigree (1,1,5,5,1)
  (same comment as for Fluoride)
- Chloride [water, surface water]: 0.024411 kg; lognormal variance with pedigree 0.302, pedigree (1,1,5,5,1)
  (same comment as for Fluoride)
- Hydrogen fluoride [air, urban air close to ground]: 1.1303e-8 kg; lognormal variance with pedigree 1.142, pedigree (1,1,5,5,1)
  (same comment as for residual material landfill)
- Fluoride [water, ground-, long-term]: 7.2227e-8 kg; lognormal variance with pedigree 1.132, pedigree (1,1,5,5,1)
  (same comment as for Nitrate)
- Bromine [water, surface water]: 0.0025039 kg; lognormal variance with pedigree 0.582, pedigree (1,1,5,5,1)
  (same comment as for Fluoride)
- Iron [air, urban air close to ground]: 5.9256e-8 kg; lognormal variance with pedigree 1.052, pedigree (1,1,5,5,1)
  (same comment as for residual material landfill)
- Cobalt [water, surface water]: 4.1e-6 kg; lognormal variance with pedigree 1.432, pedigree (1,1,5,5,1)
  (same comment as for Fluoride)
- Carbon dioxide, fossil [air, urban air close to ground]: 1.7297 kg; lognormal variance with pedigree 0.062, pedigree (1,1,5,5,1)
  calculated from uncertainty in carbon in waste and transfer coefficients
- Silicon [water, ground-, long-term]: 0.031178 kg; lognormal variance with pedigree 0.282, pedigree (1,1,5,5,1)
  (same comment as for Nitrate)
- Nickel, ion [water, ground-, long-term]: 1.2245e-6 kg; lognormal variance with pedigree 1.682, pedigree (1,1,5,5,1)
  (same comment as for Nitrate)
- Sulfate [water, ground-, long-term]: 0.00073589 kg; lognormal variance with pedigree 0.472, pedigree (1,1,5,5,1)
  (same comment as for Nitrate)
- DOC, Dissolved Organic Carbon [water, ground-, long-term]: 0.0033905 kg; lognormal variance with pedigree 0.112, pedigree (1,1,5,5,1)
  (same comment as for Nitrate)
- TOC, Total Organic Carbon [water, surface water]: 1.0486e-5 kg; lognormal variance with pedigree 0.352, pedigree (1,1,5,5,1)
  (same comment as for Fluoride)
- Iodide [water, ground-, long-term]: 2.105e-14 kg; lognormal variance with pedigree 1.042, pedigree (1,1,5,5,1)
  (same comment as for Nitrate)
- Phosphorus [air, urban air close to ground]: 7e-7 kg; lognormal variance with pedigree 0.722, pedigree (1,1,5,5,1)
  (same comment as for residual material landfill)
- Dinitrogen monoxide [air, urban air close to ground]: 3.6886e-5 kg; lognormal variance with pedigree 1.02, pedigree (5,5,5,5,5)
  uncertainty calculated from uncertainty for proxy (from MSWI), uncertainty in average N-emissions, uncertainty in the share of thermal NOx, uncertainty of nitrogen content in average municipal waste and the unertainty in nitrogen content in *this* waste.
  Uncertainty: , uncertainty in average N-emissions, uncertainty in the share of thermal NOx, uncertainty of nitrogen content in average municipal waste and the unertainty in nitrogen content in *this* waste.
- BOD5, Biological Oxygen Demand [water, surface water]: 2.3968e-5 kg; lognormal variance with pedigree 0.352, pedigree (1,1,5,5,1)
  (same comment as for Fluoride)
- Copper, ion [water, ground-, long-term]: 1.894e-7 kg; lognormal variance with pedigree 4.052, pedigree (1,1,5,5,1)
  (same comment as for Nitrate)
- Iron, ion [water, surface water]: 6.8001e-5 kg; lognormal variance with pedigree 1.022, pedigree (1,1,5,5,1)
  (same comment as for Fluoride)
- Nickel [air, urban air close to ground]: 2.9788e-9 kg; lognormal variance with pedigree 1.442, pedigree (1,1,5,5,1)
  (same comment as for residual material landfill)
- Copper, ion [water, surface water]: 2.2102e-7 kg; lognormal variance with pedigree 1.402, pedigree (1,1,5,5,1)
  (same comment as for Fluoride)
- COD, Chemical Oxygen Demand [water, surface water]: 2.3968e-5 kg; lognormal variance with pedigree 0.352, pedigree (1,1,5,5,1)
  (same comment as for Fluoride)
- BOD5, Biological Oxygen Demand [water, ground-, long-term]: 0.0077498 kg; lognormal variance with pedigree 0.112, pedigree (1,1,5,5,1)
  (same comment as for Nitrate)
- Zinc [air, urban air close to ground]: 2.9291e-8 kg; lognormal variance with pedigree 1.142, pedigree (1,1,5,5,1)
  (same comment as for residual material landfill)
- Zinc, ion [water, surface water]: 5.6155e-7 kg; lognormal variance with pedigree 1.122, pedigree (1,1,5,5,1)
  (same comment as for Fluoride)
- Copper [air, urban air close to ground]: 3.6011e-9 kg; lognormal variance with pedigree 1.422, pedigree (1,1,5,5,1)
  (same comment as for residual material landfill)
- Cobalt [air, urban air close to ground]: 2.872e-9 kg; lognormal variance with pedigree 1.452, pedigree (1,1,5,5,1)
  (same comment as for residual material landfill)
- Cyanide [air, urban air close to ground]: 9.2214e-6 kg; lognormal variance with pedigree 1.02, pedigree (5,5,5,5,5)
  (same comment as for Dinitrogen monoxide)
- Silicon [water, surface water]: 7.0276e-5 kg; lognormal variance with pedigree 0.832, pedigree (1,1,5,5,1)
  (same comment as for Fluoride)
- DOC, Dissolved Organic Carbon [water, surface water]: 1.0486e-5 kg; lognormal variance with pedigree 0.352, pedigree (1,1,5,5,1)
  (same comment as for Fluoride)
- Sulfate [water, surface water]: 0.018513 kg; lognormal variance with pedigree 0.462, pedigree (1,1,5,5,1)
  (same comment as for Fluoride)
- Silicon [air, urban air close to ground]: 7.2917e-5 kg; lognormal variance with pedigree 0.292, pedigree (1,1,5,5,1)
  (same comment as for residual material landfill)
- COD, Chemical Oxygen Demand [water, ground-, long-term]: 0.0077498 kg; lognormal variance with pedigree 0.112, pedigree (1,1,5,5,1)
  (same comment as for Nitrate)
- Carbon monoxide, fossil [air, urban air close to ground]: 1.2076e-5 kg; lognormal variance with pedigree 0.712, pedigree (1,4,5,5,3)
  1 plant for waste solvent incineration in Switzerland
  Uncertainty: & basic uncertainty of 5; 1 plant for waste solvent incineration in Switzerland
- Chloride [water, ground-, long-term]: 2.9675e-5 kg; lognormal variance with pedigree 0.332, pedigree (1,1,5,5,1)
  (same comment as for Nitrate)
- Zinc, ion [water, ground-, long-term]: 5.0561e-7 kg; lognormal variance with pedigree 5.962, pedigree (1,1,5,5,1)
  (same comment as for Nitrate)
- Nickel, ion [water, surface water]: 8.7227e-7 kg; lognormal variance with pedigree 1.422, pedigree (1,1,5,5,1)
  (same comment as for Fluoride)
- Nitrogen oxides [air, urban air close to ground]: 0.0002664 kg; lognormal variance with pedigree 0.932, pedigree (1,1,5,5,1)
  (same comment as for Ammonia)
- Phosphate [water, surface water]: 4.8012e-5 kg; lognormal variance with pedigree 0.672, pedigree (1,1,5,5,1)
  (same comment as for Fluoride)
- Phosphate [water, ground-, long-term]: 0.00067405 kg; lognormal variance with pedigree 1.262, pedigree (1,1,5,5,1)
  (same comment as for Nitrate)
- Iron, ion [water, ground-, long-term]: 8.3157e-8 kg; lognormal variance with pedigree 8.042, pedigree (1,1,5,5,1)
  (same comment as for Nitrate)
- Bromine [air, urban air close to ground]: 5.0105e-7 kg; lognormal variance with pedigree 0.612, pedigree (1,1,5,5,1)
  (same comment as for residual material landfill)

## Sampling procedure
The 2 Swiss HWI plants, used as the inventory reference technology mix, have a total annual capacity of 53'000 tons of hazardous waste. This corresponds to 39% of the Swiss total installed capacity in 2000. Swiss average plants size is 20'000 t/a.

## Extrapolations
Available waste composition data. Transfer coefficients from one modern HWI completed with data from MSWI. Waste-specific auxiliary material consumption adapted from MSWI. This dataset has been copied from an original dataset covering the geography CH. The uncertainty has been adjusted accordingly.
