# sour gas, burned in gas turbine

Dataset: EcoSpold 2, unit process
Geography: NO
Time period: 1991-01-01 to 2021-12-31
Technology level: current
Classification: EcoSpold01Categories: natural gas/power plants
Classification: ISIC rev.4 ecoinvent: 3510:Electric power generation, transmission and distribution
Tags: ConvertedDataset
Scenario: Business-as-Usual
System model: Allocation, cut-off by classification
Share of production covered: 100 %
Generated by: Mireille Faist Emmenegger (obsolete)
Published in: Faist Emmenegger, M. 2007
Database: ecoinvent
isCopyrightProtected: true
accessRestrictedTo: 1

## General comment
Burning of sour gas in a turbine for on-site electricity production.
[This dataset was already contained in the ecoinvent database version 2. It was not individually updated during the transfer to ecoinvent version 3. Life Cycle Impact Assessment results may still have changed, as they are affected by changes in the supply chain, i.e. in other datasets. This dataset was generated following the ecoinvent quality guidelines for version 2. It may have been subject to central changes described in the ecoinvent version 3 change report (http://www.ecoinvent.org/database/ecoinvent-version-3/reports-of-changes/), and the results of the central updates were reviewed extensively. The changes added e.g. consistent water flows and other information throughout the database. The documentation of this dataset can be found in the ecoinvent reports of version 2, which are still available via the ecoinvent website. The change report linked above covers all central changes that were made during the conversion process.]

## Included activities end
Providing of compression energy by the exploitation of (sour) gas fields.

## Geography
Data for CH4, CO2, NMVOC, NO2 is based on Norwegian data, data for the rest is not geographically defined.

## Technology
Data is based on the Norwegian data (offshore combined production). No information about technology. As the data is an average over all gas turbines, motors and boilers in the Norwegian gas and oil production it can be assumed that different technologies are represented.

## Time period
Average of 1999-2000 is used for CH4, CO2, NMVOC, NO2 (data from the Norwegian offshore combined production). Data for CO, N2O, SO2, Hg, Radon-222 and waste heat are based on data from 1991 in Frischknecht et al. 1996, Tab. V.6.7.

## Reference product
- sour gas, burned in gas turbine: 1 MJ; CPC 17100: Electrical energy; By-product classification allocatable product
  EcoSpold01Location=NO
  production volume 1.84435e9 MJ; = 277263000000*0.006652
    Estimated. The norwegian production volume is extrapolated from the global production volume using the nominal GDP of 2005 (source: United Nations, http://data.un.org/Glossary.aspx?q=GDP+%28current+US%24%29, accessed 20130726 and 20130312).
    Gross domestic product (GDP) at current prices is GDP at prices of the current reporting period. Also known as nominal GDP.
  property price 3.08238e-5 EUR2005
    Calculated based on inputs: The price of the product has been calculated as a sum of the values of the material and energy inputs for this product. This value is therefore a rough estimation. It may underestimate the real price since there are additional expenses when producing any product. These expences can include for example labour costs, treatment of waste materials and profit for the producer. Please consider carefully whether this level of data quality is acceptable for your application.
  property carbon content 0.571
    carbon content on a dry matter basis (reserved; not for manual entry)
  properties: wet mass 0.027027 kg, dry mass 0.027027 kg, carbon content, fossil 0.571, water content 0, water in wet mass 0 kg, carbon content, non-fossil 0, heating value, net 1 MJ, carbon allocation 0.0154324 kg

## Inputs from technosphere
- gas turbine, 10MW electrical: 3.37e-10 unit; lognormal variance with pedigree 0.058, pedigree (1,1,5,1,3)
  EcoSpold01Location=RER
  Environmental report for Norway
  Uncertainty: environmental report for Norway

## Inputs from nature
- Gas, natural, in ground [natural resource, in ground]: 0.0278 m3; lognormal variance with pedigree 0.04, pedigree (1,1,5,1,1)
  Environmental report for Norway
  Uncertainty: environmental report for Norway

## Emissions to nature
- Radon-222 [air, non-urban air or from high stacks]: 0.00556 kBq; lognormal variance with pedigree 0.352025, pedigree (3,1,5,2,1)
  Based on assumptions
  Uncertainty: based on assumptions
- Nitrogen oxides [air, non-urban air or from high stacks]: 0.000199 kg; lognormal variance with pedigree 0.08, pedigree (1,1,5,1,1)
  Environmental report for Norway
  Uncertainty: environmental report for Norway
- Mercury [air, non-urban air or from high stacks]: 2.78e-9 kg; lognormal variance with pedigree 0.082025, pedigree (3,1,5,2,1)
  Based on assumptions
  Uncertainty: based on assumptions
- Carbon monoxide, fossil [air, non-urban air or from high stacks]: 0.000139 kg; lognormal variance with pedigree 0.69, pedigree (1,1,5,1,1)
  Environmental report for Norway
  Uncertainty: environmental report for Norway
- NMVOC, non-methane volatile organic compounds, unspecified origin [air, non-urban air or from high stacks]: 3.07e-6 kg; lognormal variance with pedigree 0.16, pedigree (1,1,5,1,1)
  Environmental report for Norway
  Uncertainty: environmental report for Norway
- Sulfur dioxide [air, non-urban air or from high stacks]: 0.00486 kg; lognormal variance with pedigree 0.042, pedigree (3,1,5,1,1)
  Calculated
  Uncertainty: calculated
- Carbon dioxide, fossil [air, non-urban air or from high stacks]: 0.0669 kg; lognormal variance with pedigree 0.04, pedigree (1,1,5,1,1)
  Environmental report for Norway
  Uncertainty: environmental report for Norway
- Dinitrogen monoxide [air, non-urban air or from high stacks]: 2.5e-7 kg; lognormal variance with pedigree 0.082025, pedigree (3,1,5,2,1)
  Based on assumptions
  Uncertainty: based on assumptions
- Methane, fossil [air, non-urban air or from high stacks]: 2.43e-5 kg; lognormal variance with pedigree 0.08, pedigree (1,1,5,1,1)
  Environmental report for Norway
  Uncertainty: environmental report for Norway

## Sampling procedure
Data is based on the annual reports on emissions and discharges submitted by each individual operator. The emissions and discharges are estimated
according to guidelines given by the Norwegian authorities and OLF (Norwegian Oil Industry Association)

## Extrapolations
This dataset has been extrapolated from year 2000 to the year of the calculation (2021). The uncertainty has been adjusted accordingly.

## Review by Michael Spielmann (obsolete) 2003-11-04
Passed.
