# primary zinc production from concentrate

Dataset: EcoSpold 2, unit process
Geography: RoW
Time period: 2015-01-01 to 2021-12-31
Technology level: current
Classification: ISIC rev.4 ecoinvent: 2420:Manufacture of basic precious and other non-ferrous metals
Synonyms: Special high grade zinc
Scenario: Business-as-Usual
System model: Allocation, cut-off by classification
Share of production covered: 36 %
Generated by: Eric Van Genderen
Published in: Eric Van Genderen 2016
Database: ecoinvent
isCopyrightProtected: true
accessRestrictedTo: 1

## General comment
The multi-output "primary zinc production from concentrate" process includes all steps required to produce special high grade zinc from zinc concentrate using the electrometallurgical and pyrometallurgical (less common) processes. Electrometallurgical zinc smelting includes roasting, leaching, purification, electrolysis, melting, and sulfur dioxide gas treatment. Pyrometallurgical zinc smelting includes sintering, leaching, refining, and sulfur dioxide gas treatment. The dataset describes the production of zinc and additional co-products, primarily sulfuric acid. Data is based on a study undertaken by the International Zinc Association (IZA) in conjunction with thinkstep (the LCA practitioner) for reference year 2012. Participating companies provided annual primary data on inputs and outputs for each process step, which was aggregated into a single production-weighted dataset.
The below images present the system boundary in relation to the primary product, special high grade zinc.

## Included activities start
Shipment of zinc concentrate to site

## Included activities end
Module includes all pyrometallurgical and electrometallurgical processes required to produce zinc and other by-products. For electrometallurgical zinc smelting this includes roasting, leaching, purification, electrolysis, melting, and sulfur dioxide gas treatment. For pyrometallurgical zinc smelting this includes sintering, leaching, refining, and sulfur dioxide gas treatment.

## Geography
This dataset is intended to be representative of global special high grade zinc production. Primary data was collected from 18 smelters, representing operations in Africa, Asia, Australia, Europe, and North America.
The below table presents the regional composition of global refined zinc production compared to the regional composition of all sites that provided data. The deviation is the absolute value of the difference in percentage points between the dataset and global compositions. The deviation for the smelting regional composition is 25%, resulting in global representativeness of 75%. The study’s global representativeness is therefore deemed to be moderate.

## Technology
The technological representativeness of this dataset is considered to be high as smelting methods for zinc are consistent in all regions. Refined zinc produced pyro-metallurgically represents less than 5% of global zinc production and less than 2% of this dataset.
Electrometallurgical Smelting
The main unit processes for electrometallurgical zinc smelting are roasting, leaching, purification, electrolysis, and melting. In both electrometallurgical and pyro-metallurgical zinc production routes, the first step is to remove the sulfur from the concentrate. Roasting or sintering achieves this. The concentrate is heated in a furnace with operating temperature above 900 °C (exothermic, autogenous process) to convert the zinc sulfide to calcine (zinc oxide). Simultaneously, sulfur reacts with oxygen to produce sulfur dioxide, which is subsequently converted to sulfuric acid in acid plants, usually located with zinc-smelting facilities. During the leaching process, the calcine is dissolved in dilute sulfuric acid solution (re-circulated back from the electrolysis cells) to produce aqueous zinc sulfate solution. The iron impurities dissolve as well and are precipitated out as jarosite or goethite in the presence of calcine and possibly ammonia. Jarosite and goethite are usually disposed of in tailing ponds. Adding zinc dust to the zinc sulfate solution facilitates purification. The purification of leachate leads to precipitation of cadmium, copper, and cobalt as metals. In electrolysis, the purified solution is electrolyzed between lead alloy anodes and aluminum cathodes. The high-purity zinc deposited on aluminum cathodes is stripped off, dried, melted, and cast into SHG zinc ingots (99.99 % zinc).
Pyro-metallurgical Smelting
The pyro-metallurgical smelting process is based on the reduction of zinc and lead oxides into metal with carbon in an imperial smelting furnace. The sinter, along with pre-heated coke, is charged from the top of the furnace and injected from below with pre-heated air. This ensures that temperature in the center of the furnace remains in the range of 1000-1500 °C. The coke is converted to carbon monoxide, and zinc and lead oxides are reduced to metallic zinc and lead. The liquid lead bullion is collected at the bottom of the furnace along with other metal impurities (copper, silver, and gold). Zinc in vapor form is collected from the top of the furnace along with other gases. Zinc vapor is then condensed into liquid zinc. The lead and cadmium impurities in zinc bullion are removed through a distillation process. The imperial smelting process is an energy-intensive process and produces zinc of lower purity than the electrometallurgical process.

## Time period
All primary data collected for this study is considered to be representative of the year 2012. Primary data used from the previous 2009 study is representative of production in the years 2005 & 2006, however it is valid to assume the technology has not significantly changed since then. Moreover, the technology has not changed significantly in the time period between 2012 and 2019 and therefore this data is considered to be appropriate in modeling current zinc production.

## Parameters
- fraction, process water, to air: 0.15 dimensionless; name fraction_PW_to_air; lognormal variance with pedigree 0.092025, pedigree (4,4,3,2,4)
  Literature value. In case when no industry/process specific data are available, a default evaporation fraction value is used. This value is 15% and is based on literature (Statistics Canada, 2007 & Shaffer, K.H., 2008, Consumptive water use in the Great Lakes Basin, USGS & Shiklomanov, 2003, World Water Resources at the Beginning of the 21st Century) and has been approved by an expert.

## Reference product
- zinc: 0 kg; CPC 41442: Zinc, unwrought; By-product classification allocatable product; CAS 7440-66-6
  Amount based on primary data collected from participating companies.
  production volume 1.25425e10 kg; name zinc_pv
    Obtained from the International Lead and Zinc Study Group (http://www.ilzsg.org) for the year 2012, version published in 2016. 12,806,000 t by zinc content.
  property price 1.04 EUR2005; name zinc_price_EUR2005
  property true value 1.04; name zinc_true_value
  properties: dry mass 1 kg, water in wet mass 0 kg, wet mass 1 kg, water content 0, carbon content, fossil 0, carbon content, non-fossil 0, carbon content 0, carbon allocation 0 kg
- indium rich leaching residues, from zinc production: 1 kg; name indium_leaching_residues; CPC 41601: Tungsten, molybdenum, tantalum, magnesium, cobalt, cadmium, titanium, zirconium, beryllium, gallium, hafnium, […]; By-product classification allocatable product; pedigree (1,1,1,1,1)
  Amount based on primary data collected from participating companies for total indium metal. Scaled to mass of indium-rich leaching residues based on assumed concentration of 110 ppm, based on discussions with industry experts.
  production volume 2.23335e9 kg; = indium_leaching_residues / zinc * zinc_pv
    Calculated from the production volume of zinc in proportion to the respective output amounts.
  property price 0.0043 EUR2005; name indium_leaching_residues_price_EUR2005
    Temporary price data.The price of zinc is 1.04 Euro (calculated as 90% of purchasers price based on: Source: ecoinvent v2 report 10-part IX, Tab 5.10 & 2.5). When producing 1kg of zinc, 0.33939kg of indium rich leaching residues, from zinc production is produced as a by-product. The economic allocation factor in eiv2.2 was 99.86% for zinc and 0.17% for the indium rich leaching residues, from zinc production. Following this assumption the price of the indium rich leaching residues, from zinc production is calculated to be ((0.0014*1*1.04)/(0.33939-0.0014*0.33939)=) 0.0043 Euro.
  property indium content 0.00011; name indium_leaching_residues_In_content; = 110/1000000
    indium content on a dry matter basis
  property carbon content 0
    carbon content on a dry matter basis (reserved; not for manual entry)
  property true value 0.000749916; name indium_leaching_residues_true_value
    allocation property applied in "true value" allocation // value calculated from revenue
  properties: water content 0, carbon content, fossil 0, wet mass 1 kg, carbon content, non-fossil 0, dry mass 1 kg, water in wet mass 0 kg, carbon allocation 0 kg

## By-products
All rows: pedigree (1,1,1,1,1)
- lead concentrate: 0 kg; name lead_conc; CPC 14290: Other non-ferrous metal ores and concentrates (other than uranium or thorium ores and concentrates); By-product classification allocatable product
  Amount based on primary data collected from participating companies.
  production volume 5.57386e7 kg; = lead_conc / zinc * zinc_pv
    (same comment as for indium rich leaching residues, from zinc production)
  property zinc content 0.0344787; name lead_conc_Zn_content
    zinc content on a dry matter basis
  property price 0.376 EUR2005; name lead_conc_price_EUR2005
    Temporary price data. Calculated as 90% of purchasers price based on: Lead content in concentrate 55%. Concentrate price per kg Pb 86.5% of refined Pb price (13.5% treatment charges according to CHR Metals Limited 2005: Dynamic cost curves. http://www.minecost.com/dynamic.pdf). 2004 lead price from USGS (2007) Mineral commodity summaries 2007. <http://minerals.usgs.gov/minerals/pubs/mcs/2007/mcs2007.pdf> [Accessed 25 May 2010]
  property lead content 0.226881; name lead_conc_Pb_content
    lead content on a dry matter basis
  property iron content 0.0178977; name lead_conc_Fe_content
    iron content on a dry matter basis
  property concentration, lead 0 kg/kg
    Calculated based on information from the zinc-lead mine operation dataset.
  property silver content 0.00190291; name lead_conc_Ag_content
    silver content on a dry matter basis
  property carbon content 0
    carbon content on a dry matter basis (reserved; not for manual entry)
  property true value 0.00163655; name lead_conc_true_value
    allocation property applied in "true value" allocation // value calculated from revenue
  properties: carbon content, non-fossil 0, carbon content, fossil 0, water content 0, water in wet mass 0 kg, wet mass 1 kg, dry mass 1 kg, carbon allocation 0 kg
- lead: 0 kg; CPC 41441: Lead, unwrought; By-product classification allocatable product; CAS 7439-92-1
  Amount based on primary data collected from participating companies.
  production volume 4.49785e8 kg; = lead / zinc * zinc_pv
    (same comment as for indium rich leaching residues, from zinc production)
  property price 0.744 EUR2005; name lead_price_EUR2005
    Temporary price data. Calculated as 90% of purchasers price based on: Source: ecoinvent v2 report 10-part IX, Tab 5.10 & 2.5
  property carbon content 0
    carbon content on a dry matter basis (reserved; not for manual entry)
  property true value 0.0261315; name lead_true_value
    allocation property applied in "true value" allocation // value calculated from revenue
  properties: wet mass 1 kg, water in wet mass 0 kg, dry mass 1 kg, carbon content, fossil 0, carbon content, non-fossil 0, water content 0, carbon allocation 0 kg
- iron scrap, unsorted: 0 kg; CPC 39310: Slag, dross, scalings and other waste from the manufacture of iron or steel; By-product classification Recyclable
  Amount based on primary data collected from participating companies.
  production volume 0 kg; = iron_scrap / zinc * zinc_pv
    (same comment as for indium rich leaching residues, from zinc production)
  property price 0.149 EUR2005; name iron_scrap_price_EUR2005
    Temporary price data. Calculated as 90% of purchasers price based on: estimated at 85% of sorted scrap
  property carbon content 0
    carbon content on a dry matter basis (reserved; not for manual entry)
  properties: water in wet mass 0 kg, water content 0, wet mass 1 kg, carbon content, fossil 0, dry mass 1 kg, carbon content, non-fossil 0, carbon allocation 0 kg
- silver: 0 kg; CPC 41310: Silver (including silver plated with gold or platinum), unwrought or in semi-manufactured forms, or in powder […]; By-product classification allocatable product; CAS 7440-22-4
  Amount based on primary data collected from participating companies.
  production volume 1.64198e6 kg; = silver / zinc * zinc_pv
    (same comment as for indium rich leaching residues, from zinc production)
  property price 324.357 EUR2005; name silver_price_EUR2005
    Price calculated as 5-year market average (2015-2019; USD/kg; USGS [2020]) and converted to EUR2005 (USD2019/EUR2005 exchange rate: 0.62; Official Data Foundation [2020] and Macrotrends [2020]).
    References:
    Official Data Foundation (2020). Inflation Calculator [Online]. Available from: https://www.officialdata.org/us/inflation/2005?endYear=2019&amount=1 [Accessed 28/07/2020]
    USGS (2020). Mineral Commodity Summaries 2020 [Online]. Available from: https://pubs.usgs.gov/periodicals/mcs2020/mcs2020.pdf [Accessed 28/07/2020]
    Macrotrends (2020). Euro Dollar Exchange Rate (EUR USD) - Historical Chart [Online]. Available from: https://www.macrotrends.net/2548/euro-dollar-exchange-rate-historical-chart [Accessed 28/07/2020]
  property carbon content 0
    carbon content on a dry matter basis (reserved; not for manual entry)
  property true value 0.041589; name silver_true_value
    allocation property applied in "true value" allocation // value calculated from revenue
  properties: dry mass 1 kg, water content 0, carbon content, fossil 0, carbon content, non-fossil 0, wet mass 1 kg, water in wet mass 0 kg, carbon allocation 0 kg
- gold: 0 kg; By-product classification allocatable product; CPC 41320: Gold (including gold plated with platinum), unwrought or in semi-manufactured forms, or in powder form; CAS 7440-57-5
  Amount based on primary data collected from participating companies.
  production volume 58485.5 kg; = gold / zinc * zinc_pv
    (same comment as for indium rich leaching residues, from zinc production)
  property price 25128.4 EUR2005; name gold_price_EUR2005
    (same comment as for silver)
  property carbon content 0
    carbon content on a dry matter basis (reserved; not for manual entry)
  property true value 0.114762; name gold_true_value
    allocation property applied in "true value" allocation // value calculated from revenue
  properties: water content 0, carbon content, non-fossil 0, wet mass 1 kg, dry mass 1 kg, carbon content, fossil 0, water in wet mass 0 kg, carbon allocation 0 kg
- heat, from steam, in chemical industry: 0 MJ; name heat; CPC 17300: Steam and hot water; By-product classification allocatable product
  Amount based on primary data collected from participating companies.
  production volume 7.96313e9 MJ; = heat / zinc * zinc_pv
    (same comment as for indium rich leaching residues, from zinc production)
  property price 0.0144102 EUR2005; name heat_price_EUR2005
    Calculated based on inputs: The price of the product has been calculated as a sum of the values of the material and energy inputs for this product. This value is therefore a rough estimation. It may underestimate the real price since there are additional expenses when producing any product. These expences can include for example labour costs, treatment of waste materials and profit for the producer. Please consider carefully whether this level of data quality is acceptable for your application.
  property true value 0.00896067; name heat_true_value
    allocation property applied in "true value" allocation // value calculated from revenue
  properties: heating value, net 1 MJ
- waste paper, unsorted: 0 kg; By-product classification Recyclable; CPC 39240: Waste and scrap of paper or paperboard
  Amount based on primary data collected from participating companies.
  production volume 0 kg; = waste_paper / zinc * zinc_pv
    (same comment as for indium rich leaching residues, from zinc production)
  property price 0.093 EUR2005; name waste_paper_price_EUR2005
    Temporary price data. Calculated as 90% of purchasers price based on: Assumed to be 10% less than for sorted waste paper
  properties: heating value, net 14.11 MJ, water in wet mass 0 kg
- aluminium scrap, post-consumer: 0 kg; CPC 39363: Waste and scrap of aluminium; By-product classification Recyclable
  Amount based on primary data collected from participating companies.
  production volume 0 kg; = aluminium / zinc * zinc_pv
    (same comment as for indium rich leaching residues, from zinc production)
  property price 0.685 EUR2005; name aluminium_price_EUR2005
    Temporary price data. Calculated as 90% of purchasers price based on: estimated at 85% of new scrap
  property carbon content 0
    carbon content on a dry matter basis (reserved; not for manual entry)
  properties: dry mass 1 kg, carbon content, non-fossil 0, water in wet mass 0 kg, water content 0, wet mass 1 kg, carbon content, fossil 0, carbon allocation 0 kg
- sulfuric acid: 0 kg; name sulfuric_acid; CPC 34231: Chemical elements n.e.c.; inorganic acids except phosphoric, nitric and sulphonitric; inorganic oxygen compoun[…]; By-product classification allocatable product; CAS 7664-93-9
  Amount based on primary data collected from participating companies.
  production volume 1.75779e10 kg; = sulfuric_acid / zinc * zinc_pv
    (same comment as for indium rich leaching residues, from zinc production)
  property price 0.063 EUR2005; name sulfuric_acid_price_EUR2005
    Data related to the price of sulfuric acid were provided by Yara International (https://www.yara.com/)
  property carbon content 0
    carbon content on a dry matter basis (reserved; not for manual entry)
  property true value 0.0885159; name sulfuric_acid_true_value
    allocation property applied in "true value" allocation // value calculated from revenue
  properties: water in wet mass 0 kg, dry mass 1 kg, carbon content, fossil 0, water content 0, carbon content, non-fossil 0, wet mass 1 kg, carbon allocation 0 kg
- zinc monosulfate: 0 kg; name zinc_monosulfate; CPC 34220: Zinc oxide; zinc peroxide; chromium oxides and hydroxides; manganese oxides; iron oxides and hydroxides; earth[…]; By-product classification allocatable product; CAS 7733-02-0
  Amount based on primary data collected from participating companies.
  production volume 535557 kg; = zinc_monosulfate / zinc * zinc_pv
    (same comment as for indium rich leaching residues, from zinc production)
  property price 0.471 EUR2005; name zinc_monosulfate_price_EUR2005
    From UN trade database. http://data.un.org/ Calculated as average price for all chemicals in the category 'Trade of goods , US$, HS 1992, 28 Inorganic chemicals, precious metal compound, isotope'. Import data from the largest economies of the world are used (Brazil, India, USA, China, Japan and EU-27).
  property carbon content 0
    carbon content on a dry matter basis (reserved; not for manual entry)
  property true value 1.96976e-5; name zinc_monosulfate_true_value
    allocation property applied in "true value" allocation // value calculated from revenue
  properties: carbon content, non-fossil 0, water in wet mass 0 kg, water content 0, dry mass 1 kg, carbon content, fossil 0, wet mass 1 kg, carbon allocation 0 kg
- gypsum, mineral: 0 kg; name gypsum; By-product classification allocatable product; CPC 15200: Gypsum; anhydrite; limestone flux; limestone and other calcareous stone, of a kind used for the manufacture of[…]
  Amount based on primary data collected from participating companies.
  production volume 4.75026e7 kg; = gypsum / zinc * zinc_pv
    (same comment as for indium rich leaching residues, from zinc production)
  property price 0.005 EUR2005; name gypsum_price_EUR2005
    Temporary price data. Calculated as 90% of purchasers price based on: 2004 prices for gypsum, crude, at mine in USGS (2007) Mineral commodity summaries 2007. <http://minerals.usgs.gov/minerals/pubs/mcs/2007/mcs2007.pdf> [Accessed 25 May 2010] and USGS (2009a) Mineral commodity summaries 2009. <http://minerals.usgs.gov/minerals/pubs/mcs/2009/mcs2009.pdf> [Accessed 25 May 2010]; The prices from USGS are assumed to be World/USA prices because they were collected from USA, major producer countries or global market (e.g. London, Metal Exchange).
  property carbon content 0
    carbon content on a dry matter basis (reserved; not for manual entry)
  property true value 1.8547e-5; name gypsum_true_value
    allocation property applied in "true value" allocation // value calculated from revenue
  properties: dry mass 1 kg, water content 0, carbon content, non-fossil 0, wet mass 1 kg, carbon content, fossil 0, water in wet mass 0 kg, carbon allocation 0 kg
- copper, cathode: 0 kg; name copper; By-product classification allocatable product; CPC 41413: Refined copper and copper alloys, unwrought; master alloys of copper; CAS 7440-50-8
  Amount based on primary data collected from participating companies.
  production volume 6.49619e6 kg; = copper / zinc * zinc_pv
    (same comment as for indium rich leaching residues, from zinc production)
  property price 3.57105 EUR2005; name copper_price_EUR2005
    (same comment as for silver)
  property carbon content 0
    carbon content on a dry matter basis (reserved; not for manual entry)
  property true value 0.00181151; name copper_true_value
    allocation property applied in "true value" allocation // value calculated from revenue
  properties: water content 0, carbon content, non-fossil 0, wet mass 1 kg, carbon content, fossil 0, dry mass 1 kg, water in wet mass 0 kg, carbon allocation 0 kg
- copper scrap, sorted, pressed: 0 kg; CPC 39361: Waste and scrap of copper; By-product classification Recyclable
  Amount based on primary data collected from participating companies.
  production volume 0 kg; = copper_scrap / zinc * zinc_pv
    (same comment as for indium rich leaching residues, from zinc production)
  property price 2.84 EUR2005; name copper_scrap_price_EUR2005
    Temporary price data. Calculated as 90% of purchasers price based on: Source: USGS Mineral Yearbook 2007, Table 1 in <http://minerals.usgs.gov/minerals/pubs/commodity/recycle/myb1-2007-recyc.pdf>
  property carbon content 0
    carbon content on a dry matter basis (reserved; not for manual entry)
  properties: water content 0, dry mass 1 kg, water in wet mass 0 kg, wet mass 1 kg, carbon content, fossil 0, carbon content, non-fossil 0, carbon allocation 0 kg
- cobalt: 0 kg; CPC 41601: Tungsten, molybdenum, tantalum, magnesium, cobalt, cadmium, titanium, zirconium, beryllium, gallium, hafnium, […]; By-product classification allocatable product; CAS 7440-48-4
  Amount based on primary data collected from participating companies.
  production volume 1.46359e7 kg; = cobalt / zinc * zinc_pv
    (same comment as for indium rich leaching residues, from zinc production)
  property price 26.5168 EUR2005; name cobalt_price_EUR2005
    (same comment as for silver)
  property carbon content 0
    carbon content on a dry matter basis (reserved; not for manual entry)
  property true value 0.0303059; name cobalt_true_value
    allocation property applied in "true value" allocation // value calculated from revenue
  properties: wet mass 1 kg, water content 0, carbon content, non-fossil 0, dry mass 1 kg, water in wet mass 0 kg, carbon content, fossil 0, carbon allocation 0 kg
- copper concentrate, sulfide ore: 0 kg; name copper_conc; By-product classification allocatable product; CPC 14290: Other non-ferrous metal ores and concentrates (other than uranium or thorium ores and concentrates)
  Amount based on primary data collected from participating companies.
  production volume 3.46641e6 kg; = copper_conc / zinc * zinc_pv
    (same comment as for indium rich leaching residues, from zinc production)
  property price 0.8402 EUR2005; name copper_conc_price_EUR2005
    Price calculated as:
    Price = (Cu content * Cu price) + (Au content * Au price) + (Ag content * Ag price) + (Te content * Te price) + (Se content * Se price) Treatment costs [TC] Refining costs [RC] Delivery costs Penalties.
    Equation source: Devlin (2015)
    Price data were taken from USGS (2020) and represent 5-year market averages (2015-2019). TC and RC data were taken from Díaz-Borrego et al. (2019) and represent 3-year market averages (2015-2017). Metal content values were taken from the literature (see Turner & Hischier 2019). Penalties and Delivery costs were assumed to be zero. Prices converted to EUR2005 (USD2019/EUR2005 exchange rate: 0.62; Official Data Foundation [2020] and Macrotrends [2020]).
    References:
    Devlin, D. (2015). Mineral product pricing study [Online]. Available from: https://www.imf.org/external/spanish/np/seminars/2015/andean/pdf/sesion5-devlin-en.pdf [Accessed 28/07/2020]
    Díaz-Borrego et al. (2019; https://doi.org/10.1155/2019/8523748)
    Turner, D. & Hischier, R. (2019). Life cycle inventories of copper production (pyrometallurgy) and anode slime processing. Empa: St Gallen, Switzerland.
    Official Data Foundation (2020). Inflation Calculator [Online]. Available from: https://www.officialdata.org/us/inflation/2005?endYear=2019&amount=1 [Accessed 28/07/2020]
    USGS (2020). Mineral Commodity Summaries 2020 [Online]. Available from: https://pubs.usgs.gov/periodicals/mcs2020/mcs2020.pdf [Accessed 28/07/2020]
    Macrotrends (2020). Euro Dollar Exchange Rate (EUR USD) - Historical Chart [Online]. Available from: https://www.macrotrends.net/2548/euro-dollar-exchange-rate-historical-chart [Accessed 28/07/2020]
  property lead content 0.054; name copper_conc_Pb_content
    lead content on a dry matter basis
  property cobalt content 0.03; name copper_conc_Co_content
    cobalt content on a dry matter basis
  property cadmium content 0.04; name copper_conc_Cd_content
    cadmium content on a dry matter basis
  property carbon content 0
    carbon content on a dry matter basis (reserved; not for manual entry)
  property true value 0.000227431; name copper_conc_true_value
    allocation property applied in "true value" allocation // value calculated from revenue
  properties: water content 0, water in wet mass 0 kg, wet mass 1 kg, carbon content, non-fossil 0, carbon content, fossil 0, zinc content 0.034, copper content 0.65, dry mass 1 kg, carbon allocation 0 kg
- copper sulfate: 0 kg; name copper_sulfate; By-product classification allocatable product; CPC 34240: Phosphates of triammonium; salts and peroxysalts of inorganic acids and metals n.e.c.; CAS 7758-98-7
  Amount based on primary data collected from participating companies.
  production volume 60922.2 kg; = copper_sulfate / zinc * zinc_pv
    (same comment as for indium rich leaching residues, from zinc production)
  property price 3.77 EUR2005; name copper_sulfate_price_EUR2005
    Estimation. Average 2005 prices for EU27, USA, China, Japan and India from Import/Export data (US$ and tonnes) in UN Commodity Trade Statistics Database; Commodity: Pesticides, rodenticides, nes, for retail sale
  property carbon content 0
    carbon content on a dry matter basis (reserved; not for manual entry)
  property true value 1.79351e-5; name copper_sulfate_true_value
    allocation property applied in "true value" allocation // value calculated from revenue
  properties: water in wet mass 0 kg, dry mass 1 kg, carbon content, non-fossil 0, water content 0, carbon content, fossil 0, wet mass 1 kg, carbon allocation 0 kg
- copper cake: 0 kg; name copper_cake; CPC 41412: Unrefined copper; copper anodes for electrolytic refining; By-product classification allocatable product
  Amount based on primary data collected from participating companies.
  production volume 1.32394e8 kg; = copper_cake / zinc * zinc_pv
    (same comment as for indium rich leaching residues, from zinc production)
  property cobalt content 0.0073274; name copper_cake_Co_content
    cobalt content on a dry matter basis
  property cadmium content 0.0290751; name copper_cake_Cd_content
    cadmium content on a dry matter basis
  property iron content 0.0073274; name copper_cake_Fe_content
    iron content on a dry matter basis
  property lead content 0.017034; name copper_cake_Pb_content
    lead content on a dry matter basis
  property zinc content 0.0448928; name copper_cake_Zn_content
    zinc content on a dry matter basis
  property price 2.42831 EUR2005; name copper_cake_price_EUR2005
    Calculated value. The concentration of copper in the copper cake is 0.68 kg / kg copper cake. The 5 year market price of copper is 5.8 USD/kg (2015-2019; Source: USGS, 2020, Mineral Commodity Summaries 2020, Available from: https://pubs.usgs.gov/periodicals/mcs2020/mcs2020.pdf [Accessed 28/07/2020). Prices are then converted to EUR2005 (USD2019/EUR2005 exchange rate: 0.62 [based on https://www.officialdata.org/us/inflation/2005?endYear=2019&amount=1 and https://www.macrotrends.net/2548/euro-dollar-exchange-rate-historical-chart])
  property carbon content 0
    carbon content on a dry matter basis (reserved; not for manual entry)
  property true value 0.0255606; name copper_cake_true_value
    allocation property applied in "true value" allocation // value calculated from revenue
  properties: carbon content, non-fossil 0, wet mass 1 kg, dry mass 1 kg, water in wet mass 0 kg, carbon content, fossil 0, copper content 0.482332, water content 0, carbon allocation 0 kg
- cadmium sludge from zinc electrolysis: 0 kg; name cadmium_sludge; CPC 39367: Waste and scrap of tungsten, molybdenum, tantalum, magnesium, cobalt, cadmium, titanium, zirconium, beryllium […]; By-product classification allocatable product
  Amount calculated in combination with the amount of refined cadmium. Based on primary data collected from participating companies, the ratio of refined cadmium to cadmium sludge is 1.223. The amounts of cadmium and cadmium sludge were then calculated considering a total annual production volume of 20000 tonnes of primary cadmium and a Cd content of 0.533 kg per kg of cadmium sludge.
  production volume 1.08881e7 kg; = cadmium_sludge / zinc * zinc_pv
    (same comment as for indium rich leaching residues, from zinc production)
  property lead content 0.0359123; name cadmium_sludge_Pb_content
    lead content on a dry matter basis
  property cadmium content 0.533214; name cadmium_sludge_Cd_content
    cadmium content on a dry matter basis
  property iron content 0.000174943; name cadmium_sludge_Fe_content
    iron content on a dry matter basis
  property copper content 0.0789513; name cadmium_sludge_Cu_content
    copper content on a dry matter basis
  property cobalt content 0.000174943; name cadmium_sludge_Co_content
    cobalt content on a dry matter basis
  property price 0.989904 EUR2005; name cadmium_sludge_price_EUR2005
    Estimated based on the price of cadmium and cadmium content of cadmium sludge. Based on the production process of primary cadmium, it is assumed that the value of cadmium sludge is equal to 80% of the value of cadmium it contains.
  property zinc content 0.1629; name cadmium_sludge_Zn_content
    zinc content on a dry matter basis
  property carbon content 0
    carbon content on a dry matter basis (reserved; not for manual entry)
  property true value 0.000880308; name cadmium_sludge_true_value
    allocation property applied in "true value" allocation // value calculated from revenue
  properties: water content 0, water in wet mass 0 kg, carbon content, non-fossil 0, carbon content, fossil 0, wet mass 1 kg, dry mass 1 kg, carbon allocation 0 kg
- sulfur dioxide, liquid: 0 kg; name sulfur_dioxide_liquid; By-product classification allocatable product; CPC 34210: Hydrogen, nitrogen, oxygen, carbon dioxide and rare gases; inorganic oxygen compounds of non-metals n.e.c.; CAS 7446-09-5
  Amount based on primary data collected from participating companies.
  production volume 1.2974e8 kg; = sulfur_dioxide_liquid / zinc * zinc_pv
    (same comment as for indium rich leaching residues, from zinc production)
  property price 0.131 EUR2005; name sulfur_dioxide_liquid_price_EUR2005
    From UN trade database. http://data.un.org/ Import data from the largest economies of the world are used (Brazil, India, USA, China, Japan and EU-27).
  property carbon content 0
    carbon content on a dry matter basis (reserved; not for manual entry)
  property true value 0.00133076; name sulfur_dioxide_liquid_true_value
    allocation property applied in "true value" allocation // value calculated from revenue
  properties: carbon content, fossil 0, water in wet mass 0 kg, carbon content, non-fossil 0, water content 0, dry mass 1 kg, wet mass 1 kg, carbon allocation 0 kg
- cadmium: 0 kg; By-product classification allocatable product; CPC 342: Basic inorganic chemicals n.e.c.; CAS 7440-43-9
  Amount calculated in combination with the amount of cadmium sludge. Based on primary data collected from participating companies, the ratio of refined cadmium to cadmium sludge is 1.223. The amounts of cadmium and cadmium sludge were then calculated considering a total annual production volume of 20000 tonnes of primary cadmium and a Cd content of 0.533 kg per kg of cadmium sludge.
  production volume 1.39277e7 kg; = cadmium / zinc * zinc_pv
    (same comment as for indium rich leaching residues, from zinc production)
  property price 1.23738 EUR2005; name cadmium_price_EUR2005
    (same comment as for silver)
  property carbon content 0
    carbon content on a dry matter basis (reserved; not for manual entry)
  property true value 0.00134576; name cadmium_true_value
    allocation property applied in "true value" allocation // value calculated from revenue
  properties: carbon content, non-fossil 0, carbon content, fossil 0, water content 0, wet mass 1 kg, dry mass 1 kg, water in wet mass 0 kg, carbon allocation 0 kg
- sulfur: 0 kg; CPC 34520: Sulphur, except sublimed sulphur, precipitated sulphur and colloidal sulphur; By-product classification allocatable product; CAS 7704-34-9
  Amount based on primary data collected from participating companies.
  production volume 9.32629e7 kg; = sulfur / zinc * zinc_pv
    (same comment as for indium rich leaching residues, from zinc production)
  property price 0.0551778 EUR2005; name sulfur_price_EUR2005
    Price calculated based on price of elemental sulfur (f.o.b. mine or plant) reported in the USGS Minerals Yearbook for Sulfur from 2010 to 2019 (https://www.usgs.gov/centers/nmic/sulfur-statistics-and-information). The prices given in USD were converted to EUR based on the annual exchange rates published by the European Central Bank (https://sdw.ecb.europa.eu/quickview.do?SERIES_KEY=120.EXR.A.USD.EUR.SP00.A), and then adjusted for inflation relative to 2005 by using the Harmonised Index of Consumer Prices (HICP) of the euro area, published by eurostat (https://ec.europa.eu/eurostat/databrowser/view/PRC_HICP_AIND/default/table).
  property carbon content 0
    carbon content on a dry matter basis (reserved; not for manual entry)
  property true value 0.000401846; name sulfur_true_value
    allocation property applied in "true value" allocation // value calculated from revenue
  properties: dry mass 1 kg, water in wet mass 0 kg, wet mass 1 kg, carbon content, non-fossil 0, carbon content, fossil 0, water content 0, carbon allocation 0 kg
- ammonium sulfate: 0 kg; name ammonium_sulfate; CPC 34612: Ammonium sulphate; By-product classification allocatable product; CAS 7783-20-2
  The exchange was updated from "ammonium sulfate, as N" into "ammonium sulfate" and therefore its amount has been scaled (multiplied) from 0.0255 kg by 4.717 kg of "ammonium sulfate" per kg of "ammonium sulfate, as N". Original comment of the exchange is: Amount based on primary data collected from participating companies.
  production volume 1.54329e9 kg; = ammonium_sulfate / zinc * zinc_pv
    (same comment as for indium rich leaching residues, from zinc production)
  property price 0.38 EUR2005; name ammonium_sulfate_price_EUR2005
    Prices are calculated on basis of Import/Export data (tonnes and US$) from UN Trade Statistics Database (http://data.un.org/Browse.aspx?d=ComTrade, accessed 7/7-2010). N, P2O5, or K2O content (http://www.fertilizer.org/ifa/Home-Page/STATISTICS/Conversions-factors)
  property carbon content 0
    carbon content on a dry matter basis (reserved; not for manual entry)
  property true value 0.0457951; name ammonium_sulfate_true_value
    allocation property applied in "true value" allocation // value calculated from revenue
  properties: water content 0, wet mass 1 kg, water in wet mass 0 kg, dry mass 1 kg, carbon content, fossil 0, carbon content, non-fossil 0, carbon allocation 0 kg
- aluminium scrap, new: 0 kg; By-product classification Recyclable; CPC 39363: Waste and scrap of aluminium
  Estimated value. This flow was added to the GLO dataset to make it consistent with the Peru (PE) regional one. As it is assumed not to be representative of the processes for which data was collected for this dataset, the amount was scaled down based on the ratio between the zinc production volumes of the PE and GLO datasets.
  production volume 0 kg; = aluminium_scrap / zinc * zinc_pv
    (same comment as for indium rich leaching residues, from zinc production)
  property price 0.806 EUR2005; name aluminium_scrap_price_EUR2005
    Temporary price data. Calculated as 90% of purchasers price based on: 2005 import and export prices (total trades (USD) divided by total weight (kg) in biggest economies of the world: EU27, USA, Brasil, China, India, Japan and Russia) from UN Commodity Trade Statistics Database (http://data.un.org/Explorer.aspxDatabase [Accessed 2011.06.17]). Commodity: Waste or scrap, aluminium
  property carbon content 0
    carbon content on a dry matter basis (reserved; not for manual entry)
  properties: carbon content, non-fossil 0, water content 0, carbon content, fossil 0, water in wet mass 0 kg, wet mass 1 kg, dry mass 1 kg, carbon allocation 0 kg

## Inputs from technosphere
- electricity, medium voltage: 0.000938799, 0.00241087, 0.00129518, 0.000956191, 0.000380494, 0.00154575, 0.000377979, 5.45443e-5, 0.00038596, 0.000727258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 kWh (14 entries); lognormal variance with pedigree 0.0032, pedigree (1,3,3,1,1)
  Amount and activity link based on primary data collected from participating companies.
- ethylene glycol: 2.137e-8 kg; lognormal variance with pedigree 0.0032, pedigree (1,3,3,1,1)
  Amount based on primary data collected from participating companies.
  properties: heating value, net 23.44 MJ, wet mass 1 kg, carbon content, fossil 0.387097, dry mass 1 kg
- activated silica: 1.07625e-5 kg; lognormal variance with pedigree 0.0032, pedigree (1,3,3,1,1)
  Amount based on primary data collected from participating companies.
  properties: wet mass 1 kg, dry mass 1 kg
- manganese dioxide: 4.22347e-6 kg; lognormal variance with pedigree 0.0032, pedigree (1,3,3,1,1)
  Amount based on primary data collected from participating companies.
  properties: dry mass 1 kg, wet mass 1 kg
- chlorine, liquid: 0 kg; pedigree (1,1,1,1,1)
  Amount based on primary data collected from participating companies.
  properties: dry mass 1 kg, wet mass 1 kg
- iron(III) sulfate, without water, in 12.5% iron solution state: 8.60874e-7 kg; lognormal variance with pedigree 0.0032, pedigree (1,3,3,1,1)
  Amount based on primary data collected from participating companies.
  properties: wet mass 1 kg, dry mass 1 kg
- zinc slag: -0.000687784 kg; name zinc_slag; lognormal variance with pedigree 0.0032, pedigree (1,3,3,1,1)
  Amount based on primary data collected from participating companies.
  production volume 2.92922e9 kg; = zinc_slag / zinc * zinc_pv
    (same comment as for indium rich leaching residues, from zinc production)
  property price 0 EUR2005; name zinc_slag_price_EUR2005
  properties: potassium content 0.0066, zinc content 0.0666, dry mass 1 kg, wet mass 1 kg, copper content 0.0017175, aluminium content 0.022, iron content 0.153, manganese content 0.06405, silicon content 0.144, magnesium content 0.012685, calcium content 0.02735, oxygen content 0.242396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
- ethanol, without water, in 99.7% solution state, from ethylene: 0 kg; pedigree (1,1,1,1,1)
  Amount based on primary data collected from participating companies.
  properties: carbon content, fossil 0.521739, wet mass 1 kg, heating value, net 31.58 MJ, dry mass 1 kg
- waste textile, soiled: 0 kg; name waste_textile; pedigree (1,1,1,1,1)
  Amount based on primary data collected from participating companies.
  production volume 0 kg
    (same comment as for indium rich leaching residues, from zinc production)
  property price 0 EUR2005; name waste_textile_price_EUR2005
  properties: dry mass 0.75 kg, water content 0.333333, wet mass 1 kg, carbon content, non-fossil 0.017, heating value, net 14.45 MJ
  note on heating value, net: Value taken from the general comment of the treatment dataset.
- waste plastic, mixture: -3.32292e-8 kg; name waste_plastic; lognormal variance with pedigree 0.0032, pedigree (1,3,3,1,1)
  Amount and activity link based on primary data collected from participating companies.
  production volume 141520 kg; = waste_plastic / zinc * zinc_pv
    (same comment as for indium rich leaching residues, from zinc production)
  property price 0 EUR2005; name waste_plastic_price_EUR2005
  properties: heating value, net 30.79 MJ, water content 0.180638, wet mass 1 kg, carbon content, fossil 0.747344, dry mass 0.847 kg
- natural gas, high pressure: 3.6235e-6 m3; lognormal variance with pedigree 0.0032, pedigree (1,3,3,1,1)
  Amount and activity link based on primary data collected from participating companies. Emissions from fuel combustion included in dataset.
  properties: heating value, net 39 MJ, carbon content, fossil 0.602381, wet mass 0.84 kg, dry mass 0.84 kg
  note on heating value, net: Literature value, Source: United Nations Statistics Division (2018) International Recommendations for Energy Statistics (IRES). Available at: http://unstats.un.org/unsd/statcom/doc11/BG-IRES.pdf.
  note on carbon content, fossil: An average C content of 0.506 kg C/ m3 has been assumed (this average has been calculated using data in Tab 3.5, ecoinvent v2.2 report 6_V
- pig iron: 0 kg; pedigree (1,1,1,1,1)
  Amount based on primary data collected from participating companies.
  properties: wet mass 1 kg, dry mass 1 kg, carbon content, fossil 0.045
- heat, district or industrial, natural gas: 0.000428294 MJ; lognormal variance with pedigree 0.0032, pedigree (1,3,3,1,1)
  Amount and activity link based on primary data collected from participating companies.
  properties: heating value, net 1 MJ
- waste paperboard: 0 kg; name waste_paperboard; pedigree (1,1,1,1,1)
  Amount based on primary data collected from participating companies.
  production volume 0 kg
    (same comment as for indium rich leaching residues, from zinc production)
  property price 0 EUR2005; name waste_paperboard_price_EUR2005
  properties: carbon content, non-fossil 0.483259, wet mass 1 kg, dry mass 0.804 kg, water content 0.243781, heating value, net 15.92 MJ
  note on carbon content, non-fossil: C content was calculated for 1 kg DM, using data in Tab A.3, ecoinvent v2.2 report 13_I.
- petroleum coke: 1.18201e-7 kg; lognormal variance with pedigree 0.0032, pedigree (1,3,3,1,1)
  Amount based on primary data collected from participating companies.
  properties: heating value, net 35 MJ, wet mass 1 kg, dry mass 1 kg, carbon content, fossil 0.885
- iron(III) chloride, without water, in 14% iron solution state: 2.06597e-7 kg; lognormal variance with pedigree 0.0032, pedigree (1,3,3,1,1)
  Amount based on primary data collected from participating companies.
  properties: dry mass 1 kg, wet mass 1 kg
- municipal solid waste: -0.000440813 kg; name MSW_incineration; lognormal variance with pedigree 0.0032, pedigree (1,3,3,1,1)
  Amount and activity link based on primary data collected from participating companies.
  production volume 1.87739e9 kg; = MSW_incineration / zinc * zinc_pv
    (same comment as for indium rich leaching residues, from zinc production)
  property price 0 EUR2005; name MSW_incineration_price_EUR2005
  properties: dry mass 0.771 kg, water content 0.297017, heating value, net 11.74 MJ, carbon content, fossil 0.025, wet mass 1 kg
  note on carbon content, fossil: MSW composition in tab 4.1, ecoinvent v2.2 report 13_I. C content referred to 1 kg DM
- petrol, unleaded: 0, 0 kg (2 entries); pedigree (1,1,1,1,1)
  Amount based on primary data collected from participating companies.
  properties: carbon content, fossil 0.865, dry mass 1 kg, wet mass 1 kg, heating value, net 43.2 MJ
  note on heating value, net: Assumed equal to "petroleum". LHV for petroleum: Based on literature, page 7, Report6, part 4
- light fuel oil: 0 kg; pedigree (1,1,1,1,1)
  Amount based on primary data collected from participating companies.
  properties: heating value, net 42.6 MJ, dry mass 1 kg, carbon content, fossil 0.862, wet mass 1 kg
- natural gas, high pressure: 0.000102323 m3; lognormal variance with pedigree 0.0032, pedigree (1,3,3,1,1)
  (same comment as for natural gas, high pressure)
  properties: heating value, net 39 MJ, carbon content, fossil 0.602381, dry mass 0.84 kg, wet mass 0.84 kg
- inert waste: 0 kg; name waste_inert; pedigree (1,1,1,1,1)
  Amount based on primary data collected from participating companies.
  production volume 0 kg
    (same comment as for indium rich leaching residues, from zinc production)
  property price 0 EUR2005; name waste_inert_price_EUR2005
  properties: dry mass 1 kg, wet mass 1 kg
- liquefied petroleum gas: 0 kg; pedigree (1,1,1,1,1)
  Amount based on primary data collected from participating companies.
  properties: carbon content, fossil 0.821863, wet mass 1 kg, heating value, net 45.5 MJ, dry mass 1 kg
  note on heating value, net: Indicative value. Reference: Fuels - Higher and Lower Calorific Values, available at: https://www.engineeringtoolbox.com/fuels-higher-calorific-values-d_169.html
- quicklime, milled, loose: 1.67028e-5 kg; lognormal variance with pedigree 0.0032, pedigree (1,3,3,1,1)
  Amount based on primary data collected from participating companies.
  properties: dry mass 0.99 kg, water content 0.010101, wet mass 1 kg
- municipal solid waste: -9.78266e-5 kg; name MSW_sanitary_landfill; lognormal variance with pedigree 0.0032, pedigree (1,3,3,1,1)
  Amount and activity link based on primary data collected from participating companies.
  production volume 4.16636e8 kg; = MSW_sanitary_landfill / zinc * zinc_pv
    (same comment as for indium rich leaching residues, from zinc production)
  property price 0 EUR2005; name MSW_sanitary_landfill_price_EUR2005
  properties: dry mass 0.771 kg, wet mass 1 kg, water content 0.297017, heating value, net 11.74 MJ, carbon content, fossil 0.025
- phosphoric acid, industrial grade, without water, in 85% solution state: 4.76197e-8 kg; lognormal variance with pedigree 0.0032, pedigree (1,3,3,1,1)
  Amount based on primary data collected from participating companies.
  properties: dry mass 1 kg, wet mass 1 kg
- hazardous waste, for underground deposit: -3.69167e-5 kg; name haz_waste_deposit; lognormal variance with pedigree 0.0032, pedigree (1,3,3,1,1)
  Amount based on primary data collected from participating companies.
  production volume 1.56103e8 kg; = haz_waste_deposit / zinc * zinc_pv
    (same comment as for indium rich leaching residues, from zinc production)
  property lead content 0.2; name haz_waste_deposit_Pb_content
  property price 0 EUR2005; name haz_waste_deposit_price_EUR2005
  properties: carbon content, fossil 0.554667, dry mass 1 kg, wet mass 1 kg
  note on carbon content, fossil: Tab A.6, ecoinvent v2.2 report 13_I, average hazardous waste composition was used, and referred to 0% water mass. No waste-specific emission are currently inventoried for underground deposits. Accordingly, no waste composition must be specified. For generic, average waste to underground deposit deposition in a 200 liter steel drum without cement solidification is assumed (ecoinvent v2.2 report 13_I).
- urea: 0 kg; pedigree (1,1,1,1,1)
  The exchange has been updated from "urea, as N" into "urea" and therefore its amount has been scaled (multiplied) from 0 kg by 2.1438 kg of "urea" per kg of "urea, as N". Original comment of the exchange is: Amount based on primary data collected from participating companies.
  properties: wet mass 1 kg, carbon content, fossil 0.2, dry mass 1 kg
- natural gas, high pressure: 1.48717e-6 m3; lognormal variance with pedigree 0.0032, pedigree (1,3,3,1,1)
  (same comment as for natural gas, high pressure)
  properties: wet mass 0.84 kg, dry mass 0.84 kg, carbon content, fossil 0.602381, heating value, net 39 MJ
- waste glass: -2.06377e-8 kg; name waste_glass_landfill; lognormal variance with pedigree 0.0032, pedigree (1,3,3,1,1)
  Amount and activity link based on primary data collected from participating companies.
  production volume 87894.3 kg; = waste_glass_landfill / zinc * zinc_pv
    (same comment as for indium rich leaching residues, from zinc production)
  property price 0 EUR2005; name waste_glass_landfill_price_EUR2005
  properties: wet mass 1 kg, dry mass 1 kg, heating value, net 0.05 MJ
  note on heating value, net: Value extracted from "treatment of waste glass, open dump, very wet infiltration class (1000mm)"
- manganese sulfate: 1.27628e-8 kg; lognormal variance with pedigree 0.0032, pedigree (1,3,3,1,1)
  Amount based on primary data collected from participating companies.
  properties: wet mass 1 kg, dry mass 1 kg
- municipal solid waste: 0 kg; name MSW; pedigree (1,1,1,1,1)
  Amount based on primary data collected from participating companies.
  production volume 0 kg
    (same comment as for indium rich leaching residues, from zinc production)
  property price 0 EUR2005; name MSW_price_EUR2005
  properties: wet mass 1 kg, water content 0.297017, heating value, net 11.74 MJ, dry mass 0.771 kg, carbon content, fossil 0.025
- magnesium: 2.1082e-8 kg; lognormal variance with pedigree 0.0032, pedigree (1,3,3,1,1)
  Amount based on primary data collected from participating companies.
  properties: dry mass 1 kg, wet mass 1 kg
- hard coal: 3.54545e-5 kg; lognormal variance with pedigree 0.0032, pedigree (1,3,3,1,1)
  Amount and activity link based on primary data collected from participating companies.
  properties: carbon content, fossil 0.845, water content 0.0638298, wet mass 1 kg, heating value, net 27.91 MJ, dry mass 0.94 kg
  note on carbon content, fossil: C content 75-94% (specified in Tab 1.1, report 6, part VI). A mean content of 0.845 kg C/ kg dry hard coal was considered
  note on heating value, net: Based on the Characterization factor of Hard coal in the CED method
- lubricating oil: 1.68766e-7 kg; lognormal variance with pedigree 0.0032, pedigree (1,3,3,1,1)
  Amount based on primary data collected from participating companies.
  properties: carbon content, fossil 0.75, wet mass 1 kg, heating value, net 40.2 MJ, dry mass 1 kg
  note on carbon content, fossil: Lubricating oil is produced from diesel. C-content/dry mass of fats and oils considered 75%, from: ecoinvent v2.2 report, n 15a, pg 40
  note on heating value, net: Literature value, Source: IPCC 2006, 2006 IPCC Guidelines for National Greenhouse Gas Inventories, Prepared by the National Greenhouse Gas Inventories Programme, Eggleston H.S., Buendia L., Miwa K., Ngara T. and Tanabe K. (eds). Published: IGES, Japan
- hazardous waste, for incineration: 0 kg; name haz_waste_incineration; pedigree (1,1,1,1,1)
  Amount based on primary data collected from participating companies.
  production volume 0 kg
    (same comment as for indium rich leaching residues, from zinc production)
  property price 0 EUR2005; name haz_waste_incineration_price_EUR2005
  properties: carbon content, fossil 0.554667, wet mass 1 kg, heating value, net 17 MJ, water content 0.333333, dry mass 0.75 kg
  note on carbon content, fossil: Tab A.6, ecoinvent v2.2 report 13_I. C content has been calculated after data in the tables, and then referred to 1 kg DM
- quicklime, in pieces, loose: 0 kg; pedigree (1,1,1,1,1)
  Amount based on primary data collected from participating companies.
  properties: water content 0.010101, wet mass 1 kg, dry mass 0.99 kg
- potassium permanganate: 4.69721e-8 kg; lognormal variance with pedigree 0.0032, pedigree (1,3,3,1,1)
  Amount based on primary data collected from participating companies.
  properties: dry mass 1 kg, wet mass 1 kg
- limestone, unprocessed: 0 kg; pedigree (1,1,1,1,1)
  Amount based on primary data collected from participating companies.
  properties: carbon content, fossil 0.117257, water content 0.00200401, dry mass 0.998 kg, wet mass 1 kg
- oxygen, liquid: 0.00047838 kg; lognormal variance with pedigree 0.0032, pedigree (1,3,3,1,1)
  Amount and activity link based on primary data collected from participating companies.
  properties: dry mass 1 kg, wet mass 1 kg
- natural gas, high pressure: 0, 0 m3 (2 entries); pedigree (1,1,1,1,1)
  Amount based on primary data collected from participating companies. Emissions from fuel combustion included in dataset.
  properties: dry mass 0.84 kg, carbon content, fossil 0.602381, heating value, net 39 MJ, wet mass 0.84 kg
- cement, unspecified: 0 kg; pedigree (1,1,1,1,1)
  Amount based on primary data collected from participating companies.
  properties: wet mass 1 kg, dry mass 1 kg
- heavy fuel oil: 0 kg; pedigree (1,1,1,1,1)
  Amount based on primary data collected from participating companies.
  properties: heating value, net 41.2 MJ, carbon content, fossil 0.849, dry mass 1 kg, wet mass 1 kg
- waste glass: 0 kg; name waste_glass; pedigree (1,1,1,1,1)
  Amount based on primary data collected from participating companies.
  production volume 0 kg
    (same comment as for indium rich leaching residues, from zinc production)
  property price 0 EUR2005; name waste_glass_price_EUR2005
- silica sand: 6.72514e-5 kg; lognormal variance with pedigree 0.0032, pedigree (1,3,3,1,1)
  Amount based on primary data collected from participating companies.
  properties: dry mass 0.99 kg, water content 0.010101, wet mass 1 kg
- wastewater, average: 0 m3; name water_to_wwt; pedigree (1,1,1,1,1)
  Amount based on primary data collected from participating companies.
  production volume 0 m3
    (same comment as for indium rich leaching residues, from zinc production)
  property price 0 EUR2005; name water_to_wwt_price_EUR2005
  properties: water content 2882.2, carbon content, non-fossil 0.194039, wet mass 1000 kg, dry mass 0.346837 kg
  note on carbon content, non-fossil: 0.0673 kg TOC/m3 (Tab A.17, ecoinvent v2.2 report 13_I). TOC was considered as Total Carbon.
- petrol, unleaded: 7.82668e-8 kg; lognormal variance with pedigree 0.0032, pedigree (1,3,3,1,1)
  Amount and activity link based on primary data collected from participating companies.
  properties: wet mass 1 kg, heating value, net 43.2 MJ, dry mass 1 kg, carbon content, fossil 0.865
- copper, cathode: 4.69051e-8 kg; lognormal variance with pedigree 0.0032, pedigree (1,3,3,1,1)
  Amount based on primary data collected from participating companies.
  properties: wet mass 1 kg, dry mass 1 kg
- diesel, burned in building machine: 7.46387e-7 MJ; lognormal variance with pedigree 0.0032, pedigree (1,3,3,1,1)
  Amount based on primary data collected from participating companies.
  properties: heating value, net 1 MJ
- propane: 2.51613e-6 kg; lognormal variance with pedigree 0.0032, pedigree (1,3,3,1,1)
  Amount based on primary data collected from participating companies.
  properties: heating value, net 46.4 MJ, carbon content, fossil 0.817139, dry mass 1 kg, wet mass 1 kg
- lime, hydrated, packed: 0 kg; pedigree (1,1,1,1,1)
  Amount based on primary data collected from participating companies.
  properties: dry mass 0.997 kg, water content 0.00300903, wet mass 1 kg
- iron sulfate: 0 kg; pedigree (1,1,1,1,1)
  Amount based on primary data collected from participating companies.
  properties: wet mass 1 kg, dry mass 1 kg
- hydrochloric acid, without water, in 30% solution state: 0 kg; pedigree (1,1,1,1,1)
  Amount based on primary data collected from participating companies.
  properties: wet mass 1 kg, heating value, net 3.32 MJ, dry mass 1 kg
- soda ash, dense: 1.28398e-5 kg; lognormal variance with pedigree 0.0032, pedigree (1,3,3,1,1)
  Amount based on primary data collected from participating companies.
  properties: carbon content, fossil 0.113208, heating value, net 3.43 MJ, wet mass 1 kg, dry mass 1 kg
- diesel: 1.39686e-6 kg; lognormal variance with pedigree 0.0032, pedigree (1,3,3,1,1)
  Amount and activity link based on primary data collected from participating companies. Emissions from diesel combustion included in dataset.
  properties: heating value, net 42.8 MJ, carbon content, fossil 0.865, wet mass 1 kg, dry mass 1 kg
  note on carbon content, fossil: C-content of diesel is 86.5% (ecoinvent v2.2 report 6_IV, Tab 3.14)
- lead concentrate: 6.14642e-5 kg; lognormal variance with pedigree 0.0032, pedigree (1,3,3,1,1)
  Amount based on primary data collected from participating companies.
  properties: dry mass 1 kg, lead content 0.571348, silver content 0.00123307, wet mass 1 kg, copper content 0.00183338, cadmium content 0.0209963, zinc content 0.0289499
- aluminium sulfate, powder: 0 kg; pedigree (1,1,1,1,1)
  Amount based on primary data collected from participating companies.
  properties: dry mass 1 kg, wet mass 1 kg
- calcium chloride: 0 kg; pedigree (1,1,1,1,1)
  Amount based on primary data collected from participating companies.
  properties: dry mass 1 kg, wet mass 1 kg
- light fuel oil: 3.60413e-6 kg; lognormal variance with pedigree 0.0032, pedigree (1,3,3,1,1)
  Amount and activity link based on primary data collected from participating companies.
  properties: wet mass 1 kg, carbon content, fossil 0.862, heating value, net 42.6 MJ, dry mass 1 kg
- anode, for metal electrolysis: 1.98784e-7 kg; lognormal variance with pedigree 0.0032, pedigree (1,3,3,1,1)
  Amount based on primary data collected from participating companies.
  properties: wet mass 1 kg, carbon content, fossil 0.865971, dry mass 1 kg
- sodium silicate, without water, in 37% solution state: 5.73556e-8 kg; lognormal variance with pedigree 0.0032, pedigree (1,3,3,1,1)
  Amount based on primary data collected from participating companies.
  properties: dry mass 1 kg, wet mass 1 kg
- steam, in chemical industry: 0 kg; pedigree (1,1,1,1,1)
  Amount based on primary data collected from participating companies.
  properties: wet mass 1 kg, dry mass 1 kg
- ethoxylated alcohol (AE11): 2.07616e-8 kg; lognormal variance with pedigree 0.0032, pedigree (1,3,3,1,1)
  Amount based on primary data collected from participating companies.
  properties: carbon content, non-fossil 0.240572, dry mass 1 kg, wet mass 1 kg, heating value, net 18.74 MJ, carbon content, fossil 0.378041
- meat and bone meal: 0 kg; pedigree (1,1,1,1,1)
  Amount based on primary data collected from participating companies.
  properties: dry mass 0.96 kg, wet mass 1 kg, carbon content, non-fossil 0.521, heating value, net 21.45 MJ, water content 0.0416667
  note on carbon content, non-fossil: Boesch & Hellweg 2010, 2010, Boesch, M.E., Hellweg, S., Identifying Improvement Potentials in Cement Production with Life Cycle Assessment, Environmental Science & Technology, 44, 23, 9143-9149, 1 - Article, Supporting information is available via http://pubs.acs.org
- acetic acid, without water, in 98% solution state: 2.0156e-7 kg; lognormal variance with pedigree 0.0032, pedigree (1,3,3,1,1)
  Amount based on primary data collected from participating companies.
  properties: carbon content, fossil 0.400016, dry mass 1 kg, heating value, net 14.6 MJ, wet mass 1 kg
  note on heating value, net: Based on literature, page 10, Althaus H.-J., Chudacoff M., Hischier R., Jungbluth N., Osses M. and Primas A. (2007) Life Cycle Inventories of Chemicals. Final report ecoinvent data v2.0 No. 8. EMPA, Swiss Centre for Life Cycle Inventories, Dübendorf, CH, Online-Version under: www.ecoinvent.org.
- polyacrylamide: 2.70752e-6 kg; lognormal variance with pedigree 0.0032, pedigree (1,3,3,1,1)
  Amount based on primary data collected from participating companies.
  properties: heating value, net 23.88 MJ, dry mass 1 kg, carbon content, fossil 0.51, wet mass 1 kg
- butane: 1.10097e-7 kg; lognormal variance with pedigree 0.0032, pedigree (1,3,3,1,1)
  Amount based on primary data collected from participating companies.
  properties: wet mass 1 kg, heating value, net 45.89 MJ, carbon content, fossil 0.827586, dry mass 1 kg
- transport, freight, lorry 16-32 metric ton, EURO3: 6.76954e-5 metric ton*km; lognormal variance with pedigree 0.1226, pedigree (1,3,3,1,1)
  Inbound transport of zinc concentrate and other materials to sites. Amount and activity link based on primary data collected from participating companies.
- sulfamic acid: 7.82612e-10 kg; lognormal variance with pedigree 0.0032, pedigree (1,3,3,1,1)
  Amount based on primary data collected from participating companies.
  properties: heating value, net 3.74 MJ
- heat, district or industrial, other than natural gas: 2.37759e-5, 6.97899e-7 MJ (2 entries); lognormal variance with pedigree 0.0032, pedigree (1,3,3,1,1)
  Amount and activity link based on primary data collected from participating companies.
  properties: heating value, net 1 MJ
- transport, freight, sea, container ship: 0.000105518 metric ton*km; lognormal variance with pedigree 0.1226, pedigree (1,3,3,1,1)
  Amount based on primary data collected from participating companies.
- waste mineral oil: 0 kg; name waste_mineral_oil; pedigree (1,1,1,1,1)
  Amount based on primary data collected from participating companies.
  production volume 0 kg
    (same comment as for indium rich leaching residues, from zinc production)
  property price 0 EUR2005; name waste_mineral_oil_price_EUR2005
  properties: heating value, net 34.7 MJ, dry mass 0.9 kg, carbon content, fossil 0.864444, water content 0.111111, wet mass 1 kg
- transport, freight, lorry 16-32 metric ton, EURO3: 0, 0 metric ton*km (2 entries); pedigree (1,1,1,1,1)
  Amount based on primary data collected from participating companies.
- sodium hydrosulfide: 3.5171e-6 kg; lognormal variance with pedigree 0.0032, pedigree (1,3,3,1,1)
  Amount based on primary data collected from participating companies.
  properties: dry mass 1 kg, wet mass 1 kg
- clinker: 0 kg; pedigree (1,1,1,1,1)
  Amount based on primary data collected from participating companies.
  properties: wet mass 1 kg, dry mass 1 kg
- sulfuric acid: 0 kg; pedigree (1,1,1,1,1)
  Amount based on primary data collected from participating companies.
  properties: dry mass 1 kg, wet mass 1 kg
- hydrogen, liquid: 1.53985e-6 kg; lognormal variance with pedigree 0.0032, pedigree (1,3,3,1,1)
  Amount based on primary data collected from participating companies.
  properties: dry mass 1 kg, heating value, net 120.21 MJ, wet mass 1 kg
- sodium chloride, powder: 7.91e-7 kg; lognormal variance with pedigree 0.0032, pedigree (1,3,3,1,1)
  Amount based on primary data collected from participating companies.
  properties: wet mass 1 kg, dry mass 1 kg
- transport, freight, lorry 3.5-7.5 metric ton, EURO3: 1.32761e-9 metric ton*km; lognormal variance with pedigree 0.1226, pedigree (1,3,3,1,1)
  (same comment as for transport, freight, lorry 16-32 metric ton, EURO3)
- transport, freight, lorry 16-32 metric ton, EURO4: 9.65838e-7 metric ton*km; lognormal variance with pedigree 0.1226, pedigree (1,3,3,1,1)
  (same comment as for transport, freight, lorry 16-32 metric ton, EURO3)
- chemical, organic: 5.82468e-8 kg; lognormal variance with pedigree 0.0032, pedigree (1,3,3,1,1)
  Amount based on primary data collected from participating companies.
  properties: wet mass 1 kg, dry mass 1 kg, carbon content, fossil 0.628, heating value, net 19.03 MJ
  note on carbon content, fossil: This dataset is an unweighted average of 20 organic substances (listed in Tab 88.1, ecoinvent v2.2 report 8, part II), being part of the top100 chemicals included in this database. The C-content has also been calculated as an unweighted average of the C content of the substances composing this dataset.
- transport, freight train: 2.31783e-5 metric ton*km; lognormal variance with pedigree 0.1226, pedigree (1,3,3,1,1)
  (same comment as for transport, freight, lorry 16-32 metric ton, EURO3)
- ferrite: 2.3773e-6 kg; lognormal variance with pedigree 0.0032, pedigree (1,3,3,1,1)
  Amount based on primary data collected from participating companies.
  properties: wet mass 1 kg, dry mass 1 kg
- zinc: 8.543e-6 kg; lognormal variance with pedigree 0.0032, pedigree (1,3,3,1,1)
  Amount based on primary data collected from participating companies.
  properties: wet mass 1 kg, dry mass 1 kg
- waste wood, untreated: 0 kg; name waste_wood; pedigree (1,1,1,1,1)
  Amount based on primary data collected from participating companies.
  production volume 0 kg
    (same comment as for indium rich leaching residues, from zinc production)
  property price 0 EUR2005; name waste_wood_price_EUR2005
  properties: water content 0.25, dry mass 0.8 kg, wet mass 1 kg, carbon content, non-fossil 0.48632, heating value, net 13.99 MJ
- tap water: 0 kg; name water_from_tap; pedigree (1,1,1,1,1)
  Amount based on primary data collected from participating companies.
  properties: wet mass 1 kg, dry mass 0.000337476 kg, water content 2962.17, carbon content, fossil 0.00178991
  note on carbon content, fossil: Bicarbonate content is 2.93 mol/m3. CO2 content is 0.1 mol/m3 (ecoinvent v2.2 report 8, Tab 93.1).
- sulfite pulp, bleached: 1.59765e-6 kg; lognormal variance with pedigree 0.0032, pedigree (1,3,3,1,1)
  Amount based on primary data collected from participating companies.
  properties: carbon content, non-fossil 0.494, wet mass 1 kg, water content 0.111111, heating value, net 13.23 MJ, dry mass 0.9 kg
- transport, freight, inland waterways, barge: 3.08831e-5 metric ton*km; lognormal variance with pedigree 0.1226, pedigree (1,3,3,1,1)
  (same comment as for transport, freight, lorry 16-32 metric ton, EURO3)
- ammonium chloride: 2.89582e-6 kg; lognormal variance with pedigree 0.0032, pedigree (1,3,3,1,1)
  Amount based on primary data collected from participating companies.
  properties: wet mass 1 kg, dry mass 1 kg
- strontium carbonate: 1.24234e-6 kg; lognormal variance with pedigree 0.0032, pedigree (1,3,3,1,1)
  Amount based on primary data collected from participating companies.
  properties: heating value, net 2.47 MJ, dry mass 1 kg, carbon content, fossil 0.0813, wet mass 1 kg
- chemical, inorganic: 7.67673e-7 kg; lognormal variance with pedigree 0.0032, pedigree (1,3,3,1,1)
  Amount based on primary data collected from participating companies.
  properties: dry mass 1 kg, wet mass 1 kg, carbon content, fossil 0.003
  note on carbon content, fossil: This dataset is an unweighted average of 20 inorganic substances (listed in Tab 88.1, ecoinvent v2.2 report 8, part II), being part of the top100 chemicals included in this database. The C-content has also been calculated as an unweighted average of the C content of the substances composing this dataset.
- silver: 2.94049e-9 kg; lognormal variance with pedigree 0.0032, pedigree (1,3,3,1,1)
  Amount based on primary data collected from participating companies.
  properties: dry mass 1 kg, wet mass 1 kg
- esterquat: 0 kg; pedigree (1,1,1,1,1)
  Amount based on primary data collected from participating companies.
  properties: heating value, net 21.68 MJ, wet mass 1 kg, dry mass 1 kg, carbon content, fossil 0.196746, carbon content, non-fossil 0.518779
- sodium hydrogen sulfite: 3.0334e-9 kg; lognormal variance with pedigree 0.0032, pedigree (1,3,3,1,1)
  Amount based on primary data collected from participating companies.
  properties: wet mass 1 kg, dry mass 1 kg
- antimony: 1.36772e-8 kg; lognormal variance with pedigree 0.0032, pedigree (1,3,3,1,1)
  Amount based on primary data collected from participating companies.
  properties: dry mass 1 kg, wet mass 1 kg
- transport, freight, lorry >32 metric ton, EURO3: 8.55173e-6 metric ton*km; lognormal variance with pedigree 0.1226, pedigree (1,3,3,1,1)
  (same comment as for transport, freight, lorry 16-32 metric ton, EURO3)
- coke: 0.00205004 MJ; lognormal variance with pedigree 0.0032, pedigree (1,3,3,1,1)
  Amount and activity link based on primary data collected from participating companies.
  properties: water content 0.0638298, carbon content, fossil 0.869149, heating value, net 28.6 MJ, dry mass 0.0328671 kg, wet mass 0.034965 kg
- sodium hypochlorite, without water, in 15% solution state: 0 kg; pedigree (1,1,1,1,1)
  Amount based on primary data collected from participating companies.
  properties: dry mass 1 kg, wet mass 1 kg
- sodium hydroxide, without water, in 50% solution state: 1.26333e-5 kg; lognormal variance with pedigree 0.0032, pedigree (1,3,3,1,1)
  Amount based on primary data collected from participating companies.
  properties: heating value, net 3.03 MJ, dry mass 1 kg, wet mass 1 kg
- waste polyethylene terephthalate: 0 kg; name polyester_waste; pedigree (1,1,1,1,1)
  Amount based on primary data collected from participating companies.
  production volume 0 kg
    (same comment as for indium rich leaching residues, from zinc production)
  property price 0 EUR2005; name polyester_waste_price_EUR2005
  properties: heating value, net 22.95 MJ, water content 0.00200401, dry mass 0.998 kg, carbon content, fossil 0.554108, wet mass 1 kg
- hydrogen peroxide, without water, in 50% solution state: 1.88529e-7 kg; lognormal variance with pedigree 0.0032, pedigree (1,3,3,1,1)
  Amount based on primary data collected from participating companies.
  properties: wet mass 1 kg, dry mass 1 kg, heating value, net 7.13 MJ
- zinc concentrate: 0.00548577 kg; lognormal variance with pedigree 0.0032, pedigree (1,3,3,1,1)
  Amount based on primary data collected from participating companies.
  properties: silver content 8.17506e-5, cadmium content 0.00078681, wet mass 1 kg, copper content 0.00356636, dry mass 1 kg, iron content 0.00738029, zinc content 0.548753, lead content 0.0148899, cobalt content 0.000624588
- sodium dichromate: 3.4435e-8 kg; lognormal variance with pedigree 0.0032, pedigree (1,3,3,1,1)
  Amount based on primary data collected from participating companies.
  properties: dry mass 1 kg, wet mass 1 kg
- sulfidic tailings, from zinc-lead mine operation: 0 kg; name sulfidic_tailing; pedigree (1,1,1,1,1)
  Amount based on primary data collected from participating companies.
  production volume 0 kg
    (same comment as for indium rich leaching residues, from zinc production)
  property price 0 EUR2005; name sulfidic_tailing_price_EUR2005
  properties: aluminium content 0.014446, potassium content 0.0063554, dry mass 0.7 kg, calcium content 0.0094279, iron content 0.030113, magnesium content 0.0043305, silicon content 0.041987, oxygen content 0.86247, water content 0.42857, sulfur content 0.012233, carbon content, fossil 0.0087785, wet mass 1 kg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
- hard coal: 0, 0 kg (2 entries); pedigree (1,1,1,1,1)
  Amount based on primary data collected from participating companies.
  properties: heating value, net 27.91 MJ, dry mass 0.94 kg, wet mass 1 kg, carbon content, fossil 0.845, water content 0.0638298
- blast furnace sludge: 0 kg; name sludge; pedigree (1,1,1,1,1)
  Amount based on primary data collected from participating companies.
  production volume 0 kg
    (same comment as for indium rich leaching residues, from zinc production)
  property price 0 EUR2005; name sludge_price_EUR2005
  properties: water content 0.0940919, carbon content, fossil 0.339168, dry mass 0.914 kg, wet mass 1 kg
- aluminium, wrought alloy: 4.67503e-6 kg; lognormal variance with pedigree 0.0032, pedigree (1,3,3,1,1)
  Amount based on primary data collected from participating companies.
  properties: dry mass 1 kg, wet mass 1 kg
- zinc oxide: 0.000140856 kg; lognormal variance with pedigree 0.0032, pedigree (1,3,3,1,1)
  Amount based on primary data collected from participating companies.
  properties: wet mass 1 kg, dry mass 1 kg
- diesel: 0 kg; pedigree (1,1,1,1,1)
  Amount based on primary data collected from participating companies. Emissions from diesel combustion included in dataset.
  properties: dry mass 1 kg, carbon content, fossil 0.865, heating value, net 42.8 MJ, wet mass 1 kg
- water, deionised: 0 kg; name water_deion; pedigree (1,1,1,1,1)
  Amount based on primary data collected from participating companies.
  properties: wet mass 1 kg
- aluminium, cast alloy: 4.84767e-7 kg; lognormal variance with pedigree 0.0032, pedigree (1,3,3,1,1)
  Amount based on primary data collected from participating companies.
  properties: wet mass 1 kg, dry mass 1 kg
- sodium sulfide: 9.98306e-8 kg; lognormal variance with pedigree 0.0032, pedigree (1,3,3,1,1)
  Amount based on primary data collected from participating companies.
  properties: wet mass 1 kg, dry mass 1 kg
- lead: 1.1761e-6 kg; lognormal variance with pedigree 0.0032, pedigree (1,3,3,1,1)
  Amount based on primary data collected from participating companies.
  properties: dry mass 1 kg, wet mass 1 kg
- waste gypsum: 0 kg; name waste_gypsum; pedigree (1,1,1,1,1)
  Amount based on primary data collected from participating companies.
  production volume 0 kg
    (same comment as for indium rich leaching residues, from zinc production)
  property price 0 EUR2005; name waste_gypsum_price_EUR2005
  properties: wet mass 1 kg, dry mass 0.806 kg, water content 0.240695
- copper sulfate: 3.0113e-7 kg; lognormal variance with pedigree 0.0032, pedigree (1,3,3,1,1)
  Amount based on primary data collected from participating companies.
  properties: wet mass 1 kg, dry mass 1 kg
- barium carbonate: 3.52176e-7 kg; lognormal variance with pedigree 0.0032, pedigree (1,3,3,1,1)
  Amount based on primary data collected from participating companies.
- ammonia, anhydrous, liquid: 0 kg; pedigree (1,1,1,1,1)
  Amount based on primary data collected from participating companies.
  properties: dry mass 1 kg, wet mass 1 kg
- nitrogen, liquid: 1.83556e-5 kg; lognormal variance with pedigree 0.0032, pedigree (1,3,3,1,1)
  Amount and activity link based on primary data collected from participating companies.
  properties: wet mass 1 kg, dry mass 1 kg
- iron scrap, unsorted: -3.29927e-6 kg; lognormal variance with pedigree 0.0032, pedigree (1,3,3,1,1)
  Amount based on primary data collected from participating companies.
  production volume 1.34987e7 kg
  properties: wet mass 1 kg, dry mass 1 kg
- waste paper, unsorted: -2.36807e-8 kg; lognormal variance with pedigree 0.0032, pedigree (1,3,3,1,1)
  Amount based on primary data collected from participating companies.
  production volume 76855.5 kg
  properties: heating value, net 14.11 MJ
- aluminium scrap, post-consumer: -2.05623e-8 kg; lognormal variance with pedigree 0.0032, pedigree (1,3,3,1,1)
  Amount based on primary data collected from participating companies.
  production volume 87573.2 kg
  properties: dry mass 1 kg, wet mass 1 kg
- copper scrap, sorted, pressed: -4.11583e-8 kg; lognormal variance with pedigree 0.0032, pedigree (1,3,3,1,1)
  Amount based on primary data collected from participating companies.
  production volume 115293 kg
  properties: dry mass 1 kg, wet mass 1 kg
- aluminium scrap, new: -1.3314e-7 kg; lognormal variance with pedigree 0.2106, pedigree (5,5,5,5,5)
  (same comment as for aluminium scrap, new)
  properties: wet mass 1 kg, dry mass 1 kg
- chlorine, liquid: 1.27119e-9, 6.35478e-9 kg (2 entries); lognormal variance with pedigree 0.0032, pedigree (1,3,3,1,1)
  Amount based on primary data collected from participating companies.
- ethanol, without water, in 99.7% solution state, from ethylene: 1.03003e-7, 2.29356e-7 kg (2 entries); lognormal variance with pedigree 0.0032, pedigree (1,3,3,1,1)
  Amount based on primary data collected from participating companies.
- waste textile, soiled: -1.60939e-7, -1.07526e-5 kg (2 entries); lognormal variance with pedigree 0.0032, pedigree (1,3,3,1,1)
  Amount based on primary data collected from participating companies.
  production volume 4.64799e7 kg
- pig iron: 2.45498e-7, 2.65052e-6 kg (2 entries); lognormal variance with pedigree 0.0032, pedigree (1,3,3,1,1)
  Amount based on primary data collected from participating companies.
- waste paperboard: -1.00302e-9, -1.53166e-10, -1.3393e-11, -5.53454e-10, -5.39664e-11, -9.98973e-11, -2.46329e-9, -1.86328e-8 kg (8 entries); lognormal variance with pedigree 0.0032, pedigree (1,3,3,1,1)
  Amount based on primary data collected from participating companies.
  production volume 97840.1 kg
- petrol, unleaded: 6.70604e-9, 1.79842e-9, 7.43249e-9, 3.69257e-10, 1.79258e-9, 2.06408e-7 kg (6 entries); lognormal variance with pedigree 0.0032, pedigree (1,3,3,1,1)
  Amount based on primary data collected from participating companies.
- light fuel oil: 8.19271e-8, 1.18152e-8, 1.65348e-7, 1.09723e-8, 1.58985e-8, 3.57649e-7, 1.66584e-6 kg (7 entries); lognormal variance with pedigree 0.0032, pedigree (1,3,3,1,1)
  Amount based on primary data collected from participating companies.
- inert waste: -1.38666e-8, -1.61002e-6, -5.67512e-6 kg (3 entries); lognormal variance with pedigree 0.0032, pedigree (1,3,3,1,1)
  Amount based on primary data collected from participating companies.
  production volume 3.10859e7 kg
- liquefied petroleum gas: 2.50381e-9, 2.40454e-8, 1.06563e-9, 2.0953e-7, 8.54051e-8, 7.54843e-9, 1.6801e-9, 3.57429e-7 kg (8 entries); lognormal variance with pedigree 0.0032, pedigree (1,3,3,1,1)
  Amount based on primary data collected from participating companies.
- urea: 2.80685e-8, 5.15343e-9, 3.28698e-8 kg (3 entries); lognormal variance with pedigree 0.0032, pedigree (1,3,3,1,1)
  (same comment as for urea)
- municipal solid waste: -1.48618e-9, -2.12385e-9, -3.46508e-7, -4.1714e-6 kg (4 entries); lognormal variance with pedigree 0.0032, pedigree (1,3,3,1,1)
  Amount based on primary data collected from participating companies.
  production volume 1.92568e7 kg
- hazardous waste, for incineration: -9.62071e-8, -3.68054e-6, -7.6535e-6 kg (3 entries); lognormal variance with pedigree 0.0032, pedigree (1,3,3,1,1)
  Amount based on primary data collected from participating companies.
  production volume 4.86805e7 kg
- quicklime, in pieces, loose: 3.60303e-10, 2.17719e-5 kg (2 entries); lognormal variance with pedigree 0.0032, pedigree (1,3,3,1,1)
  Amount based on primary data collected from participating companies.
- limestone, unprocessed: 3.41246e-8, 3.29626e-6, 8.34547e-5 kg (3 entries); lognormal variance with pedigree 0.0032, pedigree (1,3,3,1,1)
  Amount based on primary data collected from participating companies.
- natural gas, high pressure: 1.09067e-7, 1.08588e-8, 1.62974e-7, 2.71306e-7, 1.5293e-6, 1.68182e-6, 5.08528e-6 m3 (7 entries); lognormal variance with pedigree 0.0032, pedigree (1,3,3,1,1)
  (same comment as for natural gas, high pressure)
- cement, unspecified: 2.15684e-6, 4.48775e-7, 3.72011e-8, 9.36893e-8, 2.11882e-6, 6.23629e-8, 6.8493e-7, 8.28688e-8, 9.25587e-6 kg (9 entries); lognormal variance with pedigree 0.0032, pedigree (1,3,3,1,1)
  Amount based on primary data collected from participating companies.
- heavy fuel oil: 1.4047e-7, 3.65944e-8, 1.08333e-7, 2.13094e-8, 2.73368e-8, 5.2174e-7, 2.53244e-6 kg (7 entries); lognormal variance with pedigree 0.0032, pedigree (1,3,3,1,1)
  Amount based on primary data collected from participating companies.
- waste glass: -1.70744e-8, -1.57371e-9, -3.57022e-11, -1.46825e-10, -2.22962e-10, -6.56987e-10, -3.24333e-8 kg (7 entries); lognormal variance with pedigree 0.0032, pedigree (1,3,3,1,1)
  Amount based on primary data collected from participating companies.
  production volume 221572 kg
- wastewater, average: -5.26288e-9, -4.86488e-8, -1.01784e-7 m3 (3 entries); lognormal variance with pedigree 0.0032, pedigree (1,3,3,1,1)
  Amount based on primary data collected from participating companies.
  production volume 663094 m3
- lime, hydrated, packed: 8.90577e-8, 1.04918e-5 kg (2 entries); lognormal variance with pedigree 0.0032, pedigree (1,3,3,1,1)
  Amount based on primary data collected from participating companies.
- iron sulfate: 4.71515e-7, 9.54757e-7 kg (2 entries); lognormal variance with pedigree 0.0032, pedigree (1,3,3,1,1)
  Amount based on primary data collected from participating companies.
- hydrochloric acid, without water, in 30% solution state: 1.38799e-7, 6.20821e-7 kg (2 entries); lognormal variance with pedigree 0.0032, pedigree (1,3,3,1,1)
  Amount based on primary data collected from participating companies.
- aluminium sulfate, powder: 3.13963e-8, 1.49042e-7 kg (2 entries); lognormal variance with pedigree 0.0032, pedigree (1,3,3,1,1)
  Amount based on primary data collected from participating companies.
- calcium chloride: 2.94758e-7, 1.02085e-6 kg (2 entries); lognormal variance with pedigree 0.0032, pedigree (1,3,3,1,1)
  Amount based on primary data collected from participating companies.
- steam, in chemical industry: 4.7146e-9, 2.674e-8 kg (2 entries); lognormal variance with pedigree 0.0032, pedigree (1,3,3,1,1)
  Amount based on primary data collected from participating companies.
- meat and bone meal: 1.69932e-11, 1.00787e-8 kg (2 entries); lognormal variance with pedigree 0.0032, pedigree (1,3,3,1,1)
  Amount based on primary data collected from participating companies.
- waste mineral oil: -9.57186e-8, -3.86648e-6, -1.01238e-5 kg (3 entries); lognormal variance with pedigree 0.0032, pedigree (1,3,3,1,1)
  Amount based on primary data collected from participating companies.
  production volume 5.99911e7 kg
- transport, freight, lorry 16-32 metric ton, EURO3: 1.63772e-5, 0.000151845 metric ton*km (2 entries); lognormal variance with pedigree 0.1226, pedigree (1,3,3,1,1)
  Amount based on primary data collected from participating companies.
- clinker: 4.60312e-6, 9.69584e-7, 7.01902e-8, 2.24899e-7, 4.30198e-6, 1.72554e-7, 2.88312e-7, 1.38026e-5 kg (8 entries); lognormal variance with pedigree 0.0032, pedigree (1,3,3,1,1)
  Amount based on primary data collected from participating companies.
- sulfuric acid: 7.46062e-6, 5.70292e-5 kg (2 entries); lognormal variance with pedigree 0.0032, pedigree (1,3,3,1,1)
  Amount based on primary data collected from participating companies.
- waste wood, untreated: -3.24629e-7, -4.03075e-8, -2.94694e-9, -1.13212e-7, -1.71036e-8, -2.70393e-8, -5.12321e-7 kg (7 entries); lognormal variance with pedigree 0.0032, pedigree (1,3,3,1,1)
  Amount based on primary data collected from participating companies.
  production volume 4.40738e6 kg
- tap water: 2.77043e-6, 5.5114e-7, 1.38976e-5, 3.61542e-7, 1.0284e-6, 0.000118757, 0.000159037 kg (7 entries); lognormal variance with pedigree 0.0032, pedigree (1,3,3,1,1)
  Amount based on primary data collected from participating companies.
- esterquat: 1.2796e-9, 2.54724e-9 kg (2 entries); lognormal variance with pedigree 0.0032, pedigree (1,3,3,1,1)
  Amount based on primary data collected from participating companies.
- sodium hypochlorite, without water, in 15% solution state: 1.14304e-8, 5.42617e-8 kg (2 entries); lognormal variance with pedigree 0.0032, pedigree (1,3,3,1,1)
  Amount based on primary data collected from participating companies.
- waste polyethylene terephthalate: -1.51237e-10, -1.01051e-11, -7.6423e-13, -4.17376e-12, -1.68615e-12, -3.96337e-12, -1.31074e-10, -1.05874e-9 kg (8 entries); lognormal variance with pedigree 0.0032, pedigree (1,3,3,1,1)
  Amount based on primary data collected from participating companies.
  production volume 5799.57 kg
- sulfidic tailings, from zinc-lead mine operation: -1.13043e-7, -3.33622e-7, -4.11359e-8, -1.70374e-8, -4.69662e-8, -8.71303e-8, -5.99224e-8, -1.91881e-7 kg (8 entries); lognormal variance with pedigree 0.0032, pedigree (1,3,3,1,1)
  Amount based on primary data collected from participating companies.
  production volume 3.79358e6 kg
- hard coal: 4.51577e-6, 2.73322e-6, 4.42516e-6, 7.35498e-6, 1.05006e-6, 3.44538e-6, 1.92038e-6, 9.75921e-6 kg (8 entries); lognormal variance with pedigree 0.0032, pedigree (1,3,3,1,1)
  Amount based on primary data collected from participating companies.
- blast furnace sludge: -6.0052e-7, -3.5124e-7, -8.9232e-8, -3.95405e-6 kg (4 entries); lognormal variance with pedigree 0.0032, pedigree (1,3,3,1,1)
  Amount based on primary data collected from participating companies.
  production volume 2.12735e7 kg
- diesel: 1.59298e-6, 7.6581e-8, 3.21499e-6, 2.25197e-7, 3.25496e-7, 6.71804e-6, 3.17464e-5 kg (7 entries); lognormal variance with pedigree 0.0032, pedigree (1,3,3,1,1)
  (same comment as for diesel)
- water, deionised: 1.60623e-5, 0.00446207, 0.0144853 kg (3 entries); lognormal variance with pedigree 0.0032, pedigree (1,3,3,1,1)
  Amount based on primary data collected from participating companies.
- waste gypsum: -2.66514e-8, -5.638e-7, -1.83565e-6 kg (3 entries); lognormal variance with pedigree 0.0032, pedigree (1,3,3,1,1)
  Amount based on primary data collected from participating companies.
  production volume 1.03326e7 kg
- ammonia, anhydrous, liquid: 1.48016e-5, 1.27238e-6, 8.50414e-6, 1.97949e-6, 3.8426e-6, 4.02746e-7, 1.80042e-6, 4.25928e-5 kg (8 entries); lognormal variance with pedigree 0.0032, pedigree (1,3,3,1,1)
  Amount based on primary data collected from participating companies.

## Inputs from nature
- Water, river [natural resource, in water]: 6.65619e-5 m3; name water_from_river; lognormal variance with pedigree 0.0032, pedigree (1,3,3,1,1)
  Amount based on primary data collected from participating companies.
- Water, well, in ground [natural resource, in water]: 2.23054e-6 m3; name water_from_ground; lognormal variance with pedigree 0.0032, pedigree (1,3,3,1,1)
  Amount based on primary data collected from participating companies.
- Water, unspecified natural origin [natural resource, in water]: 0.00095323 m3; name water_from_unspec; lognormal variance with pedigree 0.0032, pedigree (1,3,3,1,1)
  Amount based on primary data collected from participating companies.
- Water, cooling, unspecified natural origin [natural resource, in water]: 0.000151099 m3; name water_cooling_from_unspec; lognormal variance with pedigree 0.0032, pedigree (1,3,3,1,1)
  Amount based on primary data collected from participating companies.
## Emissions to nature
- DOC, Dissolved Organic Carbon [water, surface water]: 2.3948e-9 kg; lognormal variance with pedigree 0.0426, pedigree (1,3,3,1,1)
  Amount based on primary data collected from participating companies.
- Aluminium [water, surface water]: 1.15625e-9 kg; lognormal variance with pedigree 0.6526, pedigree (1,3,3,1,1)
  Amount based on primary data collected from participating companies.
- Phenol [water, surface water]: 7.04352e-12 kg; lognormal variance with pedigree 0.0426, pedigree (1,3,3,1,1)
  Amount based on primary data collected from participating companies.
- Acidity, unspecified [water, surface water]: 1.15664e-9 kg; lognormal variance with pedigree 0.0426, pedigree (1,3,3,1,1)
  Amount based on primary data collected from participating companies.
- Manganese [water, surface water]: 4.36945e-8 kg; lognormal variance with pedigree 0.6526, pedigree (1,3,3,1,1)
  Amount based on primary data collected from participating companies.
- Chloride [water, surface water]: 5.56058e-7 kg; lognormal variance with pedigree 0.0426, pedigree (1,3,3,1,1)
  Amount based on primary data collected from participating companies.
- Hydrocarbons, unspecified [air, non-urban air or from high stacks]: 8.7744e-9 kg; lognormal variance with pedigree 0.0426, pedigree (1,3,3,1,1)
  Amount based on primary data collected from participating companies.
- Carbon monoxide, fossil [air, unspecified]: 1.78081e-7 kg; lognormal variance with pedigree 0.6526, pedigree (1,3,3,1,1)
  Amount based on primary data collected from participating companies.
- Formaldehyde [air, unspecified]: 1.74921e-10 kg; lognormal variance with pedigree 0.0426, pedigree (1,3,3,1,1)
  Amount based on primary data collected from participating companies.
- Copper [air, unspecified]: 1.6277e-9 kg; lognormal variance with pedigree 0.6526, pedigree (1,3,3,1,1)
  Amount based on primary data collected from participating companies.
- Magnesium [water, surface water]: 4.49858e-7 kg; lognormal variance with pedigree 0.0426, pedigree (1,3,3,1,1)
  Amount based on primary data collected from participating companies.
- Cadmium [air, unspecified]: 1.69843e-8 kg; lognormal variance with pedigree 0.6526, pedigree (1,3,3,1,1)
  Amount based on primary data collected from participating companies.
- Nickel, ion [water, ocean]: 3.05219e-11 kg; lognormal variance with pedigree 0.6526, pedigree (1,3,3,1,1)
  Amount based on primary data collected from participating companies.
- Sulfate [water, surface water]: 3.80595e-6 kg; lognormal variance with pedigree 0.0426, pedigree (1,3,3,1,1)
  Amount based on primary data collected from participating companies.
- Lead [air, unspecified]: 1.56567e-8 kg; lognormal variance with pedigree 0.6526, pedigree (1,3,3,1,1)
  Amount based on primary data collected from participating companies.
- Ammonium, ion [water, surface water]: 7.26436e-8 kg; lognormal variance with pedigree 0.0426, pedigree (1,3,3,1,1)
  Amount based on primary data collected from participating companies.
- Copper, ion [water, surface water]: 1.08542e-9 kg; lognormal variance with pedigree 0.6526, pedigree (1,3,3,1,1)
  Amount based on primary data collected from participating companies.
- BOD5, Biological Oxygen Demand [water, surface water]: 2.32336e-8 kg; lognormal variance with pedigree 0.0426, pedigree (1,3,3,1,1)
  Amount based on primary data collected from participating companies.
- Chlorine [air, unspecified]: 2.80958e-10 kg; lognormal variance with pedigree 0.0426, pedigree (1,3,3,1,1)
  Amount based on primary data collected from participating companies.
- Cadmium, ion [water, ocean]: 3.02729e-10 kg; lognormal variance with pedigree 0.6526, pedigree (1,3,3,1,1)
  Amount based on primary data collected from participating companies.
- Phosphorus [water, surface water]: 1.11674e-9 kg; lognormal variance with pedigree 0.0426, pedigree (1,3,3,1,1)
  Amount based on primary data collected from participating companies.
- Cobalt [water, surface water]: 7.97673e-13 kg; lognormal variance with pedigree 0.6526, pedigree (1,3,3,1,1)
  Amount based on primary data collected from participating companies.
- Copper, ion [water, ocean]: 1.17958e-10 kg; lognormal variance with pedigree 0.6526, pedigree (1,3,3,1,1)
  Amount based on primary data collected from participating companies.
- NMVOC, non-methane volatile organic compounds, unspecified origin [air, unspecified]: 2.72738e-8 kg; lognormal variance with pedigree 0.0426, pedigree (1,3,3,1,1)
  Amount based on primary data collected from participating companies.
- Mercury [water, ocean]: 3.34076e-11 kg; lognormal variance with pedigree 0.6526, pedigree (1,3,3,1,1)
  Amount based on primary data collected from participating companies.
- Iron, ion [water, surface water]: 7.13909e-9 kg; lognormal variance with pedigree 0.6526, pedigree (1,3,3,1,1)
  Amount based on primary data collected from participating companies.
- Cyanide [water, ocean]: 9.21851e-12 kg; lognormal variance with pedigree 0.0426, pedigree (1,3,3,1,1)
  Amount based on primary data collected from participating companies.
- Methane, fossil [air, unspecified]: 1.05932e-8 kg; lognormal variance with pedigree 0.0426, pedigree (1,3,3,1,1)
  Amount based on primary data collected from participating companies.
- Sulfuric acid [water, surface water]: 3.28901e-6 kg; lognormal variance with pedigree 0.0426, pedigree (1,3,3,1,1)
  Amount based on primary data collected from participating companies.
- Dioxins, measured as 2,3,7,8-tetrachlorodibenzo-p-dioxin [air, unspecified]: 0 kg; pedigree (1,1,1,1,1)
  Amount based on primary data collected from participating companies.
- Hydrogen chloride [air, unspecified]: 3.14972e-9 kg; lognormal variance with pedigree 0.0426, pedigree (1,3,3,1,1)
  Amount based on primary data collected from participating companies.
- Sulfur [soil, industrial]: 5.4991e-5 kg; lognormal variance with pedigree 0.0426, pedigree (1,3,3,1,1)
  Amount based on primary data collected from participating companies.
- Sodium, ion [water, surface water]: 7.19341e-7 kg; lognormal variance with pedigree 0.0426, pedigree (1,3,3,1,1)
  Amount based on primary data collected from participating companies.
- Lead [water, surface water]: 1.74605e-9 kg; lognormal variance with pedigree 0.6526, pedigree (1,3,3,1,1)
  Amount based on primary data collected from participating companies.
- Arsenic, ion [water, ocean]: 3.72248e-10 kg; lognormal variance with pedigree 0.6526, pedigree (1,3,3,1,1)
  Amount based on primary data collected from participating companies.
- Nitrogen [water, surface water]: 4.68502e-12 kg; lognormal variance with pedigree 0.0426, pedigree (1,3,3,1,1)
  Amount based on primary data collected from participating companies.
- Selenium [water, surface water]: 1.27596e-10 kg; lognormal variance with pedigree 0.6526, pedigree (1,3,3,1,1)
  Amount based on primary data collected from participating companies.
- Benzo(a)pyrene [air, unspecified]: 2.5962e-15 kg; lognormal variance with pedigree 0.3026, pedigree (1,3,3,1,1)
  Amount based on primary data collected from participating companies.
- Iron, ion [water, ocean]: 1.59653e-9 kg; lognormal variance with pedigree 0.6526, pedigree (1,3,3,1,1)
  Amount based on primary data collected from participating companies.
- PAH, polycyclic aromatic hydrocarbons [air, unspecified]: 5.36603e-13 kg; lognormal variance with pedigree 0.3026, pedigree (1,3,3,1,1)
  Amount based on primary data collected from participating companies.
- VOC, volatile organic compounds, unspecified origin [air, unspecified]: 2.4261e-10 kg; lognormal variance with pedigree 0.0426, pedigree (1,3,3,1,1)
  Amount based on primary data collected from participating companies.
- Particulates, < 2.5 um [air, unspecified]: 1.89983e-8 kg; lognormal variance with pedigree 0.3026, pedigree (1,3,3,1,1)
  Amount based on primary data collected from participating companies.
- TOC, Total Organic Carbon [water, surface water]: 2.3948e-9 kg; lognormal variance with pedigree 0.0426, pedigree (1,3,3,1,1)
  Amount based on primary data collected from participating companies.
- Zinc, ion [water, ocean]: 8.26263e-9 kg; lognormal variance with pedigree 0.6526, pedigree (1,3,3,1,1)
  Amount based on primary data collected from participating companies.
- Dissolved solids [water, surface water]: 1.14067e-8 kg; lognormal variance with pedigree 0.0426, pedigree (1,3,3,1,1)
  Amount based on primary data collected from participating companies.
- Sulfur dioxide [air, unspecified]: 1.29319e-5 kg; lognormal variance with pedigree 0.0032, pedigree (1,3,3,1,1)
  Amount based on primary data collected from participating companies.
- Water [water, unspecified]: 0.00101248 m3; name water_to_water_unspecified; = ((water_from_tap/1000+water_from_ground+water_deion/1000+water_from_river+water_cooling_from_unspec+water_from_unspec)-(water_surface_to_environment+(water_to_wwt*-1)))*(1- fraction_PW_to_air); lognormal variance with pedigree 0.0433, pedigree (3,3,5,3,1)
  Calculated value based on "primary zinc production from concentrate, GLO, 1994-2003" evaporation factor, which in turn is based on literature values and expert opinion. See comments in the parameter"s comment field.
- COD, Chemical Oxygen Demand [water, surface water]: 6.09947e-8 kg; lognormal variance with pedigree 0.0426, pedigree (1,3,3,1,1)
  Amount based on primary data collected from participating companies.
- Nitrate [water, surface water]: 1.0302e-7 kg; lognormal variance with pedigree 0.0426, pedigree (1,3,3,1,1)
  Amount based on primary data collected from participating companies.
- Chromium VI [water, surface water]: 1.27628e-12 kg; lognormal variance with pedigree 0.6526, pedigree (1,3,3,1,1)
  Amount based on primary data collected from participating companies.
- Suspended solids, unspecified [water, surface water]: 5.87469e-8 kg; lognormal variance with pedigree 0.0426, pedigree (1,3,3,1,1)
  Amount based on primary data collected from participating companies.
- Zinc, ion [water, surface water]: 1.52095e-8 kg; lognormal variance with pedigree 0.6526, pedigree (1,3,3,1,1)
  Amount based on primary data collected from participating companies.
- Ammonium, ion [water, ocean]: 1.66398e-8 kg; lognormal variance with pedigree 0.0426, pedigree (1,3,3,1,1)
  Amount based on primary data collected from participating companies.
- Arsenic [air, unspecified]: 6.26585e-10 kg; lognormal variance with pedigree 0.6526, pedigree (1,3,3,1,1)
  Amount based on primary data collected from participating companies.
- Particulates, > 10 um [air, unspecified]: 7.27842e-7 kg; lognormal variance with pedigree 0.0426, pedigree (1,3,3,1,1)
  Amount based on primary data collected from participating companies.
- Arsenic, ion [water, surface water]: 4.55912e-10 kg; lognormal variance with pedigree 0.6526, pedigree (1,3,3,1,1)
  Amount based on primary data collected from participating companies.
- Fluoride [water, ocean]: 1.45001e-8 kg; lognormal variance with pedigree 0.0426, pedigree (1,3,3,1,1)
  Amount based on primary data collected from participating companies.
- Nitrate [water, ocean]: 2.07417e-9 kg; lognormal variance with pedigree 0.0426, pedigree (1,3,3,1,1)
  Amount based on primary data collected from participating companies.
- Carbon dioxide, fossil [air, unspecified]: 0.000688569 kg; lognormal variance with pedigree 0.0032, pedigree (1,3,3,1,1)
  Amount based on primary data collected from participating companies. Some companies provided emissions on the combustion of natural gas, diesel, propane, or other fuels, which are included here. If no emissions were provided for these other fuels then input is reflected as a an input of heat instead of a direct fuel input.
- Cyanide [water, surface water]: 3.91306e-12 kg; lognormal variance with pedigree 0.0426, pedigree (1,3,3,1,1)
  Amount based on primary data collected from participating companies.
- Nitrogen oxides [air, unspecified]: 2.84415e-5 kg; lognormal variance with pedigree 0.0426, pedigree (1,3,3,1,1)
  Amount based on primary data collected from participating companies.
- Ammonia [air, unspecified]: 1.15372e-7 kg; lognormal variance with pedigree 0.0426, pedigree (1,3,3,1,1)
  Amount based on primary data collected from participating companies.
- Mercury [water, surface water]: 4.36658e-11 kg; lognormal variance with pedigree 0.6526, pedigree (1,3,3,1,1)
  Amount based on primary data collected from participating companies.
- Cadmium, ion [water, surface water]: 3.59068e-10 kg; lognormal variance with pedigree 0.6526, pedigree (1,3,3,1,1)
  Amount based on primary data collected from participating companies.
- Nickel, ion [water, surface water]: 1.51558e-12 kg; lognormal variance with pedigree 0.6526, pedigree (1,3,3,1,1)
  Amount based on primary data collected from participating companies.
- Nitrogen dioxide [water, surface water]: 1.17392e-10 kg; lognormal variance with pedigree 0.0426, pedigree (1,3,3,1,1)
  Amount based on primary data collected from participating companies.
- Sulfur oxides [air, unspecified]: 8.30817e-8 kg; lognormal variance with pedigree 0.0426, pedigree (1,3,3,1,1)
  Amount based on primary data collected from participating companies.
- Chromium [air, unspecified]: 1.5687e-11 kg; lognormal variance with pedigree 0.6526, pedigree (1,3,3,1,1)
  Amount based on primary data collected from participating companies.
- Molybdenum [air, unspecified]: 8.87383e-13 kg; lognormal variance with pedigree 0.6526, pedigree (1,3,3,1,1)
  Amount based on primary data collected from participating companies.
- Zinc [air, unspecified]: 1.67686e-7 kg; lognormal variance with pedigree 0.6526, pedigree (1,3,3,1,1)
  Amount based on primary data collected from participating companies.
- Fluoride [water, surface water]: 1.94325e-8 kg; lognormal variance with pedigree 0.0426, pedigree (1,3,3,1,1)
  Amount based on primary data collected from participating companies.
- Water [air, unspecified]: 0.000178673 m3; name water_to_air_unspecified; = ((water_from_tap/1000+water_from_ground+water_deion/1000+water_from_river+water_cooling_from_unspec+water_from_unspec)-(water_surface_to_environment+(water_to_wwt*-1)))*fraction_PW_to_air; lognormal variance with pedigree 0.0433, pedigree (3,3,5,3,1)
  (same comment as for Water)
- Particulates, > 2.5 um, and < 10um [air, unspecified]: 5.35336e-9 kg; lognormal variance with pedigree 0.1226, pedigree (1,3,3,1,1)
  Amount based on primary data collected from participating companies.
- Benzene [air, unspecified]: 4.05081e-11 kg; lognormal variance with pedigree 0.0426, pedigree (1,3,3,1,1)
  Amount based on primary data collected from participating companies.
- Lead [water, ocean]: 2.12186e-10 kg; lognormal variance with pedigree 0.6526, pedigree (1,3,3,1,1)
  Amount based on primary data collected from participating companies.
- Thallium [water, ocean]: 9.5486e-11 kg; lognormal variance with pedigree 0.6526, pedigree (1,3,3,1,1)
  Amount based on primary data collected from participating companies.
- Nitrogen [water, ocean]: 4.02913e-8 kg; lognormal variance with pedigree 0.0426, pedigree (1,3,3,1,1)
  Amount based on primary data collected from participating companies.
- Cobalt [air, unspecified]: 7.46639e-12 kg; lognormal variance with pedigree 0.6526, pedigree (1,3,3,1,1)
  Amount based on primary data collected from participating companies.
- COD, Chemical Oxygen Demand [water, ocean]: 3.54913e-8 kg; lognormal variance with pedigree 0.0426, pedigree (1,3,3,1,1)
  Amount based on primary data collected from participating companies.
- Antimony [air, unspecified]: 2.36318e-10 kg; lognormal variance with pedigree 0.6526, pedigree (1,3,3,1,1)
  Amount based on primary data collected from participating companies.
- Nickel [air, unspecified]: 3.05322e-11 kg; lognormal variance with pedigree 0.6526, pedigree (1,3,3,1,1)
  Amount based on primary data collected from participating companies.
- Water [water, surface water]: 1.07448e-6 m3; name water_surface_to_environment; lognormal variance with pedigree 0.0426, pedigree (1,3,3,1,1)
  Amount based on primary data collected from participating companies.
- Calcium, ion [water, surface water]: 1.83146e-7 kg; lognormal variance with pedigree 0.0426, pedigree (1,3,3,1,1)
  Amount based on primary data collected from participating companies.
- Carbon dioxide, non-fossil [air, unspecified]: 6.84959e-8 kg; lognormal variance with pedigree 0.0032, pedigree (1,3,3,1,1)
  Amount based on primary data collected from participating companies.
- Manganese [air, unspecified]: 1.23712e-10 kg; lognormal variance with pedigree 0.6526, pedigree (1,3,3,1,1)
  Amount based on primary data collected from participating companies.
- Sulfuric acid [air, unspecified]: 1.03098e-7 kg; lognormal variance with pedigree 0.0426, pedigree (1,3,3,1,1)
  Amount based on primary data collected from participating companies.
- Mercury [air, unspecified]: 1.26076e-10 kg; lognormal variance with pedigree 0.6526, pedigree (1,3,3,1,1)
  Amount based on primary data collected from participating companies.
- Antimony [water, surface water]: 2.82095e-9 kg; lognormal variance with pedigree 0.6526, pedigree (1,3,3,1,1)
  Amount based on primary data collected from participating companies.

## Sampling procedure
The 18 participating smelters provided primary data directly to the study practitioner. All primary data were collected using customized data collection templates, which were sent out by e-mail to the respective data providers in the participating companies. Upon receipt, each questionnaire was cross-checked for completeness and plausibility using mass balance, stoichiometry, and benchmarking. Issues related to data gaps, outliers, or other inconsistencies were resolved through individual engagement with the participating companies. Percent representativeness is calculated in reference to global annual production.

## Review by Louis Brimacombe 2019-02-15
Data set appears to be comprehensive covering a wide range of exchanges. The actual data is dated 2012 and pre 2012 which may not make this data valid for EU EPDs although a comment is made that no significant technical or geographical/production changes would affect the validity of the data since then. The data is sourced from two alternative process routes, the major one being electrically intensive which means that the geographical mix of production and the country based electricity inputs should be checked periodically to check that these are relevant, up to date, and reflect current global Zn production.
