# high voltage system production, for Li-ion battery

Dataset: EcoSpold 2, unit process
Geography: GLO
Time period: 2014-01-01 to 2021-12-31
Technology level: current
Classification: ISIC rev.4 ecoinvent: 2720:Manufacture of batteries and accumulators
Synonyms: HV system; HVS
Scenario: Business-as-Usual
System model: Allocation, cut-off by classification
Generated by: Eleonora Crenna
Published in: Ellingsen, L.A.W. 2014
Database: ecoinvent
isCopyrightProtected: true
accessRestrictedTo: 1

## General comment
This dataset represents the production of 1 kg high voltage system (HVS), which is part of the Battery Management System (BMS) of a Li-ion battery. The high voltage system is modeled according to the publication of Ellingsen et al. (2014). It is assumed that the high voltage system is manufactured at an electronic component production plant.
Reference:
Ellingsen, L. A. W., Majeau-Bettez, G., Singh, B., Srivastava, A. K., Valøen, L. O., & Strømman, A. H. (2014). Life cycle assessment of a lithium-ion battery vehicle pack. Journal of Industrial Ecology, 18(1), 113-124.

## Included activities start
The activity starts with the electronic and other material entering the factory.

## Included activities end
The activity ends with the production of high voltage system at the factory gate.

## Geography
Original data were provided by the battery producer Miljøbil Grenland, located in Norway, for a Li-ion battery for use in electric vehicles. (Ellingsen et al. 2014, Life cycle assessment of a lithium‐ion battery vehicle pack. Journal of Industrial Ecology, 18(1), 113-124). Geography uncertainty has been adjusted accordingly.

## Technology
The high voltage system contains cables, nylon clips, intermodule fuse, neoprene gaskets, both plastic- and aluminum connectors, and an aluminum lid.

## Time period
The time period is from 2014 (year of the publication of data) and 2020 (year of the dataset)

## Reference product
- high voltage system, for Li-ion battery: 1 kg; By-product classification allocatable product; CPC 46430: Parts of primary cells, primary batteries and electric accumulators (including separators)
  production volume 1.43942e6 kg; = 191922359*0.0075
    The PV is expressed in kg. According to UN Comtrade (https://comtrade.un.org/data/, HS code: 850760) 191922359 kg Li-ion batteries were exported from China in 2019. The high voltage system within the battery management system represents on average 0.75% weight of a Li-ion battery.
  property price 12.9359 EUR2005
    Calculated based on inputs: The price of the product has been calculated as a sum of the values of the material and energy inputs for this product. This value is therefore a rough estimation. It may underestimate the real price since there are additional expenses when producing any product. These expences can include for example labour costs, treatment of waste materials and profit for the producer. Please consider carefully whether this level of data quality is acceptable for your application.
  property carbon content 0.380032
    carbon content on a dry matter basis (reserved; not for manual entry)
  properties: water content 0, dry mass 1 kg, carbon content, fossil 0.380032, wet mass 1 kg, water in wet mass 0 kg, copper content 0.27, carbon content, non-fossil 0, carbon allocation 0.380032 kg

## Inputs from technosphere
All rows: source Ellingsen, L.A.W. 2014
- aluminium, wrought alloy: 0.12 kg; lognormal variance with pedigree 0.0192, pedigree (2,5,4,5,1)
  Literature.
  properties: dry mass 1 kg, wet mass 1 kg
- metal working, average for metal product manufacturing: 0.016 kg; lognormal variance with pedigree 0.0192, pedigree (2,5,4,5,1)
  Literature. Proxy for the production of tin products in intermodule fuse
- injection moulding: 0.1366 kg; lognormal variance with pedigree 0.0192, pedigree (2,5,4,5,1)
  Literature. Proxy for the production of plastic products
- synthetic rubber: 0.0036 kg; lognormal variance with pedigree 0.0192, pedigree (2,5,4,5,1)
  Literature. Proxy for neoprene gasket.
  properties: carbon content, fossil 0.871949, heating value, net 26.42 MJ, dry mass 1 kg, wet mass 1 kg
  note on carbon content, fossil: EPDM (Ethylene-propene-diene terpolymer) rubber is a terpolymer of ethylene, propene, and a diene with the residual unsaturated portion of the diene in the side chain (ecoinvent v2.2 report 7-part XX & Ullmann). Chemical formula (deduced from Evidences of Solvent-Induced Miscibility in Polychloroprene-co-Ethylene-Propene Diene Terpolymer Blends, Dubey et al., Journal of Applied Polymer Science, 2009, 111:1884–1891): C20H35
- tin: 0.016 kg; lognormal variance with pedigree 0.0192, pedigree (2,5,4,5,1)
  Literature. Part of intermodule fuse
  properties: dry mass 1 kg, wet mass 1 kg
- steel, low-alloyed: 0.0014 kg; lognormal variance with pedigree 0.0192, pedigree (2,5,4,5,1)
  Literature. Steel components in the HV system.
  properties: carbon content, fossil 0.005, dry mass 1 kg, wet mass 1 kg
- cable, ribbon cable, 20-pin, with plugs: 0.45 kg; lognormal variance with pedigree 0.0192, pedigree (2,5,4,5,1)
  Literature.
  properties: carbon content, fossil 0.648653, dry mass 1 kg, wet mass 1 kg
- polyethylene terephthalate, granulate, amorphous: 0.057 kg; lognormal variance with pedigree 0.0192, pedigree (2,5,4,5,1)
  Literature. Plastic components in the HV system.
  properties: dry mass 1 kg, carbon content, fossil 0.625, wet mass 1 kg, heating value, net 22.95 MJ
- metal working, average for aluminium product manufacturing: 0.12 kg; lognormal variance with pedigree 0.0192, pedigree (2,5,4,5,1)
  Literature. Proxy for the production of aluminium products
- metal working, average for steel product manufacturing: 0.0014 kg; lognormal variance with pedigree 0.0192, pedigree (2,5,4,5,1)
  Literature. Proxy for the production of steel components.
- electronic component factory: 2e-8 unit; lognormal variance with pedigree 0.366, pedigree (4,5,4,5,4)
  Literature.
- copper, cathode: 0.27 kg; lognormal variance with pedigree 0.0192, pedigree (2,5,4,5,1)
  Literature. Part of intermodule fuse
  properties: dry mass 1 kg, copper content 1, wet mass 1 kg
- metal working, average for copper product manufacturing: 0.27 kg; lognormal variance with pedigree 0.0192, pedigree (2,5,4,5,1)
  Literature. Proxy for the production of copper products
- nylon 6-6: 0 kg; pedigree (1,1,1,1,1)
  Literature. Proxy for clips and fasteners
  properties: heating value, net 30.9 MJ, dry mass 1 kg, wet mass 1 kg, carbon content, fossil 0.637168
  note on heating value, net: Assumed equal to Nylon-66. Reference: Walters, R. N., Hackett, S. M. and Lyon, R. E. (2000) ‘Heats of combustion of high temperature polymers’, Fire and Materials, 24(5), pp. 245–252. doi: 10.1002/1099-1018(200009/10)24:5<245::AID-FAM744>3.0.CO;2-7.
- polyphenylene sulfide: 0.032 kg; lognormal variance with pedigree 0.0192, pedigree (2,5,4,5,1)
  Literature. Part of intermodule fuse
  properties: heating value, net 24.67 MJ, wet mass 1 kg, carbon content, fossil 0.666667, dry mass 1 kg
- nylon 6-6: 0.0145461, 0.0294539 kg (2 entries); lognormal variance with pedigree 0.0192, pedigree (2,5,4,5,1)
  Literature. Proxy for clips and fasteners

## Sampling procedure
From Literature.

## Extrapolations
This dataset has been extrapolated from year 2020 to the year of the calculation (2021). The uncertainty has been adjusted accordingly.
