# land already in use, annual cropland to perennial crop

Dataset: EcoSpold 2, unit process
Geography: ID
Time period: 2010-01-01 to 2021-12-31
Technology level: current
Classification: ISIC rev.4 ecoinvent: 0161:Support activities for crop production
Tags: WFLDB
Scenario: Business-as-Usual
System model: Allocation, cut-off by classification
Generated by: Vincent Rossi
Database: ecoinvent
isCopyrightProtected: true
accessRestrictedTo: 1

## General comment
This dataset represents the interventions associated with the provision of 1 kg NPP (Net Primary Productivity of a given land, in kg C / m2 and year) by land that is already in use as arable land. NPP and VEG (above-ground biomass, below-ground biomass and dead organic matter) values are parameterized.
NPP values are reported by Haberl et al. (2007)
VEG values have the following sources:
- Forests: Global Forest Resources Assessment 2010: http://www.fao.org/forestry/fra/fra2010/en/
- Grassland: IPCC 2006 Guidelines, Volume 6, Table 6.4. All values in tonne C/ha, converted to carbon based on 47% carbon content of dry matter biomass (see for example section 6.2.1.4 of IPCC 2006).
- Crops: Cveg croplands, based on Table 11 of the European Commission decision.* All values in tonne C/ha.
* C(2010) 3751: COMMISSION DECISION of 10 June 2010 on guidelines for the calculation of land carbon stocks for the purpose of Annex V to Directive 2009/28/EC, Official Journal of the European Union, L 151/19. Exceptions based on the Table 12 of the EC decision: Coconuts, Jatropha, Jojoba Seeds, Oil palm fruit, Sugar cane
Distinction is made between primary and secondary forests. The respective land area of each type forest is known from FAOSTAT data. Based on empirical values, it is considered that the secondary VEG is 74% of the primary VEG. The same ratio is applied as the weighted average between primary and secondary forest is always equal to the GFRA 2010 value.

## Included activities start
Starts with the land already in use.

## Included activities end
The dataset includes all interventions associated with the provision of 1 kg NPP0 from land already in use.
This activity ends with the provision of arable land tenure, measured in unit kg carbon Potential Net Primary Production (NPP).

## Parameters
- LUC_crop_specific: 1 dimensionless
  This parameter allows to switch between a 'crop specific' and a 'country specific' approach when calculating the LUC of a crop. By default, the chosen approach is 'crop specific', so the value of the parameter is 1. If you want to apply a 'country specific' approach, turn the parameter to 0.
- NPP0, net primary productivity: 1.022 dimensionless; name NPP; lognormal variance with pedigree 0.022825, pedigree (2,5,2,2,3)
- Above and below ground biomass: -3.17 dimensionless; name VEG; normal variance with pedigree 0.017425, pedigree (2,5,2,2,3)

## Reference product
- land tenure, arable land, measured as carbon net primary productivity, perennial crop: 1 kg; CPC 7: Financial and related services; real estate services; and rental and leasing services; By-product classification allocatable product
  Yield = 1.0 kg/haLand that is made available for the cultivation of perennial crops, expressed in kg carbon net pripary productivity
  production volume 2.20457e6 kg
    This production volume has been estimated by decoupling the different land tenures contributing to the perennial land use change, per country, and multiplying by the national perennial land use change production volume. Land use change production volume is estimated based in FAO statistic and following the concept of Total Biomass Appropriation (TBA), developped by Krausmann et al., 2008. The ha of land devoted to perennial crops per country is multiplied by the share of TBA of the country, in order to weight the relative land use change of the country, in a Global context. The shares of TBA are calculated in relation to the total sum of TBA of the World.
    Additional source:
    Nemecek T., Bengoa X., Lansche J., Mouron P., Riedener E., Rossi V. & Humbert S. (2015) Methodological Guidelines for the Life Cycle Inventory of Agricultural Products. Version 3.0, July 2015. World Food LCA Database (WFLDB). Quantis and Agroscope, Lausanne and Zurich, Switzerland.
  property carbon content, non-fossil 1
    The flow is expressed in kg carbon Potential Net Primary Production (NPP0)
  property carbon content 1
    carbon content on a dry matter basis (reserved; not for manual entry)
  properties: water in wet mass 0 kg, dry mass 1 kg, water content 0, price 0 EUR2005, wet mass 1 kg, carbon allocation 1 kg

## Inputs from nature
- Transformation, to permanent crop [natural resource, land]: 0.978474 m2; = 1/NPP
  Calculated value: m2 required per unit land tenure, permanent crop.
- Transformation, from arable land, unspecified use [natural resource, land]: 0.978474 m2; = 1/NPP
  Calculated value: m2 required per unit land tenure, arable land.

## Emissions to nature
- Carbon dioxide, to soil or biomass stock [soil, unspecified]: 11.3731 kg; = -(VEG/NPP*44/12)
  Calculated value: differential between above and below ground biomass of reference vegetation and resulting permanent crop

## Sampling procedure
Literature value: Taken from Haberl (2010). Refers to the amount of NPP0 measured in kg carbon extracted from existing arable land.
This dataset has been extrapolated from year 2009 to the year of the calculation (2013). The uncertainty has been adjusted accordingly.
For further information see WFLDB Methodological Guidelines for the Life Cycle Inventory of Agricultural Products version 3.0, available at: (Report section: https://v30.ecoquery.ecoinvent.org/File/Reports).

## Extrapolations
This dataset has been extrapolated from year 2015 to the year of the calculation (2021). The uncertainty has been adjusted accordingly.
