# electricity production, nuclear, pressure water reactor

Dataset: EcoSpold 2, unit process
Geography: US-NPCC
Time period: 1990-01-01 to 2021-12-31
Technology level: modern
Classification: ISIC rev.4 ecoinvent: 3510:Electric power generation, transmission and distribution
Synonyms: PWR
Tags: United States; nuclear power
Scenario: Business-as-Usual
System model: Allocation, cut-off by classification
Generated by: Karin Treyer
Published in: Dones, R. 2007
Database: ecoinvent
isCopyrightProtected: true
accessRestrictedTo: 1

## General comment
This dataset represents the production of high voltage electricity at a grid-connected nuclear pressure water reactor (PWR) in the Northeast Power Coordinating Council (NPCC) in 2012.
It is a copy of the dataset "electricity production, nuclear, pressure water reactor, CH, 1995-2002", i.e. of a dataset with data for a Swiss nuclear PWR. The basic source for all exchanges is therefore the ecoinvent report "Kernenergie" (see Modelling and Administrative).
The average burnup 53 MWd/kg heavy metal of finally discharged fuel elements from the 2000/2002 fuel cycles has been assumed representative for the lifetime of the modeled plant (the burnup has increased from the initial about 33 MWd/kg heavy metal and may increase to 55 MWd/kg heavy metal in the future). The average burnup corresponds to an average enrichment of 4.2% U235 for fresh uranium fuel elements. Over the lifetime of the plant it can be assumed that 8% of the energy will be produced by MOX fuel elements. Of total fuel elements 92% are assumed to be from fresh U (thus burdened by the full upstream chain), and 8% MOX (burdened by reprocessing). For the calculation of the total net electricity delivered in 40 years lifetime, the sum of the actual production till 2002 and the prospective (8000 GWh/a) till end of life using is considered; this gives 3.11E11 kWh; the inverse gives the utilisation factor for the infrastructure. Partial information on material requirements during operation for 1991/1992 are available, which are integrated with relevant information for the modeled boiling water reactor. The diesel requirements for the yearly test of diesel emergency generators are accounted for. Radioactive emission species to air and water are weighted averages of the emissions of the nuclear power plants Gösgen and Beznau I+II from 1995 to 2002. Alpha aerosols emission to air have been described with "aerosols, unspecified". Considered radioactive waste streams are: spent fuel to reprocessing (40%) and conditioning (60%); operational low active waste for conditioning in the intermediate repository; and, contaminated waste from dismantling.
[This dataset is meant to replace the following datasets:]

## Included activities start
From the constructed power plant ready to produce electricity and from the fuel ready in the power plant.

## Included activities end
This activity ends with 1kWh of high voltage electricity produced at the power plant and arrived at the busbar.

The module includes fuel elements, chemicals, and diesel requirements as well as the relevant transport requirements. Water use for cooling is included, but no cooling tower infrastructure. Considered radioactive waste streams are: spent fuel to conditioning (no reprocessing); operational low active waste for conditioning in the intermediate repository; and, contaminated waste from dismantling. Non-radioactive wastes are accounted for.

## Geography
Swiss data of one specific plant for requirements and all Swiss PWRs for emissions.

## Technology
Best current technology for fuel element. Standard technology for commercial operation.

## Time period
The Annual Production Volume is valid for the year 2012

## Parameters
All rows: lognormal variance with pedigree 0.092025, pedigree (4,4,3,2,4)
- once-through and cooling pond cooling systems as a fraction of all cooling syste: 0.52 dimensionless; name once_through_andCP_CS_fractio_from_allCS
  Calculated as an average of data available for Europe (Floerke, 2008, Future changes of freshwater needs in the electricity production sector) and USA (NERL, 2011, Estimating freshwater needs to meet future thermoelectric generation requirements).
  nan
- fraction, cooling water, to air: 0.0500632 dimensionless; name fraction_CW_to_air; = (WConsumption_EP_nuclear_recirculatingCS*recirculating_CS_fraction_from_allCS+WConsumption_EP_nuclear_onceT_andCP_CS*once_through_andCP_CS_fractio_from_allCS)/(WWithdrawal_EP_nuclear_recirculating_CS*recirculating_CS_fraction_from_allCS+WWithdrawal_EP_nuclear_onceT_andCP_CS*once_through_andCP_CS_fractio_from_allCS)
  Calculated value based on literature value (Scown, 2011 & Floerke, 2009, Future changes of freshwater needs in the electricity production sector & Stiegel, 2008, Estimating Freshwater Needs to Meet Future Thermoelectric Generation Requirements) (Vionnet, S., Quantis Water Database - Technical Report, 2012).
- water consumption, electricity production, nuclear, recirculating CS: 0.0024 m3/kWh; name WConsumption_EP_nuclear_recirculatingCS
  Estimated based on literature (Scown, 2011, Water Footprint of U.S. Transportation Fuels, SI).
  nan
- fraction, water, decarbonised, to air: 0.0500632 dimensionless; name fraction_WDC_to_air; = fraction_CW_to_air
  Calculated value. See comments in the other parametres present in this dataset. Decarbonised water is considered to be always used as cooling water, thus cooling water fractions to air are applied to all carbonised water input flows to calculate the amount of water consumed in the processes.
  nan
- water withdrawal, electricity production, nuclear, recirculating CS: 0.0042 m3/kWh; name WWithdrawal_EP_nuclear_recirculating_CS
  (same comment as for water consumption, electricity production, nuclear, recirculating CS)
- recirculating cooling system as a fraction of all cooling systems: 0.48 dimensionless; name recirculating_CS_fraction_from_allCS
  (same comment as for once-through and cooling pond cooling systems as a fraction of all coo)
- water consumption, electricity production, nuclear, once-T and coolingP CS: 0.00296 m3/kWh; name WConsumption_EP_nuclear_onceT_andCP_CS
  (same comment as for water consumption, electricity production, nuclear, recirculating CS)
- water withdrawal, electricity production, nuclear, once-T and coolingP CS: 0.0995 m3/kWh; name WWithdrawal_EP_nuclear_onceT_andCP_CS
  (same comment as for water consumption, electricity production, nuclear, recirculating CS)

## Reference product
- electricity, high voltage: 1 kWh; By-product classification allocatable product; CPC 17100: Electrical energy
  production volume 5.09143e10 kWh; name apv_electricity
    Literature value. Data from the US Energy Information Administration for 2012, which provides data on net electricity production in each US State with various energy sources. Data from the States were aggregated on the level of US NERC regions. Data were given for the electricity production with total nuclear. This total production was split to production in boiling water reactor and pressure water reactor plants according to data from International Atomic Energy Agency (PRIS database) with values valid for total US (not specific for this NERC region).
    EIA. 2013. Statistics on electricity - Electricity data browser. Generation and thermal output. Net generation for electric power, annual. U.S. Energy Information Administration; Independent Statistics&Analysis.
    IAEA. 2014. PRIS (Power Reactor Information System) - The database on nuclear power reactors. Country statistics. Online database. International Atomic Energy Agency.
  property price 0.0977 EUR2005
    Temporary price data. Calculated as 90% of purchasers price based on: 94% of the average price (to account for a 6% loss in transformation and transmission) for electricity for industrial consumersin 2005 (excluded taxes). From IEA.

## Inputs from technosphere
- cast iron: 1.29e-7 kg; lognormal variance with pedigree 0.0439, pedigree (2,2,5,5,2)
  Operator information. Extrapolation from a boiling water reactor.
  properties: carbon content, fossil 0.04, wet mass 1 kg, dry mass 1 kg
  note on carbon content, fossil: Cast iron is made by remelting pig iron in small furnaces (e.g. cupola furnaces or electric arc furnaces) and poured into moulds to make castings. It usually contains 2% to 6% carbon (ecoinvent v2.2 report 10_partII). An average content of 4% was considered
- water, decarbonised: 2.83743 kg; name water_decarbonised_input; = 700/(7.78E9/(365*24*60*60)); lognormal variance with pedigree 0.0483, pedigree (2,2,5,5,2)
  Estimated average net electricity production per year: 7.78E9 kWh/y (Tab. 9.3, p. 166)
  Water use in BWR see Tab. 9.17 p.196 in Dones et al. - decarbonised water use (700 kg/s)
  own estimation.
  It is estimated that all decarbonised water in the mentioned table is evaporated.
  In contrast to the literature reference and the datasets in ecoinvent version 2, this dataset only takes into account real water use, i.e. the water which is evaporated during the cooling process.
  properties: wet mass 1 kg
- pitch: 7.71e-7 kg; lognormal variance with pedigree 0.0439, pedigree (2,2,5,5,2)
  Operator information.
  properties: heating value, net 28 MJ, wet mass 1 kg, carbon content, fossil 0.83, dry mass 1 kg
- paper, woodfree, coated: 6.43e-7 kg; lognormal variance with pedigree 0.0439, pedigree (2,2,5,5,2)
  Operator information. Paper use in office. No other office materials have been considered. Extrapolation from a boiling water reactor.
  properties: carbon content, non-fossil 0.22775, carbon content, fossil 0.0590617, heating value, net 14.11 MJ, wet mass 1 kg, dry mass 0.945 kg, water content 0.0582011
  note on carbon content, non-fossil: Biogenic C content was calculated after biogenic C contents of chemicals used in the production of the paper (in Tab 8.72 & 8.73 ecoinvent v2.2 report 11_III, part 8). The cellulose content in 1 kg of paper (on a wet mas basis) was estimated as (1-chemical content), C content of cellulose was considered 0.44 kgC/kg dry mass (ecoinvent v2.2 report, n 15a, pg 40)
  note on carbon content, fossil: Fossil C content was calculated after fossil C contents of chemicals used in the production of the paper (in Tab 8.72 & 8.73 ecoinvent v2.2 report 11_III, part 8).
- diesel, burned in diesel-electric generating set, 10MW: 0.00037 MJ; lognormal variance with pedigree 0.0439, pedigree (2,2,5,5,2)
  Estimation. Diesel use for testing of the emergency power in the power plant. Extrapolation from a Swiss boiling water reactor.
  properties: heating value, net 1 MJ
- oxygen, liquid: 1.67e-5 kg; lognormal variance with pedigree 0.0439, pedigree (2,2,5,5,2)
  Estimation. Gas use in the power plant. Extrapolation from a Swiss boiling water reactor.
  properties: dry mass 1 kg, wet mass 1 kg
- fly ash and scrubber sludge: -2.19e-6 kg; name fly_ash; lognormal variance with pedigree 0.0439, pedigree (2,2,5,5,2)
  Literature data. extrapolation from another plant type
  production volume 111502 kg; = fly_ash * apv_electricity
    Calculated from the production volume of electricity, high voltage in proportion to the respective output amounts.
  property price 0 EUR2005; name fly_ash_price_EUR2005
  properties: carbon content, fossil 0.167, dry mass 0.1 kg, water content 9, wet mass 1 kg
  note on carbon content, fossil: Tab A.6, ecoinvent v2.2 report 13_I. C content has been calculated after data in the tables, and then referred to 1 kg DM
- low level radioactive waste for final repository: -2.84e-8 m3; name low_level_waste_final; lognormal variance with pedigree 0.0439, pedigree (2,2,5,5,2)
  Literature data
  production volume 1445.96 m3; = low_level_waste_final * apv_electricity
    (same comment as for fly ash and scrubber sludge)
  property price 0 EUR2005; name low_level_waste_final_price_EUR2005
  properties: wet mass 2500 kg, dry mass 2500 kg
- low level radioactive waste: -1.8032e-9 m3; name low_level_waste; lognormal variance with pedigree 0.0439, pedigree (2,2,5,5,2)
  Literature data
  production volume 91.8086 m3; = low_level_waste * apv_electricity
    (same comment as for fly ash and scrubber sludge)
  property price 0 EUR2005; name low_level_waste_price_EUR2005
  properties: dry mass 2500 kg, wet mass 2500 kg
- hydrogen, liquid: 1.03e-5 kg; lognormal variance with pedigree 0.0439, pedigree (2,2,5,5,2)
  Estimation. Gas use in the power plant. Extrapolation from a Swiss boiling water reactor.
  properties: heating value, net 120.21 MJ, dry mass 1 kg, wet mass 1 kg
- hazardous waste, for incineration: -9.7e-7 kg; name hazwaste; lognormal variance with pedigree 0.0439, pedigree (2,2,5,5,2)
  Literature data. extrapolation from another plant type
  production volume 49386.8 kg; = hazwaste * apv_electricity
    (same comment as for fly ash and scrubber sludge)
  property price 0 EUR2005; name hazwaste_price_EUR2005
  properties: water content 0.333333, dry mass 0.75 kg, wet mass 1 kg, carbon content, fossil 0.554667, heating value, net 17 MJ
  note on heating value, net: Value taken from the general comment of the treatment dataset.
- spent nuclear fuel: -2.464e-6 kg; name spent_nuclear_fuel; lognormal variance with pedigree 0.0439, pedigree (2,2,5,5,2)
  Literature data
  production volume 125453 kg; = spent_nuclear_fuel * apv_electricity
    (same comment as for fly ash and scrubber sludge)
  property price 0 EUR2005; name spent_nuclear_fuel_price_EUR2005
  properties: dry mass 1 kg, wet mass 1 kg
- waste mineral oil: -1.63e-6 kg; name waste_oil; lognormal variance with pedigree 0.0439, pedigree (2,2,5,5,2)
  Literature data. extrapolation from another plant type
  production volume 82990.2 kg; = waste_oil* apv_electricity
    (same comment as for fly ash and scrubber sludge)
  property price 0 EUR2005; name waste_oil_price_EUR2005
  properties: water content 0.111111, wet mass 1 kg, carbon content, fossil 0.864444, dry mass 0.9 kg, heating value, net 34.7 MJ
- sodium hypochlorite, without water, in 15% solution state: 1.73e-5 kg; lognormal variance with pedigree 0.0439, pedigree (2,2,5,5,2)
  Literature value. Used for decarbonising of the water, additionally to the chemical use listed in the activity for production of the "water, decarbonised, at user".
  properties: wet mass 1 kg, dry mass 1 kg
- chemical, inorganic: 2.34e-6 kg; lognormal variance with pedigree 0.0439, pedigree (2,2,5,5,2)
  Operator information. Decontamination chemicals and salt for water softening; hydrazin (N2H4), 15%. Partly extrapolation from a boiling water reactor.
  properties: dry mass 1 kg, wet mass 1 kg, carbon content, fossil 0.003
  note on carbon content, fossil: This dataset is an unweighted average of 20 inorganic substances (listed in Tab 88.1, ecoinvent v2.2 report 8, part II), being part of the top100 chemicals included in this database. The C-content has also been calculated as an unweighted average of the C content of the substances composing this dataset.
- nuclear fuel element, for pressure water reactor, UO2 4.2% & MOX: 2.46e-6 kg; lognormal variance with pedigree 0.0439, pedigree (2,2,5,5,2)
  Literature value
  properties: wet mass 1 kg, dry mass 1 kg
- cement, unspecified: 0 kg
  Exchange present due to parent child relationship but not relevant in this dataset.
  properties: wet mass 1 kg, dry mass 1 kg
- nuclear power plant, pressure water reactor, 1000MW: 3.22e-12 unit; lognormal variance with pedigree 0.0439, pedigree (2,2,5,5,2)
  activityLink introduced to establish a direct link to the corresponding regional supply of this product
- lubricating oil: 1.62e-6 kg; lognormal variance with pedigree 0.0439, pedigree (2,2,5,5,2)
  Operator information. Oil and fats for hydraulic systems and general lubricating use. Extrapolation from a boiling water reactor.
  properties: heating value, net 40.2 MJ, wet mass 1 kg, carbon content, fossil 0.75, dry mass 1 kg
  note on heating value, net: Literature value, Source: IPCC 2006, 2006 IPCC Guidelines for National Greenhouse Gas Inventories, Prepared by the National Greenhouse Gas Inventories Programme, Eggleston H.S., Buendia L., Miwa K., Ngara T. and Tanabe K. (eds). Published: IGES, Japan
  note on carbon content, fossil: Lubricating oil is produced from diesel. C-content/dry mass of fats and oils considered 75%, from: ecoinvent v2.2 report, n 15a, pg 40
- cationic resin: 6.43e-8 kg; lognormal variance with pedigree 0.0439, pedigree (2,2,5,5,2)
  Operator information. All resin types needed are modeled as 50% anionic resin and 50% cationic resin.
  properties: heating value, net 6.68 MJ, dry mass 0.5 kg, carbon content, fossil 0.521606, water content 1, wet mass 1 kg
  note on carbon content, fossil: Chemically inert polystyrene beads are treated with concentrated sulfuric or chlorosulfonic acid to give cross-linked polystyrene 3-sulfonic acid (Cation exchange resins, Ullmann). The resine was approximated as C8H8O3S (from Ullmann, Cation exchange resins). The resine is hydrated (ecoinvent v2.2 report 8, part II, Tab 93.5)
- reinforcing steel: 4.7e-7 kg; lognormal variance with pedigree 0.0439, pedigree (2,2,5,5,2)
  Operator information
  properties: dry mass 1 kg, wet mass 1 kg, carbon content, fossil 0.004
- cement, Portland: 9.19e-7 kg; lognormal variance with pedigree 0.0439, pedigree (2,2,5,5,2)
  Operator information. Cement use for conditioning of the hard waste. Extrapolation from a boiling water reactor.
  properties: dry mass 1 kg, wet mass 1 kg
- boric acid, anhydrous, powder: 6.43e-8 kg; lognormal variance with pedigree 0.0439, pedigree (2,2,5,5,2)
  Operator information.
  properties: dry mass 1 kg, wet mass 1 kg
- nitrogen, liquid: 6.17e-5 kg; lognormal variance with pedigree 0.0439, pedigree (2,2,5,5,2)
  Estimation. Gas use in the power plant. Extrapolation from a Swiss boiling water reactor. Nitrogen use and use of forming gas (5-10% H2, 90-95% N2) are summed up in this exchange.
  properties: wet mass 1 kg, dry mass 1 kg
- chemical, organic: 1.38e-6 kg; lognormal variance with pedigree 0.0439, pedigree (2,2,5,5,2)
  Operator information. This category contains solvents, frost protection, anticorrosives, industrial alcohol, washing agents.Extrapolation from a boiling water reactor.
  properties: wet mass 1 kg, dry mass 1 kg, carbon content, fossil 0.628, heating value, net 19.03 MJ
  note on carbon content, fossil: This dataset is an unweighted average of 20 organic substances (listed in Tab 88.1, ecoinvent v2.2 report 8, part II), being part of the top100 chemicals included in this database. The C-content has also been calculated as an unweighted average of the C content of the substances composing this dataset.
- flat glass, coated: 4.37e-6 kg; lognormal variance with pedigree 0.0439, pedigree (2,2,5,5,2)
  Operator information. Materials for sand blasting equipment. Extrapolation from a boiling water reactor.
  properties: dry mass 1 kg, wet mass 1 kg
- steel, low-alloyed, hot rolled: 1.6e-6 kg; lognormal variance with pedigree 0.0439, pedigree (2,2,5,5,2)
  Literature value
  properties: dry mass 1 kg, carbon content, fossil 0.005, wet mass 1 kg
  note on carbon content, fossil: Low alloyed steel composition given in Tab. 3.2 ecoinvent v2.2 report 10_partII. Steel assumed to have a C content of 0.5%
- anionic resin: 6.43e-8 kg; lognormal variance with pedigree 0.0439, pedigree (2,2,5,5,2)
  (same comment as for cationic resin)
  properties: wet mass 1 kg, carbon content, fossil 0.680721, heating value, net 9.09 MJ, dry mass 0.5 kg, water content 1
  note on carbon content, fossil: Cross-linked polystyrene beads are treated with chloromethyl methyl ether under anhydrous conditions, with either aluminum chloride or tin(IV) chloride as catalyst. Chloromethylated polystyrene is obtained. In a second stage, the chlorine in the chloromethylated group can be replaced by an amine (Anion exchange resins, in Ullmann). In this case, Trimethylamine, C3H9N, is used (ecoinvent v2.2 report 8-part 93). That is, the resine can be formulated as C12H18NCl (after Ullmann, Anion exchange resins). The resine is hydrated (ecoinvent v2.2 report 8, part II, Tab 93.7)
- argon, liquid: 2.61e-5 kg; lognormal variance with pedigree 0.0439, pedigree (2,2,5,5,2)
  Estimation. Gas use in the power plant. Extrapolation from a Swiss boiling water reactor. Argon and helium are summed up in this exchange
  properties: dry mass 1 kg, wet mass 1 kg
- acetylene: 3.6e-8 kg; lognormal variance with pedigree 0.0483, pedigree (2,2,5,5,2)
  Operator information
  properties: heating value, net 51.2 MJ, dry mass 1 kg, wet mass 1 kg, carbon content, fossil 0.923077
  note on heating value, net: Based on literature, page 25 (Value may refer to HHV), Althaus H.-J., Chudacoff M., Hischier R., Jungbluth N., Osses M. and Primas A. (2007) Life Cycle Inventories of Chemicals. Final report ecoinvent data v2.0 No. 8. EMPA, Swiss Centre for Life Cycle Inventories, Dübendorf, CH, Online-Version under: www.ecoinvent.org.
  note on carbon content, fossil: C2H2. ecoinvent v2.2 report n 8. Produced from partial oxidation of natural gas
- carbon dioxide, liquid: 1.67e-7 kg; lognormal variance with pedigree 0.0439, pedigree (2,2,5,5,2)
  Estimation. Gas use in the power plant. Extrapolation from a Swiss boiling water reactor.
  properties: dry mass 1 kg, carbon content, fossil 0.272727, wet mass 1 kg, heating value, net 8.27 MJ
- concrete, normal: 9.74e-9 m3; lognormal variance with pedigree 0.0439, pedigree (2,2,5,5,2)
  Literature value
  properties: water content 0.086758, wet mass 2380 kg, dry mass 2190 kg

## Inputs from nature
- Water, cooling, unspecified natural origin [natural resource, in water]: 0.053756 m3; name water_cooling_UNO_input; = ((recirculating_CS_fraction_from_allCS*WWithdrawal_EP_nuclear_recirculating_CS)+(once_through_andCP_CS_fractio_from_allCS*WWithdrawal_EP_nuclear_onceT_andCP_CS)); lognormal variance with pedigree 0.012, pedigree (1,1,3,1,1)
  Calculated based on literature data.
  property carbon content, non-fossil 0; name C_content_non_fossil
  property carbon content, fossil 0.0104329; name C_content_fossil
  property dry mass 0.1101 kg; name DM
  property wet mass 1000 kg; name WM
  property water in wet mass 999.89 kg; name WWM
  property water content 9081.65; name water_content

## Emissions to nature
- Ruthenium-103 [water, surface water]: 2.85e-7 kBq; lognormal variance with pedigree 0.0439, pedigree (2,2,5,5,2)
  Operator data. Weighted radioactive emissions into water of Swiss nuclear power plants 1995-2002 (Weighting with net electricity production).
- Radioactive species, other beta emitters [air, non-urban air or from high stacks]: 8.67e-8 kBq; lognormal variance with pedigree 0.0439, pedigree (2,2,5,5,2)
  Operator data. Weighted radioactive emissions into air of Swiss nuclear power plants 1995-2002 (Weighting with net electricity production).
- Cobalt-60 [air, non-urban air or from high stacks]: 7.57e-8 kBq; lognormal variance with pedigree 0.0439, pedigree (2,2,5,5,2)
  (same comment as for Radioactive species, other beta emitters)
- Iodine-131 [air, non-urban air or from high stacks]: 3.38e-6 kBq; lognormal variance with pedigree 0.0439, pedigree (2,2,5,5,2)
  (same comment as for Radioactive species, other beta emitters)
- Iodine-131 [water, surface water]: 8.21e-6 kBq; lognormal variance with pedigree 0.0439, pedigree (2,2,5,5,2)
  (same comment as for Ruthenium-103)
- Xenon-135 [air, non-urban air or from high stacks]: 0.166 kBq; lognormal variance with pedigree 0.0439, pedigree (2,2,5,5,2)
  (same comment as for Radioactive species, other beta emitters)
- Zirconium-95 [air, non-urban air or from high stacks]: 5.78e-8 kBq; lognormal variance with pedigree 0.0439, pedigree (2,2,5,5,2)
  (same comment as for Radioactive species, other beta emitters)
- Aerosols, radioactive, unspecified [air, non-urban air or from high stacks]: 5.37e-9 kBq; lognormal variance with pedigree 0.0439, pedigree (2,2,5,5,2)
  (same comment as for Radioactive species, other beta emitters)
- Water [water, unspecified]: 0.0537602 m3; name water_to_water_unspecified; = (water_decarbonised_input/1000)*(1-fraction_WDC_to_air)+water_cooling_UNO_input*(1-fraction_CW_to_air); lognormal variance with pedigree 0.130025, pedigree (4,4,5,2,4)
  Calculated value based on literature values and expert opinion. See comments in the parametres" comment field.
  property fraction, origin: fresh water 0.050137; name fraction_origin_fresh_water_Ww
  property fraction, origin: unspecified 0.949863; name fraction_origin_unspecified_Ww
  property fraction, origin: salt water 0; name fraction_origin_salt_water_Ww
- Molybdenum-99 [water, surface water]: 6e-9 kBq; lognormal variance with pedigree 0.0439, pedigree (2,2,5,5,2)
  (same comment as for Ruthenium-103)
- Strontium-89 [water, surface water]: 3.65e-6 kBq; lognormal variance with pedigree 0.0439, pedigree (2,2,5,5,2)
  (same comment as for Ruthenium-103)
- Krypton-85m [air, non-urban air or from high stacks]: 0.00987 kBq; lognormal variance with pedigree 0.0439, pedigree (2,2,5,5,2)
  (same comment as for Radioactive species, other beta emitters)
- Cesium-137 [air, non-urban air or from high stacks]: 7.28e-9 kBq; lognormal variance with pedigree 0.0439, pedigree (2,2,5,5,2)
  (same comment as for Radioactive species, other beta emitters)
- Cobalt-60 [water, surface water]: 0.000395 kBq; lognormal variance with pedigree 0.0439, pedigree (2,2,5,5,2)
  (same comment as for Ruthenium-103)
- Technetium-99m [water, surface water]: 2.81e-6 kBq; lognormal variance with pedigree 0.0439, pedigree (2,2,5,5,2)
  (same comment as for Ruthenium-103)
- Chromium-51 [water, surface water]: 7.56e-6 kBq; lognormal variance with pedigree 0.0439, pedigree (2,2,5,5,2)
  (same comment as for Ruthenium-103)
- Carbon-14 [air, non-urban air or from high stacks]: 0.00764 kBq; lognormal variance with pedigree 0.0439, pedigree (2,2,5,5,2)
  (same comment as for Radioactive species, other beta emitters)
- Iodine-133 [water, surface water]: 4.16e-7 kBq; lognormal variance with pedigree 0.0439, pedigree (2,2,5,5,2)
  (same comment as for Ruthenium-103)
- Antimony-125 [water, surface water]: 4.17e-5 kBq; lognormal variance with pedigree 0.0439, pedigree (2,2,5,5,2)
  (same comment as for Ruthenium-103)
- Niobium-95 [air, non-urban air or from high stacks]: 1.12e-10 kBq; lognormal variance with pedigree 0.0439, pedigree (2,2,5,5,2)
  (same comment as for Radioactive species, other beta emitters)
- Zinc-65 [water, surface water]: 2.63e-7 kBq; lognormal variance with pedigree 0.0439, pedigree (2,2,5,5,2)
  (same comment as for Ruthenium-103)
- Tellurium-123m [water, surface water]: 1.57e-6 kBq; lognormal variance with pedigree 0.0439, pedigree (2,2,5,5,2)
  (same comment as for Ruthenium-103)
- Cesium-134 [water, surface water]: 3.77e-6 kBq; lognormal variance with pedigree 0.0439, pedigree (2,2,5,5,2)
  (same comment as for Ruthenium-103)
- Silver-110 [water, surface water]: 4.43e-6 kBq; lognormal variance with pedigree 0.0439, pedigree (2,2,5,5,2)
  (same comment as for Ruthenium-103)
- Noble gases, radioactive, unspecified [air, non-urban air or from high stacks]: 0.259 kBq; lognormal variance with pedigree 0.0439, pedigree (2,2,5,5,2)
  (same comment as for Radioactive species, other beta emitters)
- Strontium-90 [water, surface water]: 1.3e-6 kBq; lognormal variance with pedigree 0.0439, pedigree (2,2,5,5,2)
  (same comment as for Ruthenium-103)
- Iron-59 [water, surface water]: 4.2e-7 kBq; lognormal variance with pedigree 0.0439, pedigree (2,2,5,5,2)
  (same comment as for Ruthenium-103)
- Antimony-124 [water, surface water]: 4.13e-5 kBq; lognormal variance with pedigree 0.0439, pedigree (2,2,5,5,2)
  (same comment as for Ruthenium-103)
- Cobalt-58 [water, surface water]: 0.00114 kBq; lognormal variance with pedigree 0.0439, pedigree (2,2,5,5,2)
  (same comment as for Ruthenium-103)
- Manganese-54 [water, surface water]: 1.31e-5 kBq; lognormal variance with pedigree 0.0439, pedigree (2,2,5,5,2)
  (same comment as for Ruthenium-103)
- Cerium-141 [water, surface water]: 1.76e-7 kBq; lognormal variance with pedigree 0.0439, pedigree (2,2,5,5,2)
  (same comment as for Ruthenium-103)
- Silver-110 [air, non-urban air or from high stacks]: 3.13e-9 kBq; lognormal variance with pedigree 0.0439, pedigree (2,2,5,5,2)
  (same comment as for Radioactive species, other beta emitters)
- Water [air, unspecified]: 0.00283325 m3; name water_to_air_unspecified; = (water_decarbonised_input/1000)*fraction_WDC_to_air+water_cooling_UNO_input*fraction_CW_to_air; lognormal variance with pedigree 0.130025, pedigree (4,4,5,2,4)
  (same comment as for Water)
  property fraction, origin: unspecified 0.949863; name fraction_origin_unspecified
  property fraction, origin: fresh water 0.050137; name fraction_origin_fresh_water
  property fraction, origin: salt water 0; name fraction_origin_salt_water
- Cesium-137 [water, surface water]: 0.0001 kBq; lognormal variance with pedigree 0.0439, pedigree (2,2,5,5,2)
  (same comment as for Ruthenium-103)
- Xenon-133 [air, non-urban air or from high stacks]: 0.604 kBq; lognormal variance with pedigree 0.0439, pedigree (2,2,5,5,2)
  (same comment as for Radioactive species, other beta emitters)
- Barium-140 [air, non-urban air or from high stacks]: 3.17e-10 kBq; lognormal variance with pedigree 0.0439, pedigree (2,2,5,5,2)
  (same comment as for Radioactive species, other beta emitters)
- Sodium-24 [water, surface water]: 9.98e-6 kBq; lognormal variance with pedigree 0.0439, pedigree (2,2,5,5,2)
  (same comment as for Ruthenium-103)
- Cobalt-58 [air, non-urban air or from high stacks]: 1.64e-8 kBq; lognormal variance with pedigree 0.0439, pedigree (2,2,5,5,2)
  (same comment as for Radioactive species, other beta emitters)
- Antimony-125 [air, non-urban air or from high stacks]: 2.34e-8 kBq; lognormal variance with pedigree 0.0439, pedigree (2,2,5,5,2)
  (same comment as for Radioactive species, other beta emitters)
- Antimony-124 [air, non-urban air or from high stacks]: 4.75e-10 kBq; lognormal variance with pedigree 0.0439, pedigree (2,2,5,5,2)
  (same comment as for Radioactive species, other beta emitters)
- Cesium-136 [water, surface water]: 2.81e-7 kBq; lognormal variance with pedigree 0.0439, pedigree (2,2,5,5,2)
  (same comment as for Ruthenium-103)
- Tellurium-132 [water, surface water]: 8.42e-8 kBq; lognormal variance with pedigree 0.0439, pedigree (2,2,5,5,2)
  (same comment as for Ruthenium-103)
- Iodine-133 [air, non-urban air or from high stacks]: 1.82e-6 kBq; lognormal variance with pedigree 0.0439, pedigree (2,2,5,5,2)
  (same comment as for Radioactive species, other beta emitters)
- Cerium-144 [water, surface water]: 4.82e-7 kBq; lognormal variance with pedigree 0.0439, pedigree (2,2,5,5,2)
  (same comment as for Ruthenium-103)
- Zirconium-95 [water, surface water]: 1.5e-6 kBq; lognormal variance with pedigree 0.0439, pedigree (2,2,5,5,2)
  (same comment as for Ruthenium-103)
- Antimony-122 [water, surface water]: 9.04e-7 kBq; lognormal variance with pedigree 0.0439, pedigree (2,2,5,5,2)
  (same comment as for Ruthenium-103)
- Radioactive species, alpha emitters [water, surface water]: 3.02e-8 kBq; lognormal variance with pedigree 0.0439, pedigree (2,2,5,5,2)
  (same comment as for Ruthenium-103)
- Lanthanum-140 [water, surface water]: 4.95e-7 kBq; lognormal variance with pedigree 0.0439, pedigree (2,2,5,5,2)
  (same comment as for Ruthenium-103)
- Hydrogen-3, Tritium [water, surface water]: 1.86 kBq; lognormal variance with pedigree 0.042, pedigree (1,1,3,1,1)
  uncertainty declared in reports for radioactive releases
- Niobium-95 [water, surface water]: 3.07e-6 kBq; lognormal variance with pedigree 0.0439, pedigree (2,2,5,5,2)
  (same comment as for Ruthenium-103)
- Cobalt-57 [water, surface water]: 8.92e-6 kBq; lognormal variance with pedigree 0.0439, pedigree (2,2,5,5,2)
  (same comment as for Ruthenium-103)

## Sampling procedure
Literature, statistics of radioactive emissions, and information from operators.

## Extrapolations
This dataset has been extrapolated from year 2015 to the year of the calculation (2021). The uncertainty has been adjusted accordingly.
