# titanium dioxide production, chloride process

Dataset: EcoSpold 2, unit process
Geography: RoW
Time period: 2005-01-01 to 2021-12-31
Technology level: current
Classification: ISIC rev.4 ecoinvent: 2011:Manufacture of basic chemicals
Synonyms: Hombitan; Titanium White; Titafrance; Titandioxid; TITANIUM DIOXIDE; Flamenco; Titania; Titanium oxide; Titanium oxide (TiO2); Rutile; dioxotitanium Anatase Brookite; Titanium(IV) oxide
Scenario: Business-as-Usual
System model: Allocation, cut-off by classification
Generated by: Roland Hischier
Published in: European Comission 2007
Database: ecoinvent
isCopyrightProtected: true
accessRestrictedTo: 1

## General comment
This dataset represents the production of 1 kg of titanium dioxide using chlorine gas as an input. Titanium dioxide (TiO2) is available as a white powder. It is stable and nontoxic. Titanium dioxide exists in natural minerals (rutile). Titanium dioxide produced by the chloride process is preferred for paper, ink, rubber and a variety of specialty applications.
This dataset is based on data published by the European Commission (2007).
References:
European Commission (2007) Reference Document on Best Available Techniques for the Manufacture of Large Volume Inorganic Chemicals - Solids and Others industry. Integrated Pollution Prevention and Control. European Commission, Institute for Prospective Technological Studies, Edificio Expo.

## Included activities start
From reception of raw materials at the factory gate.

## Included activities end
This activity ends with the production of titanium dioxide. The dataset includes all raw materials, energy use, infrastructure, process emissions and waste.

## Geography
Average values of five European producers. The inventory is assumed to be representative of the global production.

## Technology
The present inventory uses by preference either high grade mineral ore rutile or an (artificially) upgraded ore - either via slag from a blast furnace or a synthetic rutile in which metals are leached out with dilute acid. The whole chloride process consists of the following sequential stages:
1. Raw material import and preparation: ore is sourced from outside Europe. An eventual (artifical) upgrade of the ore takes places at the quarry site of the primary ore. Before feeding the material into the TiO2 plant, the ore has to be dry - usually no drying is required. In case the moisture specification is exeeded, drying is done in flue-gas dryers. However, in the five here examined European plants, only one plant is using a drying system. Dry dust is thereby separated from the flue-gas by cyclones and filters and fed to the chlorinators. Feedstock of the required purity are purchased according to a set of specifications; specifications that are checked regularly.
2. Chlorination: ore containing TiO2 and coke are fed to a fluidised-bed reactor where an exothermic reactiion with chlorine gas takes place at 1000 °C. The primary reaction is: 2 TiO2 + 4 Cl2 + 3 C --> 2 TiCl4 + 2 CO + CO2. Impurities such as iron oxide will react in a similar manner (forming FeCl2 and CO). Impurities such as silica and zirconium do not chlorinate and may accumulate. The reactors may require total bed replacdement about once a year. In one plant, coke and unreacted bed material is separated and re-used.
3. Solid separation & waste solid metal chlorides treatment: The resulting vapour of TiCl4 plus other volatile metallic chloride impurities are cooled with recycled cold TiCl4, allowing the removal of some impurities. Solid metal chlorides are usually neutralised with lime which renders the residual metals insoluble before their disposal as a solid waste to landfill.
4. Condensation & Distillation: a majority of TiCl4 is condensed from the gas stream and pumped to a dedicated storage facility. More impurities and tetrachloride are removed from the gas stream by jet scrubbing with cold tetrachloride, which is also pumped to storage. The remaining gas stream is then passed for waste gas treatment (see below). Further purification of TiCl4 by distillation is carried out.
5. Oxidation: liquid TiCl4 and oxygen are preheated, then mixed. Oxidation of the TiCl4 to TiO2 and chlorine is carried out at between 900 and 1000 °C and 1500-2000 °C, in either a plasma arc furnace or in a toluene fired furnace, using oxygen injection. The overall reaction is TiCl4 + O2 --> TiO2 + 2 Cl2. This step is also used to control the final quality of the TiO2 crystal size to enable the product to be used as a pigment. Light metal chlorides are used to aid this process. The reaction products are cooled and the TiO2 powder is collected in bag filters and the chlorine recycled.
6. Cooling and separation: The product stream from the oxidation step is a mixture of chlorine, oxygen and TiO2 powder. After the exit from the reactor above, these are cooled by indirect water-cooling. TiO2 is slurried with water and transferred to the finishing stage (see below). Chlorine is separated in either of the following two ways: (i) absorption/desorption process - or (ii) direct recycling. In absorption/desorption process chain, the chlorine gas is drawn from the filters and then absorbed in liquid TiCl4 in an absorption column. This liquid is stored, whilst the tail-gases pass to a scrubber train, to remove residual chlorine. Chlorine is then recovered by desorption from the liquid TiCl4. The recycled chlorine is liquified and stored directly for the re-use. In the direct recycling process, the oxidation reactors are used at a higher pressure than the chlorinators - requiring however a precise synchronisation of the two process steps.
7. Finishing. The resulting solid is cooled, milled, coated, washed, dried and micronised.
References:
European Commission (2007) Reference Document on Best Available Techniques for the Manufacture of Large Volume Inorganic Chemicals - Solids and Others industry. Integrated Pollution Prevention and Control. European Commission, Institute for Prospective Technological Studies, Edificio Expo.

## Time period
Reference year of the production volume.

## Parameters
- fraction of cooling water which evaporates to air, recirculating cooling system: 0.771 dimensionless; name fraction_CW_R_to_air; lognormal variance with pedigree 0.0413, pedigree (2,3,1,3,1)
  Calculated based on literature value (Scown, C.D., 2011, Water Footprint of U.S. Transportation Fuels and supplying information of the article) supplied by Quantis.
- fraction, process water, to air: 0.15 dimensionless; name fraction_PW_to_air; lognormal variance with pedigree 0.092025, pedigree (4,4,3,2,4)
  Literature value. In case when no industry/process specific data are available, default evaporation fraction value is used. This value is 15% and is based on literature (Statistics Canada, 2007 & Shaffer, K.H., 2008, Consumptive water use in the Great Lakes Basin, USGS & Shiklomanov, 2003, World Water Resources at the Beginning of the 21st Century) and has been approved by an expert.
- fraction of cooling water which evaporates to air, once-through cooling system: 0.004 dimensionless; name fraction_CW_OT_to_air; lognormal variance with pedigree 0.0413, pedigree (2,3,1,3,1)
  (same comment as for fraction of cooling water which evaporates to air, recirculating cooli)
- fraction of cooling water which evaporates to air: 0.3875 dimensionless; name fraction_CW_to_air; = (0.5*fraction_CW_OT_to_air)+(0.5*fraction_CW_R_to_air); lognormal variance with pedigree 0.0413, pedigree (2,3,1,3,1)
  Calculated value based on literature value (see comments of the other parametres present in this dataset) and expert opinion. In the case when no industry/literature data are available about the type of cooling or directly fraction, cooling water, to air specific for the process a default assumption is applied. It is assumed that the once-through cooling system is used in 50% of all cases and recirculating system is used in another 50% of all cases. Fraction of cooling water which evaporates to air, i.e. is consumed.

## Reference product
- titanium dioxide: 1 kg; name titanium_dioxide; source European Comission 2007; CPC 14290: Other non-ferrous metal ores and concentrates (other than uranium or thorium ores and concentrates); By-product classification allocatable product; CAS 13463-67-7
  Titanium dioxide commonly appears in the form of a white powder. Titanium dioxide produced by the chloride process is preferred for paper, ink, rubber and a variety of specialty applications.
  production volume 2.64377e9 kg; name RP_PV; = 6.3*1E9*0.5
    According to Iluka (2019), the global production capacity for titanium dioxide pigment using both the chloride and sulfate processes was estimated to be 6.3 million tonnes in 2018. The production capacity is used as best estimate of the production volume.
    Furthermore, the split between sulfate and chloride is approximately 50:50 (Iluka 2019).
    Reference:
    Iluka (2019). Mineral Sands Industry Information. https://www.iluka.com/CMSPages/GetFile.aspx?guid=bd24ecdc-5b71-4681-9340-87c85555cca5
  property price 105.11 EUR2005
    Calculated as five year geometric mean of prices from USGS Minerals Yearbooks' 2011-2015 (US price used as a proxy for GLO price)
  property carbon content 0
    carbon content on a dry matter basis (reserved; not for manual entry)
  properties: dry mass 1 kg, wet mass 1 kg, water in wet mass 0 kg, carbon content, fossil 0, carbon content, non-fossil 0, water content 0, carbon allocation 0 kg

## Inputs from technosphere
- rutile, 95% titanium dioxide: 1.13158 kg; = 1075/1000/0.95; source European Comission 2007; lognormal variance with pedigree 0.0008, pedigree (1,3,2,1,1)
  Industrial value. Averate throughput of TiO2 in ore is 1075 kg/tonne TiO2 pigment, with a variation of +/- 5%.
  properties: dry mass 1 kg, wet mass 1 kg
- petroleum coke: 0.366 kg; = 366/1000; source European Comission 2007; lognormal variance with pedigree 0.0008, pedigree (1,3,2,1,1)
  Industrial values. 366 kg of coke in average is used per tonne of TiO2.
  properties: wet mass 1 kg, heating value, net 35 MJ, carbon content, fossil 0.885, dry mass 1 kg
- sodium hydroxide, without water, in 50% solution state: 0.104 kg; = 104/1000; source European Comission 2007; lognormal variance with pedigree 0.0028, pedigree (1,3,2,5,1)
  Industrial value. Average NaOH used for the abatement systems of aqueous emissions and the finishing step.
  Uncertainty: a
  properties: heating value, net 3.03 MJ, dry mass 1 kg, wet mass 1 kg
- quicklime, milled, loose: 0.137 kg; = 137/1000; source European Comission 2007; lognormal variance with pedigree 0.0008, pedigree (1,3,2,1,1)
  Industrial value. Sold separation and waste solid metal chlorides treatement material.
  properties: dry mass 0.99 kg, water content 0.010101, wet mass 1 kg
- hazardous waste, for incineration: -0.00106667 kg; name hazardous_waste; = ((0.5+1.8+0.9)/3/1000)*-1; source European Comission 2007; lognormal variance with pedigree 0.0054, pedigree (3,3,2,5,1)
  Industrial value. Hazardous waste - average from three years (1999-2001) for one single plant.
  production volume 2.82003e6 kg; = RP_PV*hazardous_waste/ABS(titanium_dioxide)
    Calculated from the production volume of titanium dioxide in proportion to the respective output amounts.
  property price 0 EUR2005; name hazardous_waste_price_EUR2005
  properties: carbon content, fossil 0.554667, heating value, net 17 MJ, water content 0.333333, dry mass 0.75 kg, wet mass 1 kg
  note on carbon content, fossil: Tab A.6, ecoinvent v2.2 report 13_I. C content has been calculated after data in the tables, and then referred to 1 kg DM
  note on heating value, net: Value taken from the general comment of the treatment dataset.
- silica sand: 0.049 kg; = 49/1000; source European Comission 2007; lognormal variance with pedigree 0.0008, pedigree (1,3,2,1,1)
  Industrial value. Cooling and separation material.
  properties: water content 0.010101, dry mass 0.99 kg, wet mass 1 kg
- light fuel oil: 0 kg; source European Comission 2007; pedigree (1,1,1,1,1)
  Industrial value. Vanadium complex material.
  properties: dry mass 1 kg, heating value, net 42.6 MJ, carbon content, fossil 0.862, wet mass 1 kg
- chemical factory, organics: 4e-10 unit; source European Comission 2007; lognormal variance with pedigree 0.31, pedigree (2,3,2,4,3)
  Calculated based on literature data published by the industry. For this activity, no information was readily available concerning infrastructure and land-use. Therefore, the infrastructure is estimated based on data from two chemical factories, the BASF site of Ludwigshafen and the chemical factory in Gendorf (which are both located in Germany), which produce a wide range of chemical substances. Based on this data, the following assumptions are made: the built area amounts to about 4.2 ha, the plant has an average output of 50'000 t/a and a lifespan of fifty years. The estimated infrastructure amount is therefore 4.00 E-10 units per kg of produced chemical.
  References:
  Althaus H.-J., Chudacoff M., Hischier R., Jungbluth N., Osses M. and Primas A. (2007) Life Cycle Inventories of Chemicals. ecoinvent report No. 8, v2.0. EMPA Dübendorf, Swiss Centre for Life Cycle Inventories, Dübendorf, CH.
  Gendorf (2000) Umwelterklärung 2000, Werk Gendorf. Werk Gendorf, Burgkirchen.
- heat, district or industrial, other than natural gas: 0 MJ; pedigree (1,1,1,1,1)
  Industrial value. This flow models energy from steam.
  properties: heating value, net 1 MJ
- oxygen, liquid: 0.467 kg; = 467/1000; source European Comission 2007; lognormal variance with pedigree 0.0008, pedigree (1,3,2,1,1)
  Industrial value. Material to oxidise titanium tetrachloride.
  properties: dry mass 1 kg, wet mass 1 kg
- chlorine, liquid: 0.201 kg; = 201/1000; source European Comission 2007; lognormal variance with pedigree 0.0008, pedigree (1,3,2,1,1)
  Industrial values. 201 kg of chlorine gas in average is used per tonne of TiO2.
  properties: dry mass 1 kg, wet mass 1 kg
- wastewater, average: -0.018224 m3; name sewage; = ((process_water/1000)*(1- fraction_PW_to_air))*-1; source European Comission 2007; lognormal variance with pedigree 0.212, pedigree (5,5,5,5,5)
  Calculated value. Proxy to model waste process water.
  production volume 4.81802e7 m3; = RP_PV*sewage/ABS(titanium_dioxide)
    (same comment as for hazardous waste, for incineration)
  property price 0 EUR2005; name sewage_price_EUR2005
  properties: wet mass 1000 kg, water content 2882.2, carbon content, non-fossil 0.194039, dry mass 0.346837 kg
  note on carbon content, non-fossil: 0.0673 kg TOC/m3 (Tab A.17, ecoinvent v2.2 report 13_I). TOC was considered as Total Carbon.
- heat, district or industrial, natural gas: 0 MJ; source European Comission 2007; pedigree (1,1,1,1,1)
  Industrial value. Natural Gas use.
  Uncertainty: f
  properties: heating value, net 1 MJ
- sodium chloride, powder: 0.016 kg; = 16/1000; source European Comission 2007; lognormal variance with pedigree 0.0008, pedigree (1,3,2,1,1)
  Industrial value. Cooling and separation material.
  properties: dry mass 1 kg, wet mass 1 kg
- residue from TiO2 production, chloride process: -0.621 kg; name residues; = (224/1000+397/1000)*-1; source European Comission 2007; lognormal variance with pedigree 0.0008, pedigree (1,3,2,1,1)
  Industrial value. Inert residues after step of chlorination and after waste solid metal chlorides treatment.
  production volume 1.64178e9 kg; = RP_PV*residues/ABS(titanium_dioxide)
    (same comment as for hazardous waste, for incineration)
  property price 0 EUR2005; name residues_price_EUR2005
  properties: dry mass 0.44 kg, water content 1.27273, wet mass 1 kg, carbon content, fossil 0.204545
- electricity, medium voltage: 0 kWh; source European Comission 2007; pedigree (1,1,1,1,1)
  Industrial value. Average electricity consumption in 3 main steps of production; 1. ore preparation to oxidation 2. finishing 3. effluent treatment. Original values measured in GJ/tonne TiO2
  Uncertainty: p
- tap water: 0 kg; name process_water; source European Comission 2007; pedigree (1,1,1,1,1)
  Industrial value. Water imported into site for TiO2 processing and effluent treatment (intitulated 'treated water'); except for cooling water. Original value in m3/tonne TiO2
  properties: water content 2962.17, wet mass 1 kg, carbon content, fossil 0.00178991, dry mass 0.000337476 kg
- light fuel oil: 0.000209875, 3.02673e-5, 0.000423578, 2.81081e-5, 4.07276e-5, 0.00426744 kg (6 entries); source European Comission 2007; lognormal variance with pedigree 0.0008, pedigree (1,3,2,1,1)
  Industrial value. Vanadium complex material.
- heat, district or industrial, other than natural gas: 0.00376971, 9.29623 MJ (2 entries); lognormal variance with pedigree 0.0034, pedigree (1,3,2,5,1)
  Industrial value. This flow models energy from steam.
- heat, district or industrial, natural gas: 0.135086, 8.76491 MJ (2 entries); source European Comission 2007; lognormal variance with pedigree 0.0028, pedigree (1,3,2,5,1)
  Industrial value. Natural Gas use.
  Uncertainty: f
- electricity, medium voltage: 0.0231095, 0.00443141, 0.0743942, 1.082, 0.152508, 0.496894 kWh (6 entries); source European Comission 2007; lognormal variance with pedigree 0.0028, pedigree (1,3,2,5,1)
  (same comment as for electricity, medium voltage)
- tap water: 0.333735, 0.0401728, 0.0663921, 1.67415, 0.0435525, 0.123884, 19.1581 kg (7 entries); source European Comission 2007; lognormal variance with pedigree 0.0048, pedigree (1,3,2,5,1)
  (same comment as for tap water)

## Inputs from nature
- Water, cooling, unspecified natural origin [natural resource, in water]: 0.011 m3; name cooling_water; = 11/1000; source European Comission 2007; lognormal variance with pedigree 0.0128, pedigree (1,3,2,5,1)
  Industrial value, Cooling water is obtained from sea or river; original value in m3/tonne TiO2.

## Emissions to nature
- Hydrogen chloride [air, unspecified]: 0.0007037 kg; = 0.1/1000+0.0037/1000+0.6/1000; source European Comission 2007; lognormal variance with pedigree 0.0008, pedigree (1,3,2,1,1)
  Industrial value. Emissions during chlorination, solid separation and waste solid metal chlorides treatment steps.
- Chlorides, unspecified [water, unspecified]: 0.164 kg; = 164/1000; source European Comission 2007; lognormal variance with pedigree 0.0008, pedigree (1,3,2,1,1)
  Industrial value. Average aqueous emissions from finishing step.
- Hydrochloric acid [water, unspecified]: 0.016 kg; = 16/1000; source European Comission 2007; lognormal variance with pedigree 0.0008, pedigree (1,3,2,1,1)
  Industrial value. Average aqueous emissions during condensation & gas scrubbing step.
- Carbon dioxide, fossil [air, unspecified]: 0.923 kg; = 923/1000; source European Comission 2007; lognormal variance with pedigree 0.0428, pedigree (1,3,2,5,1)
  Industrial value. Emission during chlorination step.
- Cadmium, ion [water, unspecified]: 5.76e-8 kg; = 0.0000576/1000; source European Comission 2007; lognormal variance with pedigree 0.0428, pedigree (1,3,2,5,1)
  Industrial value. Average aqueous emissions during neutralisation step.
- Water [water, unspecified]: 0.0067375 m3; = cooling_water* (1-fraction_CW_to_air); lognormal variance with pedigree 0.1648, pedigree (3,3,2,5,5)
  Calculated as a fraction of the input of water. For more details, refer to the mathematical relation and the parameters.
- Sulfur dioxide [air, unspecified]: 0.00128 kg; = 1.14/1000+0.14/1000; source European Comission 2007; lognormal variance with pedigree 0.0428, pedigree (1,3,2,5,1)
  Industrial value. Emission during chlorination and oxidation steps.
- Suspended solids, unspecified [water, unspecified]: 0.005 kg; = 0.36/1000+4.64/1000; source European Comission 2007; lognormal variance with pedigree 0.0428, pedigree (1,3,2,5,1)
  Industrial value. Average aqueous emissions during condensation & gas scrubbing and finishing steps.
- Nickel, ion [water, unspecified]: 0.0001334 kg; = 0.1*1.334/1000; source European Comission 2007; lognormal variance with pedigree 0.0008, pedigree (1,3,2,1,1)
  Industrial value. Average aqueous emissions of 'other metals' of 1.334 kg/t TiO2 during acid recycling or neutralisation - thereof 10% assumed for this substance.
- Titanium, ion [water, unspecified]: 0.000667 kg; = 0.5*1.334/1000; source European Comission 2007; lognormal variance with pedigree 0.0008, pedigree (1,3,2,1,1)
  Industrial value. Average aqueous emissions of 'other metals' of 1.334 kg/t TiO2 during acid recycling or neutralisation - thereof 50% assumed for this substance.
- Mercury [water, unspecified]: 8.56e-9 kg; = 8.56E-6/1000; source European Comission 2007; lognormal variance with pedigree 0.0008, pedigree (1,3,2,1,1)
  Industrial value. Average aqueous emissions during neutralisation step.
- Lead [water, unspecified]: 0.0001334 kg; = 0.1*1.334/1000; source European Comission 2007; lognormal variance with pedigree 0.0008, pedigree (1,3,2,1,1)
  (same comment as for Nickel, ion)
- Copper, ion [water, unspecified]: 0.0001334 kg; = 0.1*1.334/1000; source European Comission 2007; lognormal variance with pedigree 0.0008, pedigree (1,3,2,1,1)
  (same comment as for Nickel, ion)
- Carbonyl sulfide [air, unspecified]: 0.00239 kg; = 2.39/1000; source European Comission 2007; lognormal variance with pedigree 0.0008, pedigree (1,3,2,1,1)
  Industrial value. Emission during chlorination step.
- Zinc, ion [water, unspecified]: 0.0001334 kg; = 0.1*1.334/1000; source European Comission 2007; lognormal variance with pedigree 0.0008, pedigree (1,3,2,1,1)
  (same comment as for Nickel, ion)
- Particulates, > 2.5 um, and < 10um [air, unspecified]: 0.00066 kg; = 0.002/1000+0.5/1000+0.158/1000; source European Comission 2007; lognormal variance with pedigree 0.0428, pedigree (1,3,2,5,1)
  Industrial value. Average dust emissions. Emitted during production, waste solid treatment and finishing steps.
- Chlorine [air, unspecified]: 3e-6 kg; = 0.003/1000; source European Comission 2007; lognormal variance with pedigree 0.0008, pedigree (1,3,2,1,1)
  Industrial value. Emissions during chlorination step.
- Carbon monoxide, fossil [air, unspecified]: 0.159 kg; = 159/1000; source European Comission 2007; lognormal variance with pedigree 0.0008, pedigree (1,3,2,1,1)
  Industrial value. Emission during chlorination step.
- Chromium, ion [water, unspecified]: 0.0001334 kg; = 0.1*1.334/1000; source European Comission 2007; lognormal variance with pedigree 0.0008, pedigree (1,3,2,1,1)
  (same comment as for Nickel, ion)
- Iron, ion [water, unspecified]: 0.0023 kg; = 2.3/1000; source European Comission 2007; lognormal variance with pedigree 0.0028, pedigree (1,3,2,5,1)
  Industrial value. Average aqueous emissions during neutralisation step.
  Uncertainty: w
- Nitrogen oxides [air, unspecified]: 0.001438 kg; = 0.008/1000+0.1/10000+1.4/1000+0.02/1000; source European Comission 2007; lognormal variance with pedigree 0.0428, pedigree (1,3,2,5,1)
  Industrial value. Average dust emissions. Emitted during production, chlorination, waste solid treatment and finishing steps.
- Water [air, unspecified]: 0.0074785 m3; = (cooling_water* fraction_CW_to_air)+(process_water/1000*fraction_PW_to_air); lognormal variance with pedigree 0.0448, pedigree (3,3,2,5,1)
  (same comment as for Water)

## Sampling procedure
Reported industrial emissions from five European production sites.

## Extrapolations
This dataset has been copied from an original dataset covering the geography RER. The uncertainty has been adjusted accordingly.
