# lorry production, 40 metric ton

Dataset: EcoSpold 2, unit process
Geography: RoW
Time period: 1998-01-01 to 2021-12-31
Technology level: current
Classification: EcoSpold01Categories: transport systems/road
Classification: ISIC rev.4 ecoinvent: 2910:Manufacture of motor vehicles
Scenario: Business-as-Usual
System model: Allocation, cut-off by classification
Generated by: Michael Spielmann (obsolete)
Published in: Spielmann M. 2007
Database: ecoinvent
isCopyrightProtected: true
accessRestrictedTo: 1

## General comment
Based on "lorry production, 40 metric ton, RER 2002". Material consumption values refer to the production of one average lorry in the referring weight class (net weight 16000t). Total Kilometric performance: 5.40E+05. Interventions for manufacturing processes of vehicles are independent of weight class. The disposal of lorry is included too.

## Included activities start
The dataset starts with the material used for the production of the lorry.

## Included activities end
The inventory includes processes of material, energy and water use in vehicle manufacturing (final assembly, engine production and manufacturing of metal parts). Rail and road transport of materials is accounted for. Plant infrastructure is included, addressing issues such as land use, building, road and parking construction. Vehicle disposal is as well included.

## Geography
Extrapolated from "lorry production, 40 metric ton, RER 2002". Vehicle manufacturing data are taken from one production site in Germany.

## Technology
Current production technology, environmental issues have been addressed in the past.

## Time period
The material consumption represents a current vehicle FH. Data has been adjusted for 40 t vehicle. The data for vehicle production are representative for lorry production of one German company with an environmental management system. The data includes the final assembly (2000), engine production (2002) and the manufacturing of metal parts (2002).
References:
Volvo Truck Corporation (2004) Environmental product declaration: Volvo 8500 Low-Entry. Download of March from http://www.volvo.com/bus/global/en-gb/volvogroup/core+values/environment/downloads.htm.
MAN Nutzfahrzeuge AG (2000) Umwelterklärung 1999. MAN Nutzfahrzeuge AG, München
MAN Nutzfahrzeuge AG (2002) Umwelterklärung 2002. MAN Nutzfahrzeuge AG, München
Doka G. (2003) Life Cycle Inventories of Waste Treatment Services. Final report ecoinvent 2000 No. 13. EMPA St. Gallen, Swiss Centre for Life Cycle Inventories, Duebendorf, CH, Online-Version under: www.ecoinvent.ch.
Frischknecht R. and Jungbluth N. (2003) Code of Practice. Final report ecoinvent 2000 No. 2. ESU-services, Uster, Swiss Centre for Life Cycle Inventories, Duebendorf, CH, Online-Version under: www.ecoinvent.ch.

## Parameters
- fraction, process water, to air: 0.15 dimensionless; name fraction_PW_to_air; lognormal variance with pedigree 0.092025, pedigree (4,4,3,2,4)
  Literature value. In case when no industry/process specific data are available, default evaporation fraction value is used. This value is 15% and is based on literature (Statistics Canada, 2007 & Shaffer, K.H., 2008, Consumptive water use in the Great Lakes Basin, USGS & Shiklomanov, 2003, World Water Resources at the Beginning of the 21st Century) and has been approved by an expert.
- fraction, tap water, to air: 0.15 dimensionless; name fraction_TW_to_air; = fraction_PW_to_air; lognormal variance with pedigree 0.092025, pedigree (4,4,3,2,4)
  Calculated value. See comment in the other parametres present in this dataset. Tap water is considered to be always used as process water, thus process water fractions to air are applied to all tap water input flows to calculate the amount of water consumed in the processes.

## Reference product
- lorry, 40 metric ton: 1 unit; name RP_amount_1; CPC 49114: Motor vehicles n.e.c. for the transport of goods; By-product classification allocatable product
  EcoSpold01Location=RER
  production volume 2.67763 unit; name RP_PV_1
    This is a placeholder value that does not reflect real-world production volumes. This dataset does not currently require a real-world production volume to work in the database framework, and no actual data were collected yet. This has no negative effect on the results of the ecoinvent database.
  property price 54300 EUR2005
    The calculated value based on literature (10859 Euro) has been re-evaluated by an expert in the field and it was concluded, that the price in reality is app. 5 times higher. Calculated based on literature; 2003-2004 data are only from 2004. According to Industrial Commodity Statistics Yearbook 2005, volume 1. Physical Quantity Data. UN. New York 2008 (hard copy ). The price divided by the number of production units of two of the highest producing countries in EU27 (Spain in 2004 and Germany in 2005) in this database. US$ converted to according to http://en.wikipedia.org/wiki/Table_of_historical_exchange_rates downloaded 2 July 2009. This is average prices of all trucks in each of the two countries. NOTE that the price for an average truck is about 3 times higher in Germany than in Spain, most likely reflecting the higher production price and smaller average size of trucks.

## Inputs from technosphere
- alkyd paint, white, without solvent, in 60% solution state: 102 kg; source Volvo Truck Corporation 2004; lognormal variance with pedigree 0.082, pedigree (1,1,5,5,1)
  Estimated value. Based on the material composition of a Volvo FH as available from product declaration.
  EcoSpold01Location=RER
  properties: wet mass 1 kg, carbon content, non-fossil 0.199629, carbon content, fossil 0.140367, dry mass 1 kg, heating value, net 10.3 MJ
  note on carbon content, non-fossil: C content was calculated as an addition of C content in the raw materials.
- section bar rolling, steel: 3620 kg; source Volvo Truck Corporation 2004; lognormal variance with pedigree 0.082, pedigree (1,1,5,5,1)
  EcoSpold01Location=RER
  Estimated value. Based on the material composition of a Volvo FH as available from product declaration.
- aluminium, cast alloy: 176 kg; = 0.32*550; source Volvo Truck Corporation 2004; lognormal variance with pedigree 0.162, pedigree (1,1,5,5,1)
  550 kg aluminium, production mix. Estimated value. Based on the material composition of a Volvo FH as available from product declaration.
  0.32: part of aluminium cast alloy in aluminium, production mix. Based on the aluminium, production mix in ecoinvent v2.2.
  property wet mass 1 kg; name WM
  property dry mass 1 kg; name DM
  property carbon content, non-fossil 0; name C_content_non_fossil
  property water in wet mass 0 kg; name WWM
  property carbon content, fossil 0; name C_content_fossil
  property water content 0; name water_content
- hydrochloric acid, without water, in 30% solution state: 0.189 kg; source MAN Nutzfahrzeuge AG 2000; lognormal variance with pedigree 0.052, pedigree (1,1,5,5,1)
  EcoSpold01Location=RER
  Literature value. Energy expenditures for stationary combustion processes are available from environmental reports of a German lorry manufacturer MAN Nutzfahrzeuge AG (2000) and MAN Nutzfahrzeuge AG (2002). The data is available for various manufacturing sites performing different tasks in the manufacturing chain. The total value used in this study comprises stamping processes, metal part and wiring harness manufacturing, engine production and testing as well as the final assembly.
  Additional references:
  MAN Nutzfahrzeuge AG (2002) Umwelterklärung 2002. MAN Nutzfahrzeuge AG, München.
  properties: heating value, net 3.32 MJ, dry mass 1 kg, wet mass 1 kg
- lead: 73.62 kg; source Volvo Truck Corporation 2004; lognormal variance with pedigree 0.052, pedigree (1,1,5,5,1)
  (same comment as for section bar rolling, steel)
  properties: wet mass 1 kg, dry mass 1 kg
- wastewater, average: -15.9 m3; source MAN Nutzfahrzeuge AG 2000; lognormal variance with pedigree 0.052, pedigree (1,1,5,5,1)
  EcoSpold01Location=CH
  Literature value. Data represent MAN production sites in Germany and comprises: final truck assembly, engine manufacturing, manufacturing of metal parts. Data available from environmental reports of the company.
  Additional references:
  MAN Nutzfahrzeuge AG (2002) Umwelterklärung 2002. MAN Nutzfahrzeuge AG, München
  production volume 47.7 m3
    Calculated from the production volume of lorry, 40 metric ton in proportion to the respective output amounts.
  properties: dry mass 0.346837 kg, water content 2882.2, wet mass 1000 kg, carbon content, non-fossil 0.194039
  note on carbon content, non-fossil: 0.0673 kg TOC/m3 (Tab A.17, ecoinvent v2.2 report 13_I). TOC was considered as Total Carbon.
- wastewater from lorry production: -2.18 m3; source MAN Nutzfahrzeuge AG 2000; lognormal variance with pedigree 0.052, pedigree (1,1,5,5,1)
  Literature value. Data represent MAN production sites in Germany and comprises: final truck assembly, engine manufacturing, manufacturing of metal parts. Data available from environmental reports of the company.
  Additional references:
  MAN Nutzfahrzeuge AG (2002) Umwelterklärung 2002. MAN Nutzfahrzeuge AG, München
  EcoSpold01Location=CH
  production volume 6.54 m3
    (same comment as for wastewater, average)
  properties: dry mass 0.337476 kg, wet mass 1000 kg, water content 2962.17
- pig iron: 3620 kg; source Volvo Truck Corporation 2004; lognormal variance with pedigree 0.082, pedigree (1,1,5,5,1)
  EcoSpold01Location=GLO
  Estimated value. Based on the material composition of a Volvo FH as available from product declaration.
  properties: wet mass 1 kg, dry mass 1 kg, carbon content, fossil 0.045
  note on carbon content, fossil: Pig iron is the iron produced in the blast furnace. It is an alloy of 94% Fe and more than 2% C (world average 4.5%). (ecoinvent v2.2 report 10_partII)
- brass: 51.2 kg; source Volvo Truck Corporation 2004; lognormal variance with pedigree 0.162, pedigree (1,1,5,5,1)
  EcoSpold01Location=CH
  Estimated value. Based on the material composition of a Volvo FH as available from product declaration.
  properties: wet mass 1 kg, dry mass 1 kg
- propylene glycol, liquid: 56.3 kg; source Volvo Truck Corporation 2004; lognormal variance with pedigree 0.052, pedigree (1,1,5,5,1)
  (same comment as for alkyd paint, white, without solvent, in 60% solution state)
  properties: dry mass 1 kg, carbon content, fossil 0.473684, heating value, net 27.09 MJ, wet mass 1 kg
- electronics, for control units: 76.8 kg; source Volvo Truck Corporation 2004; lognormal variance with pedigree 0.052, pedigree (1,1,5,5,1)
  (same comment as for alkyd paint, white, without solvent, in 60% solution state)
  properties: carbon content, non-fossil 0.00013442, wet mass 1 kg, carbon content, fossil 0.337146, dry mass 1 kg
  note on carbon content, non-fossil: The control unit has a composition of 46% steel (housing), 32% plastics, 14% printed wiring boards and 8% cables (various types).;
- heat, district or industrial, natural gas: 0 MJ; source MAN Nutzfahrzeuge AG 2000; pedigree (1,1,1,1,1)
  (same comment as for hydrochloric acid, without water, in 30% solution state)
  properties: heating value, net 1 MJ
- heat, district or industrial, other than natural gas: 0 MJ; source MAN Nutzfahrzeuge AG 2000; pedigree (1,1,1,1,1)
  Literature value. Energy expenditures for stationary combustion processes are available from environmental reports of a German lorry manufacturer MAN Nutzfahrzeuge AG (2000) and MAN Nutzfahrzeuge AG (2002). The data is available for various manufacturing sites performing different tasks in the manufacturing chain. The total value used in this study comprises stamping processes, metal part and wiring harness manufacturing, engine production and testing as well as the final assembly.
  Additional references:
  MAN Nutzfahrzeuge AG (2002) Umwelterklärung 2002. MAN Nutzfahrzeuge AG, München.
  EcoSpold01Location=RER
  properties: heating value, net 1 MJ
- diesel, burned in building machine: 20.1 MJ; source MAN Nutzfahrzeuge AG 2000; lognormal variance with pedigree 0.342, pedigree (1,1,5,5,1)
  EcoSpold01Location=GLO
  Literature value. Diesel is used for engine testing and the operation of fork-lifters. The latter is modeled as building machine. Energy expenditures for stationary combustion processes are available from environmental reports of a German lorry manufacturer MAN Nutzfahrzeuge AG (2000) and MAN Nutzfahrzeuge AG (2002). The data is available for various manufacturing sites performing different tasks in the manufacturing chain. The total value used in this study comprises stamping processes, metal part and wiring harness manufacturing, engine production and testing as well as the final assembly.
  Additional references:
  MAN Nutzfahrzeuge AG (2002) Umwelterklärung 2002. MAN Nutzfahrzeuge AG, München.
  properties: heating value, net 1 MJ
- stone wool, packed: 25.6 kg; source Volvo Truck Corporation 2004; lognormal variance with pedigree 0.052, pedigree (1,1,5,5,1)
  Estimated value. Based on the material composition of a Volvo FH as available from product declaration.
  EcoSpold01Location=CH
  properties: wet mass 1 kg, dry mass 1 kg, carbon content, fossil 0.015401
  note on carbon content, fossil: The chemical composition of the glass fibres used in the rock wool production is similar to the composition of naturally cooled volcano basalt and has a composition listed in Tab. 3.1 and 3.2 in ecoinvent v2.2 report 16, part XIV. Rock wool contains: a minimum of 96% mineral fibres,between 0.5 and 3.0 weight percent of phenolic resin depending on the specific product characteristics, and about 0.2 percent mineral oil (ecoinvent v2.2 report 16, part XIV). An average composition of 1.8% phenolic resin, 0.2% mineral oil, and 98% mineral fibres has been assumed and used to calculate C content of the rock wool
- wire drawing, copper: 76.8 kg; source Volvo Truck Corporation 2004; lognormal variance with pedigree 0.162, pedigree (1,1,5,5,1)
  (same comment as for alkyd paint, white, without solvent, in 60% solution state)
- nitric acid, without water, in 50% solution state: 0 kg; source MAN Nutzfahrzeuge AG 2000; pedigree (1,1,1,1,1)
  Literature value. Data represent MAN production sites in Germany and comprises: final truck assembly, engine manufacturing, manufacturing of metal parts. Data available from environmental reports of the company. For Ca(OH)2, 50% H2O is assumed.
  Additional references:
  MAN Nutzfahrzeuge AG (2002) Umwelterklärung 2002. MAN Nutzfahrzeuge AG, München
  EcoSpold01Location=RER
  properties: dry mass 1 kg, wet mass 1 kg
- lime, hydrated, packed: 0.31 kg; source MAN Nutzfahrzeuge AG 2000; lognormal variance with pedigree 0.2106, pedigree (5,5,5,5,5)
  EcoSpold01Location=CH
  Literature value. Data represent MAN production sites in Germany and comprises: final truck assembly, engine manufacturing, manufacturing of metal parts. Data available from environmental reports of the company. For Ca(OH)2, 50% H2O is assumed.
  Additional references:
  MAN Nutzfahrzeuge AG (2002) Umwelterklärung 2002. MAN Nutzfahrzeuge AG, München
  Uncertainty: 2, 50% H2O is assumed.
  properties: water content 0.00300903, wet mass 1 kg, dry mass 0.997 kg
- synthetic rubber: 960 kg; source Volvo Truck Corporation 2004; lognormal variance with pedigree 0.082, pedigree (1,1,5,5,1)
  (same comment as for alkyd paint, white, without solvent, in 60% solution state)
  properties: dry mass 1 kg, wet mass 1 kg, carbon content, fossil 0.871949, heating value, net 26.42 MJ
  note on carbon content, fossil: EPDM (Ethylene-propene-diene terpolymer) rubber is a terpolymer of ethylene, propene, and a diene with the residual unsaturated portion of the diene in the side chain (ecoinvent v2.2 report 7-part XX & Ullmann). Chemical formula (deduced from Evidences of Solvent-Induced Miscibility in Polychloroprene-co-Ethylene-Propene Diene Terpolymer Blends, Dubey et al., Journal of Applied Polymer Science, 2009, 111:1884–1891): C20H35
- aluminium, wrought alloy: 374 kg; = 0.68*550; source Volvo Truck Corporation 2004; lognormal variance with pedigree 0.162, pedigree (1,1,5,5,1)
  550 kg aluminium, production mix. Estimated value. Based on the material composition of a Volvo FH as available from product declaration.
  0.68: part of aluminium, wrought alloy in aluminium, production mix. Based on the aluminium, production mix in ecoinvent v2.2.
  properties: wet mass 1 kg, dry mass 1 kg
- sheet rolling, steel: 1070 kg; source Volvo Truck Corporation 2004; lognormal variance with pedigree 0.052, pedigree (1,1,5,5,1)
  (same comment as for alkyd paint, white, without solvent, in 60% solution state)
- reinforcing steel: 6740 kg; source Volvo Truck Corporation 2004; lognormal variance with pedigree 0.052, pedigree (1,1,5,5,1)
  (same comment as for alkyd paint, white, without solvent, in 60% solution state)
  properties: wet mass 1 kg, carbon content, fossil 0.004, dry mass 1 kg
- acetic acid, without water, in 98% solution state: 0.066 kg; source MAN Nutzfahrzeuge AG 2002; lognormal variance with pedigree 0.052, pedigree (1,1,5,5,1)
  Literature value. Data represent MAN production sites in Germany and comprises: final truck assembly, engine manufacturing, manufacturing of metal parts. Data available from environmental reports of the company.
  Additional references:
  MAN Nutzfahrzeuge AG (2002) Umwelterklärung 2002. MAN Nutzfahrzeuge AG, München
  EcoSpold01Location=RER
  properties: wet mass 1 kg, carbon content, fossil 0.400016, dry mass 1 kg, heating value, net 14.6 MJ
  note on heating value, net: Based on literature, page 10, Althaus H.-J., Chudacoff M., Hischier R., Jungbluth N., Osses M. and Primas A. (2007) Life Cycle Inventories of Chemicals. Final report ecoinvent data v2.0 No. 8. EMPA, Swiss Centre for Life Cycle Inventories, Dübendorf, CH, Online-Version under: www.ecoinvent.org.
- copper, cathode: 76.8 kg; source Volvo Truck Corporation 2004; lognormal variance with pedigree 0.162, pedigree (1,1,5,5,1)
  (same comment as for section bar rolling, steel)
  properties: dry mass 1 kg, wet mass 1 kg
- sulfuric acid: 27.9 kg; source Volvo Truck Corporation 2004; lognormal variance with pedigree 0.052, pedigree (1,1,5,5,1)
  (same comment as for section bar rolling, steel)
  properties: dry mass 1 kg, wet mass 1 kg
- tap water: 0 kg; name tap_water_input; source MAN Nutzfahrzeuge AG 2002; pedigree (1,1,1,1,1)
  EcoSpold01Location=RER
  Calculated value. About 95% of the consumed tap water and groundwater are used in the final assembly of vehicles (own calculations based on MAN Nutzfahrzeuge AG (2002)).
  properties: wet mass 1 kg, dry mass 0.000337476 kg, carbon content, fossil 0.00178991, water content 2962.17
  note on carbon content, fossil: Bicarbonate content is 2.93 mol/m3. CO2 content is 0.1 mol/m3 (ecoinvent v2.2 report 8, Tab 93.1).
- sodium hydroxide, without water, in 50% solution state: 0.381 kg; source MAN Nutzfahrzeuge AG 2000; lognormal variance with pedigree 0.052, pedigree (1,1,5,5,1)
  EcoSpold01Location=RER
  Literature value. Data represent MAN production sites in Germany and comprises: final truck assembly, engine manufacturing, manufacturing of metal parts. Data available from environmental reports of the company.
  Additional references:
  MAN Nutzfahrzeuge AG (2002) Umwelterklärung 2002. MAN Nutzfahrzeuge AG, München
  properties: heating value, net 3.03 MJ, wet mass 1 kg, dry mass 1 kg
- diesel: 0 kg; source MAN Nutzfahrzeuge AG 2000; pedigree (1,1,1,1,1)
  Literature value. Diesel is used for engine testing and the operation of fork-lifters. The latter is modeled as building machine. Energy expenditures for stationary combustion processes are available from environmental reports of a German lorry manufacturer MAN Nutzfahrzeuge AG (2000) and MAN Nutzfahrzeuge AG (2002). The data is available for various manufacturing sites performing different tasks in the manufacturing chain. The total value used in this study comprises stamping processes, metal part and wiring harness manufacturing, engine production and testing as well as the final assembly.
  Additional references:
  MAN Nutzfahrzeuge AG (2002) Umwelterklärung 2002. MAN Nutzfahrzeuge AG, München.
  EcoSpold01Location=RER
  properties: dry mass 1 kg, carbon content, fossil 0.865, wet mass 1 kg, heating value, net 42.8 MJ
  note on carbon content, fossil: C-content of diesel is 86.5% (ecoinvent v2.2 report 6_IV, Tab 3.14)
- lubricating oil: 156 kg; source MAN Nutzfahrzeuge AG 2000; lognormal variance with pedigree 0.162, pedigree (1,1,5,5,1)
  EcoSpold01Location=RER
  Literature value. Data represent MAN production sites in Germany and comprises: final truck assembly, engine manufacturing, manufacturing of metal parts. Data available from environmental reports of the company. For Ca(OH)2, 50% H2O is assumed.
  Additional references:
  MAN Nutzfahrzeuge AG (2002) Umwelterklärung 2002. MAN Nutzfahrzeuge AG, München
  properties: carbon content, fossil 0.75, wet mass 1 kg, dry mass 1 kg, heating value, net 40.2 MJ
  note on carbon content, fossil: Lubricating oil is produced from diesel. C-content/dry mass of fats and oils considered 75%, from: ecoinvent v2.2 report, n 15a, pg 40
  note on heating value, net: Literature value, Source: IPCC 2006, 2006 IPCC Guidelines for National Greenhouse Gas Inventories, Prepared by the National Greenhouse Gas Inventories Programme, Eggleston H.S., Buendia L., Miwa K., Ngara T. and Tanabe K. (eds). Published: IGES, Japan
- steel, low-alloyed, hot rolled: 33.8 kg; source Volvo Truck Corporation 2004; lognormal variance with pedigree 1.372, pedigree (1,1,5,5,1)
  (same comment as for section bar rolling, steel)
  properties: dry mass 1 kg, wet mass 1 kg, carbon content, fossil 0.005
  note on carbon content, fossil: Low alloyed steel composition given in Tab. 3.2 ecoinvent v2.2 report 10_partII. Steel assumed to have a C content of 0.5%
- polyethylene, high density, granulate: 589 kg; source Volvo Truck Corporation 2004; lognormal variance with pedigree 0.162, pedigree (1,1,5,5,1)
  (same comment as for alkyd paint, white, without solvent, in 60% solution state)
  properties: heating value, net 42.47 MJ, dry mass 1 kg, carbon content, fossil 0.857143, wet mass 1 kg
  note on carbon content, fossil: Polyethylene is formed out of a huge amount of ethylene monomers (C2H4) (ecoinvent v2.2 report 11_II). MW=28 g/mol
- used lorry, 40 metric ton: -1 unit; name BP_amount_1; lognormal variance with pedigree 0.344, pedigree (3,1,5,5,1)
  Uncertainty: own calculations
  production volume 2.67763 unit; = RP_PV_1 * (BP_amount_1 / RP_amount_1)
    Calculated from production volume of reference product using the relative outputs.
  property price 0 EUR2005; name BP_amount_1_price_EUR2005
  properties: dry mass 16000 kg, carbon content, fossil 0.11437, wet mass 16000 kg, carbon content, non-fossil 0.00127328
- electricity, medium voltage: 0 kWh; source MAN Nutzfahrzeuge AG 2000; pedigree (1,1,1,1,1)
  EcoSpold01Location=UCTE
  Literature value. Energy expenditures for stationary combustion processes are available from environmental reports of a German lorry manufacturer MAN Nutzfahrzeuge AG (2000 )andMAN Nutzfahrzeuge AG (2002). The data is available for various manufacturing sites performing different tasks in the manufacturing chain. The total value used in this study comprises stamping processes, metal part and wiring harness manufacturing, engine production and testing as well as the final assembly.
  Additional references:
  MAN Nutzfahrzeuge AG (2002) Umwelterklärung 2002. MAN Nutzfahrzeuge AG, München.
- flat glass, uncoated: 115 kg; source Volvo Truck Corporation 2004; lognormal variance with pedigree 0.082, pedigree (1,1,5,5,1)
  (same comment as for section bar rolling, steel)
  properties: wet mass 1 kg, dry mass 1 kg
- cast iron: 2310 kg; source Volvo Truck Corporation 2004; lognormal variance with pedigree 0.082, pedigree (1,1,5,5,1)
  (same comment as for alkyd paint, white, without solvent, in 60% solution state)
  properties: carbon content, fossil 0.04, dry mass 1 kg, wet mass 1 kg
  note on carbon content, fossil: Cast iron is made by remelting pig iron in small furnaces (e.g. cupola furnaces or electric arc furnaces) and poured into moulds to make castings. It usually contains 2% to 6% carbon (ecoinvent v2.2 report 10_partII). An average content of 4% was considered
- steel, chromium steel 18/8, hot rolled: 12.8 kg; source Volvo Truck Corporation 2004; lognormal variance with pedigree 0.162, pedigree (1,1,5,5,1)
  (same comment as for alkyd paint, white, without solvent, in 60% solution state)
  properties: carbon content, fossil 0.0008, wet mass 1 kg, dry mass 1 kg
  note on carbon content, fossil: Stainless steel model is the grade 304 steel (18/8 stainless, 18% chromium 8% nickel; max. 0.08% C)
- pitch: 0 kg; source Volvo Truck Corporation 2004; pedigree (1,1,1,1,1)
  (same comment as for section bar rolling, steel)
  properties: dry mass 1 kg, carbon content, fossil 0.83, wet mass 1 kg, heating value, net 28 MJ
- road vehicle factory: 4.36e-7 unit; source Volvo Truck Corporation 2004; lognormal variance with pedigree 0.342, pedigree (1,1,5,5,1)
  (same comment as for section bar rolling, steel)
- heat, district or industrial, natural gas: 490.255, 31809.7 MJ (2 entries); source MAN Nutzfahrzeuge AG 2000; lognormal variance with pedigree 0.052, pedigree (1,1,5,5,1)
  (same comment as for hydrochloric acid, without water, in 30% solution state)
- heat, district or industrial, other than natural gas: 0.34888, 860.351 MJ (2 entries); source MAN Nutzfahrzeuge AG 2000; lognormal variance with pedigree 0.052, pedigree (1,1,5,5,1)
  (same comment as for heat, district or industrial, other than natural gas)
- nitric acid, without water, in 50% solution state: 0.0189761, 0.00463038, 0.0115149, 0.0351569, 0.00551734, 0.00311633, 0.00461325, 0.0149748 kg (8 entries); source MAN Nutzfahrzeuge AG 2000; lognormal variance with pedigree 0.052, pedigree (1,1,5,5,1)
  (same comment as for nitric acid, without water, in 50% solution state)
- tap water: 255.283, 30.7292, 50.785, 1280.6, 33.3144, 94.7623, 14654.5 kg (7 entries); source MAN Nutzfahrzeuge AG 2002; lognormal variance with pedigree 0.052, pedigree (1,1,5,5,1)
  (same comment as for tap water)
- diesel: 7.15479, 0.34396, 14.44, 1.01146, 1.46195, 142.588 kg (6 entries); source MAN Nutzfahrzeuge AG 2000; lognormal variance with pedigree 0.342, pedigree (1,1,5,5,1)
  (same comment as for diesel)
- electricity, medium voltage: 59.7486, 11.4572, 192.343, 2797.45, 394.302, 1284.7 kWh (6 entries); source MAN Nutzfahrzeuge AG 2000; lognormal variance with pedigree 0.052, pedigree (1,1,5,5,1)
  (same comment as for electricity, medium voltage)
- pitch: 1.38386, 0.0788689, 3.56959, 0.160004, 0.22842, 20.1793 kg (6 entries); source Volvo Truck Corporation 2004; lognormal variance with pedigree 0.052, pedigree (1,1,5,5,1)
  (same comment as for section bar rolling, steel)

## Inputs from nature
- Water, well, in ground [natural resource, in water]: 69.5 m3; name water_well_in_ground_input; source MAN Nutzfahrzeuge AG 2002; lognormal variance with pedigree 0.052, pedigree (1,1,5,5,1)
  Calculated value. About 95% of the consumed tap water and groundwater are used in the final assembly of vehicles (own calculations based on MAN Nutzfahrzeuge AG (2002)).

## Emissions to nature
- Dinitrogen monoxide [air, unspecified]: 0.0223 kg; source MAN Nutzfahrzeuge AG 2000; lognormal variance with pedigree 0.162, pedigree (1,1,5,5,1)
  Calculated value. Based on the diesel consumption for engine testing, direct environmental emissions to air are calculated, employing the emission profile of a lorry 28t empty. Is assumed that diesel is used for engine testing and the operation of fork-lifters. The latter is modeled as building machine.Energy expenditures for stationary combustion processes are available from environmental reports of a German lorry manufacturer MAN Nutzfahrzeuge AG (2000) and MAN Nutzfahrzeuge AG (2002).
  Additional references:
  MAN Nutzfahrzeuge AG (2002) Umwelterklärung 2002. MAN Nutzfahrzeuge AG, München.
- Particulates, > 2.5 um, and < 10um [air, unspecified]: 0.0212 kg; source MAN Nutzfahrzeuge AG 2000; lognormal variance with pedigree 0.162, pedigree (1,1,5,5,1)
  (same comment as for Dinitrogen monoxide)
- Methane, fossil [air, unspecified]: 0.0165 kg; source MAN Nutzfahrzeuge AG 2000; lognormal variance with pedigree 0.162, pedigree (1,1,5,5,1)
  (same comment as for Dinitrogen monoxide)
- Toluene [air, unspecified]: 0.00551 kg; source MAN Nutzfahrzeuge AG 2000; lognormal variance with pedigree 0.162, pedigree (1,1,5,5,1)
  (same comment as for Dinitrogen monoxide)
- Lead [air, unspecified]: 1.9e-8 kg; source MAN Nutzfahrzeuge AG 2000; lognormal variance with pedigree 0.692, pedigree (1,1,5,5,1)
  (same comment as for Dinitrogen monoxide)
- Cadmium [air, unspecified]: 1.73e-6 kg; source MAN Nutzfahrzeuge AG 2000; lognormal variance with pedigree 0.692, pedigree (1,1,5,5,1)
  (same comment as for Dinitrogen monoxide)
- Ammonia [air, unspecified]: 0.0223 kg; source MAN Nutzfahrzeuge AG 2000; lognormal variance with pedigree 0.162, pedigree (1,1,5,5,1)
  (same comment as for Dinitrogen monoxide)
- TOC, Total Organic Carbon [water, unspecified]: 0.0551 kg; source Frischknecht R. 2003; lognormal variance with pedigree 0.162, pedigree (1,1,5,5,1)
  Calculated value according to ecoinvent quality guidelines Frischknecht et al. (2003)
- Carbon dioxide, fossil [air, unspecified]: 633 kg; source MAN Nutzfahrzeuge AG 2000; lognormal variance with pedigree 0.162, pedigree (1,1,5,5,1)
  (same comment as for Dinitrogen monoxide)
- COD, Chemical Oxygen Demand [water, unspecified]: 0.126 kg; source MAN Nutzfahrzeuge AG 2002; lognormal variance with pedigree 0.162, pedigree (1,1,5,5,1)
  Literature value. For automotive stamping, a Chemical Oxygen Demand (COD) is reported MAN Nutzfahrzeuge AG (2002) with 12800 kg/year resulting in a specific COD of 0.126 kg/vehicle.
- Chromium [air, unspecified]: 0.000293 kg; source MAN Nutzfahrzeuge AG 2000; lognormal variance with pedigree 0.692, pedigree (1,1,5,5,1)
  (same comment as for Dinitrogen monoxide)
- BOD5, Biological Oxygen Demand [water, unspecified]: 0.126 kg; source Frischknecht R. 2003; lognormal variance with pedigree 0.162, pedigree (1,1,5,5,1)
  Calculated value according to ecoinvent quality guidelines Frischknecht et al. (2003).
- Selenium [air, unspecified]: 1.73e-6 kg; source MAN Nutzfahrzeuge AG 2000; lognormal variance with pedigree 0.692, pedigree (1,1,5,5,1)
  (same comment as for Dinitrogen monoxide)
- Sulfur dioxide [air, unspecified]: 0.12 kg; source MAN Nutzfahrzeuge AG 2000; lognormal variance with pedigree 0.162, pedigree (1,1,5,5,1)
  (same comment as for Dinitrogen monoxide)
- Mercury [air, unspecified]: 3.45e-9 kg; source MAN Nutzfahrzeuge AG 2000; lognormal variance with pedigree 0.692, pedigree (1,1,5,5,1)
  (same comment as for Dinitrogen monoxide)
- Nickel [air, unspecified]: 1.21e-5 kg; source MAN Nutzfahrzeuge AG 2000; lognormal variance with pedigree 0.692, pedigree (1,1,5,5,1)
  (same comment as for Dinitrogen monoxide)
- Nitrogen oxides [air, unspecified]: 6 kg; source MAN Nutzfahrzeuge AG 2000; lognormal variance with pedigree 0.162, pedigree (1,1,5,5,1)
  (same comment as for Dinitrogen monoxide)
- Copper [air, unspecified]: 0.000293 kg; source MAN Nutzfahrzeuge AG 2000; lognormal variance with pedigree 0.692, pedigree (1,1,5,5,1)
  (same comment as for Dinitrogen monoxide)
- Water [water, unspecified]: 54.935 m3; name water_to_water_unspecified; = (tap_water_input/1000)*(1-fraction_TW_to_air)+water_well_in_ground_input*(1-fraction_PW_to_air)-15.9-2.18; lognormal variance with pedigree 0.130025, pedigree (4,4,5,2,4)
  Calculated value based on literature values and expert opinion. See comments in the parametres' comment field.
  property fraction, origin: salt water 0; name fraction_origin_salt_water_Ww
  property fraction, origin: unspecified 0; name fraction_origin_unspecified_Ww
  property fraction, origin: fresh water 1; name fraction_origin_fresh_water_Ww
- NMVOC, non-methane volatile organic compounds, unspecified origin [air, unspecified]: 7.87 kg; source MAN Nutzfahrzeuge AG 2000; lognormal variance with pedigree 0.162, pedigree (1,1,5,5,1)
  (same comment as for Dinitrogen monoxide)
- Water [air, unspecified]: 12.885 m3; name water_to_air_unspecified; = (tap_water_input/1000)*fraction_TW_to_air+water_well_in_ground_input*fraction_PW_to_air; lognormal variance with pedigree 0.130025, pedigree (4,4,5,2,4)
  (same comment as for Water)
  property fraction, origin: unspecified 0; name fraction_origin_unspecified
  property fraction, origin: fresh water 1; name fraction_origin_fresh_water
  property fraction, origin: salt water 0; name fraction_origin_salt_water
- DOC, Dissolved Organic Carbon [water, unspecified]: 0.0551 kg; source Frischknecht R. 2003; lognormal variance with pedigree 0.162, pedigree (1,1,5,5,1)
  Calculated value according to ecoinvent quality guidelines Frischknecht et al. (2003).
- Carbon monoxide, fossil [air, unspecified]: 0.973 kg; source MAN Nutzfahrzeuge AG 2000; lognormal variance with pedigree 0.162, pedigree (1,1,5,5,1)
  (same comment as for Dinitrogen monoxide)
- Xylene [air, unspecified]: 0.00551 kg; source MAN Nutzfahrzeuge AG 2000; lognormal variance with pedigree 0.162, pedigree (1,1,5,5,1)
  (same comment as for Dinitrogen monoxide)
- Zinc [air, unspecified]: 0.000173 kg; source MAN Nutzfahrzeuge AG 2000; lognormal variance with pedigree 0.692, pedigree (1,1,5,5,1)
  (same comment as for Dinitrogen monoxide)
- Benzene [air, unspecified]: 0.0131 kg; source MAN Nutzfahrzeuge AG 2000; lognormal variance with pedigree 0.162, pedigree (1,1,5,5,1)
  (same comment as for Dinitrogen monoxide)
- Particulates, < 2.5 um [air, unspecified]: 0.254 kg; source MAN Nutzfahrzeuge AG 2000; lognormal variance with pedigree 0.162, pedigree (1,1,5,5,1)
  (same comment as for Dinitrogen monoxide)
- Particulates, > 10 um [air, unspecified]: 0.0109 kg; source MAN Nutzfahrzeuge AG 2000; lognormal variance with pedigree 0.162, pedigree (1,1,5,5,1)
  (same comment as for Dinitrogen monoxide)

## Sampling procedure
Manufacturing data is taken from an environmental report of one production site. Additional data was generated via oral communcation.

## Extrapolations
Data from one production site in Germany is used as an first estimate for Europe This dataset has been copied from an original dataset covering the geography RER. The uncertainty has been adjusted accordingly.

## Review by Carl Vadenbo 2012-06-28
In preparation for the release of ecoinvent v3.0, the output of 'used lorry, 40 metric ton' was removed from the various 'transport, lorry, 40t' datasets and added to 'lorry, 40t, RER' in ecoinvent v2.2 and renamed and extrapolated to 'lorry production, 40 metric ton, GLO 2002'. The added exchange of by-product/waste was reviewed and the new dataset was accepted for inclusion into the ecoinvent database on 2012.07.05. The uncertainty information has only been adjusted for geographical representativeness in GLO, and consequently needs to be revised before subsequent releases of the database.

## Review by Niels Jungbluth 2006-09-27
passed.
