# bale loading

Dataset: EcoSpold 2, unit process
Geography: CH
Time period: 1991-01-01 to 2021-12-31
Technology level: current
Classification: ISIC rev.4 ecoinvent: 0163:Post-harvest crop activities
Classification: EcoSpold01Categories: agricultural means of production/work processes
Tags: ConvertedDataset
Scenario: Business-as-Usual
System model: Allocation, cut-off by classification
Generated by: Silvio Blaser
Published in: Nemecek, T. 2007
Database: ecoinvent
isCopyrightProtected: true
accessRestrictedTo: 1

## General comment
This dataset represents an example of Loading straw bales with bale gripper onto trailer. Without transport to farm and discharging. Straw production not included. The functional unit (FU) is one bale. The operation time is 0.023 h/FU.
[This dataset was already contained in the ecoinvent database version 2. It was not individually updated during the transfer to ecoinvent version 3. Life Cycle Impact Assessment results may still have changed, as they are affected by changes in the supply chain, i.e. in other datasets. This dataset was generated following the ecoinvent quality guidelines for version 2. It may have been subject to central changes described in the ecoinvent version 3 change report (http://www.ecoinvent.org/database/ecoinvent-version-3/reports-of-changes/), and the results of the central updates were reviewed extensively. The changes added e.g. consistent water flows and other information throughout the database. The documentation of this dataset can be found in the ecoinvent reports of version 2, which are still available via the ecoinvent website. The change report linked above covers all central changes that were made during the conversion process.]

## Included activities start
From reception of bale to be loaded.

## Included activities end
This activity ends with bale loading. The dataset includes the diesel fuel consumption and the amount of agricultural machinery and of the shed, which has to be attributed to the loading of bales. Also taken into consideration is the amount of emissions to the air from combustion and the emission to the soil from tyre abrasion during the work process. The following activities where considered part of the work process: preliminary work at the farm, like attaching the adequate machine to the tractor; transfer to field (with an assumed distance of 1 km); field work; transfer to farm and concluding work, like uncoupling the machine. The overlapping during the field work is considered. The number of loaded bales is not taken into account. The dataset doesn't include dust other than from combustion and noise.

## Geography
The inventory applies for Swiss Agricultural Field Work processes.

## Technology
The inventories are based on measurements made by the Swiss Federal Research Station for Agricultural Economics and Engineering of Taenikon (FAT). Fuel consumption and emissions were taken from recent literature of ART, expert's estimations or unpublished data.

## Time period
Measurements were made in the last few years (1999-2001).

## Reference product
- bale loading: 1 unit; By-product classification allocatable product; CPC 86111: Post-harvest crop services
  production volume 699212 unit
    FAOSTAT data year 2011 for amount of cereals produced, weight 160kg straw/bale, Conversion factor 0.23 (ecoinvent report 15, V2.0, 2007), 50% of straw harvested, total straw yield assumed same as grain yield
  property price 0.194284 EUR2005
    Calculated based on inputs: The price of the product has been calculated as a sum of the values of the material and energy inputs for this product. This value is therefore a rough estimation. It may underestimate the real price since there are additional expenses when producing any product. These expences can include for example labour costs, treatment of waste materials and profit for the producer. Please consider carefully whether this level of data quality is acceptable for your application.

## Inputs from technosphere
- tractor, 4-wheel, agricultural: 0.0105 kg; lognormal variance with pedigree 0.042, pedigree (1,4,5,1,1)
  Proxy, based on 'Agricultural Field Work Processes' - pdf-document on the dedicated talk page of ecoinvent (www.ecoinvent.org/talk-pages)
- agricultural machinery, unspecified: 0.0077 kg; lognormal variance with pedigree 0.042, pedigree (1,4,5,1,1)
  (same comment as for tractor, 4-wheel, agricultural)
- shed: 6.67e-5 m2; lognormal variance with pedigree 0.342, pedigree (1,4,5,1,1)
  Proxy, based on 'Agricultural Field Work Processes' - pdf-document on the dedicated talk page of ecoinvent (www.ecoinvent.org/talk-pages)
  This exchange has an activity link directly to the producing activity because the product is primarily consumed in the same geographical area where it is produced.
- diesel: 0.0811 kg; lognormal variance with pedigree 0.042, pedigree (1,4,5,1,1)
  (same comment as for tractor, 4-wheel, agricultural)
  properties: heating value, net 42.8 MJ, dry mass 1 kg, carbon content, fossil 0.865, wet mass 1 kg
  note on carbon content, fossil: C-content of diesel is 86.5% (ecoinvent v2.2 report 6_IV, Tab 3.14)

## Emissions to nature
- Benzo(a)pyrene [air, non-urban air or from high stacks]: 2.43e-9 kg; lognormal variance with pedigree 0.6981, pedigree (1,2,5,1,3)
  (same comment as for tractor, 4-wheel, agricultural)
- Dinitrogen monoxide [air, non-urban air or from high stacks]: 9.74e-6 kg; lognormal variance with pedigree 0.0981, pedigree (1,2,5,1,3)
  (same comment as for tractor, 4-wheel, agricultural)
- Benzene [air, non-urban air or from high stacks]: 5.92e-7 kg; lognormal variance with pedigree 0.0981, pedigree (1,2,5,1,3)
  (same comment as for tractor, 4-wheel, agricultural)
- PAH, polycyclic aromatic hydrocarbons [air, non-urban air or from high stacks]: 2.67e-7 kg; lognormal variance with pedigree 0.3581, pedigree (1,2,5,1,3)
  (same comment as for tractor, 4-wheel, agricultural)
- Nitrogen oxides [air, non-urban air or from high stacks]: 0.00327 kg; lognormal variance with pedigree 0.082, pedigree (1,4,5,1,1)
  (same comment as for tractor, 4-wheel, agricultural)
- Cadmium [air, non-urban air or from high stacks]: 8.11e-10 kg; lognormal variance with pedigree 0.6981, pedigree (1,2,5,1,3)
  (same comment as for tractor, 4-wheel, agricultural)
- Copper [air, non-urban air or from high stacks]: 1.38e-7 kg; lognormal variance with pedigree 0.6981, pedigree (1,2,5,1,3)
  (same comment as for tractor, 4-wheel, agricultural)
- Carbon dioxide, fossil [air, non-urban air or from high stacks]: 0.253 kg; lognormal variance with pedigree 0.0581, pedigree (1,2,5,1,3)
  (same comment as for tractor, 4-wheel, agricultural)
- Zinc [air, non-urban air or from high stacks]: 8.11e-8 kg; lognormal variance with pedigree 0.6981, pedigree (1,2,5,1,3)
  (same comment as for tractor, 4-wheel, agricultural)
- Methane, fossil [air, non-urban air or from high stacks]: 1.05e-5 kg; lognormal variance with pedigree 0.0981, pedigree (1,2,5,1,3)
  (same comment as for tractor, 4-wheel, agricultural)
- Ammonia [air, non-urban air or from high stacks]: 1.62e-6 kg; lognormal variance with pedigree 0.0981, pedigree (1,2,5,1,3)
  (same comment as for tractor, 4-wheel, agricultural)
- Cadmium [soil, agricultural]: 5.37e-9 kg; lognormal variance with pedigree 0.082, pedigree (1,4,5,1,1)
  (same comment as for tractor, 4-wheel, agricultural)
- Particulates, < 2.5 um [air, non-urban air or from high stacks]: 0.000321 kg; lognormal variance with pedigree 0.3581, pedigree (1,2,5,1,3)
  (same comment as for tractor, 4-wheel, agricultural)
- Carbon monoxide, fossil [air, non-urban air or from high stacks]: 0.000414 kg; lognormal variance with pedigree 0.692, pedigree (1,4,5,1,1)
  (same comment as for tractor, 4-wheel, agricultural)
- Zinc [soil, agricultural]: 1.42e-5 kg; lognormal variance with pedigree 0.082, pedigree (1,4,5,1,1)
  (same comment as for tractor, 4-wheel, agricultural)
- NMVOC, non-methane volatile organic compounds, unspecified origin [air, non-urban air or from high stacks]: 0.000265 kg; lognormal variance with pedigree 0.082, pedigree (1,4,5,1,1)
  (same comment as for tractor, 4-wheel, agricultural)
- Sulfur dioxide [air, non-urban air or from high stacks]: 8.18e-5 kg; lognormal variance with pedigree 0.0581, pedigree (1,2,5,1,3)
  (same comment as for tractor, 4-wheel, agricultural)
- Nickel [air, non-urban air or from high stacks]: 5.68e-9 kg; lognormal variance with pedigree 0.6981, pedigree (1,2,5,1,3)
  (same comment as for tractor, 4-wheel, agricultural)
- Lead [soil, agricultural]: 2.37e-8 kg; lognormal variance with pedigree 0.082, pedigree (1,4,5,1,1)
  (same comment as for tractor, 4-wheel, agricultural)
- Selenium [air, non-urban air or from high stacks]: 8.11e-10 kg; lognormal variance with pedigree 0.0981, pedigree (1,2,5,1,3)
  (same comment as for tractor, 4-wheel, agricultural)
- Chromium [air, non-urban air or from high stacks]: 4.06e-9 kg; lognormal variance with pedigree 0.6981, pedigree (1,2,5,1,3)
  (same comment as for tractor, 4-wheel, agricultural)

## Sampling procedure
The inventoried HC, NOx, CO and fuel consumption values are measurements made following two test cycles (ISO 8178 C1 test and a specific 6-level-test created by the FAT) and on measurements made during the field work. The other emissions were calculated basing on literature data and the measured fuel consumption.

## Extrapolations
This dataset has been extrapolated from year 2002 to the year of the calculation (2021). The uncertainty has been adjusted accordingly.

## Review by Roland Hischier 2011-09-28
Transfer of documentation done.

## Review by Roland Hischier 2003-08-06
Passed.
