# reinforcing steel production

Dataset: EcoSpold 2, unit process
Geography: AT
Time period: 2017-01-01 to 2021-12-31
Technology level: current
Classification: EcoSpold01Categories: metals/extraction
Classification: ISIC rev.4 ecoinvent: 2410:Manufacture of basic iron and steel
Synonyms: carbon steel; unalloyed steel
Scenario: Business-as-Usual
System model: Allocation, cut-off by classification
Generated by: Alexander Passer
Published in: Classen M. 2009
Database: ecoinvent
isCopyrightProtected: true
accessRestrictedTo: 1

## General comment
This dataset describes the produciton of reinforcing steel in Austria, consisting of steel production and hot rolling at the same site.
[This dataset was already contained in the ecoinvent database version 2. It was not individually updated during the transfer to ecoinvent version 3. Life Cycle Impact Assessment results may still have changed, as they are affected by changes in the supply chain, i.e. in other datasets. This dataset was generated following the ecoinvent quality guidelines for version 2. It may have been subject to central changes described in the ecoinvent version 3 change report (http://www.ecoinvent.org/database/ecoinvent-version-3/reports-of-changes/), and the results of the central updates were reviewed extensively. The changes added e.g. consistent water flows and other information throughout the database. The documentation of this dataset can be found in the ecoinvent reports of version 2, which are still available via the ecoinvent website. The change report linked above covers all central changes that were made during the conversion process.]

## Included activities start
The dataset starts with Austrian steel production and hot rolling, both done at the same site.

## Included activities end
Steel and hot rolling.

## Geography
Data relates to a plant in Austria.

## Technology
The steel is produced in an electric arc furnace route from iron scrap. After the melting process in the furnace, the steel is cast into billets. These billets are processed by hot rolling into rebars and coils for reinforcing steel. Rebars have a diameter of 8-40mm and a length of 6-30m. Coils have a diameter of 8-16mm and weigh 1.7, 3.0 or 5.0. The average steel grade is B550 or B500 (550 or 500 MPa)

## Time period
The process is expected to be valid for the next 10 years.

## Reference product
- reinforcing steel: 1 kg; By-product classification allocatable product; CPC 4124: Bars and rods, hot-rolled, of iron or steel
  EcoSpold01Location=RER
  production volume 4.085e8 kg
    Production volume in the factory in 2017.
  property price 0.5369 EUR2005
    Calculated based on inputs: The price of the product has been calculated as a sum of the values of the material and energy inputs for this product. This value is therefore a rough estimation. It may underestimate the real price since there are additional expenses when producing any product. These expences can include for example labour costs, treatment of waste materials and profit for the producer. Please consider carefully whether this level of data quality is acceptable for your application.
  property heating value, net 0 MJ
    Non combustible products are assumed to have an LHV equal to zero (0).
  property carbon content 0.004
    carbon content on a dry matter basis (reserved; not for manual entry)
  properties: dry mass 1 kg, wet mass 1 kg, carbon content, non-fossil 0, carbon content, fossil 0.004, water content 0, water in wet mass 0 kg, carbon allocation 0.004 kg

## Inputs from technosphere
- steel, low-alloyed: 1 kg; lognormal variance with pedigree 0.0033, pedigree (2,3,3,3,1)
  Activity link to Austrian steel production
  EcoSpold01Location=RER
  properties: carbon content, fossil 0.005, wet mass 1 kg, dry mass 1 kg
  note on carbon content, fossil: Low alloyed steel composition given in Tab. 3.2 ecoinvent v2.2 report 10_partII. Steel assumed to have a C content of 0.5%
- hot rolling, steel: 1 kg; lognormal variance with pedigree 0.002, pedigree (1,1,3,1,1)
  EcoSpold01Location=RER
  relates directly to output

## Sampling procedure
literature, statistics

## Extrapolations
This dataset has been extrapolated from year 2017 to the year of the calculation (2021). The uncertainty has been adjusted accordingly.
