# passenger car production, diesel

Dataset: EcoSpold 2, unit process
Geography: GLO
Time period: 2000-01-01 to 2021-12-31
Technology level: modern
Classification: ISIC rev.4 ecoinvent: 2910:Manufacture of motor vehicles
Scenario: Business-as-Usual
System model: Allocation, cut-off by classification
Generated by: Hans-Jörg Althaus
Published in: H.-J. Althaus 2010
Database: ecoinvent
isCopyrightProtected: true
accessRestrictedTo: 1

## General comment
This dataset describes the production of a diesel passenger car of compact size. The entries are based on a per kg basis. The model is optimized for a vehicle of about 1314kg. It is subdivided in two modules, the glider and the drivetrain. Each module contains the specific materialization and production efforts and emissions. The specific end of life treatment of each module is covered in the respective dataset. The treatment of the used passenger car only includes the manual dismantling of the car in the various modules.

## Included activities start
The dataset takes as input the two modules (glider and drivetrain) which build the vehicle. The production efforts, emissions and manufacturing infrastructure are in the respective modules.

## Included activities end
The activity ends with the assembly of the car and the dismantling of the vehicle at the end of its life.

## Technology
The dataset is based on averages over passenger car technologies spanning from 2000 to 2010 which are expected to be representative up to 2015.

## Parameters
- powertrain weight: 401 kg; name powertrain_weight
- glider weight: 913 kg; name glider_weight

## Reference product
- passenger car, diesel: 1 kg; name RP_amount_1; = (glider_weight+powertrain_weight); source H.-J. Althaus 2010; By-product classification allocatable product; CPC 49113: Motor cars and other motor vehicles principally designed for the transport of persons (except public-transport[…]
  Vehicle composed from glider and ICE
  production volume 3.6e10 kg; name RP_PV_1
    Estimate based on projections of passenger car production for 2012. Total of 60000000 vehicles for 2012 (http://www.worldometers.info/cars/), roughly 50% diesel and 50% petrol.
  property price 11.1 EUR2005
    Calculated based on literature value (UN Commodity Trade Statistics Database) using data on trade value and net weight (kg) for 5 reference countries/regions (RER, USA, JP, CN and IN) which average is assumed to be a good approximation of the global price. The UN classification; 8703 Motor cars and other motor vehicles principally designed for the transport of persons, including station wagons and racing cars. The same price is used for both diesel, petrol, natural gas and electric passenger car.

## Inputs from technosphere
- manual dismantling of used passenger car with internal combustion engine: 1 unit; = (glider_weight+powertrain_weight); lognormal variance with pedigree 0.0504, pedigree (2,3,5,4,3)
  Manual dismantling of used vehicle.
- glider, passenger car: 0.694825 kg; = glider_weight; source H.-J. Althaus 2010; lognormal variance with pedigree 0.043, pedigree (2,3,5,4,2)
  Based on currently available compact size cars.
- waste rubber, unspecified: 0 kg; name BP_amount_3; source F. Habermacher 2011; pedigree (1,1,1,1,1)
  Rubber from the tyres.Information on the materialisation of the dismatled vehicle are in F. Habermacher "Modeling material inventories and environmental impacts of electric passenger cars", Matser Thesis, Department of Environmental Sciences, ETH Zurich, 2011.
  production volume 0 kg
    Calculated from production volume of reference product using the relative outputs.
  property price 0 EUR2005; name BP_amount_3_price_EUR2005
  properties: carbon content, fossil 0.853, heating value, net 27.19 MJ, wet mass 1 kg, dry mass 1 kg
  note on heating value, net: Value taken from the general comment of the treatment dataset.
- waste glass: 0 kg; name BP_amount_1; source F. Habermacher 2011; pedigree (1,1,1,1,1)
  Glass contributions from the manual dismantling of the car. Information on the materialisation of the dismatled vehicle are in F. Habermacher "Modeling material inventories and environmental impacts of electric passenger cars", Matser Thesis, Department of Environmental Sciences, ETH Zurich, 2011.
  production volume 0 kg
    Calculated from production volume of reference product using the relative outputs.
  property price 0 EUR2005; name BP_amount_1_price_EUR2005
  property water in wet mass 0 kg; name WWM
  property carbon content, fossil 0; name C_content_fossil
  property carbon content, non-fossil 0; name C_content_non_fossil
  property water content 0; name water_content
  properties: heating value, net 0.05 MJ, wet mass 1 kg, dry mass 1 kg
  note on heating value, net: Value extracted from "treatment of waste glass, open dump, very wet infiltration class (1000mm)"
- waste mineral oil: 0 kg; name BP_amount_2; source F. Habermacher 2011; pedigree (1,1,1,1,1)
  Various lubricants used in the vehicle.Information on the materialisation of the dismatled vehicle are in F. Habermacher "Modeling material inventories and environmental impacts of electric passenger cars", Matser Thesis, Department of Environmental Sciences, ETH Zurich, 2011.
  production volume 0 kg
    Calculated from production volume of reference product using the relative outputs.
  property dry mass 0.9 kg; name DM
  property wet mass 1 kg; name WM
  property price 0 EUR2005; name BP_amount_2_price_EUR2005
  properties: carbon content, fossil 0.864444, heating value, net 34.7 MJ, water content 0.111111
  note on carbon content, fossil: Tab A.6, ecoinvent v2.2 report 13_I. C content has been calculated after data in the tables, and then referred to 1 kg DM
- internal combustion engine, passenger car: 0.305175 kg; = powertrain_weight; source H.-J. Althaus 2010; lognormal variance with pedigree 0.0444, pedigree (2,4,5,4,2)
  Based on currently available compact size cars.
- waste rubber, unspecified: -0.0184478, -0.000774435, -0.0184478 kg (3 entries); source F. Habermacher 2011; lognormal variance with pedigree 0.0504, pedigree (2,3,5,4,3)
  (same comment as for waste rubber, unspecified)
  production volume 1.35612e9 kg
- waste glass: -0.00406148, -0.000197069, -1.83862e-5, -8.22717e-5, -0.00213815, -2.79205e-5, -4.47083e-6, -0.0201503 kg (8 entries); source F. Habermacher 2011; lognormal variance with pedigree 0.0504, pedigree (2,3,5,4,3)
  (same comment as for waste glass)
  production volume 9.6048e8 kg
- waste mineral oil: -0.000693639, -1.71718e-5, -0.00181619 kg (3 entries); source F. Habermacher 2011; lognormal variance with pedigree 0.0504, pedigree (2,3,5,4,3)
  (same comment as for waste mineral oil)
  production volume 9.0972e7 kg
  properties: dry mass 0.9 kg, wet mass 1 kg, carbon content, fossil 0.864444, heating value, net 34.7 MJ, water content 0.111111

## Sampling procedure
Vehicle structure based on current commercially available vehicles.

## Extrapolations
This dataset has been extrapolated from year 2015 to the year of the calculation (2021). The uncertainty has been adjusted accordingly.

## Review by Christian Bauer 2012-09-13
passed
