# maintenance, electric scooter, without battery

Dataset: EcoSpold 2, unit process
Geography: GLO
Time period: 2007-01-01 to 2021-12-31
Technology level: current
Classification: EcoSpold01Categories: transport systems/road
Classification: ISIC rev.4 ecoinvent: 4540:Sale, maintenance and repair of motorcycles and related parts and accessori
Scenario: Business-as-Usual
System model: Allocation, cut-off by classification
Generated by: Andrea Del Duce
Published in: M. Leuenberger 2010
Database: ecoinvent
isCopyrightProtected: true
accessRestrictedTo: 1

## General comment
The data reflects the replacement of parts for the maintenance of an e-scooter of 144kg with a LiIo battery pack. Mainly plastic and steel parts are replaced. The battery is replaced in the transport dataset.
[This dataset was already contained in the ecoinvent database version 2. It was not individually updated during the transfer to ecoinvent version 3. Life Cycle Impact Assessment results may still have changed, as they are affected by changes in the supply chain, i.e. in other datasets. This dataset was generated following the ecoinvent quality guidelines for version 2. It may have been subject to central changes described in the ecoinvent version 3 change report (http://www.ecoinvent.org/database/ecoinvent-version-3/reports-of-changes/), and the results of the central updates were reviewed extensively. The changes added e.g. consistent water flows and other information throughout the database. The documentation of this dataset can be found in the ecoinvent reports of version 2, which are still available via the ecoinvent website. The change report linked above covers all central changes that were made during the conversion process.]

## Included activities start
This dataset takes as input the various materials replaced during the servicing.

## Included activities end
This data sets includes the maintenance of an electric scooter throughout its life cycle and the waste produced by the servicing.

## Geography
Data cover maintenance in Switzerland

## Technology
Maintenance of an electric scooter (max. 60-70km/h)

## Parameters
- fraction, tap water, to air: 0.15 dimensionless; name fraction_TW_to_air; = fraction_PW_to_air; lognormal variance with pedigree 0.092025, pedigree (4,4,3,2,4)
  Calculated value. See comment in the other parametres present in this dataset. Tap water is considered to be always used as process water, thus process water fractions to air are applied to all tap water input flows to calculate the amount of water consumed in the processes.
- fraction, process water, to air: 0.15 dimensionless; name fraction_PW_to_air; lognormal variance with pedigree 0.092025, pedigree (4,4,3,2,4)
  Literature value. In case when no industry/process specific data are available, default evaporation fraction value is used. This value is 15% and is based on literature (Statistics Canada, 2007 & Shaffer, K.H., 2008, Consumptive water use in the Great Lakes Basin, USGS & Shiklomanov, 2003, World Water Resources at the Beginning of the 21st Century) and has been approved by an expert.

## Reference product
- maintenance, electric scooter, without battery: 1 unit; name RP_amount_1; CPC 87141: Maintenance and repair services of motor vehicles; By-product classification allocatable product
  production volume 932000 unit; name RP_PV_1
    Rough estimate based on 1% electric scooters out of 466E6 world two wheeler production projection between 2010 and 2016.(www.electric-bicycle-guide.com)
  property price 78.947 EUR2005
    Calculated based on inputs: The price of the product has been calculated as a sum of the values of the material and energy inputs for this product. This value is therefore a rough estimation. It may underestimate the real price since there are additional expenses when producing any product. These expences can include for example labour costs, treatment of waste materials and profit for the producer. Please consider carefully whether this level of data quality is acceptable for your application.

## By-products
- iron scrap, unsorted: 0 kg; CPC 39310: Slag, dross, scalings and other waste from the manufacture of iron or steel; By-product classification Recyclable; pedigree (1,1,1,1,1)
  Maintenance waste - assumption based on substituted material from the ecoinvent v2.2 electric scooter maintenance dataset.
  production volume 0 kg; = BP_amount_2/ RP_amount_1* RP_PV_1
    Calculated from production volume of reference product using the relative outputs.
  property price 0.149 EUR2005
    Temporary price data. Calculated as 90% of purchasers price based on: estimated at 85% of sorted scrap
  property carbon content 0
    carbon content on a dry matter basis (reserved; not for manual entry)
  properties: carbon content, non-fossil 0, wet mass 1 kg, carbon content, fossil 0, water content 0, dry mass 1 kg, water in wet mass 0 kg, carbon allocation 0 kg
- aluminium scrap, post-consumer: 0 kg; CPC 39363: Waste and scrap of aluminium; By-product classification Recyclable; pedigree (1,1,1,1,1)
  (same comment as for iron scrap, unsorted)
  production volume 0 kg; = BP_amount_3/ RP_amount_1* RP_PV_1
    Calculated from production volume of reference product using the relative outputs.
  property price 0.685 EUR2005
    Temporary price data. Calculated as 90% of purchasers price based on: estimated at 85% of new scrap
  property carbon content 0
    carbon content on a dry matter basis (reserved; not for manual entry)
  properties: wet mass 1 kg, carbon content, non-fossil 0, dry mass 1 kg, water in wet mass 0 kg, water content 0, carbon content, fossil 0, carbon allocation 0 kg

## Inputs from technosphere
- waste rubber, unspecified: 0 kg; name BP_amount_4; source M. Leuenberger 2010; pedigree (1,1,1,1,1)
  Maintenance waste - based on the ecoinvent v2.2 electric scooter maintenance dataset.
  EcoSpold01Location=CH
  production volume 0 kg
    Calculated from the production volume of maintenance, electric scooter in proportion to the respective output amounts.
  property price 0 EUR2005; name BP_amount_4_price_EUR2005
  properties: dry mass 1 kg, carbon content, fossil 0.853, wet mass 1 kg, heating value, net 27.19 MJ
  note on heating value, net: Value taken from the general comment of the treatment dataset.
- tap water: 34.44 kg; name tap_water_input; source M. Leuenberger 2010; lognormal variance with pedigree 0.0112, pedigree (2,3,4,5,1)
  Assumption based on: Cherry, C.R. 2007, 1488 liters waste water for all production phases (incl. Battery manufacturing --> 50%)
  EcoSpold01Location=RER
  Uncertainty: Assumption based on: Cherry, C.R. 2007, 1488 liters waste water for all production phases (incl. Battery manufacturing --> 50%)
  properties: water content 2962.17, wet mass 1 kg, dry mass 0.000337476 kg, carbon content, fossil 0.00178991
  note on carbon content, fossil: Bicarbonate content is 2.93 mol/m3. CO2 content is 0.1 mol/m3 (ecoinvent v2.2 report 8, Tab 93.1).
- aluminium alloy, AlMg3: 1.5 kg; source M. Leuenberger 2010; lognormal variance with pedigree 0.0287, pedigree (2,2,4,5,3)
  Estimation:5% of aluminium parts replaced
  EcoSpold01Location=RER
  Uncertainty: Estimation:5% of aluminium parts replaced
  properties: dry mass 1 kg, wet mass 1 kg
- injection moulding: 1.872 kg; source M. Leuenberger 2010; lognormal variance with pedigree 0.0981, pedigree (4,2,4,5,4)
  EcoSpold01Location=RER
  Assumption
  Uncertainty: Assumption
- polyethylene, high density, granulate: 1.872 kg; source M. Leuenberger 2010; lognormal variance with pedigree 0.0287, pedigree (2,2,4,5,3)
  EcoSpold01Location=RER
  Estimation: Bicycle: 50% of plastic parts once replaced, Scooter 15% replaced
  Uncertainty: Estimation: Bicycle: 50% of plastic parts once replaced, Scooter 15% replaced
  properties: heating value, net 42.47 MJ, carbon content, fossil 0.857143, dry mass 1 kg, wet mass 1 kg
  note on carbon content, fossil: Polyethylene is formed out of a huge amount of ethylene monomers (C2H4) (ecoinvent v2.2 report 11_II). MW=28 g/mol
- waste plastic, mixture: 0 kg; name BP_amount_1; source M. Leuenberger 2010; pedigree (1,1,1,1,1)
  EcoSpold01Location=CH
  Maintenance waste - based on the ecoinvent v2.2 electric scooter maintenance dataset.
  production volume 0 kg
    (same comment as for waste rubber, unspecified)
  property price 0 EUR2005; name BP_amount_1_price_EUR2005
  properties: water content 0.180638, wet mass 1 kg, heating value, net 30.79 MJ, dry mass 0.847 kg, carbon content, fossil 0.747344
  note on carbon content, fossil: C content in 1 kg DM was calculated using data in Tab A.2, ecoinvent v2.2 report 13_I
- synthetic rubber: 47.168 kg; source M. Leuenberger 2010; lognormal variance with pedigree 0.0287, pedigree (2,2,4,5,3)
  EcoSpold01Location=RER
  Estimation: 3.75 (bike)/3 (scooter) tyre-sets use in life-time
  Uncertainty: Estimation: 3.75 (bike)/3 (scooter) tyre-sets use in life-time
  properties: wet mass 1 kg, heating value, net 26.42 MJ, carbon content, fossil 0.871949, dry mass 1 kg
  note on carbon content, fossil: EPDM (Ethylene-propene-diene terpolymer) rubber is a terpolymer of ethylene, propene, and a diene with the residual unsaturated portion of the diene in the side chain (ecoinvent v2.2 report 7-part XX & Ullmann). Chemical formula (deduced from Evidences of Solvent-Induced Miscibility in Polychloroprene-co-Ethylene-Propene Diene Terpolymer Blends, Dubey et al., Journal of Applied Polymer Science, 2009, 111:1884–1891): C20H35
- chromium steel removed by turning, average, conventional: 1.0589 kg; source M. Leuenberger 2010; lognormal variance with pedigree 0.0981, pedigree (4,2,4,5,4)
  Assumption
  EcoSpold01Location=RER
  Uncertainty: Assumption
  properties: wet mass 1 kg, carbon content, fossil 0.0008, dry mass 1 kg
- section bar extrusion, aluminium: 1.5 kg; source M. Leuenberger 2010; lognormal variance with pedigree 0.0981, pedigree (4,2,4,5,4)
  EcoSpold01Location=RER
  Assumption for pipe drawing
  Uncertainty: Assumption for pipe drawing
- steel, low-alloyed, hot rolled: 1.0589 kg; source M. Leuenberger 2010; lognormal variance with pedigree 0.0287, pedigree (2,2,4,5,3)
  EcoSpold01Location=RER
  Estimation: 5% of steel parts replaced, Scooter: 10%
  Uncertainty: Estimation: 5% of steel parts replaced, Scooter: 10%
  properties: carbon content, fossil 0.005, dry mass 1 kg, wet mass 1 kg
  note on carbon content, fossil: Low alloyed steel composition given in Tab. 3.2 ecoinvent v2.2 report 10_partII. Steel assumed to have a C content of 0.5%
- iron scrap, unsorted: -2.1178 kg; lognormal variance with pedigree 0.0661, pedigree (4,2,4,5,3)
  (same comment as for iron scrap, unsorted)
  production volume 1.97379e6 kg
  properties: price 0.149 EUR2005, wet mass 1 kg, dry mass 1 kg
- aluminium scrap, post-consumer: -1.5 kg; lognormal variance with pedigree 0.0361, pedigree (4,2,4,5,3)
  (same comment as for iron scrap, unsorted)
  production volume 1.398e6 kg
  properties: wet mass 1 kg, dry mass 1 kg, price 0.685 EUR2005
- waste rubber, unspecified: -23.0992, -0.969698, -23.0992 kg (3 entries); source M. Leuenberger 2010; lognormal variance with pedigree 0.0361, pedigree (4,2,4,5,3)
  (same comment as for waste rubber, unspecified)
  production volume 4.39606e7 kg
- waste plastic, mixture: -0.180189, -0.0138915, -0.00573768, -0.00544847, -0.207906, -0.00231796, -0.00105059, -1.45546 kg (8 entries); source M. Leuenberger 2010; lognormal variance with pedigree 0.0361, pedigree (4,2,4,5,3)
  (same comment as for waste plastic, mixture)
  production volume 1.7447e6 kg

## Emissions to nature
- Water [air, unspecified]: 0.005166 m3; name water_to_air_unspecified; = (tap_water_input/1000)*fraction_TW_to_air; lognormal variance with pedigree 0.130025, pedigree (4,4,5,2,4)
  Calculated value based on literature values and expert opinion. See comments in the parametres' comment field.
  property fraction, origin: salt water 0; name fraction_origin_salt_water
  property fraction, origin: fresh water 1; name fraction_origin_fresh_water
  property fraction, origin: unspecified 0; name fraction_origin_unspecified
- Water [water, unspecified]: 0.029274 m3; name water_to_water_unspecified; = (tap_water_input/1000)*(1-fraction_TW_to_air); lognormal variance with pedigree 0.130025, pedigree (4,4,5,2,4)
  (same comment as for Water)
  property fraction, origin: salt water 0; name fraction_origin_salt_water_Ww
  property fraction, origin: unspecified 0; name fraction_origin_unspecified_Ww
  property fraction, origin: fresh water 1; name fraction_origin_fresh_water_Ww

## Sampling procedure
Literature

## Extrapolations
This dataset has been extrapolated from year 2009 to the year of the calculation (2021). The uncertainty has been adjusted accordingly.

## Review by Christian Bauer 2012-09-14
passed
