# nickel mine operation and benefication to nickel concentrate, 7% Ni

Dataset: EcoSpold 2, unit process
Geography: CN
Time period: 2017-01-01 to 2021-12-31
Technology level: current
Classification: ISIC rev.4 ecoinvent: 2420:Manufacture of basic precious and other non-ferrous metals
Scenario: Business-as-Usual
System model: Allocation, cut-off by classification
Generated by: Efstathios Kakkos
Database: ecoinvent
isCopyrightProtected: true
accessRestrictedTo: 1

## General comment
This dataset is based on the following publication: Deng, S. Y., & Gong, X. Z. (2018). Life Cycle Assessment of Nickel Production in China. Materials Science Forum, 913, 1004-1010. doi:10.4028/www.scientific.net/MSF.913.1004 . Specific modifications were made in order to make the dataset more transparent.The publication deals with the pyrometallurgical production of electrolytic nickel (99.98% concentrated) by sulfide ore (1% concentration). This activity represents the production of nickel concentrate (6.78% beneficiated) from nickel sulfidic ore (1% concentration).

## Included activities start
The activity starts with the mining of sulfidic nickel ore from the ground.

## Included activities end
The activity ends with the production of nickel concentrate, 6.78% beneficiated.

## Allocation
No allocation is applied.

## Geography
Dataset valid for the entire corresponding region.

## Technology
Underground pit mining, crushing, grinding and beneficiation activities (through xanthates) are performed to produce the nickel concentrate.

## Time period
Data are considered representative of current production practices.

## Reference product
- nickel concentrate, 7% Ni: 1 kg; name NiCon; CPC 14220: Nickel ores and concentrates; By-product classification allocatable product
  production volume 3.56647e9 kg
    The production volume is expressed in kg. Its calculation is based on the fact that for the production of 1 kg of nickel class 1, 15.3727 kg of nickel concentrate, 6.78% beneficiated, is required as input (based on data disaggregation and simplified mass balance). The chinese annual production of refined nickel is 232000000 kg (according to the 2015 minerals yearbook provided by the U.S. Geological Survey).
  property price 0.628474 EUR2005; name NiCon_price_EUR2005
    Price calculated as:
    Price = (Ni content * Ni price) Treatment costs [TC] Refining costs [RC] Delivery costs Penalties.
    Equation source: Devlin (2015)
    Price data were taken from USGS (2020) and represent 5-year market averages (2015-2019). TC and RC data were taken from Díaz-Borrego et al. (2019) and represent 3-year market averages (2015-2017) for copper, which was used as a proxy here. Penalties and Delivery costs were assumed to be zero. Prices converted to EUR2005 (USD2019/EUR2005 exchange rate: 0.62; Official Data Foundation [2020] and Macrotrends [2020]).
    References:
    Devlin, D. (2015). Mineral product pricing study [Online]. Available from: https://www.imf.org/external/spanish/np/seminars/2015/andean/pdf/sesion5-devlin-en.pdf [Accessed 28/07/2020]
    Díaz-Borrego et al. (2019; https://doi.org/10.1155/2019/8523748)
    Official Data Foundation (2020). Inflation Calculator [Online]. Available from: https://www.officialdata.org/us/inflation/2005?endYear=2019&amount=1 [Accessed 28/07/2020]
    USGS (2020). Mineral Commodity Summaries 2020 [Online]. Available from: https://pubs.usgs.gov/periodicals/mcs2020/mcs2020.pdf [Accessed 28/07/2020]
    Macrotrends (2020). Euro Dollar Exchange Rate (EUR USD) - Historical Chart [Online]. Available from: https://www.macrotrends.net/2548/euro-dollar-exchange-rate-historical-chart [Accessed 28/07/2020]
  property carbon content 0
    carbon content on a dry matter basis (reserved; not for manual entry)
  properties: wet mass 1 kg, carbon content, non-fossil 0, dry mass 1 kg, nickel content 0.0678, water in wet mass 0 kg, carbon content, fossil 0, water content 0, carbon allocation 0 kg

## Inputs from technosphere
- chemical, organic: 0.000735068 kg; lognormal variance with pedigree 0.0035, pedigree (3,2,2,1,2)
  Value taken from Deng et al. (2018) (more information on the sampling procedure) and adjusted from the original dataset to correspond to the production of 1 kg of nickel concentrate, 6.78% beneficiated.
  Proxy considered for xanthate.
  properties: heating value, net 19.03 MJ, carbon content, fossil 0.628, wet mass 1 kg, dry mass 1 kg
  note on carbon content, fossil: This dataset is an unweighted average of 20 organic substances (listed in Tab 88.1, ecoinvent v2.2 report 8, part II), being part of the top100 chemicals included in this database. The C-content has also been calculated as an unweighted average of the C content of the substances composing this dataset.
- sulfidic tailings, from nickel mine operation: -9.52783 kg; lognormal variance with pedigree 0.0035, pedigree (3,2,2,1,2)
  This waste has been included for completeness and mass balance purposes and it was not originally present in the data source.
  production volume 3.39808e10 kg; = Ref('a990c114-cca3-48f8-ad64-48a0d0c59a70', 'ProductionVolume') * ((Ref('4385a563-0313-4451-b54a-97a2c0029ddf')*-1) / NiCon)
    The production volume is expressed in kg. Its calculation is based on the fact that for the production of 1 kg of nickel concentrate, 6.78% beneficiated, 9.527832457 of sulfidic tailings, from nickel mine operation will be produced as a byproduct (based on data disaggregation and simplified mass balance). The chinese annual production of nickel concentrate, is 3566473925 kg (see nickel concentrate production volume comment).
  properties: wet mass 1 kg, magnesium content 0.0022359, iron content 0.015374, oxygen content 0.89057, dry mass 0.7 kg, sodium content 0.0014472, potassium content 0.0025181, water content 0.42857, carbon content, fossil 0.0113341, silicon content 0.053273, aluminium content 0.014738, calcium content 0.0045972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
- hard coal: 0.234181 kg; lognormal variance with pedigree 0.0035, pedigree (3,2,2,1,2)
  Value taken from Deng et al. (2018) (more information on the sampling procedure) and adjusted from the original dataset to correspond to the production of 1 kg of nickel concentrate, 6.78% beneficiated.
  properties: dry mass 0.94 kg, wet mass 1 kg, carbon content, fossil 0.845, water content 0.0638298, heating value, net 27.91 MJ
  note on carbon content, fossil: C content 75-94% (specified in Tab 1.1, report 6, part VI). A mean content of 0.845 kg C/ kg dry hard coal was considered
  note on heating value, net: Based on the Characterization factor of Hard coal in the CED method
- natural gas, high pressure: 0.00305671 m3; lognormal variance with pedigree 0.0035, pedigree (3,2,2,1,2)
  (same comment as for hard coal)
  properties: carbon content, fossil 0.602381, dry mass 0.84 kg, heating value, net 39 MJ, wet mass 0.84 kg
  note on carbon content, fossil: An average C content of 0.506 kg C/ m3 has been assumed (this average has been calculated using data in Tab 3.5, ecoinvent v2.2 report 6_V
  note on heating value, net: Literature value, Source: United Nations Statistics Division (2018) International Recommendations for Energy Statistics (IRES). Available at: http://unstats.un.org/unsd/statcom/doc11/BG-IRES.pdf.
- wastewater, average: -0.00385648 m3; lognormal variance with pedigree 0.0035, pedigree (3,2,2,1,2)
  This waste has been included for completeness and mass balances purposes and it was not originally present in the data source.
  production volume 2.3896e7 m3
    The production volume is expressed in m3. Its calculation is based on the fact that for the production of 1 kg of nickel concentrate, 6.78% beneficiated, 0.003856476 m3 of wastewater will be produced as a byproduct (based on mass balance). The chinese annual production of nickel concentrate, is 3566473925 kg (see nickel concentrate production volume comment).
  properties: dry mass 0.346837 kg, water content 2882.2, carbon content, non-fossil 0.194039, wet mass 1000 kg
  note on carbon content, non-fossil: 0.0673 kg TOC/m3 (Tab A.17, ecoinvent v2.2 report 13_I). TOC was considered as Total Carbon.
- mine infrastructure, underground, non-ferrous metal: 1.127e-10 unit; lognormal variance with pedigree 0.3029, pedigree (3,2,2,1,2)
  Infrastructural input assumed for completeness purposes. Value taken from the existing dataset ''mining and benefication of nickel ore, CA-QC'' from the 3.5 version of the Ecoinvent database.
- petroleum: 0.0956499 kg; lognormal variance with pedigree 0.0035, pedigree (3,2,2,1,2)
  (same comment as for hard coal)
  properties: wet mass 1 kg, dry mass 1 kg, carbon content, fossil 0.85, heating value, net 43.2 MJ

## Inputs from nature
- Transformation, to industrial area [natural resource, land]: 0.0009285 m2; lognormal variance with pedigree 0.1229, pedigree (3,2,2,1,2)
  Input assumed for completeness purposes. Value taken from the existing dataset ''mining and benefication of nickel ore, CA-QC'' from the 3.5 version of the Ecoinvent database.
- Nickel, in ground [natural resource, in ground]: 0.0806623 kg; lognormal variance with pedigree 0.0035, pedigree (3,2,2,1,2)
  Value has been assumed for completness and mass balance purposes. .Amount based on disaggregation of the entire dataset and mass balace of the process. Nickel ore contains 1% of Nickel metal according to the publication (more information on the sampling procedure).
- Transformation, from unspecified [natural resource, land]: 0.0009285 m2; lognormal variance with pedigree 0.1229, pedigree (3,2,2,1,2)
  (same comment as for Transformation, to industrial area)
- Occupation, industrial area [natural resource, land]: 0.03714 m2*year; lognormal variance with pedigree 0.0429, pedigree (3,2,2,1,2)
  (same comment as for Transformation, to industrial area)
- Water, unspecified natural origin [natural resource, in water]: 0.00670018 m3; lognormal variance with pedigree 0.0035, pedigree (3,2,2,1,2)
  (same comment as for hard coal)
- Gangue, in ground [natural resource, in ground]: 7.98557 kg; lognormal variance with pedigree 0.0035, pedigree (3,2,2,1,2)
  Value has been assumed for completeness and mass balance purposes.

## Emissions to nature
- Chromium [air, low population density, long-term]: 2.70609e-8 kg; lognormal variance with pedigree 0.6529, pedigree (3,2,2,1,2)
  (same comment as for hard coal)
- Calcium [air, low population density, long-term]: 0.00159712 kg; lognormal variance with pedigree 0.0429, pedigree (3,2,2,1,2)
  Emission amount based on value from following Report: Classen et al (2009) Life Cycle inventories of metals, Part IV Nickel, page 21 table 5.16
- Cobalt [air, low population density, long-term]: 1.8724e-5 kg; lognormal variance with pedigree 0.6529, pedigree (3,2,2,1,2)
  Emission amount based on value from following Report: Classen et al (2009) Life Cycle inventories of metals, Part IV Nickel, page 21 table 5.8.
- Aluminium [air, low population density, long-term]: 0.0022816 kg; lognormal variance with pedigree 0.6529, pedigree (3,2,2,1,2)
  Emission amount based on value from following Report: Classen et al (2009) Life Cycle inventories of metals, Part IV Nickel, page 21 table 5.15
- Carbon monoxide, fossil [air, low population density, long-term]: 0.00811827 kg; lognormal variance with pedigree 0.6529, pedigree (3,2,2,1,2)
  (same comment as for hard coal)
- Arsenic [air, low population density, long-term]: 3.20047e-7 kg; lognormal variance with pedigree 0.6529, pedigree (3,2,2,1,2)
  (same comment as for hard coal)
- Lead [air, low population density, long-term]: 5.08042e-8 kg; lognormal variance with pedigree 0.6529, pedigree (3,2,2,1,2)
  (same comment as for hard coal)
- Platinum [air, low population density, long-term]: 1.8724e-8 kg; lognormal variance with pedigree 0.6529, pedigree (3,2,2,1,2)
  Emission amount based on value from following Report: Classen et al (2009) Life Cycle inventories of metals, Part IV Nickel, page 21 table 5.14
- Dinitrogen monoxide [air, low population density, long-term]: 7.4411e-6 kg; lognormal variance with pedigree 0.0429, pedigree (3,2,2,1,2)
  (same comment as for hard coal)
- Magnesium [air, low population density, long-term]: 0.00136896 kg; lognormal variance with pedigree 0.0429, pedigree (3,2,2,1,2)
  Emission amount based on value from following Report: Classen et al (2009) Life Cycle inventories of metals, Part IV Nickel, page 21 table 5.17
- Nitrogen oxides [air, low population density, long-term]: 0.00327203 kg; lognormal variance with pedigree 0.0429, pedigree (3,2,2,1,2)
  (same comment as for hard coal)
- Particulates, > 10 um [air, low population density, long-term]: 0.000322132 kg; lognormal variance with pedigree 0.0429, pedigree (3,2,2,1,2)
  Total particulate matter emmited is 0.000633589 kg (calculated value after dataset disagreggation). The mass fractions for PM<2.5, PM2.5 - 10 and PM>10 are 4.9%, 44.2% and 50.8% respectively and are based on the values of table 5.8 of the Classen report ''Life Cycle Inventories of Metals'' data v2.1 (2009) contained in the section Part IV Nickel page 21.
- Nickel [air, low population density, long-term]: 0.000561224 kg; lognormal variance with pedigree 0.6529, pedigree (3,2,2,1,2)
  Emission amount based on value from following Report: Classen et al (2009) Life Cycle inventories of metals, Part IV Nickel, page 21 table 5.11
- Copper [air, low population density, long-term]: 0.00045632 kg; lognormal variance with pedigree 0.6529, pedigree (3,2,2,1,2)
  Emission amount based on value from following Report: Classen et al (2009) Life Cycle inventories of metals, Part IV Nickel, page 21 table 5.9
- Carbon dioxide, fossil [air, low population density, long-term]: 0.694086 kg; lognormal variance with pedigree 0.0035, pedigree (3,2,2,1,2)
  (same comment as for hard coal)
- Vanadium [air, low population density, long-term]: 4.61857e-7 kg; lognormal variance with pedigree 0.6529, pedigree (3,2,2,1,2)
  (same comment as for hard coal)
- NMVOC, non-methane volatile organic compounds, unspecified origin [air, low population density, long-term]: 0.00054317 kg; lognormal variance with pedigree 0.0429, pedigree (3,2,2,1,2)
  (same comment as for hard coal)
- Particulates, < 2.5 um [air, low population density, long-term]: 3.1163e-5 kg; lognormal variance with pedigree 0.3029, pedigree (3,2,2,1,2)
  (same comment as for Particulates, > 10 um)
- Methane, fossil [air, low population density, long-term]: 1.44216e-5 kg; lognormal variance with pedigree 0.0429, pedigree (3,2,2,1,2)
  (same comment as for hard coal)
- Palladium [air, unspecified]: 1.23256e-9 kg; lognormal variance with pedigree 0.6529, pedigree (3,2,2,1,2)
  Emission amount based on value from following Report: Classen et al (2009) Life Cycle inventories of metals, Part IV Nickel, page 21 table 5.13
- Silver [air, low population density, long-term]: 1.9592e-7 kg; lognormal variance with pedigree 0.6529, pedigree (3,2,2,1,2)
  Emission amount based on value from following Report: Classen et al (2009) Life Cycle inventories of metals, Part IV Nickel, page 21 table 5.12
- Particulates, > 2.5 um, and < 10um [air, low population density, long-term]: 0.000280294 kg; lognormal variance with pedigree 0.1229, pedigree (3,2,2,1,2)
  (same comment as for Particulates, > 10 um)
- Sulfur dioxide [air, low population density, long-term]: 0.00227025 kg; lognormal variance with pedigree 0.0035, pedigree (3,2,2,1,2)
  (same comment as for hard coal)

## Sampling procedure
This dataset is based on the following publication:(Deng & Gong, 2018)Deng, S. Y., & Gong, X. Z. (2018). Life Cycle Assessment of Nickel Production in China. Materials Science Forum, 913, 1004-1010. doi:10.4028/www.scientific.net/MSF.913.1004. According to the authors of this publication the majority of the data originated from national statistics [1], or process design data [2]. The calculation of the emissions was based on emissions factors on the 2006 IPCC Guidelines for National Greenhouse Gas Inventories. The inventory of electricity, coke, diesel and other basic energy come from Boxue Sun`s results [3]. The sources used for the provision of the dataset is listed below:
[1] China nonferrous metals industry association, The almanac of China nonferrous metals in-dustry, 2011-2015[M], The Almanac of China Nonferrous Metals Industry, 2011-2015.

[2] Heavy metal smelting design manual (copper nickel roll)[M], Metallurgical Industry Press, 2007.

[3] B.X. Sun, Z.R. Nie, Y. Liu, X.Z. Gong, F. Gao, Z.H. Wang, Research on life cycle CO2 emmissions of energy carriers in China[J], Materials Research Innovations, 18 (2014), 56-61.

Inputs from the environment, infrastructural input and process outputs such as sulfidic tailings and wastewater have been assumed from the author of the dataset for compliance with the Ecoinvent guidelines and for mass balance purposes. Further details can be found at the comments of each individual exchange.

## Extrapolations
This dataset has been extrapolated from year 2018 to the year of the calculation (2021). The uncertainty has been adjusted accordingly.
