# ethanol production from maize

Dataset: EcoSpold 2, unit process
Geography: US
Time period: 1990-01-01 to 2021-12-31
Technology level: current
Classification: EcoSpold01Categories: biomass/fuels
Classification: ISIC rev.4 ecoinvent: 2011:Manufacture of basic chemicals
Tags: ConvertedDataset
Scenario: Business-as-Usual
System model: Allocation, cut-off by classification
Share of production covered: 0 %
Generated by: Edgard Gnansounou
Published in: Jungbluth N. 2007
Database: ecoinvent
isCopyrightProtected: true
accessRestrictedTo: 1

## General comment
Inventory refers to the production of 1 kg hydrated ethanol 95% (dry basis, i.e. 1.05 kg hydrated ethanol wet basis), respectively 1 kg of DDGS (wet basis) from corn grains. The multioutput-process 'corn, in distillery' delivers the co-products 'ethanol, 95% in H2O, from corn, at distillery' and 'DDGS, from corn, at distillery' (dry-milling technology). Economic allocation with allocation factor for common stages of 97.6% to ethanol. Allocation is done according to carbon balance for CO2 emissions.
[This dataset was already contained in the ecoinvent database version 2. It was not individually updated during the transfer to ecoinvent version 3. Life Cycle Impact Assessment results may still have changed, as they are affected by changes in the supply chain, i.e. in other datasets. This dataset was generated following the ecoinvent quality guidelines for version 2. It may have been subject to central changes described in the ecoinvent version 3 change report (http://www.ecoinvent.org/database/ecoinvent-version-3/reports-of-changes/), and the results of the central updates were reviewed extensively. The changes added e.g. consistent water flows and other information throughout the database. The documentation of this dataset can be found in the ecoinvent reports of version 2, which are still available via the ecoinvent website. The change report linked above covers all central changes that were made during the conversion process.]

## Included activities end
This dataset includes the transport of corn grains to the distillery, and the processing of corn grains to hydrated ethanol (95%) and DDGS (92% dry matter). System boundary is at the distillery. Dehydration to anhydrous ethanol is not included. The process described corresponds to the dry-milling technology.

## Geography
Data is from the etha+ project (Alcosuisse, CH), adapted to US context

## Technology
The process described corresponds to the dry-milling corn-to-ethanol technology. The production of DDGS from stillage includes separation of draff, concentration, drying and granulation. DDGS are used as animal feed.

## Time period
Data from 1990 to 2006, current dry-mill technology for the production of ethanol from corn

## Parameters
- fraction, cooling water, cooling pond system, to air: 0.032 dimensionless; name fraction_CW_CP_to_air; lognormal variance with pedigree 0.0413, pedigree (2,3,1,3,1)
  Calculated based on literature value (Scown, C.D., 2011, Water Footprint of U.S. Transportation Fuels and supplying information of the article) (Vionnet, S., Quantis Water Database - Technical Report, 2012).
- fraction, process water, to air: 0.02 dimensionless; name fraction_PW_to_air; lognormal variance with pedigree 0.092025, pedigree (4,4,3,2,4)
  Estimated value, expert opinion (Vionnet, S., Quantis Water Database - Technical Report, 2012).
- fraction, cooling water, recirculating system, to air: 0.771 dimensionless; name fraction_CW_R_to_air; lognormal variance with pedigree 0.0413, pedigree (2,3,1,3,1)
  (same comment as for fraction, cooling water, cooling pond system, to air)
- fraction, cooling water, to air: 0.64 dimensionless; name fraction_CW_to_air; lognormal variance with pedigree 0.092025, pedigree (4,4,3,2,4)
  Calculated value based on literature value (Schonoor, 2008) (Vionnet, S., Quantis Water Database - Technical Report, 2012).
- fraction, cooling water, once-through system, to air: 0.004 dimensionless; name fraction_CW_OT_to_air; lognormal variance with pedigree 0.0413, pedigree (2,3,1,3,1)
  (same comment as for fraction, cooling water, cooling pond system, to air)
- fraction, tap water, to air: 0.02 dimensionless; name fraction_TW_to_air; = fraction_PW_to_air; lognormal variance with pedigree 0.092025, pedigree (4,4,3,2,4)
  Calculated value. See comment in the other parametres present in this dataset. Tap water is considered to be always used as process water, thus process water fractions to air are applied to all tap water input flows to calculate the amount of water consumed in the processes.

## Reference product
- Distiller's Dried Grains with Solubles: 1 kg; CPC 23319: Preparations used in animal feeding n.e.c.; By-product classification allocatable product
  production volume 1.34369e10 kg
    Production volume of ethanol for use as a fuel was 12'000 Ml in 2004 in US
    Calculated relative to output of ethanol
  property price 0.00365 EUR2005
    Temporary price data.The price of ethanol, without water, in 95% solution state, from fermentation is 0.324 Euro (calculated as 90% of purchasers price based on: 2005 prices from FAPRI2007, 2009. Agricultural outlook. (http://www.fapri.missouri.edu/outreach/publications/ag_outlook.asp?current_page=outreach; accessed 22/06/10). Unit conversion from US gallon to kg - 1 gallon = 3.7856 liter * 0.789 kg/liter (ethanol density) = 2.9868 kg). When producing 0.30638kg of ethanol, without water, in 95% solution state, from fermentation, 0.32067kg of Distiller's Dried Grains with Solubles is produced as a by-product. The economic allocation factor in eiv2.2 was 98.837% for ethanol and 1.163% for Distiller's Dried Grains with Solubles. Following this assumption the price of the Distiller's Dried Grains with Solubles is calculated to be ((0.01163*0.324*0.30638)/(0.32067-0.01163*0.32067)=) 0.003643 Euro.
  property carbon content, non-fossil 0.4885
    Composition data obtained from Distillers Grain Corn with Solubles in (http://beefmagazine.com/images/2009%20feed%20table.pdf). First, composition data were refered to 1 kg dry mass. Then, C-contents were calculated considering a C-content/dry mass of 46% in carbohydrates (including fibres), 53% in proteins and 75% in fats. All data from "Evolutionary and Biochemical Aspects", A.D. Kay and T. Vrede (in Global Ecology, 2010, Elsevier B.V., S.E. Jørgensen Ed.).
  property carbon content 0.4885
    carbon content on a dry matter basis (reserved; not for manual entry)
  property true value 0.00117045
    allocation property applied in "true value" allocation // value calculated from revenue
  properties: EcoSpold01Allocation_undefined_21 2.50913, EcoSpold01Allocation_undefined_23 2.46969, EcoSpold01Allocation_undefined_22 1.53389, EcoSpold01Allocation_undefined_3 100, EcoSpold01Allocation_undefined_16 66.57, EcoSpold01Allocation_undefined_4 100, EcoSpold01Allocation_undefined_10 1.163, EcoSpold01Allocation_undefined_17 66.57, EcoSpold01Allocation_undefined_6 1.163, EcoSpold01Allocation_undefined_12 1.163, EcoSpold01Allocation_undefined_13 1.163, EcoSpold01Allocation_undefined_2 0, EcoSpold01Allocation_undefined_11 1.163, EcoSpold01Allocation_undefined_18 49.92, EcoSpold01Allocation_undefined_14 1.163, EcoSpold01Allocation_undefined_19 58.41, EcoSpold01Allocation_undefined_20 100, EcoSpold01Allocation_undefined_7 1.163, EcoSpold01Allocation_undefined_5 1.163, EcoSpold01Allocation_undefined_9 1.163, EcoSpold01Allocation_undefined_8 1.163, EcoSpold01Allocation_undefined_15 50.38, water content 0.0869565, dry mass 0.92 kg, carbon content, fossil 0, wet mass 1 kg, water in wet mass 0.08 kg, carbon allocation 0.44942 kg
- ethanol, without water, in 95% solution state, from fermentation: 0 kg; CPC 35491: Biodiesel; By-product classification allocatable product; CAS 64-17-5
  EcoSpold01Location=US
  production volume 1.2809e10 kg
    Production volume of ethanol for use as a fuel was 12'000 Ml in 2004 in US
    0.79 kg/l; Source: F. O. Licht World Ethanol and Biofuels Report, vol. 4, no. 17 (9 May 2006), p. 395.
  property heating value, net 31.58 MJ
    LHV is calculated based on the elemental composition of the substance. Based on the CAS number of the substance (000064-17-5), the chemical formula of the substance is found to be: C2H6O, (PubChem 2020).
    Reference: Kim, S., Chen, J., Cheng, T., Gindulyte, A., He, J., He, S., Li, Q., Shoemaker, B. A., Thiessen, P. A., Yu, B., Zaslavsky, L., Zhang, J., & Bolton, E. E. (2019). PubChem 2019 update: improved access to chemical data. Nucleic acids research, 47(D1), D1102–D1109. https://doi.org/10.1093/nar/gky1033
  property price 0.324 EUR2005
    Temporary price data. Calculated as 90% of purchasers price based on: 2005 prices from FAPRI2007, 2009. Agricultural outlook. (http://www.fapri.missouri.edu/outreach/publications/ag_outlook.asp?current_page=outreach; accessed 22/06/10). Unit conversion from US gallon to kg - 1 gallon = 3.7856 liter * 0.789 kg/liter (ethanol density) = 2.9868 kg
  property carbon content 0.521739
    carbon content on a dry matter basis (reserved; not for manual entry)
  property true value 0.0992671
    allocation property applied in "true value" allocation // value calculated from revenue
  properties: EcoSpold01Allocation_undefined_22 98.4661, EcoSpold01Allocation_undefined_23 97.5303, EcoSpold01Allocation_undefined_21 97.4909, EcoSpold01Allocation_undefined_8 98.84, EcoSpold01Allocation_undefined_15 49.62, EcoSpold01Allocation_undefined_14 98.84, EcoSpold01Allocation_undefined_10 98.84, EcoSpold01Allocation_undefined_6 98.84, EcoSpold01Allocation_undefined_5 98.84, EcoSpold01Allocation_undefined_17 33.43, EcoSpold01Allocation_undefined_18 50.08, EcoSpold01Allocation_undefined_7 98.84, EcoSpold01Allocation_undefined_19 41.59, EcoSpold01Allocation_undefined_12 98.84, EcoSpold01Allocation_undefined_4 0, EcoSpold01Allocation_undefined_9 98.84, EcoSpold01Allocation_undefined_13 98.84, EcoSpold01Allocation_undefined_2 100, EcoSpold01Allocation_undefined_3 0, EcoSpold01Allocation_undefined_11 98.84, EcoSpold01Allocation_undefined_16 33.43, EcoSpold01Allocation_undefined_1 100, carbon content, fossil 0, carbon content, non-fossil 0.521739, water content 0, water in wet mass 0 kg, wet mass 1 kg, dry mass 1 kg, carbon allocation 0.521739 kg

## Inputs from technosphere
- sulfuric acid: 0.000270864 kg; lognormal variance with pedigree 0.0501, pedigree (1,2,5,1,1)
  Etha+ project Alcosuisse, industrial data, cross checking with literature survey for US conditions
  EcoSpold01Location=RER
  Uncertainty: etha+ project Alcosuisse, industrial data, cross checking with literature survey for US conditions
  properties: wet mass 1 kg, dry mass 1 kg
- electricity, medium voltage: 0.00447467 kWh; lognormal variance with pedigree 0.0501, pedigree (1,2,5,1,1)
  EcoSpold01Location=US
  Etha+ project Alcosuisse, industrial data, cross checking with literature survey for US conditions
  Uncertainty: etha+ project Alcosuisse, industrial data, cross checking with literature survey for US conditions
- transport, tractor and trailer, agricultural: 0.00036341 metric ton*km; lognormal variance with pedigree 0.1701, pedigree (1,2,5,1,1)
  EcoSpold01Location=CH
  Assumption, ecoinvent guidelines, standard distances
  Uncertainty: Assumption, ecoinvent guidelines, standard distances
- inorganic nitrogen fertiliser, as N: 0.000108765 kg; lognormal variance with pedigree 0.0501, pedigree (1,2,5,1,1)
  (same comment as for sulfuric acid)
  properties: dry mass 1 kg, wet mass 1 kg
- ethanol fermentation plant: 5.61432e-12 unit; lognormal variance with pedigree 0.3501, pedigree (1,2,5,1,1)
  EcoSpold01Location=CH
  Etha+ project Alcosuisse, industrial data, cross checking with literature survey for US conditions
  Uncertainty: etha+ project Alcosuisse, industrial data, cross checking with literature survey for US conditions
- maize grain: 0.036341 kg; lognormal variance with pedigree 0.0501, pedigree (1,2,5,1,1)
  (same comment as for electricity, medium voltage)
  properties: water content 0.162791, carbon content, non-fossil 0.46957, wet mass 1 kg, dry mass 0.86 kg
  note on carbon content, non-fossil: Composition data obtained from Corn Grain Whole, in (http://beefmagazine.com/images/2009%20feed%20table.pdf). First, composition data were refered to 1 kg dry mass. Then, C-contents were calculated considering a C-content/dry mass of 46% in carbohydrates (including fibres), 53% in proteins and 75% in fats. All data from "Evolutionary and Biochemical Aspects", A.D. Kay and T. Vrede (in Global Ecology, 2010, Elsevier B.V., S.E. Jørgensen Ed.). Finally, C-content in kg was multiplied by kg dry mass in the exchange.
- tap water: 0.0475849 kg; name tap_water_input; lognormal variance with pedigree 0.0501, pedigree (1,2,5,1,1)
  EcoSpold01Location=RER
  Etha+ project Alcosuisse, industrial data, cross checking with literature survey for US conditions
  Uncertainty: etha+ project Alcosuisse, industrial data, cross checking with literature survey for US conditions
  properties: carbon content, fossil 0.00178991, water content 2962.17, wet mass 1 kg, dry mass 0.000337476 kg
  note on carbon content, fossil: Bicarbonate content is 2.93 mol/m3. CO2 content is 0.1 mol/m3 (ecoinvent v2.2 report 8, Tab 93.1).
- wastewater, from residence: -3.32498e-5 m3; lognormal variance with pedigree 0.0501, pedigree (1,2,5,1,1)
  Etha+ project Alcosuisse, industrial data, cross checking with literature survey for US conditions
  EcoSpold01Location=CH
  Uncertainty: etha+ project Alcosuisse, industrial data, cross checking with literature survey for US conditions
  production volume 3.82514e7 m3
    Calculated from the production volume of ethanol, without water, in 95% solution state, from fermentation in proportion to the respective output amounts.
  properties: carbon content, non-fossil 0.199421, water content 2962.17, wet mass 1000 kg, dry mass 0.337476 kg
  note on carbon content, non-fossil: 0.0673 kg TOC/m3 (Tab A.17, ecoinvent v2.2 report 13_I). TOC was considered as Total Carbon.
- heat, district or industrial, natural gas: 0.156403 MJ; lognormal variance with pedigree 0.0501, pedigree (1,2,5,1,1)
  (same comment as for sulfuric acid)
  properties: heating value, net 1 MJ
- ammonium sulfate: 0.000108765 kg; lognormal variance with pedigree 0.0501, pedigree (1,2,5,1,1)
  (same comment as for tap water)
  properties: dry mass 1 kg, wet mass 1 kg
- soda ash, light, crystalline, heptahydrate: 0.000406292 kg; lognormal variance with pedigree 0.0501, pedigree (1,2,5,1,1)
  (same comment as for sulfuric acid)
  properties: carbon content, fossil 0.0517241, dry mass 1 kg, wet mass 1 kg, heating value, net 3.43 MJ

## Inputs from nature
- Water, cooling, unspecified natural origin [natural resource, in water]: 4.92652e-5 m3; name water_cooling_UNO_input; source Schnoor, J.L. 2008; lognormal variance with pedigree 0.0546, pedigree (3,3,5,5,1)
  Calculated based on literature, (Vionnet, S., Quantis Water Database - Technical Report, 2012).
  property water content 9081.65; name water_content
  property dry mass 0.1101 kg; name DM
  property wet mass 1000 kg; name WM
  property carbon content, fossil 0.0104329; name C_content_fossil
  property water in wet mass 999.89 kg; name WWM
  property carbon content, non-fossil 0; name C_content_non_fossil
- Carbon dioxide, in air [natural resource, in air]: 0.0167964 kg; lognormal variance with pedigree 0.04, pedigree (1,1,5,1,1)
  Calculation, to close carbon balance
  Uncertainty: Calculation, to close carbon balance

## Emissions to nature
- Water [water, unspecified]: 3.11188e-5 m3; name water_to_water_unspecified; = (tap_water_input/1000)*(1-fraction_TW_to_air)+water_cooling_UNO_input*(1-fraction_CW_to_air)-0.00091494; lognormal variance with pedigree 0.0807, pedigree (2,2,5,1,1)
  Calculated value based on literature values and expert opinion. See comments in the parametres' comment field.
  property fraction, origin: fresh water 0.72447; name fraction_origin_fresh_water_Ww
  property fraction, origin: salt water 0; name fraction_origin_salt_water_Ww
  property fraction, origin: unspecified 0.27553; name fraction_origin_unspecified_Ww
- Carbon dioxide, non-fossil [air, urban air close to ground]: 0.0281239 kg; lognormal variance with pedigree 0.04, pedigree (1,1,5,1,1)
  Calculation, to close carbon balance
  Uncertainty: Calculation, to close carbon balance
- Water [air, unspecified]: 3.24814e-5 m3; name water_to_air_unspecified; = (tap_water_input/1000*fraction_TW_to_air)+(water_cooling_UNO_input*fraction_CW_to_air); lognormal variance with pedigree 0.0807, pedigree (2,2,5,1,1)
  (same comment as for Water)
  property fraction, origin: fresh water 0.0292998; name fraction_origin_fresh_water
  property fraction, origin: salt water 0; name fraction_origin_salt_water
  property fraction, origin: unspecified 0.9707; name fraction_origin_unspecified

## Sampling procedure
Data is from the etha+ project (Alcosuisse, CH), technology by French ethanol plant supplier, modelling by ENERS (CH)

## Review by Emilia Moreno Ruiz 2012-03-19
name change from "Distiller's Dried Grains with Solubles, from maize" to "Distiller's Dried Grains with Solubles"

## Review by Niels Jungbluth 2006-08-15
Passed.
none
