# nutrient supply from compost

Dataset: EcoSpold 2, unit process
Geography: GLO
Time period: 2016-01-01 to 2021-12-31
Technology level: current
Classification: ISIC rev.4 ecoinvent: 0161:Support activities for crop production
Scenario: Business-as-Usual
System model: Allocation, cut-off by classification
Generated by: Avraam Symeonidis
Database: ecoinvent
isCopyrightProtected: true
accessRestrictedTo: 1

## General comment
This inventory describes the supply of nutrients from ''compost'' for fertiliser use.
No machinery expenditures or emissions to the environment are considered related to the actual application of this substance on soil during its agricultural use. The purpose of this activity is to connect the chemical production of ''compost'' with its generic uses as fertilizer. The product ''compost'' is connected to the generic market for 'organic nitrogen fertiliser, as N' and 'organic phosphorus fertiliser, as P2O5' and 'organic potassium fertiliser, as K2O' through this supplying activity. In the agricultural context, ''compost'' can be used directly as a fertilizer input to crop production, eventually with other chemicals; alternatively, a generic input of 'organic nitrogen fertiliser, as N' and 'organic phosphorus fertiliser, as P2O5' and 'organic potassium fertiliser, as K2O' can be used instead, and this will represent the regional consumption mix for his type of nutrient. A way in between is allowed by using the generic input 'organic nitrogen fertiliser, as N' and 'organic phosphorus fertiliser, as P2O5' and 'organic potassium fertiliser, as K2O' and link to the activity providing it from a specific chemical.
In all cases, emissions associated to the application of the fertilizer have to be calculated in the crop production activity.

## Technology
Inventory based on composition of ''compost''.

## Reference product
- organic nitrogen fertiliser, as N: 0 kg; name nitrogen_fertiliser_output; CPC 34659: Fertilizers n.e.c.; By-product classification allocatable product
  compost contains 0.7% of nitrogen
  production volume 2.436e9 kg; = 3.48E+11* nitrogen_fertiliser_output
    In 2006, there were 91 MSW composting plants working in the whole country of Spain (the average capacity of composting plantsis 100,000 tons/year). In 2007 at least 10 more composting plants have been opened. Assumptions: - 5 new composting plants each year were build between 2005 and 2007. If 91 plants exist in 2006, it is assumed in 2005 there are 87 plants. (note: annual production is calculated for reference year 2005). - GDP ratio (World/Spain) is 40. Used to extrapolate spanish values to global production volumes.
  property carbon content, fossil 0
    Carbon content, fossil is calculated based on the chemical formula of the substance.
  property price 0.473 EUR2005; name nitrogen_fertiliser_output_price_EUR2005
    Set equal to the price of the corresponding inorganic fertiliser
  property nitrogen content 1
    Nitrogen content (on a dry matter basis) of organic nitrogen fertiliser, as N is calculated from the molecular formula of the substance (Nitrogen).
  property carbon content 0
    carbon content on a dry matter basis (reserved; not for manual entry)
  property true value 0.003311; name nitrogen_fertiliser_output_true_value
    allocation property applied in "true value" allocation // value calculated from revenue
  properties: wet mass 1 kg, water in wet mass 0 kg, carbon content, non-fossil 0, dry mass 1 kg, water content 0, carbon allocation 0 kg
- organic phosphorus fertiliser, as P2O5: 1 kg; name phosphate_fertiliser_output; By-product classification allocatable product; CPC 34659: Fertilizers n.e.c.
  compost contains 0.4% of phosphate
  production volume 1.392e9 kg; = 3.48E+11* phosphate_fertiliser_output
    (same comment as for organic nitrogen fertiliser, as N)
  property phosphorus content 0.436421
    Phosphorus content (on a dry matter basis) of organic phosphorus fertiliser, as P2O5 is calculated from the molecular formula of the substance (Phosphorus).
  property price 0.241 EUR2005; name phosphate_fertiliser_outpu_price_EUR2005
    Set equal to the price of the corresponding inorganic fertiliser
  property carbon content, fossil 0
    Carbon content, fossil is calculated based on the chemical formula of the substance.
  property oxygen content 0.563579
    Oxygen content (on a dry matter basis) of organic phosphorus fertiliser, as P2O5 is calculated from the molecular formula of the substance (Phosphorus).
  property carbon content 0
    carbon content on a dry matter basis (reserved; not for manual entry)
  property true value 0.000964; name phosphate_fertiliser_output_true_value
    allocation property applied in "true value" allocation // value calculated from revenue
  properties: water content 0, carbon content, non-fossil 0, dry mass 1 kg, water in wet mass 0 kg, wet mass 1 kg, carbon allocation 0 kg

## By-products
- organic potassium fertiliser, as K2O: 0 kg; name potassium_fertiliser_output; By-product classification allocatable product; CPC 34659: Fertilizers n.e.c.
  compost contains 0.6% of K2O
  production volume 2.088e9 kg; = 3.48E+11*potassium_fertiliser_output
    (same comment as for organic nitrogen fertiliser, as N)
  property price 0.188 EUR2005; name potassium_fertiliser_outpu_price_EUR2005
    Set equal to the price of the corresponding inorganic fertiliser
  property potassium content 0.830148
    Potassium content (on a dry matter basis) of organic potassium fertiliser, as K2O is calculated from the molecular formula of the substance (Potassium).
  property carbon content, fossil 0
    Carbon content, fossil is calculated based on the chemical formula of the substance.
  property oxygen content 0.169852
    Oxygen content (on a dry matter basis) of organic potassium fertiliser, as K2O is calculated from the molecular formula of the substance (Potassium).
  property carbon content 0
    carbon content on a dry matter basis (reserved; not for manual entry)
  property true value 0.001128; name potassium_fertiliser_output_true_value
    allocation property applied in "true value" allocation // value calculated from revenue
  properties: dry mass 1 kg, wet mass 1 kg, carbon content, non-fossil 0, water in wet mass 0 kg, water content 0, carbon allocation 0 kg

## Inputs from technosphere
- compost: 44.6048 kg; name compost_input
  combined production
  properties: zinc content 0.000184, cadmium content 3.6e-7, carbon content, non-fossil 0.183645, potassium content 0.01, water content 1, lead content 4.9e-5, wet mass 1 kg, chromium content 2.23e-5, phosphorus content 0.0035, copper content 5.77e-5, mercury content 1.2e-7, dry mass 0.5 kg, nitrogen content 0.014, nickel content 1.63e-5
