# treatment of wastewater from liquid crystal production, capacity 1.1E10l/year

Dataset: EcoSpold 2, unit process
Geography: CH
Time period: 1994-01-01 to 2021-12-31
Technology level: current
Classification: ISIC rev.4 ecoinvent: 3700:Sewerage
Classification: EcoSpold01Categories: waste management/wastewater treatment
Tags: ConvertedDataset; Treatment
Scenario: Business-as-Usual
System model: Allocation, cut-off by classification
Generated by: Roland Hischier
Published in: Hischier R. 2007
Database: ecoinvent
isCopyrightProtected: true
accessRestrictedTo: 1

## General comment
Wastewater purified in a moderatly large municipal wastewater treatment plant (capacity class 2), with an average capacity size of 71100 per-captia-equivalents PCE.
Wastewater contains (in kg/m3): BOD: 92.6 (GSD=122.5%); B: 0.0624 (GSD=224%); Cl: 0.0783 (GSD=224.1%);
[This dataset was already contained in the ecoinvent database version 2. It was not individually updated during the transfer to ecoinvent version 3. Life Cycle Impact Assessment results may still have changed, as they are affected by changes in the supply chain, i.e. in other datasets. This dataset was generated following the ecoinvent quality guidelines for version 2. It may have been subject to central changes described in the ecoinvent version 3 change report (http://www.ecoinvent.org/database/ecoinvent-version-3/reports-of-changes/), and the results of the central updates were reviewed extensively. The changes added e.g. consistent water flows and other information throughout the database. The documentation of this dataset can be found in the ecoinvent reports of version 2, which are still available via the ecoinvent website. The change report linked above covers all central changes that were made during the conversion process.]

## Included activities end
Infrastructure materials for municipal wastewater treatment plant, transports, dismantling. Land use burdens.

## Geography
Specific to the technology mix encountered in Switzerland in 2000. Well applicable to modern treatment practices in Europe, North America or Japan.

## Technology
Three stage wastewater treatment (mechanical, biological, chemical) including sludge digestion (fermentation) according to the average technology in Switzerland

## Parameters
- fraction, process water, to air: 0.1 dimensionless; name fraction_PW_to_air; lognormal variance with pedigree 0.092025, pedigree (4,4,3,2,4)
  Literature value (Statistics Canada, 2007 & Shaffer, K.H., 2008, Consumptive water use in the Great Lakes Basin, USGS) (Vionnet, S., Quantis Water Database - Technical Report, 2012).

## Reference product
- wastewater from liquid crystal production: -1 m3; name RP_amount_1; CPC 39920: Sewage sludge; By-product classification Waste
  production volume 0.0336675 m3; name RP_PV_1
    This is a placeholder value that does not reflect real-world production volumes. This dataset does not currently require a real-world production volume to work in the database framework, and no actual data were collected yet. This has no negative effect on the results of the ecoinvent database. The placeholder value of this activity was scaled according to the nominal GDP of 2005 (source: United Nations, http://data.un.org/Glossary.aspx?q=GDP+%28current+US%24%29, accessed 20130726) to reflect an appropriate share of the global production volume, which is also a placeholder value.
  property price 0 EUR2005; name RP_amount_1_price_EUR2005
    Waste products are assigned a price of zero as they are assumed to require further treatment.
  property carbon content, fossil 0.997666
    BOD is 9.26e-2 kg/kg (Tab 12.13, ecoinvent v2.2 report 18_III). BOD was converted to TOC, using conversion factors in Tab 4.10 (ecoinvent v2.2 report 13_IV). TOC was considered as Total Carbon.
  property carbon content 0.997666
    carbon content on a dry matter basis (reserved; not for manual entry)
  properties: carbon content, non-fossil 0, water in wet mass 939.729 kg, wet mass 1000 kg, water content 15.5918, dry mass 60.2706 kg, carbon allocation 60.1299 kg

## Inputs from technosphere
- process-specific burdens, slag landfill: 0.096796 kg; lognormal variance with pedigree 0.07, pedigree (1,1,5,1,1)
  burden from sludge incineration. Uncertainty calculated from wastewater composition and treatment model;activityLink introduced to establish a direct link to the corresponding regional supply of this product
- residual material landfill: 1.1464e-10 unit; lognormal variance with pedigree 0.07, pedigree (1,1,5,1,1)
  burden from sludge incineration. Uncertainty calculated from wastewater composition and treatment model
- cement, unspecified: 0.02201 kg; lognormal variance with pedigree 0.08, pedigree (1,1,5,1,1)
  (same comment as for residual material landfill)
  properties: dry mass 1 kg, wet mass 1 kg
- process-specific burdens, municipal waste incineration: 44.738 kg; lognormal variance with pedigree 0.04, pedigree (1,1,5,1,1)
  (same comment as for process-specific burdens, slag landfill)
- wastewater treatment facility, capacity 1.1E10l/year: 1.9883e-9 unit; lognormal variance with pedigree 0.04, pedigree (1,1,5,1,1)
  uncertainty heeded in exchanges of the module
  This exchange has an activity link directly to the producing activity because the product is primarily consumed in the same geographical area where it is produced.
- electricity, low voltage: 35.754 kWh; lognormal variance with pedigree 0.18, pedigree (1,1,5,1,1)
  direct wastewater treatment plant burden. Uncertainty calculated from wastewater composition and treatment model
- electricity, high voltage: 6.4319 kWh; lognormal variance with pedigree 0.49, pedigree (1,1,5,1,1)
  (same comment as for residual material landfill)
- liquid manure spreading, by vacuum tanker: 0.15115 m3; lognormal variance with pedigree 0.04, pedigree (1,1,5,1,1)
  burden from sludge spreading. Uncertainty calculated from wastewater composition and treatment model
  This exchange has an activity link directly to the producing activity because the product is primarily consumed in the same geographical area where it is produced.
- process-specific burdens, residual material landfill: 0.055025 kg; lognormal variance with pedigree 0.07, pedigree (1,1,5,1,1)
  (same comment as for process-specific burdens, slag landfill)
- chemical, inorganic: 2.0429e-5 kg; lognormal variance with pedigree 0.43, pedigree (1,1,5,1,1)
  (same comment as for residual material landfill)
  properties: dry mass 1 kg, wet mass 1 kg, carbon content, fossil 0.003
  note on carbon content, fossil: This dataset is an unweighted average of 20 inorganic substances (listed in Tab 88.1, ecoinvent v2.2 report 8, part II), being part of the top100 chemicals included in this database. The C-content has also been calculated as an unweighted average of the C content of the substances composing this dataset.
- municipal waste incineration facility: 1.1184e-8 unit; lognormal variance with pedigree 0.04, pedigree (1,1,5,1,1)
  (same comment as for residual material landfill)
- waste graphical paper: -0.0155 kg; name BP_amount_1; lognormal variance with pedigree 0.04, pedigree (1,1,5,1,1)
  (same comment as for electricity, low voltage)
  production volume 0.000521847 kg; = BP_amount_1* RP_PV_1/ABS( RP_amount_1)
    Calculated from the production volume of wastewater from liquid crystal production in proportion to the respective output amounts.
  property price 0 EUR2005; name BP_amount_1_price_EUR2005
  properties: water content 0.126126, dry mass 0.888 kg, carbon content, non-fossil 0.454955, heating value, net 14.12 MJ, wet mass 1 kg
  note on heating value, net: Value taken from the general comment of the treatment dataset.
- sewer grid, 1.1E10l/year, 242 km: 1.6832e-7 km; lognormal variance with pedigree 0.04, pedigree (1,1,5,1,1)
  (same comment as for wastewater treatment facility, capacity 1.1E10l/year)
- hydrochloric acid, without water, in 30% solution state: 1.2257e-5 kg; lognormal variance with pedigree 0.43, pedigree (1,1,5,1,1)
  (same comment as for residual material landfill)
  properties: heating value, net 3.32 MJ, wet mass 1 kg, dry mass 1 kg
- waste cement, hydrated: -0.055025 kg; name BP_amount_2; lognormal variance with pedigree 0.08, pedigree (1,1,5,1,1)
  (same comment as for residual material landfill)
  production volume 0.00185256 kg; = BP_amount_2* RP_PV_1/ABS( RP_amount_1)
    (same comment as for waste graphical paper)
  property price 0 EUR2005; name BP_amount_2_price_EUR2005
  properties: wet mass 1 kg, dry mass 1 kg
- slag landfill: 1.7208e-10 unit; lognormal variance with pedigree 0.07, pedigree (1,1,5,1,1)
  (same comment as for residual material landfill)
- heat, district or industrial, other than natural gas: 37.521 MJ; lognormal variance with pedigree 0.05, pedigree (1,1,5,1,1)
  (same comment as for residual material landfill)
  properties: heating value, net 1 MJ
- waste plastic, mixture: -0.0155 kg; name BP_amount_3; lognormal variance with pedigree 0.04, pedigree (1,1,5,1,1)
  (same comment as for electricity, low voltage)
  production volume 0.000521847 kg; = BP_amount_3* RP_PV_1/ABS( RP_amount_1)
    (same comment as for waste graphical paper)
  property price 0 EUR2005; name BP_amount_3_price_EUR2005
  properties: heating value, net 30.79 MJ, wet mass 1 kg, water content 0.180638, dry mass 0.847 kg, carbon content, fossil 0.747344
  note on carbon content, fossil: C content in 1 kg DM was calculated using data in Tab A.2, ecoinvent v2.2 report 13_I

## Emissions to nature
- DOC, Dissolved Organic Carbon [water, ground-, long-term]: 0.096316 kg; lognormal variance with pedigree 0.11, pedigree (1,1,5,1,1)
  emission from sludge incineration. Uncertainty calculated from wastewater composition and treatment model
- Carbon monoxide, fossil [air, urban air close to ground]: 0.14842 kg; lognormal variance with pedigree 0.16, pedigree (1,1,5,1,1)
  (same comment as for DOC, Dissolved Organic Carbon)
- Carbon [soil, agricultural]: 6.2203 kg; lognormal variance with pedigree 0.11, pedigree (1,1,5,1,1)
  emission from sludge spreading. Uncertainty calculated from wastewater composition and treatment model
- COD, Chemical Oxygen Demand [water, surface water]: 26.836 kg; lognormal variance with pedigree 0.04, pedigree (1,1,5,1,1)
  sewer overload discharge plus direct wastewater treatment plant emission plus emission from sludge incineration. Uncertainty calculated from wastewater composition and treatment model
- BOD5, Biological Oxygen Demand [water, surface water]: 8.78 kg; lognormal variance with pedigree 0.07, pedigree (1,1,5,1,1)
  (same comment as for COD, Chemical Oxygen Demand)
- COD, Chemical Oxygen Demand [water, ground-, long-term]: 0.24341 kg; lognormal variance with pedigree 0.11, pedigree (1,1,5,1,1)
  (same comment as for DOC, Dissolved Organic Carbon)
- Boron [water, surface water]: 0.034616 kg; lognormal variance with pedigree 0.59, pedigree (1,1,5,1,1)
  (same comment as for COD, Chemical Oxygen Demand)
- Chloride [water, surface water]: 0.0783 kg; lognormal variance with pedigree 0.67, pedigree (1,1,5,1,1)
  (same comment as for COD, Chemical Oxygen Demand)
- NMVOC, non-methane volatile organic compounds, unspecified origin [air, urban air close to ground]: 0.002122 kg; lognormal variance with pedigree 0.26, pedigree (1,1,5,1,1)
  direct digester gas emission. Uncertainty calculated from wastewater composition and treatment model
- Boron [soil, agricultural]: 0.011885 kg; lognormal variance with pedigree 0.71, pedigree (1,1,5,1,1)
  (same comment as for Carbon)
- TOC, Total Organic Carbon [water, ground-, long-term]: 0.096316 kg; lognormal variance with pedigree 0.11, pedigree (1,1,5,1,1)
  (same comment as for DOC, Dissolved Organic Carbon)
- DOC, Dissolved Organic Carbon [water, surface water]: 6.6981 kg; lognormal variance with pedigree 0.04, pedigree (1,1,5,1,1)
  (same comment as for COD, Chemical Oxygen Demand)
- Carbon dioxide, fossil [air, urban air close to ground]: 171.22 kg; lognormal variance with pedigree 0.06, pedigree (1,1,5,1,1)
  (same comment as for DOC, Dissolved Organic Carbon)
- Boron [water, ground-, long-term]: 0.012422 kg; lognormal variance with pedigree 0.71, pedigree (1,1,5,1,1)
  (same comment as for DOC, Dissolved Organic Carbon)
- Water [water, unspecified]: 0.9 m3; name water_to_water_unspecified; lognormal variance with pedigree 0.0807, pedigree (2,2,5,1,1)
  Calculated value based on water balance.
  property dry mass 0 kg; name DM
  property wet mass 1000 kg; name WM
  property fraction, origin: unspecified 0; name fraction_origin_unspecified_Ww
  property carbon content, non-fossil 0; name C_content_non_fossil
  property carbon content, fossil 0; name C_content_fossil
  property fraction, origin: salt water 0; name fraction_origin_salt_water_Ww
  property water in wet mass 1000 kg; name WWM
  property fraction, origin: fresh water 1; name fraction_origin_fresh_water_Ww
- Methane, fossil [air, urban air close to ground]: 0.46701 kg; lognormal variance with pedigree 0.14, pedigree (1,1,5,1,1)
  (same comment as for DOC, Dissolved Organic Carbon)
- BOD5, Biological Oxygen Demand [water, ground-, long-term]: 0.079617 kg; lognormal variance with pedigree 0.11, pedigree (1,1,5,1,1)
  (same comment as for DOC, Dissolved Organic Carbon)
- Water [air, unspecified]: 0.1 m3; name water_to_air_unspecified; lognormal variance with pedigree 0.0807, pedigree (2,2,5,1,1)
  Calculated value based on water balance.
  property fraction, origin: unspecified 1; name fraction_origin_unspecified
  property fraction, origin: fresh water 0; name fraction_origin_fresh_water
  property fraction, origin: salt water 0; name fraction_origin_salt_water
- TOC, Total Organic Carbon [water, surface water]: 7.1538 kg; lognormal variance with pedigree 0.07, pedigree (1,1,5,1,1)
  (same comment as for COD, Chemical Oxygen Demand)
- Boron [air, urban air close to ground]: 0.0022616 kg; lognormal variance with pedigree 0.71, pedigree (1,1,5,1,1)
  direct digester gas emission plus emission from sludge incineration. Uncertainty calculated from wastewater composition and treatment model

## Extrapolations
This dataset has been extrapolated from year 2000 to the year of the calculation (2021). The uncertainty has been adjusted accordingly.

## Review by Jürgen Sutter 2009-02-07
passed.
