# blower and heat exchange unit production, Storkair G 90

Dataset: EcoSpold 2, unit process
Geography: RER
Time period: 2003-01-01 to 2021-12-31
Technology level: current
Classification: EcoSpold01Categories: ventilation/production of components
Classification: ISIC rev.4 ecoinvent: 2819:Manufacture of other general-purpose machinery
Tags: ConvertedDataset
Scenario: Business-as-Usual
System model: Allocation, cut-off by classification
Generated by: Alex Primas
Published in: Hässig, W. 2007
Database: ecoinvent
isCopyrightProtected: true
accessRestrictedTo: 1

## General comment
Production of a typical component used for a decentral ventilation system in a multi family house. The house considered in the investigation includes 6 flats with 130 m2 floor area each and a ventilation rate of 120 m3/h.
[This dataset was already contained in the ecoinvent database version 2. It was not individually updated during the transfer to ecoinvent version 3. Life Cycle Impact Assessment results may still have changed, as they are affected by changes in the supply chain, i.e. in other datasets. This dataset was generated following the ecoinvent quality guidelines for version 2. It may have been subject to central changes described in the ecoinvent version 3 change report (http://www.ecoinvent.org/database/ecoinvent-version-3/reports-of-changes/), and the results of the central updates were reviewed extensively. The changes added e.g. consistent water flows and other information throughout the database. The documentation of this dataset can be found in the ecoinvent reports of version 2, which are still available via the ecoinvent website. The change report linked above covers all central changes that were made during the conversion process.]

## Included activities end
Materials used for the production. Estimation of electricity use for the different production steps. Energy use for heating of the production building. Transport of raw materials to the plant. Estimation for the Infrastructure of the Production site included.

## Geography
Data for production in the Netherlands used.

## Technology
Ventilation unit for decentral ventilation systems with 120 m3/h average air flow. Housing made of galvanised steel insulated with expanded polystyrene. Heat recovery element made of polystyrene. Total weight of component 32.7 kg

## Time period
Materials investigated in 2003

## Reference product
- blower and heat exchange unit, Storkair G 90: 1 unit; By-product classification allocatable product; CPC 43911: Producer gas or water gas generators; acetylene gas generators and similar water process gas generators; disti[…]
  EcoSpold01Location=RER
  production volume 1.32237 unit
    This is a placeholder value that does not reflect real-world production volumes. This dataset does not currently require a real-world production volume to work in the database framework, and no actual data were collected yet. This has no negative effect on the results of the ecoinvent database. The placeholder value of this activity was scaled according to the nominal GDP of 2005 (source: United Nations, http://data.un.org/Glossary.aspx?q=GDP+%28current+US%24%29, accessed 20130726) to reflect an appropriate share of the global production volume, which is also a placeholder value.
  property carbon content, non-fossil 1.31112e-6
    C content was calculated as an addition of C content in the product components
  property carbon content, fossil 0.265805
    C content was calculated as an addition of C content in the product components
  property price 63.4145 EUR2005
    Calculated based on inputs: The price of the product has been calculated as a sum of the values of the material and energy inputs for this product. This value is therefore a rough estimation. It may underestimate the real price since there are additional expenses when producing any product. These expences can include for example labour costs, treatment of waste materials and profit for the producer. Please consider carefully whether this level of data quality is acceptable for your application.
  property carbon content 0.265806
    carbon content on a dry matter basis (reserved; not for manual entry)
  properties: dry mass 32.7 kg, wet mass 32.7 kg, water in wet mass 0 kg, water content 0, carbon allocation 8.69186 kg

## Inputs from technosphere
- electricity, medium voltage: 12 kWh; lognormal variance with pedigree 0.108, pedigree (3,5,5,1,3)
  EcoSpold01Location=UCTE
  Data estimated from related processes
  Uncertainty: Data estimated from related processes
- copper, cathode: 0.715 kg; lognormal variance with pedigree 0.054, pedigree (3,4,5,1,1)
  Questionnaire, estimations
  EcoSpold01Location=RER
  Uncertainty: Questionnaire, estimations
  properties: wet mass 1 kg, dry mass 1 kg
- wire drawing, copper: 0.715 kg; lognormal variance with pedigree 0.054, pedigree (3,4,5,1,1)
  EcoSpold01Location=RER
  Questionnaire, estimations
  Uncertainty: Questionnaire, estimations
- steel, low-alloyed: 8.22 kg; lognormal variance with pedigree 0.0526, pedigree (2,4,5,1,1)
  Questionnaire
  EcoSpold01Location=RER
  Uncertainty: Questionnaire
  properties: carbon content, fossil 0.005, dry mass 1 kg, wet mass 1 kg
  note on carbon content, fossil: Low alloyed steel composition given in Tab. 3.2 ecoinvent v2.2 report 10_partII. Steel assumed to have a C content of 0.5%
- powder coat, steel: 1.5 m2; lognormal variance with pedigree 0.054, pedigree (3,4,5,1,1)
  EcoSpold01Location=RER
  Questionnaire, estimations
  Uncertainty: Questionnaire, estimations
- waste polystyrene: -0.66 kg; lognormal variance with pedigree 0.07, pedigree (4,4,5,1,1)
  Estimations on precentage material disposed
  EcoSpold01Location=CH
  Uncertainty: Estimations on precentage material disposed
  production volume 0.66 kg
    Calculated from the production volume of blower and heat exchange unit, Storkair G 90 in proportion to the respective output amounts.
  properties: heating value, net 38.67 MJ, carbon content, fossil 0.922579, dry mass 0.998 kg, water content 0.00200401, wet mass 1 kg
  note on heating value, net: Value taken from the general comment of the treatment dataset.
- heat, district or industrial, other than natural gas: 65.17 MJ; lognormal variance with pedigree 0.076, pedigree (4,5,5,1,1)
  EcoSpold01Location=RER
  Data estimated from related companies
  Uncertainty: Data estimated from related companies
  properties: heating value, net 1 MJ
- zinc coat, coils: 1.7 m2; lognormal variance with pedigree 0.054, pedigree (3,4,5,1,1)
  EcoSpold01Location=RER
  Questionnaire, estimations
  Uncertainty: Questionnaire, estimations
- steel, chromium steel 18/8, hot rolled: 0.198 kg; lognormal variance with pedigree 0.0526, pedigree (2,4,5,1,1)
  EcoSpold01Location=RER
  Questionnaire
  Uncertainty: Questionnaire
  properties: carbon content, fossil 0.0008, dry mass 1 kg, wet mass 1 kg
  note on carbon content, fossil: Stainless steel model is the grade 304 steel (18/8 stainless, 18% chromium 8% nickel; max. 0.08% C)
- sheet rolling, aluminium: 0.88 kg; lognormal variance with pedigree 0.054, pedigree (3,4,5,1,1)
  Questionnaire, estimations
  EcoSpold01Location=RER
  Uncertainty: Questionnaire, estimations
- aluminium, wrought alloy: 0.88 kg; lognormal variance with pedigree 0.0526, pedigree (2,4,5,1,1)
  EcoSpold01Location=RER
  Questionnaire
  Uncertainty: Questionnaire
  properties: wet mass 1 kg, dry mass 1 kg
- polystyrene, high impact: 7.26 kg; lognormal variance with pedigree 0.0526, pedigree (2,4,5,1,1)
  Questionnaire
  EcoSpold01Location=RER
  Uncertainty: Questionnaire
  properties: dry mass 1 kg, carbon content, fossil 0.923077, wet mass 1 kg, heating value, net 38.67 MJ
  note on carbon content, fossil: Chemical formula of polystyrene is (C8H8)n (ecoinvent v2.2 report 11_II)
- electronics, for control units: 0.35 kg; lognormal variance with pedigree 0.072, pedigree (3,4,5,1,3)
  EcoSpold01Location=RER
  Questionnaire, approximation for technology
  Uncertainty: Questionnaire, approximation for technology
  properties: carbon content, non-fossil 0.00013442, dry mass 1 kg, carbon content, fossil 0.337146, wet mass 1 kg
  note on carbon content, non-fossil: The control unit has a composition of 46% steel (housing), 32% plastics, 14% printed wiring boards and 8% cables (various types).;
- sheet rolling, steel: 23.6 kg; lognormal variance with pedigree 0.054, pedigree (3,4,5,1,1)
  EcoSpold01Location=RER
  Questionnaire, estimations
  Uncertainty: Questionnaire, estimations
- steel, unalloyed: 15.4 kg; lognormal variance with pedigree 0.0526, pedigree (2,4,5,1,1)
  EcoSpold01Location=RER
  Questionnaire
  Uncertainty: Questionnaire
  properties: dry mass 1 kg, carbon content, fossil 0.0025, wet mass 1 kg
  note on carbon content, fossil: Unalloyed steels or carbon steels are those in which the level of an individual element in no case reaches or exceeds the limiting concentration given in Tab. 3.1 ecoinvent v2.2 report 10_partII. Assumed to have a C content of 0.25%
- polystyrene foam slab: 2.86 kg; lognormal variance with pedigree 0.0526, pedigree (2,4,5,1,1)
  Questionnaire
  EcoSpold01Location=RER
  Uncertainty: Questionnaire
  properties: heating value, net 38.67 MJ, carbon content, fossil 0.859091, dry mass 1 kg, wet mass 1 kg
  note on carbon content, fossil: XPS consists in 91% of polystyrene, 7% of blowing agent and the re-maining 2% are flame retardants (bromine compounds) and other additives (ecoinvent v2.2 report 7, part XIV, pg69). The chemical formula of polystyrene is (C8H8)n. Here, the blowing agent is CO2.
- sheet rolling, chromium steel: 0.198 kg; lognormal variance with pedigree 0.054, pedigree (3,4,5,1,1)
  Questionnaire, estimations
  EcoSpold01Location=RER
  Uncertainty: Questionnaire, estimations
- waste expanded polystyrene: -0.26 kg; lognormal variance with pedigree 0.07, pedigree (4,4,5,1,1)
  (same comment as for waste polystyrene)
  production volume 0.26 kg
    (same comment as for waste polystyrene)
  properties: carbon content, fossil 0.864875, wet mass 1 kg, water content 0.0526316, dry mass 0.95 kg, heating value, net 38.67 MJ
  note on carbon content, fossil: Average of different polystyrene extruded. Shares are 50% (w/w) extruded using CO2/acetone as blowing agent, 25% (w/w) using HFC-134a as a blowing agent and 25% (w/w) using HFC-152a as a blowing agent (ecoinvent v2.2 report 16, part XIV, Tab 4.21). Similar result is reported in Tab A.5, ecoinvent report 13_I.
- heat, district or industrial, natural gas: 65.17 MJ; lognormal variance with pedigree 0.076, pedigree (4,5,5,1,1)
  (same comment as for heat, district or industrial, other than natural gas)
  properties: heating value, net 1 MJ
- injection moulding: 7.26 kg; lognormal variance with pedigree 0.0526, pedigree (2,4,5,1,1)
  Questionnaire
  EcoSpold01Location=RER
  Uncertainty: Questionnaire
- ventilation components factory: 1.31e-7 unit; lognormal variance with pedigree 0.394, pedigree (4,5,5,1,3)
  EcoSpold01Location=RER
  Calculated with data of a similar company
  Uncertainty: Calculated with data of a similar company

## Sampling procedure
Questionnaire and technical information of producer. Data of one common product used.

## Extrapolations
This dataset has been extrapolated from year 2003 to the year of the calculation (2021). The uncertainty has been adjusted accordingly.

## Review by Rolf Frischknecht 2007-08-16
passed
none
