# planing, lath, softwood, u=10%

Dataset: EcoSpold 2, unit process
Geography: Europe without Switzerland
Time period: 2011-01-01 to 2021-12-31
Technology level: current
Classification: ISIC rev.4 ecoinvent: 1610:Sawmilling and planing of wood
Tags: Swiss brush-up completed
Scenario: Business-as-Usual
System model: Allocation, cut-off by classification
Generated by: Frank Werner
Published in: BFS 2013
Database: ecoinvent
isCopyrightProtected: true
accessRestrictedTo: 1

## General comment
This dataset represents the planing of one m3 softwood lath that has been kiln dried to 10% moisture content. The planing mill is assumed to be located on the sawmill site. The suction of the shavings is modeled in a separate activity.
The data was provided by and approved by the Swiss forest industry (Holzindustrie Schweiz HIS).
Within ecoinvent, three products - boards, beams and laths - are distinguished:

## Included activities start
Planing process starting from kiln dried softwood lath with a moisture content of 10%, at sawmill site.

## Included activities end
This activity ends with planed softwood lath, at plant. The dataset includes the planing process at the sawmill site and input of wood. The dataset does not include dust emissions.

## Geography
Represents average Swiss conditions assumed to be represenative for Europe

## Parameters
- wood density, apparent: 464.64 kg/m3; name wood_d_apparent; = (1+moisture_lath/100)* basic_wood_d
  kg wet matter/wet volume
- wood density, basic: 422.4 kg/m3; name basic_wood_d; = dry_wood_d*(1-moisture_lath*shrinkage_ratio)
  kg oven-dry matter/wet volume
- share of lath: 87 dimensionless; name share_lath
  share of lath production from volume of sawnwood input
- moisture content lath: 10 dimensionless; name moisture_lath
  moisture content of lath
- shrinkage ratio (u=30% - 0%): 0.004 dimensionless; name shrinkage_ratio
  shrinkage of volume in % per change (%) in moisture content, relevant between u=30% to 0%
- share of shaving: 13 dimensionless; name share_shaving
  share of shaving production from volume of sawnwood input
- wood density, dry: 440 kg/m3; name dry_wood_d
  kg oven-dry matter/oven-dry volume

## Reference product
- shavings, softwood, loose, measured as dry mass: 1 kg; name m_shavings; = lath_raw_u10* share_shaving/100* basic_wood_d; source BFS 2013; CPC 39283: Non-agglomerated wood waste and scrap; By-product classification allocatable product; pedigree (1,1,1,1,1)
  calculated as dry mass
  production volume 5.65116e8 kg; = 7258482.75862067/1250*(98570-1250)
    Scaled from the PV estimates of the Swiss sawmilling chain based UNECE data for 2013 for the production volumes of Switzerland (1'250'000 m3) and the production volume of Europe without Switzerland ( 97'570'000 m3 - 1'250'000 m3).
  property heating value, net 12.61 MJ
    LHV is calculated based on the Carbon content of the product. More details can be found on the respective documentation.
  property price 0.113 EUR2005
    Calculated based on data from FAOSTAT (accessed 20140429). The price is calculated by using data on total world import quantity (m3) and import value (1000 USD), year 2005. 40461924 m3 of Chips and Particles was imported in the world in 2005. The import value was 3022227000 USD. The calculated price is thus (3022227000/40461924=74.7*0.8=) 62.2 Euro/m3. It is estimated, that the chips and particles are half hardwood (of density 650 kg/m3) and half softwood (of density 450 kg/m3), thus the remaining mixture has a density of 550 kg/m3. The recalculated price is (1/550*62.2=) 0.11 Euro/kg. Using the same approach the calculated price for 2010 was 0.123 Euro/kg.
  property carbon content 0.494
    carbon content on a dry matter basis (reserved; not for manual entry)
  property true value 7.13225; name m_shavings_true_value
    allocation property applied in "true value" allocation // value calculated from revenue
  properties: water content 0.15, wet mass 1.15 kg, carbon content, fossil 0, dry mass 1 kg, water in wet mass 0.15 kg, carbon content, non-fossil 0.494, carbon allocation 0.494 kg
- sawnwood, lath, softwood, dried (u=10%), planed: 0 m3; name lath_planed; source BFS 2013; CPC 31101: Wood, sawn or chipped lengthwise, sliced or peeled, of a thickness exceeding 6 mm, of coniferous wood; By-product classification allocatable product
  production volume 8.95344e6 m3; name p_sawnwood_planed; = 115000/1250*(98570-1250)
    (same comment as for shavings, softwood, loose, measured as dry mass)
  property dry mass 422.4 kg; = basic_wood_d
  property price 160 EUR2005
    Expert judgement (Urs Luginbühl, Swiss Sawmilling industry, personal communication in June 2014). Cross-reference; FAOSTAT (accessed 20140428). The price is calculated by using data on total world import quantity (m3) and import value (1000 USD), year 2005. 109432798 m3 of Sawnwood (C) - coniferous was imported in the world in 2005. The import value was 22249842000 USD. The calculated price is thus (22249842000/109432798=203*0.8=) 164 Euro.
  property water in wet mass 42.24 kg; = basic_wood_d*moisture_lath/100
  property heating value, net 6218.91 MJ
    LHV is calculated based on the Carbon content of the product. More details can be found on the respective documentation.The property is based on a value of 13.38MJ/kg
  property water content 0.1; = moisture_lath/100
  property wet mass 464.64 kg; = basic_wood_d*(1+moisture_lath/100)
  property carbon content 0.494
    carbon content on a dry matter basis (reserved; not for manual entry)
  property true value 160; name lath_planed_true_value
    allocation property applied in "true value" allocation // value calculated from revenue
  properties: carbon content, fossil 0, carbon content, non-fossil 0.494, carbon allocation 208.666 kg

## Inputs from technosphere
- sawnwood, lath, softwood, raw, dried (u=10%): 0.000777139 m3; name lath_raw_u10; = 1/(1-share_shaving/100); source BFS 2013; lognormal variance with pedigree 0.235, pedigree (5,5,5,5,5)
  input of raw sawn wood to be planed; usually processes within the sawmill that produces the raw sawn wood
  property water content 0.1; name water_content
  properties: carbon content, non-fossil 0.494, dry mass 422.4 kg, heating value, net 6218.91 MJ, wet mass 464.64 kg
- electricity, medium voltage: 0.0150773 kWh; name elec_medvol; source BFS 2013; lognormal variance with pedigree 0.0337, pedigree (2,1,4,3,1)
  electricity consumed for the planing; the suction of the shavings in covered in a separate dataset; data from Swiss industry
  properties: UVEK_relative_amount_1 1, UVEK_link_1 1779
  note on UVEK_relative_amount_1: to be used only in special submissions in coordination with ecoinvent and the Swiss FOEN
- planing mill: 4.79032e-10 unit; name planemill; source BFS 2013; lognormal variance with pedigree 0.5587, pedigree (2,1,4,3,1)
  data taken from ecoinvent 2.2 dataset
  properties: UVEK_link_1 3514, UVEK_relative_amount_1 1

## Inputs from nature
- Carbon dioxide, non-fossil, resource correction [natural resource, in air]: 1.21674 kg; pedigree (1,1,1,1,1)
  This exchange has been added after economic allocation in order to re-balance the non-fossil carbon dioxide resource extraction.

## Sampling procedure
complementary literature and sampling from sawmills; CH data used to approximate European processes
