# optical brighteners production, for paper production

Dataset: EcoSpold 2, unit process
Geography: RER
Time period: 2000-01-01 to 2021-12-31
Technology level: current
Classification: ISIC rev.4 ecoinvent: 2011:Manufacture of basic chemicals
Classification: EcoSpold01Categories: chemicals/organics
Tags: ConvertedDataset
Scenario: Business-as-Usual
System model: Allocation, cut-off by classification
Generated by: Roland Hischier
Published in: Hischier R. 2007
Database: ecoinvent
isCopyrightProtected: true
accessRestrictedTo: 1

## General comment
The functional unit represent 1 kg of optical brighteners. Very large uncertainty of the process data, as only a mixture of different materials is included.
[This dataset was already contained in the ecoinvent database version 2. It was not individually updated during the transfer to ecoinvent version 3. Life Cycle Impact Assessment results may still have changed, as they are affected by changes in the supply chain, i.e. in other datasets. This dataset was generated following the ecoinvent quality guidelines for version 2. It may have been subject to central changes described in the ecoinvent version 3 change report (http://www.ecoinvent.org/database/ecoinvent-version-3/reports-of-changes/), and the results of the central updates were reviewed extensively. The changes added e.g. consistent water flows and other information throughout the database. The documentation of this dataset can be found in the ecoinvent reports of version 2, which are still available via the ecoinvent website. The change report linked above covers all central changes that were made during the conversion process.]

## Included activities end
Mixture of two optical brighteners. Only input of mentioned substances is taken into account.

## Geography
Data used has no specific geographical origin (two examples included already into the database chosen). Data are used as European average data.

## Technology
equal split to two substances without any further inputs/outputs

## Reference product
- optical brighteners, for paper production: 1 kg; By-product classification allocatable product; CPC 34: Basic chemicals
  EcoSpold01Location=RER
  production volume 1.32237 kg
    This is a placeholder value that does not reflect real-world production volumes. This dataset does not currently require a real-world production volume to work in the database framework, and no actual data were collected yet. This has no negative effect on the results of the ecoinvent database. The placeholder value of this activity was scaled according to the nominal GDP of 2005 (source: United Nations, http://data.un.org/Glossary.aspx?q=GDP+%28current+US%24%29, accessed 20130726) to reflect an appropriate share of the global production volume, which is also a placeholder value.
  property heating value, net 16.9 MJ
    LHV is calculated based on the Carbon content of the product. More details can be found on the respective documentation.
  property price 2.6 EUR2005
    Calculated value based on data from United Nations Commodity Trade Statistics Database (comtrade.un.org). UN comtrade category: 320420 Syntetic organic fluorescent brightening agents. Year 2005. Using exchange rate of 1EURO = 1.209 USD. Average of price of import into 5 main markets (EU, US, JP, IN and CN).
  property carbon content, fossil 0.557859
    Mixture of two optical brighteners (DAS-1 and distyrylbiphenyl type), ecoinvent v2.2 report 11-III, pg 298
  property carbon content, non-fossil 0
    (same comment as for optical brighteners, for paper production)
  property carbon content 0.557859
    carbon content on a dry matter basis (reserved; not for manual entry)
  properties: water content 0, wet mass 1 kg, dry mass 1 kg, water in wet mass 0 kg, carbon allocation 0.557859 kg

## Inputs from technosphere
- fluorescent whitening agent, distyrylbiphenyl type: 0.5 kg; lognormal variance with pedigree 0.1561, pedigree (5,5,5,3,3)
  Estimated, based on available modules
  EcoSpold01Location=RER
  Uncertainty: estimated, based on available modules
  properties: heating value, net 22.42 MJ, carbon content, fossil 0.596803, wet mass 1 kg, dry mass 1 kg
  note on carbon content, fossil: MW of Distyrylbiphenyl sulfonate is 563. It contains 28 C atoms (BgVV Health assessment of certain stilbene derivatives. Health assessment of specific stilbene derivatives used as textile auxiliaries or in detergents, 2001)
- fluorescent whitening agent, DAS1, triazinylaminostilben type: 0.5 kg; lognormal variance with pedigree 0.1561, pedigree (5,5,5,3,3)
  (same comment as for fluorescent whitening agent, distyrylbiphenyl type)
  properties: carbon content, fossil 0.518919, wet mass 1 kg, dry mass 1 kg, heating value, net 20.72 MJ
  note on carbon content, fossil: 4,4'-bis-[(4-anilino-6-morpholino-1,3,5-triazin-2-ly)amino]stilbene-2,2'-disulfonate (DAS-1) has a MW of 925 g/mol, and 40 C atoms in its structure (FWA-1, SIDS Publications, UNEP).

## Sampling procedure
see technology

## Extrapolations
This dataset has been extrapolated from year 2000 to the year of the calculation (2021). The uncertainty has been adjusted accordingly.

## Review by Hans-Jörg Althaus 2003-07-02
passed
