# treatment of waste emulsion paint, collection for final disposal

Dataset: EcoSpold 2, unit process
Geography: RoW
Time period: 1994-01-01 to 2021-12-31
Technology level: current
Classification: EcoSpold01Categories: waste management/building demolition
Classification: ISIC rev.4 ecoinvent: 3821:Treatment and disposal of non-hazardous waste
Tags: Treatment; ConvertedDataset
Scenario: Business-as-Usual
System model: Allocation, cut-off by classification
Generated by: Gabor Doka (obsolete)
Published in: Doka G. 2007
Database: ecoinvent
isCopyrightProtected: true
accessRestrictedTo: 1

## General comment
The waste contains 1kg emulsion paint (GSD=100%) Waste density is 850 kg/m3. Allocation of energy production in waste incineration: no substitution or expansion. Total burden allocated to waste disposal function of waste incinerator.
[This dataset was already contained in the ecoinvent database version 2. It was not individually updated during the transfer to ecoinvent version 3. Life Cycle Impact Assessment results may still have changed, as they are affected by changes in the supply chain, i.e. in other datasets. This dataset was generated following the ecoinvent quality guidelines for version 2. It may have been subject to central changes described in the ecoinvent version 3 change report (http://www.ecoinvent.org/database/ecoinvent-version-3/reports-of-changes/), and the results of the central updates were reviewed extensively. The changes added e.g. consistent water flows and other information throughout the database. The documentation of this dataset can be found in the ecoinvent reports of version 2, which are still available via the ecoinvent website. The change report linked above covers all central changes that were made during the conversion process.]

## Included activities end
transport to dismantling facilities, final disposal of waste material,

## Geography
Specific to the technology mix encountered in Switzerland in late 1990ies

## Technology
Building demolition with skid-steer loaders.

## Reference product
- waste emulsion paint, separated: -1 kg; name RP_amount_1; By-product classification Waste; CPC 39: Wastes or scraps
  EcoSpold01Location=CH
  production volume 1.09549e10 kg; name RP_PV_1; = 2.8632E+09+8.0917E+09
    Estimated value. Sum of waste emulsion paint treated in material landfill and sanitary landfill (see relevant datasets)
  property price 0 EUR2005; name RP_amount_1_price_EUR2005
    Waste products are assigned a price of zero as they are assumed to require further treatment.
  property heating value, net 8.18 MJ
    LHV is calculated based on the Carbon content of the product. More details can be found on the respective documentation.
  property carbon content 0.27
    carbon content on a dry matter basis (reserved; not for manual entry)
  properties: carbon content, non-fossil 0, water content 0, wet mass 1 kg, carbon content, fossil 0.27, dry mass 1 kg, water in wet mass 0 kg, carbon allocation 0.27 kg

## Inputs from technosphere
- waste emulsion paint: 0 kg; name BP_amount_1; pedigree (1,1,1,1,1)
  disposed masses. Uncertainty calculated from uncertainty of waste composition
  EcoSpold01Location=CH
  production volume 0 kg
    Calculated from the production volume of waste emulsion paint, separated in proportion to the respective output amounts.
  property price 0 EUR2005; name BP_amount_1_price_EUR2005
  properties: carbon content, fossil 0.27, wet mass 1 kg, dry mass 1 kg, heating value, net 8.18 MJ
  note on carbon content, fossil: Tab A.4, ecoinvent v2.2 report 13_I. C content has been calculated after data in the tables, and then referred to 1 kg DM
- waste emulsion paint: -0.086144, -0.913856 kg (2 entries); lognormal variance with pedigree 0.042, pedigree (1,1,5,5,1)
  (same comment as for waste emulsion paint)
  production volume 1.09549e10 kg

## Sampling procedure
waste-specific calculation based on literature data

## Extrapolations
none This dataset has been copied from an original dataset covering the geography CH. The uncertainty has been adjusted accordingly.

## Review by Niels Jungbluth 2003-05-22
Passed. Calculation for standard deviation 95 of infrastructure, land occupation, transport services and other services can differ from standard Pedigree approach used in this project and figures obtained by this procedure.
