# treatment of waste bitumen, sanitary landfill

Dataset: EcoSpold 2, unit process
Geography: RoW
Time period: 1994-01-01 to 2021-12-31
Technology level: current
Classification: EcoSpold01Categories: waste management/sanitary landfill
Classification: ISIC rev.4 ecoinvent: 3821:Treatment and disposal of non-hazardous waste
Tags: ConvertedDataset; Treatment
Scenario: Business-as-Usual
System model: Allocation, cut-off by classification
Generated by: Gabor Doka (obsolete)
Published in: Doka G. 2007
Database: ecoinvent
isCopyrightProtected: true
accessRestrictedTo: 1

## General comment
Inventoried waste contains 100% bitumen; .
waste composition (wet, in ppm): upper heating value 41.39 MJ/kg; lower heating value 39.38 MJ/kg; H2O 13560; O 10000; H 100000; C 830860; S 40000; N 5000; P 4; B n.a.; Cl n.a.; Br n.a.; F n.a.; I n.a.; Ag n.a.; As 0.7; Ba n.a.; Cd n.a.; Co 0.43; Cr 0.35; Cu 5; Hg 0.02; Mn n.a.; Mo 0.56; Ni 100; Pb 1; Sb n.a.; Se 0.2; Sn 89; V 250; Zn n.a.; Be n.a.; Sc n.a.; Sr n.a.; Ti n.a.; Tl n.a.; W n.a.; Si 6; Fe 75; Ca 6; Al 7; K n.a.; Mg n.a.; Na 35;
Share of carbon in waste that is biogenic 0%.
Overall degradability of waste during 100 years: 1%.
[This dataset was already contained in the ecoinvent database version 2. It was not individually updated during the transfer to ecoinvent version 3. Life Cycle Impact Assessment results may still have changed, as they are affected by changes in the supply chain, i.e. in other datasets. This dataset was generated following the ecoinvent quality guidelines for version 2. It may have been subject to central changes described in the ecoinvent version 3 change report (http://www.ecoinvent.org/database/ecoinvent-version-3/reports-of-changes/), and the results of the central updates were reviewed extensively. The changes added e.g. consistent water flows and other information throughout the database. The documentation of this dataset can be found in the ecoinvent reports of version 2, which are still available via the ecoinvent website. The change report linked above covers all central changes that were made during the conversion process.]

## Included activities end
Waste-specific short-term emissions to air via landfill gas incineration and landfill leachate. Burdens from treatment of short-term leachate (0-100a) in wastewater treatment plant (including WWTP sludge disposal in municipal incinerator). Long-term emissions from landfill to groundwater (after base lining failure).

## Geography
Technology encountered in Switzerland in 2000. Landfill includes base seal, leachate collection system, treatment of leachate in municipal wastewater treatment plant.

## Technology
Swiss municipal sanitary landfill for biogenic or untreated municipal waste ('reactive organic landfill'). Landfill gas and leachate collection system. Recultivation and monitoring for 150 years after closure.

## Reference product
- waste bitumen: -1 kg; CPC 39990: Other wastes n.e.c.; By-product classification Waste; CAS 8052-42-4
  EcoSpold01Location=CH
  production volume 2.67833 kg
    This is a placeholder value that does not reflect real-world production volumes. This dataset does not currently require a real-world production volume to work in the database framework, and no actual data were collected yet. This has no negative effect on the results of the ecoinvent database.
  property heating value, net 40.2 MJ
    Literature value, Source: IPCC 2006, 2006 IPCC Guidelines for National Greenhouse Gas Inventories, Prepared by the National Greenhouse Gas Inventories Programme, Eggleston H.S., Buendia L., Miwa K., Ngara T. and Tanabe K. (eds). Published: IGES, Japan
  property price 0 EUR2005
    Waste products are assigned a price of zero as they are assumed to require further treatment.
  property carbon content 0.842657
    carbon content on a dry matter basis (reserved; not for manual entry)
  properties: water content 0.0141988, carbon content, fossil 0.842657, wet mass 1 kg, carbon content, non-fossil 0, water in wet mass 0.014 kg, dry mass 0.986 kg, carbon allocation 0.83086 kg

## Inputs from technosphere
- ammonia, anhydrous, liquid: 0 kg; pedigree (1,1,1,1,1)
  EcoSpold01Location=CH
  burden from incineration of sludge from wastewater treatment of the short-term leachate (0-100a). uncertainty is calculated from uncertainties in waste composition and transfer coefficients in incinerator and uncertainty of waste decomposition and short-term leaching in sanitary landfill
  properties: dry mass 1 kg, wet mass 1 kg
- chemical, inorganic: 1.9e-11 kg; lognormal variance with pedigree 0.432, pedigree (1,1,5,5,1)
  burden from incineration of sludge from wastewater treatment of the short-term leachate (0-100a). uncertainty is calculated from uncertainties in waste composition and transfer coefficients in incinerator and uncertainty of waste decomposition and short-term leaching in sanitary landfill
  EcoSpold01Location=GLO
  properties: dry mass 1 kg, wet mass 1 kg, carbon content, fossil 0.003
  note on carbon content, fossil: This dataset is an unweighted average of 20 inorganic substances (listed in Tab 88.1, ecoinvent v2.2 report 8, part II), being part of the top100 chemicals included in this database. The C-content has also been calculated as an unweighted average of the C content of the substances composing this dataset.
- process-specific burdens, sanitary landfill: 1 kg; lognormal variance with pedigree 0.042, pedigree (1,1,5,5,1)
  EcoSpold01Location=CH
  demands per kilogram waste. uncertainty is heeded in the module
- electricity, low voltage: 0 kWh; pedigree (1,1,1,1,1)
  EcoSpold01Location=CH
  burden from wastewater treatment of the short-term leachate (0-100a). Uncertainty calculated from unertainty of the waste composition of this waste, uncertainty in waste decomposition and short-term leaching in sanitary landfill
  Uncertainty: . Uncertainty calculated from unertainty of the waste composition of this waste, uncertainty in waste decomposition and short-term leaching in sanitary landfill
- iron (III) chloride, without water, in 40% solution state: 1.53e-8 kg; lognormal variance with pedigree 2.102, pedigree (1,1,5,5,1)
  burden from incineration of sludge from wastewater treatment of the short-term leachate (0-100a). uncertainty is calculated from uncertainties in waste composition and transfer coefficients in incinerator and uncertainty of waste decomposition and short-term leaching in sanitary landfill
  EcoSpold01Location=CH
  properties: wet mass 1 kg, dry mass 1 kg
- wastewater treatment facility, capacity 5E9l/year: 1.42e-11 unit; lognormal variance with pedigree 0.2106, pedigree (5,5,5,5,5)
  burden from wastewater treatment of the short-term leachate (0-100a). Uncertainty calculated from unertainty of the waste composition of this waste, uncertainty in waste decomposition and short-term leaching in sanitary landfill
  EcoSpold01Location=CH
  Uncertainty: . Uncertainty calculated from unertainty of the waste composition of this waste, uncertainty in waste decomposition and short-term leaching in sanitary landfill
- slag landfill: 1.37e-15 unit; lognormal variance with pedigree 0.522, pedigree (1,1,5,5,1)
  (same comment as for ammonia, anhydrous, liquid)
- waste plastic, mixture: 0 kg; pedigree (1,1,1,1,1)
  (same comment as for electricity, low voltage)
  production volume 0 kg
    Calculated from the production volume of waste bitumen, 1.4% water in proportion to the respective output amounts.
  properties: wet mass 1 kg, dry mass 0.847 kg, heating value, net 30.79 MJ, carbon content, fossil 0.747344, water content 0.180638
  note on heating value, net: Value taken from the general comment of the treatment dataset.
  note on carbon content, fossil: C content in 1 kg DM was calculated using data in Tab A.2, ecoinvent v2.2 report 13_I
- heat, central or small-scale, other than natural gas: 3.7788e-5 MJ; lognormal variance with pedigree 0.24, pedigree (5,5,5,5,5)
  (same comment as for wastewater treatment facility, capacity 5E9l/year)
  properties: heating value, net 1 MJ
- waste cement, hydrated: -1.97e-7 kg; lognormal variance with pedigree 0.672, pedigree (1,1,5,5,1)
  (same comment as for ammonia, anhydrous, liquid)
  production volume 3.37264e-7 kg
    (same comment as for waste plastic, mixture)
  properties: wet mass 1 kg, dry mass 1 kg
- sewer grid, 5E9l/year, 110 km: 5.45e-10 km; lognormal variance with pedigree 0.2106, pedigree (5,5,5,5,5)
  (same comment as for electricity, low voltage)
- titanium dioxide: 5.03e-9 kg; lognormal variance with pedigree 0.862, pedigree (1,1,5,5,1)
  burden from incineration of sludge from wastewater treatment of the short-term leachate (0-100a). uncertainty is calculated from uncertainties in waste composition and transfer coefficients in incinerator and uncertainty of waste decomposition and short-term leaching in sanitary landfill
  EcoSpold01Location=RER
  properties: wet mass 1 kg, dry mass 1 kg
- sanitary landfill facility: 5.56e-10 unit; lognormal variance with pedigree 0.042, pedigree (1,1,5,5,1)
  demands per kilogram waste. uncertainty is heeded in the module
  EcoSpold01Location=CH
- iron sulfate: 1.06e-8 kg; lognormal variance with pedigree 2.29, pedigree (5,5,5,5,5)
  burden from wastewater treatment of the short-term leachate (0-100a). Uncertainty calculated from unertainty of the waste composition of this waste, uncertainty in waste decomposition and short-term leaching in sanitary landfill
  EcoSpold01Location=RER
  Uncertainty: . Uncertainty calculated from unertainty of the waste composition of this waste, uncertainty in waste decomposition and short-term leaching in sanitary landfill
  properties: wet mass 1 kg, dry mass 1 kg
- municipal waste incineration facility: 3.58e-14 unit; lognormal variance with pedigree 0.782, pedigree (1,1,5,5,1)
  EcoSpold01Location=CH
  Burden from incineration of sludge from wastewater treatment of the short-term leachate (0-100a).
- hydrochloric acid, without water, in 30% solution state: 1.14e-11 kg; lognormal variance with pedigree 0.432, pedigree (1,1,5,5,1)
  (same comment as for titanium dioxide)
  properties: wet mass 1 kg, dry mass 1 kg, heating value, net 3.32 MJ
- waste graphical paper: 0 kg; pedigree (1,1,1,1,1)
  (same comment as for electricity, low voltage)
  production volume 0 kg
    (same comment as for waste plastic, mixture)
  properties: heating value, net 14.12 MJ, water content 0.126126, wet mass 1 kg, dry mass 0.888 kg, carbon content, non-fossil 0.454955
- cement, unspecified: 0 kg; pedigree (1,1,1,1,1)
  (same comment as for ammonia, anhydrous, liquid)
  properties: dry mass 1 kg, wet mass 1 kg
- heat, district or industrial, natural gas: 0 MJ; pedigree (1,1,1,1,1)
  EcoSpold01Location=RER
  burden from incineration of sludge from wastewater treatment of the short-term leachate (0-100a). uncertainty is calculated from uncertainties in waste composition and transfer coefficients in incinerator and uncertainty of waste decomposition and short-term leaching in sanitary landfill
  properties: heating value, net 1 MJ
- aluminium sulfate, powder: 2.87e-9 kg; lognormal variance with pedigree 2.29, pedigree (5,5,5,5,5)
  EcoSpold01Location=RER
  burden from wastewater treatment of the short-term leachate (0-100a). Uncertainty calculated from unertainty of the waste composition of this waste, uncertainty in waste decomposition and short-term leaching in sanitary landfill
  Uncertainty: . Uncertainty calculated from unertainty of the waste composition of this waste, uncertainty in waste decomposition and short-term leaching in sanitary landfill
  properties: dry mass 1 kg, wet mass 1 kg
- process-specific burdens, residual material landfill: 1.97e-7 kg; lognormal variance with pedigree 0.662, pedigree (1,1,5,5,1)
  (same comment as for ammonia, anhydrous, liquid)
- process-specific burdens, slag landfill: 7.69e-7 kg; lognormal variance with pedigree 0.522, pedigree (1,1,5,5,1)
  (same comment as for ammonia, anhydrous, liquid)
- quicklime, milled, packed: 1.58e-9 kg; lognormal variance with pedigree 0.532, pedigree (1,1,5,5,1)
  (same comment as for ammonia, anhydrous, liquid)
  properties: wet mass 1 kg, water content 0.010101, dry mass 0.99 kg
- sodium hydroxide, without water, in 50% solution state: 8.73e-9 kg; lognormal variance with pedigree 0.532, pedigree (1,1,5,5,1)
  (same comment as for titanium dioxide)
  properties: dry mass 1 kg, wet mass 1 kg, heating value, net 3.03 MJ
- process-specific burdens, municipal waste incineration: 0.000143 kg; lognormal variance with pedigree 0.782, pedigree (1,1,5,5,1)
  (same comment as for municipal waste incineration facility)
- residual material landfill: 0 unit; pedigree (1,1,1,1,1)
  (same comment as for ammonia, anhydrous, liquid)
- heat, district or industrial, other than natural gas: 0 MJ; pedigree (1,1,1,1,1)
  (same comment as for iron (III) chloride, without water, in 40% solution state)
  properties: heating value, net 1 MJ
- chromium oxide, flakes: 1.03e-10 kg; lognormal variance with pedigree 0.97, pedigree (5,5,5,5,5)
  EcoSpold01Location=RER
  burden from incineration of sludge from wastewater treatment of the short-term leachate (0-100a). Proxy for vanadium pentoxide V2O5 in SCR catalyst, uncertainty calculated from uncertainty in average DeNOx input, uncertainty in the share of thermal NOx, uncertainty of nitrogen content in average municipal waste and the unertainty in nitrogen content in *this* waste and uncertainty of waste decomposition and short-term leaching in sanitary landfill
  Uncertainty: . Proxy for vanadium pentoxide V2O5 in SCR catalyst, uncertainty calculated from uncertainty in average DeNOx input, uncertainty in the share of thermal NOx, uncertainty of nitrogen content in average municipal waste and the unertainty in nitrogen content in *this* waste and uncertainty of waste decomposition and short-term leaching in sanitary landfill
  properties: wet mass 1 kg, dry mass 1 kg
- chemical, organic: 2.93e-11 kg; lognormal variance with pedigree 2.692, pedigree (1,1,5,5,1)
  (same comment as for chemical, inorganic)
  properties: heating value, net 19.03 MJ, dry mass 1 kg, carbon content, fossil 0.628, wet mass 1 kg
  note on carbon content, fossil: This dataset is an unweighted average of 20 organic substances (listed in Tab 88.1, ecoinvent v2.2 report 8, part II), being part of the top100 chemicals included in this database. The C-content has also been calculated as an unweighted average of the C content of the substances composing this dataset.
- electricity, high voltage: 0 kWh; pedigree (1,1,1,1,1)
  (same comment as for ammonia, anhydrous, liquid)
- ammonia, anhydrous, liquid: 3.68919e-8, 3.1713e-9, 4.93373e-9, 9.77546e-9, 9.57737e-9, 1.00381e-9, 4.48741e-9, 1.06159e-7 kg (8 entries); lognormal variance with pedigree 0.612, pedigree (1,1,5,5,1)
  (same comment as for ammonia, anhydrous, liquid)
- electricity, low voltage: 1.03469e-5, 1.88398e-6, 3.03344e-5, 0.00046573, 7.53469e-5, 0.000216358 kWh (6 entries); lognormal variance with pedigree 0.49, pedigree (5,5,5,5,5)
  (same comment as for electricity, low voltage)
- waste plastic, mixture: -4.76812e-6, -3.18588e-7, -2.40943e-8, -1.31588e-7, -5.31601e-8, -1.24955e-7, -3.33795e-5 kg (7 entries); lognormal variance with pedigree 0.2106, pedigree (5,5,5,5,5)
  (same comment as for electricity, low voltage)
  production volume 6.64256e-5 kg
- waste graphical paper: -1.89751e-6, -2.89758e-7, -2.53367e-8, -1.04702e-6, -1.02093e-7, -1.88985e-7, -3.52493e-5 kg (7 entries); lognormal variance with pedigree 0.2106, pedigree (5,5,5,5,5)
  (same comment as for electricity, low voltage)
  production volume 6.64256e-5 kg
- cement, unspecified: 2.76003e-9, 2.02153e-10, 5.76203e-10, 1.3031e-8, 3.83541e-10, 4.21242e-9, 5.09655e-10, 5.6925e-8 kg (8 entries); lognormal variance with pedigree 0.672, pedigree (1,1,5,5,1)
  (same comment as for ammonia, anhydrous, liquid)
- heat, district or industrial, natural gas: 1.0248e-6, 6.64932e-5 MJ (2 entries); lognormal variance with pedigree 0.612, pedigree (1,1,5,5,1)
  (same comment as for heat, district or industrial, natural gas)
- heat, district or industrial, other than natural gas: 4.86414e-8, 0.000119951 MJ (2 entries); lognormal variance with pedigree 0.782, pedigree (1,1,5,5,1)
  (same comment as for iron (III) chloride, without water, in 40% solution state)
- electricity, high voltage: 2.57281e-7, 4.93233e-8, 8.36276e-7, 1.20421e-5, 1.90976e-6, 5.5053e-6 kWh (6 entries); lognormal variance with pedigree 1.202, pedigree (1,1,5,5,1)
  (same comment as for ammonia, anhydrous, liquid)

## Emissions to nature
- Mercury [air, non-urban air or from high stacks]: 5.48e-12 kg; lognormal variance with pedigree 2.792, pedigree (1,1,5,5,1)
  burden from direct release or incineration of landfill biogas. Uncertainty calculated from unertainty of the waste composition of this waste, uncertainty in waste decomposition and short-term leaching in sanitary landfill
- Tin [air, non-urban air or from high stacks]: 1.31e-12 kg; lognormal variance with pedigree 3.112, pedigree (1,1,5,5,1)
  (same comment as for Mercury)
- Sodium, ion [water, surface water]: 1.45e-6 kg; lognormal variance with pedigree 1.352, pedigree (1,1,5,5,1)
  Emissions from short-term leachate treatment. Uncertainty calculated depending on waste input and uncertainty of transfer coefficents in landfill and wastewater treatment.
- Selenium [water, ground-, long-term]: 5.64e-8 kg; lognormal variance with pedigree 2.222, pedigree (1,1,5,5,1)
  Emissions from long-term leachate (>100a) directly from MSW landfill and indirectly via incineration of treatement sludge from leachate treatement. Uncertainty calculated depending on waste input and uncertainty of long-term transfer coefficents in landfill.
- Molybdenum [air, non-urban air or from high stacks]: 1.48e-13 kg; lognormal variance with pedigree 3.412, pedigree (1,1,5,5,1)
  (same comment as for Mercury)
- Nitrate [water, ground-, long-term]: 0.000209 kg; lognormal variance with pedigree 0.492, pedigree (1,1,5,5,1)
  (same comment as for Selenium)
- Aluminium [water, ground-, long-term]: 7e-6 kg; lognormal variance with pedigree 1.352, pedigree (1,1,5,5,1)
  (same comment as for Selenium)
- Mercury [water, surface water]: 4.34e-12 kg; lognormal variance with pedigree 2.662, pedigree (1,1,5,5,1)
  Emissions from short-term leachate treatment and incineration of resulting sludge. Uncertainty calculated depending on waste input and uncertainty of transfer coefficents in landfill, wastewater treatment and incineration model.
- Nickel, ion [water, ground-, long-term]: 0.0001 kg; lognormal variance with pedigree 1.002, pedigree (1,1,5,5,1)
  (same comment as for Selenium)
- Silicon [water, ground-, long-term]: 1.15e-7 kg; lognormal variance with pedigree 5.282, pedigree (1,1,5,5,1)
  (same comment as for Selenium)
- Cobalt [air, non-urban air or from high stacks]: 3.46e-13 kg; lognormal variance with pedigree 3.302, pedigree (1,1,5,5,1)
  (same comment as for Mercury)
- Cobalt [air, urban air close to ground]: 0 kg; pedigree (1,1,1,1,1)
  (same comment as for Mercury)
- Sulfate [water, ground-, long-term]: 0.111 kg; lognormal variance with pedigree 0.252, pedigree (1,1,5,5,1)
  (same comment as for Selenium)
- Iron, ion [water, surface water]: 5.23e-9 kg; lognormal variance with pedigree 1.952, pedigree (1,1,5,5,1)
  (same comment as for Mercury)
- Nickel [air, urban air close to ground]: 0 kg; pedigree (1,1,1,1,1)
  (same comment as for Mercury)
- Molybdenum [air, urban air close to ground]: 5.82e-13 kg; lognormal variance with pedigree 2.362, pedigree (1,1,5,5,1)
  (same comment as for Mercury)
- Chromium [air, non-urban air or from high stacks]: 9.97e-15 kg; lognormal variance with pedigree 3.752, pedigree (1,1,5,5,1)
  (same comment as for Mercury)
- Selenium [air, urban air close to ground]: 0 kg; pedigree (1,1,1,1,1)
  (same comment as for Mercury)
- Iron [air, non-urban air or from high stacks]: 2.58e-12 kg; lognormal variance with pedigree 3.032, pedigree (1,1,5,5,1)
  (same comment as for Mercury)
- TOC, Total Organic Carbon [water, surface water]: 3.86e-5 kg; lognormal variance with pedigree 0.862, pedigree (1,1,5,5,1)
  (same comment as for Mercury)
- Sodium, ion [water, ground-, long-term]: 3.36e-5 kg; lognormal variance with pedigree 1.142, pedigree (1,1,5,5,1)
  (same comment as for Selenium)
- Silicon [air, urban air close to ground]: 6.56e-12 kg; lognormal variance with pedigree 2.152, pedigree (1,1,5,5,1)
  (same comment as for Mercury)
- Lead [water, surface water]: 6.48e-12 kg; lognormal variance with pedigree 2.642, pedigree (1,1,5,5,1)
  (same comment as for Mercury)
- Sulfate [water, surface water]: 0.000455 kg; lognormal variance with pedigree 0.742, pedigree (1,1,5,5,1)
  (same comment as for Sodium, ion)
- Ammonium, ion [water, ground-, long-term]: 0.00199 kg; lognormal variance with pedigree 0.492, pedigree (1,1,5,5,1)
  (same comment as for Selenium)
- Dinitrogen monoxide [air, urban air close to ground]: 3.07e-7 kg; lognormal variance with pedigree 0.472, pedigree (1,1,5,5,1)
  (same comment as for Mercury)
- Chromium [air, urban air close to ground]: 0 kg; pedigree (1,1,1,1,1)
  (same comment as for Mercury)
- Aluminium [air, non-urban air or from high stacks]: 8.75e-13 kg; lognormal variance with pedigree 3.182, pedigree (1,1,5,5,1)
  (same comment as for Mercury)
- Phosphorus [air, urban air close to ground]: 1.42e-12 kg; lognormal variance with pedigree 2.192, pedigree (1,1,5,5,1)
  (same comment as for Mercury)
- Arsenic [air, urban air close to ground]: 3.54e-13 kg; lognormal variance with pedigree 2.282, pedigree (1,1,5,5,1)
  (same comment as for Mercury)
- Calcium, ion [water, surface water]: 7.05e-9 kg; lognormal variance with pedigree 2.002, pedigree (1,1,5,5,1)
  (same comment as for Mercury)
- BOD5, Biological Oxygen Demand [water, surface water]: 4.8e-5 kg; lognormal variance with pedigree 0.862, pedigree (1,1,5,5,1)
  (same comment as for Mercury)
- Copper [air, non-urban air or from high stacks]: 7e-14 kg; lognormal variance with pedigree 3.502, pedigree (1,1,5,5,1)
  (same comment as for Mercury)
- Sodium [air, non-urban air or from high stacks]: 3.62e-10 kg; lognormal variance with pedigree 2.402, pedigree (1,1,5,5,1)
  (same comment as for Mercury)
- Mercury [air, urban air close to ground]: 0 kg; pedigree (1,1,1,1,1)
  (same comment as for Mercury)
- NMVOC, non-methane volatile organic compounds, unspecified origin [air, non-urban air or from high stacks]: 2.23e-8 kg; lognormal variance with pedigree 0.452, pedigree (1,1,5,5,1)
  (same comment as for Mercury)
- Molybdenum [water, surface water]: 3.49e-10 kg; lognormal variance with pedigree 2.342, pedigree (1,1,5,5,1)
  (same comment as for Mercury)
- Tin, ion [water, ground-, long-term]: 8.9e-5 kg; lognormal variance with pedigree 1.022, pedigree (1,1,5,5,1)
  (same comment as for Selenium)
- Nickel [air, non-urban air or from high stacks]: 1.45e-11 kg; lognormal variance with pedigree 2.812, pedigree (1,1,5,5,1)
  (same comment as for Mercury)
- Carbon monoxide, fossil [air, urban air close to ground]: 4.46e-7 kg; lognormal variance with pedigree 0.932, pedigree (1,1,5,5,1)
  (same comment as for Mercury)
- Nitrogen oxides [air, non-urban air or from high stacks]: 3.22e-8 kg; lognormal variance with pedigree 1.132, pedigree (1,1,5,5,1)
  (same comment as for Mercury)
- Ammonia [air, urban air close to ground]: 1.11e-7 kg; lognormal variance with pedigree 0.532, pedigree (1,1,5,5,1)
  (same comment as for Mercury)
- Cobalt [water, surface water]: 7.02e-10 kg; lognormal variance with pedigree 2.222, pedigree (1,1,5,5,1)
  (same comment as for Mercury)
- Lead [air, non-urban air or from high stacks]: 1.96e-14 kg; lognormal variance with pedigree 3.672, pedigree (1,1,5,5,1)
  (same comment as for Mercury)
- Chloride [water, surface water]: 9.51e-9 kg; lognormal variance with pedigree 2.182, pedigree (1,1,5,5,1)
  (same comment as for Sodium, ion)
- Nitrogen oxides [air, urban air close to ground]: 1.09e-6 kg; lognormal variance with pedigree 0.512, pedigree (1,1,5,5,1)
  (same comment as for Mercury)
- Calcium [air, urban air close to ground]: 1.28e-12 kg; lognormal variance with pedigree 2.032, pedigree (1,1,5,5,1)
  (same comment as for Mercury)
- Calcium, ion [water, ground-, long-term]: 5.99e-6 kg; lognormal variance with pedigree 1.382, pedigree (1,1,5,5,1)
  (same comment as for Selenium)
- Calcium [air, non-urban air or from high stacks]: 1.95e-12 kg; lognormal variance with pedigree 3.082, pedigree (1,1,5,5,1)
  (same comment as for Mercury)
- Tin, ion [water, surface water]: 2.19e-9 kg; lognormal variance with pedigree 2.052, pedigree (1,1,5,5,1)
  (same comment as for Mercury)
- Phosphate [water, ground-, long-term]: 8.3e-8 kg; lognormal variance with pedigree 7.672, pedigree (1,1,5,5,1)
  (same comment as for Selenium)
- Cobalt [water, ground-, long-term]: 4.29e-7 kg; lognormal variance with pedigree 1.712, pedigree (1,1,5,5,1)
  (same comment as for Selenium)
- Selenium [air, non-urban air or from high stacks]: 5.27e-14 kg; lognormal variance with pedigree 3.552, pedigree (1,1,5,5,1)
  (same comment as for Mercury)
- Silicon [air, non-urban air or from high stacks]: 7.5e-13 kg; lognormal variance with pedigree 3.202, pedigree (1,1,5,5,1)
  (same comment as for Mercury)
- Vanadium, ion [water, ground-, long-term]: 7.28e-5 kg; lognormal variance with pedigree 1.262, pedigree (1,1,5,5,1)
  (same comment as for Selenium)
- Tin [air, urban air close to ground]: 4.05e-12 kg; lognormal variance with pedigree 2.082, pedigree (1,1,5,5,1)
  (same comment as for Mercury)
- DOC, Dissolved Organic Carbon [water, ground-, long-term]: 0.211 kg; lognormal variance with pedigree 0.512, pedigree (1,1,5,5,1)
  (same comment as for Selenium)
- COD, Chemical Oxygen Demand [water, ground-, long-term]: 0.231 kg; lognormal variance with pedigree 0.512, pedigree (1,1,5,5,1)
  (same comment as for Selenium)
- Arsenic, ion [water, ground-, long-term]: 6.99e-7 kg; lognormal variance with pedigree 1.652, pedigree (1,1,5,5,1)
  (same comment as for Selenium)
- Silicon [water, surface water]: 1.8e-10 kg; lognormal variance with pedigree 2.142, pedigree (1,1,5,5,1)
  (same comment as for Mercury)
- COD, Chemical Oxygen Demand [water, surface water]: 0.000153 kg; lognormal variance with pedigree 0.862, pedigree (1,1,5,5,1)
  (same comment as for Mercury)
- Copper, ion [water, ground-, long-term]: 5e-6 kg; lognormal variance with pedigree 1.402, pedigree (1,1,5,5,1)
  (same comment as for Selenium)
- Methane, fossil [air, non-urban air or from high stacks]: 0.00319 kg; lognormal variance with pedigree 0.452, pedigree (1,1,5,5,1)
  (same comment as for Mercury)
- TOC, Total Organic Carbon [water, ground-, long-term]: 0.211 kg; lognormal variance with pedigree 0.512, pedigree (1,1,5,5,1)
  (same comment as for Selenium)
- Vanadium [air, non-urban air or from high stacks]: 6.59e-11 kg; lognormal variance with pedigree 2.612, pedigree (1,1,5,5,1)
  (same comment as for Mercury)
- Arsenic [air, non-urban air or from high stacks]: 1.76e-11 kg; lognormal variance with pedigree 2.792, pedigree (1,1,5,5,1)
  (same comment as for Mercury)
- Iron, ion [water, ground-, long-term]: 5.26e-6 kg; lognormal variance with pedigree 2.802, pedigree (1,1,5,5,1)
  (same comment as for Selenium)
- Mercury [water, ground-, long-term]: 2e-8 kg; lognormal variance with pedigree 1.962, pedigree (1,1,5,5,1)
  (same comment as for Selenium)
- DOC, Dissolved Organic Carbon [water, surface water]: 3.71e-5 kg; lognormal variance with pedigree 0.862, pedigree (1,1,5,5,1)
  (same comment as for Mercury)
- Arsenic, ion [water, surface water]: 1.11e-9 kg; lognormal variance with pedigree 2.232, pedigree (1,1,5,5,1)
  (same comment as for Mercury)
- Carbon monoxide, fossil [air, non-urban air or from high stacks]: 1.18e-6 kg; lognormal variance with pedigree 1.062, pedigree (1,1,5,5,1)
  (same comment as for Mercury)
- Particulates, < 2.5 um [air, non-urban air or from high stacks]: 3.96e-7 kg; lognormal variance with pedigree 0.712, pedigree (1,1,5,5,1)
  (same comment as for Mercury)
- Nitrite [water, ground-, long-term]: 0.000108 kg; lognormal variance with pedigree 0.492, pedigree (1,1,5,5,1)
  (same comment as for Selenium)
- Phosphate [water, surface water]: 2.41e-9 kg; lognormal variance with pedigree 2.162, pedigree (1,1,5,5,1)
  (same comment as for Mercury)
- Nitrogen [water, surface water]: 1.64e-6 kg; lognormal variance with pedigree 0.502, pedigree (1,1,5,5,1)
  (same comment as for Mercury)
- Molybdenum [water, ground-, long-term]: 2.21e-7 kg; lognormal variance with pedigree 1.902, pedigree (1,1,5,5,1)
  (same comment as for Selenium)
- Lead [water, ground-, long-term]: 1e-6 kg; lognormal variance with pedigree 1.602, pedigree (1,1,5,5,1)
  (same comment as for Selenium)
- Nitrite [water, surface water]: 1.27e-6 kg; lognormal variance with pedigree 0.762, pedigree (1,1,5,5,1)
  (same comment as for Mercury)
- Chromium, ion [water, surface water]: 6.26e-14 kg; lognormal variance with pedigree 2.722, pedigree (1,1,5,5,1)
  (same comment as for Mercury)
- Iron [air, urban air close to ground]: 4.66e-13 kg; lognormal variance with pedigree 1.672, pedigree (1,1,5,5,1)
  (same comment as for Mercury)
- Carbon dioxide, fossil [air, urban air close to ground]: 0.000695 kg; lognormal variance with pedigree 0.862, pedigree (1,1,5,5,1)
  (same comment as for Mercury)
- Nickel, ion [water, surface water]: 3.53e-8 kg; lognormal variance with pedigree 1.722, pedigree (1,1,5,5,1)
  (same comment as for Mercury)
- BOD5, Biological Oxygen Demand [water, ground-, long-term]: 0.0546 kg; lognormal variance with pedigree 0.512, pedigree (1,1,5,5,1)
  (same comment as for Selenium)
- Vanadium [air, urban air close to ground]: 1.3e-11 kg; lognormal variance with pedigree 1.572, pedigree (1,1,5,5,1)
  (same comment as for Mercury)
- Aluminium [water, surface water]: 2.1e-10 kg; lognormal variance with pedigree 2.102, pedigree (1,1,5,5,1)
  (same comment as for Mercury)
- Aluminium [air, urban air close to ground]: 5.85e-12 kg; lognormal variance with pedigree 1.932, pedigree (1,1,5,5,1)
  (same comment as for Mercury)
- Copper [air, urban air close to ground]: 1.34e-15 kg; lognormal variance with pedigree 2.522, pedigree (1,1,5,5,1)
  (same comment as for Mercury)
- Lead [air, urban air close to ground]: 1.95e-15 kg; lognormal variance with pedigree 2.692, pedigree (1,1,5,5,1)
  (same comment as for Mercury)
- Copper, ion [water, surface water]: 6.35e-11 kg; lognormal variance with pedigree 2.452, pedigree (1,1,5,5,1)
  (same comment as for Mercury)
- Nitrate [water, surface water]: 0.00022 kg; lognormal variance with pedigree 0.492, pedigree (1,1,5,5,1)
  (same comment as for Mercury)
- NMVOC, non-methane volatile organic compounds, unspecified origin [air, urban air close to ground]: 6.18e-9 kg; lognormal variance with pedigree 1.032, pedigree (1,1,5,5,1)
  (same comment as for Mercury)
- Chromium VI [water, ground-, long-term]: 1.59e-9 kg; lognormal variance with pedigree 9.032, pedigree (1,1,5,5,1)
  (same comment as for Selenium)
- Vanadium, ion [water, surface water]: 1.34e-7 kg; lognormal variance with pedigree 1.532, pedigree (1,1,5,5,1)
  (same comment as for Mercury)
- Methane, fossil [air, urban air close to ground]: 1.36e-6 kg; lognormal variance with pedigree 0.912, pedigree (1,1,5,5,1)
  (same comment as for Mercury)
- Chromium VI [water, surface water]: 2.09e-11 kg; lognormal variance with pedigree 2.682, pedigree (1,1,5,5,1)
  (same comment as for Mercury)
- Nitrogen, organic bound [water, ground-, long-term]: 0.00325 kg; lognormal variance with pedigree 0.492, pedigree (1,1,5,5,1)
  (same comment as for Selenium)
- Sulfur dioxide [air, non-urban air or from high stacks]: 5.22e-5 kg; lognormal variance with pedigree 0.962, pedigree (1,1,5,5,1)
  (same comment as for Mercury)
- Selenium [water, surface water]: 1.41e-10 kg; lognormal variance with pedigree 2.462, pedigree (1,1,5,5,1)
  (same comment as for Mercury)
- Hydrogen sulfide [water, ground-, long-term]: 0.0029 kg; lognormal variance with pedigree 0.252, pedigree (1,1,5,5,1)
  (same comment as for Selenium)
- Ammonium, ion [water, surface water]: 6.05e-5 kg; lognormal variance with pedigree 0.542, pedigree (1,1,5,5,1)
  (same comment as for Mercury)
- Carbon dioxide, fossil [air, non-urban air or from high stacks]: 0.0208 kg; lognormal variance with pedigree 0.412, pedigree (1,1,5,5,1)
  (same comment as for Mercury)
- Cyanide [air, urban air close to ground]: 3.13e-9 kg; lognormal variance with pedigree 0.632, pedigree (1,1,5,5,1)
  (same comment as for Mercury)

## Sampling procedure
Landfill model based on observed leachate concentrations in literature. Extrapolated to 60'000 years heeding chemical characteristics. Initial waste composition from various literature sources.

## Extrapolations
This dataset has been copied from an original dataset covering the geography CH. The uncertainty has been adjusted accordingly.

## Review by Niels Jungbluth 2003-07-21
Passed. Calculation for standard deviation 95 of, i.e., infrastructure,
land occupation, transport services or other services can differ from
standard Pedigree approach used in this project and figures obtained by
this procedure.
