# textile production, nonwoven polyester, needle-punched

Dataset: EcoSpold 2, unit process
Geography: IN
Time period: 2014-04-01 to 2021-03-31
Technology level: current
Classification: EcoSpold01Categories: textiles/processing
Classification: ISIC rev.4 ecoinvent: 1311:Preparation and spinning of textile fibres
Scenario: Business-as-Usual
System model: Allocation, cut-off by classification
Generated by: Madhuri Nigam
Published in: Faist Emmenegger, M. 2018
Database: ecoinvent
isCopyrightProtected: true
accessRestrictedTo: 1

## General comment
Inventory refers to production of1 kg Nonwoven Needlepunched textile
Needlepunching is a nonwoven process by which the fibres are mechanically entangled to produce a nonwoven fabric by repeated penetration of barbed needles through a preformed dry fibrous web. The machine which accomplishes this process is known as needle loom.
The Needle punch webs offer a wide range of product characteristics such as:

Unique physical properties i.e., elongation in the X, Y & Z direction for mould-able applications,
Ability to attach layers of different type fibre webs to produce composites,
High opacity per unit area,
High strength makes them overwhelming choice for geotextile fabric
The major Application and End-usages of needle punch fabrics are:

Geotextiles :
Needle punch geotextiles are used in functions like
Separation,
Filtration,
Reinforcement,
Drainage & erosion control and
Find applications in roads, railways, air runways, coastal shore protection, etc.
Needle punch carpets: They are used in passenger cars as flooring material.
Other Miscellaneous Applications :
Headliners,
Filtration,
Insulation Felts, etc.

## Included activities start
The activity starts with opening, mixing, layering, humidification,carding, Needle punching

## Included activities end
This process ends with cutting and packaging of Needle punched Nonwovewoven fabric

## Geography
Indian average based on inputs from manufacturer in Uttarakhand North India.

## Reference product
- textile, nonwoven polyester: 1 kg; name RP_amount_1; By-product classification allocatable product; CPC 26710: Woven fabrics of man-made filament yarn, obtained from high tenacity yarn of nylon or other polyamides, of pol[…]
  production volume 5.12e8 kg; name RP_PV_1
    According to Indian Minestry of Textiles, the production of Polyester fibre is circa 512 million kg.
    Reference:
    Indian Ministry of Textiles, accessed at: http://texmin.nic.in/sites/default/files/mmf1_0.pdf on 09/04/2018
  property price 1.51 EUR2005; name RP_amount_1_price_EUR2005
    Estimated value. Various souces report a value around, what correspond to, 2.6 EUR per kg of non woven polyester fabric (madeinchina.com. Retrieved from: https://www.made-in-china.com/productdirectory.do?word=polyester+non+woven+fabric&subaction=hunt&style=b&mode=and&code=0&comProvince=nolimit&order=0&isOpenCorrection=1, accessed 1Feb2018; Alibaba.com, 2018. Retrieved from: https://www.alibaba.com/showroom/100-polyester-non-woven-fabric.html, accessed 1Feb2018).
  property heating value, net 18.94 MJ
    LHV is calculated based on the Carbon content of the product. More details can be found on the respective documentation.
  property carbon content 0.625
    carbon content on a dry matter basis (reserved; not for manual entry)
  properties: carbon content, non-fossil 0, carbon content, fossil 0.625, wet mass 1 kg, water in wet mass 0 kg, water content 0, dry mass 1 kg, carbon allocation 0.625 kg

## By-products
- fibre and fabric waste, polyester: 0 kg; By-product classification Recyclable; CPC 39216: Waste of man-made fibres; pedigree (1,1,1,1,1)
  includes both fibre and fabric cuttings. Used for manufacture of low grade floor covering/carpet
  production volume 0 kg; = RP_PV_1 * (BP_amount_2 / RP_amount_1)
    Calculated from production volume of reference product using the relative outputs.
  property carbon content, fossil 0.58584
    0.585840437101837 for polyester resin production, unsaturated.
    (C8H6O2, C8H16O4, C5H12O2,C4H2O3)n was used as a representative formula for unsaturated polyester resin. This formula corresponds to the M390B Unsaturated Polyester Resin (National Industrial Chemicals Notification and Assessment Scheme, full public report, 1994).
  property price 0 EUR2005; name BP_amount_2_price_EUR2005
    Assumed without economic value
  property carbon content 0.58584
    carbon content on a dry matter basis (reserved; not for manual entry)
  properties: wet mass 1 kg, heating value, net 18.94 MJ, water in wet mass 0 kg, dry mass 1 kg, carbon content, non-fossil 0, water content 0, carbon allocation 0.58584 kg

## Inputs from technosphere
- wastewater, average: -5e-5 m3; name BP_amount_1; = (0.05/1000)*-1; lognormal variance with pedigree 0.0046, pedigree (1,4,3,1,1)
  0.05 kgs converted to cubic meters
  production volume 25600 m3; = RP_PV_1 * (BP_amount_1 / RP_amount_1)
    Calculated from production volume of reference product using the relative outputs.
  property price 0 EUR2005; name BP_amount_1_price_EUR2005
  properties: wet mass 1000 kg, carbon content, non-fossil 0.194039, water content 2882.2, dry mass 0.346837 kg
  note on carbon content, non-fossil: 0.0673 kg TOC/m3 (Tab A.17, ecoinvent v2.2 report 13_I). TOC was considered as Total Carbon.
- electricity, low voltage: 0.41 kWh; = 0.07+0.14+0.12+0.04+0.04; lognormal variance with pedigree 0.0046, pedigree (1,4,3,1,1)
  sum of electricity used for blowroom, carding , needling, compressor and cutting
- fibre, polyester: 1.035 kg; lognormal variance with pedigree 0.0046, pedigree (1,4,3,1,1)
  properties: carbon content, fossil 0.625, price 2.188 EUR2005, wet mass 1 kg, dry mass 1 kg, heating value, net 18.94 MJ
- building, hall: 0.00208333 m2; = 5000/(10000*12*20); lognormal variance with pedigree 0.3026, pedigree (2,1,3,1,1)
  square meters of building divided by production per year and life time of the plant
- fibre and fabric waste, polyester: -0.035 kg; lognormal variance with pedigree 0.0046, pedigree (1,4,3,1,1)
  (same comment as for fibre and fabric waste, polyester)
  production volume 1.792e7 kg
  properties: carbon content, fossil 0.58584, wet mass 1 kg, heating value, net 18.94 MJ, dry mass 1 kg
  note on carbon content, fossil: 0.585840437101837 for polyester resin production, unsaturated. (C8H6O2, C8H16O4, C5H12O2,C4H2O3)n was used as a representative formula for unsaturated polyester resin. This formula corresponds to the M390B Unsaturated Polyester Resin (National Industrial Chemicals Notification and Assessment Scheme, full public report, 1994).

## Inputs from nature
- Water, well, in ground [natural resource, in water]: 0.0015 m3; = 1.5/1000; lognormal variance with pedigree 0.0046, pedigree (1,4,3,1,1)
  1.5 kg transformed in cubic meters

## Emissions to nature
- Water [air, unspecified]: 0.00145 m3; = 1.45/1000; lognormal variance with pedigree 0.0046, pedigree (1,4,3,1,1)
  1.45 kg transformed in cubic meters.

## Sampling procedure
Industry data. Representative mills in Uttarakhand (North India) was chosen to provide data based on its technical representativeness of the current state of business and their willingness to participate.

## Extrapolations
This dataset has been extrapolated from year 2015 to the year of the calculation (2021). The uncertainty has been adjusted accordingly.
