# polyethylene production, high density, granulate, recycled

Dataset: EcoSpold 2, unit process
Geography: CH
Time period: 2014-01-01 to 2021-12-31
Technology level: current
Classification: ISIC rev.4 ecoinvent: 3830:Materials recovery
Scenario: Business-as-Usual
System model: Allocation, cut-off by classification
Generated by: Thomas Kägi
Published in: Kägi T. 2017
Database: ecoinvent
isCopyrightProtected: true
accessRestrictedTo: 1

## General comment
The functional unit represents the production of 1 kg of polyethylene, high density, granulate, recycled.
The delivered sorted waste polyethylene is further sorted and cleaned in a first step in order to remove any unwanted debris. The plastic then needs to be homogenised, so that only HDPE will be processed. If there are other plastic polymers in the batch, this can ruin the recycled end-product.
HDPE has a lower specific density than PET, meaning that these plastic polymers can be separated by using sink-float separation. However, HDPE has a similar specific density to PP. In this case, Near Infrared Radiation (NIR) techniques can be used, unless the plastic is too dark and absorbs the infrared waves.
HDPE is then shredded and melted down to further refine the polymer. The plastic is then cooled into pellets which can be used in manufacturing.
For further information see Kägi et al. (2017). Life Cycle Inventories for Swiss Recycling Processes - Part Carbotech: Recycling of Cardboard, Glass, PE, PET, Tinplate

## Included activities start
Service is starting with the receipt of bales of sorted waste PE

## Included activities end
This module includes all processes of the production of recycled PE granulate, high density, up to the factory gate. Machinery infrastructure is excluded

## Allocation
no allocation involved

## Reference product
- polyethylene, high density, granulate, recycled: 1 kg; name RP_amount; source Kägi T. 2017; CPC 34710: Polymers of ethylene, in primary forms; By-product classification allocatable product; CAS 9002-88-4
  production volume 7.52385e6 kg; name RP_PV
    estimation based on Seyler et al. (2016; A2-1)
  property price 0.7 EUR2005
    From UN data (http://data.un.org/Data.aspx?q=polyethylene&d=ComTrade&f=_l1Code%3a40%3bcmdCode%3a390120); Polyethylene HDPE has gravity >0.94 from http://www.dynalabcorp.com/technical_info_hd_polyethylene.asp.
  property carbon content 0.857
    carbon content on a dry matter basis (reserved; not for manual entry)
  properties: carbon content, fossil 0.857, wet mass 1 kg, dry mass 1 kg, carbon content, non-fossil 0, water in wet mass 0 kg, water content 0, heating value, net 42.47 MJ, carbon allocation 0.857 kg

## Inputs from technosphere
All rows: source Kägi T. 2017
- wastewater, average: -0.00155 m3; name BP_ww; lognormal variance with pedigree 0.0406, pedigree (1,1,5,1,1)
  production volume 11662 m3; = ABS(BP_ww/RP_amount*RP_PV)
    estimation based on Seyler et al. (2016; A2-1); production volumes of by-products and waste scaled accordingly
  property price 0 EUR2005; name BP_ww_price_EUR2005
  properties: water content 2882.2, carbon content, non-fossil 0.194039, wet mass 1000 kg, dry mass 0.346837 kg
  note on carbon content, non-fossil: 0.0673 kg TOC/m3 (Tab A.17, ecoinvent v2.2 report 13_I). TOC was considered as Total Carbon.
- tap water: 1.55 kg; lognormal variance with pedigree 0.0806, pedigree (1,1,5,1,4)
  properties: dry mass 0.000337476 kg, wet mass 1 kg, carbon content, fossil 0.00178991, water content 2962.17
  note on carbon content, fossil: Bicarbonate content is 2.93 mol/m3. CO2 content is 0.1 mol/m3 (ecoinvent v2.2 report 8, Tab 93.1).
- waste preparation facility: 2e-9 unit; lognormal variance with pedigree 0.1686, pedigree (4,1,5,1,5)
  activityLink introduced to establish a direct link to the corresponding regional supply of this product
  properties: lifetime 50 year, lifetime capacity [kg] 5e8 kg
- municipal solid waste: -0.0585 kg; name BP_MSW; lognormal variance with pedigree 0.0406, pedigree (1,1,5,1,1)
  The solid waste is characterised as graphic paper in the original report. Adapted to municipal solid waste to better represent reality and due to better consistency with other PE and PET recycling inventories
  production volume 440145 kg; = ABS(BP_MSW/RP_amount*RP_PV)
    (same comment as for wastewater, average)
  property price 0 EUR2005; name BP_MSW_price_EUR2005
  properties: water content 0.297017, carbon content, fossil 0.171549, wet mass 1 kg, heating value, net 11.74 MJ, dry mass 0.771 kg, carbon content, non-fossil 0.261655
  note on carbon content, fossil: MSW composition in tab 4.1, ecoinvent v2.2 report 13_I. C content referred to 1 kg DM
  note on heating value, net: Value taken from the general comment of the treatment dataset.
- electricity, low voltage: 0.816035 kWh; lognormal variance with pedigree 0.0406, pedigree (1,1,5,1,1)
- waste polyethylene, for recycling, sorted: 1.0585 kg; lognormal variance with pedigree 0.0406, pedigree (1,1,5,1,1)
  properties: carbon content, fossil 0.829, heating value, net 42.47 MJ, water content 0.00603622, wet mass 1 kg, dry mass 0.994 kg
- chemical, inorganic: 0.00424007 kg; lognormal variance with pedigree 0.0806, pedigree (1,1,5,1,4)
  properties: wet mass 1 kg, dry mass 1 kg, carbon content, fossil 0.003
  note on carbon content, fossil: This dataset is an unweighted average of 20 inorganic substances (listed in Tab 88.1, ecoinvent v2.2 report 8, part II), being part of the top100 chemicals included in this database. The C-content has also been calculated as an unweighted average of the C content of the substances composing this dataset.
- heat, district or industrial, natural gas: 0.778497 MJ; lognormal variance with pedigree 0.0406, pedigree (1,1,5,1,1)
  properties: heating value, net 1 MJ

## Emissions to nature
- Particulates, < 2.5 um [air, unspecified]: 1.5e-5 kg; source Franklin Associates 2011; lognormal variance with pedigree 0.0526, pedigree (3,5,5,5,1)
  Not included in the original report. Added based on the US inventory in order to have better consistency.
- Particulates, > 2.5 um, and < 10um [air, unspecified]: 2.3e-5 kg; source Franklin Associates 2011; lognormal variance with pedigree 0.0526, pedigree (3,5,5,5,1)
  (same comment as for Particulates, < 2.5 um)

## Sampling procedure
Uncertainty estimation according to the pedigree matrix

## Extrapolations
This dataset has been extrapolated from year 2014 to the year of the calculation (2021). The uncertainty has been adjusted accordingly.

## Review by Ivan Muñoz Ortiz 2017-08-10
An offline review in excel has been carried out for all the PE recycling activities, checking mass balances, data sources, etc. Several comments were made to the data provider and improvements have been made to the datasets.
