# cement production, pozzolana and fly ash 25-35%

Dataset: EcoSpold 2, unit process
Geography: RoW
Time period: 2014-01-01 to 2021-12-31
Technology level: current
Classification: ISIC rev.4 ecoinvent: 2394:Manufacture of cement, lime and plaster
Synonyms: PPC; Pozzolan Portland Cement
Tags: combined production
Scenario: Business-as-Usual
System model: Allocation, cut-off by classification
Share of production covered: 60 %
Generated by: P V Kiran Ananth
Published in: Kiran Ananth P. V. 2017
Database: ecoinvent
isCopyrightProtected: true
accessRestrictedTo: 1

## General comment
The total installed capacity of cement in india during the year 2014-15 is 390 million tonnes. Total cement production during same year was 270.93 million tonnes. As per the goverment statistics cement industry grew at 5.6% in 2014-15. Cement industry is likely to grow in coming years due to various initiative of goverment of India like National highway project, 100 smart city, housing for all etc. Indian cement plant are most energy efficienct in the word.There thermal and electrical energy consumption is lower than the word. In India, various types of cements are manufactured like ordinary portland cement, pozzolana portland cement, portland slag cement, white cement etc. Pozzolana portland cement manufactured by mixing and grinding of clinker, flyash and gypsum in certain proportion. This dataset has been extrapolated from the IN geography. No other exchange has been changed but geographical uncertainty. The dataset represents cement strength of 43 MPa and 53 MPa grade on 28 days.

## Included activities start
Activity starts from clinker storage in Silo. It includes Clinker and additives blending and grinding in cement mill, internal transportation etc.

## Included activities end
This activity ends with the cement produced in the cement mill. The dataset does not include packaging and administration.

## Geography
Data represents for all geographical locations where cement has been manufactured in India.

## Technology
For this activity latest available technologies were considered like Vertical roller mill, energy efficient fans etc.

## Time period
For this activity time period of 2014 to 2017 has been considered . As during this period many cement plants are adding flyash more than 15%. Maximum flyash addition in cement plant was reported as 33%. Also during this period Indian cement industry has done significant works in improving energy efficiency by installing energy efficient equipment, process optimization, equipment retrofit etc.

## Reference product
- cement, pozzolana and fly ash 25-35%: 1 kg; name cement; CPC 3932: Ash and residue (except from the manufacture of iron or steel), containing metals or metallic compounds, except[…]; By-product classification allocatable product
  Primary data collected from 20 cement manufacturing units. The value has been calculated as a weighted average with respect to production volume.
  production volume 1.14728e11 kg; name APV_cement
    The global production volume was calculated as follows:
    1) The total production volume of each country was calculated
    2) The production volume was scaled based construction output (*)
    3) The average of the results was assumed to be the GLO PV
    4) The share of each different technology per country was calculated
    5) The weighted average of the shares for each country was used to split the GLO PV into different technologies
    (*)
    Construction output assumed per country
    Country Share
    CO 1%
    PE 0%
    BR 2%
    ZA 1%
    IN 10%
    US 8%
    CA-QC 0%
    CH 0%
    Europe without Switzerland 20%
    Source:
    OECD. 2018. Input-Output Tables. http://www.oecd.org/trade/input-outputtables.htm.
    United Nations Statistics Division. 2019. UN data. A world of information. http://data.un.org/.
    Timmer, M.P., E. Dietzenbacher, B. Los, R. Stehrer, and G.J. de Vries. 2015. An Illustrated User Guide to the World Input-Output Database: the Case of Global Automotive Production. Review of International Economics 23(3): 575-605. http://doi.wiley.com/10.1111/roie.12178.
    The data was adjusted based on PPP, data from:
    The World Bank. 2019. World Bank Open Data. https://data.worldbank.org/
  property price 0.0615 EUR2005; name cement_price_EUR2005
    2005 import and export prices (total trades (USD) divided by total weight (kg) in China, India, USA, Japan, Russia and Europe, major producers and consumers (http://www.cementchina.net/freport/showfre.asp?id=749) from UN Commodity Trade Statistics Database (http://data.un.org/Explorer.aspxDatabase [Accessed 2 July 2010]). Commodity: Cement (portland, aluminious, slag or hydraulic)
  properties: water content 0, water in wet mass 0 kg, dry mass 1 kg, wet mass 1 kg
- hard coal ash: 0 kg; name flyash; By-product classification Waste; CPC 39: Wastes or scraps
  (same comment as for cement, pozzolana and fly ash 25-35%)
  production volume 0 kg
    The production volume has been set equal to the IN production volume.
  property price 0 EUR2005; name flyash_price_EUR2005
    Waste products are assigned a price of zero as they are assumed to require further treatment.
  property carbon content 0
    carbon content on a dry matter basis (reserved; not for manual entry)
  properties: carbon content, fossil 0, water content 0, water in wet mass 0 kg, dry mass 1 kg, carbon content, non-fossil 0, wet mass 1 kg, carbon allocation 0 kg

## By-products
- inert filler: 0 kg; name BP_amount_1; = ABS(flyash)*0; CPC 37410: Plasters; By-product classification allocatable product
  In accordance with the ecoinvent centre, the link between waste treatment and cement production shall not be established here. Therefore the inert filler value is set to zero (cut-off approach)
  production volume 0 kg; = APV_cement/ cement* BP_amount_1
    Amount relative to produced amount of reference product
  property price 0.004 EUR2005; name BP_amount_1_price_EUR2005
    Temporary price data. Calculated as 90% of purchasers price based on: 2004 market prices are estimated to be equal to USA prices, which are given according to http://minerals.usgs.gov/minerals/pubs/commodity/sand_&_gravel_construction/myb1-2007-sandc.xls, table 1, downloaded 21 April 2009. Same price for gravel and sand.
  property carbon content, fossil 0; name inert_filler_C_content_fossil
  property water in wet mass 0 kg; name inert_filler_WWM
  property wet mass 1 kg; name inert_filler_WM
  property water content 0; name inert_filler_water_content
  property carbon content, non-fossil 0; name inert_filler_C_content_non_fossil
  property dry mass 1 kg; name inert_filler_DM
  property carbon content 0
    carbon content on a dry matter basis (reserved; not for manual entry)
  properties: carbon allocation 0 kg

## Inputs from technosphere
- steel, low-alloyed: 0.00011 kg; name steel; = 0.00011* cement; source Kellenberger D. 2007; lognormal variance with pedigree 0.0526, pedigree (3,5,5,5,1)
  Extrapolated value, based on "cement production, pozzolana and flyash GLO" dataset.India specific data not available.
  Uncertainty: Variance of log-transformed data was taken from ecoinvent report no 1, table 10.3. Value represents demand of products, electricity etc. for input/output group c.
  properties: carbon content, fossil 0.005, dry mass 1 kg, wet mass 1 kg
- gypsum, mineral: 0 kg; pedigree (1,1,1,1,1)
  Primary data collected from 20 cement manufacturing units. The value has been calculated as a weighted average with respect to production volume.
  Uncertainty: Variance of log-transformed data was taken from ecoinvent report no 1, table 10.3. Value represents demand of products, electricity etc. for input/output group c.
  properties: dry mass 1 kg, wet mass 1 kg
- electricity, medium voltage: 0 kWh; pedigree (1,1,1,1,1)
  (same comment as for gypsum, mineral)
- cement factory: 5.36e-11 unit; = 5.36e-11* cement; source Kellenberger D. 2007; lognormal variance with pedigree 0.352, pedigree (3,5,5,5,1)
  Extrapolated value, based on "cement production, pozzolana and flyash GLO" dataset.India specific data not available.
  Uncertainty: Variance of log-transformed data was taken from ecoinvent report no 1, table 10.3. Value represents demand of infrastructure for input/output group c.
- ethylene glycol: 0.00031 kg; = 3.1e-4* cement; source Kellenberger D. 2007; lognormal variance with pedigree 0.0526, pedigree (3,5,5,5,1)
  (same comment as for steel, low-alloyed)
  properties: wet mass 1 kg, carbon content, fossil 0.387097, dry mass 1 kg, heating value, net 23.44 MJ
- clinker: 0 kg; pedigree (1,1,1,1,1)
  (same comment as for gypsum, mineral)
  properties: wet mass 1 kg, dry mass 1 kg
- clinker: 0.66 kg; lognormal variance with pedigree 0.0047, pedigree (1,2,3,5,1)
  (same comment as for gypsum, mineral)
- gypsum, mineral: 8.36169e-5, 0.000186298, 0.0397301 kg (3 entries); lognormal variance with pedigree 0.0132, pedigree (3,3,4,5,1)
  (same comment as for gypsum, mineral)
- electricity, medium voltage: 0.000483032, 9.26247e-5, 0.00212681, 0.00155498, 0.00716885, 0.0031877, 0.010386 kWh (7 entries); lognormal variance with pedigree 0.0132, pedigree (3,3,4,5,1)
  (same comment as for gypsum, mineral)

## Sampling procedure
For this activity sample questionnaire has been prepared and circulated to all cement manufacturing units in India. Here we have selected clusterwise approch for collecting the data. Due to clusterwise approch variation in quality of raw material , different technologies etc. has taken care. After receiving the data from plants same has been analysed for any discripancies. Extreme minimum and maximum values reported by plants were removed. Final numbers were checked with cement industry expert.

## Extrapolations
This dataset has been extrapolated from the IN geography. Uncertainty has been changed accordingly.
