# clinker production

Dataset: EcoSpold 2, unit process
Geography: BR
Time period: 2016-01-01 to 2021-12-31
Technology level: current
Classification: EcoSpold01Categories: construction materials/binder
Classification: ISIC rev.4 ecoinvent: 2394:Manufacture of cement, lime and plaster
Synonyms: Portland cement clinker
Tags: combined production
Scenario: Business-as-Usual
System model: Allocation, cut-off by classification
Share of production covered: 70 %
Generated by: Fernanda Belizario Silva
Published in: Silva, F. B. 2017
Database: ecoinvent
isCopyrightProtected: false
accessRestrictedTo: 1

## General comment
The dataset describes the production of Portland cement clinker in Brazil.
Clinker is the main constituent of Portland cement and also the main responsible for its environmental impacts. Clinker is made by sintering a mixture composed mainly of limestone and clay (called “raw meal”) at temperatures up to 1450 °C. Both primary and secondary fuels are used to this end. After sintering, clinker nodules have a diameter between 5 mm and 25 mm.
Clinker consists of various calcium silicates including alite (3CaO.SiO2 or “C3S”) and belite (2CaO.SiO2 or “C2S”). Tricalcium aluminate (3CaO.Al2O3 or “C3A”) and calcium aluminoferrite (4CaO.Al2O3.Fe2O3 or “C4AF”) are other common components, added to reduce the sintering temperature of the calcium silicates. For special cement types, such as low heat and sulfate resistant, it is necessary to limit the amount of tricalcium aluminate formed.
Naturally occurring calcareous deposits such as limestone, marl or chalk provide calcium carbonate (CaCO3) and quarries are often close to the cement plant. Clay, shale and sand are the preferred sources for silica. Iron ore and bauxite are the main sources of iron oxide and alumina. Raw materials are mixed at a certain proportion and are milled together in an operation called pre-homogenization, producing the “raw meal”. To ensure high cement quality, the chemistry of the raw materials and of the raw meal is very carefully monitored and controlled.
Portland cement clinker is made by heating the raw meal in a rotary kiln (calcination). As the kiln rotates, the material slides and tumbles down through progressively hotter zones towards the flame. The fuel is fired directly into the end of the kiln. The calcination reaction (CaCO3 → CaO + CO2) emits carbon dioxide into the air, and fuel combustion generates several air emissions. Different types of fuels can be used, including fossil fuels, biomass and wastes. The use of waste fuels in the cement kiln is called “coprocessing”.
Depending on the process configuration, the kiln can be preceded by preheating and/or precalcining steps. Preheating consists of a series of cyclones through which the raw meal is passed, coming in contact with swirling hot kiln exhaust gases moving in the opposite direction. The precalciner is a combustion chamber at the bottom of the preheater, at the entry of the kiln.
After the kiln, clinker is cooled and stored in silos. Clinker production plants are usually integrated with cement plants.
Primary data were gathered from six cement manufacturers in Brazil, who informed the total values of inputs and outputs related to clinker production in 2016, considering all their clinker production sites. All types of flows were reported, namely: primary and secondary raw materials and fuels, auxiliary materials, electricity consumption, water consumption and air emissions (from emissions monitoring reports). It corresponds to 70% market share, considered a good representativeness level.
SOURCES:
MEHTA, P. K.; MONTEIRO, P. J. M. Concreto: microestrutura, propriedade e materiais (Concrete: microstructure, properties and materials). 2008.
WBCSD, IEA. Cement Technology Roadmap 2009 - Carbon emissions reductions up to 2050. 2009.

## Included activities start
From the reception of traditional and alternative fuels and raw materials at the factory gate. The dataset includes the preparation of raw materials (drying, grinding and homogeneization) and fuels (drying), preheating and precalcining steps, clinker production in the rotary kiln, cooling and storage in silos. Water is used mainly for dust control. Auxiliary materials for factory maintenance are considered. Air emissions stem mainly from the rotary kiln exhaust.

## Included activities end
This activity ends with the cooling and storing of the produced clinker. As manufacturers informed total consumption values of their factories, factory administration is included. Infrastructure included by extrapolation from "clinker production/CH" dataset (accessed 28.02.2018).

## Geography
This dataset represents production of clinker for Brazil. Data come from six cement manufacturers in Brazil.

## Technology
Current technology for clinker production in Brazil, in dry kilns, considering various fuel types.
According to the GNR database, 49% of the clinker is produced in dry kilns with preheater and precalciner, being the other 51% produced in mixed kiln types (dry). Regarding fuel types, 80,5% are fossil fuels, 10,4% biomass and 9,1% alternative fossil and mixed wastes (data from 2014). According to SNIC (2013), there are 88 cement factories in Brazil. 57 are integrated plants that produce clinker and cement (ABCP, 2016), being 38 of them licensed for coprocessing.
Sources:
SNIC (National Union of the Cement Industry). Relatório Anual 2013 (Annual report 2013). 2013.
ABCP (Brazilian Portland Cement Association). Panorama do coprocessamento - Brasil 2016 (coprocessing panorama Brazil 2016). 2016.

## Time period
Data correspond to 2016.

## Reference product
- spent catalytic converter NOx reduction: 0 kg; name spent_catalyzer; CPC 39: Wastes or scraps; By-product classification Waste
  Measured value. Weighted average of values informed by manufacturers. Secondary raw material for clinker production. Variance of log-transformed data = 0,687.
  production volume 0 kg
    Calculated from the production volume of clinker in proportion to the respective output amounts.
  property price 0 EUR2005; name spent_catalyzer_price_EUR2005
    Waste products are assigned a price of zero as they are assumed to require further treatment.
  property carbon content 0
    carbon content on a dry matter basis (reserved; not for manual entry)
  properties: water in wet mass 0 kg, dry mass 1 kg, wet mass 1 kg, carbon content, fossil 0, carbon content, non-fossil 0, water content 0, carbon allocation 0 kg
- inert waste: 0 kg; name other_waste; CPC 39: Wastes or scraps; By-product classification Waste
  Measured value. Weighted average of values informed by manufacturers. Secondary raw material for clinker production. Variance of log-transformed data = 0,674. "Inert waste" is used as a proxy for other wastes used as secondary raw material in clinker production, e.g. fibrecement corrugated sheets.
  production volume 0 kg
    (same comment as for spent catalytic converter NOx reduction)
  property price 0 EUR2005; name other_waste_price_EUR2005
    (same comment as for spent catalytic converter NOx reduction)
  property carbon content 0
    carbon content on a dry matter basis (reserved; not for manual entry)
  properties: carbon content, fossil 0, wet mass 1 kg, water in wet mass 0 kg, carbon content, non-fossil 0, water content 0, dry mass 1 kg, carbon allocation 0 kg
- biowaste: 0 kg; By-product classification Waste; CPC 391: Wastes from food and tobacco industry
  Measured value. Weighted average of values informed by manufacturers. Secondary fuel for clinker production. Variance of log-transformed data = 0,699. "Biowaste" is used as a proxy for "agricultural waste".
  production volume 0 kg
    (same comment as for spent catalytic converter NOx reduction)
  property price 0 EUR2005; name biowaste_price_EUR2005
    (same comment as for spent catalytic converter NOx reduction)
  property carbon dioxide factor 110 kg/GJ; name biowaste_CO2_factor
    Literature value.
  property carbon content 0.1624
    carbon content on a dry matter basis (reserved; not for manual entry)
  properties: carbon content, non-fossil 0.1624, dry mass 0.4 kg, wet mass 1 kg, heating value, net 18 MJ, water in wet mass 0.6 kg, carbon content, fossil 0, nitrogen content 0, water content 1.5, carbon allocation 0.06496 kg
- clinker: 1 kg; CPC 37430: Cement clinkers; By-product classification allocatable product
  Grey clinker for use in cement
  production volume 4.28223e10 kg; name clinker_production_BR
    Calculated value. Cement production volume in Brazil in 2016: 57.556.901 t. Average clinker to cement ratio in the sample: 0,744
  property price 0.047 EUR2005; name clinker_price_EUR2005
    Calculated value based on data from United Nations Commodity Trade Statistics Database (comtrade.un.org). UN comtrade category: 252310 Cement Clinkers. Using exchange rate of 1EURO = 1.209 USD. Average of price of import into 5 main markets (EU, US, JP, IN and CN).
  property carbon content 0
    carbon content on a dry matter basis (reserved; not for manual entry)
  properties: wet mass 1 kg, dry mass 1 kg, water in wet mass 0 kg, carbon content, fossil 0, carbon content, non-fossil 0, water content 0, carbon allocation 0 kg
- waste wood, untreated: 0 kg; name sawdust; CPC 3928: Sawdust and wood waste and scrap; By-product classification Waste
  Measured value. Weighted average of values informed by manufacturers. Secondary fuel for clinker production. Variance of log-transformed data = 0,686. "Waste wood, untreated" is used as a proxy for impregnated saw dust (non-impregnated fraction, assumed to be 80% of the impregnated saw dust mass as in the clinker/CH dataset) and for non impregnated saw dust.
  production volume 0 kg
    (same comment as for spent catalytic converter NOx reduction)
  property carbon dioxide factor 110 kg/GJ; name sawdust_CO2_factor
    Literature value.
  property price 0 EUR2005; name sawdust_price_EUR2005
    (same comment as for spent catalytic converter NOx reduction)
  property carbon content, fossil 0; name wastewood_C_content_fossil
    fossil carbon content on a dry matter basis
  property carbon content, non-fossil 0.48632; name wastewood_C_content_non_fossil
    biogene carbon content on a dry matter basis
    Tab A.4, ecoinvent v2.2 report 13_I. C content has been referred to 1 kg DM,
  property Corresponding fuel use 10 MJ; name wastewood_fuel_use
    Lower heating value of the fuel input related to the heat/electricity output
  property carbon content 0.48632
    carbon content on a dry matter basis (reserved; not for manual entry)
  properties: water content 0.25, water in wet mass 0.2 kg, dry mass 0.8 kg, heating value, net 11.9 MJ, wet mass 1 kg, carbon allocation 0.389056 kg
- scrap steel: 0 kg; name mill_scale; CPC 39310: Slag, dross, scalings and other waste from the manufacture of iron or steel; By-product classification Waste; CAS 7439-89-6
  Measured value. Weighted average of values informed by manufacturers. Secondary raw material for clinker production. Variance of log-transformed data = 1,731. "scrap steel" used as proxy for mill scale.
  production volume 0 kg
    (same comment as for spent catalytic converter NOx reduction)
  property price 0 EUR2005; name mill_scale_price_EUR2005
    (same comment as for spent catalytic converter NOx reduction)
  property carbon content 0
    carbon content on a dry matter basis (reserved; not for manual entry)
  properties: carbon content, fossil 0, carbon content, non-fossil 0, wet mass 1 kg, water content 0, water in wet mass 0 kg, dry mass 1 kg, carbon allocation 0 kg
- waste paint: 0 kg; name sawdust_organics; CPC 39: Wastes or scraps; By-product classification Waste
  Measured value. Weighted average of values informed by manufacturers. Secondary fuel for clinker production. Variance of log-transformed data = 0,687. "Waste paint" is used as a proxy for impregnated saw dust (impregnated fraction, assumed to be 20% of the impregnated saw dust mass as in the clinker/CH dataset).
  production volume 0 kg
    (same comment as for spent catalytic converter NOx reduction)
  property carbon dioxide factor 75 kg/GJ; name sawdust_organics_CO2_factor
    Literature value.
  property price 0 EUR2005; name sawdust_organics_price_EUR2005
    (same comment as for spent catalytic converter NOx reduction)
  property carbon content 0.65
    carbon content on a dry matter basis (reserved; not for manual entry)
  properties: wet mass 1 kg, carbon content, non-fossil 0, carbon content, fossil 0.65, water in wet mass 0 kg, heating value, net 11.6 MJ, water content 0, dry mass 1 kg, carbon allocation 0.65 kg
- waste rubber, unspecified: 0 kg; name usedtyre; CPC 39: Wastes or scraps; By-product classification Waste
  Measured value. Weighted average of values informed by manufacturers. Secondary fuel for clinker production. Variance of log-transformed data = 0,254. "Waste rubber" was chosen instead of "used tyre" dataset because the last one includes rubber and steel (which is not the case in Brazil).
  production volume 0 kg
    (same comment as for spent catalytic converter NOx reduction)
  property price 0 EUR2005; name usedtyre_price_EUR2005
    (same comment as for spent catalytic converter NOx reduction)
  property carbon dioxide factor 85 kg/GJ; name usedtyre_CO2_factor
    Measured value.
  property carbon content 0.853
    carbon content on a dry matter basis (reserved; not for manual entry)
  properties: heating value, net 22.1 MJ, carbon content, fossil 0.853, water in wet mass 0 kg, dry mass 1 kg, carbon content, non-fossil 0, wet mass 1 kg, water content 0, carbon allocation 0.853 kg
- sewage sludge, dried: 0 kg; name sludge; By-product classification Waste; CPC 39920: Sewage sludge
  Measured value. Weighted average of values informed by manufacturers. Secondary fuel for clinker production. Variance of log-transformed data = 1,909. "Sewage sludge, dried" is used as a proxy for "industrial sludge".
  production volume 0 kg
    (same comment as for spent catalytic converter NOx reduction)
  property price 0 EUR2005; name sludge_price_EUR2005
    (same comment as for spent catalytic converter NOx reduction)
  property carbon dioxide factor 110 kg/GJ; name sludge_CO2_factor
    Literature value.
  property carbon content 0.4096
    carbon content on a dry matter basis (reserved; not for manual entry)
  properties: carbon content, fossil 0, carbon content, non-fossil 0.4096, water content 0, water in wet mass 0 kg, heating value, net 0 MJ, wet mass 1 kg, dry mass 1 kg, carbon allocation 0.4096 kg
- waste mineral oil: 0 kg; name wasteoil; CPC 39990: Other wastes n.e.c.; By-product classification Waste
  Measured value. Weighted average of values informed by manufacturers. Secondary fuel for clinker production. Variance of log-transformed data = 0,936.
  production volume 0 kg
    (same comment as for spent catalytic converter NOx reduction)
  property price 0 EUR2005; name wasteoil_price_EUR2005
    (same comment as for spent catalytic converter NOx reduction)
  property carbon content, non-fossil 0; name wasteoil_C_content_non_fossil
    biogene carbon content on a dry matter basis
  property carbon content, fossil 0.864444; name wasteoil_C_content_fossil
    fossil carbon content on a dry matter basis
    Tab A.6, ecoinvent v2.2 report 13_I. C content has been calculated after data in the tables, and then referred to 1 kg DM
  property carbon dioxide factor 74 kg/GJ; name wasteoil_CO2_factor
    Literature value.
  property carbon content 0.864444
    carbon content on a dry matter basis (reserved; not for manual entry)
  properties: water in wet mass 0.1 kg, wet mass 1 kg, heating value, net 14.9 MJ, dry mass 0.9 kg, water content 0.111111, carbon allocation 0.778 kg
- waste plastic, mixture: 0 kg; name wasteplastic; By-product classification Waste; CPC 39270: Waste, parings and scrap of plastics
  Measured value. Weighted average of values informed by manufacturers. Secondary fuel for clinker production. Variance of log-transformed data = 0,681.
  production volume 0 kg
    (same comment as for spent catalytic converter NOx reduction)
  property Corresponding fuel use 27.94 MJ; name wasteplastic_fuel_use
    Lower heating value of the fuel input related to the heat/electricity output
  property carbon dioxide factor 75 kg/GJ; name wasteplastic_CO2_factor
    Literature value.
  property carbon content, non-fossil 0; name wasteplastic_C_content_non_fossil
    biogene carbon content on a dry matter basis
  property heating value, net 30.8 MJ
    Literature value. Ecoinvent dataset "treatment of waste plastic, mixture, municipal incineration/CH". Accessed on 25.09.2017
  property carbon content, fossil 0.747344; name wasteplastic_C_content_fossil
    fossil carbon content on a dry matter basis
    C content in 1 kg DM was calculated using data in Tab A.2, ecoinvent v2.2 report 13_I
  property price 0 EUR2005; name wasteplastic_price_EUR2005
    (same comment as for spent catalytic converter NOx reduction)
  property carbon content 0.747344
    carbon content on a dry matter basis (reserved; not for manual entry)
  properties: dry mass 0.847 kg, water in wet mass 0.153 kg, wet mass 1 kg, water content 0.180638, carbon allocation 0.633 kg
- electric arc furnace dust: 0 kg; name steel_dust; By-product classification Waste; CPC 39310: Slag, dross, scalings and other waste from the manufacture of iron or steel
  Measured value. Weighted average of values informed by manufacturers. Secondary raw material for clinker production. Variance of log-transformed data = 0,663.
  production volume 0 kg
    (same comment as for spent catalytic converter NOx reduction)
  property price 0 EUR2005; name steel_dust_price_EUR2005
    (same comment as for spent catalytic converter NOx reduction)
  property heating value, net 0 MJ
    Non combustible products are assumed to have an LHV equal to zero (0).
  property carbon content 0.01339
    carbon content on a dry matter basis (reserved; not for manual entry)
  properties: wet mass 1 kg, dry mass 0.846 kg, carbon content, non-fossil 0, carbon content, fossil 0.01339, water in wet mass 0.154 kg, water content 0.182033, carbon allocation 0.0113279 kg
- hard coal ash: 0 kg; name flyash; By-product classification Waste; CPC 39: Wastes or scraps
  (same comment as for spent catalytic converter NOx reduction)
  production volume 0 kg
    (same comment as for spent catalytic converter NOx reduction)
  property price 0 EUR2005; name flyash_price_EUR2005
    (same comment as for spent catalytic converter NOx reduction)
  property carbon content 0
    carbon content on a dry matter basis (reserved; not for manual entry)
  properties: water content 0, dry mass 1 kg, water in wet mass 0 kg, wet mass 1 kg, carbon content, non-fossil 0, carbon content, fossil 0, carbon allocation 0 kg
- waste foundry sand: 0 kg; name waste_foundry_sand; By-product classification Waste
  Measured value. Weighted average of values informed by manufacturers. Secondary raw material for clinker production. Variance of log-transformed data = 0,925.
  production volume 0 kg
    (same comment as for spent catalytic converter NOx reduction)
  property heating value, net 0 MJ
    Non combustible products are assumed to have an LHV equal to zero (0).
  property price 0 EUR2005; name waste_foundry_sand_price_EUR2005
    (same comment as for spent catalytic converter NOx reduction)
  property carbon content 0.05
    carbon content on a dry matter basis (reserved; not for manual entry)
  properties: wet mass 1 kg, dry mass 0.965 kg, carbon content, non-fossil 0, water content 0.0362694, carbon content, fossil 0.05, water in wet mass 0.035 kg, carbon allocation 0.04825 kg
- limestone residue: 0 kg; name waste_limestone; CPC 39: Wastes or scraps; By-product classification Waste
  Measured value. Weighted average of values informed by manufacturers. Secondary raw material for clinker production. Variance of log-transformed data = 1,599.
  production volume 0 kg
    (same comment as for spent catalytic converter NOx reduction)
  property price 0 EUR2005; name waste_limestone_price_EUR2005
    (same comment as for spent catalytic converter NOx reduction)
  property carbon content 0.120005
    carbon content on a dry matter basis (reserved; not for manual entry)
  properties: heating value, net 0 MJ, dry mass 0.995 kg, water content 0.00502513, wet mass 1 kg, water in wet mass 0.005 kg, carbon content, fossil 0.120005, carbon content, non-fossil 0, carbon allocation 0.119405 kg
- soil, contaminated: 0 kg; name soil_contaminated; By-product classification Waste
  Measured value. Weighted average of values informed by manufacturers. Secondary raw material for clinker production. Variance of log-transformed data = 2,186
  production volume 0 kg
    (same comment as for spent catalytic converter NOx reduction)
  property price 0 EUR2005; name soil_contaminated_price_EUR2005
    (same comment as for spent catalytic converter NOx reduction)
  property carbon content, non-fossil 0.05; name soil_contaminated_C_content_non_fossil
    biogene carbon content on a dry matter basis
  property water in wet mass 0.01 kg; name soil_contaminated_WWM
  property wet mass 1 kg; name soil_contaminated_WM
  property water content 0.010101; name soil_contaminated_water_content
  property dry mass 0.99 kg; name soil_contaminated_DM
  property carbon content, fossil 0.0273278; name soil_contaminated_C_content_fossil; = 0.0992*(12/44)/0.99
    fossil carbon content on a dry matter basis. Calulated based on value for CO2 bound in carbonates (e.g CaCO3, MgCO3, or FeCO3) in the soil.
  property carbon content 0.0773278
    carbon content on a dry matter basis (reserved; not for manual entry)
  properties: carbon allocation 0.0765545 kg

## Inputs from technosphere
- clay: 0.12 kg; = 0,12*clinker; lognormal variance with pedigree 0.1387, pedigree (2,2,3,1,1)
  Measured value. Weighted average of values informed by manufacturers. Raw material for clinker production.
  Uncertainty: B
  properties: water content 0.0362694, dry mass 0.965 kg, wet mass 1 kg
- fatty acid methyl ester: 2.14e-5 kg; = 2,14e-5*clinker; lognormal variance with pedigree 3.0787, pedigree (2,2,3,1,1)
  Measured value. Weighted average of values informed by manufacturers. Fuel used in factory equipment. "Vegetable oil methyl ester" used as proxy for biodiesel.
  Uncertainty: B
  properties: heating value, net 37.2 MJ, dry mass 1 kg, carbon content, non-fossil 0.732, carbon content, fossil 0.041, carbon dioxide factor 74 kg/GJ, wet mass 1 kg
  note on heating value, net: Based on literature, report 17, page 439. Jungbluth, N., Chudacoff, M., Dauriat, A., Dinkel, F., Doka, G., Faist Emmenegger, M., Gnansounou, E., Kljun, N., Schleiss, K., Spielmann, M., Stettler, C., Sutter, J. 2007: Life Cycle Inventories of Bioenergy. ecoinvent report No. 17, Swiss Centre for Life Cycle Inventories, Dübendorf, CH.
- electricity, medium voltage: 0.077 kWh; = 0,077* clinker; lognormal variance with pedigree 0.0377, pedigree (2,2,3,1,1)
  Measured value. Weighted average of values informed by manufacturers.
  Uncertainty: B
- sand: 0.00834 kg; = 8,34e-3*clinker; lognormal variance with pedigree 1.6367, pedigree (2,2,3,1,1)
  (same comment as for clay)
  properties: dry mass 1 kg, wet mass 1 kg
- bauxite: 0.0106 kg; = 1,06e-2* clinker; lognormal variance with pedigree 0.6287, pedigree (2,2,3,1,1)
  (same comment as for clay)
  properties: dry mass 1 kg, wet mass 1 kg
- wood chips, wet, measured as dry mass: 0.000274 kg; = 2,74e-4*clinker; lognormal variance with pedigree 4.2637, pedigree (2,2,3,1,1)
  Measured value. Weighted average of values informed by manufacturers. Fuel used in kiln.
  Uncertainty: B
  properties: carbon dioxide factor 110 kg/GJ, wet mass 2.1 kg, carbon content, non-fossil 0.494, heating value, net 13 MJ, water content 1.1, dry mass 1 kg
- wastewater, average: -1.92e-6 m3; name wastewater; = (1.92E-06* clinker)*-1; lognormal variance with pedigree 0.6807, pedigree (2,2,3,1,1)
  Estimation. Calculated as: (tapwater_input/1000)* clinker. All tap water was considered to leave the process as an effluent.
  Uncertainty: B
  production volume 82218.9 m3; = clinker_production_BR*abs( wastewater)
    (same comment as for spent catalytic converter NOx reduction)
  property price 0 EUR2005; name wastewater_price_EUR2005
  properties: water content 2882.2, dry mass 0.346837 kg, wet mass 1000 kg, carbon content, non-fossil 0.194039
  note on carbon content, non-fossil: 0.0673 kg TOC/m3 (Tab A.17, ecoinvent v2.2 report 13_I). TOC was considered as Total Carbon.
- steel, chromium steel 18/8, hot rolled: 0.000111 kg; = 1,11e-4* clinker; lognormal variance with pedigree 0.2232, pedigree (2,3,3,1,1)
  Measured value. Weighted average of values informed by manufacturers. Replacement of steel wear parts of factory equipment.
  Uncertainty: B
  properties: dry mass 1 kg, wet mass 1 kg, carbon content, fossil 0.0008
  note on carbon content, fossil: Stainless steel model is the grade 304 steel (18/8 stainless, 18% chromium 8% nickel; max. 0.08% C)
- urea: 0.000424472 kg; = (1,98e-4*clinker)*2.14379903903132; lognormal variance with pedigree 0.6897, pedigree (2,2,3,1,1)
  The exchange has been updated from "urea, as N" into "urea" and therefore its amount has been scaled (multiplied) from 0.0002 kg by 2.1438 kg of "urea" per kg of "urea, as N". Original comment of the exchange is: Measured value. Weighted average of values informed by manufacturers. Used to reduce NOx emissions.
  Uncertainty: B
  properties: dry mass 1 kg, carbon content, fossil 0.2, wet mass 1 kg
- industrial machine, heavy, unspecified: 3.76e-5 kg; = 3,76e-5* clinker; lognormal variance with pedigree 0.312, pedigree (1,5,3,5,1)
  Estimation. Value extrapolated from clinker/CH (accessed 28.02.2018).
  Uncertainty: B
- water, harvested from rainwater: 0.00538 kg; name rainwater_input; = 5,38e-3*clinker; lognormal variance with pedigree 1.6997, pedigree (2,2,3,1,1)
  Measured value. Weighted average of values informed by manufacturers. Water used in the process (cooling, dust control).
  Uncertainty: B
  properties: wet mass 1 kg, dry mass 0.00034 kg, water content 2940.2, carbon content, fossil 0.0017899
- lubricating oil: 1.07e-5 kg; = 1,07e-5* clinker; lognormal variance with pedigree 0.4762, pedigree (2,3,3,1,1)
  Measured value. Weighted average of values informed by manufacturers. Lubrication of factory equipment.
  Uncertainty: B
  properties: carbon content, fossil 0.75, heating value, net 40.2 MJ, wet mass 1 kg, dry mass 1 kg
  note on carbon content, fossil: Lubricating oil is produced from diesel. C-content/dry mass of fats and oils considered 75%, from: ecoinvent v2.2 report, n 15a, pg 40
  note on heating value, net: Literature value, Source: IPCC 2006, 2006 IPCC Guidelines for National Greenhouse Gas Inventories, Prepared by the National Greenhouse Gas Inventories Programme, Eggleston H.S., Buendia L., Miwa K., Ngara T. and Tanabe K. (eds). Published: IGES, Japan
- diesel: 9.67e-5 kg; = 9,67e-5* clinker; lognormal variance with pedigree 2.2057, pedigree (2,2,3,1,1)
  Measured value. Weighted average of values informed by manufacturers. Fuel used in factory equipment including kiln.
  Uncertainty: B
  properties: heating value, net 42.3 MJ, carbon dioxide factor 74 kg/GJ, wet mass 1 kg, dry mass 1 kg, carbon content, fossil 0.865
  note on carbon content, fossil: C-content of diesel is 86.5% (ecoinvent v2.2 report 6_IV, Tab 3.14)
- petroleum coke: 0.089 kg; = 0,089* clinker; lognormal variance with pedigree 0.0147, pedigree (2,2,3,1,1)
  (same comment as for wood chips, wet, measured as dry mass)
  properties: dry mass 1 kg, carbon dioxide factor 92 kg/GJ, carbon content, fossil 0.885, wet mass 1 kg, heating value, net 33.2 MJ
- heavy fuel oil: 0.000148 kg; = 1,48e-4* clinker; lognormal variance with pedigree 1.1547, pedigree (2,2,3,1,1)
  (same comment as for wood chips, wet, measured as dry mass)
  property carbon dioxide factor 77 kg/GJ; name heavy_fuel_oil_CO2_factor
  properties: dry mass 1 kg, carbon content, fossil 0.849, wet mass 1 kg, heating value, net 40 MJ
- lignite: 0.000692 kg; = 0.000692* clinker+ wasteplastic*0+ usedtyre*0+ biowaste*0+ sawdust*0+ wasteoil*0+ sludge*0+ other_waste*0+ sawdust_organics*0+ steel_dust*0+ flyash*0+ mill_scale*0+ waste_limestone*0+ soil_contaminated*0+ spent_catalyzer*0+ waste_foundry_sand*0; lognormal variance with pedigree 1.0837, pedigree (2,2,3,1,1)
  (same comment as for wood chips, wet, measured as dry mass)
  properties: carbon content, fossil 0.655, wet mass 1 kg, heating value, net 24 MJ, water content 1.38095, dry mass 0.42 kg, carbon dioxide factor 96 kg/GJ
  note on carbon content, fossil: C content of dry lignite is 58-73% (specified in Tab 1.1, report 6, part VI). A mean content of 0.655 kg C/kg dry lignite was considered.
- shale: 0.0107 kg; = 1,07e-2*clinker; lognormal variance with pedigree 0.6897, pedigree (2,2,3,1,1)
  (same comment as for clay)
  properties: dry mass 0.965 kg, water content 0.0362694, wet mass 1 kg
- charcoal: 0.00819 kg; = 8,19e-3*clinker; lognormal variance with pedigree 1.7787, pedigree (2,2,3,1,1)
  (same comment as for wood chips, wet, measured as dry mass)
  properties: heating value, net 23 MJ, wet mass 1 kg, carbon dioxide factor 84 kg/GJ, carbon content, non-fossil 0.8, dry mass 1 kg
- natural gas, low pressure: 9.81e-6 m3; = 9,81e-6*clinker; lognormal variance with pedigree 1.6047, pedigree (2,2,3,1,1)
  (same comment as for wood chips, wet, measured as dry mass)
  properties: heating value, net 37 MJ, dry mass 1 kg, carbon content, fossil 0.695187, carbon dioxide factor 56 kg/GJ, wet mass 1 kg
  note on carbon content, fossil: C content considered the same as in high pressure (consumption mix)
- refractory, high aluminium oxide, packed: 9.83e-5 kg; = 9,83e-5* clinker; lognormal variance with pedigree 0.6742, pedigree (2,3,3,1,1)
  Measured value. Weighted average of values informed by manufacturers. Replacement of refractory used in kiln. Proportion between refractory types extrapolated from clinker production/CH (accessed 28.02.2018).
  Uncertainty: B
  properties: dry mass 1 kg, wet mass 1 kg
- limestone, crushed, for mill: 1.42 kg; = 1,42*clinker; lognormal variance with pedigree 0.0057, pedigree (2,2,3,1,1)
  (same comment as for clay)
  properties: water content 0.00200401, dry mass 0.998 kg, wet mass 1 kg, carbon content, fossil 0.117492
- tap water: 0.00192 kg; name tapwater_input; = 1,92e-3* clinker; lognormal variance with pedigree 0.0126, pedigree (1,5,3,5,1)
  Measured value. Weighted average of values informed by manufacturers. Water used in the factory (e.g. bathrooms, cleaning, etc.).
  Uncertainty: B
  properties: wet mass 1 kg, carbon content, fossil 0.00178991, dry mass 0.000337476 kg, water content 2962.17
  note on carbon content, fossil: Bicarbonate content is 2.93 mol/m3. CO2 content is 0.1 mol/m3 (ecoinvent v2.2 report 8, Tab 93.1).
- gravel, crushed: 0.0074 kg; = 7,40e-3*clinker; lognormal variance with pedigree 1.5987, pedigree (2,2,3,1,1)
  Measured value. Weighted average of values informed by manufacturers. Raw material for clinker production. "Gravel, crushed" is used as a proxy for artificial sand, as it is also produced by rock crushing.
  Uncertainty: B
  properties: dry mass 1 kg, wet mass 1 kg
- refractory, fireclay, packed: 5.9e-5 kg; = 5,90e-5* clinker; lognormal variance with pedigree 0.6742, pedigree (2,3,3,1,1)
  (same comment as for refractory, high aluminium oxide, packed)
  properties: wet mass 1 kg, dry mass 1 kg
- iron ore, crude ore, 46% Fe: 0.00607 kg; = 6,07e-3*clinker; lognormal variance with pedigree 0.5177, pedigree (2,2,3,1,1)
  (same comment as for clay)
  properties: dry mass 1 kg, wet mass 1 kg
- granulated blast furnace slag: 0.00146 kg; = 1,46e-3*clinker; lognormal variance with pedigree 0.7497, pedigree (2,2,3,1,1)
  Measured value. Weighted average of values informed by manufacturers.
  Uncertainty: B
  properties: dry mass 1 kg, wet mass 1 kg
- refractory, basic, packed: 0.000136 kg; = 1,36e-4* clinker; lognormal variance with pedigree 0.6742, pedigree (2,3,3,1,1)
  (same comment as for refractory, high aluminium oxide, packed)
  properties: wet mass 1 kg, dry mass 1 kg
- synthetic rubber: 2.06e-5 kg; = 2,06e-5*clinker; lognormal variance with pedigree 0.7426, pedigree (2,4,3,1,1)
  Measured value. Weighted average of values informed by manufacturers. Replacement of rubber wear parts of factory equipment.
  Uncertainty: B
  properties: heating value, net 26.42 MJ, carbon content, fossil 0.871949, wet mass 1 kg, dry mass 1 kg
  note on carbon content, fossil: EPDM (Ethylene-propene-diene terpolymer) rubber is a terpolymer of ethylene, propene, and a diene with the residual unsaturated portion of the diene in the side chain (ecoinvent v2.2 report 7-part XX & Ullmann). Chemical formula (deduced from Evidences of Solvent-Induced Miscibility in Polychloroprene-co-Ethylene-Propene Diene Terpolymer Blends, Dubey et al., Journal of Applied Polymer Science, 2009, 111:1884-1891): C20H35

## Inputs from nature
- Water, unspecified natural origin [natural resource, in water]: 2.78e-6 m3; name water_unspecified_input; = 2,78e-6* clinker; lognormal variance with pedigree 1.6717, pedigree (2,2,3,1,1)
  (same comment as for water, harvested from rainwater)
- Water, river [natural resource, in water]: 0.000166 m3; name water_river_input; = 1,66e-4*clinker; lognormal variance with pedigree 0.2747, pedigree (2,2,3,1,1)
  (same comment as for water, harvested from rainwater)
- Water, well, in ground [natural resource, in water]: 7.46e-5 m3; name water_well_input; = 7,46e-5*clinker; lognormal variance with pedigree 0.4527, pedigree (2,2,3,1,1)
  (same comment as for water, harvested from rainwater)

## Emissions to nature
- Nitrogen oxides [air, unspecified]: 0.00227 kg; = 2,27e-3* clinker; lognormal variance with pedigree 0.4477, pedigree (2,2,3,1,1)
  Measured value. Weighted average of values informed by manufacturers.
  Uncertainty: B
- Chromium [air, unspecified]: 3.91e-7 kg; = 3,91e-7* clinker; lognormal variance with pedigree 0.2747, pedigree (2,2,3,1,1)
  Measured value. Weighted average of values informed by manufacturers.
  Uncertainty: B
- Dioxins, measured as 2,3,7,8-tetrachlorodibenzo-p-dioxin [air, unspecified]: 7.18e-14 kg; = 7,18e-14* clinker; lognormal variance with pedigree 0.0837, pedigree (2,2,3,1,1)
  Measured value. Weighted average of values informed by manufacturers. "Dioxins" is used as a proxy for "dioxins and furans", reported together by manufacturers.
  Uncertainty: B
- Cobalt [air, unspecified]: 1.23e-8 kg; = 1,23e-8* clinker; lognormal variance with pedigree 0.1797, pedigree (2,2,3,1,1)
  Measured value. Weighted average of values informed by manufacturers.
  Uncertainty: B
- Cadmium [air, unspecified]: 5.74e-9 kg; = 5,74e-9* clinker; lognormal variance with pedigree 1.2837, pedigree (2,2,3,1,1)
  Measured value. Weighted average of values informed by manufacturers.
  Uncertainty: B
- Beryllium [air, unspecified]: 8.27e-9 kg; = 8,27e-9* clinker; lognormal variance with pedigree 1.1677, pedigree (2,2,3,1,1)
  Measured value. Weighted average of values informed by manufacturers.
  Uncertainty: B
- Arsenic [air, unspecified]: 8.93e-9 kg; = 8,93e-9* clinker; lognormal variance with pedigree 0.0987, pedigree (2,2,3,1,1)
  Measured value. Weighted average of values informed by manufacturers.
  Uncertainty: B
- Manganese [air, unspecified]: 8.19e-7 kg; = 8,19e-7*clinker; lognormal variance with pedigree 0.0957, pedigree (2,2,3,1,1)
  Measured value. Weighted average of values informed by manufacturers.
  Uncertainty: B
- Lead [air, unspecified]: 8.71e-8 kg; = 8,71e-8* clinker; lognormal variance with pedigree 1.3877, pedigree (2,2,3,1,1)
  Measured value. Weighted average of values informed by manufacturers.
  Uncertainty: B
- Carbon monoxide, fossil [air, unspecified]: 0.000766 kg; = 7,66e-4* clinker; lognormal variance with pedigree 0.8377, pedigree (2,2,3,1,1)
  Measured value. Weighted average of values informed by manufacturers.
  Uncertainty: B
- Zinc [air, unspecified]: 2.18e-6 kg; = 2,18e-6* clinker; lognormal variance with pedigree 0.3277, pedigree (2,2,3,1,1)
  Measured value. Weighted average of values informed by manufacturers.
  Uncertainty: B
- Thallium [air, unspecified]: 8.64e-9 kg; = 8,64e-9* clinker; lognormal variance with pedigree 0.3537, pedigree (2,2,3,1,1)
  Measured value. Weighted average of values informed by manufacturers.
  Uncertainty: B
- Water [air, unspecified]: 0.00024876 m3; = 0.00024876* clinker; lognormal variance with pedigree 0.1157, pedigree (2,2,3,1,1)
  Estimation. Calculated as: ( water_unspecified_input+ water_well_input+ water_river_input+ (rainwater_input/1000))*clinker. All water input except for tap water was considered to leave the system as evaporated water, as water is used for cooling.
  Uncertainty: B
- Sulfur oxides [air, unspecified]: 0.000916 kg; = 9,16e-4* clinker; lognormal variance with pedigree 1.1557, pedigree (2,2,3,1,1)
  Measured value. Weighted average of values informed by manufacturers.
  Uncertainty: B
- Particulates, > 2.5 um, and < 10um [air, non-urban air or from high stacks]: 2.7e-5 kg; = 2,70e-5* clinker; lognormal variance with pedigree 1.4807, pedigree (2,2,3,1,1)
  Measured value. Weighted average of values informed by manufacturers. Manufacturers only informed total particulate matter emission. The proportion between particle sizes was extrapolated from clinker production/CH (accessed 28.02.2018).
  Uncertainty: B
- Selenium [air, unspecified]: 1.2e-8 kg; = 1,20e-8* clinker; lognormal variance with pedigree 0.1677, pedigree (2,2,3,1,1)
  Measured value. Weighted average of values informed by manufacturers.
  Uncertainty: B
- Tin [air, unspecified]: 2.34e-7 kg; = 2,34e-7* clinker; lognormal variance with pedigree 2.3017, pedigree (2,2,3,1,1)
  Measured value. Weighted average of values informed by manufacturers.
  Uncertainty: B
- Copper [air, unspecified]: 9.07e-8 kg; = 9,07e-8* clinker; lognormal variance with pedigree 0.0767, pedigree (2,2,3,1,1)
  Measured value. Weighted average of values informed by manufacturers.
  Uncertainty: B
- Nickel [air, unspecified]: 2.88e-7 kg; = 2,88e-7* clinker; lognormal variance with pedigree 0.6827, pedigree (2,2,3,1,1)
  Measured value. Weighted average of values informed by manufacturers.
  Uncertainty: B
- Carbon dioxide, fossil [air, unspecified]: 0.832 kg; = 0,832* clinker; lognormal variance with pedigree 0.0107, pedigree (2,2,3,1,1)
  Calculated value. Consumption of fossil fuels x lower heating value x CO2 emission factor (in terms of energy), based on information delivered by manufacturers or, alternatively, taken from the National Energy Balance (lower heating values) and the "Getting the Numbers Right" database (CO2 emission factors). Weighted average of individual values. CO2 of calcination = 0,525 kg/kg clinker.
  Uncertainty: B
- Particulates, > 10 um [air, non-urban air or from high stacks]: 1.93e-5 kg; = 1,93e-5* clinker; lognormal variance with pedigree 0.052, pedigree (3,5,3,1,1)
  Measured value. Weighted average of values informed by manufacturers. Manufacturers only informed total particulate matter emission. The proportion between particle sizes was extrapolated from clinker production/CH (accessed 28.02.2018).
  Uncertainty: E
- Carbon dioxide, non-fossil [air, unspecified]: 0.031 kg; = 0,031* clinker; lognormal variance with pedigree 0.8477, pedigree (2,2,3,1,1)
  Calculated value. Consumption of biomass fuels x lower heating value x CO2 emission factor (in terms of energy), based on information delivered by manufacturers or, alternatively, taken from the National Energy Balance (lower heating values) and the "Getting the Numbers Right" database (CO2 emission factors). Weighted average of individual values. Biomass fuels: charcoal, wood chips, biodiesel (7% biomass), waste rubber (27% biomass), waste wood, biowaste.
  Uncertainty: B
- Antimony [air, unspecified]: 8.48e-9 kg; = 8,48e-9* clinker; lognormal variance with pedigree 0.1397, pedigree (2,2,3,1,1)
  Measured value. Weighted average of values informed by manufacturers.
  Uncertainty: B
- Hydrogen fluoride [air, unspecified]: 7.97e-7 kg; = 7,97e-7* clinker; lognormal variance with pedigree 0.2097, pedigree (2,2,3,1,1)
  Measured value. Weighted average of values informed by manufacturers.
  Uncertainty: B
- Particulates, < 2.5 um [air, non-urban air or from high stacks]: 8.22e-5 kg; = 8,22e-5* clinker; lognormal variance with pedigree 1.4807, pedigree (2,2,3,1,1)
  (same comment as for Particulates, > 2.5 um, and < 10um)
- Hydrogen chloride [air, unspecified]: 5.48e-6 kg; = 5,48e-6* clinker; lognormal variance with pedigree 0.2267, pedigree (2,2,3,1,1)
  Measured value. Weighted average of values informed by manufacturers.
  Uncertainty: B
- Hydrocarbons, unspecified [air, non-urban air or from high stacks]: 1.85e-5 kg; = 1,85e-5*clinker; lognormal variance with pedigree 0.3557, pedigree (2,2,3,1,1)
  Measured value. Weighted average of values informed by manufacturers. "Hydrocarbons, unspecified" used as proxy for "total hydrocarbons" reported by manufacturers.
  Uncertainty: B
- Mercury [air, unspecified]: 4.62e-9 kg; = 4,62e-9* clinker; lognormal variance with pedigree 0.1437, pedigree (2,2,3,1,1)
  Measured value. Weighted average of values informed by manufacturers.
  Uncertainty: B

## Sampling procedure
Primary data were gathered from six cement manufacturers in Brazil, who informed the total values of inputs and outputs related to clinker production in 2016, considering all their clinker production sites. All types of flows were reported, namely: primary and secondary raw materials and fuels, auxiliary materials, electricity consumption, water consumption and air emissions (from emissions monitoring reports). It corresponds to 70% market share, considered a good representativeness level.
For all flows, the weighted average of each manufacturer"s unit flows was calculated, considering its clinker production volume as the weighing factor. The types of raw materials and fuels vary between manufacturers, which explains the high basic uncertainty for some flows, as this dataset represents the average clinker production for Brazil. Basic uncertainty was calculated based on the sample"s weighted standard deviation.
Water consumption was usually reported for the whole integrated cement plants (clinker + cement production operations). Based on literature and expert opinion, the total water volume was divided equally between the clinker and the cement production processes. Raw materials and fuel inputs were considered to be dry. As water is mainly used for cooling, it was considered that all water evaporates, except for the "tap water" input, which was considered to be used as drinking water and whose output is modelled as an effluent.
Fuel consumption was informed by manufacturers in terms of volume or mass. CO2 emissions (both fossil and biogenic) were calculated from fuel inputs. As CO2 emission factors are expressed in terms of energy (kg/GJ), fuel consumption was converted into energy by multiplying them to the corresponding lower heating values. Both the CO2 emission factors and heating values are informed in the "exchange properties" field.
Other air emissions are the weighted average of the manufacturers who informed them. Not all manufacturers reported all air emissions and the weighted average was adjusted accordingly (only considering the ones who informed each flow).
Some specific information was extrapolated from "clinker production/CH" dataset (accessed 28.02.2018): proportion between refractory types; proportion between particulate size classes and the infrastructure flow "industrial machine, heavy, unspecified".
The amounts of the exchanges were calculated considering the weighted average of the sample. No conversion to the geometric mean of the lognormal distribution was done, for consistency reasons with other ecoinvent datasets.

## Extrapolations
Primary data corresponding to 70% of the Brazilian cement production were used to represent clinker production on a national scale. Some flows were extrapolated from the clinker production/CH dataset (accessed 28.02.2018).
