# treatment of sludge from steel rolling, residual material landfill

Dataset: EcoSpold 2, unit process
Geography: CH
Time period: 1994-01-01 to 2021-12-31
Technology level: current
Classification: EcoSpold01Categories: waste management/residual material landfill
Classification: ISIC rev.4 ecoinvent: 3822:Treatment and disposal of hazardous waste
Synonyms: sludge from internal wastewater treatment of steel rolling and drawing
Tags: ConvertedDataset; Treatment
Scenario: Business-as-Usual
System model: Allocation, cut-off by classification
Generated by: Gabor Doka (obsolete)
Published in: Doka G. 2009
Database: ecoinvent
isCopyrightProtected: true
accessRestrictedTo: 1

## General comment
Inventoried waste contains 100% Sludge from Steelrolling; .
waste composition (wet, in ppm): H2O 200000; O 728320; H 1101.7; C 9915.4; S n.a.; N n.a.; P n.a.; B n.a.; Cl 7822.7; Br n.a.; F n.a.; I n.a.; Ag n.a.; As n.a.; Ba n.a.; Cd 874.6; Co n.a.; Cr 3148.6; Cu 1692.3; Hg 174.92; Mn 3567.7; Mo n.a.; Ni 4947.5; Pb 1749.2; Sb n.a.; Se n.a.; Sn n.a.; V n.a.; Zn 1309; Be n.a.; Sc n.a.; Sr n.a.; Ti n.a.; Tl n.a.; W n.a.; Si n.a.; Fe 27099; Ca n.a.; Al 8278.7; K n.a.; Mg n.a.; Na n.a.;
Share of carbon in waste that is biogenic 0%.
Additional solidification with 0.4 kg of cement.
[This dataset was already contained in the ecoinvent database version 2. It was not individually updated during the transfer to ecoinvent version 3. Life Cycle Impact Assessment results may still have changed, as they are affected by changes in the supply chain, i.e. in other datasets. This dataset was generated following the ecoinvent quality guidelines for version 2. It may have been subject to central changes described in the ecoinvent version 3 change report (http://www.ecoinvent.org/database/ecoinvent-version-3/reports-of-changes/), and the results of the central updates were reviewed extensively. The changes added e.g. consistent water flows and other information throughout the database. The documentation of this dataset can be found in the ecoinvent reports of version 2, which are still available via the ecoinvent website. The change report linked above covers all central changes that were made during the conversion process.]

## Included activities end
Waste-specific short-term emissions to water from leachate. Long-term emissions from landfill to ground water. Expenditures for solidificalion with cement (user-specified option)

## Geography
Technology encountered in Switzerland in 2000. Landfill includes base seal and leachate collection system.

## Technology
Swiss residual material landfill for polluted, inorganic waste. With base seal and leachate collection system. Recultivation after closure.

## Time period
Waste composition as given in literature reference, theoretical data or other source. Transfer coefficients from prospective model.

## Reference product
- sludge from steel rolling: -1 kg; CPC 39: Wastes or scraps; By-product classification Waste
  EcoSpold01Location=CH
  production volume 0.0336675 kg
    This is a placeholder value that does not reflect real-world production volumes. This dataset does not currently require a real-world production volume to work in the database framework, and no actual data were collected yet. This has no negative effect on the results of the ecoinvent database. The placeholder value of this activity was scaled according to the nominal GDP of 2005 (source: United Nations, http://data.un.org/Glossary.aspx?q=GDP+%28current+US%24%29, accessed 20130726) to reflect an appropriate share of the global production volume, which is also a placeholder value.
  property heating value, net 0 MJ
    Non combustible products are assumed to have an LHV equal to zero (0).
  property price 0 EUR2005
    Waste products are assigned a price of zero as they are assumed to require further treatment.
  property carbon content 0.0123943
    carbon content on a dry matter basis (reserved; not for manual entry)
  properties: dry mass 0.8 kg, wet mass 1 kg, carbon content, non-fossil 0, water content 0.25, carbon content, fossil 0.0123943, water in wet mass 0.2 kg, carbon allocation 0.00991541 kg

## Inputs from technosphere
- cement, unspecified: 0.4 kg; lognormal variance with pedigree 0.05, pedigree (1,1,5,1,1)
  Cement for solidification of residual material waste. Uncertainty in mass from solidification recipe.
  EcoSpold01Location=CH
  properties: wet mass 1 kg, dry mass 1 kg
- residual material landfill: 2.0833e-9 unit; lognormal variance with pedigree 0.04, pedigree (1,1,5,1,1)
  demands per kilogram waste. uncertainty is heeded in the module
  EcoSpold01Location=CH
- process-specific burdens, residual material landfill: 1 kg; lognormal variance with pedigree 0.04, pedigree (1,1,5,1,1)
  EcoSpold01Location=CH
  demands per kilogram waste. uncertainty is heeded in the module;activityLink introduced to establish a direct link to the corresponding regional supply of this product
- waste cement, hydrated: -1 kg; lognormal variance with pedigree 0.05, pedigree (1,1,5,1,1)
  Hydrated cement for solidification of residual material waste. Uncertainty in mass from solidification recipe.
  EcoSpold01Location=CH
  production volume 1 kg
    Calculated from the production volume of sludge from steel rolling, 20% water in proportion to the respective output amounts.
  properties: wet mass 1 kg, dry mass 1 kg

## Emissions to nature
- BOD5, Biological Oxygen Demand [water, ground-, long-term]: 0.0052969 kg; lognormal variance with pedigree 0.46, pedigree (1,1,5,1,1)
  uncertainty is calculated from uncertainties in waste composition and transfer coefficients in incinerator and landfills.
- Iron, ion [water, surface water]: 2.2674e-7 kg; lognormal variance with pedigree 1.58, pedigree (1,1,5,1,1)
  uncertainty is calculated from uncertainties in waste composition and transfer coefficients in residual landfill
- Aluminium [water, ground-, long-term]: 0.0024576 kg; lognormal variance with pedigree 0.8, pedigree (1,1,5,1,1)
  (same comment as for BOD5, Biological Oxygen Demand)
- Zinc, ion [water, ground-, long-term]: 1.6043e-5 kg; lognormal variance with pedigree 5.51, pedigree (1,1,5,1,1)
  (same comment as for BOD5, Biological Oxygen Demand)
- BOD5, Biological Oxygen Demand [water, surface water]: 8.8429e-6 kg; lognormal variance with pedigree 1.05, pedigree (1,1,5,1,1)
  (same comment as for Iron, ion)
- Cadmium, ion [water, surface water]: 9.9125e-9 kg; lognormal variance with pedigree 1.96, pedigree (1,1,5,1,1)
  (same comment as for Iron, ion)
- Mercury [water, ground-, long-term]: 8.2565e-6 kg; lognormal variance with pedigree 3.26, pedigree (1,1,5,1,1)
  (same comment as for BOD5, Biological Oxygen Demand)
- Chromium VI [water, surface water]: 0.00018927 kg; lognormal variance with pedigree 0.72, pedigree (1,1,5,1,1)
  (same comment as for Iron, ion)
- Iron, ion [water, ground-, long-term]: 0.00013582 kg; lognormal variance with pedigree 7.3, pedigree (1,1,5,1,1)
  (same comment as for BOD5, Biological Oxygen Demand)
- DOC, Dissolved Organic Carbon [water, ground-, long-term]: 0.0064079 kg; lognormal variance with pedigree 0.46, pedigree (1,1,5,1,1)
  (same comment as for BOD5, Biological Oxygen Demand)
- Chromium VI [water, ground-, long-term]: 0.00059787 kg; lognormal variance with pedigree 0.56, pedigree (1,1,5,1,1)
  (same comment as for BOD5, Biological Oxygen Demand)
- Mercury [water, surface water]: 1.3784e-8 kg; lognormal variance with pedigree 1.91, pedigree (1,1,5,1,1)
  (same comment as for Iron, ion)
- Manganese [water, ground-, long-term]: 2.947e-5 kg; lognormal variance with pedigree 6.29, pedigree (1,1,5,1,1)
  (same comment as for BOD5, Biological Oxygen Demand)
- DOC, Dissolved Organic Carbon [water, surface water]: 1.0698e-5 kg; lognormal variance with pedigree 1.05, pedigree (1,1,5,1,1)
  (same comment as for Iron, ion)
- COD, Chemical Oxygen Demand [water, surface water]: 2.7034e-5 kg; lognormal variance with pedigree 1.05, pedigree (1,1,5,1,1)
  (same comment as for Iron, ion)
- Lead [water, surface water]: 1.5147e-8 kg; lognormal variance with pedigree 1.9, pedigree (1,1,5,1,1)
  (same comment as for Iron, ion)
- TOC, Total Organic Carbon [water, ground-, long-term]: 0.0064079 kg; lognormal variance with pedigree 0.46, pedigree (1,1,5,1,1)
  (same comment as for BOD5, Biological Oxygen Demand)
- Manganese [water, surface water]: 4.9199e-8 kg; lognormal variance with pedigree 1.75, pedigree (1,1,5,1,1)
  (same comment as for Iron, ion)
- Lead [water, ground-, long-term]: 9.0733e-6 kg; lognormal variance with pedigree 7.55, pedigree (1,1,5,1,1)
  (same comment as for BOD5, Biological Oxygen Demand)
- Cadmium, ion [water, ground-, long-term]: 5.9376e-6 kg; lognormal variance with pedigree 6.95, pedigree (1,1,5,1,1)
  (same comment as for BOD5, Biological Oxygen Demand)
- Copper, ion [water, ground-, long-term]: 6.5144e-5 kg; lognormal variance with pedigree 3.28, pedigree (1,1,5,1,1)
  (same comment as for BOD5, Biological Oxygen Demand)
- Nickel, ion [water, ground-, long-term]: 0.0017912 kg; lognormal variance with pedigree 0.75, pedigree (1,1,5,1,1)
  (same comment as for BOD5, Biological Oxygen Demand)
- COD, Chemical Oxygen Demand [water, ground-, long-term]: 0.016194 kg; lognormal variance with pedigree 0.46, pedigree (1,1,5,1,1)
  (same comment as for BOD5, Biological Oxygen Demand)
- Chloride [water, ground-, long-term]: 0.0055853 kg; lognormal variance with pedigree 0.44, pedigree (1,1,5,1,1)
  (same comment as for BOD5, Biological Oxygen Demand)
- Nickel, ion [water, surface water]: 2.9903e-6 kg; lognormal variance with pedigree 1.21, pedigree (1,1,5,1,1)
  (same comment as for Iron, ion)
- TOC, Total Organic Carbon [water, surface water]: 1.0698e-5 kg; lognormal variance with pedigree 1.05, pedigree (1,1,5,1,1)
  (same comment as for Iron, ion)
- Chloride [water, surface water]: 0.0022374 kg; lognormal variance with pedigree 0.48, pedigree (1,1,5,1,1)
  (same comment as for Iron, ion)
- Zinc, ion [water, surface water]: 2.6783e-8 kg; lognormal variance with pedigree 1.83, pedigree (1,1,5,1,1)
  (same comment as for Iron, ion)
- Copper, ion [water, surface water]: 1.0876e-7 kg; lognormal variance with pedigree 1.64, pedigree (1,1,5,1,1)
  (same comment as for Iron, ion)
- Aluminium [water, surface water]: 4.1028e-6 kg; lognormal variance with pedigree 1.17, pedigree (1,1,5,1,1)
  (same comment as for Iron, ion)

## Sampling procedure
Landfill model based on observed leachate concentrations in literature. Extrapolated to 60'000 years heeding chemical characteristics. Initial waste composition from various literature sources.

## Extrapolations
This dataset has been extrapolated from year 2000 to the year of the calculation (2021). The uncertainty has been adjusted accordingly.

## Review by Niels Jungbluth 2009-02-15
passed.
