# treatment of wastewater from anaerobic digestion of whey, capacity 1E9l/year

Dataset: EcoSpold 2, unit process
Geography: CH
Time period: 1994-01-01 to 2021-12-31
Technology level: current
Classification: ISIC rev.4 ecoinvent: 3700:Sewerage
Classification: EcoSpold01Categories: waste management/wastewater treatment
Tags: Treatment; ConvertedDataset
Scenario: Business-as-Usual
System model: Allocation, cut-off by classification
Share of production covered: 1 %
Generated by: Michael Spielmann (obsolete)
Published in: Jungbluth N. 2007
Database: ecoinvent
isCopyrightProtected: true
accessRestrictedTo: 1

## General comment
Wastewater purified in a smaller municipal wastewater treatment plant (capacity class 4), with an average capacity size of 5320 per-captia-equivalents PCE.
Wastewater contains (in kg/m3): COD: 11.69 (GSD=122.5%); BOD: 7.792 (GSD=122.5%); DOC: 5.113 (GSD=122.5%); TOC: 5.113 (GSD=122.5%); Ntot.: 0.9 (GSD=122.5%); Ptot.: 0.25 (GSD=122.5%); Ca: 0.9 (GSD=226.6%); K: 1.8 (GSD=226.6%);
[This dataset was already contained in the ecoinvent database version 2. It was not individually updated during the transfer to ecoinvent version 3. Life Cycle Impact Assessment results may still have changed, as they are affected by changes in the supply chain, i.e. in other datasets. This dataset was generated following the ecoinvent quality guidelines for version 2. It may have been subject to central changes described in the ecoinvent version 3 change report (http://www.ecoinvent.org/database/ecoinvent-version-3/reports-of-changes/), and the results of the central updates were reviewed extensively. The changes added e.g. consistent water flows and other information throughout the database. The documentation of this dataset can be found in the ecoinvent reports of version 2, which are still available via the ecoinvent website. The change report linked above covers all central changes that were made during the conversion process.]

## Included activities end
Infrastructure materials for municipal wastewater treatment plant, transports, dismantling. Land use burdens.

## Geography
Specific to the technology mix encountered in Switzerland in 2000. Well applicable to modern treatment practices in Europe, North America or Japan.

## Technology
Three stage wastewater treatment (mechanical, biological, chemical) including sludge digestion (fermentation) according to the average technology in Switzerland

## Parameters
- fraction, process water, to air: 0.1 dimensionless; name fraction_PW_to_air; lognormal variance with pedigree 0.092025, pedigree (4,4,3,2,4)
  Literature value (Statistics Canada, 2007 & Shaffer, K.H., 2008, Consumptive water use in the Great Lakes Basin, USGS) (Vionnet, S., Quantis Water Database - Technical Report, 2012).

## Reference product
- wastewater from anaerobic digestion of whey: -1 m3; name RP_amount_1; By-product classification Waste; CPC 39920: Sewage sludge
  production volume 0.0336675 m3; name RP_PV_1
    This is a placeholder value that does not reflect real-world production volumes. This dataset does not currently require a real-world production volume to work in the database framework, and no actual data were collected yet. This has no negative effect on the results of the ecoinvent database. The placeholder value of this activity was scaled according to the nominal GDP of 2005 (source: United Nations, http://data.un.org/Glossary.aspx?q=GDP+%28current+US%24%29, accessed 20130726) to reflect an appropriate share of the global production volume, which is also a placeholder value.
  property price 0 EUR2005; name RP_amount_1_price_EUR2005
    Waste products are assigned a price of zero as they are assumed to require further treatment.
  property carbon content, non-fossil 0.566667
    TOC is 5.1 kg/m3 (Tab 12.51, ecoinvent v2.2 report 17). TOC was considered as Total Carbon.
  property carbon content 0.566667
    carbon content on a dry matter basis (reserved; not for manual entry)
  properties: water in wet mass 991 kg, water content 110.111, carbon content, fossil 0, dry mass 9 kg, wet mass 1000 kg, carbon allocation 5.1 kg

## Inputs from technosphere
- titanium dioxide: 3.0843e-5 kg; lognormal variance with pedigree 0.54, pedigree (1,1,5,1,1)
  burden from sludge incineration. Uncertainty calculated from wastewater composition and treatment model
  properties: dry mass 1 kg, wet mass 1 kg
- process-specific burdens, residual material landfill: 0.061541 kg; lognormal variance with pedigree 0.07, pedigree (1,1,5,1,1)
  burden from sludge incineration. Uncertainty calculated from wastewater composition and treatment model;activityLink introduced to establish a direct link to the corresponding regional supply of this product
- sodium hydroxide, without water, in 50% solution state: 0.00017006 kg; lognormal variance with pedigree 0.09, pedigree (1,1,5,1,1)
  (same comment as for titanium dioxide)
  properties: heating value, net 3.03 MJ, wet mass 1 kg, dry mass 1 kg
- electricity, low voltage: 8.271 kWh; lognormal variance with pedigree 0.06, pedigree (1,1,5,1,1)
  direct wastewater treatment plant burden. Uncertainty calculated from wastewater composition and treatment model
- electricity, high voltage: 0.49114 kWh; lognormal variance with pedigree 0.49, pedigree (1,1,5,1,1)
  (same comment as for titanium dioxide)
- waste plastic, mixture: -0.0155 kg; name BP_amount_1; lognormal variance with pedigree 0.04, pedigree (1,1,5,1,1)
  (same comment as for electricity, low voltage)
  production volume 0.000521847 kg; = BP_amount_1* RP_PV_1/ABS( RP_amount_1)
    Calculated from the production volume of sewage from anaerobic digestion of whey in proportion to the respective output amounts.
  property price 0 EUR2005; name BP_amount_1_price_EUR2005
  properties: wet mass 1 kg, water content 0.180638, dry mass 0.847 kg, carbon content, fossil 0.747344, heating value, net 30.79 MJ
  note on carbon content, fossil: C content in 1 kg DM was calculated using data in Tab A.2, ecoinvent v2.2 report 13_I
  note on heating value, net: Value taken from the general comment of the treatment dataset.
- iron (III) chloride, without water, in 40% solution state: 1.5503 kg; lognormal variance with pedigree 0.1, pedigree (1,1,5,1,1)
  direct wastewater treatment plant burden plus burden from sludge incineration. Uncertainty calculated from wastewater composition and treatment model
  properties: wet mass 1 kg, dry mass 1 kg
- waste graphical paper: -0.0155 kg; name BP_amount_2; lognormal variance with pedigree 0.04, pedigree (1,1,5,1,1)
  (same comment as for electricity, low voltage)
  production volume 0.000521847 kg; = BP_amount_2* RP_PV_1/ABS( RP_amount_1)
    (same comment as for waste plastic, mixture)
  property price 0 EUR2005; name BP_amount_2_price_EUR2005
  properties: heating value, net 14.12 MJ, dry mass 0.888 kg, water content 0.126126, carbon content, non-fossil 0.454955, wet mass 1 kg
- quicklime, milled, packed: 3.0832e-5 kg; lognormal variance with pedigree 0.1, pedigree (1,1,5,1,1)
  (same comment as for titanium dioxide)
  properties: wet mass 1 kg, water content 0.010101, dry mass 0.99 kg
- waste cement, hydrated: -0.061541 kg; name BP_amount_3; lognormal variance with pedigree 0.08, pedigree (1,1,5,1,1)
  (same comment as for titanium dioxide)
  production volume 0.00207193 kg; = BP_amount_3* RP_PV_1/ABS( RP_amount_1)
    (same comment as for waste plastic, mixture)
  property price 0 EUR2005; name BP_amount_3_price_EUR2005
  properties: wet mass 1 kg, dry mass 1 kg
- process-specific burdens, slag landfill: 0.49511 kg; lognormal variance with pedigree 0.07, pedigree (1,1,5,1,1)
  (same comment as for process-specific burdens, residual material landfill)
- sewer grid, 1E9l/year, 30 km: 2.8218e-7 km; lognormal variance with pedigree 0.04, pedigree (1,1,5,1,1)
  uncertainty heeded in exchanges of the module
- cement, unspecified: 0.024617 kg; lognormal variance with pedigree 0.08, pedigree (1,1,5,1,1)
  (same comment as for titanium dioxide)
  properties: dry mass 1 kg, wet mass 1 kg
- residual material landfill: 1.2821e-10 unit; lognormal variance with pedigree 0.07, pedigree (1,1,5,1,1)
  (same comment as for titanium dioxide)
- slag landfill: 8.802e-10 unit; lognormal variance with pedigree 0.07, pedigree (1,1,5,1,1)
  (same comment as for titanium dioxide)
- municipal waste incineration facility: 8.5404e-10 unit; lognormal variance with pedigree 0.04, pedigree (1,1,5,1,1)
  (same comment as for titanium dioxide)
- process-specific burdens, municipal waste incineration: 3.4162 kg; lognormal variance with pedigree 0.04, pedigree (1,1,5,1,1)
  (same comment as for process-specific burdens, residual material landfill)
- heat, district or industrial, natural gas: 0.094572 MJ; lognormal variance with pedigree 0.22, pedigree (1,1,5,1,1)
  (same comment as for titanium dioxide)
  properties: heating value, net 1 MJ
- aluminium sulfate, powder: 0.30645 kg; lognormal variance with pedigree 0.1, pedigree (1,1,5,1,1)
  (same comment as for electricity, low voltage)
  properties: wet mass 1 kg, dry mass 1 kg
- ammonia, anhydrous, liquid: 0.0010775 kg; lognormal variance with pedigree 0.22, pedigree (1,1,5,1,1)
  (same comment as for titanium dioxide)
  properties: wet mass 1 kg, dry mass 1 kg
- heat, district or industrial, other than natural gas: 2.8651 MJ; lognormal variance with pedigree 0.04, pedigree (1,1,5,1,1)
  (same comment as for titanium dioxide)
  properties: heating value, net 1 MJ
- iron sulfate: 1.1339 kg; lognormal variance with pedigree 0.1, pedigree (1,1,5,1,1)
  (same comment as for electricity, low voltage)
  properties: wet mass 1 kg, dry mass 1 kg
- wastewater treatment facility, capacity 1E9l/year: 2.6582e-8 unit; lognormal variance with pedigree 0.04, pedigree (1,1,5,1,1)
  uncertainty heeded in exchanges of the module
- chemical, inorganic: 6.2953e-6 kg; lognormal variance with pedigree 0.12, pedigree (1,1,5,1,1)
  (same comment as for titanium dioxide)
  properties: carbon content, fossil 0.003, dry mass 1 kg, wet mass 1 kg
  note on carbon content, fossil: This dataset is an unweighted average of 20 inorganic substances (listed in Tab 88.1, ecoinvent v2.2 report 8, part II), being part of the top100 chemicals included in this database. The C-content has also been calculated as an unweighted average of the C content of the substances composing this dataset.
- chromium oxide, flakes: 6.2946e-7 kg; lognormal variance with pedigree 0.54, pedigree (1,1,5,1,1)
  (same comment as for titanium dioxide)
  properties: wet mass 1 kg, dry mass 1 kg
- hydrochloric acid, without water, in 30% solution state: 3.7772e-6 kg; lognormal variance with pedigree 0.12, pedigree (1,1,5,1,1)
  (same comment as for titanium dioxide)
  properties: dry mass 1 kg, wet mass 1 kg, heating value, net 3.32 MJ
- liquid manure spreading, by vacuum tanker: 0.036471 m3; lognormal variance with pedigree 0.04, pedigree (1,1,5,1,1)
  burden from sludge spreading. Uncertainty calculated from wastewater composition and treatment model
  This exchange has an activity link directly to the producing activity because the product is primarily consumed in the same geographical area where it is produced.

## Emissions to nature
- Phosphorus [air, urban air close to ground]: 4.6478e-5 kg; lognormal variance with pedigree 0.11, pedigree (1,1,5,1,1)
  direct digester gas emission plus emission from sludge incineration. Uncertainty calculated from wastewater composition and treatment model
- Calcium, ion [water, ground-, long-term]: 0.021975 kg; lognormal variance with pedigree 0.73, pedigree (1,1,5,1,1)
  emission from sludge incineration. Uncertainty calculated from wastewater composition and treatment model
- COD, Chemical Oxygen Demand [water, surface water]: 2.2653 kg; lognormal variance with pedigree 0.08, pedigree (1,1,5,1,1)
  sewer overload discharge plus direct wastewater treatment plant emission plus emission from sludge incineration. Uncertainty calculated from wastewater composition and treatment model
- Carbon dioxide, fossil [air, urban air close to ground]: 13.069 kg; lognormal variance with pedigree 0.06, pedigree (1,1,5,1,1)
  (same comment as for Calcium, ion)
- Iron, ion [water, surface water]: 9.3065e-5 kg; lognormal variance with pedigree 0.13, pedigree (1,1,5,1,1)
  (same comment as for COD, Chemical Oxygen Demand)
- Water [air, unspecified]: 0.1 m3; name water_to_air_unspecified; lognormal variance with pedigree 0.0807, pedigree (2,2,5,1,1)
  Calculated value based on water balance.
  property fraction, origin: fresh water 0; name fraction_origin_fresh_water
  property fraction, origin: unspecified 1; name fraction_origin_unspecified
  property fraction, origin: salt water 0; name fraction_origin_salt_water
- Phosphate [water, ground-]: 0.0020267 kg; lognormal variance with pedigree 0.14, pedigree (1,1,5,1,1)
  emission from sludge spreading. Uncertainty calculated from wastewater composition and treatment model
- Water [water, unspecified]: 0.9 m3; name water_to_water_unspecified; lognormal variance with pedigree 0.0807, pedigree (2,2,5,1,1)
  Calculated value based on water balance.
  property fraction, origin: fresh water 1; name fraction_origin_fresh_water_Ww
  property carbon content, fossil 0; name C_content_fossil
  property water in wet mass 1000 kg; name WWM
  property fraction, origin: unspecified 0; name fraction_origin_unspecified_Ww
  property carbon content, non-fossil 0; name C_content_non_fossil
  property wet mass 1000 kg; name WM
  property fraction, origin: salt water 0; name fraction_origin_salt_water_Ww
  property dry mass 0 kg; name DM
- Aluminium [air, urban air close to ground]: 2.1619e-5 kg; lognormal variance with pedigree 0.12, pedigree (1,1,5,1,1)
  (same comment as for Phosphorus)
- Carbon [soil, agricultural]: 0.93796 kg; lognormal variance with pedigree 0.1, pedigree (1,1,5,1,1)
  (same comment as for Phosphate)
- DOC, Dissolved Organic Carbon [water, ground-, long-term]: 0.003669 kg; lognormal variance with pedigree 0.12, pedigree (1,1,5,1,1)
  (same comment as for Calcium, ion)
- Aluminium [soil, agricultural]: 0.034547 kg; lognormal variance with pedigree 0.1, pedigree (1,1,5,1,1)
  (same comment as for Phosphate)
- Iron, ion [water, ground-, long-term]: 0.12738 kg; lognormal variance with pedigree 0.93, pedigree (1,1,5,1,1)
  (same comment as for Calcium, ion)
- Nitrate [water, ground-, long-term]: 0.00076724 kg; lognormal variance with pedigree 0.09, pedigree (1,1,5,1,1)
  (same comment as for Calcium, ion)
- NMVOC, non-methane volatile organic compounds, unspecified origin [air, urban air close to ground]: 0.00017332 kg; lognormal variance with pedigree 0.26, pedigree (1,1,5,1,1)
  direct digester gas emission. Uncertainty calculated from wastewater composition and treatment model
- Sulfate [water, surface water]: 0.9749 kg; lognormal variance with pedigree 0.1, pedigree (1,1,5,1,1)
  (same comment as for COD, Chemical Oxygen Demand)
- Calcium, ion [water, surface water]: 0.81181 kg; lognormal variance with pedigree 0.69, pedigree (1,1,5,1,1)
  (same comment as for COD, Chemical Oxygen Demand)
- Dinitrogen monoxide [air, urban air close to ground]: 0.0036745 kg; lognormal variance with pedigree 0.09, pedigree (1,1,5,1,1)
  direct wastewater treatment plant emission plus direct digester gas emission plus emission from sludge incineration plus emission from sludge spreading. Uncertainty calculated from wastewater composition and treatment model
- Nitrate [water, surface water]: 1.5484 kg; lognormal variance with pedigree 0.06, pedigree (1,1,5,1,1)
  (same comment as for COD, Chemical Oxygen Demand)
- Calcium [soil, agricultural]: 0.063038 kg; lognormal variance with pedigree 0.73, pedigree (1,1,5,1,1)
  (same comment as for Phosphate)
- Nitrogen [water, surface water]: 0.01571 kg; lognormal variance with pedigree 0.08, pedigree (1,1,5,1,1)
  direct wastewater treatment plant emission. Uncertainty calculated from wastewater composition and treatment model
- TOC, Total Organic Carbon [water, surface water]: 0.81575 kg; lognormal variance with pedigree 0.08, pedigree (1,1,5,1,1)
  (same comment as for COD, Chemical Oxygen Demand)
- Cyanide [air, urban air close to ground]: 1.9222e-5 kg; lognormal variance with pedigree 0.24, pedigree (1,1,5,1,1)
  (same comment as for Calcium, ion)
- Phosphate [water, ground-, long-term]: 0.0054432 kg; lognormal variance with pedigree 4.27, pedigree (1,1,5,1,1)
  (same comment as for Calcium, ion)
- Potassium, ion [water, surface water]: 1.8 kg; lognormal variance with pedigree 0.69, pedigree (1,1,5,1,1)
  (same comment as for COD, Chemical Oxygen Demand)
- Ammonium, ion [water, surface water]: 0.35354 kg; lognormal variance with pedigree 0.06, pedigree (1,1,5,1,1)
  (same comment as for Nitrogen)
- BOD5, Biological Oxygen Demand [water, ground-, long-term]: 0.0030329 kg; lognormal variance with pedigree 0.12, pedigree (1,1,5,1,1)
  (same comment as for Calcium, ion)
- Chloride [water, surface water]: 1.0165 kg; lognormal variance with pedigree 0.1, pedigree (1,1,5,1,1)
  (same comment as for COD, Chemical Oxygen Demand)
- Aluminium [water, ground-, long-term]: 0.010242 kg; lognormal variance with pedigree 0.11, pedigree (1,1,5,1,1)
  (same comment as for Calcium, ion)
- Carbon monoxide, fossil [air, urban air close to ground]: 0.01209 kg; lognormal variance with pedigree 0.16, pedigree (1,1,5,1,1)
  (same comment as for Calcium, ion)
- COD, Chemical Oxygen Demand [water, ground-, long-term]: 0.0092721 kg; lognormal variance with pedigree 0.12, pedigree (1,1,5,1,1)
  (same comment as for Calcium, ion)
- Iron [air, urban air close to ground]: 9.0791e-6 kg; lognormal variance with pedigree 0.14, pedigree (1,1,5,1,1)
  (same comment as for Phosphorus)
- Iron [soil, agricultural]: 0.67889 kg; lognormal variance with pedigree 0.1, pedigree (1,1,5,1,1)
  (same comment as for Phosphate)
- Nitrogen oxides [air, urban air close to ground]: 0.021664 kg; lognormal variance with pedigree 0.09, pedigree (1,1,5,1,1)
  (same comment as for Phosphorus)
- Ammonia [air, urban air close to ground]: 0.019057 kg; lognormal variance with pedigree 0.31, pedigree (1,1,5,1,1)
  direct digester gas emission plus emission from sludge incineration plus emission from sludge spreading. Uncertainty calculated from wastewater composition and treatment model
- DOC, Dissolved Organic Carbon [water, surface water]: 0.57266 kg; lognormal variance with pedigree 0.08, pedigree (1,1,5,1,1)
  (same comment as for COD, Chemical Oxygen Demand)
- Nitrite [water, surface water]: 0.020648 kg; lognormal variance with pedigree 0.08, pedigree (1,1,5,1,1)
  (same comment as for Nitrogen)
- TOC, Total Organic Carbon [water, ground-, long-term]: 0.003669 kg; lognormal variance with pedigree 0.12, pedigree (1,1,5,1,1)
  (same comment as for Calcium, ion)
- Phosphate [water, surface water]: 0.26507 kg; lognormal variance with pedigree 0.08, pedigree (1,1,5,1,1)
  sewer overload discharge plus direct wastewater treatment plant emission plus emission from sludge incineration plus emission from sludge spreading. Uncertainty calculated from wastewater composition and treatment model
- BOD5, Biological Oxygen Demand [water, surface water]: 0.73879 kg; lognormal variance with pedigree 0.07, pedigree (1,1,5,1,1)
  (same comment as for COD, Chemical Oxygen Demand)
- Calcium [air, urban air close to ground]: 4.2096e-5 kg; lognormal variance with pedigree 0.75, pedigree (1,1,5,1,1)
  (same comment as for Phosphorus)
- Aluminium [water, surface water]: 1.1515e-6 kg; lognormal variance with pedigree 0.71, pedigree (1,1,5,1,1)
  (same comment as for COD, Chemical Oxygen Demand)
- Methane, fossil [air, urban air close to ground]: 0.038144 kg; lognormal variance with pedigree 0.14, pedigree (1,1,5,1,1)
  (same comment as for Calcium, ion)

## Sampling procedure
literature

## Extrapolations
This dataset has been extrapolated from year 2000 to the year of the calculation (2021). The uncertainty has been adjusted accordingly.

## Review by Niels Jungbluth 2009-02-07
passed.
none
