# industrial furnace production, 1MW, oil

Dataset: EcoSpold 2, unit process
Geography: RoW
Time period: 1993-01-01 to 2021-12-31
Technology level: current
Classification: EcoSpold01Categories: oil/heating systems
Classification: ISIC rev.4 ecoinvent: 2815:Manufacture of ovens, furnaces and furnace burners
Tags: ConvertedDataset
Scenario: Business-as-Usual
System model: Allocation, cut-off by classification
Generated by: Niels Jungbluth
Published in: Jungbluth, N. 2007
Database: ecoinvent
isCopyrightProtected: true
accessRestrictedTo: 1

## General comment
Inventory for a furnace with a life time of 20 years.
[This dataset was already contained in the ecoinvent database version 2. It was not individually updated during the transfer to ecoinvent version 3. Life Cycle Impact Assessment results may still have changed, as they are affected by changes in the supply chain, i.e. in other datasets. This dataset was generated following the ecoinvent quality guidelines for version 2. It may have been subject to central changes described in the ecoinvent version 3 change report (http://www.ecoinvent.org/database/ecoinvent-version-3/reports-of-changes/), and the results of the central updates were reviewed extensively. The changes added e.g. consistent water flows and other information throughout the database. The documentation of this dataset can be found in the ecoinvent reports of version 2, which are still available via the ecoinvent website. The change report linked above covers all central changes that were made during the conversion process.]

## Included activities end
Infrastructure of the furnace, including electric equipment. Energy use for the production. Disposal of the facilities.

## Geography
Data for Swiss and German producers.

## Technology
Oil furnace used in industrial production facilities.

## Time period
Materials investigated in 1993. Energy use estimated based on environmental report from 1998.

## Parameters
- fraction, process water, to air: 0.15 dimensionless; name fraction_PW_to_air; lognormal variance with pedigree 0.092025, pedigree (4,4,3,2,4)
- fraction, tap water, to air: 0.15 dimensionless; name fraction_TW_to_air; lognormal variance with pedigree 0.092025, pedigree (4,4,3,2,4)

## Reference product
- industrial furnace, 1MW, oil: 1 unit; CPC 43420: Industrial or laboratory furnaces and ovens, except non-electric bakery ovens; other industrial or laboratory […]; By-product classification allocatable product
  EcoSpold01Location=CH
  production volume 3.96633 unit
    This is a placeholder value that does not reflect real-world production volumes. This dataset does not currently require a real-world production volume to work in the database framework, and no actual data were collected yet. This has no negative effect on the results of the ecoinvent database.
  property price 72252 EUR2005
    UNDATA "Industrial furnace, oven, incinerator non-electric ne" (Average I/E prices of EU27, 6.133 EUR/kg; http://data.un.org/Data.aspx?q=industrial+furnace&d=ComTrade&f=_l1Code%3a84%3bcmdCode%3a841780). The prices are per kg and converted to per unit by summed weight of material concumption of the process in existing ecoinvent documentation from ecoinvent v.2.2. From information in the dataset industrial furnace production, 1MW, oil.; total weight about 10955 kg/unit)

## Inputs from technosphere
- waste concrete: 0 kg; pedigree (1,1,1,1,1)
  Literature
  EcoSpold01Location=CH
  Uncertainty: Literature
  production volume 0 kg
    Calculated from the production volume of industrial furnace, 1MW, oil in proportion to the respective output amounts.
  properties: wet mass 1 kg, dry mass 0.5 kg, water content 1
- heat, district or industrial, other than natural gas: 0 MJ; pedigree (1,1,1,1,1)
  Environmental report
  EcoSpold01Location=CH
  Uncertainty: Environmental report
  properties: heating value, net 1 MJ
- waste plastic, mixture: 0 kg; pedigree (1,1,1,1,1)
  Literature
  EcoSpold01Location=CH
  Uncertainty: Literature
  production volume 0 kg
    (same comment as for waste concrete)
  properties: carbon content, fossil 0.747344, wet mass 1 kg, dry mass 0.847 kg, heating value, net 30.79 MJ, water content 0.180638
  note on carbon content, fossil: C content in 1 kg DM was calculated using data in Tab A.2, ecoinvent v2.2 report 13_I
  note on heating value, net: Value taken from the general comment of the treatment dataset.
- waste mineral wool, for final disposal: 0 kg; pedigree (1,1,1,1,1)
  Literature
  EcoSpold01Location=CH
  Uncertainty: Literature
  production volume 0 kg
    (same comment as for waste concrete)
  properties: wet mass 1 kg, dry mass 1 kg
- cast iron: 4200 kg; lognormal variance with pedigree 0.056, pedigree (3,4,5,5,1)
  EcoSpold01Location=RER
  Literature
  Uncertainty: Literature
  properties: carbon content, fossil 0.04, dry mass 1 kg, wet mass 1 kg
  note on carbon content, fossil: Cast iron is made by remelting pig iron in small furnaces (e.g. cupola furnaces or electric arc furnaces) and poured into moulds to make castings. It usually contains 2% to 6% carbon (ecoinvent v2.2 report 10_partII). An average content of 4% was considered
- brass: 0.05 kg; lognormal variance with pedigree 0.056, pedigree (3,4,5,5,1)
  EcoSpold01Location=CH
  Literature, mixing valve
  Uncertainty: Literature, mixing valve
  properties: dry mass 1 kg, wet mass 1 kg
- steel, low-alloyed, hot rolled: 190 kg; lognormal variance with pedigree 0.056, pedigree (3,4,5,5,1)
  Literature
  EcoSpold01Location=RER
  Uncertainty: Literature
  properties: dry mass 1 kg, carbon content, fossil 0.005, wet mass 1 kg
  note on carbon content, fossil: Low alloyed steel composition given in Tab. 3.2 ecoinvent v2.2 report 10_partII. Steel assumed to have a C content of 0.5%
- alkyd paint, white, without solvent, in 60% solution state: 5 kg; lognormal variance with pedigree 0.056, pedigree (3,4,5,5,1)
  Literature
  EcoSpold01Location=RER
  Uncertainty: Literature
  properties: carbon content, fossil 0.140367, dry mass 1 kg, carbon content, non-fossil 0.199629, wet mass 1 kg, heating value, net 10.3 MJ
  note on carbon content, fossil: C content was calculated as an addition of C content in the raw materials.
- heat, district or industrial, natural gas: 0 MJ; pedigree (1,1,1,1,1)
  Environmental report
  EcoSpold01Location=RER
  Uncertainty: Environmental report
  properties: heating value, net 1 MJ
- wastewater from pig iron production: 0 m3; pedigree (1,1,1,1,1)
  Environmental report, 83% of water use, basic uncertainty estimated = 3
  EcoSpold01Location=CH
  Uncertainty: Environmental report, 83% of water use, basic uncertainty estimated = 3
  production volume 0 m3
    (same comment as for waste concrete)
  properties: dry mass 0.337476 kg, wet mass 1000 kg, carbon content, fossil 1.2149e-5, water content 2962.17
  note on carbon content, fossil: TOC = 0.0000041 kg/m3 (Tab A.19, ecoinvent v2.2 report 13_I). TOC was considered as Total Carbon.
- tap water: 0 kg; name tap_water_input; pedigree (1,1,1,1,1)
  Environmental report, basic uncertainty estimated = 3
  EcoSpold01Location=RER
  Uncertainty: Environmental report, basic uncertainty estimated = 3
  properties: dry mass 0.000337476 kg, water content 2962.17, wet mass 1 kg, carbon content, fossil 0.00178991
  note on carbon content, fossil: Bicarbonate content is 2.93 mol/m3. CO2 content is 0.1 mol/m3 (ecoinvent v2.2 report 8, Tab 93.1).
- steel, chromium steel 18/8, hot rolled: 230 kg; lognormal variance with pedigree 0.056, pedigree (3,4,5,5,1)
  EcoSpold01Location=RER
  Literature
  Uncertainty: Literature
  properties: carbon content, fossil 0.0008, dry mass 1 kg, wet mass 1 kg
  note on carbon content, fossil: Stainless steel model is the grade 304 steel (18/8 stainless, 18% chromium 8% nickel; max. 0.08% C)
- refractory, fireclay, packed: 70 kg; lognormal variance with pedigree 0.056, pedigree (3,4,5,5,1)
  EcoSpold01Location=DE
  Literature
  Uncertainty: Literature
  properties: dry mass 1 kg, wet mass 1 kg
- copper, cathode: 0.03 kg; lognormal variance with pedigree 0.056, pedigree (3,4,5,5,1)
  EcoSpold01Location=RER
  Literature
  Uncertainty: Literature
  properties: dry mass 1 kg, wet mass 1 kg
- electricity, medium voltage: 0 kWh; pedigree (1,1,1,1,1)
  Environmental report
  EcoSpold01Location=CH
  Uncertainty: Environmental report
- stone wool, packed: 40 kg; lognormal variance with pedigree 0.056, pedigree (3,4,5,5,1)
  EcoSpold01Location=CH
  Literature
  Uncertainty: Literature
  properties: wet mass 1 kg, dry mass 1 kg, carbon content, fossil 0.015401
  note on carbon content, fossil: The chemical composition of the glass fibres used in the rock wool production is similar to the composition of naturally cooled volcano basalt and has a composition listed in Tab. 3.1 and 3.2 in ecoinvent v2.2 report 16, part XIV. Rock wool contains: a minimum of 96% mineral fibres,between 0.5 and 3.0 weight percent of phenolic resin depending on the specific product characteristics, and about 0.2 percent mineral oil (ecoinvent v2.2 report 16, part XIV). An average composition of 1.8% phenolic resin, 0.2% mineral oil, and 98% mineral fibres has been assumed and used to calculate C content of the rock wool
- polyethylene, high density, granulate: 0.4 kg; lognormal variance with pedigree 0.056, pedigree (3,4,5,5,1)
  Literature
  EcoSpold01Location=RER
  Uncertainty: Literature
  properties: heating value, net 42.47 MJ, carbon content, fossil 0.857143, wet mass 1 kg, dry mass 1 kg
  note on carbon content, fossil: Polyethylene is formed out of a huge amount of ethylene monomers (C2H4) (ecoinvent v2.2 report 11_II). MW=28 g/mol
- aluminium, cast alloy: 30 kg; lognormal variance with pedigree 0.056, pedigree (3,4,5,5,1)
  Literature
  EcoSpold01Location=RER
  Uncertainty: Literature
  properties: wet mass 1 kg, dry mass 1 kg
- waste concrete: -4.78408, -65.2159 kg (2 entries); lognormal variance with pedigree 0.056, pedigree (3,4,5,5,1)
  Literature
  EcoSpold01Location=CH
  Uncertainty: Literature
  production volume 210 kg
- heat, district or industrial, other than natural gas: 3.18368, 192.246, 7851.07 MJ (3 entries); lognormal variance with pedigree 0.0446, pedigree (2,4,5,5,1)
  Environmental report
  EcoSpold01Location=CH
  Uncertainty: Environmental report
- waste plastic, mixture: -0.0444967, -0.0029731, -0.000224851, -0.001228, -0.000496097, -0.0011661, -0.0379133, -0.311502 kg (8 entries); lognormal variance with pedigree 0.056, pedigree (3,4,5,5,1)
  Literature
  EcoSpold01Location=CH
  Uncertainty: Literature
  production volume 1.2 kg
- waste mineral wool, for final disposal: -17.2298, -22.7702 kg (2 entries); lognormal variance with pedigree 0.056, pedigree (3,4,5,5,1)
  Literature
  EcoSpold01Location=CH
  Uncertainty: Literature
  production volume 120 kg
- heat, district or industrial, natural gas: 160.274, 3840.48, 10399.2 MJ (3 entries); lognormal variance with pedigree 0.0446, pedigree (2,4,5,5,1)
  Environmental report
  EcoSpold01Location=RER
  Uncertainty: Environmental report
- wastewater from pig iron production: -0.598624, -4.54138 m3 (2 entries); lognormal variance with pedigree 0.3546, pedigree (2,4,5,5,1)
  (same comment as for wastewater from pig iron production)
  production volume 15.42 m3
- tap water: 57.8403, 6.96242, 11.5065, 2474.2, 290.149, 7.54816, 21.4706, 3320.33 kg (8 entries); lognormal variance with pedigree 0.3546, pedigree (2,4,5,5,1)
  (same comment as for tap water)
- electricity, medium voltage: 28.277, 5.42231, 124.505, 412.213, 91.0293, 1323.94, 186.61, 608.003 kWh (8 entries); lognormal variance with pedigree 0.0446, pedigree (2,4,5,5,1)
  Environmental report
  EcoSpold01Location=CH
  Uncertainty: Environmental report

## Emissions to nature
- Water [water, unspecified]: 0.1215 m3; name water_to_water_unspecified; lognormal variance with pedigree 0.0827, pedigree (2,2,5,5,1)
  Calculated value based on literature values and expert opinion. See comments in the parametres' comment field.
  property fraction, origin: fresh water 1; name fraction_origin_fresh_water_Ww
  property fraction, origin: unspecified 0; name fraction_origin_unspecified_Ww
  property carbon content, fossil 0; name C_content_fossil
  property dry mass 0 kg; name DM
  property water in wet mass 1000 kg; name WWM
  property wet mass 1000 kg; name WM
  property carbon content, non-fossil 0; name C_content_non_fossil
  property fraction, origin: salt water 0; name fraction_origin_salt_water_Ww
- Water [air, unspecified]: 0.9285 m3; name water_to_air_unspecified; lognormal variance with pedigree 0.0827, pedigree (2,2,5,5,1)
  (same comment as for Water)
  property fraction, origin: salt water 0; name fraction_origin_salt_water
  property fraction, origin: fresh water 1; name fraction_origin_fresh_water
  property fraction, origin: unspecified 0; name fraction_origin_unspecified

## Sampling procedure
Data provided by manufacturers.

## Extrapolations
Data for Germany used with assumptions for Swiss energy supply. This dataset has been copied from an original dataset covering the geography CH. The uncertainty has been adjusted accordingly.

## Review by Michael Spielmann (obsolete) 2003-07-15
Passed.
