# treatment of waste polyethylene terephthalate, municipal incineration

Dataset: EcoSpold 2, unit process
Geography: RoW
Time period: 2006-01-01 to 2021-12-31
Technology level: current
Classification: ISIC rev.4 ecoinvent: 3821:Treatment and disposal of non-hazardous waste
Synonyms: municipal waste incineration; Siedlungsabfallverbrennung; Kehrichtverbrennung
Scenario: Business-as-Usual
System model: Allocation, cut-off by classification
Share of production covered: 1.8 %
Generated by: Gabor Doka
Published in: Doka G. 2013
Database: ecoinvent
isCopyrightProtected: true
accessRestrictedTo: 1

## General comment
This dataset represents the activity of waste disposal of waste polyethylene terephtalate in a municipal solid waste incinerator (MSWI) // Recommended use of this dataset: For PET, which goes to disposal as part of communal waste mixture. Larger amounts of clean, separated PET could go to recycling. // // Waste composition (wet, in ppm): upper heating value 23.13 MJ/kg; lower heating value 22.95 MJ/kg; H2O 2000; O 368750; H 63380; C 553640; S 147.87; N 6456.8; P n.a.; B n.a.; Cl 788.62; Br 69.004; F 11.829; I n.a.; Ag n.a.; As 1.873; Ba 49.289; Cd 3.2531; Co 31.052; Cr 5.4218; Cu 11.829; Hg 0.08872; Mn 17.744; Mo n.a.; Ni 3.9431; Pb 5.5203; Sb 159.2; Se 2.0701; Sn 0.98577; V 1281.5; Zn 68.676; Be 0.49289; Sc n.a.; Sr 87.241; Ti 985.77; Tl 0.39431; W n.a.; Si n.a.; Fe 98.577; Ca 295.73; Al 197.15; K n.a.; Mg n.a.; Na 1444.7; // Share of carbon in waste that is biogenic 0%. // Share of metals in waste not oxidised and bulk-recyclable (exclude very small or thin parts) Iron: 0%; Alu: 0%; Copper: 0%. // One kg of this waste produces 0.01352 kg of slag and 0.006266 kg of residues, which are landfilled. Additional solidification with 0.002506 kg of cement. // Net energy production: 2.97MJ/kg electric energy and 5.81MJ/kg thermal energy. // Recovery of metal scrap to recycling: 0g iron scrap, 0g aluminium scrap, 0g copper scrap.

## Included activities start
waste incineration from waste reception gate and delivery into waste bunker at incinerator plant site (without transports to the incinerator)

## Included activities end
Waste-specific short-term emissions to water from leachate. Long-term emissions from landfill to ground water.

## Geography
Specific to the technology mix encountered in Switzerland in 2010. Well applicable to modern incineration practices in Europe, North America or Japan.

## Technology
average Swiss MSWI plants in 2010 (grate incinerators) with electrostatic precipitator for fly ash (ESP), wet flue gas scrubber and 25% SNCR , 42.77% SCR-high dust , 32.68% SCR-low dust -DeNOx facilities and 0% without Denox (weighted according to mass of burnt waste, representing Swiss average). Efficiency of iron scrap separation from slag : 58%. Efficiency of non-ferrous scrap separation from slag : 31%. Gross electric efficiency technology mix 15.84% and Gross thermal efficiency technology mix 28.51%

## Time period
Waste composition as given in literature reference, theoretical data or other source. Transfer coefficients for modern MSWI.

## Reference product
- waste polyethylene terephthalate: -1 kg; CPC 39270: Waste, parings and scrap of plastics; By-product classification Waste; CAS 25038-59-9
  Main reference product of this activity (supply of disposal service).
  production volume 3.0288e9 kg
    based on estimate on MSW in WTE globally, share of total plastic in MSW in top WTE countries and share of PET plastic types in US MSW (Fatarella 2012)
  property price 0 EUR2005
    Waste products are assigned a price of zero as they are assumed to require further treatment.
  property heating value, net 22.95 MJ
    Value taken from the general comment of the treatment dataset.
  property carbon content 0.554108
    carbon content on a dry matter basis (reserved; not for manual entry)
  properties: wet mass 1 kg, water in wet mass 0.002 kg, water content 0.00200401, carbon content, fossil 0.554108, carbon content, non-fossil 0, dry mass 0.998 kg, carbon allocation 0.553 kg

## By-products
- heat, for reuse in municipal waste incineration only: 0 MJ; name E_th_prod_MSWI; By-product classification allocatable product; CPC 17300: Steam and hot water; pedigree (1,1,1,1,1)
  Net electricity generated from this waste and used in internal MSWI plant energy redistribution.
  Uncertainty: uncertainty is calculated from uncertainties in waste composition and uncertainties in energy efficiency and the uncertainty in internal energy demand
  production volume 1.7588e10 MJ
    calculated in proportion to reference product waste input to incinerator
  property true value relation 0.1842; name E_th_prod_MSWI_true_value_relation
    property to calculate "true value" from
  property exergy 0.1842 MJ; name E_th_prod_MSWI_exergy
    This exergy property is based on the exergy content of the product.
  property price 0.0106 EUR2005; name E_th_prod_MSWI_price_EUR2005
    Average European district heat price from Ecoheatcool and Euroheat 2005-2006, Ecoheat Work package 1: The European heat market. Final report. 10.6 EUR/GJ i s the price of district heat. http://www.solarthermalworld.org/files/Ecoheatcool%20WP1%20Web.pdf?download
- electricity, for reuse in municipal waste incineration only: 0 kWh; name E_el_prod_MSWI; CPC 17100: Electrical energy; By-product classification allocatable product; pedigree (1,1,1,1,1)
  (same comment as for heat, for reuse in municipal waste incineration only)
  production volume 2.4947e9 kWh
    calculated in proportion to reference product waste input to incinerator
  property true value relation 3.6; name E_el_prod_MSWI_true_value_relation
    property to calculate "true value" from
  property exergy 3.6 MJ; name E_el_prod_MSWI_exergy
    This exergy property is based on the exergy content of the product.
  property price 0.1 EUR2005; name E_el_prod_MSWI_price_EUR2005
    Estimated to be the same price as in case of electricity, medium voltage.

## Inputs from technosphere
- heat, district or industrial, natural gas: 0 MJ; pedigree (1,1,1,1,1)
  Input to DeNOx stage, to heat up flue gas in low-dust SCR.
  Uncertainty: uncertainty calculated from uncertainty in average DeNOx input, uncertainty in the share of thermal NOx, uncertainty of nitrogen content in average municipal waste and the uncertainty in nitrogen content in *this* waste.
  properties: heating value, net 1 MJ
- hydrochloric acid, without water, in 30% solution state: 1.4506e-5 kg; lognormal variance with pedigree 0.14993, pedigree (1,1,4,1,1)
  Auxilliary inputs for the wastewater treatment stage of the incinerator plant.
  Uncertainty: uncertainty calculated from uncertainty in average HCl input, of transfer coefficients in the incinerator, and the uncertainty of the waste composition of this waste
  properties: dry mass 1 kg, heating value, net 3.32 MJ, wet mass 1 kg
- process-specific burdens, slag landfill: 0 kg; pedigree (1,1,1,1,1)
  Mass-specific expenditures required for landfilling of bottom ash.
  Uncertainty: uncertainty is calculated from uncertainties in waste composition and transfer coefficients in incinerator
- cement, unspecified: 0 kg; pedigree (1,1,1,1,1)
  Cement required for solidification of landfilled residual material.
  Uncertainty: Uncertainty calculated from uncertainty of the waste composition of this waste, of transfer coefficients in the incinerator and of the solidification recipe.
  properties: dry mass 1 kg, wet mass 1 kg
- sodium hydroxide, without water, in 50% solution state: 0.0001356 kg; lognormal variance with pedigree 0.38919, pedigree (1,1,4,1,1)
  Auxilliary inputs for the flue gas treatment stage of the incinerator plant.
  Uncertainty: uncertainty calculated from uncertainty in average NaOH input, of transfer coefficients in the incinerator, and the uncertainty of the waste composition of this waste
  properties: wet mass 1 kg, dry mass 1 kg, heating value, net 3.03 MJ
- transport, freight, lorry, unspecified: 0 metric ton*km; pedigree (1,1,1,1,1)
  Transport services to transport incineration residues to landfills.
  Uncertainty: uncertainty calculated from uncertainty of the waste composition of this waste, uncertainty of transfer coefficients and the uncertainty in generic transportation distances
- slag landfill: 2.2055e-11 unit; lognormal variance with pedigree 0.031582, pedigree (1,1,4,1,1)
  Landfill infrastructure required for landfilling of bottom ash.
  Uncertainty: uncertainty is calculated from uncertainties in waste composition and transfer coefficients in incinerator
- chemical, inorganic: 5.5189e-5 kg; lognormal variance with pedigree 0.14993, pedigree (1,1,4,1,1)
  Auxilliary inputs for the wastewater treatment stage of the incinerator plant. Proxy for Polyelectrolyte.
  Uncertainty: uncertainty calculated from uncertainty in average Polyelectrolyte input, of transfer coefficients in the incinerator, and the uncertainty of the waste composition of this waste
  properties: dry mass 1 kg, carbon content, fossil 0.003, wet mass 1 kg
- chemical, organic: 2.3248e-6 kg; lognormal variance with pedigree 1.4108, pedigree (1,1,4,1,1)
  Auxilliary inputs for the wastewater treatment stage of the incinerator plant. Proxy for (pure) Trisodium-trimercapto-s-triazine (CAS 17766-26-6), used as 15% diluted solution, aka TMT15.
  Uncertainty: uncertainty calculated from uncertainty in average TMT15 input, of transfer coefficients in the incinerator, and the uncertainty of the waste composition of this waste
  properties: wet mass 1 kg, dry mass 1 kg, carbon content, fossil 0.628, heating value, net 19.03 MJ
- waste cement, hydrated: 0 kg; pedigree (1,1,1,1,1)
  Hydrated cement output for solidification of landfilled residual material.
  Uncertainty: Uncertainty calculated from uncertainty of the waste composition of this waste and transfer coefficients in the incinerator and of the solidification recipe.
  production volume 0 kg
    calculated in proportion to reference product waste input to incinerator
  properties: wet mass 1 kg, dry mass 1 kg
- titanium dioxide: 7.7276e-5 kg; lognormal variance with pedigree 1.0458, pedigree (1,1,4,1,1)
  Input to DeNOx stage (TiO2 catalyst carrier)
  Uncertainty: uncertainty calculated from uncertainty in average DeNOx input, uncertainty in the share of thermal NOx, uncertainty of nitrogen content in average municipal waste and the uncertainty in nitrogen content in *this* waste.
  properties: dry mass 1 kg, wet mass 1 kg
- water, decarbonised: 0 kg; pedigree (1,1,1,1,1)
  Incinerator process water used in flue gas scrubber stage.
  Uncertainty: uncertainty calculated from uncertainty in average water input, and the uncertainty of the waste composition of this waste
  properties: wet mass 1 kg
- iron (III) chloride, without water, in 40% solution state: 0.00018854 kg; lognormal variance with pedigree 0.4869, pedigree (1,1,4,1,1)
  Auxilliary inputs for the wastewater treatment stage of the incinerator plant.
  Uncertainty: uncertainty calculated from uncertainty in average FeCl3 input, of transfer coefficients in the incinerator, and the uncertainty of the waste composition of this waste
  properties: dry mass 1 kg, wet mass 1 kg
- quicklime, milled, packed: 0.00044204 kg; lognormal variance with pedigree 0.64706, pedigree (1,1,4,1,1)
  Auxilliary inputs for the flue gas treatment stage of the incinerator plant.
  Uncertainty: uncertainty calculated from uncertainty in average CaO input, of transfer coefficients in the incinerator, and the uncertainty of the waste composition of this waste
  properties: wet mass 1 kg, dry mass 0.99 kg, water content 0.010101
- ammonia, anhydrous, liquid: 0 kg; pedigree (1,1,1,1,1)
  Input to DeNOx stage (100% NH3).
  Uncertainty: uncertainty calculated from uncertainty in average DeNOx input, uncertainty in the share of thermal NOx, uncertainty of nitrogen content in average municipal waste and the uncertainty in nitrogen content in *this* waste.
  properties: dry mass 1 kg, wet mass 1 kg
- residual material landfill: 1.3055e-11 unit; lognormal variance with pedigree 0.037255, pedigree (1,1,4,1,1)
  Landfill infrastructure required for landfilling of incineration residues.
  Uncertainty: uncertainty is calculated from uncertainties in waste composition and transfer coefficients in incinerator
- process-specific burdens, residual material landfill: 0 kg; pedigree (1,1,1,1,1)
  Mass-specific expenditures required for landfilling of incineration residues.
  Uncertainty: uncertainty is calculated from uncertainties in waste composition and transfer coefficients in incinerator
- chromium oxide, flakes: 1.5771e-6 kg; lognormal variance with pedigree 1.0458, pedigree (1,1,4,1,1)
  Input to DeNOx stage.
  Uncertainty: uncertainty calculated from uncertainty in average DeNOx input, uncertainty in the share of thermal NOx, uncertainty of nitrogen content in average municipal waste and the uncertainty in nitrogen content in *this* waste.
  properties: dry mass 1 kg, wet mass 1 kg
- municipal waste incineration facility: 2.5e-10 unit
  Demands per kilogram waste.
- heat, district or industrial, natural gas: 0.00256717, 0.0615144, 0.166568 MJ (3 entries); lognormal variance with pedigree 0.69416, pedigree (1,1,4,1,1)
  (same comment as for heat, district or industrial, natural gas)
- process-specific burdens, slag landfill: 0.00350934, 0.00889666 kg (2 entries); lognormal variance with pedigree 0.031582, pedigree (1,1,4,1,1)
  (same comment as for process-specific burdens, slag landfill)
- cement, unspecified: 0.000361928, 7.53065e-5, 5.51568e-6, 1.57215e-5, 0.000355547, 1.04648e-5, 0.000114934, 1.39058e-5, 0.00155318 kg (9 entries); lognormal variance with pedigree 0.046339, pedigree (1,1,4,1,1)
  (same comment as for cement, unspecified)
- transport, freight, lorry, unspecified: 8.54747e-5, 1.33822e-5, 0.000648033 metric ton*km (3 entries); lognormal variance with pedigree 0.021775, pedigree (1,1,4,1,1)
  (same comment as for transport, freight, lorry, unspecified)
- waste cement, hydrated: -0.00177255, -0.00449365 kg (2 entries); lognormal variance with pedigree 0.046339, pedigree (1,1,4,1,1)
  (same comment as for waste cement, hydrated)
  production volume 1.8979e7 kg
- water, decarbonised: 0.00589947, 0.0153504, 0.0619117, 0.0151185, 0.00304782, 0.0100218, 0.000553263, 0.00788389, 0.0183648, 0.115197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 kg (12 entries); lognormal variance with pedigree 0.4869, pedigree (1,1,4,1,1)
  (same comment as for water, decarbonised)
- ammonia, anhydrous, liquid: 0.000258537, 2.22243e-5, 3.45753e-5, 6.8506e-5, 6.71178e-5, 7.03467e-6, 3.14476e-5, 0.000743958 kg (8 entries); lognormal variance with pedigree 0.69416, pedigree (1,1,4,1,1)
  (same comment as for ammonia, anhydrous, liquid)
- process-specific burdens, residual material landfill: 0.00177255, 0.00449365 kg (2 entries); lognormal variance with pedigree 0.037255, pedigree (1,1,4,1,1)
  (same comment as for process-specific burdens, residual material landfill)

## Inputs from nature
- Oxygen [natural resource, in air]: 1.9984 kg; lognormal variance with pedigree 0.026041, pedigree (1,1,4,1,1)
  Oxygen from ambient air needed to combust and oxidise this waste. Net demand, i.e. without O2 leaving the plant in flue gas uncombusted.
  Uncertainty: uncertainty is calculated from uncertainties in waste composition and transfer coefficients to flue gas and soild residues in incinerator

## Emissions to nature
- DOC, Dissolved Organic Carbon [water, surface water]: 0.00028283 kg; lognormal variance with pedigree 0.040964, pedigree (1,1,4,1,1)
  Emissions to water from waste composition and transfer coefficients in incinerator and landfills.
  Uncertainty: uncertainty is calculated from uncertainties in waste composition and transfer coefficients in incinerator and landfills
- Nitrate [water, surface water]: 8.2308e-5 kg; lognormal variance with pedigree 0.30345, pedigree (1,1,4,1,1)
  (same comment as for DOC, Dissolved Organic Carbon)
- Benzene [air, urban air close to ground]: 2.6876e-8 kg; lognormal variance with pedigree 0.092479, pedigree (1,1,4,1,1)
  Incomplete combustion product emitted to air.
  Uncertainty: uncertainty calculated from uncertainty in average operation emissions, and the uncertainty of the flue gas volume from this waste.
- Ammonia [air, urban air close to ground]: 1.4502e-6 kg; lognormal variance with pedigree 0.74849, pedigree (1,1,4,1,1)
  Nitrogen species emitted to air after DeNOx stage.
  Uncertainty: uncertainty calculated from uncertainty in average N-emissions and uncertainty in the share of thermal NOx and the uncertainty in nitrogen content in *this* waste.
- Phenol, pentachloro- [air, urban air close to ground]: 1.1704e-11 kg; lognormal variance with pedigree 0.092479, pedigree (1,1,4,1,1)
  (same comment as for Benzene)
- Mercury [water, ground-, long-term]: 5.6506e-9 kg; lognormal variance with pedigree 3.4337, pedigree (1,1,4,1,1)
  Long-term emissions from landfilling of incineration residues.
  Uncertainty: uncertainty is calculated from uncertainties in waste composition and transfer coefficients in incinerator and landfills.
- Calcium [air, urban air close to ground]: 2.3274e-6 kg; lognormal variance with pedigree 0.83293, pedigree (1,1,4,1,1)
  Emission to air from waste composition and transfer coefficients.
  Uncertainty: uncertainty is calculated from uncertainties in waste composition and transfer coefficients in incinerator
- Barium [water, surface water]: 6.6339e-9 kg; lognormal variance with pedigree 1.3414, pedigree (1,1,4,1,1)
  (same comment as for DOC, Dissolved Organic Carbon)
- Water [water, surface water]: 0.00047579 m3; lognormal variance with pedigree 2.021, pedigree (1,1,4,1,1)
  Process water released to surface water.
  Uncertainty: uncertainty calculated from uncertainty in process water input and the uncertainty of fraction to surface water.
- Barium [water, ground-, long-term]: 2.4823e-5 kg; lognormal variance with pedigree 2.371, pedigree (1,1,4,1,1)
  (same comment as for Mercury)
- Antimony [water, surface water]: 5.4872e-5 kg; lognormal variance with pedigree 0.91205, pedigree (1,1,4,1,1)
  (same comment as for DOC, Dissolved Organic Carbon)
- Selenium [water, ground-, long-term]: 1.3445e-6 kg; lognormal variance with pedigree 1.0865, pedigree (1,1,4,1,1)
  (same comment as for Mercury)
- DOC, Dissolved Organic Carbon [water, ground-, long-term]: 0.0016452 kg; lognormal variance with pedigree 0.025837, pedigree (1,1,4,1,1)
  (same comment as for Mercury)
- Dioxins, measured as 2,3,7,8-tetrachlorodibenzo-p-dioxin [air, urban air close to ground]: 5.3747e-14 kg; lognormal variance with pedigree 0.41406, pedigree (1,1,4,1,1)
  (same comment as for Benzene)
- Vanadium, ion [water, surface water]: 2.046e-6 kg; lognormal variance with pedigree 0.81703, pedigree (1,1,4,1,1)
  (same comment as for DOC, Dissolved Organic Carbon)
- Tin [air, urban air close to ground]: 6.4391e-13 kg; lognormal variance with pedigree 1.6559, pedigree (1,1,4,1,1)
  (same comment as for Calcium)
- Carbon monoxide, fossil [air, urban air close to ground]: 4.5685e-5 kg; lognormal variance with pedigree 0.8048, pedigree (1,1,4,1,1)
  (same comment as for Benzene)
- Beryllium [water, surface water]: 3.0871e-10 kg; lognormal variance with pedigree 2.1827, pedigree (1,1,4,1,1)
  (same comment as for DOC, Dissolved Organic Carbon)
- Chloride [water, ground-, long-term]: 0.00018274 kg; lognormal variance with pedigree 0.69296, pedigree (1,1,4,1,1)
  (same comment as for Mercury)
- Chromium, ion [water, surface water]: 4.2098e-10 kg; lognormal variance with pedigree 1.3924, pedigree (1,1,4,1,1)
  (same comment as for DOC, Dissolved Organic Carbon)
- Lead [water, surface water]: 5.2805e-10 kg; lognormal variance with pedigree 1.1447, pedigree (1,1,4,1,1)
  (same comment as for DOC, Dissolved Organic Carbon)
- Thallium [air, urban air close to ground]: 3.9431e-10 kg; lognormal variance with pedigree 1.7197, pedigree (1,1,4,1,1)
  (same comment as for Calcium)
- Zinc [air, urban air close to ground]: 4.6031e-8 kg; lognormal variance with pedigree 1.0387, pedigree (1,1,4,1,1)
  (same comment as for Calcium)
- Hydrogen chloride [air, urban air close to ground]: 4.5003e-7 kg; lognormal variance with pedigree 0.71995, pedigree (1,1,4,1,1)
  (same comment as for Calcium)
- Antimony [water, ground-, long-term]: 0.00010124 kg; lognormal variance with pedigree 0.87837, pedigree (1,1,4,1,1)
  (same comment as for Mercury)
- Cobalt [air, urban air close to ground]: 5.6473e-8 kg; lognormal variance with pedigree 1.1416, pedigree (1,1,4,1,1)
  (same comment as for Calcium)
- Manganese [water, ground-, long-term]: 1.0947e-5 kg; lognormal variance with pedigree 2.1668, pedigree (1,1,4,1,1)
  (same comment as for Mercury)
- Fluoride [water, surface water]: 9.045e-7 kg; lognormal variance with pedigree 0.81377, pedigree (1,1,4,1,1)
  (same comment as for DOC, Dissolved Organic Carbon)
- Cadmium, ion [water, surface water]: 3.1179e-10 kg; lognormal variance with pedigree 1.1816, pedigree (1,1,4,1,1)
  (same comment as for DOC, Dissolved Organic Carbon)
- Iron [air, urban air close to ground]: 1.7667e-10 kg; lognormal variance with pedigree 1.0387, pedigree (1,1,4,1,1)
  (same comment as for Calcium)
- Selenium [water, surface water]: 6.9933e-7 kg; lognormal variance with pedigree 1.1798, pedigree (1,1,4,1,1)
  (same comment as for DOC, Dissolved Organic Carbon)
- Arsenic [air, urban air close to ground]: 1.4671e-8 kg; lognormal variance with pedigree 1.5056, pedigree (1,1,4,1,1)
  (same comment as for Calcium)
- Cyanide [air, urban air close to ground]: 2.0689e-5 kg; lognormal variance with pedigree 1.2025, pedigree (1,1,4,1,1)
  (same comment as for Ammonia)
- Calcium, ion [water, surface water]: 3.2739e-6 kg; lognormal variance with pedigree 0.62601, pedigree (1,1,4,1,1)
  (same comment as for DOC, Dissolved Organic Carbon)
- Heat, waste [air, urban air close to ground]: 16.95 MJ; lognormal variance with pedigree 0.04156, pedigree (1,1,4,1,1)
  Waste heat generated from heating value of this waste plus any electricity required to process it.
  Uncertainty: uncertainty is calculated from uncertainties in waste composition and uncertainties in energy efficiency and the uncertainty in internal energy demand
- Methane, fossil [air, urban air close to ground]: 4.0313e-7 kg; lognormal variance with pedigree 0.092479, pedigree (1,1,4,1,1)
  (same comment as for Benzene)
- Thallium [water, surface water]: 2.4156e-10 kg; lognormal variance with pedigree 1.8716, pedigree (1,1,4,1,1)
  (same comment as for DOC, Dissolved Organic Carbon)
- Selenium [air, urban air close to ground]: 2.4696e-8 kg; lognormal variance with pedigree 1.4912, pedigree (1,1,4,1,1)
  (same comment as for Calcium)
- Fluoride [water, ground-, long-term]: 1.0606e-5 kg; lognormal variance with pedigree 0.75637, pedigree (1,1,4,1,1)
  (same comment as for Mercury)
- TOC, Total Organic Carbon [water, ground-, long-term]: 0.0016452 kg; lognormal variance with pedigree 0.025837, pedigree (1,1,4,1,1)
  (same comment as for Mercury)
- Cobalt [water, surface water]: 5.6259e-9 kg; lognormal variance with pedigree 1.4415, pedigree (1,1,4,1,1)
  (same comment as for DOC, Dissolved Organic Carbon)
- Benzene, hexachloro- [air, urban air close to ground]: 5.6195e-11 kg; lognormal variance with pedigree 0.092479, pedigree (1,1,4,1,1)
  (same comment as for Benzene)
- Nitrogen oxides [air, urban air close to ground]: 0.00045922 kg; lognormal variance with pedigree 0.74849, pedigree (1,1,4,1,1)
  Sum of fuel-Nox and thermal-NOx emitted to air after DeNOx stage.
  Uncertainty: uncertainty calculated from uncertainty in average N-emissions and uncertainty in the share of thermal NOx and the uncertainty in nitrogen content in *this* waste.
- Particulates, > 2.5 um, and < 10um [air, urban air close to ground]: 1.6124e-8 kg; lognormal variance with pedigree 0.19678, pedigree (1,1,4,1,1)
  (same comment as for Benzene)
- Copper, ion [water, ground-, long-term]: 1.0566e-5 kg; lognormal variance with pedigree 1.2328, pedigree (1,1,4,1,1)
  (same comment as for Mercury)
- Aluminium [air, urban air close to ground]: 1.6074e-10 kg; lognormal variance with pedigree 0.95041, pedigree (1,1,4,1,1)
  (same comment as for Calcium)
- Beryllium [water, ground-, long-term]: 4.5046e-7 kg; lognormal variance with pedigree 1.5883, pedigree (1,1,4,1,1)
  (same comment as for Mercury)
- Chromium VI [water, surface water]: 1.5153e-7 kg; lognormal variance with pedigree 1.4247, pedigree (1,1,4,1,1)
  (same comment as for DOC, Dissolved Organic Carbon)
- Sodium, ion [water, surface water]: 0.00039252 kg; lognormal variance with pedigree 0.31828, pedigree (1,1,4,1,1)
  (same comment as for DOC, Dissolved Organic Carbon)
- Dinitrogen monoxide [air, urban air close to ground]: 9.6301e-5 kg; lognormal variance with pedigree 1.2025, pedigree (1,1,4,1,1)
  (same comment as for Ammonia)
- Arsenic, ion [water, ground-, long-term]: 5.6087e-7 kg; lognormal variance with pedigree 1.4965, pedigree (1,1,4,1,1)
  (same comment as for Mercury)
- Nickel [air, urban air close to ground]: 4.9534e-9 kg; lognormal variance with pedigree 1.419, pedigree (1,1,4,1,1)
  (same comment as for Calcium)
- Benzene, pentachloro- [air, urban air close to ground]: 1.4199e-10 kg; lognormal variance with pedigree 0.092479, pedigree (1,1,4,1,1)
  (same comment as for Benzene)
- Zinc, ion [water, ground-, long-term]: 2.0884e-5 kg; lognormal variance with pedigree 3.1379, pedigree (1,1,4,1,1)
  (same comment as for Mercury)
- Cobalt [water, ground-, long-term]: 2.5295e-5 kg; lognormal variance with pedigree 1.0511, pedigree (1,1,4,1,1)
  (same comment as for Mercury)
- NMVOC, non-methane volatile organic compounds, unspecified origin [air, urban air close to ground]: 1.2231e-6 kg; lognormal variance with pedigree 0.092479, pedigree (1,1,4,1,1)
  (same comment as for Benzene)
- Nickel, ion [water, surface water]: 2.6494e-9 kg; lognormal variance with pedigree 1.9432, pedigree (1,1,4,1,1)
  (same comment as for DOC, Dissolved Organic Carbon)
- Bromine [water, surface water]: 6.2319e-5 kg; lognormal variance with pedigree 0.49115, pedigree (1,1,4,1,1)
  (same comment as for DOC, Dissolved Organic Carbon)
- Sulfate [water, surface water]: 7.5012e-5 kg; lognormal variance with pedigree 0.45725, pedigree (1,1,4,1,1)
  (same comment as for DOC, Dissolved Organic Carbon)
- Bromine [air, urban air close to ground]: 3.4468e-8 kg; lognormal variance with pedigree 1.046, pedigree (1,1,4,1,1)
  (same comment as for Calcium)
- Vanadium, ion [water, ground-, long-term]: 0.00059738 kg; lognormal variance with pedigree 0.48044, pedigree (1,1,4,1,1)
  (same comment as for Mercury)
- Lead [air, urban air close to ground]: 4.5479e-10 kg; lognormal variance with pedigree 1.39, pedigree (1,1,4,1,1)
  (same comment as for Calcium)
- Zinc, ion [water, surface water]: 6.1961e-9 kg; lognormal variance with pedigree 0.83875, pedigree (1,1,4,1,1)
  (same comment as for DOC, Dissolved Organic Carbon)
- Tin, ion [water, ground-, long-term]: 3.7728e-7 kg; lognormal variance with pedigree 2.4125, pedigree (1,1,4,1,1)
  (same comment as for Mercury)
- Cadmium, ion [water, ground-, long-term]: 2.3738e-7 kg; lognormal variance with pedigree 6.8777, pedigree (1,1,4,1,1)
  (same comment as for Mercury)
- BOD5, Biological Oxygen Demand [water, ground-, long-term]: 0.00136 kg; lognormal variance with pedigree 0.025837, pedigree (1,1,4,1,1)
  (same comment as for Mercury)
- Aluminium [water, surface water]: 2.1336e-8 kg; lognormal variance with pedigree 1.1168, pedigree (1,1,4,1,1)
  (same comment as for DOC, Dissolved Organic Carbon)
- Mercury [air, urban air close to ground]: 2.5155e-9 kg; lognormal variance with pedigree 1.9367, pedigree (1,1,4,1,1)
  (same comment as for Calcium)
- Toluene [air, urban air close to ground]: 5.3751e-8 kg; lognormal variance with pedigree 0.092479, pedigree (1,1,4,1,1)
  (same comment as for Benzene)
- Antimony [air, urban air close to ground]: 1.2753e-10 kg; lognormal variance with pedigree 0.97983, pedigree (1,1,4,1,1)
  (same comment as for Calcium)
- Lead [water, ground-, long-term]: 2.669e-6 kg; lognormal variance with pedigree 4.4898, pedigree (1,1,4,1,1)
  (same comment as for Mercury)
- Strontium [air, urban air close to ground]: 8.7241e-9 kg; lognormal variance with pedigree 1.024, pedigree (1,1,4,1,1)
  (same comment as for Calcium)
- COD, Chemical Oxygen Demand [water, ground-, long-term]: 0.0041576 kg; lognormal variance with pedigree 0.025837, pedigree (1,1,4,1,1)
  (same comment as for Mercury)
- Heat, waste [water, surface water]: 3.8809 MJ; lognormal variance with pedigree 0.04156, pedigree (1,1,4,1,1)
  (same comment as for Heat, waste)
- Hydrogen fluoride [air, urban air close to ground]: 7.9808e-8 kg; lognormal variance with pedigree 1.2648, pedigree (1,1,4,1,1)
  (same comment as for Calcium)
- Manganese [air, urban air close to ground]: 3.3887e-9 kg; lognormal variance with pedigree 1.2296, pedigree (1,1,4,1,1)
  (same comment as for Calcium)
- Aluminium [water, ground-, long-term]: 0.00014257 kg; lognormal variance with pedigree 0.80284, pedigree (1,1,4,1,1)
  (same comment as for Mercury)
- Nitrate [water, ground-, long-term]: 0.00023223 kg; lognormal variance with pedigree 0.43556, pedigree (1,1,4,1,1)
  (same comment as for Mercury)
- Copper [air, urban air close to ground]: 1.0834e-9 kg; lognormal variance with pedigree 1.2881, pedigree (1,1,4,1,1)
  (same comment as for Calcium)
- Carbon dioxide, fossil [air, urban air close to ground]: 2.0177 kg; lognormal variance with pedigree 0.018331, pedigree (1,1,4,1,1)
  (same comment as for Calcium)
- Barium [air, urban air close to ground]: 1.9346e-7 kg; lognormal variance with pedigree 1.0755, pedigree (1,1,4,1,1)
  (same comment as for Calcium)
- Sulfate [water, ground-, long-term]: 0.00036623 kg; lognormal variance with pedigree 0.55762, pedigree (1,1,4,1,1)
  (same comment as for Mercury)
- Vanadium [air, urban air close to ground]: 2.7179e-5 kg; lognormal variance with pedigree 0.63684, pedigree (1,1,4,1,1)
  (same comment as for Calcium)
- Benzo(a)pyrene [air, urban air close to ground]: 5.9807e-13 kg; lognormal variance with pedigree 0.41406, pedigree (1,1,4,1,1)
  (same comment as for Benzene)
- Titanium, ion [water, ground-, long-term]: 0.00029469 kg; lognormal variance with pedigree 0.7968, pedigree (1,1,4,1,1)
  (same comment as for Mercury)
- Sulfur dioxide [air, urban air close to ground]: 1.5725e-6 kg; lognormal variance with pedigree 0.92987, pedigree (1,1,4,1,1)
  (same comment as for Calcium)
- Sodium, ion [water, ground-, long-term]: 0.0010403 kg; lognormal variance with pedigree 0.30995, pedigree (1,1,4,1,1)
  (same comment as for Mercury)
- Cadmium [air, urban air close to ground]: 1.6581e-9 kg; lognormal variance with pedigree 1.4479, pedigree (1,1,4,1,1)
  (same comment as for Calcium)
- Titanium [air, urban air close to ground]: 8.1785e-7 kg; lognormal variance with pedigree 0.68727, pedigree (1,1,4,1,1)
  (same comment as for Calcium)
- Iron, ion [water, ground-, long-term]: 4.9731e-5 kg; lognormal variance with pedigree 1.143, pedigree (1,1,4,1,1)
  (same comment as for Mercury)
- Copper, ion [water, surface water]: 1.5328e-9 kg; lognormal variance with pedigree 1.1114, pedigree (1,1,4,1,1)
  (same comment as for DOC, Dissolved Organic Carbon)
- Strontium [water, surface water]: 5.493e-8 kg; lognormal variance with pedigree 1.6998, pedigree (1,1,4,1,1)
  (same comment as for DOC, Dissolved Organic Carbon)
- Strontium [water, ground-, long-term]: 8.7127e-5 kg; lognormal variance with pedigree 0.98773, pedigree (1,1,4,1,1)
  (same comment as for Mercury)
- COD, Chemical Oxygen Demand [water, surface water]: 0.00064764 kg; lognormal variance with pedigree 0.040862, pedigree (1,1,4,1,1)
  (same comment as for DOC, Dissolved Organic Carbon)
- Chromium [air, urban air close to ground]: 4.7343e-9 kg; lognormal variance with pedigree 1.3755, pedigree (1,1,4,1,1)
  (same comment as for Calcium)
- TOC, Total Organic Carbon [water, surface water]: 0.00028283 kg; lognormal variance with pedigree 0.040964, pedigree (1,1,4,1,1)
  (same comment as for DOC, Dissolved Organic Carbon)
- Chloride [water, surface water]: 0.00060544 kg; lognormal variance with pedigree 0.57241, pedigree (1,1,4,1,1)
  (same comment as for DOC, Dissolved Organic Carbon)
- Sodium [air, urban air close to ground]: 1.1861e-5 kg; lognormal variance with pedigree 0.62967, pedigree (1,1,4,1,1)
  (same comment as for Calcium)
- Calcium, ion [water, ground-, long-term]: 0.00022028 kg; lognormal variance with pedigree 0.77312, pedigree (1,1,4,1,1)
  (same comment as for Mercury)
- Bromine [water, ground-, long-term]: 6.6509e-6 kg; lognormal variance with pedigree 1.0216, pedigree (1,1,4,1,1)
  (same comment as for Mercury)
- BOD5, Biological Oxygen Demand [water, surface water]: 0.00063932 kg; lognormal variance with pedigree 0.041702, pedigree (1,1,4,1,1)
  (same comment as for DOC, Dissolved Organic Carbon)
- Manganese [water, surface water]: 2.762e-9 kg; lognormal variance with pedigree 1.0271, pedigree (1,1,4,1,1)
  (same comment as for DOC, Dissolved Organic Carbon)
- Thallium [water, ground-, long-term]: 2.3009e-7 kg; lognormal variance with pedigree 1.2734, pedigree (1,1,4,1,1)
  (same comment as for Mercury)
- Arsenic, ion [water, surface water]: 1.2974e-6 kg; lognormal variance with pedigree 1.3822, pedigree (1,1,4,1,1)
  (same comment as for DOC, Dissolved Organic Carbon)
- Nickel, ion [water, ground-, long-term]: 3.7849e-6 kg; lognormal variance with pedigree 1.3673, pedigree (1,1,4,1,1)
  (same comment as for Mercury)
- Titanium, ion [water, surface water]: 3.6754e-7 kg; lognormal variance with pedigree 0.51881, pedigree (1,1,4,1,1)
  (same comment as for DOC, Dissolved Organic Carbon)
- Iron, ion [water, surface water]: 2.5915e-9 kg; lognormal variance with pedigree 1.1771, pedigree (1,1,4,1,1)
  (same comment as for DOC, Dissolved Organic Carbon)
- Chromium VI [water, ground-, long-term]: 4.9735e-7 kg; lognormal variance with pedigree 1.8112, pedigree (1,1,4,1,1)
  (same comment as for Mercury)
- Particulates, < 2.5 um [air, urban air close to ground]: 3.2087e-6 kg; lognormal variance with pedigree 0.41406, pedigree (1,1,4,1,1)
  (same comment as for Benzene)
- Water [air, urban air close to ground]: 0.001421 m3; lognormal variance with pedigree 1.6975, pedigree (1,1,4,1,1)
  Water vapour from waste humidity, hydrogen oxidation and part of the process water.
  Uncertainty: Uncertainty calculated from uncertainty in waste composition, process water input and the uncertainty of fraction to air.
- Mercury [water, surface water]: 9.6352e-11 kg; lognormal variance with pedigree 1.4077, pedigree (1,1,4,1,1)
  (same comment as for DOC, Dissolved Organic Carbon)
- Tin, ion [water, surface water]: 2.6079e-11 kg; lognormal variance with pedigree 2.189, pedigree (1,1,4,1,1)
  (same comment as for DOC, Dissolved Organic Carbon)
