# yarding, mobile cable yarder on trailer

Dataset: EcoSpold 2, unit process
Geography: RoW
Time period: 2012-01-01 to 2021-12-31
Technology level: current
Classification: ISIC rev.4 ecoinvent: 0220:Logging
Classification: EcoSpold01Categories: construction processes/machinery
Synonyms: yarding with tower yarder
Scenario: Business-as-Usual
System model: Allocation, cut-off by classification
Generated by: [System]
Database: ecoinvent
isCopyrightProtected: true
accessRestrictedTo: 1

## General comment
The inventory refers to 1 productive machine hour (PMS) - referring to the operational time of the machine including breaks up to 15 minutes - of a mobile cable yarder mounted on a trailer with an engine power of 175 kW and a total weight of 13,500 kg, including three cables (for downhill yarding) and carriage.
Cable yarding is the process of transporting logs to the landing using a stationary winching machine (a yarder) and a system of heavy wire rope. Cable yarding is primarily used on the West Coast of North America with yarder, loaders and grapple yarders, but also in Europe (Austria, Switzerland, Czech Republic, France, Italy).
These systems are best suited for steep terrain or soft soils that restrict ground operations. All cable yarding systems can move wood uphill to a landing; some systems can also bring wood downhill to the landing. Extraction distance is generally longer than with other ground-based systems and may reach over more than 600 m. Depending on the type of rigging and yarder capability, cable yarding can be used in selection harvests as well as clearcuts.
Cable yarding systems are often paired with manual felling and processing because of the steep terrain
The inventoried mobile cable yarder incl. and cables is mounted on a trailer. The whole machinery incl. trailer has a total weight of 13,500 kg (of which 2,608 kg of cable and 385 kg of carriage), with a tower height of approximately 12 m, with an engine power of 175 kW and a maintenance factor of 0.55 (estimated based on Spielmann et al. 2007). The assumed yarding distance is 600 m.

The third cable can be excluded from the dataset to approximate the same machinery used for "uphill" yarding.
Assumed fuel consumption: 17.5/PMH; total service life: 17,000 PMH, average daily transport distance of machinery: 6.2 km (Spielmann et al. 2007).
Productivity depends on the specific circumstances of the harvesting operation and is specified in the respective datasets.
The following sources have been consulted for the elaboration and plausibilisation of the dataset:
Anonymous (2004): DIRECTIVE 2004/26/EC OF THE EUROPEAN PARLIAMENT AND OF THE COUNCIL of 21 April 2004 amending Directive 97/68/EC on the approximation of the laws of the Member States relating to measures against the emission of gaseous and particulate pollutants from internal combustion engines to be installed in non-road mobile machinery. Official Journal of the European Union: 30.4.2004
Klvac, R. and A. Skoupy (2009): Characteristic fuel consumption and exhaust emissions in fully mechanized logging operations. Journal of Forest Research, 14(6): 328-334: referring to Freitas 2004.
Klvac, R., S. Ward, P. M. O. Owende and J. Lyons (2003): Energy audit of wood harvesting systems. Scandinavian Journal of Forest Research, 18(2): 176-183.
Markewitz, D. (2006): Fossil fuel carbon emissions from silviculture: Impacts on net carbon sequestration in forests. Forest Ecology and Management, 263: 153-161.
Spielmann, M., L. Barreto, V. Erni, F. Frutig and O. Thees (2007): Life cycle assessment of energy wood chip supply chains; a case study of near future supply of forest wood chips in Switzerland (unpublished). Paul Scherrer Institute (PSI), Swiss Federal Institute for Forest, Snow and Landscape Research (WSL), Villigen, Birmensdorf.

## Included activities start
Service beginning with the transport of the machinery to the logging site.

## Included activities end
Includes the input of machinery infrastructure, the input of diesel fuel, lubricants/greases as well as their disposal, and the emissions into air from diesel consumption. Wood is not included in the dataset.

## Geography
Emission profile according to European legislation

## Technology
Average european technology

## Parameters
- engine power: 175 kW; name EP; lognormal variance with pedigree 0.5526, pedigree (3,3,1,1,1)
  modern cable yarder on trailer according to producer information
- lifetime of machine, productive machine hours: 17000 hour; name total_PMH; lognormal variance with pedigree 0.5526, pedigree (3,3,1,1,1)
  Oral personal communication, P. Wiss, Präsident des Verbandes Forstunternehmer Schweiz
- load factor: 0.35 dimensionless; name LF; lognormal variance with pedigree 0.5526, pedigree (3,3,1,1,1)
  according to Lambrecht et al. 2004
- diesel consumption: 17.5 l/hour; name diesel_consumption; lognormal variance with pedigree 0.592, pedigree (5,4,1,1,1)
  according to Klvac & Skoupy 2009, referring to Freitas 2004 (see general comments field for total of evaulated literature)
- share of EURO IIIb: 0.490338 dimensionless; name EURO_IIIb; lognormal variance with pedigree 0.719098, pedigree (1,1,1,1,1)
  assuming that the relevant share of forest machinery belongs to vehicle types tier EURO IIIa and EURO IIIb as define in the Guideline 97/68/EG by the European Commission.
- share of EURO IIIa: 0.5 dimensionless; name EURO_IIIa; lognormal variance with pedigree 0.592, pedigree (5,4,1,1,1)
  assuming that the relevant share of foresassuming that the relevant share of forest machinery belongs to vehicle types tier EURO IIIa and EURO IIIb as define in the Guideline 97/68/EG by the European Commission.
- scaling factor: 10 dimensionless; name scaling_factor

## Reference product
- cable yarding: 1 hour; = 0.100000002631416 * scaling_factor; CPC 8614: Support and operation services to forestry and logging; By-product classification allocatable product
  Amount was scaled to 1.
  production volume 6.52741e6 hour; name p_harvesting; = 5000*total_PMH/10
    annual production of machinery: 5000 times total productive machine hours
  property price 15.146 EUR2005
    Calculated based on inputs: The price of the product has been calculated as a sum of the values of the material and energy inputs for this product. This value is therefore a rough estimation. It may underestimate the real price since there are additional expenses when producing any product. These expences can include for example labour costs, treatment of waste materials and profit for the producer. Please consider carefully whether this level of data quality is acceptable for your application.
  property wet mass 0 kg; name WM
  property carbon content 0
    carbon content on a dry matter basis (reserved; not for manual entry)
  properties: water content 0, water in wet mass 0 kg, dry mass 0 kg, carbon content, fossil 0, carbon content, non-fossil 0, carbon allocation 0 kg

## Inputs from technosphere
- waste mineral oil: -0.098 kg; name w_mineral_oil; = (0.00980000025787873 * scaling_factor)*-1; source Klvac R. 2003; lognormal variance with pedigree 1.88726, pedigree (1,1,4,5,1)
  hydraulic oil and engine oil/grease; adjusted for water content of waste oil
  Amount was scaled to the amount of reference product.
  production volume 639686 kg; = w_mineral_oil*p_harvesting
    calculated
  property price 0 EUR2005; name w_mineral_oil_price_EUR2005
  property wet mass 1 kg; name w_mineral_oil_WM
  property water content 0.111111; name WC_oil
  property dry mass 0.9 kg; name DM_oil
  properties: carbon content, fossil 0.864444, heating value, net 34.7 MJ
  note on heating value, net: Value taken from the general comment of the treatment dataset.
- lubricating oil: 0.0882 kg; name m_lubricating_oil; = 0.00882000023209086 * scaling_factor; source Spielmann, M. 2007; lognormal variance with pedigree 0.0682, pedigree (2,3,5,5,1)
  hydraulic oil and engine oil/grease; taken from value for truck from Spielmann et al. 2007
  Amount was scaled to the amount of reference product.
  properties: heating value, net 40.2 MJ, dry mass 1 kg, carbon content, fossil 0.75
  note on heating value, net: Literature value, Source: IPCC 2006, 2006 IPCC Guidelines for National Greenhouse Gas Inventories, Prepared by the National Greenhouse Gas Inventories Programme, Eggleston H.S., Buendia L., Miwa K., Ngara T. and Tanabe K. (eds). Published: IGES, Japan
- transport, freight, lorry 16-32 metric ton, EURO5: 0 metric ton*km; source Spielmann, M. 2007; pedigree (1,1,1,1,1)
  transport of forest machinery calculated for the weight of the machinery, transported over 8 km (Spielmann et al. 2007) and 8 productive machine hours (PMH) per day
  Amount was scaled to the amount of reference product.
- mobile cable yarder, trailer-mounted: 5.88235e-5 unit; = 5.88235310400189E-06 * scaling_factor; source Spielmann, M. 2007; lognormal variance with pedigree 0.56, pedigree (1,1,4,5,1)
  assuming a service life of 20000 PMH (according to Spielmann et al. 2007); other sources report lower service lifes e.g. 7000 (for cost calculations; Schweizer Forstkalender 2011)
  Amount was scaled to the amount of reference product.
- diesel, low-sulfur: 0 kg; name m_diesel; source Jirsousek R. 2007; pedigree (1,1,1,1,1)
  Density of diesel: 0.84 kg/l
  property carbon content, non-fossil 0; name C_content_non_fossil
  property water in wet mass 0 kg; name WWM
  property water content 0; name water_content
  property carbon content, fossil 0.865; name C_content_fossil
  properties: dry mass 1 kg, heating value, net 42.8 MJ
- transport, freight, lorry 16-32 metric ton, EURO5: 1.37669, 7.92331 metric ton*km (2 entries); source Spielmann, M. 2007; lognormal variance with pedigree 0.0696, pedigree (3,3,5,5,1)
  (same comment as for transport, freight, lorry 16-32 metric ton, EURO5)
- diesel, low-sulfur: 0.512667, 0.517549, 1.03475, 0.0343254, 0.232183, 12.3555 kg (6 entries); source Jirsousek R. 2007; lognormal variance with pedigree 0.0107442, pedigree (1,1,4,5,1)
  Density of diesel: 0.84 kg/l
  properties: dry mass 1 kg, carbon content, fossil 0.865, heating value, net 42.8 MJ

## Emissions to nature
- Particulates, > 10 um [air, non-urban air or from high stacks]: 0.00128886 kg; = 0.000128886481019011 * scaling_factor; source Lambrecht U. 2004; lognormal variance with pedigree 0.0102386, pedigree (1,1,4,5,1)
  emission model calculating hourly specific emissions as "engine power x load factor x base emission factor" as proposed by Lambrecht et al. (2004) and applied in Spielmann et al. (2007); values for base emission factors for particles for mobile machine classes EURO IIIa and EUROIIIb are taken from European Directive 2004/ 26/EC. The proportional distribution accross particle classes is made based on the ecoinvent v3 dataset "Diesel, burned in building machine/GLO".
  Amount was scaled to the amount of reference product.
- Carbon dioxide, fossil [air, non-urban air or from high stacks]: 45.8183 kg; = 4.5818295913498 * scaling_factor; source Kellenberger D. 2007; lognormal variance with pedigree 0.01, pedigree (1,1,4,5,1)
  calculated from diesel input as 3.113 kg CO2/kg diesel as inventoried in the ecoinvent dataset diesel, burned in building machine
  Amount was scaled to the amount of reference product.
- Cadmium [air, non-urban air or from high stacks]: 1.47093e-7 kg; = 1.47093333091975E-08 * scaling_factor; source Kellenberger D. 2007; lognormal variance with pedigree 0.01, pedigree (1,1,4,5,1)
  value per MJ taken from ecoinvent 2.2 dataset *diesel in building machine" converted to input of diesel as mass
  Amount was scaled to the amount of reference product.
- Particulates, < 2.5 um [air, non-urban air or from high stacks]: 0.0109336 kg; = 0.00109336365069406 * scaling_factor; source Lambrecht U. 2004; lognormal variance with pedigree 0.0129162, pedigree (1,1,4,5,1)
  (same comment as for Particulates, > 10 um)
- Carbon monoxide, fossil [air, non-urban air or from high stacks]: 0.163437 kg; = 0.0163437036768861 * scaling_factor; source Kellenberger D. 2007; lognormal variance with pedigree 0.01, pedigree (1,1,4,5,1)
  (same comment as for Cadmium)
- Benzo(a)pyrene [air, non-urban air or from high stacks]: 4.40651e-7 kg; = 4.40651395288352E-08 * scaling_factor; source Kellenberger D. 2007; lognormal variance with pedigree 0.01, pedigree (1,1,4,5,1)
  (same comment as for Cadmium)
- Zinc [air, non-urban air or from high stacks]: 8.02981e-9 kg; = 8.02981336208266E-10 * scaling_factor; source Kellenberger D. 2007; lognormal variance with pedigree 0.01, pedigree (1,1,4,5,1)
  (same comment as for Cadmium)
- Nitrogen oxides [air, non-urban air or from high stacks]: 0.326309 kg; = 0.0326309436275628 * scaling_factor; source Lambrecht U. 2004; lognormal variance with pedigree 2.02279, pedigree (1,1,4,5,1)
  emission model calculating hourly specific emissions as "engine power x load factor x base emission factor" as proposed by Lambrecht et al. (2004) and applied in Spielmann et al. (2007); values for base emission factors for NOx for mobile machine class EUROIIIb are taken from the European Directive 2004/ 26/EC; for mobile machine class EURO IIIa values for base emission factors for NOx are calculated based on an assumed reduction of VOC emissions as compared to "Tier 2" limit for VOC of 1.0 g/kWh (following Spielmann et al. 2007).
  Amount was scaled to the amount of reference product.
  property dry mass 1 kg; name DM
- Ammonia [air, non-urban air or from high stacks]: 0.000293558 kg; = 2.93558062196378E-05 * scaling_factor; source Kellenberger D. 2007; lognormal variance with pedigree 0.01, pedigree (1,1,4,5,1)
  (same comment as for Cadmium)
- Selenium [air, non-urban air or from high stacks]: 1.47093e-7 kg; = 1.47093333091975E-08 * scaling_factor; source Kellenberger D. 2007; lognormal variance with pedigree 0.01, pedigree (1,1,4,5,1)
  (same comment as for Cadmium)
- Particulates, > 2.5 um, and < 10um [air, non-urban air or from high stacks]: 0.000559757 kg; = 5.59757227419183E-05 * scaling_factor; source Lambrecht U. 2004; lognormal variance with pedigree 0.0100085, pedigree (1,1,4,5,1)
  (same comment as for Particulates, > 10 um)
- PAH, polycyclic aromatic hydrocarbons [air, non-urban air or from high stacks]: 4.93454e-5 kg; = 4.93454130244446E-06 * scaling_factor; source Kellenberger D. 2007; lognormal variance with pedigree 0.01, pedigree (1,1,4,5,1)
  (same comment as for Cadmium)
- Dinitrogen monoxide [air, non-urban air or from high stacks]: 0.00175742 kg; = 0.000175741625991394 * scaling_factor; source Kellenberger D. 2007; lognormal variance with pedigree 0.01, pedigree (1,1,4,5,1)
  (same comment as for Cadmium)
- Nickel [air, non-urban air or from high stacks]: 1.03091e-6 kg; = 1.03091053961897E-07 * scaling_factor; source Kellenberger D. 2007; lognormal variance with pedigree 0.01, pedigree (1,1,4,5,1)
  (same comment as for Cadmium)
- NMVOC, non-methane volatile organic compounds, unspecified origin [air, non-urban air or from high stacks]: 0.0456344 kg; = 0.00456343736720277 * scaling_factor; source Lambrecht U. 2004; lognormal variance with pedigree 0.0351376, pedigree (1,1,4,5,1)
  emission model calculating hourly specific emissions as "engine power x load factor x base emission factor" as proposed by Lambrecht et al. (2004) and applied in Spielmann et al. (2007); values for base emission factors for VOC for vehicle classes EURO IIIa and EURO IIIb are taken from Guideline 97/68/EG, of which 97.6% are assumed to be NMVOC.
  Amount was scaled to the amount of reference product.
- Dioxins, measured as 2,3,7,8-tetrachlorodibenzo-p-dioxin [air, non-urban air or from high stacks]: 8.80046e-13 kg; = 8.80045582601561E-14 * scaling_factor; source Kellenberger D. 2007; lognormal variance with pedigree 0.01, pedigree (1,1,4,5,1)
  (same comment as for Cadmium)
- Methane, fossil [air, non-urban air or from high stacks]: 0.000917386 kg; = 9.17386236845829E-05 * scaling_factor; source Lambrecht U. 2004; lognormal variance with pedigree 0.0100106, pedigree (1,1,4,5,1)
  emission model calculating hourly specific emissions as "engine power x load factor x base emission factor" as proposed by Lambrecht et al. (2004) and applied in Spielmann et al. (2007); values for base emission factors for VOC for mobile machinery classes EURO IIIa and EURO IIIb are taken from European Directive 2004/ 26/EC, of which 2.4% are assumed to be methane.
  Amount was scaled to the amount of reference product.
- Copper [air, non-urban air or from high stacks]: 2.49556e-5 kg; = 2.495557830663E-06 * scaling_factor; source Kellenberger D. 2007; lognormal variance with pedigree 0.01, pedigree (1,1,4,5,1)
  (same comment as for Cadmium)

## Sampling procedure
Material and fuel input from literature sources (see general comments field); air-borne emissions taken from existing dataset on diesel consumption in building machines or - where emission levels beyond applicable European legislation - estimated with emissions model based on emission limits established in European Directive 2004/ 26/EC for non-road mobile machinery types EURO IIIa and IIIb (according to Lambrecht et al 2004 and e.g. applied in Spielmann et al. 2007).
