# soybean production

Dataset: EcoSpold 2, unit process
Geography: BR-MT
Time period: 2012-01-01 to 2021-12-31
Technology level: current
Classification: ISIC rev.4 ecoinvent: 0111:Growing of cereals (except rice), leguminous crops and oil seeds
Synonyms: soy production; soybean cultivation; soya
Scenario: Business-as-Usual
System model: Allocation, cut-off by classification
Share of production covered: 100 %
Generated by: Marília I. S. Folegatti Matsuura
Published in: Folegatti-Matsuura M. 2018
Database: ecoinvent
isCopyrightProtected: true
accessRestrictedTo: 1

## General comment
This dataset represents the production of 1 kg of soybeans (fresh matter).
The yield is 3120 kg/ha at a moisture content at storage of 13%.
This activity represents the weighted average of soybean production systems: 50.4% of monoculture plus 49.6% of cropping systems (e.g. crop rotation with other grain in the agricultural cycle, mainly winter maize). Therefore, land occupation and liming are related to the weighted averages of time occupation of both soybean production systems.
The total amount of mineral fertilizers (N-P-K) and pesticides applied (active ingredients) are 7 kg N/ha; 70 kg P2O5/ha; 63 kg K2O/ha and 5.49 kg/ha, respectively.
[This dataset is meant to replace the following datasets:]
[This dataset is meant to replace the following datasets:
- soybean production, BR, 2001 - 2006]
[This dataset is meant to replace the following datasets:
- soybean production, BR, 2001 - 2006]

## Included activities start
This activity starts after the harvest of the previous crop.

## Included activities end
The dataset includes the inputs of seeds, mineral fertilisers and pesticides.It is assumed that no organic fertilisers are applied.
The dataset includes all machine operations and corresponding machine infrastructure and sheds. Operations are: limestone and gypsum application, application of plant protection product, planting with starter fertiliser, fertilising, combine harvesting and drying of grains.
The dataset also includes the transportation of products inside the farm: water and fertilisers from sheds to field and grain from harvester to truck.
Furthermore, direct field emissions and land use change emissions are included, with important regionalizations added.
The dataset doesn't include: seed treatment (electrical operation for inoculatin seeds) and bacterial seed inoculant (Rhyzobium sp. for nitrogen fixation from air), cleaning and storage of harvested grains.
The activity ends after harvest at the farm gate.

## Allocation
Users of this dataset must decide the allocation criteria for land occupation, land-use changes and liming suitable for their needs, considering that the soybean production can be part of a crop system, i.e., rotation or succession with other grains in the agricultural cycle, mainly winter maize. Authors suggested an allocation by occupation time of soybean plus fallow time.

## Geography
The inventory is modelled for the state of Mato Grosso, in Brazil.

## Technology
Cultivation of soybeans.

## Time period
Time period of the most of the data collected for this dataset.

## Parameters
- nitrogen uptake by plant: 78 kg N/ha; name Nuptake_plant
  This value represents the N taken by plant during its growth (kg N/ha). Used in the SQCB-NO3 model for the calculation of leaching of NO3.
  From Nemececk & Schnetzer (2011),
- clay content into soil: 50 % (obsolete); name Clay_content
  This value represents the fraction of clay content into soil (%).
  Used in the SQCB-NO3 model for the calculation of leaching of NO3.
  From Folegatti et al. (2015).
- precipitation, annual: 1750 mm/year; name precipitation; lognormal variance with pedigree 0.0027, pedigree (1,3,1,3,1)
  This value represents the average annual precipitation in Mato Grosso, Used in the SQCB-NO3 model for the calculation of leaching of NO3. Brazil. See http://www.mteseusmunicipios.com.br/NG/conteudo.php?cid=725 .
- organic nitrogen into soil: 4000 kg N/ha; name Norg_soil
  Norg is the mass of organic nitrogen contained in the upper 50 cm of soil per ha (kg N/ha).
  Used in the SQCB-NO3 model for the calculation of leaching of NO3.
  From Folegatti et al. (2015).
- LUC_crop_specific: 1 dimensionless
  This parameter allows to switch between a 'crop specific' and a 'country specific' approach when calculating the LUC of a crop. By default, the chosen approach is 'crop specific', so the value of the parameter is 1. If you want to apply a 'country specific' approach, turn the parameter to 0.
- ratio of cropping system production: 0.496 dimensionless; name cropping_system_ratio
  In MT, 49.6% of soybean is produced in cropping systems.
- total nitrogen: 7 kg/ha; name N_total; lognormal variance with pedigree 0.002, pedigree (1,1,1,1,1)
  This value represents the total nitrogen in mineral and organic fertilisers (kg N/ha).
  From Folegatti et al. (2015).
- nitrogen in crop residues: 108 kg N/ha; name Ncrop_residues
  This value represents the nitrogen contained in the crop residues (kg N/ha). Used for the calculation of emissions of N2O to the air.
  From Duarte & Cantarella (2007).
- rooting depth: 0.49 m; name root_depth; lognormal variance with pedigree 0.001325, pedigree (2,2,1,2,1)
  This value represents the rooting depth of the crop (m).
- soil eroded: 11925 kg/ha.yr; name soil_eroded
  This value represents the quantity of soil eroded (kg/(ha*yr)).
  Used for the calculation of P emissions through water erosion to surface water.
  From Silva et al. (1994).
- occupation time: 0.836932 dimensionless; name occupation_time; = ((115+250) / 365)*(1- cropping_system_ratio) + cropping_system_ratio* ((115+130) / 365)
  Liming is proportional to the weighted averages of time occupation of both soybean production systems (monoculture and cropping system).
  The time occupation for monoculture system is: 115 days of soybean production plus 250 days of fallow time.
  The time occupation for cropping system is: 115 days of soybean production plus 130 days of fallow time.
- land transformation to: 3.2051 m2/kg; name T_t; lognormal variance with pedigree 0.0087, pedigree (2,2,1,1,1)
  From Folegatti et al. (2015).
  Uncertainty: Variance of log-transformed data as recommended by Ecoinvent for "Land use, transformation" for agriculture.

## Reference product
- soybean: 1 kg; name REF_PRODUCT; CPC 01412: Soya beans, other; By-product classification allocatable product
  1 Kg of soybean used as reference. The yield is 3120 kg/ha at a moisture content at storage of 13%.
  production volume 2.7851e10 kg; = 27850954*1000
    Production Volume of soybeans in the state of Mato Grosso in Brazil, 2015 harvest, according to the Municipal Agricultural Production Data of the Brazilian Institute of Geography and Statistics (SIDRA - IBGE). See more in: http://www.sidra.ibge.gov.br/.
  property price 0.239 EUR2005; name REF_PRODUCT_price_EUR2005
    Calculated value based on data from United Nations Commodity Trade Statistics Database (comtrade.un.org). UN comtrade category: 1201 Soya beans. Using exchange rate of 1EURO = 1.209 USD. Average of price of import into 5 main markets (EU, US, JP, IN and CN).
  property dry mass 0.87 kg; name REF_PRODUCT_DM; = REF_PRODUCT_WM- REF_PRODUCT_WWM
  property wet mass 1 kg; name REF_PRODUCT_WM
  property water in wet mass 0.13 kg; name REF_PRODUCT_WWM
  property carbon content, non-fossil 0.43596; name REF_PRODUCT_C_content
  property water content 0.149425; = REF_PRODUCT_WWM/ ( REF_PRODUCT_WM - REF_PRODUCT_WWM)
  property carbon content 0.43596
    carbon content on a dry matter basis (reserved; not for manual entry)
  properties: carbon content, fossil 0, carbon allocation 0.379285 kg

## Inputs from technosphere
- glyphosate: 0.000962 kg; source Folegatti Matsuura M. 2017; lognormal variance with pedigree 0.0033, pedigree (2,2,3,1,1)
  Amount for typical system from Folegatti et al. (2015).
  Uncertainty: Variance of log-transformed data as recommended by Ecoinvent for "Primary energy carriers, metals, salts" for agriculture.
  properties: wet mass 1 kg, dry mass 1 kg, carbon content, fossil 0.214286
- inorganic phosphorus fertiliser, as P2O5: 0.0224 kg; source Folegatti Matsuura M. 2017; lognormal variance with pedigree 0.0033, pedigree (2,2,3,1,1)
  (same comment as for glyphosate)
  properties: wet mass 1 kg, dry mass 1 kg
- soybean seed, for sowing: 0.0128 kg; name SEED; source Folegatti Matsuura M. 2017; lognormal variance with pedigree 0.0026, pedigree (1,1,3,1,1)
  (same comment as for glyphosate)
  property dry mass 0.89 kg; name SEED_DM; = SEED_WM- SEED_WWM
  property wet mass 1 kg; name SEED_WM
  property water in wet mass 0.11 kg; name SEED_WWM
  property carbon content, non-fossil 0.43596; name SEED_C_content
  properties: water content 0.123596
- potassium chloride: 0.0319745 kg; source Folegatti Matsuura M. 2017; lognormal variance with pedigree 0.0033, pedigree (2,2,3,1,1)
  The exchange has been updated from 'potassium chloride, as K2O' into 'potassium chloride' and therefore its amount has been scaled (multiplied) from 0.0202 kg by 1.5829 kg of 'potassium chloride' per kg of 'potassium chloride, as K2O'. Original comment of the exchange is: Amount for typical system from Folegatti et al. (2015).
  Uncertainty: Variance of log-transformed data as recommended by Ecoinvent for "Primary energy carriers, metals, salts" for agriculture.
  properties: dry mass 1 kg, wet mass 1 kg
- 2,4-dichlorophenol: 5.17e-5 kg; source Folegatti Matsuura M. 2017; lognormal variance with pedigree 0.0033, pedigree (2,2,3,1,1)
  (same comment as for glyphosate)
  properties: heating value, net 16.37 MJ, dry mass 1 kg, wet mass 1 kg, carbon content, fossil 0.442116
- cobalt: 4.42e-7 kg; source Folegatti Matsuura M. 2017; lognormal variance with pedigree 0.0033, pedigree (2,2,3,1,1)
  Micronutrient fertiliser. Amount for typical system from Folegatti et al. (2015).
  Uncertainty: Variance of log-transformed data as recommended by Ecoinvent for "Primary energy carriers, metals, salts" for agriculture.
  properties: wet mass 1 kg, dry mass 1 kg
- packaging, for fertilisers: 0.17338 kg; lognormal variance with pedigree 0.0532, pedigree (4,3,3,5,4)
  Total amount of active substance/s of fertilisers needed for the production of 'soybean' is calculated to be circa 8.67E-02 kg. Fertiliser/s used in this dataset is/are: 'lime', 'nitrogen fertiliser, as N', 'phosphate fertiliser, as P2O5', 'potassium chloride, as K2O'. The total amount of active substance/s is doubled in order to account for the packaging of the dilluted product of fertiliser/s that is/are applied. Therefore, 1.73E-01 kg of packaging for fertilisers is justified with this exchange.
  properties: wet mass 1 kg, heating value, net 25.01 MJ, carbon content, fossil 0.825301, price 0.0642 EUR2005, dry mass 1 kg
  note on carbon content, fossil: Considering a chemical formula (C2H4)n for polyethylene, carbon content-fossil is calculated to be 0.856286 kg of Carbon per kg of dry mass.
- limestone and gypsum application, by spreader: 8.9415e-5 ha; = 1/3*T_t*1E-04*occupation_time; source Folegatti Matsuura M. 2017; lognormal variance with pedigree 0.0033, pedigree (2,2,3,1,1)
  Agricultural operation. Amount for typical system from Folegatti et al. (2015).
- pesticide, unspecified: 0.000747 kg; source Folegatti Matsuura M. 2017; lognormal variance with pedigree 0.0033, pedigree (2,2,3,1,1)
  Amount for typical system from Folegatti et al. (2015). This exchange represents the input of Mineral oil (54%); flubendiamide (1%); lufenuron (1%); Trifloxystrobin (3%); Prothioconazol (3%); Thiamethoxam (5%); Lambda-cyhalothrin (2%); clorfluazuron (0.1%); Azoxystrobin (3%); Cyproconazole (2%); Chlorantraniliprole (0.3%); Teflubenzuron (1%); Acephate (6%); Picoxystrobin (3%); Imidacloprid (3%); Cyfluthrin (0.4%); Chlorimuron-ethyl (0.4%); Paraquat (8%); Diuron (4%); Fipronil (1%); Pyraclostrobin (0.1%) and Thiophanat-methyl (1%).
  Uncertainty: Variance of log-transformed data as recommended by Ecoinvent for "Primary energy carriers, metals, salts" for agriculture.
  properties: wet mass 1 kg, dry mass 1 kg, carbon content, fossil 0.486978
- planting with starter fertiliser, by no till planter: 0.00032051 ha; = 1*T_t*1E-04; source Folegatti Matsuura M. 2017; lognormal variance with pedigree 0.0033, pedigree (2,2,3,1,1)
  Agricultural operation. Amount for typical system from Folegatti et al. (2015).
- land use change, annual crop: 0.00024359 ha; = 0.000243589743589744*LUC_crop_specific+(0.000121361588368717*(1-LUC_crop_specific))
  Calculated value. Land use change (LUC) from Novaes et al. (2017).
- lime: 0.0418466 kg; = 0.05*occupation_time; source Folegatti Matsuura M. 2017; lognormal variance with pedigree 0.0033, pedigree (2,2,3,1,1)
  (same comment as for glyphosate)
  properties: wet mass 1 kg, carbon content, fossil 0.120005, dry mass 1 kg
- drying of maize grain: 0.0335366 l; name water_drying; = 0.55*REF_PRODUCT*(REF_PRODUCT_WWM - 0.18)/( 0.18-1); source Folegatti Matsuura M. 2017; lognormal variance with pedigree 0.0033, pedigree (2,2,3,1,1)
  It represents the drying of soybeans. Calculated value considering that 55.0% of the soybean production is harvested with 18% moisture and needs to be dried to reach 13% at storage.
- application of plant protection product, by field sprayer: 0.00256408 ha; = 8*T_t*1E-04; source Folegatti Matsuura M. 2017; lognormal variance with pedigree 0.0033, pedigree (2,2,3,1,1)
  Agricultural operation. Amount for typical system from Folegatti et al. (2015).
- packaging, for pesticides: 0.00353112 kg; lognormal variance with pedigree 0.0532, pedigree (4,3,3,5,4)
  Total amount of active substance/s of pesticides needed for the production of soybean is calculated to be circa 1.77E-03 kg. Pesticide/s used in this dataset is/are: '2,4-dichlorophenol', 'cobalt', 'glyphosate', 'molybdenum', 'pesticide, unspecified'. The total amount of active substance/s is doubled in order to account for the packaging of the dilluted product of pesticide/s that is/are applied. Therefore, 3.53E-03 kg of packaging for pesticides is justified with this exchange.
  properties: price 0.0642 EUR2005, wet mass 1 kg, carbon content, fossil 0.85714, dry mass 1 kg, heating value, net 25.97 MJ
- tap water: 0.512816 kg; name water_dilution; = 8*T_t*1E-04*200; source Folegatti Matsuura M. 2017; lognormal variance with pedigree 0.0033, pedigree (2,2,3,1,1)
  Water is used to dilute pesticides in a rate of 200 liters per application per ha. Amount for typical system from Folegatti et al. (2015).
  properties: carbon content, fossil 0.00178991, dry mass 0.000337476 kg, wet mass 1 kg, water content 2962.17
  note on carbon content, fossil: Bicarbonate content is 2.93 mol/m3. CO2 content is 0.1 mol/m3 (ecoinvent v2.2 report 8, Tab 93.1).
- molybdenum: 4.42e-6 kg; source Folegatti Matsuura M. 2017; lognormal variance with pedigree 0.0033, pedigree (2,2,3,1,1)
  (same comment as for cobalt)
  properties: dry mass 1 kg, wet mass 1 kg
- combine harvesting: 0.00032051 ha; = 1*T_t*1E-04; source Folegatti Matsuura M. 2017; lognormal variance with pedigree 0.0033, pedigree (2,2,3,1,1)
  Agricultural operation. Amount for typical system from Folegatti et al. (2015).
- transport, tractor and trailer, agricultural: 0.000151826 metric ton*km; = (0.380+0.067)* T_t*1E-04 + 2.67E-02* T_t*1E-04; source Folegatti Matsuura M. 2017; lognormal variance with pedigree 0.1227, pedigree (2,2,3,1,1)
  Average transport of grains (0.380 tkm/ha) and fertilisers (0.067 tkm/ha) in a truck with 140 HP plus average transport of water (0,0267 tkm/ha) in a tanker truck with 184 HP.
  Uncertainty: Variance of log-transformed data as recommended by Ecoinvent for "Transport Services" for agriculture.
- inorganic nitrogen fertiliser, as N: 0.00224357 kg; name N_fert; = N_total * T_t * 1E-04; source Folegatti Matsuura M. 2017; lognormal variance with pedigree 0.0033, pedigree (2,2,3,1,1)
  Monoammonium Phosphate Fertiliser (MAP) as Nitrogen fertiliser. Amount for typical system from Folegatti et al. (2015).
  Uncertainty: Variance of log-transformed data as recommended by Ecoinvent for "Primary energy carriers, metals, salts" for agriculture.
  properties: dry mass 1 kg, wet mass 1 kg

## Inputs from nature
- Energy, gross calorific value, in biomass [natural resource, biotic]: 20.5 MJ; lognormal variance with pedigree 0.0033, pedigree (2,2,3,1,1)
  Calorific value present in soybeans. Based on Ecoinvent database.
  Uncertainty: Variance of log-transformed data as recommended by Ecoinvent for "Primary energy carriers, metals, salts" for agriculture.
- Carbon dioxide, in air [natural resource, in air]: 1.3725 kg; = 44/12 * (REF_PRODUCT_C_content * REF_PRODUCT * REF_PRODUCT_DM - SEED_C_content* SEED * SEED_DM); source Nemecek, T. 2011; lognormal variance with pedigree 0.0033, pedigree (2,2,3,1,1)
  CO2 absorbed during photosyntesis and present at the product. See "3.1 CO2 from the Atmosphere" in Nemececk & Schnetzer (2011).
  Uncertainty: Variance of log-transformed data as recommended by Ecoinvent for "Primary energy carriers, metals, salts" for agriculture.
- Transformation, to annual crop, non-irrigated [natural resource, land]: 3.2051 m2; = T_t; lognormal variance with pedigree 0.01, pedigree (1,1,3,1,1)
  Amount for typical system from Folegatti et al. (2015).
- Transformation, from annual crop, non-irrigated [natural resource, land]: 3.2051 m2; = T_t; lognormal variance with pedigree 0.01, pedigree (1,1,3,1,1)
  Amount for typical system from Folegatti et al. (2015).
- Occupation, annual crop, non-irrigated, intensive [natural resource, land]: 2.68245 m2*year; = T_t*occupation_time; source Folegatti Matsuura M. 2017; lognormal variance with pedigree 0.004, pedigree (1,1,3,1,1)
  Occupation may range from 90 to 140 days per year, as seen on Folegatti et al. (2015). Users must adjust this mathematical relation to their needs. The fallow period considered was 130 days.
  Uncertainty: Variance of log-transformed data as recommended by Ecoinvent for "Land use, occupation" for agriculture.

## Emissions to nature
- Pesticides, unspecified [soil, agricultural]: 1.89e-5 kg; source Nemecek, T. 2011; lognormal variance with pedigree 0.0436, pedigree (4,3,3,1,1)
  "All pesticides applied for crop production were assumed to end up as emissions to the soil. The amounts of pesticides used as inputs were thus simultaneously calculated as outputs (emissions to agricultural soil)", as recomended by Nemecek and Schnetzer (2011), "2.9 EMISSIONS OF PESTICIDES TO AGRICULTURAL SOIL" (pg. 21). This exchange represents the emissions of Chlorantraniliprole (14%); Flubendiamide (57%); Lufenuron (25%); Clorfluazuron (4%).
  Uncertainty: Variance of log-transformed data as recommended by Ecoinvent for "Pesticides" for agriculture.
- Zinc [soil, agricultural]: 9.05e-6 kg; source Milà i Canals L. 2003; lognormal variance with pedigree 0.0506, pedigree (4,3,3,1,1)
  Emissions of heavy metals to soil and surface water estimated from mineral fertilisers and liming as recommended by Canals (2003) and regionalized following Folegatti et al. (2015).
  Uncertainty: Variance of log-transformed data as recommended by Ecoinvent for "Heavy metals" for agriculture.
- Lead [water, surface water]: 5.42e-10 kg; source Milà i Canals L. 2003; lognormal variance with pedigree 0.1007, pedigree (4,3,3,3,1)
  (same comment as for Zinc)
- Diuron [soil, agricultural]: 2.88e-5 kg; source Nemecek, T. 2011; lognormal variance with pedigree 0.0436, pedigree (4,3,3,1,1)
  "All pesticides applied for crop production were assumed to end up as emissions to the soil. The amounts of pesticides used as inputs were thus simultaneously calculated as outputs (emissions to agricultural soil)", as recomended by Nemecek and Schnetzer (2011), "2.9 EMISSIONS OF PESTICIDES TO AGRICULTURAL SOIL" (pg. 21).
  Uncertainty: Variance of log-transformed data as recommended by Ecoinvent for "Pesticides" for agriculture.
- Copper, ion [water, surface water]: -2.79e-10 kg; source Milà i Canals L. 2003
  Emissions of heavy metals to soil and surface water estimated from mineral fertilisers and liming as recommended by Canals (2003) and regionalized following Folegatti et al. (2015).
- Lead [soil, agricultural]: 5.42e-6 kg; source Milà i Canals L. 2003; lognormal variance with pedigree 0.0506, pedigree (4,3,3,1,1)
  (same comment as for Zinc)
- Beta-cyfluthrin [soil, agricultural]: 2.8e-6 kg; source Nemecek, T. 2011; lognormal variance with pedigree 0.0436, pedigree (4,3,3,1,1)
  (same comment as for Diuron)
- Carbon dioxide, fossil [air, non-urban air or from high stacks]: 0.0199469 kg; = 44/12*0.13*lime; source IPCC 2006; lognormal variance with pedigree 0.0113, pedigree (4,3,3,3,1)
  Emissions of CO2 to the air from lime application. Based on IPCC (2006).
  Uncertainty: Variance of log-transformed data as recommended by Ecoinvent for "CO2" for combustion emissions.
- Cadmium, ion [water, surface water]: 4.88e-11 kg; source Milà i Canals L. 2003; lognormal variance with pedigree 0.1007, pedigree (4,3,3,3,1)
  (same comment as for Zinc)
- Glyphosate [soil, agricultural]: 0.000962 kg; source Nemecek, T. 2011; lognormal variance with pedigree 0.0436, pedigree (4,3,3,1,1)
  (same comment as for Diuron)
- Chromium, ion [water, surface water]: -3.57e-10 kg; source Milà i Canals L. 2003
  (same comment as for Copper, ion)
- Cyproconazole [soil, agricultural]: 1.54e-5 kg; source Nemecek, T. 2011; lognormal variance with pedigree 0.0436, pedigree (4,3,3,1,1)
  This exchange represents the sum of amouns applied in more than one operation. "All pesticides applied for crop production were assumed to end up as emissions to the soil. The amounts of pesticides used as inputs were thus simultaneously calculated as outputs (emissions to agricultural soil)", as recomended by Nemecek and Schnetzer (2011), "2.9 EMISSIONS OF PESTICIDES TO AGRICULTURAL SOIL" (pg. 21).
  Uncertainty: Variance of log-transformed data as recommended by Ecoinvent for "Pesticides" for agriculture.
- Trifloxystrobin [soil, agricultural]: 1.92e-5 kg; source Nemecek, T. 2011; lognormal variance with pedigree 0.0436, pedigree (4,3,3,1,1)
  (same comment as for Diuron)
- Copper [soil, agricultural]: -2.79e-6 kg; source Milà i Canals L. 2003
  (same comment as for Copper, ion)
- Cadmium [soil, agricultural]: 4.88e-7 kg; source Milà i Canals L. 2003; lognormal variance with pedigree 0.0506, pedigree (4,3,3,1,1)
  (same comment as for Zinc)
- Prothioconazol [soil, agricultural]: 2.24e-5 kg; source Nemecek, T. 2011; lognormal variance with pedigree 0.0436, pedigree (4,3,3,1,1)
  (same comment as for Diuron)
- Water [water, surface water]: 0.000512816 m3; = water_dilution/1000; lognormal variance with pedigree 0.0532, pedigree (4,3,3,5,4)
  Emissions of water related to pesticide dilution.
- Teflubenzuron [soil, agricultural]: 3.85e-6 kg; source Nemecek, T. 2011; lognormal variance with pedigree 0.0436, pedigree (4,3,3,1,1)
  (same comment as for Diuron)
- Chromium [soil, agricultural]: -3.57e-6 kg; source Milà i Canals L. 2003
  (same comment as for Copper, ion)
- Nickel, ion [water, surface water]: 3.18e-10 kg; source Milà i Canals L. 2003; lognormal variance with pedigree 0.1007, pedigree (4,3,3,3,1)
  (same comment as for Zinc)
- Chlorimuron-ethyl [soil, agricultural]: 3.29e-6 kg; source Nemecek, T. 2011; lognormal variance with pedigree 0.0436, pedigree (4,3,3,1,1)
  (same comment as for Diuron)
- Azoxystrobin [soil, agricultural]: 1.92e-5 kg; source Nemecek, T. 2011; lognormal variance with pedigree 0.0436, pedigree (4,3,3,1,1)
  (same comment as for Diuron)
- Cobalt [water, surface water]: 4.42e-11 kg; source Milà i Canals L. 2003; lognormal variance with pedigree 0.1007, pedigree (4,3,3,3,1)
  Emissions of heavy metals to soil and surface water estimated from mineral fertilisers and liming as recommended by Canals (2003) and regionalized following Folegatti et al. (2015). For cobalt, the uptake by plant was not discounted, due to lack of information.
  Uncertainty: Variance of log-transformed data as recommended by Ecoinvent for "Heavy metals" for agriculture.
- Water [air, non-urban air or from high stacks]: 3.35366e-5 m3; = water_drying/1000; lognormal variance with pedigree 0.0532, pedigree (4,3,3,5,4)
  Evaporated water related to the service dataset "drying of maize grain".
- Lambda-cyhalothrin [soil, agricultural]: 1.41e-5 kg; source Nemecek, T. 2011; lognormal variance with pedigree 0.0436, pedigree (4,3,3,1,1)
  (same comment as for Diuron)
- Imidacloprid [soil, agricultural]: 2.24e-5 kg; source Nemecek, T. 2011; lognormal variance with pedigree 0.0436, pedigree (4,3,3,1,1)
  (same comment as for Diuron)
- Phosphorus [water, surface water]: 0.00135072 kg; = soil_eroded * 0.00095 * 1.86 * 0.2 * T_t*1E-04; source Nemecek, T. 2011; lognormal variance with pedigree 0.0507, pedigree (4,3,3,3,1)
  Due to phosphorus low mobility in Brazilian soils, its emissions through leaching and run-off were disregarded (Novais & Smyth, 1999). Only P emission by water erosion through surface water was considered, as in "2.3.3 Phorsphorous Emissions Through Water Erosion to Surface Water" Nemecek and Schnetzer (2011).
  Uncertainty: Variance of log-transformed data as recommended by Ecoinvent for "NO3, PO4" for agriculture.
- Thiamethoxam [soil, agricultural]: 3.41e-5 kg; source Nemecek, T. 2011; lognormal variance with pedigree 0.0436, pedigree (4,3,3,1,1)
  (same comment as for Diuron)
- Paraquat [soil, agricultural]: 5.77e-5 kg; source Nemecek, T. 2011; lognormal variance with pedigree 0.0436, pedigree (4,3,3,1,1)
  (same comment as for Diuron)
- Nitrate [water, ground-]: 0.0287044 kg; name NO3; = 62/14*((21.37 + precipitation/(Clay_content*root_depth) * (0.0037*N_total + 0.0000601*Norg_soil - 0.00362*Nuptake_plant)) * T_t * 1E-04); source Nemecek, T. 2011; lognormal variance with pedigree 0.0507, pedigree (4,3,3,3,1)
  See "2.2.2 The SQCB-NO3 model" in Nemececk & Schnetzer (2011), as "SALCA-NO3 model" has "Geographic scope of application: Europe". U= 78 Kg N/ha for Nitrogen uptake also from Nemececk & Schnetzer (2011), table 2.16. Norg = 4 t/ha for typical system from Folegatti et al. (2015).
  Uncertainty: Variance of log-transformed data as recommended by Ecoinvent for "NO3, PO4" for agriculture.
- Picoxystrobin [soil, agricultural]: 1.92e-5 kg; source Nemecek, T. 2011; lognormal variance with pedigree 0.0436, pedigree (4,3,3,1,1)
  (same comment as for Diuron)
- 2,4-D [soil, agricultural]: 5.17e-5 kg; source Nemecek, T. 2011; lognormal variance with pedigree 0.0436, pedigree (4,3,3,1,1)
  (same comment as for Diuron)
- Mineral oil [soil, agricultural]: 0.000402 kg; source Nemecek, T. 2011; lognormal variance with pedigree 0.0436, pedigree (4,3,3,1,1)
  (same comment as for Diuron)
- Cobalt [soil, agricultural]: 4.42e-7 kg; source Milà i Canals L. 2003; lognormal variance with pedigree 0.0507, pedigree (4,3,3,3,1)
  (same comment as for Cobalt)
- Molybdenum [soil, agricultural]: 1.28e-6 kg; source Milà i Canals L. 2003; lognormal variance with pedigree 0.0507, pedigree (4,3,3,3,1)
  (same comment as for Zinc)
- Nitrogen oxides [air, non-urban air or from high stacks]: 0.000138364 kg; = N2O*0.21; source Nemecek, T. 2011; lognormal variance with pedigree 0.0407, pedigree (4,3,3,3,1)
  Emissions of NOx to the air. See "2.5 EMISSIONS OF NOX TO THE AIR" in Nemecek and Schnetzer (2011).
  Uncertainty: Variance of log-transformed data as recommended by Ecoinvent for "NOX, N2O" for agriculture.
- Acephate [soil, agricultural]: 4.77e-5 kg; source Nemecek, T. 2011; lognormal variance with pedigree 0.0436, pedigree (4,3,3,1,1)
  (same comment as for Diuron)
- Dinitrogen monoxide [air, non-urban air or from high stacks]: 0.000658877 kg; name N2O; = 44/28*(0.01*((N_total+ Ncrop_residues)*T_t*1E-04)+ 0.01*14/17*NH3 + 0.0075*14/62*NO3); source Nemecek, T. 2011; lognormal variance with pedigree 0.1987, pedigree (4,3,5,3,5)
  Emissions of N2O to the air. See "2.4 EMISSIONS OF N2O TO THE AIR" in Nemecek and Schnetzer (2011), with "nitrogen contained in the crop residues" Ncr = 108 kg N/ha from Folegatti et al. (2015).
  Uncertainty: Variance of log-transformed data as recommended by Ecoinvent for "NOX, N2O" for agriculture.
- Fipronil [soil, agricultural]: 8.01e-6 kg; source Nemecek, T. 2011; lognormal variance with pedigree 0.0436, pedigree (4,3,3,1,1)
  (same comment as for Diuron)
- Ammonia [air, non-urban air or from high stacks]: 0.000253363 kg; name NH3; = 17/14*N_fert*0.093; source Nemecek T. 2015; lognormal variance with pedigree 0.0187, pedigree (4,3,3,3,1)
  NH3 emissions from applied mineral fertilisers are calculated according Nemecek et al (2015), considering only soils with pH<7 due to brazilian conditions. Constant emissions factor for Monoammonium Phosphate (MAP) is 0.093. See Nemecek et al. (2015), pag. 36.
  Uncertainty: Variance of log-transformed data as recommended by Ecoinvent for "CH4, NH3" for agriculture.
- Pyraclostrobin (prop) [soil, agricultural]: 8.01e-7 kg; source Nemecek, T. 2011; lognormal variance with pedigree 0.0436, pedigree (4,3,3,1,1)
  (same comment as for Diuron)
- Nickel [soil, agricultural]: 3.18e-6 kg; source Milà i Canals L. 2003; lognormal variance with pedigree 0.0506, pedigree (4,3,3,1,1)
  (same comment as for Zinc)
- Thiophanate-methyl [soil, agricultural]: 7.21e-6 kg; source Nemecek, T. 2011; lognormal variance with pedigree 0.0436, pedigree (4,3,3,1,1)
  (same comment as for Diuron)
- Molybdenum [water, surface water]: 1.28e-10 kg; source Milà i Canals L. 2003; lognormal variance with pedigree 0.1007, pedigree (4,3,3,3,1)
  (same comment as for Zinc)
- Zinc, ion [water, surface water]: 9.05e-10 kg; source Milà i Canals L. 2003; lognormal variance with pedigree 0.1007, pedigree (4,3,3,3,1)
  (same comment as for Zinc)

## Sampling procedure
The main source of data for agricultural inputs and operations is the annual soybean production cost survey conducted by Embrapa Soja (CNPSO). Data are also provided by the ProspecSoy project, as well as consultation with relevant experts. Emissions from the agricultural process are estimated according to Nemecek and Schnetzer (2011) and Canals (2003).

## Extrapolations
This dataset has been extrapolated from year 2014 to the year of the calculation (2021). The uncertainty has been adjusted accordingly.
