# granulated blast furnace slag production

Dataset: EcoSpold 2, unit process
Geography: RoW
Time period: 2015-07-26 to 2021-07-26
Technology level: current
Classification: ISIC rev.4 ecoinvent: 2395:Manufacture of articles of concrete, cement and plaster
Synonyms: GBFS
Scenario: Business-as-Usual
System model: Allocation, cut-off by classification
Generated by: [System]
Published in: Silva, F. B. 2017
Database: ecoinvent
isCopyrightProtected: true
accessRestrictedTo: 1

## General comment
This dataset has been extrapolated from the corresponding local BR dataset.

This dataset represents the intermediate treatment of raw blast furnace slag, producing an output of granulated blast furnace slag (GBFS). GBFS resembles a natural sand grain, with a more angular form. It has a glass content of over 95% and presents excellent hydraulic properties. The GBFS usually goes through a subsequent grinding process, generating a supplementary cementitious material called ground granulated blast furnace slag (GGBFS). In Brazil, around 70% of the blast furnace slag used in cement making is grinded jointly with clinker, after the granulation process. Therefore, this dataset focuses exclusively in the blast furnace slag granulation process, which happens in the steelmaking company. This dataset is mainly based on primary data provided by one Brazilian steelmaking plant, representing an average condition of GBFS production in Brazil. Water and electricity consumption come from internal company reports, and granulated blast furnace slag daily production is measured by scales within the plant. Emissions data were extrapolated by Marceau and VanGeem (2003), exclusively for their granulation process. Other emissions data listed on that publication were not considered here either because they were related to drying or grinding, or because consulted Brazilian experts claimed they didn't make sense in the local granulation process. According to the company which provided primary granulation data, there is no mass loss within the granulation process.

## Included activities start
From the generation of blast furnace slag from pig iron production, at the steelmaking plant.

## Included activities end
This activity ends with the granulation of blast furnace slag. It includes the water and electricity consumed for the granulation process, and emissions that arise from it. Infrastructure, machinery and administration activities not included

## Geography
Dataset based on primary data provided by one Brazilian steelmaking company that represents average conditions in Brazil. Dataset considered valid for GLO market. Uncertainty has been adjusted accordingly.

## Technology
Granulation is performed using pressurized cold water jets. Granulated slag is subsequently dried in filters within the storage silo.

## Reference product
- blast furnace slag: 0 kg; By-product classification Recyclable; CPC 39310: Slag, dross, scalings and other waste from the manufacture of iron or steel
  The steelmaking company states there is no mass loss during their granulation process.
  production volume 0 kg; = 23E+09*0.81/0.1
    Literature data. From euroslag statistics 2012 (http://www.euroslag.com/products/statistics/2012/, accessed 14Nov2017). The total amount of slag produced in 2012 in europe was 23 million tonnes of which 81% is turned into granulated blast furnace slag. Europe is assumed to represent 10% of global production based on Word Steel report of world crude steel production in 2014 (http://www.lightcastlebd.com/blog/wp-content/uploads/2016/02/4-2.png, accessed 14Nov2017).
  property heating value, net 0 MJ
    Non combustible products are assumed to have an LHV equal to zero (0).
  property carbon content, fossil 0
    Industry value; Arcelor Mittal, chemical composition of blast furnace slag (http://www.cst.com.br/english/products/co_products/catalog_products/blast_slag/blast_slag.asp, accessed: 20121003).
  property carbon content 0
    carbon content on a dry matter basis (reserved; not for manual entry)
  properties: water content 0, price 0 EUR2005, carbon content, non-fossil 0, water in wet mass 0 kg, dry mass 1 kg, wet mass 1 kg, carbon allocation 0 kg
- granulated blast furnace slag: 1 kg; name GBFS; By-product classification allocatable product
  production volume 1.7906e11 kg; = 23E+09*0.81/0.1
  property price 0.0615 EUR2005; name GBFS_price_EUR2005
  property water content 0; name GBFS_water_content
  property carbon content, non-fossil 0; name GBFS_C_content_non_fossil
  property water in wet mass 0 kg; name GBFS_WWM
  property carbon content, fossil 0; name GBFS_C_content_fossil
  property wet mass 1 kg; name GBFS_WM
  property dry mass 1 kg; name GBFS_DM
  properties: carbon content 0, carbon allocation 0 kg

## By-products
- granulated blast furnace slag: 0 kg; By-product classification allocatable product
  production volume 0 kg; = 23E+09*0.81/0.1
    (same comment as for blast furnace slag)
  property carbon content 0
    carbon content on a dry matter basis (reserved; not for manual entry)
  properties: carbon allocation 0 kg

## Inputs from technosphere
- tap water: 0 kg; name gran_water; pedigree (1,1,1,1,1)
  Measured value. Value provided by steelmaking company. Actually, 2,238 kg of water are used for the grnaulation process, but 78,62% of that water is recirculated within the company. The consumption documented here refers to the 21,38% that is lost in evaporation - to mantain water balance.
  Uncertainty: Value sourced from proxy value for resources input in Data Quality Guidelines, Table 10.3.
  properties: wet mass 1 kg, carbon content, fossil 0.00178991, water content 2962.17, dry mass 0.000337476 kg
  note on carbon content, fossil: Bicarbonate content is 2.93 mol/m3. CO2 content is 0.1 mol/m3 (ecoinvent v2.2 report 8, Tab 93.1).
- electricity, medium voltage: 0 kWh; pedigree (1,1,1,1,1)
  Measured value. Value provided by company as 1,8E-3 MWh
  Uncertainty: Variance sourced from proxy value for energy carriers and working material in Data Quality Guidelines, Table 10.3.
- blast furnace slag: 1 kg
  The steelmaking company states there is no mass loss during their granulation process.
  production volume 1.7906e11 kg
  properties: dry mass 1 kg, wet mass 1 kg
- tap water: 0.000542805, 0.000897075, 0.0226207, 0.000588471, 0.0016739, 0.193297, 0.25886 kg (7 entries); lognormal variance with pedigree 0.0048, pedigree (1,4,2,5,1)
  (same comment as for tap water)
- electricity, medium voltage: 1.957e-5, 3.75269e-6, 8.61676e-5, 6.29998e-5, 0.000916276, 0.000290446, 0.000420788 kWh (7 entries); lognormal variance with pedigree 0.0048, pedigree (1,4,2,5,1)
  (same comment as for electricity, medium voltage)

## Emissions to nature
- Particulates, > 2.5 um, and < 10um [air, unspecified]: 8.39146e-6 kg; = UnitConversion(0,0185E-3, 'pound avoirdupois', 'kg'); source Marceau M. 2003, p. 5; lognormal variance with pedigree 0.3433, pedigree (2,2,5,5,2)
  Literature value. Emission of particulates for the granulation process stated in Marceau and VanGeem 2003. PM (dust) is generated during the "breaking" of slag through contact with pressurized cold water.
  Uncertainty: Variance sourced from proxy value for PM2.5 process emissions to air in Data Quality Guidelines, Table 10.3.
- Water [air, unspecified]: 0.00047848 m3; = gran_water/1000; lognormal variance with pedigree 0.0442, pedigree (1,4,2,5,1)
  Measured value. According to data provided by the steelmaking company, 21,38% of used water is evaporated.
  Uncertainty: Value sourced from proxy value for "Inorganic emissions, other" in Data Quality Guidelines, Table 10.3.

## Sampling procedure
Collection of primary data from one Brazilian steelmaking plant.
The amount of the exchanges was calculated considering the average of the sample. No conversion to the geometric mean of the lognormal distribution was done, for consistency reasons with other ecoinvent datasets.

## Extrapolations
This dataset has been extrapolated from the corresponding local BR dataset. Data refers to one Brazilian steelmaking plant, extrapolated to the whole country's technology. Collected data were complemented by emissions data from the US Life Cycle Inventory of Slag Cement Manufacturing Process (available in Marceau and VanGeem, 2003)
