# maize grain, feed to generic market for energy feed

Dataset: EcoSpold 2, unit process
Geography: RoW
Time period: 2016-01-01 to 2021-12-31
Technology level: current
Classification: ISIC rev.4 ecoinvent: 1080:Manufacture of prepared animal feeds
Scenario: Business-as-Usual
System model: Allocation, cut-off by classification
Generated by: Avraam Symeonidis
Published in: Russo, V. 2017
Database: ecoinvent
isCopyrightProtected: true
accessRestrictedTo: 1

## General comment
This activity is a linking activity, i.e. it connects maize grain, feed with generic market for energy feed. Maize grain, feed is used primarily as a feed for animals, thus traded on generic feed market with other energy- containing products.

## Included activities start
The activity starts with the reception of maize grain, feed.

## Included activities end
This linking activity has the maize grain, feed as an input and protein and energy feed as outputs.

## Parameters
- fraction_to_generic_market: 0.9 % (obsolete); lognormal variance with pedigree 0.108, pedigree (4,1,1,1,1)
  It is assumed that 90% of maize grain is traded on generic protein feed market, i.e. its buyers do not care what type of protein feed they are buying. Remaining 10% of the production volume (PV) is assumed to be used for uses, where specific type of protein feed is required and cannot be substituted by any other protein feed.

## Reference product
- energy feed, gross: 1 MJ; name ref_product; = maize_grain_input*maize_grain_input_energy*maize_grain_input_DM; CPC 23319: Preparations used in animal feeding n.e.c.; By-product classification allocatable product
  Calculated based on literature values for "maize grain" (Feedipedia, 2019), which reports a crude protein content of 17.3% of dry matter and a gross energy content equates to 18.7 MJ/kg dry matter of fed, with a dry matter content equates 86.3% of fed. Reference: Feedipedia (2019) Maize Grain, Animal feed resources information system, Available at: https://www.feedipedia.org/node/556. (Accessed January 2018)
  production volume 6.14546e12 MJ; name ref_product_pv; = 385292559000* maize_grain_input_DM*maize_grain_input_energy
    Calculated based on the production volume of maize grain, feed on a Global scale.
  property dry mass 0.0534759 kg; = 1/18.7
  property price 0.0108 EUR2005
    Based on energy feed, gross content in soybean meal and prices per kg of soybean meal. Assumed soybean meal is the most used feed. Soybean meal 2004 prices for World import/export data (tonnes and US$) from FaoStat statistics (http://faostat.fao.org/site/535/default.aspx#ancor, TRADE)- [Accessed 24 May 2010]. See calculations for protein /energy content
  property carbon content, non-fossil 0.0251107; = 0.46957*0.053475935828877
    This is an indicative property. It is calculated based on the amount of DM necessary to provide 1 MJ of RP. Maize grain, feed is considered to have a carbon content, non-fossil of circa 0.47 kg of carbon per kg of DM.
  property wet mass 0.0534759 kg; = 1/18.7
  property carbon content 0.0251107
    carbon content on a dry matter basis (reserved; not for manual entry)
  property true value 0.174291; name ref_product_true_value
    allocation property applied in "true value" allocation // value calculated from revenue
  properties: water in wet mass 0 kg, water content 0, carbon content, fossil 0, carbon allocation 0.00134282 kg

## By-products
- protein feed, 100% crude: 0 kg; name by_product; CPC 23319: Preparations used in animal feeding n.e.c.; By-product classification allocatable product; pedigree (1,1,1,1,1)
  (same comment as for energy feed, gross)
  production volume 3.08916e10 kg; = ref_product_pv* by_product/ ref_product
    Calculated from production volume of reference product using the relative outputs.
  property price 0.424 EUR2005
    Based on protein content and energy feed, gross content in soybean meal and prices per kg of soybean meal. Assumed soybean meal is the most used feed. Soybean meal 2004 prices for World import/export data (tonnes and US$) from FaoStat statistics (http://faostat.fao.org/site/535/default.aspx#ancor, TRADE)- [Accessed 24 May 2010]. See calculations for protein /energy content
  property carbon content 0.53
    carbon content on a dry matter basis (reserved; not for manual entry)
  property true value 0.0343957; name by_product_true_value
    allocation property applied in "true value" allocation // value calculated from revenue
  properties: carbon content, non-fossil 0.53, water content 0, carbon content, fossil 0, wet mass 1 kg, water in wet mass 0 kg, dry mass 1 kg, carbon allocation 0.53 kg

## Inputs from technosphere
- maize grain, feed: 0.0517521 kg; name maize_grain_input; lognormal variance with pedigree 0.0113, pedigree (4,3,3,3,1)
  property protein feed, 100% crude per kg of dry mass 0.094 kg/kg; name maize_grain_inp_protein_feed_per_kg_DM_0
  property dry mass 0.863 kg; name maize_grain_input_DM
  property energy content 18.7 MJ; name maize_grain_input_energy
  properties: carbon content, non-fossil 0.46957, wet mass 1 kg, water content 0.158749
  note on protein feed, 100% crude per kg of dry mass: maize grain crude protein is 9.4% of dry matter. Reference(s): Feedipedia (2015) maize grain, Animal feed resources information system, Available at: https://www.feedipedia.org. (Accessed January 2019)
  note on energy content: Maize grain feed, gross energy is 18.7MJ/kg dry matter. Reference(s): Feedipedia (2015) maize grain, Animal feed resources information system, Available at: https://www.feedipedia.org. (Accessed January 2018)
