# landed anchovy to generic market for marine fish

Dataset: EcoSpold 2, unit process
Geography: GLO
Time period: 2017-01-01 to 2021-12-31
Technology level: current
Classification: ISIC rev.4 ecoinvent: 0311:Marine fishing
Scenario: Business-as-Usual
System model: Allocation, cut-off by classification
Generated by: Avraam Symeonidis
Database: ecoinvent
isCopyrightProtected: true
accessRestrictedTo: 1

## General comment
This is a linking (transfering) activity which links landed anchovy, to the generic market for marine fish.

## Included activities start
The activity starts with the reception of landed anchovy.

## Included activities end
The activity models the part of anchovy which contributes to the generic market for marine fish.

## Reference product
- marine fish: 1 kg; By-product classification allocatable product; CPC 04211: Wild freshwater fish, live, fresh or chilled
  production volume 1.1e8 kg; = (4510000000+990000000)*0.02
    Production volume calculated based on the global production volume that is supplying this linking activity:
    anchovy, capture by steel purse seiner and landing whole, fresh
    anchovy, capture by wooden purse seiner and landing whole, fresh
    It is documented that anchovy that is driven to human consumption is circa 2% of the total production volume of anchovies.
    Reference: Avadi, Angel & Fréon, Pierre & Quispe, Isabel. (2014). Environmental assessment of Peruvian anchoveta food products: Is less refined better?. The International Journal of Life Cycle Assessment. 19. 10.1007/s11367-014-0737-y.
  property ash content 0.0154835 kg
    Value has been weighted averaged based on the production volume of the five different fish adn their respective properties.
    Namely: 1. landed hake by-catch, fresh - PV: 5518600 kg
    2. landed anchovy, fresh - PV: 110000000 kg
    3. landed hake, fresh - PV: 86458333 kg
    4. landed tuna, frozen, EPO - PV: 554761905 kg
    5. landed tuna by-catch, fresh, EPO - PV: 23115079.38 kg
  property protein content 0.233359
    (same comment as for marine fish)
  property carbon content, non-fossil 0.469101
    (same comment as for marine fish)
  property fat content 0.0325441
    (same comment as for marine fish)
  property price 3.28 EUR2005
    Temporary price. Calulated as the average of the price of tuna and hake.
  property energy content 5.92472 MJ
    (same comment as for marine fish)
  property carbon content 0.469101
    carbon content on a dry matter basis (reserved; not for manual entry)
  properties: dry mass 0.492364 kg, water in wet mass 0.507636 kg, wet mass 1 kg, water content 1.03102, carbon allocation 0.230968 kg

## Inputs from technosphere
- landed anchovy, fresh: 0 kg
  Anchoveta (Engraulis ringens)
  property ash content 0.02 kg; name anch_ash
  property protein content 0.191; name anch_protein
  property fat content 0.088; name anch_fat
  properties: carbon content, non-fossil 0.481541, energy content 7.9 MJ, water content 2.81651, wet mass 1 kg, dry mass 0.26202 kg
  note on carbon content, non-fossil: Calculated from C_content = polysaccharids*0.444+protein*0.535+lipids*0.774 and polysaccharids = 1-(protein+lipids+ash)
- landed anchovy, fresh: 0.473244, 0.526756 kg (2 entries)
  Anchoveta (Engraulis ringens)
  properties: ash content 0.02 kg, carbon content, non-fossil 0.481541, energy content 7.9 MJ, protein content 0.191, water content 2.81651, wet mass 1 kg, dry mass 0.26202 kg, fat content 0.088

## Extrapolations
This dataset has been extrapolated from year 2017 to the year of the calculation (2021). The uncertainty has been adjusted accordingly.
