# treatment of sludge from pulp and paper production, sanitary landfill

Dataset: EcoSpold 2, unit process
Geography: CH
Time period: 1994-01-01 to 2021-12-31
Technology level: current
Classification: EcoSpold01Categories: waste management/sanitary landfill
Classification: ISIC rev.4 ecoinvent: 3821:Treatment and disposal of non-hazardous waste
Synonyms: wastewater treatment sludge form pulp and paper production
Tags: Treatment; ConvertedDataset
Scenario: Business-as-Usual
System model: Allocation, cut-off by classification
Generated by: Gabor Doka (obsolete)
Published in: Doka G. 2007
Database: ecoinvent
isCopyrightProtected: true
accessRestrictedTo: 1

## General comment
Inventoried waste contains 100% sludge from pulp and paper production; .
waste composition (wet, in ppm): upper heating value 5.032 MJ/kg; lower heating value 2.645 MJ/kg; H2O 250000; O 427890; H 29257; C 157500; S 3367; N 26559; P 12074; B n.a.; Cl 0.025838; Br n.a.; F 1.9261; I n.a.; Ag n.a.; As 1.4625; Ba n.a.; Cd 0.255; Co 4.7786; Cr 12.75; Cu 84.585; Hg 0.18; Mn 156.56; Mo 2.8282; Ni 8.925; Pb 46.95; Sb n.a.; Se n.a.; Sn 11.862; V n.a.; Zn 131.5; Be n.a.; Sc n.a.; Sr n.a.; Ti n.a.; Tl n.a.; W n.a.; Si 17626; Fe 20951; Ca 29909; Al 5851.4; K 2344.6; Mg 3357.9; Na 12849;
Share of carbon in waste that is biogenic 100%.
Overall degradability of waste during 100 years: 60%.
[This dataset was already contained in the ecoinvent database version 2. It was not individually updated during the transfer to ecoinvent version 3. Life Cycle Impact Assessment results may still have changed, as they are affected by changes in the supply chain, i.e. in other datasets. This dataset was generated following the ecoinvent quality guidelines for version 2. It may have been subject to central changes described in the ecoinvent version 3 change report (http://www.ecoinvent.org/database/ecoinvent-version-3/reports-of-changes/), and the results of the central updates were reviewed extensively. The changes added e.g. consistent water flows and other information throughout the database. The documentation of this dataset can be found in the ecoinvent reports of version 2, which are still available via the ecoinvent website. The change report linked above covers all central changes that were made during the conversion process.]

## Included activities end
Waste-specific short-term emissions to air via landfill gas incineration and landfill leachate. Burdens from treatment of short-term leachate (0-100a) in wastewater treatment plant (including WWTP sludge disposal in municipal incinerator). Long-term emissions from landfill to groundwater (after base lining failure).

## Geography
Technology encountered in Switzerland in 2000. Landfill includes base seal, leachate collection system, treatment of leachate in municipal wastewater treatment plant.

## Technology
Swiss municipal sanitary landfill for biogenic or untreated municipal waste ('reactive organic landfill'). Landfill gas and leachate collection system. Recultivation and monitoring for 150 years after closure.

## Reference product
- sludge from pulp and paper production: -1 kg; By-product classification Waste; CPC 39920: Sewage sludge
  production volume 1.692e7 kg; name RP_PV_1
    Calculated. The value is extrapolated from the global dataset. The share of CH production of paper and pulp is calculated to be 0.0027, which corresponds to a production of 1410000 tonnes (link: http://www.fao.org/docrep/018/i3353t/i3353t.pdf, accessed 20150930).
  property price 0 EUR2005
    Waste products are assigned a price of zero as they are assumed to require further treatment.
  property carbon content, non-fossil 0.21
    Tab 6.21, ecoinvent v2.2 report 11_III & Tab A.9, ecoinvent v2.2 report 13_I. Sludge from pulp and paper contains 15.75% carbon
  property heating value, net 2.65 MJ
    Value taken from the general comment of the treatment dataset.
  property carbon content 0.21
    carbon content on a dry matter basis (reserved; not for manual entry)
  properties: water content 0.333333, water in wet mass 0.25 kg, carbon content, fossil 0, wet mass 1 kg, dry mass 0.75 kg, carbon allocation 0.1575 kg

## Inputs from technosphere
- iron (III) chloride, without water, in 40% solution state: 0.00263 kg; lognormal variance with pedigree 0.63, pedigree (1,1,5,1,1)
  burden from incineration of sludge from wastewater treatment of the short-term leachate (0-100a). uncertainty is calculated from uncertainties in waste composition and transfer coefficients in incinerator and uncertainty of waste decomposition and short-term leaching in sanitary landfill
  properties: wet mass 1 kg, dry mass 1 kg
- process-specific burdens, residual material landfill: 0.00054 kg; lognormal variance with pedigree 0.33, pedigree (1,1,5,1,1)
  burden from incineration of sludge from wastewater treatment of the short-term leachate (0-100a). uncertainty is calculated from uncertainties in waste composition and transfer coefficients in incinerator and uncertainty of waste decomposition and short-term leaching in sanitary landfill;activityLink introduced to establish a direct link to the corresponding regional supply of this product
- hydrochloric acid, without water, in 30% solution state: 2.66e-8 kg; lognormal variance with pedigree 0.49, pedigree (1,1,5,1,1)
  (same comment as for iron (III) chloride, without water, in 40% solution state)
  properties: dry mass 1 kg, heating value, net 3.32 MJ, wet mass 1 kg
- sewer grid, 5E9l/year, 110 km: 5.45e-10 km; lognormal variance with pedigree 0.2106, pedigree (5,5,5,5,5)
  burden from wastewater treatment of the short-term leachate (0-100a). Uncertainty calculated from unertainty of the waste composition of this waste, uncertainty in waste decomposition and short-term leaching in sanitary landfill
- process-specific burdens, municipal waste incineration: 0.0124 kg; lognormal variance with pedigree 0.21, pedigree (1,1,5,1,1)
  Burden from incineration of sludge from wastewater treatment of the short-term leachate (0-100a).
  Burden from incineration of sludge from wastewater treatment of the short-term leachate (0-100a).;activityLink introduced to establish a direct link to the corresponding regional supply of this product
- electricity, for reuse in municipal waste incineration only: 0.00179 kWh; name E_el_prod_MSWI; lognormal variance with pedigree 0.4, pedigree (1,1,5,1,1)
  (same comment as for iron (III) chloride, without water, in 40% solution state)
- chromium oxide, flakes: 2.18e-8 kg; lognormal variance with pedigree 0.62, pedigree (5,5,5,5,5)
  burden from incineration of sludge from wastewater treatment of the short-term leachate (0-100a). Proxy for vanadium pentoxide V2O5 in SCR catalyst, uncertainty calculated from uncertainty in average DeNOx input, uncertainty in the share of thermal NOx, uncertainty of nitrogen content in average municipal waste and the unertainty in nitrogen content in *this* waste and uncertainty of waste decomposition and short-term leaching in sanitary landfill
  properties: dry mass 1 kg, wet mass 1 kg
- heat, for reuse in municipal waste incineration only: 0.0104 MJ; name E_th_prod_MSWI; lognormal variance with pedigree 0.21, pedigree (1,1,5,1,1)
  (same comment as for iron (III) chloride, without water, in 40% solution state)
- titanium dioxide: 1.07e-6 kg; lognormal variance with pedigree 0.51, pedigree (1,1,5,1,1)
  (same comment as for iron (III) chloride, without water, in 40% solution state)
  properties: wet mass 1 kg, dry mass 1 kg
- waste graphical paper: -3.88e-5 kg; name BP_amount_1; lognormal variance with pedigree 0.2106, pedigree (5,5,5,5,5)
  (same comment as for sewer grid, 5E9l/year, 110 km)
  production volume 656.496 kg; = BP_amount_1* RP_PV_1
    Calculated from the production volume of sludge from pulp and paper production, 25% water in proportion to the respective output amounts.
  property price 0 EUR2005; name BP_amount_1_price_EUR2005
  properties: carbon content, non-fossil 0.454955, dry mass 0.888 kg, wet mass 1 kg, water content 0.126126, heating value, net 14.12 MJ
  note on heating value, net: Value taken from the general comment of the treatment dataset.
- chemical, organic: 5.7e-8 kg; lognormal variance with pedigree 1.51, pedigree (1,1,5,1,1)
  (same comment as for iron (III) chloride, without water, in 40% solution state)
  properties: carbon content, fossil 0.628, heating value, net 19.03 MJ, dry mass 1 kg, wet mass 1 kg
  note on carbon content, fossil: This dataset is an unweighted average of 20 organic substances (listed in Tab 88.1, ecoinvent v2.2 report 8, part II), being part of the top100 chemicals included in this database. The C-content has also been calculated as an unweighted average of the C content of the substances composing this dataset.
- waste plastic, mixture: -3.88e-5 kg; name BP_amount_2; lognormal variance with pedigree 0.2106, pedigree (5,5,5,5,5)
  (same comment as for sewer grid, 5E9l/year, 110 km)
  production volume 656.496 kg; = BP_amount_2* RP_PV_1
    (same comment as for waste graphical paper)
  property price 0 EUR2005; name BP_amount_2_price_EUR2005
  properties: wet mass 1 kg, water content 0.180638, carbon content, fossil 0.747344, dry mass 0.847 kg, heating value, net 30.79 MJ
  note on carbon content, fossil: C content in 1 kg DM was calculated using data in Tab A.2, ecoinvent v2.2 report 13_I
- heat, central or small-scale, other than natural gas: 0.0046624 MJ; lognormal variance with pedigree 0.33, pedigree (5,5,5,5,5)
  (same comment as for sewer grid, 5E9l/year, 110 km)
  properties: heating value, net 1 MJ
- waste cement, hydrated: -0.00054 kg; name BP_amount_3; lognormal variance with pedigree 0.33, pedigree (1,1,5,1,1)
  (same comment as for iron (III) chloride, without water, in 40% solution state)
  production volume 9136.8 kg; = BP_amount_3* RP_PV_1
    (same comment as for waste graphical paper)
  property price 0 EUR2005; name BP_amount_3_price_EUR2005
  properties: wet mass 1 kg, dry mass 1 kg
- sanitary landfill facility: 5.56e-10 unit; lognormal variance with pedigree 0.04, pedigree (1,1,5,1,1)
  demands per kilogram waste. uncertainty is heeded in the module
  This exchange has an activity link directly to the producing activity because the product is primarily consumed in the same geographical area where it is produced.
- quicklime, milled, packed: 4.53e-7 kg; lognormal variance with pedigree 0.2, pedigree (1,1,5,1,1)
  (same comment as for iron (III) chloride, without water, in 40% solution state)
  properties: water content 0.010101, dry mass 0.99 kg, wet mass 1 kg
- process-specific burdens, sanitary landfill: 1 kg; lognormal variance with pedigree 0.04, pedigree (1,1,5,1,1)
  demands per kilogram waste. uncertainty is heeded in the module;activityLink introduced to establish a direct link to the corresponding regional supply of this product
- sodium hydroxide, without water, in 50% solution state: 2.5e-6 kg; lognormal variance with pedigree 0.2, pedigree (1,1,5,1,1)
  (same comment as for iron (III) chloride, without water, in 40% solution state)
  properties: dry mass 1 kg, wet mass 1 kg, heating value, net 3.03 MJ
- chemical, inorganic: 4.43e-8 kg; lognormal variance with pedigree 0.49, pedigree (1,1,5,1,1)
  (same comment as for iron (III) chloride, without water, in 40% solution state)
  properties: wet mass 1 kg, dry mass 1 kg, carbon content, fossil 0.003
  note on carbon content, fossil: This dataset is an unweighted average of 20 inorganic substances (listed in Tab 88.1, ecoinvent v2.2 report 8, part II), being part of the top100 chemicals included in this database. The C-content has also been calculated as an unweighted average of the C content of the substances composing this dataset.
- iron sulfate: 0.00192 kg; lognormal variance with pedigree 0.75, pedigree (5,5,5,5,5)
  (same comment as for sewer grid, 5E9l/year, 110 km)
  properties: dry mass 1 kg, wet mass 1 kg
- residual material landfill: 1.13e-12 unit; lognormal variance with pedigree 0.33, pedigree (1,1,5,1,1)
  (same comment as for iron (III) chloride, without water, in 40% solution state)
- process-specific burdens, slag landfill: 0.00459 kg; lognormal variance with pedigree 0.33, pedigree (1,1,5,1,1)
  (same comment as for process-specific burdens, residual material landfill)
- electricity, low voltage: 0.128 kWh; lognormal variance with pedigree 0.3, pedigree (5,5,5,5,5)
  (same comment as for sewer grid, 5E9l/year, 110 km)
- wastewater treatment facility, capacity 5E9l/year: 1.42e-11 unit; lognormal variance with pedigree 0.2106, pedigree (5,5,5,5,5)
  (same comment as for sewer grid, 5E9l/year, 110 km)
- municipal waste incineration facility: 3.11e-12 unit; lognormal variance with pedigree 0.21, pedigree (1,1,5,1,1)
  Burden from incineration of sludge from wastewater treatment of the short-term leachate (0-100a).
  Burden from incineration of sludge from wastewater treatment of the short-term leachate (0-100a).
- cement, unspecified: 0.000216 kg; lognormal variance with pedigree 0.33, pedigree (1,1,5,1,1)
  (same comment as for iron (III) chloride, without water, in 40% solution state)
  properties: dry mass 1 kg, wet mass 1 kg
- slag landfill: 8.15e-12 unit; lognormal variance with pedigree 0.33, pedigree (1,1,5,1,1)
  (same comment as for iron (III) chloride, without water, in 40% solution state)
- ammonia, anhydrous, liquid: 3.74e-5 kg; lognormal variance with pedigree 0.29, pedigree (1,1,5,1,1)
  (same comment as for iron (III) chloride, without water, in 40% solution state)
  properties: wet mass 1 kg, dry mass 1 kg
- aluminium sulfate, powder: 0.000519 kg; lognormal variance with pedigree 0.75, pedigree (5,5,5,5,5)
  (same comment as for sewer grid, 5E9l/year, 110 km)
  properties: dry mass 1 kg, wet mass 1 kg
- heat, district or industrial, natural gas: 0.0096984 MJ; lognormal variance with pedigree 0.16, pedigree (1,1,5,1,1)
  (same comment as for sewer grid, 5E9l/year, 110 km)
  properties: heating value, net 1 MJ

## Emissions to nature
- Sulfate [water, ground-, long-term]: 0.00694 kg; lognormal variance with pedigree 0.55, pedigree (1,1,5,1,1)
  Emissions from long-term leachate (>100a) directly from MSW landfill and indirectly via incineration of treatement sludge from leachate treatement. Uncertainty calculated depending on waste input and uncertainty of long-term transfer coefficents in landfill.
- Calcium [air, urban air close to ground]: 3.82e-7 kg; lognormal variance with pedigree 0.46, pedigree (1,1,5,1,1)
  Emissions from short-term leachate treatment and incineration of resulting sludge. Uncertainty calculated depending on waste input and uncertainty of transfer coefficents in landfill, wastewater treatment and incineration model.
- Chromium VI [water, surface water]: 4.57e-8 kg; lognormal variance with pedigree 1.68, pedigree (1,1,5,1,1)
  (same comment as for Calcium)
- Calcium, ion [water, surface water]: 0.00211 kg; lognormal variance with pedigree 0.43, pedigree (1,1,5,1,1)
  (same comment as for Calcium)
- NMVOC, non-methane volatile organic compounds, unspecified origin [air, urban air close to ground]: 7.03e-8 kg; lognormal variance with pedigree 0.59, pedigree (1,1,5,1,1)
  (same comment as for Calcium)
- Cobalt [water, surface water]: 4.68e-7 kg; lognormal variance with pedigree 1.48, pedigree (1,1,5,1,1)
  (same comment as for Calcium)
- Lead [air, non-urban air or from high stacks]: 5.53e-11 kg; lognormal variance with pedigree 2.64, pedigree (1,1,5,1,1)
  burden from direct release or incineration of landfill biogas. Uncertainty calculated from unertainty of the waste composition of this waste, uncertainty in waste decomposition and short-term leaching in sanitary landfill
- Arsenic, ion [water, surface water]: 1.39e-7 kg; lognormal variance with pedigree 1.67, pedigree (1,1,5,1,1)
  (same comment as for Calcium)
- Iron, ion [water, surface water]: 8.82e-5 kg; lognormal variance with pedigree 0.71, pedigree (1,1,5,1,1)
  (same comment as for Calcium)
- Dinitrogen monoxide [air, urban air close to ground]: 6.54e-5 kg; lognormal variance with pedigree 0.18, pedigree (1,1,5,1,1)
  (same comment as for Calcium)
- Cyanide [air, urban air close to ground]: 6.66e-7 kg; lognormal variance with pedigree 0.3, pedigree (1,1,5,1,1)
  (same comment as for Calcium)
- Phosphate [water, ground-, long-term]: 0.000272 kg; lognormal variance with pedigree 6.59, pedigree (1,1,5,1,1)
  (same comment as for Sulfate)
- Magnesium [air, urban air close to ground]: 1.68e-7 kg; lognormal variance with pedigree 0.6, pedigree (1,1,5,1,1)
  (same comment as for Calcium)
- Hydrogen fluoride [air, non-urban air or from high stacks]: 4.61e-7 kg; lognormal variance with pedigree 1.58, pedigree (1,1,5,1,1)
  (same comment as for Lead)
- Manganese [water, surface water]: 5.46e-5 kg; lognormal variance with pedigree 0.95, pedigree (1,1,5,1,1)
  (same comment as for Calcium)
- Arsenic [air, urban air close to ground]: 4.44e-11 kg; lognormal variance with pedigree 1.71, pedigree (1,1,5,1,1)
  (same comment as for Calcium)
- Manganese [air, urban air close to ground]: 2.88e-13 kg; lognormal variance with pedigree 1.09, pedigree (1,1,5,1,1)
  (same comment as for Calcium)
- Nickel [air, urban air close to ground]: 5.29e-15 kg; lognormal variance with pedigree 1.66, pedigree (1,1,5,1,1)
  (same comment as for Calcium)
- Copper, ion [water, surface water]: 6.45e-8 kg; lognormal variance with pedigree 1.54, pedigree (1,1,5,1,1)
  (same comment as for Calcium)
- Carbon dioxide, non-fossil [air, urban air close to ground]: 0.0079 kg; lognormal variance with pedigree 0.43, pedigree (1,1,5,1,1)
  (same comment as for Calcium)
- Molybdenum [air, urban air close to ground]: 1.76e-10 kg; lognormal variance with pedigree 1.67, pedigree (1,1,5,1,1)
  (same comment as for Calcium)
- Sodium, ion [water, surface water]: 0.0128 kg; lognormal variance with pedigree 0.38, pedigree (1,1,5,1,1)
  Emissions from short-term leachate treatment. Uncertainty calculated depending on waste input and uncertainty of transfer coefficents in landfill and wastewater treatment.
- Iron, ion [water, ground-, long-term]: 0.00225 kg; lognormal variance with pedigree 1.59, pedigree (1,1,5,1,1)
  (same comment as for Sulfate)
- Methane, non-fossil [air, urban air close to ground]: 1.55e-5 kg; lognormal variance with pedigree 0.47, pedigree (1,1,5,1,1)
  (same comment as for Calcium)
- Nitrate [water, ground-, long-term]: 2.66e-5 kg; lognormal variance with pedigree 0.52, pedigree (1,1,5,1,1)
  (same comment as for Sulfate)
- Cadmium [air, non-urban air or from high stacks]: 1.79e-10 kg; lognormal variance with pedigree 2.48, pedigree (1,1,5,1,1)
  (same comment as for Lead)
- Potassium, ion [water, ground-, long-term]: 0.00132 kg; lognormal variance with pedigree 0.6, pedigree (1,1,5,1,1)
  (same comment as for Sulfate)
- Sodium [air, non-urban air or from high stacks]: 3.21e-6 kg; lognormal variance with pedigree 1.21, pedigree (1,1,5,1,1)
  (same comment as for Lead)
- BOD5, Biological Oxygen Demand [water, surface water]: 0.000546 kg; lognormal variance with pedigree 0.43, pedigree (1,1,5,1,1)
  (same comment as for Calcium)
- Mercury [water, ground-, long-term]: 1.7e-7 kg; lognormal variance with pedigree 1.82, pedigree (1,1,5,1,1)
  (same comment as for Sulfate)
- Silicon [water, ground-, long-term]: 0.00037 kg; lognormal variance with pedigree 4.03, pedigree (1,1,5,1,1)
  (same comment as for Sulfate)
- Mercury [air, urban air close to ground]: 1.25e-14 kg; lognormal variance with pedigree 2.09, pedigree (1,1,5,1,1)
  (same comment as for Calcium)
- Manganese [water, ground-, long-term]: 9.35e-5 kg; lognormal variance with pedigree 0.66, pedigree (1,1,5,1,1)
  (same comment as for Sulfate)
- Lead [air, urban air close to ground]: 5.49e-12 kg; lognormal variance with pedigree 1.65, pedigree (1,1,5,1,1)
  (same comment as for Calcium)
- Cobalt [air, urban air close to ground]: 1.44e-14 kg; lognormal variance with pedigree 1.59, pedigree (1,1,5,1,1)
  (same comment as for Calcium)
- Calcium, ion [water, ground-, long-term]: 0.0278 kg; lognormal variance with pedigree 0.28, pedigree (1,1,5,1,1)
  (same comment as for Sulfate)
- Particulates, < 2.5 um [air, non-urban air or from high stacks]: 4.5e-6 kg; lognormal variance with pedigree 0.44, pedigree (1,1,5,1,1)
  (same comment as for Lead)
- Iron [air, urban air close to ground]: 5.66e-8 kg; lognormal variance with pedigree 0.62, pedigree (1,1,5,1,1)
  (same comment as for Calcium)
- Lead [water, ground-, long-term]: 4.68e-5 kg; lognormal variance with pedigree 1.13, pedigree (1,1,5,1,1)
  (same comment as for Sulfate)
- Ammonium, ion [water, surface water]: 0.0129 kg; lognormal variance with pedigree 0.21, pedigree (1,1,5,1,1)
  (same comment as for Calcium)
- Nitrite [water, ground-, long-term]: 5.89e-13 kg; lognormal variance with pedigree 2.22, pedigree (1,1,5,1,1)
  (same comment as for Sulfate)
- Chromium VI [water, ground-, long-term]: 6.19e-8 kg; lognormal variance with pedigree 8.57, pedigree (1,1,5,1,1)
  (same comment as for Sulfate)
- Zinc [air, urban air close to ground]: 4.22e-11 kg; lognormal variance with pedigree 1.28, pedigree (1,1,5,1,1)
  (same comment as for Calcium)
- Magnesium [water, ground-, long-term]: 0.00223 kg; lognormal variance with pedigree 0.51, pedigree (1,1,5,1,1)
  (same comment as for Sulfate)
- Phosphate [water, surface water]: 0.000437 kg; lognormal variance with pedigree 0.61, pedigree (1,1,5,1,1)
  (same comment as for Calcium)
- Molybdenum [water, surface water]: 1.06e-7 kg; lognormal variance with pedigree 1.63, pedigree (1,1,5,1,1)
  (same comment as for Calcium)
- Cadmium, ion [water, ground-, long-term]: 2.28e-7 kg; lognormal variance with pedigree 1.86, pedigree (1,1,5,1,1)
  (same comment as for Sulfate)
- Magnesium [air, non-urban air or from high stacks]: 3.11e-7 kg; lognormal variance with pedigree 1.51, pedigree (1,1,5,1,1)
  (same comment as for Lead)
- Methane, non-fossil [air, non-urban air or from high stacks]: 0.0363 kg; lognormal variance with pedigree 0.18, pedigree (1,1,5,1,1)
  (same comment as for Lead)
- NMVOC, non-methane volatile organic compounds, unspecified origin [air, non-urban air or from high stacks]: 2.54e-7 kg; lognormal variance with pedigree 0.18, pedigree (1,1,5,1,1)
  (same comment as for Lead)
- Magnesium [water, surface water]: 0.00112 kg; lognormal variance with pedigree 0.57, pedigree (1,1,5,1,1)
  (same comment as for Calcium)
- Sulfate [water, surface water]: 0.00395 kg; lognormal variance with pedigree 0.37, pedigree (1,1,5,1,1)
  (same comment as for Sodium, ion)
- Silicon [water, surface water]: 3.18e-5 kg; lognormal variance with pedigree 0.61, pedigree (1,1,5,1,1)
  (same comment as for Calcium)
- Tin [air, urban air close to ground]: 3.24e-11 kg; lognormal variance with pedigree 1.82, pedigree (1,1,5,1,1)
  (same comment as for Calcium)
- Nickel, ion [water, surface water]: 1.89e-7 kg; lognormal variance with pedigree 1.54, pedigree (1,1,5,1,1)
  (same comment as for Calcium)
- Zinc, ion [water, surface water]: 1.16e-6 kg; lognormal variance with pedigree 1.21, pedigree (1,1,5,1,1)
  (same comment as for Calcium)
- Copper [air, urban air close to ground]: 1.36e-12 kg; lognormal variance with pedigree 1.61, pedigree (1,1,5,1,1)
  (same comment as for Calcium)
- Calcium [air, non-urban air or from high stacks]: 5.84e-7 kg; lognormal variance with pedigree 1.46, pedigree (1,1,5,1,1)
  (same comment as for Lead)
- DOC, Dissolved Organic Carbon [water, surface water]: 0.000422 kg; lognormal variance with pedigree 0.43, pedigree (1,1,5,1,1)
  (same comment as for Calcium)
- Hydrogen sulfide [water, ground-, long-term]: 0.000181 kg; lognormal variance with pedigree 0.55, pedigree (1,1,5,1,1)
  (same comment as for Sulfate)
- Nitrite [water, surface water]: 0.00027 kg; lognormal variance with pedigree 0.3, pedigree (1,1,5,1,1)
  (same comment as for Calcium)
- Chromium [air, non-urban air or from high stacks]: 2.18e-11 kg; lognormal variance with pedigree 2.77, pedigree (1,1,5,1,1)
  (same comment as for Lead)
- Sulfur dioxide [air, non-urban air or from high stacks]: 0.000264 kg; lognormal variance with pedigree 0.75, pedigree (1,1,5,1,1)
  (same comment as for Lead)
- Nickel [air, non-urban air or from high stacks]: 7.78e-11 kg; lognormal variance with pedigree 2.6, pedigree (1,1,5,1,1)
  (same comment as for Lead)
- Tin, ion [water, surface water]: 1.75e-8 kg; lognormal variance with pedigree 1.78, pedigree (1,1,5,1,1)
  (same comment as for Calcium)
- Chromium [air, urban air close to ground]: 3.18e-15 kg; lognormal variance with pedigree 1.8, pedigree (1,1,5,1,1)
  (same comment as for Calcium)
- Aluminium [air, non-urban air or from high stacks]: 4.39e-8 kg; lognormal variance with pedigree 1.77, pedigree (1,1,5,1,1)
  (same comment as for Lead)
- Tin [air, non-urban air or from high stacks]: 1.05e-11 kg; lognormal variance with pedigree 2.86, pedigree (1,1,5,1,1)
  (same comment as for Lead)
- Iron [air, non-urban air or from high stacks]: 4.32e-8 kg; lognormal variance with pedigree 1.79, pedigree (1,1,5,1,1)
  (same comment as for Lead)
- Arsenic [air, non-urban air or from high stacks]: 2.21e-9 kg; lognormal variance with pedigree 2.16, pedigree (1,1,5,1,1)
  (same comment as for Lead)
- Mercury [air, non-urban air or from high stacks]: 2.96e-9 kg; lognormal variance with pedigree 2.14, pedigree (1,1,5,1,1)
  (same comment as for Lead)
- Potassium, ion [water, surface water]: 0.00103 kg; lognormal variance with pedigree 0.61, pedigree (1,1,5,1,1)
  (same comment as for Sodium, ion)
- DOC, Dissolved Organic Carbon [water, ground-, long-term]: 0.0162 kg; lognormal variance with pedigree 0.77, pedigree (1,1,5,1,1)
  (same comment as for Sulfate)
- Sodium, ion [water, ground-, long-term]: 1.28e-11 kg; lognormal variance with pedigree 2.3, pedigree (1,1,5,1,1)
  (same comment as for Sulfate)
- Aluminium [water, ground-, long-term]: 0.00586 kg; lognormal variance with pedigree 0.45, pedigree (1,1,5,1,1)
  (same comment as for Sulfate)
- Molybdenum [air, non-urban air or from high stacks]: 4.47e-11 kg; lognormal variance with pedigree 2.67, pedigree (1,1,5,1,1)
  (same comment as for Lead)
- Chloride [water, surface water]: 0.00172 kg; lognormal variance with pedigree 0.63, pedigree (1,1,5,1,1)
  (same comment as for Sodium, ion)
- Silicon [air, urban air close to ground]: 1.16e-6 kg; lognormal variance with pedigree 0.62, pedigree (1,1,5,1,1)
  (same comment as for Calcium)
- Nitrogen [water, surface water]: 0.000349 kg; lognormal variance with pedigree 0.19, pedigree (1,1,5,1,1)
  (same comment as for Calcium)
- Chloride [water, ground-, long-term]: 0 kg; pedigree (1,1,1,1,1)
  (same comment as for Sulfate)
- TOC, Total Organic Carbon [water, surface water]: 0.000439 kg; lognormal variance with pedigree 0.43, pedigree (1,1,5,1,1)
  (same comment as for Calcium)
- Cadmium [air, urban air close to ground]: 7.36e-13 kg; lognormal variance with pedigree 1.96, pedigree (1,1,5,1,1)
  (same comment as for Calcium)
- Cadmium, ion [water, surface water]: 1.37e-8 kg; lognormal variance with pedigree 1.9, pedigree (1,1,5,1,1)
  (same comment as for Calcium)
- TOC, Total Organic Carbon [water, ground-, long-term]: 0.0162 kg; lognormal variance with pedigree 0.77, pedigree (1,1,5,1,1)
  (same comment as for Sulfate)
- Nitrate [water, surface water]: 0.0469 kg; lognormal variance with pedigree 0.18, pedigree (1,1,5,1,1)
  (same comment as for Calcium)
- Aluminium [air, urban air close to ground]: 3.86e-7 kg; lognormal variance with pedigree 0.49, pedigree (1,1,5,1,1)
  (same comment as for Calcium)
- Mercury [water, surface water]: 2.34e-9 kg; lognormal variance with pedigree 2.04, pedigree (1,1,5,1,1)
  (same comment as for Calcium)
- Carbon monoxide, non-fossil [air, non-urban air or from high stacks]: 1.34e-5 kg; lognormal variance with pedigree 0.78, pedigree (1,1,5,1,1)
  (same comment as for Lead)
- Nitrogen oxides [air, non-urban air or from high stacks]: 6.85e-6 kg; lognormal variance with pedigree 0.5, pedigree (1,1,5,1,1)
  (same comment as for Lead)
- Aluminium [water, surface water]: 1.05e-5 kg; lognormal variance with pedigree 0.72, pedigree (1,1,5,1,1)
  (same comment as for Calcium)
- Potassium [air, non-urban air or from high stacks]: 2.57e-7 kg; lognormal variance with pedigree 1.53, pedigree (1,1,5,1,1)
  (same comment as for Lead)
- Phosphorus [air, urban air close to ground]: 2.57e-7 kg; lognormal variance with pedigree 0.65, pedigree (1,1,5,1,1)
  (same comment as for Calcium)
- Manganese [air, non-urban air or from high stacks]: 2.69e-8 kg; lognormal variance with pedigree 1.83, pedigree (1,1,5,1,1)
  (same comment as for Lead)
- Carbon monoxide, non-fossil [air, urban air close to ground]: 7.48e-6 kg; lognormal variance with pedigree 0.32, pedigree (1,1,5,1,1)
  (same comment as for Calcium)
- Ammonium, ion [water, ground-, long-term]: 1.08e-11 kg; lognormal variance with pedigree 2.22, pedigree (1,1,5,1,1)
  (same comment as for Sulfate)
- Nickel, ion [water, ground-, long-term]: 8.73e-6 kg; lognormal variance with pedigree 1.3, pedigree (1,1,5,1,1)
  (same comment as for Sulfate)
- Zinc, ion [water, ground-, long-term]: 0.000106 kg; lognormal variance with pedigree 0.97, pedigree (1,1,5,1,1)
  (same comment as for Sulfate)
- Carbon dioxide, non-fossil [air, non-urban air or from high stacks]: 0.237 kg; lognormal variance with pedigree 0.13, pedigree (1,1,5,1,1)
  (same comment as for Lead)
- Molybdenum [water, ground-, long-term]: 1.12e-6 kg; lognormal variance with pedigree 1.6, pedigree (1,1,5,1,1)
  (same comment as for Sulfate)
- Nitrogen oxides [air, urban air close to ground]: 0.000232 kg; lognormal variance with pedigree 0.21, pedigree (1,1,5,1,1)
  (same comment as for Calcium)
- Fluoride [water, surface water]: 8.49e-8 kg; lognormal variance with pedigree 1.72, pedigree (1,1,5,1,1)
  (same comment as for Sodium, ion)
- Fluoride [water, ground-, long-term]: 1.4e-6 kg; lognormal variance with pedigree 1.53, pedigree (1,1,5,1,1)
  (same comment as for Sulfate)
- BOD5, Biological Oxygen Demand [water, ground-, long-term]: 0.00419 kg; lognormal variance with pedigree 0.77, pedigree (1,1,5,1,1)
  (same comment as for Sulfate)
- Ammonia [air, urban air close to ground]: 2.37e-5 kg; lognormal variance with pedigree 0.22, pedigree (1,1,5,1,1)
  (same comment as for Calcium)
- Copper, ion [water, ground-, long-term]: 8.45e-5 kg; lognormal variance with pedigree 1.02, pedigree (1,1,5,1,1)
  (same comment as for Sulfate)
- Zinc [air, non-urban air or from high stacks]: 8.31e-10 kg; lognormal variance with pedigree 2.28, pedigree (1,1,5,1,1)
  (same comment as for Lead)
- Arsenic, ion [water, ground-, long-term]: 1.32e-6 kg; lognormal variance with pedigree 1.54, pedigree (1,1,5,1,1)
  (same comment as for Sulfate)
- Chromium, ion [water, surface water]: 1.37e-10 kg; lognormal variance with pedigree 1.72, pedigree (1,1,5,1,1)
  (same comment as for Calcium)
- Tin, ion [water, ground-, long-term]: 1.18e-5 kg; lognormal variance with pedigree 1.28, pedigree (1,1,5,1,1)
  (same comment as for Sulfate)
- COD, Chemical Oxygen Demand [water, ground-, long-term]: 0.0177 kg; lognormal variance with pedigree 0.77, pedigree (1,1,5,1,1)
  (same comment as for Sulfate)
- Copper [air, non-urban air or from high stacks]: 7.1e-11 kg; lognormal variance with pedigree 2.6, pedigree (1,1,5,1,1)
  (same comment as for Lead)
- Lead [water, surface water]: 1.82e-8 kg; lognormal variance with pedigree 1.6, pedigree (1,1,5,1,1)
  (same comment as for Calcium)
- Cobalt [water, ground-, long-term]: 4.25e-6 kg; lognormal variance with pedigree 1.27, pedigree (1,1,5,1,1)
  (same comment as for Sulfate)
- Hydrogen chloride [air, non-urban air or from high stacks]: 3.67e-10 kg; lognormal variance with pedigree 2.29, pedigree (1,1,5,1,1)
  (same comment as for Lead)
- COD, Chemical Oxygen Demand [water, surface water]: 0.00174 kg; lognormal variance with pedigree 0.43, pedigree (1,1,5,1,1)
  (same comment as for Calcium)
- Cobalt [air, non-urban air or from high stacks]: 2.3e-10 kg; lognormal variance with pedigree 2.46, pedigree (1,1,5,1,1)
  (same comment as for Lead)
- Nitrogen, organic bound [water, ground-, long-term]: 1.77e-11 kg; lognormal variance with pedigree 2.22, pedigree (1,1,5,1,1)
  (same comment as for Sulfate)
- Silicon [air, non-urban air or from high stacks]: 1.32e-7 kg; lognormal variance with pedigree 1.63, pedigree (1,1,5,1,1)
  (same comment as for Lead)

## Sampling procedure
Landfill model based on observed leachate concentrations in literature. Extrapolated to 60'000 years heeding chemical characteristics. Initial waste composition from various literature sources.

## Extrapolations
This dataset has been extrapolated from year 2000 to the year of the calculation (2021). The uncertainty has been adjusted accordingly.

## Review by Niels Jungbluth 2003-08-30
Passed. Calculation for standard deviation 95 of, i.e., infrastructure,
land occupation, transport services or other services can differ from
standard Pedigree approach used in this project and figures obtained by
this procedure.
