# soybean production

Dataset: EcoSpold 2, unit process
Geography: US
Time period: 2004-01-01 to 2021-12-30
Technology level: current
Classification: ISIC rev.4 ecoinvent: 0111:Growing of cereals (except rice), leguminous crops and oil seeds
Classification: EcoSpold01Categories: agricultural production/plant production
Tags: ConvertedDataset
Scenario: Business-as-Usual
System model: Allocation, cut-off by classification
Share of production covered: 100 %
Generated by: Anne Greig
Published in: Omni Tech International 2010
Database: ecoinvent
isCopyrightProtected: true
accessRestrictedTo: 1

## General comment
This dataset represents the cultivation of soybeans in the US. Data are from publicly-available literature. Transportation is modeled using standard, average distances. The functional unit is 1000 kg soybeans. Carbon content: 0.426 kg/kg fresh mass. Average yield: 1120 kg/acre, based on average of 2004-2007 yields (from USDA NASS database). N2O emissions are based on calculations from 2006 IPCC Guidelines for National Greenhouse Gas Inventories and confirmed by individuals at USDA Agricultural Research Service. The emission of nitrate to water is calculated with a nitrogen loss factor of 30%.
[This dataset was already contained in the ecoinvent database version 2. It was not individually updated during the transfer to ecoinvent version 3. Life Cycle Impact Assessment results may still have changed, as they are affected by changes in the supply chain, i.e. in other datasets. This dataset was generated following the ecoinvent quality guidelines for version 2. It may have been subject to central changes described in the ecoinvent version 3 change report (http://www.ecoinvent.org/database/ecoinvent-version-3/reports-of-changes/), and the results of the central updates were reviewed extensively. The changes added e.g. consistent water flows and other information throughout the database. The documentation of this dataset can be found in the ecoinvent reports of version 2, which are still available via the ecoinvent website. The change report linked above covers all central changes that were made during the conversion process.]
[This dataset is meant to replace the following datasets:
- soybean production, US, 2004 - 2006]
This activity was adapted to include the country specific average land use change (LUC) emissions according 2nd edition of the Quantis-modified tool developed by Blonk Consultants 'WFLDB-adapted-Blonk 2014 direct-land-use-change-assessment-tool_2015-05-18a.xlsx', tab. 'Country known & land use unknown'. The size of the emission depends on (i) the relative crop expansion in the country during the last 20 years and (ii) the corresponding, country specific land transformations. The current results are based on the average FAOSTAT data (harvested area) of 2009-2011 and 1989-1991. The weighted average is used which takes into account relative difference in crop expansion into primary forest, secondary forest, grassland, perennial and annual land.

## Included activities start
From sowing of seeds.

## Included activities end
Activities include agricultural operations to sow, till, fertilize, apply pesticides, and harvest. The activity ends with drying of soybeans to 12% moisture content.

## Geography
The inventory is modeled as reflecting average US data.

## Technology
Cultivation of soybeans

## Time period
Data are based on average soybean yields and fertilizer and pesticide use from 2004 through 2007.

## Parameters
- LUC_crop_specific: 1 dimensionless
  This parameter allows to switch between a "crop specific" and a "country specific" approach when calculating the LUC of a crop. By default, the chosen approach is "crop specific", so the value of the parameter is 1. If you want to apply a "country specific" approach, turn the parameter to 0.
- fraction, process water, to air: 0.15 dimensionless; name fraction_PW_to_air; lognormal variance with pedigree 0.092025, pedigree (4,4,3,2,4)
  Literature value. In case when no industry/process specific data are available, default evaporation fraction value is used. This value is 15% and is based on literature (Statistics Canada, 2007 & Shaffer, K.H., 2008, Consumptive water use in the Great Lakes Basin, USGS & Shiklomanov, 2003, World Water Resources at the Beginning of the 21st Century) and has been approved by an expert.

## Reference product
- soybean: 1 kg; source Omni Tech International  2010; CPC 01412: Soya beans, other; By-product classification allocatable product
  EcoSpold01Location=US
  Soybean produced on the field.
  production volume 9.06025e10 kg
    Literature value (FAOSTAT, accessed 20150605). Production in the year 2010.
  property price 0.239 EUR2005
    Calculated value based on data from United Nations Commodity Trade Statistics Database (comtrade.un.org). UN comtrade category: 1201 Soya beans. Using exchange rate of 1EURO = 1.209 USD. Average of price of import into 5 main markets (EU, US, JP, IN and CN).
  property carbon content, non-fossil 0.524508
    Composition data obtained from Soybeans, green, raw, in (http://www.nal.usda.gov/fnic/foodcomp/search/). First, composition data were refered to 1 kg dry mass. Then, C-contents were calculated considering a C-content/dry mass of 46% in carbohydrates (including fibres), 53% in proteins and 75% in fats. All data from "Evolutionary and Biochemical Aspects", A.D. Kay and T. Vrede (in Global Ecology, 2010, Elsevier B.V., S.E. Jørgensen Ed.).
  property carbon content 0.524508
    carbon content on a dry matter basis (reserved; not for manual entry)
  properties: water content 0.123596, carbon content, fossil 0, dry mass 0.89 kg, wet mass 1 kg, water in wet mass 0.11 kg, carbon allocation 0.466812 kg

## Inputs from technosphere
- electricity, low voltage: 0.025 kWh; source Omni Tech International  2010; lognormal variance with pedigree 0.0413, pedigree (2,2,5,1,1)
  Literature data
- inorganic nitrogen fertiliser, as N: 0.0016 kg; source Omni Tech International  2010; lognormal variance with pedigree 0.0413, pedigree (2,2,5,1,1)
  Literature data
  properties: dry mass 1 kg, wet mass 1 kg
- pesticide, unspecified: 0.00052 kg; source Omni Tech International  2010; lognormal variance with pedigree 0.0413, pedigree (2,2,5,1,1)
  Literature data
  properties: carbon content, fossil 0.486978, dry mass 1 kg, wet mass 1 kg
  note on carbon content, fossil: Mean of C content in all pesticides whose formula has been documented in Sutter 2010
- packaging, for pesticides: 0.00104 kg; lognormal variance with pedigree 0.0912, pedigree (4,3,5,5,4)
  Total amount of active substance/s of pesticides needed for the production of soybean is calculated to be circa 5.20E-01 kg. Pesticide/s used in this dataset is/are: 'pesticide, unspecified'. The total amount of active substance/s is doubled in order to account for the packaging of the dilluted product of pesticide/s that is/are applied. Therefore, 1.04E+00 kg of packaging for pesticides is justified with this exchange.
  properties: dry mass 1 kg, price 0.0642 EUR2005, carbon content, fossil 0.85714, wet mass 1 kg, heating value, net 25.97 MJ
- combine harvesting: 0.00032 ha; source Omni Tech International  2010; lognormal variance with pedigree 0.0413, pedigree (2,2,5,1,1)
  EcoSpold01Location=CH
  Data for the soybean agriculture energy pertaining to this process.
- packaging, for fertilisers: 0.2204 kg; lognormal variance with pedigree 0.0912, pedigree (4,3,5,5,4)
  Total amount of active substance/s of fertilisers needed for the production of 'soybean' is calculated to be circa 1.10E+02 kg. Fertiliser/s used in this dataset is/are: 'lime', 'nitrogen fertiliser, as N', 'phosphate fertiliser, as P2O5', 'potassium chloride, as K2O'. The total amount of active substance/s is doubled in order to account for the packaging of the dilluted product of fertiliser/s that is/are applied. Therefore, 2.20E+02 kg of packaging for fertilisers is justified with this exchange.
  properties: heating value, net 25.01 MJ, wet mass 1 kg, carbon content, fossil 0.825301, price 0.0642 EUR2005, dry mass 1 kg
  note on carbon content, fossil: Considering a chemical formula (C2H4)n for polyethylene, carbon content-fossil is calculated to be 0.856286 kg of Carbon per kg of dry mass.
- potassium chloride: 0.0147209 kg; source Omni Tech International  2010; lognormal variance with pedigree 0.0413, pedigree (2,2,5,1,1)
  EcoSpold01Location=RER
  The exchange has been updated from 'potassium chloride, as K2O' into 'potassium chloride' and therefore its amount has been scaled (multiplied) from 9.3 kg by 1.5829 kg of 'potassium chloride' per kg of 'potassium chloride, as K2O'. Original comment of the exchange is: Literature data
  properties: wet mass 1 kg, dry mass 1 kg
- land use change, annual crop: 8.607e-5 ha; = (8.607E-2*LUC_crop_specific+0.0000*(1-LUC_crop_specific))
  Calculated value. Land use change (LUC) combines land transformation areas calculated with the adapted 'Direct Land Use Change Assessment Tool' version 2014 developed by Blonk Consultants and the carbon losses from soil organic carbon (SOC) and vegetation (VEG) as calculated in ecoinvent v3. See 'WFLDB-Guidelines.pdf', available at https://ecoquery.ecoinvent.org/File/Reports.
- heat, central or small-scale, natural gas: 0.0802 MJ; source Omni Tech International  2010; lognormal variance with pedigree 0.0413, pedigree (2,2,5,1,1)
  Literature data. Used to remove some of the moisture content.
  properties: heating value, net 1 MJ
- tillage, harrowing, by spring tine harrow: 0.00032 ha; source Omni Tech International  2010; lognormal variance with pedigree 0.0413, pedigree (2,2,5,1,1)
  EcoSpold01Location=CH
  Data for the soybean agriculture energy pertaining to this process.
- lime: 0.0943 kg; source Omni Tech International  2010; lognormal variance with pedigree 0.0413, pedigree (2,2,5,1,1)
  Literature data
  EcoSpold01Location=CH
  properties: wet mass 1 kg, dry mass 1 kg, carbon content, fossil 0.120005
- fertilising, by broadcaster: 0.00032 ha; source Omni Tech International  2010; lognormal variance with pedigree 0.0413, pedigree (2,2,5,1,1)
  EcoSpold01Location=CH
  Data for the soybean agriculture energy pertaining to this process.
- sowing: 0.00032 ha; source Omni Tech International  2010; lognormal variance with pedigree 0.0413, pedigree (2,2,5,1,1)
  Data for the soybean agriculture energy pertaining to this process.
  EcoSpold01Location=CH
- application of plant protection product, by field sprayer: 0.00032 ha; source Omni Tech International  2010; lognormal variance with pedigree 0.0413, pedigree (2,2,5,1,1)
  Data for the soybean agriculture energy pertaining to this process.
- inorganic phosphorus fertiliser, as P2O5: 0.005 kg; source Omni Tech International  2010; lognormal variance with pedigree 0.0413, pedigree (2,2,5,1,1)
  EcoSpold01Location=RER
  Literature data
  properties: wet mass 1 kg, dry mass 1 kg

## Inputs from nature
- Carbon dioxide, in air [natural resource, in air]: 1.54147 kg; = 44/12*(80%*(1-10%)*37%+20%*77%)*1000; source United States Department of Agriculture 2011; lognormal variance with pedigree 0.052, pedigree (3,1,5,1,1)
  Calculated value based on meal (80% of total mass) with 10% moisture content (C=37%) and oil (20% of total mass) (C=77%).
- Water, river [natural resource, in water]: 0.01586 m3; name water_river_input; source Omni Tech International  2010; lognormal variance with pedigree 0.0481, pedigree (3,2,5,1,1)
  Literature data
- Water, well, in ground [natural resource, in water]: 0.03473 m3; name water_well_in_ground_input; source Omni Tech International  2010; lognormal variance with pedigree 0.0481, pedigree (3,2,5,1,1)
  Literature data
- Occupation, annual crop [natural resource, land]: 3.27066 m2*year; = 3610*(1-0.094); source Omni Tech International  2010; lognormal variance with pedigree 0.0487, pedigree (4,2,5,1,1)
  Calculated based on other land occupation categories.
  1120 kg/acre is the yield.
  9.4% of the soybean is grown on irrigated land (2012 NASS census data)
- Occupation, annual crop, irrigated [natural resource, land]: 0.33934 m2*year; = 3610*0.094; source Omni Tech International  2010; lognormal variance with pedigree 0.0501, pedigree (4,2,5,1,1)
  (same comment as for Occupation, annual crop)
- Energy, gross calorific value, in biomass [natural resource, biotic]: 20.5 MJ; lognormal variance with pedigree 0.0515682, pedigree (4,3,5,1,1)

## Emissions to nature
- Acephate [air, non-urban air or from high stacks]: 5.151e-7 kg; source National Renewable Energy Laboratory 2010; lognormal variance with pedigree 0.0581, pedigree (4,2,5,1,1)
  Calculated from the agrochemical application
- Flumioxazin [air, non-urban air or from high stacks]: 2.103e-7 kg; source National Renewable Energy Laboratory 2010; lognormal variance with pedigree 0.0581, pedigree (4,2,5,1,1)
  Calculated from the agrochemical application
- Water [air, unspecified]: 0.0075885 m3; name water_to_air_unspecified; = water_river_input*fraction_PW_to_air+water_well_in_ground_input*fraction_PW_to_air; lognormal variance with pedigree 0.130025, pedigree (4,4,5,2,4)
  Calculated value based on literature values and expert opinion. See comments in the parametres' comment field.
  property fraction, origin: salt water 0; name fraction_origin_salt_water
  property fraction, origin: unspecified 0; name fraction_origin_unspecified
  property fraction, origin: fresh water 1; name fraction_origin_fresh_water
- Flumioxazin [soil, agricultural]: 9.014e-9 kg; source National Renewable Energy Laboratory 2010; lognormal variance with pedigree 0.0811, pedigree (4,2,5,1,1)
  Calculated from the agrochemical application
- Dicamba [soil, agricultural]: 1.697e-9 kg; source National Renewable Energy Laboratory 2010; lognormal variance with pedigree 0.0811, pedigree (4,2,5,1,1)
  Calculated from the agrochemical application
- Thiodicarb [air, non-urban air or from high stacks]: 2.531e-8 kg; source National Renewable Energy Laboratory 2010; lognormal variance with pedigree 0.0581, pedigree (4,2,5,1,1)
  Calculated from the agrochemical application
- Esfenvalerate [soil, agricultural]: 3.16e-9 kg; source National Renewable Energy Laboratory 2010; lognormal variance with pedigree 0.0811, pedigree (4,2,5,1,1)
  Calculated from the agrochemical application
- Chlorimuron-ethyl [air, non-urban air or from high stacks]: 1.181e-7 kg; source National Renewable Energy Laboratory 2010; lognormal variance with pedigree 0.0581, pedigree (4,2,5,1,1)
  Calculated from the agrochemical application
- Metolachlor [soil, agricultural]: 6.992e-8 kg; source National Renewable Energy Laboratory 2010; lognormal variance with pedigree 0.0811, pedigree (4,2,5,1,1)
  Calculated from the agrochemical application
- Pyraclostrobin [air, non-urban air or from high stacks]: 1.804e-7 kg; source National Renewable Energy Laboratory 2010; lognormal variance with pedigree 0.0581, pedigree (4,2,5,1,1)
  Calculated from the agrochemical application
- Thifensulfuron-methyl [soil, agricultural]: 3.044e-10 kg; source National Renewable Energy Laboratory 2010; lognormal variance with pedigree 0.0811, pedigree (4,2,5,1,1)
  Calculated from the agrochemical application
- Bentazone [soil, agricultural]: 9.271e-9 kg; source National Renewable Energy Laboratory 2010; lognormal variance with pedigree 0.0811, pedigree (4,2,5,1,1)
  Calculated from the agrochemical application
- Metribuzin [soil, agricultural]: 2.775e-8 kg; source National Renewable Energy Laboratory 2010; lognormal variance with pedigree 0.0811, pedigree (4,2,5,1,1)
  Calculated from the agrochemical application
- Imazamox [soil, agricultural]: 1.333e-9 kg; source National Renewable Energy Laboratory 2010; lognormal variance with pedigree 0.0811, pedigree (4,2,5,1,1)
  Calculated from the agrochemical application
- Trifloxystrobin [soil, agricultural]: 1.947e-10 kg; source National Renewable Energy Laboratory 2010; lognormal variance with pedigree 0.0811, pedigree (4,2,5,1,1)
  Calculated from the agrochemical application
- Cloransulam-methyl [air, non-urban air or from high stacks]: 6.151e-8 kg; source National Renewable Energy Laboratory 2010; lognormal variance with pedigree 0.0581, pedigree (4,2,5,1,1)
  Calculated from the agrochemical application
- Particulates, > 2.5 um, and < 10um [air, non-urban air or from high stacks]: 1.2e-6 kg; source National Renewable Energy Laboratory 2010; lognormal variance with pedigree 0.2087, pedigree (4,3,5,3,4)
  Calculated from the field applications
- Lactofen [air, non-urban air or from high stacks]: 9.985e-8 kg; source National Renewable Energy Laboratory 2010; lognormal variance with pedigree 0.0581, pedigree (4,2,5,1,1)
  Calculated from the agrochemical application
- Diflubenzuron [soil, agricultural]: 2.782e-10 kg; source National Renewable Energy Laboratory 2010; lognormal variance with pedigree 0.0811, pedigree (4,2,5,1,1)
  Calculated from the agrochemical application
- Suspended solids, unspecified [water, unspecified]: 2.812 kg; source National Renewable Energy Laboratory 2010; lognormal variance with pedigree 0.1307, pedigree (5,3,5,3,1)
  Calculated value based on agricultural inputs
- Bentazone [air, non-urban air or from high stacks]: 2.163e-7 kg; source National Renewable Energy Laboratory 2010; lognormal variance with pedigree 0.0581, pedigree (4,2,5,1,1)
  Calculated from the agrochemical application
- Esfenvalerate [air, non-urban air or from high stacks]: 7.374e-8 kg; source National Renewable Energy Laboratory 2010; lognormal variance with pedigree 0.0581, pedigree (4,2,5,1,1)
  Calculated from the agrochemical application
- Glyphosate [soil, agricultural]: 6.698e-6 kg; source National Renewable Energy Laboratory 2010; lognormal variance with pedigree 0.0811, pedigree (4,2,5,1,1)
  Calculated from the agrochemical application
- Permethrin [air, non-urban air or from high stacks]: 6.522e-8 kg; source National Renewable Energy Laboratory 2010; lognormal variance with pedigree 0.0581, pedigree (4,2,5,1,1)
  Calculated from the agrochemical application
- Pendimethalin [air, non-urban air or from high stacks]: 4.389e-6 kg; source National Renewable Energy Laboratory 2010; lognormal variance with pedigree 0.0581, pedigree (4,2,5,1,1)
  Calculated from the agrochemical application
- Fenoxaprop [air, non-urban air or from high stacks]: 9.652e-8 kg; source National Renewable Energy Laboratory 2010; lognormal variance with pedigree 0.0581, pedigree (4,2,5,1,1)
  Calculated from the agrochemical application
- Alachlor [soil, agricultural]: 2.144e-8 kg; source National Renewable Energy Laboratory 2010; lognormal variance with pedigree 0.0811, pedigree (4,2,5,1,1)
  Calculated from the agrochemical application
- Alachlor [air, non-urban air or from high stacks]: 5.004e-7 kg; source National Renewable Energy Laboratory 2010; lognormal variance with pedigree 0.0581, pedigree (4,2,5,1,1)
  Calculated from the agrochemical application
- Beta-cyfluthrin [air, non-urban air or from high stacks]: 1.233e-8 kg; source National Renewable Energy Laboratory 2010; lognormal variance with pedigree 0.0581, pedigree (4,2,5,1,1)
  Calculated from the agrochemical application
- Zeta-cypermethrin [soil, agricultural]: 1.282e-9 kg; source National Renewable Energy Laboratory 2010; lognormal variance with pedigree 0.0811, pedigree (4,2,5,1,1)
  Calculated from the agrochemical application
- Chlorimuron-ethyl [soil, agricultural]: 5.062e-9 kg; source National Renewable Energy Laboratory 2010; lognormal variance with pedigree 0.0811, pedigree (4,2,5,1,1)
  Calculated from the agrochemical application
- Flumetsulam [soil, agricultural]: 5.208e-10 kg; source National Renewable Energy Laboratory 2010; lognormal variance with pedigree 0.0811, pedigree (4,2,5,1,1)
  Calculated from the agrochemical application
- Nitrate [water, ground-]: 0.00088 kg; source National Renewable Energy Laboratory 2010; lognormal variance with pedigree 0.0881, pedigree (4,2,5,1,1)
  Calculated with standard method
- Atrazine [air, non-urban air or from high stacks]: 3.958e-7 kg; source National Renewable Energy Laboratory 2010; lognormal variance with pedigree 0.0581, pedigree (4,2,5,1,1)
  Calculated from the agrochemical application
- Carfentrazone-ethyl [air, non-urban air or from high stacks]: 6.491e-9 kg; source National Renewable Energy Laboratory 2010; lognormal variance with pedigree 0.0581, pedigree (4,2,5,1,1)
  Calculated from the agrochemical application
- Phosphorus [water, surface water]: 2.825e-5 kg; source National Renewable Energy Laboratory 2010; lognormal variance with pedigree 0.0881, pedigree (4,2,5,1,1)
  Calculated from fertilizer application
- Tribenuron-methyl [soil, agricultural]: 1.722e-10 kg; source National Renewable Energy Laboratory 2010; lognormal variance with pedigree 0.0811, pedigree (4,2,5,1,1)
  Calculated from the agrochemical application
- Sethoxydim [soil, agricultural]: 2.233e-9 kg; source National Renewable Energy Laboratory 2010; lognormal variance with pedigree 0.0811, pedigree (4,2,5,1,1)
  Calculated from the agrochemical application
- Nitrogen oxides [air, non-urban air or from high stacks]: 0.0002615 kg; source National Renewable Energy Laboratory 2010; lognormal variance with pedigree 0.0781, pedigree (4,2,5,1,1)
  Calculated with standard method
- Cyhalothrin, gamma- [air, non-urban air or from high stacks]: 1.415e-7 kg; source National Renewable Energy Laboratory 2010; lognormal variance with pedigree 0.0581, pedigree (4,2,5,1,1)
  Calculated from the agrochemical application
- Sulfentrazone [soil, agricultural]: 2.136e-8 kg; source National Renewable Energy Laboratory 2010; lognormal variance with pedigree 0.0811, pedigree (4,2,5,1,1)
  Calculated from the agrochemical application
- Acifluorfen [soil, agricultural]: 3.031e-9 kg; source National Renewable Energy Laboratory 2010; lognormal variance with pedigree 0.0811, pedigree (4,2,5,1,1)
  Calculated from the agrochemical application
- Flumiclorac-pentyl [air, non-urban air or from high stacks]: 2.079e-8 kg; source National Renewable Energy Laboratory 2010; lognormal variance with pedigree 0.0581, pedigree (4,2,5,1,1)
  Calculated from the agrochemical application
- Chlorpyrifos [soil, agricultural]: 1.01e-7 kg; source National Renewable Energy Laboratory 2010; lognormal variance with pedigree 0.0811, pedigree (4,2,5,1,1)
  Calculated from the agrochemical application
- Methyl parathion [soil, agricultural]: 3.427e-9 kg; source National Renewable Energy Laboratory 2010; lognormal variance with pedigree 0.0811, pedigree (4,2,5,1,1)
  Calculated from the agrochemical application
- Propiconazole [soil, agricultural]: 3.283e-9 kg; source National Renewable Energy Laboratory 2010; lognormal variance with pedigree 0.0811, pedigree (4,2,5,1,1)
  Calculated from the agrochemical application
- Cloransulam-methyl [soil, agricultural]: 2.636e-9 kg; source National Renewable Energy Laboratory 2010; lognormal variance with pedigree 0.0811, pedigree (4,2,5,1,1)
  Calculated from the agrochemical application
- Quizalofop-ethyl [air, non-urban air or from high stacks]: 2.421e-8 kg; source National Renewable Energy Laboratory 2010; lognormal variance with pedigree 0.0581, pedigree (4,2,5,1,1)
  Calculated from the agrochemical application
- 2,4-D [air, non-urban air or from high stacks]: 4.846e-6 kg; source National Renewable Energy Laboratory 2010; lognormal variance with pedigree 0.0581, pedigree (4,2,5,1,1)
  Calculated from the agrochemical application
- Diflubenzuron [air, non-urban air or from high stacks]: 6.491e-9 kg; source National Renewable Energy Laboratory 2010; lognormal variance with pedigree 0.0581, pedigree (4,2,5,1,1)
  Calculated from the agrochemical application
- Thiodicarb [soil, agricultural]: 1.085e-9 kg; source National Renewable Energy Laboratory 2010; lognormal variance with pedigree 0.0811, pedigree (4,2,5,1,1)
  Calculated from the agrochemical application
- Imazamox [air, non-urban air or from high stacks]: 3.11e-8 kg; source National Renewable Energy Laboratory 2010; lognormal variance with pedigree 0.0581, pedigree (4,2,5,1,1)
  Calculated from the agrochemical application
- Imazaquin [soil, agricultural]: 4.249e-9 kg; source National Renewable Energy Laboratory 2010; lognormal variance with pedigree 0.0811, pedigree (4,2,5,1,1)
  Calculated from the agrochemical application
- Trifluralin [air, non-urban air or from high stacks]: 7.177e-6 kg; source National Renewable Energy Laboratory 2010; lognormal variance with pedigree 0.0581, pedigree (4,2,5,1,1)
  Calculated from the agrochemical application
- Fomesafen [air, non-urban air or from high stacks]: 7.819e-7 kg; source National Renewable Energy Laboratory 2010; lognormal variance with pedigree 0.0581, pedigree (4,2,5,1,1)
  Calculated from the agrochemical application
- Pendimethalin [soil, agricultural]: 1.881e-7 kg; source National Renewable Energy Laboratory 2010; lognormal variance with pedigree 0.0811, pedigree (4,2,5,1,1)
  Calculated from the agrochemical application
- Zeta-cypermethrin [air, non-urban air or from high stacks]: 2.992e-8 kg; source National Renewable Energy Laboratory 2010; lognormal variance with pedigree 0.0581, pedigree (4,2,5,1,1)
  Calculated from the agrochemical application
- Azoxystrobin [air, non-urban air or from high stacks]: 2.34e-7 kg; source National Renewable Energy Laboratory 2010; lognormal variance with pedigree 0.0581, pedigree (4,2,5,1,1)
  Calculated from the agrochemical application
- Imazaquin [air, non-urban air or from high stacks]: 9.915e-8 kg; source National Renewable Energy Laboratory 2010; lognormal variance with pedigree 0.0581, pedigree (4,2,5,1,1)
  Calculated from the agrochemical application
- Carfentrazone-ethyl [soil, agricultural]: 2.782e-10 kg; source National Renewable Energy Laboratory 2010; lognormal variance with pedigree 0.0811, pedigree (4,2,5,1,1)
  Calculated from the agrochemical application
- Fenoxaprop [soil, agricultural]: 4.137e-9 kg; source National Renewable Energy Laboratory 2010; lognormal variance with pedigree 0.0811, pedigree (4,2,5,1,1)
  Calculated from the agrochemical application
- Azoxystrobin [soil, agricultural]: 6.052e-9 kg; source National Renewable Energy Laboratory 2010; lognormal variance with pedigree 0.0811, pedigree (4,2,5,1,1)
  Calculated from the agrochemical application
- Paraquat [air, non-urban air or from high stacks]: 4.166e-7 kg; source National Renewable Energy Laboratory 2010; lognormal variance with pedigree 0.0581, pedigree (4,2,5,1,1)
  Calculated from the agrochemical application
- Quizalofop ethyl ester [soil, agricultural]: 1.037e-9 kg; source National Renewable Energy Laboratory 2010; lognormal variance with pedigree 0.0811, pedigree (4,2,5,1,1)
  Calculated from the agrochemical application
- Sulfentrazone [air, non-urban air or from high stacks]: 4.983e-7 kg; source National Renewable Energy Laboratory 2010; lognormal variance with pedigree 0.0581, pedigree (4,2,5,1,1)
  Calculated from the agrochemical application
- Acifluorfen [air, non-urban air or from high stacks]: 7.071e-8 kg; source National Renewable Energy Laboratory 2010; lognormal variance with pedigree 0.0581, pedigree (4,2,5,1,1)
  Calculated from the agrochemical application
- Imazethapyr [soil, agricultural]: 8.795e-9 kg; source National Renewable Energy Laboratory 2010; lognormal variance with pedigree 0.0811, pedigree (4,2,5,1,1)
  Calculated from the agrochemical application
- Fluazifop-p-butyl [air, non-urban air or from high stacks]: 1.385e-7 kg; source National Renewable Energy Laboratory 2010; lognormal variance with pedigree 0.0581, pedigree (4,2,5,1,1)
  Calculated from the agrochemical application
- Ammonia [air, non-urban air or from high stacks]: 9.664e-5 kg; source National Renewable Energy Laboratory 2010; lognormal variance with pedigree 0.0561, pedigree (4,2,5,1,1)
  Calculated with a standard method
  Uncertainty: Calculated with standard method
- Methyl parathion [air, non-urban air or from high stacks]: 7.995e-8 kg; source National Renewable Energy Laboratory 2010; lognormal variance with pedigree 0.0581, pedigree (4,2,5,1,1)
  Calculated from the agrochemical application
- Propiconazole [air, non-urban air or from high stacks]: 7.659e-8 kg; source National Renewable Energy Laboratory 2010; lognormal variance with pedigree 0.0581, pedigree (4,2,5,1,1)
  Calculated from the agrochemical application
- Imazethapyr [air, non-urban air or from high stacks]: 2.052e-7 kg; source National Renewable Energy Laboratory 2010; lognormal variance with pedigree 0.0581, pedigree (4,2,5,1,1)
  Calculated from the agrochemical application
- Dicamba [air, non-urban air or from high stacks]: 3.96e-8 kg; source National Renewable Energy Laboratory 2010; lognormal variance with pedigree 0.0581, pedigree (4,2,5,1,1)
  Calculated from the agrochemical application
- Paraquat [soil, agricultural]: 1.786e-8 kg; source National Renewable Energy Laboratory 2010; lognormal variance with pedigree 0.0811, pedigree (4,2,5,1,1)
  Calculated from the agrochemical application
- Clethodim [air, non-urban air or from high stacks]: 3.494e-7 kg; source National Renewable Energy Laboratory 2010; lognormal variance with pedigree 0.0581, pedigree (4,2,5,1,1)
  Calculated from the agrochemical application
- Carbaryl [air, non-urban air or from high stacks]: 5.907e-8 kg; source National Renewable Energy Laboratory 2010; lognormal variance with pedigree 0.0581, pedigree (4,2,5,1,1)
  Calculated from the agrochemical application
- Trifloxystrobin [air, non-urban air or from high stacks]: 4.544e-9 kg; source National Renewable Energy Laboratory 2010; lognormal variance with pedigree 0.0581, pedigree (4,2,5,1,1)
  Calculated from the agrochemical application
- Beta-cyfluthrin [soil, agricultural]: 5.286e-10 kg; source National Renewable Energy Laboratory 2010; lognormal variance with pedigree 0.0811, pedigree (4,2,5,1,1)
  Calculated from the agrochemical application
- Atrazine [soil, agricultural]: 1.696e-8 kg; source National Renewable Energy Laboratory 2010; lognormal variance with pedigree 0.0811, pedigree (4,2,5,1,1)
  Calculated from the agrochemical application
- Metribuzin [air, non-urban air or from high stacks]: 6.476e-7 kg; source National Renewable Energy Laboratory 2010; lognormal variance with pedigree 0.0581, pedigree (4,2,5,1,1)
  Calculated from the agrochemical application
- Flumiclorac-pentyl [soil, agricultural]: 8.908e-10 kg; source National Renewable Energy Laboratory 2010; lognormal variance with pedigree 0.0811, pedigree (4,2,5,1,1)
  Calculated from the agrochemical application
- Carbon dioxide, fossil [air, non-urban air or from high stacks]: 0.0415 kg; source Omni Tech International  2010; lognormal variance with pedigree 0.0827, pedigree (3,2,5,1,4)
  Calculated value based on carbon content of the agricultural lime applied to the field
- Hydrocarbons, unspecified [air, non-urban air or from high stacks]: 0.0002007 kg; source National Renewable Energy Laboratory 2010; lognormal variance with pedigree 0.0881, pedigree (4,2,5,1,1)
  Calculated from the agrochemical application
- Flufenacet [air, non-urban air or from high stacks]: 5.193e-8 kg; source National Renewable Energy Laboratory 2010; lognormal variance with pedigree 0.0581, pedigree (4,2,5,1,1)
  Calculated from the agrochemical application
- Fluazifop-P-butyl [soil, agricultural]: 5.937e-9 kg; source National Renewable Energy Laboratory 2010; lognormal variance with pedigree 0.0811, pedigree (4,2,5,1,1)
  Calculated from the agrochemical application
- Lactofen [soil, agricultural]: 4.279e-9 kg; source National Renewable Energy Laboratory 2010; lognormal variance with pedigree 0.0811, pedigree (4,2,5,1,1)
  Calculated from the agrochemical application
- Sethoxydim [air, non-urban air or from high stacks]: 5.211e-8 kg; source National Renewable Energy Laboratory 2010; lognormal variance with pedigree 0.0581, pedigree (4,2,5,1,1)
  Calculated from the agrochemical application
- Chlorpyrifos [air, non-urban air or from high stacks]: 2.356e-6 kg; source National Renewable Energy Laboratory 2010; lognormal variance with pedigree 0.0581, pedigree (4,2,5,1,1)
  Calculated from the agrochemical application
- Trifluralin [soil, agricultural]: 1.856e-7 kg; source National Renewable Energy Laboratory 2010; lognormal variance with pedigree 0.0811, pedigree (4,2,5,1,1)
  Calculated from the agrochemical application
- Carbaryl [soil, agricultural]: 2.531e-9 kg; source National Renewable Energy Laboratory 2010; lognormal variance with pedigree 0.0811, pedigree (4,2,5,1,1)
  Calculated from the agrochemical application
- Cyhalothrin, gamma- [soil, agricultural]: 6.066e-9 kg; source National Renewable Energy Laboratory 2010; lognormal variance with pedigree 0.0811, pedigree (4,2,5,1,1)
  Calculated from the agrochemical application
- Thifensulfuron [air, non-urban air or from high stacks]: 7.102e-9 kg; source National Renewable Energy Laboratory 2010; lognormal variance with pedigree 0.0581, pedigree (4,2,5,1,1)
  Calculated from the agrochemical application
- Dinitrogen monoxide [air, non-urban air or from high stacks]: 0.000682 kg; source National Renewable Energy Laboratory 2010; lognormal variance with pedigree 0.0781, pedigree (4,2,5,1,1)
  Calculated with a standard method
  Uncertainty: Calculated with standard method
- Clethodim [soil, agricultural]: 1.497e-8 kg; source National Renewable Energy Laboratory 2010; lognormal variance with pedigree 0.0811, pedigree (4,2,5,1,1)
  Calculated from the agrochemical application
- Permethrin [soil, agricultural]: 2.795e-9 kg; source National Renewable Energy Laboratory 2010; lognormal variance with pedigree 0.0811, pedigree (4,2,5,1,1)
  Calculated from the agrochemical application
- Flumetsulam [air, non-urban air or from high stacks]: 1.215e-8 kg; source National Renewable Energy Laboratory 2010; lognormal variance with pedigree 0.0581, pedigree (4,2,5,1,1)
  Calculated from the agrochemical application
- Fomesafen [soil, agricultural]: 3.351e-8 kg; source National Renewable Energy Laboratory 2010; lognormal variance with pedigree 0.0811, pedigree (4,2,5,1,1)
  Calculated from the agrochemical application
- Metolachlor [air, non-urban air or from high stacks]: 1.632e-6 kg; source National Renewable Energy Laboratory 2010; lognormal variance with pedigree 0.0581, pedigree (4,2,5,1,1)
  Calculated from the agrochemical application
- 2,4-D [soil, agricultural]: 2.077e-7 kg; source National Renewable Energy Laboratory 2010; lognormal variance with pedigree 0.0811, pedigree (4,2,5,1,1)
  Calculated from the agrochemical application
- Flufenacet [soil, agricultural]: 2.225e-9 kg; source National Renewable Energy Laboratory 2010; lognormal variance with pedigree 0.0811, pedigree (4,2,5,1,1)
  Calculated from the agrochemical application
- Glyphosate [air, non-urban air or from high stacks]: 0.0001563 kg; source National Renewable Energy Laboratory 2010; lognormal variance with pedigree 0.0581, pedigree (4,2,5,1,1)
  Calculated from the agrochemical application
- Acetamide [air, non-urban air or from high stacks]: 1.268e-7 kg; source National Renewable Energy Laboratory 2010; lognormal variance with pedigree 0.0581, pedigree (4,2,5,1,1)
  Calculated from the agrochemical application
- Pyraclostrobin (prop) [soil, agricultural]: 7.734e-9 kg; source National Renewable Energy Laboratory 2010; lognormal variance with pedigree 0.0811, pedigree (4,2,5,1,1)
  Calculated from the agrochemical application
- Acephate [soil, agricultural]: 2.207e-8 kg; source National Renewable Energy Laboratory 2010; lognormal variance with pedigree 0.0811, pedigree (4,2,5,1,1)
  Calculated from the agrochemical application
- Acetamide [soil, agricultural]: 3.281e-9 kg; source National Renewable Energy Laboratory 2010; lognormal variance with pedigree 0.0811, pedigree (4,2,5,1,1)
  Calculated from the agrochemical application
- Water [water, unspecified]: 0.0430015 m3; name water_to_water_unspecified; = water_river_input*(1-fraction_PW_to_air)+water_well_in_ground_input*(1-fraction_PW_to_air); lognormal variance with pedigree 0.130025, pedigree (4,4,5,2,4)
  (same comment as for Water)
  property fraction, origin: fresh water 1; name fraction_origin_fresh_water_Ww
  property fraction, origin: salt water 0; name fraction_origin_salt_water_Ww
  property fraction, origin: unspecified 0; name fraction_origin_unspecified_Ww

## Sampling procedure
Literature data

## Extrapolations
This dataset has been extrapolated from year 2007 to the year of the calculation (2021). The uncertainty has been adjusted accordingly.

## Review by Christian Bauer 2012-01-17
passed

## Review by Tereza Levova 2015-06-05
Production volume was updated for eiv3.2.

## Review by Tereza Levova 2015-06-17
The amounts of occupation of land and carbon dioxide from air have been corrected for the ecoinvent 3.2. version of the database.
