# treatment of metal scrap, mixed, for recycling, unsorted, sorting

Dataset: EcoSpold 2, unit process
Geography: RoW
Time period: 2012-01-01 to 2021-12-31
Technology level: current
Classification: ISIC rev.4 ecoinvent: 3830:Materials recovery
Tags: combined production
Scenario: Business-as-Usual
System model: Allocation, cut-off by classification
Generated by: Avraam Symeonidis
Database: ecoinvent
isCopyrightProtected: true
accessRestrictedTo: 1

## General comment
This activity represents the treatment of mixed metal scrap from separate collection, i.e. a source-segregated municipal solid waste fraction, through sorting for recycling. Sorting of waste tinplate, ferrous metal, and aluminium from residues and from each other, yielding individual material fractions for ferrous scrap and aluminium.

## Included activities start
The activity starts with 'metal scrap, mixed, unsorted' being available to the sorting facility.

## Included activities end
The activity ends with 'metal scrap, mixed, unsorted' being sorted and 'iron scrap, sorted, pressed', 'tinplate scrap, sorted' and 'aluminium scrap, post-consumer, prepared for recycling, at refiner' being available for transportation at the gates of the sorting facility.

## Technology
The mixed metal scrap is sorted using magnetic and eddy current separators.

## Reference product
- tinplate, in mixed metal scrap: 0 kg; name RP1; CPC 39366: Waste and scrap of tin; By-product classification Recyclable
  production volume 0 kg; name PVRP1
    PV value is scaled from the CH value given that Switzerland accounts for 0.8% of the global GDP.
  property carbon content, fossil 0.0052906; = 0.04*0.771*0.17155
    fossil carbon content on a dry matter basis; estimated by assuming 4% impurities with composition as residual MSW with 77.1% dry matter and a fossil carbon content of 17.2% (on dry matter basis)
  property heating value, net 0 MJ
    Non combustible products are assumed to have an LHV equal to zero (0).
  property price 0.149 EUR2005; name RP1_price_EUR2005
    Assuming same price as stated for 'iron scrap, unsorted' (EUR2005 0.149 per kg)in ecoinvent 3.6. The original comment to this price estimate: "Temporary price data. Calculated as 90% of purchasers price based on: estimated at 85% of sorted scrap"
  property carbon content, non-fossil 0.00806929; = 0.04*0.771*0.26165
    non-fossil carbon content on a dry matter basis; estimated by assuming 4% impurities with composition as residual MSW with 77.1% dry matter and a non-fossil carbon content of 26.2% (on dry matter basis)
  property carbon content 0.0133599
    carbon content on a dry matter basis (reserved; not for manual entry)
  properties: water content 0.00924468, dry mass 0.99084 kg, water in wet mass 0.00916 kg, wet mass 1 kg, carbon allocation 0.0132375 kg
- ferrous metal, in mixed metal scrap: 0 kg; name RP2; By-product classification Recyclable; CPC 39340: Ferrous waste and scrap
  production volume 0 kg; name PVRP2
    (same comment as for tinplate, in mixed metal scrap)
  property heating value, net 0 MJ
    Non combustible products are assumed to have an LHV equal to zero (0).
  property price 0.149 EUR2005; name RP2_price_EUR2005
    Assuming same price as stated for 'iron scrap, unsorted' (EUR2005 0.149 per kg) in ecoinvent 3.6. The original comment to this price estimate: "Temporary price data. Calculated as 90% of purchasers price based on: estimated at 85% of sorted scrap"
  property carbon content, non-fossil 0.00806929; = 0.04*0.771*0.26165
    (same comment as for tinplate, in mixed metal scrap)
  property carbon content, fossil 0.0052906; = 0.04*0.771*0.17155
    (same comment as for tinplate, in mixed metal scrap)
  property carbon content 0.0133599
    carbon content on a dry matter basis (reserved; not for manual entry)
  properties: water content 0.00924468, water in wet mass 0.00916 kg, wet mass 1 kg, dry mass 0.99084 kg, carbon allocation 0.0132375 kg
- aluminium, in mixed metal scrap: 0 kg; By-product classification Recyclable; CPC 39363: Waste and scrap of aluminium
  production volume 0 kg; name PVRP3
    (same comment as for tinplate, in mixed metal scrap)
  property carbon content, fossil 0.0026453; = 0.02*0.771*0.17155
    fossil carbon content on a dry matter basis; estimated by assuming 2% impurities with composition as residual MSW with 77.1% dry matter and a fossil carbon content of 17.2% (on dry matter basis)
  property heating value, net 0 MJ
    Non combustible products are assumed to have an LHV equal to zero (0).
  property price 0.685 EUR2005; name RP3_price_EUR2005
    Assuming same price as stated for 'aluminium scrap, post-consumer' (EUR2005 0.685 per kg) in ecoinvent 3.6. The original comment to this price estimate: "Temporary price data. Calculated as 90% of purchasers price based on: estimated at 85% of sorted scrap"
  property carbon content, non-fossil 0.00403464; = 0.02*0.771*0.26165
    non-fossil carbon content on a dry matter basis; estimated by assuming 2% impurities with composition as residual MSW with 77.1% dry matter and a non-fossil carbon content of 26.2% (on dry matter basis)
  property carbon content 0.00667994
    carbon content on a dry matter basis (reserved; not for manual entry)
  properties: water content 0.00460107, water in wet mass 0.00458 kg, dry mass 0.99542 kg, wet mass 1 kg, carbon allocation 0.00664935 kg
- aluminium scrap, post-consumer, prepared for melting: 1 kg; name BP3; = 0*0.96*abs(RP1)+0*0.96*abs(RP2)+1*0.98*abs(RP3); By-product classification Recyclable; CPC 39363: Waste and scrap of aluminium; pedigree (1,1,1,1,1)
  Based on Haupt et al. (2017): 1 kg of "aluminium, in mixed metal scrap", yields 0.98 kg of "aluminium scrap, post consumer, prepared for melting" after the sorting process. The impurities are collected as municipal solid waste stream.
  production volume 3.90746e8 kg; name PVBP3; = Ref('cfdc1b5c-a641-4355-9acc-d94e0496f9bf', 'ProductionVolume') * (ABS(Ref('dd0e0204-2946-41e1-802b-5754ab50b76a')) / ABS(Ref('cfdc1b5c-a641-4355-9acc-d94e0496f9bf'))
  property price 0.806 EUR2005; name BP3_price_EUR2005
  properties: water in wet mass 0 kg, water content 0, wet mass 1 kg, carbon content, non-fossil 0, dry mass 1 kg, carbon content, fossil 0, carbon content 0, carbon allocation 0 kg

## By-products
- iron scrap, sorted, pressed: 0 kg; name BP2; = 0*0.96*abs(RP1)+1*0.96*abs(RP2)+0*0.98*abs(RP3); CPC 39310: Slag, dross, scalings and other waste from the manufacture of iron or steel; By-product classification Recyclable; pedigree (1,1,1,1,1)
  Based on Haupt et al. (2017): 1 kg of "ferrous metal, in mixed metal scrap", yields 0.96 kg of "iron scrap, sorted, pressed" after the sorting process. The impurities are collected as municipal solid waste stream.
  production volume 1.70026e8 kg; name PVBP2; = PVRP2*BP2/abs(RP2)
    Calculated based on the production volume of the reference product.
  property price 0.175 EUR2005; name BP2_price_EUR2005
    Temporary price data. Calculated as 90% of purchasers price based on: 2005 import and export prices (total trades (USD) divided by total weight (kg) in biggest economies of the world: EU27, USA, Brasil, China, India, Japan and Russia) from UN Commodity Trade Statistics Database (http://data.un.org/Explorer.aspxDatabase [Accessed 2011.06.20]). Commodity: Waste or scrap, of cast iron
  property carbon content 0
    carbon content on a dry matter basis (reserved; not for manual entry)
  properties: water in wet mass 0 kg, wet mass 1 kg, carbon content, non-fossil 0, carbon content, fossil 0, dry mass 1 kg, water content 0, carbon allocation 0 kg
- tinplate scrap, sorted: 0 kg; name BP1; = 1*0.96*abs(RP1)+0*0.96*abs(RP2)+0*0.98*abs(RP3); CPC 39366: Waste and scrap of tin; By-product classification Recyclable; pedigree (1,1,1,1,1)
  Based on Haupt et al. (2017): 1 kg of "tinplate, in mixed metal scrap", yields 0.96 kg of "tinplate scrap, sorted" after the sorting process. The impurities are collected as municipal solid waste stream.
  production volume 1.11072e9 kg; name PVBP1; = PVRP1*BP1/abs(RP1)
    Calculated based on the production volume of the reference product.
  property price 0.175 EUR2005; name BP1_price_EUR2005
    Assuming same price as stated for 'iron scrap, sorted, pressed' (EUR2005 0.175 per kg) in ecoinvent 3.6. The original comment to this price estimate: "Temporary price data. Calculated as 90% of purchasers price based on: 2005 import and export prices (total trades (USD) divided by total weight (kg) in biggest economies of the world: EU27, USA, Brasil, China, India, Japan and Russia) from UN Commodity Trade Statistics Database (http://data.un.org/Explorer.aspxDatabase [Accessed 2011.06.20]). Commodity: Waste or scrap, of cast iron"
  property carbon content 0
    carbon content on a dry matter basis (reserved; not for manual entry)
  properties: water content 0, dry mass 1 kg, carbon content, non-fossil 0, carbon content, fossil 0, water in wet mass 0 kg, wet mass 1 kg, carbon allocation 0 kg
- aluminium scrap, post-consumer, prepared for melting: 0 kg; By-product classification Recyclable; CPC 39363: Waste and scrap of aluminium; pedigree (1,1,1,1,1)
  (same comment as for aluminium scrap, post-consumer, prepared for melting)
  production volume 0 kg; name PVBP3; = Ref('cfdc1b5c-a641-4355-9acc-d94e0496f9bf', 'ProductionVolume') * (ABS(Ref('dd0e0204-2946-41e1-802b-5754ab50b76a')) / ABS(Ref('cfdc1b5c-a641-4355-9acc-d94e0496f9bf'))
    Calculated based on the production volume of the reference product.
  property carbon content 0
    carbon content on a dry matter basis (reserved; not for manual entry)
  properties: water in wet mass 0 kg, water content 0, wet mass 1 kg, carbon content, non-fossil 0, dry mass 1 kg, carbon content, fossil 0, carbon allocation 0 kg

## Inputs from technosphere
- electricity, medium voltage: 0 kWh; pedigree (1,1,1,1,1)
  Exchange amount modeled based on relative proportions of recyclable fractions in the mixed input flow to allow for allocation among co-products during database linking.
- waste preparation facility: 2.04082e-9 unit; = (2.00E-09)*(abs(RP1)+abs(RP2)+abs(RP3)); lognormal variance with pedigree 0.692, pedigree (1,1,5,5,1)
  (same comment as for electricity, medium voltage)
- diesel, burned in building machine: 0.0176531 MJ; = (1.73E-02)*(abs(RP1)+abs(RP2)+abs(RP3)); lognormal variance with pedigree 0.692, pedigree (1,1,5,5,1)
  (same comment as for electricity, medium voltage)
  properties: heating value, net 1 MJ
- municipal solid waste: 0 kg; name BP; pedigree (1,1,1,1,1)
  Based on Haupt et al. (2017): The impurities collected by the sorting process are collected as a municipal solid waste stream.
  production volume 0 kg
    Calculated based on the production volume of the reference product.
  property price 0 EUR2005; name BP_price_EUR2005
  properties: water content 0.297017, wet mass 1 kg, carbon content, non-fossil 0.261655, carbon content, fossil 0.171549, dry mass 0.771 kg, heating value, net 11.74 MJ
  note on carbon content, non-fossil: MSW composition in tab 4.1, ecoinvent v2.2 report 13_I. C content referred to 1 kg DM
  note on heating value, net: Value taken from the general comment of the treatment dataset.
- aluminium, in mixed metal scrap: 1.02041 kg
  production volume 3.9872e8 kg
  properties: water content 0.00460107, carbon content, fossil 0.0026453, dry mass 0.99542 kg, wet mass 1 kg, carbon content, non-fossil 0.00403464
  note on carbon content, fossil: fossil carbon content on a dry matter basis; estimated by assuming 2% impurities with composition as residual MSW with 77.1% dry matter and a fossil carbon content of 17.2% (on dry matter basis)
  note on carbon content, non-fossil: non-fossil carbon content on a dry matter basis; estimated by assuming 2% impurities with composition as residual MSW with 77.1% dry matter and a non-fossil carbon content of 26.2% (on dry matter basis)
- electricity, medium voltage: 0.000128624, 2.46646e-5, 0.000414068, 0.00602224, 0.000848838, 0.00276564 kWh (6 entries); lognormal variance with pedigree 0.692, pedigree (1,1,5,5,1)
  (same comment as for electricity, medium voltage)
- municipal solid waste: -2.87905e-5, -7.25447e-6, -1.03671e-5, -0.0203618 kg (4 entries); lognormal variance with pedigree 0.0512, pedigree (4,3,5,5,1)
  (same comment as for municipal solid waste)
  production volume 6.13388e7 kg

## Extrapolations
This dataset for GLO has been extrapolated from the corresponding activity in Switzerland. The uncertainty information has been adjusted accordingly.
