# treatment of waste plastic, mixture, open burning

Dataset: EcoSpold 2, unit process
Geography: GLO
Time period: 2006-01-01 to 2021-12-31
Technology level: current
Classification: ISIC rev.4 ecoinvent: 3821:Treatment and disposal of non-hazardous waste
Synonyms: open, uncontrolled burning
Scenario: Business-as-Usual
System model: Allocation, cut-off by classification
Share of production covered: 1 %
Generated by: Avraam Symeonidis
Database: ecoinvent
isCopyrightProtected: true
accessRestrictedTo: 1

## General comment
This dataset represents the activity of waste disposal of waste plastic, mixture in uncontrolled, open burning. Recommended use of this dataset: For plastic mixture, which goes to disposal as part of unmanaged communal waste mixture.Waste composition (wet, in ppm): upper heating value 34.05 MJ/kg; lower heating value 30.79 MJ/kg; H2O 153000; O 73717; H 105910; C 633590; S 1406.7; N 6112; P n.a.; B n.a.; Cl 18131; Br 65.319; F 13.717; I n.a.; Ag n.a.; As 1.7729; Ba 174.03; Cd 75.786; Co 29.478; Cr 38.132; Cu 296.41; Hg 0.79234; Mn 74.574; Mo n.a.; Ni 19.222; Pb 435.81; Sb 40.093; Se 1.9596; Sn 24.453; V 268.88; Zn 521.69; Be 0.46656; Sc n.a.; Sr 82.582; Ti 933.13; Tl 0.37325; W n.a.; Si n.a.; Fe 3476.5; Ca n.a.; Al 186.63; K n.a.; Mg n.a.; Na 1367.5; . Share of carbon in waste that is biogenic 0%. // Recycling rates for metallic iron = 0% for metallic aluminium = 0% for metallic copper = 0% . A mass of 0.0329kg residues are left on ground.

## Included activities start
open burning starting from waste placement on burning site (without transports to the site)

## Included activities end
Waste-specific emissions to air and soil from open burning.

## Geography
Generic open burning without any geographical distinction.

## Technology
This is an inventory for open burning of solid waste. Informal or uncontrolled burning. No flue gas treatment. Suitable for informal recycling (e.g. burning of e-waste). Based on Municipal waste incineration without any pollution control. Residues (minus any actually recycled metals) are left on site. Assumption of share of thermal NOx to total NOx in average waste burning process is 30%. Contribution from thermal NOx is 810mg per kg waste. Recycling rates for metallic iron = 0% for metallic aluminium = 0% for metallic copper = 0% .

## Time period
generic open burning without any temporal distinction

## Reference product
- waste plastic, mixture: -1 kg; By-product classification Waste; CPC 39270: Waste, parings and scrap of plastics; pedigree (1,1,1,1,1)
  main reference product of this activity (supply of disposal service).
  Uncertainty: Uncertainty is not adjusted, as this is the refence product
  production volume 1 kg
    The amount of the annual production volume is a placeholder value. The contribution of this technology to the different local markets can be found in the markets themselves.
  property price 0 EUR2005
    Waste products are assigned a price of zero as they are assumed to require further treatment.
  property heating value, net 30.79 MJ
    Value taken from the general comment of the treatment dataset.
  property carbon content 0.74805
    carbon content on a dry matter basis (reserved; not for manual entry)
  properties: titanium content 0.0011017, carbon content, fossil 0.74805, beryllium content 5.5084e-7, sodium content 0.0016145, wet mass 1 kg, aluminium content 0.00022034, strontium content 9.7499e-5, water in wet mass 0.153 kg, thallium content 4.4067e-7, iron content 0.0041045, water content 0.18064, zinc content 0.00061593, dry mass 0.847 kg, sulfur content 0.0016609, copper content 0.00034995, manganese content 8.8045e-5, selenium content 2.3135e-6, vanadium content 0.00031745, barium content 0.00020546, chlorine content 0.021406, nickel content 2.2694e-5, heating value, gross 34.054 MJ, antimony content 4.7336e-5, bromine content 7.7118e-5, mercury content 9.3547e-7, hydrogen content 0.12504, tin content 2.887e-5, cadmium content 8.9476e-5, nitrogen content 0.007216, fluorine content 1.6195e-5, oxygen content 0.087033, lead content 0.00051454, chromium content 4.502e-5, arsenic content 2.0932e-6, cobalt content 3.4802e-5, carbon allocation 0.633598 kg

## Inputs from nature
- Oxygen [natural resource, in air]: 2.4516 kg; lognormal variance with pedigree 0.025972, pedigree (1,1,4,1,1)
  oxygen from ambient air needed to combust and oxidise this waste. Net demand, i.e. without air O2 leaving the process uncombusted.
  Uncertainty: uncertainty is calculated from uncertainties in waste composition and transfer coefficients to flue gas and soild residues

## Emissions to nature
- Hydrogen fluoride [air, urban air close to ground]: 1.5393e-6 kg; lognormal variance with pedigree 1.2474, pedigree (1,1,4,1,1)
  Emissions to air from open burning.
  Uncertainty: Uncertainty calculated depending on waste input and uncertainty of transfer coefficents in incineration model.
- Bromine [soil, industrial]: 4.4373e-5 kg; lognormal variance with pedigree 1.0272, pedigree (1,1,4,1,1)
  Emissions from open burning to residues left on ground.
  Uncertainty: Uncertainty calculated depending on waste input and uncertainty of transfer coefficents in incineration model.
- Arsenic [air, urban air close to ground]: 1.5111e-8 kg; lognormal variance with pedigree 1.5565, pedigree (1,1,4,1,1)
  (same comment as for Hydrogen fluoride)
- Chloride [soil, industrial]: 0.0060355 kg; lognormal variance with pedigree 0.30909, pedigree (1,1,4,1,1)
  (same comment as for Bromine)
- Nitrogen oxides [air, urban air close to ground]: 0.0082422 kg; lognormal variance with pedigree 0.37197, pedigree (1,1,4,1,1)
  (same comment as for Hydrogen fluoride)
- Polychlorinated biphenyls [air, urban air close to ground]: 1.1189e-7 kg; lognormal variance with pedigree 0.0491, pedigree (1,1,4,1,1)
  Process-specific (constant) emissions to air from open burning.
  Uncertainty: uncertainty generic estimate
- Hydrogen chloride [air, urban air close to ground]: 0.012436 kg; lognormal variance with pedigree 0.30617, pedigree (1,1,4,1,1)
  (same comment as for Hydrogen fluoride)
- Nitrogen [soil, industrial]: 6.1194e-5 kg; lognormal variance with pedigree 0.48546, pedigree (1,1,4,1,1)
  (same comment as for Bromine)
- Bromine [air, urban air close to ground]: 2.0946e-5 kg; lognormal variance with pedigree 1.0304, pedigree (1,1,4,1,1)
  (same comment as for Hydrogen fluoride)
- Carbon [soil, industrial]: 0.0031775 kg; lognormal variance with pedigree 0.078793, pedigree (1,1,4,1,1)
  (same comment as for Bromine)
- Dinitrogen monoxide [air, urban air close to ground]: 0.00011625 kg; lognormal variance with pedigree 0.0491, pedigree (1,1,4,1,1)
  (same comment as for Hydrogen fluoride)
- Sulfur [soil, industrial]: 0.0012048 kg; lognormal variance with pedigree 0.62132, pedigree (1,1,4,1,1)
  (same comment as for Bromine)
- Sulfur dioxide [air, urban air close to ground]: 0.00060588 kg; lognormal variance with pedigree 0.63139, pedigree (1,1,4,1,1)
  (same comment as for Hydrogen fluoride)
- PAH, polycyclic aromatic hydrocarbons [air, urban air close to ground]: 0.0003443 kg; lognormal variance with pedigree 0.30974, pedigree (1,1,4,1,1)
  (same comment as for Polychlorinated biphenyls)
- Methane, fossil [air, urban air close to ground]: 0.0059 kg; lognormal variance with pedigree 0.0491, pedigree (1,1,4,1,1)
  (same comment as for Polychlorinated biphenyls)
- Benzene, ethyl- [air, urban air close to ground]: 0.00032746 kg; lognormal variance with pedigree 0.0491, pedigree (1,1,4,1,1)
  (same comment as for Polychlorinated biphenyls)
- Carbon dioxide, fossil [air, urban air close to ground]: 2.2346 kg; lognormal variance with pedigree 0.0147018, pedigree (1,1,4,1,1)
  Emissions to air from open burning.
  Uncertainty: Uncertainty calculated depending on waste input, uncertainty of transfer coefficents in incineration model,and uncertainty in CO and CH4 emissions.
- Formaldehyde [air, urban air close to ground]: 0.00044365 kg; lognormal variance with pedigree 0.0491, pedigree (1,1,4,1,1)
  (same comment as for Polychlorinated biphenyls)
- Carbon monoxide, fossil [air, urban air close to ground]: 0.0386 kg; lognormal variance with pedigree 0.65557, pedigree (1,1,4,1,1)
  (same comment as for Polychlorinated biphenyls)
- Toluene [air, urban air close to ground]: 0.000372 kg; lognormal variance with pedigree 0.0491, pedigree (1,1,4,1,1)
  (same comment as for Polychlorinated biphenyls)
- Acetaldehyde [air, urban air close to ground]: 0.0004284 kg; lognormal variance with pedigree 0.0491, pedigree (1,1,4,1,1)
  (same comment as for Polychlorinated biphenyls)
- Styrene [air, urban air close to ground]: 0.0005275 kg; lognormal variance with pedigree 0.0491, pedigree (1,1,4,1,1)
  (same comment as for Polychlorinated biphenyls)
- Benzene [air, urban air close to ground]: 0.00097975 kg; lognormal variance with pedigree 0.0491, pedigree (1,1,4,1,1)
  (same comment as for Polychlorinated biphenyls)
- Phenol [air, urban air close to ground]: 1.4799e-5 kg; lognormal variance with pedigree 0.0491, pedigree (1,1,4,1,1)
  (same comment as for Polychlorinated biphenyls)
- Water [air, urban air close to ground]: 0.0010003 m3; lognormal variance with pedigree 0.094996, pedigree (1,1,4,1,1)
  water vapour from waste humidity, hydrogen oxidation.
  Uncertainty: Uncertainty calculated from uncertainty in waste composition and the uncertainty of fraction to air.
- Dioxins, measured as 2,3,7,8-tetrachlorodibenzo-p-dioxin [air, urban air close to ground]: 5.6071e-10 kg; lognormal variance with pedigree 0.78614, pedigree (1,1,4,1,1)
  Process-specific (constant) emissions to air from open burning.
  Uncertainty: Uncertainty calculated from uncetainty in Chlorine content in waste and estimation formula
- Particulates, > 2.5 um, and < 10um [air, urban air close to ground]: 0.004959 kg; lognormal variance with pedigree 0.3003, pedigree (1,1,4,1,1)
  (same comment as for Hydrogen fluoride)
- Sodium [soil, industrial]: 0.0013338 kg; lognormal variance with pedigree 0.62491, pedigree (1,1,4,1,1)
  (same comment as for Bromine)
- Particulates, < 2.5 um [air, urban air close to ground]: 0.0092095 kg; lognormal variance with pedigree 0.3003, pedigree (1,1,4,1,1)
  (same comment as for Hydrogen fluoride)
- Dioxins, measured as 2,3,7,8-tetrachlorodibenzo-p-dioxin [soil, industrial]: 1.5575e-10 kg; lognormal variance with pedigree 1.2666, pedigree (1,1,4,1,1)
  (same comment as for Dioxins, measured as 2,3,7,8-tetrachlorodibenzo-p-dioxin)
- Sodium [air, urban air close to ground]: 3.3682e-5 kg; lognormal variance with pedigree 0.65883, pedigree (1,1,4,1,1)
  (same comment as for Hydrogen fluoride)
- Iron [soil, industrial]: 0.0034702 kg; lognormal variance with pedigree 0.5055, pedigree (1,1,4,1,1)
  (same comment as for Bromine)
- Particulates, > 10 um [air, urban air close to ground]: 0.0035421 kg; lognormal variance with pedigree 0.3003, pedigree (1,1,4,1,1)
  (same comment as for Hydrogen fluoride)
- Aluminium [soil, industrial]: 0.00018647 kg; lognormal variance with pedigree 0.88703, pedigree (1,1,4,1,1)
  (same comment as for Bromine)
- Iron [air, urban air close to ground]: 6.299e-6 kg; lognormal variance with pedigree 0.59322, pedigree (1,1,4,1,1)
  (same comment as for Hydrogen fluoride)
- Titanium [soil, industrial]: 0.00092323 kg; lognormal variance with pedigree 0.67464, pedigree (1,1,4,1,1)
  (same comment as for Bromine)
- Aluminium [air, urban air close to ground]: 1.5383e-7 kg; lognormal variance with pedigree 0.99439, pedigree (1,1,4,1,1)
  (same comment as for Hydrogen fluoride)
- Beryllium [soil, industrial]: 4.6568e-7 kg; lognormal variance with pedigree 1.6758, pedigree (1,1,4,1,1)
  (same comment as for Bromine)
- Thallium [air, urban air close to ground]: 7.465e-10 kg; lognormal variance with pedigree 1.7898, pedigree (1,1,4,1,1)
  (same comment as for Hydrogen fluoride)
- Thallium [soil, industrial]: 3.725e-7 kg; lognormal variance with pedigree 1.7044, pedigree (1,1,4,1,1)
  (same comment as for Bromine)
- Titanium [air, urban air close to ground]: 9.8943e-6 kg; lognormal variance with pedigree 0.72381, pedigree (1,1,4,1,1)
  (same comment as for Hydrogen fluoride)
- Strontium [soil, industrial]: 8.2499e-5 kg; lognormal variance with pedigree 0.9955, pedigree (1,1,4,1,1)
  (same comment as for Bromine)
- Beryllium [air, urban air close to ground]: 8.8183e-10 kg; lognormal variance with pedigree 1.7625, pedigree (1,1,4,1,1)
  (same comment as for Hydrogen fluoride)
- Vanadium [soil, industrial]: 0.00024812 kg; lognormal variance with pedigree 0.83858, pedigree (1,1,4,1,1)
  (same comment as for Bromine)
- Strontium [air, urban air close to ground]: 8.2582e-8 kg; lognormal variance with pedigree 1.0979, pedigree (1,1,4,1,1)
  (same comment as for Hydrogen fluoride)
- Zinc [soil, industrial]: 0.00051781 kg; lognormal variance with pedigree 0.75094, pedigree (1,1,4,1,1)
  (same comment as for Bromine)
- Vanadium [air, urban air close to ground]: 2.076e-5 kg; lognormal variance with pedigree 0.85569, pedigree (1,1,4,1,1)
  (same comment as for Hydrogen fluoride)
- Selenium [soil, industrial]: 1.7897e-6 kg; lognormal variance with pedigree 1.49, pedigree (1,1,4,1,1)
  (same comment as for Bromine)
- Tin [air, urban air close to ground]: 4.7919e-11 kg; lognormal variance with pedigree 1.45, pedigree (1,1,4,1,1)
  (same comment as for Hydrogen fluoride)
- Antimony [soil, industrial]: 4.0093e-5 kg; lognormal variance with pedigree 1.0917, pedigree (1,1,4,1,1)
  (same comment as for Bromine)
- Zinc [air, urban air close to ground]: 3.8814e-6 kg; lognormal variance with pedigree 0.80716, pedigree (1,1,4,1,1)
  (same comment as for Hydrogen fluoride)
- Tin [soil, industrial]: 2.4453e-5 kg; lognormal variance with pedigree 1.1574, pedigree (1,1,4,1,1)
  (same comment as for Bromine)
- Antimony [air, urban air close to ground]: 9.6351e-11 kg; lognormal variance with pedigree 1.3773, pedigree (1,1,4,1,1)
  (same comment as for Hydrogen fluoride)
- Nickel [soil, industrial]: 1.9194e-5 kg; lognormal variance with pedigree 1.1894, pedigree (1,1,4,1,1)
  (same comment as for Bromine)
- Lead [air, urban air close to ground]: 3.6623e-6 kg; lognormal variance with pedigree 0.82842, pedigree (1,1,4,1,1)
  (same comment as for Hydrogen fluoride)
- Manganese [soil, industrial]: 7.3939e-5 kg; lognormal variance with pedigree 1.0091, pedigree (1,1,4,1,1)
  (same comment as for Bromine)
- Selenium [air, urban air close to ground]: 1.6983e-7 kg; lognormal variance with pedigree 1.5057, pedigree (1,1,4,1,1)
  (same comment as for Hydrogen fluoride)
- Lead [soil, industrial]: 0.00043215 kg; lognormal variance with pedigree 0.77466, pedigree (1,1,4,1,1)
  (same comment as for Bromine)
- Nickel [air, urban air close to ground]: 2.7423e-8 kg; lognormal variance with pedigree 1.2829, pedigree (1,1,4,1,1)
  (same comment as for Hydrogen fluoride)
- Mercury [soil, industrial]: 3.1213e-7 kg; lognormal variance with pedigree 1.61, pedigree (1,1,4,1,1)
  (same comment as for Bromine)
- Manganese [air, urban air close to ground]: 6.3478e-7 kg; lognormal variance with pedigree 1.0626, pedigree (1,1,4,1,1)
  (same comment as for Hydrogen fluoride)
- Chromium [soil, industrial]: 3.8075e-5 kg; lognormal variance with pedigree 1.0984, pedigree (1,1,4,1,1)
  (same comment as for Bromine)
- Mercury [air, urban air close to ground]: 4.8021e-7 kg; lognormal variance with pedigree 1.6083, pedigree (1,1,4,1,1)
  (same comment as for Hydrogen fluoride)
- Copper [soil, industrial]: 0.00029608 kg; lognormal variance with pedigree 0.82564, pedigree (1,1,4,1,1)
  (same comment as for Bromine)
- Copper [air, urban air close to ground]: 3.2578e-7 kg; lognormal variance with pedigree 0.92567, pedigree (1,1,4,1,1)
  (same comment as for Hydrogen fluoride)
- Cadmium [soil, industrial]: 7.5358e-5 kg; lognormal variance with pedigree 1.00694, pedigree (1,1,4,1,1)
  (same comment as for Bromine)
- Chromium [air, urban air close to ground]: 5.6862e-8 kg; lognormal variance with pedigree 1.1908, pedigree (1,1,4,1,1)
  (same comment as for Hydrogen fluoride)
- Cobalt [soil, industrial]: 2.8289e-5 kg; lognormal variance with pedigree 1.1326, pedigree (1,1,4,1,1)
  (same comment as for Bromine)
- Cobalt [air, urban air close to ground]: 1.1889e-6 kg; lognormal variance with pedigree 1.1587, pedigree (1,1,4,1,1)
  (same comment as for Hydrogen fluoride)
- Fluoride [soil, industrial]: 1.2255e-5 kg; lognormal variance with pedigree 1.2341, pedigree (1,1,4,1,1)
  (same comment as for Bromine)
- Cadmium [air, urban air close to ground]: 4.2878e-7 kg; lognormal variance with pedigree 1.0689, pedigree (1,1,4,1,1)
  (same comment as for Hydrogen fluoride)
- Arsenic [soil, industrial]: 1.7578e-6 kg; lognormal variance with pedigree 1.503, pedigree (1,1,4,1,1)
  (same comment as for Bromine)
- Barium [air, urban air close to ground]: 7.1728e-6 kg; lognormal variance with pedigree 0.92209, pedigree (1,1,4,1,1)
  (same comment as for Hydrogen fluoride)
- Barium [soil, industrial]: 0.00016686 kg; lognormal variance with pedigree 0.89633, pedigree (1,1,4,1,1)
  (same comment as for Bromine)

## Extrapolations
This dataset has been extrapolated from year 2012 to the year of the calculation (2021). The uncertainty has been adjusted accordingly.
