# road vehicle factory construction

Dataset: EcoSpold 2, unit process
Geography: RER
Time period: 1990-01-01 to 2021-12-31
Technology level: current
Classification: ISIC rev.4 ecoinvent: 4100:Construction of buildings
Classification: EcoSpold01Categories: transport systems/road
Tags: ConvertedDataset
Scenario: Business-as-Usual
System model: Allocation, cut-off by classification
Generated by: Michael Spielmann (obsolete)
Published in: Spielmann M. 2007
Database: ecoinvent
isCopyrightProtected: true
accessRestrictedTo: 1

## General comment
The dataset represents the constructio of one road vehicle factory with a life span of 50 years.
[This dataset was already contained in the ecoinvent database version 2. It was not individually updated during the transfer to ecoinvent version 3. Life Cycle Impact Assessment results may still have changed, as they are affected by changes in the supply chain, i.e. in other datasets. This dataset was generated following the ecoinvent quality guidelines for version 2. It may have been subject to central changes described in the ecoinvent version 3 change report (http://www.ecoinvent.org/database/ecoinvent-version-3/reports-of-changes/), and the results of the central updates were reviewed extensively. The changes added e.g. consistent water flows and other information throughout the database. The documentation of this dataset can be found in the ecoinvent reports of version 2, which are still available via the ecoinvent website. The change report linked above covers all central changes that were made during the conversion process.]

## Included activities start
The activity starts with the construction of the building.

## Included activities end
The dataset ends with the construction of one road vehicle factory. The dataset includes the construction of the buildings and the roads and the land use of the area.

## Geography
Data for parking and road represent Swiss conditions. Buildings represent Swiss and German conditions. Land use represents a German plant.

## Technology
no technologies are specified

## Time period
The specific land use is presented assuming a total life span of the infrastructure of 50 years. For material and energy consumption due to the construction and disposal of buildings on a factory site, no specific data was available. In consequence, we employed the generic modules as available from Kellenberger et al. (2003). We further assume that 70% of the built up area is occupied with building halls and 30% are used for office buildings (multi storey buildings) with an assumed height between the floors of 2.7m Kellenberger et al. (2003) and further assume an average of 5 floors. The remaining sealed area is modelled as road and parking infrastructure employing the module “roads, company, internal”.
References:
Kellenberger D., Althaus H.-J. and Jungbluth N. (2003) Life Cycle Inventories of Building Products. Final report ecoinvent 2000 No. 7. EMPA Duebendorf, Swiss Centre for Life Cycle Inventories, Duebendorf, CH, Online-Version under: www.ecoinvent.ch.

## Reference product
- road vehicle factory: 1 unit; By-product classification allocatable product; CPC 53269: Other constructions for manufacturing
  EcoSpold01Location=RER
  production volume 1.32237 unit
    This is a placeholder value that does not reflect real-world production volumes. This dataset does not currently require a real-world production volume to work in the database framework, and no actual data were collected yet. This has no negative effect on the results of the ecoinvent database. The placeholder value of this activity was scaled according to the nominal GDP of 2005 (source: United Nations, http://data.un.org/Glossary.aspx?q=GDP+%28current+US%24%29, accessed 20130726) to reflect an appropriate share of the global production volume, which is also a placeholder value.
  property price 9.14659e7 EUR2005
    Calculated based on inputs: The price of the product has been calculated as a sum of the values of the material and energy inputs for this product. This value is therefore a rough estimation. It may underestimate the real price since there are additional expenses when producing any product. These expences can include for example labour costs, treatment of waste materials and profit for the producer. Please consider carefully whether this level of data quality is acceptable for your application.

## Inputs from technosphere
- building, hall: 240000 m2; source MAN Nutzfahrzeuge AG 2000; lognormal variance with pedigree 0.4107, pedigree (4,4,5,3,2)
  EcoSpold01Location=CH
  Calculated value. The data input is established on own calculations based on figures obtained from MAN Nutzfahrzeuge AG (2000). Is assumed that 70% of the built up area is occupied with building halls and 30% are used for office buildings (multi storey buildings) with an assumed height between the floors of 2.7m Kellenberger et al. (2003) and further assume an average of 5 floors.
  Further references:
  Kellenberger D., Althaus H.-J. and Jungbluth N. (2003) Life Cycle Inventories of Building Products. Final report ecoinvent 2000 No. 7. EMPA Duebendorf, Swiss Centre for Life Cycle Inventories, Duebendorf, CH, Online-Version under: www.ecoinvent.ch.
  Uncertainty: environmental report and own calculations
- building, multi-storey: 361000 m3; source MAN Nutzfahrzeuge AG 2000; lognormal variance with pedigree 0.4107, pedigree (4,4,5,3,2)
  Calculated value. The data input is established on own calculations based on figures obtained from MAN Nutzfahrzeuge AG (2000). Is assumed that 70% of the built up area is occupied with building halls and 30% are used for office buildings (multi storey buildings) with an assumed height between the floors of 2.7m Kellenberger et al. (2003) and further assume an average of 5 floors.
  Further references:
  Kellenberger D., Althaus H.-J. and Jungbluth N. (2003) Life Cycle Inventories of Building Products. Final report ecoinvent 2000 No. 7. EMPA Duebendorf, Swiss Centre for Life Cycle Inventories, Duebendorf, CH, Online-Version under: www.ecoinvent.ch.
  EcoSpold01Location=RER
  Uncertainty: environmental report and own calculations
- road, company, internal: 3.08e7 m2*year; source MAN Nutzfahrzeuge AG 2000; lognormal variance with pedigree 0.4107, pedigree (4,4,5,3,2)
  Calculated value. The data input is established on own calculations based on figures obtained from MAN Nutzfahrzeuge AG (2000). Is assumed that 70% of the built up area is occupied with building halls and 30% are used for office buildings (multi storey buildings) with an assumed height between the floors of 2.7m Kellenberger et al. (2003) and further assume an average of 5 floors.
  Further references:
  Kellenberger D., Althaus H.-J. and Jungbluth N. (2003) Life Cycle Inventories of Building Products. Final report ecoinvent 2000 No. 7. EMPA Duebendorf, Swiss Centre for Life Cycle Inventories, Duebendorf, CH, Online-Version under: www.ecoinvent.ch.
  EcoSpold01Location=CH
  Uncertainty: environmental report and own calculations

## Inputs from nature
- Transformation, to industrial area [natural resource, land]: 1.032e6 m2; source MAN Nutzfahrzeuge AG 2000; lognormal variance with pedigree 0.172, pedigree (1,4,5,1,1)
  Calculated value. The data input is established on own calculations based on figures obtained from MAN Nutzfahrzeuge AG (2000).
  Uncertainty: environmental report and own calculations
- Transformation, from unspecified [natural resource, land]: 1.03e6 m2; source MAN Nutzfahrzeuge AG 2000; lognormal variance with pedigree 0.172, pedigree (1,4,5,1,1)
  (same comment as for Transformation, to industrial area)
- Occupation, industrial area [natural resource, land]: 5.167e7 m2*year; source MAN Nutzfahrzeuge AG 2000; lognormal variance with pedigree 0.092, pedigree (1,4,5,1,1)
  (same comment as for Transformation, to industrial area)

## Sampling procedure
Land use data represents two plants in the lorry production (inal ssembly and maufacturing of metal parts). The yearly production is about 22000 heavy duy vehicles. A 50 year life span of the infrastructure is assumed. Data fo buildings on site is based on own assumptions.

## Extrapolations
This dataset has been extrapolated from year 2000 to the year of the calculation (2021). The uncertainty has been adjusted accordingly.

## Review by Emilia Moreno Ruiz 2012-02-16
trainee DS, ok, liliane Klemann

## Review by Niels Jungbluth 2003-08-27
passed.
