# treatment of used ventilation control and wiring, decentralized unit

Dataset: EcoSpold 2, unit process
Geography: CH
Time period: 2000-01-01 to 2021-12-31
Technology level: current
Classification: ISIC rev.4 ecoinvent: 3830:Materials recovery
Classification: EcoSpold01Categories: waste management/building demolition
Tags: ConvertedDataset; Treatment
Scenario: Business-as-Usual
System model: Allocation, cut-off by classification
Generated by: Alex Primas
Published in: Hässig, W. 2007
Database: ecoinvent
isCopyrightProtected: true
accessRestrictedTo: 1

## General comment
Disposal of the basic control unit for decentral ventilation equipment with 120 m3/h nominal air flow. Electrical wiring for connection of unit and grid connection. Weight of control unit 0.6 kg, weight of wiring 1.58 kg. Electrical wiring for connection of unit
[This dataset was already contained in the ecoinvent database version 2. It was not individually updated during the transfer to ecoinvent version 3. Life Cycle Impact Assessment results may still have changed, as they are affected by changes in the supply chain, i.e. in other datasets. This dataset was generated following the ecoinvent quality guidelines for version 2. It may have been subject to central changes described in the ecoinvent version 3 change report (http://www.ecoinvent.org/database/ecoinvent-version-3/reports-of-changes/), and the results of the central updates were reviewed extensively. The changes added e.g. consistent water flows and other information throughout the database. The documentation of this dataset can be found in the ecoinvent reports of version 2, which are still available via the ecoinvent website. The change report linked above covers all central changes that were made during the conversion process.]

## Included activities end
Transport to dismantling facilities, machines for handling in sorting plant, electricity demand for sorting plant, final disposal of waste material. Cut-off to recycling for metals.

## Geography
Specific to the technology mix encountered in sorting plants in Switzerland

## Technology
Disposal to a sorting plant assumed. Metal pieces and copper in cables and electronic devices are recycled, plastic parts are incinerated, inert wastes (e.g. rock wool) are landfilled.

## Time period
Amount of material investigated in 2003. Disposal technology mix as used in late 1990ies

## Reference product
- used ventilation control and wiring decentralized unit: -1 unit; By-product classification Waste; CPC 39990: Other wastes n.e.c.
  EcoSpold01Location=CH
  production volume 0.0336675 unit
    This is a placeholder value that does not reflect real-world production volumes. This dataset does not currently require a real-world production volume to work in the database framework, and no actual data were collected yet. This has no negative effect on the results of the ecoinvent database. The placeholder value of this activity was scaled according to the nominal GDP of 2005 (source: United Nations, http://data.un.org/Glossary.aspx?q=GDP+%28current+US%24%29, accessed 20130726) to reflect an appropriate share of the global production volume, which is also a placeholder value.
  property price 0 EUR2005
    Waste products are assigned a price of zero as they are assumed to require further treatment.
  property carbon content 0.275724
    carbon content on a dry matter basis (reserved; not for manual entry)
  properties: water content 0, carbon content, fossil 0.275687, wet mass 2.18 kg, carbon content, non-fossil 3.69963e-5, water in wet mass 0 kg, dry mass 2.18 kg, carbon allocation 0.601078 kg

## Inputs from technosphere
- electronics scrap from control units: -0.6 kg; lognormal variance with pedigree 0.072, pedigree (3,4,5,1,3)
  Estimation based on data of Questionnaire
  EcoSpold01Location=RER
  Uncertainty: Estimation based on data of Questionnaire
  production volume 0.6 kg
    Calculated from the production volume of used ventilation control and wiring decentralized unit in proportion to the respective output amounts.
  properties: carbon content, non-fossil 0.00013442, dry mass 1 kg, wet mass 1 kg, carbon content, fossil 0.337146
- waste electric wiring: -1.01 kg; lognormal variance with pedigree 0.072, pedigree (3,4,5,1,3)
  EcoSpold01Location=CH
  Estimation based on data of Questionnaire
  Uncertainty: Estimation based on data of Questionnaire
  production volume 1.01 kg
    (same comment as for electronics scrap from control units)
  properties: wet mass 1 kg, dry mass 1 kg, carbon content, fossil 0.34
  note on carbon content, fossil: The waste contains 0.615kg cable insulation (Wire insulation is calculated as 66.3% PVC, 31.2% PE and contains 2.5% copper) and 0.385kg copper (ecoinvent v2.2 report 13_I). So, 40% copper and 40%PVC, 20%PE. C contents in PVC and PE from tab A.1, ecoinvent v2.2 report 13_I

## Sampling procedure
Questionnaire and assumptions.

## Extrapolations
This dataset has been extrapolated from year 2000 to the year of the calculation (2021). The uncertainty has been adjusted accordingly.

## Review by Rolf Frischknecht 2007-08-16
passed
none
