# sodium silicate production, furnace process, solid product

Dataset: EcoSpold 2, unit process
Geography: RER
Time period: 1995-01-01 to 2021-12-31
Technology level: current
Classification: EcoSpold01Categories: chemicals/inorganics
Classification: ISIC rev.4 ecoinvent: 2011:Manufacture of basic chemicals
Tags: ConvertedDataset
Scenario: Business-as-Usual
System model: Allocation, cut-off by classification
Generated by: Roland Hischier
Published in: Zah R. 2007
Database: ecoinvent
isCopyrightProtected: true
accessRestrictedTo: 1

## General comment
This dataset represents the production of 1 kg of sodium silicate solid (100%) from furnace process.
Material and energy inputs as well as waste production and emission to air and water are based on literature sources. Transport and infrastructure are estimation based on a large chemical plant.
[This dataset was already contained in the ecoinvent database version 2. It was not individually updated during the transfer to ecoinvent version 3. Life Cycle Impact Assessment results may still have changed, as they are affected by changes in the supply chain, i.e. in other datasets. This dataset was generated following the ecoinvent quality guidelines for version 2. It may have been subject to central changes described in the ecoinvent version 3 change report (http://www.ecoinvent.org/database/ecoinvent-version-3/reports-of-changes/), and the results of the central updates were reviewed extensively. The changes added e.g. consistent water flows and other information throughout the database. The documentation of this dataset can be found in the ecoinvent reports of version 2, which are still available via the ecoinvent website. The change report linked above covers all central changes that were made during the conversion process.]

## Included activities start
From reception of soda, silica sand, and general chemicals at the factory gate

## Included activities end
This activity ends with the production of 1 kg of sodium silicate solid (100%). The dataset includes material and energy input, production of waste and emissions for the production of sodium phosphate out of phosphoric acid, transport, infrastructure.

## Geography
average data from 6 Euroopean producers

## Technology
The furnace process is one of the two main processes used to produce sodium silicate. The other one is the hydrothermal process.
In the furnace process, water glass is produced directly by melting pure silicon sand and soda. Temperatures of approx. 1400 °C are required for this process. The sodium silicate produced can then be used directly in a solid form.
This represents an average technology in Europe.

## Time period
date of published literature

## Parameters
- fraction, cooling water, cooling pond system, to air: 0.032 dimensionless; name fraction_CW_CP_to_air; lognormal variance with pedigree 0.0413, pedigree (2,3,1,3,1)
  Calculated based on literature value (Scown, C.D., 2011, Water Footprint of U.S. Transportation Fuels and supplying information of the article) (Vionnet, S., Quantis Water Database - Technical Report, 2012).
- fraction, cooling water, once-through system, to air: 0.004 dimensionless; name fraction_CW_OT_to_air; lognormal variance with pedigree 0.0413, pedigree (2,3,1,3,1)
  (same comment as for fraction, cooling water, cooling pond system, to air)
- fraction, process water, to air: 0.205 dimensionless; name fraction_PW_to_air; lognormal variance with pedigree 0.092025, pedigree (4,4,3,2,4)
  Literature value (Statistics Canada, 2007 & Shaffer, K.H., 2008, Consumptive water use in the Great Lakes Basin, USGS) (Vionnet, S., Quantis Water Database - Technical Report, 2012).
- fraction, cooling water, to air: 0.3875 dimensionless; name fraction_CW_to_air; = (0.5*fraction_CW_OT_to_air)+(0.5*fraction_CW_R_to_air); lognormal variance with pedigree 0.092025, pedigree (4,4,3,2,4)
  Calculated value based on literature value (see comments of the other parametres present in this dataset) and expert opinion. In the case when no industry/literature data are available about the type of cooling or directly fraction, cooling water, to air specific for the process a default assumption is applied. It is assumed that the once-through cooling system is used in 50% of all cases and recirculating system is used in another 50% of all cases.
- fraction, cooling water, recirculating system, to air: 0.771 dimensionless; name fraction_CW_R_to_air; lognormal variance with pedigree 0.0413, pedigree (2,3,1,3,1)
  (same comment as for fraction, cooling water, cooling pond system, to air)

## Reference product
- sodium silicate, solid: 1 kg; source Fawer M. 1997; By-product classification allocatable product; CPC 34270: Cyanides, cyanide oxides and complex cyanides; fulminates, cyanates and thiocyanates; silicates; borates; perb[…]; CAS 6834-92-0
  The solid portions of the surface of the Earth consist predominantly of silicon and oxygen atoms in the form of silica and silicates. The use of Earth’s silica and silicate resources is thus the oldest technology on the planet. Nowadays, the range of application of silica and silicates is mainly in the following three fields: detergents, chemicals, adhesives. As a detergent ingredient or wash alkali, sodium silicates raise the pH value and dirt and textile fibres become more strongly negatively charged increasing their mutual electrostatic repulsion. Apart from this, the hardness components of the water are eliminated by complex formation.
  EcoSpold01Location=RER
  production volume 1.32237 kg
    This is a placeholder value that does not reflect real-world production volumes. This dataset does not currently require a real-world production volume to work in the database framework, and no actual data were collected yet. This has no negative effect on the results of the ecoinvent database. The placeholder value of this activity was scaled according to the nominal GDP of 2005 (source: United Nations, http://data.un.org/Glossary.aspx?q=GDP+%28current+US%24%29, accessed 20130726) to reflect an appropriate share of the global production volume, which is also a placeholder value.
  property price 0.22 EUR2005
    Calculated value based on data from United Nations Commodity Trade Statistics Database (comtrade.un.org). UN comtrade category: 283919 Silicates of sodium other than metasilicates. Year 2005. Using exchange rate of 1EURO = 1.209 USD. Average of price of import into 5 main markets (EU, US, JP, IN and CN).
  property carbon content 0
    carbon content on a dry matter basis (reserved; not for manual entry)
  properties: water content 0, dry mass 1 kg, carbon content, non-fossil 0, water in wet mass 0 kg, carbon content, fossil 0, wet mass 1 kg, carbon allocation 0 kg

## Inputs from technosphere
- chemical factory, organics: 4e-10 unit; lognormal variance with pedigree 0.5861, pedigree (4,5,5,3,5)
  EcoSpold01Location=RER
  Estimation: estimation based on a large chemical plant.
  Uncertainty: estimation
- electricity, medium voltage: 0.0332 kWh; source Fawer M. 1997; lognormal variance with pedigree 0.0407, pedigree (2,2,5,1,1)
  EcoSpold01Location=UCTE
  Literature Value.
  Uncertainty: Average data from 6 European producers
- silica sand: 0.772 kg; source Fawer M. 1997; lognormal variance with pedigree 0.0407, pedigree (2,2,5,1,1)
  Literature Value.
  EcoSpold01Location=DE
  Uncertainty: Average data from 6 European producers
  properties: water content 0.010101, dry mass 0.99 kg, wet mass 1 kg
- chemical, organic: 0.0001 kg; source Fawer M. 1997; lognormal variance with pedigree 0.0407, pedigree (2,2,5,1,1)
  Literature Value.
  EcoSpold01Location=GLO
  Uncertainty: Average data from 6 European producers
  properties: heating value, net 19.03 MJ, carbon content, fossil 0.628, wet mass 1 kg, dry mass 1 kg
  note on carbon content, fossil: This dataset is an unweighted average of 20 organic substances (listed in Tab 88.1, ecoinvent v2.2 report 8, part II), being part of the top100 chemicals included in this database. The C-content has also been calculated as an unweighted average of the C content of the substances composing this dataset.
- average incineration residue: -0.00065 kg; source Fawer M. 1997; lognormal variance with pedigree 0.0407, pedigree (2,2,5,1,1)
  EcoSpold01Location=CH
  Literature Value.
  Uncertainty: Average data from 6 European producers
  production volume 0.00065 kg
    Calculated from the production volume of sodium silicate, solid in proportion to the respective output amounts.
  properties: carbon content, fossil 0.0325466, carbon content, non-fossil 0.0511208, dry mass 1 kg, wet mass 1 kg
  note on carbon content, fossil: Tab A.1, ecoinvent v2.2 report 13_I. It is considered that 61.1% of the C has a biogenic origin
- heat, district or industrial, natural gas: 2.21 MJ; source Fawer M. 1997; lognormal variance with pedigree 0.0407, pedigree (2,2,5,1,1)
  EcoSpold01Location=RER
  Literature Value.
  Uncertainty: Average data from 6 European producers
  properties: heating value, net 1 MJ
- heat, district or industrial, other than natural gas: 2.25 MJ; source Fawer M. 1997; lognormal variance with pedigree 0.0407, pedigree (2,2,5,1,1)
  (same comment as for heat, district or industrial, natural gas)
  properties: heating value, net 1 MJ
- steam, in chemical industry: 0.0073 kg; source Fawer M. 1997; lognormal variance with pedigree 0.0407, pedigree (2,2,5,1,1)
  (same comment as for heat, district or industrial, natural gas)
  properties: wet mass 1 kg
- soda ash, light, crystalline, heptahydrate: 0.4 kg; source Fawer M. 1997; lognormal variance with pedigree 0.0407, pedigree (2,2,5,1,1)
  (same comment as for heat, district or industrial, natural gas)
  properties: heating value, net 3.43 MJ, carbon content, fossil 0.0517241, dry mass 1 kg, wet mass 1 kg

## Inputs from nature
- Water, cooling, unspecified natural origin [natural resource, in water]: 0.00094 m3; name water_cooling_UNO_input; source Fawer M. 1997; lognormal variance with pedigree 0.0407, pedigree (2,2,5,1,1)
  Literature Value.
  Uncertainty: Average data from 6 European producers
- Water, unspecified natural origin [natural resource, in water]: 0.00046 m3; name water_UNO_input; source Fawer M. 1997; lognormal variance with pedigree 0.0407, pedigree (2,2,5,1,1)
  Literature Value.
  Uncertainty: Average data from 6 European producers

## Emissions to nature
- Suspended solids, unspecified [water, surface water]: 4.2e-6 kg; source Fawer M. 1997; lognormal variance with pedigree 0.0807, pedigree (2,2,5,1,1)
  Literature Value.
  Uncertainty: Average data from 6 European producers
- Carbon dioxide, fossil [air, urban air close to ground]: 0.165 kg; source Fawer M. 1997; lognormal variance with pedigree 0.0407, pedigree (2,2,5,1,1)
  Literature Value.
  Uncertainty: Average data from 6 European producers
- COD, Chemical Oxygen Demand [water, surface water]: 3e-9 kg; source Fawer M. 1997; lognormal variance with pedigree 0.0807, pedigree (2,2,5,1,1)
  Literature Value.
  Uncertainty: Average data from 6 European producers
- TOC, Total Organic Carbon [water, surface water]: 1.11111e-9 kg; lognormal variance with pedigree 0.0807, pedigree (2,2,5,1,1)
  Calculated value: calculated by default as TOC (gC) = COD/2.7 (COD measured in g O2).
  Uncertainty: Average data from 6 European producers
- Water [air, unspecified]: 0.00045855 m3; name water_to_air_unspecified; = (water_cooling_UNO_input*fraction_CW_to_air)+(water_UNO_input*fraction_PW_to_air); lognormal variance with pedigree 0.0807, pedigree (2,2,5,1,1)
  Calculated value based on literature values and expert opinion. See comments in the parametres' comment field.
  property fraction, origin: unspecified 1; name fraction_origin_unspecified
  property fraction, origin: fresh water 0; name fraction_origin_fresh_water
  property fraction, origin: salt water 0; name fraction_origin_salt_water
- BOD5, Biological Oxygen Demand [water, surface water]: 1.7e-7 kg; source Fawer M. 1997; lognormal variance with pedigree 0.0807, pedigree (2,2,5,1,1)
  Literature Value.
  Uncertainty: Average data from 6 European producers
- DOC, Dissolved Organic Carbon [water, surface water]: 1.11111e-9 kg; lognormal variance with pedigree 0.0807, pedigree (2,2,5,1,1)
  Calculated value: calculated by default as DOC (gC) = COD/2.7 (COD measured in g O2).
  Uncertainty: Average data from 6 European producers
- Water [water, unspecified]: 0.00094145 m3; name water_to_water_unspecified; = water_cooling_UNO_input*(1-fraction_CW_to_air)+water_UNO_input*(1-fraction_PW_to_air); lognormal variance with pedigree 0.0807, pedigree (2,2,5,1,1)
  (same comment as for Water)
  property fraction, origin: fresh water 0; name fraction_origin_fresh_water_Ww
  property fraction, origin: salt water 0; name fraction_origin_salt_water_Ww
  property fraction, origin: unspecified 1; name fraction_origin_unspecified_Ww
  property water in wet mass 1000 kg; name WWM
  property wet mass 1000 kg; name WM
  property carbon content, fossil 0; name C_content_fossil
  property carbon content, non-fossil 0; name C_content_non_fossil
  property dry mass 0 kg; name DM

## Extrapolations
This dataset has been extrapolated from year 1995 to the year of the calculation (2021). The uncertainty has been adjusted accordingly.

## Review by Heiko Kunst 2003-06-20
Passed
Passed

## Review by Roland Hischier 2011-11-15
Transfer of documentation done.
