# white spirit to generic market for solvent for paint

Dataset: EcoSpold 2, unit process
Geography: GLO
Time period: 2017-01-01 to 2021-12-31
Technology level: current
Classification: ISIC rev.4 ecoinvent: 2022:Manufacture of paints, varnishes and similar coatings, printing ink and mas
Scenario: Business-as-Usual
System model: Allocation, cut-off by classification
Generated by: Lucia Valsasina
Database: ecoinvent
isCopyrightProtected: true
accessRestrictedTo: 1

## General comment
This is a linking activity which links the product white spirit to the generic market for solvents for paint. All chemicals that enter this market provide the function of a solvent for paint.

## Included activities start
The activity starts with the reception of turpentine.

## Included activities end
The activity ends with the production of solvent for paint for the generic market

## Reference product
- solvent for paint: 1 kg; By-product classification allocatable product; CPC 3511: Paints and varnishes and related products
  production volume 2.2555e10 kg; = 3.47E+10 * 0.65
    The global production volume of white spirit is estimated to be 3.47E+10kg for the year 2016 (see ecoinvent datset “white spirit production, GLO, 2020”, accessed 1.6.2018). Literature indicates that roughly between 60% (value for Europe, WHO, 1996) and 70% (value for Denmark, DEPA, 2014) of white spirit are used as solvents for paint. For a lack more precise data it was therefore assumed that 65% of global white spirit production are supplied to a generic market for solvents for paints. This is 3.47E+10kg * 0.65 = 2.256E+10 kg.
    Reference(s):
    The Danish Environmental Protection Agency (DEPA). 2014. Survey of white spirit. Part of the LOUS-review Envorinmental Project No. 1546, 2014. <https://www2.mst.dk/Udgiv/publications/2014/01/978-87-92903-96-9.pdf>, 11.6.2018
    WORLD HEALTH ORGANIZATION (WHO). 1996. IPCS INTERNATIONAL PROGRAMME ON CHEMICAL SAFETY, Health and Safety Guide No. 103, WHITE SPIRIT (STODDARD SOLVENT), HEALTH AND SAFETY GUIDE, <http://www.inchem.org/documents/hsg/hsg/hsg103.htm>, 11.6.2018
  property heating value, net 26.16 MJ
    LHV is calculated based on the Carbon content of the product. More details can be found on the respective documentation.
  property price 1.2225 EUR2005
    Estimated value. Average of price of white spirit and turpentine.
  property carbon content 0.863404
    carbon content on a dry matter basis (reserved; not for manual entry)
  properties: water in wet mass 0 kg, water content 0, wet mass 1 kg, carbon content, non-fossil 0, dry mass 1 kg, carbon content, fossil 0.863404, carbon allocation 0.863404 kg

## Inputs from technosphere
- white spirit: 1 kg
  properties: dry mass 1 kg, carbon content, fossil 0.863404, wet mass 1 kg, heating value, net 45 MJ
  note on carbon content, fossil: The most common variety of white spirit is a mixture of saturated aliphatic and alicyclic C7-C12 hydrocarbons with a content of 15-20% (by weight) of aromatic C7-C12 hydrocarbons (ecoinvent v2.2 report 8-part 94). The average composition was assumed as being 82.5% C9.5 saturated aliphatic and alicyclic hydrocarbons (average formula C9.5H20), and 17.5% C9.5 aromatic hydrocarbons (average formula C9.5H9.5).

## Extrapolations
This dataset has been extrapolated from year 2020 to the year of the calculation (2021). The uncertainty has been adjusted accordingly.
