# chloroacetic acid production

Dataset: EcoSpold 2, unit process
Geography: RoW
Time period: 1997-01-01 to 2021-12-31
Technology level: current
Classification: EcoSpold01Categories: chemicals/organics
Classification: ISIC rev.4 ecoinvent: 2011:Manufacture of basic chemicals
Tags: ConvertedDataset
Scenario: Business-as-Usual
System model: Allocation, cut-off by classification
Generated by: Mike Chudacoff
Published in: Althaus H.-J. 2007
Database: ecoinvent
isCopyrightProtected: true
accessRestrictedTo: 1

## General comment
Production of monochloroacetic acid (MCA) from the reaction of acetic acid with chlorine.
[This dataset was already contained in the ecoinvent database version 2. It was not individually updated during the transfer to ecoinvent version 3. Life Cycle Impact Assessment results may still have changed, as they are affected by changes in the supply chain, i.e. in other datasets. This dataset was generated following the ecoinvent quality guidelines for version 2. It may have been subject to central changes described in the ecoinvent version 3 change report (http://www.ecoinvent.org/database/ecoinvent-version-3/reports-of-changes/), and the results of the central updates were reviewed extensively. The changes added e.g. consistent water flows and other information throughout the database. The documentation of this dataset can be found in the ecoinvent reports of version 2, which are still available via the ecoinvent website. The change report linked above covers all central changes that were made during the conversion process.]

## Included activities end
All precursors and transports, as well as infrastructure.

## Geography
RER

## Technology
based on literature data and plant data in Europe and North America

## Reference product
- chloroacetic acid: 1 kg; By-product classification allocatable product; CPC 34120: Industrial monocarboxylic fatty acids; acid oils from refining; CAS 79-11-8
  EcoSpold01Location=RER
  production volume 2.67763 kg
    This is a placeholder value that does not reflect real-world production volumes. This dataset does not currently require a real-world production volume to work in the database framework, and no actual data were collected yet. This has no negative effect on the results of the ecoinvent database.
  property price 0.83 EUR2005
    Calculated value based on data from United Nations Commodity Trade Statistics Database (comtrade.un.org). UN comtrade category: 291540 Mono-, di-, tri- chloroacetic acids, salts & esters. Year 2005. Using exchange rate of 1EURO = 1.209 USD. Average of price of import into 5 main markets (EU, US, JP, IN and CN).
  property heating value, net 11.55 MJ
    LHV is calculated based on the elemental composition of the substance. Based on the CAS number of the substance (000079-11-8), the chemical formula of the substance is found to be: C2H3ClO2, (PubChem 2020).
    Reference: Kim, S., Chen, J., Cheng, T., Gindulyte, A., He, J., He, S., Li, Q., Shoemaker, B. A., Thiessen, P. A., Yu, B., Zaslavsky, L., Zhang, J., & Bolton, E. E. (2019). PubChem 2019 update: improved access to chemical data. Nucleic acids research, 47(D1), D1102–D1109. https://doi.org/10.1093/nar/gky1033
  property carbon content 0.255319
    carbon content on a dry matter basis (reserved; not for manual entry)
  properties: carbon content, fossil 0.255319, water in wet mass 0 kg, water content 0, carbon content, non-fossil 0, dry mass 1 kg, wet mass 1 kg, carbon allocation 0.255319 kg

## Inputs from technosphere
- heat, district or industrial, natural gas: 0 MJ; pedigree (1,1,1,1,1)
  Uncertainty: steam production
  properties: heating value, net 1 MJ
- electricity, medium voltage: 0 kWh; pedigree (1,1,1,1,1)
  Power
  EcoSpold01Location=UCTE
  Uncertainty: power
- heat, district or industrial, other than natural gas: 0 MJ; pedigree (1,1,1,1,1)
  Uncertainty: steam production
  properties: heating value, net 1 MJ
- acetic acid, without water, in 98% solution state: 0.66 kg; lognormal variance with pedigree 0.0426, pedigree (1,3,5,5,1)
  Precursor
  EcoSpold01Location=RER
  Uncertainty: precursor
  properties: heating value, net 14.6 MJ, carbon content, fossil 0.400016, dry mass 1 kg, wet mass 1 kg
  note on heating value, net: Based on literature, page 10, Althaus H.-J., Chudacoff M., Hischier R., Jungbluth N., Osses M. and Primas A. (2007) Life Cycle Inventories of Chemicals. Final report ecoinvent data v2.0 No. 8. EMPA, Swiss Centre for Life Cycle Inventories, Dübendorf, CH, Online-Version under: www.ecoinvent.org.
- chlorine, liquid: 0.76 kg; lognormal variance with pedigree 0.0426, pedigree (1,3,5,5,1)
  EcoSpold01Location=RER
  Precursor
  Uncertainty: precursor
  properties: dry mass 1 kg, wet mass 1 kg
- chemical factory, organics: 4e-10 unit; lognormal variance with pedigree 0.068, pedigree (4,5,5,5,1)
  Infrastructure
  EcoSpold01Location=RER
  Uncertainty: infrastructure
- heat, district or industrial, natural gas: 0.0207637, 1.34724 MJ (2 entries); lognormal variance with pedigree 0.0606, pedigree (4,3,5,5,1)
  Uncertainty: steam production
- electricity, medium voltage: 0.00112872, 0.00021644, 0.00363357, 0.0528471, 0.00744882, 0.0242694 kWh (6 entries); lognormal variance with pedigree 0.0426, pedigree (1,3,5,5,1)
  Power
  EcoSpold01Location=UCTE
  Uncertainty: power
- heat, district or industrial, other than natural gas: 0.000309505, 0.76325 MJ (2 entries); lognormal variance with pedigree 0.0606, pedigree (4,3,5,5,1)
  Uncertainty: steam production

## Emissions to nature
- Chlorine [air, urban air close to ground]: 0.00152 kg; lognormal variance with pedigree 0.0606, pedigree (4,3,5,5,1)
  Air emission
  Uncertainty: air emission
- Acetic acid [air, urban air close to ground]: 0.00132 kg; lognormal variance with pedigree 0.0606, pedigree (4,3,5,5,1)
  Air emission
  Uncertainty: air emission

## Sampling procedure
see technology

## Extrapolations
see technology This dataset has been copied from an original dataset covering the geography RER. The uncertainty has been adjusted accordingly.

## Review by Heiko Kunst 2003-07-06
Passed.
