# soda ash, dense, to generic market for neutralising agent

Dataset: EcoSpold 2, unit process
Geography: GLO
Time period: 2006-01-01 to 2021-12-31
Technology level: current
Classification: EcoSpold01Categories: chemicals/inorganics
Classification: ISIC rev.4 ecoinvent: 2011:Manufacture of basic chemicals
Synonyms: soda ash; sodium carbonate
Scenario: Business-as-Usual
System model: Allocation, cut-off by classification
Generated by: Sofia Parada Tur
Database: ecoinvent
isCopyrightProtected: true
accessRestrictedTo: 1

## General comment
This activity links the output of the market for soda ash, dense to the generic market for neutralising agent.

## Included activities start
Activity starting with the input of soda ash,dense from the modified Solvay process

## Included activities end
Activity ends with the proper conversion of soda ash to neutralising agent in NaOH-equivalents.

## Geography
based on geographical validity of dataset soda ash production, modified solvay process

## Technology
based on techmology validity of dataset soda ash production, modified solvay process

## Time period
based on temporal validity of dataset soda ash production, solvay process

## Reference product
- neutralising agent, sodium hydroxide-equivalent: 1 kg; name neutralising_agent_output; By-product classification allocatable product; CPC 342: Basic inorganic chemicals n.e.c.
  production volume 7.78868e6 kg; = ((0.02*2.58E+8) +(0.01*2.58E+8)+ 0.1*(0.1*2.58E+8))*1/ soda_ash_input
    The total soda ash, dense production in 2005 is 2.58E8, based on production volumes in the solvay process. There are two main grades of soda ash, namely dense and light. Because there is no specification as to what pecentage of each type of soda ash is used as a neutralising agent, it is assumed that each of them contributes 50% to the neutralising agent market for soda ash.
    The major applications of soda ash as a neutralising agent are in water treatment and the pulp and paper industry. This is stated on a market research by Marianne Wesnæs and Bo Weidema, 2.-0 LCA consultants,( www.lca-net.com, 2006-10-19. URL: http://www.lca-net.com/files/naoh.pdf Retrieved 13.02.2012)
    Other industries where it is used as a neutralising agent is in soap manufacturing and in the food processing industry. In both it is used only partly as neutralising agent, and also for other purposes. (source: Rizwan Mailk (Carnation Exports), Pakistan, 2012; URL: http://rizwan36.en.ec21.com/Soda_Ash_Light--3320168_3320198.html)
    The US geological survey indicates in 2005 that 10% of soda ash is used in soap & detergents, 2% in pulp and paper and 1% in water treatment. Specific uses in the food industry are not indicated, therefore it is not accounted for. In the detergent and soap manufacturing, it is assumed that 10% of the total consumption is actually for neutralising purposes.
    The production volume of sodium hydroxide equivalents is calculated based on the soda ash input.
  property price 0.376 EUR2005; name neutralising_agent_output_price_EUR2005
    Calculated value based on data from United Nations Commodity Trade Statistics Database (comtrade.un.org). UN comtrade category: 281511 Sodium hydroxide (caustic soda) solid. Year 2005. Using exchange rate of 1EURO = 1.209 USD. Average of price of import into 5 main markets (EU, US, JP, IN and CN).
  property carbon content 0
    carbon content on a dry matter basis (reserved; not for manual entry)
  properties: dry mass 1 kg, wet mass 1 kg, water in wet mass 0 kg, carbon content, non-fossil 0, water content 0, carbon content, fossil 0, carbon allocation 0 kg

## Inputs from technosphere
- soda ash, dense: 1.325 kg; name soda_ash_input; = neutralising_agent_output*1.325/1; source FMC corporation 1991; lognormal variance with pedigree 0.0506, pedigree (4,1,5,5,1)
  For neutralisation purposes, soda ash can substitute sodium hydroxide in a ratio 1.325/1
  properties: heating value, net 3.43 MJ, carbon content, fossil 0.113208, wet mass 1 kg, dry mass 1 kg

## Extrapolations
This dataset has been extrapolated from year 2006 to the year of the calculation (2021). The uncertainty has been adjusted accordingly.

## Review by Eric Johnson 2012-02-17
I'm satisfied with the revisions.

## Review by Bo Weidema 2012-02-17
Passed
