# rice production, non-basmati

Dataset: EcoSpold 2, unit process
Geography: US
Time period: 2001-01-01 to 2021-12-31
Technology level: current
Classification: ISIC rev.4 ecoinvent: 0112:Growing of rice
Scenario: Business-as-Usual
System model: Allocation, cut-off by classification
Share of production covered: 100 %
Generated by: Thomas Kägi
Published in: Nemecek, T. 2007
Database: ecoinvent
isCopyrightProtected: true
accessRestrictedTo: 1

## General comment
This dataset represents the production of 1 kg of rice (fresh matter). The yield is 6856 kg/ha at a moisture content at storage of 13%.
[This dataset was already contained in the ecoinvent database version 2. It was not individually updated during the transfer to ecoinvent version 3. Life Cycle Impact Assessment results may still have changed, as they are affected by changes in the supply chain, i.e. in other datasets. This dataset was generated following the ecoinvent quality guidelines for version 2. It may have been subject to central changes described in the ecoinvent version 3 change report (http://www.ecoinvent.org/database/ecoinvent-version-3/reports-of-changes/), and the results of the central updates were reviewed extensively. The changes added e.g. consistent water flows and other information throughout the database. The documentation of this dataset can be found in the ecoinvent reports of version 2, which are still available via the ecoinvent website. The change report linked above covers all central changes that were made during the conversion process.]
[This dataset is meant to replace the following datasets:
- rice production, US, 2001 - 2006]

## Included activities start
This activity starts after the harvest of the previous crop. The inputs of seeds, mineral fertilisers, pesticides and irrigation water are considered. It is assumed that no organic fertilisers are applied.

## Included activities end
The dataset includes all machine operations and corresponding machine infrastructure and sheds. Machine operations are: soil cultivation, sowing, fertilisation, irrigation, weed control, pest and pathogen control, combine-harvest, and drying of grains. Further, direct field emissions are included. This activity ends after harvest and drying of grains at the farm gate.

## Geography
Refers to an average production in the USA

## Technology
Conventional production typical for the country. Water for irrigation is pumped from 48 meter depth by electric pumps.

## Time period
The yield data have been collected for the years 2001-2006.

## Parameters
- fraction, irrigation water, to air: 0.6949 dimensionless; name fraction_IW_to_air; lognormal variance with pedigree 0.0409, pedigree (2,2,2,1,1)
  Literature value (Siebert, 2010) (Vionnet, S., Quantis Water Database - Technical Report, 2012).
- LUC_crop_specific: 1 dimensionless
  This parameter allows to switch between a "crop specific" and a "country specific" approach when calculating the LUC of a crop. By default, the chosen approach is "crop specific", so the value of the parameter is 1. If you want to apply a "country specific" approach, turn the parameter to 0.
- fraction, irrigation water to surface water: 0.2 dimensionless; name fraction_IW_to_surface_water; lognormal variance with pedigree 0.0886, pedigree (4,3,1,1,4)
  Literature value (Döll, 2011) cross referenced with expert opinion.
- fraction, irrigation water, to ground water: 0.8 dimensionless; name fraction_IW_to_ground_water; lognormal variance with pedigree 0.0886, pedigree (4,3,1,1,4)
  Literature value (Döll, 2011) cross referenced with expert opinion.

## Reference product
- rice, non-basmati: 1 kg; name REF_PRODUCT; By-product classification allocatable product; CPC 0113: Rice
  production volume 1.0167e10 kg
    Production quantity of rice, paddy in the United States of America in 2016 as reported in FAOSTAT.
    Reference: Food and Agricultural Organization of the United Nations, 2018, Crops data, available online at: http://www.fao.org/faostat/en/#data/QC
  property dry mass 0.87 kg; name REF_PRODUCT_DM
  property energy content 15.4077 MJ; name REF_PRODUCT_energy_content
    as gross calorific value (when relevant)
  property price 0.37 EUR2005; name REF_PRODUCT_price_EUR2005
    Calculated value based on data from United Nations Commodity Trade Statistics Database (comtrade.un.org). UN comtrade category: 1006 Rice. Year 2005. Using exchange rate of 1EURO = 1.209 USD. Average of price of import into 5 main markets (EU, US, JP, IN and CN).
  property carbon content, non-fossil 0.46412; name REF_PRODUCT_C_content_non_fossil
    biogene carbon content on a dry matter basis
  property carbon content 0.46412
    carbon content on a dry matter basis (reserved; not for manual entry)
  properties: carbon content, fossil 0, water content 0.149425, water in wet mass 0.13 kg, wet mass 1 kg, carbon allocation 0.403784 kg

## Inputs from technosphere
- ammonia, anhydrous, liquid: 0.011447 kg; lognormal variance with pedigree 0.0407, pedigree (2,2,5,1,1)
  See chapter 'Yields and Inputs of Arable Crop Production' in "01_crop production - yields & inputs US_v1.0.pdf" - pdf-document on the dedicated talk page of ecoinvent (www.ecoinvent.org/documentation)
  EcoSpold01Location=RER
  properties: wet mass 1 kg, dry mass 1 kg
- acetamide-anillide-compound, unspecified: 0.0002727 kg; lognormal variance with pedigree 0.0406, pedigree (2,1,5,1,1)
  EcoSpold01Location=CH
  See chapter 'Yields and Inputs of Arable Crop Production' in "01_crop production - yields & inputs US_v1.0.pdf" - pdf-document on the dedicated talk page of ecoinvent (www.ecoinvent.org/documentation)
  properties: wet mass 1 kg, dry mass 1 kg, carbon content, fossil 0.659175
  note on carbon content, fossil: Approximated as an unweighted average of the C-content of the acetamide-anillide-compound (Tab 2.25 Sutter, 2010) alachor, metolachlor, propachlor and teflubenzuron
- tillage, harrowing, by spring tine harrow: 0.00072929 ha; lognormal variance with pedigree 0.0407, pedigree (2,1,5,3,1)
  (same comment as for acetamide-anillide-compound, unspecified)
- ammonium nitrate: 0.0156227 kg; lognormal variance with pedigree 0.0407, pedigree (2,2,5,1,1)
  The exchange has been updated from 'ammonium nitrate, as N' into 'ammonium nitrate' and therefore its amount has been scaled (multiplied) from 0.0055 kg by 2.8573 kg of 'ammonium nitrate' per kg of 'ammonium nitrate, as N'. Original comment of the exchange is: See chapter 'Yields and Inputs of Arable Crop Production' in "01_crop production - yields & inputs US_v1.0.pdf" - pdf-document on the dedicated talk page of ecoinvent (www.ecoinvent.org/documentation)
  EcoSpold01Location=RER
  properties: dry mass 1 kg, wet mass 1 kg
- fertilising, by broadcaster: 0.00043758 ha; lognormal variance with pedigree 0.0407, pedigree (2,1,5,3,1)
  (same comment as for acetamide-anillide-compound, unspecified)
- pesticide, unspecified: 3.5344e-5 kg; lognormal variance with pedigree 0.0406, pedigree (2,1,5,1,1)
  See chapter 'Yields and Inputs of Arable Crop Production' in "01_crop production - yields & inputs US_v1.0.pdf" - pdf-document on the dedicated talk page of ecoinvent (www.ecoinvent.org/documentation)
  EcoSpold01Location=CH
  properties: wet mass 1 kg, dry mass 1 kg, carbon content, fossil 0.486978
  note on carbon content, fossil: Mean of C content in all pesticides whose formula has been documented in Sutter 2010
- tillage, cultivating, chiselling: 0.00014586 ha; lognormal variance with pedigree 0.0407, pedigree (2,1,5,3,1)
  (same comment as for acetamide-anillide-compound, unspecified)
- tillage, ploughing: 2.9172e-5 ha; lognormal variance with pedigree 0.0407, pedigree (2,1,5,3,1)
  (same comment as for acetamide-anillide-compound, unspecified)
- inorganic nitrogen fertiliser, as N: 0.0017123 kg; lognormal variance with pedigree 0.0407, pedigree (2,2,5,1,1)
  (same comment as for ammonia, anhydrous, liquid)
  properties: wet mass 1 kg, dry mass 1 kg
- irrigation: 0.944153 m3; name water_irrigation_input; source Siebert, S. 2010; lognormal variance with pedigree 0.0427, pedigree (2,2,5,1,1)
  See chapter 'Yields and Inputs of Arable Crop Production' in "01_crop production - yields & inputs US_v1.0.pdf" - pdf-document on the dedicated talk page of ecoinvent (www.ecoinvent.org/documentation)
  Calculated based on literature values (Döll, 2010) and partially modelled at ETH (Pfister, S.).
  See chapter 'Yields and Inputs of Arable Crop Production' in "01_crop production - yields & inputs US_v1.0.pdf" - pdf-document on the dedicated talk page of ecoinvent (www.ecoinvent.org/documentation)
  Calculated based on literature values (Döll, 2010) and partially modelled at ETH (Pfister, S.).
  EcoSpold01Location=US
  properties: water content 9089.91, wet mass 1000 kg, dry mass 0.11 kg
- combine harvesting: 0.00014482 ha; lognormal variance with pedigree 0.0407, pedigree (2,1,5,3,1)
  (same comment as for pesticide, unspecified)
- benzo[thia]diazole-compound: 3.982e-6 kg; lognormal variance with pedigree 0.0406, pedigree (2,1,5,1,1)
  (same comment as for acetamide-anillide-compound, unspecified)
  properties: wet mass 1 kg, carbon content, fossil 0.499869, dry mass 1 kg
  note on carbon content, fossil: C content estimated after the herbicide Bentazon (C10H12N2O3S) (Tab 1.5, Sutter 2010), classified in ecoinvent v2.2 report 15a, Tab 10.3 as a benzo[thia]diazole compound
- organophosphorus-compound, unspecified: 1.3186e-5 kg; lognormal variance with pedigree 0.0406, pedigree (2,1,5,1,1)
  (same comment as for pesticide, unspecified)
  properties: carbon content, fossil 0.260898, wet mass 1 kg, dry mass 1 kg
  note on carbon content, fossil: C content was calculated as an unweighted average of glyphosate, parathion, and fosetyl-Al. Those substances are classified as organo-phosphorous compounds in Tab 2.25, Sutter 2010
- inorganic phosphorus fertiliser, as P2O5: 0.0043758 kg; lognormal variance with pedigree 0.0407, pedigree (2,2,5,1,1)
  EcoSpold01Location=RER
  See chapter 'Yields and Inputs of Arable Crop Production' in "01_crop production - yields & inputs US_v1.0.pdf" - pdf-document on the dedicated talk page of ecoinvent (www.ecoinvent.org/documentation)
  properties: dry mass 1 kg, wet mass 1 kg
- phenoxy-compound: 2.61955e-5 kg; lognormal variance with pedigree 0.0406, pedigree (2,1,5,1,1)
  (same comment as for acetamide-anillide-compound, unspecified)
  properties: carbon content, fossil 0.532559, dry mass 1 kg, wet mass 1 kg
  note on carbon content, fossil: An unweighted average of the C content in mCPA, mCPB, mecoprop, fluazifop-P-butyl, and 2,4-D. Those substances are classified as phenoxy-compounds in Tab 2.25, Sutter 2010
- bipyridylium-compound: 1.7893e-7 kg; lognormal variance with pedigree 0.0406, pedigree (2,1,5,1,1)
  (same comment as for pesticide, unspecified)
  properties: carbon content, fossil 0.418929, wet mass 1 kg, dry mass 1 kg
  note on carbon content, fossil: C content was calculated after C content of Diquat (C12H12Br2N2). The herbicide Diquat is classified as a bipyridylium-compound in Tab 10.3 in ecoinvent v2.2 report 15a
- [thio]carbamate-compound: 0.00016617 kg; lognormal variance with pedigree 0.0406, pedigree (2,1,5,1,1)
  (same comment as for pesticide, unspecified)
  properties: dry mass 1 kg, wet mass 1 kg, carbon content, fossil 0.626349
  note on carbon content, fossil: Approximated as an unweighted average of the C-content of the [thio]carbamate-compounds (Tab 2.25 Sutter, 2010) carbofuran,orbencarb, prosulfocarb
- glyphosate: 1.421e-5 kg; lognormal variance with pedigree 0.0406, pedigree (2,1,5,1,1)
  (same comment as for acetamide-anillide-compound, unspecified)
  properties: carbon content, fossil 0.214286, wet mass 1 kg, dry mass 1 kg
- rice seed, for sowing: 0.020599 kg; name SEED; lognormal variance with pedigree 0.0407, pedigree (2,2,5,1,1)
  See chapter 'Yields and Inputs of Arable Crop Production' in "01_crop production - yields & inputs US_v1.0.pdf" - pdf-document on the dedicated talk page of ecoinvent (www.ecoinvent.org/documentation)
  EcoSpold01Location=US
  property dry mass 0.87 kg; name SEED_DM
  property energy content 15.4077 MJ; name SEED_energy_content
  property carbon content, non-fossil 0.464122; name SEED_C_content_non_fossil
  properties: water content 0.149425, wet mass 1 kg
  note on energy content: See chapter 'Product Properties' in "01_crop production - yields & inputs US_v1.0.pdf" - pdf-document on the dedicated talk page of ecoinvent (www.ecoinvent.org/documentation)
  note on carbon content, non-fossil: biogene carbon content on a dry matter basis Composition data obtained from Rice, white, short-grain, raw, in (http://www.nal.usda.gov/fnic/foodcomp/search/). First, composition data were refered to 1 kg dry mass. Then, C-contents were calculated considering a C-content/dry mass of 46% in carbohydrates (including fibres), 53% in proteins and 75% in fats. All data from "Evolutionary and Biochemical Aspects", A.D. Kay and T. Vrede (in Global Ecology, 2010, Elsevier B.V., S.E. Jørgensen Ed.).
- cyclic N-compound: 1.9559e-5 kg; lognormal variance with pedigree 0.0406, pedigree (2,1,5,1,1)
  (same comment as for pesticide, unspecified)
  properties: dry mass 1 kg, wet mass 1 kg, carbon content, fossil 0.641962
  note on carbon content, fossil: Calculated as an unweigthed average of the C content of the cyclic N-compounds where information was avaliable in Sutter, 2010, following the classification in Tab 2.25 in Sutter 2010: Difenoconazole (C19H17Cl2N3O3), Fenpropidin (C19H31N), Fenpropimorph (C20H33NO), Flusilazole (C16H15F2N3Si), Metconazole (C17H22ClN3O), Penconazole (C13H15Cl2N3), Propiconazole (C15H17Cl2N3O2), Tebuconazole (C16H22ClN3O)
- application of plant protection product, by field sprayer: 0.00094808 ha; lognormal variance with pedigree 0.0407, pedigree (2,1,5,3,1)
  (same comment as for acetamide-anillide-compound, unspecified)
- potassium chloride: 0.00600282 kg; lognormal variance with pedigree 0.0407, pedigree (2,2,5,1,1)
  The exchange has been updated from 'potassium chloride, as K2O' into 'potassium chloride' and therefore its amount has been scaled (multiplied) from 0.0038 kg by 1.5829 kg of 'potassium chloride' per kg of 'potassium chloride, as K2O'. Original comment of the exchange is: See chapter 'Yields and Inputs of Arable Crop Production' in "01_crop production - yields & inputs US_v1.0.pdf" - pdf-document on the dedicated talk page of ecoinvent (www.ecoinvent.org/documentation)
  EcoSpold01Location=RER
  properties: wet mass 1 kg, dry mass 1 kg
- drying of bread grain, seed and legumes: 0.1299 l; lognormal variance with pedigree 0.0407, pedigree (2,2,5,1,1)
  EcoSpold01Location=CH
  Approximation for ginning of cotton (quantified defined by comparison of energy demand of ginning and energy demand per unit of grain drying). also see chapter 'Yields and Inputs of Arable Crop Production' in "01_crop production - yields & inputs US_v1.0.pdf" - pdf-document on the dedicated talk page of ecoinvent (www.ecoinvent.org/documentation)
- tillage, rolling: 0.00014586 ha; lognormal variance with pedigree 0.0407, pedigree (2,1,5,3,1)
  (same comment as for acetamide-anillide-compound, unspecified)
- sowing: 0.00016336 ha; lognormal variance with pedigree 0.0407, pedigree (2,1,5,3,1)
  (same comment as for pesticide, unspecified)
- urea: 0.00848794 kg; lognormal variance with pedigree 0.0407, pedigree (2,2,5,1,1)
  The exchange has been updated from 'urea, as N' into 'urea' and therefore its amount has been scaled (multiplied) from 0.004 kg by 2.1438 kg of 'urea' per kg of 'urea, as N'. Original comment of the exchange is: See chapter 'Yields and Inputs of Arable Crop Production' in "01_crop production - yields & inputs US_v1.0.pdf" - pdf-document on the dedicated talk page of ecoinvent (www.ecoinvent.org/documentation)
  EcoSpold01Location=RER
  properties: wet mass 1 kg, dry mass 1 kg, carbon content, fossil 0.2
- dinitroaniline-compound: 9.6818e-6 kg; lognormal variance with pedigree 0.0406, pedigree (2,1,5,1,1)
  (same comment as for acetamide-anillide-compound, unspecified)
  properties: wet mass 1 kg, dry mass 1 kg, carbon content, fossil 0.55516
  note on carbon content, fossil: C content of dinitroaniline-compound was calculated after the C content of the herbicide pendimethalin, classified as dinitroaniline-compound in Tab 2.25 of Sutter 2010
- [sulfonyl]urea-compound: 3.5136e-7 kg; lognormal variance with pedigree 0.0406, pedigree (2,1,5,1,1)
  (same comment as for pesticide, unspecified)
  properties: wet mass 1 kg, carbon content, fossil 0.540853, dry mass 1 kg
  note on carbon content, fossil: Approximated as an unweighted average of the C-content of the [sulfonyl]urea-compounds (Tab 2.25 Sutter, 2010) chlorotoluron, Diuron, Linuron and Isoproturon.

## Inputs from nature
- Carbon dioxide, in air [natural resource, in air]: 1.45004 kg; = 44/12 * (REF_PRODUCT_C_content_non_fossil * REF_PRODUCT * REF_PRODUCT_DM - SEED_C_content_non_fossil * SEED * SEED_DM); lognormal variance with pedigree 0.0406, pedigree (2,1,5,1,1)
  Modelled,see chapter 'CO2 binding' in "01_crop production_direct field emissions and natural resources_v1.0.pdf" - pdf-document on the dedicated talk page of ecoinvent (www.ecoinvent.org/documentation)
- Transformation, to annual crop, irrigated, intensive [natural resource, land]: 1.4586 m2; lognormal variance with pedigree 0.1606, pedigree (2,1,5,1,1)
  Modelled, see chapter 'Land use' in "01_crop production_direct field emissions and natural resources_v1.0.pdf" - pdf-document on the dedicated talk page of ecoinvent (www.ecoinvent.org/documentation)
- Occupation, annual crop, irrigated, intensive [natural resource, land]: 1.4586 m2*year; lognormal variance with pedigree 0.1606, pedigree (2,1,5,1,1)
  (same comment as for Transformation, to annual crop, irrigated, intensive)
- Energy, gross calorific value, in biomass [natural resource, biotic]: 16.342 MJ; lognormal variance with pedigree 0.0411891, pedigree (2,1,5,1,1)
- Transformation, from annual crop [natural resource, land]: 1.4586 m2; lognormal variance with pedigree 0.1606, pedigree (2,1,5,1,1)
  (same comment as for Transformation, to annual crop, irrigated, intensive)

## Emissions to nature
- Molinate [soil, agricultural]: 0.00010529 kg; lognormal variance with pedigree 0.0506, pedigree (2,1,5,1,1)
  Modelled, see chapter 'Emissions of pesticides to agricultural soil' in "01_crop production_direct field emissions and natural resources_v1.0.pdf" - pdf-document on the dedicated talk page of ecoinvent (www.ecoinvent.org/documentation)
- Bensulfuron methyl ester [soil, agricultural]: 1.2363e-6 kg; lognormal variance with pedigree 0.0506, pedigree (2,1,5,1,1)
  (same comment as for Molinate)
- Zinc, ion [water, ground-]: 1.59801e-6 kg; lognormal variance with pedigree 0.1327, pedigree (2,2,5,5,1)
  Modelled, see chapter 'Emissions of heavy metals to agricultural soil, surface water and ground water' in "01_crop production_direct field emissions and natural resources_v1.0.pdf" - pdf-document on the dedicated talk page of ecoinvent (www.ecoinvent.org/documentation)
- Phosphate [water, surface water]: 0.00020517 kg; lognormal variance with pedigree 0.0827, pedigree (2,2,5,5,1)
  Modelled, see chapter 'Emissions of phosphorous to the water' in "01_crop production_direct field emissions and natural resources_v1.0.pdf" - pdf-document on the dedicated talk page of ecoinvent (www.ecoinvent.org/documentation)
- Halosulfuron-methyl [soil, agricultural]: 3.5136e-7 kg; lognormal variance with pedigree 0.0506, pedigree (2,1,5,1,1)
  (same comment as for Molinate)
- Mercury [water, surface water]: 9.30182e-11 kg; lognormal variance with pedigree 0.1327, pedigree (2,2,5,5,1)
  (same comment as for Zinc, ion)
- Paraquat [soil, agricultural]: 1.7893e-7 kg; lognormal variance with pedigree 0.0506, pedigree (2,1,5,1,1)
  (same comment as for Molinate)
- Water [water, ground-]: 0.230449 m3; name water_to_water_ground; = water_irrigation_input*(1-fraction_IW_to_air)*fraction_IW_to_ground_water; lognormal variance with pedigree 0.1286, pedigree (4,3,5,1,4)
  Calculated value. See the parameters and their comments to understand the calculation.
  property water in wet mass 1000 kg; name WWM
  property dry mass 0 kg; name DM
  property wet mass 1000 kg; name WM
  property carbon content, fossil 0; name C_content_fossil
  property fraction, origin: fresh water 1; name fraction_origin_fresh_water_Wgw
  property carbon content, non-fossil 0; name C_content_non_fossil
  property fraction, origin: salt water 0; name fraction_origin_salt_water_Wgw
  property fraction, origin: unspecified 0; name fraction_origin_unspecified_Wgw
- Lead [water, ground-]: 1.05877e-8 kg; lognormal variance with pedigree 0.1327, pedigree (2,2,5,5,1)
  (same comment as for Zinc, ion)
- Cadmium, ion [water, ground-]: 5.50424e-9 kg; lognormal variance with pedigree 0.1327, pedigree (2,2,5,5,1)
  (same comment as for Zinc, ion)
- Mecoprop-P [soil, agricultural]: 9.3695e-7 kg; lognormal variance with pedigree 0.0506, pedigree (2,1,5,1,1)
  (same comment as for Molinate)
- Lead [soil, agricultural]: 2.2581e-7 kg; lognormal variance with pedigree 0.0827, pedigree (2,2,5,5,1)
  (same comment as for Zinc, ion)
- Azoxystrobin [soil, agricultural]: 3.5396e-6 kg; lognormal variance with pedigree 0.0506, pedigree (2,1,5,1,1)
  (same comment as for Molinate)
- Ammonia [air, non-urban air or from high stacks]: 0.00128175 kg; lognormal variance with pedigree 0.0507, pedigree (2,2,5,1,1)
  Modelled with the 'AGRAMMON model' described in "01_crop production_direct field emissions and natural resources_v1.0.pdf" - pdf-document on the dedicated talk page of ecoinvent (www.ecoinvent.org/documentation)
- Sodium chlorate [air, urban air close to ground]: 3.5136e-6 kg; lognormal variance with pedigree 0.0506, pedigree (2,1,5,1,1)
  (same comment as for Molinate)
- Propanil [soil, agricultural]: 0.0002727 kg; lognormal variance with pedigree 0.0506, pedigree (2,1,5,1,1)
  (same comment as for Molinate)
- 2,4-D [soil, agricultural]: 1.8362e-5 kg; lognormal variance with pedigree 0.0506, pedigree (2,1,5,1,1)
  (same comment as for Molinate)
- Nitrogen oxides [air, non-urban air or from high stacks]: 0.000125014 kg; = 0.21 * N2O; lognormal variance with pedigree 0.0707, pedigree (2,2,5,1,1)
  Modelled, see chapter 'Emissions of NOx to the air' in "01_crop production_direct field emissions and natural resources_v1.0.pdf" - pdf-document on the dedicated talk page of ecoinvent (www.ecoinvent.org/documentation)
- Chromium [soil, agricultural]: 2.41926e-7 kg; lognormal variance with pedigree 0.0827, pedigree (2,2,5,5,1)
  (same comment as for Zinc, ion)
- Thiobencarb [soil, agricultural]: 5.8364e-5 kg; lognormal variance with pedigree 0.0506, pedigree (2,1,5,1,1)
  (same comment as for Molinate)
- Propiconazole [soil, agricultural]: 8.1983e-7 kg; lognormal variance with pedigree 0.0506, pedigree (2,1,5,1,1)
  (same comment as for Molinate)
- Mercury [soil, agricultural]: -2.00782e-9 kg
  (same comment as for Zinc, ion)
- Nickel, ion [water, surface water]: 1.70614e-7 kg; lognormal variance with pedigree 0.1327, pedigree (2,2,5,5,1)
  (same comment as for Zinc, ion)
- Bentazone [soil, agricultural]: 3.982e-6 kg; lognormal variance with pedigree 0.0506, pedigree (2,1,5,1,1)
  (same comment as for Molinate)
- Carbaryl [soil, agricultural]: 1.3143e-6 kg; lognormal variance with pedigree 0.0506, pedigree (2,1,5,1,1)
  (same comment as for Molinate)
- Mercury [water, ground-]: 1.30531e-10 kg; lognormal variance with pedigree 0.1327, pedigree (2,2,5,5,1)
  (same comment as for Zinc, ion)
- Dinitrogen monoxide [air, non-urban air or from high stacks]: 0.000595307 kg; name N2O; lognormal variance with pedigree 0.0707, pedigree (2,2,5,1,1)
  Modelled, see chapter 'Emissions of N2O to the air' in "01_crop production_direct field emissions and natural resources_v1.0.pdf" - pdf-document on the dedicated talk page of ecoinvent (www.ecoinvent.org/documentation)
- Parathion [soil, agricultural]: 1.3e-5 kg; lognormal variance with pedigree 0.0506, pedigree (2,1,5,1,1)
  (same comment as for Molinate)
- Chromium, ion [water, ground-]: 2.69869e-6 kg; lognormal variance with pedigree 0.1327, pedigree (2,2,5,5,1)
  (same comment as for Zinc, ion)
- Lambda-cyhalothrin [soil, agricultural]: 5.0751e-7 kg; lognormal variance with pedigree 0.0506, pedigree (2,1,5,1,1)
  (same comment as for Molinate)
- Fenoxaprop [soil, agricultural]: 7.8079e-8 kg; lognormal variance with pedigree 0.0506, pedigree (2,1,5,1,1)
  (same comment as for Molinate)
- Copper [soil, agricultural]: 4.94084e-6 kg; lognormal variance with pedigree 0.0827, pedigree (2,2,5,5,1)
  (same comment as for Zinc, ion)
- Clomazone [soil, agricultural]: 1.8739e-5 kg; lognormal variance with pedigree 0.0506, pedigree (2,1,5,1,1)
  (same comment as for Molinate)
- Copper, ion [water, surface water]: 3.12162e-7 kg; lognormal variance with pedigree 0.1327, pedigree (2,2,5,5,1)
  (same comment as for Zinc, ion)
- Triclopyr [soil, agricultural]: 6.3244e-6 kg; lognormal variance with pedigree 0.0506, pedigree (2,1,5,1,1)
  (same comment as for Molinate)
- Pendimethalin [soil, agricultural]: 9.6818e-6 kg; lognormal variance with pedigree 0.0506, pedigree (2,1,5,1,1)
  (same comment as for Molinate)
- Nickel [soil, agricultural]: 1.25455e-7 kg; lognormal variance with pedigree 0.0827, pedigree (2,2,5,5,1)
  (same comment as for Zinc, ion)
- Carbofuran [soil, agricultural]: 1.1972e-6 kg; lognormal variance with pedigree 0.0506, pedigree (2,1,5,1,1)
  (same comment as for Molinate)
- Water [air, unspecified]: 0.656092 m3; name water_to_air_unspecified; = (water_irrigation_input*fraction_IW_to_air); lognormal variance with pedigree 0.0807, pedigree (2,2,5,1,1)
  Calculated value based on literature values and expert opinion. See comments in the parametres' comment field.
  property fraction, origin: salt water 0; name fraction_origin_salt_water
  property fraction, origin: unspecified 0; name fraction_origin_unspecified
  property fraction, origin: fresh water 1; name fraction_origin_fresh_water
- Phosphorus [water, surface water]: 0.00015184 kg; lognormal variance with pedigree 0.0807, pedigree (2,2,5,1,1)
  (same comment as for Phosphate)
- Quinclorac [soil, agricultural]: 4.5546e-6 kg; lognormal variance with pedigree 0.0506, pedigree (2,1,5,1,1)
  (same comment as for Molinate)
- Water [water, surface water]: 0.0576122 m3; name water_to_water_surface; = water_irrigation_input*(1-fraction_IW_to_air)*fraction_IW_to_surface_water; lognormal variance with pedigree 0.1286, pedigree (4,3,5,1,4)
  Calculated value. See the parameters and their comments to understand the calculation.
  property fraction, origin: fresh water 1; name fraction_origin_fresh_water_Wsw
  property fraction, origin: salt water 0; name fraction_origin_salt_water_Wsw
- Cadmium [soil, agricultural]: 2.91984e-7 kg; lognormal variance with pedigree 0.0827, pedigree (2,2,5,5,1)
  (same comment as for Zinc, ion)
- Glyphosate [soil, agricultural]: 1.421e-5 kg; lognormal variance with pedigree 0.0506, pedigree (2,1,5,1,1)
  (same comment as for Molinate)
- Nitrate [water, ground-]: 0.0469025 kg; lognormal variance with pedigree 0.0807, pedigree (2,2,5,1,1)
  Modelled with the 'SQCB-NO3 model' described in "01_crop production_direct field emissions and natural resources_v1.0.pdf" - pdf-document on the dedicated talk page of ecoinvent (www.ecoinvent.org/documentation)
- Phosphate [water, ground-]: 1.021e-5 kg; lognormal variance with pedigree 0.0827, pedigree (2,2,5,5,1)
  (same comment as for Phosphate)
- MCPA [soil, agricultural]: 4.945e-7 kg; lognormal variance with pedigree 0.0506, pedigree (2,1,5,1,1)
  (same comment as for Molinate)
- Zinc [soil, agricultural]: -7.98966e-6 kg
  (same comment as for Zinc, ion)
- Zinc, ion [water, surface water]: 2.64945e-7 kg; lognormal variance with pedigree 0.1327, pedigree (2,2,5,5,1)
  (same comment as for Zinc, ion)
- Carbon dioxide, fossil [air, non-urban air or from high stacks]: 0.0062161 kg; lognormal variance with pedigree 0.0407, pedigree (2,2,5,1,1)
  Modelled, see chapter 'Release of fossil CO2 after urea applications' in "01_crop production_assessment methods of direct field emissions_v1.0.pdf" - pdf-document on the dedicated talk page of ecoinvent (www.ecoinvent.org/documentation)
- Chromium, ion [water, surface water]: 3.38411e-7 kg; lognormal variance with pedigree 0.1327, pedigree (2,2,5,5,1)
  (same comment as for Zinc, ion)
- Copper, ion [water, ground-]: 5.06846e-7 kg; lognormal variance with pedigree 0.1327, pedigree (2,2,5,5,1)
  (same comment as for Zinc, ion)
- Cadmium, ion [water, surface water]: 2.9144e-9 kg; lognormal variance with pedigree 0.1327, pedigree (2,2,5,5,1)
  (same comment as for Zinc, ion)
- Methane, non-fossil [air, non-urban air or from high stacks]: 0.040671 kg; lognormal variance with pedigree 0.0707, pedigree (2,2,5,1,1)
  (same comment as for Molinate)
- Malathion [soil, agricultural]: 1.8544e-7 kg; lognormal variance with pedigree 0.0506, pedigree (2,1,5,1,1)
  (same comment as for Molinate)
- Lead [water, surface water]: 3.79571e-8 kg; lognormal variance with pedigree 0.1327, pedigree (2,2,5,5,1)
  (same comment as for Zinc, ion)

## Sampling procedure
Data come from the NREL database and from varoius U.S database. Data were compiled from statistics, literature, farm survey reports, documents from extension services, and expert knowledge.

## Extrapolations
This dataset has been extrapolated from year 2006 to the year of the calculation (2021). The uncertainty has been adjusted accordingly.
