# wood preservative production, organic salts, Cr-free, outdoor use, ground contact

Dataset: EcoSpold 2, unit process
Geography: GLO
Time period: 2012-01-01 to 2021-12-31
Technology level: current
Classification: ISIC rev.4 ecoinvent: 2021:Manufacture of pesticides and other agrochemical products
Tags: Swiss brush-up completed
Scenario: Business-as-Usual
System model: Allocation, cut-off by classification
Generated by: Frank Werner
Database: ecoinvent
isCopyrightProtected: true
accessRestrictedTo: 1

## General comment
According to EN 335-1:2005, five use classes are distinguished for chemical wood protection based on the general exposure of wood in its application, wetting regime in service and the biological agents to be expected. This exposure scenario determines the potentially vulnerable zone of wood and the required treatment for the application of the wood preservative (see table)

## Included activities start
From reception of chemicals at the factory gate

## Included activities end
The dataset covers the components and preparation of a typical water-based/organic solvent based [as applicable] wood preservative for the use class according to EN 335-1:2006 as indicated in the name of the dataset, ready to be packed. In addition it contains an estimate for electricity consumption and for infrastructure. Packaging is not included. It is assumed that the production process does not generate any waste water.

## Geography
Data referring to (Central) European conditions

## Reference product
- wood preservative, organic salt, Cr-free: 1 kg; CPC 345: Miscellaneous basic chemical products; By-product classification allocatable product
  production volume 9.23e8 kg; name p_preservative
    Estimated based on Vlosky 2009
  property price 1.65128 EUR2005
    Calculated based on inputs: The price of the product has been calculated as a sum of the values of the material and energy inputs for this product. This value is therefore a rough estimation. It may underestimate the real price since there are additional expenses when producing any product. These expences can include for example labour costs, treatment of waste materials and profit for the producer. Please consider carefully whether this level of data quality is acceptable for your application.
  property water content 0.376462; = 0.2735/0.7265
  property heating value, net 19.11 MJ
    LHV is calculated based on the Carbon content of the product. More details can be found on the respective documentation.
  property carbon content 0.2147
    carbon content on a dry matter basis (reserved; not for manual entry)
  properties: dry mass 0.7265 kg, carbon content, non-fossil 0, wet mass 1 kg, water in wet mass 0.2735 kg, carbon content, fossil 0.2147, carbon allocation 0.15598 kg

## Inputs from technosphere
- electricity, medium voltage: 0.02 kWh; = 0.072/3.6; source Künniger T. 2000; lognormal variance with pedigree 0.235, pedigree (5,5,5,5,5)
  value converted from MJ
  properties: UVEK_link_9 4433, UVEK_relative_amount_1 1, UVEK_relative_amount_9 21.6, UVEK_link_1 1785, UVEK_link_8 4417, UVEK_relative_amount_8 3.6
  note on UVEK_link_9: This link has been introduced to model transport specifically for the SAM model; to be used only in special submissions in coordination with ecoinvent and the Swiss FOEN.
  note on UVEK_relative_amount_1: to be used only in special submissions in coordination with ecoinvent and the Swiss FOEN
  note on UVEK_relative_amount_9: Scaling factor = amount of transport in corresponding KBOB dataset/amount of this input from technosphere. Source for transport distance: Life Cycle Inventories of Wood as Fuel and Construction Material/2007/Werner F. To be used only in special submissions in coordination with ecoinvent and the Swiss FOEN
- polycarboxylates, 40% active substance: 0 kg; source Empa St. Gallen 2012; pedigree (1,1,1,1,1)
  agent to avoid crystallization
  properties: UVEK_link_1 3536, dry mass 0.4 kg, water content 1.5, heating value, net 4.54 MJ, UVEK_relative_amount_1 1, carbon content, fossil 0.496429, wet mass 1 kg
- boric acid, anhydrous, powder: 0.05 kg; source U.S. Environmental Protection Agency 1999; lognormal variance with pedigree 0.235, pedigree (5,5,5,5,5)
  active agent
  properties: dry mass 1 kg, UVEK_link_1 329, wet mass 1 kg, UVEK_relative_amount_1 1
- chemical, organic: 0.035 kg; source Hodgkinson D.M. 2011; lognormal variance with pedigree 0.235, pedigree (5,5,5,5,5)
  used as proxy for K(HDO) due to lack of information
  properties: carbon content, fossil 0.628, UVEK_link_1 432, UVEK_relative_amount_1 1, heating value, net 19.03 MJ, dry mass 1 kg, wet mass 1 kg
- ethylenediamine: 0 kg; source Hodgkinson D.M. 2011; pedigree (1,1,1,1,1)
  complexing
  properties: UVEK_relative_amount_1 1, UVEK_link_1 2088, wet mass 1 kg, carbon content, fossil 0.5, dry mass 1 kg, heating value, net 28.24 MJ
- water, deionised: 0 kg; name m_water; source Empa St. Gallen 2012; pedigree (1,1,1,1,1)
  water input according to formulation and for the Cu-HDO production according to US. patent no. 20090186860
  property water in wet mass 1 kg; name WWM
  property carbon content, non-fossil 0; name C_content_non_fossil
  property dry mass 0 kg; name DM
  property wet mass 1 kg; name WM
  properties: UVEK_link_1 4853, UVEK_relative_amount_1 1
- copper carbonate: 0.163 kg; source U.S. Environmental Protection Agency 2005; lognormal variance with pedigree 0.235, pedigree (5,5,5,5,5)
  active agent
  property water content 0; name water_content
  properties: UVEK_relative_amount_1 1, UVEK_link_1 581, wet mass 1 kg, dry mass 1 kg, heating value, net 2.95 MJ, carbon content, fossil 0.097561
- potassium carbonate: 0.0125 kg; source Empa St. Gallen 2012; lognormal variance with pedigree 0.235, pedigree (5,5,5,5,5)
  ph stabilisator
  properties: heating value, net 2.63 MJ, wet mass 1 kg, carbon content, fossil 0.0869565, UVEK_link_1 3583, dry mass 1 kg, UVEK_relative_amount_1 1
- adipic acid: 0.05 kg; source Empa St. Gallen 2012; lognormal variance with pedigree 0.235, pedigree (5,5,5,5,5)
  proxy for a complexing agent
  properties: heating value, net 23.23 MJ, UVEK_link_1 112, wet mass 1 kg, dry mass 1 kg, carbon content, fossil 0.493151, UVEK_relative_amount_1 1
- chemical factory, organics: 4e-10 unit; source Althaus H.-J. 2007; lognormal variance with pedigree 0.76, pedigree (5,5,5,5,5)
  assumed to be equal as for paint production
  properties: UVEK_relative_amount_1 1, UVEK_link_1 430
- polycarboxylates, 40% active substance: 0.00198355, 0.00401645 kg (2 entries); source Empa St. Gallen 2012; lognormal variance with pedigree 0.235, pedigree (5,5,5,5,5)
  agent to avoid crystallization
- ethylenediamine: 0.07134, 0.33866 kg (2 entries); source Hodgkinson D.M. 2011; lognormal variance with pedigree 0.235, pedigree (5,5,5,5,5)
  complexing
- water, deionised: 0.0643542, 0.000231659, 0.208914 kg (3 entries); source Empa St. Gallen 2012; lognormal variance with pedigree 0.235, pedigree (5,5,5,5,5)
  (same comment as for water, deionised)
  properties: UVEK_link_1 4853, wet mass 1 kg, UVEK_relative_amount_1 1

## Sampling procedure
Ideal-type formulation of wood preservative for a water-/solvent-based [as applicable] wood preservative for the respective use class

## Extrapolations
This dataset has been extrapolated from year 2012 to the year of the calculation (2021). The uncertainty has been adjusted accordingly.
