# isohexane production

Dataset: EcoSpold 2, unit process
Geography: RoW
Time period: 1998-01-01 to 2021-12-31
Technology level: current
Classification: ISIC rev.4 ecoinvent: 2011:Manufacture of basic chemicals
Classification: EcoSpold01Categories: chemicals/organics
Synonyms: 2-methyl pentane
Tags: ConvertedDataset
Scenario: Business-as-Usual
System model: Allocation, cut-off by classification
Share of production covered: 100 %
Generated by: Jürgen Sutter
Published in: Sutter, J. 2007
Database: ecoinvent
isCopyrightProtected: true
accessRestrictedTo: 1

## General comment
The process "isohexane, at plant, RER" is modelled for the production of isohexane from Hexane in Europe. Raw materials are modelled with a stoechiometric calculation. Energy consumptions are modelled with literature data. The emissions are estimated. Infrastructure and transports are calculated with standard values.
[This dataset was already contained in the ecoinvent database version 2. It was not individually updated during the transfer to ecoinvent version 3. Life Cycle Impact Assessment results may still have changed, as they are affected by changes in the supply chain, i.e. in other datasets. This dataset was generated following the ecoinvent quality guidelines for version 2. It may have been subject to central changes described in the ecoinvent version 3 change report (http://www.ecoinvent.org/database/ecoinvent-version-3/reports-of-changes/), and the results of the central updates were reviewed extensively. The changes added e.g. consistent water flows and other information throughout the database. The documentation of this dataset can be found in the ecoinvent reports of version 2, which are still available via the ecoinvent website. The change report linked above covers all central changes that were made during the conversion process.]

## Included activities end
Production of isohexane including materials, energy uses, infrastructure and emissions.

## Geography
The inventory is modelled for Europe.

## Technology
Isomerization of n-hexane

## Time period
Time of publications

## Parameters
- fraction, cooling water, to air: 0.3875 dimensionless; name fraction_CW_to_air; = (0.5*fraction_CW_OT_to_air)+(0.5*fraction_CW_R_to_air); lognormal variance with pedigree 0.092025, pedigree (4,4,3,2,4)
  Calculated value based on literature value (see comments of the other parametres present in this dataset) and expert opinion. In the case when no industry/literature data are available about the type of cooling or directly fraction, cooling water, to air specific for the process a default assumption is applied. It is assumed that the once-through cooling system is used in 50% of all cases and recirculating system is used in another 50% of all cases.
- fraction, cooling water, recirculating system, to air: 0.771 dimensionless; name fraction_CW_R_to_air; lognormal variance with pedigree 0.0413, pedigree (2,3,1,3,1)
  Calculated based on literature value (Scown, C.D., 2011, Water Footprint of U.S. Transportation Fuels and supplying information of the article) (Vionnet, S., Quantis Water Database - Technical Report, 2012).
- fraction, cooling water, cooling pond system, to air: 0.032 dimensionless; name fraction_CW_CP_to_air; lognormal variance with pedigree 0.0413, pedigree (2,3,1,3,1)
  (same comment as for fraction, cooling water, recirculating system, to air)
- fraction, cooling water, once-through system, to air: 0.004 dimensionless; name fraction_CW_OT_to_air; lognormal variance with pedigree 0.0413, pedigree (2,3,1,3,1)
  (same comment as for fraction, cooling water, recirculating system, to air)

## Reference product
- isohexane: 1 kg; CPC 341: Basic organic chemicals; By-product classification allocatable product; CAS 107-83-5
  EcoSpold01Location=RER
  production volume 2.67763 kg
    This is a placeholder value that does not reflect real-world production volumes. This dataset does not currently require a real-world production volume to work in the database framework, and no actual data were collected yet. This has no negative effect on the results of the ecoinvent database.
  property heating value, net 45.02 MJ
    LHV is calculated based on the elemental composition of the substance. Based on the CAS number of the substance (000096-14-0), the chemical formula of the substance is found to be: C6H14, (PubChem 2020).
    Reference: Kim, S., Chen, J., Cheng, T., Gindulyte, A., He, J., He, S., Li, Q., Shoemaker, B. A., Thiessen, P. A., Yu, B., Zaslavsky, L., Zhang, J., & Bolton, E. E. (2019). PubChem 2019 update: improved access to chemical data. Nucleic acids research, 47(D1), D1102–D1109. https://doi.org/10.1093/nar/gky1033
  property price 0.562638 EUR2005
    Calculated based on inputs: The price of the product has been calculated as a sum of the values of the material and energy inputs for this product. This value is therefore a rough estimation. It may underestimate the real price since there are additional expenses when producing any product. These expences can include for example labour costs, treatment of waste materials and profit for the producer. Please consider carefully whether this level of data quality is acceptable for your application.
  property carbon content 0.610169
    carbon content on a dry matter basis (reserved; not for manual entry)
  properties: carbon content, fossil 0.610169, carbon content, non-fossil 0, water in wet mass 0 kg, wet mass 1 kg, dry mass 1 kg, water content 0, carbon allocation 0.610169 kg

## Inputs from technosphere
- electricity, medium voltage: 0 kWh; pedigree (1,1,1,1,1)
  EcoSpold01Location=UCTE
  DOE 1998
  Uncertainty: DOE 1998
- hexane: 1.0526 kg; lognormal variance with pedigree 0.078, pedigree (4,5,5,5,1)
  Stoechiometric calculation
  EcoSpold01Location=RER
  Uncertainty: Stoechiometric calculation
  properties: heating value, net 45.02 MJ, dry mass 1 kg, carbon content, fossil 0.837209, wet mass 1 kg
- chemical factory, organics: 4e-10 unit; lognormal variance with pedigree 0.448, pedigree (4,5,5,5,5)
  Estimation
  EcoSpold01Location=RER
  Uncertainty: Estimation
- heat, district or industrial, other than natural gas: 0 MJ; pedigree (1,1,1,1,1)
  Uncertainty: DOE 1998
  properties: heating value, net 1 MJ
- heat, district or industrial, natural gas: 0 MJ; pedigree (1,1,1,1,1)
  Uncertainty: DOE 1998
  properties: heating value, net 1 MJ
- electricity, medium voltage: 0.000726261, 0.000139266, 0.00233798, 0.0340038, 0.00479285, 0.0156158 kWh (6 entries); lognormal variance with pedigree 0.044, pedigree (1,4,5,5,1)
  EcoSpold01Location=UCTE
  DOE 1998
  Uncertainty: DOE 1998
- heat, district or industrial, other than natural gas: 3.43895e-5, 0.0848056 MJ (2 entries); lognormal variance with pedigree 0.044, pedigree (1,4,5,5,1)
  Uncertainty: DOE 1998
- heat, district or industrial, natural gas: 0.00230708, 0.149693 MJ (2 entries); lognormal variance with pedigree 0.044, pedigree (1,4,5,5,1)
  Uncertainty: DOE 1998

## Inputs from nature
- Water, cooling, unspecified natural origin [natural resource, in water]: 0.024 m3; name water_cooling_UNO_input; lognormal variance with pedigree 0.198, pedigree (4,5,5,5,5)
  Estimation
  Uncertainty: Estimation

## Emissions to nature
- TOC, Total Organic Carbon [water, surface water]: 0.00423 kg; lognormal variance with pedigree 0.188, pedigree (4,5,5,5,5)
  Calculated from the water emissions
  Uncertainty: Calculated from the water emissions
- DOC, Dissolved Organic Carbon [water, surface water]: 0.00423 kg; lognormal variance with pedigree 0.188, pedigree (4,5,5,5,5)
  Calculated from the water emissions
  Uncertainty: Calculated from the water emissions
- Carbon dioxide, fossil [air, urban air close to ground]: 0.13959 kg; lognormal variance with pedigree 0.1786, pedigree (4,5,5,5,5)
  Calculated from the water treatment
  Uncertainty: Calculated from the water treatment
- COD, Chemical Oxygen Demand [water, surface water]: 0.0171 kg; lognormal variance with pedigree 0.188, pedigree (4,5,5,5,5)
  Calculated from the water emissions
  Uncertainty: Calculated from the water emissions
- Hexane [air, urban air close to ground]: 0.0021053 kg; lognormal variance with pedigree 0.188, pedigree (4,5,5,5,5)
  Estimation
  Uncertainty: Estimation
- Water [water, unspecified]: 0.0147 m3; name water_to_water_unspecified; lognormal variance with pedigree 0.0827, pedigree (2,2,5,5,1)
  Calculated value based on literature values and expert opinion. See comments in the parametres' comment field.
  property fraction, origin: fresh water 0; name fraction_origin_fresh_water_Ww
  property fraction, origin: salt water 0; name fraction_origin_salt_water_Ww
  property fraction, origin: unspecified 1; name fraction_origin_unspecified_Ww
  property water in wet mass 1000 kg; name WWM
  property carbon content, fossil 0; name C_content_fossil
  property dry mass 0 kg; name DM
  property wet mass 1000 kg; name WM
  property carbon content, non-fossil 0; name C_content_non_fossil
- Hexane [water, surface water]: 0.0050526 kg; lognormal variance with pedigree 0.218, pedigree (4,5,5,5,5)
  Estimation
  Uncertainty: Estimation
- BOD5, Biological Oxygen Demand [water, surface water]: 0.0171 kg; lognormal variance with pedigree 0.188, pedigree (4,5,5,5,5)
  Calculated from the water emissions
  Uncertainty: Calculated from the water emissions
- Water [air, unspecified]: 0.0093 m3; name water_to_air_unspecified; lognormal variance with pedigree 0.0827, pedigree (2,2,5,5,1)
  (same comment as for Water)
  property fraction, origin: fresh water 0; name fraction_origin_fresh_water
  property fraction, origin: unspecified 1; name fraction_origin_unspecified
  property fraction, origin: salt water 0; name fraction_origin_salt_water

## Sampling procedure
Literature data

## Extrapolations
Transports and emissions are modelled with standard methods. This dataset has been copied from an original dataset covering the geography RER. The uncertainty has been adjusted accordingly.

## Review by Roland Hischier 2007-09-01
passed.
