# treatment of municipal solid waste, incineration

Dataset: EcoSpold 2, unit process
Geography: CA-ON
Time period: 2006-01-01 to 2021-12-31
Technology level: current
Classification: ISIC rev.4 ecoinvent: 3821:Treatment and disposal of non-hazardous waste
Synonyms: Siedlungsabfallverbrennung; municipal waste incineration; Kehrichtverbrennung
Scenario: Business-as-Usual
System model: Allocation, cut-off by classification
Share of production covered: 1.8 %
Generated by: Karin Treyer
Published in: Doka G. 2013
Database: ecoinvent
isCopyrightProtected: true
accessRestrictedTo: 1

## General comment
This dataset represents the activity of waste disposal of municipal solid waste in a municipal solid waste incinerator (MSWI) // Recommended use of this dataset: For average municipal/communal waste mixture. Not suitable to represent any single specific waste material, like plastics, paper, cardboard. If your waste is a specific mixture of waste materials, inventory the respective waste materials individually. // Inventoried waste contains 92.8% average municipal solid waste, burnable part; 7.23% average municipal solid waste, unburnable (inert) part; . // Waste composition (wet, in ppm): upper heating value 13.05 MJ/kg; lower heating value 11.7 MJ/kg; H2O 225260; O 261060; H 43105; C 338960; S 1532.3; N 3206.1; P 757.42; B 7.3826; Cl 6670; Br 129.32; F 366.39; I 0.012418; Ag 0.73279; As 1.4061; Ba 152.96; Cd 8.0053; Co 1.3807; Cr 139.58; Cu 930.87; Hg 0.65684; Mn 266.19; Mo 2.0065; Ni 52.342; Pb 413.61; Sb 53.368; Se 0.3281; Sn 99.553; V 9.4572; Zn 1127.9; Be 470.85; Sc n.a.; Sr n.a.; Ti 2616.4; Tl n.a.; W n.a.; Si 49786; Fe 23628; Ca 18346; Al 11395; K 2132.7; Mg 2568.9; Na 4741.6; // Share of carbon in waste that is biogenic 61.1%. // Share of metals in waste not oxidised and bulk-recyclable (exclude very small or thin parts) Iron: 72.06%; Alu: 38.71%; Copper: 45.44%. // One kg of this waste produces 0.2221 kg of slag and 0.02224 kg of residues, which are landfilled. Additional solidification with 0.008896 kg of cement. // Net energy production: 1.39MJ/kg electric energy and 2.85MJ/kg thermal energy. // Recovery of metal scrap to recycling: 9.7909g iron scrap, 1.2162g aluminium scrap, 0.12319g copper scrap.

## Included activities start
waste incineration from waste reception gate and delivery into waste bunker at incinerator plant site (without transports to the incinerator)

## Included activities end
Waste-specific short-term emissions to water from leachate. Long-term emissions from landfill to ground water.

## Geography
Specific to the technology mix encountered in Switzerland in 2010. Well applicable to modern incineration practices in Europe, North America or Japan.

## Technology
average Swiss MSWI plants in 2010 (grate incinerators) with electrostatic precipitator for fly ash (ESP), wet flue gas scrubber and 25% SNCR , 42.77% SCR-high dust , 32.68% SCR-low dust -DeNOx facilities and 0% without Denox (weighted according to mass of burnt waste, representing Swiss average). Efficiency of iron scrap separation from slag : 58%. Efficiency of non-ferrous scrap separation from slag : 31%. Gross electric efficiency technology mix 15.84% and Gross thermal efficiency technology mix 28.51%

## Time period
Waste composition as given in literature reference, theoretical data or other source. Transfer coefficients for modern MSWI.

## Reference product
- municipal solid waste: -1 kg; name RP_amount_1; CPC 39910: Municipal waste; By-product classification Waste
  Main reference product of this activity (supply of disposal service).
  production volume 0 kg; name RP_PV_1
    Calculated value/estimation. The amount of electricity produced in municipal solid waste incineration plants and supplied to the public electricity grid is known from electricity statistics. The amount of waste treated is estimated based on this electricity amount.
  property price 0 EUR2005
    Waste products are assigned a price of zero as they are assumed to require further treatment.
  property heating value, net 11.74 MJ
    Value taken from the general comment of the treatment dataset.
  property carbon content 0.433204
    carbon content on a dry matter basis (reserved; not for manual entry)
  properties: carbon content, non-fossil 0.261655, carbon content, fossil 0.171549, water content 0.297017, dry mass 0.771 kg, wet mass 1 kg, water in wet mass 0.229 kg, carbon allocation 0.334 kg

## By-products
- electricity, for reuse in municipal waste incineration only: 0 kWh; name E_el_prod_MSWI; CPC 17100: Electrical energy; By-product classification allocatable product
  Based on literarure data, the majority of MSW in Canada is landfilled with only 5% of them actually incinerated. Canada has 14 incineration plants where not all of them generate energy out of their processes. Additionally, statistical data from electricity production do not quote electricity production from MSWI plants. Due to that information the amount of energy produced in MSWI in Canada is neglected and thus this amount is set to 0.
  Literature: Human Activity and the Environment 2012 has been prepared by the Environment Accounts and Statistics Division under the direction of Robert Smith (Director) and Doug Trant (Chief). Michelle Tait was the editor and project
  manager and Iman Mustapha managed dissemination and production.
  State of Waste Management in Canada, Prepared for: Canadian Council of Ministers of Environment, 2014, Prepared by: Giroux Environmental Consulting.
  production volume 0 kWh
    Literature value, valid for 2008. Value for electricity from municipal solid waste incineration which is supplied to the public grid.
    This volume has been calculated using the total production volume in Canada and split by provinces using installed power or power generated per province (StatCan, 2007).
    StatCan (2007) Electric Power Generation, Transmission and Distribution
    In this value, electricity production from municipal waste and industrial waste is taken into account.
    (Net = gross production minus direct electricity use needed for electricity production at the power plant)
  property true value relation 3.6; name E_el_prod_MSWI_true_value_relation
    property to calculate "true value" from
  property price 0.1 EUR2005; name E_el_prod_MSWI_price_EUR2005
    Estimated to be the same price as in case of electricity, medium voltage.
  property exergy 3.6 MJ; name E_el_prod_MSWI_exergy
    This exergy property is based on the exergy content of the product.
- aluminium scrap, post-consumer, prepared for melting: 0 kg; By-product classification Recyclable; CPC 39363: Waste and scrap of aluminium; pedigree (1,1,1,1,1)
  Aluminium scrap recovered from this waste.
  Uncertainty: u
  production volume 0 kg; = BP_amount_3/ RP_amount_1* RP_PV_1*(-1)
    calculated in proportion to reference product waste input to incinerator
  property price 0.806 EUR2005
    Temporary price data. Calculated as 90% of purchasers price based on: 2005 import and export prices (total trades (USD) divided by total weight (kg) in biggest economies of the world: EU27, USA, Brasil, China, India, Japan and Russia) from UN Commodity Trade Statistics Database (http://data.un.org/Explorer.aspxDatabase [Accessed 2011.06.17]). Commodity: Waste or scrap, aluminium
  property carbon content 0
    carbon content on a dry matter basis (reserved; not for manual entry)
  properties: wet mass 1 kg, carbon content, non-fossil 0, water content 0, water in wet mass 0 kg, carbon content, fossil 0, dry mass 1 kg, carbon allocation 0 kg
- iron scrap, sorted, pressed: 0 kg; CPC 39310: Slag, dross, scalings and other waste from the manufacture of iron or steel; By-product classification Recyclable; pedigree (1,1,1,1,1)
  Iron scrap recovered from this waste.
  Uncertainty: u
  production volume 0 kg; = BP_amount_4/ RP_amount_1* RP_PV_1*(-1)
    calculated in proportion to reference product waste input to incinerator
  property price 0.175 EUR2005
    Temporary price data. Calculated as 90% of purchasers price based on: 2005 import and export prices (total trades (USD) divided by total weight (kg) in biggest economies of the world: EU27, USA, Brasil, China, India, Japan and Russia) from UN Commodity Trade Statistics Database (http://data.un.org/Explorer.aspxDatabase [Accessed 2011.06.20]). Commodity: Waste or scrap, of cast iron
  property carbon content 0
    carbon content on a dry matter basis (reserved; not for manual entry)
  properties: carbon content, non-fossil 0, water content 0, carbon content, fossil 0, dry mass 1 kg, water in wet mass 0 kg, wet mass 1 kg, carbon allocation 0 kg
- copper scrap, sorted, pressed: 0 kg; CPC 39361: Waste and scrap of copper; By-product classification Recyclable; pedigree (1,1,1,1,1)
  Copper scrap recovered from this waste.
  Uncertainty: u
  production volume 0 kg; = BP_amount_1/ RP_amount_1* RP_PV_1*(-1)
    calculated in proportion to reference product waste input to incinerator
  property price 2.84 EUR2005
    Temporary price data. Calculated as 90% of purchasers price based on: Source: USGS Mineral Yearbook 2007, Table 1 in <http://minerals.usgs.gov/minerals/pubs/commodity/recycle/myb1-2007-recyc.pdf>
  property carbon content 0
    carbon content on a dry matter basis (reserved; not for manual entry)
  properties: water in wet mass 0 kg, carbon content, fossil 0, carbon content, non-fossil 0, dry mass 1 kg, water content 0, wet mass 1 kg, carbon allocation 0 kg
- heat, for reuse in municipal waste incineration only: 0 MJ; name E_th_prod_MSWI; By-product classification allocatable product; CPC 17300: Steam and hot water
  (same comment as for electricity, for reuse in municipal waste incineration only)
  production volume 0 MJ; = E_th_prod_MSWI/ RP_amount_1* RP_PV_1*(-1)
    calculated in proportion to reference product waste input to incinerator
  property exergy 0.1842 MJ; name E_th_prod_MSWI_exergy
    This exergy property is based on the exergy content of the product.
  property true value relation 0.1842; name E_th_prod_MSWI_true_value_relation
    property to calculate "true value" from
  property price 0.0106 EUR2005; name E_th_prod_MSWI_price_EUR2005
    Average European district heat price from Ecoheatcool and Euroheat 2005-2006, Ecoheat Work package 1: The European heat market. Final report. 10.6 EUR/GJ i s the price of district heat. http://www.solarthermalworld.org/files/Ecoheatcool%20WP1%20Web.pdf?download

## Inputs from technosphere
- waste cement, hydrated: -0.02224 kg; name BP_amount_2; lognormal variance with pedigree 0.037053, pedigree (1,1,4,1,1)
  Hydrated cement output for solidification of landfilled residual material.
  Uncertainty: U
  production volume 0 kg; = BP_amount_2/ RP_amount_1* RP_PV_1*(-1)
    calculated in proportion to reference product waste input to incinerator
  property price 0 EUR2005; name BP_amount_3_price_EUR2005
  properties: wet mass 1 kg, dry mass 1 kg
- heat, district or industrial, natural gas: 0.13071 MJ; lognormal variance with pedigree 0.67677, pedigree (1,1,4,1,1)
  Input to DeNOx stage, to heat up flue gas in low-dust SCR.
  Uncertainty: u
  properties: heating value, net 1 MJ
- hydrochloric acid, without water, in 30% solution state: 5.73e-5 kg; lognormal variance with pedigree 0.28328, pedigree (1,1,4,1,1)
  Auxilliary inputs for the wastewater treatment stage of the incinerator plant.
  Uncertainty: u
  properties: wet mass 1 kg, dry mass 1 kg, heating value, net 3.32 MJ
- slag landfill: 3.9215e-10 unit; lognormal variance with pedigree 0.032077, pedigree (1,1,4,1,1)
  Landfill infrastructure required for landfilling of bottom ash.
  Uncertainty: u
- quicklime, milled, packed: 0.0032775 kg; lognormal variance with pedigree 0.40645, pedigree (1,1,4,1,1)
  Auxilliary inputs for the flue gas treatment stage of the incinerator plant.
  Uncertainty: u
  properties: water content 0.010101, wet mass 1 kg, dry mass 0.99 kg
- transport, freight, lorry, unspecified: 0.0097129 metric ton*km; lognormal variance with pedigree 0.028083, pedigree (1,1,4,1,1)
  Transport services to transport incineration residues to landfills.
  Uncertainty: u
- titanium dioxide: 4.3794e-5 kg; lognormal variance with pedigree 1.018, pedigree (1,1,4,1,1)
  Input to DeNOx stage (TiO2 catalyst carrier)
  Uncertainty: u
  properties: wet mass 1 kg, dry mass 1 kg
- process-specific burdens, residual material landfill: 0.02224 kg; lognormal variance with pedigree 0.027969, pedigree (1,1,4,1,1)
  Mass-specific expenditures required for landfilling of incineration residues.
  Uncertainty: u
- iron (III) chloride, without water, in 40% solution state: 5.96e-5 kg; lognormal variance with pedigree 0.24523, pedigree (1,1,4,1,1)
  (same comment as for hydrochloric acid, without water, in 30% solution state)
  properties: wet mass 1 kg, dry mass 1 kg
- process-specific burdens, slag landfill: 0.22058 kg; lognormal variance with pedigree 0.032077, pedigree (1,1,4,1,1)
  Mass-specific expenditures required for landfilling of bottom ash.
  Uncertainty: u
- residual material landfill: 4.6333e-11 unit; lognormal variance with pedigree 0.027969, pedigree (1,1,4,1,1)
  Landfill infrastructure required for landfilling of incineration residues.
  Uncertainty: u
- chemical, inorganic: 0.000218 kg; lognormal variance with pedigree 0.28328, pedigree (1,1,4,1,1)
  Auxilliary inputs for the wastewater treatment stage of the incinerator plant. Proxy for Polyelectrolyte.
  Uncertainty: u
  properties: dry mass 1 kg, wet mass 1 kg, carbon content, fossil 0.003
- sodium hydroxide, without water, in 50% solution state: 0.001122 kg; lognormal variance with pedigree 0.22104, pedigree (1,1,4,1,1)
  (same comment as for quicklime, milled, packed)
  properties: heating value, net 3.03 MJ, wet mass 1 kg, dry mass 1 kg
- municipal waste incineration facility: 2.5e-10 unit
  Demands per kilogram waste.
- chemical, organic: 1.284e-5 kg; lognormal variance with pedigree 1.4089, pedigree (1,1,4,1,1)
  Auxilliary inputs for the wastewater treatment stage of the incinerator plant. Proxy for (pure) Trisodium-trimercapto-s-triazine (CAS 17766-26-6), used as 15% diluted solution, aka TMT15.
  Uncertainty: u
  properties: heating value, net 19.03 MJ, dry mass 1 kg, carbon content, fossil 0.628, wet mass 1 kg
- chromium oxide, flakes: 8.9376e-7 kg; lognormal variance with pedigree 1.018, pedigree (1,1,4,1,1)
  Input to DeNOx stage.
  Uncertainty: u
  properties: wet mass 1 kg, dry mass 1 kg
- ammonia, anhydrous, liquid: 0.000699 kg; lognormal variance with pedigree 0.67677, pedigree (1,1,4,1,1)
  Input to DeNOx stage (100% NH3).
  Uncertainty: u
  properties: dry mass 1 kg, wet mass 1 kg
- water, decarbonised: 1.39 kg; lognormal variance with pedigree 0.24523, pedigree (1,1,4,1,1)
  Incinerator process water used in flue gas scrubber stage.
  Uncertainty: u
  properties: wet mass 1 kg
- cement, unspecified: 0.008896 kg; lognormal variance with pedigree 0.037053, pedigree (1,1,4,1,1)
  Cement required for solidification of landfilled residual material.
  Uncertainty: U
  properties: dry mass 1 kg, wet mass 1 kg
- aluminium scrap, post-consumer, prepared for melting: -0.0012162 kg; lognormal variance with pedigree 0.3698, pedigree (1,1,4,1,1)
  Aluminium scrap recovered from this waste.
  Uncertainty: u
  properties: wet mass 1 kg, price 0.806 EUR2005, dry mass 1 kg
- iron scrap, sorted, pressed: -0.0097909 kg; lognormal variance with pedigree 0.28571, pedigree (1,1,4,1,1)
  Iron scrap recovered from this waste.
  Uncertainty: u
  properties: price 0.175 EUR2005, dry mass 1 kg, wet mass 1 kg
- copper scrap, sorted, pressed: -0.00012319 kg; lognormal variance with pedigree 0.68492, pedigree (1,1,4,1,1)
  Copper scrap recovered from this waste.
  Uncertainty: u
  properties: price 2.84 EUR2005, dry mass 1 kg, wet mass 1 kg

## Inputs from nature
- Oxygen [natural resource, in air]: 1.3366 kg; lognormal variance with pedigree 0.038396, pedigree (1,1,4,1,1)
  Oxygen from ambient air needed to combust and oxidise this waste. Net demand, i.e. without O2 leaving the plant in flue gas uncombusted.
  Uncertainty: u

## Emissions to nature
- Carbon monoxide, fossil [air, urban air close to ground]: 2.2619e-5 kg; lognormal variance with pedigree 0.85553, pedigree (1,1,4,1,1)
  Incomplete combustion product emitted to air.
  Uncertainty: u
- Tin [air, urban air close to ground]: 4.9776e-11 kg; lognormal variance with pedigree 1.046, pedigree (1,1,4,1,1)
  Emission to air from waste composition and transfer coefficients.
  Uncertainty: u
- Iron, ion [water, surface water]: 2.3409e-7 kg; lognormal variance with pedigree 0.94206, pedigree (1,1,4,1,1)
  Emissions to water from waste composition and transfer coefficients in incinerator and landfills.
  Uncertainty: u
- Nitrate [water, ground-, long-term]: 0.00011531 kg; lognormal variance with pedigree 0.52218, pedigree (1,1,4,1,1)
  Long-term emissions from landfilling of incineration residues.
  Uncertainty: u
- Copper [air, urban air close to ground]: 4.6516e-8 kg; lognormal variance with pedigree 0.71624, pedigree (1,1,4,1,1)
  Emission to air from waste composition and transfer coefficients.
  Uncertainty: u
- Ammonia [air, urban air close to ground]: 8.2185e-7 kg; lognormal variance with pedigree 0.72928, pedigree (1,1,4,1,1)
  Nitrogen species emitted to air after DeNOx stage.
  Uncertainty: u
- Iron [air, urban air close to ground]: 1.1832e-8 kg; lognormal variance with pedigree 0.35349, pedigree (1,1,4,1,1)
  Emission to air from waste composition and transfer coefficients.
  Uncertainty: u
- Heat, waste [air, urban air close to ground]: 9.579 MJ; lognormal variance with pedigree 0.064428, pedigree (1,1,4,1,1)
  Waste heat generated from heating value of this waste plus any electricity required to process it.
  Uncertainty: u
- Iodide [water, surface water]: 1.2412e-8 kg; lognormal variance with pedigree 1.4425, pedigree (1,1,4,1,1)
  (same comment as for Iron, ion)
- Silicon [air, urban air close to ground]: 2.4893e-8 kg; lognormal variance with pedigree 0.27099, pedigree (1,1,4,1,1)
  Emission to air from waste composition and transfer coefficients.
  Uncertainty: u
- Nickel, ion [water, surface water]: 3.4079e-8 kg; lognormal variance with pedigree 1.687, pedigree (1,1,4,1,1)
  (same comment as for Iron, ion)
- Silver, ion [water, ground-, long-term]: 5.9299e-7 kg; lognormal variance with pedigree 1.5794, pedigree (1,1,4,1,1)
  Long-term emissions from landfilling of incineration residues.
  Uncertainty: u
- DOC, Dissolved Organic Carbon [water, surface water]: 0.00017534 kg; lognormal variance with pedigree 0.060289, pedigree (1,1,4,1,1)
  (same comment as for Iron, ion)
- Iodine [air, urban air close to ground]: 6.8922e-12 kg; lognormal variance with pedigree 1.9506, pedigree (1,1,4,1,1)
  Emission to air from waste composition and transfer coefficients.
  Uncertainty: u
- Aluminium [air, urban air close to ground]: 5.6947e-9 kg; lognormal variance with pedigree 0.43353, pedigree (1,1,4,1,1)
  Emission to air from waste composition and transfer coefficients.
  Uncertainty: u
- Benzene, hexachloro- [air, urban air close to ground]: 7.1606e-11 kg; lognormal variance with pedigree 0.10952, pedigree (1,1,4,1,1)
  Incomplete combustion product emitted to air.
  Uncertainty: u
- Copper, ion [water, ground-, long-term]: 0.00075344 kg; lognormal variance with pedigree 0.6661, pedigree (1,1,4,1,1)
  Long-term emissions from landfilling of incineration residues.
  Uncertainty: u
- Potassium, ion [water, ground-, long-term]: 0.0016585 kg; lognormal variance with pedigree 0.28989, pedigree (1,1,4,1,1)
  Long-term emissions from landfilling of incineration residues.
  Uncertainty: u
- Aluminium [water, surface water]: 7.9785e-7 kg; lognormal variance with pedigree 0.74699, pedigree (1,1,4,1,1)
  (same comment as for Iron, ion)
- Mercury [water, surface water]: 8.7829e-10 kg; lognormal variance with pedigree 1.2527, pedigree (1,1,4,1,1)
  (same comment as for Iron, ion)
- Chloride [water, surface water]: 0.0051848 kg; lognormal variance with pedigree 0.28595, pedigree (1,1,4,1,1)
  (same comment as for Iron, ion)
- Sodium, ion [water, surface water]: 0.0010044 kg; lognormal variance with pedigree 0.23179, pedigree (1,1,4,1,1)
  (same comment as for Iron, ion)
- Antimony [water, ground-, long-term]: 2.4086e-5 kg; lognormal variance with pedigree 0.88176, pedigree (1,1,4,1,1)
  Long-term emissions from landfilling of incineration residues.
  Uncertainty: u
- Tin, ion [water, surface water]: 2.3895e-9 kg; lognormal variance with pedigree 1.5238, pedigree (1,1,4,1,1)
  (same comment as for Iron, ion)
- Potassium, ion [water, surface water]: 0.00046364 kg; lognormal variance with pedigree 0.33745, pedigree (1,1,4,1,1)
  (same comment as for Iron, ion)
- Nitrate [water, surface water]: 4.0869e-5 kg; lognormal variance with pedigree 0.36222, pedigree (1,1,4,1,1)
  (same comment as for Iron, ion)
- Carbon dioxide, non-fossil [air, urban air close to ground]: 0.75153 kg; lognormal variance with pedigree 0.039966, pedigree (1,1,4,1,1)
  Emission to air from waste composition and transfer coefficients.
  Uncertainty: u
- Dinitrogen monoxide [air, urban air close to ground]: 4.7817e-5 kg; lognormal variance with pedigree 1.2898, pedigree (1,1,4,1,1)
  Nitrogen species emitted to air after DeNOx stage.
  Uncertainty: u
- Mercury [air, urban air close to ground]: 1.8438e-8 kg; lognormal variance with pedigree 1.6346, pedigree (1,1,4,1,1)
  Emission to air from waste composition and transfer coefficients.
  Uncertainty: u
- Aluminium [water, ground-, long-term]: 0.0076603 kg; lognormal variance with pedigree 0.33901, pedigree (1,1,4,1,1)
  Long-term emissions from landfilling of incineration residues.
  Uncertainty: u
- Cyanide [air, urban air close to ground]: 1.0273e-5 kg; lognormal variance with pedigree 1.2898, pedigree (1,1,4,1,1)
  Nitrogen species emitted to air after DeNOx stage.
  Uncertainty: u
- Arsenic, ion [water, surface water]: 7.0038e-7 kg; lognormal variance with pedigree 1.4166, pedigree (1,1,4,1,1)
  (same comment as for Iron, ion)
- Tin, ion [water, ground-, long-term]: 5.2384e-5 kg; lognormal variance with pedigree 1.3388, pedigree (1,1,4,1,1)
  Long-term emissions from landfilling of incineration residues.
  Uncertainty: u
- Selenium [water, ground-, long-term]: 2.182e-7 kg; lognormal variance with pedigree 1.1903, pedigree (1,1,4,1,1)
  Long-term emissions from landfilling of incineration residues.
  Uncertainty: u
- Arsenic, ion [water, ground-, long-term]: 6.9776e-7 kg; lognormal variance with pedigree 1.5334, pedigree (1,1,4,1,1)
  Long-term emissions from landfilling of incineration residues.
  Uncertainty: u
- Selenium [air, urban air close to ground]: 3.7185e-9 kg; lognormal variance with pedigree 1.7268, pedigree (1,1,4,1,1)
  Emission to air from waste composition and transfer coefficients.
  Uncertainty: u
- Sulfate [water, surface water]: 0.00075429 kg; lognormal variance with pedigree 0.28932, pedigree (1,1,4,1,1)
  (same comment as for Iron, ion)
- Arsenic [air, urban air close to ground]: 7.9133e-9 kg; lognormal variance with pedigree 1.5416, pedigree (1,1,4,1,1)
  Emission to air from waste composition and transfer coefficients.
  Uncertainty: u
- Phosphate [water, surface water]: 4.2208e-7 kg; lognormal variance with pedigree 0.53252, pedigree (1,1,4,1,1)
  (same comment as for Iron, ion)
- Benzo(a)pyrene [air, urban air close to ground]: 7.6208e-13 kg; lognormal variance with pedigree 0.45049, pedigree (1,1,4,1,1)
  Incomplete combustion product emitted to air.
  Uncertainty: u
- Iodide [water, ground-, long-term]: 0 kg; pedigree (1,1,1,1,1)
  Long-term emissions from landfilling of incineration residues.
  Uncertainty: u
- Hydrogen chloride [air, urban air close to ground]: 3.4257e-6 kg; lognormal variance with pedigree 0.44836, pedigree (1,1,4,1,1)
  Emission to air from waste composition and transfer coefficients.
  Uncertainty: u
- Phenol, pentachloro- [air, urban air close to ground]: 1.4914e-11 kg; lognormal variance with pedigree 0.10952, pedigree (1,1,4,1,1)
  Incomplete combustion product emitted to air.
  Uncertainty: u
- Dioxins, measured as 2,3,7,8-tetrachlorodibenzo-p-dioxin [air, urban air close to ground]: 6.8487e-14 kg; lognormal variance with pedigree 0.45049, pedigree (1,1,4,1,1)
  Incomplete combustion product emitted to air.
  Uncertainty: u
- Calcium, ion [water, ground-, long-term]: 0.015386 kg; lognormal variance with pedigree 0.29078, pedigree (1,1,4,1,1)
  Long-term emissions from landfilling of incineration residues.
  Uncertainty: u
- Cobalt [water, ground-, long-term]: 1.2509e-6 kg; lognormal variance with pedigree 1.4955, pedigree (1,1,4,1,1)
  Long-term emissions from landfilling of incineration residues.
  Uncertainty: u
- Phosphate [water, ground-, long-term]: 0.00010078 kg; lognormal variance with pedigree 4.8232, pedigree (1,1,4,1,1)
  Long-term emissions from landfilling of incineration residues.
  Uncertainty: u
- Lead [water, surface water]: 2.6881e-8 kg; lognormal variance with pedigree 0.72869, pedigree (1,1,4,1,1)
  (same comment as for Iron, ion)
- Silver, ion [water, surface water]: 1.4952e-9 kg; lognormal variance with pedigree 1.5821, pedigree (1,1,4,1,1)
  (same comment as for Iron, ion)
- Sulfate [water, ground-, long-term]: 0.0038197 kg; lognormal variance with pedigree 0.35965, pedigree (1,1,4,1,1)
  Long-term emissions from landfilling of incineration residues.
  Uncertainty: u
- Vanadium, ion [water, surface water]: 6.1158e-9 kg; lognormal variance with pedigree 1.4856, pedigree (1,1,4,1,1)
  (same comment as for Iron, ion)
- Antimony [air, urban air close to ground]: 2.6684e-11 kg; lognormal variance with pedigree 1.1269, pedigree (1,1,4,1,1)
  Emission to air from waste composition and transfer coefficients.
  Uncertainty: u
- TOC, Total Organic Carbon [water, surface water]: 0.00017534 kg; lognormal variance with pedigree 0.060289, pedigree (1,1,4,1,1)
  (same comment as for Iron, ion)
- Particulates, > 2.5 um, and < 10um [air, urban air close to ground]: 2.0546e-8 kg; lognormal variance with pedigree 0.22188, pedigree (1,1,4,1,1)
  Incomplete combustion product emitted to air.
  Uncertainty: u
- Titanium, ion [water, surface water]: 6.0282e-7 kg; lognormal variance with pedigree 0.4327, pedigree (1,1,4,1,1)
  (same comment as for Iron, ion)
- Chromium VI [water, ground-, long-term]: 3.0074e-6 kg; lognormal variance with pedigree 3.4866, pedigree (1,1,4,1,1)
  Long-term emissions from landfilling of incineration residues.
  Uncertainty: u
- Chloride [water, ground-, long-term]: 0.0014819 kg; lognormal variance with pedigree 0.38361, pedigree (1,1,4,1,1)
  Long-term emissions from landfilling of incineration residues.
  Uncertainty: u
- Molybdenum [water, surface water]: 3.2368e-7 kg; lognormal variance with pedigree 0.95192, pedigree (1,1,4,1,1)
  (same comment as for Iron, ion)
- Beryllium [water, surface water]: 2.9532e-7 kg; lognormal variance with pedigree 1.3464, pedigree (1,1,4,1,1)
  (same comment as for Iron, ion)
- Carbon monoxide, non-fossil [air, urban air close to ground]: 3.5595e-5 kg; lognormal variance with pedigree 0.85553, pedigree (1,1,4,1,1)
  Incomplete combustion product emitted to air.
  Uncertainty: u
- Manganese [water, surface water]: 1.8522e-8 kg; lognormal variance with pedigree 1.4897, pedigree (1,1,4,1,1)
  (same comment as for Iron, ion)
- Iron, ion [water, ground-, long-term]: 0.0070942 kg; lognormal variance with pedigree 0.39886, pedigree (1,1,4,1,1)
  Long-term emissions from landfilling of incineration residues.
  Uncertainty: u
- Fluoride [water, ground-, long-term]: 0.0003285 kg; lognormal variance with pedigree 0.44051, pedigree (1,1,4,1,1)
  Long-term emissions from landfilling of incineration residues.
  Uncertainty: u
- Mercury [water, ground-, long-term]: 4.7813e-8 kg; lognormal variance with pedigree 3.0505, pedigree (1,1,4,1,1)
  Long-term emissions from landfilling of incineration residues.
  Uncertainty: u
- Copper, ion [water, surface water]: 7.6217e-8 kg; lognormal variance with pedigree 0.82583, pedigree (1,1,4,1,1)
  (same comment as for Iron, ion)
- Carbon dioxide, fossil [air, urban air close to ground]: 0.47757 kg; lognormal variance with pedigree 0.039966, pedigree (1,1,4,1,1)
  Emission to air from waste composition and transfer coefficients.
  Uncertainty: u
- Particulates, < 2.5 um [air, urban air close to ground]: 4.0887e-6 kg; lognormal variance with pedigree 0.45049, pedigree (1,1,4,1,1)
  Incomplete combustion product emitted to air.
  Uncertainty: u
- Vanadium, ion [water, ground-, long-term]: 1.5379e-6 kg; lognormal variance with pedigree 2.0694, pedigree (1,1,4,1,1)
  Long-term emissions from landfilling of incineration residues.
  Uncertainty: u
- Chromium, ion [water, surface water]: 1.9086e-9 kg; lognormal variance with pedigree 0.97417, pedigree (1,1,4,1,1)
  (same comment as for Iron, ion)
- Sodium [air, urban air close to ground]: 2.3358e-5 kg; lognormal variance with pedigree 0.48153, pedigree (1,1,4,1,1)
  Emission to air from waste composition and transfer coefficients.
  Uncertainty: u
- Selenium [water, surface water]: 1.0556e-7 kg; lognormal variance with pedigree 1.3877, pedigree (1,1,4,1,1)
  (same comment as for Iron, ion)
- Lead [air, urban air close to ground]: 2.0575e-8 kg; lognormal variance with pedigree 0.81829, pedigree (1,1,4,1,1)
  Emission to air from waste composition and transfer coefficients.
  Uncertainty: u
- Fluoride [water, surface water]: 2.8016e-5 kg; lognormal variance with pedigree 0.48796, pedigree (1,1,4,1,1)
  (same comment as for Iron, ion)
- Boron [water, ground-, long-term]: 6.2781e-6 kg; lognormal variance with pedigree 1.1497, pedigree (1,1,4,1,1)
  Long-term emissions from landfilling of incineration residues.
  Uncertainty: u
- Molybdenum [air, urban air close to ground]: 1.3371e-9 kg; lognormal variance with pedigree 1.5056, pedigree (1,1,4,1,1)
  Emission to air from waste composition and transfer coefficients.
  Uncertainty: u
- Beryllium [water, ground-, long-term]: 0.00044076 kg; lognormal variance with pedigree 0.72406, pedigree (1,1,4,1,1)
  Long-term emissions from landfilling of incineration residues.
  Uncertainty: u
- Chromium [air, urban air close to ground]: 2.1464e-8 kg; lognormal variance with pedigree 0.95777, pedigree (1,1,4,1,1)
  Emission to air from waste composition and transfer coefficients.
  Uncertainty: u
- Barium [air, urban air close to ground]: 1.4517e-7 kg; lognormal variance with pedigree 0.9357, pedigree (1,1,4,1,1)
  Emission to air from waste composition and transfer coefficients.
  Uncertainty: u
- Potassium [air, urban air close to ground]: 1.0506e-5 kg; lognormal variance with pedigree 0.57972, pedigree (1,1,4,1,1)
  Emission to air from waste composition and transfer coefficients.
  Uncertainty: u
- Calcium [air, urban air close to ground]: 9.0376e-5 kg; lognormal variance with pedigree 0.31479, pedigree (1,1,4,1,1)
  Emission to air from waste composition and transfer coefficients.
  Uncertainty: u
- Phosphorus [air, urban air close to ground]: 7.6203e-7 kg; lognormal variance with pedigree 0.72349, pedigree (1,1,4,1,1)
  Emission to air from waste composition and transfer coefficients.
  Uncertainty: u
- BOD5, Biological Oxygen Demand [water, ground-, long-term]: 0.0015264 kg; lognormal variance with pedigree 0.038738, pedigree (1,1,4,1,1)
  Long-term emissions from landfilling of incineration residues.
  Uncertainty: u
- Bromine [water, surface water]: 0.00011679 kg; lognormal variance with pedigree 0.44171, pedigree (1,1,4,1,1)
  (same comment as for Iron, ion)
- Cadmium, ion [water, surface water]: 8.1641e-10 kg; lognormal variance with pedigree 1.1386, pedigree (1,1,4,1,1)
  (same comment as for Iron, ion)
- Zinc [air, urban air close to ground]: 5.6648e-7 kg; lognormal variance with pedigree 0.67282, pedigree (1,1,4,1,1)
  Emission to air from waste composition and transfer coefficients.
  Uncertainty: u
- Magnesium [water, ground-, long-term]: 0.0023487 kg; lognormal variance with pedigree 0.52923, pedigree (1,1,4,1,1)
  Long-term emissions from landfilling of incineration residues.
  Uncertainty: u
- DOC, Dissolved Organic Carbon [water, ground-, long-term]: 0.0018466 kg; lognormal variance with pedigree 0.038738, pedigree (1,1,4,1,1)
  Long-term emissions from landfilling of incineration residues.
  Uncertainty: u
- Barium [water, ground-, long-term]: 0.00013458 kg; lognormal variance with pedigree 0.96183, pedigree (1,1,4,1,1)
  Long-term emissions from landfilling of incineration residues.
  Uncertainty: u
- Nickel [air, urban air close to ground]: 3.33e-8 kg; lognormal variance with pedigree 1.0755, pedigree (1,1,4,1,1)
  Emission to air from waste composition and transfer coefficients.
  Uncertainty: u
- Barium [water, surface water]: 2.2754e-8 kg; lognormal variance with pedigree 1.6979, pedigree (1,1,4,1,1)
  (same comment as for Iron, ion)
- COD, Chemical Oxygen Demand [water, surface water]: 0.00040223 kg; lognormal variance with pedigree 0.060054, pedigree (1,1,4,1,1)
  (same comment as for Iron, ion)
- TOC, Total Organic Carbon [water, ground-, long-term]: 0.0018466 kg; lognormal variance with pedigree 0.038738, pedigree (1,1,4,1,1)
  Long-term emissions from landfilling of incineration residues.
  Uncertainty: u
- Benzene, pentachloro- [air, urban air close to ground]: 1.8093e-10 kg; lognormal variance with pedigree 0.10952, pedigree (1,1,4,1,1)
  Incomplete combustion product emitted to air.
  Uncertainty: u
- Silicon [water, ground-, long-term]: 0.0019035 kg; lognormal variance with pedigree 5.4924, pedigree (1,1,4,1,1)
  Long-term emissions from landfilling of incineration residues.
  Uncertainty: u
- Manganese [air, urban air close to ground]: 8.9524e-9 kg; lognormal variance with pedigree 0.88427, pedigree (1,1,4,1,1)
  Emission to air from waste composition and transfer coefficients.
  Uncertainty: u
- Boron [water, surface water]: 5.7843e-8 kg; lognormal variance with pedigree 1.5393, pedigree (1,1,4,1,1)
  (same comment as for Iron, ion)
- Hydrogen fluoride [air, urban air close to ground]: 2.4719e-6 kg; lognormal variance with pedigree 0.80868, pedigree (1,1,4,1,1)
  Emission to air from waste composition and transfer coefficients.
  Uncertainty: u
- Water [water, surface water]: 0.00046375 m3; lognormal variance with pedigree 1.0543, pedigree (1,1,4,1,1)
  Process water released to surface water.
  Uncertainty: u
- Sodium, ion [water, ground-, long-term]: 0.0037138 kg; lognormal variance with pedigree 0.30548, pedigree (1,1,4,1,1)
  Long-term emissions from landfilling of incineration residues.
  Uncertainty: u
- Lead [water, ground-, long-term]: 0.00028461 kg; lognormal variance with pedigree 2.5307, pedigree (1,1,4,1,1)
  Long-term emissions from landfilling of incineration residues.
  Uncertainty: u
- Bromine [air, urban air close to ground]: 6.4593e-8 kg; lognormal variance with pedigree 0.95777, pedigree (1,1,4,1,1)
  Emission to air from waste composition and transfer coefficients.
  Uncertainty: u
- Cadmium, ion [water, ground-, long-term]: 6.929e-7 kg; lognormal variance with pedigree 6.6225, pedigree (1,1,4,1,1)
  Long-term emissions from landfilling of incineration residues.
  Uncertainty: u
- Cobalt [air, urban air close to ground]: 1.2717e-9 kg; lognormal variance with pedigree 1.5559, pedigree (1,1,4,1,1)
  Emission to air from waste composition and transfer coefficients.
  Uncertainty: u
- Cobalt [water, surface water]: 2.2149e-10 kg; lognormal variance with pedigree 2.0947, pedigree (1,1,4,1,1)
  (same comment as for Iron, ion)
- Zinc, ion [water, ground-, long-term]: 0.00053977 kg; lognormal variance with pedigree 1.7823, pedigree (1,1,4,1,1)
  Long-term emissions from landfilling of incineration residues.
  Uncertainty: u
- Molybdenum [water, ground-, long-term]: 1.6815e-6 kg; lognormal variance with pedigree 1.4862, pedigree (1,1,4,1,1)
  Long-term emissions from landfilling of incineration residues.
  Uncertainty: u
- Titanium [air, urban air close to ground]: 1.3305e-6 kg; lognormal variance with pedigree 0.56554, pedigree (1,1,4,1,1)
  Emission to air from waste composition and transfer coefficients.
  Uncertainty: u
- Chromium VI [water, surface water]: 6.9028e-7 kg; lognormal variance with pedigree 1.00586, pedigree (1,1,4,1,1)
  (same comment as for Iron, ion)
- Nitrogen oxides [air, urban air close to ground]: 0.00026025 kg; lognormal variance with pedigree 0.72928, pedigree (1,1,4,1,1)
  Sum of fuel-Nox and thermal-NOx emitted to air after DeNOx stage.
  Uncertainty: u
- Magnesium [air, urban air close to ground]: 2.0069e-6 kg; lognormal variance with pedigree 0.56554, pedigree (1,1,4,1,1)
  Emission to air from waste composition and transfer coefficients.
  Uncertainty: u
- Calcium, ion [water, surface water]: 0.00015708 kg; lognormal variance with pedigree 0.31361, pedigree (1,1,4,1,1)
  (same comment as for Iron, ion)
- COD, Chemical Oxygen Demand [water, ground-, long-term]: 0.0046666 kg; lognormal variance with pedigree 0.038738, pedigree (1,1,4,1,1)
  Long-term emissions from landfilling of incineration residues.
  Uncertainty: u
- Toluene [air, urban air close to ground]: 6.8492e-8 kg; lognormal variance with pedigree 0.10952, pedigree (1,1,4,1,1)
  Incomplete combustion product emitted to air.
  Uncertainty: u
- Nickel, ion [water, ground-, long-term]: 5.1263e-5 kg; lognormal variance with pedigree 1.0423, pedigree (1,1,4,1,1)
  Long-term emissions from landfilling of incineration residues.
  Uncertainty: u
- Titanium, ion [water, ground-, long-term]: 0.00078316 kg; lognormal variance with pedigree 0.76785, pedigree (1,1,4,1,1)
  Long-term emissions from landfilling of incineration residues.
  Uncertainty: u
- Methane, fossil [air, urban air close to ground]: 1.996e-7 kg; lognormal variance with pedigree 0.10952, pedigree (1,1,4,1,1)
  Incomplete combustion product emitted to air.
  Uncertainty: u
- Cadmium [air, urban air close to ground]: 4.0205e-9 kg; lognormal variance with pedigree 1.3318, pedigree (1,1,4,1,1)
  Emission to air from waste composition and transfer coefficients.
  Uncertainty: u
- Vanadium [air, urban air close to ground]: 3.5323e-8 kg; lognormal variance with pedigree 1.2954, pedigree (1,1,4,1,1)
  Emission to air from waste composition and transfer coefficients.
  Uncertainty: u
- Magnesium [water, surface water]: 1.1409e-5 kg; lognormal variance with pedigree 0.79349, pedigree (1,1,4,1,1)
  (same comment as for Iron, ion)
- Silicon [water, surface water]: 5.1658e-6 kg; lognormal variance with pedigree 0.57619, pedigree (1,1,4,1,1)
  (same comment as for Iron, ion)
- Bromine [water, ground-, long-term]: 1.2464e-5 kg; lognormal variance with pedigree 0.93879, pedigree (1,1,4,1,1)
  Long-term emissions from landfilling of incineration residues.
  Uncertainty: u
- Antimony [water, surface water]: 1.1495e-5 kg; lognormal variance with pedigree 1.053, pedigree (1,1,4,1,1)
  (same comment as for Iron, ion)
- Benzene [air, urban air close to ground]: 3.4246e-8 kg; lognormal variance with pedigree 0.10952, pedigree (1,1,4,1,1)
  Incomplete combustion product emitted to air.
  Uncertainty: u
- Sulfur dioxide [air, urban air close to ground]: 1.5247e-5 kg; lognormal variance with pedigree 0.62236, pedigree (1,1,4,1,1)
  Emission to air from waste composition and transfer coefficients.
  Uncertainty: u
- Methane, non-fossil [air, urban air close to ground]: 3.1409e-7 kg; lognormal variance with pedigree 0.10952, pedigree (1,1,4,1,1)
  Incomplete combustion product emitted to air.
  Uncertainty: u
- Water [air, urban air close to ground]: 0.001459 m3; lognormal variance with pedigree 0.67968, pedigree (1,1,4,1,1)
  Water vapour from waste humidity, hydrogen oxidation and part of the process water.
  Uncertainty: U
- NMVOC, non-methane volatile organic compounds, unspecified origin [air, urban air close to ground]: 1.5585e-6 kg; lognormal variance with pedigree 0.10952, pedigree (1,1,4,1,1)
  Incomplete combustion product emitted to air.
  Uncertainty: u
- Heat, waste [water, surface water]: 2.5451 MJ; lognormal variance with pedigree 0.064428, pedigree (1,1,4,1,1)
  (same comment as for Heat, waste)
- Zinc, ion [water, surface water]: 8.4669e-8 kg; lognormal variance with pedigree 0.60184, pedigree (1,1,4,1,1)
  (same comment as for Iron, ion)
- BOD5, Biological Oxygen Demand [water, surface water]: 0.00039198 kg; lognormal variance with pedigree 0.06228, pedigree (1,1,4,1,1)
  (same comment as for Iron, ion)
- Manganese [water, ground-, long-term]: 0.00024822 kg; lognormal variance with pedigree 0.85706, pedigree (1,1,4,1,1)
  Long-term emissions from landfilling of incineration residues.
  Uncertainty: u

## Extrapolations
This dataset has been extrapolated from year 2012 to the year of the calculation (2021). The uncertainty has been adjusted accordingly.
