# linseed seed production, at farm

Dataset: EcoSpold 2, unit process
Geography: RoW
Time period: 1996-01-01 to 2021-12-31
Technology level: current
Classification: ISIC rev.4 ecoinvent: 0111:Growing of cereals (except rice), leguminous crops and oil seeds
Tags: WFLDB
Scenario: Business-as-Usual
System model: Allocation, cut-off by classification
Generated by: [System]
Database: ecoinvent
isCopyrightProtected: true
accessRestrictedTo: 1

## General comment
This global dataset is a copy of the regional CH dataset, except for the following modifications.
The production volume represents the global annual production.
The geographicalCorrelation score of every pedigree matrix of was changed to '5'.
The comments below were part of the CH regional dataset.
This dataset represents the production of 1 kg of linseed seed (fresh matter) at farm. The yield is 3113 kg/ha at a moisture content at storage of 6%.
This process is identical to the ecoinvent process 'rape seed production, Swiss integrated production, intensive' which is used as a proxy for linseed seed production at farm. This dataset refers to an average situation; for specific situations exchanges might differ substantially due to site specific parameters

## Included activities start
This activity starts after the harvest of the previous crop. The inputs of seeds, mineral fertilisers and pesticides are considered. Farm manure as an organic fertiliser is only accounted for in terms of direct field emissions; all pre-processes are included in the animal production systems.

## Included activities end
The dataset includes all machine operations and corresponding machine infrastructure and sheds. Machine operations are: soil cultivation, sowing, fertilisation, weed control, pest and pathogen control, combine-harvest, transport from field to regional processing centre (10 km) and drying of seeds. Further, direct field emissions are included. This activity ends after drying of seeds at the regional processing centre.

## Technology
Integrated production

## Time period
Time period referring to the data source: 1996-2003. Based on expert opinion data is considered to be valid at least up to 2012.

## Reference product
- linseed seed, at farm: 1 kg; CPC 01441: Linseed; By-product classification allocatable product
  production volume 1.53704e12 kg
    Source: FAOSTAT. Average, 2009-2012. Calculation method: crop production volume [kg] / crop productivity [kg/ha] * seeding density [kg/ha] = kg
  property carbon content, non-fossil 0.590234
    calculation: C-content of components according to ecoinvent report No. 15a. Source of composition: Souci, S.W., Fachmann, W., Kraut, H. (Hg.: Bundesminsiterium fur Ernahrung, Landwirtschaft und Forsten, Bonn) 'Die Zusammensetzung der Lebensmittel - Nahrwerttabellen', medpharm Scientific Publishers Stuttgart, CRC Press; 2000.
  property price 0.110196 EUR2005
    Calculated based on inputs: The price of the product has been calculated as a sum of the values of the material and energy inputs for this product. This value is therefore a rough estimation. It may underestimate the real price since there are additional expenses when producing any product. These expences can include for example labour costs, treatment of waste materials and profit for the producer. Please consider carefully whether this level of data quality is acceptable for your application.
  property carbon content 0.590234
    carbon content on a dry matter basis (reserved; not for manual entry)
  properties: carbon content, fossil 0, water in wet mass 0.0909091 kg, dry mass 0.909091 kg, water content 0.1, wet mass 1 kg, carbon allocation 0.536577 kg

## Inputs from technosphere
- transport, tractor and trailer, agricultural: 0.010682 metric ton*km; lognormal variance with pedigree 0.0153563, pedigree (2,1,4,5,1)
- fertilising, by broadcaster: 0.00096378 ha; lognormal variance with pedigree 0.0153563, pedigree (2,1,4,5,1)
  Extrapolated from Ecoinvent v2.2 process 'Rape seed IP, at regional storehouse/CH U'.
- pyrethroid-compound: 9.6378e-6 kg; lognormal variance with pedigree 0.0569308, pedigree (2,2,5,5,1)
  Extrapolated from Ecoinvent v2.2 process 'Rape seed IP, at regional storehouse/CH U'.
  properties: dry mass 1 kg, carbon content, fossil 0.623, wet mass 1 kg
- sowing: 0.00032126 ha; lognormal variance with pedigree 0.0153563, pedigree (2,1,4,5,1)
  Extrapolated from Ecoinvent v2.2 process 'Rape seed IP, at regional storehouse/CH U'.
- tillage, harrowing, by spring tine harrow: 0.00064252 ha; lognormal variance with pedigree 0.0153563, pedigree (2,1,4,5,1)
  Extrapolated from Ecoinvent v2.2 process 'Rape seed IP, at regional storehouse/CH U'.
- urea: 0 kg; pedigree (1,1,1,1,1)
  The exchange has been updated from 'urea, as N' into 'urea' and therefore its amount has been scaled (multiplied) from 0.006 kg by 2.1438 kg of 'urea' per kg of 'urea, as N'. Original comment of the exchange is: Extrapolated from Ecoinvent v2.2 process 'Rape seed IP, at regional storehouse/CH U'. Corresponds to 0.00598 kg/ha
  properties: wet mass 1 kg, carbon content, fossil 0.2, dry mass 1 kg
- drying of bread grain, seed and legumes: 0.0874128 l; lognormal variance with pedigree 0.0153563, pedigree (2,1,4,5,1)
  Extrapolated from Ecoinvent v2.2 process 'Rape seed IP, at regional storehouse/CH U'.
- liquid manure spreading, by vacuum tanker: 0.0027416 m3; lognormal variance with pedigree 0.0153563, pedigree (2,1,4,5,1)
  Extrapolated from Ecoinvent v2.2 process 'Rape seed IP, at regional storehouse/CH U'.
- inorganic nitrogen fertiliser, as N: 0 kg; pedigree (1,1,1,1,1)
  Extrapolated from Ecoinvent v2.2 process 'Rape seed IP, at regional storehouse/CH U'. Corresponds to 0.000789 kg/ha
  properties: wet mass 1 kg, dry mass 1 kg
- ammonium nitrate: 0 kg; pedigree (1,1,1,1,1)
  The exchange has been updated from 'ammonium nitrate, as N' into 'ammonium nitrate' and therefore its amount has been scaled (multiplied) from 0.017 kg by 2.8573 kg of 'ammonium nitrate' per kg of 'ammonium nitrate, as N'. Original comment of the exchange is: Extrapolated from Ecoinvent v2.2 process 'Rape seed IP, at regional storehouse/CH U'. Corresponds to 0.017 kg/ha
  properties: dry mass 1 kg, wet mass 1 kg
- application of plant protection product, by field sprayer: 0.0011244 ha; lognormal variance with pedigree 0.0153563, pedigree (2,1,4,5,1)
  Extrapolated from Ecoinvent v2.2 process 'Rape seed IP, at regional storehouse/CH U'.
- tillage, ploughing: 0.00032126 ha; lognormal variance with pedigree 0.0153563, pedigree (2,1,4,5,1)
  Extrapolated from Ecoinvent v2.2 process 'Rape seed IP, at regional storehouse/CH U'.
- packaging, for pesticides: 0.00139426 kg; lognormal variance with pedigree 0.0592, pedigree (4,3,4,5,4)
  Total amount of active substance/s of pesticides needed for the production of linseed seed, at farm is calculated to be circa 6.97E-04 kg. Pesticide/s used in this dataset is/are: '[thio]carbamate-compound', 'acetamide-anillide-compound, unspecified', 'pyrethroid-compound'. The total amount of active substance/s is doubled in order to account for the packaging of the dilluted product of pesticide/s that is/are applied. Therefore, 1.39E-03 kg of packaging for pesticides is justified with this exchange.
  properties: dry mass 1 kg, heating value, net 25.97 MJ, wet mass 1 kg, carbon content, fossil 0.85714, price 0.0642 EUR2005
- [thio]carbamate-compound: 0.00018954 kg; lognormal variance with pedigree 0.0569308, pedigree (2,2,5,5,1)
  Extrapolated from Ecoinvent v2.2 process 'Rape seed IP, at regional storehouse/CH U'.
  properties: carbon content, fossil 0.626349, wet mass 1 kg, dry mass 1 kg
- combine harvesting: 0.00032126 ha; lognormal variance with pedigree 0.0153563, pedigree (2,1,4,5,1)
  Extrapolated from Ecoinvent v2.2 process 'Rape seed IP, at regional storehouse/CH U'.
- packaging, for fertilisers: 0.0816709 kg; lognormal variance with pedigree 0.0592, pedigree (4,3,4,5,4)
  Total amount of active substance/s of fertilisers needed for the production of 'linseed seed, at farm' is calculated to be circa 4.08E-02 kg. Fertiliser/s used in this dataset is/are: 'ammonium nitrate, as N', 'ammonium sulfate, as N', 'nitrogen fertiliser, as N', 'phosphate fertiliser, as P2O5', 'phosphate rock, as P2O5, beneficiated, dry', 'urea, as N'. The total amount of active substance/s is doubled in order to account for the packaging of the dilluted product of fertiliser/s that is/are applied. Therefore, 8.17E-02 kg of packaging for fertilisers is justified with this exchange.
  properties: carbon content, fossil 0.825301, wet mass 1 kg, heating value, net 25.01 MJ, price 0.0642 EUR2005, dry mass 1 kg
  note on carbon content, fossil: Considering a chemical formula (C2H4)n for polyethylene, carbon content-fossil is calculated to be 0.856286 kg of Carbon per kg of dry mass.
- solid manure loading and spreading, by hydraulic loader and spreader: 1.7775 kg; lognormal variance with pedigree 0.0153563, pedigree (2,1,4,5,1)
  Extrapolated from Ecoinvent v2.2 process 'Rape seed IP, at regional storehouse/CH U'.
- ammonium sulfate: 0.0012889 kg; lognormal variance with pedigree 0.0153563, pedigree (2,1,4,5,1)
  Extrapolated from Ecoinvent v2.2 process 'Rape seed IP, at regional storehouse/CH U'. Corresponds to 0.00129 kg/ha
  properties: wet mass 1 kg, dry mass 1 kg
- phosphate rock, beneficiated: 0 kg; pedigree (1,1,1,1,1)
  The exchange has been updated from 'phosphate rock, as P2O5, beneficiated, dry' into 'phosphate rock, beneficiated' and therefore its amount has been scaled (multiplied) from 0.0017 kg by 3.125 kg of 'phosphate rock, beneficiated' per kg of 'phosphate rock, as P2O5, beneficiated, dry'. Original comment of the exchange is: Extrapolated from Ecoinvent v2.2 process 'Rape seed IP, at regional storehouse/CH U'. Corresponds to 0.00173 kg/ha
  properties: wet mass 1 kg, dry mass 1 kg
- linseed seed, for sowing: 0.0017669 kg; lognormal variance with pedigree 0.0153563, pedigree (2,1,4,5,1)
  Extrapolated from Ecoinvent v2.2 process 'Rape seed IP, at regional storehouse/CH U'. Sowing density: 5.5kg/ha.
  properties: carbon content, non-fossil 0.590234, wet mass 1 kg, dry mass 0.909091 kg, water content 0.1
  note on carbon content, non-fossil: calculation: C-content of components according to ecoinvent report No. 15a. Source of composition: Souci, S.W., Fachmann, W., Kraut, H. (Hg.: Bundesminsiterium fur Ernahrung, Landwirtschaft und Forsten, Bonn) 'Die Zusammensetzung der Lebensmittel - Nahrwerttabellen', medpharm Scientific Publishers Stuttgart, CRC Press; 2000.
- inorganic phosphorus fertiliser, as P2O5: 0 kg; pedigree (1,1,1,1,1)
  Extrapolated from Ecoinvent v2.2 process 'Rape seed IP, at regional storehouse/CH U'. Corresponds to 0.00296 kg/ha
  properties: dry mass 1 kg, wet mass 1 kg
- acetamide-anillide-compound, unspecified: 0.00049795 kg; lognormal variance with pedigree 0.0569308, pedigree (2,2,5,5,1)
  Extrapolated from Ecoinvent v2.2 process 'Rape seed IP, at regional storehouse/CH U'.
  properties: carbon content, fossil 0.659175, wet mass 1 kg, dry mass 1 kg
- urea: 0.00552958, 0.000818963, 0.00647545 kg (3 entries); lognormal variance with pedigree 0.0153563, pedigree (2,1,4,5,1)
  (same comment as for urea)
- inorganic nitrogen fertiliser, as N: 8.40018e-7, 4.47655e-5, 5.61242e-6, 6.43444e-5, 1.62926e-6, 5.75089e-5, 7.54816e-6, 1.82727e-5, 0.00020202, 0.000120649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 kg (63 entries); lognormal variance with pedigree 0.0153563, pedigree (2,1,4,5,1)
  (same comment as for inorganic nitrogen fertiliser, as N)
- ammonium nitrate: 0.00854471, 0.0111171, 0.0290069 kg (3 entries); lognormal variance with pedigree 0.0153563, pedigree (2,1,4,5,1)
  (same comment as for ammonium nitrate)
- phosphate rock, beneficiated: 6.99929e-5, 6.99929e-5, 0.0052722 kg (3 entries); lognormal variance with pedigree 0.0153563, pedigree (2,1,4,5,1)
  (same comment as for phosphate rock, beneficiated)
- inorganic phosphorus fertiliser, as P2O5: 4.65606e-7, 3.8577e-5, 2.47343e-6, 5.00503e-5, 5.51013e-7, 4.0077e-5, 1.08243e-6, 5.69992e-6, 0.000313802, 6.61215e-5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 kg (63 entries); lognormal variance with pedigree 0.0153563, pedigree (2,1,4,5,1)
  (same comment as for inorganic phosphorus fertiliser, as P2O5)

## Inputs from nature
- Energy, gross calorific value, in biomass [natural resource, biotic]: 24.847 MJ; lognormal variance with pedigree 0.0153563, pedigree (2,1,4,5,1)
  Extrapolated from Ecoinvent v2.2 process 'Rape seed IP, at regional storehouse/CH U'. Gross energy content is related to MJ/kg dry matter of product. Source: ecoinvent data
- Carbon dioxide, in air [natural resource, in air]: 2.6836 kg; lognormal variance with pedigree 0.0153563, pedigree (2,1,4,5,1)
  Extrapolated from Ecoinvent v2.2 process 'Rape seed IP, at regional storehouse/CH U'. CO2 uptake by biomass
- Occupation, annual crop, non-irrigated [natural resource, land]: 2.9003 m2*year; lognormal variance with pedigree 0.0220616, pedigree (2,1,4,5,1)
  Extrapolated from Ecoinvent v2.2 process 'Rape seed IP, at regional storehouse/CH U'. Related to the duration from harvest date of previous crop to harvest date of main crop.
- Transformation, from pasture, man made, intensive [natural resource, land]: 0.93166 m2; lognormal variance with pedigree 0.0462144, pedigree (2,1,4,5,1)
  Extrapolated from Ecoinvent v2.2 process 'Rape seed IP, at regional storehouse/CH U'. 10000 m2 divided by the life time of the crop.
- Transformation, from annual crop, non-irrigated [natural resource, land]: 2.281 m2; lognormal variance with pedigree 0.0462144, pedigree (2,1,4,5,1)
  (same comment as for Transformation, from pasture, man made, intensive)
- Transformation, to annual crop, non-irrigated [natural resource, land]: 3.2126 m2; lognormal variance with pedigree 0.0462144, pedigree (2,1,4,5,1)
  (same comment as for Transformation, from pasture, man made, intensive)

## Emissions to nature
- Nitrate [water, ground-]: 0.040798 kg; lognormal variance with pedigree 0.177766, pedigree (2,1,4,5,1)
  Extrapolated from Ecoinvent v2.2 process 'Rape seed IP, at regional storehouse/CH U'.
- Lead [soil, agricultural]: 6.246e-7 kg; lognormal variance with pedigree 0.177766, pedigree (2,1,4,5,1)
  Extrapolated from Ecoinvent v2.2 process 'Rape seed IP, at regional storehouse/CH U'.
- Phosphorus [water, surface water]: 3.9155e-5 kg; source Prasuhn V.  2006; lognormal variance with pedigree 0.177766, pedigree (2,1,4,5,1)
  Extrapolated from Ecoinvent v2.2 process 'Rape seed IP, at regional storehouse/CH U'.
- Copper [soil, agricultural]: 1.7928e-5 kg; lognormal variance with pedigree 0.177766, pedigree (2,1,4,5,1)
  Extrapolated from Ecoinvent v2.2 process 'Rape seed IP, at regional storehouse/CH U'.
- Phosphate [water, surface water]: 0.0003399 kg; source Prasuhn V.  2006; lognormal variance with pedigree 0.177766, pedigree (2,1,4,5,1)
  Extrapolated from Ecoinvent v2.2 process 'Rape seed IP, at regional storehouse/CH U'.
- Mercury [soil, agricultural]: 1.358e-7 kg; lognormal variance with pedigree 0.177766, pedigree (2,1,4,5,1)
  Extrapolated from Ecoinvent v2.2 process 'Rape seed IP, at regional storehouse/CH U'.
- Phosphate [water, ground-]: 7.09e-5 kg; source Prasuhn V.  2006; lognormal variance with pedigree 0.177766, pedigree (2,1,4,5,1)
  Extrapolated from Ecoinvent v2.2 process 'Rape seed IP, at regional storehouse/CH U'.
- Nickel [soil, agricultural]: 1.8511e-6 kg; lognormal variance with pedigree 0.177766, pedigree (2,1,4,5,1)
  Extrapolated from Ecoinvent v2.2 process 'Rape seed IP, at regional storehouse/CH U'.
- Cadmium, ion [water, surface water]: 7.3896e-9 kg; lognormal variance with pedigree 0.358838, pedigree (2,1,4,5,1)
  Extrapolated from Ecoinvent v2.2 process 'Rape seed IP, at regional storehouse/CH U'.
- Zinc [soil, agricultural]: 8.4788e-5 kg; lognormal variance with pedigree 0.177766, pedigree (2,1,4,5,1)
  Extrapolated from Ecoinvent v2.2 process 'Rape seed IP, at regional storehouse/CH U'.
- Copper, ion [water, surface water]: 8.0117e-7 kg; lognormal variance with pedigree 0.358838, pedigree (2,1,4,5,1)
  Extrapolated from Ecoinvent v2.2 process 'Rape seed IP, at regional storehouse/CH U'.
- Metaldehyde [soil, agricultural]: 8.3528e-5 kg; lognormal variance with pedigree 0.0877992, pedigree (2,2,5,5,1)
  Extrapolated from Ecoinvent v2.2 process 'Rape seed IP, at regional storehouse/CH U'.
- Chromium, ion [water, surface water]: 9.006e-7 kg; lognormal variance with pedigree 0.358838, pedigree (2,1,4,5,1)
  Extrapolated from Ecoinvent v2.2 process 'Rape seed IP, at regional storehouse/CH U'.
- Carbetamide [soil, agricultural]: 0.00018954 kg; lognormal variance with pedigree 0.0877992, pedigree (2,2,5,5,1)
  Extrapolated from Ecoinvent v2.2 process 'Rape seed IP, at regional storehouse/CH U'.
- Lead [water, surface water]: 2.0502e-7 kg; lognormal variance with pedigree 0.358838, pedigree (2,1,4,5,1)
  Extrapolated from Ecoinvent v2.2 process 'Rape seed IP, at regional storehouse/CH U'.
- Napropamide [soil, agricultural]: 0.00014778 kg; lognormal variance with pedigree 0.0877992, pedigree (2,2,5,5,1)
  Extrapolated from Ecoinvent v2.2 process 'Rape seed IP, at regional storehouse/CH U'.
- Mercury [water, surface water]: 2.8075e-9 kg; lognormal variance with pedigree 0.358838, pedigree (2,1,4,5,1)
  Extrapolated from Ecoinvent v2.2 process 'Rape seed IP, at regional storehouse/CH U'.
- Tebutam [soil, agricultural]: 0.00035017 kg; lognormal variance with pedigree 0.0877992, pedigree (2,2,5,5,1)
  Extrapolated from Ecoinvent v2.2 process 'Rape seed IP, at regional storehouse/CH U'.
- Nickel, ion [water, surface water]: 6.6428e-7 kg; lognormal variance with pedigree 0.358838, pedigree (2,1,4,5,1)
  Extrapolated from Ecoinvent v2.2 process 'Rape seed IP, at regional storehouse/CH U'.
- Cypermethrin [soil, agricultural]: 9.6378e-6 kg; lognormal variance with pedigree 0.0877992, pedigree (2,2,5,5,1)
  Extrapolated from Ecoinvent v2.2 process 'Rape seed IP, at regional storehouse/CH U'.
- Zinc, ion [water, surface water]: 1.6701e-6 kg; lognormal variance with pedigree 0.358838, pedigree (2,1,4,5,1)
  Extrapolated from Ecoinvent v2.2 process 'Rape seed IP, at regional storehouse/CH U'.
- Cadmium, ion [water, ground-]: 1.2e-8 kg; lognormal variance with pedigree 0.358838, pedigree (2,1,4,5,1)
  Extrapolated from Ecoinvent v2.2 process 'Rape seed IP, at regional storehouse/CH U'.
- Chromium, ion [water, ground-]: 6.1751e-6 kg; lognormal variance with pedigree 0.358838, pedigree (2,1,4,5,1)
  Extrapolated from Ecoinvent v2.2 process 'Rape seed IP, at regional storehouse/CH U'.
- Copper, ion [water, ground-]: 1.1185e-6 kg; lognormal variance with pedigree 0.358838, pedigree (2,1,4,5,1)
  Extrapolated from Ecoinvent v2.2 process 'Rape seed IP, at regional storehouse/CH U'.
- Ammonia [air, non-urban air or from high stacks]: 0.0045373 kg; source EEA 2013; lognormal variance with pedigree 0.0466216, pedigree (2,1,4,5,1)
  Extrapolated from Ecoinvent v2.2 process 'Rape seed IP, at regional storehouse/CH U'.
- Lead [water, ground-]: 4.9172e-8 kg; lognormal variance with pedigree 0.358838, pedigree (2,1,4,5,1)
  Extrapolated from Ecoinvent v2.2 process 'Rape seed IP, at regional storehouse/CH U'.
- Carbon dioxide, fossil [air, non-urban air or from high stacks]: 0.0093916 kg; lognormal variance with pedigree 0.0157498, pedigree (2,1,4,5,1)
  Extrapolated from Ecoinvent v2.2 process 'Rape seed IP, at regional storehouse/CH U'. Calculated value - CO2 emissions from urea and lime. See 'WFLDB-Guidelines.pdf', available at https://ecoquery.ecoinvent.org/File/Reports.
- Mercury [water, ground-]: 3.3875e-9 kg; lognormal variance with pedigree 0.358838, pedigree (2,1,4,5,1)
  Extrapolated from Ecoinvent v2.2 process 'Rape seed IP, at regional storehouse/CH U'.
- Dinitrogen monoxide [air, non-urban air or from high stacks]: 0.0014081 kg; lognormal variance with pedigree 0.126564, pedigree (2,1,4,5,1)
  Extrapolated from Ecoinvent v2.2 process 'Rape seed IP, at regional storehouse/CH U'.
- Zinc, ion [water, ground-]: 8.6612e-6 kg; lognormal variance with pedigree 0.358838, pedigree (2,1,4,5,1)
  Extrapolated from Ecoinvent v2.2 process 'Rape seed IP, at regional storehouse/CH U'.
- Nitrogen oxides [air, non-urban air or from high stacks]: 0.0002957 kg; source EEA 2013; lognormal variance with pedigree 0.126564, pedigree (2,1,4,5,1)
  Extrapolated from Ecoinvent v2.2 process 'Rape seed IP, at regional storehouse/CH U'.
- Cadmium [soil, agricultural]: -4.071e-7 kg
  Extrapolated from Ecoinvent v2.2 process 'Rape seed IP, at regional storehouse/CH U'.
- Chromium [soil, agricultural]: 3.9175e-6 kg; lognormal variance with pedigree 0.177766, pedigree (2,1,4,5,1)
  Extrapolated from Ecoinvent v2.2 process 'Rape seed IP, at regional storehouse/CH U'.

## Sampling procedure
Data were compiled from statistics, pilot network, fertilising recommendations, documents from extension services, information provided by retailers and expert knowledge. The production data were verified and adjusted by a group of experts.

## Extrapolations
The amount of the exchanges are copy from a regional dataset.
