# treatment of glass from used cathode ray tube

Dataset: EcoSpold 2, unit process
Geography: GLO
Time period: 2005-01-01 to 2021-12-31
Technology level: current
Classification: ISIC rev.4 ecoinvent: 3830:Materials recovery
Classification: EcoSpold01Categories: waste management/recycling
Tags: Treatment; ConvertedDataset
Scenario: Business-as-Usual
System model: Allocation, cut-off by classification
Generated by: Roland Hischier
Published in: Hischier R. 2007
Database: ecoinvent
isCopyrightProtected: true
accessRestrictedTo: 1

## General comment
The multioutput-process "treatment CRT glass" delivers the co-products "disposal, treatment of CRT glass”, "glass cullets, panel glass, for CRT glass production, at plant", "glass cullets, funnel glass, for CRT glass production, at plant" and "glass cullets, mixed glass, for CRT glass production, at plant". The allocation is done 100% to the disposal process.
[This dataset was already contained in the ecoinvent database version 2. It was not individually updated during the transfer to ecoinvent version 3. Life Cycle Impact Assessment results may still have changed, as they are affected by changes in the supply chain, i.e. in other datasets. This dataset was generated following the ecoinvent quality guidelines for version 2. It may have been subject to central changes described in the ecoinvent version 3 change report (http://www.ecoinvent.org/database/ecoinvent-version-3/reports-of-changes/), and the results of the central updates were reviewed extensively. The changes added e.g. consistent water flows and other information throughout the database. The documentation of this dataset can be found in the ecoinvent reports of version 2, which are still available via the ecoinvent website. The change report linked above covers all central changes that were made during the conversion process.]

## Included activities end
This dataset represents the treatment of CRT tubes. It includes infrastructure, energy consumption, water consumption and an estimation of the efforts for transportation. The process has no emissions to air / water.

## Geography
Data from a Swiss CRT glass treatment company - used as global average data.

## Technology
Modern, up-to-date CRT treatment plant – with crushing, washing and sorting steps.

## Parameters
- fraction, process water, to air: 0.15 dimensionless; name fraction_PW_to_air; lognormal variance with pedigree 0.092025, pedigree (4,4,3,2,4)
  Literature value. In case when no industry/process specific data are available, default evaporation fraction value is used. This value is 15% and is based on literature (Statistics Canada, 2007 & Shaffer, K.H., 2008, Consumptive water use in the Great Lakes Basin, USGS & Shiklomanov, 2003, World Water Resources at the Beginning of the 21st Century) and has been approved by an expert.

## Reference product
- glass from used cathode ray tube: -1 kg; By-product classification Waste; CPC 37111: Glass in the mass, in balls (except microspheres), rods or tubes, unworked; waste and scrap of glass
  EcoSpold01Location=GLO
  production volume 1 kg
    Dummy value to be replaced by value to be calculated from the demand for this treatment activity
  property price 0 EUR2005
    Waste products are assigned a price of zero as they are assumed to require further treatment.
  property heating value, net 0 MJ
    Non combustible products are assumed to have an LHV equal to zero (0).
  property carbon content 0.00299576
    carbon content on a dry matter basis (reserved; not for manual entry)
  properties: EcoSpold01Allocation_undefined_11 100, EcoSpold01Allocation_undefined_12 100, carbon content, non-fossil 0, water content 0, carbon content, fossil 0.00299576, wet mass 1 kg, dry mass 1 kg, water in wet mass 0 kg, EcoSpold01Allocation_undefined_3 100, EcoSpold01Allocation_undefined_5 100, EcoSpold01Allocation_undefined_7 100, EcoSpold01Allocation_undefined_1 100, EcoSpold01Allocation_undefined_2 100, EcoSpold01Allocation_undefined_6 100, EcoSpold01Allocation_undefined_4 100, carbon allocation 0.00299576 kg

## Inputs from technosphere
- glass cullet, mixed glass from used cathode ray tube: -0.0885 kg
  EcoSpold01Location=GLO
  production volume 0.0885 kg
    Calculated from the production volume of glass from used cathode ray tube in proportion to the respective output amounts.
  properties: EcoSpold01Allocation_undefined_9 100, dry mass 1 kg, wet mass 1 kg
- coating from waste cathode ray tube display: 0 kg; pedigree (1,1,1,1,1)
  Data from 1 Swiss plant - reported in Zumbühl (2006)
  EcoSpold01Location=CH
  Uncertainty: data from 1 Swiss plant - reported in Zumbühl (2006)
  production volume 0 kg
    (same comment as for glass cullet, mixed glass from used cathode ray tube)
  properties: water content 0.111111, wet mass 1 kg, dry mass 0.9 kg
- glass cullet, lead containing, from used cathode ray tube: -0.27103 kg
  EcoSpold01Location=GLO
  production volume 0.27103 kg
    (same comment as for glass cullet, mixed glass from used cathode ray tube)
  properties: dry mass 1 kg, wet mass 1 kg, EcoSpold01Allocation_undefined_8 100
- electricity, medium voltage: 0.03 kWh; lognormal variance with pedigree 0.0527, pedigree (2,4,5,3,1)
  EcoSpold01Location=UCTE
  Data from 1 Swiss plant - reported in Zumbühl (2006)
  Uncertainty: data from 1 Swiss plant - reported in Zumbühl (2006)
- glass cullet, from used cathode ray tube panels: -0.52547 kg
  EcoSpold01Location=GLO
  production volume 0.52547 kg
    (same comment as for glass cullet, mixed glass from used cathode ray tube)
  properties: EcoSpold01Allocation_undefined_10 100, wet mass 1 kg, dry mass 1 kg
- manual treatment facility, waste electric and electronic equipment: 8e-10 unit; lognormal variance with pedigree 0.5761, pedigree (4,5,5,3,5)
  Rough estimation of infrastructure
  EcoSpold01Location=GLO
  Uncertainty: rough estimation of infrastructure
- coating from waste cathode ray tube display: -7.44151e-5, -0.00492558 kg (2 entries); lognormal variance with pedigree 0.0527, pedigree (2,4,5,3,1)
  (same comment as for coating from waste cathode ray tube display)
  production volume 0.005 kg

## Inputs from nature
- Water, unspecified natural origin [natural resource, in water]: 0.0001 m3; name water_UNO_input; lognormal variance with pedigree 0.0527, pedigree (2,4,5,3,1)
  Data from 1 Swiss plant - reported in Zumbühl (2006)
  Uncertainty: data from 1 Swiss plant - reported in Zumbühl (2006)

## Emissions to nature
- Water [air, unspecified]: 1.5e-5 m3; name water_to_air_unspecified; = (water_UNO_input*fraction_PW_to_air); lognormal variance with pedigree 0.0807, pedigree (2,2,5,1,1)
  Calculated value based on literature values and expert opinion. See comments in the parametres' comment field.
  property fraction, origin: unspecified 1; name fraction_origin_unspecified
  property fraction, origin: fresh water 0; name fraction_origin_fresh_water
  property fraction, origin: salt water 0; name fraction_origin_salt_water
- Water [water, unspecified]: 8.5e-5 m3; name water_to_water_unspecified; = water_UNO_input*(1-fraction_PW_to_air); lognormal variance with pedigree 0.0807, pedigree (2,2,5,1,1)
  (same comment as for Water)
  property wet mass 1000 kg; name WM
  property carbon content, fossil 0; name C_content_fossil
  property dry mass 0 kg; name DM
  property fraction, origin: salt water 0; name fraction_origin_salt_water_Ww
  property fraction, origin: unspecified 1; name fraction_origin_unspecified_Ww
  property fraction, origin: fresh water 0; name fraction_origin_fresh_water_Ww
  property carbon content, non-fossil 0; name C_content_non_fossil
  property water in wet mass 1000 kg; name WWM

## Sampling procedure
Company information & own estimation

## Extrapolations
This dataset has been extrapolated from year 2005 to the year of the calculation (2021). The uncertainty has been adjusted accordingly.

## Review by Jürgen Sutter 2007-08-31
passed.
