# phenoxy-compound production

Dataset: EcoSpold 2, unit process
Geography: RER
Time period: 2000-01-01 to 2021-12-31
Technology level: current
Classification: EcoSpold01Categories: agricultural means of production/pesticides
Classification: ISIC rev.4 ecoinvent: 2021:Manufacture of pesticides and other agrochemical products
Tags: ConvertedDataset
Scenario: Business-as-Usual
System model: Allocation, cut-off by classification
Share of production covered: 100 %
Generated by: Jürgen Sutter
Published in: Nemecek, T. 2007
Database: ecoinvent
isCopyrightProtected: true
accessRestrictedTo: 1

## General comment
This dataset represents the production of phenoxy-compounds (1 kg of active ingredient). Raw materials are modelled with a stoichiometric calculation. Energy consumption is modelled with data from a similar process. The emissions are estimated. Infrastructure is included with a default value.
This dataset represents the production of phenoxy-compounds (1 kg of active ingredient). Raw materials are modelled with a stoichiometric calculation. Energy consumption is modelled with data from a similar process. The emissions are estimated. Infrastructure is included with a default value.

## Included activities start
From reception of precursors (acetic anhydride, ammonia, 2-butanol, butyrolactone, carbon monoxide, chlorine, ethylene, hydrochloric acid, hydrogen fluoride, hydrogen peroxide, methanol, oxygen, phenol, propylene, sodium hydroxide, and water decarbonised) at the factory gate.

## Included activities end
This activity ends with phenoxy-compounds at the factory gate. The dataset includes the input materials, energy uses, infrastructure and emissions. The dataset doesn't include emulsives, additives etc.

## Geography
The inventory is modelled for Europe.

## Technology
Phenoxy carboxylic acids and amides are produced by a reaction of phenol and a halo aliphatic acid.

The dataset phenoxy-compounds was calculated from the arithmetic mean of all inputs and outputs of the production of 2,4-D, fluazifop-P-butyl, MCPA, MCPB, mecoprop, and mecoprop-P.

2,4-D is produced in four steps from phenol:
C6H6O + 2 Cl2 → C6H4Cl2O + 2 HCl
C6H4Cl2O + NaOH → C6H3Cl2ONa + H2O
C6H3Cl2ONa + C2H3ClO2 + NaOH → C8H5Cl2O3Na + NaCl + H2O
C8H5Cl2O3Na + HCl → C8H6Cl2O3 + NaCl
A precursor that is used for the 2,4-D production is chloroacetic acid (C2H3ClO2).

Fluazifop-butyl is produced in five steps from ethylene:
C2H4 + CO + H2O → C3H6O2
C3H6O2 + Cl2 → C3H5ClO2 + HCl
C3H5ClO2 + C4H10O → C7H14ClO2 + H2O
C7H14ClO2 + C6H6O2 → C13H18O4 + HCl
C13H18O4 + C6H3ClF3N → C19H20F3NO4 + HCl
Precursors that are used for the fluazifop-butyl production are hydroquinone (C6H6O2) and 3-trifluoromethyl-5-chloro pyridine (C6H3ClF3N).

MCPA is produced in three steps from phenol:
C6H6O + CH4O → C7H8O + H2O
C7H8O + Cl2 → C7H7ClO + HCl
C7H7ClO + C2H3ClO2 → C9H9ClO3 + HCl
A precursor that is used for the MCPA production is chloroacetic acid (C2H3ClO2).

MCPB is produced in three steps from phenol:
C6H6O + CH4O → C7H8O + H2O
C7H8O + Cl2 → C7H7ClO + HCl
C7H7ClO + C4H6O2 → C11H14ClO3

Mecoprop is produced in three steps from phenol:
C6H6O + CH4O → C7H8O + H2O
C7H8O + Cl2 → C7H7ClO + HCl
C7H7ClO + C3H5ClO2 → C10H14ClO3 + HCl
A precursor that is used for the mecoprop production is 2-chloro-propionic acid (C3H5ClO2).

Mecoprop-P is produced in three steps from phenol:
C6H6O + CH4O → C7H8O + H2O
C7H8O + Cl2 → C7H7ClO + HCl
C7H7ClO + C3H5ClO2 → C10H14ClO3 + HCl
A precursor that is used for the mecoprop-P production is 2-chloro-propionic acid (C3H5ClO2).

Precursors:

Chloroacetic acid (C2H3ClO2) is produced from acetic acid and chlorine:
C2H4O2 + Cl2 → C2H3ClO2 + HCl

Hydroquinone (C6H6O2) is produced from phenol and hydrogen peroxide:
C6H6O + H2O2 → C6H6O2 + H2O

3-Trifluoromethyl-5-chloro pyridine (C6H3ClF3N) is produced in four steps from propene:
C3H6 + O2 → C3H4O + H2O
2 C3H4O + NH3 → C6H7N + 2 H2O
C6H7N + 4 Cl2 → C6H3Cl4N + 4 HCl
C6H3Cl4N + 3 HF → C6H3ClF3N + 3 HCl

2-Chloro-propionic acid (C3H5ClO2) is produced from propionic acid and chlorine:
C3H6O2 + Cl2 → C3H5ClO2 + HCl

## Time period
Time of publications

## Parameters
- fraction, cooling water, once-through system, to air: 0.004 dimensionless; name fraction_CW_OT_to_air; lognormal variance with pedigree 0.0413, pedigree (2,3,1,3,1)
  Calculated based on literature value (Scown, C.D., 2011, Water Footprint of U.S. Transportation Fuels and supplying information of the article) (Vionnet, S., Quantis Water Database - Technical Report, 2012).
- fraction, water, decarbonised, to air: 0.3875 dimensionless; name fraction_WDC_to_air; = fraction_CW_to_air; lognormal variance with pedigree 0.092025, pedigree (4,4,3,2,4)
  Calculated value. See comments in the other parametres present in this dataset. Decarbonised water is considered to be always used as cooling water, thus cooling water fractions to air are applied to all carbonised water input flows to calculate the amount of water consumed in the processes.
- fraction, cooling water, cooling pond system, to air: 0.032 dimensionless; name fraction_CW_CP_to_air; lognormal variance with pedigree 0.0413, pedigree (2,3,1,3,1)
  (same comment as for fraction, cooling water, once-through system, to air)
- fraction, cooling water, recirculating system, to air: 0.771 dimensionless; name fraction_CW_R_to_air; lognormal variance with pedigree 0.0413, pedigree (2,3,1,3,1)
  (same comment as for fraction, cooling water, once-through system, to air)
- fraction, cooling water, to air: 0.3875 dimensionless; name fraction_CW_to_air; = (0.5*fraction_CW_OT_to_air)+(0.5*fraction_CW_R_to_air); lognormal variance with pedigree 0.092025, pedigree (4,4,3,2,4)
  Calculated value based on literature value (see comments of the other parametres present in this dataset) and expert opinion. In the case when no industry/literature data are available about the type of cooling or directly fraction, cooling water, to air specific for the process a default assumption is applied. It is assumed that the once-through cooling system is used in 50% of all cases and recirculating system is used in another 50% of all cases.

## Reference product
- phenoxy-compound: 1 kg; By-product classification allocatable product; CPC 34663: Herbicides, anti-sprouting products and plant-growth regulators; CAS 2122-46-5
  Phenoxy-compounds compounds can have different modes of action. Fluazifop-butyl, which is a herbicide, acts as inhibitor of acetyl CoA carboxylase (ACCase); 2,4-D, MCPA, MCPB, mecoprop, and mecoprop-P, wich are also herbicides, acts as synthetic auxins; and 2,4-D, which is a grown regulator, acts also as a synthetic auxin.
  EcoSpold01Location=RER
  production volume 3.34078e7 kg
    Unknown
    The addition of the consumption volumes in the US in 2002 (from USGS, 2002 Pesticide use Maps) of the phenoxy-compounds 2,4-DB, 2.4-D, clodinafop, cyhalofop, diclofop, fenoxaprop, MCPA, MCPB, naphthaleneacetamide (NAD, NAAm), quizalofop, alpha-naphthaleneacetic acid (NAA) has been used to estimate the production volumes of this type of pesticide in the Europe. For that, it has been extrapolated to a Global production mix using the ha of Arable land and Permanent crops of US versus the ha of Arable land and Permanent crops in the Europe in 2002 (299/179 million ha; FAOSTAT).
  property price 3.26964 EUR2005
    Calculated based on inputs: The price of the product has been calculated as a sum of the values of the material and energy inputs for this product. This value is therefore a rough estimation. It may underestimate the real price since there are additional expenses when producing any product. These expences can include for example labour costs, treatment of waste materials and profit for the producer. Please consider carefully whether this level of data quality is acceptable for your application.
  property carbon content, fossil 0.532559
    An unweighted average of the C content in mCPA, mCPB, mecoprop, fluazifop-P-butyl, and 2,4-D. Those substances are classified as phenoxy-compounds in Tab 2.25, Sutter 2010
  property carbon content 0.532559
    carbon content on a dry matter basis (reserved; not for manual entry)
  properties: water in wet mass 0 kg, dry mass 1 kg, carbon content, non-fossil 0, water content 0, wet mass 1 kg, carbon allocation 0.532559 kg

## Inputs from technosphere
- sodium hydroxide, without water, in 50% solution state: 0.62011 kg; source Unger T A 1996; lognormal variance with pedigree 0.044, pedigree (4,5,4,1,1)
  Stoichiometric calculation, assuming an efficiency of 100%.
  EcoSpold01Location=RER
  Uncertainty: Stoechiometric calculation
  properties: wet mass 1 kg, dry mass 1 kg, heating value, net 3.03 MJ
- ammonia, anhydrous, liquid: 0.0090825 kg; source Unger T A 1996; lognormal variance with pedigree 0.044, pedigree (4,5,4,1,1)
  Stoichiometric calculation, assuming an efficiency of 95% per reaction step.
  EcoSpold01Location=RER
  Uncertainty: Stoechiometric calculation
  properties: dry mass 1 kg, wet mass 1 kg
- chlorine, liquid: 0.80236 kg; source Unger T A 1996; lognormal variance with pedigree 0.044, pedigree (4,5,4,1,1)
  Stoichiometric calculation, assuming an efficiency of 95% per reaction step.
  Further references:
  Fliege 2000. Helmut Fiege: Cresols and Xylenols. In: Ullmann's Encyclopedia of Industrial Chemistry, Seventh Edition, 2009 Electronic Release (ed. Fiedler E., Grossmann G., Kersebohm D., Weiss G. and Witte C.). 7 th Electronic Release Edition. Wiley InterScience, New York, Article Online Posting Date: June 15, 2000. Online-Version under: DOI: 10.1002/14356007.a08_025
  Samel et al. 2000. Ulf-Rainer Samel, Walter Kohler, Armin Otto Gamer, Ullrich Keuser: Propionic Acid and Derivatives. In: Ullmann's Encyclopedia of Industrial Chemistry, Seventh Edition, 2009 Electronic Release (ed. Fiedler E., Grossmann G., Kersebohm D., Weiss G. and Witte C.). 7 th Electronic Release Edition. Wiley InterScience, New York, Article Online Posting Date: June 15, 2000. Online-Version under: DOI: 10.1002/14356007.a22_223
  EcoSpold01Location=RER
  Uncertainty: Stoechiometric calculation
  properties: wet mass 1 kg, dry mass 1 kg
- acetic anhydride: 0.11618 kg; source Unger T A 1996; lognormal variance with pedigree 0.044, pedigree (4,5,4,1,1)
  EcoSpold01Location=RER
  Stoichiometric calculation, assuming an efficiency of 95% per reaction step.
  Uncertainty: Stoechiometric calculation
  properties: heating value, net 21.38 MJ, dry mass 1 kg, wet mass 1 kg, carbon content, fossil 0.470588
- ethylene: 0.056724 kg; source Unger T A 1996; lognormal variance with pedigree 0.044, pedigree (4,5,4,1,1)
  (same comment as for ammonia, anhydrous, liquid)
  properties: heating value, net 43.22 MJ, carbon content, fossil 0.857143, wet mass 1 kg, dry mass 1 kg
- carbon monoxide: 0.056724 kg; source Unger T A 1996; lognormal variance with pedigree 0.044, pedigree (4,5,4,1,1)
  (same comment as for acetic anhydride)
  properties: heating value, net 12.99 MJ, carbon content, fossil 0.428571, dry mass 1 kg, wet mass 1 kg
  note on carbon content, fossil: CO. It is assumed that CO is produced from partial combustion of heavy heating oil.
- hydrogen peroxide, without water, in 50% solution state: 0.017257 kg; source Unger T A 1996; lognormal variance with pedigree 0.044, pedigree (4,5,4,1,1)
  (same comment as for acetic anhydride)
  properties: dry mass 1 kg, wet mass 1 kg, heating value, net 7.13 MJ
- oxygen, liquid: 0.035992 kg; source Unger T A 1996; lognormal variance with pedigree 0.044, pedigree (4,5,4,1,1)
  EcoSpold01Location=RER
  Stoichiometric calculation, assuming an efficiency of 100% per reaction step.
  Uncertainty: Stoechiometric calculation
  properties: dry mass 1 kg, wet mass 1 kg
- phenol: 0.47943 kg; source Unger T A 1996; lognormal variance with pedigree 0.044, pedigree (4,5,4,1,1)
  EcoSpold01Location=RER
  Stoichiometric calculation, assuming an efficiency of 95% per reaction step.
  Further references:
  Fliege 2000. Helmut Fiege: Cresols and Xylenols. In: Ullmann's Encyclopedia of Industrial Chemistry, Seventh Edition, 2009 Electronic Release (ed. Fiedler E., Grossmann G., Kersebohm D., Weiss G. and Witte C.). 7 th Electronic Release Edition. Wiley InterScience, New York, Article Online Posting Date: June 15, 2000. Online-Version under: DOI: 10.1002/14356007.a08_025
  Uncertainty: Stoechiometric calculation
  properties: carbon content, fossil 0.765957, dry mass 1 kg, wet mass 1 kg, heating value, net 30.93 MJ
- heat, district or industrial, other than natural gas: 3.09428 MJ; source Gendorf 2000; lognormal variance with pedigree 0.044, pedigree (4,5,4,1,1)
  Estimation, assuming a default value, originated from calculation of avarage consumption of electricity and heat per kg of product (3.2 MJ kg-1), and a resulting amount of heat of 2 MJ for every reaction step per kg reaction product, considering that the demand is made up of a mix that inlcudes 12% steam from external energy sources. Additionally, reaction steps are approximated with energy consumption data, assuming that inventory flows can be estimated using process data for basic operation steps, available for specific organic chemicals.
  Uncertainty: Estimation
  properties: heating value, net 1 MJ
- propylene: 0.04724 kg; source Unger T A 1996; lognormal variance with pedigree 0.044, pedigree (4,5,4,1,1)
  (same comment as for ammonia, anhydrous, liquid)
  properties: heating value, net 43.22 MJ, dry mass 1 kg, carbon content, fossil 0.857143, wet mass 1 kg
- chemical factory, organics: 1.3604e-9 unit; lognormal variance with pedigree 0.448, pedigree (4,5,5,5,5)
  EcoSpold01Location=RER
  Estimation, based on a production capacity of 50,000 t per year and a plant life time of 50 years, therefore an amount of 4X10-10 units per kg of produced chemical is aded to the unit process of the respective chemical. The amount is accounted for each production step. This might be an overestimation in some multistep syntheses.
  Uncertainty: Estimation
- water, decarbonised: 0 kg; name water_decarbonised_input; source Unger T A 1996; pedigree (1,1,1,1,1)
  EcoSpold01Location=RER
  Stoichiometric calculation, assuming an efficiency of 100%.
  Uncertainty: Stoechiometric calculation
  properties: wet mass 1 kg
- butyrolactone: 0.075439 kg; source Unger T A 1996; lognormal variance with pedigree 0.044, pedigree (4,5,4,1,1)
  Stoichiometric calculation, assuming an efficiency of 95% per reaction step.
  Further references:
  Fliege 2000. Helmut Fiege: Cresols and Xylenols. In: Ullmann's Encyclopedia of Industrial Chemistry, Seventh Edition, 2009 Electronic Release (ed. Fiedler E., Grossmann G., Kersebohm D., Weiss G. and Witte C.). 7 th Electronic Release Edition. Wiley InterScience, New York, Article Online Posting Date: June 15, 2000. Online-Version under: DOI: 10.1002/14356007.a08_025
  EcoSpold01Location=GLO
  Uncertainty: Stoechiometric calculation
  properties: carbon content, fossil 0.55814, wet mass 1 kg, dry mass 1 kg, heating value, net 25.35 MJ
- methanol: 0.12034 kg; source Unger T A 1996; lognormal variance with pedigree 0.044, pedigree (4,5,4,1,1)
  EcoSpold01Location=GLO
  Stoichiometric calculation, assuming an efficiency of 95% per reaction step.
  Further references:
  Fliege 2000. Helmut Fiege: Cresols and Xylenols. In: Ullmann's Encyclopedia of Industrial Chemistry, Seventh Edition, 2009 Electronic Release (ed. Fiedler E., Grossmann G., Kersebohm D., Weiss G. and Witte C.). 7 th Electronic Release Edition. Wiley InterScience, New York, Article Online Posting Date: June 15, 2000. Online-Version under: DOI: 10.1002/14356007.a08_025
  Uncertainty: Stoechiometric calculation
  properties: wet mass 1 kg, dry mass 1 kg, carbon content, fossil 0.375, heating value, net 26.49 MJ
- hydrogen fluoride: 0.02893 kg; source Unger T A 1996; lognormal variance with pedigree 0.044, pedigree (4,5,4,1,1)
  Stoichiometric calculation, assuming an efficiency of 95% per reaction step.
  EcoSpold01Location=GLO
  Uncertainty: Stoechiometric calculation
  properties: dry mass 1 kg, wet mass 1 kg, heating value, net 6.06 MJ
- 2-butanol: 0.037559 kg; source Unger T A 1996; lognormal variance with pedigree 0.044, pedigree (4,5,4,1,1)
  (same comment as for ammonia, anhydrous, liquid)
  properties: heating value, net 35.99 MJ, dry mass 1 kg, carbon content, fossil 0.648649, wet mass 1 kg
- heat, district or industrial, natural gas: 5.54374 MJ; source Gendorf 2000; lognormal variance with pedigree 0.044, pedigree (4,5,4,1,1)
  Estimation, assuming a default value, originated from calculation of avarage consumption of electricity and heat per kg of product (3.2 MJ kg-1), and a resulting amount of heat of 2 MJ for every reaction step per kg reaction product, considering that the demand is made up of a mix that includes 50% natural gas. Additionally, reaction steps are approximated with energy consumption data, assuming that inventory flows can be estimated using process data for basic operation steps, available for specific organic chemicals.
  Uncertainty: Estimation
  properties: heating value, net 1 MJ
- hydrochloric acid, without water, in 30% solution state: 0.0972 kg; source Unger T A 1996; lognormal variance with pedigree 0.044, pedigree (4,5,4,1,1)
  (same comment as for water, decarbonised)
  properties: wet mass 1 kg, dry mass 1 kg, heating value, net 3.32 MJ
- electricity, medium voltage: 1.13794 kWh; source Gendorf 2000; lognormal variance with pedigree 0.044, pedigree (4,5,4,1,1)
  Estimation, assuming a default value, originated from calculation of avarage consumption of electricity and heat per kg of product (3.2 MJ kg-1), and a resulting amount of electricity of 0,333 kW for every reaction step per kg reaction product, considering that the demand is made up of a mix that inlcudes 38% electricity. Additionally, reaction steps are approximated with energy consumption data, assuming that inventory flows can be estimated using process data for basic operation steps, available for specific organic chemicals.
  EcoSpold01Location=UCTE
  Uncertainty: Estimation
- water, decarbonised: 0.0182163, 0.00367231, 0.0120753, 1.15668e-5, 0.000666625 kg (5 entries); source Unger T A 1996; lognormal variance with pedigree 0.044, pedigree (4,5,4,1,1)
  (same comment as for water, decarbonised)

## Inputs from nature
- Water, cooling, unspecified natural origin [natural resource, in water]: 0.081627 m3; name water_cooling_UNO_input; source Gendorf 2000; lognormal variance with pedigree 0.044, pedigree (4,5,4,1,1)
  Estimation (24 kg cooling water per kg produced chemical per step).
  Uncertainty: Estimation

## Emissions to nature
- Ethylene oxide [air, urban air close to ground]: 0.00011345 kg; lognormal variance with pedigree 0.188, pedigree (4,5,5,5,5)
  Estimation, based on the assumption that 0.2% of volatile input materials is emitted to air occurring from the purge vent, the destillation vent and fugitive emission sources.
  Uncertainty: Estimation
- Propene [air, urban air close to ground]: 9.448e-5 kg; lognormal variance with pedigree 0.188, pedigree (4,5,5,5,5)
  (same comment as for Ethylene oxide)
- Ammonia [air, urban air close to ground]: 1.8165e-5 kg; lognormal variance with pedigree 0.218, pedigree (4,5,5,5,5)
  (same comment as for Ethylene oxide)
- Fluoride [water, surface water]: 0.0025491 kg; lognormal variance with pedigree 0.188, pedigree (4,5,5,5,5)
  Estimation, assuming that the remaining amount of unreacted input materials leave the production process with the wastewater, wich is further treated in an internal wastewater plant.
  Uncertainty: Estimation
- Carbon monoxide, fossil [air, urban air close to ground]: 0.00011345 kg; lognormal variance with pedigree 0.798, pedigree (4,5,5,5,5)
  (same comment as for Ethylene oxide)
- Phenol [water, surface water]: 0.0014256 kg; lognormal variance with pedigree 0.448, pedigree (4,5,5,5,5)
  (same comment as for Fluoride)
- Water [air, unspecified]: 0.0316439 m3; name water_to_air_unspecified; = (water_decarbonised_input/1000*fraction_WDC_to_air)+(water_cooling_UNO_input*fraction_CW_to_air); lognormal variance with pedigree 0.0487, pedigree (2,2,4,1,1)
  Calculated value based on literature values and expert opinion. See comments in the parametres' comment field.
  property fraction, origin: fresh water 0.000424214; name fraction_origin_fresh_water
  property fraction, origin: unspecified 0.999576; name fraction_origin_unspecified
  property fraction, origin: salt water 0; name fraction_origin_salt_water
- Methanol [air, urban air close to ground]: 0.00024064 kg; lognormal variance with pedigree 0.188, pedigree (4,5,5,5,5)
  (same comment as for Ethylene oxide)
- Water [water, unspecified]: 0.0500178 m3; name water_to_water_unspecified; = (water_decarbonised_input/1000)*(1-fraction_WDC_to_air)+water_cooling_UNO_input*(1-fraction_CW_to_air); lognormal variance with pedigree 0.0487, pedigree (2,2,4,1,1)
  (same comment as for Water)
  property fraction, origin: fresh water 0.000424214; name fraction_origin_fresh_water_Ww
  property fraction, origin: salt water 0; name fraction_origin_salt_water_Ww
  property fraction, origin: unspecified 0.999576; name fraction_origin_unspecified_Ww
  property dry mass 0 kg; name DM
  property wet mass 1000 kg; name WM
  property carbon content, fossil 0; name C_content_fossil
  property water in wet mass 1000 kg; name WWM
  property carbon content, non-fossil 0; name C_content_non_fossil
- Phenol [air, urban air close to ground]: 0.00095889 kg; lognormal variance with pedigree 0.188, pedigree (4,5,5,5,5)
  (same comment as for Ethylene oxide)
- Propene [water, surface water]: 0.00022675 kg; lognormal variance with pedigree 0.448, pedigree (4,5,5,5,5)
  (same comment as for Fluoride)
- Butanol [air, urban air close to ground]: 7.5117e-5 kg; lognormal variance with pedigree 0.188, pedigree (4,5,5,5,5)
  (same comment as for Ethylene oxide)
- Propionic acid [water, surface water]: 0.00068361 kg; lognormal variance with pedigree 0.448, pedigree (4,5,5,5,5)
  (same comment as for Fluoride)
- Ammonium, ion [water, surface water]: 0.00021798 kg; lognormal variance with pedigree 0.188, pedigree (4,5,5,5,5)
  Estimation, assuming that the remaining amount of unreacted input materials leave the production process with the wastewater, wich is further treated in an internal wastewater plant. For the nitrogen containing compounds within the wastewater a removal efficiency of 50% was assumed. The nitrogen emitted to air (N2) is neglected.
  Uncertainty: Estimation
- Propane [air, urban air close to ground]: 7.5117e-5 kg; lognormal variance with pedigree 0.188, pedigree (4,5,5,5,5)
  (same comment as for Ethylene oxide)
- Butanol [water, surface water]: 0.00018028 kg; lognormal variance with pedigree 0.448, pedigree (4,5,5,5,5)
  (same comment as for Fluoride)
- Ethylene oxide [water, surface water]: 0.00027228 kg; lognormal variance with pedigree 0.448, pedigree (4,5,5,5,5)
  (same comment as for Fluoride)
- Chloride [water, surface water]: 0.61339 kg; lognormal variance with pedigree 0.448, pedigree (4,5,5,5,5)
  (same comment as for Fluoride)
- Chlorine [air, urban air close to ground]: 0.0016048 kg; lognormal variance with pedigree 0.188, pedigree (4,5,5,5,5)
  (same comment as for Ethylene oxide)
- Propionic acid [air, urban air close to ground]: 0.00028484 kg; lognormal variance with pedigree 0.188, pedigree (4,5,5,5,5)
  (same comment as for Ethylene oxide)
- Acetic acid [air, urban air close to ground]: 0.00023236 kg; lognormal variance with pedigree 0.188, pedigree (4,5,5,5,5)
  (same comment as for Ethylene oxide)
- Phenol, 2,4-dichloro [air, urban air close to ground]: 0.00028629 kg; lognormal variance with pedigree 0.188, pedigree (4,5,5,5,5)
  (same comment as for Ethylene oxide)
- Chloroacetic acid [air, urban air close to ground]: 0.00032272 kg; lognormal variance with pedigree 0.188, pedigree (4,5,5,5,5)
  (same comment as for Ethylene oxide)
- Acetic acid [water, surface water]: 0.0012951 kg; lognormal variance with pedigree 0.448, pedigree (4,5,5,5,5)
  (same comment as for Fluoride)
- Sodium, ion [water, surface water]: 0.35656 kg; lognormal variance with pedigree 0.798, pedigree (4,5,5,5,5)
  (same comment as for Fluoride)
- Methanol [water, surface water]: 0.00057768 kg; lognormal variance with pedigree 0.448, pedigree (4,5,5,5,5)
  (same comment as for Fluoride)
- Carbon dioxide, fossil [air, urban air close to ground]: 0.32807 kg; lognormal variance with pedigree 0.1786, pedigree (4,5,5,5,5)
  Estimation, based on the assumption that 0.2% of volatile input materials is emitted to air occurring from the purge vent, the destillation vent and fugitive emission sources. Remaining gases like CH4 or CO are oxidated to CO2. The carbon contained in the removed carbon compounds from wastewater treatment was accounted as CO2 emissions to air (assuming a removal efficiency of 90%).
  Uncertainty: Estimation
- Chloroacetic acid [water, surface water]: 0.00077454 kg; lognormal variance with pedigree 0.448, pedigree (4,5,5,5,5)
  (same comment as for Fluoride)

## Sampling procedure
Literature data

## Extrapolations
This dataset has been extrapolated from year 2010 to the year of the calculation (2021). The uncertainty has been adjusted accordingly.

## Review by Roland Hischier 2011-11-14
Transfer of documentation done.

## Review by Thomas Nemecek 2010-03-11
Passed.
none
