# basic oxygen furnace sludge to market for basic oxygen furnace sludge, for recovery

Dataset: EcoSpold 2, unit process
Geography: RER
Time period: 2020-01-01 to 2025-12-31
Technology level: current
Classification: ISIC rev.4 ecoinvent: 3821:Treatment and disposal of non-hazardous waste
Scenario: Business-as-Usual
System model: Allocation, cut-off by classification
Generated by: Avraam Symeonidis
Database: ecoinvent
isCopyrightProtected: true
accessRestrictedTo: 1

## General comment
This is a renaming activity. Its purpose is to link 'basic oxygen furnace sludge' to the 'market for basic oxygen furnace sludge, for recovery'. This represents the share of basic oxygen furnace sludge that is recovered for use via internal (in iron and steelmaking) or external routes (e.g. cement making).Through this renaming, the by-product classification of the basic oxygen furnace sludge is changed from 'waste' to 'recyclable material'.

## Included activities start
Activity starts with the reception of 'basic oxygen furnace sludge'.

## Included activities end
Activity ends with the 'basic oxygen furnace sludge, for recovery' being ready for transportation.

## Reference product
- basic oxygen furnace sludge: -1 kg; name RP; By-product classification Waste; CPC 39310: Slag, dross, scalings and other waste from the manufacture of iron or steel
  production volume 8.94292e6 kg; name PVRP
    Assuming that 69.9% of basic oxygen furnace secondary metallurgy slag produced through iron and steelmaking is recovered for recycling either in other iron and steemaking operations or or externally, e.g. cement making (worldsteel, 2010).
    References:
    Worldsteel (2010). Steel industry by-products. World Steel Association: Brussels, Belgium.
  property iron content 0.61608
    The value of 'iron content' is documented in Turner & Symeonidis, 2020. Reference: Turner David & Symeonidis Avraam, 2020, Life cycle inventories of the treatment of iron and steelmaking by-products, ecoinvent association, Zürich, Switzerland
  property calcium content 0.0375879
    The value of 'calcium content' is documented in Turner & Symeonidis, 2020. Reference: Turner David & Symeonidis Avraam, 2020, Life cycle inventories of the treatment of iron and steelmaking by-products, ecoinvent association, Zürich, Switzerland
  property nickel content 0.000100503
    The value of 'nickel content' is documented in Turner & Symeonidis, 2020. Reference: Turner David & Symeonidis Avraam, 2020, Life cycle inventories of the treatment of iron and steelmaking by-products, ecoinvent association, Zürich, Switzerland
  property aluminium content 0.00269347
    The value of 'aluminium content' is documented in Turner & Symeonidis, 2020. Reference: Turner David & Symeonidis Avraam, 2020, Life cycle inventories of the treatment of iron and steelmaking by-products, ecoinvent association, Zürich, Switzerland
  property silicon content 0.00623116
    The value of 'silicon content' is documented in Turner & Symeonidis, 2020. Reference: Turner David & Symeonidis Avraam, 2020, Life cycle inventories of the treatment of iron and steelmaking by-products, ecoinvent association, Zürich, Switzerland
  property phosphorus content 0.00114573
    The value of 'phosphorus content' is documented in Turner & Symeonidis, 2020. Reference: Turner David & Symeonidis Avraam, 2020, Life cycle inventories of the treatment of iron and steelmaking by-products, ecoinvent association, Zürich, Switzerland
  property chromium content 0.00040201
    The value of 'chromium content' is documented in Turner & Symeonidis, 2020. Reference: Turner David & Symeonidis Avraam, 2020, Life cycle inventories of the treatment of iron and steelmaking by-products, ecoinvent association, Zürich, Switzerland
  property zinc content 0.019799
    The value of 'zinc content' is documented in Turner & Symeonidis, 2020. Reference: Turner David & Symeonidis Avraam, 2020, Life cycle inventories of the treatment of iron and steelmaking by-products, ecoinvent association, Zürich, Switzerland
  property sulfur content 0.00140704
    The value of 'sulfur content' is documented in Turner & Symeonidis, 2020. Reference: Turner David & Symeonidis Avraam, 2020, Life cycle inventories of the treatment of iron and steelmaking by-products, ecoinvent association, Zürich, Switzerland
  property lead content 0.00163819
    The value of 'lead content' is documented in Turner & Symeonidis, 2020. Reference: Turner David & Symeonidis Avraam, 2020, Life cycle inventories of the treatment of iron and steelmaking by-products, ecoinvent association, Zürich, Switzerland
  property heating value, net 0 MJ
    Non combustible products are assumed to have an LHV equal to zero (0).
  property price 0 EUR2005; name RP_price_EUR2005
    Waste products are assigned a price of zero as they are assumed to require further treatment.
  property carbon content, non-fossil 0
    The value of 'carbon content, non-fossil' is documented in Turner & Symeonidis, 2020. Reference: Turner David & Symeonidis Avraam, 2020, Life cycle inventories of the treatment of iron and steelmaking by-products, ecoinvent association, Zürich, Switzerland
  property carbon content, fossil 0.0040201
    The value of 'carbon content, fossil' is documented in Turner & Symeonidis, 2020. Reference: Turner David & Symeonidis Avraam, 2020, Life cycle inventories of the treatment of iron and steelmaking by-products, ecoinvent association, Zürich, Switzerland
  property manganese content 0.0020201
    The value of 'manganese content' is documented in Turner & Symeonidis, 2020. Reference: Turner David & Symeonidis Avraam, 2020, Life cycle inventories of the treatment of iron and steelmaking by-products, ecoinvent association, Zürich, Switzerland
  property magnesium content 0.0020201
    The value of 'magnesium content' is documented in Turner & Symeonidis, 2020. Reference: Turner David & Symeonidis Avraam, 2020, Life cycle inventories of the treatment of iron and steelmaking by-products, ecoinvent association, Zürich, Switzerland
  property oxygen content 0.304804
    The value of 'oxygen content' is documented in Turner & Symeonidis, 2020. Reference: Turner David & Symeonidis Avraam, 2020, Life cycle inventories of the treatment of iron and steelmaking by-products, ecoinvent association, Zürich, Switzerland
  property cadmium content 5.02513e-5
    The value of 'cadmium content' is documented in Turner & Symeonidis, 2020. Reference: Turner David & Symeonidis Avraam, 2020, Life cycle inventories of the treatment of iron and steelmaking by-products, ecoinvent association, Zürich, Switzerland
  property carbon content 0.0040201
    carbon content on a dry matter basis (reserved; not for manual entry)
  properties: water in wet mass 0.005 kg, water content 0.00502513, wet mass 1 kg, dry mass 0.995 kg, carbon allocation 0.004 kg

## By-products
- basic oxygen furnace sludge, for recovery: 0 kg; By-product classification Recyclable; CPC 39310: Slag, dross, scalings and other waste from the manufacture of iron or steel
  production volume 0 kg; name PVBP; = PVRP*BP/ABS(RP)
    Calculated based on the production volume of the reference product.
  property heating value, net 0 MJ
    Non combustible products are assumed to have an LHV equal to zero (0).
  property price 0.0238 EUR2005; name BP_price_EUR2005
    Value is calculated based on the iron content of this material in combination with the price for iron ore concentrate on a per kg iron basis.
  property silicon content 0.00623116
    (same comment as for basic oxygen furnace sludge)
  property zinc content 0.019799
    (same comment as for basic oxygen furnace sludge)
  property sulfur content 0.00140704
    (same comment as for basic oxygen furnace sludge)
  property carbon content, non-fossil 0
    (same comment as for basic oxygen furnace sludge)
  property iron content 0.61608
    (same comment as for basic oxygen furnace sludge)
  property lead content 0.00163819
    (same comment as for basic oxygen furnace sludge)
  property magnesium content 0.0020201
    (same comment as for basic oxygen furnace sludge)
  property carbon content, fossil 0.0040201
    (same comment as for basic oxygen furnace sludge)
  property cadmium content 5.02513e-5
    (same comment as for basic oxygen furnace sludge)
  property aluminium content 0.00269347
    (same comment as for basic oxygen furnace sludge)
  property chromium content 0.00040201
    (same comment as for basic oxygen furnace sludge)
  property nickel content 0.000100503
    (same comment as for basic oxygen furnace sludge)
  property oxygen content 0.304804
    (same comment as for basic oxygen furnace sludge)
  property calcium content 0.0375879
    (same comment as for basic oxygen furnace sludge)
  property manganese content 0.0020201
    (same comment as for basic oxygen furnace sludge)
  property phosphorus content 0.00114573
    (same comment as for basic oxygen furnace sludge)
  property carbon content 0.0040201
    carbon content on a dry matter basis (reserved; not for manual entry)
  properties: water in wet mass 0.005 kg, wet mass 1 kg, water content 0.00502513, dry mass 0.995 kg, carbon allocation 0.004 kg

## Inputs from technosphere
- basic oxygen furnace sludge, for recovery: -1 kg
  production volume 8.94292e6 kg
  properties: silicon content 0.00623116, zinc content 0.019799, wet mass 1 kg, water content 0.00502513, iron content 0.61608, magnesium content 0.0020201, carbon content, fossil 0.0040201, aluminium content 0.00269347, oxygen content 0.304804, calcium content 0.0375879, manganese content 0.0020201, dry mass 0.995 kg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
  note on silicon content: The value of 'silicon content' is documented in Turner & Symeonidis, 2020. Reference: Turner David & Symeonidis Avraam, 2020, Life cycle inventories of the treatment of iron and steelmaking by-products, ecoinvent association, Zürich, Switzerland
  note on zinc content: The value of 'zinc content' is documented in Turner & Symeonidis, 2020. Reference: Turner David & Symeonidis Avraam, 2020, Life cycle inventories of the treatment of iron and steelmaking by-products, ecoinvent association, Zürich, Switzerland
  note on iron content: The value of 'iron content' is documented in Turner & Symeonidis, 2020. Reference: Turner David & Symeonidis Avraam, 2020, Life cycle inventories of the treatment of iron and steelmaking by-products, ecoinvent association, Zürich, Switzerland
  note on magnesium content: The value of 'magnesium content' is documented in Turner & Symeonidis, 2020. Reference: Turner David & Symeonidis Avraam, 2020, Life cycle inventories of the treatment of iron and steelmaking by-products, ecoinvent association, Zürich, Switzerland
  note on carbon content, fossil: The value of 'carbon content, fossil' is documented in Turner & Symeonidis, 2020. Reference: Turner David & Symeonidis Avraam, 2020, Life cycle inventories of the treatment of iron and steelmaking by-products, ecoinvent association, Zürich, Switzerland
  note on aluminium content: The value of 'aluminium content' is documented in Turner & Symeonidis, 2020. Reference: Turner David & Symeonidis Avraam, 2020, Life cycle inventories of the treatment of iron and steelmaking by-products, ecoinvent association, Zürich, Switzerland
  note on oxygen content: The value of 'oxygen content' is documented in Turner & Symeonidis, 2020. Reference: Turner David & Symeonidis Avraam, 2020, Life cycle inventories of the treatment of iron and steelmaking by-products, ecoinvent association, Zürich, Switzerland
  note on calcium content: The value of 'calcium content' is documented in Turner & Symeonidis, 2020. Reference: Turner David & Symeonidis Avraam, 2020, Life cycle inventories of the treatment of iron and steelmaking by-products, ecoinvent association, Zürich, Switzerland
  note on manganese content: The value of 'manganese content' is documented in Turner & Symeonidis, 2020. Reference: Turner David & Symeonidis Avraam, 2020, Life cycle inventories of the treatment of iron and steelmaking by-products, ecoinvent association, Zürich, Switzerland
