# paper production, newsprint, virgin

Dataset: EcoSpold 2, unit process
Geography: RER
Time period: 2000-01-01 to 2021-12-31
Technology level: current
Classification: ISIC rev.4 ecoinvent: 1701:Manufacture of pulp, paper and paperboard
Classification: EcoSpold01Categories: paper & cardboard/graphic paper
Tags: ConvertedDataset
Scenario: Business-as-Usual
System model: Allocation, cut-off by classification
Generated by: Roland Hischier
Published in: Hischier R. 2007
Database: ecoinvent
isCopyrightProtected: true
accessRestrictedTo: 1

## General comment
This dataset represents the European production of newsprint paper without the use of deinked pulp (DIP) from waste paper.
Principal sources for the dataset of Newsprint paper produced in Europe are the Finnish EcoData data-base from KCL (KCL (2002)), the report of the Swedish EPA about the Swedish pulp and paper in-dustry (Naturvardsverket (2001)) as well as several environmental reports from European paper mills (Hylte Mill (2000; Kvarnsveden Mill (2002; Sachsen Mill (2002; Summa Mill (2001)). Further sources are the German inventory study about graphical paper (Tiedemann et al. (2000)) of UBA, dis-tinguishing beteween a nordic and a German newsprint paper, a recently established study from EMPA comparing printed with electronic media (Reichart & Hischier (2001)) - including datasets from several newsprint paper mills - and the European IPPC documentation for the paper and pulp in-dustry (European Commission (2000)). In the latter one, besides BAT technology, the present situa-tion of the pulp and paper industry is described and quantified.
Further documentation about the background data to this dataset can be found in the report Hischier (2007), available through the ecoinvent online for v2.
Reference(s):
">> KCL (2002) KCL EcoData - life cycle inventory database. The Finnish Pulp and Paper Research Institute (KCL), Espoo (Finnland) <<

>> Naturvardsverket (2001) Skogsindustrins utsläpp - avfallsmängder och energiförbrukning 2000. Report 5154. Naturvardsverket (Swedish EPA), Stockholm <<

>> Hylte Mill (2000) Environmental Report 1999. StoraEnso Newsprint, Hyltebruk (Sweden) as pdf-File under: http://www.storaenso.com/CDAvgn/main/0,,1_-2395-2103-,00.html <<

>> Kvarnsveden Mill (2002) Environmental Report 2001. StoraEnso Kvarnsveden AB, Borlänge (Sweden) as pdf-File under: http://www.storaenso.com/CDAvgn/main/0,,1_-2395-2103-,00.html <<

>> Sachsen Mill (2002) Environmental Statement Sachsen Mill 2001. StoraEnso Sachsen GmbH, Eilenburg (Germany) as pdf-File under: http://www.storaenso.com/CDAvgn/main/0,,1_-2394-2102-,00.html <<

>> Summa Mill (2001) Environmental Statement Summa Mill 2000. Stora Enso Newsprint, Hamina (Finland) as pdf-File under: http://www.storaenso.com/CDAvgn/main/0,,1_-2393-2097-,00.html <<

>> Tiedemann A., Böttcher Tiedemann C., Buschardt A., Georgi B., Giersberg G., Goosmann G., Gregor H.-D., Mehlhorn B., Modi A., Neitzel H., Oels H.-J., Schmitz S. and Suhr M. (2000) Ökobilanzen für graphische Papiere. Texte 22/00. Umweltbundesamt, Berlin <<

>> Reichart I. and Hischier R. (2001) Vergleich der Umweltbelastungen bei Benut-zung elektronischer und gedruckter Medien. EMPA-Bericht Nr. 253. EMPA, St. Gallen <<

>> Hischier R. (2007) Life Cycle Inventories of Packagings and Graphical Papers. ecoinvent-Report No. 11, Swiss Centre for Life Cycle Inventories, Dübendorf, 2007. <<
"

## Included activities start
This activity starts with the reception of wood chips and other raw materials at the factory gate.

## Included activities end
This activity includes the European production of newsprint paper without the use of deinked pulp (waste paper) - including transports to paper mill, wood handling, mechanical pulping and bleaching, paper production, energy production on-site and internal waste water treatment.

## Geography
Data from a finnish database and from several European newsprint producers used as European average data.

## Technology
Average of present used technology

## Time period
Data represent the average technology in the late 1990ies and early 2000s. The production volume is valid for 2018.

## Parameters
- fraction, cooling water, once-through system, to air: 0.004 dimensionless; name fraction_CW_OT_to_air; lognormal variance with pedigree 0.0413, pedigree (2,3,1,3,1)
  Calculated based on literature value (Scown, C.D., 2011, Water Footprint of U.S. Transportation Fuels and supplying information of the article) (Vionnet, S., Quantis Water Database - Technical Report, 2012).
- fraction, process water, to air: 0.15 dimensionless; name fraction_PW_to_air; lognormal variance with pedigree 0.092025, pedigree (4,4,3,2,4)
  Literature value. In case when no industry/process specific data are available, default evaporation fraction value is used. This value is 15% and is based on literature (Statistics Canada, 2007 & Shaffer, K.H., 2008, Consumptive water use in the Great Lakes Basin, USGS & Shiklomanov, 2003, World Water Resources at the Beginning of the 21st Century) and has been approved by an expert.
- fraction, cooling water, cooling pond system, to air: 0.032 dimensionless; name fraction_CW_CP_to_air; lognormal variance with pedigree 0.0413, pedigree (2,3,1,3,1)
  (same comment as for fraction, cooling water, once-through system, to air)
- fraction, cooling water, to air: 0.3875 dimensionless; name fraction_CW_to_air; = (0.5*fraction_CW_OT_to_air)+(0.5*fraction_CW_R_to_air); lognormal variance with pedigree 0.092025, pedigree (4,4,3,2,4)
  Calculated value based on literature value (see comments of the other parametres present in this dataset) and expert opinion. In the case when no industry/literature data are available about the type of cooling or directly fraction, cooling water, to air specific for the process a default assumption is applied. It is assumed that the once-through cooling system is used in 50% of all cases and recirculating system is used in another 50% of all cases.
- fraction, cooling water, recirculating system, to air: 0.771 dimensionless; name fraction_CW_R_to_air; lognormal variance with pedigree 0.0413, pedigree (2,3,1,3,1)
  (same comment as for fraction, cooling water, once-through system, to air)

## Reference product
- paper, newsprint: 1 kg; name ref; By-product classification allocatable product; CPC 32121: Newsprint
  EcoSpold01Location=RER
  production volume 3.6771e8 kg; name RP_PV_1; = 5253000000*0.07
    Production volume valid for 2018. CEPI reports 5253000000 kg of newsprint for recycling; total newsprint production of 5651000000 kg and a utilization rate of 93%. 93% of the total production are taken as production volume for recycled newsprint in Europe, 7% are assumed virgin production.
    Reference(s):
    CEPI, 2018, Key Statistics 2018 European pulp & paper industry, accessible at http://www.cepi.org/system/files/public/documents/publications/Final%20Key%20Statistics%202018.pdf, last accessed March 2020
  property carbon content, fossil 0.00397425
    Fossil C content was calculated after fossil C contents of chemicals used in the production of the paper (in Tab 8.6 ecoinvent v2.2 report 11_III, part 8).
  property price 0.433 EUR2005
    Export prices for the World+ according to: http://faostat.fao.org/site/626/DesktopDefault.aspx?PageID=626#ancor downloaded 27 April 2009; calculated as export value divided by export volume.
  property carbon content, non-fossil 0.388876
    Biogenic C content was calculated after biogenic C contents of chemicals used in the production of the paper (in Tab 8.6 ecoinvent v2.2 report 11_III, part 8). The cellulose content in 1 kg of paper (on a wet mas basis) was estimated as (1-chemical content), C content of cellulose was considered 0.44 kgC/kg dry mass (ecoinvent v2.2 report, n 15a, pg 40)
  property carbon content 0.392851
    carbon content on a dry matter basis (reserved; not for manual entry)
  properties: heating value, net 14.11 MJ, water in wet mass 0.055 kg, dry mass 0.945 kg, wet mass 1 kg, water content 0.0582011, carbon allocation 0.371244 kg

## Inputs from technosphere
- sodium hydroxide, without water, in 50% solution state: 0.00407 kg; lognormal variance with pedigree 0.0527, pedigree (2,4,5,3,1)
  Average data from finnish database
  EcoSpold01Location=RER
  Uncertainty: average data from finnish database
  properties: heating value, net 3.03 MJ, wet mass 1 kg, dry mass 1 kg
- sulfate pulp, bleached: 0.024415 kg; = 0.0257*0.95; lognormal variance with pedigree 0.0413, pedigree (2,3,5,3,1)
  Average from finnish database and several paper mills. 95% of pulp input is bleached pulp, 5% unbleached pulp.
  Uncertainty: average from finnish database and several paper mills
  properties: wet mass 1 kg, water content 0.111111, dry mass 0.9 kg, carbon content, non-fossil 0.494, heating value, net 13.23 MJ
  note on carbon content, non-fossil: C content of dry mass of sulfate pulp is 0.494 kgC/kg dry wood (ecoinvent v2.2 report 6_IX & ecoinvent v2.2 report 9). No other C containing products in the formulation of the pulp.
- sulfur dioxide, liquid: 0.0107 kg; lognormal variance with pedigree 0.0527, pedigree (2,4,5,3,1)
  EcoSpold01Location=RER
  Average data from finnish database
  Uncertainty: average data from finnish database
  properties: dry mass 1 kg, wet mass 1 kg
- malusil: 0.0086 kg; lognormal variance with pedigree 0.0407, pedigree (1,3,5,3,1)
  EcoSpold01Location=RER
  Average from several different paper mills
  Uncertainty: average from several different paper mills
  properties: dry mass 1 kg, wet mass 1 kg
- wood ash mixture, pure: 0 kg; name ash; pedigree (1,1,1,1,1)
  EcoSpold01Location=CH
  Average data from finnish database
  Uncertainty: average data from finnish database
  production volume 0 kg
    Calculated from the production volume of paper, newsprint in proportion to the respective output amounts.
  property price 0 EUR2005; name ash_price_EUR2005
  properties: dry mass 1 kg, wet mass 1 kg, carbon content, non-fossil 0.012
  note on carbon content, non-fossil: Biogenic C content was calculated after biogenic C contents of chemicals used in the production of the paper (in Tab 8.6 ecoinvent v2.2 report 11_III, part 8). The cellulose content in 1 kg of paper (on a wet mas basis) was estimated as (1-chemical content), C content of cellulose was considered 0.44 kgC/kg dry mass (ecoinvent v2.2 report, n 15a, pg 40) Tab A.9, ecoinvent v2.2 report 13_I.
- municipal solid waste: -0.0015 kg; name waste; lognormal variance with pedigree 0.0527, pedigree (2,4,5,3,1)
  (same comment as for wood ash mixture, pure)
  production volume 551565 kg; = waste/ ref* RP_PV_1
    (same comment as for wood ash mixture, pure)
  properties: carbon content, fossil 0.171549, water content 0.297017, wet mass 1 kg, dry mass 0.771 kg, heating value, net 11.74 MJ, carbon content, non-fossil 0.261655
  note on carbon content, fossil: Fossil C content was calculated after fossil C contents of chemicals used in the production of the paper (in Tab 8.6 ecoinvent v2.2 report 11_III, part 8). MSW composition in tab 4.1, ecoinvent v2.2 report 13_I. C content referred to 1 kg DM
  note on heating value, net: Value taken from the general comment of the treatment dataset.
  note on carbon content, non-fossil: Biogenic C content was calculated after biogenic C contents of chemicals used in the production of the paper (in Tab 8.6 ecoinvent v2.2 report 11_III, part 8). The cellulose content in 1 kg of paper (on a wet mas basis) was estimated as (1-chemical content), C content of cellulose was considered 0.44 kgC/kg dry mass (ecoinvent v2.2 report, n 15a, pg 40) MSW composition in tab 4.1, ecoinvent v2.2 report 13_I. C content referred to 1 kg DM
- nitrogen, liquid: 0.00023 kg; lognormal variance with pedigree 0.0527, pedigree (2,4,5,3,1)
  (same comment as for sulfur dioxide, liquid)
  properties: dry mass 1 kg, wet mass 1 kg
- paper mill, integrated: 5.44e-11 unit; lognormal variance with pedigree 0.448, pedigree (4,5,5,5,5)
  EcoSpold01Location=RER
  Own assumption
  Uncertainty: own assumption
- kaolin: 0.0563 kg; lognormal variance with pedigree 0.0407, pedigree (1,3,5,3,1)
  (same comment as for malusil)
  properties: wet mass 1 kg, dry mass 1 kg
- hydrogen peroxide, without water, in 50% solution state: 0.00483 kg; lognormal variance with pedigree 0.0527, pedigree (2,4,5,3,1)
  (same comment as for sodium hydroxide, without water, in 50% solution state)
  properties: heating value, net 7.13 MJ, dry mass 1 kg, wet mass 1 kg
- heavy fuel oil: 0.00134 kg; lognormal variance with pedigree 0.0413, pedigree (2,3,5,3,1)
  EcoSpold01Location=RER
  Average from finnish database and several paper mills
  Uncertainty: average from finnish database and several paper mills
  properties: carbon content, fossil 0.849, wet mass 1 kg, dry mass 1 kg, heating value, net 41.2 MJ
  note on carbon content, fossil: Fossil C content was calculated after fossil C contents of chemicals used in the production of the paper (in Tab 8.6 ecoinvent v2.2 report 11_III, part 8). C-content is 84.9% (ecoinvent v2.2 report 6_IV, Tab 3.18)
- chemical, organic: 0.005 kg; lognormal variance with pedigree 0.0527, pedigree (2,4,5,3,1)
  Average data from finnish database
  EcoSpold01Location=GLO
  Uncertainty: average data from finnish database
  properties: heating value, net 19.03 MJ, dry mass 1 kg, wet mass 1 kg, carbon content, fossil 0.628
  note on carbon content, fossil: Fossil C content was calculated after fossil C contents of chemicals used in the production of the paper (in Tab 8.6 ecoinvent v2.2 report 11_III, part 8). This dataset is an unweighted average of 20 organic substances (listed in Tab 88.1, ecoinvent v2.2 report 8, part II), being part of the top100 chemicals included in this database. The C-content has also been calculated as an unweighted average of the C content of the substances composing this dataset.
- phosphorus, white, liquid: 3e-5 kg; lognormal variance with pedigree 0.0527, pedigree (2,4,5,3,1)
  (same comment as for sodium hydroxide, without water, in 50% solution state)
  properties: dry mass 1 kg, wet mass 1 kg
- quicklime, milled, loose: 0.0009 kg; lognormal variance with pedigree 0.0407, pedigree (1,3,5,3,1)
  EcoSpold01Location=CH
  Average from several different paper mills
  Uncertainty: average from several different paper mills
  properties: wet mass 1 kg, water content 0.010101, dry mass 0.99 kg
- sodium dithionite, anhydrous: 0.001 kg; lognormal variance with pedigree 0.0527, pedigree (2,4,5,3,1)
  (same comment as for sodium hydroxide, without water, in 50% solution state)
  properties: wet mass 1 kg, dry mass 1 kg
- hard coal: 0.0125 kg; lognormal variance with pedigree 0.0413, pedigree (2,3,5,3,1)
  Average from finnish database and several paper mills
  EcoSpold01Location=WEU
  Uncertainty: average from finnish database and several paper mills
  properties: wet mass 1 kg, carbon content, fossil 0.845, heating value, net 27.91 MJ, water content 0.0638298, dry mass 0.94 kg
  note on carbon content, fossil: Fossil C content was calculated after fossil C contents of chemicals used in the production of the paper (in Tab 8.6 ecoinvent v2.2 report 11_III, part 8). C content 75-94% (specified in Tab 1.1, report 6, part VI). A mean content of 0.845 kg C/ kg dry hard coal was considered
  note on heating value, net: Based on the Characterization factor of Hard coal in the CED method
- aluminium sulfate, powder: 0.0092 kg; lognormal variance with pedigree 0.0407, pedigree (1,3,5,3,1)
  Average from several different paper mills
  EcoSpold01Location=RER
  Uncertainty: average from several different paper mills
  properties: wet mass 1 kg, dry mass 1 kg
- electricity, medium voltage: 2.824 kWh; lognormal variance with pedigree 0.0413, pedigree (2,3,5,3,1)
  Average from finnish database and several paper mills
  EcoSpold01Location=NORDEL
  Uncertainty: average from finnish database and several paper mills
- EDTA, ethylenediaminetetraacetic acid: 0.00203 kg; lognormal variance with pedigree 0.0527, pedigree (2,4,5,3,1)
  (same comment as for sulfur dioxide, liquid)
  properties: heating value, net 19.09 MJ, dry mass 1 kg, carbon content, fossil 0.410959, wet mass 1 kg
  note on carbon content, fossil: Fossil C content was calculated after fossil C contents of chemicals used in the production of the paper (in Tab 8.6 ecoinvent v2.2 report 11_III, part 8). C10H16N2O8
- sulfate pulp, unbleached: 0.001285 kg; = 0.0257*0.05; lognormal variance with pedigree 0.0413, pedigree (2,3,5,3,1)
  (same comment as for sulfate pulp, bleached)
  properties: dry mass 0.9 kg, water content 0.111111, wet mass 1 kg, heating value, net 13.23 MJ, carbon content, non-fossil 0.494, price 0.355 EUR2005
- sodium silicate, spray powder, 80%: 0.0133 kg; lognormal variance with pedigree 0.0527, pedigree (2,4,5,3,1)
  (same comment as for sodium hydroxide, without water, in 50% solution state)
  properties: wet mass 1 kg, dry mass 1 kg
- pulpwood, softwood, measured as solid wood under bark: 0 m3; pedigree (1,1,1,1,1)
  EcoSpold01Location=RER
  average from finnish database and several paper mills; includes also residual wood from regular softwood forestry
  Uncertainty: average from finnish database and several paper mills
  properties: wet mass 929.28 kg, water content 1.4, dry mass 387.2 kg, carbon content, non-fossil 0.494, heating value, net 4483.78 MJ
  note on carbon content, non-fossil: Biogenic C content was calculated after biogenic C contents of chemicals used in the production of the paper (in Tab 8.6 ecoinvent v2.2 report 11_III, part 8). The cellulose content in 1 kg of paper (on a wet mas basis) was estimated as (1-chemical content), C content of cellulose was considered 0.44 kgC/kg dry mass (ecoinvent v2.2 report, n 15a, pg 40) C content of dry mass is 0.494 kgC/kg dry wood (ecoinvent v2.2 report 9)
  note on heating value, net: Value based on "softwood forestry, mixed species, sustainable forest management"The property is based on a value of 11.58MJ/kg
- light fuel oil: 0.00363 kg; lognormal variance with pedigree 0.0413, pedigree (2,3,5,3,1)
  Average from finnish database and several paper mills
  EcoSpold01Location=RER
  Uncertainty: average from finnish database and several paper mills
  properties: carbon content, fossil 0.862, wet mass 1 kg, dry mass 1 kg, heating value, net 42.6 MJ
  note on carbon content, fossil: Fossil C content was calculated after fossil C contents of chemicals used in the production of the paper (in Tab 8.6 ecoinvent v2.2 report 11_III, part 8). C-content is 86.2% (ecoinvent v2.2 report 6_IV Tab 3.16)
- hazardous waste, for underground deposit: -0.00028 kg; name haz; lognormal variance with pedigree 0.0407, pedigree (1,3,5,3,1)
  EcoSpold01Location=DE
  Average from several different paper mills
  Uncertainty: average from several different paper mills
  production volume 102959 kg; = haz/ ref* RP_PV_1
    (same comment as for wood ash mixture, pure)
  property price 0 EUR2005; name haz_price_EUR2005
  properties: dry mass 1 kg, carbon content, fossil 0.554667, wet mass 1 kg
  note on carbon content, fossil: Fossil C content was calculated after fossil C contents of chemicals used in the production of the paper (in Tab 8.6 ecoinvent v2.2 report 11_III, part 8). Tab A.6, ecoinvent v2.2 report 13_I, average hazardous waste composition was used, and referred to 0% water mass. No waste-specific emission are currently inventoried for underground deposits. Accordingly, no waste composition must be specified. For generic, average waste to underground deposit deposition in a 200 liter steel drum without cement solidification is assumed (ecoinvent v2.2 report 13_I).
- wood ash mixture, pure: -0.00830919, -0.000170808 kg (2 entries); lognormal variance with pedigree 0.0527, pedigree (2,4,5,3,1)
  (same comment as for wood ash mixture, pure)
  production volume 3.11818e6 kg
- pulpwood, softwood, measured as solid wood under bark: 0.00266049, 3.25088e-5 m3 (2 entries); lognormal variance with pedigree 0.0413, pedigree (2,3,5,3,1)
  (same comment as for pulpwood, softwood, measured as solid wood under bark)

## Inputs from nature
- Water, unspecified natural origin [natural resource, in water]: 0.013 m3; name water_UNO_input; lognormal variance with pedigree 0.0407, pedigree (1,3,5,3,1)
  Average from several different paper mills
  Uncertainty: average from several different paper mills
- Water, cooling, unspecified natural origin [natural resource, in water]: 0.0523 m3; name water_cooling_UNO_input; lognormal variance with pedigree 0.0407, pedigree (1,3,5,3,1)
  (same comment as for Water, unspecified natural origin)

## Emissions to nature
- Polonium-210 [air, urban air close to ground]: 3.08e-5 kBq; lognormal variance with pedigree 0.4386, pedigree (2,5,5,1,4)
  Estimation - based on respective heating modules
  Uncertainty: estimation - based on respective heating modules
- Carbon monoxide, fossil [air, urban air close to ground]: 3.72e-5 kg; lognormal variance with pedigree 0.7786, pedigree (2,5,5,1,4)
  (same comment as for Polonium-210)
- Chlorine [air, urban air close to ground]: 8.69e-7 kg; lognormal variance with pedigree 0.4386, pedigree (2,5,5,1,4)
  (same comment as for Polonium-210)
- Ammonia [air, urban air close to ground]: 8.38e-6 kg; lognormal variance with pedigree 0.1786, pedigree (2,5,5,1,4)
  (same comment as for Polonium-210)
- Acetone [air, urban air close to ground]: 8.28e-9 kg; lognormal variance with pedigree 0.1786, pedigree (2,5,5,1,4)
  (same comment as for Polonium-210)
- Acetic acid [air, urban air close to ground]: 3.31e-8 kg; lognormal variance with pedigree 0.1786, pedigree (2,5,5,1,4)
  (same comment as for Polonium-210)
- Strontium [air, urban air close to ground]: 6.88e-8 kg; lognormal variance with pedigree 0.7786, pedigree (2,5,5,1,4)
  (same comment as for Polonium-210)
- Fluorine [air, urban air close to ground]: 2.41e-7 kg; lognormal variance with pedigree 0.1786, pedigree (2,5,5,1,4)
  (same comment as for Polonium-210)
- Tin [air, urban air close to ground]: 2.29e-10 kg; lognormal variance with pedigree 0.7786, pedigree (2,5,5,1,4)
  (same comment as for Polonium-210)
- Pentane [air, urban air close to ground]: 3.25e-8 kg; lognormal variance with pedigree 0.1786, pedigree (2,5,5,1,4)
  (same comment as for Polonium-210)
- Dioxins, measured as 2,3,7,8-tetrachlorodibenzo-p-dioxin [air, urban air close to ground]: 7.39e-12 kg; lognormal variance with pedigree 0.1786, pedigree (2,5,5,1,4)
  (same comment as for Polonium-210)
- Chromium VI [air, urban air close to ground]: 1.21e-9 kg; lognormal variance with pedigree 0.7786, pedigree (2,5,5,1,4)
  (same comment as for Polonium-210)
- Sulfur dioxide [air, urban air close to ground]: 0.000347 kg; lognormal variance with pedigree 0.0413, pedigree (2,3,5,3,1)
  Average from finnish database and several paper mills
  Uncertainty: average from finnish database and several paper mills
- Copper [air, urban air close to ground]: 2.23e-7 kg; lognormal variance with pedigree 0.7786, pedigree (2,5,5,1,4)
  (same comment as for Polonium-210)
- Hydrocarbons, aliphatic, unsaturated [air, urban air close to ground]: 1.51e-5 kg; lognormal variance with pedigree 0.1786, pedigree (2,5,5,1,4)
  (same comment as for Polonium-210)
- Calcium [air, urban air close to ground]: 2.87e-5 kg; lognormal variance with pedigree 0.4386, pedigree (2,5,5,1,4)
  (same comment as for Polonium-210)
- Particulates, > 2.5 um, and < 10um [air, urban air close to ground]: 2.7e-5 kg; lognormal variance with pedigree 0.1613, pedigree (2,3,5,3,1)
  (same comment as for Sulfur dioxide)
- TOC, Total Organic Carbon [water, surface water]: 0.00043 kg; lognormal variance with pedigree 0.0807, pedigree (1,3,5,3,1)
  (same comment as for Water, unspecified natural origin)
- Radium-228 [air, urban air close to ground]: 2.35e-5 kBq; lognormal variance with pedigree 0.4386, pedigree (2,5,5,1,4)
  (same comment as for Polonium-210)
- Silicon [air, urban air close to ground]: 5.72e-6 kg; lognormal variance with pedigree 0.7786, pedigree (2,5,5,1,4)
  (same comment as for Polonium-210)
- Radon-220 [air, urban air close to ground]: 3.62e-7 kBq; lognormal variance with pedigree 0.4386, pedigree (2,5,5,1,4)
  (same comment as for Polonium-210)
- Zinc [air, urban air close to ground]: 1.56e-6 kg; lognormal variance with pedigree 0.7786, pedigree (2,5,5,1,4)
  (same comment as for Polonium-210)
- Ethyne [air, urban air close to ground]: 1.81e-7 kg; lognormal variance with pedigree 0.1786, pedigree (2,5,5,1,4)
  (same comment as for Polonium-210)
- Aluminium [air, urban air close to ground]: 3.87e-6 kg; lognormal variance with pedigree 0.1786, pedigree (2,5,5,1,4)
  (same comment as for Polonium-210)
- Sodium [air, urban air close to ground]: 6.55e-6 kg; lognormal variance with pedigree 0.7786, pedigree (2,5,5,1,4)
  (same comment as for Polonium-210)
- Hydrocarbons, aliphatic, alkanes, unspecified [air, urban air close to ground]: 4.68e-6 kg; lognormal variance with pedigree 0.1786, pedigree (2,5,5,1,4)
  (same comment as for Polonium-210)
- Carbon dioxide, fossil [air, urban air close to ground]: 0.0489 kg; lognormal variance with pedigree 0.1386, pedigree (2,5,5,1,4)
  (same comment as for Polonium-210)
- Phosphorus [water, surface water]: 1e-5 kg; lognormal variance with pedigree 0.0813, pedigree (2,3,5,3,1)
  (same comment as for Sulfur dioxide)
- m-Xylene [air, urban air close to ground]: 5.79e-7 kg; lognormal variance with pedigree 0.1786, pedigree (2,5,5,1,4)
  (same comment as for Polonium-210)
- Manganese [air, urban air close to ground]: 8.29e-7 kg; lognormal variance with pedigree 0.7786, pedigree (2,5,5,1,4)
  (same comment as for Polonium-210)
- Uranium-238 [air, urban air close to ground]: 3.62e-6 kBq; lognormal variance with pedigree 0.4386, pedigree (2,5,5,1,4)
  (same comment as for Polonium-210)
- DOC, Dissolved Organic Carbon [water, surface water]: 0.0002 kg; lognormal variance with pedigree 0.0807, pedigree (1,3,5,3,1)
  (same comment as for Water, unspecified natural origin)
- Chromium [air, urban air close to ground]: 2.81e-8 kg; lognormal variance with pedigree 0.7786, pedigree (2,5,5,1,4)
  (same comment as for Polonium-210)
- AOX, Adsorbable Organic Halogen as Cl [water, surface water]: 1.1e-7 kg; lognormal variance with pedigree 0.0813, pedigree (2,3,5,3,1)
  (same comment as for Sulfur dioxide)
- Ethene [air, urban air close to ground]: 1.09e-6 kg; lognormal variance with pedigree 0.7786, pedigree (2,5,5,1,4)
  (same comment as for Polonium-210)
- Carbon monoxide, non-fossil [air, urban air close to ground]: 0.000232 kg; lognormal variance with pedigree 0.7786, pedigree (2,5,5,1,4)
  (same comment as for Polonium-210)
- Magnesium [air, urban air close to ground]: 3.11e-6 kg; lognormal variance with pedigree 0.7786, pedigree (2,5,5,1,4)
  (same comment as for Polonium-210)
- Thallium [air, urban air close to ground]: 5.72e-10 kg; lognormal variance with pedigree 0.7786, pedigree (2,5,5,1,4)
  (same comment as for Polonium-210)
- Thorium-228 [air, urban air close to ground]: 1.99e-6 kBq; lognormal variance with pedigree 0.4386, pedigree (2,5,5,1,4)
  (same comment as for Polonium-210)
- Potassium [air, urban air close to ground]: 0.000113 kg; lognormal variance with pedigree 0.7786, pedigree (2,5,5,1,4)
  (same comment as for Polonium-210)
- Uranium [air, urban air close to ground]: 9.16e-10 kg; lognormal variance with pedigree 0.7786, pedigree (2,5,5,1,4)
  (same comment as for Polonium-210)
- Benzene, hexachloro- [air, urban air close to ground]: 3.48e-14 kg; lognormal variance with pedigree 0.1786, pedigree (2,5,5,1,4)
  (same comment as for Polonium-210)
- Formaldehyde [air, urban air close to ground]: 8.21e-7 kg; lognormal variance with pedigree 0.1786, pedigree (2,5,5,1,4)
  (same comment as for Polonium-210)
- Carbon dioxide, non-fossil [air, urban air close to ground]: 0.458 kg; lognormal variance with pedigree 0.1386, pedigree (2,5,5,1,4)
  (same comment as for Polonium-210)
- Suspended solids, unspecified [water, surface water]: 0.00065 kg; lognormal variance with pedigree 0.0813, pedigree (2,3,5,3,1)
  (same comment as for Sulfur dioxide)
- Toluene [air, urban air close to ground]: 1.49e-6 kg; lognormal variance with pedigree 0.1786, pedigree (2,5,5,1,4)
  (same comment as for Polonium-210)
- Particulates, > 10 um [air, urban air close to ground]: 2.1e-5 kg; lognormal variance with pedigree 0.0813, pedigree (2,3,5,3,1)
  (same comment as for Sulfur dioxide)
- Cadmium [air, urban air close to ground]: 5.77e-9 kg; lognormal variance with pedigree 0.7786, pedigree (2,5,5,1,4)
  (same comment as for Polonium-210)
- Nitrogen [water, surface water]: 9e-5 kg; lognormal variance with pedigree 0.0813, pedigree (2,3,5,3,1)
  (same comment as for Sulfur dioxide)
- Propane [air, urban air close to ground]: 3.67e-7 kg; lognormal variance with pedigree 0.1786, pedigree (2,5,5,1,4)
  (same comment as for Polonium-210)
- Arsenic [air, urban air close to ground]: 1.47e-8 kg; lognormal variance with pedigree 0.1786, pedigree (2,5,5,1,4)
  (same comment as for Polonium-210)
- Methane, non-fossil [air, urban air close to ground]: 1.93e-6 kg; lognormal variance with pedigree 0.1786, pedigree (2,5,5,1,4)
  (same comment as for Polonium-210)
- Thorium-232 [air, urban air close to ground]: 1.27e-6 kBq; lognormal variance with pedigree 0.4386, pedigree (2,5,5,1,4)
  (same comment as for Polonium-210)
- Scandium [air, urban air close to ground]: 4.56e-10 kg; lognormal variance with pedigree 0.7786, pedigree (2,5,5,1,4)
  (same comment as for Polonium-210)
- Ethanol [air, urban air close to ground]: 1.66e-8 kg; lognormal variance with pedigree 0.1786, pedigree (2,5,5,1,4)
  (same comment as for Polonium-210)
- Lead [air, urban air close to ground]: 1.51e-7 kg; lognormal variance with pedigree 0.7786, pedigree (2,5,5,1,4)
  (same comment as for Polonium-210)
- Barium [air, urban air close to ground]: 4.56e-8 kg; lognormal variance with pedigree 0.7786, pedigree (2,5,5,1,4)
  (same comment as for Polonium-210)
- Selenium [air, urban air close to ground]: 4.1e-9 kg; lognormal variance with pedigree 0.7786, pedigree (2,5,5,1,4)
  (same comment as for Polonium-210)
- Iodine [air, urban air close to ground]: 4.13e-9 kg; lognormal variance with pedigree 0.1786, pedigree (2,5,5,1,4)
  (same comment as for Polonium-210)
- Hydrocarbons, aromatic [air, urban air close to ground]: 1.29e-8 kg; lognormal variance with pedigree 0.1786, pedigree (2,5,5,1,4)
  (same comment as for Polonium-210)
- Bromine [air, urban air close to ground]: 2.93e-7 kg; lognormal variance with pedigree 0.1786, pedigree (2,5,5,1,4)
  (same comment as for Polonium-210)
- Benzene, ethyl- [air, urban air close to ground]: 1.45e-7 kg; lognormal variance with pedigree 0.1786, pedigree (2,5,5,1,4)
  (same comment as for Polonium-210)
- Nickel [air, urban air close to ground]: 7.17e-8 kg; lognormal variance with pedigree 0.7786, pedigree (2,5,5,1,4)
  (same comment as for Polonium-210)
- Radium-226 [air, urban air close to ground]: 4.35e-6 kBq; lognormal variance with pedigree 0.4386, pedigree (2,5,5,1,4)
  (same comment as for Polonium-210)
- BOD5, Biological Oxygen Demand [water, surface water]: 0.00026 kg; lognormal variance with pedigree 0.0813, pedigree (2,3,5,3,1)
  (same comment as for Sulfur dioxide)
- Titanium [air, urban air close to ground]: 1.37e-7 kg; lognormal variance with pedigree 0.7786, pedigree (2,5,5,1,4)
  (same comment as for Polonium-210)
- Butane [air, urban air close to ground]: 4.87e-8 kg; lognormal variance with pedigree 0.4386, pedigree (2,5,5,1,4)
  (same comment as for Polonium-210)
- Hydrogen fluoride [air, urban air close to ground]: 4.66e-7 kg; lognormal variance with pedigree 0.1786, pedigree (2,5,5,1,4)
  (same comment as for Polonium-210)
- Antimony [air, urban air close to ground]: 5.72e-10 kg; lognormal variance with pedigree 0.1786, pedigree (2,5,5,1,4)
  (same comment as for Polonium-210)
- Dinitrogen monoxide [air, urban air close to ground]: 1.26e-5 kg; lognormal variance with pedigree 0.1786, pedigree (2,5,5,1,4)
  (same comment as for Polonium-210)
- PAH, polycyclic aromatic hydrocarbons [air, urban air close to ground]: 5.37e-8 kg; lognormal variance with pedigree 0.1786, pedigree (2,5,5,1,4)
  (same comment as for Polonium-210)
- Acetaldehyde [air, urban air close to ground]: 3.03e-7 kg; lognormal variance with pedigree 0.1786, pedigree (2,5,5,1,4)
  (same comment as for Polonium-210)
- Xylene [air, urban air close to ground]: 3.62e-8 kg; lognormal variance with pedigree 0.1786, pedigree (2,5,5,1,4)
  (same comment as for Polonium-210)
- Particulates, < 2.5 um [air, urban air close to ground]: 2.2e-5 kg; lognormal variance with pedigree 0.3413, pedigree (2,3,5,3,1)
  (same comment as for Sulfur dioxide)
- Beryllium [air, urban air close to ground]: 4.56e-10 kg; lognormal variance with pedigree 0.7786, pedigree (2,5,5,1,4)
  (same comment as for Polonium-210)
- Methane, fossil [air, urban air close to ground]: 3.94e-6 kg; lognormal variance with pedigree 0.1786, pedigree (2,5,5,1,4)
  (same comment as for Polonium-210)
- Nitrogen oxides [air, urban air close to ground]: 0.00055 kg; lognormal variance with pedigree 0.0813, pedigree (2,3,5,3,1)
  (same comment as for Sulfur dioxide)
- Potassium-40 [air, urban air close to ground]: 4.89e-6 kBq; lognormal variance with pedigree 0.4386, pedigree (2,5,5,1,4)
  (same comment as for Polonium-210)
- Lead-210 [air, urban air close to ground]: 1.68e-5 kBq; lognormal variance with pedigree 0.4386, pedigree (2,5,5,1,4)
  (same comment as for Polonium-210)
- Cobalt [air, urban air close to ground]: 2.97e-9 kg; lognormal variance with pedigree 0.7786, pedigree (2,5,5,1,4)
  (same comment as for Polonium-210)
- Vanadium [air, urban air close to ground]: 1.57e-7 kg; lognormal variance with pedigree 0.7786, pedigree (2,5,5,1,4)
  (same comment as for Polonium-210)
- Radon-222 [air, urban air close to ground]: 3.62e-7 kBq; lognormal variance with pedigree 0.4386, pedigree (2,5,5,1,4)
  (same comment as for Polonium-210)
- Water [water, unspecified]: 0.0430837 m3; name water_to_water_unspecified; = water_cooling_UNO_input*(1-fraction_CW_to_air)+water_UNO_input*(1-fraction_PW_to_air); lognormal variance with pedigree 0.0807, pedigree (2,2,5,1,1)
  Calculated value based on literature values and expert opinion. See comments in the parametres' comment field.
  property wet mass 1000 kg; name WM
  property carbon content, non-fossil 0; name C_content_non_fossil
  property carbon content, fossil 0; name C_content_fossil
  property water in wet mass 1000 kg; name WWM
  property dry mass 0 kg; name DM
- Iron [air, urban air close to ground]: 1.61e-6 kg; lognormal variance with pedigree 0.7786, pedigree (2,5,5,1,4)
  (same comment as for Polonium-210)
- Mercury [air, urban air close to ground]: 2.56e-9 kg; lognormal variance with pedigree 0.7786, pedigree (2,5,5,1,4)
  (same comment as for Polonium-210)
- Benzo(a)pyrene [air, urban air close to ground]: 2.42e-9 kg; lognormal variance with pedigree 0.1786, pedigree (2,5,5,1,4)
  (same comment as for Polonium-210)
- Molybdenum [air, urban air close to ground]: 2.6e-9 kg; lognormal variance with pedigree 0.7786, pedigree (2,5,5,1,4)
  (same comment as for Polonium-210)
- Boron [air, urban air close to ground]: 1.72e-7 kg; lognormal variance with pedigree 0.7786, pedigree (2,5,5,1,4)
  (same comment as for Polonium-210)
- NMVOC, non-methane volatile organic compounds, unspecified origin [air, urban air close to ground]: 3.52e-6 kg; lognormal variance with pedigree 0.1786, pedigree (2,5,5,1,4)
  (same comment as for Polonium-210)
- Phosphorus [air, urban air close to ground]: 1.47e-6 kg; lognormal variance with pedigree 0.1786, pedigree (2,5,5,1,4)
  (same comment as for Polonium-210)
- Thorium [air, urban air close to ground]: 6.88e-10 kg; lognormal variance with pedigree 0.7786, pedigree (2,5,5,1,4)
  (same comment as for Polonium-210)
- Phenol, pentachloro- [air, urban air close to ground]: 3.91e-11 kg; lognormal variance with pedigree 0.1786, pedigree (2,5,5,1,4)
  (same comment as for Polonium-210)
- Ethane [air, urban air close to ground]: 5.43e-7 kg; lognormal variance with pedigree 0.1786, pedigree (2,5,5,1,4)
  (same comment as for Polonium-210)
- Methanol [air, urban air close to ground]: 2.82e-8 kg; lognormal variance with pedigree 0.1786, pedigree (2,5,5,1,4)
  (same comment as for Polonium-210)
- Water [air, unspecified]: 0.0222162 m3; name water_to_air_unspecified; = (water_cooling_UNO_input*fraction_CW_to_air)+(water_UNO_input*fraction_PW_to_air); lognormal variance with pedigree 0.0807, pedigree (2,2,5,1,1)
  (same comment as for Water)
- COD, Chemical Oxygen Demand [water, surface water]: 0.0045 kg; lognormal variance with pedigree 0.0813, pedigree (2,3,5,3,1)
  (same comment as for Sulfur dioxide)
- Benzene [air, urban air close to ground]: 4.58e-6 kg; lognormal variance with pedigree 0.1786, pedigree (2,5,5,1,4)
  (same comment as for Polonium-210)
- Propene [air, urban air close to ground]: 1.81e-7 kg; lognormal variance with pedigree 0.1786, pedigree (2,5,5,1,4)
  (same comment as for Polonium-210)
- Hydrogen chloride [air, urban air close to ground]: 1.48e-5 kg; lognormal variance with pedigree 0.1786, pedigree (2,5,5,1,4)
  (same comment as for Polonium-210)

## Extrapolations
This dataset has been extrapolated from year 2000 to the year of the calculation (2021). The uncertainty has been adjusted accordingly.

## Review by Hans-Jörg Althaus 2003-08-26
passed
