# treatment of waste emulsion paint, sanitary landfill

Dataset: EcoSpold 2, unit process
Geography: RoW
Time period: 1994-01-01 to 2021-12-31
Technology level: current
Classification: ISIC rev.4 ecoinvent: 3821:Treatment and disposal of non-hazardous waste
Classification: EcoSpold01Categories: waste management/sanitary landfill
Tags: Treatment
Scenario: Business-as-Usual
System model: Allocation, cut-off by classification
Generated by: Gabor Doka
Published in: Doka G. 2007
Database: ecoinvent
isCopyrightProtected: true
accessRestrictedTo: 1

## General comment
Inventoried waste contains 100% Emulsion paint (remains); .
waste composition (wet, in ppm): upper heating value 11.14 MJ/kg; lower heating value 10.51 MJ/kg; H2O n.a.; O 214760; H 31708; C 268330; S n.a.; N n.a.; P n.a.; B n.a.; Cl 86465; Br n.a.; F n.a.; I n.a.; Ag n.a.; As 0.44122; Ba n.a.; Cd 0.016849; Co n.a.; Cr 1.248; Cu n.a.; Hg 0.0085442; Mn n.a.; Mo n.a.; Ni 0.95527; Pb 0.64946; Sb n.a.; Se n.a.; Sn n.a.; V n.a.; Zn 6.5444; Be n.a.; Sc n.a.; Sr n.a.; Ti 135000; Tl n.a.; W n.a.; Si 149810; Fe n.a.; Ca 113920; Al n.a.; K n.a.; Mg n.a.; Na n.a.;
Share of carbon in waste that is biogenic 0%.
Overall degradability of waste during 100 years: 1%.
[This dataset was already contained in the ecoinvent database version 2. It was not individually updated during the transfer to ecoinvent version 3. Life Cycle Impact Assessment results may still have changed, as they are affected by changes in the supply chain, i.e. in other datasets. This dataset was generated following the ecoinvent quality guidelines for version 2. It may have been subject to central changes described in the ecoinvent version 3 change report (http://www.ecoinvent.org/database/ecoinvent-version-3/reports-of-changes/), and the results of the central updates were reviewed extensively. The changes added e.g. consistent water flows and other information throughout the database. The documentation of this dataset can be found in the ecoinvent reports of version 2, which are still available via the ecoinvent website. The change report linked above covers all central changes that were made during the conversion process.]

## Included activities end
Waste-specific short-term emissions to air via landfill gas incineration and landfill leachate. Burdens from treatment of short-term leachate (0-100a) in wastewater treatment plant (including WWTP sludge disposal in municipal incinerator). Long-term emissions from landfill to groundwater (after base lining failure).

## Geography
Technology encountered in Switzerland in 2000. Landfill includes base seal, leachate collection system, treatment of leachate in municipal wastewater treatment plant.

## Technology
Swiss municipal sanitary landfill for biogenic or untreated municipal waste ('reactive organic landfill'). Landfill gas and leachate collection system. Recultivation and monitoring for 150 years after closure.

## Reference product
- waste emulsion paint: -1 kg; name WP; By-product classification Waste; CPC 39: Wastes or scraps
  EcoSpold01Location=CH
  production volume 6.56085e9 kg; name WP_PV; = 45600000000*0.35*0.78*0.56
    Estimated value. Global demand of paint is estimated to be 45600000000kg (http://www.freedoniagroup.com/brochure/28xx/2845smwe.pdf, accessed 20151009) of which 55% is paint and 35% is emulsion paint (http://www.psgdover.com/en/mouvex-paint-coatings-market-overview/what-are-paint-a-coatings/defining-paintaccessed, accessed 20151009). 22% is considered hazardous waste and 78% non hazardous waste (http://archive.epa.gov/sectors/web/pdf/paint_quantity_report.pdf, accessed 20151009).
    In the US, of hazardous waste 7.2% is sent to hazardous incineration (http://www3.epa.gov/epawaste/hazard/tsd/td/combustion.htm, accessed 20151009). Of non hazardous waste 12% is sent to incineration (Extrapolated from the US data, according to GDP. The relative GDP of US in 2005 was .274857, compared to the global value of 1. EPA estimates that 12% of annual MSW in US is incinerated for energy recovery http://www.epa.gov/epawaste/nonhaz/municipal/pubs/2012_msw_fs.pdf) 23% is sent to inert material landfill (http://archive.epa.gov/sectors/web/pdf/paint_quantity_report.pdf, accessed 20151009). The rest (65%) is considered to go to sanitary landfill.
    In the EU (from Eurostat municipal waste treatment http://ec.europa.eu/eurostat/web/waste/transboundary-waste-shipments/key-waste-streams/municipal-waste), of hazardous waste 23% is sent to hazardous incineration. Of non hazardous waste 23% is sent to incineration. 37% is considered to be sent to landfilling and it is split between sanitary and inert landfill using the same shares assumed for the US.
    The treatment activities for the global dataset are calculated as the weighted average of US and EU, based on nominal GDP of 2010 (source: United Nations, http://data.un.org/Glossary.aspx?q=GDP+%28current+US%24%29, accessed 20130726 and 20130312). Where EU without CH GDP is 2.80E-01 and US is 0.253094 of the world. Gross domestic product (GDP) at current prices is GDP at prices of the current reporting period. Also known as nominal GDP.
    The assumed treatment are 16% of hazardous waste goes to incineration. For non hazardous, 20% goes to incineration, 12% goes to inert landfill, and 56% goes to sanitary landfill.
  property carbon content, fossil 0.27
    Tab A.4, ecoinvent v2.2 report 13_I. C content has been calculated after data in the tables, and then referred to 1 kg DM
  property heating value, net 8.18 MJ
    LHV is calculated based on the Carbon content of the product. More details can be found on the respective documentation.
  property price 0 EUR2005; name WP_price_EUR2005
    Waste products are assigned a price of zero as they are assumed to require further treatment.
  property carbon content 0.27
    carbon content on a dry matter basis (reserved; not for manual entry)
  properties: carbon content, non-fossil 0, water in wet mass 0 kg, dry mass 1 kg, wet mass 1 kg, water content 0, carbon allocation 0.27 kg

## Inputs from technosphere
- electricity, low voltage: 0 kWh; pedigree (1,1,1,1,1)
  burden from wastewater treatment of the short-term leachate (0-100a). Uncertainty calculated from unertainty of the waste composition of this waste, uncertainty in waste decomposition and short-term leaching in sanitary landfill
  EcoSpold01Location=CH
  Uncertainty: . Uncertainty calculated from unertainty of the waste composition of this waste, uncertainty in waste decomposition and short-term leaching in sanitary landfill
- process-specific burdens, sanitary landfill: 1 kg; lognormal variance with pedigree 0.042, pedigree (1,1,5,5,1)
  demands per kilogram waste. uncertainty is heeded in the module
  EcoSpold01Location=CH
- process-specific burdens, slag landfill: 0.000209 kg; lognormal variance with pedigree 0.572, pedigree (1,1,5,5,1)
  burden from incineration of sludge from wastewater treatment of the short-term leachate (0-100a). uncertainty is calculated from uncertainties in waste composition and transfer coefficients in incinerator and uncertainty of waste decomposition and short-term leaching in sanitary landfill
  EcoSpold01Location=CH
- heat, district or industrial, other than natural gas: 0 MJ; pedigree (1,1,1,1,1)
  EcoSpold01Location=CH
  burden from incineration of sludge from wastewater treatment of the short-term leachate (0-100a). uncertainty is calculated from uncertainties in waste composition and transfer coefficients in incinerator and uncertainty of waste decomposition and short-term leaching in sanitary landfill
  properties: heating value, net 1 MJ
- waste graphical paper: 0 kg; name WGP_BP
  EcoSpold01Location=CH
  burden from wastewater treatment of the short-term leachate (0-100a). Uncertainty calculated from unertainty of the waste composition of this waste, uncertainty in waste decomposition and short-term leaching in sanitary landfill
  production volume 0 kg
    Calculated from the production volume of waste emulsion paint, 0% water in proportion to the respective output amounts.
  property price 0 EUR2005; name WGP_BP_price_EUR2005
  properties: dry mass 0.888 kg, water content 0.126126, wet mass 1 kg, carbon content, non-fossil 0.454955, heating value, net 14.12 MJ
  note on heating value, net: Value taken from the general comment of the treatment dataset.
- chemical, organic: 5.78e-11 kg; lognormal variance with pedigree 2.182, pedigree (1,1,5,5,1)
  burden from incineration of sludge from wastewater treatment of the short-term leachate (0-100a). uncertainty is calculated from uncertainties in waste composition and transfer coefficients in incinerator and uncertainty of waste decomposition and short-term leaching in sanitary landfill
  EcoSpold01Location=GLO
  properties: heating value, net 19.03 MJ, wet mass 1 kg, carbon content, fossil 0.628, dry mass 1 kg
  note on carbon content, fossil: This dataset is an unweighted average of 20 organic substances (listed in Tab 88.1, ecoinvent v2.2 report 8, part II), being part of the top100 chemicals included in this database. The C-content has also been calculated as an unweighted average of the C content of the substances composing this dataset.
- heat, central or small-scale, other than natural gas: 0.00014194 MJ; lognormal variance with pedigree 0.55, pedigree (5,5,5,5,5)
  (same comment as for electricity, low voltage)
  properties: heating value, net 1 MJ
- process-specific burdens, municipal waste incineration: 0.000378 kg; lognormal variance with pedigree 0.432, pedigree (1,1,5,5,1)
  Burden from incineration of sludge from wastewater treatment of the short-term leachate (0-100a).
  EcoSpold01Location=CH
- chemical, inorganic: 2.28e-12 kg; lognormal variance with pedigree 1.492, pedigree (1,1,5,5,1)
  (same comment as for chemical, organic)
  properties: wet mass 1 kg, dry mass 1 kg, carbon content, fossil 0.003
  note on carbon content, fossil: This dataset is an unweighted average of 20 inorganic substances (listed in Tab 88.1, ecoinvent v2.2 report 8, part II), being part of the top100 chemicals included in this database. The C-content has also been calculated as an unweighted average of the C content of the substances composing this dataset.
- sewer grid, 5E9l/year, 110 km: 5.45e-10 km; lognormal variance with pedigree 0.2106, pedigree (5,5,5,5,5)
  EcoSpold01Location=CH
  burden from wastewater treatment of the short-term leachate (0-100a). Uncertainty calculated from unertainty of the waste composition of this waste, uncertainty in waste decomposition and short-term leaching in sanitary landfill
  Uncertainty: . Uncertainty calculated from unertainty of the waste composition of this waste, uncertainty in waste decomposition and short-term leaching in sanitary landfill
- residual material landfill: 3.07e-14 unit; lognormal variance with pedigree 0.712, pedigree (1,1,5,5,1)
  (same comment as for process-specific burdens, slag landfill)
- municipal waste incineration facility: 9.46e-14 unit; lognormal variance with pedigree 0.432, pedigree (1,1,5,5,1)
  (same comment as for process-specific burdens, municipal waste incineration)
- sanitary landfill facility: 5.56e-10 unit; lognormal variance with pedigree 0.042, pedigree (1,1,5,5,1)
  demands per kilogram waste. uncertainty is heeded in the module
  EcoSpold01Location=CH
- iron (III) chloride, without water, in 40% solution state: 2.38e-10 kg; lognormal variance with pedigree 2.012, pedigree (1,1,5,5,1)
  (same comment as for heat, district or industrial, other than natural gas)
  properties: wet mass 1 kg, dry mass 1 kg
- slag landfill: 3.72e-13 unit; lognormal variance with pedigree 0.572, pedigree (1,1,5,5,1)
  (same comment as for process-specific burdens, slag landfill)
- electricity, high voltage: 0 kWh; pedigree (1,1,1,1,1)
  (same comment as for process-specific burdens, slag landfill)
- process-specific burdens, residual material landfill: 1.48e-5 kg; lognormal variance with pedigree 0.712, pedigree (1,1,5,5,1)
  (same comment as for heat, district or industrial, other than natural gas)
- heat, district or industrial, natural gas: 0 MJ; pedigree (1,1,1,1,1)
  burden from wastewater treatment of the short-term leachate (0-100a). Uncertainty calculated from unertainty of the waste composition of this waste, uncertainty in waste decomposition and short-term leaching in sanitary landfill
  EcoSpold01Location=RER
  Uncertainty: . Uncertainty calculated from unertainty of the waste composition of this waste, uncertainty in waste decomposition and short-term leaching in sanitary landfill
  properties: heating value, net 1 MJ
- waste plastic, mixture: 0 kg; name WP_BP
  burden from wastewater treatment of the short-term leachate (0-100a). Uncertainty calculated from unertainty of the waste composition of this waste, uncertainty in waste decomposition and short-term leaching in sanitary landfill
  EcoSpold01Location=CH
  production volume 0 kg
    (same comment as for waste graphical paper)
  property price 0 EUR2005; name WP_BP_price_EUR2005
  properties: heating value, net 30.79 MJ, water content 0.180638, carbon content, fossil 0.747344, wet mass 1 kg, dry mass 0.847 kg
  note on carbon content, fossil: C content in 1 kg DM was calculated using data in Tab A.2, ecoinvent v2.2 report 13_I
- waste cement, hydrated: -1.48e-5 kg; name BP_WS
  (same comment as for heat, district or industrial, other than natural gas)
  production volume 97100.5 kg; = BP_WS*WP_PV/ABS(WP)
    (same comment as for waste graphical paper)
  property price 0 EUR2005; name BP_WS_price_EUR2005
  properties: wet mass 1 kg, dry mass 1 kg
- cement, unspecified: 0 kg; pedigree (1,1,1,1,1)
  (same comment as for heat, district or industrial, other than natural gas)
  properties: wet mass 1 kg, dry mass 1 kg
- wastewater treatment facility, capacity 5E9l/year: 1.42e-11 unit; lognormal variance with pedigree 0.2106, pedigree (5,5,5,5,5)
  (same comment as for electricity, low voltage)
- hydrochloric acid, without water, in 30% solution state: 1.37e-12 kg; lognormal variance with pedigree 1.492, pedigree (1,1,5,5,1)
  burden from incineration of sludge from wastewater treatment of the short-term leachate (0-100a). uncertainty is calculated from uncertainties in waste composition and transfer coefficients in incinerator and uncertainty of waste decomposition and short-term leaching in sanitary landfill
  EcoSpold01Location=RER
  properties: dry mass 1 kg, wet mass 1 kg, heating value, net 3.32 MJ
- electricity, low voltage: 2.18579e-6, 3.97991e-7, 6.40815e-6, 9.83855e-5, 1.5917e-5, 4.57055e-5 kWh (6 entries); lognormal variance with pedigree 0.43, pedigree (5,5,5,5,5)
  (same comment as for electricity, low voltage)
- heat, district or industrial, other than natural gas: 1.28494e-7, 0.000316872 MJ (2 entries); lognormal variance with pedigree 0.432, pedigree (1,1,5,5,1)
  (same comment as for heat, district or industrial, other than natural gas)
- waste graphical paper: -1.89751e-6, -2.89758e-7, -2.53367e-8, -1.04702e-6, -1.02093e-7, -1.88985e-7, -3.52493e-5 kg (7 entries)
  (same comment as for waste graphical paper)
  production volume 254561 kg
- electricity, high voltage: 6.79423e-7, 1.30252e-7, 2.20842e-6, 3.18004e-5, 5.04325e-6, 1.45383e-5 kWh (6 entries); lognormal variance with pedigree 0.712, pedigree (1,1,5,5,1)
  (same comment as for process-specific burdens, slag landfill)
- heat, district or industrial, natural gas: 2.97249e-6, 0.000192868 MJ (2 entries); lognormal variance with pedigree 0.55, pedigree (5,5,5,5,5)
  (same comment as for heat, district or industrial, natural gas)
- waste plastic, mixture: -4.76812e-6, -3.18588e-7, -2.40943e-8, -1.31588e-7, -5.31601e-8, -1.24955e-7, -3.33795e-5 kg (7 entries)
  (same comment as for waste plastic, mixture)
  production volume 254561 kg
- cement, unspecified: 2.07178e-7, 1.51744e-8, 4.32519e-8, 9.78156e-7, 2.879e-8, 3.16199e-7, 3.82566e-8, 4.27299e-6 kg (8 entries); lognormal variance with pedigree 0.722, pedigree (1,1,5,5,1)
  (same comment as for heat, district or industrial, other than natural gas)

## Emissions to nature
- BOD5, Biological Oxygen Demand [water, surface water]: 1.55e-5 kg; lognormal variance with pedigree 0.912, pedigree (1,1,5,5,1)
  Emissions from short-term leachate treatment and incineration of resulting sludge. Uncertainty calculated depending on waste input and uncertainty of transfer coefficents in landfill, wastewater treatment and incineration model.
- Calcium, ion [water, ground-, long-term]: 0.114 kg; lognormal variance with pedigree 0.152, pedigree (1,1,5,5,1)
  Emissions from long-term leachate (>100a) directly from MSW landfill and indirectly via incineration of treatement sludge from leachate treatement. Uncertainty calculated depending on waste input and uncertainty of long-term transfer coefficents in landfill.
- Silicon [water, surface water]: 4.51e-6 kg; lognormal variance with pedigree 0.902, pedigree (1,1,5,5,1)
  (same comment as for BOD5, Biological Oxygen Demand)
- Cadmium [air, non-urban air or from high stacks]: 1.98e-13 kg; lognormal variance with pedigree 3.202, pedigree (1,1,5,5,1)
  burden from direct release or incineration of landfill biogas. Uncertainty calculated from unertainty of the waste composition of this waste, uncertainty in waste decomposition and short-term leaching in sanitary landfill
- Zinc, ion [water, ground-, long-term]: 5.4e-6 kg; lognormal variance with pedigree 1.382, pedigree (1,1,5,5,1)
  (same comment as for Calcium, ion)
- Chloride [water, ground-, long-term]: 0.0843 kg; lognormal variance with pedigree 0.172, pedigree (1,1,5,5,1)
  (same comment as for Calcium, ion)
- BOD5, Biological Oxygen Demand [water, ground-, long-term]: 0.0176 kg; lognormal variance with pedigree 0.552, pedigree (1,1,5,5,1)
  (same comment as for Calcium, ion)
- Mercury [water, surface water]: 1.85e-12 kg; lognormal variance with pedigree 2.662, pedigree (1,1,5,5,1)
  (same comment as for BOD5, Biological Oxygen Demand)
- Carbon monoxide, fossil [air, non-urban air or from high stacks]: 3.81e-7 kg; lognormal variance with pedigree 1.102, pedigree (1,1,5,5,1)
  (same comment as for Cadmium)
- Calcium [air, non-urban air or from high stacks]: 3.71e-8 kg; lognormal variance with pedigree 1.862, pedigree (1,1,5,5,1)
  (same comment as for Cadmium)
- Titanium, ion [water, surface water]: 3.42e-5 kg; lognormal variance with pedigree 0.882, pedigree (1,1,5,5,1)
  (same comment as for BOD5, Biological Oxygen Demand)
- Methane, fossil [air, urban air close to ground]: 4.41e-7 kg; lognormal variance with pedigree 0.952, pedigree (1,1,5,5,1)
  (same comment as for BOD5, Biological Oxygen Demand)
- Chromium [air, urban air close to ground]: 0 kg; pedigree (1,1,1,1,1)
  (same comment as for BOD5, Biological Oxygen Demand)
- Nickel [air, urban air close to ground]: 0 kg; pedigree (1,1,1,1,1)
  (same comment as for BOD5, Biological Oxygen Demand)
- Chromium VI [water, surface water]: 7.45e-11 kg; lognormal variance with pedigree 2.522, pedigree (1,1,5,5,1)
  (same comment as for BOD5, Biological Oxygen Demand)
- Calcium, ion [water, surface water]: 0.000134 kg; lognormal variance with pedigree 0.772, pedigree (1,1,5,5,1)
  (same comment as for BOD5, Biological Oxygen Demand)
- Zinc [air, non-urban air or from high stacks]: 6.89e-13 kg; lognormal variance with pedigree 3.212, pedigree (1,1,5,5,1)
  (same comment as for Cadmium)
- Arsenic, ion [water, ground-, long-term]: 4.41e-7 kg; lognormal variance with pedigree 1.712, pedigree (1,1,5,5,1)
  (same comment as for Calcium, ion)
- Nickel [air, non-urban air or from high stacks]: 1.39e-13 kg; lognormal variance with pedigree 3.422, pedigree (1,1,5,5,1)
  (same comment as for Cadmium)
- Zinc, ion [water, surface water]: 9.59e-10 kg; lognormal variance with pedigree 2.112, pedigree (1,1,5,5,1)
  (same comment as for BOD5, Biological Oxygen Demand)
- Silicon [air, non-urban air or from high stacks]: 1.87e-8 kg; lognormal variance with pedigree 1.952, pedigree (1,1,5,5,1)
  (same comment as for Cadmium)
- Chromium [air, non-urban air or from high stacks]: 3.56e-14 kg; lognormal variance with pedigree 3.592, pedigree (1,1,5,5,1)
  (same comment as for Cadmium)
- COD, Chemical Oxygen Demand [water, surface water]: 4.93e-5 kg; lognormal variance with pedigree 0.902, pedigree (1,1,5,5,1)
  (same comment as for BOD5, Biological Oxygen Demand)
- Mercury [air, non-urban air or from high stacks]: 2.34e-12 kg; lognormal variance with pedigree 2.792, pedigree (1,1,5,5,1)
  (same comment as for Cadmium)
- DOC, Dissolved Organic Carbon [water, ground-, long-term]: 0.0681 kg; lognormal variance with pedigree 0.552, pedigree (1,1,5,5,1)
  (same comment as for Calcium, ion)
- Silicon [air, urban air close to ground]: 1.64e-7 kg; lognormal variance with pedigree 0.912, pedigree (1,1,5,5,1)
  (same comment as for BOD5, Biological Oxygen Demand)
- COD, Chemical Oxygen Demand [water, ground-, long-term]: 0.0745 kg; lognormal variance with pedigree 0.552, pedigree (1,1,5,5,1)
  (same comment as for Calcium, ion)
- Nickel, ion [water, ground-, long-term]: 9.55e-7 kg; lognormal variance with pedigree 1.612, pedigree (1,1,5,5,1)
  (same comment as for Calcium, ion)
- Titanium, ion [water, ground-, long-term]: 0.135 kg; lognormal variance with pedigree 0.142, pedigree (1,1,5,5,1)
  (same comment as for Calcium, ion)
- Cadmium [air, urban air close to ground]: 0 kg; pedigree (1,1,1,1,1)
  (same comment as for BOD5, Biological Oxygen Demand)
- Carbon dioxide, fossil [air, urban air close to ground]: 0.000224 kg; lognormal variance with pedigree 0.902, pedigree (1,1,5,5,1)
  (same comment as for BOD5, Biological Oxygen Demand)
- Arsenic, ion [water, surface water]: 6.98e-10 kg; lognormal variance with pedigree 2.292, pedigree (1,1,5,5,1)
  (same comment as for BOD5, Biological Oxygen Demand)
- Particulates, < 2.5 um [air, non-urban air or from high stacks]: 1.28e-7 kg; lognormal variance with pedigree 0.762, pedigree (1,1,5,5,1)
  (same comment as for Cadmium)
- Carbon dioxide, fossil [air, non-urban air or from high stacks]: 0.00672 kg; lognormal variance with pedigree 0.462, pedigree (1,1,5,5,1)
  (same comment as for Cadmium)
- Mercury [water, ground-, long-term]: 8.54e-9 kg; lognormal variance with pedigree 1.962, pedigree (1,1,5,5,1)
  (same comment as for Calcium, ion)
- Cadmium, ion [water, ground-, long-term]: 1.68e-8 kg; lognormal variance with pedigree 1.962, pedigree (1,1,5,5,1)
  (same comment as for Calcium, ion)
- Chromium VI [water, ground-, long-term]: 5.66e-9 kg; lognormal variance with pedigree 8.862, pedigree (1,1,5,5,1)
  (same comment as for Calcium, ion)
- Lead [water, ground-, long-term]: 6.49e-7 kg; lognormal variance with pedigree 1.662, pedigree (1,1,5,5,1)
  (same comment as for Calcium, ion)
- Nickel, ion [water, surface water]: 3.37e-10 kg; lognormal variance with pedigree 2.342, pedigree (1,1,5,5,1)
  (same comment as for BOD5, Biological Oxygen Demand)
- Carbon monoxide, fossil [air, urban air close to ground]: 2.18e-7 kg; lognormal variance with pedigree 0.632, pedigree (1,1,5,5,1)
  (same comment as for BOD5, Biological Oxygen Demand)
- Calcium [air, urban air close to ground]: 2.43e-8 kg; lognormal variance with pedigree 0.802, pedigree (1,1,5,5,1)
  (same comment as for BOD5, Biological Oxygen Demand)
- Mercury [air, urban air close to ground]: 0 kg; pedigree (1,1,1,1,1)
  (same comment as for BOD5, Biological Oxygen Demand)
- TOC, Total Organic Carbon [water, surface water]: 1.25e-5 kg; lognormal variance with pedigree 0.902, pedigree (1,1,5,5,1)
  (same comment as for BOD5, Biological Oxygen Demand)
- Titanium [air, non-urban air or from high stacks]: 1.69e-8 kg; lognormal variance with pedigree 1.962, pedigree (1,1,5,5,1)
  (same comment as for Cadmium)
- Arsenic [air, urban air close to ground]: 2.23e-13 kg; lognormal variance with pedigree 2.342, pedigree (1,1,5,5,1)
  (same comment as for BOD5, Biological Oxygen Demand)
- Arsenic [air, non-urban air or from high stacks]: 1.11e-11 kg; lognormal variance with pedigree 2.852, pedigree (1,1,5,5,1)
  (same comment as for Cadmium)
- Chromium, ion [water, surface water]: 2.23e-13 kg; lognormal variance with pedigree 2.552, pedigree (1,1,5,5,1)
  (same comment as for BOD5, Biological Oxygen Demand)
- Zinc [air, urban air close to ground]: 3.5e-14 kg; lognormal variance with pedigree 2.182, pedigree (1,1,5,5,1)
  (same comment as for BOD5, Biological Oxygen Demand)
- NMVOC, non-methane volatile organic compounds, unspecified origin [air, non-urban air or from high stacks]: 7.2e-9 kg; lognormal variance with pedigree 0.502, pedigree (1,1,5,5,1)
  (same comment as for Cadmium)
- Lead [water, surface water]: 4.21e-12 kg; lognormal variance with pedigree 2.692, pedigree (1,1,5,5,1)
  (same comment as for BOD5, Biological Oxygen Demand)
- TOC, Total Organic Carbon [water, ground-, long-term]: 0.0681 kg; lognormal variance with pedigree 0.552, pedigree (1,1,5,5,1)
  (same comment as for Calcium, ion)
- Silicon [water, ground-, long-term]: 0.00287 kg; lognormal variance with pedigree 4.032, pedigree (1,1,5,5,1)
  (same comment as for Calcium, ion)
- Titanium [air, urban air close to ground]: 3.32e-8 kg; lognormal variance with pedigree 0.922, pedigree (1,1,5,5,1)
  (same comment as for BOD5, Biological Oxygen Demand)
- Cadmium, ion [water, surface water]: 1.51e-11 kg; lognormal variance with pedigree 2.552, pedigree (1,1,5,5,1)
  (same comment as for BOD5, Biological Oxygen Demand)
- Methane, fossil [air, non-urban air or from high stacks]: 0.00103 kg; lognormal variance with pedigree 0.502, pedigree (1,1,5,5,1)
  (same comment as for Cadmium)
- NMVOC, non-methane volatile organic compounds, unspecified origin [air, urban air close to ground]: 2e-9 kg; lognormal variance with pedigree 1.072, pedigree (1,1,5,5,1)
  (same comment as for BOD5, Biological Oxygen Demand)
- Lead [air, non-urban air or from high stacks]: 1.28e-14 kg; lognormal variance with pedigree 3.722, pedigree (1,1,5,5,1)
  (same comment as for Cadmium)
- Lead [air, urban air close to ground]: 1.27e-15 kg; lognormal variance with pedigree 2.752, pedigree (1,1,5,5,1)
  (same comment as for BOD5, Biological Oxygen Demand)
- DOC, Dissolved Organic Carbon [water, surface water]: 1.2e-5 kg; lognormal variance with pedigree 0.902, pedigree (1,1,5,5,1)
  (same comment as for BOD5, Biological Oxygen Demand)
- Chloride [water, surface water]: 0.00218 kg; lognormal variance with pedigree 0.432, pedigree (1,1,5,5,1)
  Emissions from short-term leachate treatment. Uncertainty calculated depending on waste input and uncertainty of transfer coefficents in landfill and wastewater treatment.
- Hydrogen chloride [air, non-urban air or from high stacks]: 3.14e-5 kg; lognormal variance with pedigree 0.962, pedigree (1,1,5,5,1)
  (same comment as for Cadmium)

## Sampling procedure
Landfill model based on observed leachate concentrations in literature. Extrapolated to 60'000 years heeding chemical characteristics. Initial waste composition from various literature sources.

## Extrapolations
This dataset has been copied from an original dataset covering the geography CH. The uncertainty has been adjusted accordingly.

## Review by Emilia Moreno Ruiz 2015-10-21
PV adjusted

## Review by Niels Jungbluth 2003-07-21
Passed. Calculation for standard deviation 95 of, i.e., infrastructure,
land occupation, transport services or other services can differ from
standard Pedigree approach used in this project and figures obtained by
this procedure.
