# polyvinylchloride production, bulk polymerisation

Dataset: EcoSpold 2, unit process
Geography: RER
Time period: 1998-01-01 to 2021-12-31
Technology level: current
Classification: ISIC rev.4 ecoinvent: 2013:Manufacture of plastics and synthetic rubber in primary forms
Classification: EcoSpold01Categories: plastics/polymers
Synonyms: PVC
Tags: ConvertedDataset
Scenario: Business-as-Usual
System model: Allocation, cut-off by classification
Generated by: Roland Hischier
Published in: Hischier R. 2007
Database: ecoinvent
isCopyrightProtected: true
accessRestrictedTo: 1

## General comment
see included processes
[This dataset was already contained in the ecoinvent database version 2. It was not individually updated during the transfer to ecoinvent version 3. Life Cycle Impact Assessment results may still have changed, as they are affected by changes in the supply chain, i.e. in other datasets. This dataset was generated following the ecoinvent quality guidelines for version 2. It may have been subject to central changes described in the ecoinvent version 3 change report (http://www.ecoinvent.org/database/ecoinvent-version-3/reports-of-changes/), and the results of the central updates were reviewed extensively. The changes added e.g. consistent water flows and other information throughout the database. The documentation of this dataset can be found in the ecoinvent reports of version 2, which are still available via the ecoinvent website. The change report linked above covers all central changes that were made during the conversion process.]

## Included activities end
Data represent a mix of the two other types of PVC (suspension, emulsion PVC), according to their production volumes, due to a lack of respective data from PlasticsEurope about bulk PVC.

## Technology
see included processes

## Time period
time to which data refer

## Reference product
- polyvinylchloride, bulk polymerised: 1 kg; By-product classification allocatable product; CPC 34730: Polymers of vinyl chloride or other halogenated olefins, in primary forms; CAS 9002-86-2
  EcoSpold01Location=RER
  production volume 1.32237 kg
    This is a placeholder value that does not reflect real-world production volumes. This dataset does not currently require a real-world production volume to work in the database framework, and no actual data were collected yet. This has no negative effect on the results of the ecoinvent database. The placeholder value of this activity was scaled according to the nominal GDP of 2005 (source: United Nations, http://data.un.org/Glossary.aspx?q=GDP+%28current+US%24%29, accessed 20130726) to reflect an appropriate share of the global production volume, which is also a placeholder value.
  property price 1.29 EUR2005
    Calculated based on inputs: The price of the product has been calculated as a sum of the values of the material and energy inputs for this product. This value is therefore a rough estimation. It may underestimate the real price since there are additional expenses when producing any product. These expences can include for example labour costs, treatment of waste materials and profit for the producer. Please consider carefully whether this level of data quality is acceptable for your application.
  property carbon content, fossil 0.387097
    Monomer is vynyl chloride, C2H3Cl (ecoinvent v2.2 report 11_II). MW=62 g/mol
  property carbon content 0.387097
    carbon content on a dry matter basis (reserved; not for manual entry)
  properties: heating value, net 21.5 MJ, water content 0, carbon content, non-fossil 0, wet mass 1 kg, dry mass 1 kg, water in wet mass 0 kg, carbon allocation 0.387097 kg

## Inputs from technosphere
- polyvinylchloride, suspension polymerised: 0.87234 kg; lognormal variance with pedigree 0.0506, pedigree (2,1,5,1,1)
  European distribution to the different PVC types
  EcoSpold01Location=RER
  Uncertainty: European distribution to the different PVC types
  properties: dry mass 1 kg, wet mass 1 kg, heating value, net 21.5 MJ, carbon content, fossil 0.387097
  note on carbon content, fossil: Monomer is vynyl chloride, C2H3Cl (ecoinvent v2.2 report 11_II). MW=62 g/mol
- polyvinylchloride, emulsion polymerised: 0.12766 kg; lognormal variance with pedigree 0.0506, pedigree (2,1,5,1,1)
  (same comment as for polyvinylchloride, suspension polymerised)
  properties: carbon content, fossil 0.387097, dry mass 1 kg, wet mass 1 kg, heating value, net 21.5 MJ

## Extrapolations
This dataset has been extrapolated from year 2001 to the year of the calculation (2021). The uncertainty has been adjusted accordingly.

## Review by Jürgen Sutter 2009-02-06
passed.
