# refrigeration machine production, carbon dioxide, liquid as refrigerant

Dataset: EcoSpold 2, unit process
Geography: GLO
Time period: 2010-01-01 to 2021-12-31
Technology level: modern
Classification: ISIC rev.4 ecoinvent: 2920:Manufacture of bodies (coachwork) for motor vehicles; manufacture of traile
Synonyms: reefer machine
Scenario: Business-as-Usual
System model: Allocation, cut-off by classification
Generated by: Tereza Levova
Database: ecoinvent
isCopyrightProtected: true
accessRestrictedTo: 1

## General comment
This dataset represents production of refrigeration machine which is later on build into reefer (refrigerated container).
Refrigeration machine, Star Cool (Source: Maersk Container Industry, 2014, http://www.mcicontainers.com/products/reefermachines/pages/starcoolpictureframeunit.aspx, accessed 20141022).
This refrigeration machine is an electric powered integrated cooling and heating system operating on refrigerant R134a. The system is designed to maintain cargo temperatures in a range from -30°C to +30°C. The system is designed to operate in ambient temperatures from -30°C to +50°C.

## Included activities start
The activity starts when all the individual parts are brought to the assembly hall for assembling.

## Included activities end
The activity ends when the refrigeration machine is ready to be inserted into the reefer (refrigerated container).

## Technology
The dataset is primarily build based on information on Star Cool refrigeration machine model SCI-40.
The system consists of following modules; condenser (compressor module), evaporator module and evaporator fan module. The cooling system is also equiped with a two-stage compressor, electrically driven through a frequency converter.

The cooling system is also equipped with an economizer, which performs the task of sub-cooling the liquid from the receiver to the evaporator, thereby increasing the cooling capacity of the cooling system.

The evaporators are controlled by electronically expansion valves. The equipment is designed to operate on a nominal 410 V AC / 450 V AC, 3 phase, 50/60 Hz, primary power source, according to ISO 1496-2. An integrated dual wound transformer supplies control circuit voltage. An automatic system, power supply sensing and correction, is provided to ensure the correct direction of rotation for the fan motors. This is done regardless of the incoming phase sequence from the primary power supply, provided that all fan motors are wired correctly.
The most used refrigerant in these refrigeration machines is the R134a. Since this refrigerant has a high global warming potential the refrigeration technology producers started producing referigeration machines with alternative refrigerants (Carrier, 2014, http://dms.hvacpartners.com//docs/2000/Public/0D/62-11665.pdf, accessed 20141105). One of them is liquid carbon dioxide.
Further references:
- Restrepo, G., 2007, Ranking of refrigerants, Environmental Science and Technology
- Bovea, M.D., 2007, Comparative Life Cycle Assessment of Commonly Used Refrigerants in Commercial Refrigeration Systems

## Parameters
- density of polyurethane foam insulation_front wall: 50 kg/m3; name density_insulation_front_wall; lognormal variance with pedigree 0.0106, pedigree (4,4,1,1,1)
  Literature data (Mearsk Container Industry, 2012, Technical Specifications for 40'x8'x9'6'' refrigerated container with integrated star cool machine, http://www1.cma-cgm.com/mnr/page/DocAndProg/Spec%20for%20TAL%2040'hc%20SCIF%20x%201,000%20boxes(provisional%20CA).pdf, accessed 20141016).
- thickness of glass fibre reinforced polypropylene liner: 1.89692 mm; name thickness_liner; lognormal variance with pedigree 0.0032, pedigree (3,3,1,1,1)
  Literature data (http://ipaper.ipapercms.dk/MCI/Brochures/Qliner/, accessed 20141016).
- thickness of insulation_front wall: 65 mm; name thickness_insulation_front_wall; lognormal variance with pedigree 0.0018, pedigree (2,3,1,1,1)
  (same comment as for density of polyurethane foam insulation_front wall)
- density of glass fibre reinforced polypropylene: 1050 kg/m3; name density_GFP_polypropylene; lognormal variance with pedigree 0.0032, pedigree (3,3,1,1,1)
  Literature value (http://cdn.intechopen.com/pdfs-wm/34071.pdf, accessed 20141016). The filler content is assumed to be 20%.

## Reference product
- refrigeration machine, carbon dioxide, liquid as refrigerant: 1 unit; name refrigeration_machine_RP; By-product classification allocatable product; CPC 43913: Refrigerating and freezing equipment and heat pumps, except household type equipment
  production volume 52200 unit; name RP_PV_1; = 45000+(1200000*0.2*0.3*0.1)
    Calculated based on literature value.
    This type of refrigeration machine can be used in reefers as well as different type of lorries.
    There are 40500 reefers produced/year using R134a as refrigerant and using this size of refrigeration unit.
    1200000 units of trucks in operation world wide in 2002 (IPCC/TEAP Special Report: Safeguarding the Ozone Layer and the Global Climate System).
    It is estimated, that 20% of this amount is renewed every year. It is estimated, that 30% of them use refrigeration machine of this size.
    It is estimated, that 90% of those trucks use R134a as refrigerant and 10% use carbon dioxide, liquid as refrigerant.
  property price 15000 EUR2005; name refrigeration_machine_RP_price_EUR2005
    Estimated price based on prices offered online (alibaba and ebay). The price calculated based on the amount of the materials entering the production is 550 Euro. The price of 550 EURO is assumed to be heavily underestimated, since not all the products entering the production of the container have price in the database.
  property height, external 2.235 m; name height_machine
    Literature value.
  property width, external 2.025 m; name width_machine
    Literature value.
  property lifetime 10 year; name refrigeration_machine_RP_lifetime_1
    Estimated to be the same as in case of the reefer container.
  property weight 380 kg; name weight_machine
    Literature value.
  property lifetime capacity [unit] 1 unit; name refrigeration_machine_lifetime_capacity
    Estimated value. One refrigeration machine is meant to be used by one reefer container in its lifetime.
  property length, external 0.42 m; name length_machine
    Literature value.

## Inputs from technosphere
- aluminium, wrought alloy: 116.238 kg; name aluminium_in; = weight_machine- weight_compressor- steel_in- PP_in-copper_in- polyamide_in- control_unit_in-( cable_in* cable_DM)- PUR_foam_input; source Maersk Container Industry 2013; lognormal variance with pedigree 0.0186, pedigree (4,5,3,1,1)
  Calculated based on estimates and literature.
  Aluminium is in the refrigerated machine used foe many parts. It is used in the evaporator and condenser coils; the fins are made of aluminium. In the evaporator fan module; the cover for the fans.
  property bulk density 2700 kg/m3; name aluminium_wrought_density
  properties: wet mass 1 kg, dry mass 1 kg
  note on bulk density: Literature data. The aluminium used for the floor in the reefer is aluminium 6082 t6 (Mearsk Container Industry, 2012, Technical Specifications for 40'x8'x9'6'' refrigerated container with integrated star cool machine, http://www1.cma-cgm.com/mnr/page/DocAndProg/Spec%20for%20TAL%2040'hc%20SCIF%20x%201,000%20boxes(provisional%20CA).pdf, accessed 20141016) which has density 2700 kg/m3 (http://www.aalco.co.uk/datasheets/Aluminium-Alloy-6082-T6T651-Plate_148.ashx, accessed 20141017).
- used refrigeration machine, carbon dioxide, liquid as refrigerant: -1 unit; name BP_amount_1; = (refrigeration_machine_RP)*-1; lognormal variance with pedigree 0.0026, pedigree (1,1,3,1,1)
  Calculated value.
  production volume 52200 unit; = RP_PV_1 * (BP_amount_1 / refrigeration_machine_RP)
    Calculated from production volume of reference product using the relative outputs.
  property price 0 EUR2005; name BP_amount_1_price_EUR2005
  properties: carbon content, fossil 0.105105, wet mass 380 kg, carbon content, non-fossil 5.26316e-6, dry mass 380 kg
- welding, arc, steel: 8.52 m; = width_machine*2+ height_machine*2; lognormal variance with pedigree 0.0052, pedigree (3,3,3,1,1)
  Calculated value.
- copper, cathode: 6.4849 kg; name copper_in; = (12*0.253* width_machine)+(4*0.1685*0.5); source Maersk Container Industry 2013; lognormal variance with pedigree 0.0186, pedigree (4,5,3,1,1)
  Calculated based on assumptions.
  Copper is used in the refrigerated machine as a part of evaporator coil module and condenser coil module. The tubes are made of copper.
  6*2=12 is the number of copper coils present in the evaporator coil module.
  0.253 kg is the weight of 1m of copper coil with diameter of 10mm and wall thickness of 1mm (http://www.copper-tubes.net/soft.html, accessed 20141022).
  4 is the number of rows of copper coils present in the condenser coil module
  0.1685 kg is the weight of 1m of copper coil with diameter of 7mm and wall thickness of 1mm (calculated based on http://www.copper-tubes.net/soft.html, accessed 20141022).
  properties: dry mass 1 kg, wet mass 1 kg
- polyurethane, rigid foam: 0 kg; name PUR_foam_input; source Maersk Container Industry 2013; pedigree (1,1,1,1,1)
  Calculated value. The rear bulkhead of the refrigeration machine is covered by polyurethane insulation foam.
  properties: heating value, net 30.67 MJ, carbon content, fossil 0.69089, dry mass 1 kg, wet mass 1 kg
- metal working, average for steel product manufacturing: 142.284 kg; = steel_in; lognormal variance with pedigree 0.0186, pedigree (4,5,3,1,1)
  Calculated value. The amount of steel needed is calculated as a difference between known weight of the whole refrigerated machine and all the individual parts.
- cable, three-conductor cable: 18 m; name cable_in; source Maersk Container Industry 2013; lognormal variance with pedigree 0.0052, pedigree (3,3,3,1,1)
  Literature value.
  property dry mass 1.04 kg; name cable_DM
  properties: carbon content, fossil 0.451335, wet mass 1.04 kg
  note on carbon content, fossil: Calculated as the addition of C contents in the product composition. Then referred to 1 kg DM
- metal working, average for aluminium product manufacturing: 116.238 kg; = aluminium_in; lognormal variance with pedigree 0.0052, pedigree (3,3,3,1,1)
  Calculated value.
- steel, low-alloyed, hot rolled: 142.284 kg; name steel_in; = 16.7*( width_machine*2+ height_machine*2); lognormal variance with pedigree 0.0186, pedigree (4,5,3,1,1)
  Calculated value.
  16.7 kg/m is the weight of HE 100A I beam (height 96mm)
  Following parts of the refrigeration machine are also made from steel;
  - receiver of capacity 6.2l is made from stainelss steel.
  - economiser
  - evaporator fan motor
  - condenser fan motor
  - evaporator coil heaters
  properties: carbon content, fossil 0.005, dry mass 1 kg, wet mass 1 kg
  note on carbon content, fossil: Low alloyed steel composition given in Tab. 3.2 ecoinvent v2.2 report 10_partII. Steel assumed to have a C content of 0.5%
- electronics, for control units: 15 kg; name control_unit_in; lognormal variance with pedigree 0.0186, pedigree (4,5,3,1,1)
  Estimated based on picture.
  properties: carbon content, non-fossil 0.00013442, wet mass 1 kg, dry mass 1 kg, carbon content, fossil 0.337146
  note on carbon content, non-fossil: The control unit has a composition of 46% steel (housing), 32% plastics, 14% printed wiring boards and 8% cables (various types).;
- air compressor, screw-type compressor, 4kW: 0.414286 unit; = (58/140); source Maersk Container Industry 2013; lognormal variance with pedigree 0.0186, pedigree (4,5,3,1,1)
  Calculated value.
  The weight od the air compressor present in the database is 140kg. The weight of the compressor needed for the refrigeration unit is 58kg. The amount of the exchange needed is scaled accordingly.
  The original Star Cool refrigeration machine the compressor's description:
  Make; Bitzer
  Type: Semi – hermetic two-stage reciprocating.
  Number of cylinders: 2 Low stages cylinders, 2 High stage cylinders.
  Speed: Variable in interval from 20 Hz – 110 Hz controlled by the frequency converter.
  Model: S4BCF – 5.2Y
  Nominal power: 5.5 kW
  Compressor oil type: Reniso Triton SEZ 55 or equivalent
  Compressor housing: Seawater resistant aluminium, unpainted.
  Displacement: 42 m3/h @ 110 Hz
  Weight: 58 Kg
  property weight 58 kg; name weight_compressor
- building, hall: 0.00495986 m2; = 1/((lifetime_building*365)/( width_machine* height_machine*20)); lognormal variance with pedigree 0.0186, pedigree (4,5,3,1,1)
  Calculated value based on estimates.
  1m2 of hall is available every day for 50 years
  1 refrigeration machine occupies the area of its base for the period of 20 days
  property lifetime 50 year; name lifetime_building
- polypropylene, granulate: 8.56408 kg; name PP_in; = ((width_machine* height_machine)*(thickness_liner/1000)* density_GFP_polypropylene*0.95)+(((POWER((0.440/2),2))*3.1416)*0.002); source Maersk Container Industry 2013; lognormal variance with pedigree 0.0186, pedigree (4,5,3,1,1)
  Calcualetd value.
  The rear bulkhead of the refrigeration machine is covered by polypropylene fibre reinforced thermoplastic. Since this product is not available in the database ordinary polypropylene is used instead.
  The condenser fan is made of glass fibre reinforced polypropylene.
  440mm is the diameter of the fan
  2mm is the thickness of the blades
  properties: carbon content, fossil 0.857143, dry mass 1 kg, wet mass 1 kg, heating value, net 32.78 MJ
  note on heating value, net: Value extracted from "treatment of waste polypropylene, open burning"
- carbon dioxide, liquid: 0 kg; source Maersk Container Industry 2013; pedigree (1,1,1,1,1)
  Literature value.
  properties: carbon content, fossil 0.272727, heating value, net 8.27 MJ, wet mass 1 kg, dry mass 1 kg
- glass fibre reinforced plastic, polyamide, injection moulded: 0.000311725 kg; name polyamide_in; = ((POWER((0.315/2),2))*3.1416)*0.002*2; source Maersk Container Industry 2013; lognormal variance with pedigree 0.0186, pedigree (4,5,3,1,1)
  Calculated value based on literature.
  The two evaporater fans which are part of the evaporator fan module are made of polyamide, glass reinforced.
  315mm is the diameter of a fan
  2mm is the estimated thickness of the blades.
  properties: wet mass 1 kg, carbon content, fossil 0.446018, dry mass 1 kg
- zinc coat, pieces: 18.1035 m2; = width_machine* height_machine*4; lognormal variance with pedigree 0.0052, pedigree (3,3,3,1,1)
  Calcualted value. It is assumed, that majority of the steel and aluminium surfaces are coated.
- maintenance, refrigeration machine: 1 unit; lognormal variance with pedigree 0.0026, pedigree (1,1,3,1,1)
  Calculated value.
- polyurethane, rigid foam: 4.86271, 9.84638 kg (2 entries); source Maersk Container Industry 2013; lognormal variance with pedigree 0.0052, pedigree (3,3,3,1,1)
  (same comment as for polyurethane, rigid foam)
- carbon dioxide, liquid: 0.782537, 3.71746 kg (2 entries); source Maersk Container Industry 2013; lognormal variance with pedigree 0.0186, pedigree (4,5,3,1,1)
  Literature value.

## Extrapolations
This dataset has been extrapolated from year 2014 to the year of the calculation (2021). The uncertainty has been adjusted accordingly.
