# maintenance, intermodal shipping container, 20-foot

Dataset: EcoSpold 2, unit process
Geography: GLO
Time period: 2010-01-01 to 2021-12-31
Technology level: current
Classification: ISIC rev.4 ecoinvent: 3315:Repair of transport equipment, except motor vehicles
Classification: EcoSpold01Categories: transport systems/train
Scenario: Business-as-Usual
System model: Allocation, cut-off by classification
Generated by: Tereza Levova
Database: ecoinvent
isCopyrightProtected: true
accessRestrictedTo: 1

## General comment
This dataset describe materials needed for the maintenance of intermodal shipping container during its lifetime.
The data on container maintenance are scarce and vary a lot. The data in this dataset are calculated based on estimates or estimated, thus the uncertainty is rather high.
The container's lifetime is quite short. Once the structural strength cannot be ensured anymore the container is being disposed of. That is why the amounts of materials for the maintenance are not very high. Even though the container cannot fulfil its original purpose anymore (since its strength cannot be guaranteed) it is usually generally in good condition. That is why there are many projects which try to come up with a way of reusing the old shipping containers.
The amount of maintenance might vary depending on what kind of cargo is being transported and how often is the container being used.

## Included activities start
The activity starts with different materials and services needed for the maintenance of the container enter the activity.

## Parameters
- lifetime: 15 year; name lifetime_container; lognormal variance with pedigree 0.0006, pedigree (1,1,1,1,1)
  Industrial data.
- thickness of metal sheet_01: 1.4 mm; name thickness_walls; lognormal variance with pedigree 0.0026, pedigree (1,4,1,1,1)
  Industrial data.
- fraction, process water, to air: 0.15 dimensionless; name fraction_PW_to_air; lognormal variance with pedigree 0.0166, pedigree (4,5,1,1,1)
  Estimated.
- density: 7800 kg/m3; name density_corrugated_steel_wall; lognormal variance with pedigree 0.0032, pedigree (3,3,1,1,1)
  Estimated. The density of steel, low-alloyed used for the corrugated steel walls of the container.

## Reference product
- maintenance, intermodal shipping container, 20-foot: 1 unit; name maintenance_RP; CPC 87149: Maintenance and repair services of other transport equipment; By-product classification allocatable product
  production volume 8.883e6 unit; name maintenance_RP_PV; = (32.9*1000000*0.27)/1
    Calculated value.
    32.9 million TEU (Twenty-foot Equivalent unit) is the capacity of shipping containers in the world (World Shipping Council, http://www.worldshipping.org/about-the-industry/containers/global-container-fleet, accessed 20141014).
    Out of that 27% is 20-food containers (Containerization International Market Analysis, World Container Census 2008, http://people.hofstra.edu/geotrans/eng/ch3en/conc3en/containerfleet.html, accessed 20141014).
    1 TEU is the cargo capacity of the 20-foot container.
  property price 139.715 EUR2005; name maintenance_RP_price_EUR2005
    Calculated based on inputs: The price of the product has been calculated as a sum of the values of the material and energy inputs for this product. This value is therefore a rough estimation. It may underestimate the real price since there are additional expenses when producing any product. These expences can include for example labour costs, treatment of waste materials and profit for the producer. Please consider carefully whether this level of data quality is acceptable for your application.

## By-products
- waste wood, post-consumer: 0 kg; CPC 3928: Sawdust and wood waste and scrap; By-product classification Recyclable; pedigree (1,1,1,1,1)
  Calculated value.
  production volume 0 kg; = BP_amount_3/ maintenance_RP* maintenance_RP_PV
    Calculated from production volume of reference product using the relative outputs.
  property heating value, net 9.99 MJ
    LHV is calculated based on the Carbon content of the product. More details can be found on the respective documentation.
  property price 0.079 EUR2005
    Temporary price data. Calculated as 90% of purchasers price based on: 2005 import prices (total trades (USD) divided by total weight (kg) in biggest economies of the world: EU27, USA, Brasil, China, India, Japan and Russia) from UN Commodity Trade Statistics Database (http://data.un.org/Explorer.aspxDatabase [Accessed 2011.06.23]). Commodity: Sawdust, wood waste or scrap
  property carbon content 0.494
    carbon content on a dry matter basis (reserved; not for manual entry)
  properties: carbon content, non-fossil 0.494, water in wet mass 0.4 kg, water content 0.4, carbon content, fossil 0, dry mass 1 kg, wet mass 1.4 kg, carbon allocation 0.494 kg

## Inputs from technosphere
- wastewater, unpolluted: 0 m3; name BP_amount_1; pedigree (1,1,1,1,1)
  Calculated value.
  production volume 0 m3
    Calculated from production volume of reference product using the relative outputs.
  property price 0 EUR2005; name BP_amount_1_price_EUR2005
  properties: water content 2962.17, dry mass 0.337476 kg, carbon content, fossil 0.00178991, carbon content, non-fossil 0.00178991, wet mass 1000 kg
  note on carbon content, fossil: Assumed to be like in tap water. Bicarbonate content is 2.93 mol/m3. CO2 content is 0.1 mol/m3 (ecoinvent v2.2 report 8, Tab 93.1).
- tap water: 3375 kg; name tap_water_in; = 3*75* lifetime_container; lognormal variance with pedigree 0.0186, pedigree (4,5,3,1,1)
  Estimated value.
  It is estimated, that the container is being cleaned 3 times a year using 75 litres of water.
  properties: wet mass 1 kg, dry mass 0.000337476 kg, carbon content, fossil 0.00178991, water content 2962.17
  note on carbon content, fossil: Bicarbonate content is 2.93 mol/m3. CO2 content is 0.1 mol/m3 (ecoinvent v2.2 report 8, Tab 93.1).
- building, hall: 0.00161856 m2; = 1/(( lifetime_building*365)/(6.058*2.438*2)); lognormal variance with pedigree 0.318, pedigree (4,5,3,1,1)
  Calculated value based on estimates.
  1m2 of hall is available every day for 50 years
  1 container occupies the area of its based for the period of 2 days once a year for maintenance
  property lifetime 50 year; name lifetime_building
- metal working, average for steel product manufacturing: 16.38 kg; name metal_working_average_for_amount_1; = steel_in; lognormal variance with pedigree 0.0186, pedigree (4,5,3,1,1)
  Calculated value.
- steel, low-alloyed, hot rolled: 16.38 kg; name steel_in; = 1.5*(thickness_walls/1000)*density_corrugated_steel_wall; lognormal variance with pedigree 0.0186, pedigree (4,5,3,1,1)
  Estimated value.
  It is estimated, that approximately 1.5m2 of corrugated steel with a thickness of 1.4mm is being used during the lifetime of a container to fix small cracks.
  properties: wet mass 1 kg, dry mass 1 kg, carbon content, fossil 0.005
  note on carbon content, fossil: Low alloyed steel composition given in Tab. 3.2 ecoinvent v2.2 report 10_partII. Steel assumed to have a C content of 0.5%
- waste rubber, unspecified: 0 kg; name BP_amount_2; pedigree (1,1,1,1,1)
  Calculated value.
  production volume 0 kg
    Calculated from production volume of reference product using the relative outputs.
  property price 0 EUR2005; name BP_amount_2_price_EUR2005
  properties: dry mass 1 kg, carbon content, fossil 0.853, wet mass 1 kg, heating value, net 27.19 MJ
  note on heating value, net: Value taken from the general comment of the treatment dataset.
- waste mineral oil: 0 kg; name oil_out; pedigree (1,1,1,1,1)
  production volume 0 kg
    Calculated from production volume of reference product using the relative outputs.
  property price 0 EUR2005; name oil_out_price_EUR2005
  properties: heating value, net 34.7 MJ, dry mass 0.9 kg, water content 0.111111, wet mass 1 kg, carbon content, fossil 0.864444
  note on carbon content, fossil: Tab A.6, ecoinvent v2.2 report 13_I. C content has been calculated after data in the tables, and then referred to 1 kg DM
- scrap steel: 0 kg; name steel_out; pedigree (1,1,1,1,1)
  Calculated value.
  production volume 0 kg
    Calculated from production volume of reference product using the relative outputs.
  property price 0 EUR2005; name steel_out_price_EUR2005
  properties: dry mass 1 kg, wet mass 1 kg
- plywood: 0 m3; name plywood_in; pedigree (1,1,1,1,1)
  Estimated value. It is estimated, that 20% of the plywood used for floor of the container is exchanged during the lifetime of the container.
  property dry mass 768.6 kg; name plywood_DM
  properties: heating value, net 11688.9 MJ, carbon content, non-fossil 0.409818, price 400 EUR2005, water content 0.070778, carbon content, fossil 0.09783, wet mass 823 kg
- synthetic rubber: 5.48967 kg; name rubber_in; lognormal variance with pedigree 0.0186, pedigree (4,5,3,1,1)
  Estimated value.
  It is estimated, that the rubber used for the seal gasket is exchanged at least once during the lifetime of the container.
  properties: carbon content, fossil 0.871949, wet mass 1 kg, dry mass 1 kg, heating value, net 26.42 MJ
  note on carbon content, fossil: EPDM (Ethylene-propene-diene terpolymer) rubber is a terpolymer of ethylene, propene, and a diene with the residual unsaturated portion of the diene in the side chain (ecoinvent v2.2 report 7-part XX & Ullmann). Chemical formula (deduced from Evidences of Solvent-Induced Miscibility in Polychloroprene-co-Ethylene-Propene Diene Terpolymer Blends, Dubey et al., Journal of Applied Polymer Science, 2009, 111:1884–1891): C20H35
- lubricating oil: 0 kg; name oil_in; pedigree (1,1,1,1,1)
  Estimated value.
  It is estimated, that the hinges of the container are being treated with oil (1kg) twice a year.
  properties: wet mass 1 kg, dry mass 1 kg, carbon content, fossil 0.75, heating value, net 40.2 MJ
  note on carbon content, fossil: Lubricating oil is produced from diesel. C-content/dry mass of fats and oils considered 75%, from: ecoinvent v2.2 report, n 15a, pg 40
  note on heating value, net: Literature value, Source: IPCC 2006, 2006 IPCC Guidelines for National Greenhouse Gas Inventories, Prepared by the National Greenhouse Gas Inventories Programme, Eggleston H.S., Buendia L., Miwa K., Ngara T. and Tanabe K. (eds). Published: IGES, Japan
- waste wood, post-consumer: -57.8049 kg; lognormal variance with pedigree 0.0026, pedigree (1,1,3,1,1)
  Calculated value.
  production volume 5.13481e8 kg
  properties: heating value, net 9.99 MJ, carbon content, non-fossil 0.494, price 0.079 EUR2005, water content 0.4, dry mass 1 kg, wet mass 1.4 kg
- wastewater, unpolluted: -0.02295, -2.8458 m3 (2 entries); lognormal variance with pedigree 0.0186, pedigree (4,5,3,1,1)
  Calculated value.
  production volume 2.54831e7 m3
- waste rubber, unspecified: -2.6884, -0.112859, -2.6884 kg (3 entries); lognormal variance with pedigree 0.0186, pedigree (4,5,3,1,1)
  Calculated value.
  production volume 4.87647e7 kg
- waste mineral oil: -7.41126, -0.183473, -19.4053 kg (3 entries); lognormal variance with pedigree 0.0186, pedigree (4,5,3,1,1)
  production volume 2.39841e8 kg
- scrap steel: -3.98845, -0.00505323, -12.3865 kg (3 entries); lognormal variance with pedigree 0.0186, pedigree (4,5,3,1,1)
  Calculated value.
  production volume 1.45504e8 kg
- plywood: 0.0033851, 0.0718229 m3 (2 entries); lognormal variance with pedigree 0.0038, pedigree (2,3,3,1,1)
  (same comment as for plywood)
  properties: heating value, net 11688.9 MJ, dry mass 768.6 kg, carbon content, non-fossil 0.409818, price 400 EUR2005, water content 0.070778, carbon content, fossil 0.09783, wet mass 823 kg
- lubricating oil: 5.22, 24.78 kg (2 entries); lognormal variance with pedigree 0.0186, pedigree (4,5,3,1,1)
  (same comment as for lubricating oil)

## Emissions to nature
- Water [air, unspecified]: 0.50625 m3; name water_to_air; = (tap_water_in* fraction_PW_to_air)/1000; lognormal variance with pedigree 0.0186, pedigree (4,5,3,1,1)
  Calculated value.
- Oils, unspecified [soil, unspecified]: 3 kg; name oil_into_soil; = oil_in*0.1; lognormal variance with pedigree 0.0186, pedigree (4,5,3,1,1)
  Estimated value.

## Extrapolations
This dataset has been extrapolated from year 2014 to the year of the calculation (2021). The uncertainty has been adjusted accordingly.
