# natural gas production

Dataset: EcoSpold 2, unit process
Geography: CA-AB
Time period: 2010-01-01 to 2021-12-31
Technology level: current
Classification: ISIC rev.4 ecoinvent: 0620:Extraction of natural gas
Classification: EcoSpold01Categories: natural gas/production
Scenario: Business-as-Usual
System model: Allocation, cut-off by classification
Generated by: Pablo Tirado
Published in: Canadian Association of Petroleum Produc 2004
Database: ecoinvent
isCopyrightProtected: true
accessRestrictedTo: 1

## General comment
This dataset represents the production of natural gas on-shore in Alberta (Canada) in 2010.
Some flows have been adapted using local data, namely, the emissions to air of greenhouse gases (CO2, CH4, N2O), the criteria air contaminants (PM2.5, CO, non-methane VOC, NOx, SO2) and the hydrogen sulfide.
Local data have also been used for the percentage of sour and sweet gas and the quantities of flared, vented and burned in turbine gas, quantity of sulfur extracted by sweetening and production volumes.
Sweetening and drying processes have been included in the process.Sulfur production associated with the desulfurisation process has been included.The sweetening process, included in the dataset, delivers sweet gas (natural gas, propane), sulfur and other gases (ethene, butane, pentane).
This dataset is an adaptation of the dataset describing the average extraction onshore in Germany in 1996-2000 period and the drying and sweetening datasets from the ecoinvent 2.0 database.
[This is a dataset transferred from ecoSpold v1 / ecoinvent database version 2. It may not in all aspects fulfill the requirements of the ecoinvent data quality guideline for version 3.]

## Included activities start
The activity starts with the exploration and drilling of the wells

## Included activities end
The activity ends at the gate of the processing plant.
It includes all the fuels and emissions related to well testing, exploration, extraction and treatment (sweetening and drying): fugitive emissions, flaring, venting, use of gas in turbines.

## Geography
Canadian data completed with german data. The uncertainty has been adjusted accordingly.

## Technology
Canadian data completed with german data. The uncertainty has been adjusted accordingly. Data used in original data contains no information on technology.

## Time period
Canadian data completed with german data. The uncertainty has been adjusted accordingly.

Figures are an average of the past five years (1996-2000). Emissions per m3 were stable.

## Parameters
- quantity of flared sour gas: 0.00349 m3; name flaredSour; lognormal variance with pedigree 0.0012, pedigree (2,1,1,1,1)
  Measured value. Quantity of flared sour gas per m3 of natural gas produced. Average for the 2006-2010 period.
  Source: Energy Resources Conservation Board
- quantity of vented sour gas: 0.00261 m3; name ventedSour; lognormal variance with pedigree 0.0012, pedigree (2,1,1,1,1)
  Measured value. Quantity of vented sour pas per m3 of natural gas produced. Average for the 2006-2010 period.
  Source: Energy Resources Conservation Board
- total production: 1.47e11 m3; name totalProduction; lognormal variance with pedigree 0.0012, pedigree (2,1,1,1,1)
  Measured value. Average for the 2006-2010 period. This amount includes the associated and non-associated production.
  Source: Energy Resources Conservation Board
- quantity of sour gas burned in turbines: 0.0748 m3; name turbineBurnedSour; lognormal variance with pedigree 0.0012, pedigree (2,1,1,1,1)
  Measured value. Quantity of sour gas burned in turbines used for natural gas extraction and treatment per m3 of natural gas produced. Average for the 2006-2010 period.
  Source: Energy Resources Conservation Board
- losses of natural gas: 0.0012 m3; name lossesNatGas
- quantity of vented sweet gas: 6.15e-6 m3; name ventedSweet; lognormal variance with pedigree 0.0012, pedigree (2,1,1,1,1)
  Measured value. Quantity of vented sweet gas per m3 of natural gas produced. Average for the 2006-2010 period.
  Source: Energy Resources Conservation Board
- quantity of flared sweet gas: 0.000114 m3; name flaredSweet; lognormal variance with pedigree 0.0012, pedigree (2,1,1,1,1)
  Measured value. Quantity of flared sweet gas per m3 of natural gas produced. Average for the 2006-2010 period.
  Source: Energy Resources Conservation Board
- quantity of sweet gas burned in turbines: 0.0477 m3; name turbineBurnedSweet; lognormal variance with pedigree 0.0012, pedigree (2,1,1,1,1)
  Measured value. Quantity of sweet gas burned in turbines used for natural gas extraction and treatment per m3 of natural gas produced. Average for the 2006-2010 period.
  Source: Energy Resources Conservation Board

## Reference product
- natural gas, high pressure: 0 m3; name naturalGas; CPC 12020: Natural gas, liquefied or in the gaseous state; By-product classification allocatable product; CAS 14493-06-2
  EcoSpold01Location=DE
  production volume 7.72877e10 m3; name annualProduction; = 156.049499999999*10^9*0.7*0.73*37.8/39
    m3 of NG produced in Canada in 2012, according to BP (2014) 156.0495E9 m3. It is estimated that 70% of Canadian production is located in Alberta and that 27% is associated with petroleum production. Value converted from BP LHV (1 cubic meter natural gas in (BP, 2014) corresponds to 0.9 kg oil equivalent. 1 kg oil equivalent corresponds to 42 MJ) to ecoinvent standard LHV of 39MJ/m3. (The source does not specify if the cubic meters are standard or norm cubic meters. See 2015, Faist Emmenegger, Mireille, Del Duce, Andrea; Zah, Rainer, Update and extension of the inventory data for energy gases, 3 - SeparatePublication.)Refrence(s): BP (2014). Statistical Review of World Energy, June 2014. Retrieved online from http://www.bp.com/content/dam/bp/excel/energy-economics/statistical-review-2015/bp-statistical-review-of-world-energy-2015-workbook.xlsx, 30 August, 2017
  property water in wet mass 0 kg; name naturalGas_WWM
  property carbon content, non-fossil 0; name naturalGas_C_content_non_fossil
    biogene carbon content on a dry matter basis
  property dry mass 0.84 kg; name naturalGas_DM
  property water content 0; name naturalGas_water_content
  property wet mass 0.84 kg; name naturalGas_WM
  property density 0 kg/l; name density
  property price 0.166 EUR2005; name naturalGas_price_EUR2005
    Temporary price data. Calculated as 90% of purchasers price based on: 2005 price for Europe-27 Import (US$ and kg) in UN Commodity Trade Statistics Database - Natural gas in gaseous state (http://data.un.org/Data.aspx?q=natural+gas&d=ComTrade&f=_l1Code%3a28%3bcmdCode%3a271121; accessed 4 January 2011), using density of natural gas of 0.8 kg/m3 for unit conversion.
  property carbon content, fossil 0.602381; name naturalGas_C_content_fossil
    fossil carbon content on a dry matter basis
  property heating value, net 39 MJ
    Literature value, Source: United Nations Statistics Division (2018) International Recommendations for Energy Statistics (IRES). Available at: http://unstats.un.org/unsd/statcom/doc11/BG-IRES.pdf.
  property carbon content 0.602381
    carbon content on a dry matter basis (reserved; not for manual entry)
  property true value 0.166; name naturalGas_true_value
    allocation property applied in "true value" allocation // value calculated from revenue
  properties: carbon allocation 0.506 kg
- sulfur: 1 kg; = totalSulfur/ annualProduction; CPC 34520: Sulphur, except sublimed sulphur, precipitated sulphur and colloidal sulphur; By-product classification allocatable product; CAS 7704-34-9; pedigree (1,1,1,1,1)
  Calculated from annual production volume of natural gas produced and total sulfur produced
  production volume 2.6134e9 kg; name totalSulfur; = 3580000000* (percSour*percNonAssociated)/(percSour* percAssociated+percSour*percNonAssociated)
    Calculated value. Total produced sulfur as by-product of natural gas in Alberta in 2009 ( (3580000000 kg) multiplied by the percentage of the total sour gas produced in non associated production
  property price 0.0551778 EUR2005
    Price calculated based on price of elemental sulfur (f.o.b. mine or plant) reported in the USGS Minerals Yearbook for Sulfur from 2010 to 2019 (https://www.usgs.gov/centers/nmic/sulfur-statistics-and-information). The prices given in USD were converted to EUR based on the annual exchange rates published by the European Central Bank (https://sdw.ecb.europa.eu/quickview.do?SERIES_KEY=120.EXR.A.USD.EUR.SP00.A), and then adjusted for inflation relative to 2005 by using the Harmonised Index of Consumer Prices (HICP) of the euro area, published by eurostat (https://ec.europa.eu/eurostat/databrowser/view/PRC_HICP_AIND/default/table).
  property carbon content 0
    carbon content on a dry matter basis (reserved; not for manual entry)
  property true value 0.00186578
    allocation property applied in "true value" allocation // value calculated from revenue
  properties: wet mass 1 kg, dry mass 1 kg, carbon content, fossil 0, water in wet mass 0 kg, water content 0, carbon content, non-fossil 0, carbon allocation 0 kg

## By-products
All rows: By-product classification allocatable product
- butane: 0 kg; CPC 341: Basic organic chemicals; CAS 106-97-8; pedigree (1,1,1,1,1)
  Literature value. Associated gases produced along with natural gas. Data from the Energy Resources Conservation Board
  Uncertainty: DQP adapted considering the original source of data (norwegian environmental report)
  production volume 2.3141e6 kg; name totalButane; = 6.34e6/2* percNonAssociated
    Calculated value. Total produced butane as by-product of natural gas in Alberta in 2009 (6.34e6 m3 for butane/isobutane mix 50:50) multiplied by the percentage of non associated production.
    Source: Energy Resources Conservation Board
  property heating value, net 45.89 MJ
    LHV is calculated based on the elemental composition of the substance. Based on the CAS number of the substance (000106-97-8 ), which is found manually, the chemical formula of the substance is found to be: C4H10, (PubChem 2020).
    Reference: Kim, S., Chen, J., Cheng, T., Gindulyte, A., He, J., He, S., Li, Q., Shoemaker, B. A., Thiessen, P. A., Yu, B., Zaslavsky, L., Zhang, J., & Bolton, E. E. (2019). PubChem 2019 update: improved access to chemical data. Nucleic acids research, 47(D1), D1102–D1109. https://doi.org/10.1093/nar/gky1033
  property price 0.26 EUR2005
    Temporary price data. Calculated as 90% of purchasers price based on: 2004 import and export prices (total trades (USD) divided by total weight (kg) in EU27, USA, China, Japan and India) from UN Commodity Trade Statistics Database (http://data.un.org/Explorer.aspxDatabase [Accessed 2 July 2010]). Commodity: Butanes, liquefied
  property carbon content 0.827586
    carbon content on a dry matter basis (reserved; not for manual entry)
  property true value 7.78476e-6
    allocation property applied in "true value" allocation // value calculated from revenue
  properties: water content 0, carbon content, fossil 0.827586, water in wet mass 0 kg, carbon content, non-fossil 0, wet mass 1 kg, dry mass 1 kg, carbon allocation 0.827586 kg
- isobutane: 0 kg; CPC 33410: Propane and butanes, liquefied; CAS 75-28-5
  Literature value. Associated gases produced along with natural gas. Data from the Energy Resources Conservation Board
  production volume 2.3141e6 kg; name totalIsobutane; = 6.34e6/2* percNonAssociated
    (same comment as for butane)
  property price 0.45 EUR2005; name isobutane_price_EUR2005
    According to freely accessible market study from ICIS (Independent Commodity Intelligence Services), accessible at https://www.icis.com/explore/resources/news/2011/11/08/9506547/isobutane-and-retail-gasoline-prices-jump-on-strong-alkylate/
  property heating value, net 45.89 MJ
    LHV is calculated based on the elemental composition of the substance. The chemical formula of the substance is found to be: C4H10, (PubChem 2020).
    Reference: Kim, S., Chen, J., Cheng, T., Gindulyte, A., He, J., He, S., Li, Q., Shoemaker, B. A., Thiessen, P. A., Yu, B., Zaslavsky, L., Zhang, J., & Bolton, E. E. (2019). PubChem 2019 update: improved access to chemical data. Nucleic acids research, 47(D1), D1102–D1109. https://doi.org/10.1093/nar/gky1033
  property carbon content 0.827586
    carbon content on a dry matter basis (reserved; not for manual entry)
  property true value 1.34736e-5; name isobutane_true_value
    allocation property applied in "true value" allocation // value calculated from revenue
  properties: carbon content, fossil 0.827586, water in wet mass 0 kg, wet mass 1 kg, water content 0, dry mass 1 kg, carbon content, non-fossil 0, carbon allocation 0.827586 kg
- propane: 0 kg; CPC 33410: Propane and butanes, liquefied; CAS 74-98-6; pedigree (1,1,1,1,1)
  (same comment as for butane)
  production volume 3.4018e6 kg; name totalPropane; = 4.66e6* percNonAssociated
    Calculated value. Total produced propane as by-product of natural gas in Alberta in 2009 (4.66e6 m3) multiplied by the percentage of non associated production.
    Source: Energy Resources Conservation Board
  property price 0.267 EUR2005
    Average import and export prices (total trades (USD) divided by total weight (kg) in EU27, USA, China, Japan and India) from UN data - Average of Propane and butane (http://data.un.org/Data.aspx?q=Butanes+&d=ComTrade&f=_l1Code%3a28%3bcmdCode%3a271113 and http://data.un.org/Data.aspx?q=propane&d=ComTrade&f=_l1Code%3a28%3bcmdCode%3a271112; accessed 1 June 10).
  property heating value, net 46.4 MJ
    Indicative value. Reference: Fuels - Higher and Lower Calorific Values, available at: https://www.engineeringtoolbox.com/fuels-higher-calorific-values-d_169.html
  property carbon content 0.817139
    carbon content on a dry matter basis (reserved; not for manual entry)
  property true value 1.17519e-5
    allocation property applied in "true value" allocation // value calculated from revenue
  properties: dry mass 1 kg, wet mass 1 kg, carbon content, non-fossil 0, water in wet mass 0 kg, water content 0, carbon content, fossil 0.817139, carbon allocation 0.817139 kg
- ethane: 0 kg; CPC 34: Basic chemicals; CAS 74-84-0; pedigree (1,1,1,1,1)
  (same comment as for butane)
  production volume 9.344e6 kg; name totalEthane; = 1.28e7* percNonAssociated
    Calculated value. Total produced ethane as by-product of natural gas in Alberta in 2009 ( (1.28e7 m3) multiplied by the percentage of non associated production.
    Source: Energy Resources Conservation Board
  property heating value, net 48.38 MJ
    LHV is calculated based on the elemental composition of the substance. Based on the CAS number of the substance (000074-84-0), the chemical formula of the substance is found to be: C2H6, (PubChem 2020).
    Reference: Kim, S., Chen, J., Cheng, T., Gindulyte, A., He, J., He, S., Li, Q., Shoemaker, B. A., Thiessen, P. A., Yu, B., Zaslavsky, L., Zhang, J., & Bolton, E. E. (2019). PubChem 2019 update: improved access to chemical data. Nucleic acids research, 47(D1), D1102–D1109. https://doi.org/10.1093/nar/gky1033
  property price 0.3 EUR2005
    Estimated price based on freely available market reports (http://www.platts.com/news-feature/2013/petrochemicals/global-margins/ethane_rejection) (http://www.growthstockwire.com/3255/a-big-trend-change-is-coming-in-this-beaten-down-commodity) [Accessed 20140424].
  property carbon content 0.798875
    carbon content on a dry matter basis (reserved; not for manual entry)
  property true value 3.62697e-5
    allocation property applied in "true value" allocation // value calculated from revenue
  properties: dry mass 1 kg, water in wet mass 0 kg, water content 0, wet mass 1 kg, carbon content, fossil 0.798875, carbon content, non-fossil 0, carbon allocation 0.798875 kg
- pentane: 0 kg; CPC 333: Petroleum oils and oils obtained from bituminous materials, other than crude; preparations n.e.c. containing by […]; CAS 109-66-0; pedigree (1,1,1,1,1)
  (same comment as for butane)
  production volume 2.4966e6 kg; name totalPentane; = 3.42e6* percNonAssociated
    Calculated value. Total produced pentane as by-product of natural gas in Alberta in 2009 (3.42e6 m3) multiplied by the percentage of non associated production.
    Source: Energy Resources Conservation Board
  property heating value, net 45.37 MJ
    LHV is calculated based on the elemental composition of the substance. Based on the CAS number of the substance (000109-66-0), the chemical formula of the substance is found to be: C5H12, (PubChem 2020).
    Reference: Kim, S., Chen, J., Cheng, T., Gindulyte, A., He, J., He, S., Li, Q., Shoemaker, B. A., Thiessen, P. A., Yu, B., Zaslavsky, L., Zhang, J., & Bolton, E. E. (2019). PubChem 2019 update: improved access to chemical data. Nucleic acids research, 47(D1), D1102–D1109. https://doi.org/10.1093/nar/gky1033
  property carbon content 0.833333
    carbon content on a dry matter basis (reserved; not for manual entry)
  property true value 3.55329e-5
    allocation property applied in "true value" allocation // value calculated from revenue
  properties: water content 0, wet mass 1 kg, carbon content, non-fossil 0, price 1.1 EUR2005, dry mass 1 kg, carbon content, fossil 0.833333, water in wet mass 0 kg, carbon allocation 0.833333 kg

## Inputs from technosphere
- hazardous waste, for underground deposit: -1.25486e-5 kg; name hazardousWaste; lognormal variance with pedigree 0.0672, pedigree (2,5,5,4,3)
  Estimated value. As in original dataset (natural gas production, DE)
  EcoSpold01Location=DE
  Uncertainty: Norwegian environmental report
  production volume 2.95239e6 kg; = annualProduction*hazardousWaste
    Calculated from the production volume of natural gas, high pressure in proportion to the respective output amounts.
  property price 0 EUR2005; name hazardousWaste_price_EUR2005
  properties: carbon content, fossil 0.554667, dry mass 1 kg, wet mass 1 kg
  note on carbon content, fossil: Tab A.6, ecoinvent v2.2 report 13_I, average hazardous waste composition was used, and referred to 0% water mass. No waste-specific emission are currently inventoried for underground deposits. Accordingly, no waste composition must be specified. For generic, average waste to underground deposit deposition in a 200 liter steel drum without cement solidification is assumed (ecoinvent v2.2 report 13_I).
- waste textile, soiled: -4.5661e-8 kg; name BP_amount_2; = (wasteTextileDrying)*-1; lognormal variance with pedigree 0.008, pedigree (1,1,4,1,1)
  Estimated value. Waste textile from drying process
  production volume 10743 kg; = annualProduction * (BP_amount_2 / naturalGas)
    Calculated from production volume of reference product using the relative outputs.
  property price 0 EUR2005; name BP_amount_2_price_EUR2005
  property amount 1 of flow in kg 1.39e-7 kg; name wasteTextileDrying
  properties: wet mass 1 kg, carbon content, non-fossil 0.570519, water content 0.333333, heating value, net 14.45 MJ, dry mass 0.75 kg
  note on heating value, net: Value taken from the general comment of the treatment dataset.
- municipal solid waste: -9.9633e-6 kg; name municipalSolidWaste; = (2.82E-05+ municipalWasteDrying)*-1; lognormal variance with pedigree 0.0926, pedigree (2,1,5,5,4)
  Calculated value. Sum of waste from natural gas production and drying. Data from original datasets ("natural gas production, DE" and "drying, natural gas"). See exchange properties for details
  EcoSpold01Location=CH
  Uncertainty: DQP adapted considering the original source of data (norwegian environmental report)
  production volume 2.34414e6 kg; = annualProduction*municipalSolidWaste
    (same comment as for hazardous waste, for underground deposit)
  property price 0 EUR2005; name municipalSolidWaste_price_EUR2005
  property amount 1 of flow in kg 2.13e-6 kg; name municipalWasteDrying
  properties: water content 0.297017, carbon content, fossil 0.171549, dry mass 0.771 kg, heating value, net 11.74 MJ, carbon content, non-fossil 0.261655, wet mass 1 kg
  note on carbon content, fossil: MSW composition in tab 4.1, ecoinvent v2.2 report 13_I. C content referred to 1 kg DM
- waste wood, untreated: -2.14344e-6 kg; name wasteWood; = (6.14E-06+ wasteWoodDrying)*-1; lognormal variance with pedigree 0.0926, pedigree (2,1,5,5,4)
  EcoSpold01Location=CH
  Calculated value. Waste wood from drying process and natural gas production. See exchange properties for details.
  Uncertainty: DQP adapted considering the original source of data (norwegian environmental report)
  production volume 504302 kg; = annualProduction*wasteWood
    (same comment as for hazardous waste, for underground deposit)
  property price 0 EUR2005; name wasteWood_price_EUR2005
  property amount 1 of flow in kg 3.85e-7 kg; name wasteWoodDrying
  properties: dry mass 0.8 kg, carbon content, non-fossil 0.48632, water content 0.25, heating value, net 13.99 MJ, wet mass 1 kg
  note on amount 1 of flow in kg: Lognormal (Geometric mean=3.85E-07, Variance of log-transformed data=0.01, Arithmetic mean of log-transformed data=-14.77, Standard deviation=1.2214, CI/2wP, half range of confidence interval=1.3269, Variance of data with pedigree=0.02) Pedigree matrix: 2 1 3 5 3 , Comment: DQP adapted considering the original source of data (Norwegian data)
  note on carbon content, non-fossil: Tab A.4, ecoinvent v2.2 report 13_I. C content has been referred to 1 kg DM,
- waste mineral oil: -1.18522e-5 kg; name wasteMineralOil; = (3.17E-05+ wasteMineralOilDrying)*-1; lognormal variance with pedigree 0.0926, pedigree (2,1,5,5,4)
  EcoSpold01Location=CH
  Estimated value. As in original dataset (natural gas production, DE)
  Uncertainty: DQP adapted considering the original source of data (norwegian environmental report)
  production volume 2.78854e6 kg; = annualProduction*wasteMineralOil
    (same comment as for hazardous waste, for underground deposit)
  property price 0 EUR2005; name wasteMineralOil_price_EUR2005
  property amount 1 of flow in kg 4.38e-6 kg; name wasteMineralOilDrying
  properties: wet mass 1 kg, heating value, net 34.7 MJ, water content 0.111111, carbon content, fossil 0.864444, dry mass 0.9 kg
  note on carbon content, fossil: Tab A.6, ecoinvent v2.2 report 13_I. C content has been calculated after data in the tables, and then referred to 1 kg DM
- onshore well, oil/gas: 6.63563e-7 m; lognormal variance with pedigree 0.35, pedigree (1,1,5,5,3)
  EcoSpold01Location=GLO
  Estimated value. As in original dataset (natural gas production, DE)
  Uncertainty: Variance from default table. DQP adapted considering the original source of data (environmental report for whole Germany)
- onshore natural gas field infrastructure: 2.19107e-10 unit; lognormal variance with pedigree 0.4246, pedigree (2,4,5,5,4)
  Estimated value. As in original dataset (natural gas production, DE)
  EcoSpold01Location=GLO
  Uncertainty: DQP adapted considering the original source of data (environmental report for 50% market share in Germany, standard module)
- natural gas, high pressure: 0.00581388 m3; = naturalGasDrying+ naturalGasSweetening*percSour; lognormal variance with pedigree 0.008, pedigree (1,1,4,1,1)
  Calculated value. Sum of natural gas used for drying and sweetening
  Uncertainty: DQP adapted considering the original source of data (environmental report, aggregation of different processes)
  property amount 2 of flow in kg 0.032503 kg; name naturalGasSweetening
  property heating value, gross 0 MJ; name Gross_Heat_Value
  property amount 1 of flow in kg 0.00746 kg; name naturalGasDrying
  properties: dry mass 0.84 kg, carbon content, fossil 0.602381, heating value, net 39 MJ, wet mass 0.84 kg
  note on heating value, net: Literature value, Source: United Nations Statistics Division (2018) International Recommendations for Energy Statistics (IRES). Available at: http://unstats.un.org/unsd/statcom/doc11/BG-IRES.pdf.
- natural gas processing plant: 1.29428e-13 unit; lognormal variance with pedigree 0.51, pedigree (5,5,5,5,5)
  Estimated value. As in original dataset (natural gas production, DE)
- spent antifreezer liquid: -2.83821e-8 kg; name spentAntifreezerLiquid; = (8.64E-08)*-1; lognormal variance with pedigree 0.0926, pedigree (2,1,5,5,4)
  Calculated value. Spent antifreezer from drying process and natural gas production. See exchange properties for details.
  EcoSpold01Location=CH
  Uncertainty: DQP adapted considering the original source of data (norwegian environmental report)
  production volume 6677.66 kg; = annualProduction*spentAntifreezerLiquid
    (same comment as for hazardous waste, for underground deposit)
  property price 0 EUR2005; name spentAntifreezerLiquid_price_EUR2005
  property amount 1 of flow in kg 4.04e-6 kg; name SpentAntifreezerDrying
  properties: water content 1.07469, dry mass 0.482 kg, carbon content, fossil 0.431328, wet mass 1 kg, heating value, net 0.56 MJ
  note on carbon content, fossil: Tab A.7, ecoinvent v2.2 report 13_I. C content has been calculated after data in the tables, and then referred to 1 kg DM
- spent solvent mixture: -2.32904e-7 kg; name BP_amount_3; = (spentSolventDrying)*-1; lognormal variance with pedigree 0.008, pedigree (1,1,4,1,1)
  Estimated value. Spent solvent from drying process
  production volume 54797 kg; = annualProduction * (BP_amount_3 / naturalGas)
    Calculated from production volume of reference product using the relative outputs.
  property price 0 EUR2005; name BP_amount_3_price_EUR2005
  property amount 1 of flow in kg 7.09e-7 kg; name spentSolventDrying
  properties: carbon content, fossil 0.571257, wet mass 1 kg, heating value, net 21.7 MJ, dry mass 0.835 kg, water content 0.197605
- chemical, organic: 1.14473e-6 kg; = chemicalOrganicDrying+ chemicalOrganicSweetening*percSour; lognormal variance with pedigree 0.008, pedigree (1,1,4,1,1)
  Calculated value. Sum of chemicals used for drying and sweetening
  Uncertainty: DQP adapted considering the original source of data (environmental report, aggregation of different processes)
  property amount 2 of flow in kg 2.65e-6 kg; name chemicalOrganicSweetening
  property amount 1 of flow in kg 2.65e-6 kg; name chemicalOrganicDrying
  properties: dry mass 1 kg, carbon content, fossil 0.628, wet mass 1 kg, heating value, net 19.03 MJ
  note on carbon content, fossil: This dataset is an unweighted average of 20 organic substances (listed in Tab 88.1, ecoinvent v2.2 report 8, part II), being part of the top100 chemicals included in this database. The C-content has also been calculated as an unweighted average of the C content of the substances composing this dataset.
- electricity, medium voltage: 0.00991074 kWh; = .00977+ ElectricityDrying; lognormal variance with pedigree 0.0513, pedigree (2,2,5,5,3)
  EcoSpold01Location=DE
  Calculated value. Electricity used in natural gas production (estimated value from german dataset) and drying process (estimated from ecoinvent 2.0 dataset "drying, natural gas")
  Uncertainty: Variance from default table. DQP adapted considering the original source of data (environmental report for 50% market share in Germany, standard energy type
  property amount 1 of flow in kg 0.0204 kg; name ElectricityDrying
- methanol: 1.17273e-5 kg; lognormal variance with pedigree 0.0601, pedigree (1,2,5,5,3)
  Estimated value. As in original dataset (natural gas production, DE)
  EcoSpold01Location=CH
  Uncertainty: DQP adapted considering the original source of data (Dutch environmental report)
  properties: wet mass 1 kg, heating value, net 26.49 MJ, dry mass 1 kg, carbon content, fossil 0.375
- soda ash, light, crystalline, heptahydrate: 6.93128e-7 kg; = sodaAshDrying; lognormal variance with pedigree 0.008, pedigree (1,1,4,1,1)
  Estimated value. Input per m3 of natural gas dried. It is assumed that all the gas is dried. Data from ecoinvent 2.0 dataset (drying, natural gas)
  Uncertainty: DQP adapted considering the original source of data (environmental report, aggregation of different processes)
  property amount 1 of flow in kg 2.11e-6 kg; name sodaAshDrying
  properties: carbon content, fossil 0.0517241, dry mass 1 kg, wet mass 1 kg, heating value, net 3.43 MJ
- chemical, inorganic: 1.74103e-6 kg; = 2.65E-06+ chemicalInorganicsDrying; lognormal variance with pedigree 0.06, pedigree (1,1,5,5,3)
  Estimated value. Kilograms emitted per m3 of natural gas dried. It is assumed that all the gas is dried. Data from ecoinvent 2.0 dataset (drying, natural gas)
  Uncertainty: DQP adapted considering the original source of data (environmental report)
  property amount 1 of flow in kg 2.65e-6 kg; name chemicalInorganicsDrying
  properties: wet mass 1 kg, carbon content, fossil 0.003, dry mass 1 kg
  note on carbon content, fossil: This dataset is an unweighted average of 20 inorganic substances (listed in Tab 88.1, ecoinvent v2.2 report 8, part II), being part of the top100 chemicals included in this database. The C-content has also been calculated as an unweighted average of the C content of the substances composing this dataset.
- ethylene glycol: 5.97864e-7 kg; = ethyleneGlycolDrying; lognormal variance with pedigree 0.008, pedigree (1,1,4,1,1)
  Estimated value. Ethylene glycol for drying process (estimated from ecoinvent 2.2 dataset "drying, natural gas")
  EcoSpold01Location=RER
  Uncertainty: DQP adapted considering the original source of data (environmental report, aggregation of different processes)
  property amount 1 of flow in kg 1.82e-6 kg; name ethyleneGlycolDrying
  properties: heating value, net 23.44 MJ, dry mass 1 kg, wet mass 1 kg, carbon content, fossil 0.387097
  note on amount 1 of flow in kg: Kilograms Kilograms used per m3 of natural gas dried used per m3 of natural gas dried
- diesel: 1.96769e-6 kg; = dieselDrying; lognormal variance with pedigree 0.008, pedigree (1,1,4,1,1)
  (same comment as for soda ash, light, crystalline, heptahydrate)
  property amount 1 of flow in kg 5.99e-6 kg; name dieselDrying
  properties: heating value, net 42.8 MJ, carbon content, fossil 0.865, wet mass 1 kg, dry mass 1 kg
- waste emulsion paint: -1.38823e-7 kg; name wasteEmulsionPaint; = (3.81E-07+ wasteEmulsionDrying)*-1; lognormal variance with pedigree 0.0926, pedigree (2,1,5,5,4)
  EcoSpold01Location=CH
  Estimated value. Wastes generated in natural gas production (estimated value from german dataset)
  Uncertainty: DQP adapted considering the original source of data (norwegian environmental report)
  production volume 32661.8 kg; = annualProduction*wasteEmulsionPaint
    (same comment as for hazardous waste, for underground deposit)
  property price 0 EUR2005; name wasteEmulsionPaint_price_EUR2005
  property amount 1 of flow in kg 4.16e-8 kg; name wasteEmulsionDrying
  properties: wet mass 1 kg, carbon content, fossil 0.27, heating value, net 8.18 MJ, dry mass 1 kg
  note on carbon content, fossil: Tab A.4, ecoinvent v2.2 report 13_I. C content has been calculated after data in the tables, and then referred to 1 kg DM
- average incineration residue: -7.12837e-9 kg; name BP_amount_1; = (incinerationResiduesDrying)*-1; lognormal variance with pedigree 0.008, pedigree (1,1,4,1,1)
  Estimated value. Incineration residue from drying process
  production volume 1677.14 kg; = annualProduction * (BP_amount_1 / naturalGas)
    Calculated from production volume of reference product using the relative outputs.
  property price 0 EUR2005; name BP_amount_1_price_EUR2005
  property amount 1 of flow in kg 2.17e-8 kg; name incinerationResiduesDrying
  properties: wet mass 1 kg, carbon content, non-fossil 0.0511208, dry mass 1 kg, carbon content, fossil 0.0325466

## Inputs from nature
- Gas, natural, in ground [natural resource, in ground]: 0.328891 m3; = naturalGas+ lossesNatGas; source Canadian Association of Petroleum Produc 2004; lognormal variance with pedigree 0.008, pedigree (1,1,4,1,1)
  Literature value, Natural gas needed+ losses during production
  Uncertainty: DQP adapted considering the original source of data (environmental report, aggregation of different processes)
  property percentage of sour gas 0.315; name percSour
  property percentage of associated gas 0.27; name percAssociated
  property percentage of non associated gas 0.73; name percNonAssociated; = 1-percAssociated

## Emissions to nature
- Radon-222 [air, non-urban air or from high stacks]: 0.000109718 kBq; lognormal variance with pedigree 0.378, pedigree (4,1,5,5,3)
  Estimated value. As in original dataset (natural gas production, DE)
  Uncertainty: DQP adapted considering the original source of data (data calculated on the basis of losses and gas composition)
- Nitrogen [water, surface water]: 1.81661e-7 kg; = 5.53E-07+ N2Drying; lognormal variance with pedigree 0.008, pedigree (1,1,4,1,1)
  Calculated value. Nitrogen from petroleum and gas production and drying process. See exchange properties for details
  Uncertainty: DQP adapted considering the original source of data (environmental report, aggregation of different processes)
  property amount 1 of flow in kg 6.93e-12 kg; name N2Drying
- Methane, fossil [air, non-urban air or from high stacks]: 0.000130766 kg; = CH4FlareSour* flaredSour+ flaredSweet* CH4FlareSweet +CH4Fugitive +CH4TurbineSour *turbineBurnedSour+ turbineBurnedSweet* CH4TurbineSweet; source Canadian Association of Petroleum Produc 2004; lognormal variance with pedigree 0.008, pedigree (1,1,4,1,1)
  Calculated value. Sum of fugitive emissions, vented gas, flared gas and gas burned in turbines. See exchanges properties for details.
  Uncertainty: DQP adapted considering the original source of data (environmental report, aggregation of different processes)
  property amount 1 of flow in kg 0.0109 kg; name CH4FlareSour
  property amount 2 of flow in kg 0.0136 kg; name CH4FlareSweet
  property amount 3 of flow in kg 0.000328 kg; name CH4Fugitive; = 1.2e-4+2.08e-4
  property amount 5 of flow in kg 0.000547 kg; name CH4TurbineSweet; = 4.82e-4+6.5e-5
  property amount 4 of flow in kg 5.87e-5 kg; name CH4TurbineSour; = 2.5e-5+3.37e-5
- AOX, Adsorbable Organic Halogen as Cl [water, surface water]: 6.07062e-14 kg; = 9.24E-14+ AOXDrying; lognormal variance with pedigree 0.008, pedigree (1,1,4,1,1)
  Estimated value. Kilograms emitted per m3 of natural gas dried. It is assumed that all the gas is dried. Data from ecoinvent 2.0 dataset (drying, natural gas)
  Uncertainty: DQP adapted considering the original source of data (environmental report, aggregation of different processes)
  property amount 1 of flow in kg 9.24e-14 kg; name AOXDrying
- TOC, Total Organic Carbon [water, unspecified]: 2.19107e-7 kg; lognormal variance with pedigree 0.1, pedigree (1,1,5,5,3)
  (same comment as for AOX, Adsorbable Organic Halogen as Cl)
- Triethylene glycol [water, unspecified]: 3.97481e-8 kg; lognormal variance with pedigree 0.36, pedigree (1,1,5,5,3)
  (same comment as for AOX, Adsorbable Organic Halogen as Cl)
- BOD5, Biological Oxygen Demand [water, unspecified]: 8.93511e-8 kg; lognormal variance with pedigree 0.212, pedigree (3,5,5,5,5)
  Estimated value. Kilograms emitted per m3 of natural gas dried. It is assumed that all the gas is dried. Data from ecoinvent 2.0 dataset (drying, natural gas)
  Uncertainty: DQP adapted considering the original source of data (Extrapolation for sum parameter)
- Nitrogen oxides [air, non-urban air or from high stacks]: 0.000357579 kg; = NOxFlareSour*flaredSour+ NOxFlareSweet*flaredSweet+ NOxFugitive+ NOxTurbineSour*turbineBurnedSour+ NOxTurbineSweet*turbineBurnedSweet; source Canadian Association of Petroleum Produc 2004; lognormal variance with pedigree 0.008, pedigree (1,1,4,1,1)
  Calculated value. Sum of fugitive emissions, vented gas, flared gas and gas burned in turbines.
  Uncertainty: DQP adapted considering the original source of data (environmental report, aggregation of different processes)
  property amount 5 of flow in kg 0.00033 kg; name NOxTurbineSweet
  property amount 4 of flow in kg 0.000171 kg; name NOxTurbineSour
  property amount 1 of flow in kg 6e-8 kg; name NOxFlareSour
  property amount 2 of flow in kg 6e-8 kg; name NOxFlareSweet
  property amount 3 of flow in kg 0.00106 kg; name NOxFugitive
- Nitrogen [water, unspecified]: 2.27648e-12 kg; lognormal variance with pedigree 0.1, pedigree (3,5,5,5,3)
  (same comment as for BOD5, Biological Oxygen Demand)
- Carbon dioxide, fossil [air, non-urban air or from high stacks]: 0.00456541 kg; = CO2FlareSour*flaredSour+ CO2FlareSweet*flaredSweet+ CO2Fugitive+ CO2TurbineSour*turbineBurnedSour+CO2TurbineSweet*turbineBurnedSweet+ CO2VentedSour*ventedSour+ CO2ventedSweet*ventedSweet; source Canadian Association of Petroleum Produc 2004; lognormal variance with pedigree 0.008, pedigree (1,1,4,1,1)
  (same comment as for Methane, fossil)
  property amount 1 of flow in kg 2.28 kg; name CO2FlareSour
  property amount 7 of flow in kg 0.0234 kg; name CO2ventedSweet
  property amount 5 of flow in kg 0.0635 kg; name CO2TurbineSweet; = 2.32e-2+4.03e-2
  property amount 2 of flow in kg 1.85 kg; name CO2FlareSweet
  property amount 3 of flow in kg 3.803e-5 kg; name CO2Fugitive; = 3.22e-5+5.83e-6
  property amount 4 of flow in kg 0.0329 kg; name CO2TurbineSour; = 0.012+0.0209
  property amount 6 of flow in kg 0.0773 kg; name CO2VentedSour
- Nitrogen [air, unspecified]: 7.87774e-5 kg; = N2VentedSour*ventedSour+ N2VentedSweet2*ventedSweet; lognormal variance with pedigree 0.008, pedigree (1,1,4,1,1)
  (same comment as for Methane, fossil)
  property amount 1 of flow in kg 0.0918 kg; name N2VentedSour
  property amount 2 of flow in kg 0.0348 kg; name N2VentedSweet2
- Hydrogen sulfide [air, low population density, long-term]: 1.64009e-5 kg; = H2SFlareSour*flaredSour+ H2SFlareSweet*flaredSweet+ H2SFugitive+ H2SVentedSour*ventedSour+ H2SVentedSweet*ventedSweet; source Canadian Association of Petroleum Produc 2004; lognormal variance with pedigree 0.008, pedigree (1,1,4,1,1)
  (same comment as for Methane, fossil)
  property amount 1 of flow in kg 1.9e-7 kg; name H2SFlareSour
  property amount 4 of flow in kg 0.00706 kg; name H2SVentedSour
  property amount 2 of flow in kg 1.9e-7 kg; name H2SFlareSweet
  property amount 5 of flow in kg 1e-10 kg; name H2SVentedSweet
  property amount 3 of flow in kg 3.15e-5 kg; name H2SFugitive; = 2.02e-5+1.13e-5
- Triethylene glycol [water, surface water]: 3.97481e-8 kg; lognormal variance with pedigree 0.008, pedigree (1,1,4,1,1)
  Estimated value. Kilograms emitted per m3 of natural gas dried. It is assumed that all the gas is dried. Data from ecoinvent 2.0 dataset (drying, natural gas)
- Ethane [air, non-urban air or from high stacks]: 5.52669e-5 kg; = ventedSour* EthaneVentedSour+ EthaneVentedSweet* ventedSweet; lognormal variance with pedigree 0.008, pedigree (1,1,4,1,1)
  (same comment as for Methane, fossil)
  property amount 1 of flow in kg 0.0643 kg; name EthaneVentedSour
  property amount 2 of flow in kg 0.0681 kg; name EthaneVentedSweet
- Sulfur [water, unspecified]: 7.88392e-12 kg; lognormal variance with pedigree 0.1, pedigree (3,5,5,5,3)
  (same comment as for BOD5, Biological Oxygen Demand)
- Carbon monoxide, fossil [air, non-urban air or from high stacks]: 0.000395734 kg; = COFlareSour*flaredSour+ COFlareSweet*flaredSweet+ COFugitive+ COTurbineSour*turbineBurnedSour+ COTurbineSweet*turbineBurnedSweet; source Canadian Association of Petroleum Produc 2004; lognormal variance with pedigree 0.008, pedigree (1,1,4,1,1)
  (same comment as for Methane, fossil)
  property amount 1 of flow in kg 4.61e-6 kg; name COFlareSour
  property amount 5 of flow in kg 0.000285 kg; name COTurbineSweet
  property amount 3 of flow in kg 0.00118 kg; name COFugitive
  property amount 4 of flow in kg 0.000148 kg; name COTurbineSour
  property amount 2 of flow in kg 4.61e-6 kg; name COFlareSweet
- Sulfur [water, surface water]: 7.88392e-12 kg; = sulfurDrying; lognormal variance with pedigree 0.008, pedigree (1,1,4,1,1)
  Estimated value. Oils from drying process. It is assumed that all the gas is dried. Data from ecoinvent 2.0 dataset (drying, natural gas)
  Uncertainty: DQP adapted considering the original source of data (environmental report, aggregation of different processes)
  property amount 1 of flow in kg 2.4e-11 kg; name sulfurDrying
- COD, Chemical Oxygen Demand [water, surface water]: 8.93511e-8 kg; = CODDrying; lognormal variance with pedigree 0.008, pedigree (1,1,4,1,1)
  (same comment as for Sulfur)
  property amount 1 of flow in kg 2.72e-7 kg; name CODDrying
- Phenol [water, surface water]: 1.55379e-10 kg; = phenolDrying; lognormal variance with pedigree 0.008, pedigree (1,1,4,1,1)
  (same comment as for AOX, Adsorbable Organic Halogen as Cl)
  property amount 1 of flow in kg 4.73e-10 kg; name phenolDrying
- Phenol [water, unspecified]: 1.55379e-10 kg; lognormal variance with pedigree 0.36, pedigree (1,1,5,5,3)
  (same comment as for AOX, Adsorbable Organic Halogen as Cl)
- TOC, Total Organic Carbon [water, surface water]: 2.19107e-7 kg; = TOCDrying; lognormal variance with pedigree 0.008, pedigree (1,1,4,1,1)
  (same comment as for Sulfur)
  property amount 1 of flow in kg 6.67e-7 kg; name TOCDrying
- Methanol [water, surface water]: 1.32056e-8 kg; = methanolDrying; lognormal variance with pedigree 0.008, pedigree (1,1,4,1,1)
  (same comment as for AOX, Adsorbable Organic Halogen as Cl)
  property amount 1 of flow in kg 4.02e-8 kg; name methanolDrying
- Ammonium, ion [water, unspecified]: 3.11086e-10 kg; = NH4Drying; lognormal variance with pedigree 0.008, pedigree (1,1,4,1,1)
  (same comment as for AOX, Adsorbable Organic Halogen as Cl)
  property amount 1 of flow in kg 9.47e-10 kg; name NH4Drying
- Dinitrogen monoxide [air, unspecified]: 1.3339e-7 kg; = N2OFlareSour*flaredSour+ N2OFlareSweet*flaredSweet+ N2OTurbineSour*turbineBurnedSour+ N2OTurbineSweet*turbineBurnedSweet; lognormal variance with pedigree 0.0806, pedigree (2,1,5,1,1)
  Calculated value. Sum of fugitive emissions, vented gas, flared gas and gas burned in turbines. See exchanges properties for details.
  Uncertainty: Variance from defaul table. DQP completed considering the source of data (ACPP)
  property amount 2 of flow in kg 3.94e-6 kg; name N2OFlareSweet
  property amount 1 of flow in kg 3.94e-6 kg; name N2OFlareSour
  property amount 4 of flow in kg 4.53e-6 kg; name N2OTurbineSweet; = 2.24e-6+2.29e-6
  property amount 3 of flow in kg 2.35e-6 kg; name N2OTurbineSour; = 1.16e-6+1.19e-6
- Helium [air, unspecified]: 1.77632e-7 kg; = HeVentedSour*ventedSour+ HeVentedSweet*ventedSweet; lognormal variance with pedigree 0.0806, pedigree (2,1,5,1,1)
  (same comment as for Dinitrogen monoxide)
  property amount 1 of flow in kg 0.000207 kg; name HeVentedSour
  property amount 2 of flow in kg 7.68e-5 kg; name HeVentedSweet
- Propane [air, non-urban air or from high stacks]: 2.54641e-5 kg; = propaneVentedSour*ventedSour+ propaneVentedSweet*ventedSweet; lognormal variance with pedigree 0.008, pedigree (1,1,4,1,1)
  (same comment as for Methane, fossil)
  property amount 1 of flow in kg 0.0297 kg; name propaneVentedSour
  property amount 2 of flow in kg 1e-10 kg; name propaneVentedSweet
- Sulfur dioxide [air, non-urban air or from high stacks]: 0.000382803 kg; = SO2FlareSour* flaredSour+ SO2FlareSweet * flaredSweet+ SO2Fugitive; source Canadian Association of Petroleum Produc 2004; lognormal variance with pedigree 0.008, pedigree (1,1,4,1,1)
  (same comment as for Methane, fossil)
  property amount 2 of flow in kg 8.82e-5 kg; name SO2FlareSweet
  property amount 1 of flow in kg 8.82e-5 kg; name SO2FlareSour
  property amount 3 of flow in kg 0.001165 kg; name SO2Fugitive; = 1.45e-4+1.02e-3
- NMVOC, non-methane volatile organic compounds, unspecified origin [air, non-urban air or from high stacks]: 0.00013476 kg; = VOCFlareSour*flaredSour+ VOCFlareSweet*flaredSweet+ VOCFugitive+ VOCTurbineSour*turbineBurnedSour+ VOCTurbineSweet*turbineBurnedSweet; source Canadian Association of Petroleum Produc 2004; lognormal variance with pedigree 0.008, pedigree (1,1,4,1,1)
  (same comment as for Methane, fossil)
  property amount 4 of flow in kg 0.000167 kg; name VOCTurbineSour
  property amount 3 of flow in kg 0.000383 kg; name VOCFugitive; = 3.83e-4+0
  property amount 2 of flow in kg 6.46e-7 kg; name VOCFlareSweet
  property amount 1 of flow in kg 6.46e-7 kg; name VOCFlareSour
  property amount 5 of flow in kg 0.000309 kg; name VOCTurbineSweet
- DOC, Dissolved Organic Carbon [water, unspecified]: 2.19107e-7 kg; lognormal variance with pedigree 0.1, pedigree (3,5,5,5,3)
  (same comment as for BOD5, Biological Oxygen Demand)
- Mercury [air, non-urban air or from high stacks]: 5.48589e-11 kg; lognormal variance with pedigree 0.118, pedigree (4,1,5,5,3)
  (same comment as for Radon-222)
- Oils, unspecified [water, surface water]: 2.94661e-9 kg; = oilsDrying; lognormal variance with pedigree 0.008, pedigree (1,1,4,1,1)
  (same comment as for Sulfur)
  property amount 1 of flow in kg 8.97e-9 kg; name oilsDrying
- DOC, Dissolved Organic Carbon [water, surface water]: 2.19107e-7 kg; = DOCDrying; lognormal variance with pedigree 0.008, pedigree (1,1,4,1,1)
  (same comment as for Sulfur)
  property amount 1 of flow in kg 6.67e-7 kg; name DOCDrying
- COD, Chemical Oxygen Demand [water, unspecified]: 8.93511e-8 kg; lognormal variance with pedigree 0.1, pedigree (3,5,5,5,3)
  (same comment as for BOD5, Biological Oxygen Demand)
- BOD5, Biological Oxygen Demand [water, surface water]: 8.93511e-8 kg; = BOD5Drying; lognormal variance with pedigree 0.008, pedigree (1,1,4,1,1)
  (same comment as for Sulfur)
  property amount 1 of flow in kg 2.72e-7 kg; name BOD5Drying
- Hydrogen [air, unspecified]: 8.91671e-9 kg; = HVentedSour*ventedSour+ HVentedSweet*ventedSweet; lognormal variance with pedigree 0.0806, pedigree (2,1,5,1,1)
  (same comment as for Dinitrogen monoxide)
  property amount 1 of flow in kg 1.04e-5 kg; name HVentedSour
  property amount 2 of flow in kg 1e-10 kg; name HVentedSweet
- Particulates, < 2.5 um [air, low population density, long-term]: 7.8577e-6 kg; = PM25FlareSour*flaredSour+ PM25FlareSweet*flaredSweet+ PM25Fugitive; source Canadian Association of Petroleum Produc 2004; lognormal variance with pedigree 0.008, pedigree (1,1,4,1,1)
  (same comment as for Methane, fossil)
  property water in wet mass 0 kg; name WWM
  property carbon content, non-fossil 0; name C_content_non_fossil
  property water content 0; name water_content
  property carbon content, fossil 0.922579; name C_content_fossil
  property wet mass 1 kg; name WM
  property amount 3 of flow in kg 2.392e-5 kg; name PM25Fugitive; = 1.86e-5+5.32e-6
  property amount 1 of flow in kg 5.55e-8 kg; name PM25FlareSour
  property dry mass 1 kg; name DM
  property amount 2 of flow in kg 5.55e-8 kg; name PM25FlareSweet

## Sampling procedure
Data based on environmental report

## Extrapolations
This dataset has been partially adapted from the natural gas production in Germany. The uncertainty has been adjusted accordingly.

## Review by Emilia Moreno Ruiz 2015-09-17
broken formula fixed

## Review by Emilia Moreno Ruiz 2017-09-06
PV adjusted
