# floating hexagonal metal cage for aquaculture 6 m construction and maintenance

Dataset: EcoSpold 2, unit process
Geography: GLO
Time period: 2017-01-01 to 2021-12-31
Technology level: current
Classification: ISIC rev.4 ecoinvent: 032:Aquaculture
Scenario: Business-as-Usual
System model: Allocation, cut-off by classification
Generated by: Angel Avadí
Published in: Angel Avadí 2015
Database: ecoinvent
isCopyrightProtected: true
accessRestrictedTo: 1

## General comment
This activity presents data from the Anchoveta Supply Chain project. Floating hexagonal metal cage for aquaculture, 6x6 m, used worldwide for salmonids, cichlids, etc. Used in lakes and river environments. This process may be used to model different sizes of floating hexagonal metal cages (observed range in lake Ttiticaca: 5x5 to 6.4x6.4).

## Included activities start
Construction and maintenance of a floating cage system, expressed either in terms of its diameter (if floating collar) or side length (if hexagonal cage), with their associated lifetimes. The specific fish holding capacity of each system is expressed as well per m of diameter or side length.

## Included activities end
EOL is included assuming a waste flow of 10% of all materials used in infrastructure.

## Geography
Cage systems used worldwide

## Technology
Data from operations in the Titicaca lake (2012), Anchoveta Supply Chains project (http://anchoveta-sc.wikispaces.com). Lifetime: 5 years (structure) and 2 years (net)

## Reference product
- floating hexagonal metal cage: 1 m; name RP_amount_1; CPC 3845: Fishing rods and other line fishing tackle; fish landing nets, butterfly nets and similar nets; decoy "birds" a[…]; By-product classification allocatable product
  Floating hexagonal metal cage for lake and river aquaculture. Dimensions: 6x6 m, fish capacity: 1 000 kg
  production volume 1 m; name RP_PV_1
    Unquantifiable
  property price 375.04 EUR2005; name RP_amount_1_price_EUR2005
    Calculated based on inputs: The price of the product has been calculated as a sum of the values of the material and energy inputs for this product. This value is therefore a rough estimation. It may underestimate the real price since there are additional expenses when producing any product. These expences can include for example labour costs, treatment of waste materials and profit for the producer. Please consider carefully whether this level of data quality is acceptable for your application.

## Inputs from technosphere
- polyurethane, rigid foam: 0 kg; name polyurethane_rigid_foam_amount_1; pedigree (1,1,1,1,1)
  Floaters, 16 per corner, 280 g each, 80% polyurethane
  properties: dry mass 1 kg, carbon content, fossil 0.69089, wet mass 1 kg, heating value, net 30.67 MJ
- polyethylene, high density, granulate: 0.896 kg; name polyethylene_high_density_granulate_amou; = 6*16*0.280*0.2; lognormal variance with pedigree 0.0119, pedigree (2,5,3,3,2)
  Floaters, 16 per corner, 280 g each, 20% HDPE
  properties: carbon content, fossil 0.857143, heating value, net 42.47 MJ, dry mass 1 kg, wet mass 1 kg
  note on carbon content, fossil: Polyethylene is formed out of a huge amount of ethylene monomers (C2H4) (ecoinvent v2.2 report 11_II). MW=28 g/mol
- weaving, synthetic fibre: 12.5 kg; = 30*5/2; lognormal variance with pedigree 0.0119, pedigree (2,5,3,3,2)
  Fishing net, material, replaced every 2 years
  properties: dry mass 1 kg, wet mass 1 kg
- extrusion, plastic film: 12.5 kg; = 30*5/2; lognormal variance with pedigree 0.0119, pedigree (2,5,3,3,2)
  Fishing net, material, replaced every 2 years
- waste polyurethane foam: 0 kg; name BP_amount_4; pedigree (1,1,1,1,1)
  10% of total polyurethane considered to exit as waste flow
  production volume 0 kg
    Calculated from production volume of reference product using the relative outputs.
  property price 0 EUR2005; name BP_amount_4_price_EUR2005
  properties: dry mass 0.998 kg, water content 0.00200401, carbon content, fossil 0.641283, heating value, net 30.67 MJ, wet mass 1 kg
- waste polyethylene: 0 kg; name BP_amount_1; pedigree (1,1,1,1,1)
  10% of total plastic considered to exit as waste flow
  production volume 0 kg
    Calculated from production volume of reference product using the relative outputs.
  property price 0 EUR2005; name BP_amount_1_price_EUR2005
  properties: water content 0.00401606, carbon content, fossil 0.825301, wet mass 1 kg, dry mass 0.996 kg, heating value, net 42.47 MJ
  note on carbon content, fossil: C content in 1 kg DM was calculated using data in Tab A.1, ecoinvent v2.2 report 13_I
  note on heating value, net: Value taken from the general comment of the treatment dataset.
- thermoforming of plastic sheets: 0.896 kg; = 6*16*0.280*0.2; lognormal variance with pedigree 0.0119, pedigree (2,5,3,3,2)
  Floaters, 16 per corner, 280 g each, 20% HDPE; manufacture
- nylon 6-6: 0 kg; name nylon_6_6_amount_1; pedigree (1,1,1,1,1)
  Fishing net, material, replaced every 2 years
  properties: wet mass 1 kg, carbon content, fossil 0.637168, heating value, net 30.9 MJ, dry mass 1 kg
  note on heating value, net: Assumed equal to Nylon-66. Reference: Walters, R. N., Hackett, S. M. and Lyon, R. E. (2000) ‘Heats of combustion of high temperature polymers’, Fire and Materials, 24(5), pp. 245–252. doi: 10.1002/1099-1018(200009/10)24:5<245::AID-FAM744>3.0.CO;2-7.
- chromium steel pipe: 100.2 kg; name chromium_steel_pipe_amount_1; = 6*6*16.7; lognormal variance with pedigree 0.0119, pedigree (2,5,3,3,2)
  Steel pipes, 6 pipes/cage, 6 m pipes, 16.07 kg/m pipe (4", STD 40)
  properties: dry mass 1 kg, carbon content, fossil 0.0008, wet mass 1 kg
- waste plastic, mixture: 0 kg; name BP_amount_2; pedigree (1,1,1,1,1)
  10% of total nylon considered to exit as waste flow
  production volume 0 kg
    Calculated from production volume of reference product using the relative outputs.
  property price 0 EUR2005; name BP_amount_2_price_EUR2005
  properties: carbon content, fossil 0.747344, dry mass 0.847 kg, heating value, net 30.79 MJ, wet mass 1 kg, water content 0.180638
- scrap steel: 0 kg; name BP_amount_3; pedigree (1,1,1,1,1)
  10% of total steel considered to exit as waste flow
  production volume 0 kg
    Calculated from production volume of reference product using the relative outputs.
  property price 0 EUR2005; name BP_amount_3_price_EUR2005
  properties: wet mass 1 kg, dry mass 1 kg
- polyurethane, rigid foam: 1.18484, 2.39916 kg (2 entries); lognormal variance with pedigree 0.0119, pedigree (2,5,3,3,2)
  Floaters, 16 per corner, 280 g each, 80% polyurethane
- waste polyurethane foam: -0.000280903, -0.358119 kg (2 entries); lognormal variance with pedigree 0.0119, pedigree (2,5,3,3,2)
  10% of total polyurethane considered to exit as waste flow
  production volume 0.3584 kg
- waste polyethylene: -0.00862442, -0.000664892, -0.000274624, -0.000260781, -0.00995107, -0.000110945, -5.02847e-5, -0.069663 kg (8 entries); lognormal variance with pedigree 0.0119, pedigree (2,5,3,3,2)
  10% of total plastic considered to exit as waste flow
  production volume 0.0896 kg
- nylon 6-6: 4.1324, 8.3676 kg (2 entries); lognormal variance with pedigree 0.0119, pedigree (2,5,3,3,2)
  Fishing net, material, replaced every 2 years
- waste plastic, mixture: -0.120318, -0.00927584, -0.00383125, -0.00363813, -0.138826, -0.00154778, -0.000701517, -0.971861 kg (8 entries); lognormal variance with pedigree 0.0119, pedigree (2,5,3,3,2)
  10% of total nylon considered to exit as waste flow
  production volume 1.25 kg
- scrap steel: -2.43982, -0.00309117, -7.57709 kg (3 entries); lognormal variance with pedigree 0.0119, pedigree (2,5,3,3,2)
  10% of total steel considered to exit as waste flow
  production volume 10.02 kg

## Extrapolations
This dataset has been extrapolated from year 2017 to the year of the calculation (2021). The uncertainty has been adjusted accordingly.
