# treatment of waste emulsion paint, sanitary landfill

Dataset: EcoSpold 2, unit process
Geography: CH
Time period: 1994-01-01 to 2021-12-31
Technology level: current
Classification: EcoSpold01Categories: waste management/sanitary landfill
Classification: ISIC rev.4 ecoinvent: 3821:Treatment and disposal of non-hazardous waste
Tags: ConvertedDataset; Treatment
Scenario: Business-as-Usual
System model: Allocation, cut-off by classification
Generated by: Gabor Doka (obsolete)
Published in: Doka G. 2007
Database: ecoinvent
isCopyrightProtected: true
accessRestrictedTo: 1

## General comment
Inventoried waste contains 100% Emulsion paint (remains); .
waste composition (wet, in ppm): upper heating value 11.14 MJ/kg; lower heating value 10.51 MJ/kg; H2O n.a.; O 214760; H 31708; C 268330; S n.a.; N n.a.; P n.a.; B n.a.; Cl 86465; Br n.a.; F n.a.; I n.a.; Ag n.a.; As 0.44122; Ba n.a.; Cd 0.016849; Co n.a.; Cr 1.248; Cu n.a.; Hg 0.0085442; Mn n.a.; Mo n.a.; Ni 0.95527; Pb 0.64946; Sb n.a.; Se n.a.; Sn n.a.; V n.a.; Zn 6.5444; Be n.a.; Sc n.a.; Sr n.a.; Ti 135000; Tl n.a.; W n.a.; Si 149810; Fe n.a.; Ca 113920; Al n.a.; K n.a.; Mg n.a.; Na n.a.;
Share of carbon in waste that is biogenic 0%.
Overall degradability of waste during 100 years: 1%.
[This dataset was already contained in the ecoinvent database version 2. It was not individually updated during the transfer to ecoinvent version 3. Life Cycle Impact Assessment results may still have changed, as they are affected by changes in the supply chain, i.e. in other datasets. This dataset was generated following the ecoinvent quality guidelines for version 2. It may have been subject to central changes described in the ecoinvent version 3 change report (http://www.ecoinvent.org/database/ecoinvent-version-3/reports-of-changes/), and the results of the central updates were reviewed extensively. The changes added e.g. consistent water flows and other information throughout the database. The documentation of this dataset can be found in the ecoinvent reports of version 2, which are still available via the ecoinvent website. The change report linked above covers all central changes that were made during the conversion process.]

## Included activities end
Waste-specific short-term emissions to air via landfill gas incineration and landfill leachate. Burdens from treatment of short-term leachate (0-100a) in wastewater treatment plant (including WWTP sludge disposal in municipal incinerator). Long-term emissions from landfill to groundwater (after base lining failure).

## Geography
Technology encountered in Switzerland in 2000. Landfill includes base seal, leachate collection system, treatment of leachate in municipal wastewater treatment plant.

## Technology
Swiss municipal sanitary landfill for biogenic or untreated municipal waste ('reactive organic landfill'). Landfill gas and leachate collection system. Recultivation and monitoring for 150 years after closure.

## Reference product
- waste emulsion paint: -1 kg; By-product classification Waste; CPC 39: Wastes or scraps
  production volume 0 kg
    Sanitary landfill of waste paint is not practiced in Switzerland.
  property carbon content, fossil 0.27
    Tab A.4, ecoinvent v2.2 report 13_I. C content has been calculated after data in the tables, and then referred to 1 kg DM
  property heating value, net 8.18 MJ
    LHV is calculated based on the Carbon content of the product. More details can be found on the respective documentation.
  property price 0 EUR2005
    Waste products are assigned a price of zero as they are assumed to require further treatment.
  property carbon content 0.27
    carbon content on a dry matter basis (reserved; not for manual entry)
  properties: dry mass 1 kg, water in wet mass 0 kg, water content 0, carbon content, non-fossil 0, wet mass 1 kg, carbon allocation 0.27 kg

## Inputs from technosphere
- heat, central or small-scale, other than natural gas: 0.00014194 MJ; lognormal variance with pedigree 0.55, pedigree (5,5,5,5,5)
  burden from wastewater treatment of the short-term leachate (0-100a). Uncertainty calculated from unertainty of the waste composition of this waste, uncertainty in waste decomposition and short-term leaching in sanitary landfill
  properties: heating value, net 1 MJ
- process-specific burdens, residual material landfill: 1.48e-5 kg; lognormal variance with pedigree 0.71, pedigree (1,1,5,1,1)
  burden from incineration of sludge from wastewater treatment of the short-term leachate (0-100a). uncertainty is calculated from uncertainties in waste composition and transfer coefficients in incinerator and uncertainty of waste decomposition and short-term leaching in sanitary landfill;activityLink introduced to establish a direct link to the corresponding regional supply of this product
- chemical, inorganic: 2.28e-12 kg; lognormal variance with pedigree 1.49, pedigree (1,1,5,1,1)
  burden from incineration of sludge from wastewater treatment of the short-term leachate (0-100a). uncertainty is calculated from uncertainties in waste composition and transfer coefficients in incinerator and uncertainty of waste decomposition and short-term leaching in sanitary landfill
  properties: wet mass 1 kg, dry mass 1 kg, carbon content, fossil 0.003
  note on carbon content, fossil: This dataset is an unweighted average of 20 inorganic substances (listed in Tab 88.1, ecoinvent v2.2 report 8, part II), being part of the top100 chemicals included in this database. The C-content has also been calculated as an unweighted average of the C content of the substances composing this dataset.
- waste cement, hydrated: -1.48e-5 kg; lognormal variance with pedigree 0.72, pedigree (1,1,5,1,1)
  (same comment as for chemical, inorganic)
  production volume 0 kg
    Sanitary landfill of waste paint is not practiced in Switzerland.
  properties: wet mass 1 kg, dry mass 1 kg
- wastewater treatment facility, capacity 5E9l/year: 1.42e-11 unit; lognormal variance with pedigree 0.2106, pedigree (5,5,5,5,5)
  (same comment as for heat, central or small-scale, other than natural gas)
- process-specific burdens, sanitary landfill: 1 kg; lognormal variance with pedigree 0.04, pedigree (1,1,5,1,1)
  demands per kilogram waste. uncertainty is heeded in the module;activityLink introduced to establish a direct link to the corresponding regional supply of this product
- process-specific burdens, municipal waste incineration: 0.000378 kg; lognormal variance with pedigree 0.43, pedigree (1,1,5,1,1)
  Burden from incineration of sludge from wastewater treatment of the short-term leachate (0-100a).
  Burden from incineration of sludge from wastewater treatment of the short-term leachate (0-100a).;activityLink introduced to establish a direct link to the corresponding regional supply of this product
- waste plastic, mixture: -3.88e-5 kg; lognormal variance with pedigree 0.2106, pedigree (5,5,5,5,5)
  (same comment as for heat, central or small-scale, other than natural gas)
  production volume 0 kg
    Sanitary landfill of waste paint is not practiced in Switzerland.
  properties: heating value, net 30.79 MJ, water content 0.180638, dry mass 0.847 kg, carbon content, fossil 0.747344, wet mass 1 kg
  note on heating value, net: Value taken from the general comment of the treatment dataset.
  note on carbon content, fossil: C content in 1 kg DM was calculated using data in Tab A.2, ecoinvent v2.2 report 13_I
- iron (III) chloride, without water, in 40% solution state: 2.38e-10 kg; lognormal variance with pedigree 2.01, pedigree (1,1,5,1,1)
  (same comment as for chemical, inorganic)
  properties: wet mass 1 kg, dry mass 1 kg
- residual material landfill: 3.07e-14 unit; lognormal variance with pedigree 0.71, pedigree (1,1,5,1,1)
  (same comment as for chemical, inorganic)
- sanitary landfill facility: 5.56e-10 unit; lognormal variance with pedigree 0.04, pedigree (1,1,5,1,1)
  demands per kilogram waste. uncertainty is heeded in the module
  This exchange has an activity link directly to the producing activity because the product is primarily consumed in the same geographical area where it is produced.
- hydrochloric acid, without water, in 30% solution state: 1.37e-12 kg; lognormal variance with pedigree 1.49, pedigree (1,1,5,1,1)
  (same comment as for chemical, inorganic)
  properties: dry mass 1 kg, wet mass 1 kg, heating value, net 3.32 MJ
- heat, district or industrial, natural gas: 0.00019584 MJ; lognormal variance with pedigree 0.55, pedigree (5,5,5,5,5)
  (same comment as for heat, central or small-scale, other than natural gas)
  properties: heating value, net 1 MJ
- waste graphical paper: -3.88e-5 kg; lognormal variance with pedigree 0.2106, pedigree (5,5,5,5,5)
  (same comment as for heat, central or small-scale, other than natural gas)
  production volume 0 kg
    Sanitary landfill of waste paint is not practiced in Switzerland.
  properties: heating value, net 14.12 MJ, carbon content, non-fossil 0.454955, water content 0.126126, wet mass 1 kg, dry mass 0.888 kg
- sewer grid, 5E9l/year, 110 km: 5.45e-10 km; lognormal variance with pedigree 0.2106, pedigree (5,5,5,5,5)
  (same comment as for heat, central or small-scale, other than natural gas)
- electricity, for reuse in municipal waste incineration only: 5.44e-5 kWh; name E_el_prod_MSWI; lognormal variance with pedigree 0.71, pedigree (1,1,5,1,1)
  (same comment as for chemical, inorganic)
- cement, unspecified: 5.9e-6 kg; lognormal variance with pedigree 0.72, pedigree (1,1,5,1,1)
  (same comment as for chemical, inorganic)
  properties: dry mass 1 kg, wet mass 1 kg
- municipal waste incineration facility: 9.46e-14 unit; lognormal variance with pedigree 0.43, pedigree (1,1,5,1,1)
  Burden from incineration of sludge from wastewater treatment of the short-term leachate (0-100a).
  Burden from incineration of sludge from wastewater treatment of the short-term leachate (0-100a).
- process-specific burdens, slag landfill: 0.000209 kg; lognormal variance with pedigree 0.57, pedigree (1,1,5,1,1)
  (same comment as for process-specific burdens, residual material landfill)
- slag landfill: 3.72e-13 unit; lognormal variance with pedigree 0.57, pedigree (1,1,5,1,1)
  (same comment as for chemical, inorganic)
- heat, for reuse in municipal waste incineration only: 0.000317 MJ; name E_th_prod_MSWI; lognormal variance with pedigree 0.43, pedigree (1,1,5,1,1)
  (same comment as for chemical, inorganic)
- electricity, low voltage: 0.000169 kWh; lognormal variance with pedigree 0.43, pedigree (5,5,5,5,5)
  (same comment as for heat, central or small-scale, other than natural gas)
- chemical, organic: 5.78e-11 kg; lognormal variance with pedigree 2.18, pedigree (1,1,5,1,1)
  (same comment as for chemical, inorganic)
  properties: wet mass 1 kg, dry mass 1 kg, carbon content, fossil 0.628, heating value, net 19.03 MJ
  note on carbon content, fossil: This dataset is an unweighted average of 20 organic substances (listed in Tab 88.1, ecoinvent v2.2 report 8, part II), being part of the top100 chemicals included in this database. The C-content has also been calculated as an unweighted average of the C content of the substances composing this dataset.

## Emissions to nature
- Zinc [air, urban air close to ground]: 3.5e-14 kg; lognormal variance with pedigree 2.18, pedigree (1,1,5,1,1)
  Emissions from short-term leachate treatment and incineration of resulting sludge. Uncertainty calculated depending on waste input and uncertainty of transfer coefficents in landfill, wastewater treatment and incineration model.
- Arsenic, ion [water, surface water]: 6.98e-10 kg; lognormal variance with pedigree 2.29, pedigree (1,1,5,1,1)
  (same comment as for Zinc)
- Silicon [water, surface water]: 4.51e-6 kg; lognormal variance with pedigree 0.9, pedigree (1,1,5,1,1)
  (same comment as for Zinc)
- Zinc, ion [water, ground-, long-term]: 5.4e-6 kg; lognormal variance with pedigree 1.38, pedigree (1,1,5,1,1)
  Emissions from long-term leachate (>100a) directly from MSW landfill and indirectly via incineration of treatement sludge from leachate treatement. Uncertainty calculated depending on waste input and uncertainty of long-term transfer coefficents in landfill.
- Titanium [air, urban air close to ground]: 3.32e-8 kg; lognormal variance with pedigree 0.92, pedigree (1,1,5,1,1)
  (same comment as for Zinc)
- Calcium, ion [water, surface water]: 0.000134 kg; lognormal variance with pedigree 0.77, pedigree (1,1,5,1,1)
  (same comment as for Zinc)
- Chromium [air, urban air close to ground]: 0 kg; pedigree (1,1,1,1,1)
  (same comment as for Zinc)
- Lead [air, urban air close to ground]: 1.27e-15 kg; lognormal variance with pedigree 2.75, pedigree (1,1,5,1,1)
  (same comment as for Zinc)
- Silicon [air, urban air close to ground]: 1.64e-7 kg; lognormal variance with pedigree 0.91, pedigree (1,1,5,1,1)
  (same comment as for Zinc)
- Calcium, ion [water, ground-, long-term]: 0.114 kg; lognormal variance with pedigree 0.15, pedigree (1,1,5,1,1)
  (same comment as for Zinc, ion)
- Mercury [water, surface water]: 1.85e-12 kg; lognormal variance with pedigree 2.66, pedigree (1,1,5,1,1)
  (same comment as for Zinc)
- NMVOC, non-methane volatile organic compounds, unspecified origin [air, urban air close to ground]: 2e-9 kg; lognormal variance with pedigree 1.07, pedigree (1,1,5,1,1)
  (same comment as for Zinc)
- BOD5, Biological Oxygen Demand [water, ground-, long-term]: 0.0176 kg; lognormal variance with pedigree 0.55, pedigree (1,1,5,1,1)
  (same comment as for Zinc, ion)
- Chloride [water, surface water]: 0.00218 kg; lognormal variance with pedigree 0.43, pedigree (1,1,5,1,1)
  Emissions from short-term leachate treatment. Uncertainty calculated depending on waste input and uncertainty of transfer coefficents in landfill and wastewater treatment.
- Silicon [water, ground-, long-term]: 0.00287 kg; lognormal variance with pedigree 4.03, pedigree (1,1,5,1,1)
  (same comment as for Zinc, ion)
- Lead [air, non-urban air or from high stacks]: 1.28e-14 kg; lognormal variance with pedigree 3.72, pedigree (1,1,5,1,1)
  burden from direct release or incineration of landfill biogas. Uncertainty calculated from unertainty of the waste composition of this waste, uncertainty in waste decomposition and short-term leaching in sanitary landfill
- Arsenic, ion [water, ground-, long-term]: 4.41e-7 kg; lognormal variance with pedigree 1.71, pedigree (1,1,5,1,1)
  (same comment as for Zinc, ion)
- Arsenic [air, non-urban air or from high stacks]: 1.11e-11 kg; lognormal variance with pedigree 2.85, pedigree (1,1,5,1,1)
  (same comment as for Lead)
- TOC, Total Organic Carbon [water, surface water]: 1.25e-5 kg; lognormal variance with pedigree 0.9, pedigree (1,1,5,1,1)
  (same comment as for Zinc)
- Cadmium [air, urban air close to ground]: 0 kg; pedigree (1,1,1,1,1)
  (same comment as for Zinc)
- Carbon monoxide, fossil [air, urban air close to ground]: 2.18e-7 kg; lognormal variance with pedigree 0.63, pedigree (1,1,5,1,1)
  (same comment as for Zinc)
- Chloride [water, ground-, long-term]: 0.0843 kg; lognormal variance with pedigree 0.17, pedigree (1,1,5,1,1)
  (same comment as for Zinc, ion)
- Chromium [air, non-urban air or from high stacks]: 3.56e-14 kg; lognormal variance with pedigree 3.59, pedigree (1,1,5,1,1)
  (same comment as for Lead)
- Nickel [air, urban air close to ground]: 0 kg; pedigree (1,1,1,1,1)
  (same comment as for Zinc)
- Mercury [air, urban air close to ground]: 0 kg; pedigree (1,1,1,1,1)
  (same comment as for Zinc)
- Chromium, ion [water, surface water]: 2.23e-13 kg; lognormal variance with pedigree 2.55, pedigree (1,1,5,1,1)
  (same comment as for Zinc)
- Carbon dioxide, fossil [air, non-urban air or from high stacks]: 0.00672 kg; lognormal variance with pedigree 0.46, pedigree (1,1,5,1,1)
  (same comment as for Lead)
- Nickel [air, non-urban air or from high stacks]: 1.39e-13 kg; lognormal variance with pedigree 3.42, pedigree (1,1,5,1,1)
  (same comment as for Lead)
- Cadmium, ion [water, ground-, long-term]: 1.68e-8 kg; lognormal variance with pedigree 1.96, pedigree (1,1,5,1,1)
  (same comment as for Zinc, ion)
- Arsenic [air, urban air close to ground]: 2.23e-13 kg; lognormal variance with pedigree 2.34, pedigree (1,1,5,1,1)
  (same comment as for Zinc)
- COD, Chemical Oxygen Demand [water, ground-, long-term]: 0.0745 kg; lognormal variance with pedigree 0.55, pedigree (1,1,5,1,1)
  (same comment as for Zinc, ion)
- Methane, fossil [air, non-urban air or from high stacks]: 0.00103 kg; lognormal variance with pedigree 0.5, pedigree (1,1,5,1,1)
  (same comment as for Lead)
- Zinc, ion [water, surface water]: 9.59e-10 kg; lognormal variance with pedigree 2.11, pedigree (1,1,5,1,1)
  (same comment as for Zinc)
- Particulates, < 2.5 um [air, non-urban air or from high stacks]: 1.28e-7 kg; lognormal variance with pedigree 0.76, pedigree (1,1,5,1,1)
  (same comment as for Lead)
- Nickel, ion [water, ground-, long-term]: 9.55e-7 kg; lognormal variance with pedigree 1.61, pedigree (1,1,5,1,1)
  (same comment as for Zinc, ion)
- Carbon dioxide, fossil [air, urban air close to ground]: 0.000224 kg; lognormal variance with pedigree 0.9, pedigree (1,1,5,1,1)
  (same comment as for Zinc)
- Silicon [air, non-urban air or from high stacks]: 1.87e-8 kg; lognormal variance with pedigree 1.95, pedigree (1,1,5,1,1)
  (same comment as for Lead)
- Titanium, ion [water, surface water]: 3.42e-5 kg; lognormal variance with pedigree 0.88, pedigree (1,1,5,1,1)
  (same comment as for Zinc)
- Lead [water, surface water]: 4.21e-12 kg; lognormal variance with pedigree 2.69, pedigree (1,1,5,1,1)
  (same comment as for Zinc)
- COD, Chemical Oxygen Demand [water, surface water]: 4.93e-5 kg; lognormal variance with pedigree 0.9, pedigree (1,1,5,1,1)
  (same comment as for Zinc)
- NMVOC, non-methane volatile organic compounds, unspecified origin [air, non-urban air or from high stacks]: 7.2e-9 kg; lognormal variance with pedigree 0.5, pedigree (1,1,5,1,1)
  (same comment as for Lead)
- Lead [water, ground-, long-term]: 6.49e-7 kg; lognormal variance with pedigree 1.66, pedigree (1,1,5,1,1)
  (same comment as for Zinc, ion)
- Mercury [water, ground-, long-term]: 8.54e-9 kg; lognormal variance with pedigree 1.96, pedigree (1,1,5,1,1)
  (same comment as for Zinc, ion)
- DOC, Dissolved Organic Carbon [water, ground-, long-term]: 0.0681 kg; lognormal variance with pedigree 0.55, pedigree (1,1,5,1,1)
  (same comment as for Zinc, ion)
- Chromium VI [water, surface water]: 7.45e-11 kg; lognormal variance with pedigree 2.52, pedigree (1,1,5,1,1)
  (same comment as for Zinc)
- Chromium VI [water, ground-, long-term]: 5.66e-9 kg; lognormal variance with pedigree 8.86, pedigree (1,1,5,1,1)
  (same comment as for Zinc, ion)
- Titanium, ion [water, ground-, long-term]: 0.135 kg; lognormal variance with pedigree 0.14, pedigree (1,1,5,1,1)
  (same comment as for Zinc, ion)
- Nickel, ion [water, surface water]: 3.37e-10 kg; lognormal variance with pedigree 2.34, pedigree (1,1,5,1,1)
  (same comment as for Zinc)
- Titanium [air, non-urban air or from high stacks]: 1.69e-8 kg; lognormal variance with pedigree 1.96, pedigree (1,1,5,1,1)
  (same comment as for Lead)
- DOC, Dissolved Organic Carbon [water, surface water]: 1.2e-5 kg; lognormal variance with pedigree 0.9, pedigree (1,1,5,1,1)
  (same comment as for Zinc)
- Calcium [air, urban air close to ground]: 2.43e-8 kg; lognormal variance with pedigree 0.8, pedigree (1,1,5,1,1)
  (same comment as for Zinc)
- Carbon monoxide, fossil [air, non-urban air or from high stacks]: 3.81e-7 kg; lognormal variance with pedigree 1.1, pedigree (1,1,5,1,1)
  (same comment as for Lead)
- BOD5, Biological Oxygen Demand [water, surface water]: 1.55e-5 kg; lognormal variance with pedigree 0.91, pedigree (1,1,5,1,1)
  (same comment as for Zinc)
- Methane, fossil [air, urban air close to ground]: 4.41e-7 kg; lognormal variance with pedigree 0.95, pedigree (1,1,5,1,1)
  (same comment as for Zinc)
- Zinc [air, non-urban air or from high stacks]: 6.89e-13 kg; lognormal variance with pedigree 3.21, pedigree (1,1,5,1,1)
  (same comment as for Lead)
- Cadmium, ion [water, surface water]: 1.51e-11 kg; lognormal variance with pedigree 2.55, pedigree (1,1,5,1,1)
  (same comment as for Zinc)
- Cadmium [air, non-urban air or from high stacks]: 1.98e-13 kg; lognormal variance with pedigree 3.2, pedigree (1,1,5,1,1)
  (same comment as for Lead)
- Calcium [air, non-urban air or from high stacks]: 3.71e-8 kg; lognormal variance with pedigree 1.86, pedigree (1,1,5,1,1)
  (same comment as for Lead)
- Mercury [air, non-urban air or from high stacks]: 2.34e-12 kg; lognormal variance with pedigree 2.79, pedigree (1,1,5,1,1)
  (same comment as for Lead)
- TOC, Total Organic Carbon [water, ground-, long-term]: 0.0681 kg; lognormal variance with pedigree 0.55, pedigree (1,1,5,1,1)
  (same comment as for Zinc, ion)
- Hydrogen chloride [air, non-urban air or from high stacks]: 3.14e-5 kg; lognormal variance with pedigree 0.96, pedigree (1,1,5,1,1)
  (same comment as for Lead)

## Sampling procedure
Landfill model based on observed leachate concentrations in literature. Extrapolated to 60'000 years heeding chemical characteristics. Initial waste composition from various literature sources.

## Extrapolations
This dataset has been extrapolated from year 2000 to the year of the calculation (2021). The uncertainty has been adjusted accordingly.

## Review by Niels Jungbluth 2003-07-21
Passed. Calculation for standard deviation 95 of, i.e., infrastructure,
land occupation, transport services or other services can differ from
standard Pedigree approach used in this project and figures obtained by
this procedure.
