# argon production, liquid

Dataset: EcoSpold 2, unit process
Geography: RoW
Time period: 1997-01-01 to 2021-12-31
Technology level: current
Classification: ISIC rev.4 ecoinvent: 2011:Manufacture of basic chemicals
Synonyms: EINECS 231-147-0; Argon-40; (41ar)argon; 7440-37-1; UNII-67XQY1V3KH; RGON
Scenario: Business-as-Usual
System model: Allocation, cut-off by classification
Generated by: Alex Primas
Published in: Althaus H.-J. 2007
Database: ecoinvent
isCopyrightProtected: true
accessRestrictedTo: 1

## General comment
This dataset represents the production of 1 kg of liquid argon. Argon is a colorless and odorless noncombustible gas. It is used in the welding, cutting, and spraying of metals. This dataset represents the production of argon by means of the cryogenic air distillation process, including further crude argon purification. Hydrogen is used to purify the liquefied crude argon. For further compressing, distilling and cooling, electricity is used.
References:
Althaus H.-J., Chudacoff M., Hischier R., Jungbluth N., Osses M. and Primas A. (2007) Life Cycle Inventories of Chemicals. Final report ecoinvent data v2.0 No. 8. Swiss Centre for Life Cycle Inventories, Dübendorf, CH.
Häussinger, P., Glatthaar, R., Rhode, W., Kick, H., Benkmann, C., Weber, J., Wunschel, H.-J., Stenke, V., Leicht, E. and Stenger, H. 2001. Noble Gases. Ullmann's Encyclopedia of Industrial Chemistry.
CAMEO Chemicals. Chemical Datasheet, Argon, https://cameochemicals.noaa.gov/chemical/9251 (last accessed on 2017-01-06).

## Included activities start
The activity starts with the input of crude liquid argon and hydrogen obtained in an air distillation plant.

## Included activities end
This activity ends with the production of 1 kg of liquid argon with a purity of 99.999%. The dataset neglects the small amount of waste gas containing mainly H2O, N2 and non-oxidized H2. Other emissions to air and water are not considered. The dataset includes the electricity for processing, and hydrogen for catalytic burning of oxygen. An approximation for additional infrastructure is made.

## Geography
Data from literature. Unknown geographical origin of data. The inventory is assumed to be representative of the global production.

## Technology
The technology represented in this dataset is the catalytic burning of oxygen impurities in argon with hydrogen.
Pure commercial argon (99.999% Ar) is purified from crude argon (96-98% Ar, 2-4% O2, <1% N2) in further rectification columns and catalytic removal of the remaining oxygen impurities with hydrogen.
The crude argon is heated in a heat exchanger and compressed to 4-6 bar. Then the deoxygenating of the stream with hydrogen takes place and the stream is cooled from 950 °C to 15 °C. After further cooling in the heat exchanger, pure argon is separated from excess hydrogen in a distillation column.
It is also possible to pass the crude argon through further rectifying columns and achieve an impurity of only 10 ppm without the use of hydrogen. In this case the consumption of hydrogen would be negligible, but the electricity demand would probably be significant. This alternative purification process is not considered in this inventory. The figure below gives a simplified scheme of the purifying process for crude argon.
Reference: Personal communication, Richard Troxler, Pangas AG Switzerland, 16.01.2002.

## Time period
Time of publications.

## Reference product
- argon, liquid: 1 kg; name RP; By-product classification allocatable product; CPC 34210: Hydrogen, nitrogen, oxygen, carbon dioxide and rare gases; inorganic oxygen compounds of non-metals n.e.c.; CAS 7440-37-1
  Argon (Ar) is a monatomic, chemically inert gas composing slightly less than 0.93% by volume of the air. Argon is colourless, odourless, tasteless, non-corrosive, non-flammable, and non-toxic. Argon is the most abundant and most used of the noble gases. Commercial argon is the product of cryogenic air separation.
  production volume 5.782e8 kg; name RP_PV
    Global production volume was 700000 metric tonnes.
    Reference(s):
    John Emsley, 2011, Nature’s Building Blocks – Everything you need to know about the elements, p. 44, available at: https://books.google.ch/books?id=2EfYXzwPo3UC&pg=PA44&redir_esc=y#v=onepage&q&f=false, accessed 14.06.2017
  property price 0.36 EUR2005
    Calculated value based on data from United Nations Commodity Trade Statistics Database (comtrade.un.org). UN comtrade category: 280421 Argon. Using exchange rate of 1EURO = 1.209 USD. Average of price of import into 5 main markets (EU, US, JP, IN and CN).
  property carbon content 0
    carbon content on a dry matter basis (reserved; not for manual entry)
  properties: wet mass 1 kg, water content 0, water in wet mass 0 kg, dry mass 1 kg, carbon content, non-fossil 0, carbon content, fossil 0, carbon allocation 0 kg

## Inputs from technosphere
- air separation facility: 2e-10 unit; lognormal variance with pedigree 0.65, pedigree (5,5,5,5,5)
  Estimated value. There was no data on the additional infrastructure demand for the argon-purifying step. For the additional infrastructure needed for this step, 30% of the value of the other liquid products was estimated. With this assumption an infrastructure value of 0.2E-10 units per kg of purified argon was calculated.
  Uncertainty: R
- argon, crude, liquid: 1.03 kg; lognormal variance with pedigree 0.2106, pedigree (5,5,5,5,5)
  Calculated value. From the Ar concentration of 97%, the value was set to 1.03.
  Uncertainty: C
  properties: wet mass 1 kg, dry mass 1 kg
- hydrogen, liquid: 0.004 kg; source Cornelissen R. L. and Hirs G. G. 1998; lognormal variance with pedigree 0.192, pedigree (1,1,5,5,1)
  Estimated value. For the purifying of crude argon, according to the source, approximately 0.5 MJ of hydrogen per kg of liquid argon is needed to remove the oxygen impurities. Calculating with a gross calorific value (HHV) of 127.6 MJ per kg of hydrogen, a demand of 0.004 kg H2 per kg of purified argon was calculated.
  properties: wet mass 1 kg, dry mass 1 kg, heating value, net 120.21 MJ
- electricity, medium voltage: 0 kWh; source Cornelissen R. L. and Hirs G. G. 1998; pedigree (1,1,1,1,1)
  Estimated value. The energy required for the purification step of crude argon is needed for the catalytic removal of the oxygen impurities and further cooling and distilling of the pure argon. According to the source, the energy consumption in the argon purifying unit is around 0.667 MJ per kg of liquid argon (exergy loss due to the purification step). Thereof, 75% or 0.5 MJ/kg is needed in the form of hydrogen (gross calorific value), which is used to remove the oxygen impurities. The remaining 0.167 MJ/kg are used for further process steps (compressing, distillation, heat exchanger losses) and are accounted as additional power consumption in the form of electricity.
  Uncertainty: D
- electricity, medium voltage: 0.000584881, 0.000112155, 0.00188285, 0.0273843, 0.00385984, 0.0125759 kWh (6 entries); source Cornelissen R. L. and Hirs G. G. 1998; lognormal variance with pedigree 0.288, pedigree (4,5,5,5,5)
  (same comment as for electricity, medium voltage)

## Sampling procedure
Estimation from literature.

## Extrapolations
Extrapolation from one literature source. This dataset has been copied from an original dataset covering the geography RER. The uncertainty has been adjusted accordingly.

## Review by Gregor Wernet 2017-08-07
This dataset was additionally reviewed in a separate review process by Eric Johnson of Atlantic Consulting as well as Emilia Moreno Ruiz and Gregor Wernet of ecoinvent.
