# treatment of lignite ash, opencast refill

Dataset: EcoSpold 2, unit process
Geography: ES
Time period: 1996-01-01 to 2021-12-31
Technology level: current
Classification: EcoSpold01Categories: waste management/others
Classification: ISIC rev.4 ecoinvent: 3822:Treatment and disposal of hazardous waste
Synonyms: ashes form lignite incineration disposed as backfill in opencast lignite mines
Tags: Treatment; ConvertedDataset
Scenario: Business-as-Usual
System model: Allocation, cut-off by classification
Generated by: Gabor Doka (obsolete)
Published in: Doka G. 2008
Database: ecoinvent
isCopyrightProtected: true
accessRestrictedTo: 1

## General comment
backfilled waste composition is (in ppm): H2O n.a.; O n.a.; H n.a.; C n.a.; S 29768; N n.a.; P 53.274; B 280.46; Cl 6.6684; Br 2.1339; F 6.6684; I 0.26674; Ag n.a.; As 6.5937; Ba 133.37; Cd 0.80682; Co 20.005; Cr 18.672; Cu 7.9878; Hg 0.013355; Mn 26.674; Mo 9.3229; Ni 19.942; Pb 6.6224; Sb 5.3127; Se 2.2428; Sn 2.1339; V 46.615; Zn 37.034; Be 1.3337; Sc 0.66684; Sr 93.294; Ti 133.37; Tl 0.0266; W 1.3337; Si 64017; Fe 7201.9; Ca 26674; Al 6268.3; K 800.21; Mg 4001.1; Na 1200.3;
[This dataset was already contained in the ecoinvent database version 2. It was not individually updated during the transfer to ecoinvent version 3. Life Cycle Impact Assessment results may still have changed, as they are affected by changes in the supply chain, i.e. in other datasets. This dataset was generated following the ecoinvent quality guidelines for version 2. It may have been subject to central changes described in the ecoinvent version 3 change report (http://www.ecoinvent.org/database/ecoinvent-version-3/reports-of-changes/), and the results of the central updates were reviewed extensively. The changes added e.g. consistent water flows and other information throughout the database. The documentation of this dataset can be found in the ecoinvent reports of version 2, which are still available via the ecoinvent website. The change report linked above covers all central changes that were made during the conversion process.]

## Included activities end
This module contains only direct emissions from lignite ash used as backfill in opencast lignite mines: short-term emissions (0-100a) and long-term emissions (>100a) both to ground water. E.g. land-use and energy consumption is *not* included.

## Geography
Ash composition calculated from country-specific coal composition (ES) and technology-specific transfer coefficients in power plant.

## Technology
Lignite ash as backfill in lignite opencast mine (together with tailings)

## Reference product
- lignite ash: -1 kg; CPC 39: Wastes or scraps; By-product classification Waste
  EcoSpold01Location=ES
  production volume 4.10501e8 kg
    Estimated. Electricity and synthetic natural gas production are responsible for more than 90% of lignite use (https://www.lignite.com/about-lignite/lignite-uses/, accessed 20151008) . The production volume is calculated as the sum of lignite ashes resulting from electricity and heat and power co-generation production from lignite, in the respective country.
  property price 0 EUR2005
    Waste products are assigned a price of zero as they are assumed to require further treatment.
  property carbon content 0
    carbon content on a dry matter basis (reserved; not for manual entry)
  properties: carbon content, fossil 0, carbon content, non-fossil 0, water in wet mass 0 kg, wet mass 1 kg, dry mass 1 kg, water content 0, heating value, net 0 MJ, carbon allocation 0 kg

## Emissions to nature
- Cadmium, ion [water, ground-, long-term]: 8.0679e-7 kg; lognormal variance with pedigree 1.64, pedigree (1,1,5,1,1)
  Long-term emission from lignite ash backfill. Uncertainty derived from uncertainty in ash composition and uncertainty in transfer coefficients.
- Tungsten [water, ground-]: 5.1434e-7 kg; lognormal variance with pedigree 1.6, pedigree (1,1,5,1,1)
  Short-term emission from lignite ash backfill. Uncertainty derived from uncertainty in ash composition and uncertainty in transfer coefficients.
- Aluminium [water, ground-, long-term]: 0.0062605 kg; lognormal variance with pedigree 0.46, pedigree (1,1,5,1,1)
  (same comment as for Cadmium, ion)
- Scandium [water, ground-, long-term]: 4.7838e-7 kg; lognormal variance with pedigree 1.67, pedigree (1,1,5,1,1)
  (same comment as for Cadmium, ion)
- Copper, ion [water, ground-, long-term]: 7.9865e-6 kg; lognormal variance with pedigree 1.34, pedigree (1,1,5,1,1)
  (same comment as for Cadmium, ion)
- Scandium [water, ground-]: 1.8846e-7 kg; lognormal variance with pedigree 1.7, pedigree (1,1,5,1,1)
  (same comment as for Tungsten)
- Sulfate [water, ground-]: 0.024039 kg; lognormal variance with pedigree 0.33, pedigree (1,1,5,1,1)
  (same comment as for Tungsten)
- Barium [water, ground-]: 4.6144e-9 kg; lognormal variance with pedigree 2.06, pedigree (1,1,5,1,1)
  (same comment as for Tungsten)
- Lead [water, ground-]: 1.4388e-10 kg; lognormal variance with pedigree 2.52, pedigree (1,1,5,1,1)
  (same comment as for Tungsten)
- Barium [water, ground-, long-term]: 0.00013336 kg; lognormal variance with pedigree 0.96, pedigree (1,1,5,1,1)
  (same comment as for Cadmium, ion)
- Zinc, ion [water, ground-]: 1.9012e-9 kg; lognormal variance with pedigree 2.18, pedigree (1,1,5,1,1)
  (same comment as for Tungsten)
- Arsenic, ion [water, ground-]: 6.5937e-6 kg; lognormal variance with pedigree 1.36, pedigree (1,1,5,1,1)
  (same comment as for Tungsten)
- Thallium [water, ground-, long-term]: 2.656e-8 kg; lognormal variance with pedigree 2.07, pedigree (1,1,5,1,1)
  (same comment as for Cadmium, ion)
- Sodium, ion [water, ground-]: 0.00083162 kg; lognormal variance with pedigree 0.68, pedigree (1,1,5,1,1)
  (same comment as for Tungsten)
- Vanadium, ion [water, ground-]: 2.865e-7 kg; lognormal variance with pedigree 1.53, pedigree (1,1,5,1,1)
  (same comment as for Tungsten)
- Bromine [water, ground-, long-term]: 3.6086e-8 kg; lognormal variance with pedigree 1.53, pedigree (1,1,5,1,1)
  (same comment as for Cadmium, ion)
- Molybdenum [water, ground-, long-term]: 1.2686e-11 kg; lognormal variance with pedigree 1.34, pedigree (1,1,5,1,1)
  (same comment as for Cadmium, ion)
- Iron, ion [water, ground-, long-term]: 0.0048128 kg; lognormal variance with pedigree 0.49, pedigree (1,1,5,1,1)
  (same comment as for Cadmium, ion)
- Bromine [water, ground-]: 2.0978e-6 kg; lognormal variance with pedigree 1.51, pedigree (1,1,5,1,1)
  (same comment as for Tungsten)
- Antimony [water, ground-, long-term]: 3.2638e-6 kg; lognormal variance with pedigree 1.4, pedigree (1,1,5,1,1)
  (same comment as for Cadmium, ion)
- Iodide [water, ground-, long-term]: 2.6674e-14 kg; lognormal variance with pedigree 1.8, pedigree (1,1,5,1,1)
  (same comment as for Cadmium, ion)
- Magnesium [water, ground-, long-term]: 0.0039992 kg; lognormal variance with pedigree 0.52, pedigree (1,1,5,1,1)
  (same comment as for Cadmium, ion)
- Manganese [water, ground-]: 9.2289e-10 kg; lognormal variance with pedigree 2.27, pedigree (1,1,5,1,1)
  (same comment as for Tungsten)
- Lead [water, ground-, long-term]: 6.6223e-6 kg; lognormal variance with pedigree 1.36, pedigree (1,1,5,1,1)
  (same comment as for Cadmium, ion)
- Tin, ion [water, ground-, long-term]: 2.1337e-6 kg; lognormal variance with pedigree 1.51, pedigree (1,1,5,1,1)
  (same comment as for Cadmium, ion)
- Magnesium [water, ground-]: 1.9042e-6 kg; lognormal variance with pedigree 1.27, pedigree (1,1,5,1,1)
  (same comment as for Tungsten)
- Strontium [water, ground-, long-term]: 9.3152e-5 kg; lognormal variance with pedigree 1.01, pedigree (1,1,5,1,1)
  (same comment as for Cadmium, ion)
- Nickel, ion [water, ground-, long-term]: 1.9912e-5 kg; lognormal variance with pedigree 1.22, pedigree (1,1,5,1,1)
  (same comment as for Cadmium, ion)
- Chromium VI [water, ground-, long-term]: 1.8518e-6 kg; lognormal variance with pedigree 1.29, pedigree (1,1,5,1,1)
  (same comment as for Cadmium, ion)
- Titanium, ion [water, ground-]: 1.6583e-7 kg; lognormal variance with pedigree 1.59, pedigree (1,1,5,1,1)
  (same comment as for Tungsten)
- Tin, ion [water, ground-]: 1.6937e-10 kg; lognormal variance with pedigree 2.5, pedigree (1,1,5,1,1)
  (same comment as for Tungsten)
- Phosphate [water, ground-, long-term]: 9.1561e-5 kg; lognormal variance with pedigree 1.17, pedigree (1,1,5,1,1)
  (same comment as for Cadmium, ion)
- Selenium [water, ground-]: 8.6495e-7 kg; lognormal variance with pedigree 1.53, pedigree (1,1,5,1,1)
  (same comment as for Tungsten)
- Copper, ion [water, ground-]: 1.2879e-9 kg; lognormal variance with pedigree 2.23, pedigree (1,1,5,1,1)
  (same comment as for Tungsten)
- Molybdenum [water, ground-]: 9.3229e-6 kg; lognormal variance with pedigree 1.32, pedigree (1,1,5,1,1)
  (same comment as for Tungsten)
- Beryllium [water, ground-, long-term]: 1.3317e-6 kg; lognormal variance with pedigree 1.57, pedigree (1,1,5,1,1)
  (same comment as for Cadmium, ion)
- Chloride [water, ground-, long-term]: 2.8638e-6 kg; lognormal variance with pedigree 1.37, pedigree (1,1,5,1,1)
  (same comment as for Cadmium, ion)
- Nickel, ion [water, ground-]: 3.0241e-8 kg; lognormal variance with pedigree 1.82, pedigree (1,1,5,1,1)
  (same comment as for Tungsten)
- Mercury [water, ground-]: 2.6405e-12 kg; lognormal variance with pedigree 3.02, pedigree (1,1,5,1,1)
  (same comment as for Tungsten)
- Fluoride [water, ground-, long-term]: 5.7985e-6 kg; lognormal variance with pedigree 1.36, pedigree (1,1,5,1,1)
  (same comment as for Cadmium, ion)
- Calcium, ion [water, ground-]: 1.0095e-5 kg; lognormal variance with pedigree 1.07, pedigree (1,1,5,1,1)
  (same comment as for Tungsten)
- Arsenic, ion [water, ground-, long-term]: 6.5937e-15 kg; lognormal variance with pedigree 1.39, pedigree (1,1,5,1,1)
  (same comment as for Cadmium, ion)
- Manganese [water, ground-, long-term]: 2.6673e-5 kg; lognormal variance with pedigree 1.18, pedigree (1,1,5,1,1)
  (same comment as for Cadmium, ion)
- Sulfate [water, ground-, long-term]: 0.065265 kg; lognormal variance with pedigree 0.29, pedigree (1,1,5,1,1)
  (same comment as for Cadmium, ion)
- Fluoride [water, ground-]: 8.6995e-7 kg; lognormal variance with pedigree 1.46, pedigree (1,1,5,1,1)
  (same comment as for Tungsten)
- Selenium [water, ground-, long-term]: 1.3779e-6 kg; lognormal variance with pedigree 1.51, pedigree (1,1,5,1,1)
  (same comment as for Cadmium, ion)
- Aluminium [water, ground-]: 7.794e-6 kg; lognormal variance with pedigree 1.09, pedigree (1,1,5,1,1)
  (same comment as for Tungsten)
- Tungsten [water, ground-, long-term]: 8.1934e-7 kg; lognormal variance with pedigree 1.58, pedigree (1,1,5,1,1)
  (same comment as for Cadmium, ion)
- Boron [water, ground-, long-term]: 0.00017529 kg; lognormal variance with pedigree 0.92, pedigree (1,1,5,1,1)
  (same comment as for Cadmium, ion)
- Zinc, ion [water, ground-, long-term]: 3.7032e-5 kg; lognormal variance with pedigree 1.13, pedigree (1,1,5,1,1)
  (same comment as for Cadmium, ion)
- Boron [water, ground-]: 2.1974e-6 kg; lognormal variance with pedigree 1.26, pedigree (1,1,5,1,1)
  (same comment as for Tungsten)
- Silicon [water, ground-]: 0.00036122 kg; lognormal variance with pedigree 0.64, pedigree (1,1,5,1,1)
  (same comment as for Tungsten)
- Potassium, ion [water, ground-, long-term]: 0.00034866 kg; lognormal variance with pedigree 0.74, pedigree (1,1,5,1,1)
  (same comment as for Cadmium, ion)
- Chromium VI [water, ground-]: 2.8161e-6 kg; lognormal variance with pedigree 1.31, pedigree (1,1,5,1,1)
  (same comment as for Tungsten)
- Potassium, ion [water, ground-]: 0.00045155 kg; lognormal variance with pedigree 0.74, pedigree (1,1,5,1,1)
  (same comment as for Tungsten)
- Iron, ion [water, ground-]: 6.026e-8 kg; lognormal variance with pedigree 1.73, pedigree (1,1,5,1,1)
  (same comment as for Tungsten)
- Cadmium, ion [water, ground-]: 2.2943e-11 kg; lognormal variance with pedigree 2.76, pedigree (1,1,5,1,1)
  (same comment as for Tungsten)
- Antimony [water, ground-]: 2.0489e-6 kg; lognormal variance with pedigree 1.42, pedigree (1,1,5,1,1)
  (same comment as for Tungsten)
- Thallium [water, ground-]: 4.0337e-11 kg; lognormal variance with pedigree 2.67, pedigree (1,1,5,1,1)
  (same comment as for Tungsten)
- Chloride [water, ground-]: 3.8047e-6 kg; lognormal variance with pedigree 1.37, pedigree (1,1,5,1,1)
  (same comment as for Tungsten)
- Strontium [water, ground-]: 1.4147e-7 kg; lognormal variance with pedigree 1.61, pedigree (1,1,5,1,1)
  (same comment as for Tungsten)
- Iodide [water, ground-]: 2.6674e-7 kg; lognormal variance with pedigree 1.78, pedigree (1,1,5,1,1)
  (same comment as for Tungsten)
- Silicon [water, ground-, long-term]: 0.045649 kg; lognormal variance with pedigree 0.23, pedigree (1,1,5,1,1)
  (same comment as for Cadmium, ion)
- Calcium, ion [water, ground-, long-term]: 0.026664 kg; lognormal variance with pedigree 0.29, pedigree (1,1,5,1,1)
  (same comment as for Cadmium, ion)
- Sodium, ion [water, ground-, long-term]: 0.0003687 kg; lognormal variance with pedigree 0.69, pedigree (1,1,5,1,1)
  (same comment as for Cadmium, ion)
- Mercury [water, ground-, long-term]: 1.3353e-8 kg; lognormal variance with pedigree 2.15, pedigree (1,1,5,1,1)
  (same comment as for Cadmium, ion)
- Cobalt [water, ground-, long-term]: 1.9991e-5 kg; lognormal variance with pedigree 1.22, pedigree (1,1,5,1,1)
  (same comment as for Cadmium, ion)
- Vanadium, ion [water, ground-, long-term]: 2.5072e-5 kg; lognormal variance with pedigree 1.2, pedigree (1,1,5,1,1)
  (same comment as for Cadmium, ion)
- Phosphate [water, ground-]: 1.5286e-7 kg; lognormal variance with pedigree 1.75, pedigree (1,1,5,1,1)
  (same comment as for Tungsten)
- Titanium, ion [water, ground-, long-term]: 0.0001332 kg; lognormal variance with pedigree 0.96, pedigree (1,1,5,1,1)
  (same comment as for Cadmium, ion)
- Beryllium [water, ground-]: 2.0225e-9 kg; lognormal variance with pedigree 2.17, pedigree (1,1,5,1,1)
  (same comment as for Tungsten)
- Cobalt [water, ground-]: 1.4326e-8 kg; lognormal variance with pedigree 1.91, pedigree (1,1,5,1,1)
  (same comment as for Tungsten)

## Sampling procedure
country-specific calculation based on literature data

## Extrapolations
This dataset has been extrapolated from year 2000 to the year of the calculation (2021). The uncertainty has been adjusted accordingly.

## Review by Niels Jungbluth 2009-01-22
passed.
