# oil boiler production, 100kW

Dataset: EcoSpold 2, unit process
Geography: RoW
Time period: 1993-01-01 to 2021-12-31
Technology level: current
Classification: ISIC rev.4 ecoinvent: 2815:Manufacture of ovens, furnaces and furnace burners
Classification: EcoSpold01Categories: oil/heating systems
Tags: ConvertedDataset
Scenario: Business-as-Usual
System model: Allocation, cut-off by classification
Generated by: Niels Jungbluth
Published in: Jungbluth, N. 2007
Database: ecoinvent
isCopyrightProtected: true
accessRestrictedTo: 1

## General comment
Inventory for an oil boiler with a life time of 20 years.
[This dataset was already contained in the ecoinvent database version 2. It was not individually updated during the transfer to ecoinvent version 3. Life Cycle Impact Assessment results may still have changed, as they are affected by changes in the supply chain, i.e. in other datasets. This dataset was generated following the ecoinvent quality guidelines for version 2. It may have been subject to central changes described in the ecoinvent version 3 change report (http://www.ecoinvent.org/database/ecoinvent-version-3/reports-of-changes/), and the results of the central updates were reviewed extensively. The changes added e.g. consistent water flows and other information throughout the database. The documentation of this dataset can be found in the ecoinvent reports of version 2, which are still available via the ecoinvent website. The change report linked above covers all central changes that were made during the conversion process.]

## Included activities end
Infrastructure of the boiler, including electric equipment. Energy use for the production. Disposal of the facilities.

## Geography
Data for Swiss and German producers.

## Technology
Oil boiler used in multiple family dwelling.

## Time period
Materials investigated in 1993. Energy use estimated based on environmental report from 1998.

## Parameters
- fraction, process water, to air: 0.15 dimensionless; name fraction_PW_to_air; lognormal variance with pedigree 0.092025, pedigree (4,4,3,2,4)
- fraction, tap water, to air: 0.15 dimensionless; name fraction_TW_to_air; lognormal variance with pedigree 0.092025, pedigree (4,4,3,2,4)

## Reference product
- oil boiler, 100kW: 1 unit; CPC 43410: Furnace burners for liquid fuel, for pulverized solid fuel or for gas; mechanical stokers, mechanical grates, […]; By-product classification allocatable product
  EcoSpold01Location=CH
  production volume 3.96633 unit
    This is a placeholder value that does not reflect real-world production volumes. This dataset does not currently require a real-world production volume to work in the database framework, and no actual data were collected yet. This has no negative effect on the results of the ecoinvent database.
  property price 2350 EUR2005
    EU27 I/O database-68 Electronic machinery (4.02 EURO2003/kg dry soilds) in the 'EU & DK Input Output Database' (available in SimaPro);589 kg

## By-products
- waste paperboard, unsorted: 0 kg; By-product classification Recyclable; CPC 39240: Waste and scrap of paper or paperboard; pedigree (1,1,1,1,1)
  Literature
  EcoSpold01Location=CH
  Uncertainty: Literature
  production volume 0 kg
    Calculated from the production volume of oil boiler, 100kW in proportion to the respective output amounts.
  property price 0.03924 EUR2005
    Temporary price data. Calculated as 90% of purchasers price based on: Assumed to be 10% less than for sorted waste paperboard
  property carbon content, non-fossil 0.483259
    C content was calculated for 1 kg DM, using data in Tab A.3, ecoinvent v2.2 report 13_I.
  property carbon content 0.483259
    carbon content on a dry matter basis (reserved; not for manual entry)
  properties: water in wet mass 0.196 kg, water content 0.243781, carbon content, fossil 0, wet mass 1 kg, dry mass 0.804 kg, heating value, net 15.92 MJ, carbon allocation 0.38854 kg

## Inputs from technosphere
- waste mineral wool, for final disposal: 0 kg; pedigree (1,1,1,1,1)
  Literature
  EcoSpold01Location=CH
  Uncertainty: Literature
  production volume 0 kg
    (same comment as for waste paperboard, unsorted)
  properties: dry mass 1 kg, wet mass 1 kg
- steel, low-alloyed, hot rolled: 485 kg; lognormal variance with pedigree 0.056, pedigree (3,4,5,5,1)
  EcoSpold01Location=RER
  Literature
  Uncertainty: Literature
  properties: wet mass 1 kg, dry mass 1 kg, carbon content, fossil 0.005
  note on carbon content, fossil: Low alloyed steel composition given in Tab. 3.2 ecoinvent v2.2 report 10_partII. Steel assumed to have a C content of 0.5%
- copper, cathode: 25 kg; lognormal variance with pedigree 0.056, pedigree (3,4,5,5,1)
  EcoSpold01Location=RER
  Literature
  Uncertainty: Literature
  properties: wet mass 1 kg, dry mass 1 kg
- alkyd paint, white, without solvent, in 60% solution state: 2.5 kg; lognormal variance with pedigree 0.056, pedigree (3,4,5,5,1)
  Literature
  EcoSpold01Location=RER
  Uncertainty: Literature
  properties: carbon content, non-fossil 0.199629, wet mass 1 kg, dry mass 1 kg, heating value, net 10.3 MJ, carbon content, fossil 0.140367
  note on carbon content, non-fossil: C content was calculated as an addition of C content in the raw materials.
- hazardous waste, for incineration: 0 kg; pedigree (1,1,1,1,1)
  EcoSpold01Location=CH
  Literature
  Uncertainty: Literature
  production volume 0 kg
    (same comment as for waste paperboard, unsorted)
  properties: heating value, net 17 MJ, carbon content, fossil 0.554667, dry mass 0.75 kg, water content 0.333333, wet mass 1 kg
  note on heating value, net: Value taken from the general comment of the treatment dataset.
  note on carbon content, fossil: Tab A.6, ecoinvent v2.2 report 13_I. C content has been calculated after data in the tables, and then referred to 1 kg DM
- polyethylene, high density, granulate: 1.4 kg; lognormal variance with pedigree 0.056, pedigree (3,4,5,5,1)
  Literature
  EcoSpold01Location=RER
  Uncertainty: Literature
  properties: heating value, net 42.47 MJ, dry mass 1 kg, carbon content, fossil 0.857143, wet mass 1 kg
  note on carbon content, fossil: Polyethylene is formed out of a huge amount of ethylene monomers (C2H4) (ecoinvent v2.2 report 11_II). MW=28 g/mol
- brass: 0.05 kg; lognormal variance with pedigree 0.056, pedigree (3,4,5,5,1)
  EcoSpold01Location=CH
  Literature, mixing valve
  Uncertainty: Literature, mixing valve
  properties: dry mass 1 kg, wet mass 1 kg
- steel, chromium steel 18/8, hot rolled: 25 kg; lognormal variance with pedigree 0.056, pedigree (3,4,5,5,1)
  EcoSpold01Location=RER
  Literature
  Uncertainty: Literature
  properties: carbon content, fossil 0.0008, dry mass 1 kg, wet mass 1 kg
  note on carbon content, fossil: Stainless steel model is the grade 304 steel (18/8 stainless, 18% chromium 8% nickel; max. 0.08% C)
- waste plastic, mixture: 0 kg; pedigree (1,1,1,1,1)
  Literature
  EcoSpold01Location=CH
  Uncertainty: Literature
  production volume 0 kg
    (same comment as for waste paperboard, unsorted)
  properties: water content 0.180638, carbon content, fossil 0.747344, dry mass 0.847 kg, wet mass 1 kg, heating value, net 30.79 MJ
  note on carbon content, fossil: C content in 1 kg DM was calculated using data in Tab A.2, ecoinvent v2.2 report 13_I
- electricity, medium voltage: 0 kWh; pedigree (1,1,1,1,1)
  Environmental report
  EcoSpold01Location=CH
  Uncertainty: Environmental report
- wastewater from pig iron production: 0 m3; pedigree (1,1,1,1,1)
  EcoSpold01Location=CH
  Environmental report, 83% of water use, basic uncertainty estimated = 3
  Uncertainty: Environmental report, 83% of water use, basic uncertainty estimated = 3
  production volume 0 m3
    (same comment as for waste paperboard, unsorted)
  properties: carbon content, fossil 1.2149e-5, wet mass 1000 kg, dry mass 0.337476 kg, water content 2962.17
  note on carbon content, fossil: TOC = 0.0000041 kg/m3 (Tab A.19, ecoinvent v2.2 report 13_I). TOC was considered as Total Carbon.
- heat, district or industrial, other than natural gas: 0 MJ; pedigree (1,1,1,1,1)
  Environmental report
  EcoSpold01Location=CH
  Uncertainty: Environmental report
  properties: heating value, net 1 MJ
- brazing solder, cadmium free: 6 kg; lognormal variance with pedigree 0.126, pedigree (3,4,5,5,4)
  EcoSpold01Location=RER
  Approximation for welding anodes
  Uncertainty: Approximation for welding anodes
  properties: wet mass 1 kg, dry mass 1 kg
- tap water: 0 kg; name tap_water_input; pedigree (1,1,1,1,1)
  EcoSpold01Location=RER
  Environmental report, basic uncertainty estimated = 3
  Uncertainty: Environmental report, basic uncertainty estimated = 3
  properties: water content 2962.17, carbon content, fossil 0.00178991, dry mass 0.000337476 kg, wet mass 1 kg
  note on carbon content, fossil: Bicarbonate content is 2.93 mol/m3. CO2 content is 0.1 mol/m3 (ecoinvent v2.2 report 8, Tab 93.1).
- corrugated board box: 0 kg; pedigree (1,1,1,1,1)
  EcoSpold01Location=RER
  Literature
  Uncertainty: Literature
  properties: water content 0.0582011, dry mass 0.945 kg, wet mass 1 kg, carbon content, fossil 0.000656085, carbon content, non-fossil 0.432275, heating value, net 12.86 MJ
  note on carbon content, fossil: Fossil C content was calculated after fossil C contents of chemicals used in the production of board (Tab 10-15 & 10.16 ecoinvent v2.2 report 11_III, part 10)
  note on carbon content, non-fossil: Biogenic C content was calculated after biogenic C contents of chemicals used in the production of board (Tab 10.15 & 10.16, ecoinvent v2.2 report 11_III, part 10).
- stone wool, packed: 19 kg; lognormal variance with pedigree 0.056, pedigree (3,4,5,5,1)
  EcoSpold01Location=CH
  Literature
  Uncertainty: Literature
  properties: wet mass 1 kg, carbon content, fossil 0.015401, dry mass 1 kg
  note on carbon content, fossil: The chemical composition of the glass fibres used in the rock wool production is similar to the composition of naturally cooled volcano basalt and has a composition listed in Tab. 3.1 and 3.2 in ecoinvent v2.2 report 16, part XIV. Rock wool contains: a minimum of 96% mineral fibres,between 0.5 and 3.0 weight percent of phenolic resin depending on the specific product characteristics, and about 0.2 percent mineral oil (ecoinvent v2.2 report 16, part XIV). An average composition of 1.8% phenolic resin, 0.2% mineral oil, and 98% mineral fibres has been assumed and used to calculate C content of the rock wool
- aluminium, cast alloy: 15 kg; lognormal variance with pedigree 0.056, pedigree (3,4,5,5,1)
  Literature
  EcoSpold01Location=RER
  Uncertainty: Literature
  properties: dry mass 1 kg, wet mass 1 kg
- heat, district or industrial, natural gas: 0 MJ; pedigree (1,1,1,1,1)
  EcoSpold01Location=RER
  Environmental report
  Uncertainty: Environmental report
  properties: heating value, net 1 MJ
- waste paperboard, unsorted: -10 kg; lognormal variance with pedigree 0.056, pedigree (3,4,5,5,1)
  Literature
  EcoSpold01Location=CH
  Uncertainty: Literature
  production volume 30 kg
  properties: water content 0.243781, wet mass 1 kg, dry mass 0.804 kg, heating value, net 15.92 MJ, price 0.03924 EUR2005, carbon content, non-fossil 0.483259
  note on carbon content, non-fossil: C content was calculated for 1 kg DM, using data in Tab A.3, ecoinvent v2.2 report 13_I.
- waste mineral wool, for final disposal: -8.18414, -10.8159 kg (2 entries); lognormal variance with pedigree 0.056, pedigree (3,4,5,5,1)
  Literature
  EcoSpold01Location=CH
  Uncertainty: Literature
  production volume 57 kg
- hazardous waste, for incineration: -1.9484, -4.0516 kg (2 entries); lognormal variance with pedigree 0.056, pedigree (3,4,5,5,1)
  EcoSpold01Location=CH
  Literature
  Uncertainty: Literature
  production volume 18 kg
- waste plastic, mixture: -0.155739, -0.0104059, -0.000786978, -0.00429799, -0.00173634, -0.00408134, -0.132697, -1.09026 kg (8 entries); lognormal variance with pedigree 0.056, pedigree (3,4,5,5,1)
  Literature
  EcoSpold01Location=CH
  Uncertainty: Literature
  production volume 4.2 kg
- electricity, medium voltage: 3.37696, 0.647556, 14.8689, 49.2283, 10.8711, 158.111, 22.2858, 72.6105 kWh (8 entries); lognormal variance with pedigree 0.0446, pedigree (2,4,5,5,1)
  Environmental report
  EcoSpold01Location=CH
  Uncertainty: Environmental report
- wastewater from pig iron production: -0.0716253, -0.543375 m3 (2 entries); lognormal variance with pedigree 0.3546, pedigree (2,4,5,5,1)
  (same comment as for wastewater from pig iron production)
  production volume 1.845 m3
- heat, district or industrial, other than natural gas: 0.379636, 22.9243, 936.196 MJ (3 entries); lognormal variance with pedigree 0.0446, pedigree (2,4,5,5,1)
  Environmental report
  EcoSpold01Location=CH
  Uncertainty: Environmental report
- tap water: 6.92402, 0.833466, 1.37744, 296.184, 34.7336, 0.903585, 2.57023, 397.474 kg (8 entries); lognormal variance with pedigree 0.3546, pedigree (2,4,5,5,1)
  (same comment as for tap water)
- corrugated board box: 0.116342, 9.88366 kg (2 entries); lognormal variance with pedigree 0.056, pedigree (3,4,5,5,1)
  EcoSpold01Location=RER
  Literature
  Uncertainty: Literature
- heat, district or industrial, natural gas: 19.2329, 460.858, 1247.91 MJ (3 entries); lognormal variance with pedigree 0.0446, pedigree (2,4,5,5,1)
  EcoSpold01Location=RER
  Environmental report
  Uncertainty: Environmental report

## Emissions to nature
- Water [air, unspecified]: 0.11115 m3; name water_to_air_unspecified; lognormal variance with pedigree 0.0827, pedigree (2,2,5,5,1)
  Calculated value based on literature values and expert opinion. See comments in the parametres' comment field.
  property fraction, origin: fresh water 1; name fraction_origin_fresh_water
  property fraction, origin: unspecified 0; name fraction_origin_unspecified
  property fraction, origin: salt water 0; name fraction_origin_salt_water
- Water [water, unspecified]: 0.01485 m3; name water_to_water_unspecified; lognormal variance with pedigree 0.0827, pedigree (2,2,5,5,1)
  (same comment as for Water)
  property fraction, origin: fresh water 1; name fraction_origin_fresh_water_Ww
  property fraction, origin: salt water 0; name fraction_origin_salt_water_Ww
  property fraction, origin: unspecified 0; name fraction_origin_unspecified_Ww
  property water in wet mass 1000 kg; name WWM
  property wet mass 1000 kg; name WM
  property dry mass 0 kg; name DM
  property carbon content, fossil 0; name C_content_fossil
  property carbon content, non-fossil 0; name C_content_non_fossil

## Sampling procedure
Data provided by manufacturers.

## Extrapolations
Data for Germany used with assumptions for Swiss energy supply. This dataset has been copied from an original dataset covering the geography CH. The uncertainty has been adjusted accordingly.

## Review by Michael Spielmann (obsolete) 2003-07-15
Passed.
