# mine construction, vermiculite

Dataset: EcoSpold 2, unit process
Geography: ZA
Time period: 2000-01-01 to 2021-12-31
Technology level: current
Classification: ISIC rev.4 ecoinvent: 4290:Construction of other civil engineering projects
Classification: EcoSpold01Categories: construction materials/additives
Tags: ConvertedDataset
Scenario: Business-as-Usual
System model: Allocation, cut-off by classification
Generated by: Daniel Kellenberger (obsolete)
Published in: Kellenberger D. 2004
Database: ecoinvent
isCopyrightProtected: true
accessRestrictedTo: 1

## General comment
The mine studied is the Palabora mine in South Africa
[This dataset was already contained in the ecoinvent database version 2. It was not individually updated during the transfer to ecoinvent version 3. Life Cycle Impact Assessment results may still have changed, as they are affected by changes in the supply chain, i.e. in other datasets. This dataset was generated following the ecoinvent quality guidelines for version 2. It may have been subject to central changes described in the ecoinvent version 3 change report (http://www.ecoinvent.org/database/ecoinvent-version-3/reports-of-changes/), and the results of the central updates were reviewed extensively. The changes added e.g. consistent water flows and other information throughout the database. The documentation of this dataset can be found in the ecoinvent reports of version 2, which are still available via the ecoinvent website. The change report linked above covers all central changes that were made during the conversion process.]

## Included activities end
includes land-use (occupation, transformation) for infrastructure, buildings, roads and green areas. The quarried area is not included here, but in the module describing mining activities

## Geography
data are only from one company in South-Africa (Palabora Mining Company ltd.);

## Technology
infrastructure from one of the biggest mines in the world, which is in South-Africa, has been used.

## Reference product
- mine infrastructure, vermiculite: 1 unit; By-product classification allocatable product; CPC 53261: Mining constructions
  EcoSpold01Location=ZA
  production volume 0.021618 unit
    This is a placeholder value that does not reflect real-world production volumes. This dataset does not currently require a real-world production volume to work in the database framework, and no actual data were collected yet. This has no negative effect on the results of the ecoinvent database. The placeholder value of this activity was scaled according to the nominal GDP of 2005 (source: United Nations, http://data.un.org/Glossary.aspx?q=GDP+%28current+US%24%29, accessed 20130726) to reflect an appropriate share of the global production volume, which is also a placeholder value.
  property price 176870 EUR2005
    Calculated based on inputs: The price of the product has been calculated as a sum of the values of the material and energy inputs for this product. This value is therefore a rough estimation. It may underestimate the real price since there are additional expenses when producing any product. These expences can include for example labour costs, treatment of waste materials and profit for the producer. Please consider carefully whether this level of data quality is acceptable for your application.

## Inputs from technosphere
- building, hall: 500 m2; lognormal variance with pedigree 0.172, pedigree (1,4,5,1,1)
  EcoSpold01Location=CH
  Uncertainty: ;
- industrial machine, heavy, unspecified: 100000 kg; lognormal variance with pedigree 0.172, pedigree (1,4,5,1,1)
  EcoSpold01Location=RER
  Uncertainty: ;
- building, multi-storey: 480 m3; lognormal variance with pedigree 0.172, pedigree (1,4,5,1,1)
  EcoSpold01Location=RER
  Uncertainty: ;

## Inputs from nature
- Transformation, to traffic area, road network [natural resource, land]: 52000 m2; lognormal variance with pedigree 0.092, pedigree (1,4,5,1,1)
  Uncertainty: ;
- Transformation, to traffic area, rail network [natural resource, land]: 48400 m2; lognormal variance with pedigree 0.172, pedigree (1,4,5,1,1)
  Uncertainty: ;
- Occupation, traffic area, rail network [natural resource, land]: 9.68e6 m2*year; lognormal variance with pedigree 0.172, pedigree (1,4,5,1,1)
  Uncertainty: ;
- Occupation, traffic area, road network [natural resource, land]: 5.2e6 m2*year; lognormal variance with pedigree 0.172, pedigree (1,4,5,1,1)
  Uncertainty: ;
- Transformation, to industrial area [natural resource, land]: 5.6672e6 m2; lognormal variance with pedigree 0.092, pedigree (1,4,5,1,1)
  Uncertainty: ;
- Occupation, industrial area [natural resource, land]: 5.6672e8 m2*year; lognormal variance with pedigree 0.172, pedigree (1,4,5,1,1)
  Uncertainty: ;
- Transformation, from unspecified [natural resource, land]: 5.72e6 m2; lognormal variance with pedigree 0.092, pedigree (1,4,5,1,1)
  Uncertainty: ;

## Sampling procedure
Data from questionnaire from one company called Parabora mining company ltd. in South-Africa.

## Extrapolations
This dataset has been extrapolated from year 2000 to the year of the calculation (2021). The uncertainty has been adjusted accordingly.

## Review by Roberto Dones 2007-08-16
passed
