# concrete block production

Dataset: EcoSpold 2, unit process
Geography: BR
Time period: 2012-01-01 to 2021-12-31
Technology level: current
Classification: EcoSpold01Categories: construction materials/concrete
Classification: ISIC rev.4 ecoinvent: 2395:Manufacture of articles of concrete, cement and plaster
Scenario: Business-as-Usual
System model: Allocation, cut-off by classification
Share of production covered: 50 %
Generated by: Fernanda Belizario Silva
Published in: Silva, F. B. 2017
Database: ecoinvent
isCopyrightProtected: true
accessRestrictedTo: 1

## General comment
This dataset describes the production of concrete blocks in Brazil. The blocks have a characteristic compressive strength of 4 MPa and are used in non-structural masonry walls and in structural masonry of houses and low-rise buildings. The manufacturing process begins by dosing and mixing the cement, aggregates and water to make concrete. The concrete is transported to the block machine by conveyor belts. In the block machine, the steel cast is filled with concrete and the block is shaped and compacted by vibration. The fresh concrete block is then transported to the curing chambers. The cure can be done in the following ways: 1) naturally, leaving the blocks in closed chambers with no water addition; 2) wet cure, spraying water over the blocks to keep relative humidity high in order to ensure proper hydration of the cement; 3) thermal cure with steam, which enables the cement to hydrate faster than in the wet cure and lowers concrete shrinkage. The blocks are then packed in pallets and stored. The process can happen with various automation levels and different types and sizes of block machines. It is common to produce various block shapes and compressive strength classes in a single factory, as well as concrete pavers.
Concrete dry mass considers the amount of water that reacts with cement to form hydrates. As a consequence, this dataset is not water balanced according to ecoinvent guidelines.
The dataset includes the whole manufacturing process of the concrete block. It does not include administration and infrastructure.
Data collection was performed by the Polytechnic School of the University of São Paulo (EPUSP), the Brazilian Council for Sustainable Construction (CBCS), the Brazilian Association of the Concrete Block Industry (BlocoBrasil) and the Brazilian Association of Portland Cement (ABCP) covering the years of 2012 and 2013 (CBCS, ABCP, BLOCO BRASIL, no date).
This dataset contains data of 25 factories located in 6 different states in the southern and southeastern regions of Brazil, which cover different factory sizes and technologies, thus being representative of the current Brazilian technological mix for concrete block production. The representativeness of the dataset on a national scale is considered good (ca. 50% of the Brazilian concrete block production).
CBCS, ABCP, BLOCOBRASIL. Projeto Avaliação de Ciclo de Vida Modular de Blocos e Pisos de Concreto. Available at: <http://www.blocobrasil.com.br/projetos/cbcs-ciclo-de-vida-modular> . Accessed on 14.09.2017.

## Included activities start
From the reception of raw materials in the concrete block factory.

## Included activities end
This activity ends at the concrete block factory gate. The dataset includes dosing and mixing of concrete, concrete block production by vibration, curing, packing and storage, as well as internal transports. Infrastructure, administration and factory maintenance are not considered due to lack of data.

## Geography
This dataset represents production of concrete blocks representative for Brazil. Data come from primary data collection in Brazil.

## Technology
The dataset covers the main technologies for concrete block production in Brazil.

## Time period
The time period is set to the years 2012-2013 as this was the period of data collection.

## Parameters
- share of fraction C: 0.05 dimensionless; name block_water; lognormal variance with pedigree 0, pedigree (1,1,1,1,1)
  Estimated value. 5% of concrete block mass is water. No losses considered.
- share of fraction B: 0.62 dimensionless; name gravel; lognormal variance with pedigree 0.1489, pedigree (2,2,2,1,1)
  Measured value. Gravel share of the total aggregate consumption of the concrete block factories. No losses considered.
  Uncertainty: Basic uncertainty calculated based on the sample coefficient of variation
- reaction water: 0.0132112 kg; name hydration_water; = 0,23* cement; lognormal variance with pedigree 0, pedigree (1,1,1,1,1)
  Literature value. The water consumed for cement hydration is 23% of the cement mass. No losses considered
- share of fraction A: 0.38 dimensionless; name sand; lognormal variance with pedigree 0.3579, pedigree (2,2,2,1,1)
  Measured value. Sand share of the total aggregate consumption of the concrete block factories. No losses considered.
  Uncertainty: Basic uncertainty calculated based on the sample coefficient of variation
- water input_added water: 6.283e-5 m3; name water_added; = water_river + water_well + ( water_tap/1000); lognormal variance with pedigree 0, pedigree (1,1,1,1,1)
  Calculated value. Total water added to the process. Losses considered.
- fraction, water, to water: 0.5 dimensionless; name water_to_water; lognormal variance with pedigree 0.008, pedigree (1,5,1,1,1)
  Estimated value. Proportion of water that is released as effluent was assumed to be the water added especifically for curing, measured in 01 concrete block factory.
- water input_aggregates: 4.6823e-5 m3; name water_aggregates; = ((water_sand * sand_input)+( water_gravel* gravel_input))/1000; lognormal variance with pedigree 0, pedigree (1,1,1,1,1)
  Calculated value. Water input from aggregates (sand and gravel). Losses considered.
- losses: 0.0117 dimensionless; lognormal variance with pedigree 0.5119, pedigree (2,2,2,1,1)
  Measured value. Weighted average of concrete waste amount reported by the concrete block factories.
  Uncertainty: Basic uncertainty calculated based on the sample coefficient of variation
- water_output: 4.57022e-5 m3; = water_added + water_aggregates - (( hydration_water/1000)*(1+ losses))-(( block_water/1000)*(1+ losses)); lognormal variance with pedigree 0, pedigree (1,1,1,1,1)
  Calculated value. Total output of water, calculated by subtracting the total consumption of water (for cement hydration and as humidity) from the total input of water (from water addition and aggregates). Losses considered.
- cement content: 0.05744 kg/kg; name cement; lognormal variance with pedigree 0.0389, pedigree (2,2,2,1,1)
  Measured value. Cement content in 1 kg of concrete block of 4 MPa compressive strength. No losses considered.
  Uncertainty: Basic uncertainty calculated based on the sample coefficient of variation

## Reference product
- concrete block: 1 kg; CPC 37510: Non-refractory mortars and concretes; By-product classification allocatable product
  EcoSpold01Location=DE
  The dataset represents 1 kg of a 4 MPa hollow concrete block, with dimensions (140 x 390 x 190) mm (width x length x height) and average mass of 12,4 kg, meeting the requirements of the Brazilian technical standard ABNT NBR 6136.
  production volume 1.49e10 kg; name block_volume
    Production volume informed by the Brazilian Association of the Concrete Block Industry.
  property price 0.14 EUR2005
    Calculated value based on data from United Nations Commodity Trade Statistics Database (comtrade.un.org). UN comtrade category: 681011 Building blocks, bricks of cement, or artificial ston.. Year 2005. Using exchange rate of 1EURO = 1.209 USD. Average of price of import into 5 main markets (EU, US, JP, IN and CN).
  property carbon content 0
    carbon content on a dry matter basis (reserved; not for manual entry)
  properties: carbon content, non-fossil 0, dry mass 0.95 kg, wet mass 1 kg, carbon content, fossil 0, water content 0.0526316, water in wet mass 0.05 kg, carbon allocation 0 kg

## Inputs from technosphere
- electricity, medium voltage: 0.00477 kWh; lognormal variance with pedigree 0.2817, pedigree (2,2,5,1,1)
  Measured value. Weighted average of amount informed by the block factories. Losses already considered.
  EcoSpold01Location=DE
  Uncertainty: Basic uncertainty calculated based on the sample coefficient of variation
- heat, district or industrial, other than natural gas: 0.0203814 MJ; = 5,07E-4*1* LHV_fueloil; lognormal variance with pedigree 1.8007, pedigree (2,2,5,1,1)
  Measured value. Weighted average of amounts (consumption of heavy fuel oil in L) informed by the block factories. For those that do not use this fuel source, the value was set to zero. Losses already considered. Heavy fuel oil can be used in boilers to generate steam for curing. Heat generated in furnace was used as a proxy. Density of heavy fuel oil: 1 kg/L (Brazilian National Energy Balance 2016).
  Uncertainty: Basic uncertainty calculated based on the sample coefficient of variation
  property Corresponding fuel use 40.2 MJ; name LHV_fueloil
  properties: heating value, net 1 MJ
  note on Corresponding fuel use: Literature value. Lower heating value of the fuel input related to the heat/electricity output (MJ/kg). Heavy fuel oil.
- sand: 0.355855 kg; name sand_input; = (((1- block_water - hydration_water - cement)* sand)/(1- water_sand))*(1+ losses); lognormal variance with pedigree 0.3991, pedigree (3,2,5,1,1)
  Calculated value. Aggregate mass is the concrete block mass (1kg) minus the water mass, the cement mass and the combined water mass (water that reacted with cement). Only the total consumption of aggregates for the factory was informed, not the exact mix for the concrete block. Thus, it was assumed that the share of the specific aggregate (sand or gravel) is equal regardless of block type, which is a proxy. Losses considered.
  Uncertainty: Basic uncertainty calculated based on the sample coefficient of variation
  property water in wet mass 0.05 kg; name water_sand
  properties: wet mass 1 kg, water content 0.0526316, dry mass 0.95 kg
- propane, burned in building machine: 0.0127937 MJ; = 4,90e-4*0,552*LHV_LPG; lognormal variance with pedigree 1.8087, pedigree (2,2,5,1,1)
  Measured value. Weighted average of amounts (consumption of liquefied petroleum gas in L) informed by the block factories. For those that do not use this fuel source, the value was set to zero. Losses already considered. LPG can be used for internal transport equipment and in boilers to generate steam for curing. Propane is used as a proxy. Density of liquefied petroleum gas: 0,552 kg/L (Brazilian National Energy Balance 2016).
  Uncertainty: Basic uncertainty calculated based on the sample coefficient of variation
  property Corresponding fuel use 47.3 MJ; name LHV_LPG
  properties: heating value, net 1 MJ
  note on Corresponding fuel use: Literature value. Lower heating value of the fuel input related to the heat/electricity output (MJ/kg). Liquefied petroleum gas (propane used as proxy).
- EUR-flat pallet: 1.24091e-5 unit; = (wood_output*-1)/ pallet_mass; lognormal variance with pedigree 1.6501, pedigree (3,2,5,1,1)
  Estimated value. Pallet input equals wood output.
  Uncertainty: Basic uncertainty calculated based on the sample coefficient of variation
  property wet mass 22 kg; name pallet_mass
  properties: carbon content, fossil 0.0311351, water content 0.2, dry mass 18.3333 kg, carbon content, non-fossil 0.58833, heating value, net 335.11 MJ
- waste concrete: -0.0117 kg; = (losses)*-1; lognormal variance with pedigree 0.5517, pedigree (2,2,5,1,1)
  Measured value. Weighted average of amount informed by the block factories. Waste concrete refers to discard of concrete blocks (with defects for instance).
  Uncertainty: Basic uncertainty calculated based on the sample coefficient of variation
  production volume 1.7433e8 kg; = losses * block_volume
    Calculated from production volume of reference product using the relative outputs.
  properties: wet mass 1 kg, water content 0.0526316, dry mass 0.95 kg
- heat, central or small-scale, other than natural gas: 0.021528 MJ; = 1,38e-03* LHV_firewood; lognormal variance with pedigree 4.4717, pedigree (2,2,5,1,1)
  Measured value. Weighted average of amounts (consumption of firewood in kg) informed by the block factories. For those that do not use this fuel source, the value was set to zero. Losses already considered. Firewood can be used in boilers to generate steam for curing. Heat generated in furnace was used as a proxy.
  Uncertainty: Basic uncertainty calculated based on the sample coefficient of variation
  property Corresponding fuel use 15.6 MJ; name LHV_firewood
  properties: heating value, net 1 MJ
  note on Corresponding fuel use: Literature value. Lower heating value of the fuel input related to the heat/electricity output (MJ/kg). Firewood.
- cement, Portland: 0.058112 kg; name cement_input; = cement*(1+ losses); lognormal variance with pedigree 0.0787, pedigree (2,2,5,1,1)
  Calculated value. Weighted average of the cement content without losses informed by manufacturers, multiplied by the loss factor.
  Uncertainty: Basic uncertainty calculated based on the sample coefficient of variation
  properties: wet mass 1 kg, dry mass 1 kg
- tap water: 0.0135 kg; name water_tap; lognormal variance with pedigree 1.1717, pedigree (2,2,5,1,1)
  Measured value. Weighted average of amount informed by the block factories. For those that do not use this water source, the value was set to zero. Losses already considered.
  Uncertainty: Basic uncertainty calculated based on the sample coefficient of variation
  properties: water content 2962.17, wet mass 1 kg, dry mass 0.000337476 kg, carbon content, fossil 0.00178991
  note on carbon content, fossil: Bicarbonate content is 2.93 mol/m3. CO2 content is 0.1 mol/m3 (ecoinvent v2.2 report 8, Tab 93.1).
- diesel, burned in building machine: 0.0146684 MJ; = 4,08e-4* density_diesel* LHV_diesel; lognormal variance with pedigree 1.5587, pedigree (2,2,5,1,1)
  EcoSpold01Location=GLO
  Measured value. Weighted average of amounts informed by the block factories. For those that do not use this fuel source, the value was set to zero. Losses already considered. Diesel can be used for internal transport equipment and in boilers to generate steam for curing.
  Uncertainty: Basic uncertainty calculated based on the sample coefficient of variation
  property density 0.84 kg/l; name density_diesel
  property Corresponding fuel use 42.8 MJ; name LHV_diesel
  properties: heating value, net 1 MJ
  note on Corresponding fuel use: Literature value. Lower heating value of the fuel input related to the heat/electricity output (MJ/kg).
- heat, district or industrial, natural gas: 0.00225197 MJ; = 6,34E-02* 0,74* LHV_NG/1000; lognormal variance with pedigree 2.3037, pedigree (2,2,5,1,1)
  Measured value. Weighted average of amounts (consumption of natural gas in L) informed by the block factories. For those that do not use this fuel source, the value was set to zero. Losses already considered. Natural gas can be used in boilers to generate steam for curing. Density of natural gas = 0,74 kg/m³ (Brazilian National Energy Balance 2016).
  Uncertainty: Basic uncertainty calculated based on the sample coefficient of variation
  property Corresponding fuel use 48 MJ; name LHV_NG
  properties: heating value, net 1 MJ
- gravel, crushed: 0.580605 kg; name gravel_input; = (((1- block_water - hydration_water - cement)* gravel)/(1- water_gravel))*(1+ losses); lognormal variance with pedigree 0.1901, pedigree (3,2,5,1,1)
  Calculated value. Aggregate mass is the concrete block mass (1kg) minus the water mass, the cement mass and the combined water mass (water that reacted with cement). Only the total consumption of aggregates for the factory was informed, not the exact mix for the concrete block. Thus, it was assumed that the share of the specific aggregate (sand or gravel) is equal regardless of block type, which is a proxy. Gravel includes crushed gravel of different sizes and artificial sand. Losses considered.
  Uncertainty: Basic uncertainty calculated based on the sample coefficient of variation
  property water in wet mass 0.05 kg; name water_gravel
  properties: wet mass 1 kg, water content 0.0526316, dry mass 0.95 kg
- waste wood, untreated: -0.000273 kg; name wood_output; lognormal variance with pedigree 1.6487, pedigree (2,2,5,1,1)
  Measured value. Weighted average of amount informed by the block factories. Waste wood refers to discard of used wooden pallets used for packing the blocks.
  Uncertainty: Basic uncertainty calculated based on the sample coefficient of variation
  production volume 4.0677e6 kg; = wood_output * block_volume
    Calculated from production volume of reference product using the relative outputs.
  property price 0 EUR2005; name wood_output_price_EUR2005
  properties: heating value, net 13.99 MJ, water content 0.25, carbon content, non-fossil 0.48632, wet mass 1 kg, dry mass 0.8 kg
  note on heating value, net: Value taken from the general comment of the treatment dataset.

## Inputs from nature
- Water, well, in ground [natural resource, in water]: 4.58e-5 m3; name water_well; lognormal variance with pedigree 0.5847, pedigree (2,2,5,1,1)
  (same comment as for tap water)
- Water, river [natural resource, in water]: 3.53e-6 m3; name water_river; lognormal variance with pedigree 3.0157, pedigree (2,2,5,1,1)
  (same comment as for tap water)

## Emissions to nature
- Water [air, unspecified]: 2.28511e-5 m3; = water_output*(1-water_to_water); lognormal variance with pedigree 0.32, pedigree (4,5,5,1,1)
  Calculated value. Total of water output x fraction of water released to air. See further comments in the parameters field.
  Uncertainty: Basic uncertainty calculated based on the sample coefficient of variation
  property fraction, origin: fresh water 0; name fraction_origin_fresh_water
  property fraction, origin: salt water 0; name fraction_origin_salt_water
  property fraction, origin: unspecified 1; name fraction_origin_unspecified
- Water [water, unspecified]: 2.28511e-5 m3; = water_output*water_to_water; lognormal variance with pedigree 0.32, pedigree (4,5,5,1,1)
  Calculated value. Total of water output x fraction of water released to water. See further comments in the parameters field.
  Uncertainty: Basic uncertainty calculated based on the sample coefficient of variation
  property fraction, origin: salt water 0; name fraction_origin_salt_water_Ww
  property fraction, origin: unspecified 1; name fraction_origin_unspecified_Ww
  property fraction, origin: fresh water 0; name fraction_origin_fresh_water_Ww

## Sampling procedure
Data gathered in 25 concrete block factories located in 6 states in the southern and southeastern regions of Brazil, with good representativeness on a national scale. Data cover different production technologies in terms of automation, factory size and curing options, which explains the variation observed in the unit flows; however, splitting the data into different technologies was not possible, as the companies were not identified nor their production process characterized due to confidentiality issues. Data were collected via questionnaires applied during the project “Modular LCA of concrete blocks”, carried out by EPUSP, CBCS, BLOCOBRASIL and ABCP during the years of 2012 and 2013. Data represent 01 year of operation for each plant.
Unit flows were calculated as a weighted average between the factories, considering their total production volumes (all types of blocks and pavers) in mass. The flows regarding concrete composition of the 4 MPa block were calculated considering the cement content declared by the manufacturers and using mathematical relations for calculating aggregate consumption (described in the exchange comments). The flows regarding electricity, fuel and water consumption, as well as waste generation were calculated by dividing their consumption by the total production of the factory in mass, which means an implicit mass allocation for these items. However, declaring all multiple outputs of different concrete blocks and pavers was not possible due to lack of data - only the total production volumes of the factories were informed. Water evaporation was modelled considering a previous data collection in one concrete block factory (further explanation in the exchange comment field). To account for emissions to air from combustion for steam production for curing, existing ecoinvent heat production processes were used, but as they are not specific to the boilers and other industrial equipment used in the concrete block factory, it is considered a proxy.
Basic uncertainty was calculated based on sample variation. Additional uncertainty was estimated using Pedigree scores.
The amount of the exchanges were calculated considering the weighted average of the sample. No conversion to the geometric mean of the lognormal distribution was done, for consistency reasons with other ecoinvent datasets.

## Extrapolations
This dataset has been extrapolated from year 2013 to the year of the calculation (2021). The uncertainty has been adjusted accordingly.

## Review by Marion Sié 2017-11-21
Very well documented dataset
