# hard coal mine operation

Dataset: EcoSpold 2, unit process
Geography: IN
Time period: 2006-01-01 to 2021-01-01
Technology level: current
Classification: EcoSpold01Categories: hard coal/production
Classification: ISIC rev.4 ecoinvent: 0510:Mining of hard coal
Scenario: Business-as-Usual
System model: Allocation, cut-off by classification
Share of production covered: 10 %
Generated by: P V Kiran Ananth
Published in: P V Kiran Ananth 2017
Database: ecoinvent
isCopyrightProtected: true
accessRestrictedTo: 1

## General comment
The dataset represents the production of 1 Kg hard coal for India. The data values for the dataset is taken from annual reports and other environment statements from Coal India Limited. The activity starts from extraction of coal present under the rock to final loading into vehicles to be sent for transportation. The coal transported here is either directly sent to the users or some amount of the coal (very less amount, less than 5% of total production) is sent to coal preparation facilitites.
The estimated coal reserves in India were 308.80 billion tons as on 31.03.2016. The coal deposits in India are mainly confined to eatern and south central parts of the country.The states of Jharkhand, Odisha, Chattisgarh, West Bengal , Madhya Pradesh , Telangana and Maharashtra account for 98.58 % of the total coal reserve in the country.
India is currently among the top three fastest growing economies of the world. As a natural corollary India's energy needs too are fast expanding with its increased industrialization and capacity addition in Power generation. This is where 'Coal' steps in. In India coal is the critical input for major infrastructure industries like Power, Steel and Cement.
Coal is the most dominant energy source in India's energy scenario.
Coal meets around 55% of primary commercial energy needs in India against 29% the world over.
Around 70% of India's power generation is coal based.
India is the 3rd largest coal producing country in the world after China and USA.
Coal India Limited (CIL) as an organized state owned coal mining corporate came into being in November 1975 with the government taking over private coal mines. CIL Produces around 84% of India's overall coal production
The emission data for emissions to air and emissions to land have been taken from global datasets.

## Included activities start
Mining process starting from hard coal, in ground.

## Included activities end
The activity ends with 1 kg coal at the coal mine. The data set includes electricity consumption, fuel consumption, explosives , emissions to air and water as well as overburden (or spoil ) removed while extracting coal.
Hard coal preparation is not a part of this activity.

## Geography
Region specific.
The coal deposits in India are mainly confined to eatern and south central parts of the country.The states of Jharkhand, Odisha, Chattisgarh, West Bengal , Madhya Pradesh , Telangana and Maharashtra account for 98.58 % of the total coal reserve in the country.

## Technology
Most of coal production in India comes from opencast mining , contributing to almost 90 - 92% while the underground mining is just in the range of 7-8%.
Technology in place for opencast mining: shovel -dumper, dragline, in-pit crushing and conveying, surface miners
Technology in place for underground mining: conventional and mechanised Bord and Pillar with SLD (Side Load Discharge), LHD (Load Haul Dumpers) ; Powered support longwall, continuous miner
The Current data represents the current technology levels prevalent in the coal mine operations in the country and has been collected from both opencast as well as underground mining.

## Time period
Data Collected are collected over the years 2006 - 2016 , They are estimated to be valid till 2020. The data collected has been taken from the annual reports from 2014-15 and statistics of mines in India Volume - 1 (Coal ) for the year 2014 and several other environmental statements available for various mines in india

## Parameters
- fraction, tap water, to air: 0.15 dimensionless; name fraction_TW_to_air; = fraction_PW_to_air; lognormal variance with pedigree 0.092025, pedigree (4,4,3,2,4)
  Calculated value. See comment in the other parametres present in this dataset. Tap water is considered to be always used as process water, thus process water fractions to air are applied to all tap water input flows to calculate the amount of water consumed in the processes.
- fraction, process water, to air: 0.15 dimensionless; name fraction_PW_to_air; lognormal variance with pedigree 0.092025, pedigree (4,4,3,2,4)
  Literature value. In case when no industry/process specific data are available, default evaporation fraction value is used. This value is 15% and is based on literature (Statistics Canada, 2007 & Shaffer, K.H., 2008, Consumptive water use in the Great Lakes Basin, USGS & Shiklomanov, 2003, World Water Resources at the Beginning of the 21st Century) and has been approved by an expert.

## Reference product
- hard coal, run-of-mine: 1 kg; By-product classification allocatable product; CPC 11010: Hard coal
  production volume 6.39234e11 kg; name productionvolume
    Literature Data: The data has been collected from Provisional Coal Statistics - 2015-16. These are published jointly by the Goverment of India, Ministry of Coal and Coal Controller's Organisation - Kolkatta.
  property heating value, net 27.91 MJ
    Based on the Characterization factor of Hard coal in the CED method
  property price 70 EUR2005
    The average hard coal price between 2009 and 2019 was approximately 88USD/tonne. The average exchange rate between 2009 and 2019 was 1.25 EUR/USD. Mind that prices differ depending on coal quality, on whether freight cost and insurance is included etc. This price is an approximate averag world market price for traded (i.e. shipped) coal.
    Reference(s):
    Trading Economics, 2019, Coal, accessed at https://tradingeconomics.com/commodity/coal, July 2019
    Fxtop, 2016, Historical Rates, accessed at https://fxtop.com/en/historical-exchange-rates.php?A=1&C1=EUR&C2=USD&YA=1&DD1=27&MM1=06&YYYY1=2009&B=1&P=&I=1&DD2=27&MM2=06&YYYY2=2019&btnOK=Go%21, July 2019
  property carbon content 0.4111
    carbon content on a dry matter basis (reserved; not for manual entry)
  properties: water content 0.0636034, carbon content, non-fossil 0, water in wet mass 0.0598 kg, wet mass 1 kg, carbon content, fossil 0.4111, dry mass 0.9402 kg, carbon allocation 0.386516 kg

## Inputs from technosphere
- blasting: 0.00115789 kg; lognormal variance with pedigree 0.1202, pedigree (1,1,2,1,1)
  EcoSpold01Location=RER
  Literature Data: Data Value is taken from Statistics of Mines in India - Volume -1 (Coal) - 2014
- diesel, burned in building machine: 0.013754 MJ; lognormal variance with pedigree 0.1208, pedigree (1,3,2,1,1)
  EcoSpold01Location=GLO
  Literature Data: The value is taken from Annual Report for Mahanadi Coal Fields limited for the year 2015-16
  properties: heating value, net 1 MJ
- mine infrastructure, open cast, hard coal: 2.27e-11 unit; lognormal variance with pedigree 0.0002, pedigree (1,1,2,1,1)
  EcoSpold01Location=GLO
  Data from "hard coal mine operations and hard coal preparation"/GLO 2002 (accessed 20170825) has been used as no local Indian data on this exchange are available.
- spoil from hard coal mining: -3.4588 kg; name spoil_fromhardcoal; lognormal variance with pedigree 0.0102, pedigree (1,1,2,1,1)
  EcoSpold01Location=GLO
  Literature Data: Values Taken from Coal India Limited and Singareni Colleries Company Limited annual reports where the production values of coal is given along with the overburden (spoil ) generted from the same.
  The above data for Coal India Limited and Singareni Colleries Company Limited consitutes around 93.37 % of total coal produced in india.
  The data available for the exchange was in cubic meter so to convert into kg the density was taken as 1.648 Kg/cubic meter
  production volume 2.21098e12 kg; = spoil_fromhardcoal*productionvolume
    Calculated from the production volume of hard coal in proportion to the respective output amounts.
  property price 0 EUR2005; name spoil_fromhardcoal_price_EUR2005
  properties: carbon content, fossil 0.007879, wet mass 1 kg, dry mass 1 kg, clay content 0.1394, sand content 0.84176 kg
  note on carbon content, fossil: Composition of coal spoil is adopted by proxy from lignite spoil (pg 19, Doka G. (2009) Life Cycle Inventory of the disposal of lignite spoil, coal spoil and coal tailings. Doka Life Cycle Assessments, Zurich. Commissioned by the Swiss Centre for Life Cycle Inventories ecoinvent Centre)
- sawlog and veneer log, hardwood, measured as solid wood under bark: 6.8924e-8 m3; lognormal variance with pedigree 0.1209, pedigree (2,2,2,1,1)
  Estimation based on Literature data. Total cost consumption for year 2015-16 was used from Coal India Limited's annual financial report. The cost for per meter cube was calculated from s publically available supply orer from Western Coal Fields Limited. Wood is used as support in open cast mines
  properties: heating value, net 6071.3 MJ, dry mass 650 kg, wet mass 1105 kg, water content 0.7, carbon content, non-fossil 0.494
- heat, district or industrial, other than natural gas: 0.0352 MJ; lognormal variance with pedigree 0.128225, pedigree (4,1,2,2,1)
  Data from "hard coal mine operations and hard coal preparation"/GLO 2002 (accessed 20170825) has been used as no local Indian data on this exchange are available. Estimation. Regarding underground mines it is assumed that apart from electricity and diesel consumption also other energy carriers are required. For simplification reasons the consumption of other energy carriers is considered in this module.
  Energy consumption of other energy carriers (apart from diesel and electricity) is not estimated in Hinrichs. However, energy consumption of 110 MJ/ t usable output regarding underground mines is included in the dataset.
  Further references:
  Hinrichs W., Atmaca T., Neumann W., Thormann A. (1999) Stoffmengenflüsse und Energiebedarf bei der Gewinnung ausgewählter mineralischer Rohstoffe. Teistudie Steinkohle. Bundesanstalt für Geowissenschaften und Rohstoffe, Staatliche geologische Dienste in der Bundesrepublik Deutschland. Hannover, Germany.
  EcoSpold01Location=RER
  properties: heating value, net 1 MJ
- reinforcing steel: 0.00049359 kg; lognormal variance with pedigree 0.1284, pedigree (4,2,2,3,1)
  Data from "hard coal mine operations"/GLO (accessed 20170825) has been used as no local Indian data on this exchange are available.
  properties: dry mass 1 kg, carbon content, fossil 0.004, wet mass 1 kg
- mine infrastructure, underground, hard coal: 2.6368e-11 unit; lognormal variance with pedigree 0.0002, pedigree (1,1,2,1,1)
  Data from "hard coal mine operations"/GLO (accessed 20170825) has been used as no local Indian data on this exchange are available.
  EcoSpold01Location=GLO
- electricity, high voltage: 0.01171 kWh; lognormal variance with pedigree 0.1222, pedigree (1,4,2,1,1)
  EcoSpold01Location=UCTE
  Literature data: The data was taken from Annual report of Singareni Colleries Limited for the year 2015-16. The electricity used is withdrawn from grid.
- lubricating oil: 1.26e-5 kg; lognormal variance with pedigree 0.0014, pedigree (1,3,2,1,1)
  Literature Data: The value is taken from Annual report 2015-16 of Mahanadi Coal Fields limited.
  properties: carbon content, fossil 0.75, wet mass 1 kg, heating value, net 40.2 MJ, dry mass 1 kg
  note on carbon content, fossil: Lubricating oil is produced from diesel. C-content/dry mass of fats and oils considered 75%, from: ecoinvent v2.2 report, n 15a, pg 40
  note on heating value, net: Literature value, Source: IPCC 2006, 2006 IPCC Guidelines for National Greenhouse Gas Inventories, Prepared by the National Greenhouse Gas Inventories Programme, Eggleston H.S., Buendia L., Miwa K., Ngara T. and Tanabe K. (eds). Published: IGES, Japan

## Inputs from nature
- Water, well, in ground [natural resource, in water]: 0.00306651 m3; lognormal variance with pedigree 0.0409, pedigree (2,2,2,1,1)
  Calculated value based on literature values. The water details are mentioned in an android app by Western coal fields limited. The water is discharged from mines , the same water is used for process, drinking purpose (both industrial and domestic), The water after treatment is also sent to near by locations for agricultural and drinking purpose. The remaining water is charged into the ground.
- Occupation, dump site [natural resource, land]: 0.0045 m2*year; lognormal variance with pedigree 0.6502, pedigree (1,1,2,1,1)
  Estimated Value : The above data is taken from Environment statements of two open cast mines namely Rajmahal open cast mine and Chitra (east) open cast mine. 50 % of the total land is assumed to be used for extraction and other 50% to be used as dump site.To calculate land occupation mine life was taken as 20 years as mentioned in the environment statment and additional 100 years were considered for revegetation of the mine.
- Coal, hard, unspecified, in ground [natural resource, in ground]: 1.2474 kg; lognormal variance with pedigree 0.0102, pedigree (1,1,2,1,1)
  Data from "hard coal mine operations and hard coal preparation"/GLO 2002 (accessed 20170825) has been used as no local Indian data on this exchange are available. Includes loss of coal for spontaneous fires.
- Gas, mine, off-gas, process, coal mining [natural resource, in ground]: 0.0044 m3; lognormal variance with pedigree 0.128225, pedigree (4,1,2,2,1)
  Data from "hard coal mine operations and hard coal preparation"/GLO 2002 (accessed 20170825) has been used as no local Indian data on this exchange are available.
- Transformation, from unspecified [natural resource, land]: 7.499e-5 m2; lognormal variance with pedigree 0.6522, pedigree (1,4,2,1,1)
  Literature data : The above data is taken from Environment statements of two open cast mines namely Rajmahal open cast mine and Chitra (east) open cast mine
- Transformation, to dump site [natural resource, land]: 3.75e-5 m2; lognormal variance with pedigree 0.6522, pedigree (1,4,2,1,1)
  Literature data : The above data is taken from Environment statements of two open cast mines namely Rajmahal open cast mine and Chitra (east) open cast mine. 50 % of the total land is assumed to be used for extraction and other 50% to be used as dump site.
- Transformation, to mineral extraction site [natural resource, land]: 3.75e-5 m2; lognormal variance with pedigree 0.6522, pedigree (1,4,2,1,1)
  (same comment as for Transformation, to dump site)
- Occupation, mineral extraction site [natural resource, land]: 0.0045 m2*year; lognormal variance with pedigree 0.6502, pedigree (1,1,2,1,1)
  (same comment as for Occupation, dump site)

## Emissions to nature
- Strontium [water, ground-]: 5e-6 kg; lognormal variance with pedigree 0.128225, pedigree (4,1,2,2,1)
  (same comment as for Gas, mine, off-gas, process, coal mining)
- Sulfur dioxide [air, non-urban air or from high stacks]: 0.0013462 kg; lognormal variance with pedigree 0.658225, pedigree (4,1,2,2,1)
  (same comment as for Gas, mine, off-gas, process, coal mining)
- Sulfate [water, ground-]: 0.0005 kg; lognormal variance with pedigree 0.658225, pedigree (4,1,2,2,1)
  (same comment as for Gas, mine, off-gas, process, coal mining)
- Carbon dioxide, fossil [air, non-urban air or from high stacks]: 0.14808 kg; lognormal variance with pedigree 0.658225, pedigree (4,1,2,2,1)
  (same comment as for Gas, mine, off-gas, process, coal mining)
- Aluminium [water, ground-]: 1e-6 kg; lognormal variance with pedigree 0.658225, pedigree (4,1,2,2,1)
  (same comment as for Gas, mine, off-gas, process, coal mining)
- Water [water, ground-]: 0.00122699 m3; lognormal variance with pedigree 0.0409, pedigree (2,2,2,1,1)
  Calculated value based on literature values. The water details are mentioned in an android app by Western coal fields limited. The water is discharged from mines , the same water is used for process, drinking purpose (both industrial and domestic), The water after treatment is also sent to near by locations for agricultural and drinking purpose. The remaining water is charged into the ground. Water to air is calculted to be for evaporation and is considered at 15 % of the total water discharged from mine.
- Nickel, ion [water, ground-]: 1e-7 kg; lognormal variance with pedigree 0.308225, pedigree (4,1,2,2,1)
  (same comment as for Gas, mine, off-gas, process, coal mining)
- Manganese [water, ground-]: 1e-6 kg; lognormal variance with pedigree 0.128225, pedigree (4,1,2,2,1)
  (same comment as for Gas, mine, off-gas, process, coal mining)
- Dissolved solids [water, ground-]: 1.5e-5 kg; lognormal variance with pedigree 0.308225, pedigree (4,1,2,2,1)
  (same comment as for Gas, mine, off-gas, process, coal mining)
- Particulates, > 10 um [air, non-urban air or from high stacks]: 0.00016655 kg; lognormal variance with pedigree 0.340625, pedigree (1,3,5,2,1)
  (same comment as for Gas, mine, off-gas, process, coal mining)
- Chloride [water, ground-]: 0.00534 kg; lognormal variance with pedigree 0.128225, pedigree (4,1,2,2,1)
  (same comment as for Gas, mine, off-gas, process, coal mining)
- Methane, fossil [air, non-urban air or from high stacks]: 0.0015938 kg; lognormal variance with pedigree 0.1208, pedigree (2,1,2,1,1)
  Estimation based on available emission factors for Coal mining in India.
  Following are the emission factors available for India. Methane Emission factor for opencast mining in India (cubic meter / ton of coal mined) is 1.18 for mining operation and 0.15 for post mining activities (handling).
  Similarly for underground mining, the emission factors are dependent on the category of mines. So for a Degree-I mine the emission factor for mining activity is 2.91 (cubic meters per ton) and for post mining activity it is 0.98 (cubic meter per ton). For Degree-II mine the emission factor for mining activity is 13.08 (cubic meters per ton) and for post mining activity it is 2.15 (cubic meter per ton). For a Degree-III mine the emission factor for mining activity is 23.68 (cubic meters per ton) and for post mining activity it is 3.12 (cubic meter per ton).Production of coal from underground mines is estimated to be equally divided into degree-I, Degree-II and Degree - III mines.
  The above emission factors are taken from GHG platform India 2005-2013 National Estimates - 2017 Series. These can be referred in a excel file available at http://www.ghgplatformindia.org/electricityenergy-sector under the section Download: Phase 2 (2005- 2013) National Level Estimate.
  The density of methane is taken as 0.68 Kg/cubic meter, the same value is taken while converting from meter cube to kg. The same is also mentioned in the above source.
  The total production of coal for the year 2015-16 was 639.234 million tons, out of which approx. 7.26% is from underground mines and remaining 92.739% is from opencast mines. These values have been used proportionately with respective emission factors to come up with the final value for methane in the dataset.
- Water [air, unspecified]: 0.000459977 m3; name water_to_air_unspecified; lognormal variance with pedigree 0.0409, pedigree (2,2,2,1,1)
  Calculated value based on literature values. The water details are mentioned in an android app by Western coal fields limited. The water is discharged from mines , the same water is used for process, drinking purpose (both industrial and domestic), The water after treatment is also sent to near by locations for agricultural and drinking purpose. The remaining water is charged into the ground. Water to air is calculated to be for evaporation and is considered at 15 % of the total water discharged from mine.
  property fraction, origin: fresh water 1; name fraction_origin_fresh_water
  property fraction, origin: salt water 0; name fraction_origin_salt_water
  property fraction, origin: unspecified 0; name fraction_origin_unspecified
- Ammonium, ion [water, ground-]: 1e-6 kg; lognormal variance with pedigree 0.658225, pedigree (4,1,2,2,1)
  (same comment as for Gas, mine, off-gas, process, coal mining)
- Water [water, unspecified]: 0.00137954 m3; name water_to_water_unspecified; lognormal variance with pedigree 0.0409, pedigree (2,2,2,1,1)
  (same comment as for Water, well, in ground)
  property fraction, origin: unspecified 0; name fraction_origin_unspecified_Ww
  property wet mass 1000 kg; name WM
  property fraction, origin: fresh water 1; name fraction_origin_fresh_water_Ww
  property fraction, origin: salt water 0; name fraction_origin_salt_water_Ww
  property dry mass 0 kg; name DM
  property carbon content, fossil 0; name C_content_fossil
  property water in wet mass 1000 kg; name WWM
  property carbon content, non-fossil 0; name C_content_non_fossil
- Radon-222 [air, non-urban air or from high stacks]: 0.016308 kBq; lognormal variance with pedigree 0.6502, pedigree (1,1,2,1,1)
  (same comment as for Gas, mine, off-gas, process, coal mining)
- Zinc, ion [water, ground-]: 1e-7 kg; lognormal variance with pedigree 0.308225, pedigree (4,1,2,2,1)
  (same comment as for Gas, mine, off-gas, process, coal mining)
- Iron, ion [water, ground-]: 2e-6 kg; lognormal variance with pedigree 0.658225, pedigree (4,1,2,2,1)
  (same comment as for Gas, mine, off-gas, process, coal mining)
- Solids, inorganic [water, ground-]: 6.8e-5 kg; lognormal variance with pedigree 0.658225, pedigree (4,1,2,2,1)
  (same comment as for Gas, mine, off-gas, process, coal mining)
- Fluoride [water, ground-]: 3e-6 kg; lognormal variance with pedigree 0.128225, pedigree (4,1,2,2,1)
  (same comment as for Gas, mine, off-gas, process, coal mining)

## Sampling procedure
The data is collected from various secondary sources available. Various annual reports from Coal India Limited , Ministry of Coal were used for collection of the data. Some Environmental statments were also used for data collection.Some of the data points like spoil , methane emissions , explosives, have a representativeness of more than 80 % of coal mines in India. Some other data like diesel, electricity the representativeness is a little less around 20-25%. For the remaining data like land transformation and occupation data have been taken from only few mines (< 5 %). The emissions to air (other than methane) and emissions to land have been taken from the global datasets. The emission value for the air and water emissions have been kept same as in the global data set without any proportions done accorfing to the technology. Methane has been calcualted from the emission factors available at the GHG platform India 2005-2013 National Estimates - 2017 Series and have been proportioned according to the technology levels.

## Extrapolations
This dataset has been extrapolated from year 2020 to the year of the calculation (2021). The uncertainty has been adjusted accordingly.
