# steel production, electric, low-alloyed

Dataset: EcoSpold 2, unit process
Geography: CA-QC
Time period: 2011-01-01 to 2021-12-31
Technology level: current
Classification: ISIC rev.4 ecoinvent: 2410:Manufacture of basic iron and steel
Classification: EcoSpold01Categories: metals/extraction
Synonyms: secondary steel alloy
Scenario: Business-as-Usual
System model: Allocation, cut-off by classification
Share of production covered: 3 %
Generated by: Marylène Dussault
Database: ecoinvent
isCopyrightProtected: true
accessRestrictedTo: 1

## General comment
This dataset represents the manufacturing of large alloyed steel slabs (2 to 25 tonnes). Iron scrap is used as the main iron bearing input. Iron based alloys are added to acheived desired steel alloy composition. This dataset is based on data from the foundry department of an integrated forge.

## Included activities start
Activity starts with the arrival of iron scrap at the electric arc furnace

## Included activities end
This activity ends with the casting in ingot molds and cooling of alloyed steel slabs. The dataset includes: the foundry processes (including scrap metal input, EAF melting, ladle oven, alloying, degassing, and ingot casting)

## Geography
Dataset is representative of the Québec region.

## Technology
Quebec technology. An average for different alloys is represented.

## Parameters
- electricity, electric arc furnace: 0.641021 kWh; name kWh_EAF; lognormal variance with pedigree 0.0032, pedigree (2,4,1,1,1)
  Measured value. Electricity consumption for melting of steel scrap in electric arc furnace.
- electricity, ladler furnace: 0.113121 kWh; name kWh_ladler; lognormal variance with pedigree 0.0032, pedigree (2,4,1,1,1)
  Measured value. Electricity consumption for ladler furnace for alloying.

## Reference product
- steel, low-alloyed: 1 kg; name RefProd; By-product classification allocatable product; CPC 41122: Alloy steel in ingots or other primary forms and semi-finished products of alloy steel
  production volume 8.58409e7 kg; name PV_RefProd
    Calculated from Canada's production volume through the EAF route in 2019 (worldsteel 2020), considering that Quebec produces 20% of Canada's steel (KPMG, 2017).
    Globally, 89% of the steel produced is unalloyed and 11% is alloyed (Gerbens-Leenes et al. 2018). Based on the amount of stainless (chromium) steel produced globally (ISSF 2021), 8.2% of the steel produced is low-alloyed and 2.8% is stainless. Therefore, out of the steel that is not stainless steel, 91.6% is unalloyed and 8.4% is low-alloyed. These shares are assumed valid for Quebec as well.
    References:
    worldsteel (2020). Steel Statistical Yearbook 2020 [online]. Available from: https://www.worldsteel.org/en/dam/jcr:5001dac8-0083-46f3-aadd-35aa357acbcc/Steel%2520Statistical%2520Yearbook%25202020%2520%2528concise%2520version%2529.pdf (accessed 20.07.2021).
    P.W. Gerbens-Leenes, A.Y. Hoekstra, R. Bosman (2018). The blue and grey water footprint of construction materials: Steel, cement and glass. Water Resources and Industry, Volume 19. https://doi.org/10.1016/j.wri.2017.11.002.
    KPMG/S.E.N.C.R.L, 2017. Portait de l`industie quebecoise de la metallurgie, Rapport final, Ministere de l`Economy, de la Science et de l`Inovation. Availble from: https://www.economie.gouv.qc.ca/fileadmin/contenu/documents_soutien/secteur_activites/metallurgie/kpmg_portrait_metallurgie_2018.pdf (accessed 21.07.2021).
  property price 0.468 EUR2005; name RefProd_price_EUR2005
    Calculated from EU prices by use of exchange rates.
  property heating value, net 0 MJ
    Non combustible products are assumed to have an LHV equal to zero (0).
  property carbon content 0.005
    carbon content on a dry matter basis (reserved; not for manual entry)
  properties: carbon content, non-fossil 0, wet mass 1 kg, water in wet mass 0 kg, carbon content, fossil 0.005, water content 0, dry mass 1 kg, carbon allocation 0.005 kg

## By-products
- iron scrap, unsorted: 0 kg; CPC 39310: Slag, dross, scalings and other waste from the manufacture of iron or steel; By-product classification Recyclable; pedigree (1,1,1,1,1)
  Measured value. Represents pig iron molds for casting of steel alloys. The molds are send to recycling after their useful life.
  production volume 0 kg; = PV_RefProd*scrap/Refprod
    Calculated from production volume of reference product using the relative outputs.
  property price 0.149 EUR2005; name scrap_price_EUR2005
    Temporary price data. Calculated as 90% of purchasers price based on: estimated at 85% of sorted scrap
  property carbon content 0
    carbon content on a dry matter basis (reserved; not for manual entry)
  properties: water in wet mass 0 kg, wet mass 1 kg, dry mass 1 kg, water content 0, carbon content, non-fossil 0, carbon content, fossil 0, carbon allocation 0 kg

## Inputs from technosphere
- ferrosilicon: 0.0037 kg; name FeSi; lognormal variance with pedigree 0.0112, pedigree (2,4,4,1,1)
  Calculated value. Arc furnace and ladler alloy additive. Calculation based on measured data.
  properties: wet mass 1 kg, heating value, net 3.03 MJ, carbon content, fossil 0.1, dry mass 1 kg
- molybdenum trioxide: 0.002 kg; name MoO3; lognormal variance with pedigree 0.0112, pedigree (2,4,4,1,1)
  (same comment as for ferrosilicon)
  property bismuth content 8e-5; name MoO3_Bi_content
  property sulfur content 0.0003; name MoO3_S_content
  property iron content 0.0044; name MoO3_Fe_content
  property oxygen content 0.29; name MoO3_O_content
  property copper content 0.0006; name MoO3_Cu_content
  property molecular weight 143.9 g/mol; name MoO3_mol_weight
  property lead content 0.00015; name MoO3_Pb_content
  property molybdenum content 0.62; name MoO3_Mo_content
- spent solvent mixture: -4.7e-6 kg; name glycol; lognormal variance with pedigree 0.0112, pedigree (2,4,4,1,1)
  Approximated process. Output for spent ethylene glycol. Value from measurements.
  production volume 403.452 kg; = PV_RefProd*glycol/Refprod
    Calculated from production volume of reference product using the relative outputs.
  property price 0 EUR2005; name glycol_price_EUR2005
  properties: water content 0.197605, wet mass 1 kg, heating value, net 21.7 MJ, carbon content, fossil 0.571257, dry mass 0.835 kg
  note on heating value, net: Value taken from the general comment of the treatment dataset.
  note on carbon content, fossil: Tab A.7, ecoinvent v2.2 report 13_I. C content has been calculated after data in the tables, and then referred to 1 kg DM
- electric arc furnace dust: -0.00847765 kg; name dust; lognormal variance with pedigree 0.0112, pedigree (2,4,4,1,1)
  Approximation. Reported as dust from EAF and ladlers. Value from measurements.
  EcoSpold01Location=CH
  production volume 727729 kg; = PV_RefProd*dust/Refprod
    Calculated from production volume of reference product using the relative outputs.
  property price 0 EUR2005; name dust_price_EUR2005
  properties: water content 0.182033, carbon content, fossil 0.01339, dry mass 0.846 kg, wet mass 1 kg
- inert waste, for final disposal: -0.005 kg; name inert; lognormal variance with pedigree 0.0438, pedigree (2,3,5,5,2)
  Approximation. Taken directly from ecoinvent v3.0 dataset "steel, electric, low-alloyed, GLO, 2001".
  EcoSpold01Location=CH
  production volume 429205 kg; = PV_RefProd*inert/Refprod
    Calculated from production volume of reference product using the relative outputs.
  property price 0 EUR2005; name inert_price_EUR2005
  properties: water content 0.00502513, dry mass 0.995 kg, wet mass 1 kg
- anode, for metal electrolysis: 0.00551 kg; lognormal variance with pedigree 0.0112, pedigree (2,4,4,1,1)
  EcoSpold01Location=RER
  Approximated process. Reported as graphite electrode. Value based on measurements.
  properties: carbon content, fossil 0.865971, dry mass 1 kg, wet mass 1 kg
  note on carbon content, fossil: The main component of the anode is carbon, coming from bitumen and petroleum coke (ecoinvent v2.2 report 10). The C content in those components of the anode has been taken into account to calculate the anode final C content.
- electric arc furnace converter: 4e-11 unit; lognormal variance with pedigree 0.5, pedigree (5,5,5,5,5)
  Approximation. Taken directly from ecoinvent v3.0 dataset "steel, electric, low-alloyed, GLO, 2001".
  EcoSpold01Location=RER
- ferromanganese, high-coal, 74.5% Mn: 0.0063 kg; lognormal variance with pedigree 0.0112, pedigree (2,4,4,1,1)
  (same comment as for ferrosilicon)
  properties: dry mass 1 kg, heating value, net 2.27 MJ, carbon content, fossil 0.075, wet mass 1 kg
- diesel, burned in building machine: 0.00346084 MJ; = Lfuel_input*diesel_density*Net_Heat_Value*36.3; lognormal variance with pedigree 0.008, pedigree (1,1,4,1,1)
  Calculated value. Based on reported fuel input (in l). Diesel used for machining and internal transportation.
  Uncertainty: Calculated variable. Uncertainty will be determined from propagation of uncertainty factors of underlying variables. Uncertainty of actual relation between variables not accounted for at this time, although this could be included in a future update.
  property fuel input in physical units, L 0.0001135 l; name lfuel_input
  property density 0.84 kg/l; name diesel_density
  property heating value, net 1 MJ; name Net_Heat_Value_1
  note on density: Density value. Value Taken from Table 5.1 of report "Overview and methodology, Data quality guideline for the ecoinvent database version 3" (ecoinvent report No. 1 (v3), 2011)
  note on heating value, net: Net (lower) heating (calorific) value. Value Taken from Table 5.1 of report "Overview and methodology, Data quality guideline for the ecoinvent database version 3" (ecoinvent report No. 1 (v3), 2011)
- ethylene glycol: 4.7e-6 kg; = (glycol*-1); lognormal variance with pedigree 0.008, pedigree (1,1,4,1,1)
  Calculated value. From amount of treated glycol waste. Assumed no lost.
  Uncertainty: Calculated variable. Uncertainty will be determined from propagation of uncertainty factors of underlying variables. Uncertainty of actual relation between variables not accounted for at this time, although this could be included in a future update.
  property carbon content, fossil 0.387097; name C_glycol
  properties: dry mass 1 kg, heating value, net 23.44 MJ, wet mass 1 kg
- heat, district or industrial, natural gas: 2.44707 MJ; = m3fuel_input*Net_Heat_Value*36.3/fuel_use; lognormal variance with pedigree 0.008, pedigree (1,1,4,1,1)
  Calculated based on reported fuel input (in kg), the Net Heating Value of the fuel and assumed efficiency (1/Fuel_use). Gas burned in 4,3 MV boilers, in ladler pre-heaters and degasing boiler, the power rating of the other equipments and the efficiency of all equipments are not known,
  Uncertainty: Calculated variable. Uncertainty will be determined from propagation of uncertainty factors of underlying variables. Uncertainty of actual relation between variables not accounted for at this time, although this could be included in a future update.
  property Corresponding fuel use 1.0417 MJ; name fuel_use
  property fuel input in m3 0.0702236 m3; name m3fuel_input
  property heating value, net 1 MJ; name Net_Heat_Value
  note on Corresponding fuel use: Lower heating value of the fuel input related to the heat/electricity output. Assume a 96% energy efficiency based on Section 5.3.6 of report "Life cycle Inventories of Energy Systems, Results for Current Systems in Switzerland and other UCTE Countries" (ecoinvent report No. 5, 2007)
  note on fuel input in m3: Measured value. Natural gas input for furnaces, boilers and other equipments.
- oxygen, liquid: 0.0071 kg; lognormal variance with pedigree 0.0112, pedigree (2,4,4,1,1)
  Mesured value. Oxygen used in arc furnace and small cutter equipment.
  properties: dry mass 1 kg, wet mass 1 kg
- cast iron: 0.007285 kg; lognormal variance with pedigree 0.0112, pedigree (2,4,4,1,1)
  Measured value. Represents pig iron molds for casting of steel alloys.
  properties: dry mass 1 kg, wet mass 1 kg, carbon content, fossil 0.04
  note on carbon content, fossil: Cast iron is made by remelting pig iron in small furnaces (e.g. cupola furnaces or electric arc furnaces) and poured into moulds to make castings. It usually contains 2% to 6% carbon (ecoinvent v2.2 report 10_partII). An average content of 4% was considered
- electric arc furnace slag: -0.22114 kg; name slag; lognormal variance with pedigree 0.0112, pedigree (2,4,4,1,1)
  EcoSpold01Location=CH
  Measured value. Reported as slag that could containt an unkown quantity of refractory material.
  production volume 1.89829e7 kg; = PV_RefProd*slag/Refprod
    Calculated from production volume of reference product using the relative outputs.
  property price 0 EUR2005; name slag_price_EUR2005
  properties: wet mass 1 kg, carbon content, fossil 0.00338635, dry mass 1 kg
- iron scrap, sorted, pressed: 1.12089 kg; lognormal variance with pedigree 0.0112, pedigree (2,4,4,1,1)
  Measured value. Post-consummer steel. The unused scrap which resold without going through the industrial process was excluded.
  properties: dry mass 1 kg, wet mass 1 kg
- hard coal: 0.014 kg; lognormal variance with pedigree 0.0438, pedigree (2,3,5,5,2)
  EcoSpold01Location=UCTE
  Approximation. Taken directly from ecoinvent v3.0 dataset "steel, electric, low-alloyed, GLO, 2001".
  properties: dry mass 0.94 kg, heating value, net 27.91 MJ, water content 0.0638298, wet mass 1 kg, carbon content, fossil 0.845
  note on heating value, net: Based on the Characterization factor of Hard coal in the CED method
  note on carbon content, fossil: C content 75-94% (specified in Tab 1.1, report 6, part VI). A mean content of 0.845 kg C/ kg dry hard coal was considered
- quicklime, in pieces, loose: 0.04512 kg; lognormal variance with pedigree 0.0112, pedigree (2,4,4,1,1)
  EcoSpold01Location=CH
  Measured value. Ladler and EAF additives
  properties: dry mass 0.99 kg, wet mass 1 kg, water content 0.010101
- refractory, basic, packed: 0.02749 kg; lognormal variance with pedigree 0.0112, pedigree (2,4,4,1,1)
  Approximation. Represents 250 exact types of refractories used. Value based on measurements.
  EcoSpold01Location=DE
  properties: dry mass 1 kg, wet mass 1 kg
- ferrochromium, high-carbon, 68% Cr: 0.016 kg; lognormal variance with pedigree 0.0126, pedigree (3,4,4,1,1)
  (same comment as for ferrosilicon)
  properties: heating value, net 2.12 MJ, wet mass 1 kg, dry mass 1 kg, carbon content, fossil 0.07
- electricity, medium voltage: 0.754142 kWh; = kWh_EAF+kWh_ladler; lognormal variance with pedigree 0.008, pedigree (1,1,4,1,1)
  EcoSpold01Location=UCTE
  Calculated value. Usage of medium voltage for steel production equipment.
  Uncertainty: Calculated variable. Uncertainty will be determined from propagation of uncertainty factors of underlying variables. Uncertainty of actual relation between variables not accounted for at this time, although this could be included in a future update.
- nickel, class 1: 0.0047 kg; lognormal variance with pedigree 0.0112, pedigree (2,4,4,1,1)
  (same comment as for ferrosilicon)
  properties: wet mass 1 kg, dry mass 1 kg
- argon, liquid: 0.00329043 kg; name Argon; = Ar* density_Ar; lognormal variance with pedigree 0.008, pedigree (1,1,4,1,1)
  Calculated value. Based on measured volume data for liquid Argon. For degrasing.
  Uncertainty: Calculated variable. Uncertainty will be determined from propagation of uncertainty factors of underlying variables. Uncertainty of actual relation between variables not accounted for at this time, although this could be included in a future update.
  property density argon 1.69 kg/m3; name density_Ar
  property volume 0.001947 m3; name Ar
  properties: dry mass 1 kg, wet mass 1 kg
  note on density argon: Calculated value. Density of argon for 1 Nm3 (1m3 at 1atm and 15 Celsius)commercial state of argon (cryogenic liquid), but volume corrected to Nm3. Calculated using PV=nRT and MM of argon (39.95g/mol).
  note on volume: Measured data. Volume used of argon per kg of steel alloyed produced.
- electricity, low voltage: 0.03456 kWh; lognormal variance with pedigree 0.0112, pedigree (2,4,4,1,1)
  Measured value. Reprensents electricity consumption for auxiliaries (general plant expense, pumping, heating, compressor, engineering and maintenance). Usage of electricity low voltage ranging from at 600V and 120V.
- propane, burned in building machine: 0.00273006 MJ; = Lpropane_input*propane_density*NHV_propane*46.46; lognormal variance with pedigree 0.008, pedigree (1,1,4,1,1)
  Calculated based on reported fuel input (in l), Reported propane use is for cutting and forklift operations.
  Uncertainty: Calculated variable. Uncertainty will be determined from propagation of uncertainty factors of underlying variables. Uncertainty of actual relation between variables not accounted for at this time, although this could be included in a future update.
  property heating value, net 1 MJ; name NHV_propane
  property fuel input in physical units, L 0.0001141 l; name Lpropane_input
  property density 0.515 kg/l; name propane_density
  note on heating value, net: net (lower) heating (calorific) value in MJ/kg. Taken directly from ecoinvent v3.0 dataset "propane burned in building machine, GLO 2013".
  note on density: Litterature value. Propane density at 15°C.Taken from http://www.cfbp.fr/proprietes-des-gpl/caracteristiques-generales-et-physico-chimiques-n305
- aluminium, wrought alloy: 0.0021 kg; lognormal variance with pedigree 0.0112, pedigree (2,4,4,1,1)
  (same comment as for ferrosilicon)
  properties: dry mass 1 kg, wet mass 1 kg
- iron scrap, unsorted: -0.00728528 kg; lognormal variance with pedigree 0.0112, pedigree (2,4,4,1,1)
  (same comment as for iron scrap, unsorted)
  production volume 625375 kg
  properties: wet mass 1 kg, dry mass 1 kg

## Inputs from nature
- Water, cooling, unspecified natural origin [natural resource, in water]: 0.01358 m3; name waterCooling; lognormal variance with pedigree 0.0206, pedigree (2,4,4,1,1)
  Measured value. Extracted from river for cooling.

## Emissions to nature
- Cadmium [air, unspecified]: 2.87094e-7 kg; lognormal variance with pedigree 0.662, pedigree (3,4,4,1,1)
  Calculated value. Sum of direct measurements on equipment and on calculated emissions from published standards (e.g. EPA).
- Zinc [air, unspecified]: 4.74283e-5 kg; lognormal variance with pedigree 0.662, pedigree (3,4,4,1,1)
  (same comment as for Cadmium)
- Hydrocarbons, aromatic [air, unspecified]: 7.7008e-5 kg; lognormal variance with pedigree 0.0838, pedigree (2,3,5,5,2)
  Approximation. Taken directly from ecoinvent v3.0 dataset "steel, electric, low-alloyed, GLO, 2001".
- Hydrogen fluoride [air, unspecified]: 2.35e-6 kg; lognormal variance with pedigree 0.0838, pedigree (2,3,5,5,2)
  (same comment as for Hydrocarbons, aromatic)
- Chromium [air, unspecified]: 3.50706e-6 kg; lognormal variance with pedigree 0.662, pedigree (3,4,4,1,1)
  (same comment as for Cadmium)
- Particulates, < 2.5 um [air, unspecified]: 0.0003878 kg; lognormal variance with pedigree 0.312, pedigree (3,4,4,1,1)
  (same comment as for Cadmium)
- Mercury [air, unspecified]: 1.242e-9 kg; lognormal variance with pedigree 0.662, pedigree (3,4,4,1,1)
  (same comment as for Cadmium)
- Water [air, unspecified]: 0.00292117 m3; name evaporation; lognormal variance with pedigree 0.0507, pedigree (2,2,4,5,1)
  Approximation. Taken directly from ecoinvent v3.0 dataset "steel, electric, low-alloyed, GLO, 2001". Original dataset: "Calculated value based on literature values and expert opinion. See comments in the parametres' comment field".
- Carbon monoxide, fossil [air, unspecified]: 2.28609e-8 kg; lognormal variance with pedigree 0.662, pedigree (3,4,4,1,1)
  (same comment as for Cadmium)
- Nitrogen oxides [air, unspecified]: 0.000531441 kg; lognormal variance with pedigree 0.052, pedigree (3,4,4,1,1)
  (same comment as for Cadmium)
- Particulates, > 2.5 um, and < 10um [air, unspecified]: 0.000397992 kg; lognormal variance with pedigree 0.132, pedigree (3,4,4,1,1)
  (same comment as for Cadmium)
- Hydrogen chloride [air, unspecified]: 5.2e-6 kg; lognormal variance with pedigree 0.0838, pedigree (2,3,5,5,2)
  (same comment as for Hydrocarbons, aromatic)
- Carbon dioxide, fossil [air, unspecified]: 0.042 kg
  Amount was calculated based on fossil carbon balance
- Lead [air, unspecified]: 3.78466e-6 kg; lognormal variance with pedigree 0.662, pedigree (3,4,4,1,1)
  Calculated value. Sum of direct measurements on equipment and on calculated emissions from published standard (e.g. EPA).
- Copper [air, unspecified]: 2.305e-7 kg; lognormal variance with pedigree 0.6952, pedigree (2,4,5,5,2)
  (same comment as for Hydrocarbons, aromatic)
- Dioxins, measured as 2,3,7,8-tetrachlorodibenzo-p-dioxin [air, unspecified]: 8.1262e-13 kg; lognormal variance with pedigree 0.312, pedigree (3,4,4,1,1)
  (same comment as for Cadmium)
- Sulfur dioxide [air, unspecified]: 7.7e-5 kg; lognormal variance with pedigree 0.0438, pedigree (2,3,5,5,2)
  (same comment as for Hydrocarbons, aromatic)
- Argon-40 [air, unspecified]: 0.00329043 kg; = argon; lognormal variance with pedigree 0.008, pedigree (1,1,4,1,1)
  Calculated value. Emission of argon used for degassing.
  Uncertainty: Calculated variable. Uncertainty will be determined from propagation of uncertainty factors of underlying variables. Uncertainty of actual relation between variables not accounted for at this time, although this could be included in a future update.
- Chloride [water, unspecified]: 0.000258002 kg; lognormal variance with pedigree 0.052, pedigree (3,4,4,1,1)
  Calculated value. Concentration of substance in water is calculated as the sum of direct measurements on equipment and on calculated emissions from published standards (e.g. EPA). Flow value is calculated from concentration and volume of water used for cooling.
- Nickel [air, unspecified]: 7.46319e-7 kg; lognormal variance with pedigree 0.662, pedigree (3,4,4,1,1)
  (same comment as for Cadmium)
- Particulates, > 10 um [air, unspecified]: 5.8575e-5 kg; lognormal variance with pedigree 0.0838, pedigree (2,3,5,5,2)
  (same comment as for Hydrocarbons, aromatic)
- Chromium VI [water, unspecified]: 2.71581e-7 kg; lognormal variance with pedigree 0.052, pedigree (3,4,4,1,1)
  (same comment as for Chloride)
- PAH, polycyclic aromatic hydrocarbons [air, unspecified]: 3.725e-8 kg; lognormal variance with pedigree 0.3438, pedigree (2,3,5,5,2)
  (same comment as for Hydrocarbons, aromatic)
- Water [water, unspecified]: 0.0106588 m3; = waterCooling-evaporation; lognormal variance with pedigree 0.048, pedigree (1,1,4,1,1)
  Calculated value. Based on river water input for cooling.
  Uncertainty: Calculated variable. Uncertainty will be determined from propagation of uncertainty factors of underlying variables. Uncertainty of actual relation between variables not accounted for at this time, although this could be included in a future update.
- Benzene [air, unspecified]: 1.01577e-8 kg; lognormal variance with pedigree 0.132, pedigree (3,4,4,1,1)
  (same comment as for Cadmium)

## Sampling procedure
Primary data collected from one manufacturing company in Québec.

## Extrapolations
This dataset has been extrapolated from year 2011 to the year of the calculation (2021). The uncertainty has been adjusted accordingly.

## Review by Emilia Moreno Ruiz 2016-07-19
Quicklime input corrected by author
