# housing system construction, pig, electricity from renewable energy products

Dataset: EcoSpold 2, unit process
Geography: RoW
Time period: 1994-01-01 to 2021-12-31
Technology level: current
Classification: ISIC rev.4 ecoinvent: 4100:Construction of buildings
Classification: EcoSpold01Categories: agricultural means of production/buildings
Tags: ConvertedDataset
Scenario: Business-as-Usual
System model: Allocation, cut-off by classification
Generated by: Dunja Dux
Published in: Nemecek, T. 2007
Database: ecoinvent
isCopyrightProtected: true
accessRestrictedTo: 1

## General comment
The module includes a pen for fattening pigs with animal-friendly housing system with multispace pens and exercise area, fittings, slurry store, concentrate silo, wet mix feeding system and straw storage area. Size: 300 pig places. Lifetime of the building is 50 years.
[This dataset was already contained in the ecoinvent database version 2. It was not individually updated during the transfer to ecoinvent version 3. Life Cycle Impact Assessment results may still have changed, as they are affected by changes in the supply chain, i.e. in other datasets. This dataset was generated following the ecoinvent quality guidelines for version 2. It may have been subject to central changes described in the ecoinvent version 3 change report (http://www.ecoinvent.org/database/ecoinvent-version-3/reports-of-changes/), and the results of the central updates were reviewed extensively. The changes added e.g. consistent water flows and other information throughout the database. The documentation of this dataset can be found in the ecoinvent reports of version 2, which are still available via the ecoinvent website. The change report linked above covers all central changes that were made during the conversion process.]

## Included activities end
The inventory takes into account the use of construction materials and building machines for construction, repair and replacement including waste disposal and the transportation of the materials to the building site. Not taken into account were direct emission of the construction, disposal of production waste and the use of resources during utilization phase.

## Geography
The inventory applies for Swiss agricultural buildings only, because of the solid method of construction.

## Technology
The data of the inventory are based on one example of a typical agricultural building.

## Reference product
- housing system, pig, per pig place, electricity from renewable energy products: 1 unit; By-product classification allocatable product; CPC 53269: Other constructions for manufacturing
  EcoSpold01Location=CH
  production volume 3.96633 unit
    This is a placeholder value that does not reflect real-world production volumes. This dataset does not currently require a real-world production volume to work in the database framework, and no actual data were collected yet. This has no negative effect on the results of the ecoinvent database.
  property price 637.977 EUR2005
    Calculated based on inputs: The price of the product has been calculated as a sum of the values of the material and energy inputs for this product. This value is therefore a rough estimation. It may underestimate the real price since there are additional expenses when producing any product. These expences can include for example labour costs, treatment of waste materials and profit for the producer. Please consider carefully whether this level of data quality is acceptable for your application.

## Inputs from technosphere
- polyurethane, rigid foam: 0.088 kg; lognormal variance with pedigree 0.0421, pedigree (1,2,5,5,1)
  EcoSpold01Location=RER
  properties: carbon content, fossil 0.69089, dry mass 1 kg, wet mass 1 kg, heating value, net 30.67 MJ
  note on carbon content, fossil: Polyurethanes (PUR) is the collective name for an extensive group of polymers with very different compositions and correspondingly varied property profiles, though their molecule chain contains all a urethane group (-NH-CO-O-). All PURs are built on a common principle : they are produced by the diisocyanate polyaddition process, that links polyols and (di)isocyanates. In this dataset, an example of typical polyurethane mixture is described (Ullmann, Polyurethanes, Dieterich et al. & ecoinvent v2 report 11_II). C content was calculated as an addition of C contents in its components.
- stone wool: 1.03 kg; lognormal variance with pedigree 0.0421, pedigree (1,2,5,5,1)
  EcoSpold01Location=CH
  properties: dry mass 1 kg, carbon content, fossil 0.015401, wet mass 1 kg
  note on carbon content, fossil: The chemical composition of the glass fibres used in the rock wool production is similar to the composition of naturally cooled volcano basalt and has a composition listed in Tab. 3.1 and 3.2 in ecoinvent v2.2 report 16, part XIV. Rock wool contains: a minimum of 96% mineral fibres,between 0.5 and 3.0 weight percent of phenolic resin depending on the specific product characteristics, and about 0.2 percent mineral oil (ecoinvent v2.2 report 16, part XIV). An average composition of 1.8% phenolic resin, 0.2% mineral oil, and 98% mineral fibres has been assumed and used to calculate C content of the rock wool
- waste wood, untreated: 0 kg; pedigree (1,1,1,1,1)
  EcoSpold01Location=CH
  production volume 0 kg
    Calculated from the production volume of housing system, pig, label-certified, per pig place in proportion to the respective output amounts.
  properties: heating value, net 13.99 MJ, water content 0.25, dry mass 0.8 kg, carbon content, non-fossil 0.48632, wet mass 1 kg
  note on heating value, net: Value taken from the general comment of the treatment dataset.
  note on carbon content, non-fossil: Tab A.4, ecoinvent v2.2 report 13_I. C content has been referred to 1 kg DM,
- zinc coat, coils: 1.67 m2; lognormal variance with pedigree 0.0421, pedigree (1,2,5,5,1)
  EcoSpold01Location=RER
- waste glass sheet: 0 kg; pedigree (1,1,1,1,1)
  EcoSpold01Location=CH
  production volume 0 kg
    (same comment as for waste wood, untreated)
  properties: dry mass 1 kg, wet mass 1 kg
- kraft paper: 25.8 kg; lognormal variance with pedigree 0.0421, pedigree (1,2,5,5,1)
  EcoSpold01Location=RER
  properties: carbon content, fossil 0.0020219, heating value, net 14.11 MJ, dry mass 0.945 kg, wet mass 1 kg, carbon content, non-fossil 0.41662, water content 0.0582011
  note on carbon content, fossil: Fossil C content was calculated after fossil C contents of chemicals used in the production of the paper (in Tab 9.4 ecoinvent v2.2 report 11_III, part 9).
  note on carbon content, non-fossil: Biogenic C content was calculated after biogenic C contents of chemicals used in the production of the paper (in Tab 9.4 ecoinvent v2.2 report 11_III, part 9). The cellulose content in 1 kg of paper (on a wet mas basis) was estimated as (1-chemical content), C content of cellulose was considered 0.44 kgC/kg dry mass (ecoinvent v2.2 report, n 15a, pg 40)
- lean concrete: 0.13 m3; lognormal variance with pedigree 0.0421, pedigree (1,2,5,5,1)
  EcoSpold01Location=CH
  properties: wet mass 2190 kg, dry mass 2080 kg, water content 0.0528846
- clay brick: 230 kg; lognormal variance with pedigree 0.0421, pedigree (1,2,5,5,1)
  EcoSpold01Location=RER
  properties: dry mass 1 kg, wet mass 1 kg
- cement mortar: 0 kg; pedigree (1,1,1,1,1)
  EcoSpold01Location=CH
  properties: wet mass 1 kg, dry mass 1 kg
- fibre cement corrugated slab: 9.35 kg; lognormal variance with pedigree 0.0421, pedigree (1,2,5,5,1)
  EcoSpold01Location=CH
  properties: wet mass 1 kg, carbon content, fossil 0.00981818, dry mass 1 kg, carbon content, non-fossil 0.01656
  note on carbon content, fossil: Tab 5.1, ecoinvent v2.2 report 7, part IX. Fibres (pulp) 3.6%. Fibres (polyvinyl alcohol) 1.8%. C-content/dry mass of natural fibres was considered 46% (from "Evolutionary and Biochemical Aspects", A.D. Kay and T. Vrede (in Global Ecology, 2010, Elsevier B.V., S.E. Jørgensen Ed.)). C-content/dry mass of polyvinyl alcohol ((C2H4O)x) was considered =24/44.
- polypropylene, granulate: 0.0322 kg; lognormal variance with pedigree 0.0421, pedigree (1,2,5,5,1)
  EcoSpold01Location=RER
  properties: heating value, net 32.78 MJ, carbon content, fossil 0.857143, wet mass 1 kg, dry mass 1 kg
  note on heating value, net: Value extracted from "treatment of waste polypropylene, open burning"
  note on carbon content, fossil: Polypropylene is formed by the polymerisation of propylene, C3H6 (ecoinvent v2.2 report 11_II)
- concrete, normal: 0 m3; pedigree (1,1,1,1,1)
  EcoSpold01Location=CH
  properties: dry mass 2190 kg, water content 0.086758, wet mass 2380 kg
- waste reinforced concrete: 0 kg; pedigree (1,1,1,1,1)
  EcoSpold01Location=CH
  production volume 0 kg
    (same comment as for waste wood, untreated)
  properties: water content 0.00585407, wet mass 1 kg, dry mass 0.99418 kg
- glued laminated timber, average glue mix: 0 m3; pedigree (1,1,1,1,1)
  EcoSpold01Location=RER
  properties: price 298 EUR2005, carbon content, fossil 0.01791, heating value, net 5537.41 MJ, dry mass 404.4 kg, carbon content, non-fossil 0.441932, water content 0.0979228, wet mass 444 kg
- waste cement in concrete and mortar: 0 kg; pedigree (1,1,1,1,1)
  EcoSpold01Location=CH
  production volume 0 kg
    (same comment as for waste wood, untreated)
  properties: dry mass 0.995 kg, water content 0.00502513, wet mass 1 kg
- waste concrete, not reinforced: 0 kg; pedigree (1,1,1,1,1)
  EcoSpold01Location=CH
  production volume 0 kg
    (same comment as for waste wood, untreated)
  properties: wet mass 1 kg, dry mass 1 kg
- steel, low-alloyed, hot rolled: 7.87 kg; lognormal variance with pedigree 0.0421, pedigree (1,2,5,5,1)
  EcoSpold01Location=RER
  properties: wet mass 1 kg, carbon content, fossil 0.005, dry mass 1 kg
  note on carbon content, fossil: Low alloyed steel composition given in Tab. 3.2 ecoinvent v2.2 report 10_partII. Steel assumed to have a C content of 0.5%
- excavation, skid-steer loader: 3.44 m3; lognormal variance with pedigree 0.0421, pedigree (1,2,5,5,1)
  EcoSpold01Location=RER
- polystyrene foam slab: 0.445 kg; lognormal variance with pedigree 0.0421, pedigree (1,2,5,5,1)
  EcoSpold01Location=RER
  properties: wet mass 1 kg, carbon content, fossil 0.859091, dry mass 1 kg, heating value, net 38.67 MJ
  note on carbon content, fossil: XPS consists in 91% of polystyrene, 7% of blowing agent and the re-maining 2% are flame retardants (bromine compounds) and other additives (ecoinvent v2.2 report 7, part XIV, pg69). The chemical formula of polystyrene is (C8H8)n. Here, the blowing agent is CO2.
- flat glass, uncoated: 1.32 kg; lognormal variance with pedigree 0.0421, pedigree (1,2,5,5,1)
  EcoSpold01Location=RER
  properties: dry mass 1 kg, wet mass 1 kg
- reinforcing steel: 78.4 kg; lognormal variance with pedigree 0.0421, pedigree (1,2,5,5,1)
  EcoSpold01Location=RER
  properties: carbon content, fossil 0.004, dry mass 1 kg, wet mass 1 kg
- pitch: 0 kg; pedigree (1,1,1,1,1)
  EcoSpold01Location=CH
  properties: dry mass 1 kg, carbon content, fossil 0.83, wet mass 1 kg, heating value, net 28 MJ
- aluminium, wrought alloy: 0.8704 kg; lognormal variance with pedigree 0.0421, pedigree (1,2,5,5,1)
  EcoSpold01Location=RER
  properties: dry mass 1 kg, wet mass 1 kg
- waste polyvinylchloride product: 0 kg; pedigree (1,1,1,1,1)
  EcoSpold01Location=CH
  production volume 0 kg
    (same comment as for waste wood, untreated)
  properties: dry mass 0.998 kg, wet mass 1 kg, heating value, net 21.51 MJ, water content 0.00200401, carbon content, fossil 0.440882
- waste bitumen sheet: -0.478 kg; lognormal variance with pedigree 0.0421, pedigree (1,2,5,5,1)
  EcoSpold01Location=CH
  production volume 1.434 kg
    (same comment as for waste wood, untreated)
  properties: heating value, net 40.2 MJ, water content 0.0152284, wet mass 1 kg, carbon content, fossil 0.643207, dry mass 0.985 kg
  note on heating value, net: Literature value, Source: IPCC 2006, 2006 IPCC Guidelines for National Greenhouse Gas Inventories, Prepared by the National Greenhouse Gas Inventories Programme, Eggleston H.S., Buendia L., Miwa K., Ngara T. and Tanabe K. (eds). Published: IGES, Japan
  note on carbon content, fossil: The bitumen sheet is made of 63% bitumen, 24% surface spread and filler (assumed to be pure SiO2), 6% carrier fleece (assumed to be PE) and 7% elastomer (assumed to be PS) (ecoinvent v2.2 report 13_I, pg 40). C content of bitumen, PE and PS from Tab A.6 and A.1 (ecoinvent v2.2 report 13_I, pg 40), respectively. C content of waste also given in the dataset
- aluminium, cast alloy: 0.4096 kg; lognormal variance with pedigree 0.0421, pedigree (1,2,5,5,1)
  EcoSpold01Location=RER
  properties: dry mass 1 kg, wet mass 1 kg
- waste polystyrene isolation, flame-retardant: 0 kg; pedigree (1,1,1,1,1)
  EcoSpold01Location=CH
  production volume 0 kg
    (same comment as for waste wood, untreated)
  properties: dry mass 0.998012 kg, wet mass 1 kg, heating value, net 38.67 MJ, water content 0.00199232, carbon content, fossil 0.918145
  note on carbon content, fossil: Polystyrene isolation (EPS) is flame-retarded with hexa-bromo-cyclo-dodecan (C12H18Br6) and contains 0.67 w% bromine (ecoinvent v2.2 report 13_I, pg 39). The rest is polystyrene: (C8H8)n.
- extrusion, plastic film: 1.19 kg; lognormal variance with pedigree 0.0421, pedigree (1,2,5,5,1)
  EcoSpold01Location=RER
- cast iron: 32.9 kg; lognormal variance with pedigree 0.0421, pedigree (1,2,5,5,1)
  EcoSpold01Location=RER
  properties: carbon content, fossil 0.04, wet mass 1 kg, dry mass 1 kg
  note on carbon content, fossil: Cast iron is made by remelting pig iron in small furnaces (e.g. cupola furnaces or electric arc furnaces) and poured into moulds to make castings. It usually contains 2% to 6% carbon (ecoinvent v2.2 report 10_partII). An average content of 4% was considered
- polyethylene, high density, granulate: 0.507 kg; lognormal variance with pedigree 0.0421, pedigree (1,2,5,5,1)
  EcoSpold01Location=RER
  properties: carbon content, fossil 0.857143, dry mass 1 kg, heating value, net 42.47 MJ, wet mass 1 kg
  note on carbon content, fossil: Polyethylene is formed out of a huge amount of ethylene monomers (C2H4) (ecoinvent v2.2 report 11_II). MW=28 g/mol
- cement, Portland: 0 kg; pedigree (1,1,1,1,1)
  EcoSpold01Location=CH
  properties: dry mass 1 kg, wet mass 1 kg
- sawnwood, softwood, dried (u=20%), planed: 0.293 m3; lognormal variance with pedigree 0.0421, pedigree (1,2,5,5,1)
  EcoSpold01Location=RER
  properties: wet mass 540 kg, heating value, net 6514.84 MJ, carbon content, non-fossil 0.494, dry mass 450 kg, water content 0.2
  note on carbon content, non-fossil: C content of dry mass is 0.494 kgC/kg dry wood (ecoinvent v2.2 report 9)
- steel, chromium steel 18/8, hot rolled: 57.8 kg; lognormal variance with pedigree 0.0421, pedigree (1,2,5,5,1)
  EcoSpold01Location=RER
  properties: carbon content, fossil 0.0008, wet mass 1 kg, dry mass 1 kg
  note on carbon content, fossil: Stainless steel model is the grade 304 steel (18/8 stainless, 18% chromium 8% nickel; max. 0.08% C)
- waste mineral wool: 0 kg; pedigree (1,1,1,1,1)
  EcoSpold01Location=CH
  production volume 0 kg
    (same comment as for waste wood, untreated)
  properties: wet mass 1 kg, dry mass 1 kg
- gravel, round: 493 kg; lognormal variance with pedigree 0.0421, pedigree (1,2,5,5,1)
  EcoSpold01Location=CH
  properties: wet mass 1 kg, dry mass 1 kg
- epoxy resin, liquid: 18.7 kg; lognormal variance with pedigree 0.0421, pedigree (1,2,5,5,1)
  EcoSpold01Location=RER
  properties: heating value, net 12.82 MJ, carbon content, fossil 0.42325, wet mass 1 kg, dry mass 1 kg
- waste polyurethane foam: -0.088 kg; lognormal variance with pedigree 0.0421, pedigree (1,2,5,5,1)
  EcoSpold01Location=CH
  production volume 0.264 kg
    (same comment as for waste wood, untreated)
  properties: carbon content, fossil 0.641283, water content 0.00200401, dry mass 0.998 kg, wet mass 1 kg, heating value, net 30.67 MJ
  note on carbon content, fossil: Tab A.2, ecoinvent v2.2 report 13_I. Then C content was referred to 1 kg DM
- sheet rolling, steel: 7.87 kg; lognormal variance with pedigree 0.0421, pedigree (1,2,5,5,1)
  EcoSpold01Location=RER
- copper, cathode: 2.79 kg; lognormal variance with pedigree 0.0421, pedigree (1,2,5,5,1)
  EcoSpold01Location=RER
  properties: dry mass 1 kg, wet mass 1 kg
- waste brick: 0 kg; pedigree (1,1,1,1,1)
  EcoSpold01Location=CH
  production volume 0 kg
    (same comment as for waste wood, untreated)
  properties: dry mass 1 kg, wet mass 1 kg
- waste bulk iron, excluding reinforcement: 0 kg; pedigree (1,1,1,1,1)
  EcoSpold01Location=CH
  production volume 0 kg
    (same comment as for waste wood, untreated)
  properties: dry mass 1 kg, wet mass 1 kg
- waste polyethylene/polypropylene product: 0 kg; pedigree (1,1,1,1,1)
  EcoSpold01Location=CH
  production volume 0 kg
    (same comment as for waste wood, untreated)
  properties: water content 0.180638, carbon content, fossil 0.748045, dry mass 0.847 kg, wet mass 1 kg, heating value, net 42.47 MJ
  note on carbon content, fossil: Mixed various plastics was used to estimate the C content of this waste (Tab A.2, ecoinvent v2.2 report 13_I)
- fibre cement facing tile: 53.3 kg; lognormal variance with pedigree 0.0421, pedigree (1,2,5,5,1)
  EcoSpold01Location=CH
  properties: carbon content, non-fossil 0.0115, dry mass 1 kg, wet mass 1 kg, carbon content, fossil 0.0201818
  note on carbon content, non-fossil: Tab 5.1, ecoinvent v2.2 report 7, part IX. Fibres (pulp) 2.5%. Fibres (polyvinyl alcohol) 3.7%. C-content/dry mass of natural fibres was considered 46% (from "Evolutionary and Biochemical Aspects", A.D. Kay and T. Vrede (in Global Ecology, 2010, Elsevier B.V., S.E. Jørgensen Ed.)). C-content/dry mass of polyvinyl alcohol ((C2H4O)x) was considered =24/44.
- electricity, low voltage: 0 kWh; pedigree (1,1,1,1,1)
  EcoSpold01Location=CH
- excavation, hydraulic digger: 6.26 m3; lognormal variance with pedigree 0.0421, pedigree (1,2,5,5,1)
  EcoSpold01Location=RER
- polyvinylchloride, bulk polymerised: 0.647 kg; lognormal variance with pedigree 0.0421, pedigree (1,2,5,5,1)
  EcoSpold01Location=RER
  properties: carbon content, fossil 0.387097, dry mass 1 kg, wet mass 1 kg, heating value, net 21.5 MJ
  note on carbon content, fossil: Monomer is vynyl chloride, C2H3Cl (ecoinvent v2.2 report 11_II). MW=62 g/mol
- zinc coat, pieces: 1.74 m2; lognormal variance with pedigree 0.0421, pedigree (1,2,5,5,1)
  EcoSpold01Location=RER
- waste wood, untreated: -9.18384, -1.14031, -0.0833696, -3.20279, -0.483865, -0.76495, -14.2993, -121.842 kg (8 entries); lognormal variance with pedigree 0.0421, pedigree (1,2,5,5,1)
  EcoSpold01Location=CH
  production volume 453 kg
- waste glass sheet: -0.271976, -1.04802 kg (2 entries); lognormal variance with pedigree 0.0421, pedigree (1,2,5,5,1)
  EcoSpold01Location=CH
  production volume 3.96 kg
- cement mortar: 0.289361, 57.5106 kg (2 entries); lognormal variance with pedigree 0.0421, pedigree (1,2,5,5,1)
  EcoSpold01Location=CH
- concrete, normal: 0.0321163, 0.00334647, 0.027092, 0.0152393, 0.0645341, 0.00217669, 1.2755 m3 (7 entries); lognormal variance with pedigree 0.0421, pedigree (1,2,5,5,1)
  EcoSpold01Location=CH
- waste reinforced concrete: -210.192, -2999.81 kg (2 entries); lognormal variance with pedigree 0.0421, pedigree (1,2,5,5,1)
  EcoSpold01Location=CH
  production volume 9630 kg
- glued laminated timber, average glue mix: 0.00283806, 0.00616194 m3 (2 entries); lognormal variance with pedigree 0.0421, pedigree (1,2,5,5,1)
  EcoSpold01Location=RER
- waste cement in concrete and mortar: -19.7446, -50.0554 kg (2 entries); lognormal variance with pedigree 0.0421, pedigree (1,2,5,5,1)
  EcoSpold01Location=CH
  production volume 209.4 kg
- waste concrete, not reinforced: -18.7274, -267.273 kg (2 entries); lognormal variance with pedigree 0.0421, pedigree (1,2,5,5,1)
  EcoSpold01Location=CH
  production volume 858 kg
- pitch: 0.0219138, 0.00124891, 0.0726173, 0.0565254, 0.0025337, 0.0036171, 0.319544 kg (7 entries); lognormal variance with pedigree 0.0421, pedigree (1,2,5,5,1)
  EcoSpold01Location=CH
- waste polyvinylchloride product: -0.181067, -0.465933 kg (2 entries); lognormal variance with pedigree 0.0421, pedigree (1,2,5,5,1)
  EcoSpold01Location=CH
  production volume 1.941 kg
- waste polystyrene isolation, flame-retardant: -0.947629, -2.40237 kg (2 entries); lognormal variance with pedigree 0.0421, pedigree (1,2,5,5,1)
  EcoSpold01Location=CH
  production volume 10.05 kg
- cement, Portland: 0.0484687, 0.070787, 1.45228, 1.50311, 0.0840017, 1.68173, 0.0689059, 9.89072 kg (8 entries); lognormal variance with pedigree 0.0421, pedigree (1,2,5,5,1)
  EcoSpold01Location=CH
- waste mineral wool: -0.299541, -0.730459 kg (2 entries); lognormal variance with pedigree 0.0421, pedigree (1,2,5,5,1)
  EcoSpold01Location=CH
  production volume 3.09 kg
- waste brick: -3.79495, -288.205 kg (2 entries); lognormal variance with pedigree 0.0421, pedigree (1,2,5,5,1)
  EcoSpold01Location=CH
  production volume 876 kg
- waste bulk iron, excluding reinforcement: -33.4475, -69.5525 kg (2 entries); lognormal variance with pedigree 0.0421, pedigree (1,2,5,5,1)
  EcoSpold01Location=CH
  production volume 309 kg
- waste polyethylene/polypropylene product: -12.7576, -32.3424 kg (2 entries); lognormal variance with pedigree 0.0421, pedigree (1,2,5,5,1)
  EcoSpold01Location=CH
  production volume 135.3 kg
- electricity, low voltage: 0.0652482, 0.0118804, 0.268187, 0.936983, 0.19129, 2.93691, 0.475141, 1.36436 kWh (8 entries); lognormal variance with pedigree 0.0421, pedigree (1,2,5,5,1)
  EcoSpold01Location=CH

## Inputs from nature
- Occupation, urban, discontinuously built [natural resource, land]: 189 m2*year; lognormal variance with pedigree 0.0821, pedigree (1,2,5,5,1)
- Transformation, to urban, discontinuously built [natural resource, land]: 3.78 m2; lognormal variance with pedigree 0.1621, pedigree (1,2,5,5,1)
- Transformation, from pasture, man made [natural resource, land]: 3.78 m2; lognormal variance with pedigree 0.1621, pedigree (1,2,5,5,1)
- Occupation, construction site [natural resource, land]: 7.56 m2*year; lognormal variance with pedigree 0.0821, pedigree (1,2,5,5,1)

## Sampling procedure
The inventory is calculated based on a solid database of agricultural buildings.

## Extrapolations
This dataset has been copied from an original dataset covering the geography CH. The uncertainty has been adjusted accordingly.

## Review by Roland Hischier 2003-08-06
Passed.
