# modified Solvay process, Hou's process

Dataset: EcoSpold 2, unit process
Geography: GLO
Time period: 2000-01-01 to 2021-12-31
Technology level: current
Classification: ISIC rev.4 ecoinvent: 2011:Manufacture of basic chemicals
Classification: EcoSpold01Categories: chemicals/inorganics
Synonyms: sal ammoniac
Tags: ConvertedDataset
Scenario: Business-as-Usual
System model: Allocation, cut-off by classification
Share of production covered: 100 %
Generated by: Jürgen Sutter
Published in: Sutter, J. 2007
Database: ecoinvent
isCopyrightProtected: true
accessRestrictedTo: 1

## General comment
This dataset represents the modified Solvay process. Within the ammonium chloride production, sodium carbonate is derived as co-product. The functional unit is 1 kg ammonium. The system includes the process with consumption of raw materials, energy, infrastructure, and land use, as well as the generation of emissions to air and water. It also includes transportation of the raw materials. Transient or unstable operations like starting-up or shutting-down, are not included, but the production during stable operation conditions. Storage and transportation of the final product are also not included. It is assumed that the manufacturing plants are located in an urban/industrial area and consequently the emissions are categorised as emanating in a high population density area. The emissions into water are assumed to be emitted into rivers.
[This dataset was already contained in the ecoinvent database version 2. It was not individually updated during the transfer to ecoinvent version 3. Life Cycle Impact Assessment results may still have changed, as they are affected by changes in the supply chain, i.e. in other datasets. This dataset was generated following the ecoinvent quality guidelines for version 2. It may have been subject to central changes described in the ecoinvent version 3 change report (http://www.ecoinvent.org/database/ecoinvent-version-3/reports-of-changes/), and the results of the central updates were reviewed extensively. The changes added e.g. consistent water flows and other information throughout the database. The documentation of this dataset can be found in the ecoinvent reports of version 2, which are still available via the ecoinvent website. The change report linked above covers all central changes that were made during the conversion process.]

## Included activities start
From the reception of ammonium, sodium hydroxide, water and carbon dioxide to the factory gate.

## Included activities end
This activity ends with the modified Solvay process to obtain ammonium chloride and sodium carbonate; including materials, energy uses, infrastructure and emissions.

## Geography
The inventory is modelled for the world..

## Technology
The Modified Solvay process is one of the most important processes to produce ammonium chloride.
In the Solvay process, ammonia and carbon dioxide are dissolved in aqueous sodium chloride to produce sparingly soluble sodium bicarbonate, which is calcined to sodium carbonate. The ammonia is recovered from the mother liquor by reaction with lime, this reaction also producing the calcium chloride. The source of the lime and the carbon dioxide is limestone. The net reaction is the conversion of the feedstocks rock salt and limestone into sodium carbonate and the byproduct calcium chloride.
Water, carbon dioxide, and ammonia are added only to the extent necessary to compensate for plant losses. The feedstock and product dictate the location of a Solvay plant. For this reason, the plants normally function as largely independent units.
The modified Solvay process (ammonium chloride – soda ash process) is one of the oldest examples of integrated industrial production of two substances. It differs from the Solvay process in that ammonium chloride is also precipitated from the mother liquor. The net reaction is
The amounts of ammonium chloride and soda ash produced are almost equal: two moles (107 g) of NH4Cl are produced for each mole (106 g) of Na2CO3. The modified process, requiring external NH3 and CO2 , must be incorporated into an integrated system of plants.
Furthermore, the treatment of ammonia-containing waste gases is carried out for environmental reasons, rather than to reduce NH3 and CO2 losses. Finally, the energy balance in the modified process is entirely different from that in the traditional Solvay process because of the different feedstocks and products.
Zapp, K., Wostbrock, K., Schäfer, M., Sato, K., Seiter, H., Zwick, W., Creutziger, R., Leiter, H.: Ammonium Compounds. Published online: 2000. In: Ullmann's Encyclopedia of Industrial Chemistry, Seventh Edition, 2004 Electronic Release (ed. Fiedler E., Grossmann G., Kersebohm D., Weiss G. and Witte C.). 7 th Electronic Release Edition. Wiley InterScience, New York, Online-Version under: http://www.mrw.interscience.wiley.com/emrw/9783527306732/home

## Time period
Time of publications.

## Parameters
- fraction, cooling water, once-through system, to air: 0.004 dimensionless; name fraction_CW_OT_to_air; lognormal variance with pedigree 0.0413, pedigree (2,3,1,3,1)
  Calculated based on literature value (Scown, C.D., 2011, Water Footprint of U.S. Transportation Fuels and supplying information of the article) (Vionnet, S., Quantis Water Database - Technical Report, 2012).
- fraction, cooling water, recirculating system, to air: 0.771 dimensionless; name fraction_CW_R_to_air; lognormal variance with pedigree 0.0413, pedigree (2,3,1,3,1)
  (same comment as for fraction, cooling water, once-through system, to air)
- fraction, cooling water, cooling pond system, to air: 0.032 dimensionless; name fraction_CW_CP_to_air; lognormal variance with pedigree 0.0413, pedigree (2,3,1,3,1)
  (same comment as for fraction, cooling water, once-through system, to air)
- fraction, process water, to air: 0.205 dimensionless; name fraction_PW_to_air; lognormal variance with pedigree 0.092025, pedigree (4,4,3,2,4)
  Literature value (Statistics Canada, 2007 & Shaffer, K.H., 2008, Consumptive water use in the Great Lakes Basin, USGS) (Vionnet, S., Quantis Water Database - Technical Report, 2012).
- fraction, cooling water, to air: 0.3875 dimensionless; name fraction_CW_to_air; = (0.5*fraction_CW_OT_to_air)+(0.5*fraction_CW_R_to_air); lognormal variance with pedigree 0.092025, pedigree (4,4,3,2,4)
  Calculated value based on literature value (see comments of the other parametres present in this dataset) and expert opinion. In the case when no industry/literature data are available about the type of cooling or directly fraction, cooling water, to air specific for the process a default assumption is applied. It is assumed that the once-through cooling system is used in 50% of all cases and recirculating system is used in another 50% of all cases.
- fraction, water, ultrapure, to air: 0.205 dimensionless; name fraction_WUP_to_air; = fraction_PW_to_air; lognormal variance with pedigree 0.092025, pedigree (4,4,3,2,4)
  Calculated value. See comment in the other parametres present in this dataset. Ultrapure water is considered to be always used as process water, thus process water fractions to air are applied to all ultrapure water input flows to calculate the amount of water consumed in the processes.

## Reference product
- soda ash, dense: 1 kg; CPC 34240: Phosphates of triammonium; salts and peroxysalts of inorganic acids and metals n.e.c.; By-product classification allocatable product; CAS 497-19-8
  EcoSpold01Location=GLO
  production volume 2.58e8 kg
    Na
    Stoechiometric equal to ammonium chloride, estimated based on http://www.chem.unep.ch/irptc/sids/oecdsids/12125029.pdf downloaded 20 May 2010
  property heating value, net 3.43 MJ
    LHV is calculated based on the elemental composition of the substance. Based on the CAS number of the substance (000497-19-8), the chemical formula of the substance is found to be: CNa2O3, (PubChem 2020).
    Reference: Kim, S., Chen, J., Cheng, T., Gindulyte, A., He, J., He, S., Li, Q., Shoemaker, B. A., Thiessen, P. A., Yu, B., Zaslavsky, L., Zhang, J., & Bolton, E. E. (2019). PubChem 2019 update: improved access to chemical data. Nucleic acids research, 47(D1), D1102–D1109. https://doi.org/10.1093/nar/gky1033
  property price 0.0827 EUR2005
    Calculated from literature (USGS, http://minerals.usgs.gov/minerals/pubs/commodity/soda_ash/myb1-2006-sodaa.pdf, accessed 20150806).
  property carbon content 0.113208
    carbon content on a dry matter basis (reserved; not for manual entry)
  property true value 0.244941
    allocation property applied in "true value" allocation // value calculated from revenue
  properties: EcoSpold01Allocation_undefined_15 50, EcoSpold01Allocation_undefined_6 50, EcoSpold01Allocation_undefined_17 50, EcoSpold01Allocation_undefined_12 50, EcoSpold01Allocation_undefined_10 50, EcoSpold01Allocation_undefined_2 50, EcoSpold01Allocation_undefined_14 50, EcoSpold01Allocation_undefined_19 50, EcoSpold01Allocation_undefined_20 50, EcoSpold01Allocation_undefined_11 50, EcoSpold01Allocation_undefined_5 50, dry mass 1 kg, water content 0, wet mass 1 kg, EcoSpold01Allocation_undefined_18 100, EcoSpold01Allocation_undefined_13 50, carbon content, non-fossil 0, carbon content, fossil 0.113208, water in wet mass 0 kg, EcoSpold01Allocation_undefined_7 50, EcoSpold01Allocation_undefined_16 50, EcoSpold01Allocation_undefined_4 50, EcoSpold01Allocation_undefined_3 50, EcoSpold01Allocation_undefined_9 50, EcoSpold01Allocation_undefined_8 50, carbon allocation 0.113208 kg

## By-products
- ammonium chloride: 0 kg; CPC 34653: Ammonium chloride; nitrites; By-product classification allocatable product; CAS 12125-02-9; pedigree (1,1,1,1,1)
  Ammonium chloride is a clear white water-soluble crystalline salt with a biting, slightly sour taste. The aqueous ammonium chloride solution is mildly acidic. In nature it occurs in volcanic regions, forming on volcanic rocks near fume-releasing vents. Ammonium chloride is very soluble in liquid NH3 but virtually insoluble in acetone and pyridine.
  Ammonium chloride has two modifications, alpha (cubic, CsCl type) and beta (cubic, NaCl type). The transformation between the two is reversible at 457.6 K (184.5 C) and the reaction enthalpy is 4.3 kJ/mol.
  Ammonium chloride is widely used as an effective nitrogen fertilizer for paddy and upland rice, wheat, and other crops in Japan, China, and South East Asia. Most of the annual production of NH4Cl in Japan is used as high-grade compound fertilizers: chloro-ammonium phosphate, chloro-potash-ammonium phosphate, magnesia-chloro-potash-ammonium phosphate, and nitrogen-potash. Further fertilizer uses are limited by the acidity and high chlorine content.
  The industrial uses of technical-grade ammonium chloride are, in order of importance: solid electrolytes in dry cell batteries, one component of quarrying explosives (an especially fine form is used), hardeners for formaldehyde-based adhesives, one component of etching solutions in the manufacture of printed circuit boards, and a component, along with zinc chloride, of fluxes in tin and zinc plating. Minor uses include a rapid fixer additive in photography, cleaner additives, and a nutrient in yeast cultures. Ammonium chloride is also used in tanning, refining of precious metals, textile printing and dying, and in the rubber industry. The addition of ammonium chloride to tiles and bricks prior to firing was proposed. The ammonium chloride serves to control product porosity and accelerates the firing process. The use of NH4Cl as hardener for formaldehyde-based adhesives has been reduced significantly due to substitution by chloride-free products.
  High-purity ammonium chloride is employed in the food and pharmaceutical industries and in a few chemical syntheses.
  Uncertainty: Stoechiometric calculation
  production volume 2.58e8 kg
    Estimate based on http://www.chem.unep.ch/irptc/sids/oecdsids/12125029.pdf downloaded 20 May 2009
  property price 0.1 EUR2005
    Temporary price data. Calculated as 90% of purchasers price based on: Average import and export prices (total trades (USD) divided by total weight (kg) in EU27, USA, China, Japan and India) from UN data - Ammonium chloride (http://data.un.org/Data.aspx?q=+Ammonium+chloride&d=ComTrade&f=_l1Code%3a29%3bcmdCode%3a282710; accessed 1 June 10).
  property water content 0; name water_content
  property water in wet mass 0 kg; name WWM
  property carbon content, non-fossil 0; name C_content_non_fossil
  property wet mass 1 kg; name WM
  property carbon content, fossil 0; name C_content_fossil
  property dry mass 1 kg; name DM
  property carbon content 0
    carbon content on a dry matter basis (reserved; not for manual entry)
  property true value 0.29618
    allocation property applied in "true value" allocation // value calculated from revenue
  properties: EcoSpold01Allocation_undefined_20 50, EcoSpold01Allocation_undefined_14 50, EcoSpold01Allocation_undefined_16 50, EcoSpold01Allocation_undefined_10 50, EcoSpold01Allocation_undefined_13 50, EcoSpold01Allocation_undefined_11 50, EcoSpold01Allocation_undefined_6 50, EcoSpold01Allocation_undefined_7 50, EcoSpold01Allocation_undefined_15 50, EcoSpold01Allocation_undefined_1 100, EcoSpold01Allocation_undefined_8 50, EcoSpold01Allocation_undefined_9 50, EcoSpold01Allocation_undefined_4 50, EcoSpold01Allocation_undefined_3 50, EcoSpold01Allocation_undefined_17 50, EcoSpold01Allocation_undefined_2 50, EcoSpold01Allocation_undefined_5 50, EcoSpold01Allocation_undefined_12 50, EcoSpold01Allocation_undefined_19 50, carbon allocation 0 kg

## Inputs from technosphere
- water, ultrapure: 0 kg; name water_ultrapure_input; source Zapp, K. 2004; pedigree (1,1,1,1,1)
  EcoSpold01Location=GLO
  Stoechiometric calculation.
  Uncertainty: Stoechiometric calculation
  properties: wet mass 1 kg
- electricity, medium voltage: 0.301459 kWh; source Gendorf 2000; lognormal variance with pedigree 0.1786, pedigree (4,5,5,5,5)
  EcoSpold01Location=UCTE
  Estimation. Energy values were approximated with data from an large chemical plant site in Germany producing 2.05 Mt a-1 (intermediates included) of different chemicals. The values for the energy consumption per kg of product of this plant (3.2 MJ kg-1) were used as approximation for the energy consumption of the modified Solvay process. This total energy demand contains a split of 50% natural gas, 38% electricity and 12% steam from external energy sources.
  Uncertainty: Estimation
- ammonia, anhydrous, liquid: 0 kg; source Zapp, K. 2004; pedigree (1,1,1,1,1)
  EcoSpold01Location=RER
  Stoechiometric calculation. Functional unit (1 kg)
  Uncertainty: Stoechiometric calculation
  properties: wet mass 1 kg, dry mass 1 kg
- carbon dioxide, liquid: 0 kg; source Zapp, K. 2004; pedigree (1,1,1,1,1)
  EcoSpold01Location=RER
  Stoechiometric calculation. The values for the consumption of the raw materials are calculated with an assumed yield of 95 %.
  Uncertainty: Stoechiometric calculation
  properties: heating value, net 8.27 MJ, carbon content, fossil 0.272727, dry mass 1 kg, wet mass 1 kg
- heat, district or industrial, natural gas: 1.81059 MJ; source Gendorf 2000; lognormal variance with pedigree 0.1786, pedigree (4,5,5,5,5)
  Estimation. Energy values were approximated with data from an large chemical plant site in Germany producing 2.05 Mt a-1 (intermediates included) of different chemicals. The values for the energy consumption per kg of product of this plant (3.2 MJ kg-1) were used as approximation for the energy consumption of the modified Solvay process. This total energy demand contains a split of 50% natural gas, 38% electricity and 12% steam from external energy sources. For this inventory all energy used for heat or steam was assumed to be natural gas.
  EcoSpold01Location=RER
  Uncertainty: Estimation
  properties: heating value, net 1 MJ
- sodium chloride, powder: 0.521429 kg; source Zapp, K. 2004; lognormal variance with pedigree 0.076, pedigree (4,5,5,1,1)
  Stoechiometric calculation. The values for the consumption of the raw materials are calculated with an assumed yield of 95 %.
  EcoSpold01Location=RER
  Uncertainty: Stoechiometric calculation
  properties: dry mass 1 kg, wet mass 1 kg
- chemical factory, organics: 3.62118e-10 unit; lognormal variance with pedigree 0.448, pedigree (4,5,5,5,5)
  Estimation. The infrastructure is estimated based on the module "chemical plant, organics". This module assumes a built area of about 4.2 ha, an average output of 50'000 t/a, and plant life of fifty years
  EcoSpold01Location=RER
  Uncertainty: Estimation
- water, ultrapure: 0.018086, 0.0335506, 0.0252281 kg (3 entries); source Zapp, K. 2004; lognormal variance with pedigree 0.076, pedigree (4,5,5,1,1)
  EcoSpold01Location=GLO
  Stoechiometric calculation.
  Uncertainty: Stoechiometric calculation
- ammonia, anhydrous, liquid: 0.00245782, 0.0164272, 0.00382374, 0.00742266, 0.00757619, 0.00347784, 0.028592, 0.000777975, 0.0822755 kg (9 entries); source Zapp, K. 2004; lognormal variance with pedigree 0.076, pedigree (4,5,5,1,1)
  (same comment as for ammonia, anhydrous, liquid)
- carbon dioxide, liquid: 0.0343931, 0.163385 kg (2 entries); source Zapp, K. 2004; lognormal variance with pedigree 0.076, pedigree (4,5,5,1,1)
  (same comment as for carbon dioxide, liquid)

## Inputs from nature
- Water, cooling, unspecified natural origin [natural resource, in water]: 0.0217264 m3; name water_cooling_UNO_input; source Gendorf 2000; lognormal variance with pedigree 0.198, pedigree (4,5,5,5,5)
  Estimation. This value was approximated with data from an large chemical plant site in Germany producing 2.05 Mt a-1 (intermediates included) of different chemicals. This value was used in this inventory as approximation for the cooling water consumption of the ammonium chloride production.
  Estimation. This value was approximated with data from an large chemical plant site in Germany producing 2.05 Mt a-1 (intermediates included) of different chemicals. This value was used in this inventory as approximation for the cooling water consumption of the ammonium chloride production.
  Uncertainty: Estimation

## Emissions to nature
- Sodium, ion [water, surface water]: 0.0103386 kg; lognormal variance with pedigree 0.798, pedigree (4,5,5,5,5)
  Calculated value from mass balance. The remaining amount of unreacted sodium chloride (5 % of the input) was assumed to leave the production process with the waste water. Further it was assumed that this wastewater is treated in a internal wastewater plant.
  Uncertainty: calculated from mass balance
- Carbon dioxide, fossil [air, urban air close to ground]: 0.00988908 kg; lognormal variance with pedigree 0.1786, pedigree (4,5,5,5,5)
  Calculated value from mass balance.
  Uncertainty: Estimation
- Ammonia [air, urban air close to ground]: 0.000305662 kg; lognormal variance with pedigree 0.218, pedigree (4,5,5,5,5)
  Estimation. As approximation the air emissions occurring from the purge vent, the distillation vent and fugitive emission sources were estimated to 0.2% of the raw material input.
  Uncertainty: Estimation
- Water [air, unspecified]: 0.00843475 m3; name water_to_air_unspecified; = (water_ultrapure_input/1000*fraction_WUP_to_air)+(water_cooling_UNO_input*fraction_CW_to_air); lognormal variance with pedigree 0.0807, pedigree (2,2,5,1,1)
  Calculated value based on literature values and expert opinion. See comments in the parametres' comment field.
  property fraction, origin: unspecified 0.998132; name fraction_origin_unspecified
  property fraction, origin: fresh water 0.00186814; name fraction_origin_fresh_water
  property fraction, origin: salt water 0; name fraction_origin_salt_water
- Chloride [water, surface water]: 0.0157324 kg; lognormal variance with pedigree 0.448, pedigree (4,5,5,5,5)
  (same comment as for Sodium, ion)
- Water [water, unspecified]: 0.0133686 m3; name water_to_water_unspecified; = (water_ultrapure_input/1000)*(1-fraction_WUP_to_air)+water_cooling_UNO_input*(1-fraction_CW_to_air); lognormal variance with pedigree 0.0807, pedigree (2,2,5,1,1)
  (same comment as for Water)
  property fraction, origin: salt water 0; name fraction_origin_salt_water_Ww
  property fraction, origin: fresh water 0.00457099; name fraction_origin_fresh_water_Ww
  property fraction, origin: unspecified 0.995429; name fraction_origin_unspecified_Ww
- Ammonium, ion [water, surface water]: 0.00366794 kg; lognormal variance with pedigree 0.188, pedigree (4,5,5,5,5)
  Calculated value from mass balance. The remaining amount of unreacted ammonium (4.8 % of the input) was assumed to leave the production process with the waste water. Further it was assumed that this wastewater is treated in a internal wastewater plant. For the ammonia within the waste water a removal efficiency of 50% was assumed. The nitrogen emitted to air (N2) and remaining in the sewage sludge was neglected.
  Uncertainty: Estimation

## Sampling procedure
Literature data

## Extrapolations
Energy consumptions and emissions are estimated. Infrastructure and transports are calculated with standard values.

## Review by Roland Hischier 2011-09-23
Transfer of documentation done.

## Review by Roland Hischier 2009-01-28
passed.
none
