# manganese sulfate production

Dataset: EcoSpold 2, unit process
Geography: GLO
Time period: 2005-01-01 to 2021-12-31
Technology level: current
Classification: ISIC rev.4 ecoinvent: 2011:Manufacture of basic chemicals
Synonyms: Manganese sulphate; Manganese(II) sulfate; Sulfuric acid manganese salt; Manganese(2+)
Scenario: Business-as-Usual
System model: Allocation, cut-off by classification
Generated by: Tereza Levova
Published in: Ullmann 2010
Database: ecoinvent
isCopyrightProtected: true
accessRestrictedTo: 1

## General comment
This dataset represents the production of 1 kg of manganese (II) sulfate. Manganese sulfate is commercially one of the most important manganese products. It is the starting material for electrolytic manganese metal, electrolytic manganese dioxide, fungicides such as Maneb, and other manganese compounds including manganese carbonate, manganese soaps (naphthenate, linolate, and resinate, all used as siccatives), and certain inorganic pigments. Manganese sulfate is also used in textile printing and glass making. Very significant in terms of volume is the use of manganese sulfate as a fertilizer for manganese-deficient soils, for example, in the vegetable- and citrus-growing areas of Florida. It is also valuable as a micronutrient additive for animal feeds.
Manganese (II) sulfate is produced by two major routes; directly by reaction of manganese (II) oxide (or manganese carbonate) with sulfuric acid or as a byproduct from organic oxidations with manganese dioxide. This dataset represents the production of manganese sulfate from manganese concentrate. The inventory is based on stoichiometric calculations and approximations based on data from a large chemical plant (Gendorf 2016).
References:
Reidies, A. H. 2000. Manganese Compounds. Ullmann's Encyclopedia of Industrial Chemistry.
Gendorf (2016) Umwelterklärung 2015, Werk Gendorf Industriepark, www.gendorf.de.

## Included activities start
The activity starts when the raw materials enter the process.

## Included activities end
This activity ends with the production of manganese sulfate. The dataset includes the consumption of raw materials as well as energy uses, infrastructure use and emissions.

## Geography
The data in this dataset are not geography-specific. Some values are based on data from a large chemical factory located in Germany. These are assumed to be valid for this geography.

## Technology
The following reaction is modelled in this dataset:
The yield of the reaction is 95%. 0.2% of the unreacted amount of manganese dioxide is assumed to be released as manganese (Mn) into air as pollution. The remaining unreacted amount is assumed to leave the process as a part of wastewater. The wastewater treatment efficiency is assumed to be 90%, thus 10% of manganese (Mn) is assumed to be released to environment (water). 0.2% of the unreacted amount of sulfur dioxide (SO2) is assumed to be released as emissions into air. The remaining unreacted amount is assumed leave the process as a part of wastewater. The wastewater treatment efficiency is assumed to be 90%, thus 10% of sulfur (S) is assumed to be released to environment (water).

## Time period
Time of publications. Some values are based on data published by the Gendorf factory and are from the years 2011 to 2015. The time period has been adjusted accordingly. For more details, see the comments of the exchanges.

## Parameters
- efficiency: 0.95 dimensionless; name process_efficiency; lognormal variance with pedigree 0.0187, pedigree (4,4,1,3,3)
  Estimated value; efficiency of the chemical reaction.

## Reference product
- manganese sulfate: 1 kg; name manganese_sulfate_output; By-product classification allocatable product; CPC 34240: Phosphates of triammonium; salts and peroxysalts of inorganic acids and metals n.e.c.; CAS 7785-87-7
  Manganese sulfate is commercially one of the most important manganese products. It is the starting material for electrolytic manganese metal, electrolytic manganese dioxide, fungicides such as Maneb, and other manganese compounds including manganese carbonate, manganese soaps (naphthenate, linolate, and resinate, all used as siccatives), and certain inorganic pigments. Manganese sulfate is also used in textile printing and glass making. Very significant in terms of volume is the use of manganese sulfate as a fertilizer for manganese-deficient soils, for example, in the vegetable- and citrus-growing areas of Florida. It is also valuable as a micronutrient additive for animal feeds.
  production volume 6.5e7 kg; name RP_PV; = 130000*1000*0.5
    The world's annual production is assumed to be app. 130,000 tones/ year (Ullmann's Encyclopedia). Manganese sulfate is produced mainly by two different technologies and as a by-product in production of other chemicals. It is assumed, that 50% of the world's production volume is produced by technology presented in this activity.
  property price 0.413 EUR2005; name manganese_sulfate_output_price_EUR2005
    Calculated value based on data from United Nations Commodity Trade Statistics Database (comtrade.un.org). UN comtrade category: 282090 Manganese oxides other than manganese dioxide. Prices from the year 2005. Using exchange rate of 1EURO = 1.209 USD. Average of price of import into 5 main markets (EU, US, JP, IN and CN).
  property molecular weight 150.999 g/mol; name manganese_sulfate_output_MW
    MnSO4, anhydrous
  property carbon content 0
    carbon content on a dry matter basis (reserved; not for manual entry)
  properties: water content 0, dry mass 1 kg, carbon content, fossil 0, carbon content, non-fossil 0, wet mass 1 kg, water in wet mass 0 kg, carbon allocation 0 kg

## Inputs from technosphere
- chemical factory, organics: 4e-10 unit; lognormal variance with pedigree 0.31, pedigree (2,3,2,4,3)
  Calculated based on literature data published by the industry. For this activity, no information was readily available concerning infrastructure and land-use. Therefore, the infrastructure is estimated based on data from two chemical factories, the BASF site of Ludwigshafen and the chemical factory in Gendorf (which are both located in Germany), which produce a wide range of chemical substances. Based on this data, the following assumptions are made: the built area amounts to about 4.2 ha, the plant has an average output of 50'000 t/a and a lifespan of fifty years. The estimated infrastructure amount is therefore 4.00 E-10 units per kg of produced chemical.
  References:
  Althaus H.-J., Chudacoff M., Hischier R., Jungbluth N., Osses M. and Primas A. (2007) Life Cycle Inventories of Chemicals. ecoinvent report No. 8, v2.0. EMPA Dübendorf, Swiss Centre for Life Cycle Inventories, Dübendorf, CH.
  Gendorf (2000) Umwelterklärung 2000, Werk Gendorf. Werk Gendorf, Burgkirchen.
- manganese concentrate: 0.906474 kg; name manganese_concentrate_input; = ((1/ process_efficiency)*(86.936/ manganese_sulfate_output_MW))*(1/ (manganese_concentrate_input_Mn_content*(86.936/55))); lognormal variance with pedigree 0.0248, pedigree (4,5,2,1,3)
  Calculated based on stoichiometric calculations. It is assumed, that the manganese is present in the manganese concentrate in the form of manganese dioxide.
  86.9 g/mol is the molecular weight of manganese dioxide
  55 g/mol is the molecular weight of manganese
  151 g/mol is the molecular weight of manganese sulfate
  property manganese content 0.42297; name manganese_concentrate_input_Mn_content; = 0.613*0.69
  properties: dry mass 1 kg, wet mass 1 kg
  note on manganese content: Calculated based on literature (ecoinvent v2.2 report no. 10_Metals, pdf.pg. 394). The amount of manganese extratcted from the environment is 0.613kg per 1kg of manganese concentrate produced. The yield of extraction and benefication is 69%.
- tap water: 0.026 kg; lognormal variance with pedigree 0.0106, pedigree (2,3,2,4,3)
  Calculated based on literature data published by the industry. This value is a 5-year average of data (2011 - 2015) published by the Gendorf factory (Gendorf, 2016, Umwelterklärung, www.gendorf.de), (Gendorf, 2015, Umwelterklärung, www.gendorf.de), (Gendorf, 2014, Umwelterklärung, www.gendorf.de). The amount of tap water per kg of chemical substance produced is calculated using literature data published by the Gendorf factory based in Germany, which produces a wide range of chemical substances. The factory produced 1657400 tonnes of chemical substances in the year 2015 (Gendorf, 2016, Umwelterklärung, www.gendorf.de) and 740000 tonnes of intermediate products. The amount of tap water consumed in the year 2015 was 55100 tonnes (Gendorf, 2016, Umwelterklärung, www.gendorf.de). The resulting amount of tap water is 0.023 kg/kg of chemical product produced. The 5-year average (2011 - 2015, weighted by production volume) is 0.026 kg/kg.
  properties: dry mass 0.000337476 kg, carbon content, fossil 0.00178991, water content 2962.17, wet mass 1 kg
  note on carbon content, fossil: Bicarbonate content is 2.93 mol/m3. CO2 content is 0.1 mol/m3 (ecoinvent v2.2 report 8, Tab 93.1).
- wastewater, average: 0 m3; name BP_wastewater_average; pedigree (1,1,1,1,1)
  Calculated based on literature data published by the industry. This value is a 5-year average of data (2011 - 2015) published by the Gendorf factory (Gendorf, 2016, Umwelterklärung, www.gendorf.de), (Gendorf, 2015, Umwelterklärung, www.gendorf.de), (Gendorf, 2014, Umwelterklärung, www.gendorf.de). The amount of wastewater (which is later on treated in the municipal WWTP) per kg of chemical substance produced is calculated using literature data published by the Gendorf factory based in Germany, which produces a wide range of chemical substances. The factory produced 1657400 tonnes of chemical substances in the year 2015 (Gendorf, 2016, Umwelterklärung, www.gendorf.de) and 740000 tonnes of intermediate products. The amount of wastewater which is later on treated in the municipal WWTP in the year 2015 was 1200 tonnes (Gendorf, 2016, Umwelterklärung, www.gendorf.de). The resulting amount of wastewater is 2.7E-06 m3/kg of chemical product produced.
  production volume 0 m3
    Calculated from the production volume of manganese sulfate in proportion to the respective output amounts.
  property price 0 EUR2005; name BP_wastewater_average_price_EUR2005
  properties: water content 2882.2, carbon content, non-fossil 0.194039, wet mass 1000 kg, dry mass 0.346837 kg
  note on carbon content, non-fossil: 0.0673 kg TOC/m3 (Tab A.17, ecoinvent v2.2 report 13_I). TOC was considered as Total Carbon.
- heat, district or industrial, natural gas: 2.15 MJ; source Gendorf 2000; lognormal variance with pedigree 0.0106, pedigree (2,3,2,4,3)
  Calculated based on literature data published by the industry. This value is a 5-year average of data (2011 - 2015) published by the Gendorf factory (Gendorf, 2016, Umwelterklärung, www.gendorf.de), (Gendorf, 2015, Umwelterklärung, www.gendorf.de), (Gendorf, 2014, Umwelterklärung, www.gendorf.de). The amount of heat used per kg of chemical substance produced is calculated using literature data published by the Gendorf factory based in Germany, which produces a wide range of chemical substances. The factory produced 1657400 tonnes of chemical substances in the year 2015 (Gendorf, 2016, Umwelterklärung, www.gendorf.de) and 740000 tonnes of intermediate products. The amount of heat in the year 2015 was 523500 GJ (Gendorf, 2016, Umwelterklärung, www.gendorf.de) of which 90% was obtained from natural gas and 10% from steam. The resulting amount of heat from natural gas is 2.02 MJ/kg of chemical product produced. The 5-year average (2011 - 2015, weighted by production volume) is 2.15 MJ/kg. Cross-reference: the amount of chemicals produced (excluding intermediate products) in the EU-28 in the year 2011 was 327 million tonnes (Eurostat, http://ec.europa.eu/eurostat/statistics-explained/index.php/Chemicals_production_statistics, accessed 20170126). The chemical and petrochemical industry sector consumed 2.33 EJ of energy in 2011 (European Commission - Joint Research Centre, 2014, BAT on Common Waste water and Waste Gas Treatment/Management Systems in the Chemical Sector). The resulting energy (both heat and electricity) consumed per kg of chemicals produced in 2011 is thus 7.13 MJ/kg. This is higher than the value calculated using data published by Gendorf – 3.85 MJ/kg, but that is to be expected as the intermediate products are not accounted for.
  properties: heating value, net 1 MJ
- sulfur dioxide, liquid: 0 kg; name sulfur_dioxide_input; pedigree (1,1,1,1,1)
  Stoichiometric calculation; yield of 95%.
  property molecular weight 64.063 g/mol; name sulfur_dioxide_input_MW
  properties: wet mass 1 kg, dry mass 1 kg
- non-sulfidic overburden, off-site: -0.384585 kg; name BP_non_sulfidic_overburden_off_site; = (manganese_concentrate_input*(1-(86.936/151)))*-1; lognormal variance with pedigree 0.0248, pedigree (4,5,2,1,3)
  Calculated based on knowledge of the amount of manganese in the manganese concentrate. The remaining material is considered to be material for treatment.
  86.9 g/mol is the molecular weight of manganese dioxide
  55 g/mol is the molecular weight of manganese
  151 g/mol is the molecular weight of manganese sulfate
  production volume 2.4998e7 kg; = RP_PV*BP_non_sulfidic_overburden_off_site/ABS(manganese_sulfate_output)
    (same comment as for wastewater, average)
  property price 0 EUR2005; name BP_non_sulfidic_overburden_price_EUR2005
  properties: dry mass 1 kg, wet mass 1 kg
- electricity, medium voltage: 0.416 kWh; lognormal variance with pedigree 0.0106, pedigree (2,3,2,4,3)
  Calculated based on literature data published by the industry. This value is a 5-year average of data (2011 - 2015) published by the Gendorf factory (Gendorf, 2016, Umwelterklärung, www.gendorf.de), (Gendorf, 2015, Umwelterklärung, www.gendorf.de), (Gendorf, 2014, Umwelterklärung, www.gendorf.de). The amount of electricity per kg of chemical substance produced is calculated using literature data published by the Gendorf factory based in Germany, which produces a wide range of chemical substances. The factory produced 1657400 tonnes of chemical substances in the year 2015 (Gendorf, 2016, Umwelterklärung, www.gendorf.de) and 740000 tonnes of intermediate products. The amount of electricity consumed in the year 2015 was 3498800 GJ (Gendorf, 2016, Umwelterklärung, www.gendorf.de). The resulting amount of electricity is 0.406 kWh/kg (year 2015) of chemical substance produced. The 5-year average (2011 - 2015, weighted by production volume) is 0.416 kWh/kg (1.5 MJ/kg). Cross-reference: the amount of chemicals produced (excluding intermediate products) in the EU-28 in the year 2011 was 327 million tonnes (Eurostat, http://ec.europa.eu/eurostat/statistics-explained/index.php/Chemicals_production_statistics, accessed 20170126). The chemical and petrochemical industry sector consumed 2.33 EJ of energy in 2011 (European Commission - Joint Research Centre, 2014, BAT on Common Waste water and Waste Gas Treatment/Management Systems in the Chemical Sector). The resulting energy (both heat and electricity) consumed per kg of chemicals produced in 2011 is thus 7.13 MJ/kg. This is higher than the value calculated using data published by Gendorf – 3.85 MJ/kg, but that is to be expected as the intermediate products are not accounted for.
- heat, from steam, in chemical industry: 0 MJ; pedigree (1,1,1,1,1)
  Calculated based on literature data published by the industry. This value is a 5-year average of data (2011 - 2015) published by the Gendorf factory (Gendorf, 2016, Umwelterklärung, www.gendorf.de), (Gendorf, 2015, Umwelterklärung, www.gendorf.de), (Gendorf, 2014, Umwelterklärung, www.gendorf.de). The amount of heat used per kg of chemical substance produced is calculated using literature data published by the Gendorf factory based in Germany, which produces a wide range of chemical substances. The factory produced 1657400 tonnes of chemical substances in the year 2015 (Gendorf, 2016, Umwelterklärung, www.gendorf.de) and 740000 tonnes of intermediate products. The amount of heat in the year 2015 was 523500 GJ (Gendorf, 2016, Umwelterklärung, www.gendorf.de) of which 90% was obtained from natural gas and 10% from steam. The resulting amount of heat from steam is 0.22 MJ/kg of chemical product produced. The 5-year average (2011 - 2015, weighted by production volume) is 0.20 MJ/kg. Cross-reference: the amount of chemicals produced (excluding intermediate products) in the EU-28 in the year 2011 was 327 million tonnes (Eurostat, http://ec.europa.eu/eurostat/statistics-explained/index.php/Chemicals_production_statistics, accessed 20170126). The chemical and petrochemical industry sector consumed 2.33 EJ of energy in 2011 (European Commission - Joint Research Centre, 2014, BAT on Common Waste water and Waste Gas Treatment/Management Systems in the Chemical Sector). The resulting energy (both heat and electricity) consumed per kg of chemicals produced in 2011 is thus 7.13 MJ/kg. This is higher than the value calculated using data published by Gendorf – 3.85 MJ/kg, but that is to be expected as the intermediate products are not accounted for.
  properties: heating value, net 1 MJ
- wastewater, average: -8.43646e-7, -9.12666e-8, -1.76509e-6 m3 (3 entries); lognormal variance with pedigree 0.0106, pedigree (2,3,2,4,3)
  (same comment as for wastewater, average)
  production volume 175.5 m3
- sulfur dioxide, liquid: 0.127993, 0.318597 kg (2 entries); lognormal variance with pedigree 0.0248, pedigree (4,5,2,1,3)
  Stoichiometric calculation; yield of 95%.
  properties: wet mass 1 kg, molecular weight 64.063 g/mol, dry mass 1 kg
- heat, from steam, in chemical industry: 0.0299772, 0.170023 MJ (2 entries); lognormal variance with pedigree 0.0106, pedigree (2,3,2,4,3)
  (same comment as for heat, from steam, in chemical industry)

## Inputs from nature
- Water, river [natural resource, in water]: 0.00086 m3; lognormal variance with pedigree 0.0106, pedigree (2,3,2,4,3)
  Calculated based on literature data published by the industry. This value is a 5-year average of data (2011 - 2015) published by the Gendorf factory (Gendorf, 2016, Umwelterklärung, www.gendorf.de), (Gendorf, 2015, Umwelterklärung, www.gendorf.de), (Gendorf, 2014, Umwelterklärung, www.gendorf.de). The amount of groundwater and surface water (river) extracted per kg of chemical substance produced is calculated using literature data published by the Gendorf factory based in Germany, which produces a wide range of chemical substances. The factory produced 1657400 tonnes of chemical substances in the year 2015 (Gendorf, 2016, Umwelterklärung, www.gendorf.de) and 740000 tonnes of intermediate products. The amount of groundwater and surface water (river) extracted in the year 2015 was 19950000 tonnes and 21488100 tonnes respectively (Gendorf, 2016, Umwelterklärung, www.gendorf.de).
- Water, cooling, unspecified natural origin [natural resource, in water]: 0.0164 m3; lognormal variance with pedigree 0.0106, pedigree (2,3,2,4,3)
  Calculated based on literature data published by the industry. This value is a 5-year average of data (2011 - 2015) published by the Gendorf factory (Gendorf, 2016, Umwelterklärung, www.gendorf.de), (Gendorf, 2015, Umwelterklärung, www.gendorf.de), (Gendorf, 2014, Umwelterklärung, www.gendorf.de). The amount of water for cooling extracted per kg of chemical substance produced is calculated using literature data published by the Gendorf factory based in Germany, which produces a wide range of chemical substances. The factory produced 1657400 tonnes of chemical substances in the year 2015 (Gendorf, 2016, Umwelterklärung, www.gendorf.de) and 740000 tonnes of intermediate products. The reported amounts of water extracted as groundwater and surface water (river) are assumed to be used entirely for cooling purposes.
- Water, well, in ground [natural resource, in water]: 0.00083 m3; lognormal variance with pedigree 0.0106, pedigree (2,3,2,4,3)
  (same comment as for Water, river)

## Emissions to nature
- Manganese [air, unspecified]: 6.59601e-5 kg; name manganese_emissions_air; = (0.002*0.1*manganese_concentrate_input* (86.936/151))*(manganese_emissions_air_MW/86.936); lognormal variance with pedigree 0.0248, pedigree (4,5,2,1,3)
  Calculated based on literature values and assumptions. It has been assumed, that (0.2%*10%=) 0.02% of the volume of manganese dioxide (MnO2) on the input evaporates in the form of manganese as pollution into the air. The 10% multiplication is done based on expert judgement and the knowledge of manganese volatility.
  86.9 g/mol is the molecular weight of manganese dioxide
  55 g/mol is the molecular weight of manganese
  151 g/mol is the molecular weight of manganese sulfate
  property molecular weight 54.938 g/mol; name manganese_emissions_air_MW
- Sulfur dioxide [air, unspecified]: 0.000893181 kg; name sulfur_dioxide_emissions_air; = 0.002* sulfur_dioxide_input; lognormal variance with pedigree 0.0248, pedigree (4,5,2,1,3)
  Calculated based on literature values and assumptions. It has been assumed, that 0.2% of the volume of sulfur dioxide (SO2) on the input evaporates as pollution into the air.
  property molecular weight 64.063 g/mol; name sulfur_dioxide_emissions_air_MW
- Sulfate [water, unspecified]: 0.00339087 kg; = ((((1/process_efficiency)-1)*sulfur_dioxide_input)- sulfur_dioxide_emissions_air)*(sulfate_emissions_water_MW/ sulfur_dioxide_input_MW)*0.1; lognormal variance with pedigree 0.0642, pedigree (4,5,2,1,3)
  Calculated based on literature values and assumptions. In case of sulfur dioxide (SO2), part of the unreacted volume evaporates as emission to air (0.2% of the input), the rest is released as sulfur (S) as a part of wastewater. The efficiency of the waste water treatment plant (WWTP) is assumed to be 90%, i.e. 10% of the volume of sulfur on the inflow to the WWTP is released to the environment.
  property molecular weight 96.07 g/mol; name sulfate_emissions_water_MW
- Water [water, unspecified]: 0.0167 m3; lognormal variance with pedigree 0.0106, pedigree (2,3,2,4,3)
  Calculated based on literature data published by the industry (Gendorf, 2016, Umwelterklärung, www.gendorf.de). The amount of water released back to the environment consists of the amount of process water treated in the internal WWTP and then released back to the environment and the amount of cooling water released back to the environment.
  property fraction, origin: unspecified 1; name fraction_origin_unspecified_Ww
  property fraction, origin: salt water 0; name fraction_origin_salt_water_Ww
  property fraction, origin: fresh water 0; name fraction_origin_fresh_water_Ww
- Manganese [water, unspecified]: 0.0017292 kg; name manganese_emissions_water; = (((((1/process_efficiency)-1)* manganese_concentrate_input*(86.936/151))*( manganese_emissions_water_MW/86.936))- manganese_emissions_air)*0.1; lognormal variance with pedigree 0.0642, pedigree (4,5,2,1,3)
  Calculated based on literature values and assumptions. In case of manganese dioxide (MnO2), part of the unreacted volume evaporates as emission to air (0.2% of the input) in the form of manganese, the rest is released as manganese (Mn) as a part of wastewater. The efficiency of the waste water treatment plant (WWTP) is assumed to be 90%, i.e. 10% of the volume of manganese on the inflow to the WWTP is released to the environment.
  86.9 g/mol is the molecular weight of manganese dioxide
  55 g/mol is the molecular weight of manganese
  151 g/mol is the molecular weight of manganese sulfate
  property molecular weight 54.938 g/mol; name manganese_emissions_water_MW
- Water [air, unspecified]: 0.0014 m3; lognormal variance with pedigree 0.0106, pedigree (2,3,2,4,3)
  Calculated to ensure the water balance. In general, in the case of recirculating cooling systems, 77% of the water input evaporates to air. In case of once-through cooling systems, 4% of the water input evaporates to air. The process water has in the chemical industry an average evaporation rate of 20.5%. In the specific case of the Gendorf factory, the calculated evaporation rate based on the data published is 6.3%. This matches the qualitative information, that the majority of the cooling systems in Gendorf are once-through and that the amount of cooling water used is significantly higher than the amount of process water used (Gendorf, 2016, Umwelterklärung, www.gendorf.de).
  property fraction, origin: unspecified 1; name fraction_origin_unspecified
  property fraction, origin: fresh water 0; name fraction_origin_fresh_water
  property fraction, origin: salt water 0; name fraction_origin_salt_water

## Sampling procedure
Literature data and stochiometric calculations. Some values are calculated based on data from a large chemical factory located in Germany. For more details, see the comments of the exchanges.

## Extrapolations
This dataset has been extrapolated from year 2020 to the year of the calculation (2021). The uncertainty has been adjusted accordingly.

## Review by Emilia Moreno Ruiz 2017-08-08
This dataset was additionally reviewed in a separate review process by Eric Johnson of Atlantic Consulting as well as Emilia Moreno Ruiz and Gregor Wernet of ecoinvent.
