# softwood forestry, spruce, sustainable forest management

Dataset: EcoSpold 2, unit process
Geography: RoW
Time period: 2010-01-01 to 2021-12-31
Technology level: current
Classification: ISIC rev.4 ecoinvent: 0220:Logging
Classification: EcoSpold01Categories: wooden materials/extraction
Tags: combined production
Scenario: Business-as-Usual
System model: Allocation, cut-off by classification
Generated by: Frank Werner
Database: ecoinvent
isCopyrightProtected: true
accessRestrictedTo: 1

## General comment
This GLO data has been automatically generated as a copy of the SE dataset. This dataset covers the production and harvesting of 1 m3 of stemwood, spruce, solid, under bark, plus the relative share of enery wood from slash from sustainable forest management as the prevailing management practices in Sweden.
For Sweden forestry processes for the 3 main tree species are modelled:• hardwood: birch
• softwood: spruce
• softwood: pine
Table 1-1 lists the parameters of the inventoried tree species and their sources:
The inventories are based on several literature sources, mainly Kilpeläinen et al. (2011), Berg & Lindholm (2004), Berg & Karjalainen (2003) and Yrjölä 2002. Some process data for stand establishment and maintenance was taken from Albrecht et al. (2009).
The datasets cover in particular:
• stand establishment with planting and/or natural regeneration, depending on the tree species, based on Kallio & Leinonen (2005) (as for Finland). For seedling production in heated and unheated greenhouses, data from Aldentun (2002) is used. The ratio between seedlings from heated and unheated greenhouses as calculated to meet the energy consumption for seedling production as reported by Kilpeläinen et al. (2011). Planting is modelled according to Albrecht et al. (2008);
• site preparation, including soil scarification with harrows or similar equipment as well as ditch cleaning (Kilpeläinen et al. 2011);
• tending, young growth tending, and cleaning have been inventoried based on Albrecht et al. (2009); for birch, the scenario for beech by Albrecht et al. (2009) has been assumed;
• maintenance construction of forest road according to information from Svaeskog (personal communication,2007);
• thinning and final harvest, whereas it has been assumed that 98% of the harvesting from thinning und final harvest are done in a fully mechanised way with harvester and forwarder, and 2% of the harvesting are done in a motor-manual way with power saw and forest tractor (based on Klvac & Skoupy 2009).
Table 1-2 compiles the parameters used for the inventorying of the stand establishment and maintenance over one rotation period for each tree species:
Within the scope of the datasets, eventual fertilization, redistribution of wood ash or the extraction of stumps for energetic purposes has not been considered.
The total harvest and assortments have been assumed for the inventoried tree species over one rotation period. Total harvesting over one rotation period has been estimated from the following sources and from the rotation periods as listed in Table 1-2:
• birch: yield estimated based on Hynenen et al. (2008), who assume a total harvest of between 360 and 560 m3 /ha, plus 8.1% of the commercial volume as „GROT“ for energy purposes (Skogsstyrelsen 2012);
• spruce: yield estimate based on (1995, 2004) quoted after (Kallio & Leinonen 2005), whereas 75% of the theoretically available biomass are extracted for energy purposes (Kallio & Leinonen 2005);
• pine: yield estimated from the ratio of the yield estimates for spruce and pine as documented in Table 1-3.
Table 1-3 compiles the total harvest over one rotation period and its relative distribution in main assortments, in m3 solid under bark (sub), based on own calculations.
In Sweden thinnings and final harvests are done fully mechanised in the so-called „cut-to-length“ system. Klvac & Skoupy (2009) estimate that 98% of the total harvest of stemwood are harvested with harvesters and forwarders in a fully mechanised system whereas only 2% are harvested motor-manually with a power saw and a forest tractor.
Tops and branches are either chipped in the stand or forwarded as loose material or as bundles that have been produced with an energy wood harvester.
In Table 1-4 the effort is estimated for the harvesting of an average m3 of stemwood from thinnings and harvesting over one rotation period. In the final step at the bottom of the table, the PMH/m3 as documented in literature for Swedish conditions have been adapted to be consistent with the fuel consumption inventoried in the ecoinvent datasets on forest machinery and as reported for Swedish forestry operations. These adaptations are due to the average size of harvesters and forwarders used in Sweden, which deviates from the size of the forest machinery inventoried in the respective dataset (see Kärhä 2011, Skogforsk 2006).
For the chipping in the stand a productivity of 25 m3bulked/PMH is assumed (based on Cremer & Velazquesz 2007, referring to Lechner et al. 2007)); for the bundling of slash, an energy wood harvester is inventoried with a productivity of 9 m3 solid/PMH for spruce, 6.5 m3 solid/PMH for pine and 8.3 88m3 solid/PMH for birch (Kallio & Leinonen 2005).
For the forwarding, a productivity of 25 bundles/PMH is assumed for Swedish condition, while an average length of 3 m and an average diameter of 0.75 m diameter is assumed for a bundle (Eriksson 2008, Kallio & Leinonen 2005). This adds up to a productivity of 88 m3bulked/PMH for the forwarding of bundles with a diesel consumption of 9.5 l/h of the forwarder (Gustavsson 2011).
For wood chips chipped in the stand a productivity of the forwarding of 70 Sm3 bulked/PMH with a diesel consumption of 9.5 l/h of the forwarder is assumed.
Losses of biomass during the production chain are disregarded due to the relatively rough estimates within the production chain of wood chips and bundles (see Erikkson & Gustavsson 2008 for more information).
Due to the available data, it has not been possible to distinguish productivities for the individual tree species.
Harvesting of all assortments for the reference year 2011 has been taken from the Statistical Yearbook 2012 (Skogsstyrelsen 2012); total harvest consists of the harvested stemwood plus the harvested tops and branches (GROT) for energetic purposes. The distribution of the total harvest in the harvests of each tree species have been made based on information from Svaeskog and the values on percentages in Table 1-3.
Due to the prevailing practice of clear-cutting in final harvest and due to the sketched practices for site preparation, the area of productive forestry in Sweden has been classified as „forest, intensive“ according to the CORINE classification of land covers.
The production volumes for the assortments of energy wood are converted to kg dry mass within the dataset for ecoinvent 3.
The global production volumes of the newly inventoried tree species birch as well as the amount of bundles of energy wood are extrapolated via the Gross Domestic Product of Sweden and the world respectively (GDP Welt 70‘210‘920 Mio. US $ / GDP Sweden 539‘387 Mio. US $= 130) . This estimate is not really meaningful; the corresponding global dataset is, however, required as a technical precondition of the ecoinvent 3 software.
References:
Albrecht, S., S. Rüter, J. Welling, M. Knauf, U. Mantau, A. Braune, M. Baitz, H. Weimar, S. Sörgel, J. Kreissig, J. Deimling and S. Hellwig (2009): ÖkoPot - Ökologische Potenziale durch Holznutzung gezielt fördern. Abschlussbericht zum BMBF-Projekt FKZ 0330545. Universität Stuttgart, Universität Hamburg, Hamburg.
Berg, S. and T. Karjalainen (2003): Comparison of greenhouse gas emissions from forest operations in Finand and Sweden. Forestry, 76(3): 271-284.
Berg, S. and E.-L. Lindholm (2004): Energy use and environmental impacts of forest operations in Sweden. Journal of Cleaner Production, 13(1): 33-42.
Eriksson, L. N. (2008): Comparative analyses of forest fuels in a life cycle perspective with a focus on transport systems. Resources, Conservation and Recycling, 52(2008): 1190–1197.
Eriksson, L. N. and L. Gustavsson (2008): Biofuels from stumps and small roundwood - costs and CO2 benefits. Biomass and Bioenergy, 32: 897-902.
Hakkila, P. (1995): Procurement of Timber for th efinnish Forest Industries. The Finnisch Forest Research Institute, Helsinki.
Hakkila, P. (2004): Developoing technology for large-scale production of forest chips. Technology Programme Report 6/2004, Tekes, Helsinki.
Hynyne, J., P. Niemistö, A. Viherä-Aarnio, A. Brunner, S. Hein and P. Velling (2009): Silviculture of birch (Betula pendula Roth and Betula pubescens Ehrh.) in northern Europe. Forestry, 83(1): 103-119.
Kallio, M. and A. Leinonen (2005): Production technology of forest chips in Finland. VTT, Jyväskyla.
Kärhä, K. (2011): Industrial supply chains and production machinery of forest chips in Finland. Biomass and Bioenergy, 35: 3404-3413.
Kilpeläinen, A., A. Alam, H. Strandman and S. Kellomäki (2011): Life cycle assessment tool for estimating net CO2 exchange of forest production. GCM Bionenergy: 1-11.
Klvac, R. and A. Skoupy (2009): Characteristic fuel consumption and exhaust emissions in fully mechanized logging operations. Journal of Forest Research, 14(6): 328-334: referring to Freitas 2004.
Lindholm, E.-L. (2010): Energy use and environmental impact of roundwood and forest fuel production in Sweden; doctoral thesis. Swedish University of Agricultural Sciences, Uppsala.
Schweinle, J. (2000): Analyse und Bewertung der forstlichen Produktion als Grundlage für weiterführende forst- und holzwirtschaftliche Produktlinien-Analysen. Mitteilungen der Bundesforschungsanstalt für Forst- und Holzwirtschaft Hamburg, Komissionsverl. Max Wiedebusch, Hamburg.
Schweinle, J. and C. Thoroe (2001): Vergleichende Ökobilanzierung der Rohholzproduktion in verschiedenen Forstbetrieben. Mitteilungen der Bundesforschungsanstalt für Forst- und Holzwirtschaft Nr. 204, Kommissionsverlag Max Wiedebusch, Hamburg.
Skogforsk (2006): Fuel consumption in forestry continues to fall. Results from Skogforsk, Skogforsk, Uppsala.
Skogsstyrelsen (2012): Swedish Statistical Yearbook of Forestry 2012. Skogsstyrelsen/Swedish Forst Agency, Jönköping.
Yrjölä, T. (2002): Forest management guidelines and practices in Finland, Sweden and Norway. Interal Report No. 11, European Forest Institute, Joensuu.

## Included activities start
The activity starts with site preparation assuming natural regeneration and/or planting including seedling production (as applicable for the species see general comments field) and includes all process related to forest management, including site preparation, planting, tending, young growth tending, clearing, thinnings and harvesting operations including the processing of wood fuel to chips, bundles and chopped wood (logs for energy) over one rotation period. It covers also the maintenance and construction of forest roads.

## Included activities end
This activity ends with the assortments at the forest road and includes eventual drying before transportation.

## Parameters
- yield wood over rotation period: 542 m3; name yield_wood_ub; lognormal variance with pedigree 0.2506, pedigree (2,1,1,1,1)
  yield of wood under bark per ha over one rotation period
- share of chips of total wood fuel: 0.78 dimensionless; name share_chips; lognormal variance with pedigree 0.2506, pedigree (2,1,1,1,1)
  Share of chips of total wood fuel harvested (referring consistently to volume under bark or volume over bark for all types of wood fuel)share_bundles + share_chopped_wood+share_chips = 100% wood fuel; calculated based on info from Swedish Forest Agency (http://www.skogsstyrelsen.se/en/AUTHORITY/Statistics/Subject-Areas/Wood-Fuel/Tables-and-figures/), confirmed as 10% of total chips from forest residues (Kärhä, K. (2011): Industrial supply chains and production machinery of forest chips in Finland. Biomass and Bioenergy, 35: 3404-3413.)
- rotation period: 80 year; name rotation_period; lognormal variance with pedigree 0.252, pedigree (3,1,1,1,1)
  number of years from planting to final harvest. Source: Sveaskog, personal communication
- skidding with skidder per m3: 0.00134 PMH/m3; name skidding; lognormal variance with pedigree 0.2506, pedigree (2,1,1,1,1)
  referring to stemwood; IMPROTANT NOTE: When considering several harvesting systems, e.g. in datasets on national forestry, this parameter is NOT the productivity of the harvesting system but the productivity of the system weighted with the share of the amount harvested by the respective system. This has to be calculated outside EcoEditor. Own calculations based on Klvac, R. and A. Skoupy (2009): Characteristic fuel consumption and exhaust emissions in fully mechanized logging operations. Journal of Forest Research, 14(6): 328-334: referring to Freitas 2004; Skogforsk (2006): Fuel consumption in forestry continues to fall. Results from Skogforsk, Skogforsk, Uppsala; Berg, S. and T. Karjalainen (2003): Comparison of greenhouse gas emissions from forest operations in Finand and Sweden. Forestry, 76(3): 271-284.
- moisture content bundles: 0.5 dimensionless; name moisture_bundles; lognormal variance with pedigree 0.2506, pedigree (2,1,1,1,1)
  kg water/kg dry mass. Eriksson, L. N. (2008): Comparative analyses of forest fuels in a life cycle perspective with a focus on transport systems. Resources, Conservation and Recycling, 52(2008): 1190–1197.
- power sawing without catalytic converter per m3: 0.00276 PMH/m3; name power_sawing; lognormal variance with pedigree 0.2506, pedigree (2,1,1,1,1)
  referring to stemwod; IMPORTANT NOTE: When considering several harvesting systems, e.g. in datasets on national forestry, this parameter is NOT the inverse productivity of the harvesting system but the inverse productivity of the system weighted with the share of the amount harvested by the respective system. This has to be calculated outside EcoEditor. Own calculations based on Klvac, R. and A. Skoupy (2009): Characteristic fuel consumption and exhaust emissions in fully mechanized logging operations. Journal of Forest Research, 14(6): 328-334: referring to Freitas 2004; Skogforsk (2006): Fuel consumption in forestry continues to fall. Results from Skogforsk, Skogforsk, Uppsala; Berg, S. and T. Karjalainen (2003): Comparison of greenhouse gas emissions from forest operations in Finand and Sweden. Forestry, 76(3): 271-284.
- share of chips processed in stand (from above-ground biomass): 0.111 dimensionless; name share_chips_in_stand; lognormal variance with pedigree 0.2506, pedigree (2,1,1,1,1)
  Share of chips processed in the stand of total amount of chips processed in the forest; share_chips_at _forest_road+share_chips_in_stand = 100% chips from forestry; Kärhä, K. (2011): Industrial supply chains and production machinery of forest chips in Finland. Biomass and Bioenergy, 35: 3404-3413.
- share of planted area: 1 dimensionless; name share_area_planted; lognormal variance with pedigree 0.2506, pedigree (2,1,1,1,1)
  Share of forest area that is planted instead of being restocked by natural regeneration
- harvesting with forestry harvester: 0.0979 year; name harvesting; lognormal variance with pedigree 0.2506, pedigree (2,1,1,1,1)
  referring to stemwood; IMPORTANT NOTE: When considering several harvesting systems, e.g. in datasets on national forestry, this parameter is NOT the inverse productivity of the harvesting system but the inverse productivity of the system weighted with the share of the amount harvested by the respective system. This has to be calculated outside EcoEditor. Own calculations based on Klvac, R. and A. Skoupy (2009): Characteristic fuel consumption and exhaust emissions in fully mechanized logging operations. Journal of Forest Research, 14(6): 328-334: referring to Freitas 2004; Skogforsk (2006): Fuel consumption in forestry continues to fall. Results from Skogforsk, Skogforsk, Uppsala; Berg, S. and T. Karjalainen (2003): Comparison of greenhouse gas emissions from forest operations in Finand and Sweden. Forestry, 76(3): 271-284.
- wood density, dry: 430 kg/m3; name dry_wood_d; lognormal variance with pedigree 0.2506, pedigree (2,1,1,1,1)
  kg oven-dry matter/dry volume; Schweinle, J. (2000): Analyse und Bewertung der forstlichen Produktion als Grundlage für weiterführende forst- und holzwirtschaftliche Produktlinien-Analysen. Mitteilungen der Bundesforschungsanstalt für Forst- und Holzwirtschaft Hamburg, Komissionsverl. Max Wiedebusch, Hamburg.
- share of pulpwood of total wood harvest: 0.43 dimensionless; name share_pulpwood; lognormal variance with pedigree 0.2506, pedigree (2,1,1,1,1)
  Share of pulpwood of total wood harvest (referring to volume below bark); share_sawlogs + share_pulpwood + share_wood_fuel = 100%; Own calculations based on Svaeskog, personal information, and Skogsstyrelsen (2012): Swedish Statistical Yearbook of Forestry 2012. Skogsstyrelsen/Swedish Forst Agency, Jönköping.
- productivity, clefting device: 5.26 m3/PMH; name productivity_clefting_device; lognormal variance with pedigree 0.2506, pedigree (2,1,1,1,1)
  as m3 bulked/ productive machine hour
- area forest road: 37.9 m2/ha; name a_forest_road; lognormal variance with pedigree 0.2506, pedigree (2,1,1,1,1)
  213 000 km of forest roads (SLU 2008) at 4 m width, attributed to productive forest area of 22'477'000 ha (Skogsstyrelsen (2012): Swedish Statistical Yearbook of Forestry 2012. Skogsstyrelsen/Swedish Forst Agency, Jönköping.)
- productivity terrain chipper: 25 m3/PMH; name productivity_terrain_chipper; lognormal variance with pedigree 0.2506, pedigree (2,1,1,1,1)
  as m3 bulked/ productive machine hour; based on Cremer, T. and B. Velazques-Marti (2007): Evaluation of two harvesting systems for the supply of wood-chips in Norway spurce forest affected by bark beetle. Croation Journal of Forest Engineering, 28(2): 145-155;
  referring to Lechner et al 2007
- share of wood fuel of total wood harvest: 0.072 dimensionless; name share_wood_fuel; lognormal variance with pedigree 0.2506, pedigree (2,1,1,1,1)
  Share of wood fuel of total wood harvest (referring to volume below bark); share_sawlogs + share_pulpwood + share_wood_fuel = 100%; Own calculations based on Svaeskog, personal information, and Skogsstyrelsen (2012): Swedish Statistical Yearbook of Forestry 2012. Skogsstyrelsen/Swedish Forst Agency, Jönköping.
- Bark ratio: 0.12 dimensionless; name bark; lognormal variance with pedigree 0.025, pedigree (1,1,1,1,1)
  share of bark of total volume of trunk (solid wood + bark) for hardwood; U. Luginbühl, personal written communication, HIS
- share of area with mechanical site preparation: 1 dimensionless; name share_area_mechanical_site_preparation; lognormal variance with pedigree 0.2506, pedigree (2,1,1,1,1)
  e.g. forest area with and without mechanical site preparation for the establishment of a plantation
- diesel consumption per m3 of harvested wood for maintenance of forest roads: 2.00582 MJ/m3; name diesel_for_maintenance_forest_roads
  diesel consumption per m3 of harvested wood for the maintenance of forest roads, attributing total diesel consumption over 1 rotation to total year over 1 rotation period; based on Svaeskog 2007 personal communicationl
- moisture content cleft timber: 0.35 dimensionless; name moisture_cleft_timber; lognormal variance with pedigree 0.2506, pedigree (2,1,1,1,1)
  kg water/kg dry mass.
- share of chips processed at forest road (from above-ground biomass): 0.889 dimensionless; name share_chips_at_forest_road; lognormal variance with pedigree 0.2506, pedigree (2,1,1,1,1)
  Share of chips processed at forest road of total amount of chips processed in the forest; share_chips_at _forest_road+share_chips_in_stand = 100% chips from forestry; Kärhä, K. (2011): Industrial supply chains and production machinery of forest chips in Finland. Biomass and Bioenergy, 35: 3404-3413.
- area forest road per m3 wood: 0.0699262 m2/m3; name a_transformation_road; = a_forest_road/yield_wood_ub
  area of forest road per ha divided by total harvest over one rotation period per hectare
- planting density: 3000 unit; name planting_density; lognormal variance with pedigree 0.2506, pedigree (2,1,1,1,1)
  number of trees per hectare
- share of cleft timber of total wood fuel: 0.118 dimensionless; name share_cleft_timber; lognormal variance with pedigree 0.2506, pedigree (2,1,1,1,1)
  Share of cleft timber as wood fuel of total wood fuel harvested (referring consistently to volume under bark or volume over bark for all types of wood fuel); share_bundles + share_cleft_timber+share_chips = 100% wood fuel; calculated based on info from Swedish Forest Agency (http://www.skogsstyrelsen.se/en/AUTHORITY/Statistics/Subject-Areas/Wood-Fuel/Tables-and-figures/), confirmed as 10% of total chips from forest residues (Kärhä, K. (2011): Industrial supply chains and production machinery of forest chips in Finland. Biomass and Bioenergy, 35: 3404-3413.)
- moisture content wood chips: 0.8 dimensionless; name moisture_wood_chips; lognormal variance with pedigree 0.2506, pedigree (2,1,1,1,1)
  kg water/kg dry mass. Based on Schweinle, J. and C. Thoroe (2001): Vergleichende Ökobilanzierung der Rohholzproduktion in verschiedenen Forstbetrieben. Mitteilungen der Bundesforschungsanstalt für Forst- und Holzwirtschaft Nr. 204, Kommissionsverlag Max Wiedebusch, Hamburg.
- share of seedlings from heated greenhouses: 0.296 dimensionless; name seedlings_heated
  share of seedlings from heated greenhouses of total amount of seedlings used in replanting
- shrinkage ratio: 0.004 dimensionless; name shrinkage_ratio; lognormal variance with pedigree 0.25, pedigree (1,1,1,1,1)
  for wood: % of volume lost per % of humidity lowered; usually applicable for humidity u < 30%; as oak according to Kollmann 1982
- productivity energy wood harvester: 14.67 m3/PMH; name productivity_wood_fuel_harvester; = 9.0*ratio_bulk_solid_bundle; lognormal variance with pedigree 0.2506, pedigree (2,1,1,1,1)
  as m3 bulked/ productive machine hour; Kallio, M. and A. Leinonen (2005): Production technology of forest chips in Finland. VTT, Jyväskyla.
- sum of reference products in volume: 1 m3; name sum_RP_m3; lognormal variance with pedigree 0.005, pedigree (1,1,1,1,1)
  as solid under bark; DO NOT CHANGE; dataset might calculate misleading results
- forwarding with forwarder per m3: 0.0445 PMH/m3; name forwarding_forwarder; lognormal variance with pedigree 0.2506, pedigree (2,1,1,1,1)
  (same comment as for harvesting with forestry harvester)
- ratio bulk density / solid density of cleft timber: 1.4 dimensionless; name ratio_bulk_solid_cleft_timber; lognormal variance with pedigree 0.2506, pedigree (2,1,1,1,1)
  as m3 bulked / m3 solid
- ratio bulk density / solid density of bundles: 1.63 dimensionless; name ratio_bulk_solid_bundle; lognormal variance with pedigree 0.2506, pedigree (2,1,1,1,1)
  as m3 bulked / m3 solid
- area forest road in gravel: 37.9 m2/ha; name a_forest_road_gravel; = a_forest_road; lognormal variance with pedigree 0.2506, pedigree (2,1,1,1,1)
  assumed
- ratio bulk density / solid density of chips: 2.8 dimensionless; name ratio_bulk_solid_chips; lognormal variance with pedigree 0.2506, pedigree (2,1,1,1,1)
  as m3 bulked / m3 solid
- share of bundles of total wood fuel: 0.102 dimensionless; name share_bundles; lognormal variance with pedigree 0.2506, pedigree (2,1,1,1,1)
  Share of bundles of total wood fuel harvested (referring consistently to volume under bark or volume over bark for all types of wood fuel); share_bundles + share_chopped_wood+share_chips = 100% wood fuel; calculated based on info from Swedish Forest Agency (http://www.skogsstyrelsen.se/en/AUTHORITY/Statistics/Subject-Areas/Wood-Fuel/Tables-and-figures/), confirmed as 10% of total chips from forest residues (Kärhä, K. (2011): Industrial supply chains and production machinery of forest chips in Finland. Biomass and Bioenergy, 35: 3404-3413.)
- productivity mobile chipper: 120 m3/PMH; name productivity_mobile_chipper; lognormal variance with pedigree 0.2506, pedigree (2,1,1,1,1)
  as m3 bulked/ productive machine hour
- productivity forwarding bundles of slash: 88 m3/PMH; name productivity_forwarding_bundles; lognormal variance with pedigree 0.2506, pedigree (2,1,1,1,1)
  as m3 bulked/ productive machine hour
- moisture content sawlogs and veneer logs: 0.7 dimensionless; name moisture_sawlogs; lognormal variance with pedigree 0.2506, pedigree (2,1,1,1,1)
  kg water/kg dry mass. Schweinle, J. and C. Thoroe (2001): Vergleichende Ökobilanzierung der Rohholzproduktion in verschiedenen Forstbetrieben. Mitteilungen der Bundesforschungsanstalt für Forst- und Holzwirtschaft Nr. 204, Kommissionsverlag Max Wiedebusch, Hamburg.
- share, revenues wood production: 1 dimensionless; name share_revenues_wood; lognormal variance with pedigree 0.252, pedigree (3,1,1,1,1)
  Used to determine the share of land used for the productive function of forestry covered in this dataset
- wood density, basic: 378.4 kg/m3; name basic_wood_d; = dry_wood_d*(1-30*shrinkage_ratio); lognormal variance with pedigree 0.46, pedigree (5,5,5,5,5)
  kg oven-dry matter/wet volume
- moisture content pulpwood: 0.8 dimensionless; name moisture_pulpwood; lognormal variance with pedigree 0.2506, pedigree (2,1,1,1,1)
  (same comment as for moisture content sawlogs and veneer logs)
- productivity forwarding wood chips from terrain chipper: 70 m3/PMH; name productivity_forwarding_chips_in_stand; lognormal variance with pedigree 0.2506, pedigree (2,1,1,1,1)
  as m3 bulked/ productive machine hour
- share of sawlogs and veneer logs of total wood harvest: 0.498 dimensionless; name share_sawlogs; lognormal variance with pedigree 0.2506, pedigree (2,1,1,1,1)
  Share of sawlogs and veneer logs of total wood harvest (referring to volume below bark); share_sawlogs + share_pulpwood + share_wood_fuel = 100%; Own calculations based on Svaeskog, personal information, and Skogsstyrelsen (2012): Swedish Statistical Yearbook of Forestry 2012. Skogsstyrelsen/Swedish Forst Agency, Jönköping.
- area forest per m3 wood: 18.3803 m2/m3; name a_transformation_forest; = (10000-a_forest_road)*share_revenues_wood/yield_wood_ub
  area of forest per ha divided by total harvest over one rotation period per hectare

## Reference product
All rows: By-product classification allocatable product
- bundle, energy wood, measured as dry mass: 0 kg; name bundles; CPC 031: Wood in the rough
  Average composition of 1 m3 solid wood under bark, harvested in Sweden; see general comment for details; calculated as the share of wood fuel from the total amount of wood harvested, of which a share are bundles, converted from wet volume to dry matter via basic wood density, including the percentage of bark (as share of wood fuel relates to 1 m3 under bark)
  production volume 0 kg
    extrapolated from SE data to GLO data via ratios of GDPs
  property water in wet mass 0.5 kg; name bundles_WWM; = bundles_WM-bundles_DM
  property dry wood density 430 kg/m3; name bundles_dry_wood_d; = dry_wood_d
    kg dry matter/ dry volume
  property heating value, net 12.4133 MJ; name bundles_Net_Heat_Value; = bundles_Gross_Heat_Value-1.32-(20*moisture_bundles/(1+moisture_bundles))
    net (lower) heating (calorific) value
  property water content 0.5; = moisture_bundles
  property carbon content, non-fossil 0.494; name bundles_C_content_non_fossil
    biogene carbon content on a dry matter basis
  property heating value, gross 20.4 MJ; name bundles_Gross_Heat_Value
    gross (upper) heating (calorific) value
  property price 0.48 EUR2005; name bundles_price_EUR2005
    Estimated to be the same as in case of sawnwood, hardwood, raw. Assuming density of 563.2kg DM/m3.
  property apparent wood density 567.6 kg/m3; name bundles_apparent_wood_d; = bundles_basic_wood_d*(1+moisture_bundles)
    wet mass/wet volume
  property basic wood density 378.4; name bundles_basic_wood_d; = dry_wood_d*(1-30*shrinkage_ratio)
    dry mass/wet volume
  property dry mass 1 kg; name bundles_DM
  property wet mass 1.5 kg; name bundles_WM; = bundles_DM*(1+moisture_bundles)
  property carbon content, fossil 0; name bundles_C_content_fossil
    fossil carbon content on a dry matter basis
  property carbon content 0.494
    carbon content on a dry matter basis (reserved; not for manual entry)
  properties: carbon allocation 0.494 kg
- pulpwood, softwood, measured as solid wood under bark: 0 m3; name pulpwood; CPC 031: Wood in the rough
  average composition of 1 m3 solid wood under bark, harvested in Sweden; see general comment for details
  production volume 0 m3
    extrapolated from SE data to GLO data via ratios of GDPs
  property apparent wood density 681.12 kg/m3; name pulpwood_apparent_wood_d; = pulpwood_basic_wood_d*(1+moisture_pulpwood)
    wet mass/wet volume
  property water in wet mass 344 kg; name wood_WWM_pulp; = water_content_pulp*wood_DM_pulp
  property price 168 EUR2005; name pulpwood_price_EUR2005
    Temporary price data. Calculated as 90% of purchasers price based on: 2004 prices for World Import/Export (USD/kg) from FaoStat (http://faostat.fao.org/site/626/default.aspx#ancor, [accessed 14th June 2010]) Commodity: 'Wood Pulp +'. A density of 450 kg/m3 was assumed.
  property dry wood density 430 kg/m3; name pulpwood_dry_wood_d; = dry_wood_d
    kg dry matter/ dry volume
  property wet mass 774 kg; name pulpwood_WM; = wood_DM_pulp+wood_WWM_pulp
  property dry mass 430 kg; name wood_DM_pulp
  property carbon content, non-fossil 0.494; name pulpwood_C_content_non_fossil
  property heating value, gross 20.4 MJ; name pulpwood_Gross_Heat_Value
    gross (upper) heating (calorific) value; referring to 1 m3 solid wood as the reference flow, excluding bark
  property heating value, net 3856.32 MJ; name pulpwood_Net_Heat_Value; = (pulpwood_Gross_Heat_Value-1.32-(20*moisture_pulpwood/(1+moisture_pulpwood)))*pulpwood_basic_wood_d
    net (lower) heating (calorific) value; referring to 1 m3 solid wood as the reference flow, excluding bark. The property is based on a value of 10.191 MJ/kg
  property basic wood density 378.4; name pulpwood_basic_wood_d; = dry_wood_d*(1-30*shrinkage_ratio)
    dry mass/wet volume
  property water content 0.8; name water_content_pulp; = moisture_pulpwood
  property carbon content 0.494
    carbon content on a dry matter basis (reserved; not for manual entry)
  properties: carbon content, fossil 0, carbon allocation 212.42 kg
- wood chips, wet, measured as dry mass: 1 kg; name wood_chips; = share_wood_fuel*basic_wood_d/(1-bark)*share_chips; CPC 31230: Wood in chips or particles
  average composition of 1 m3 solid wood under bark, harvested in Sweden; see general comment for details; calculated as the share of wood fuel from the total amount of wood harvested, of which a share is chips, converted from wet volume to dry matter via basic wood density, including the percentage of bark (as share of wood fuel relates to 1 m3 under bark)
  production volume 1.13597e11 kg
    extrapolated from SE data to GLO data via ratios of GDPs
  property carbon content, non-fossil 0.494; name chips_C_content_non_fossil
  property dry mass 1 kg; name wood_chips_DM
  property wet mass 1.8 kg; name wood_chips_WM; = wood_chips_DM*(1+moisture_wood_chips)
  property heating value, net 10.1911 MJ; name wood_chips_Net_Heat_Value; = wood_chips_Gross_Heat_Value-1.32-(20*moisture_wood_chips/(1+moisture_wood_chips))
    net (lower) heating (calorific) value
  property water in wet mass 0.8 kg; = wood_chips_WM-wood_chips_DM
  property basic wood density 378.4; name wood_chips_basic_wood_d; = dry_wood_d*(1-30*shrinkage_ratio)
    dry mass/wet volume
  property apparent wood density 681.12 kg/m3; name wood_chips_apparent_wood_d; = wood_chips_basic_wood_d*(1+moisture_wood_chips)
    wet mass/wet volume
  property heating value, gross 20.4 MJ; name wood_chips_Gross_Heat_Value
    gross (upper) heating (calorific) value
  property dry wood density 430 kg/m3; name wood_chips_dry_wood_d; = dry_wood_d
    kg dry matter/ dry volume
  property water content 0.8; = moisture_wood_chips
  property price 0.107 EUR2005; name wood_chips_price_EUR2005
    Expert judgement (Urs Luginbühl, Swiss Sawmilling industry, personal communication in June 2014). Wood chips from softwood should have a price of 0.101 EUR/kg. Woodchips from hardwood should have a price of 0.112 EUR/kg. Average of these two values is used. Cross-reference; FAOSTAT database; http://faostat.fao.org/site/626/DesktopDefault.aspx?PageID=626#ancor; Average import/export prices of EU for 'chips and particles'. Price: 48.76 Euro/m3. The density of the wood chips is 650 kg/m3. The price is recalculated accordingly.
  property carbon content 0.494
    carbon content on a dry matter basis (reserved; not for manual entry)
  properties: carbon content, fossil 0, carbon allocation 0.494 kg
- cleft timber, measured as dry mass: 0 kg; name cleft_timber; CPC 031: Wood in the rough
  Average composition of 1 m3 solid wood under bark, harvested in Sweden; see general comment for details; calculated as the share of wood fuel from the total amount of wood harvested, of which a share is cleft timber, converted from wet volume to dry matter via basic wood density, including the percentage of bark (as share of wood fuel relates to 1 m3 under bark)
  production volume 0 kg
    extrapolated from SE data to GLO data via ratios of GDPs
  property heating value, net 13.8948 MJ; name cleft_timber_Net_Heat_Value; = cleft_timber_Gross_Heat_Value-1.32-(20*moisture_cleft_timber/(1+moisture_cleft_timber))
    net (lower) heating (calorific) value
  property apparent wood density 510.84 kg/m3; name cleft_timber_apparent_wood_d; = cleft_timber_basic_wood_d*(1+moisture_cleft_timber)
    wet mass/wet volume
  property carbon content, fossil 0; name cleft_timber_C_content_fossil
    fossil carbon content on a dry matter basis
  property water in wet mass 0.35 kg; name cleft_timber_WWM; = cleft_timber_WM-cleft_timber_DM
  property heating value, gross 20.4 MJ; name cleft_timber_Gross_Heat_Value
    gross (upper) heating (calorific) value
  property carbon content, non-fossil 0.494; name cleft_timber_C_content_non_fossil
    biogene carbon content on a dry matter basis
  property dry mass 1 kg; name cleft_timber_DM
  property dry wood density 430 kg/m3; name cleft_timber_dry_wood_d; = dry_wood_d
    kg dry matter/ dry volume
  property price 0.073 EUR2005; name cleft_timber_price_EUR2005
    Calculated based on data from FAOSTAT (accessed 20140429). The price is calculated by using data on total world import quantity (m3) and import value (1000 USD), year 2005. 3411751 m3 of Wood Fuel Trd was imported in the world in 2005. The import value was 161229000 USD. The calculated price is thus (161229000/3411751=47.3*0.8=) 38.1 Euro/m3. The density of cleft timber, measured as dry mass is 541.2 kg/m3. The recalculated price is (1/541.2*38.1=) 0.07 Euro/kg. Using the same approach the calculated price for 2010 was 0.112 Euro/kg.
  property basic wood density 378.4; name cleft_timber_basic_wood_d; = dry_wood_d*(1-30*shrinkage_ratio)
    dry mass/wet volume
  property wet mass 1.35 kg; name cleft_timber_WM; = 1+moisture_cleft_timber
  property water content 0.35; name cleft_timber_water_content; = moisture_cleft_timber
  property carbon content 0.494
    carbon content on a dry matter basis (reserved; not for manual entry)
  properties: carbon allocation 0.494 kg
- sawlog and veneer log, softwood, measured as solid wood under bark: 0 m3; name saw_veneer_logs; CPC 031: Wood in the rough
  (same comment as for pulpwood, softwood, measured as solid wood under bark)
  production volume 0 m3
    extrapolated from SE data to GLO data via ratios of GDPs
  property apparent wood density 643.28 kg/m3; name saw_veneer_logs_apparent_wood_d; = saw_veneer_logs_basic_wood_d*(1+moisture_sawlogs)
    wet mass/wet volume
  property basic wood density 378.4; name saw_veneer_logs_basic_wood_d; = dry_wood_d*(1-30*shrinkage_ratio)
    dry mass/wet volume
  property heating value, gross 20.4 MJ; name saw_veneer_logs_Gross_Heat_Value
    gross (upper) heating (calorific) value
  property water content 0.7; name water_content_saw; = moisture_sawlogs
  property heating value, net 4103.64 MJ; name saw_veneer_logs_Net_Heat_Value; = (saw_veneer_logs_Gross_Heat_Value-1.32-(20*moisture_sawlogs/(1+moisture_sawlogs)))*saw_veneer_logs_basic_wood_d
    net (lower) heating (calorific) value. The property is based on a value of 10.845 MJ/kg
  property dry wood density 430 kg/m3; name saw_veneer_logs_dry_wood_d; = dry_wood_d
    kg dry matter/ dry volume
  property water in wet mass 301 kg; name wood_WWM_saw; = water_content_saw*wood_DM_saw
  property dry mass 430 kg; name wood_DM_saw
  property price 80 EUR2005; name saw_veneer_logs_price_EUR2005
    Expert judgement (Urs Luginbühl, Swiss Sawmilling industry, personal communication in June 2014). Cross-reference; Calculated as 90% of purchasers price based on: 2004 prices for World Import/Export data (USD/m3) from UN Commodity Trade Statistics Database (http://data.un.org/Data.aspx?d=ComTrade&f=_l1Code%3a45, [accessed 10th June 2010]) Commodity: 'Logs, poles, coniferous not treated or painted'.
  property wet mass 731 kg; name saw_veneer_logs_WM; = wood_DM_saw+wood_WWM_saw
  property carbon content, non-fossil 0.494; name saw_veneer_logs_C_content_non_fossil
  property carbon content 0.494
    carbon content on a dry matter basis (reserved; not for manual entry)
  properties: carbon content, fossil 0, carbon allocation 212.42 kg

## Inputs from technosphere
- tree seedling, for planting: 0.00906204 unit; = saw_veneer_logs*(share_area_planted*planting_density*(1-seedlings_heated)/yield_wood_ub)/sum_RP_m3+pulpwood*(share_area_planted*planting_density*(1-seedlings_heated)/yield_wood_ub)/sum_RP_m3+wood_chips*(1-bark)/basic_wood_d*(share_area_planted*planting_density*(1-seedlings_heated)/yield_wood_ub)/sum_RP_m3+bundles*(1-bark)/basic_wood_d*(share_area_planted*planting_density*(1-seedlings_heated)/yield_wood_ub)/sum_RP_m3+cleft_timber*(1-bark)/ cleft_timber_basic_wood_d*(share_area_planted*planting_density*(1-seedlings_heated)/yield_wood_ub)/sum_RP_m3; lognormal variance with pedigree 0.27, pedigree (3,5,4,5,1)
  calculated as 29.6% of the seedlings coming from heated greenhouses in Sweden
- gravel, crushed: 0 kg; pedigree (1,1,1,1,1)
  3979 kg gravel /ha of wood for maintenance and construction of forest roads over rotation period
  properties: dry mass 1 kg, wet mass 1 kg
- harvesting/bundling, energy wood harvester: 0 hour; = bundles/basic_wood_d * ratio_bulk_solid_bundle/ productivity_wood_fuel_harvester; pedigree (1,1,1,1,1)
  no comment
- power sawing, without catalytic converter: 0.00013085 hour; = saw_veneer_logs*power_sawing/sum_RP_m3+pulpwood*power_sawing/sum_RP_m3+wood_chips*(1-bark)/basic_wood_d*power_sawing/sum_RP_m3+bundles*(1-bark)/basic_wood_d*power_sawing/sum_RP_m3+ cleft_timber*(1-bark)/cleft_timber_basic_wood_d*power_sawing/sum_RP_m3+saw_veneer_logs*(1*14+0*15+1*15)/yield_wood_ub/sum_RP_m3+pulpwood*(1*14+0*15+1*15)/yield_wood_ub/sum_RP_m3+wood_chips*(1-bark)/basic_wood_d*(1*14+0*15+1*15)/yield_wood_ub/sum_RP_m3+bundles*(1-bark)/basic_wood_d*(1*14+0*15+1*15)/yield_wood_ub/sum_RP_m3+ cleft_timber*(1-bark)/cleft_timber_basic_wood_d*(1*14+0*15+1*15)/yield_wood_ub/sum_RP_m3; lognormal variance with pedigree 0.2686, pedigree (2,5,4,5,1)
  average input per m3 covering hand-held gasoline-driven equipment used for site preparation, tending and pruning (attributing per ha values to total amount of wood harvested) as well as the amount of power sawing per harvested m3; see general comment for details
- tree seedling, for planting: 0.00381018 unit; = saw_veneer_logs*(share_area_planted*planting_density*seedlings_heated/yield_wood_ub)/sum_RP_m3+pulpwood*(share_area_planted*planting_density*seedlings_heated/yield_wood_ub)/sum_RP_m3+wood_chips*(1-bark)/basic_wood_d*(share_area_planted*planting_density*seedlings_heated/yield_wood_ub)/sum_RP_m3+bundles*(1-bark)/basic_wood_d*(share_area_planted*planting_density*seedlings_heated/yield_wood_ub)/sum_RP_m3+cleft_timber*(1-bark)/ cleft_timber_basic_wood_d*(share_area_planted*planting_density*seedlings_heated/yield_wood_ub)/sum_RP_m3; lognormal variance with pedigree 0.27, pedigree (3,5,4,5,1)
  calculated as 29.6% of the seedlings coming from heated greenhouses in Sweden
- diesel, burned in building machine: 0.024932 MJ; = saw_veneer_logs*diesel_for_maintenance_forest_roads/sum_RP_m3+pulpwood*diesel_for_maintenance_forest_roads/sum_RP_m3+wood_chips*(1-bark)/basic_wood_d*diesel_for_maintenance_forest_roads/sum_RP_m3+bundles*(1-bark)/basic_wood_d*diesel_for_maintenance_forest_roads/sum_RP_m3+cleft_timber*(1-bark)/cleft_timber_basic_wood_d*diesel_for_maintenance_forest_roads/sum_RP_m3+saw_veneer_logs*(share_area_planted*planting_density)/yield_wood_ub/500*7*0.84*42.6/sum_RP_m3+pulpwood*(share_area_planted*planting_density)/yield_wood_ub/500*7*0.84*42.6/sum_RP_m3+wood_chips*(1-bark)/basic_wood_d*(share_area_planted*planting_density)/yield_wood_ub/500*7*0.84*42.6/sum_RP_m3+bundles*(1-bark)/basic_wood_d*(share_area_planted*planting_density)/yield_wood_ub/500*7*0.84*42.6/sum_RP_m3+cleft_timber*(1-bark)/ cleft_timber_basic_wood_d*(share_area_planted*planting_density)/yield_wood_ub/500*7*0.84*42.6/sum_RP_m3+saw_veneer_logs*1*15*6*0.84*42.6/yield_wood_ub/sum_RP_m3+pulpwood*1*15*6*0.84*42.6/yield_wood_ub/sum_RP_m3+wood_chips*(1-bark)/basic_wood_d*1*15*6*0.84*42.6/yield_wood_ub/sum_RP_m3+bundles*(1-bark)/basic_wood_d*1*15*6*0.84*42.6/yield_wood_ub/sum_RP_m3+cleft_timber*(1-bark)/ cleft_timber_basic_wood_d*1*15*6*0.84*42.6/yield_wood_ub/sum_RP_m3; lognormal variance with pedigree 0.2686, pedigree (2,5,4,5,1)
  63.9 MJ diesel/m3 of wood for distribution of gravel for maintenance construction of forest roads over rotation period PLUS diesel for planting activities, productivity 500 seedlings/PMH, diesel consumption 7l/PMH, converted to MJ
  properties: heating value, net 1 MJ
- harvesting, forestry harvester: 0.000227674 hour; = saw_veneer_logs*harvesting/sum_RP_m3+pulpwood*harvesting/sum_RP_m3+wood_chips*(1-bark)/basic_wood_d*harvesting/sum_RP_m3+bundles*(1-bark)/basic_wood_d*harvesting/sum_RP_m3+cleft_timber*(1-bark)/ cleft_timber_basic_wood_d*harvesting/sum_RP_m3; lognormal variance with pedigree 0.2686, pedigree (2,5,4,5,1)
  average input per m3; see general comment for details
- wood chipping, forwarder with terrain chipper, in forest: 3.28541e-5 hour; name chipping_terrain; = wood_chips*share_chips_in_stand/basic_wood_d*ratio_bulk_solid_chips/productivity_terrain_chipper; lognormal variance with pedigree 0.2686, pedigree (2,5,4,5,1)
  no comment
- wood chipping, chipper, mobile, diesel, at forest road: 5.48185e-5 hour; name chipping_mobile; = wood_chips*share_chips_at_forest_road/basic_wood_d*ratio_bulk_solid_chips/productivity_mobile_chipper; lognormal variance with pedigree 0.2686, pedigree (2,5,4,5,1)
  no comment
- forwarding, forwarder: 0.000109944 hour; = saw_veneer_logs*forwarding_forwarder/sum_RP_m3+pulpwood*forwarding_forwarder/sum_RP_m3+wood_chips*share_chips_at_forest_road*(1-bark)/basic_wood_d*forwarding_forwarder/sum_RP_m3+cleft_timber*(1-bark)/ cleft_timber_basic_wood_d*forwarding_forwarder/sum_RP_m3+wood_chips*share_chips_in_stand/basic_wood_d/(productivity_forwarding_chips_in_stand/ ratio_bulk_solid_chips)/11*9.5/sum_RP_m3+bundles/basic_wood_d/( productivity_forwarding_bundles/ ratio_bulk_solid_bundle)/11*9.5/sum_RP_m3+saw_veneer_logs*(1.1/11*18.2*share_area_mechanical_site_preparation)/yield_wood_ub/sum_RP_m3+pulpwood*(1.1/11*18.2*share_area_mechanical_site_preparation)/yield_wood_ub/sum_RP_m3+wood_chips*(1-bark)/basic_wood_d*(1.1/11*18.2*share_area_mechanical_site_preparation)/yield_wood_ub/sum_RP_m3+bundles*(1-bark)/basic_wood_d*(1.1/11*18.2*share_area_mechanical_site_preparation)/yield_wood_ub/sum_RP_m3+cleft_timber*(1-bark)/ cleft_timber_basic_wood_d*(1.1/11*18.2*share_area_mechanical_site_preparation)/yield_wood_ub/sum_RP_m3; lognormal variance with pedigree 0.2686, pedigree (2,5,4,5,1)
  average input per m3; see general comment for details; covers the forwarding of stemwood, the forwarding of chips chipped in the stand as well as bundles of energy wood plus mechanical site preparation
- skidding, skidder: 2.77037e-6 hour; = saw_veneer_logs*skidding/sum_RP_m3+pulpwood*skidding/sum_RP_m3+wood_chips*share_chips_at_forest_road*(1-bark)/basic_wood_d*skidding/sum_RP_m3+cleft_timber*(1-bark)/ cleft_timber_basic_wood_d*skidding/sum_RP_m3; lognormal variance with pedigree 0.2686, pedigree (2,5,4,5,1)
  average input per m3; see general comment for details
- clefting of energy wood: 0 hour; name clefting; = cleft_timber/cleft_timber_basic_wood_d* ratio_bulk_solid_cleft_timber/productivity_clefting_device; pedigree (1,1,1,1,1)
  no comment
- gravel, crushed: 0.00300813, 0.000275394, 1.81822e-5, 0.0137711 kg (4 entries); lognormal variance with pedigree 0.2686, pedigree (2,5,4,5,1)
  (same comment as for gravel, crushed)

## Inputs from nature
- Carbon dioxide, in air [natural resource, in air]: 1.81133 kg; = saw_veneer_logs/(1-bark)*basic_wood_d* saw_veneer_logs_C_content_non_fossil/12*44/sum_RP_m3+pulpwood/(1-bark)*basic_wood_d* pulpwood_C_content_non_fossil/12*44/sum_RP_m3+wood_chips* chips_C_content_non_fossil/12*44/sum_RP_m3+bundles* bundles_C_content_non_fossil/12*44/sum_RP_m3+cleft_timber* cleft_timber_C_content_non_fossil/12*44/sum_RP_m3; lognormal variance with pedigree 0.043, pedigree (1,5,4,5,1)
  Resource input, referring to total biomass harvested, i.e. wood including bark
- Transformation, to forest, intensive [natural resource, land]: 0.0427448 m2; = saw_veneer_logs*((10000-a_forest_road)/yield_wood_ub*share_revenues_wood)/sum_RP_m3+pulpwood*((10000-a_forest_road)/yield_wood_ub*share_revenues_wood)/sum_RP_m3+wood_chips*(1-bark)/basic_wood_d*((10000-a_forest_road)/yield_wood_ub*share_revenues_wood)/sum_RP_m3+bundles*(1-bark)/basic_wood_d*((10000-a_forest_road)/yield_wood_ub*share_revenues_wood)/sum_RP_m3+cleft_timber*(1-bark)/ cleft_timber_basic_wood_d*((10000-a_forest_road)/yield_wood_ub*share_revenues_wood)/sum_RP_m3; lognormal variance with pedigree 0.368, pedigree (1,5,4,5,1)
  Area of forest, excluding forest roads per ha
- Transformation, from traffic area, rail/road embankment [natural resource, land]: 0.000162619 m2; = saw_veneer_logs*a_forest_road/yield_wood_ub/sum_RP_m3+pulpwood*a_forest_road/yield_wood_ub/sum_RP_m3+wood_chips*(1-bark)/basic_wood_d*a_forest_road/yield_wood_ub/sum_RP_m3+bundles*(1-bark)/basic_wood_d*a_forest_road/yield_wood_ub/sum_RP_m3+cleft_timber*(1-bark)/ cleft_timber_basic_wood_d*a_forest_road/yield_wood_ub/sum_RP_m3; lognormal variance with pedigree 0.368, pedigree (1,5,4,5,1)
  Area of forest roads per ha
- Occupation, forest, intensive [natural resource, land]: 3.41958 m2*year; = saw_veneer_logs*(a_transformation_forest*rotation_period)/sum_RP_m3+pulpwood*(a_transformation_forest*rotation_period)/sum_RP_m3+wood_chips*(1-bark)/basic_wood_d*(a_transformation_forest*rotation_period)/sum_RP_m3+bundles*(1-bark)/basic_wood_d*(a_transformation_forest*rotation_period)/sum_RP_m3+cleft_timber*(1-bark)/ cleft_timber_basic_wood_d*(a_transformation_forest*rotation_period)/sum_RP_m3; lognormal variance with pedigree 0.218, pedigree (1,5,4,5,1)
  Area occupied for the production of wood over one rotation period
- Wood, soft, standing [natural resource, biotic]: 0.00232558 m3; name v_wood_standing; = saw_veneer_logs/sum_RP_m3+pulpwood/sum_RP_m3+wood_chips*(1-bark)/basic_wood_d/sum_RP_m3+bundles*(1-bark)/basic_wood_d/sum_RP_m3+cleft_timber*(1-bark)/ cleft_timber_basic_wood_d/sum_RP_m3; lognormal variance with pedigree 0.043, pedigree (1,5,4,5,1)
  Resource input, referring to wood under bark
- Transformation, to traffic area, rail/road embankment [natural resource, land]: 0.000162619 m2; = saw_veneer_logs*a_forest_road/yield_wood_ub/sum_RP_m3+pulpwood*a_forest_road/yield_wood_ub/sum_RP_m3+wood_chips*(1-bark)/basic_wood_d*a_forest_road/yield_wood_ub/sum_RP_m3+bundles*(1-bark)/basic_wood_d*a_forest_road/yield_wood_ub/sum_RP_m3+cleft_timber*(1-bark)/ cleft_timber_basic_wood_d*a_forest_road/yield_wood_ub/sum_RP_m3; lognormal variance with pedigree 0.368, pedigree (1,5,4,5,1)
  Area of forest roads per ha
- Transformation, from forest, intensive [natural resource, land]: 0.0427448 m2; = saw_veneer_logs*((10000-a_forest_road)/yield_wood_ub*share_revenues_wood)/sum_RP_m3+pulpwood*((10000-a_forest_road)/yield_wood_ub*share_revenues_wood)/sum_RP_m3+wood_chips*(1-bark)/basic_wood_d*((10000-a_forest_road)/yield_wood_ub*share_revenues_wood)/sum_RP_m3+bundles*(1-bark)/basic_wood_d*((10000-a_forest_road)/yield_wood_ub*share_revenues_wood)/sum_RP_m3+cleft_timber*(1-bark)/ cleft_timber_basic_wood_d*((10000-a_forest_road)/yield_wood_ub*share_revenues_wood)/sum_RP_m3; lognormal variance with pedigree 0.368, pedigree (1,5,4,5,1)
  Area of forest, excluding forest roads per ha
- Energy, gross calorific value, in biomass [natural resource, biotic]: 20.4 MJ; = saw_veneer_logs/(1-bark)*saw_veneer_logs_basic_wood_d*saw_veneer_logs_Gross_Heat_Value/sum_RP_m3+pulpwood/(1-bark)*pulpwood_basic_wood_d*pulpwood_Gross_Heat_Value/sum_RP_m3+wood_chips*wood_chips_Gross_Heat_Value/sum_RP_m3+bundles*bundles_Gross_Heat_Value/sum_RP_m3+cleft_timber*cleft_timber_Gross_Heat_Value/sum_RP_m3
  Energy content of wood
- Occupation, traffic area, rail/road embankment [natural resource, land]: 0.0130095 m2*year; = saw_veneer_logs*a_transformation_road*rotation_period/sum_RP_m3+pulpwood*a_transformation_road*rotation_period/sum_RP_m3+wood_chips*(1-bark)/basic_wood_d*a_transformation_road*rotation_period/sum_RP_m3+bundles*(1-bark)/basic_wood_d*a_transformation_road*rotation_period/sum_RP_m3+cleft_timber*(1-bark)/ cleft_timber_basic_wood_d*a_transformation_road*rotation_period/sum_RP_m3; lognormal variance with pedigree 0.218, pedigree (1,5,4,5,1)
  Area occupied by forest roads over one roation period

## Sampling procedure
Literature

## Extrapolations
see Geography and Technology
