# aluminium oxide production

Dataset: EcoSpold 2, unit process
Geography: IAI Area, EU27 & EFTA
Time period: 2015-01-01 to 2021-12-31
Technology level: current
Classification: ISIC rev.4 ecoinvent: 2420:Manufacture of basic precious and other non-ferrous metals
Classification: EcoSpold01Categories: chemicals/inorganics
Synonyms: Corundum; alumina; Korund; Tonerde
Scenario: Business-as-Usual
System model: Allocation, cut-off by classification
Share of production covered: 45 %
Generated by: Linlin Wu
Published in: International Aluminium Insitute 2015
Database: ecoinvent
isCopyrightProtected: false
accessRestrictedTo: 1

## General comment
Data on Al(OH)3 extraction and calcination to Al2O3 was aggregated on original source (IAI 2015, IAI personnal communication 2017). In- and outputs of AL(OH)3 are calculated according to the stoichiometry (1.530 kg Al(OH)3 --> 1.000 kg Al2O3 + 0.530 kg H2O). Separate energy data was provided by IAI for production of hydrate and calcination processes.
Two sources were used in the creation of this dataset: IAI 2015 Survey data; and original ecoinvent 2 data (Althaus, 2007) for flows unreported by IAI.
As reported by the IAI: "Total alumina production is the quantity of aluminium oxide trihydrate produced in a defined period and expressed as 100%, nominal aluminium oxide (Al2O3) equivalent, irrespective of further processing. Total alumina production figures have two components, that to be used for the production of aluminium (metallurgical grade alumina) and that to be used for any other purpose (chemical grade alumina)." (IAIA, 2019, ALUMINA PRODUCTION. Retrieved from: http://www.world-aluminium.org/statistics/alumina-production/, accesseed 11 Feb 2019).

## Included activities start
Unit process starts with the receiving of the aluminium hydroxide, produced onsite.

## Included activities end
Includes calcination of Al(OH)3 to Al2O3 and it's infrastructure. No transports are included because Al2O3 is produced in the same plant as Al(OH)3.

## Geography
While IAI data are global in scope, flows not reported by IAI and taken from anterior ecoinvent v2 dataset are based on European data.

## Technology
Average technology for the aluminium produced globally.

## Reference product
- aluminium oxide, metallurgical: 1 kg; name Al2O3_metall; By-product classification allocatable product; CPC 41432: Alumina (aluminium oxide), except artificial corundum; CAS 1344-28-1
  production volume 4.037e9 kg; name Al2O3_metall_PV
    Data taken from IAI Statistics (IAI + CNIA) for the year 2015
  property price 0.28 EUR2005; name Al2O3_metall_price_EUR2005
    From UN trade database. http://data.un.org/ Import data from the largest economies of the world are used (Brazil, India, USA, China, Japan and EU-27).
  property carbon content 0
    carbon content on a dry matter basis (reserved; not for manual entry)
  property true value 0.21; name Al2O3_metall_true_value
    allocation property applied in "true value" allocation // value calculated from revenue
  properties: water in wet mass 0 kg, carbon content, non-fossil 0, dry mass 1 kg, wet mass 1 kg, water content 0, carbon content, fossil 0, carbon allocation 0 kg

## By-products
- aluminium oxide, non-metallurgical: 0 kg; name Al2O3_non_metall; By-product classification allocatable product; CPC 41432: Alumina (aluminium oxide), except artificial corundum; CAS 1344-28-1
  Europen Aluminium estimate. 75% of aluminium oxide produced at refineries is used for metallurgical purposes, the rest for non-metallurgical purposes.
  production volume 1.34567e9 kg; = Al2O3_non_metall* Al2O3_metall_PV/abs( Al2O3_metall)
    Calculated from production volume of reference product using the relative outputs.
  property price 0.28 EUR2005; name Al2O3_non_metall_price_EUR2005
    (same comment as for aluminium oxide, metallurgical)
  property carbon content 0
    carbon content on a dry matter basis (reserved; not for manual entry)
  property true value 0.07; name Al2O3_non_metall_true_value
    allocation property applied in "true value" allocation // value calculated from revenue
  properties: dry mass 1 kg, carbon content, fossil 0, water content 0, carbon content, non-fossil 0, water in wet mass 0 kg, wet mass 1 kg, carbon allocation 0 kg

## Inputs from technosphere
- aluminium oxide factory: 2.5e-11 unit; source Classen M. 2009; lognormal variance with pedigree 0.5, pedigree (5,5,5,5,5)
  Rough guess;activityLink introduced to establish a direct link to the corresponding regional supply of this product
  EcoSpold01Location=RER
  Uncertainty: rough guess
- heat, district or industrial, natural gas: 6.79808 MJ; = Net_Heat_Value_ng*40.4 *m3fuel_use_ng /fuel_use_ng; source International Aluminium Insitute 2015; lognormal variance with pedigree 0.0033, pedigree (2,2,3,1,1)
  As reported by IAI 2015 Energy survey
  property heating value, net 1 MJ; name Net_Heat_Value_ng
  property fuel input in physical units, m3 0.175 m3; name m3fuel_use_ng
  property Corresponding fuel use 1.04 MJ; name fuel_use_ng
  note on Corresponding fuel use: Lower heating value of the fuel input related to the heat/electricity output, based on an efficiency of 96%
- electricity, medium voltage: 0 kWh; source International Aluminium Insitute 2015; pedigree (1,1,1,1,1)
  As reported by IAI energy survey (2015)
- aluminium hydroxide: 1.53 kg; lognormal variance with pedigree 0.016, pedigree (4,1,3,1,1)
  Stoichiometric relation
  EcoSpold01Location=RER
  Uncertainty: Stochiometric relation.
  properties: dry mass 1 kg, wet mass 1 kg
- electricity, medium voltage: 9.25847e-5, 0.00166637, 0.000486971, 0.000816462, 0.000472978, 0.00165013, 0.000177176, 5.1001e-5, 6.99248e-5, 0.000178876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 kWh (13 entries); source International Aluminium Insitute 2015; lognormal variance with pedigree 0.0027, pedigree (1,2,3,1,1)
  As reported by IAI energy survey (2015)

## Sampling procedure
2015 LCI Survey Data was collected by the IAI in Feb - July 2016 with analysis and data verification taking place Aug - Dec 2016.

## Extrapolations
Flows are based on a life cycle inventory survey carried out by IAI for its member and non-member companies, except energy related data that are supplied from IAI annual energy surveys (electricity, fuel inputs).Data obtained from the IAI 2015 Life Cycle Survey are global in scope (no extrapolations). 45% representativeness refers to plants surveyed by IAI in EU27 & EFTA, although not all plants supplied data for all flows. Amounts based on IAI 2015 Energy Survey actually cover 75% of EU27 & EFTA production, although again not all sites reported all flows.
