# maintenance, bus

Dataset: EcoSpold 2, unit process
Geography: CH
Time period: 1990-01-01 to 2021-12-31
Technology level: current
Classification: ISIC rev.4 ecoinvent: 4520:Maintenance and repair of motor vehicles
Classification: EcoSpold01Categories: transport systems/road
Tags: ConvertedDataset
Scenario: Business-as-Usual
System model: Allocation, cut-off by classification
Generated by: Michael Spielmann (obsolete)
Published in: Spielmann M. 2004
Database: ecoinvent
isCopyrightProtected: true
accessRestrictedTo: 1

## General comment
The dataset represents the maintenance of a bus.
[This dataset was already contained in the ecoinvent database version 2. It was not individually updated during the transfer to ecoinvent version 3. Life Cycle Impact Assessment results may still have changed, as they are affected by changes in the supply chain, i.e. in other datasets. This dataset was generated following the ecoinvent quality guidelines for version 2. It may have been subject to central changes described in the ecoinvent version 3 change report (http://www.ecoinvent.org/database/ecoinvent-version-3/reports-of-changes/), and the results of the central updates were reviewed extensively. The changes added e.g. consistent water flows and other information throughout the database. The documentation of this dataset can be found in the ecoinvent reports of version 2, which are still available via the ecoinvent website. The change report linked above covers all central changes that were made during the conversion process.]

## Included activities start
The activity starts with the consumption of the components and materials for the maintenance.

## Included activities end
The dataset ends with the maintenance of a bus. The dataset includes the consumption of the components and materials for the maintenance (steel, polyethylene, sinthetic rubber), the consumption of lead (battery), the water consumption, the energy consumption (electricity, natural gas and light fuel oil) and until and including the disposal and treatment of some materials (used mineral oil, plastics and sewage).

## Geography
Data represent Swiss conditions

## Technology
no technologies are specified

## Time period
The figures are derived from service garages in Switzerland and are employed for coaches, regular buses and trolley buses. For heating energy is assumed a split of 50% natural gas and 50% light fuel oil. The allocation between buses and trams is performed using the vkm-performance.

## Parameters
- fraction, process water, to air: 0.15 dimensionless; name fraction_PW_to_air; lognormal variance with pedigree 0.092025, pedigree (4,4,3,2,4)
  Literature value. In case when no industry/process specific data are available, default evaporation fraction value is used. This value is 15% and is based on literature (Statistics Canada, 2007 & Shaffer, K.H., 2008, Consumptive water use in the Great Lakes Basin, USGS & Shiklomanov, 2003, World Water Resources at the Beginning of the 21st Century) and has been approved by an expert.
- fraction, tap water, to air: 0.15 dimensionless; name fraction_TW_to_air; = fraction_PW_to_air; lognormal variance with pedigree 0.092025, pedigree (4,4,3,2,4)
  Calculated value. See comment in the other parametres present in this dataset. Tap water is considered to be always used as process water, thus process water fractions to air are applied to all tap water input flows to calculate the amount of water consumed in the processes.

## Reference product
- maintenance, bus: 1 unit; CPC 87141: Maintenance and repair services of motor vehicles; By-product classification allocatable product
  EcoSpold01Location=CH
  production volume 0.0336675 unit
    This is a placeholder value that does not reflect real-world production volumes. This dataset does not currently require a real-world production volume to work in the database framework, and no actual data were collected yet. This has no negative effect on the results of the ecoinvent database. The placeholder value of this activity was scaled according to the nominal GDP of 2005 (source: United Nations, http://data.un.org/Glossary.aspx?q=GDP+%28current+US%24%29, accessed 20130726) to reflect an appropriate share of the global production volume, which is also a placeholder value.
  property price 10917.5 EUR2005
    Calculated based on inputs: The price of the product has been calculated as a sum of the values of the material and energy inputs for this product. This value is therefore a rough estimation. It may underestimate the real price since there are additional expenses when producing any product. These expences can include for example labour costs, treatment of waste materials and profit for the producer. Please consider carefully whether this level of data quality is acceptable for your application.

## Inputs from technosphere
- wastewater, average: -484 m3; lognormal variance with pedigree 0.16, pedigree (1,1,5,1,1)
  EcoSpold01Location=CH
  Calculated value based on maintenance input data.
  production volume 484 m3
    Calculated from the production volume of maintenance, bus in proportion to the respective output amounts.
  properties: wet mass 1000 kg, dry mass 0.346837 kg, carbon content, non-fossil 0.194039, water content 2882.2
  note on carbon content, non-fossil: 0.0673 kg TOC/m3 (Tab A.17, ecoinvent v2.2 report 13_I). TOC was considered as Total Carbon.
- heat, district or industrial, natural gas: 38380 MJ; lognormal variance with pedigree 0.13, pedigree (1,1,5,1,1)
  EcoSpold01Location=RER
  Calculated value. The figures derived from Service garages in Bern, Switzerland. (bus maintenance).
  properties: heating value, net 1 MJ
- waste mineral oil: -824 kg; lognormal variance with pedigree 0.16, pedigree (1,1,5,1,1)
  EcoSpold01Location=CH
  Calculated value based on maintenance input data.
  production volume 824 kg
    (same comment as for wastewater, average)
  properties: wet mass 1 kg, dry mass 0.9 kg, heating value, net 34.7 MJ, carbon content, fossil 0.864444, water content 0.111111
  note on heating value, net: Value taken from the general comment of the treatment dataset.
  note on carbon content, fossil: Tab A.6, ecoinvent v2.2 report 13_I. C content has been calculated after data in the tables, and then referred to 1 kg DM
- electricity, low voltage: 67800 kWh; lognormal variance with pedigree 0.13, pedigree (1,1,5,1,1)
  Calculated value. The figures derived from Service garages in Bern, Switzerland. (bus maintenance).
  EcoSpold01Location=CH
- lead: 17.9 kg; lognormal variance with pedigree 0.13, pedigree (1,1,5,1,1)
  EcoSpold01Location=RER
  Estimated value. Original data is derived from expert estimates.
  properties: wet mass 1 kg, dry mass 1 kg
- reinforcing steel: 54.9 kg; lognormal variance with pedigree 0.16, pedigree (1,1,5,1,1)
  Estimated value. Original data is derived from expert estimates and comprising steel used in tyres and oil filters, brake shoes, exhaust.
  EcoSpold01Location=RER
  properties: dry mass 1 kg, carbon content, fossil 0.004, wet mass 1 kg
- paper, woodfree, uncoated: 3.15 kg; lognormal variance with pedigree 0.16, pedigree (1,1,5,1,1)
  EcoSpold01Location=RER
  Estimated value. Original data is derived from expert estimates.
  properties: carbon content, fossil 0.0251406, water content 0.0582011, carbon content, non-fossil 0.281215, dry mass 0.945 kg, wet mass 1 kg, heating value, net 14.11 MJ
  note on carbon content, fossil: Fossil C content was calculated after fossil C contents of chemicals used in the production of the paper (in Tab 8.54 & 8.55 ecoinvent v2.2 report 11_III, part 8).
  note on carbon content, non-fossil: Biogenic C content was calculated after biogenic C contents of chemicals used in the production of the paper (in Tab 8.54 & 8.55 ecoinvent v2.2 report 11_III, part 8). The cellulose content in 1 kg of paper (on a wet mas basis) was estimated as (1-chemical content), C content of cellulose was considered 0.44 kgC/kg dry mass (ecoinvent v2.2 report, n 15a, pg 40)
- waste plastic, mixture: -54.9 kg; lognormal variance with pedigree 0.16, pedigree (1,1,5,1,1)
  EcoSpold01Location=CH
  Calculated value based on maintenance input data.
  production volume 54.9 kg
    (same comment as for wastewater, average)
  properties: heating value, net 30.79 MJ, water content 0.180638, dry mass 0.847 kg, wet mass 1 kg, carbon content, fossil 0.747344
  note on carbon content, fossil: C content in 1 kg DM was calculated using data in Tab A.2, ecoinvent v2.2 report 13_I
- tap water: 484000 kg; name tap_water_input; lognormal variance with pedigree 0.13, pedigree (1,1,5,1,1)
  (same comment as for electricity, low voltage)
  properties: water content 2962.17, dry mass 0.000337476 kg, carbon content, fossil 0.00178991, wet mass 1 kg
  note on carbon content, fossil: Bicarbonate content is 2.93 mol/m3. CO2 content is 0.1 mol/m3 (ecoinvent v2.2 report 8, Tab 93.1).
- polyethylene, high density, granulate: 1.4 kg; lognormal variance with pedigree 0.16, pedigree (1,1,5,1,1)
  Estmated value. Original data is derived from expert estimates.
  EcoSpold01Location=RER
  properties: carbon content, fossil 0.857143, wet mass 1 kg, dry mass 1 kg, heating value, net 42.47 MJ
  note on carbon content, fossil: Polyethylene is formed out of a huge amount of ethylene monomers (C2H4) (ecoinvent v2.2 report 11_II). MW=28 g/mol
- heat, district or industrial, other than natural gas: 38380 MJ; lognormal variance with pedigree 0.13, pedigree (1,1,5,1,1)
  Estimated value. Original data is derived from expert estimates.
  EcoSpold01Location=RER
  properties: heating value, net 1 MJ
- lubricating oil: 824 kg; lognormal variance with pedigree 0.13, pedigree (1,1,5,1,1)
  EcoSpold01Location=RER
  Calculated value. Derived from yearly consumption of service garages from public transport companies in Switzerland.
  properties: dry mass 1 kg, wet mass 1 kg, heating value, net 40.2 MJ, carbon content, fossil 0.75
  note on heating value, net: Literature value, Source: IPCC 2006, 2006 IPCC Guidelines for National Greenhouse Gas Inventories, Prepared by the National Greenhouse Gas Inventories Programme, Eggleston H.S., Buendia L., Miwa K., Ngara T. and Tanabe K. (eds). Published: IGES, Japan
  note on carbon content, fossil: Lubricating oil is produced from diesel. C-content/dry mass of fats and oils considered 75%, from: ecoinvent v2.2 report, n 15a, pg 40
- synthetic rubber: 133 kg; lognormal variance with pedigree 0.16, pedigree (1,1,5,1,1)
  EcoSpold01Location=RER
  Estimated value. Original data is derived from expert estimates.
  properties: heating value, net 26.42 MJ, carbon content, fossil 0.871949, dry mass 1 kg, wet mass 1 kg
  note on carbon content, fossil: EPDM (Ethylene-propene-diene terpolymer) rubber is a terpolymer of ethylene, propene, and a diene with the residual unsaturated portion of the diene in the side chain (ecoinvent v2.2 report 7-part XX & Ullmann). Chemical formula (deduced from Evidences of Solvent-Induced Miscibility in Polychloroprene-co-Ethylene-Propene Diene Terpolymer Blends, Dubey et al., Journal of Applied Polymer Science, 2009, 111:1884–1891): C20H35

## Emissions to nature
- Water [air, unspecified]: 72.6 m3; name water_to_air_unspecified; = (tap_water_input/1000*fraction_TW_to_air); lognormal variance with pedigree 0.0807, pedigree (2,2,5,1,1)
  Calculated value based on literature values and expert opinion. See comments in the parametres' comment field.
  property fraction, origin: unspecified 0; name fraction_origin_unspecified
  property fraction, origin: salt water 0; name fraction_origin_salt_water
  property fraction, origin: fresh water 1; name fraction_origin_fresh_water

## Sampling procedure
Energy data, is based on a brief survey of public transport companies. Material data based on expert estimate and further assumption to determine the material consumption.

## Extrapolations
This dataset has been extrapolated from year 1995 to the year of the calculation (2021). The uncertainty has been adjusted accordingly.

## Review by Emilia Moreno Ruiz 2012-02-28
trainee DS, OK, Liliane Kelmann

## Review by Niels Jungbluth 2004-04-02
Passed.
