# barley seed production, Swiss integrated production, for sowing

Dataset: EcoSpold 2, unit process
Geography: CH
Time period: 1999-01-01 to 2021-12-31
Technology level: current
Classification: ISIC rev.4 ecoinvent: 0164:Seed processing for propagation
Classification: EcoSpold01Categories: agricultural means of production/seed
Tags: ConvertedDataset
Scenario: Business-as-Usual
System model: Allocation, cut-off by classification
Share of production covered: 68 %
Generated by: Thomas Nemecek
Published in: Nemecek, T. 2007
Database: ecoinvent
isCopyrightProtected: true
accessRestrictedTo: 1

## General comment
Refers to 1 kg of barley seed (fresh weight), with a maximum water content of 15%
[This dataset was already contained in the ecoinvent database version 2. It was not individually updated during the transfer to ecoinvent version 3. Life Cycle Impact Assessment results may still have changed, as they are affected by changes in the supply chain, i.e. in other datasets. This dataset was generated following the ecoinvent quality guidelines for version 2. It may have been subject to central changes described in the ecoinvent version 3 change report (http://www.ecoinvent.org/database/ecoinvent-version-3/reports-of-changes/), and the results of the central updates were reviewed extensively. The changes added e.g. consistent water flows and other information throughout the database. The documentation of this dataset can be found in the ecoinvent reports of version 2, which are still available via the ecoinvent website. The change report linked above covers all central changes that were made during the conversion process.]

## Included activities end
The seed produced at the farm is transported to the processing centre, treated (pre-cleaning, cleaning, eventually drying, chemical dressing (for integrated production) and bag filling), stored and afterwards transported to the regional storage centre. No data on wastewater production were available.

## Technology
Refers to average seed processing

## Time period
Date of the major data sources.

## Reference product
- barley seed, Swiss integrated production, for sowing: 1 kg; By-product classification allocatable product; CPC 01151: Barley, seed
  EcoSpold01Location=CH
  production volume 6.1e6 kg
    Consumption of barley seed in Switzerland is 7133t/year, 1% imported
    165 kg/ha
  property price 0.122158 EUR2005
    Calculated based on inputs: The price of the product has been calculated as a sum of the values of the material and energy inputs for this product. This value is therefore a rough estimation. It may underestimate the real price since there are additional expenses when producing any product. These expences can include for example labour costs, treatment of waste materials and profit for the producer. Please consider carefully whether this level of data quality is acceptable for your application.
  property energy content 15.402 MJ; name energy_content
    as gross calorific value (when relevant)
  property water content 0.176471; name water_content; = (1-DM)/DM
  property water in wet mass 0.15 kg; name WWM; = 1-DM
  property carbon content, fossil 0; name C_content_fossil
    fossil carbon content on a dry matter basis
  property carbon content, non-fossil 0.46538; name C_content_non_fossil
    biogene carbon content on a dry matter basis
    Composition data obtained from Barley hulled, in (http://www.nal.usda.gov/fnic/foodcomp/search/). First, composition data were refered to 1 kg dry mass. Then, C-contents were calculated considering a C-content/dry mass of 46% in carbohydrates (including fibres), 53% in proteins and 75% in fats. All data from "Evolutionary and Biochemical Aspects", A.D. Kay and T. Vrede (in Global Ecology, 2010, Elsevier B.V., S.E. Jørgensen Ed.).
  property dry mass 0.85 kg; name DM
  property wet mass 1 kg; name WM
  property carbon content 0.46538
    carbon content on a dry matter basis (reserved; not for manual entry)
  properties: carbon allocation 0.395573 kg

## Inputs from technosphere
- packaging, for pesticides: 0.000176 kg; lognormal variance with pedigree 0.0912, pedigree (4,3,5,5,4)
  Total amount of active substance/s of pesticides needed for the production of barley seed, Swiss integrated production, for sowing is calculated to be circa 8.80E-05 kg. Pesticide/s used in this dataset is/are: 'cyclic N-compound'. The total amount of active substance/s is doubled in order to account for the packaging of the dilluted product of pesticide/s that is/are applied. Therefore, 1.76E-04 kg of packaging for pesticides is justified with this exchange.
  properties: dry mass 1 kg, price 0.0642 EUR2005, wet mass 1 kg, carbon content, fossil 0.85714, heating value, net 25.97 MJ
- barley grain: 0.3 kg; lognormal variance with pedigree 0.04, pedigree (1,1,5,1,1)
  See "01_crop production - seed production & processing_v1.0.pdf" - pdf-document on the dedicated talk page of ecoinvent (www.ecoinvent.org/documentation)
  properties: water content 0.162791, dry mass 0.86 kg, wet mass 1 kg, carbon content, non-fossil 0.46538
  note on carbon content, non-fossil: Composition data obtained from Barley hulled, in (http://www.nal.usda.gov/fnic/foodcomp/search/). First, composition data were refered to 1 kg dry mass. Then, C-contents were calculated considering a C-content/dry mass of 46% in carbohydrates (including fibres), 53% in proteins and 75% in fats. All data from "Evolutionary and Biochemical Aspects", A.D. Kay and T. Vrede (in Global Ecology, 2010, Elsevier B.V., S.E. Jørgensen Ed.).
- cyclic N-compound: 8.8e-5 kg; lognormal variance with pedigree 0.2007, pedigree (2,2,5,1,1)
  EcoSpold01Location=CH
  See "01_crop production - seed production & processing_v1.0.pdf" - pdf-document on the dedicated talk page of ecoinvent (www.ecoinvent.org/documentation)
  properties: wet mass 1 kg, dry mass 1 kg, carbon content, fossil 0.641962
  note on carbon content, fossil: Calculated as an unweigthed average of the C content of the cyclic N-compounds where information was avaliable in Sutter, 2010, following the classification in Tab 2.25 in Sutter 2010: Difenoconazole (C19H17Cl2N3O3), Fenpropidin (C19H31N), Fenpropimorph (C20H33NO), Flusilazole (C16H15F2N3Si), Metconazole (C17H22ClN3O), Penconazole (C13H15Cl2N3), Propiconazole (C15H17Cl2N3O2), Tebuconazole (C16H22ClN3O)
- barley grain, Swiss integrated production: 0.7 kg; lognormal variance with pedigree 0.04, pedigree (1,1,5,1,1)
  (same comment as for cyclic N-compound)
  properties: water content 0.176471, dry mass 0.85 kg, carbon content, non-fossil 0.46538, wet mass 1 kg
- building, multi-storey: 2e-5 m3; lognormal variance with pedigree 0.190625, pedigree (5,3,5,2,1)
  EcoSpold01Location=RER
  See "01_crop production - seed production & processing_v1.0.pdf" - pdf-document on the dedicated talk page of ecoinvent (www.ecoinvent.org/documentation)
- electricity, low voltage: 0.024 kWh; lognormal variance with pedigree 0.0512, pedigree (2,3,5,1,1)
  See "01_crop production - seed production & processing_v1.0.pdf" - pdf-document on the dedicated talk page of ecoinvent (www.ecoinvent.org/documentation)
  EcoSpold01Location=CH

## Inputs from nature
- Occupation, industrial area [natural resource, land]: 0.0002 m2*year; lognormal variance with pedigree 0.190625, pedigree (5,3,5,2,1)
  (same comment as for barley grain)
- Transformation, to industrial area [natural resource, land]: 4e-6 m2; lognormal variance with pedigree 0.410625, pedigree (5,3,5,2,1)
  (same comment as for barley grain)
- Transformation, from unspecified [natural resource, land]: 4e-6 m2; lognormal variance with pedigree 0.160625, pedigree (5,3,5,2,1)
  (same comment as for barley grain)
- Occupation, construction site [natural resource, land]: 8e-6 m2*year; lognormal variance with pedigree 0.410625, pedigree (5,3,5,2,1)
  (same comment as for barley grain)

## Sampling procedure
Data based on a literature, expert information and enquiry of seed processing plants.

## Extrapolations
This dataset has been extrapolated from year 2002 to the year of the calculation (2021). The uncertainty has been adjusted accordingly.

## Review by Roland Hischier 2003-06-03
Passed.
