# energy wood harvester production

Dataset: EcoSpold 2, unit process
Geography: GLO
Time period: 2012-01-01 to 2021-12-31
Technology level: current
Classification: ISIC rev.4 ecoinvent: 2821:Manufacture of agricultural and forestry machinery
Synonyms: slash bundler
Tags: Swiss Brushup completed
Scenario: Business-as-Usual
System model: Allocation, cut-off by classification
Generated by: Frank Werner
Published in: Spielmann, M. 2007
Database: ecoinvent
isCopyrightProtected: true
accessRestrictedTo: 1

## Included activities start
The activity starts with the semi-finished products and raw materials at the factory gate.

## Included activities end
The inventory accounts for the input and disposal of all materials, their (pre-) processing and the energy required for the production and maintenance of the forest machinery represented by this dataset. In addition, material for and emissions from disassembly are included.
Infrastructure for the production and maintenance of the machinery is inventoried as a rough guess from lorry production.
The dataset does not contain fuel consumption or related emissions. These issues are inventoried in the respective dataset on the operation of the machinery.

## Geography
The inventories apply to the production in Northern/Central Europe

## Parameters
- maintenance factor: 0.55 dimensionless; name maintenance_factor; lognormal variance with pedigree 0.1048, pedigree (3,4,2,1,2)
  as for forwarder ,determined from Spielmann et al. 2007
- weight of the vehicle: 21400 kg/unit; name vehicle_weight
- lifetime of machine, productive machine hours: 17600 hour; name total_PMH; lognormal variance with pedigree 0.1042, pedigree (3,4,2,1,1)
  as for forwarder, Spielmann et al. 2007

## Reference product
- energy wood harvester: 1 unit; CPC 441: Agricultural or forestry machinery and parts thereof; By-product classification allocatable product
  energy wood bundler unit built on a forwarder with a total weight of 21,400 kg and an engine power of 77 kW. Data on fuel consumption etc. can be found in the respective dataset on the operation of the machine.
  production volume 2000 unit; name p_machinery
    unqualified guess, no information available
  property price 36535.6 EUR2005
    Calculated based on inputs: The price of the product has been calculated as a sum of the values of the material and energy inputs for this product. This value is therefore a rough estimation. It may underestimate the real price since there are additional expenses when producing any product. These expences can include for example labour costs, treatment of waste materials and profit for the producer. Please consider carefully whether this level of data quality is acceptable for your application.
  property lifetime capacity [h] 17600 hour; = total_PMH
    Total of operation hours expected; in case of forest machinery: total of productive machine hours.
  property lifetime 10 year; name lifetime; = total_PMH/8/220
    total productive machine hours divided by 8 hour/day divided by 220 working days/yera

## By-products
- scrap lead acid battery: 0 kg; source Spielmann, M. 2007; By-product classification Recyclable; CPC 39364: Waste and scrap of lead; pedigree (1,1,1,1,1)
  production volume 0 kg; = p_machinery*w_lead
    Calculated from production volume of reference product using the relative outputs.
  property price 0 EUR2005; name w_lead_price_EUR2005
    Assumed without economic value

## Inputs from technosphere
- wastewater, average: 0 m3; name w_sewage; source Spielmann, M. 2007; pedigree (1,1,1,1,1)
  amounts of water inputs converted to m3
  production volume 0 m3
    Calculated from production volume of reference product using the relative outputs.
  properties: water content 2882.2, wet mass 1000 kg, UVEK_relative_amount_1 -1, carbon content, non-fossil 0.194039, dry mass 0.346837 kg, UVEK_link_1 4590
  note on UVEK_relative_amount_1: to be used only in special submissions in coordination with ecoinvent and the Swiss FOEN.
- copper, cathode: 60.5 kg; name m_copper; source Spielmann, M. 2007; lognormal variance with pedigree 0.235, pedigree (5,5,5,5,5)
  total material input for production (no maintenance according to reference); the amount of material used in production is extrapolated from reference via total weight of machine
  properties: dry mass 1 kg, UVEK_link_1 595, wet mass 1 kg, UVEK_relative_amount_1 1
  note on UVEK_link_1: Should rather link to a consumption mix (or at least to a production mix, including copper from secondary sources)
- scrap copper: 0 kg; name w_copper; source Spielmann, M. 2007; pedigree (1,1,1,1,1)
  total material input for production and maintenance (estimated via default factor); the amount of material used in production is extrapolated from reference via total weight of machine
  production volume 0 kg
    Calculated from production volume of reference product using the relative outputs.
  property dry mass 1 kg; name w_copper_DM
  properties: wet mass 1 kg
- road vehicle factory: 8.73e-7 unit; source Spielmann M. 2007; lognormal variance with pedigree 0.76, pedigree (5,5,5,5,5)
  no specific information available; proxy as for production of lorry 16 t
  properties: UVEK_link_1 3829, UVEK_relative_amount_1 1
- heat, district or industrial, natural gas: 99339.5 MJ; = (1+maintenance_factor)*64090; source Spielmann, M. 2007; lognormal variance with pedigree 0.235, pedigree (5,5,5,5,5)
  total heat input for production and maintenance (estimated via default factor); the amount of heat used in production is extrapolated from reference via total weight of machine
  properties: UVEK_link_1 2580, UVEK_relative_amount_1 1, heating value, net 1 MJ
  note on UVEK_link_1: From a principal point of view, linking to a dataset representing a technology mix would be preferable.
- waste electric and electronic equipment: -106.64 kg; name w_electronics; = (m_electronics)*-1; source Spielmann, M. 2007; lognormal variance with pedigree 0.203, pedigree (4,5,5,5,5)
  production volume 213280 kg; = p_machinery*w_electronics
    Calculated from production volume of reference product using the relative outputs.
  property carbon content, fossil 0.337146; name w_electronics_C_content_fossil; = C_content_fossil_electronics
  property carbon content, non-fossil 0.00013442; name w_electronics_C_content_non_fossil; = C_content_non_fossil_electronics
  property dry mass 1 kg; name w_electronics_DM
  properties: UVEK_relative_amount_1 -1, wet mass 1 kg, UVEK_link_1 928
- polypropylene, granulate: 854.05 kg; name m_PP; = (1+maintenance_factor)*551; source Spielmann, M. 2007; lognormal variance with pedigree 0.235, pedigree (5,5,5,5,5)
  (same comment as for scrap copper)
  property carbon content, fossil 0.857143; name C_content_fossil_PP
  properties: dry mass 1 kg, wet mass 1 kg, heating value, net 32.78 MJ, UVEK_relative_amount_1 1, UVEK_link_1 3548
  note on heating value, net: Value extracted from "treatment of waste polypropylene, open burning"
  note on carbon content, fossil: Polypropylene is formed by the polymerisation of propylene, C3H6 (ecoinvent v2.2 report 11_II)
- scrap steel: 0 kg; name w_scrap_steel; source Spielmann, M. 2007; pedigree (1,1,1,1,1)
  used for chromium steel, for which no specific dataset is available (15.09.2012)
  production volume 0 kg
    Calculated from production volume of reference product using the relative outputs.
  property dry mass 1 kg; name w_chromium_steel_DM
  properties: wet mass 1 kg
- water, completely softened: 0 kg; name m_water_softened; source Spielmann, M. 2007; pedigree (1,1,1,1,1)
  for battery; as for forwarder, class II
  property dry mass 0 kg; name m_water_softened_DM
  properties: wet mass 1 kg, UVEK_relative_amount_1 1, UVEK_link_1 4851
- waste glass sheet: 0 kg; name w_glass; source Spielmann, M. 2007; pedigree (1,1,1,1,1)
  production volume 0 kg
    Calculated from the production volume of harvester in proportion to the respective output amounts.
  properties: wet mass 1 kg, dry mass 1 kg
- steel, chromium steel 18/8, hot rolled: 1722.05 kg; name m_chromium_steel; = (1+maintenance_factor)*1111; source Spielmann, M. 2007; lognormal variance with pedigree 0.235, pedigree (5,5,5,5,5)
  (same comment as for scrap copper)
  properties: UVEK_link_1 451, UVEK_relative_amount_1 1, wet mass 1 kg, UVEK_relative_amount_2 1, dry mass 1 kg, carbon content, fossil 0.0008, UVEK_link_2 2662
  note on carbon content, fossil: Stainless steel model is the grade 304 steel (18/8 stainless, 18% chromium 8% nickel; max. 0.08% C)
- waste rubber, unspecified: 0 kg; name w_rubber; source Spielmann, M. 2007; pedigree (1,1,1,1,1)
  production volume 0 kg
    Calculated from production volume of reference product using the relative outputs.
  property dry mass 1 kg; name w_rubber_DM
  properties: carbon content, fossil 0.853, heating value, net 27.19 MJ, UVEK_relative_amount_1 -1, wet mass 1 kg, UVEK_link_1 1079
  note on heating value, net: Value taken from the general comment of the treatment dataset.
- synthetic rubber: 1455 kg; name m_rubber; = 108+1347; source Spielmann, M. 2007; lognormal variance with pedigree 0.235, pedigree (5,5,5,5,5)
  rubber sealings and tubes plus rubber tyres (production and mantenance); data for tyres as for forwarder, class II
  property carbon content, fossil 0.871949; name C_content_fossil_rubber
  properties: UVEK_link_1 4277, wet mass 1 kg, UVEK_relative_amount_1 1, heating value, net 26.42 MJ, dry mass 1 kg
  note on carbon content, fossil: EPDM (Ethylene-propene-diene terpolymer) rubber is a terpolymer of ethylene, propene, and a diene with the residual unsaturated portion of the diene in the side chain (ecoinvent v2.2 report 7-part XX & Ullmann). Chemical formula (deduced from Evidences of Solvent-Induced Miscibility in Polychloroprene-co-Ethylene-Propene Diene Terpolymer Blends, Dubey et al., Journal of Applied Polymer Science, 2009, 111:1884-1891): C20H35
- waste aluminium: -626.975 kg; name w_aluminium; = (m_aluminium)*-1; source Spielmann, M. 2007; lognormal variance with pedigree 0.203, pedigree (4,5,5,5,5)
  production volume 1.25395e6 kg; = p_machinery*w_aluminium
    Calculated from production volume of reference product using the relative outputs.
  property dry mass 1 kg; name w_aluminium_DM
  properties: wet mass 1 kg
- aluminium, cast alloy: 626.975 kg; name m_aluminium; = (1+maintenance_factor)*404.5; source Spielmann, M. 2007; lognormal variance with pedigree 0.235, pedigree (5,5,5,5,5)
  (same comment as for scrap copper)
  properties: UVEK_link_1 162, UVEK_relative_amount_1 1, dry mass 1 kg, wet mass 1 kg
- wastewater from lorry production: -6.634 m3; name w_WW; = ((1+maintenance_factor)*4.28)*-1; source Spielmann, M. 2007; lognormal variance with pedigree 0.203, pedigree (4,5,5,5,5)
  total production specific waste water from production and maintenance (estimated via default factor); the amount of waste water from production is extrapolated from reference via total weight of machine
  production volume 13268 m3; = p_machinery*w_WW
    Calculated from production volume of reference product using the relative outputs.
  properties: wet mass 1000 kg, UVEK_relative_amount_1 -1, UVEK_link_1 4575, dry mass 0.337476 kg, water content 2962.17
- steel, low-alloyed: 17384.8 kg; name m_steel_unalloyed; = (1+maintenance_factor)*11216; source Spielmann, M. 2007; lognormal variance with pedigree 0.235, pedigree (5,5,5,5,5)
  (same comment as for scrap copper)
  properties: UVEK_relative_amount_1 1, dry mass 1 kg, carbon content, fossil 0.005, wet mass 1 kg, UVEK_link_1 4222
  note on carbon content, fossil: Low alloyed steel composition given in Tab. 3.2 ecoinvent v2.2 report 10_partII. Steel assumed to have a C content of 0.5%
  note on UVEK_link_1: Supposted to link to a DS for unalloyed steel (not to low-alloyed steel)
- steel, low-alloyed, hot rolled: 30.845 kg; name m_steel_low_alloyed; = (1+maintenance_factor)*19.9; source Spielmann, M. 2007; lognormal variance with pedigree 0.235, pedigree (5,5,5,5,5)
  (same comment as for scrap copper)
  properties: UVEK_link_8 4417, UVEK_link_9 4433, dry mass 1 kg, UVEK_relative_amount_9 305.268, UVEK_relative_amount_2 1, carbon content, fossil 0.005, UVEK_link_1 4222, UVEK_relative_amount_8 69.3792, UVEK_relative_amount_1 1, UVEK_link_2 2662, wet mass 1 kg
  note on UVEK_link_8: This link has been introduced to model transport specifically for the SAM model; to be used only in special submissions in coordination with ecoinvent and the Swiss FOEN.
  note on UVEK_relative_amount_9: scaling factor = amount of transport in corresponding KBOB dataset/amount of this input from technosphere. To be used only in special submissions in coordination with ecoinvent and the Swiss FOEN.
- cast iron: 7594.8 kg; name m_cast_iron; source Spielmann, M. 2007; lognormal variance with pedigree 0.235, pedigree (5,5,5,5,5)
  (same comment as for copper, cathode)
  property carbon content, fossil 0.04; name C_content_fossil_cast_iron
  property wet mass 1 kg; name m_cast_iron_WM
  property dry mass 1 kg; name m_cast_iron_DM
  properties: UVEK_link_1 401, UVEK_relative_amount_1 1
- waste bulk iron, excluding reinforcement: 0 kg; name w_bulk_iron; source Spielmann, M. 2007; pedigree (1,1,1,1,1)
  production volume 0 kg
    Calculated from production volume of reference product using the relative outputs.
  property dry mass 1 kg; name w_bulk_iron_DM
  properties: wet mass 1 kg
- wire drawing, copper: 60.5 kg; = m_copper; source Spielmann, M. 2007; lognormal variance with pedigree 0.235, pedigree (5,5,5,5,5)
  properties: UVEK_relative_amount_1 1, UVEK_link_1 4895
- acetylene: 0 kg; name m_acethylene; source Spielmann, M. 2007; pedigree (1,1,1,1,1)
  used during disassembly
  property wet mass 1 kg; name m_acethylene_WM
  property dry mass 1 kg; name m_acethylene_DM
  property carbon content, fossil 0.923077; name C_content_fossil_acetylene
  properties: heating value, net 51.2 MJ, UVEK_relative_amount_1 1, UVEK_link_1 101
  note on heating value, net: Based on literature, page 25 (Value may refer to HHV), Althaus H.-J., Chudacoff M., Hischier R., Jungbluth N., Osses M. and Primas A. (2007) Life Cycle Inventories of Chemicals. Final report ecoinvent data v2.0 No. 8. EMPA, Swiss Centre for Life Cycle Inventories, Dübendorf, CH, Online-Version under: www.ecoinvent.org.
- oxygen, liquid: 0 kg; source Spielmann, M. 2007; pedigree (1,1,1,1,1)
  used during disassembly
  properties: UVEK_link_1 3319, wet mass 1 kg, dry mass 1 kg, UVEK_relative_amount_1 1
- electronics, for control units: 106.64 kg; name m_electronics; source Spielmann, M. 2007; lognormal variance with pedigree 0.235, pedigree (5,5,5,5,5)
  (same comment as for copper, cathode)
  property carbon content, non-fossil 0.00013442; name C_content_non_fossil_electronics
  property carbon content, fossil 0.337146; name C_content_fossil_electronics
  property wet mass 1 kg; name m_electronics_WM
  property dry mass 1 kg; name m_electronics_DM
  property water content 0; name water_content
  property water in wet mass 0 kg; name WWM
  properties: UVEK_relative_amount_1 1, UVEK_link_1 2021
- lead: 76.9 kg; name m_lead; source Spielmann, M. 2007; lognormal variance with pedigree 0.235, pedigree (5,5,5,5,5)
  for battery; as for forwarder, class II
  properties: UVEK_link_1 2778, UVEK_relative_amount_1 1, dry mass 1 kg, wet mass 1 kg
- powder coat, steel: 510.88 m2; = (1+maintenance_factor)*329.6; source Spielmann, M. 2007; lognormal variance with pedigree 0.235, pedigree (5,5,5,5,5)
  total powder coating input for production and maintenance (estimated via default factor)
  properties: UVEK_relative_amount_1 1, UVEK_link_1 3613
- flat glass, uncoated: 0 kg; name m_glass; source Spielmann, M. 2007; pedigree (1,1,1,1,1)
  (same comment as for scrap copper)
  properties: wet mass 1 kg, UVEK_link_1 2159, UVEK_relative_amount_1 1, dry mass 1 kg
- electricity, medium voltage: 67356.8 kWh; = (1+maintenance_factor)*43456; lognormal variance with pedigree 0.235, pedigree (5,5,5,5,5)
  total electricity input for production and maintenance (estimated via default factor); the amount of electricity used in production is extrapolated from reference via total weight of machine
  properties: UVEK_link_1 1785, UVEK_relative_amount_1 1
- tap water: 55362.9 kg; name m_tap_water; = (1+maintenance_factor)*35718; source Spielmann, M. 2007; lognormal variance with pedigree 0.235, pedigree (5,5,5,5,5)
  total water input for production and maintenance (estimated via default factor); the amount of water used in production is extrapolated from reference via total weight of machine
  property carbon content, fossil 0.00178991; name C_content_fossil
  property carbon content, non-fossil 0; name C_content_non_fossil
  properties: dry mass 0.000337476 kg, UVEK_link_1 4285, UVEK_relative_amount_1 1, wet mass 1 kg, water content 2962.17
- waste polypropylene: 0 kg; name w_PP; source Spielmann, M. 2007; pedigree (1,1,1,1,1)
  Input of PP correct for water content of waste flow
  production volume 0 kg
    Calculated from production volume of reference product using the relative outputs.
  property water content 0.189061; name WC_waste_PP
  property dry mass 0.841 kg; name DM_waste_polypropylene
  properties: carbon content, fossil 0.825208, UVEK_link_1 1042, UVEK_relative_amount_1 -1.18906, heating value, net 32.78 MJ, wet mass 1 kg
  note on heating value, net: Value assumed for all polypropylene products. Source: Phyllis2, database for (treated) biomass, algae, feedstocks for biogas production and biochar, https://phyllis.nl/Biomass/View/1186, ECN.TNO
- injection moulding: 854.05 kg; = m_PP; source Spielmann, M. 2007; lognormal variance with pedigree 0.23, pedigree (5,5,5,5,5)
  properties: UVEK_link_1 2701, UVEK_relative_amount_1 1
- scrap lead acid battery: -76.9 kg; source Spielmann, M. 2007; lognormal variance with pedigree 0.203, pedigree (4,5,5,5,5)
  production volume 153800 kg
- wastewater, average: -17.3037, -1.87193, -36.203 m3 (3 entries); source Spielmann, M. 2007; lognormal variance with pedigree 0.203, pedigree (4,5,5,5,5)
  amounts of water inputs converted to m3
  production volume 110757 m3
- scrap copper: -19.1911, -0.900403, -40.4085 kg (3 entries); source Spielmann, M. 2007; lognormal variance with pedigree 0.203, pedigree (4,5,5,5,5)
  (same comment as for scrap copper)
  production volume 121000 kg
  properties: dry mass 1 kg, wet mass 1 kg
- scrap steel: -4659.94, -5.90397, -14471.9 kg (3 entries); source Spielmann, M. 2007; lognormal variance with pedigree 0.203, pedigree (4,5,5,5,5)
  used for chromium steel, for which no specific dataset is available (15.09.2012)
  production volume 3.82754e7 kg
  properties: wet mass 1 kg, dry mass 1 kg
- water, completely softened: 3.69419, 5.13967, 6.86614 kg (3 entries); source Spielmann, M. 2007; lognormal variance with pedigree 0.235, pedigree (5,5,5,5,5)
  for battery; as for forwarder, class II
- waste glass sheet: -24.4628, -0.622824, -94.2643 kg (3 entries); source Spielmann, M. 2007; lognormal variance with pedigree 0.203, pedigree (4,5,5,5,5)
  production volume 238700 kg
- waste rubber, unspecified: -712.544, -29.9125, -712.544 kg (3 entries); source Spielmann, M. 2007; lognormal variance with pedigree 0.203, pedigree (4,5,5,5,5)
  production volume 2.91e6 kg
  properties: carbon content, fossil 0.853, heating value, net 27.19 MJ, UVEK_relative_amount_1 -1, wet mass 1 kg, UVEK_link_1 1079, dry mass 1 kg
- waste bulk iron, excluding reinforcement: -2445.53, -63.9246, -5085.35 kg (3 entries); source Spielmann, M. 2007; lognormal variance with pedigree 0.203, pedigree (4,5,5,5,5)
  production volume 1.51896e7 kg
  properties: dry mass 1 kg, wet mass 1 kg
- acetylene: 0.87, 4.13 kg (2 entries); source Spielmann, M. 2007; lognormal variance with pedigree 0.235, pedigree (5,5,5,5,5)
  used during disassembly
  properties: heating value, net 51.2 MJ, wet mass 1 kg, UVEK_relative_amount_1 1, dry mass 1 kg, carbon content, fossil 0.923077, UVEK_link_1 101
- oxygen, liquid: 2.58372, 9.41628 kg (2 entries); source Spielmann, M. 2007; lognormal variance with pedigree 0.235, pedigree (5,5,5,5,5)
  used during disassembly
- flat glass, uncoated: 20.3804, 98.9696 kg (2 entries); source Spielmann, M. 2007; lognormal variance with pedigree 0.235, pedigree (5,5,5,5,5)
  (same comment as for scrap copper)
- waste polypropylene: -97.7483, -7.53582, -3.11256, -2.95567, -112.784, -1.25744, -0.569922, -789.553 kg (8 entries); source Spielmann, M. 2007; lognormal variance with pedigree 0.203, pedigree (4,5,5,5,5)
  Input of PP correct for water content of waste flow
  production volume 2.03103e6 kg
  properties: carbon content, fossil 0.825208, UVEK_link_1 1042, UVEK_relative_amount_1 -1.18906, heating value, net 32.78 MJ, water content 0.189061, dry mass 0.841 kg, wet mass 1 kg

## Emissions to nature
- Carbon dioxide, fossil [air, non-urban air or from high stacks]: 16.9231 kg; = m_acethylene*C_content_fossil_acetylene/12*(12+2*16); source Spielmann, M. 2007; lognormal variance with pedigree 0.033, pedigree (1,1,4,1,1)
  acethylene converted to CO2

## Sampling procedure
Combined from Spielmann, M,, L. Barreto, V. Erni, F. Frutig and O.Thees (2007): Life cycle assessment of energy wood supply of forest wood chips in Switzerland, Paul Scherrer Institute and Swiss Federal Institute for Forest, Snow and Landscape Research (WSL), unpublished.

## Extrapolations
This dataset has been extrapolated from year 2012 to the year of the calculation (2021). The uncertainty has been adjusted accordingly.
