# heat production, mixed logs, at furnace 100kW, state-of-the-art 2014

Dataset: EcoSpold 2, unit process
Geography: RoW
Time period: 2014-01-01 to 2021-12-31
Technology level: modern
Classification: EcoSpold01Categories: wood energy/heating systems
Classification: ISIC rev.4 ecoinvent: 3530:Steam and air conditioning supply
Scenario: Business-as-Usual
System model: Allocation, cut-off by classification
Share of production covered: 0.1 %
Generated by: Christian Bauer
Published in: Bauer, C. 2007
Database: ecoinvent
isCopyrightProtected: true
accessRestrictedTo: 1

## General comment
This activity represents heat production from combustion of wood logs in Switzerland in a new (=installed in 2014) furnace and is used for the global activity as first approximation (uncertainty factors adjusted accordingly). Wood log LHV=9430 MJ/m3. It is supposed to be representative for average new installations. The inventory shall be considered valid for wood log boilers with nominal capacities above 50 kW.

Some emission data are from the late 1990's; key emission parameters (CO, PM, NOx, CH4, NMVOC) have been updated according to latest available data. The activity represents average annual operation including start-stop and part-load operation, which results in a reduced efficiency and increasing emissions compared to manufacturer information.
[This dataset was already contained in the ecoinvent database version 2. It was not individually updated during the transfer to ecoinvent version 3. Life Cycle Impact Assessment results may still have changed, as they are affected by changes in the supply chain, i.e. in other datasets. This dataset was generated following the ecoinvent quality guidelines for version 2. It may have been subject to central changes described in the ecoinvent version 3 change report (http://www.ecoinvent.org/database/ecoinvent-version-3/reports-of-changes/), and the results of the central updates were reviewed extensively. The changes added e.g. consistent water flows and other information throughout the database. The documentation of this dataset can be found in the ecoinvent reports of version 2, which are still available via the ecoinvent website. The change report linked above covers all central changes that were made during the conversion process.]

## Included activities start
From delivery of wood logs.

## Included activities end
This module describes the combustion of natural wood logs in a modern boiler. Included are the infrastructure, the wood requirements, the emissions to air, the electricity needed for operation, and the disposal of the ashes.

## Geography
Inventory represents Swiss conditions and was used as global activity as first approximation.

## Technology
New boiler technology to be installed today.

## Time period
Key emission factors PM, CO, NMVOC, NOx, CH4 were aupdated according to latest available information. Other emission data (which hardly depend on the combustion technology) are from the second half of the 1990´s.

## Parameters
- share of softwood: 0.083 dimensionless; name share_softwood
  Note that the hardwood and softwood shares do not add to 1. The difference is from industrial wood.
- scaling factor: 1.25 dimensionless; name scaling_factor; = 1/0.8; lognormal variance with pedigree 0.0043, pedigree (2,2,1,5,2)
  The scaling factor represents the inverse of the average annual efficiency of the boiler. This efficiency corresponds to average annual operation including start/stop (warm up / cool down) and will therefore be lower than nameplate efficiencies provided by manufacturers. Value according to personal information from Thomas Nussbaumer, Verenum, Switzerland (January 2014).
- share of hardwood: 0.878 dimensionless; name share_hardwood
  (same comment as for share of softwood)

## Reference product
- heat, central or small-scale, other than natural gas: 1 MJ; name heat_out; = 0.8*scaling_factor; source Thomas Nussbaumer 2014; CPC 17300: Steam and hot water; By-product classification allocatable product
  Reference product scaled to 1. Emission data and amounts of other exchanges in the mathematical relation refer to the input of 1 MJ end energy (in the fuel) and were scaled to the output of 1MJ useful energy (heat). Efficiency provided by the source represents average annual operation including warm-up and cool-down and will therefore be lower than nameplate efficiencies provided by manufacturers,
  production volume 2.76723e10 MJ; name APV_heat_out; = 2.77e8*0.1*1000
    Rough estimation: 1000 times Swiss APV, scaled with GLO vs CH population
  property price 0.0106 EUR2005; name heat_out_price_EUR2005
    Average European district heat price from Ecoheatcool and Euroheat 2005-2006, Ecoheat Work package 1: The European heat market. Final report. 10.6 EUR/GJ i s the price of district heat. http://www.solarthermalworld.org/files/Ecoheatcool%20WP1%20Web.pdf?download
  properties: heating value, net 1 MJ

## Inputs from technosphere
- electricity, low voltage: 0 kWh; source Bauer, C. 2007; pedigree (1,1,1,1,1)
  estimation, based on measurements
  EcoSpold01Location=CH
- cleft timber, measured as dry mass: 0 kg; name cleft_timber; pedigree (1,1,1,1,1)
  kg dry mass, including bark; 0.0539=wood input in [kg/MJ LHV]
  property dry wood density 430 kg/m3; name cleft_timber_dry_wood_d
  property heating value, net 14.46 MJ; name cleft_timber_Net_Heat_Value
  property apparent wood density 491.9 kg/m3; name cleft_timber_apparent_wood_d
  property carbon content, non-fossil 0.494; name cleft_timber_C_content_non_fossil
  property water content 0.3; name cleft_timber_water_content
  property water in wet mass 0.3 kg; name cleft_timber_WWM
  property basic wood density 378.4; name cleft_timber_basic_wood_d
  property wet mass 1.3 kg; name cleft_timber_WM
  property dry mass 1 kg; name cleft_timber_DM
  property carbon content, fossil 0; name cleft_timber_C_content_fossil
  property heating value, gross 20.4 MJ; name cleft_timber_Gross_Heat_Value
- furnace, logs, average storage area, 100kW: 9.25926e-8 unit; = 1/(100*15*2000*3.6); lognormal variance with pedigree 0.4727, pedigree (2,2,5,5,1)
  EcoSpold01Location=CH
  estimation based on lifetime 15 years, annual operation time 2000 h/a, 100kW
- wood ash mixture, pure: 0 kg; name ash; source Bauer, C. 2007; pedigree (1,1,1,1,1)
  estimation, based on measurements
  EcoSpold01Location=CH
  production volume 0 kg
    Calculated from production volume of heat using the relative outputs.
  property price 0 EUR2005; name ash_price_EUR2005
  properties: carbon content, non-fossil 0.012, dry mass 1 kg, wet mass 1 kg
- electricity, low voltage: 3.6278e-5, 6.60553e-6, 0.000149112, 0.000520963, 0.000106357, 0.00163292, 0.000264178, 0.000758584 kWh (8 entries); source Bauer, C. 2007; lognormal variance with pedigree 0.4727, pedigree (2,2,5,5,1)
  estimation, based on measurements
  EcoSpold01Location=CH
- cleft timber, measured as dry mass: 0.00238797, 0.0016816, 0.0633054 kg (3 entries); lognormal variance with pedigree 0.0153, pedigree (2,2,3,5,2)
  kg dry mass, including bark; 0.0539=wood input in [kg/MJ LHV]
  properties: dry wood density 430 kg/m3, heating value, net 14.46 MJ, apparent wood density 491.9 kg/m3, carbon content, non-fossil 0.494, water content 0.3, basic wood density 378.4, wet mass 1.3 kg, dry mass 1 kg, heating value, gross 20.4 MJ
- wood ash mixture, pure: -0.000226897, -0.000473103 kg (2 entries); source Bauer, C. 2007; lognormal variance with pedigree 0.0443, pedigree (2,2,5,5,2)
  estimation, based on measurements
  EcoSpold01Location=CH
  production volume 1.93706e7 kg

## Emissions to nature
- PAH, polycyclic aromatic hydrocarbons [air, urban air close to ground]: 1.3875e-8 kg; = 1.11e-8*scaling_factor; source Bauer, C. 2007; lognormal variance with pedigree 0.4727, pedigree (2,2,5,5,1)
  estimation, based on measurements
- Toluene [air, urban air close to ground]: 3.75e-7 kg; = 3e-7*scaling_factor; source Bauer, C. 2007; lognormal variance with pedigree 0.4727, pedigree (2,2,5,5,1)
  estimation, based on measurements
- Copper [air, urban air close to ground]: 2.75e-8 kg; = 2.2e-8*scaling_factor; source Bauer, C. 2007; lognormal variance with pedigree 0.4727, pedigree (2,2,5,5,1)
  estimation, based on measurements
- m-Xylene [air, urban air close to ground]: 1.5e-7 kg; = 1.2e-7*scaling_factor; source Bauer, C. 2007; lognormal variance with pedigree 0.4727, pedigree (2,2,5,5,1)
  estimation, based on measurements
- Carbon monoxide, non-fossil [air, urban air close to ground]: 0.0015625 kg; = 1250e-6*scaling_factor; source Thomas Nussbaumer 2014; lognormal variance with pedigree 0.4727, pedigree (2,2,5,5,1)
  expert estimate (see source)
- Phosphorus [air, urban air close to ground]: 3.75e-7 kg; = 3e-7*scaling_factor; source Bauer, C. 2007; lognormal variance with pedigree 0.4727, pedigree (2,2,5,5,1)
  estimation, based on measurements
- Manganese [air, urban air close to ground]: 2.125e-7 kg; = 1.7e-7*scaling_factor; source Bauer, C. 2007; lognormal variance with pedigree 0.4727, pedigree (2,2,5,5,1)
  estimation, based on measurements
- Chlorine [air, urban air close to ground]: 2.25e-7 kg; = 1.8e-7*scaling_factor; source Bauer, C. 2007; lognormal variance with pedigree 0.4727, pedigree (2,2,5,5,1)
  estimation, based on measurements
- Lead [air, urban air close to ground]: 3.125e-8 kg; = 2.5e-8*scaling_factor; source Bauer, C. 2007; lognormal variance with pedigree 0.4727, pedigree (2,2,5,5,1)
  estimation, based on measurements
- Potassium [air, urban air close to ground]: 2.925e-5 kg; = 2.34e-5*scaling_factor; source Bauer, C. 2007; lognormal variance with pedigree 0.4727, pedigree (2,2,5,5,1)
  estimation, based on measurements
- Benzene [air, urban air close to ground]: 1.1375e-6 kg; = 9.1e-7*scaling_factor; source Bauer, C. 2007; lognormal variance with pedigree 0.4727, pedigree (2,2,5,5,1)
  estimation, based on measurements
- Cadmium [air, urban air close to ground]: 8.75e-10 kg; = 7e-10*scaling_factor; source Bauer, C. 2007; lognormal variance with pedigree 0.4727, pedigree (2,2,5,5,1)
  estimation, based on measurements
- Calcium [air, urban air close to ground]: 7.3125e-6 kg; = 5.85e-6*scaling_factor; source Bauer, C. 2007; lognormal variance with pedigree 0.4727, pedigree (2,2,5,5,1)
  estimation, based on measurements
- Methane, non-fossil [air, urban air close to ground]: 1.425e-5 kg; = 1.14e-5*scaling_factor; source Thomas Nussbaumer 2014; lognormal variance with pedigree 0.4727, pedigree (2,2,5,5,1)
  expert estimate (see source)
- Ammonia [air, urban air close to ground]: 2.1625e-6 kg; = 1.73e-6*scaling_factor; source Bauer, C. 2007; lognormal variance with pedigree 0.4727, pedigree (2,2,5,5,1)
  estimation, based on measurements
- Benzene, ethyl- [air, urban air close to ground]: 3.75e-8 kg; = 3e-8*scaling_factor; source Bauer, C. 2007; lognormal variance with pedigree 0.4727, pedigree (2,2,5,5,1)
  estimation, based on measurements
- NMVOC, non-methane volatile organic compounds, unspecified origin [air, urban air close to ground]: 3.325e-5 kg; = 26.6e-6*scaling_factor; source Thomas Nussbaumer 2014; lognormal variance with pedigree 0.4727, pedigree (2,2,5,5,1)
  expert estimate (see source)
- Magnesium [air, urban air close to ground]: 4.5e-7 kg; = 3.6e-7*scaling_factor; source Bauer, C. 2007; lognormal variance with pedigree 0.4727, pedigree (2,2,5,5,1)
  estimation, based on measurements
- Formaldehyde [air, urban air close to ground]: 1.625e-7 kg; = 1.3e-7*scaling_factor; source Bauer, C. 2007; lognormal variance with pedigree 0.4727, pedigree (2,2,5,5,1)
  estimation, based on measurements
- Acetaldehyde [air, urban air close to ground]: 7.625e-8 kg; = 6.1E-08*scaling_factor; source Bauer, C. 2007; lognormal variance with pedigree 0.4727, pedigree (2,2,5,5,1)
  estimation, based on measurements
- Sulfur dioxide [air, urban air close to ground]: 3.125e-6 kg; = 2.5e-6*scaling_factor; source Bauer, C. 2007; lognormal variance with pedigree 0.4727, pedigree (2,2,5,5,1)
  estimation, based on measurements
- Particulates, < 2.5 um [air, urban air close to ground]: 4.5e-5 kg; = 36e-6*scaling_factor; source Thomas Nussbaumer 2014; lognormal variance with pedigree 0.4727, pedigree (2,2,5,5,1)
  expert estimate (see source)
- Arsenic [air, urban air close to ground]: 1.25e-9 kg; = 1e-9*scaling_factor; source Bauer, C. 2007; lognormal variance with pedigree 0.4727, pedigree (2,2,5,5,1)
  estimation, based on measurements
- Chromium [air, urban air close to ground]: 4.95e-9 kg; = 3.96e-9*scaling_factor; source Bauer, C. 2007; lognormal variance with pedigree 0.4727, pedigree (2,2,5,5,1)
  estimation, based on measurements
- Fluorine [air, urban air close to ground]: 6.25e-8 kg; = 5e-8*scaling_factor; source Bauer, C. 2007; lognormal variance with pedigree 0.4727, pedigree (2,2,5,5,1)
  estimation, based on measurements
- Benzo(a)pyrene [air, urban air close to ground]: 6.25e-10 kg; = 5e-10*scaling_factor; source Bauer, C. 2007; lognormal variance with pedigree 0.4727, pedigree (2,2,5,5,1)
  estimation, based on measurements
- Bromine [air, urban air close to ground]: 7.5e-8 kg; = 6e-8*scaling_factor; source Bauer, C. 2007; lognormal variance with pedigree 0.4727, pedigree (2,2,5,5,1)
  estimation, based on measurements
- Zinc [air, urban air close to ground]: 3.75e-7 kg; = 3E-07*scaling_factor; source Bauer, C. 2007; lognormal variance with pedigree 0.4727, pedigree (2,2,5,5,1)
  estimation, based on measurements
- Carbon dioxide, non-fossil [air, urban air close to ground]: 0.122625 kg; = 0.0981*scaling_factor; source Bauer, C. 2007; lognormal variance with pedigree 0.4727, pedigree (2,2,5,5,1)
  estimation, based on measurements
- Hydrocarbons, aliphatic, alkanes, unspecified [air, urban air close to ground]: 1.1375e-6 kg; = 9.1e-7*scaling_factor; source Bauer, C. 2007; lognormal variance with pedigree 0.4727, pedigree (2,2,5,5,1)
  estimation, based on measurements
- Nickel [air, urban air close to ground]: 7.5e-9 kg; = 6e-9*scaling_factor; source Bauer, C. 2007; lognormal variance with pedigree 0.4727, pedigree (2,2,5,5,1)
  estimation, based on measurements
- Hydrocarbons, aliphatic, unsaturated [air, urban air close to ground]: 3.875e-6 kg; = 3.1e-6*scaling_factor; source Bauer, C. 2007; lognormal variance with pedigree 0.4727, pedigree (2,2,5,5,1)
  estimation, based on measurements
- Phenol, pentachloro- [air, urban air close to ground]: 1.0125e-11 kg; = 8.1e-12*scaling_factor; source Bauer, C. 2007; lognormal variance with pedigree 0.4727, pedigree (2,2,5,5,1)
  estimation, based on measurements
- Benzene, hexachloro- [air, urban air close to ground]: 9e-15 kg; = 7.2e-15*scaling_factor; source Bauer, C. 2007; lognormal variance with pedigree 0.4727, pedigree (2,2,5,5,1)
  estimation, based on measurements
- Dinitrogen monoxide [air, urban air close to ground]: 3.75e-6 kg; = 3e-6*scaling_factor; source Bauer, C. 2007; lognormal variance with pedigree 0.4727, pedigree (2,2,5,5,1)
  estimation, based on measurements
- Mercury [air, urban air close to ground]: 3.75e-10 kg; = 3e-10*scaling_factor; source Bauer, C. 2007; lognormal variance with pedigree 0.4727, pedigree (2,2,5,5,1)
  estimation, based on measurements
- Particulates, > 2.5 um, and < 10um [air, urban air close to ground]: 2.5e-6 kg; = 2e-6*scaling_factor; source Thomas Nussbaumer 2014; lognormal variance with pedigree 0.4727, pedigree (2,2,5,5,1)
  expert estimate (see source)
- Chromium VI [air, urban air close to ground]: 5e-11 kg; = 4e-11*scaling_factor; source Bauer, C. 2007; lognormal variance with pedigree 0.4727, pedigree (2,2,5,5,1)
  estimation, based on measurements
- Water [air, urban air close to ground]: 1.46e-5 m3; lognormal variance with pedigree 0.0093, pedigree (2,2,3,5,2)
  calculation; ensures correct water balance
- Dioxins, measured as 2,3,7,8-tetrachlorodibenzo-p-dioxin [air, urban air close to ground]: 3.875e-14 kg; = 3.1e-14*scaling_factor; source Bauer, C. 2007; lognormal variance with pedigree 0.4727, pedigree (2,2,5,5,1)
  estimation, based on measurements
- Sodium [air, urban air close to ground]: 1.625e-6 kg; = 1.3e-6*scaling_factor; source Bauer, C. 2007; lognormal variance with pedigree 0.4727, pedigree (2,2,5,5,1)
  estimation, based on measurements
- Nitrogen oxides [air, urban air close to ground]: 0.0001 kg; = 8e-5*scaling_factor; source Thomas Nussbaumer 2014; lognormal variance with pedigree 0.4727, pedigree (2,2,5,5,1)
  expert estimate (see source)

## Sampling procedure
literature and expert judgement

## Extrapolations
This dataset has been copied from an original dataset covering the geography CH. The uncertainty has been adjusted accordingly.

## Review by Emilia Moreno Ruiz 2014-06-03
input changed to cleft timber
