# electric connector production, peripheral component interconnect buss

Dataset: EcoSpold 2, unit process
Geography: GLO
Time period: 2004-01-01 to 2021-12-31
Technology level: current
Classification: ISIC rev.4 ecoinvent: 2610:Manufacture of electronic components and boards
Classification: EcoSpold01Categories: electronics/component
Scenario: Business-as-Usual
System model: Allocation, cut-off by classification
Generated by: Roland Hischier
Published in: Hischier R. 2007
Database: ecoinvent
isCopyrightProtected: true
accessRestrictedTo: 1

## General comment
This dataset represents the production of 1 kg of internal connectors for computer technology, i.e. the so-called Peripheral Component Interconnect (PCI) bus. It is based on the assumption that a typical 64-bit PCI bus connector has an average weight of 11.6 g. The data represent a current PCI bus type connector like used in current information and communication technology (i.e. computers). Material data are taken from datasheets of producers of such capacitors and from the literature. Infrastructure and production efforts are based on own assumptions and taken from the Swedish LCI database and have thus, accordingly higher uncertainty.
[This dataset was already contained in the ecoinvent database version 2. It was not individually updated during the transfer to ecoinvent version 3. Life Cycle Impact Assessment results may still have changed, as they are affected by changes in the supply chain, i.e. in other datasets. This dataset was generated following the ecoinvent quality guidelines for version 2. It may have been subject to central changes described in the ecoinvent version 3 change report (http://www.ecoinvent.org/database/ecoinvent-version-3/reports-of-changes/), and the results of the central updates were reviewed extensively. The changes added e.g. consistent water flows and other information throughout the database. The documentation of this dataset can be found in the ecoinvent reports of version 2, which are still available via the ecoinvent website. The change report linked above covers all central changes that were made during the conversion process.]

## Included activities start
From reception of metals and plastics at the factory gate.

## Included activities end
This dataset includes raw material input and production efforts for the production of PCI bus type connectors.

## Geography
Data represent a global valuable composition of a 64-bit PCI slot connector.

## Technology
average connector production technology, based on literature and assumptions

## Reference product
- electric connector, peripheral component interconnect buss: 1 kg; By-product classification allocatable product; CPC 471: Electronic valves and tubes; electronic components; parts thereof
  EcoSpold01Location=GLO
  64-bit PCI slot, used for the connection of specific boards (e.g. graphic adapter, sound card) to the main board of a computer. Main data source are own calculations based on the product description schemes of such a 64-bit PCI slot - taken as an average connector of this type here. The data represent thereby the global situation for PCI connections.
  production volume 1 kg
    Dummy value to be replaced by measured, estimated or calculated value
  property price 63.9535 EUR2005
    Calculated based on inputs: The price of the product has been calculated as a sum of the values of the material and energy inputs for this product. This value is therefore a rough estimation. It may underestimate the real price since there are additional expenses when producing any product. These expences can include for example labour costs, treatment of waste materials and profit for the producer. Please consider carefully whether this level of data quality is acceptable for your application.
  property carbon content, fossil 0.506549
    Calculated as the addition of C contents in the product composition
  property carbon content 0.506549
    carbon content on a dry matter basis (reserved; not for manual entry)
  properties: carbon content, non-fossil 0, wet mass 1 kg, water content 0, dry mass 1 kg, water in wet mass 0 kg, carbon allocation 0.506549 kg

## Inputs from technosphere
- gold: 0.00205 kg; source ITT 2005; lognormal variance with pedigree 0.0761, pedigree (4,5,5,3,1)
  EcoSpold01Location=RER
  Estimation. The weight and the split of the materials were estimaded based on own calculation and literature as a starting point.
  Uncertainty: estimation, calculated weight, based on qualitative information
  properties: wet mass 1 kg, dry mass 1 kg
- brass: 0 kg; source ITT 2005; pedigree (1,1,1,1,1)
  EcoSpold01Location=CH
  Estimation. The weight and the split of the materials were estimaded based on own calculation and literature as a starting point.
  Uncertainty: estimation, calculated weight, based on qualitative information
  properties: wet mass 1 kg, dry mass 1 kg
- printed wiring board mounting facility: 2.08e-7 unit; lognormal variance with pedigree 0.5761, pedigree (4,5,5,3,5)
  EcoSpold01Location=GLO
  Proxy. Due to a lack of more specific information the dataset of the printed wiring board mounting plant was used.
  Uncertainty: rough estimation of infrastructure
- nylon 6-6: 0 kg; source ITT 2005; pedigree (1,1,1,1,1)
  Estimation. The weight and the split of the materials were estimaded based on own calculation and literature as a starting point.
  EcoSpold01Location=RER
  Uncertainty: estimation, calculated weight, based on qualitative information
  properties: heating value, net 30.9 MJ, carbon content, fossil 0.637168, dry mass 1 kg, wet mass 1 kg
  note on heating value, net: Assumed equal to Nylon-66. Reference: Walters, R. N., Hackett, S. M. and Lyon, R. E. (2000) ‘Heats of combustion of high temperature polymers’, Fire and Materials, 24(5), pp. 245–252. doi: 10.1002/1099-1018(200009/10)24:5<245::AID-FAM744>3.0.CO;2-7.
  note on carbon content, fossil: Nylon 66 is derived from hexamethylene diamine and adipic acid and has the following structure: -(HN-(CH2)6-NH-CO-(CH2)4-CO)n- (ecoinvent v2.2 report 11_II), C12H22N2O2. MW=226 g/mol.
- electricity, medium voltage: 6.51 kWh; source CPM 2006; lognormal variance with pedigree 0.1341, pedigree (3,4,5,3,4)
  EcoSpold01Location=UCTE
  Literature Value.
  Uncertainty: literature value as first approximation used
- brass: 0.00101475, 0.201935 kg (2 entries); source ITT 2005; lognormal variance with pedigree 0.0761, pedigree (4,5,5,3,1)
  (same comment as for brass)
- nylon 6-6: 0.262821, 0.532179 kg (2 entries); source ITT 2005; lognormal variance with pedigree 0.0761, pedigree (4,5,5,3,1)
  (same comment as for nylon 6-6)

## Sampling procedure
literature

## Extrapolations
This dataset has been extrapolated from year 2006 to the year of the calculation (2021). The uncertainty has been adjusted accordingly.

## Review by Rolf Frischknecht 2007-11-08
passed.
