# ultrafiltration module production, hollow fiber

Dataset: EcoSpold 2, unit process
Geography: GLO
Time period: 2012-01-01 to 2021-12-31
Technology level: current
Classification: ISIC rev.4 ecoinvent: 3600:Water collection, treatment and supply
Classification: EcoSpold01Categories: water supply/production
Synonyms: UF module; membrane filtration
Scenario: Business-as-Usual
System model: Allocation, cut-off by classification
Generated by: Marylène Dussault
Database: ecoinvent
isCopyrightProtected: true
accessRestrictedTo: 1

## General comment
This dataset represents the production of ultrafiltration membrane module and housing. This dataset is based on PALL UNA-620A modules and is considered to have 50 m2 of active surface per module.

## Included activities start
From reception of raw materials for production of membrane module.

## Included activities end
This dataset ends with production of module for ultrafiltration process. This dataset only includes material inputs for production. Losses and processing for materials have been excluded due to lack of data. Thus no waste are considered. Production energy is also excluded due to lack of data.

## Parameters
- module end cap: 2.08634 kg; name cap; lognormal variance with pedigree 0.0092, pedigree (1,3,1,1,3)
  Calculated value. Cap was calculated using spec sheets and technical drawings.
- module collection tube: 5.48 l; name coll_tube; lognormal variance with pedigree 0.0126, pedigree (3,4,1,1,3)
  Calculated value. Volume of permeate collection tube was calculated using spec sheets and technical drawings. Wall tybe thickness is assumed to be 6.1mm based on ABS pipe literature.

## Reference product
- ultrafiltration module: 1 unit; name module; By-product classification allocatable product; CPC 43914: Filtering or purifying machinery and apparatus, for liquids or gases, except oil filters, petrol filters and a[…]
  production volume 9.24e8 unit; name PV_module
    Estimated production volume based on module attributed to 1 kg of tap water production from ultrafiltration share of Quebec production and extrapolated to the world tap water.
  property carbon content, fossil 0.58; name module_C_content_fossil
    fossil carbon content on a dry matter basis
  property price 53.8459 EUR2005; name module_price_EUR2005
    Calculated based on inputs: The price of the product has been calculated as a sum of the values of the material and energy inputs for this product. This value is therefore a rough estimation. It may underestimate the real price since there are additional expenses when producing any product. These expences can include for example labour costs, treatment of waste materials and profit for the producer. Please consider carefully whether this level of data quality is acceptable for your application.
  property carbon content, non-fossil 0; name module_C_content_non_fossil
    biogene carbon content on a dry matter basis
  property carbon content 0.58
    carbon content on a dry matter basis (reserved; not for manual entry)
  properties: water content 0, dry mass 19.83 kg, wet mass 19.83 kg, water in wet mass 0 kg, carbon allocation 11.5014 kg

## Inputs from technosphere
- waste polyurethane: 0 kg; name w_polyureathane
  production volume 0 kg
    Calculated from production volume of reference product using the relative outputs.
  property price 0 EUR2005; name w_polyureathane_price_EUR2005
  properties: wet mass 1 kg, water content 0.00200401, dry mass 0.998 kg, carbon content, fossil 0.641283, heating value, net 30.67 MJ
  note on heating value, net: Value taken from the general comment of the treatment dataset.
- acrylonitrile-butadiene-styrene copolymer: 7.87604 kg; name ABS; = (coll_tube*density_ABS/extrusion_eff+ cap/molding_eff); lognormal variance with pedigree 0.008, pedigree (1,1,4,1,1)
  Calculated value.
  Uncertainty: Calculated variable. Uncertainty will be determined from propagation of uncertainty factors of underlying variables. Uncertainty of actual relation between variables not accounted for at this time, although this could be included in a future update.
  property density 1.05 kg/l; name density_ABS
  properties: dry mass 1 kg, carbon content, fossil 0.853081, wet mass 1 kg, heating value, net 35.58 MJ
  note on density: Literature value. Density for injection grade ABS. Assumption was made for choice of material grade. Value from density table provided by Stelray Plastics Products Inc website.
- polyurethane, rigid foam: 0 kg; name polyureathane; pedigree (1,1,1,1,1)
  Extrapolated process. This process is used ot reprensents mass of cured urethane glue. Value is based on measurements and data from specs sheet of a selected representative membrane module (UNA-620A, Pall corporation).
  properties: heating value, net 30.67 MJ, wet mass 1 kg, dry mass 1 kg, carbon content, fossil 0.69089
- waste polyvinylfluoride: 0 kg; name w_PVDF
  production volume 0 kg
    Calculated from production volume of reference product using the relative outputs.
  property price 0 EUR2005; name w_PVDF_price_EUR2005
  properties: heating value, net 27.89 MJ, carbon content, fossil 0.571142, wet mass 1 kg, dry mass 0.998 kg, water content 0.00200401
- waste plastic, mixture: 0 kg; name w_ABS
  production volume 0 kg
    Calculated from production volume of reference product using the relative outputs.
  property price 0 EUR2005; name w_ABS_price_EUR2005
  properties: heating value, net 30.79 MJ, water content 0.180638, wet mass 1 kg, carbon content, fossil 0.747344, dry mass 0.847 kg
- polyvinylfluoride: 10.8027 kg; name PVDF; lognormal variance with pedigree 0.0206, pedigree (3,4,4,1,3)
  Extrapolated process. This process reprensents mass of polyvinylidene fluoride. Value based on calculation based literature data.
  properties: dry mass 1 kg, wet mass 1 kg, carbon content, fossil 0.521739, heating value, net 23.7 MJ
- extrusion, plastic pipes: 5.77711 kg; = coll_tube*density_ABS/extrusion_eff; lognormal variance with pedigree 0.008, pedigree (1,1,4,1,1)
  (same comment as for acrylonitrile-butadiene-styrene copolymer)
  property processing_efficiency 0.996; name extrusion_eff
  note on processing_efficiency: Literature value. From ecoinvent process, 1 kg of this process equals 0.996 kg of extruded plastic pipes.
- injection moulding: 2.09894 kg; = cap/molding_eff; lognormal variance with pedigree 0.008, pedigree (1,1,4,1,1)
  (same comment as for acrylonitrile-butadiene-styrene copolymer)
  property molding efficiency 0.994; name molding_eff
  note on molding efficiency: Literature value. From ecoinvent process, 1 kg of this process equals 0.994 kg of injection moulded plastics.
- waste polyurethane: -0.114543, -0.0088306, -0.00364735, -0.0034635, -0.132163, -0.00147349, -0.000667844, -0.925212 kg (8 entries)
  production volume 1.09956e9 kg
- polyurethane, rigid foam: 0.393405, 0.796595 kg (2 entries); lognormal variance with pedigree 0.0206, pedigree (3,4,4,1,3)
  (same comment as for polyurethane, rigid foam)
- waste polyvinylfluoride: -0.160773, -10.6419 kg (2 entries)
  production volume 9.9817e9 kg
- waste plastic, mixture: -0.758106, -0.0584455, -0.0241401, -0.0229233, -0.874722, -0.00975232, -0.00442014, -6.12354 kg (8 entries)
  production volume 1.09956e9 kg

## Sampling procedure
General rules for inventories for hollow fiber ultrafiltration modules are derived from data from technical drawings, patents and technical litterature.

## Extrapolations
This dataset has been extrapolated from year 2012 to the year of the calculation (2021). The uncertainty has been adjusted accordingly.
