# heat production, softwood chips from forest, at furnace 5000kW, state-of-the-art 2014

Dataset: EcoSpold 2, unit process
Geography: RoW
Time period: 2014-01-01 to 2021-12-31
Technology level: modern
Classification: ISIC rev.4 ecoinvent: 3530:Steam and air conditioning supply
Classification: EcoSpold01Categories: wood energy/heating systems
Synonyms: automatic wood heating system
Scenario: Business-as-Usual
System model: Allocation, cut-off by classification
Share of production covered: 0.1 %
Generated by: Christian Bauer
Database: ecoinvent
isCopyrightProtected: true
accessRestrictedTo: 1

## General comment
This activity represents the combustion of natural wood chips from forest in Switzerland in new (=installed in 2014) boilers and is used for the global activity as first approximation with uncertainty factors adjusted accordingly. Equipped with an industrial electrostatic precipitator in order to comply with PM emission regulation as well as with an SNCR device for reduction of NOx emissions. Characteristics of the of wood chips to be burned: Dry wood density 650kg/m3; Energy content (LHV, oven-dry) 19.1 MJ/kg. The humidity when burned is assumed to be at an adequate level for appropriate combustion, which is achieved after some weeks of natural drying in the storage.Air emission factors as well as the boiler efficiency represent average annual operation including start and stop (warm-up and shut-down). Therefore, emission data will be higher and efficiency will be lower than rated values provided by manufacturers. The inventory shall be considered as being representative for boilers with nominal capacities above 2 MW.

## Included activities start
from delivery of wood chips

## Included activities end
This activity describes the combustion of natural wood chips from forest. Included are the infrastructure, the wood requirements (wood chips from forest), the emissions to air, the electricity needed for operation, and the disposal of the ashes.

## Geography
LCI data for Switzerland were used for the GLO activityy as first approximation with uncertainty factors adjusted accordingly.

## Technology
Modern boiler technology available on the Swiss market, installed in 2014.

## Time period
Key emission factors PM, CO, NMVOC, NOx, CH4 as well as the average annual efficiency have been updated using the latest available information. Other emission data are from the second half of the 1990´s.

## Parameters
- scaling factor: 1.25 dimensionless; name scaling_factor; = 1/0.8; lognormal variance with pedigree 0.0122, pedigree (2,3,1,5,3)
  The scaling factor corresponds to the inverse of the average annual efficiency of the heating system, including start/stop (warm up and cool down). Therefore, this efficiency will be lower than figures provided by manufacturers. The estimated value was provided by T.Nussbaumer, Verenum, and represents newly (=in 2014) installed boiler in this size category in Switzerland.

## Reference product
- heat, district or industrial, other than natural gas: 1 MJ; = 0.8 * scaling_factor; source Thomas Nussbaumer 2014; By-product classification allocatable product; CPC 17300: Steam and hot water
  The numbers used in the mathematical relation refer to the input of one MJ of fuel with the heat output depending on the efficiency of the furnace. Using the "scaling factor" (inverse of the efficiency) allows for scaling of the amount of the reference product to 1.
  EcoSpold01Location=CH
  production volume 6.1e10 MJ; name heat_apv
    Assumption. The original value from the global dataset was altered in order to model the correct shares of district/industrial heat producing datasets on the market for heat, district or industrial, other than natural gas according to http://www.iea.org/statistics/statisticssearch/report/?country=WORLD&product=electricityandheat&year=2012
    . See talk pages for further discussion.
    //Original comment from global dataset//:
    Total heat from biomass from industry and heat plants (7.47E12 MJ) according to IEA Renewables statistics for 2007 (http://www.iea.org/stats/renewdata.asp?COUNTRY_CODE=29) divided over available fuel types (forest/industry, hard/soft ; with 8.3% softwood from forestry) according to FAO forestry statistics (http://faostat.fao.org/site/626/DesktopDefault.aspx?PageID=626#ancor) and within these equally on 2 boiler sizes, multiplied by conversion efficiency of specific boiler type (0.85), all on a net heat value basis.
  property price 0.0106 EUR2005
    Average European district heat price from Ecoheatcool and Euroheat 2005-2006, Ecoheat Work package 1: The European heat market. Final report. 10.6 EUR/GJ i s the price of district heat. http://www.solarthermalworld.org/files/Ecoheatcool%20WP1%20Web.pdf?download
  properties: heating value, net 1 MJ, Corresponding fuel use 1.18 MJ

## Inputs from technosphere
- furnace, wood chips, with silo, 5000kW: 1.38889e-9 unit; = 1/(5000*20*2000*3.6); lognormal variance with pedigree 0.0433, pedigree (2,2,5,5,2)
  estimation based on 20a lifetime, 2000h/a, 5000kW capacity
- dust collector, electrostatic precipitator, for industrial use: 1.38889e-9 unit; = 1/(5000*20*2000*3.6); lognormal variance with pedigree 0.0433, pedigree (2,2,5,5,2)
  estimation based on 20a lifetime, 2000h/a, 5000kW capacity
- wood chips, wet, measured as dry mass: 0 kg; pedigree (1,1,1,1,1)
  EcoSpold01Location=RER
  uncertainty factor represents uncertainties in energy content of wood fuel input
  properties: dry mass 1 kg, heating value, net 10.84 MJ, carbon content, non-fossil 0.494, wet mass 2.4 kg, water content 1.4
  note on heating value, net: Value based on the dataset 'softwood forestry, mixed species, sustainable forest management'
  note on carbon content, non-fossil: C content of dry mass is 0.494 kgC/kg dry wood (ecoinvent v2.2 report 9).
- NOx retained, by selective catalytic reduction: 5e-5 kg; = 4e-5* scaling_factor; lognormal variance with pedigree 0.0053, pedigree (2,2,3,5,2)
  difference between NOx emissions of current and modern 5000kW boiler; 5000 kW boiler is equipped with an SCR for NOx reduction.
  properties: dry mass 1 kg, wet mass 1 kg
- wood ash mixture, pure: 0 kg; name wood_ash; source Bauer, C. 2007; pedigree (1,1,1,1,1)
  literature. Original value [per MJ fuel input] was scaled to 1 MJ reference product output
  EcoSpold01Location=CH
  production volume 0 kg
    Calculated from the production volume of wood chips, from forest, softwood, burned in furnace 1000kW in proportion to the respective output amounts.
  property price 0 EUR2005; name wood_ash_price_EUR2005
  properties: carbon content, non-fossil 0.012, dry mass 1 kg, wet mass 1 kg
- electricity, low voltage: 0 kWh; source Bauer, C. 2007; pedigree (1,1,1,1,1)
  EcoSpold01Location=CH
  literature. Original value [per MJ fuel input] was scaled to 1 MJ reference product output
- wood chips, wet, measured as dry mass: 0.000144994, 0.00130653, 0.0639935 kg (3 entries); lognormal variance with pedigree 0.0433, pedigree (2,2,5,5,2)
  (same comment as for wood chips, wet, measured as dry mass)
- wood ash mixture, pure: -0.000192863, -0.000402137 kg (2 entries); source Bauer, C. 2007; lognormal variance with pedigree 0.0433, pedigree (2,2,5,5,2)
  (same comment as for wood ash mixture, pure)
  production volume 3.6295e7 kg
- electricity, low voltage: 5.4417e-5, 9.90829e-6, 0.000223668, 0.000781444, 0.000159536, 0.00244938, 0.000396267, 0.00113788 kWh (8 entries); source Bauer, C. 2007; lognormal variance with pedigree 0.0433, pedigree (2,2,5,5,2)
  (same comment as for electricity, low voltage)

## Emissions to nature
- Sodium [air, urban air close to ground]: 1.625e-6 kg; = 1.3E-06 * scaling_factor; source Bauer, C. 2007; lognormal variance with pedigree 0.0433, pedigree (2,2,5,5,2)
  literature. Original value [per MJ fuel input] was scaled to 1 MJ reference product output
- Nitrogen oxides [air, urban air close to ground]: 0.0001 kg; = 8e-5* scaling_factor; source Thomas Nussbaumer 2014; lognormal variance with pedigree 0.0053, pedigree (2,2,3,5,2)
  expert estimation (see source)
- Methane, non-fossil [air, urban air close to ground]: 1.5e-6 kg; = 1.2E-06 * scaling_factor; source Thomas Nussbaumer 2014; lognormal variance with pedigree 0.0053, pedigree (2,2,3,5,2)
  expert estimation (see source)
- Chromium [air, urban air close to ground]: 4.95e-9 kg; = 3.96E-09 * scaling_factor; source Bauer, C. 2007; lognormal variance with pedigree 0.0433, pedigree (2,2,5,5,2)
  literature. Original value [per MJ fuel input] was scaled to 1 MJ reference product output
- Magnesium [air, urban air close to ground]: 4.5e-7 kg; = 3.6E-07 * scaling_factor; source Bauer, C. 2007; lognormal variance with pedigree 0.0433, pedigree (2,2,5,5,2)
  literature. Original value [per MJ fuel input] was scaled to 1 MJ reference product output
- Lead [air, urban air close to ground]: 3.125e-8 kg; = 2.5E-08 * scaling_factor; source Bauer, C. 2007; lognormal variance with pedigree 0.0433, pedigree (2,2,5,5,2)
  literature. Original value [per MJ fuel input] was scaled to 1 MJ reference product output
- Nickel [air, urban air close to ground]: 7.5e-9 kg; = 6E-09 * scaling_factor; source Bauer, C. 2007; lognormal variance with pedigree 0.0433, pedigree (2,2,5,5,2)
  literature. Original value [per MJ fuel input] was scaled to 1 MJ reference product output
- Calcium [air, urban air close to ground]: 7.3125e-6 kg; = 5.85E-06 * scaling_factor; source Bauer, C. 2007; lognormal variance with pedigree 0.0433, pedigree (2,2,5,5,2)
  literature. Original value [per MJ fuel input] was scaled to 1 MJ reference product output
- m-Xylene [air, urban air close to ground]: 1.5e-7 kg; = 1.2E-07 * scaling_factor; source Bauer, C. 2007; lognormal variance with pedigree 0.0433, pedigree (2,2,5,5,2)
  literature. Original value [per MJ fuel input] was scaled to 1 MJ reference product output
- Cadmium [air, urban air close to ground]: 8.75e-10 kg; = 7E-10 * scaling_factor; source Bauer, C. 2007; lognormal variance with pedigree 0.0433, pedigree (2,2,5,5,2)
  literature. Original value [per MJ fuel input] was scaled to 1 MJ reference product output
- Fluorine [air, urban air close to ground]: 6.25e-8 kg; = 5E-08 * scaling_factor; source Bauer, C. 2007; lognormal variance with pedigree 0.0433, pedigree (2,2,5,5,2)
  literature. Original value [per MJ fuel input] was scaled to 1 MJ reference product output
- Hydrocarbons, aliphatic, alkanes, unspecified [air, urban air close to ground]: 1.1375e-6 kg; = 9.1E-07 * scaling_factor; source Bauer, C. 2007; lognormal variance with pedigree 0.0433, pedigree (2,2,5,5,2)
  literature. Original value [per MJ fuel input] was scaled to 1 MJ reference product output
- Carbon monoxide, non-fossil [air, urban air close to ground]: 0.000125 kg; = 1E-04 * scaling_factor; source Thomas Nussbaumer 2014; lognormal variance with pedigree 0.0053, pedigree (2,2,3,5,2)
  expert estimation (see source)
- Particulates, < 2.5 um [air, urban air close to ground]: 6.25e-6 kg; = 5E-06 * scaling_factor; source Thomas Nussbaumer 2014; lognormal variance with pedigree 0.0053, pedigree (2,2,3,5,2)
  expert estimation (see source)
- NMVOC, non-methane volatile organic compounds, unspecified origin [air, urban air close to ground]: 3.5e-6 kg; = 2.8E-06 * scaling_factor; source Thomas Nussbaumer 2014; lognormal variance with pedigree 0.0053, pedigree (2,2,3,5,2)
  expert estimation (see source)
- Carbon dioxide, non-fossil [air, urban air close to ground]: 0.1275 kg; = 0.102 * scaling_factor; source Bauer, C. 2007; lognormal variance with pedigree 0.0433, pedigree (2,2,5,5,2)
  literature. Original value [per MJ fuel input] was scaled to 1 MJ reference product output
- Arsenic [air, urban air close to ground]: 1.25e-9 kg; = 1E-09 * scaling_factor; source Bauer, C. 2007; lognormal variance with pedigree 0.0433, pedigree (2,2,5,5,2)
  literature. Original value [per MJ fuel input] was scaled to 1 MJ reference product output
- Chromium VI [air, urban air close to ground]: 5e-11 kg; = 4E-11 * scaling_factor; source Bauer, C. 2007; lognormal variance with pedigree 0.0433, pedigree (2,2,5,5,2)
  literature. Original value [per MJ fuel input] was scaled to 1 MJ reference product output
- PAH, polycyclic aromatic hydrocarbons [air, urban air close to ground]: 1.3875e-8 kg; = 1.11E-08 * scaling_factor; source Bauer, C. 2007; lognormal variance with pedigree 0.0433, pedigree (2,2,5,5,2)
  literature. Original value [per MJ fuel input] was scaled to 1 MJ reference product output
- Chlorine [air, urban air close to ground]: 2.25e-7 kg; = 1.8E-07 * scaling_factor; source Bauer, C. 2007; lognormal variance with pedigree 0.0433, pedigree (2,2,5,5,2)
  literature. Original value [per MJ fuel input] was scaled to 1 MJ reference product output
- Sulfur dioxide [air, urban air close to ground]: 3.125e-6 kg; = 2.5E-06 * scaling_factor; source Bauer, C. 2007; lognormal variance with pedigree 0.0433, pedigree (2,2,5,5,2)
  literature. Original value [per MJ fuel input] was scaled to 1 MJ reference product output
- Toluene [air, urban air close to ground]: 3.75e-7 kg; = 3E-07 * scaling_factor; source Bauer, C. 2007; lognormal variance with pedigree 0.0433, pedigree (2,2,5,5,2)
  literature. Original value [per MJ fuel input] was scaled to 1 MJ reference product output
- Phenol, pentachloro- [air, urban air close to ground]: 1.0125e-11 kg; = 8.1E-12 * scaling_factor; source Bauer, C. 2007; lognormal variance with pedigree 0.0433, pedigree (2,2,5,5,2)
  literature. Original value [per MJ fuel input] was scaled to 1 MJ reference product output
- Mercury [air, urban air close to ground]: 3.75e-10 kg; = 3E-10 * scaling_factor; source Bauer, C. 2007; lognormal variance with pedigree 0.0433, pedigree (2,2,5,5,2)
  literature. Original value [per MJ fuel input] was scaled to 1 MJ reference product output
- Formaldehyde [air, urban air close to ground]: 1.625e-7 kg; = 1.3E-07 * scaling_factor; source Bauer, C. 2007; lognormal variance with pedigree 0.0433, pedigree (2,2,5,5,2)
  literature. Original value [per MJ fuel input] was scaled to 1 MJ reference product output
- Potassium [air, urban air close to ground]: 2.925e-5 kg; = 2.34E-05 * scaling_factor; source Bauer, C. 2007; lognormal variance with pedigree 0.0433, pedigree (2,2,5,5,2)
  literature. Original value [per MJ fuel input] was scaled to 1 MJ reference product output
- Copper [air, urban air close to ground]: 2.75e-8 kg; = 2.2E-08 * scaling_factor; source Bauer, C. 2007; lognormal variance with pedigree 0.0433, pedigree (2,2,5,5,2)
  literature. Original value [per MJ fuel input] was scaled to 1 MJ reference product output
- Dioxins, measured as 2,3,7,8-tetrachlorodibenzo-p-dioxin [air, urban air close to ground]: 3.875e-14 kg; = 3.1E-14 * scaling_factor; source Bauer, C. 2007; lognormal variance with pedigree 0.0433, pedigree (2,2,5,5,2)
  literature. Original value [per MJ fuel input] was scaled to 1 MJ reference product output
- Zinc [air, urban air close to ground]: 3.75e-7 kg; = 3E-07 * scaling_factor; source Bauer, C. 2007; lognormal variance with pedigree 0.0433, pedigree (2,2,5,5,2)
  literature. Original value [per MJ fuel input] was scaled to 1 MJ reference product output
- Phosphorus [air, urban air close to ground]: 3.75e-7 kg; = 3E-07 * scaling_factor; source Bauer, C. 2007; lognormal variance with pedigree 0.0433, pedigree (2,2,5,5,2)
  literature. Original value [per MJ fuel input] was scaled to 1 MJ reference product output
- Benzene, ethyl- [air, urban air close to ground]: 3.75e-8 kg; = 3E-08 * scaling_factor; source Bauer, C. 2007; lognormal variance with pedigree 0.0433, pedigree (2,2,5,5,2)
  literature. Original value [per MJ fuel input] was scaled to 1 MJ reference product output
- Ammonia [air, urban air close to ground]: 2.1625e-6 kg; = 1.73E-06 * scaling_factor; source Bauer, C. 2007; lognormal variance with pedigree 0.0433, pedigree (2,2,5,5,2)
  literature. Original value [per MJ fuel input] was scaled to 1 MJ reference product output
- Benzene [air, urban air close to ground]: 1.1375e-6 kg; = 9.1E-07 * scaling_factor; source Bauer, C. 2007; lognormal variance with pedigree 0.0433, pedigree (2,2,5,5,2)
  literature. Original value [per MJ fuel input] was scaled to 1 MJ reference product output
- Hydrocarbons, aliphatic, unsaturated [air, urban air close to ground]: 3.875e-6 kg; = 3.1E-06 * scaling_factor; source Bauer, C. 2007; lognormal variance with pedigree 0.0433, pedigree (2,2,5,5,2)
  literature. Original value [per MJ fuel input] was scaled to 1 MJ reference product output
- Bromine [air, urban air close to ground]: 7.5e-8 kg; = 6E-08 * scaling_factor; source Bauer, C. 2007; lognormal variance with pedigree 0.0433, pedigree (2,2,5,5,2)
  literature. Original value [per MJ fuel input] was scaled to 1 MJ reference product output
- Benzene, hexachloro- [air, urban air close to ground]: 9e-15 kg; = 7.2E-15 * scaling_factor; source Bauer, C. 2007; lognormal variance with pedigree 0.0433, pedigree (2,2,5,5,2)
  literature. Original value [per MJ fuel input] was scaled to 1 MJ reference product output
- Acetaldehyde [air, urban air close to ground]: 7.625e-8 kg; = 6.1E-08 * scaling_factor; source Bauer, C. 2007; lognormal variance with pedigree 0.0433, pedigree (2,2,5,5,2)
  literature. Original value [per MJ fuel input] was scaled to 1 MJ reference product output
- Benzo(a)pyrene [air, urban air close to ground]: 6.25e-10 kg; = 5E-10 * scaling_factor; source Bauer, C. 2007; lognormal variance with pedigree 0.0433, pedigree (2,2,5,5,2)
  literature. Original value [per MJ fuel input] was scaled to 1 MJ reference product output
- Water [air, urban air close to ground]: 0.0001 m3; lognormal variance with pedigree 0.0103, pedigree (2,2,3,5,2)
  introduced in order to guarantee a correct water balance; amount represents emissions during combustion as well as during natural wood drying in the storage silo
- Dinitrogen monoxide [air, urban air close to ground]: 2.875e-6 kg; = 2.3E-06 * scaling_factor; source Bauer, C. 2007; lognormal variance with pedigree 0.0433, pedigree (2,2,5,5,2)
  literature. Original value [per MJ fuel input] was scaled to 1 MJ reference product output
- Manganese [air, urban air close to ground]: 2.125e-7 kg; = 1.7E-07 * scaling_factor; source Bauer, C. 2007; lognormal variance with pedigree 0.0433, pedigree (2,2,5,5,2)
  literature. Original value [per MJ fuel input] was scaled to 1 MJ reference product output

## Sampling procedure
literature

## Extrapolations
This dataset has been copied from an original dataset covering the geography CH. The uncertainty has been adjusted accordingly.
