# natural gas, high pressure, import from CA-AB

Dataset: EcoSpold 2, unit process
Geography: CA-QC
Time period: 2010-01-01 to 2021-12-31
Technology level: current
Classification: ISIC rev.4 ecoinvent: 4930:Transport via pipeline
Scenario: Business-as-Usual
System model: Allocation, cut-off by classification
Generated by: Pablo Tirado
Published in: Statistics Canada 2010
Database: ecoinvent
isCopyrightProtected: true
accessRestrictedTo: 1

## General comment
This dataset describes the transport needed for an average export of 1m3 of Albertan natural gas to Quebec (expressed in tkm). Gas burned for transportation, gas losses and emissions (losses and vented gas) are included. An average distance of 3800 km is estimated for the export.

## Parameters
- distance: 3800 km; lognormal variance with pedigree 0.0006, pedigree (1,1,1,1,1)
  Measured value. Distance from calgary to Montreal

## Reference product
- natural gas, high pressure: 1 m3; CPC 12020: Natural gas, liquefied or in the gaseous state; By-product classification allocatable product; CAS 14493-06-2
  production volume 5.5857e9 m3
    Total natural gas imported in Quebec
  property water in wet mass 0 kg; name WWM
  property price 0.166 EUR2005
    Temporary price data. Calculated as 90% of purchasers price based on: 2005 price for Europe-27 Import (US$ and kg) in UN Commodity Trade Statistics Database - Natural gas in gaseous state (http://data.un.org/Data.aspx?q=natural+gas&d=ComTrade&f=_l1Code%3a28%3bcmdCode%3a271121; accessed 4 January 2011), using density of natural gas of 0.8 kg/m3 for unit conversion.
  property heating value, net 39 MJ
    Literature value, Source: United Nations Statistics Division (2018) International Recommendations for Energy Statistics (IRES). Available at: http://unstats.un.org/unsd/statcom/doc11/BG-IRES.pdf.
  property wet mass 0.84 kg; name WM
  property carbon content, fossil 0.602381; name C_content_fossil
  property heating value, gross 0 MJ; name Gross_Heat_Value
  property dry mass 0.84 kg; name DM_natural_gas
  property water content 0; name water_content
  property carbon content, non-fossil 0; name C_content_non_fossil
  property carbon content 0.602381
    carbon content on a dry matter basis (reserved; not for manual entry)
  properties: carbon allocation 0.506 kg

## Inputs from technosphere
- natural gas, burned in gas motor, for storage: 1.65 MJ; = amountGas* LHV_Gas*36.3/ fuelUseGas; lognormal variance with pedigree 0.0666, pedigree (4,1,5,4,3)
  Estimated data. Data from german industrial expert for 2001, standard technology
  Uncertainty: Data from german industrial expert for 2001, standard technology
  property heating value, net 1 MJ; name LHV_Gas
  property Corresponding fuel use 1.1 MJ; name fuelUseGas
  property amount of exchange in m³ 1 0.05 m3; name amountGas
  note on Corresponding fuel use: Lower heating value of the fuel input related to the heat/electricity output
  note on amount of exchange in m³ 1: Amount of natural gas burned to produce electricity to transport 1m3 of natural gas from Alberta to Quebec
- transport, pipeline, long distance, natural gas: 3.192 metric ton*km; = distance* DM_natural_gas*1*1e-3; lognormal variance with pedigree 0.008, pedigree (1,1,4,1,1)
  Calculated value. Calculation based on distance and transported amount
- natural gas, high pressure: 1 m3; lognormal variance with pedigree 0.008, pedigree (1,1,4,1,1)
  activityLink added to better reflect the reality of the supply chain
  properties: wet mass 0.84 kg, carbon content, fossil 0.602381, dry mass 0.84 kg, heating value, net 39 MJ
  note on carbon content, fossil: An average C content of 0.506 kg C/ m3 has been assumed (this average has been calculated using data in Tab 3.5, ecoinvent v2.2 report 6_V
  note on heating value, net: Literature value, Source: United Nations Statistics Division (2018) International Recommendations for Energy Statistics (IRES). Available at: http://unstats.un.org/unsd/statcom/doc11/BG-IRES.pdf.

## Emissions to nature
- Mercury [air, non-urban air or from high stacks]: 1e-12 kg; lognormal variance with pedigree 0.0818, pedigree (2,1,5,4,2)
  Estimated data. Data from german industrial expert for 2001, standard technology
  Uncertainty: calculated based on average losses and norwegian gas composition
- Propane [air, non-urban air or from high stacks]: 1.9e-6 kg; lognormal variance with pedigree 0.1618, pedigree (2,1,5,4,2)
  (same comment as for Mercury)
- Ethane [air, non-urban air or from high stacks]: 7.4e-6 kg; lognormal variance with pedigree 0.1618, pedigree (2,1,5,4,2)
  (same comment as for Mercury)
- Butane [air, non-urban air or from high stacks]: 6e-7 kg; lognormal variance with pedigree 0.1618, pedigree (2,1,5,4,2)
  (same comment as for Mercury)
- Methane, fossil [air, non-urban air or from high stacks]: 7.19e-5 kg; lognormal variance with pedigree 0.1618, pedigree (2,1,5,4,2)
  (same comment as for Mercury)
- Carbon dioxide, fossil [air, non-urban air or from high stacks]: 1.3e-6 kg; lognormal variance with pedigree 0.0418, pedigree (2,1,5,4,2)
  (same comment as for Mercury)
- NMVOC, non-methane volatile organic compounds, unspecified origin [air, non-urban air or from high stacks]: 2e-7 kg; lognormal variance with pedigree 0.1618, pedigree (2,1,5,4,2)
  (same comment as for Mercury)

## Sampling procedure
Litterature

## Extrapolations
This dataset has been extrapolated from year 2010 to the year of the calculation (2021). The uncertainty has been adjusted accordingly.
