# silicon production, single crystal, Czochralski process, photovoltaics

Dataset: EcoSpold 2, unit process
Geography: RoW
Time period: 1992-01-01 to 2021-12-31
Technology level: current
Classification: ISIC rev.4 ecoinvent: 2011:Manufacture of basic chemicals
Synonyms: Silicon tetrahydride; Monosilane; 7440-21-3; Silicone; czochralski process; Silicon metal
Scenario: Business-as-Usual
System model: Allocation, cut-off by classification
Share of production covered: 10 %
Generated by: Mariska J. de Wild-Scholten
Published in: Jungbluth, N. 2007
Database: ecoinvent
isCopyrightProtected: true
accessRestrictedTo: 1

## General comment
This dataset represents the production of a monocrystalline silicon block, for use in photovoltaics, using the Czochralski process. The inventory data is based on literature information and environmental reports of one producer in Germany.
References:
Jungbluth N., Stucki M, and Frischknecht R. (2009) Photovoltaics. In Dones, R. (Ed.) et al., Sachbilanzen von Energiesystemen: Grundlagen für den ökologischen Vergleich von Energiesystemen und den Einbezug von Energiesystemen in Ökobilanzen für die Schweiz. ecoinvent report No. 6-XII, Swiss Centre for Life Cycle Inventories, Dübendorf, CH, 2009.

## Included activities start
The activity starts when the raw materials enter the process.

## Included activities end
This activity ends with the production of a monocrystalline silicon block using the Czochralski process. The dataset includes the crushing of Si, etching with HNO3, HF and acetic acid. It also includes the melting of Si in a silica pot and crystallisation to produce a monocrystalline material. The water emissions are roughly estimated. The process emissions to air are not known. Losses of non-recycled material due to block cutting are taken into account.

## Geography
Data for RER. The data are assumed to be representative of the global production.

## Technology
This dataset models the Czochralski process for the production of monocrystalline silicon blocks.
The following description of the production process is based on an older literature reference (Hagedorn & Hellriegel 1992) and has not been updated for this dataset.
The purified silicon and recycled silicon parts are broken down to a size of 0.1 to 7.5 cm. In an acid bath with nitric acid, hydrogen fluoride and acetic acid the surface is purified and SiO2 is removed. The following reactions take place:
3 Si + 4 HNO3 -> 3 SiO2 + 4 NO + 2 H2O
SiO2 + 6HF -> H2SiF6 + 2 H2O
The waste gases of the process (e.g. NOx, HF, acetic acid- and nitric acid) are treated in a gas cleaner before they are released. Information about possible releases is not available. Effluents are discharged directly and have been assessed with older literature data. Deionised water is used for cleaning and acetone is used for final drying. The cleaned silicon parts are melted in a crucible and a seed crystal is first dipped into the melt. Then the seed is slowly withdrawn vertically to the melt surface whereby the liquid crystallises at the seed. The pulling is done under argon inert gas stream. In order to reduce the argon consumption, a pressure of 5 to 50 mbar is required.
Reference:
Jungbluth N., Stucki M, and Frischknecht R. (2009) Photovoltaics. In Dones, R. (Ed.) et al., Sachbilanzen von Energiesystemen: Grundlagen für den ökologischen Vergleich von Energiesystemen und den Einbezug von Energiesystemen in Ökobilanzen für die Schweiz. ecoinvent report No. 6-XII, Swiss Centre for Life Cycle Inventories, Dübendorf, CH, 2009.
G. Hagedorn, „Kumulierter Energieaufwand von Photovoltaik- and Windkraftanlagen“, IfE-Schriftenreihe, Heft Nr. 25, 1. Auflage, TU München, Technischer Verlag Resch KG, 1992

## Time period
Most data are published in 2006. Some older data were published in 1992.

## Parameters
- fraction, cooling water, cooling pond system, to air: 0.032 dimensionless; name fraction_CW_CP_to_air; lognormal variance with pedigree 0.0413, pedigree (2,3,1,3,1)
  Calculated based on literature value (Scown, C.D., 2011, Water Footprint of U.S. Transportation Fuels and supplying information of the article) (Vionnet, S., Quantis Water Database - Technical Report, 2012).
- fraction, process water, to air: 0.15 dimensionless; name fraction_PW_to_air; lognormal variance with pedigree 0.092025, pedigree (4,4,3,2,4)
  Literature value. In case when no industry/process specific data are available, default evaporation fraction value is used. This value is 15% and is based on literature (Statistics Canada, 2007 & Shaffer, K.H., 2008, Consumptive water use in the Great Lakes Basin, USGS & Shiklomanov, 2003, World Water Resources at the Beginning of the 21st Century) and has been approved by an expert.
- fraction, cooling water, to air: 0.3875 dimensionless; name fraction_CW_to_air; = (0.5*fraction_CW_OT_to_air)+(0.5*fraction_CW_R_to_air); lognormal variance with pedigree 0.092025, pedigree (4,4,3,2,4)
  Calculated value based on literature value (see comments of the other parametres present in this dataset) and expert opinion. In the case when no industry/literature data are available about the type of cooling or directly fraction, cooling water, to air specific for the process a default assumption is applied. It is assumed that the once-through cooling system is used in 50% of all cases and recirculating system is used in another 50% of all cases.
- fraction, cooling water, once-through system, to air: 0.004 dimensionless; name fraction_CW_OT_to_air; lognormal variance with pedigree 0.0413, pedigree (2,3,1,3,1)
  (same comment as for fraction, cooling water, cooling pond system, to air)
- fraction, cooling water, recirculating system, to air: 0.771 dimensionless; name fraction_CW_R_to_air; lognormal variance with pedigree 0.0413, pedigree (2,3,1,3,1)
  (same comment as for fraction, cooling water, cooling pond system, to air)
- fraction, tap water, to air: 0.15 dimensionless; name fraction_TW_to_air; lognormal variance with pedigree 0.092025, pedigree (4,4,3,2,4)
  Calculated value. See comment in the other parametres present in this dataset. Tap water is considered to be always used as process water, thus process water fractions to air are applied to all tap water input flows to calculate the amount of water consumed in the processes.

## Reference product
- silicon, single crystal, Czochralski process, photovoltaics: 1 kg; name RP; By-product classification allocatable product; CPC 34: Basic chemicals; CAS 7440-21-3
  Monocrystalline silicon block is used in photovoltaics.
  References:
  Jungbluth N., Stucki M, and Frischknecht R. (2009) Photovoltaics. In Dones, R. (Ed.) et al., Sachbilanzen von Energiesystemen: Grundlagen für den ökologischen Vergleich von Energiesystemen und den Einbezug von Energiesystemen in Ökobilanzen für die Schweiz. ecoinvent report No. 6-XII, Swiss Centre for Life Cycle Inventories, Dübendorf, CH, 2009.
  production volume 1.08345e7 kg; name RP_PV
    From the global production volumes of 'silicon, single crystal, Czochralski process, electronics' given in Tab 5.14 (ecoinvent v2 report 6_XII), assuming same ratio between 'silicon, single crystal, Czochralski process, photovoltaics' and 'silicon, single crystal, Czochralski process, electronics' as in Europe.
  property price 39.279 EUR2005
    Calculated based on inputs: The price of the product has been calculated as a sum of the values of the material and energy inputs for this product. This value is therefore a rough estimation. It may underestimate the real price since there are additional expenses when producing any product. These expences can include for example labour costs, treatment of waste materials and profit for the producer. Please consider carefully whether this level of data quality is acceptable for your application.
  property carbon content, fossil 0
    The product is Czochralski singlecrystalline silicon (CZ-sc-Silicon). (ecoinvent v2.2 report 6_XII)
  property carbon content, non-fossil 0
    (same comment as for silicon, single crystal, Czochralski process, photovoltaics)
  property carbon content 0
    carbon content on a dry matter basis (reserved; not for manual entry)
  properties: water in wet mass 0 kg, dry mass 1 kg, water content 0, wet mass 1 kg, carbon allocation 0 kg

## Inputs from technosphere
- waste, from silicon wafer production, inorganic: -3.6364 kg; name BP_waste_from_silicon_wafer_production; lognormal variance with pedigree 0.054, pedigree (1,4,5,5,1)
  Literature value (Environmental report Wacker).
  Uncertainty: E
  production volume 3.93985e7 kg; = RP_PV*BP_waste_from_silicon_wafer_production/ABS(RP)
    Calculated from the production volume of silicon, single crystal, Czochralski process, photovoltaics in proportion to the respective output amounts.
  property price 0 EUR2005; name BP_waste_from_silicon_wafe_price_EUR2005
  properties: wet mass 1 kg, water content 0.103753, carbon content, fossil 0.0347572, dry mass 0.906 kg
- hydrogen fluoride: 0.050664 kg; lognormal variance with pedigree 0.074, pedigree (3,4,5,5,3)
  Literature value (Hagedorn, 1992), for etching
  Uncertainty: F
  properties: heating value, net 6.06 MJ, wet mass 1 kg, dry mass 1 kg
- tap water: 0 kg; name tap_water_input; pedigree (1,1,1,1,1)
  Literature value (Environmental report Wacker 2006)
  Uncertainty: E
  properties: dry mass 0.000337476 kg, wet mass 1 kg, water content 2962.17, carbon content, fossil 0.00178991
  note on carbon content, fossil: Bicarbonate content is 2.93 mol/m3. CO2 content is 0.1 mol/m3 (ecoinvent v2.2 report 8, Tab 93.1).
- electricity, medium voltage: 0 kWh; pedigree (1,1,1,1,1)
  Literature value (de Wild 2007)
  Uncertainty: d
- sodium hydroxide, without water, in 50% solution state: 0.041528 kg; lognormal variance with pedigree 0.074, pedigree (3,4,5,5,3)
  Literature value (Hagedom, 1992), waste gas neutralization
  Uncertainty: w
  properties: dry mass 1 kg, wet mass 1 kg, heating value, net 3.03 MJ
- heat, district or industrial, natural gas: 0 MJ; pedigree (1,1,1,1,1)
  Literature value (de Wild 2007)
  Uncertainty: d
  properties: heating value, net 1 MJ
- silicone factory: 1e-11 unit; lognormal variance with pedigree 0.3601, pedigree (1,2,5,5,3)
  Estimated value
  Uncertainty: E
- ceramic tile: 0.33645 kg; lognormal variance with pedigree 0.054, pedigree (1,4,5,5,1)
  Literature value (de Wild 2007), quartz crucible for melting the silicon
  Uncertainty: d
  properties: wet mass 1 kg, dry mass 1 kg
- silicon, solar grade: 0.914274 kg; = 1.07*0.854462; lognormal variance with pedigree 0.054, pedigree (1,4,5,5,1)
  Literature value (de Wild 2007). The ratio between silicon, electronics grade and silicon, solar grade is based on world production volumes (Jungbluth, 2007, ecoinvent v2 report no.6).
  Uncertainty: d
  properties: wet mass 1 kg, dry mass 1 kg
- argon, liquid: 5.7944 kg; lognormal variance with pedigree 0.054, pedigree (1,4,5,5,1)
  Literature value (de Wild 2007), protection gas for crystal growing
  Uncertainty: d
  properties: dry mass 1 kg, wet mass 1 kg
- silicon, electronics grade: 0.155728 kg; = 1.07*0.14554; lognormal variance with pedigree 0.054, pedigree (1,4,5,5,1)
  (same comment as for silicon, solar grade)
  property water in wet mass 0 kg; name WWM
  property water content 0; name water_content
  property dry mass 1 kg; name DM
  property carbon content, fossil 0; name C_content_fossil
  property carbon content, non-fossil 0; name C_content_non_fossil
  property wet mass 1 kg; name WM
- acetone, liquid: 0.049003 kg; lognormal variance with pedigree 0.074, pedigree (3,4,5,5,3)
  Literature value (Hagedorn, 1992), for etching
  Uncertainty: F
  properties: heating value, net 31.32 MJ, wet mass 1 kg, dry mass 1 kg, carbon content, fossil 0.62069
- nitric acid, without water, in 50% solution state: 0 kg; pedigree (1,1,1,1,1)
  Literature value (Hagedorn, 1992), for etching
  Uncertainty: F
  properties: dry mass 1 kg, wet mass 1 kg
- acetic acid, without water, in 98% solution state: 0.10797 kg; lognormal variance with pedigree 0.074, pedigree (3,4,5,5,3)
  Literature value (Hagedorn, 1992), for etching
  Uncertainty: F
  properties: wet mass 1 kg, carbon content, fossil 0.400016, heating value, net 14.6 MJ, dry mass 1 kg
  note on heating value, net: Based on literature, page 10, Althaus H.-J., Chudacoff M., Hischier R., Jungbluth N., Osses M. and Primas A. (2007) Life Cycle Inventories of Chemicals. Final report ecoinvent data v2.0 No. 8. EMPA, Swiss Centre for Life Cycle Inventories, Dübendorf, CH, Online-Version under: www.ecoinvent.org.
- lime, hydrated, packed: 0.19103 kg; lognormal variance with pedigree 0.074, pedigree (3,4,5,5,3)
  Literature value (Hagedorn, 1992), waste water treatment
  Uncertainty: w
  properties: dry mass 0.997 kg, wet mass 1 kg, water content 0.00300903
- tap water: 1.46434, 0.176267, 0.291311, 7.34571, 0.191097, 0.543572, 84.0607 kg (7 entries); lognormal variance with pedigree 0.054, pedigree (1,4,5,5,1)
  Literature value (Environmental report Wacker 2006)
  Uncertainty: E
- electricity, medium voltage: 1.079, 0.206907, 3.47353, 50.5194, 7.12073, 23.2004 kWh (6 entries); lognormal variance with pedigree 0.054, pedigree (1,4,5,5,1)
  Literature value (de Wild 2007)
  Uncertainty: d
- heat, district or industrial, natural gas: 0.931964, 60.4696 MJ (2 entries); lognormal variance with pedigree 0.054, pedigree (1,4,5,5,1)
  Literature value (de Wild 2007)
  Uncertainty: d
- nitric acid, without water, in 50% solution state: 0.0182409, 0.004451, 0.0110688, 0.0337949, 0.00530359, 0.0029956, 0.00443452, 0.0143947 kg (8 entries); lognormal variance with pedigree 0.074, pedigree (3,4,5,5,3)
  Literature value (Hagedorn, 1992), for etching
  Uncertainty: F

## Inputs from nature
- Water, cooling, unspecified natural origin [natural resource, in water]: 2.333 m3; name water_cooling_UNO_input; lognormal variance with pedigree 0.054, pedigree (1,4,5,5,1)
  Literature value (Environmental report Wacker 2006)
  Uncertainty: E
- Water, river [natural resource, in water]: 2.0508 m3; name water_river_input; lognormal variance with pedigree 0.054, pedigree (1,4,5,5,1)
  Literature value (Environmental report Wacker 2006)
  Uncertainty: E

## Emissions to nature
- Nitrogen [water, surface water]: 0.0091039 kg; lognormal variance with pedigree 0.096, pedigree (3,4,5,5,1)
  Literature value (Environmental report Wacker 2006), 50% of total emissions
  Uncertainty: E
- BOD5, Biological Oxygen Demand [water, unspecified]: 0.136907 kg; lognormal variance with pedigree 0.218, pedigree (4,5,5,5,5)
  Calculated value. The BOD, COD, TOC and BOD5 are calculated based on the amount and type of emissions released to water in the same activity.
- Hydroxide [water, surface water]: 0.0074169 kg; lognormal variance with pedigree 0.356, pedigree (3,4,5,5,1)
  Literature value (Hagedorn 1992), 50% reduction, basic uncertainty = 3
  Uncertainty: H
- Hydrocarbons, unspecified [water, surface water]: 0.022841 kg; lognormal variance with pedigree 0.356, pedigree (3,4,5,5,1)
  Literature value (Hagedorn 1992), 50% reduction, basic uncertainty = 3
  Uncertainty: H
- DOC, Dissolved Organic Carbon [water, unspecified]: 0.0398064 kg; lognormal variance with pedigree 0.218, pedigree (4,5,5,5,5)
  (same comment as for BOD5, Biological Oxygen Demand)
- Fluoride [water, surface water]: 0.0023713 kg; lognormal variance with pedigree 0.356, pedigree (3,4,5,5,1)
  Literature value (Hagedorn 1992), 50% reduction, basic uncertainty = 3
  Uncertainty: H
- TOC, Total Organic Carbon [water, unspecified]: 0.0398064 kg; lognormal variance with pedigree 0.218, pedigree (4,5,5,5,5)
  (same comment as for BOD5, Biological Oxygen Demand)
- Acetic acid [water, surface water]: 0.053987 kg; lognormal variance with pedigree 0.356, pedigree (3,4,5,5,1)
  Literature value (Hagedorn 1992), 50% emission, basic uncertainty = 3
  Uncertainty: H
- COD, Chemical Oxygen Demand [water, unspecified]: 0.136907 kg; lognormal variance with pedigree 0.218, pedigree (4,5,5,5,5)
  (same comment as for BOD5, Biological Oxygen Demand)
- Water [water, unspecified]: 3.2521 m3; = (tap_water_input/1000)*(1-fraction_TW_to_air)+water_cooling_UNO_input*(1-fraction_CW_to_air)+water_river_input*(1-fraction_PW_to_air); lognormal variance with pedigree 0.0827, pedigree (2,2,5,5,1)
  Calculated as a fraction of the input of water. For more details, refer to the mathematical relation and the parameters.
  property fraction, origin: fresh water 0.560604; name fraction_origin_fresh_water_Ww
  property fraction, origin: unspecified 0.439396; name fraction_origin_unspecified_Ww
  property fraction, origin: salt water 0; name fraction_origin_salt_water_Ww
- Water [air, unspecified]: 1.22577 m3; = (tap_water_input/1000*fraction_TW_to_air)+(water_cooling_UNO_input*fraction_CW_to_air)+(water_river_input*fraction_PW_to_air); lognormal variance with pedigree 0.0827, pedigree (2,2,5,5,1)
  (same comment as for Water)
  property fraction, origin: salt water 0; name fraction_origin_salt_water
  property fraction, origin: fresh water 0.262473; name fraction_origin_fresh_water
  property fraction, origin: unspecified 0.737527; name fraction_origin_unspecified

## Sampling procedure
Publication of plant-specific (partly aggregated) data and literature information.

## Extrapolations
This dataset has been copied from an original dataset covering the geography RER. The uncertainty has been adjusted accordingly.

## Review by Gregor Wernet 2017-08-04
This dataset was additionally reviewed in a separate review process by Eric Johnson of Atlantic Consulting as well as Emilia Moreno Ruiz and Gregor Wernet of ecoinvent.
