# softwood forestry, spruce, sustainable forest management

Dataset: EcoSpold 2, unit process
Geography: DE
Time period: 2010-01-01 to 2021-12-31
Technology level: current
Classification: ISIC rev.4 ecoinvent: 0220:Logging
Tags: combined production; combined production,; Swiss brush-up completed
Scenario: Business-as-Usual
System model: Allocation, cut-off by classification
Generated by: Frank Werner
Database: ecoinvent
isCopyrightProtected: true
accessRestrictedTo: 1

## General comment
This dataset covers the production and harvesting of 1 m3 of stemwood, spruce, solid, under bark, plus the relative share of enery wood from slash from sustainable forest management as the prevailing management practices in Germany.

For Germany forestry processes for the 4 main tree species are modelled:
• hardwood: beech
• hardwood: oak
• softwood: spruce
• softwood: pine
Table 1-1 lists the parameters of the inventoried tree species and their sources:

## Included activities start
The activity starts with site preparation assuming establishment of the forest via planting, including seedling production and covers all process related to forest management, including site preparation, planting, tending, young growth tending, clearing, thinnings and harvesting operations including the processing of wood fuel to chips, bundles and chopped wood (logs for energy) over one rotation period. It covers also the maintenance and construction of forest roads.

## Included activities end
This activity ends with the assortments at the forest road and includes eventual drying before transportation.

## Parameters
- wood density, dry: 430 kg/m3; name dry_wood_d; lognormal variance with pedigree 0.25, pedigree (1,1,1,1,1)
  kg oven-dry matter/dry volume; Oenorm B3012
- share of wood fuel of total wood harvest: 0.12 dimensionless; name share_wood_fuel; lognormal variance with pedigree 0.2506, pedigree (2,1,1,1,1)
  Share of wood fuel of total wood harvest (referring to volume below bark); share_sawlogs + share_pulpwood + share_wood_fuel = 100%; calculated based on Anonymous (2010): Statistisches Jahrbuch über Ernährung, Landwirtschaft und Forsten der Bundesrepublick Deutschland. 54. Jahrgang, Wirtschaftsverlag NW GmbH, Bremerhaven.
  Anonymous (2013): 19 Land- und Forstwirtschaft. In: Statistisches Jahrbuch 2012, Statistisches Bundesamt, Berlin, 471-500.
- rotation period: 100 year; name rotation_period; lognormal variance with pedigree 0.2506, pedigree (2,1,1,1,1)
  number of years from planting to final harvest. Source: Albrecht et al. 2009.
- productivity terrain chipper: 25 m3/PMH; name productivity_terrain_chipper; lognormal variance with pedigree 0.2506, pedigree (2,1,1,1,1)
  as m3 bulked/ productive machine hour; based on Cremer, T. and B. Velazques-Marti (2007): Evaluation of two harvesting systems for the supply of wood-chips in Norway spurce forest affected by bark beetle. Croation Journal of Forest Engineering, 28(2): 145-155; referring to Lechner et al 2007
- share of chips of total wood fuel: 0.23 dimensionless; name share_chips; lognormal variance with pedigree 0.2506, pedigree (2,1,1,1,1)
  Share of chips of total wood fuel harvested (referring consistently to volume under bark or volume over bark for all types of wood fuel)share_bundles + share_chopped_wood+share_chips = 100% wood fuel; calculated based onAnonymous (2010): Statistisches Jahrbuch über Ernährung, Landwirtschaft und Forsten der Bundesrepublick Deutschland. 54. Jahrgang, Wirtschaftsverlag NW GmbH, Bremerhaven.
  Anonymous (2013): 19 Land- und Forstwirtschaft. In: Statistisches Jahrbuch 2012, Statistisches Bundesamt, Berlin, 471-500.
- harvesting with forestry harvester: 0.0166 year; name harvesting; lognormal variance with pedigree 0.2506, pedigree (2,1,1,1,1)
  referring to stemwood; IMPORTANT NOTE: When considering several harvesting systems, e.g. in datasets on national forestry, this parameter is NOT the inverse productivity of the harvesting system but the inverse productivity of the system weighted with the share of the amount harvested by the respective system. This has to be calculated outside EcoEditor. Own calculations based on Klvac, R. and A. Skoupy (2009): Characteristic fuel consumption and exhaust emissions in fully mechanized logging operations. Journal of Forest Research, 14(6): 328-334: referring to Freitas 2004; Skogforsk (2006): Fuel consumption in forestry continues to fall. Results from Skogforsk, Skogforsk, Uppsala; Berg, S. and T. Karjalainen (2003): Comparison of greenhouse gas emissions from forest operations in Finand and Sweden. Forestry, 76(3): 271-284.
- ratio bulk density / solid density of chips: 2.8 dimensionless; name ratio_bulk_solid_chips; lognormal variance with pedigree 0.2506, pedigree (2,1,1,1,1)
  as m3 bulked / m3 solid
- forwarding with forwarder per m3: 0.0222 PMH/m3; name forwarding_forwarder; lognormal variance with pedigree 0.2506, pedigree (2,1,1,1,1)
  (same comment as for harvesting with forestry harvester)
- moisture content sawlogs and veneer logs: 0.7 dimensionless; name moisture_sawlogs; lognormal variance with pedigree 0.2506, pedigree (2,1,1,1,1)
  kg water/kg dry mass. Schweinle, J. and C. Thoroe (2001): Vergleichende Ökobilanzierung der Rohholzproduktion in verschiedenen Forstbetrieben. Mitteilungen der Bundesforschungsanstalt für Forst- und Holzwirtschaft Nr. 204, Kommissionsverlag Max Wiedebusch, Hamburg.
- share of chips processed in stand (from above-ground biomass): 0.02 dimensionless; name share_chips_in_stand; lognormal variance with pedigree 0.252, pedigree (3,1,1,1,1)
  Share of chips processed in the stand of total amount of chips processed in the fores; share_chips_at _forest_road+share_chips_in_stand = 100% chips from forestry;calculated based on Anonymous (2010): Statistisches Jahrbuch über Ernährung, Landwirtschaft und Forsten der Bundesrepublick Deutschland. 54. Jahrgang, Wirtschaftsverlag NW GmbH, Bremerhaven.
  Anonymous (2013): 19 Land- und Forstwirtschaft. In: Statistisches Jahrbuch 2012, Statistisches Bundesamt, Berlin, 471-500.
- yield wood over rotation period: 977 m3; name yield_wood_ub; lognormal variance with pedigree 0.2506, pedigree (2,1,1,1,1)
  yield of wood under bark per ha over one rotation period
- share of chips processed at forest road (from above-ground biomass): 0.98 dimensionless; name share_chips_at_forest_road; lognormal variance with pedigree 0.252, pedigree (3,1,1,1,1)
  Share of chips processed at forest road of total amount of chips processed in the forest; share_chips_at _forest_road+share_chips_in_stand = 100% chips from forestry; calculated based on Anonymous (2010): Statistisches Jahrbuch über Ernährung, Landwirtschaft und Forsten der Bundesrepublick Deutschland. 54. Jahrgang, Wirtschaftsverlag NW GmbH, Bremerhaven.
  Anonymous (2013): 19 Land- und Forstwirtschaft. In: Statistisches Jahrbuch 2012, Statistisches Bundesamt, Berlin, 471-500.
- share of sawlogs and veneer logs of total wood harvest: 0.71 dimensionless; name share_sawlogs; lognormal variance with pedigree 0.2506, pedigree (2,1,1,1,1)
  Share of sawlogs and veneer logs of total wood harvest (referring to volume below bark); share_sawlogs + share_pulpwood + share_wood_fuel = 100%; calculated based on Anonymous (2010): Statistisches Jahrbuch über Ernährung, Landwirtschaft und Forsten der Bundesrepublick Deutschland. 54. Jahrgang, Wirtschaftsverlag NW GmbH, Bremerhaven.
  Anonymous (2013): 19 Land- und Forstwirtschaft. In: Statistisches Jahrbuch 2012, Statistisches Bundesamt, Berlin, 471-500.
- sum of reference products in volume: 1 m3; name sum_RP_m3; lognormal variance with pedigree 0.005, pedigree (1,1,1,1,1)
  as solid under bark; DO NOT CHANGE; dataset might calculate misleading results
- productivity mobile chipper: 120 m3/PMH; name productivity_mobile_chipper; lognormal variance with pedigree 0.2506, pedigree (2,1,1,1,1)
  as m3 bulked/ productive machine hour
- area forest road: 216 m2/ha; name a_forest_road; = 54*4; lognormal variance with pedigree 0.2506, pedigree (2,1,1,1,1)
  Schweinle, J. and C. Thoroe (2001): Vergleichende Ökobilanzierung der Rohholzproduktion in verschiedenen Forstbetrieben. Mitteilungen der Bundesforschungsanstalt für Forst- und Holzwirtschaft Nr. 204, Kommissionsverlag Max Wiedebusch, Hamburg.
- Bark ratio: 0.12 dimensionless; name bark; lognormal variance with pedigree 0.025, pedigree (1,1,1,1,1)
  share of bark of total volume of trunk (solid wood + bark) for hardwood; U. Luginbühl, personal written communication, HIS
- share of cleft timber of total wood fuel: 0.77 dimensionless; name share_cleft_timber; lognormal variance with pedigree 0.2506, pedigree (2,1,1,1,1)
  Share of cleft timber as wood fuel of total wood fuel harvested (referring consistently to volume under bark or volume over bark for all types of wood fuel); share_bundles + share_cleft_timber+share_chips = 100% wood fuel; calculated based on Anonymous (2010): Statistisches Jahrbuch über Ernährung, Landwirtschaft und Forsten der Bundesrepublick Deutschland. 54. Jahrgang, Wirtschaftsverlag NW GmbH, Bremerhaven.
  Anonymous (2013): 19 Land- und Forstwirtschaft. In: Statistisches Jahrbuch 2012, Statistisches Bundesamt, Berlin, 471-500.
- periodicity of maintenance of forest roads: 10 year; name interval_road_maintenance; lognormal variance with pedigree 0.2506, pedigree (2,1,1,1,1)
  interval between two events of maintenance of forest roads
- power sawing without catalytic converter per m3: 0.445 PMH/m3; name power_sawing; lognormal variance with pedigree 0.2506, pedigree (2,1,1,1,1)
  referring to stemwod; IMPORTANT NOTE: When considering several harvesting systems, e.g. in datasets on national forestry, this parameter is NOT the inverse productivity of the harvesting system but the inverse productivity of the system weighted with the share of the amount harvested by the respective system. This has to be calculated outside EcoEditor. Own calculations based on Klvac, R. and A. Skoupy (2009): Characteristic fuel consumption and exhaust emissions in fully mechanized logging operations. Journal of Forest Research, 14(6): 328-334: referring to Freitas 2004; Skogforsk (2006): Fuel consumption in forestry continues to fall. Results from Skogforsk, Skogforsk, Uppsala; Berg, S. and T. Karjalainen (2003): Comparison of greenhouse gas emissions from forest operations in Finand and Sweden. Forestry, 76(3): 271-284.
- skidding with skidder per m3: 0.0741 PMH/m3; name skidding; lognormal variance with pedigree 0.2506, pedigree (2,1,1,1,1)
  referring to stemwood; IMPROTANT NOTE: When considering several harvesting systems, e.g. in datasets on national forestry, this parameter is NOT the productivity of the harvesting system but the productivity of the system weighted with the share of the amount harvested by the respective system. This has to be calculated outside EcoEditor. Own calculations based on Klvac & Skoupy 2009, Skogforsk 2006, Berg & Karjalainen 2003
- thickness of new gravel layer: 0.02 m; name thickness_new_gravel; lognormal variance with pedigree 0.252, pedigree (3,1,1,1,1)
  thickness of layer of gravel that is added during a maintenance operation of forest roads
- moisture content cleft timber: 0.35 dimensionless; name moisture_cleft_timber; lognormal variance with pedigree 0.2506, pedigree (2,1,1,1,1)
  kg water/kg dry mass.
- bulk density gravel: 1600 kg/m3; name d_gravel; lognormal variance with pedigree 0.2506, pedigree (2,1,1,1,1)
  kg gravel / m3 bulked material
- moisture content pulpwood: 0.8 dimensionless; name moisture_pulpwood; lognormal variance with pedigree 0.2506, pedigree (2,1,1,1,1)
  (same comment as for moisture content sawlogs and veneer logs)
- planting density: 3000 unit; name planting_density; lognormal variance with pedigree 0.2506, pedigree (2,1,1,1,1)
  number of trees per hectare
- area forest per m3 wood: 10.0143 m2/m3; name a_transformation_forest; = (10000-a_forest_road)/yield_wood_ub
  area of forest per ha divided by total harvest over one rotation period per hectare
- ratio bulk density / solid density of cleft timber: 1.4 dimensionless; name ratio_bulk_solid_cleft_timber; lognormal variance with pedigree 0.2506, pedigree (2,1,1,1,1)
  as m3 bulked / m3 solid
- productivity forwarding wood chips from terrain chipper: 70 m3/PMH; name productivity_forwarding_chips_in_stand; lognormal variance with pedigree 0.2506, pedigree (2,1,1,1,1)
  as m3 bulked/ productive machine hour
- share, revenues wood production: 1 dimensionless; name share_revenues_wood; lognormal variance with pedigree 0.252, pedigree (3,1,1,1,1)
  Used to determine the share of land used for the productive function of forestry covered in this dataset
- diesel consumption per kg of gravel used for maintenance of forest roads: 0.043 MJ/kg; name diesel_per_gravel; lognormal variance with pedigree 0.2506, pedigree (2,1,1,1,1)
  diesel consumption of building machines used to maintaine road and distribute new layer of gravel
- share of pulpwood of total wood harvest: 0.17 dimensionless; name share_pulpwood; lognormal variance with pedigree 0.2506, pedigree (2,1,1,1,1)
  Share of pulpwood of total wood harvest (referring to volume below bark); share_sawlogs + share_pulpwood + share_wood_fuel = 100%; calculated based on Anonymous (2010): Statistisches Jahrbuch über Ernährung, Landwirtschaft und Forsten der Bundesrepublick Deutschland. 54. Jahrgang, Wirtschaftsverlag NW GmbH, Bremerhaven.
  Anonymous (2013): 19 Land- und Forstwirtschaft. In: Statistisches Jahrbuch 2012, Statistisches Bundesamt, Berlin, 471-500.
- area forest road per m3 wood: 0.221085 m2/m3; name a_transformation_road; = a_forest_road/yield_wood_ub
  area of forest road per ha divided by total harvest over one rotation period per hectare
- moisture content wood chips: 0.8 dimensionless; name moisture_wood_chips; lognormal variance with pedigree 0.2506, pedigree (2,1,1,1,1)
  kg water/kg dry mass. Based on Schweinle, J. and C. Thoroe (2001): Vergleichende Ökobilanzierung der Rohholzproduktion in verschiedenen Forstbetrieben. Mitteilungen der Bundesforschungsanstalt für Forst- und Holzwirtschaft Nr. 204, Kommissionsverlag Max Wiedebusch, Hamburg.
- shrinkage ratio: 0.004 dimensionless; name shrinkage_ratio; lognormal variance with pedigree 0.25, pedigree (1,1,1,1,1)
  for wood: % of volume lost per % of humidity lowered; usually applicable for humidity u < 30%; as oak according to Kollmann 1982
- share of planted area: 1 dimensionless; name share_area_planted; lognormal variance with pedigree 0.2506, pedigree (2,1,1,1,1)
  Share of forest area that is planted instead of being restocked by natural regeneration
- productivity, clefting device: 5.26 m3/PMH; name productivity_clefting_device; lognormal variance with pedigree 0.2506, pedigree (2,1,1,1,1)
  as m3 bulked/ productive machine hour
- wood density, basic: 378.4 kg/m3; name basic_wood_d; = dry_wood_d*(1-30*shrinkage_ratio); lognormal variance with pedigree 0.2506, pedigree (2,1,1,1,1)
  kg oven-dry matter/wet volume
- area forest road in gravel: 216 m2/ha; name a_forest_road_gravel; = a_forest_road; lognormal variance with pedigree 0.2506, pedigree (2,1,1,1,1)
  assumed
- share of seedlings from heated greenhouses: 0 dimensionless; name seedlings_heated
  share of seedlings from heated greenhouses of total amount of seedlings used in replanting%; Albrecht, S., S. Rüter, J. Welling, M. Knauf, U. Mantau, A. Braune, M. Baitz, H. Weimar, S. Sörgel, J. Kreissig, J. Deimling and S. Hellwig (2009): ÖkoPot - Ökologische Potenziale durch Holznutzung gezielt fördern. Abschlussbericht zum BMBF-Projekt FKZ 0330545. Universität Stuttgart, Universität Hamburg, Hamburg.

## Reference product
- sawlog and veneer log, softwood, measured as solid wood under bark: 0 m3; name saw_veneer_logs; By-product classification allocatable product; CPC 031: Wood in the rough
  average composition of 1 m3 solid wood under bark, harvested in Germany; see general comment for details
  production volume 0 m3
    see general comments field
  property water in wet mass 301 kg; name wood_WWM_saw; = water_content_saw*wood_DM_saw
  property apparent wood density 643.28 kg/m3; name saw_veneer_logs_apparent_wood_d; = saw_veneer_logs_basic_wood_d*(1+moisture_sawlogs)
    wet mass/wet volume
  property price 80 EUR2005
    Expert judgement (Urs Luginbühl, Swiss Sawmilling industry, personal communication in June 2014). Cross-reference; Calculated as 90% of purchasers price based on: 2004 prices for World Import/Export data (USD/m3) from UN Commodity Trade Statistics Database (http://data.un.org/Data.aspx?d=ComTrade&f=_l1Code%3a45, [accessed 10th June 2010]) Commodity: 'Logs, poles, coniferous not treated or painted'.
  property dry wood density 430 kg/m3; name saw_veneer_logs_dry_wood_d; = dry_wood_d
    kg dry matter/ dry volume
  property heating value, net 4103.64 MJ; name saw_veneer_logs_Net_Heat_Value; = (saw_veneer_logs_Gross_Heat_Value-1.32-(20*moisture_sawlogs/(1+moisture_sawlogs)))*saw_veneer_logs_basic_wood_d
    net (lower) heating (calorific) value. The property is based on a value of 10.845 MJ/kg
  property basic wood density 378.4; name saw_veneer_logs_basic_wood_d; = dry_wood_d*(1-30*shrinkage_ratio)
    dry mass/wet volume
  property dry mass 430 kg; name wood_DM_saw
  property wet mass 731 kg; name saw_veneer_logs_WM; = wood_DM_saw+wood_WWM_saw
  property heating value, gross 20.4 MJ; name saw_veneer_logs_Gross_Heat_Value
    gross (upper) heating (calorific) value
  property carbon content, non-fossil 0.494; name saw_veneer_logs_C_content_non_fossil
  property water content 0.7; name water_content_saw; = moisture_sawlogs
  property carbon content 0.494
    carbon content on a dry matter basis (reserved; not for manual entry)
  properties: carbon content, fossil 0, carbon allocation 212.42 kg
- pulpwood, softwood, measured as solid wood under bark: 0 m3; name pulpwood; By-product classification allocatable product; CPC 031: Wood in the rough
  (same comment as for sawlog and veneer log, softwood, measured as solid wood under bark)
  production volume 0 m3
    see general comments field
  property water in wet mass 344 kg; name wood_WWM_pulp; = water_content_pulp*wood_DM_pulp
  property heating value, net 3856.32 MJ; name pulpwood_Net_Heat_Value; = (pulpwood_Gross_Heat_Value-1.32-(20*moisture_pulpwood/(1+moisture_pulpwood)))*pulpwood_basic_wood_d
    net (lower) heating (calorific) value; referring to 1 m3 solid wood as the reference flow, excluding bark. The property is based on a value of 10.191 MJ/kg
  property basic wood density 378.4; name pulpwood_basic_wood_d; = dry_wood_d*(1-30*shrinkage_ratio)
    dry mass/wet volume
  property price 168 EUR2005
    Temporary price data. Calculated as 90% of purchasers price based on: 2004 prices for World Import/Export (USD/kg) from FaoStat (http://faostat.fao.org/site/626/default.aspx#ancor, [accessed 14th June 2010]) Commodity: 'Wood Pulp +'. A density of 450 kg/m3 was assumed.
  property water content 0.8; name water_content_pulp; = moisture_pulpwood
  property dry wood density 430 kg/m3; name pulpwood_dry_wood_d; = dry_wood_d
    kg dry matter/ dry volume
  property heating value, gross 20.4 MJ; name pulpwood_Gross_Heat_Value
    gross (upper) heating (calorific) value; referring to 1 m3 solid wood as the reference flow, excluding bark
  property wet mass 774 kg; name pulpwood_WM; = wood_DM_pulp+wood_WWM_pulp
  property apparent wood density 681.12 kg/m3; name pulpwood_apparent_wood_d; = pulpwood_basic_wood_d*(1+moisture_pulpwood)
    wet mass/wet volume
  property carbon content, non-fossil 0.494; name pulpwood_C_content_non_fossil
  property dry mass 430 kg; name wood_DM_pulp
  property carbon content 0.494
    carbon content on a dry matter basis (reserved; not for manual entry)
  properties: carbon content, fossil 0, carbon allocation 212.42 kg
- cleft timber, measured as dry mass: 0 kg; name cleft_timber; CPC 031: Wood in the rough; By-product classification allocatable product
  Average composition of 1 m3 solid wood under bark, harvested in Germany; see general comment for details; calculated as the share of wood fuel from the total amount of wood harvested, of which a share is cleft timber, converted from wet volume to dry matter via basic wood density, including the percentage of bark (as share of wood fuel relates to 1 m3 under bark)
  production volume 0 kg
    see general comments field
  property dry mass 1 kg; name cleft_timber_DM
  property heating value, net 13.8948 MJ; name cleft_timber_Net_Heat_Value; = cleft_timber_Gross_Heat_Value-1.32-(20*moisture_cleft_timber/(1+moisture_cleft_timber))
    net (lower) heating (calorific) value
  property dry wood density 430 kg/m3; name cleft_timber_dry_wood_d; = dry_wood_d
    kg dry matter/ dry volume
  property carbon content, non-fossil 0.494; name cleft_timber_C_content_non_fossil
    biogene carbon content on a dry matter basis
  property wet mass 1.35 kg; name cleft_timber_WM; = 1+moisture_cleft_timber
  property price 0.073 EUR2005
    Calculated based on data from FAOSTAT (accessed 20140429). The price is calculated by using data on total world import quantity (m3) and import value (1000 USD), year 2005. 3411751 m3 of Wood Fuel Trd was imported in the world in 2005. The import value was 161229000 USD. The calculated price is thus (161229000/3411751=47.3*0.8=) 38.1 Euro/m3. The density of cleft timber, measured as dry mass is 541.2 kg/m3. The recalculated price is (1/541.2*38.1=) 0.07 Euro/kg. Using the same approach the calculated price for 2010 was 0.112 Euro/kg.
  property water content 0.35; name cleft_timber_water_content; = moisture_cleft_timber
  property heating value, gross 20.4 MJ; name cleft_timber_Gross_Heat_Value
    gross (upper) heating (calorific) value
  property basic wood density 378.4; name cleft_timber_basic_wood_d; = dry_wood_d*(1-30*shrinkage_ratio)
    dry mass/wet volume
  property water in wet mass 0.35 kg; name cleft_timber_WWM; = cleft_timber_WM-cleft_timber_DM
  property apparent wood density 510.84 kg/m3; name cleft_timber_apparent_wood_d; = cleft_timber_basic_wood_d*(1+moisture_cleft_timber)
    wet mass/wet volume
  property carbon content 0.494
    carbon content on a dry matter basis (reserved; not for manual entry)
  properties: basic density 0 kg/m3, carbon content, fossil 0, carbon allocation 0.494 kg
- wood chips, wet, measured as dry mass: 1 kg; name wood_chips; = share_wood_fuel*basic_wood_d/(1-bark)*share_chips; By-product classification allocatable product; CPC 31230: Wood in chips or particles
  Average composition of 1 m3 solid wood under bark, harvested in Germany; see general comment for details; calculated as the share of wood fuel from the total amount of wood harvested, of which a share is chips, converted from wet volume to dry matter via basic wood density, including the percentage of bark (as share of wood fuel relates to 1 m3 under bark)
  production volume 3.311e8 kg
    see general comments field
  property price 0.107 EUR2005
    Expert judgement (Urs Luginbühl, Swiss Sawmilling industry, personal communication in June 2014). Wood chips from softwood should have a price of 0.101 EUR/kg. Woodchips from hardwood should have a price of 0.112 EUR/kg. Average of these two values is used. Cross-reference; FAOSTAT database; http://faostat.fao.org/site/626/DesktopDefault.aspx?PageID=626#ancor; Average import/export prices of EU for 'chips and particles'. Price: 48.76 Euro/m3. The density of the wood chips is 650 kg/m3. The price is recalculated accordingly.
  property wet mass 1.8 kg; name wood_chips_WM; = wood_chips_DM*(1+moisture_wood_chips)
  property apparent wood density 681.12 kg/m3; name wood_chips_apparent_wood_d; = wood_chips_basic_wood_d*(1+moisture_wood_chips)
    wet mass/wet volume
  property dry mass 1 kg; name wood_chips_DM
  property water in wet mass 0.8 kg; = wood_chips_WM-wood_chips_DM
  property heating value, gross 20.4 MJ; name wood_chips_Gross_Heat_Value
    gross (upper) heating (calorific) value
  property basic wood density 378.4; name wood_chips_basic_wood_d; = dry_wood_d*(1-30*shrinkage_ratio)
    dry mass/wet volume
  property carbon content, non-fossil 0.494; name chips_C_content_non_fossil
  property dry wood density 430 kg/m3; name wood_chips_dry_wood_d; = dry_wood_d
    kg dry matter/ dry volume
  property water content 0.8; = moisture_wood_chips
  property heating value, net 10.1911 MJ; name wood_chips_Net_Heat_Value; = wood_chips_Gross_Heat_Value-1.32-(20*moisture_wood_chips/(1+moisture_wood_chips))
    net (lower) heating (calorific) value
  property carbon content 0.494
    carbon content on a dry matter basis (reserved; not for manual entry)
  properties: carbon content, fossil 0, carbon allocation 0.494 kg

## Inputs from technosphere
- forwarding, forwarder: 5.24212e-5 hour; = saw_veneer_logs*forwarding_forwarder/sum_RP_m3+pulpwood*forwarding_forwarder/sum_RP_m3+wood_chips*share_chips_at_forest_road*(1-bark)/basic_wood_d*forwarding_forwarder/sum_RP_m3+cleft_timber*(1-bark)/ cleft_timber_basic_wood_d*forwarding_forwarder/sum_RP_m3+wood_chips*share_chips_in_stand/basic_wood_d/(productivity_forwarding_chips_in_stand/ ratio_bulk_solid_chips)/11*9.5/sum_RP_m3; lognormal variance with pedigree 0.0336, pedigree (2,1,4,1,1)
  average input per m3; see general comment for details; covers the forwarding of stemwood PLUS the forwarding of chips chipped in the stand
- diesel, burned in building machine: 0.0204269 MJ; = saw_veneer_logs*(diesel_per_gravel*84.088)/sum_RP_m3+pulpwood*(diesel_per_gravel*84.088)/sum_RP_m3+wood_chips*(1-bark)/basic_wood_d*(diesel_per_gravel*84.088)/sum_RP_m3+cleft_timber*(1-bark)/cleft_timber_basic_wood_d*(diesel_per_gravel*84.088)/sum_RP_m3+saw_veneer_logs*(0+3.6496)*1000/yield_wood_ub/500*7*0.84*42.6/sum_RP_m3+pulpwood*(0+3.6496)*1000/yield_wood_ub/500*7*0.84*42.6/sum_RP_m3+wood_chips*(1-bark)/basic_wood_d*(0+3.6496)*1000/yield_wood_ub/500*7*0.84*42.6/sum_RP_m3+cleft_timber*(1-bark)/ cleft_timber_basic_wood_d*(0+3.6496)*1000/yield_wood_ub/500*7*0.84*42.6/sum_RP_m3+saw_veneer_logs*1*15*6*0.84*42.6/yield_wood_ub/sum_RP_m3+pulpwood*1*15*6*0.84*42.6/yield_wood_ub/sum_RP_m3+wood_chips*(1-bark)/basic_wood_d*1*15*6*0.84*42.6/yield_wood_ub/sum_RP_m3+cleft_timber*(1-bark)/ cleft_timber_basic_wood_d*1*15*6*0.84*42.6/yield_wood_ub/sum_RP_m3; lognormal variance with pedigree 0.0336, pedigree (2,1,4,1,1)
  for distribution of gravel for maintenance of forest road over rotation period PLUS diesel for planting activities, productivity 500 seedlings/PMH, diesel consumption 7l/PMH, converted to MJ PLUS the diesel consumption used in mechanical clearing (1 intervention, 15 PMH per ha, 6 l/PMH, converted to MJ); for the amounts of gravel and tree seedlngs from heated/unheated greenhouses, see values of respective exchanges
  properties: UVEK_link_1 732, UVEK_relative_amount_1 1, heating value, net 1 MJ
  note on UVEK_link_1: to be used only in special submissions in coordination with ecoinvent and the Swiss FOEN
- tree seedling, for planting: 0 unit; = saw_veneer_logs*(share_area_planted*planting_density*seedlings_heated/yield_wood_ub)/sum_RP_m3+pulpwood*(share_area_planted*planting_density*seedlings_heated/yield_wood_ub)/sum_RP_m3+wood_chips*(1-bark)/basic_wood_d*(share_area_planted*planting_density*seedlings_heated/yield_wood_ub)/sum_RP_m3+cleft_timber*(1-bark)/ cleft_timber_basic_wood_d*(share_area_planted*planting_density*seedlings_heated/yield_wood_ub)/sum_RP_m3
  calculated as 0% of the seedlings coming from heated greenhouses in Germany
  properties: water content 0.5, dry mass 0.2 kg, wet mass 0.3 kg, carbon content, non-fossil 0.494
- skidding, skidder: 0.000168879 hour; = saw_veneer_logs*skidding/sum_RP_m3+pulpwood*skidding/sum_RP_m3+wood_chips*share_chips_at_forest_road*(1-bark)/basic_wood_d*skidding/sum_RP_m3+cleft_timber*(1-bark)/ cleft_timber_basic_wood_d*skidding/sum_RP_m3; lognormal variance with pedigree 0.0336, pedigree (2,1,4,1,1)
  average input per m3; see general comment for details
- wood chipping, forwarder with terrain chipper, in forest: 5.91966e-6 hour; name chipping_terrain; = wood_chips*share_chips_in_stand/basic_wood_d*ratio_bulk_solid_chips/productivity_terrain_chipper; lognormal variance with pedigree 0.0336, pedigree (2,1,4,1,1)
  no comment
- power sawing, without catalytic converter: 0.00110391 hour; = saw_veneer_logs*power_sawing/sum_RP_m3+pulpwood*power_sawing/sum_RP_m3+wood_chips*(1-bark)/basic_wood_d*power_sawing/sum_RP_m3+ cleft_timber*(1-bark)/cleft_timber_basic_wood_d*power_sawing/sum_RP_m3+saw_veneer_logs*(1*14+0*15+1*15)/yield_wood_ub/sum_RP_m3+pulpwood*(1*14+0*15+1*15)/yield_wood_ub/sum_RP_m3+wood_chips*(1-bark)/basic_wood_d*(1*14+0*15+1*15)/yield_wood_ub/sum_RP_m3+ cleft_timber*(1-bark)/cleft_timber_basic_wood_d*(1*14+0*15+1*15)/yield_wood_ub/sum_RP_m3; lognormal variance with pedigree 0.0336, pedigree (2,1,4,1,1)
  average input per m3 covering hand-held gasoline-driven equipment used for site preparation, tending and pruning (attributing per ha values to total amount of wood harvested) as well as the amount of power sawing per harvested m3 of stemwood; see general comment for details
- gravel, crushed: 0.164528 kg; = saw_veneer_logs*(thickness_new_gravel*a_forest_road_gravel*d_gravel*rotation_period/interval_road_maintenance/yield_wood_ub)/sum_RP_m3+pulpwood*(thickness_new_gravel*a_forest_road_gravel*d_gravel*rotation_period/interval_road_maintenance/yield_wood_ub)/sum_RP_m3+wood_chips*(1-bark)/basic_wood_d*(thickness_new_gravel*a_forest_road_gravel*d_gravel*rotation_period/interval_road_maintenance/yield_wood_ub)/sum_RP_m3+cleft_timber*(1-bark)/ cleft_timber_basic_wood_d*(thickness_new_gravel*a_forest_road_gravel*d_gravel*rotation_period/interval_road_maintenance/yield_wood_ub)/sum_RP_m3; lognormal variance with pedigree 0.0336, pedigree (2,1,4,1,1)
  gravel for maintenance of forest road over rotation period; amount of gravel, see value of respective exchange
  properties: dry mass 1 kg, UVEK_relative_amount_1 1, wet mass 1 kg, UVEK_link_1 2312
- tree seedling, for planting: 0.00714099 unit; = saw_veneer_logs*(share_area_planted*planting_density*(1-seedlings_heated)/yield_wood_ub)/sum_RP_m3+pulpwood*(share_area_planted*planting_density*(1-seedlings_heated)/yield_wood_ub)/sum_RP_m3+wood_chips*(1-bark)/basic_wood_d*(share_area_planted*planting_density*(1-seedlings_heated)/yield_wood_ub)/sum_RP_m3+cleft_timber*(1-bark)/ cleft_timber_basic_wood_d*(share_area_planted*planting_density*(1-seedlings_heated)/yield_wood_ub)/sum_RP_m3; lognormal variance with pedigree 0.035, pedigree (3,1,4,1,1)
  calculated as 100% of the seedlings coming from unheated greenhouses in Germany
  properties: wet mass 0.3 kg, water content 0.5, carbon content, non-fossil 0.494, dry mass 0.2 kg
- harvesting, forestry harvester: 3.86047e-5 hour; = saw_veneer_logs*harvesting/sum_RP_m3+pulpwood*harvesting/sum_RP_m3+wood_chips*(1-bark)/basic_wood_d*harvesting/sum_RP_m3+cleft_timber*(1-bark)/ cleft_timber_basic_wood_d*harvesting/sum_RP_m3; lognormal variance with pedigree 0.0336, pedigree (2,1,4,1,1)
  average input per m3; see general comment for details
- wood chipping, chipper, mobile, diesel, at forest road: 6.04299e-5 hour; name chipping_mobile; = wood_chips*share_chips_at_forest_road/basic_wood_d*ratio_bulk_solid_chips/productivity_mobile_chipper; lognormal variance with pedigree 0.0336, pedigree (2,1,4,1,1)
  no comment
- clefting of energy wood: 0 hour; name clefting; = cleft_timber/cleft_timber_basic_wood_d* ratio_bulk_solid_cleft_timber/productivity_clefting_device; pedigree (1,1,1,1,1)
  no comment

## Inputs from nature
- Occupation, forest, intensive [natural resource, land]: 2.32891 m2*year; = saw_veneer_logs*(a_transformation_forest*rotation_period)/sum_RP_m3+pulpwood*(a_transformation_forest*rotation_period)/sum_RP_m3+wood_chips*(1-bark)/basic_wood_d*(a_transformation_forest*rotation_period)/sum_RP_m3+cleft_timber*(1-bark)/ cleft_timber_basic_wood_d*(a_transformation_forest*rotation_period)/sum_RP_m3; lognormal variance with pedigree 0.208, pedigree (1,1,4,1,1)
  Area occupied for the production of wood over one rotation period
- Energy, gross calorific value, in biomass [natural resource, biotic]: 20.4 MJ; = saw_veneer_logs/(1-bark)*saw_veneer_logs_basic_wood_d*saw_veneer_logs_Gross_Heat_Value/sum_RP_m3+pulpwood/(1-bark)*pulpwood_basic_wood_d*pulpwood_Gross_Heat_Value/sum_RP_m3+wood_chips*wood_chips_Gross_Heat_Value/sum_RP_m3+cleft_timber*cleft_timber_Gross_Heat_Value/sum_RP_m3
  Energy content of wood
- Transformation, from traffic area, rail/road embankment [natural resource, land]: 0.000514151 m2; = saw_veneer_logs*a_forest_road/yield_wood_ub/sum_RP_m3+pulpwood*a_forest_road/yield_wood_ub/sum_RP_m3+wood_chips*(1-bark)/basic_wood_d*a_forest_road/yield_wood_ub/sum_RP_m3+cleft_timber*(1-bark)/ cleft_timber_basic_wood_d*a_forest_road/yield_wood_ub/sum_RP_m3; lognormal variance with pedigree 0.358, pedigree (1,1,4,1,1)
  Area of forest roads per ha
- Transformation, to forest, intensive [natural resource, land]: 0.0232891 m2; = saw_veneer_logs*a_transformation_forest/sum_RP_m3+pulpwood*a_transformation_forest/sum_RP_m3+wood_chips*(1-bark)/basic_wood_d*a_transformation_forest/sum_RP_m3+cleft_timber*(1-bark)/ cleft_timber_basic_wood_d*a_transformation_forest/sum_RP_m3; lognormal variance with pedigree 0.358, pedigree (1,1,4,1,1)
  no comment
- Occupation, traffic area, rail/road embankment [natural resource, land]: 0.0514151 m2*year; = saw_veneer_logs*a_transformation_road*rotation_period/sum_RP_m3+pulpwood*a_transformation_road*rotation_period/sum_RP_m3+wood_chips*(1-bark)/basic_wood_d*a_transformation_road*rotation_period/sum_RP_m3+cleft_timber*(1-bark)/ cleft_timber_basic_wood_d*a_transformation_road*rotation_period/sum_RP_m3; lognormal variance with pedigree 0.208, pedigree (1,1,4,1,1)
  Area occupied by forest roads over one roation period
- Transformation, to traffic area, rail/road embankment [natural resource, land]: 0.000514151 m2; = saw_veneer_logs*a_forest_road/yield_wood_ub/sum_RP_m3+pulpwood*a_forest_road/yield_wood_ub/sum_RP_m3+wood_chips*(1-bark)/basic_wood_d*a_forest_road/yield_wood_ub/sum_RP_m3+cleft_timber*(1-bark)/ cleft_timber_basic_wood_d*a_forest_road/yield_wood_ub/sum_RP_m3; lognormal variance with pedigree 0.358, pedigree (1,1,4,1,1)
  no comment
- Wood, soft, standing [natural resource, biotic]: 0.00232558 m3; name v_wood_standing; = saw_veneer_logs/sum_RP_m3+pulpwood/sum_RP_m3+wood_chips*(1-bark)/basic_wood_d/sum_RP_m3+cleft_timber*(1-bark)/ cleft_timber_basic_wood_d/sum_RP_m3; lognormal variance with pedigree 0.033, pedigree (1,1,4,1,1)
  Resource input, referring to wood under bark
- Transformation, from forest, intensive [natural resource, land]: 0.0232891 m2; = saw_veneer_logs*a_transformation_forest/sum_RP_m3+pulpwood*a_transformation_forest/sum_RP_m3+wood_chips*(1-bark)/basic_wood_d*a_transformation_forest/sum_RP_m3+cleft_timber*(1-bark)/ cleft_timber_basic_wood_d*a_transformation_forest/sum_RP_m3; lognormal variance with pedigree 0.358, pedigree (1,1,4,1,1)
  Area of forest, excluding forest roads per ha
- Carbon dioxide, in air [natural resource, in air]: 1.81133 kg; = saw_veneer_logs/(1-bark)*basic_wood_d* saw_veneer_logs_C_content_non_fossil/12*44/sum_RP_m3+pulpwood/(1-bark)*basic_wood_d* pulpwood_C_content_non_fossil/12*44/sum_RP_m3+wood_chips* chips_C_content_non_fossil/12*44/sum_RP_m3+cleft_timber* cleft_timber_C_content_non_fossil/12*44/sum_RP_m3; lognormal variance with pedigree 0.033, pedigree (1,1,4,1,1)
  Resource input, referring to total biomass harvested, i.e. wood including bark

## Sampling procedure
Literature

## Extrapolations
see Geography and Technology
