# cleaning consumables, without water, in 13.6% solution state

Dataset: EcoSpold 2, unit process
Geography: GLO
Time period: 2011-01-01 to 2021-12-31
Technology level: current
Classification: ISIC rev.4 ecoinvent: 2023:Manufacture of soap and detergents, cleaning and polishing preparations, pe
Synonyms: cleaning product; cleaning agent
Scenario: Business-as-Usual
System model: Allocation, cut-off by classification
Generated by: Luíza Santana Franca
Published in: Laura Golsteijn 2015
Database: ecoinvent
isCopyrightProtected: true
accessRestrictedTo: 1

## General comment
This activity aims at representing the production of an average kg (expressed as 100% active substance) of cleaning product. To do so, the life cycle inventory data of five product categories retrieved from Golsteijn et al (2015) have been averaged. The products are manual dishwashing detergents, window glass trigger spray cleaners, bathroom trigger spray cleaners, acid toilet cleaners and bleach toilet cleaners. The major active component in manual dishwashing detergents is a surfactant mix, which contributes to food residue removal. Other components of detergents may include solubility enhancers, preservatives, perfumes, dyes and opacifiers. On average cleaning products contain 86% of water. Based on the literature source Golsteijn (2015) the dataset used to represent the water flow is "water, completely softened, from decarbonised water at user". The values for heat, electricity, water and infrastructure are based on ecoinvent chemicals model. The model is calculated based on literature data published by the industry. This value is a 5-year average of data (2011 - 2015) published by the Gendorf factory (Gendorf, 2016, Umwelterklärung, www.gendorf.de), (Gendorf, 2015, Umwelterklärung, www.gendorf.de), (Gendorf, 2014, Umwelterklärung, www.gendorf.de).

## Included activities start
The activity starts at the reception of materials and it includes water and energy for heating the water.

## Included activities end
The activity ends with the production of 1 kg of cleaning product (100% active substance). This product should be used together with the appropriate input of water. Based on Golsteijn (2015), on average cleaning products contain 86% of water. The flow "water, completely softened, from decarbonised water at user" is recommended.

## Geography
The LCI study was developed by A.I.S.E., the International Association for Soaps, Detergents and Maintenance Products. The study refers to the European geography, it is here considered that it is valid as a GLO average.

## Technology
The start date was sent to the year of publishing of the source of reference (Golsteijn et al, 2015). The data is considered to be still valid for the year of 2013.

## Time period
The start date was sent to the year of publishing of the source of reference (Golsteijn et al, 2015). The data is considered to be still valid for the year of 2018.

## Reference product
- cleaning consumables, without water, in 13.6% solution state: 1 kg; name clean; CPC 353: Soap, cleaning preparations, perfumes and toilet preparations; By-product classification allocatable product
  production volume 1.19427e10 kg; name RP_PV_1; = (820000000/0.2892)*32.4*0.13
    Calculated value. The global production volume is extrapolated from the European production volume using the global nominal GDP of 2010 (source: United Nations, http://data.un.org/Glossary.aspx?q=GDP+%28current+US%24%29, accessed 20180115). The annual production value of Europe in 2013 is 820.000.000 units (Golsteijn et al, 2015). This value is divided by the European share of global nominal GDP, 28.92%, considering the medium volume of 32.4 ml for each product unit and an average concentration of 13w/v%.
  property wet mass 1 kg; name clean_WM
  property carbon content, fossil 0.203707; name clean_C_content_fossil
    fossil carbon content on a dry matter basis
  property heating value, net 12.22 MJ
    LHV is calculated based on the Carbon content of the product. More details can be found on the respective documentation.
  property price 2 EUR2005; name clean_price_EUR2005
    Estimated value. The price is taken from the online shop of Casa Henkel, company producing a number of products for hosehold cleaning (source retrieved from: http://www.casahenkel.it/, accessed 13Feb 2018). The price range varies greatly according to the size and the type of product. An average price of 2 euros per kg of product is assumed.
  property water content 0; name clean_water_content
  property carbon content, non-fossil 0.199531; name clean_C_content_non_fossil
    biogene carbon content on a dry matter basis
  property water in wet mass 0 kg; name clean_WWM
  property dry mass 1 kg; name clean_DM
  property carbon content 0.403238
    carbon content on a dry matter basis (reserved; not for manual entry)
  properties: carbon allocation 0.403238 kg

## Inputs from technosphere
- heat, from steam, in chemical industry: 0 MJ; pedigree (1,1,1,1,1)
  Calculated based on literature data published by the industry. This value is a 5-year average of data (2011 - 2015) published by the Gendorf factory (Gendorf, 2016, Umwelterklärung, www.gendorf.de), (Gendorf, 2015, Umwelterklärung, www.gendorf.de), (Gendorf, 2014, Umwelterklärung, www.gendorf.de). The amount of heat used per kg of chemical substance produced is calculated using literature data published by the Gendorf factory based in Germany, which produces a wide range of chemical substances. The factory produced 1657400 tonnes of chemical substances in the year 2015 (Gendorf, 2016, Umwelterklärung, www.gendorf.de) and 740000 tonnes of intermediate products. The amount of heat in the year 2015 was 523500 GJ (Gendorf, 2016, Umwelterklärung, www.gendorf.de) of which 90% was obtained from natural gas and 10% from steam. The resulting amount of heat from steam is 0.22 MJ/kg of chemical product produced. The 5-year average (2011 - 2015, weighted by production volume) is 0.20 MJ/kg. Cross-reference: the amount of chemicals produced (excluding intermediate products) in the EU-28 in the year 2011 was 327 million tonnes (Eurostat, http://ec.europa.eu/eurostat/statistics-explained/index.php/Chemicals_production_statistics, accessed 20170126). The chemical and petrochemical industry sector consumed 2.33 EJ of energy in 2011 (European Commission - Joint Research Centre, 2014, BAT on Common Waste water and Waste Gas Treatment/Management Systems in the Chemical Sector). The resulting energy (both heat and electricity) consumed per kg of chemicals produced in 2011 is thus 7.13 MJ/kg. This is higher than the value calculated using data published by Gendorf – 3.85 MJ/kg, but that is to be expected as the intermediate products are not accounted for.
  properties: heating value, net 1 MJ
- formic acid: 0 kg; name formic; pedigree (1,1,1,1,1)
  Calculated value. The data is extracted from a single source, from the average of five product categories retrieved from Golsteijn et al (2015). The products are taken as 100% active substance, i.e. excluding water, for consistency with the ecoinvent database. 1kg of cleaning consumables should be used with 6.69kg of "water, completely softened, from decarbonised water, at user".
  property carbon content, fossil 0.261; name formic_C_content_fossil
  property dry mass 1 kg; name formic_drymass
  property carbon content, non-fossil 0; name formic_C_content_non_fossil
  property wet mass 1 kg; name formic_wetmass
  properties: heating value, net 13.17 MJ
- wastewater, average: 0 m3; name BP_amount_1; pedigree (1,1,1,1,1)
  Calculated based on literature data published by the industry. This value is a 5-year average of data (2011 - 2015) published by the Gendorf factory (Gendorf, 2016, Umwelterklärung, www.gendorf.de), (Gendorf, 2015, Umwelterklärung, www.gendorf.de), (Gendorf, 2014, Umwelterklärung, www.gendorf.de). The amount of wastewater (which is later on treated in the municipal WWTP) per kg of chemical substance produced is calculated using literature data published by the Gendorf factory based in Germany, which produces a wide range of chemical substances. The factory produced 1657400 tonnes of chemical substances in the year 2015 (Gendorf, 2016, Umwelterklärung, www.gendorf.de) and 740000 tonnes of intermediate products. The amount of wastewater which is later on treated in the municipal WWTP in the year 2015 was 1200 tonnes (Gendorf, 2016, Umwelterklärung, www.gendorf.de). The resulting amount of wastewater is 2.7E-06 m3/kg of chemical product produced.
  production volume 0 m3
    Calculated from production volume of reference product using the relative outputs.
  property price 0 EUR2005; name BP_amount_1_price_EUR2005
  properties: water content 2882.2, wet mass 1000 kg, dry mass 0.346837 kg, carbon content, non-fossil 0.194039
  note on carbon content, non-fossil: 0.0673 kg TOC/m3 (Tab A.17, ecoinvent v2.2 report 13_I). TOC was considered as Total Carbon.
- sodium hydroxide, without water, in 50% solution state: 0.0307998 kg; name NAOH; = (0.0111420612813371+0+0+0+0.142857142857143)/5; lognormal variance with pedigree 0.1726, pedigree (4,4,5,5,5)
  (same comment as for formic acid)
  property carbon content, non-fossil 0; name NAOH_C_content_non_fossil
  property carbon content, fossil 0; name NAOH_C_content_fossil
  property dry mass 1 kg; name NAOH_drymass
  property wet mass 1 kg; name NAOH_wetmass
  properties: heating value, net 3.03 MJ
- heat, district or industrial, natural gas: 2.15 MJ; lognormal variance with pedigree 0.0184, pedigree (2,3,4,4,3)
  Calculated based on literature data published by the industry. This value is a 5-year average of data (2011 - 2015) published by the Gendorf factory (Gendorf, 2016, Umwelterklärung, www.gendorf.de), (Gendorf, 2015, Umwelterklärung, www.gendorf.de), (Gendorf, 2014, Umwelterklärung, www.gendorf.de). The amount of heat used per kg of chemical substance produced is calculated using literature data published by the Gendorf factory based in Germany, which produces a wide range of chemical substances. The factory produced 1657400 tonnes of chemical substances in the year 2015 (Gendorf, 2016, Umwelterklärung, www.gendorf.de) and 740000 tonnes of intermediate products. The amount of heat in the year 2015 was 523500 GJ (Gendorf, 2016, Umwelterklärung, www.gendorf.de) of which 90% was obtained from natural gas and 10% from steam. The resulting amount of heat from natural gas is 2.02 MJ/kg of chemical product produced. The 5-year average (2011 - 2015, weighted by production volume) is 2.15 MJ/kg. Cross-reference: the amount of chemicals produced (excluding intermediate products) in the EU-28 in the year 2011 was 327 million tonnes (Eurostat, http://ec.europa.eu/eurostat/statistics-explained/index.php/Chemicals_production_statistics, accessed 20170126). The chemical and petrochemical industry sector consumed 2.33 EJ of energy in 2011 (European Commission - Joint Research Centre, 2014, BAT on Common Waste water and Waste Gas Treatment/Management Systems in the Chemical Sector). The resulting energy (both heat and electricity) consumed per kg of chemicals produced in 2011 is thus 7.13 MJ/kg. This is higher than the value calculated using data published by Gendorf – 3.85 MJ/kg, but that is to be expected as the intermediate products are not accounted for.
  properties: heating value, net 1 MJ
- citric acid: 0.125 kg; name cit; = (0+0.125+0.5+0+0)/5; lognormal variance with pedigree 0.1726, pedigree (4,4,5,5,5)
  (same comment as for formic acid)
  property wet mass 1 kg; name cit_wetmass
  property carbon content, fossil 0.375099; name cit_C_content_fossil
  property carbon content, non-fossil 0; name cit_C_content_non_fossil
  property dry mass 1 kg; name cit_drymass
  properties: heating value, net 16.41 MJ
- ethanol, without water, in 99.7% solution state, from ethylene: 0 kg; name CCOH; pedigree (1,1,1,1,1)
  (same comment as for formic acid)
  property carbon content, non-fossil 0; name CCOH_C_content_non_fossil
  property carbon content, fossil 0.521739; name CCOH_C_content_fossil
  property wet mass 1 kg; name CCOH_wetmass
  property dry mass 1 kg; name CCOH_drymass
  properties: heating value, net 31.58 MJ
- nitrogen, liquid: 0 kg; pedigree (1,1,1,1,1)
  Calculated based on literature data published by the industry. This value is a 5-year average of data (2011 - 2015) published by the Gendorf factory (Gendorf, 2016, Umwelterklärung, www.gendorf.de), (Gendorf, 2015, Umwelterklärung, www.gendorf.de), (Gendorf, 2014, Umwelterklärung, www.gendorf.de). The amount of nitrogen used per kg of chemical substance produced is calculated using literature data published by the Gendorf factory based in Germany, which produces a wide range of chemical substances. The factory produced 1657400 tonnes of chemical substances in the year 2015 (Gendorf, 2016, Umwelterklärung, www.gendorf.de) and 740000 tonnes of intermediate products. The reported amount of nitrogen used in 2015 was 33512400 Nm3 (Gendorf, 2016, Umwelterklärung, www.gendorf.de). One Nm3 of nitrogen is equal to 1.2506 kg. The resulting amount of nitrogen - the 5-year average (2011 - 2015, weighted by production volume) is 0.019 kg/kg. Nitrogen is mainly used during the production of chemicals for 'blanketing', which is the process of applying gas to the vapour space of a container or vessel in order to control its composition.
  properties: dry mass 1 kg, wet mass 1 kg
- sodium hypochlorite, without water, in 15% solution state: 0 kg; name hypo; pedigree (1,1,1,1,1)
  (same comment as for formic acid)
  property carbon content, fossil 0; name hypo_C_content_fossil
  property wet mass 1 kg; name hypo_wetmass
  property carbon content, non-fossil 0; name hypo_C_content_non_fossil
  property dry mass 1 kg; name hypo_drymass
- fatty alcohol sulfate: 0.380587 kg; name fatty; = (0.771587743732592+0.125+0.3+0.277777777777778+0.428571428571428)/5; lognormal variance with pedigree 0.1726, pedigree (4,4,5,5,5)
  (same comment as for formic acid)
  property carbon content, non-fossil 0.524272; name fatty_C_content_non_fossil
  property dry mass 1 kg; name fatty_drymass
  property wet mass 1 kg; name fatty_wetmass
  property carbon content, fossil 0; name fatty_C_content_fossil
  properties: heating value, net 15.89 MJ
- electricity, medium voltage: 0.416 kWh; lognormal variance with pedigree 0.0184, pedigree (2,3,4,4,3)
  Calculated based on literature data published by the industry. This value is a 5-year average of data (2011 - 2015) published by the Gendorf factory (Gendorf, 2016, Umwelterklärung, www.gendorf.de), (Gendorf, 2015, Umwelterklärung, www.gendorf.de), (Gendorf, 2014, Umwelterklärung, www.gendorf.de). The amount of electricity per kg of chemical substance produced is calculated using literature data published by the Gendorf factory based in Germany, which produces a wide range of chemical substances. The factory produced 1657400 tonnes of chemical substances in the year 2015 (Gendorf, 2016, Umwelterklärung, www.gendorf.de) and 740000 tonnes of intermediate products. The amount of electricity consumed in the year 2015 was 3498800 GJ (Gendorf, 2016, Umwelterklärung, www.gendorf.de). The resulting amount of electricity is 0.406 kWh/kg (year 2015) of chemical substance produced. The 5-year average (2011 - 2015, weighted by production volume) is 0.416 kWh/kg (1.5 MJ/kg). Cross-reference: the amount of chemicals produced (excluding intermediate products) in the EU-28 in the year 2011 was 327 million tonnes (Eurostat, http://ec.europa.eu/eurostat/statistics-explained/index.php/Chemicals_production_statistics, accessed 20170126). The chemical and petrochemical industry sector consumed 2.33 EJ of energy in 2011 (European Commission - Joint Research Centre, 2014, BAT on Common Waste water and Waste Gas Treatment/Management Systems in the Chemical Sector). The resulting energy (both heat and electricity) consumed per kg of chemicals produced in 2011 is thus 7.13 MJ/kg. This is higher than the value calculated using data published by Gendorf – 3.85 MJ/kg, but that is to be expected as the intermediate products are not accounted for.
- chemical, inorganic: 0.0233364 kg; name inorg; = (0.00557103064066853+0+0+0.111111111111111+0)/5; lognormal variance with pedigree 0.1726, pedigree (4,4,5,5,5)
  Calculated value. The data is extracted from a single source, from the average of five product categories retrieved from Golsteijn et al (2015). The products are taken as 100% active substance, i.e. excluding water, for consistency with the ecoinvent database. 1kg of cleaning consumables should be used with 6.69kg of "water, completely softened, from decarbonised water, at user". The chemical products considered are: dye and thickener.
  property wet mass 1 kg; name inorg_wetmass
  property carbon content, fossil 0.003; name inorg_C_content_fossil
  property dry mass 1 kg; name inorg_drymass
  property carbon content, non-fossil 0; name inorg_C_content_non_fossil
  note on carbon content, fossil: This dataset is an unweighted average of 20 inorganic substances (listed in Tab 88.1, ecoinvent v2.2 report 8, part II), being part of the top100 chemicals included in this database. The C-content has also been calculated as an unweighted average of the C content of the substances composing this dataset.
- propylene glycol, liquid: 0 kg; name propy; pedigree (1,1,1,1,1)
  (same comment as for formic acid)
  property dry mass 1 kg; name propy_drymass
  property carbon content, non-fossil 0; name propy_C_content_non_fossil
  property carbon content, fossil 0.473684; name propy_C_content_fossil
  property wet mass 1 kg; name propy_wetmass
  properties: heating value, net 27.09 MJ
- tap water: 0.026 kg; lognormal variance with pedigree 0.0184, pedigree (2,3,4,4,3)
  Calculated based on literature data published by the industry. This value is a 5-year average of data (2011 - 2015) published by the Gendorf factory (Gendorf, 2016, Umwelterklärung, www.gendorf.de), (Gendorf, 2015, Umwelterklärung, www.gendorf.de), (Gendorf, 2014, Umwelterklärung, www.gendorf.de). The amount of tap water per kg of chemical substance produced is calculated using literature data published by the Gendorf factory based in Germany, which produces a wide range of chemical substances. The factory produced 1657400 tonnes of chemical substances in the year 2015 (Gendorf, 2016, Umwelterklärung, www.gendorf.de) and 740000 tonnes of intermediate products. The amount of tap water consumed in the year 2015 was 55100 tonnes (Gendorf, 2016, Umwelterklärung, www.gendorf.de). The resulting amount of tap water is 0.023 kg/kg of chemical product produced. The 5-year average (2011 - 2015, weighted by production volume) is 0.026 kg/kg.
  properties: carbon content, fossil 0.00178991, water content 2962.17, wet mass 1 kg, dry mass 0.000337476 kg
  note on carbon content, fossil: Bicarbonate content is 2.93 mol/m3. CO2 content is 0.1 mol/m3 (ecoinvent v2.2 report 8, Tab 93.1).
- chemical factory, organics: 4e-10 unit; lognormal variance with pedigree 0.3178, pedigree (2,3,4,4,3)
  Calculated based on literature data published by the industry. For this activity, no information was readily available concerning infrastructure and land-use. Therefore, the infrastructure is estimated based on data from two chemical factories, the BASF site of Ludwigshafen and the chemical factory in Gendorf (which are both located in Germany), which produce a wide range of chemical substances. Based on this data, the following assumptions are made: the built area amounts to about 4.2 ha, the plant has an average output of 50'000 t/a and a lifespan of fifty years. The estimated infrastructure amount is therefore 4.00 E-10 units per kg of produced chemical.
  References:
  Althaus H.-J., Chudacoff M., Hischier R., Jungbluth N., Osses M. and Primas A. (2007) Life Cycle Inventories of Chemicals. ecoinvent report No. 8, v2.0. EMPA Dübendorf, Swiss Centre for Life Cycle Inventories, Dübendorf, CH.
  Gendorf (2000) Umwelterklärung 2000, Werk Gendorf. Werk Gendorf, Burgkirchen.
- ethylene glycol: 0.0111421 kg; name ethy; = (0.0557103064066853+0+0+0+0)/5; lognormal variance with pedigree 0.1726, pedigree (4,4,5,5,5)
  (same comment as for formic acid)
  property dry mass 1 kg; name ethy_drymass
  property carbon content, fossil 0.387097; name ethy_C_content_fossil
  property wet mass 1 kg; name ethy_wetmass
  property carbon content, non-fossil 0; name ethy_C_content_non_fossil
  properties: heating value, net 23.44 MJ
- chemical, organic: 0.0720821 kg; name org; = (0.0334261838440112+0+0.2+0.0555555555555555+0.0714285714285714)/5; lognormal variance with pedigree 0.1726, pedigree (4,4,5,5,5)
  Calculated value. The data is extracted from a single source, from the average of five product categories retrieved from Golsteijn et al (2015). The products are taken as 100% active substance, i.e. excluding water, for consistency with the ecoinvent database. 1kg of cleaning consumables should be used with 6.69kg of "water, completely softened, from decarbonised water, at user". The chemical products considered are: perfume, preservatives and minors (perfume, colorants, preservatives, etc).
  property wet mass 1 kg; name org_wetmass
  property dry mass 1 kg; name org_drymass
  property carbon content, fossil 0.628; name org_C_content_fossil
  property carbon content, non-fossil 0; name org_C_content_non_fossil
  properties: heating value, net 19.03 MJ
  note on carbon content, fossil: This dataset is an unweighted average of 20 organic substances (listed in Tab 88.1, ecoinvent v2.2 report 8, part II), being part of the top100 chemicals included in this database. The C-content has also been calculated as an unweighted average of the C content of the substances composing this dataset.
- sodium chloride, powder: 0.0222841 kg; name NaCl; = (0.111420612813371+0+0+0+0)/5; lognormal variance with pedigree 0.1726, pedigree (4,4,5,5,5)
  (same comment as for formic acid)
  property dry mass 1 kg; name NaCl_drymass
  property carbon content, fossil 0; name NaCl_C_content_fossil
  property carbon content, non-fossil 0; name NaCl_C_content_non_fossil
  property wet mass 1 kg; name NaCl_wetmass
- heat, from steam, in chemical industry: 0.0299772, 0.170023 MJ (2 entries); lognormal variance with pedigree 0.0184, pedigree (2,3,4,4,3)
  (same comment as for heat, from steam, in chemical industry)
- formic acid: 0.0675466, 0.0435645 kg (2 entries); lognormal variance with pedigree 0.1726, pedigree (4,4,5,5,5)
  (same comment as for formic acid)
  properties: heating value, net 13.17 MJ, carbon content, fossil 0.261, dry mass 1 kg, wet mass 1 kg
- wastewater, average: -8.43646e-7, -9.12666e-8, -1.76509e-6 m3 (3 entries); lognormal variance with pedigree 0.0184, pedigree (2,3,4,4,3)
  (same comment as for wastewater, average)
  production volume 32245.4 m3
- ethanol, without water, in 99.7% solution state, from ethylene: 0.0390847, 0.0870295 kg (2 entries); lognormal variance with pedigree 0.1726, pedigree (4,4,5,5,5)
  (same comment as for formic acid)
  properties: heating value, net 31.58 MJ, carbon content, fossil 0.521739, wet mass 1 kg, dry mass 1 kg
- nitrogen, liquid: 0.00409211, 0.0149079 kg (2 entries); lognormal variance with pedigree 0.0184, pedigree (2,3,4,4,3)
  (same comment as for nitrogen, liquid)
- sodium hypochlorite, without water, in 15% solution state: 0.0124286, 0.059 kg (2 entries); lognormal variance with pedigree 0.1726, pedigree (4,4,5,5,5)
  (same comment as for formic acid)
  properties: wet mass 1 kg, dry mass 1 kg
- propylene glycol, liquid: 0.00863316, 0.017481 kg (2 entries); lognormal variance with pedigree 0.1726, pedigree (4,4,5,5,5)
  (same comment as for formic acid)
  properties: dry mass 1 kg, carbon content, fossil 0.473684, wet mass 1 kg, heating value, net 27.09 MJ

## Inputs from nature
- Water, well, in ground [natural resource, in water]: 0.00083 m3; lognormal variance with pedigree 0.0184, pedigree (2,3,4,4,3)
  Calculated based on literature data published by the industry. This value is a 5-year average of data (2011 - 2015) published by the Gendorf factory (Gendorf, 2016, Umwelterklärung, www.gendorf.de), (Gendorf, 2015, Umwelterklärung, www.gendorf.de), (Gendorf, 2014, Umwelterklärung, www.gendorf.de). The amount of groundwater and surface water (river) extracted per kg of chemical substance produced is calculated using literature data published by the Gendorf factory based in Germany, which produces a wide range of chemical substances. The factory produced 1657400 tonnes of chemical substances in the year 2015 (Gendorf, 2016, Umwelterklärung, www.gendorf.de) and 740000 tonnes of intermediate products. The amount of groundwater and surface water (river) extracted in the year 2015 was 19950000 tonnes and 21488100 tonnes respectively (Gendorf, 2016, Umwelterklärung, www.gendorf.de).
- Water, cooling, unspecified natural origin [natural resource, in water]: 0.0164 m3; lognormal variance with pedigree 0.0184, pedigree (2,3,4,4,3)
  Calculated based on literature data published by the industry. This value is a 5-year average of data (2011 - 2015) published by the Gendorf factory (Gendorf, 2016, Umwelterklärung, www.gendorf.de), (Gendorf, 2015, Umwelterklärung, www.gendorf.de), (Gendorf, 2014, Umwelterklärung, www.gendorf.de). The amount of water for cooling extracted per kg of chemical substance produced is calculated using literature data published by the Gendorf factory based in Germany, which produces a wide range of chemical substances. The factory produced 1657400 tonnes of chemical substances in the year 2015 (Gendorf, 2016, Umwelterklärung, www.gendorf.de) and 740000 tonnes of intermediate products. The reported amounts of water extracted as groundwater and surface water (river) are assumed to be used entirely for cooling purposes.
- Water, river [natural resource, in water]: 0.00086 m3; lognormal variance with pedigree 0.0184, pedigree (2,3,4,4,3)
  (same comment as for Water, well, in ground)

## Emissions to nature
- Nitrogen [air, unspecified]: 0.019 kg; lognormal variance with pedigree 0.0184, pedigree (2,3,4,4,3)
  Calculated value. The amount of nitrogen released to air is equal to the amount of nitrogen entering the activity.
- Water [water, unspecified]: 0.0167 m3; lognormal variance with pedigree 0.0184, pedigree (2,3,4,4,3)
  Calculated based on literature data published by the industry (Gendorf, 2016, Umwelterklärung, www.gendorf.de). The amount of water released back to the environment consists of the amount of process water treated in the internal WWTP and then released back to the environment and the amount of cooling water released back to the environment.
- Water [air, unspecified]: 0.0014 m3; lognormal variance with pedigree 0.0184, pedigree (2,3,4,4,3)
  Calculated to ensure the water balance. In general, in the case of recirculating cooling systems, 77% of the water input evaporates to air. In case of once-through cooling systems, 4% of the water input evaporates to air. The process water has in the chemical industry an average evaporation rate of 20.5%. In the specific case of the Gendorf factory, the calculated evaporation rate based on the data published is 6.3%. This matches the qualitative information, that the majority of the cooling systems in Gendorf are once-through and that the amount of cooling water used is significantly higher than the amount of process water used (Gendorf, 2016, Umwelterklärung, www.gendorf.de).

## Sampling procedure
Data from a single literature source: Golsteijn et al (2015). A compilation of life cycle studies for six household detergent product categories in Europe: the basis for product-specific A.I.S.E. Charter Advanced Sustainability Profiles. Environmental Science Europe (2015) 27:23.
The data is extracted from a single source. The source refers to LCIs of six household detergent product categories. The exchanges are calculated from the average of the five household detergent product. The exception is the compacter powder lawdry detergent.

## Extrapolations
This dataset has been extrapolated from year 2013 to the year of the calculation (2021). The uncertainty has been adjusted accordingly.

## Review by Eric Johnson 2018-02-25
If the authors have addressed the review comments of Emilia's (with which I agree), then I am satisfied and accept the dataset.
