# road construction, company, internal

Dataset: EcoSpold 2, unit process
Geography: CH
Time period: 1990-01-01 to 2021-12-31
Technology level: current
Classification: EcoSpold01Categories: transport systems/road
Classification: ISIC rev.4 ecoinvent: 4210:Construction of roads and railways
Tags: ConvertedDataset
Scenario: Business-as-Usual
System model: Allocation, cut-off by classification
Generated by: Michael Spielmann (obsolete)
Published in: Spielmann M. 2007
Database: ecoinvent
isCopyrightProtected: true
accessRestrictedTo: 1

## General comment
All data is referred to meter2*year. Construction data is based on material expenditures for Swiss 2nd class roads.
[This dataset was already contained in the ecoinvent database version 2. It was not individually updated during the transfer to ecoinvent version 3. Life Cycle Impact Assessment results may still have changed, as they are affected by changes in the supply chain, i.e. in other datasets. This dataset was generated following the ecoinvent quality guidelines for version 2. It may have been subject to central changes described in the ecoinvent version 3 change report (http://www.ecoinvent.org/database/ecoinvent-version-3/reports-of-changes/), and the results of the central updates were reviewed extensively. The changes added e.g. consistent water flows and other information throughout the database. The documentation of this dataset can be found in the ecoinvent reports of version 2, which are still available via the ecoinvent website. The change report linked above covers all central changes that were made during the conversion process.]

## Included activities end
Inventory for construction and operation of the traffic area (roads and parking) on company sites. The inventory includes processes for the supply of used materials such as gravel and bitumen . NMVOC emissions from bitumen are included. Transport of materials to the constructions site has been taken into account. Also, de-icing with sodium chlorid is accounted for. Energy cosumption due to lighting is excluded as well as weed control and marking.

## Geography
Data refers to average conditions in Switzerland.

## Technology
Swiss state of the art technology

## Reference product
- road, company, internal: 1 m2*year; CPC 53211: Highways (except elevated highways), streets and roads; By-product classification allocatable product
  EcoSpold01Location=CH
  production volume 0.0336675 m2*year
    This is a placeholder value that does not reflect real-world production volumes. This dataset does not currently require a real-world production volume to work in the database framework, and no actual data were collected yet. This has no negative effect on the results of the ecoinvent database. The placeholder value of this activity was scaled according to the nominal GDP of 2005 (source: United Nations, http://data.un.org/Glossary.aspx?q=GDP+%28current+US%24%29, accessed 20130726) to reflect an appropriate share of the global production volume, which is also a placeholder value.
  property price 0.606137 EUR2005
    Calculated based on inputs: The price of the product has been calculated as a sum of the values of the material and energy inputs for this product. This value is therefore a rough estimation. It may underestimate the real price since there are additional expenses when producing any product. These expences can include for example labour costs, treatment of waste materials and profit for the producer. Please consider carefully whether this level of data quality is acceptable for your application.

## Inputs from technosphere
- diesel, burned in building machine: 5.79 MJ; lognormal variance with pedigree 0.0626, pedigree (3,3,5,1,1)
  Literature studies and own calculations
  EcoSpold01Location=GLO
  Uncertainty: literature studies and own calculations
  properties: heating value, net 1 MJ
- pitch: 0.546 kg; lognormal variance with pedigree 0.0626, pedigree (3,3,5,1,1)
  EcoSpold01Location=CH
  Literature studies and own calculations
  Uncertainty: literature studies and own calculations
  properties: carbon content, fossil 0.83, wet mass 1 kg, dry mass 1 kg, heating value, net 28 MJ
- steel, low-alloyed, hot rolled: 0.00877 kg; lognormal variance with pedigree 0.0626, pedigree (3,3,5,1,1)
  Literature studies and own calculations
  EcoSpold01Location=RER
  Uncertainty: literature studies and own calculations
  properties: carbon content, fossil 0.005, wet mass 1 kg, dry mass 1 kg
  note on carbon content, fossil: Low alloyed steel composition given in Tab. 3.2 ecoinvent v2.2 report 10_partII. Steel assumed to have a C content of 0.5%
- gravel, crushed: 18.4 kg; lognormal variance with pedigree 0.0626, pedigree (3,3,5,1,1)
  Literature studies and own calculations
  EcoSpold01Location=CH
  Uncertainty: literature studies and own calculations
  properties: wet mass 1 kg, dry mass 1 kg
- sodium chloride, powder: 0.293 kg; lognormal variance with pedigree 0.0412, pedigree (2,3,5,1,1)
  De-icing salt study and own calculations
  EcoSpold01Location=RER
  Uncertainty: de-icing salt study and own calculations
  properties: wet mass 1 kg, dry mass 1 kg
- excavation, skid-steer loader: 0.0263 m3; lognormal variance with pedigree 0.1826, pedigree (3,3,5,1,1)
  Literature studies and own calculations;activityLink introduced to establish a direct link to the corresponding regional supply of this product
  EcoSpold01Location=RER
  Uncertainty: literature studies and own calculations
- reinforcing steel: 0.0916 kg; lognormal variance with pedigree 0.0626, pedigree (3,3,5,1,1)
  EcoSpold01Location=RER
  Literature studies and own calculations
  Uncertainty: literature studies and own calculations
  properties: wet mass 1 kg, carbon content, fossil 0.004, dry mass 1 kg
- electricity, medium voltage: 0.106 kWh; lognormal variance with pedigree 0.0626, pedigree (3,3,5,1,1)
  (same comment as for gravel, crushed)

## Emissions to nature
- NMVOC, non-methane volatile organic compounds, unspecified origin [air, unspecified]: 0.00655 kg; lognormal variance with pedigree 0.0986, pedigree (4,3,5,1,1)
  Literature studies and own calculations
  Uncertainty: literature studies and own calculations
- Chloride [soil, unspecified]: 0.176 kg; lognormal variance with pedigree 0.0827, pedigree (3,3,5,3,1)
  De-icing salt study and own calculations
  Uncertainty: de-icing salt study and own calculations
- Sodium [soil, unspecified]: 0.117 kg; lognormal variance with pedigree 0.0827, pedigree (3,3,5,3,1)
  (same comment as for Chloride)

## Sampling procedure
literature and own calculations.

## Extrapolations
This dataset has been extrapolated from year 2000 to the year of the calculation (2021). The uncertainty has been adjusted accordingly.

## Review by Niels Jungbluth 2003-07-07
Passed.
