# treatment of aluminium in car shredder residue, municipal incineration

Dataset: EcoSpold 2, unit process
Geography: CH
Time period: 1994-01-01 to 2021-12-31
Technology level: outdated
Classification: ISIC rev.4 ecoinvent: 3821:Treatment and disposal of non-hazardous waste
Classification: EcoSpold01Categories: waste management/municipal incineration
Synonyms: Metallteile in RESH aus Automobilen; metal parts in Automotive Shredder Residue ASR
Tags: Treatment; ConvertedDataset
Scenario: Business-as-Usual
System model: Allocation, cut-off by classification
Generated by: Gabor Doka (obsolete)
Published in: Doka G. 2007
Database: ecoinvent
isCopyrightProtected: true
accessRestrictedTo: 1

## General comment
Inventoried waste contains 50% Al in ASR burnable; 50% Al in ASR inert; .
waste composition (wet, in ppm): H2O n.a.; O n.a.; H n.a.; C n.a.; S n.a.; N n.a.; P n.a.; B n.a.; Cl 4825; Br n.a.; F n.a.; I n.a.; Ag n.a.; As n.a.; Ba n.a.; Cd 3; Co n.a.; Cr n.a.; Cu 8.5; Hg n.a.; Mn n.a.; Mo n.a.; Ni n.a.; Pb 25.5; Sb n.a.; Se n.a.; Sn n.a.; V n.a.; Zn 29; Be n.a.; Sc n.a.; Sr n.a.; Ti n.a.; Tl n.a.; W n.a.; Si n.a.; Fe n.a.; Ca n.a.; Al 995110; K n.a.; Mg n.a.; Na n.a.;
Share of carbon in waste that is biogenic 60.4%.
Share of iron in waste that is metallic/recyclable 0%.
Net energy produced in MSWI: 0MJ/kg waste electric energy and 0MJ/kg waste thermal energy
Allocation of energy production: no substitution or expansion. Total burden allocated to waste disposal function of MSWI.
One kg of this waste produces 1.466 kg of slag and 0.1367 kg of residues, which are landfilled. Additional solidification with 0.05467 kg of cement.
[This dataset was already contained in the ecoinvent database version 2. It was not individually updated during the transfer to ecoinvent version 3. Life Cycle Impact Assessment results may still have changed, as they are affected by changes in the supply chain, i.e. in other datasets. This dataset was generated following the ecoinvent quality guidelines for version 2. It may have been subject to central changes described in the ecoinvent version 3 change report (http://www.ecoinvent.org/database/ecoinvent-version-3/reports-of-changes/), and the results of the central updates were reviewed extensively. The changes added e.g. consistent water flows and other information throughout the database. The documentation of this dataset can be found in the ecoinvent reports of version 2, which are still available via the ecoinvent website. The change report linked above covers all central changes that were made during the conversion process.]

## Included activities end
waste-specific air and water emisions from incineration, auxiliary material consumption for flue gas cleaning. Short-term emissions to river water and long-term emisisons to ground water from slag compartment (from bottom slag) and residual material landfill (from solidified fly ashes and scrubber slugde). Process energy demands for MSWI.

## Geography
Specific to the technology mix encountered in Switzerland in 2000. Well applicable to modern incineration practices in Europe, North America or Japan.

## Technology
replaced by newer incineration technology with fly ash extraction. Average Swiss MSWI plants in 2000 with electrostatic precipitator for fly ash (ESP), wet flue gas scrubber and 29.4% SNCR , 32.2% SCR-high dust , 24.6% SCR-low dust -DeNOx facilities and 13.8% without Denox (by burnt waste, according to Swiss average). Share of waste incinerated in plants with magnetic scrap separation from slag : 50%. Gross electric efficiency technology mix 12.997% and Gross thermal efficiency technology mix 25.57%

## Time period
Waste composition as given in literature reference, theoretical data or other source. Transfer coefficients for modern Swiss MSWI. Emission speciation based on early 90ies data.

## Reference product
- aluminium in car shredder residue: -1 kg; name aluminium_RP; CPC 39363: Waste and scrap of aluminium; By-product classification Waste; CAS 7429-90-5
  EcoSpold01Location=CH
  production volume 0 kg; name aluminium_RP_PV
    outdated. Replaced by newer incineration technology with fly ash extraction.
  property price 0 EUR2005; name aluminium_RP_price_EUR2005
    Waste products are assigned a price of zero as they are assumed to require further treatment.
  property carbon content 0
    carbon content on a dry matter basis (reserved; not for manual entry)
  properties: water content 0, carbon content, fossil 0, carbon content, non-fossil 0, dry mass 1 kg, water in wet mass 0 kg, wet mass 1 kg, carbon allocation 0 kg

## Inputs from technosphere
- electricity, for reuse in municipal waste incineration only: 0.144 kWh; name E_el_prod_MSWI; lognormal variance with pedigree 0.48, pedigree (1,1,5,1,1)
  uncertainty is calculated from uncertainties in waste composition and uncertainties in energy efficiency and the uncertainty in internal energy demand
- process-specific burdens, residual material landfill: 0.137 kg; lognormal variance with pedigree 0.04, pedigree (1,1,5,1,1)
  EcoSpold01Location=CH
  uncertainty is calculated from uncertainties in waste composition and transfer coefficients in incinerator;activityLink introduced to establish a direct link to the corresponding regional supply of this product
- quicklime, milled, packed: 0.000416 kg; lognormal variance with pedigree 0.5, pedigree (1,1,5,1,1)
  EcoSpold01Location=CH
  uncertainty calculated from uncertainty in average auxiliary material input, and the unertainty of the waste composition of this waste
  properties: wet mass 1 kg, dry mass 0.99 kg, water content 0.010101
- heat, for reuse in municipal waste incineration only: 0.839 MJ; name E_th_prod_MSWI; lognormal variance with pedigree 0.04, pedigree (1,1,5,1,1)
  (same comment as for electricity, for reuse in municipal waste incineration only)
- chemical, organic: 5.97e-6 kg; lognormal variance with pedigree 1.48, pedigree (1,1,5,1,1)
  Proxy for TMT15. uncertainty calculated from uncertainty in average auxiliary material input, and the unertainty of the waste composition of this waste
  EcoSpold01Location=GLO
  properties: dry mass 1 kg, carbon content, fossil 0.628, wet mass 1 kg, heating value, net 19.03 MJ
  note on carbon content, fossil: This dataset is an unweighted average of 20 organic substances (listed in Tab 88.1, ecoinvent v2.2 report 8, part II), being part of the top100 chemicals included in this database. The C-content has also been calculated as an unweighted average of the C content of the substances composing this dataset.
- slag landfill: 2.61e-9 unit; lognormal variance with pedigree 0.04, pedigree (1,1,5,1,1)
  EcoSpold01Location=CH
  uncertainty is calculated from uncertainties in waste composition and transfer coefficients in incinerator
- process-specific burdens, municipal waste incineration: 1 kg; lognormal variance with pedigree 0.04, pedigree (1,1,5,1,1)
  EcoSpold01Location=CH
  demands per kilogram waste. uncertainty is heeded in the module;activityLink introduced to establish a direct link to the corresponding regional supply of this product
- cement, unspecified: 0.0547 kg; lognormal variance with pedigree 0.05, pedigree (1,1,5,1,1)
  EcoSpold01Location=CH
  Cement for solidification of landfilled residual material. Uncertainty calculated from unertainty of the waste composition of this waste, of transfer coefficients in the incinerator and of the solidification recipe.
  properties: wet mass 1 kg, dry mass 1 kg
- residual material landfill: 2.85e-10 unit; lognormal variance with pedigree 0.04, pedigree (1,1,5,1,1)
  uncertainty is calculated from uncertainties in waste composition and transfer coefficients in incinerator
  EcoSpold01Location=CH
- hydrochloric acid, without water, in 30% solution state: 4.22e-6 kg; lognormal variance with pedigree 0.5, pedigree (1,1,5,1,1)
  EcoSpold01Location=RER
  uncertainty calculated from uncertainty in average auxiliary material input, and the unertainty of the waste composition of this waste
  properties: heating value, net 3.32 MJ, wet mass 1 kg, dry mass 1 kg
- municipal waste incineration facility: 2.5e-10 unit; lognormal variance with pedigree 0.04, pedigree (1,1,5,1,1)
  demands per kilogram waste. uncertainty is heeded in the module
  EcoSpold01Location=CH
- chemical, inorganic: 7.03e-6 kg; lognormal variance with pedigree 0.5, pedigree (1,1,5,1,1)
  EcoSpold01Location=GLO
  Proxy for Polyelectrolyte. uncertainty calculated from uncertainty in average auxiliary material input, and the unertainty of the waste composition of this waste
  properties: dry mass 1 kg, carbon content, fossil 0.003, wet mass 1 kg
  note on carbon content, fossil: This dataset is an unweighted average of 20 inorganic substances (listed in Tab 88.1, ecoinvent v2.2 report 8, part II), being part of the top100 chemicals included in this database. The C-content has also been calculated as an unweighted average of the C content of the substances composing this dataset.
- process-specific burdens, slag landfill: 1.47 kg; lognormal variance with pedigree 0.04, pedigree (1,1,5,1,1)
  uncertainty is calculated from uncertainties in waste composition and transfer coefficients in incinerator;activityLink introduced to establish a direct link to the corresponding regional supply of this product
  EcoSpold01Location=CH
- iron (III) chloride, without water, in 40% solution state: 2.73e-6 kg; lognormal variance with pedigree 0.68, pedigree (1,1,5,1,1)
  uncertainty calculated from uncertainty in average auxiliary material input, and the unertainty of the waste composition of this waste
  EcoSpold01Location=CH
  properties: wet mass 1 kg, dry mass 1 kg
- waste cement, hydrated: -0.137 kg; name waste_cement_ByP; lognormal variance with pedigree 0.05, pedigree (1,1,5,1,1)
  EcoSpold01Location=CH
  Hydrated cement for solidification of landfilled residual material. Uncertainty calculated from unertainty of the waste composition of this waste and transfer coefficients in the incinerator and of the solidification recipe.
  production volume 0 kg; = ABS(waste_cement_ByP/ aluminium_RP)* aluminium_RP_PV
    Calculated from the production volume of aluminium in car shredder residue, 0% water in proportion to the respective output amounts.
  property price 0 EUR2005; name waste_cement_ByP_price_EUR2005
  properties: wet mass 1 kg, dry mass 1 kg
- sodium hydroxide, without water, in 50% solution state: 0.00235 kg; lognormal variance with pedigree 0.5, pedigree (1,1,5,1,1)
  (same comment as for hydrochloric acid, without water, in 30% solution state)
  properties: wet mass 1 kg, dry mass 1 kg, heating value, net 3.03 MJ

## Emissions to nature
- Chloride [water, surface water]: 0.00444 kg; lognormal variance with pedigree 0.29, pedigree (1,1,5,1,1)
  uncertainty is calculated from uncertainties in waste composition and transfer coefficients in incinerator and landfills
- Copper [air, urban air close to ground]: 3.14e-11 kg; lognormal variance with pedigree 1.39, pedigree (1,1,5,1,1)
  uncertainty is calculated from uncertainties in waste composition and transfer coefficients in incinerator
- Methane, non-fossil [air, urban air close to ground]: 3.86e-6 kg; lognormal variance with pedigree 0.091225, pedigree (2,3,5,2,1)
  Confidential data from 5 plants in Switzerland and Germany
  Uncertainty: & basic uncertainty of 1.5; confidential data from 5 plants in Switzerland and Germany
- Zinc [air, urban air close to ground]: 2.37e-10 kg; lognormal variance with pedigree 1.22, pedigree (1,1,5,1,1)
  (same comment as for Copper)
- Lead [water, ground-, long-term]: 1.37e-5 kg; lognormal variance with pedigree 3.8, pedigree (1,1,5,1,1)
  Long-term emissions from landfilling of incineration residues. uncertainty is calculated from uncertainties in waste composition and transfer coefficients in incinerator and landfills.
- Copper, ion [water, surface water]: 3.2e-10 kg; lognormal variance with pedigree 2.14, pedigree (1,1,5,1,1)
  (same comment as for Chloride)
- Copper, ion [water, ground-, long-term]: 7.69e-6 kg; lognormal variance with pedigree 1.31, pedigree (1,1,5,1,1)
  (same comment as for Lead)
- Carbon monoxide, fossil [air, urban air close to ground]: 8.82e-5 kg; lognormal variance with pedigree 0.690625, pedigree (1,3,5,2,1)
  Literature data from switzerland and germany adapted to plant age distribution in switzerland
  Uncertainty: & basic uncertainty of 5; literature data from switzerland and germany adapted to plant age distribution in switzerland
- Chloride [water, ground-, long-term]: 0.000386 kg; lognormal variance with pedigree 0.46, pedigree (1,1,5,1,1)
  (same comment as for Lead)
- Hydrogen chloride [air, urban air close to ground]: 2.68e-8 kg; lognormal variance with pedigree 0.55, pedigree (1,1,5,1,1)
  (same comment as for Copper)
- Methane, fossil [air, urban air close to ground]: 2.53e-6 kg; lognormal variance with pedigree 0.091225, pedigree (2,3,5,2,1)
  (same comment as for Methane, non-fossil)
- Cadmium [air, urban air close to ground]: 8.26e-11 kg; lognormal variance with pedigree 1.51, pedigree (1,1,5,1,1)
  (same comment as for Copper)
- Aluminium [air, urban air close to ground]: 0.000777 kg; lognormal variance with pedigree 0.06, pedigree (1,1,5,1,1)
  (same comment as for Copper)
- Lead [air, urban air close to ground]: 4.73e-10 kg; lognormal variance with pedigree 1.23, pedigree (1,1,5,1,1)
  (same comment as for Copper)
- Zinc, ion [water, ground-, long-term]: 1.47e-5 kg; lognormal variance with pedigree 1.89, pedigree (1,1,5,1,1)
  (same comment as for Lead)
- Cadmium, ion [water, ground-, long-term]: 1.51e-6 kg; lognormal variance with pedigree 3.02, pedigree (1,1,5,1,1)
  (same comment as for Lead)
- Carbon monoxide, non-fossil [air, urban air close to ground]: 0.000135 kg; lognormal variance with pedigree 0.690625, pedigree (1,3,5,2,1)
  (same comment as for Carbon monoxide, fossil)
- Aluminium [water, surface water]: 4.79e-5 kg; lognormal variance with pedigree 0.61, pedigree (1,1,5,1,1)
  (same comment as for Chloride)
- Aluminium [water, ground-, long-term]: 0.775 kg; lognormal variance with pedigree 0.05, pedigree (1,1,5,1,1)
  (same comment as for Lead)
- Cadmium, ion [water, surface water]: 1.45e-9 kg; lognormal variance with pedigree 1.52, pedigree (1,1,5,1,1)
  (same comment as for Chloride)
- Lead [water, surface water]: 5.88e-10 kg; lognormal variance with pedigree 1.42, pedigree (1,1,5,1,1)
  (same comment as for Chloride)
- Zinc, ion [water, surface water]: 3.1e-9 kg; lognormal variance with pedigree 0.93, pedigree (1,1,5,1,1)
  (same comment as for Chloride)

## Sampling procedure
waste-specific calculation based on literature data

## Extrapolations
This dataset has been extrapolated from year 2000 to the year of the calculation (2021). The uncertainty has been adjusted accordingly.

## Review by Niels Jungbluth 2003-07-15
Passed. Calculation for standard deviation 95 of, i.e., infrastructure,
land occupation, transport services or other services can differ from
standard Pedigree approach used in this project and figures obtained by
this procedure.
