# hydroformylation of propylene

Dataset: EcoSpold 2, unit process
Geography: RoW
Time period: 1989-01-01 to 2021-12-31
Technology level: current
Classification: ISIC rev.4 ecoinvent: 2011:Manufacture of basic chemicals
Synonyms: Butyl alcohol; Butan-1-ol; N-butyl alcohol; Butanol; N-butanol
Tags: combined production
Scenario: Business-as-Usual
System model: Allocation, cut-off by classification
Share of production covered: 100 %
Generated by: Bo Weidema
Published in: Sutter, J. 2007
Database: ecoinvent
isCopyrightProtected: true
accessRestrictedTo: 1

## General comment
This dataset represents the hydroformylation of 1 kg of propylene, which produces 1-butanol and isobutanol (2-methyl-1-propanol). The inventory in this dataset shows only the exchanges related to the production of 1-butanol. 1-Butanol (C4H9OH) and isobutanol are both colourless liquids with a characteristic odour. They are completely miscible with common organic solvents. Their vapors have an irritant effect on mucous membranes and a narcotic effect in higher concentrations.
1-Butanol is used principally in the field of surface coating. It is used either directly as a solvent for varnishes or it is converted into derivatives which then serve as solvents or monomer components. The addition of 5 – 10 % of 1-butanol is also valuable in overcoming “blushing” (unwanted white opacity) which may arise when large quantities of thinners, particularly volatile solvents, are used. 1-Butanol is also useful for regulating the viscosity and improving the flow properties of varnishes and for the prevention of “streaking” in paints and lacquers based on spirit-soluble gums and resins. Although not itself a solvent for substances such as polystyrene and chlorinated rubber, 1-butanol can be successfully used in quantities up to 20 % as a diluent for the commonly used solvents for these substances, which are mainly the esters of the saturated carboxylic acids; in particular, the acetates.
The most important process for the manufacture of 1-butanol and 2-methyl-1-propanol is propylene hydroformylation (oxo synthesis) with subsequent hydrogenation of the aldehydes formed. Three different oxo-synthesis processes exist. Since the Celanese process is the one that is the most widely used today, it is the process that is modelled in this dataset. The raw materials and energy consumptions are based on literature data. The emissions are estimated and the infrastructure is included with a default value.
References:
Sutter, J. (2007) Life Cycle Inventories of Petrochemical Solvents. ecoinvent report No. 22. Swiss Centre for Life Cycle Inventories, Dübendorf, 2007.

## Included activities start
From the reception of propylene at the factory gate.

## Included activities end
This activity ends with the production of 1-butanol. This dataset includes the input materials, energy uses, infrastructure and emissions.

## Geography
The inventory is modelled for Europe but is assumed to be representative of the global production.

## Technology
In the oxo reaction (hydroformylation), carbon monoxide and hydrogen are added to a carbon – carbon double bond in the liquid phase in the presence of catalyst (hydrocarbonyls or substituted hydrocarbonyls of Co, Rh, or Ru). In the first reaction step aldehydes are formed with one more C-atom than the original olefins. For olefins with more than two C-atoms, isomeric aldehyde mixtures are normally obtained. In the case of propylene these consist of 1-butanal and 2-methylpropanal.
There are several variations of the hydroformylation process, the differences being in the reaction conditions (pressure, temperature) as well as the catalyst system used. The classic high-pressure process exclusively used until the beginning of the 1970s operates at pressures of 20 – 30 MPa (200 – 300 bar) CO/H2 and temperatures of 100 – 180 °C. The catalyst is Co. It leads to about 75 % 1-butanol and about 25 % 2-methyl-1-propanol.
The new process developments of the past few years have led to a clear shift in the range of products. The processes operating at relatively low pressures (1 – 5 MPa , 10 – 50 bar) use modified Rh-catalysts. The isomeric ratios achieved are about 92 : 8 or 95 : 5 1-butanol to 2-methyl-1-propanol. However, by the use of unmodified Rh the percentage of 2-methyl-1-propanol can be increased to about 50 %.
Catalytic hydrogenation of the aldehydes leads to the formation of the corresponding alcohols.
As only primary alcohols can be obtained via the oxo synthesis, it is not possible to produce 2-butanol and 2-methyl-2-propanol by this process.
Reference:
Hahn, H., Dämkes, G., Ruppric, N.: Butanols. In: Ullmann's Encyclopedia of In-dustrial Chemistry, Seventh Edition, 2004 Electronic Release (ed. Fiedler E., Grossmann G., Kersebohm D., Weiss G. and Witte C.). 7 th Electronic Release Edition. Wiley InterScience, New York, Online-Version under: http://www.mrw.interscience.wiley.com/ueic/articles/

## Time period
Time of publications.

## Parameters
- efficiency: 0.95 dimensionless; name process_efficiency
  output relative to input (requires additional specification)
- sum of reference products: 1.76141 kg; name sum_RP; = (42.08+28.01+4.03)/42.08
  Stoichiometric output per kg butene calculated as the molar weight of the 3 components, butene, CO and 2H2 divided by the amount of butene

## Reference product
- isobutanol: 1 kg; = sum_RP*process_efficiency*isobutanol_PV/( butanol_PV+ isobutanol_PV); By-product classification allocatable product; CPC 34139: Other alcohols, phenols, phenol-alcohols, and their halogenated, sulphonated, nitrated or nitrosated derivativ[…]; CAS 78-83-1
  2-Methyl-1-propanol is a colourless liquid with a characteristic odour. It is completely miscible with common organic solvents. Its vapor has an irritant effect on mucous membranes and a narcotic effect in higher concentrations.
  The fields of application of 2-methyl-1-propanol closely resemble those of 1-butanol. Indeed, because of its lower price it can often replace 1-butanol and is accordingly used as a solvent, diluent, and additive for nitrocellulose and synthetic resins; wetting agent; cleaner additive; and component of printing inks and related products. Its capacity for dissolving resins (ketone, phthalate, urea, and melamine - formaldehyde resins) is of commercial importance. As a solvent for phenol - formaldehyde resins, however, 2-methyl-1-propanol is not as effective as 1-butanol.
  Several esters exhibit excellent solvent properties; in particular, isobutyl acetate is a very good solvent for fats, chlorinated rubber, polystyrene, and coumarone resins. The esters of phthalic acid, adipic acid, some dicarboxylic acids as well as phosphoric acid are used as plasticizers, particularly for PVC and its copolymers and for cellulose derivatives.
  The isobutyl esters of 2,4-dichloro- and 2,4,5- trichlorophenoxyacetic acid exhibit herbicidal activity. For the anti-freezing properties of 2-methyl-1-propanol in gasoline see.
  Also of interest is the use of 2-methyl-1-propanol as an extracting agent in the recovery of ammonium phosphate
  production volume 1.4231e8 kg; name isobutanol_PV
    Calculated in proportion to 1-butanol output
  property heating value, net 35.99 MJ
    LHV is calculated based on the elemental composition of the substance. Based on the CAS number of the substance (000078-83-1), the chemical formula of the substance is found to be: C4H10O, (PubChem 2020).
    Reference: Kim, S., Chen, J., Cheng, T., Gindulyte, A., He, J., He, S., Li, Q., Shoemaker, B. A., Thiessen, P. A., Yu, B., Zaslavsky, L., Zhang, J., & Bolton, E. E. (2019). PubChem 2019 update: improved access to chemical data. Nucleic acids research, 47(D1), D1102–D1109. https://doi.org/10.1093/nar/gky1033
  property price 0.546 EUR2005
    Temporary price data. Calculated as 90% of purchasers price based on: 2004 import and export prices (total trades (USD) divided by total weight (kg) in EU27, USA, China, Japan and India) from UN Commodity Trade Statistics Database (http://data.un.org/Explorer.aspxDatabase [Accessed 2 July 2010]). Commodity: 'Butanols nes'
  property carbon content 0.648649
    carbon content on a dry matter basis (reserved; not for manual entry)
  properties: water in wet mass 0 kg, wet mass 1 kg, dry mass 1 kg, carbon content, fossil 0.648649, carbon content, non-fossil 0, water content 0, carbon allocation 0.648649 kg
- 1-butanol: 0 kg; name butanol; By-product classification allocatable product; CPC 34139: Other alcohols, phenols, phenol-alcohols, and their halogenated, sulphonated, nitrated or nitrosated derivativ[…]; CAS 71-36-3
  1-Butanol is a colourless liquid with a characteristic odour. It is completely miscible with common organic solvents. Its vapor has an irritant effect on mucous membranes and a narcotic effect in higher concentrations.
  1-Butanol is used principally in the field of surface coating. In the USA, for instance, approx. 85 % of 1-butanol production finds an outlet in this sector of the market. It is used either directly as a solvent for varnishes or it is converted into derivatives which then serve as solvents or monomer components.
  1-Butanol cannot be used directly as a solvent in the production of nitrocellulose lacquers; in admixture with toluene, ethanol, or various esters, however, it is an excellent thinner.
  The addition of 5 - 10 % of 1-butanol is also valuable in overcoming 'blushing' (unwanted white opacity) which may arise when large quantities of thinners, particularly volatile solvents, are used.
  1-Butanol is also useful for regulating the viscosity and improving the flow properties of varnishes and for the prevention of 'streaking' in paints and lacquers based on spirit-soluble gums and resins.
  Although not itself a solvent for substances such as polystyrene and chlorinated rubber, 1-butanol can be successfully used in quantities up to 20 % as a diluent for the commonly used solvents for these substances, which are mainly the esters of the saturated carboxylic acids; in particular, the acetates.
  The acrylic ester of 1-butanol has become increasingly important during the last decade. It has become an essential component of latex paints since such coatings are not only robust but can also be produced relatively cheaply. The 1-butyl esters of phthalic, adipic, sebacic, oleic, azelaic, stearic, and phosphoric acids are used as plasticizers and additives for surface coatings. The most important of these products is di-1-butyl phthalate (DBP). Consumption is, however, stagnating and in some countries it decreased slightly within the last years.
  In the USA in particular, but also in the Federal Republic of Germany and Belgium, 1-butanol is used for the manufacture of butylamines.
  1-Butanol has numerous applications in the plastics and textile sector. It is used as a coagulation bath for spinning acrylic fibers and in the dyeing of poly(vinyl alcohol) fibers.
  production volume 0 kg; name butanol_PV
    Source: http://pubs.acs.org/cen/coverstory/84/8428factsandfigures.html (Chemical & Engineering News, 2006 vol 84) downloaded 21 May 2009).
    The production volumes were extrapolated to GLO using the relative GDP (3.18).
  property heating value, net 35.99 MJ
    LHV is calculated based on the elemental composition of the substance. Based on the CAS number of the substance (000071-36-3), the chemical formula of the substance is found to be: C4H10O, (PubChem 2020).
    Reference: Kim, S., Chen, J., Cheng, T., Gindulyte, A., He, J., He, S., Li, Q., Shoemaker, B. A., Thiessen, P. A., Yu, B., Zaslavsky, L., Zhang, J., & Bolton, E. E. (2019). PubChem 2019 update: improved access to chemical data. Nucleic acids research, 47(D1), D1102–D1109. https://doi.org/10.1093/nar/gky1033
  property price 0.546 EUR2005
    (same comment as for isobutanol)
  property carbon content 0.648649
    carbon content on a dry matter basis (reserved; not for manual entry)
  properties: water in wet mass 0 kg, water content 0, wet mass 1 kg, carbon content, non-fossil 0, carbon content, fossil 0.648649, dry mass 1 kg, carbon allocation 0.648649 kg

## Inputs from technosphere
- heat, district or industrial, other than natural gas: 0 MJ; source Chauvel, A. 1989; pedigree (1,1,1,1,1)
  Estimation. From Tab 37.2, ecoinvent v2 report 22
  Uncertainty: C
  properties: heating value, net 1 MJ
- hydrogen, liquid: 0.0572329 kg; = propylene_input*4.03/42.08; source Chauvel, A. 1989; lognormal variance with pedigree 0.0726, pedigree (1,3,5,5,1)
  Estimation. From Tab 37.1, ecoinvent v2 report 22
  Uncertainty: C
  properties: heating value, net 120.21 MJ, wet mass 1 kg, dry mass 1 kg
- water, deionised: 0.830018 kg; = 1.3889*propylene_input; source Chauvel, A. 1989; lognormal variance with pedigree 0.0726, pedigree (1,3,5,5,1)
  Estimation. From Tab 37.1, ecoinvent v2 report 22
  Uncertainty: C
  properties: wet mass 1 kg
- chemical factory, organics: 4e-10 unit; = 4E-10*(butanol+isobutanol); source Chauvel, A. 1989; lognormal variance with pedigree 0.3498, pedigree (2,3,5,4,3)
  Calculated based on literature data published by the industry. For this activity, no information was readily available concerning infrastructure and land-use. Therefore, the infrastructure is estimated based on data from two chemical factories, the BASF site of Ludwigshafen and the chemical factory in Gendorf (which are both located in Germany), which produce a wide range of chemical substances. Based on this data, the following assumptions are made: the built area amounts to about 4.2 ha, the plant has an average output of 50'000 t/a and a lifespan of fifty years. The estimated infrastructure amount is therefore 4.00 E-10 units per kg of produced chemical.
  References:
  Althaus H.-J., Chudacoff M., Hischier R., Jungbluth N., Osses M. and Primas A. (2007) Life Cycle Inventories of Chemicals. ecoinvent report No. 8, v2.0. EMPA Dübendorf, Swiss Centre for Life Cycle Inventories, Dübendorf, CH.
  Gendorf (2000) Umwelterklärung 2000, Werk Gendorf. Werk Gendorf, Burgkirchen.
- heat, district or industrial, natural gas: 0 MJ; source Chauvel, A. 1989; pedigree (1,1,1,1,1)
  Estimation. From Tab 37.2, ecoinvent v2 report 22
  Uncertainty: C
  properties: heating value, net 1 MJ
- propylene: 0 kg; name propylene_input; source Chauvel, A. 1989; pedigree (1,1,1,1,1)
  Estimation.
  Uncertainty: C
  properties: heating value, net 43.22 MJ, dry mass 1 kg, carbon content, fossil 0.857143, wet mass 1 kg
- carbon monoxide: 0.39779 kg; = propylene_input*28.01/42.08; lognormal variance with pedigree 0.1786, pedigree (4,5,5,5,5)
  Stoichiometric requirement for carbon monoxide relative to propylene (with same efficiency).
  property wet mass 1 kg; name WM
  property water in wet mass 0 kg; name WWM
  property water content 0; name water_content
  property carbon content, non-fossil 0; name C_content_non_fossil
  property dry mass 1 kg; name DM
  property carbon content, fossil 0.428571; name C_content_fossil
  properties: heating value, net 12.99 MJ
- electricity, medium voltage: 0 kWh; source Chauvel, A. 1989; pedigree (1,1,1,1,1)
  Estimation. From Tab 37.2, ecoinvent v2 report 22
  Uncertainty: C
- nitrogen, liquid: 0.00747011 kg; = 0.0125*propylene_input; source Chauvel, A. 1989; lognormal variance with pedigree 0.0726, pedigree (1,3,5,5,1)
  Estimation. From Tab 37.1, ecoinvent v2 report 22
  Uncertainty: C
  properties: wet mass 1 kg, dry mass 1 kg
- heat, district or industrial, other than natural gas: 0.00208351, 5.13801 MJ (2 entries); source Chauvel, A. 1989; lognormal variance with pedigree 0.0726, pedigree (1,3,5,5,1)
  Estimation. From Tab 37.2, ecoinvent v2 report 22
  Uncertainty: C
- heat, district or industrial, natural gas: 0.0861708, 5.59111 MJ (2 entries); source Chauvel, A. 1989; lognormal variance with pedigree 0.0726, pedigree (1,3,5,5,1)
  Estimation. From Tab 37.2, ecoinvent v2 report 22
  Uncertainty: C
- propylene: 0.011231, 0.586377 kg (2 entries); source Chauvel, A. 1989; lognormal variance with pedigree 0.0726, pedigree (1,3,5,5,1)
  Estimation.
  Uncertainty: C
- electricity, medium voltage: 0.00233017, 0.000446827, 0.00750129, 0.1091, 0.0153776, 0.0501027 kWh (6 entries); source Chauvel, A. 1989; lognormal variance with pedigree 0.0726, pedigree (1,3,5,5,1)
  Estimation. From Tab 37.2, ecoinvent v2 report 22
  Uncertainty: C

## Inputs from nature
- Water, cooling, unspecified natural origin [natural resource, in water]: 0.0913146 m3; = 152.8E-3*propylene_input; source Chauvel, A. 1989; lognormal variance with pedigree 0.0726, pedigree (1,3,5,5,1)
  Estimation. From Tab 37.1, ecoinvent v2 report 22
  Uncertainty: C

## Emissions to nature
- Carbon dioxide, fossil [air, urban air close to ground]: 0.0452487 kg; = (1-process_efficiency-0.01)*propylene_input*28.01/42.08*44/28+propylene_input*((1-process_efficiency)-0.002)*0.9*44/56.11; lognormal variance with pedigree 0.1786, pedigree (4,5,5,5,5)
  The remaining loss of carbon monoxide after 1% air emission, and the carbon contained in the removed propylene not emitted to water was accounted for as CO2 emissions to air.
  It was approximated that the air emissions occurring from the purge vent, the distillation vent and fugitive emission sources were estimated as 0.2 % of the propylene input.
  It is assumed that the manufacturing plants are located in an urban/industrial area and consequently the emissions are categorised as emanating in a high population density area.
  Uncertainty: C
- COD, Chemical Oxygen Demand [water, surface water]: 0.00946612 kg; = propene_to_water*3.3; lognormal variance with pedigree 0.188, pedigree (4,5,5,5,5)
  Calculated from the amount of propylene in the treated waste water assuming a carbon conversion of 96% for COD.
  Uncertainty: C
- Propene [water, surface water]: 0.00286852 kg; name propene_to_water; = propylene_input*((1-process_efficiency)-0.002)*0.1; lognormal variance with pedigree 0.448, pedigree (4,5,5,5,5)
  Estimation. The remaining amount of unreacted propylene was assumed to leave the production process with the waste water. Efficiency of removal 90%.
  It is assumed that the manufacturing plants are located in an urban/industrial area and consequently the emissions are categorized as emanating in a high population density area. The emissions into water are assumed to be emitted into rivers.
  Uncertainty: E
- BOD5, Biological Oxygen Demand [water, surface water]: 0.000473306 kg; = propene_to_water*3.3*0.05; lognormal variance with pedigree 0.188, pedigree (4,5,5,5,5)
  BOD assumed to be 0.05*COD due to waste water treatment.
  It is assumed that the manufacturing plant is located in an urban/industrial area and consequently the emissions are categorised as emanating in a high population density area.
  The emissions into water are assumed to be emitted into rivers.
  Uncertainty: C
- DOC, Dissolved Organic Carbon [water, surface water]: 0.00246693 kg; = propene_to_water*0.86; lognormal variance with pedigree 0.188, pedigree (4,5,5,5,5)
  DOC assumed equal to TOC.
  Uncertainty: C
- Propene [air, urban air close to ground]: 0.00119522 kg; name propene_to_air; = propylene_input*0.002; lognormal variance with pedigree 0.188, pedigree (4,5,5,5,5)
  Estimation. It was approximated that the air emissions occurring from the purge vent, the distillation vent and fugitive emission sources were estimated as 0.2 % of the propylene input.
  It is assumed that the manufacturing plants are located in an urban/industrial area and consequently the emissions are categorised as emanating in a high population density area.
  Uncertainty: E
- TOC, Total Organic Carbon [water, surface water]: 0.00246693 kg; = propene_to_water*0.86; lognormal variance with pedigree 0.188, pedigree (4,5,5,5,5)
  Calculated from the amount of propylene in the treated waste water assuming a carbon conversion of 96%.
  It is assumed that the manufacturing plants are located in an urban/industrial area and consequently the emissions are categorized as emanating in a high population density area. The emissions into water are assumed to be emitted into rivers.
  Uncertainty: C
- Carbon monoxide, fossil [air, urban air close to ground]: 0.00946612 kg; = propene_to_water*3.3; lognormal variance with pedigree 0.798, pedigree (4,5,5,5,5)
  It is assumed that 1% of the unreacted carbon monoxide is emitted to air. The remaining CO is oxidated to CO2.
  It is assumed that the manufacturing plants are located in an urban/industrial area and consequently the emissions are categorised as emanating in a high population density area.
  Uncertainty: E
- Hydrogen [air, urban air close to ground]: 0.00286165 kg; = (1-process_efficiency)*propylene_input*4.03/42.08; lognormal variance with pedigree 0.188, pedigree (4,5,5,5,5)
  Unreacted hydrogen is released to air.
  It is assumed that the manufacturing plants are located in an urban/industrial area and consequently the emissions are categorised as emanating in a high population density area.
  Uncertainty: E

## Sampling procedure
Literature data.

## Extrapolations
This dataset has been copied from an original dataset covering the geography RER. The uncertainty has been adjusted accordingly.

## Review by Gregor Wernet 2017-08-04
This dataset was additionally reviewed in a separate review process by Eric Johnson of Atlantic Consulting as well as Emilia Moreno Ruiz and Gregor Wernet of ecoinvent.
