# heavy fuel oil, import from RoW

Dataset: EcoSpold 2, unit process
Geography: BR
Time period: 2014-01-01 to 2021-12-31
Technology level: current
Classification: ISIC rev.4 ecoinvent: 1920:Manufacture of refined petroleum products
Scenario: Business-as-Usual
System model: Allocation, cut-off by classification
Generated by: Axel Lieblich
Published in: Fehrenbach, H. 2018
Database: ecoinvent
isCopyrightProtected: true
accessRestrictedTo: 1

## General comment
This dataset represents the import of a refined petroleum products of unspecified geographical origin of supply to the domestic/regional market for this product. The transport requirements (expressed in tkm) with tanker ship was assumed to 10'000 km by sea by default. No product losses or other aspects, besides transport requirements have been included. The dataset is only a rough proxy with large uncertainties, and it should hence be revised accordingly if its contribution is expected to be important.

## Included activities start
Activity starts with transport by sea of a refined petroleum product of unspecified geographical origin.

## Included activities end
Activity ends with the refined petroleum product entering the domestic/regional market.

## Reference product
- heavy fuel oil: 1 kg; CPC 33370: Fuel oils n.e.c.; By-product classification allocatable product
  production volume 3.43077e8 kg
    Import according to the JODI-oil database for 2015 (jodidata.org)
  properties: price 0.138 EUR2005, dry mass 1 kg, water in wet mass 0 kg, wet mass 1 kg, water content 0, carbon content, fossil 0.849, carbon content, non-fossil 0, heating value, net 41.2 MJ, carbon content 0.849, carbon allocation 0.849 kg

## Inputs from technosphere
- heavy fuel oil: 1 kg
  Unspecified geographical origin of supply assumed due to lack of information on actual origin or missing corresponding supplying activity.
  properties: carbon content, fossil 0.849, wet mass 1 kg, dry mass 1 kg, heating value, net 41.2 MJ
- transport, freight, sea, tanker for petroleum: 10 metric ton*km; lognormal variance with pedigree 0.33, pedigree (5,5,5,5,5)
  A transport distance of 10'000 km by sea assumed by default.

## Extrapolations
This dataset has been extrapolated from year 2017 to the year of the calculation (2021). The uncertainty has been adjusted accordingly.
