# mastic asphalt production

Dataset: EcoSpold 2, unit process
Geography: CH
Time period: 2000-01-01 to 2021-12-31
Technology level: current
Classification: ISIC rev.4 ecoinvent: 2399:Manufacture of other non-metallic mineral products n.e.c.
Classification: EcoSpold01Categories: construction materials/others
Tags: ConvertedDataset
Scenario: Business-as-Usual
System model: Allocation, cut-off by classification
Generated by: Daniel Kellenberger (obsolete)
Published in: Kellenberger D. 2007
Database: ecoinvent
isCopyrightProtected: true
accessRestrictedTo: 1

## General comment
The raw materials per kg ready mix product are mixed in following ratio: Limestone powder (0.260 kg), sand (0.66 kg), bitumen (0.060 kg) and natural bitumen (0.020 kg). The only process emission taken into account are the VOC-emissions. Further emissions are not taken into account as they play a subordinate role compared to the emissions of the raw material production (e.g. drying of silica sand) and because no data are available. For inventorying the infrastructure, a yearly production amount of 150'000 tons is assumed. The lifespan of the machines is assumed to be 20 years.
[This dataset was already contained in the ecoinvent database version 2. It was not individually updated during the transfer to ecoinvent version 3. Life Cycle Impact Assessment results may still have changed, as they are affected by changes in the supply chain, i.e. in other datasets. This dataset was generated following the ecoinvent quality guidelines for version 2. It may have been subject to central changes described in the ecoinvent version 3 change report (http://www.ecoinvent.org/database/ecoinvent-version-3/reports-of-changes/), and the results of the central updates were reviewed extensively. The changes added e.g. consistent water flows and other information throughout the database. The documentation of this dataset can be found in the ecoinvent reports of version 2, which are still available via the ecoinvent website. The change report linked above covers all central changes that were made during the conversion process.]

## Included activities end
Includes the whole manufacturing process to produce mastic asphalt: raw material provision and transport, heating and mixing, storage, flush mounting, and the infrastructure. No transportation from the plant to the construction site and no requirements for administration are included. No additional buildings and land-use are taken into account as it is assumed that the mixing process takes place at the construction site.

## Geography
For the infrastructure RER-datasets are used as proxy

## Technology
Mixing, heating and casting of raw materials according to current technology used in Switzerland. It can be assumed that the technology is basically the same all over Europe and probably also for the rest of the world.

## Reference product
- mastic asphalt: 1 kg; By-product classification allocatable product; CPC 37930: Articles of asphalt or of similar material
  EcoSpold01Location=CH
  production volume 0.0336675 kg
    This is a placeholder value that does not reflect real-world production volumes. This dataset does not currently require a real-world production volume to work in the database framework, and no actual data were collected yet. This has no negative effect on the results of the ecoinvent database. The placeholder value of this activity was scaled according to the nominal GDP of 2005 (source: United Nations, http://data.un.org/Glossary.aspx?q=GDP+%28current+US%24%29, accessed 20130726) to reflect an appropriate share of the global production volume, which is also a placeholder value.
  property price 0.277 EUR2005
    Calculated value based on data from United Nations Commodity Trade Statistics Database (comtrade.un.org). UN comtrade category: Bituminous mix, mastic from asphalt, bitumen/tar/pitc . Year 2005. Using exchange rate of 1EURO = 1.209 USD. Average of price of import into 5 main markets (EU, US, JP, IN and CN).
  property carbon content, fossil 0.0968869
    Mastic asphalt is composed by Limestone powder (26%), sand (66%), and bitumen (8%) (tab 5.1, ecoinvent v2.2 report 7_part XXIII)
  property carbon content, non-fossil 0
    (same comment as for mastic asphalt)
  property heating value, net 2.94 MJ
    LHV is calculated based on the Carbon content of the product. More details can be found on the respective documentation.
  property carbon content 0.0968869
    carbon content on a dry matter basis (reserved; not for manual entry)
  properties: water content 0, dry mass 1 kg, wet mass 1 kg, water in wet mass 0 kg, carbon allocation 0.0968869 kg

## Inputs from technosphere
- lime, packed: 0.26 kg; lognormal variance with pedigree 0.69, pedigree (1,1,5,1,1)
  EcoSpold01Location=CH
  estimation
  properties: water content 0.00200401, carbon content, fossil 0.117492, wet mass 1 kg, dry mass 0.998 kg
  note on carbon content, fossil: Table 3.1, ecoinvent v2.2 report 7, part VII, pg 3. MW CaCO3=100, MW MgCO3=84
- diesel, burned in building machine: 0.021571 MJ; lognormal variance with pedigree 0.69, pedigree (1,1,5,1,1)
  EcoSpold01Location=GLO
  estimation
  properties: heating value, net 1 MJ
- pitch: 0.08 kg; lognormal variance with pedigree 0.69, pedigree (1,1,5,1,1)
  estimation
  EcoSpold01Location=CH
  properties: wet mass 1 kg, carbon content, fossil 0.83, dry mass 1 kg, heating value, net 28 MJ
- heat, district or industrial, other than natural gas: 1.5 MJ; lognormal variance with pedigree 0.69, pedigree (1,1,5,1,1)
  EcoSpold01Location=CH
  estimation
  properties: heating value, net 1 MJ
- conveyor belt: 3.3333e-8 m; lognormal variance with pedigree 0.69, pedigree (1,1,5,1,1)
  EcoSpold01Location=RER
  estimation
- electricity, medium voltage: 0.027778 kWh; lognormal variance with pedigree 0.34, pedigree (1,1,5,1,1)
  EcoSpold01Location=CH
  estimation
- sand: 0.66 kg; lognormal variance with pedigree 0.69, pedigree (1,1,5,1,1)
  EcoSpold01Location=CH
  estimation
  properties: dry mass 1 kg, wet mass 1 kg
- industrial machine, heavy, unspecified: 6.6667e-6 kg; lognormal variance with pedigree 0.69, pedigree (1,1,5,1,1)
  EcoSpold01Location=RER
  estimation

## Emissions to nature
- NMVOC, non-methane volatile organic compounds, unspecified origin [air, unspecified]: 0.00019 kg; lognormal variance with pedigree 0.69, pedigree (1,1,5,1,1)
  estimation
- Benzo(a)pyrene [air, unspecified]: 4.66e-10 kg; lognormal variance with pedigree 0.69, pedigree (1,1,5,1,1)
  estimation

## Sampling procedure
estimation

## Extrapolations
This dataset has been extrapolated from year 2004 to the year of the calculation (2021). The uncertainty has been adjusted accordingly.

## Review by Rolf Frischknecht 2007-09-13
passed
