# orange production, fresh grade

Dataset: EcoSpold 2, unit process
Geography: ZA
Time period: 2015-01-01 to 2021-12-31
Technology level: current
Classification: ISIC rev.4 ecoinvent: 0123:Growing of citrus fruits
Scenario: Business-as-Usual
System model: Allocation, cut-off by classification
Share of production covered: 8 %
Generated by: Karen Muir
Published in: de Kock, L. 2017
Database: ecoinvent
isCopyrightProtected: true
accessRestrictedTo: 1

## General comment
This dataset represents the production of 1 kg of orange, fresh grade. Fresh grade oranges are meant for direct human consumption. The reference flow is the average yield per ha and year in 2015: yield (38.11 t/ha) obtained under irrigated conditions. The data are representative for orange production, fresh grade, in South Africa used for the export market.

## Included activities start
This activity starts with the nursery producing fruit tree seedlings, i.e.grafted young trees to be planted.

## Included activities end
This activity ends with the waste treatment after the clearing of the orchard. The dataset includes all activities during a year in the productive phase of the orchard including the establishment phase per year of lifetime (33 years), the clearing of the orchard including waste treatment.
The establishment phase of the orchard includes tree nursery, soil cultivation, planting trees, sowing grass, installation of trellis system (posts and wires) and irrigation. The productive phase of the orchard includes machine operations. Machine operations in the productive phase are: soil cultivation, fertiliser and pesticide application, and irrigation. Direct field emissions and land use change are included. At the end of the productive phase the orchard is cleared.
The inputs of seedlings, fertilisers (N-P2O5- K2O from mineral fertiliser input: 143-35-64 kg/ha*a ) and pesticides as well as packaging of fertilisers and pesticides are considered. Heavy metal uptake by the crop is considered.

## Geography
The inventory is modelled for South Africa

## Technology
Conventional production

## Time period
This dataset is based on data from the 2015 production year according to CGA Key Industry Ststostics and approved Confronting Climate Change datasets.

## Parameters
- lifespan of plantation: 32.9754 year; name lifespan; lognormal variance with pedigree 0.0026, pedigree (1,3,1,1,1)
  Lifespan [years] of the crop plantation
- annual yield, agriculture: 38.11 metric ton/(ha*year); name yield_agriculture; lognormal variance with pedigree 0.3006, pedigree (1,3,1,1,1)
  Average annual yield according to Confronting Climate Change approved datasets: 38.11 t/ha*a, based on a total production of 136,019 tonnes and total area of 3569 ha.
- fraction_iw_to_surface_water: 0.2 dimensionless; lognormal variance with pedigree 0.51, pedigree (5,5,5,5,5)
  Fraction of irrigation water applied which is emitted to surface water
- irrigation water fraction to ground water: 0.8 dimensionless; name fraction_iw_to_ground_water; lognormal variance with pedigree 0.51, pedigree (5,5,5,5,5)
  Fraction of irrigation water applied which is emitted to ground water
- potassium phosphite: 1.48149e-5 kg; name potassium_phosphite; lognormal variance with pedigree 0.0344, pedigree (2,3,2,1,1)
  Potassium phosphite application (kg/kg oranges). Calculated based on 2009 pesticide application values from Dabrowski, Shadung, & Wepener (2014) and König (2015) with data on production area from FAO (2012).
- carbaryl: 6.77428e-10 kg; lognormal variance with pedigree 0.0344, pedigree (2,3,2,1,1)
  Carbaryl application (kg/ kg oranges). Calculated based on 2009 pesticide application values from Dabrowski, Shadung, & Wepener (2014) and König (2015) with data on production area from FAO (2012).
- bromacil: 3.77102e-8 kg; lognormal variance with pedigree 0.0344, pedigree (2,3,2,1,1)
  Bromacil application (kg/ kg oranges). Calculated based on 2009 pesticide application values from Dabrowski, Shadung, & Wepener (2014) and König (2015) with data on production area from FAO (2012).
- copper from copper oxychloride: 3.04526e-5 dimensionless; name copper_emissions_copper_oxychloride; lognormal variance with pedigree 0.0344, pedigree (2,3,2,1,1)
  Copper emission arising from copper oxychloride (kg/kg oranges): Cu(OH)3Cl: molecular mass: 213.57 g/mol, Cu: 63.55 g/mol, Cu: 59.51%. Calculated based on 2009 pesticide application values from Dabrowski, Shadung, & Wepener (2014) and König (2015) with data on production area from FAO (2012).
- copper: -6.80011e-7 kg; name copper_emissions; normal variance with pedigree 0.033, pedigree (2,3,2,1,1)
  Copper emissions to the soil, other than those arising from the application of copper oxychloride. Calculated value: calculated according to Nemecek und Schnetzer (2012). Heavy metal content of inorganic fertilisers according to Desaules & Struder (1993), heavy-metal contents of organic fertilisers according to Freiermuth (2006) from Menzi & Kessler (1998) and Desaules & Studer (1993), dry matter content from Walther et al. (2001), heavy metal content of plant material according to Mattos at al. (2003), heavy metal content of pesticides according to Perkow & Ploss (1994) in Freiermuth (2006), deposition according to Freiermuth (2006), heavy metal content in exported biomass according to Freiermuth (2006).
- carbendazim: 1.08388e-8 kg; name Carbendazim; lognormal variance with pedigree 0.0044, pedigree (2,3,2,1,1)
  Carbendazim application (kg/kg oranges). Calculated based on 2009 pesticide application values from Dabrowski, Shadung, & Wepener (2014) and König (2015) with data on production area from FAO (2012).
- imidacloprid: 7.7617e-5 kg; lognormal variance with pedigree 0.0344, pedigree (2,3,2,1,1)
  Imidacloprid application (kg/kg oranges). Calculated based on 2009 pesticide application values from Dabrowski, Shadung, & Wepener (2014) and König (2015) with data on production area from FAO (2012).
- irrigation water fraction to air: 0.72 dimensionless; name fraction_iw_to_air; lognormal variance with pedigree 0.51, pedigree (5,5,5,5,5)
  Fraction of irrigation water applied which is emitted to air. Literature value: Siebert, (2010); Vionnet, S., Quantis Water Database - Technical Report (2012)
- fosthiazate: 6.23234e-8 kg; lognormal variance with pedigree 0.0344, pedigree (2,3,2,1,1)
  Fosthiazate application/emissions. Calculated based on 2009 pesticide application values from Dabrowski, Shadung, & Wepener (2014) and König (2015) with data on production area from FAO (2012).

## Reference product
- orange, fresh grade: 1 kg; CPC 01323: Oranges; By-product classification allocatable product
  Orange, fresh grade, South African production. Output of orange, fresh grade, produced for direct human consumption.
  production volume 1.64518e9 kg
    Total production for 2015. Source: CGA (2016), Key Industry Statistics for Citrus Growers 2016. Citrus Growers' Association of South Africa.
  property carbon content, non-fossil 0.350629
    calculation: C-content of components according to ecoinvent report No. 15a. Source of composition: Souci, S.W., Fachmann, W., Kraut, H. (Hg.: Bundesminsiterium fur Ernahrung, Landwirtschaft und Forsten, Bonn) 'Die Zusammensetzung der Lebensmittel - Nahrwerttabellen', medpharm Scientific Publishers Stuttgart, CRC Press; 2000.
  property price 0.16 EUR2005
    Personal communication with the Technical Head of Citrus at Core Fruit, South Africa on 26.04.2018
  property carbon content 0.350629
    carbon content on a dry matter basis (reserved; not for manual entry)
  properties: water in wet mass 0.457112 kg, water content 0.842, wet mass 1 kg, dry mass 0.542888 kg, carbon content, fossil 0, carbon allocation 0.190353 kg

## Inputs from technosphere
- inorganic phosphorus fertiliser, as P2O5: 0.000930705 kg; source FAO 2005; lognormal variance with pedigree 0.0046, pedigree (1,4,3,1,1)
  Measured value: CCC primary data. Stoechiometric calculation: 1 P = 2.29 P2O5
  properties: dry mass 1 kg, wet mass 1 kg
- potassium sulfate: 0.000108238 kg; source FAO 2005; lognormal variance with pedigree 0.118177, pedigree (2,1,3,1,1)
  The exchange has been updated from 'potassium sulfate, as K2O' into 'potassium sulfate' and therefore its amount has been scaled (multiplied) from 0.0001 kg by 1.85 kg of 'potassium sulfate' per kg of 'potassium sulfate, as K2O'. Original comment of the exchange is: Calculated based on literature values or expert estimation: The total amount of nutrient (FAO 2005) multiplied by the country-share of fertiliser type (IFA 2014). See supporting documentation 'WFLDB-Documentation.pdf' chapter 'Fertiliser application' for L3 and L4 data (https://ecoquery.ecoinvent.org/File/Reports).
  Corresponds to 2.03 kg/ha
  properties: dry mass 1 kg, wet mass 1 kg
- fruit tree seedling, for planting: 0.000378269 unit; source Confronting Climate Change 2017; lognormal variance with pedigree 0.119577, pedigree (1,4,3,1,1)
  measured value: industry experts and CCC data.
  Further reference: Steve Turner, Core Fruit
  properties: carbon content, non-fossil 0.439481, dry mass 0.578035 kg, water content 0.73, wet mass 1 kg
  note on carbon content, non-fossil: calculation: C-content of components according to ecoinvent report No. 15a. Source of composition: https://ndb.nal.usda.gov/ndb/search/. Unspecific seedling used as proxy.
- inorganic nitrogen fertiliser, as N: 0.00362562 kg; source Confronting Climate Change 2017; lognormal variance with pedigree 0.118277, pedigree (2,2,3,1,1)
  Measured value: CCC primary data for total nitrogen fertiliser use minus the ammonium sulphate and urea data in this dataset.
  properties: wet mass 1 kg, dry mass 1 kg
- mowing, by rotary mower: 2.36155e-5 ha; source Confronting Climate Change 2017; lognormal variance with pedigree 0.0046, pedigree (1,4,3,1,1)
  Measured value: Weighted average from main orange production regions. This includes mulching, as it is not carried out seperately but at the same time as mowing.
  Further reference: Steve Turner, Core Fruit
- land use change, perennial crop: 4.2788e-6 ha; name luc_perennial_crop; source Confronting Climate Change 2017; lognormal variance with pedigree 0.012, pedigree (1,4,3,1,1)
  Measured value: Amount of LUC from virgin land during the past 20 years for approved CCC datasets.
- waste wood, untreated: -0.0384117 kg; name waste_wood; source Nemecek T. 2015; lognormal variance with pedigree 0.118177, pedigree (2,1,3,1,1)
  Literature value. Wood from trees after 1-2 years of sorrage at the field (20% water) per lifetime year (33 years) of the orchard.
  production volume 6.31949e7 kg; = 1.6452e09* waste_wood
    Calculated from the reference product amount and production volume.
  property price 0 EUR2005; name waste_wood_price_EUR2005
  properties: water content 0.25, wet mass 1 kg, carbon content, non-fossil 0.48632, dry mass 0.8 kg, heating value, net 13.99 MJ
  note on heating value, net: Value taken from the general comment of the treatment dataset.
- planting tree: 0.000378269 unit; source Confronting Climate Change 2017; lognormal variance with pedigree 0.0046, pedigree (1,4,3,1,1)
  measured value: industry experts and CCC data.
  Further reference: Steve Turner, Core Fruit
- ammonium sulfate: 0.000103201 kg; source FAO 2005; lognormal variance with pedigree 0.118177, pedigree (2,1,3,1,1)
  Literature value
  properties: wet mass 1 kg, dry mass 1 kg
- bipyridylium-compound: 2.43061e-5 kg; source Dabrowski, J.M. 2014; lognormal variance with pedigree 0.0463498, pedigree (2,3,5,1,1)
  Calculated value: Paraquat. Calculated based on 2009 pesticide application values from Dabrowski, Shadung, & Wepener (2014) and König (2015) with data on production area from FAO (2012).
  Further references: Koenig, A. (2015). Environmental hotspots and the potential of clean technologies in the South African fruit supply chain. Master thesis at Zurich University of applied Sciences (ZHAW), Institute of Natural Resource Sciences, unpublished; FAO. (2012). Citrus Fruit - Fresh and proceeded - Annual Statistics.
  properties: carbon content, fossil 0.418929, wet mass 1 kg, dry mass 1 kg
- packaging, for pesticides: 0.00123459 kg; lognormal variance with pedigree 0.0532, pedigree (4,3,3,5,4)
  Total amount of active substance/s of pesticides needed for the production of orange, fresh grade is calculated to be circa 6.17E-04 kg. Pesticide/s used in this dataset is/are: '[thio]carbamate-compound', 'benzimidazole-compound', 'bipyridylium-compound', 'copper', 'glyphosate', 'mancozeb', 'organophosphorus-compound, unspecified', 'pesticide, unspecified', 'phenoxy-compound', 'triazine-compound, unspecified'. The total amount of active substance/s is doubled in order to account for the packaging of the dilluted product of pesticide/s that is/are applied. Therefore, 1.23E-03 kg of packaging for pesticides is justified with this exchange.
  properties: wet mass 1 kg, carbon content, fossil 0.85714, dry mass 1 kg, price 0.0642 EUR2005, heating value, net 25.97 MJ
- mancozeb: 0.000400152 kg; source Dabrowski, J.M. 2014; lognormal variance with pedigree 0.0463498, pedigree (2,3,5,1,1)
  Calculated value: Calculated based on 2009 pesticide application values from Dabrowski, Shadung, & Wepener (2014) and König (2015) with data on production area from FAO (2012).
  Further references: Koenig, A. (2015). Environmental hotspots and the potential of clean technologies in the South African fruit supply chain. Master thesis at Zurich University of applied Sciences (ZHAW), Institute of Natural Resource Sciences, unpublished; FAO. (2012). Citrus Fruit - Fresh and proceeded - Annual Statistics.
  properties: dry mass 1 kg, wet mass 1 kg, carbon content, fossil 0.17759
- packaging, for fertilisers: 0.0127088 kg; lognormal variance with pedigree 0.0532, pedigree (4,3,3,5,4)
  Total amount of active substance/s of fertilisers needed for the production of 'orange, fresh grade' is calculated to be circa 6.35E-03 kg. Fertiliser/s used in this dataset is/are: 'ammonium sulfate, as N', 'nitrogen fertiliser, as N', 'phosphate fertiliser, as P2O5', 'potassium chloride, as K2O', 'potassium fertiliser, as K2O', 'potassium sulfate, as K2O', 'urea, as N'. The total amount of active substance/s is doubled in order to account for the packaging of the dilluted product of fertiliser/s that is/are applied. Therefore, 1.27E-02 kg of packaging for fertilisers is justified with this exchange.
  properties: carbon content, fossil 0.825301, dry mass 1 kg, price 0.0642 EUR2005, wet mass 1 kg, heating value, net 25.01 MJ
  note on carbon content, fossil: Considering a chemical formula (C2H4)n for polyethylene, carbon content-fossil is calculated to be 0.856286 kg of Carbon per kg of dry mass.
- transport, tractor and trailer, agricultural: 0.000143088 metric ton*km; source Nemecek T. 2015; lognormal variance with pedigree 0.156439, pedigree (4,1,3,1,1)
  On-farm transport: Yield (in tonnes) multiplied by the average distance from field to farm. The distance was obtained by extrapolation (modified MEXALCA approach). See supporting documentation 'WFLDB-Documentation.pdf' chapter 'Machinery processes' (https://ecoquery.ecoinvent.org/File/Reports).
- copper, cathode: 3.04526e-5 kg; source Dabrowski, J.M. 2014; lognormal variance with pedigree 0.0463498, pedigree (2,3,5,1,1)
  Stoechiometric calculation: Copper oxychloride: Cu(OH)3Cl: molecular mass: 213.57 g/mol, Cu: 63.55 g/mol, Cu: 59.51%. Calculated value: Calculated based on 2009 pesticide application values from Dabrowski, Shadung, & Wepener (2014) and König (2015) with data on production area from FAO (2012).
  Further references: Koenig, A. (2015). Environmental hotspots and the potential of clean technologies in the South African fruit supply chain. Master thesis at Zurich University of applied Sciences (ZHAW), Institute of Natural Resource Sciences, unpublished; FAO. (2012). Citrus Fruit - Fresh and proceeded - Annual Statistics.
  properties: dry mass 1 kg, wet mass 1 kg
- fertilising, by broadcaster: 6.21728e-5 ha; source Confronting Climate Change 2017; lognormal variance with pedigree 0.119577, pedigree (1,4,3,1,1)
  Measured value: Weighted average from main orange production regions.
  Further reference: Steve Turner, Core Fruit
- glyphosate: 3.36095e-5 kg; source Dabrowski, J.M. 2014; lognormal variance with pedigree 0.0463498, pedigree (2,3,5,1,1)
  (same comment as for mancozeb)
  properties: wet mass 1 kg, dry mass 1 kg, carbon content, fossil 0.214286
- pesticide, unspecified: 9.25319e-5 kg; = imidacloprid+ potassium_phosphite+ fosthiazate+ bromacil; source Dabrowski, J.M. 2014; lognormal variance with pedigree 0.0463498, pedigree (2,3,5,1,1)
  Calculated value: Imidacloprid, potassium phosphite, fosthiazate & bromacil. Calculated based on 2009 pesticide application values from Dabrowski, Shadung, & Wepener (2014) and König (2015) with data on production area from FAO (2012).
  Further references: Koenig, A. (2015). Environmental hotspots and the potential of clean technologies in the South African fruit supply chain. Master thesis at Zurich University of applied Sciences (ZHAW), Institute of Natural Resource Sciences, unpublished; FAO. (2012). Citrus Fruit - Fresh and proceeded - Annual Statistics.
  properties: carbon content, fossil 0.486978, dry mass 1 kg, wet mass 1 kg
- application of plant protection product, by field sprayer: 0.000489738 ha; = 0.00046349835081447+0.0000262394942368143; source Confronting Climate Change 2017; lognormal variance with pedigree 0.119964, pedigree (1,4,3,1,1)
  Measured value: Weighted average from main orange production regions. Includes application of plant protection production (0.00046349835081447ha) and acts as a proxy for orchard sanitation (0.0000262394942368143ha).
  Further reference: Steve Turner, Core Fruit
- irrigation: 0.234347 m3; name irrigation_water_input; source van der Walt, M.W. 2017; lognormal variance with pedigree 0.118177, pedigree (2,1,3,1,1)
  Literature value: 14.66 million m3 over 1641.46 hectares= 8931.07m3/ha or 0.2343m3/kg.
  Further references: Personal communication on 29.06.2017 with Teunis Wahrmeijer, University of Pretoria.
  properties: dry mass 0.11 kg, wet mass 1000 kg, water content 9089.91
- inorganic potassium fertiliser, as K2O: 0.00130127 kg; source Confronting Climate Change 2017; lognormal variance with pedigree 0.0046, pedigree (1,4,3,1,1)
  Measured value: CCC primary data for total potassium fertiliser use minus the potassium chloride and potassium sulphate data this dataset.
  properties: dry mass 1 kg, wet mass 1 kg
- [thio]carbamate-compound: 1.15163e-8 kg; = Carbendazim+ carbaryl; source Dabrowski, J.M. 2014; lognormal variance with pedigree 0.0463498, pedigree (2,3,5,1,1)
  Calculated value: Aldicarb, carbendazim & carbaryl. Calculated based on 2009 pesticide application values from Dabrowski, Shadung, & Wepener (2014) and König (2015) with data on production area from FAO (2012).
  Further references: Koenig, A. (2015). Environmental hotspots and the potential of clean technologies in the South African fruit supply chain. Master thesis at Zurich University of applied Sciences (ZHAW), Institute of Natural Resource Sciences, unpublished; FAO. (2012). Citrus Fruit - Fresh and proceeded - Annual Statistics.
  properties: dry mass 1 kg, carbon content, fossil 0.626349, wet mass 1 kg
- phenoxy-compound: 2.9452e-5 kg; source Nemecek T. 2015; lognormal variance with pedigree 0.0463498, pedigree (2,3,5,1,1)
  Proxy: Source for total amount of pesticides: extrapolated from MEXALCA. Active ingredient is calculated based on the ecoinvent dataset Orange, fresh grade ES. For calculations see supporting documentation 'WFLDB-Documentation.pdf' (https://ecoquery.ecoinvent.org/File/Reports).
  properties: carbon content, fossil 0.532559, dry mass 1 kg, wet mass 1 kg
- benzimidazole-compound: 1.05679e-7 kg; source Dabrowski, J.M. 2014; lognormal variance with pedigree 0.0463498, pedigree (2,3,5,1,1)
  Calculated value: Benomyl. Calculated based on 2009 pesticide application values from Dabrowski, Shadung, & Wepener (2014) and König (2015) with data on production area from FAO (2012).
  Further references: Koenig, A. (2015). Environmental hotspots and the potential of clean technologies in the South African fruit supply chain. Master thesis at Zurich University of applied Sciences (ZHAW), Institute of Natural Resource Sciences, unpublished; FAO. (2012). Citrus Fruit - Fresh and proceeded - Annual Statistics.
  properties: dry mass 1 kg, wet mass 1 kg, carbon content, fossil 0.529668
- urea: 5.26459e-5 kg; source Western Cape Department of Agriculture. 2007; lognormal variance with pedigree 0.0046, pedigree (1,4,3,1,1)
  The exchange has been updated from 'urea, as N' into 'urea' and therefore its amount has been scaled (multiplied) from 0 kg by 2.1438 kg of 'urea' per kg of 'urea, as N'. Original comment of the exchange is: Measured value
  properties: carbon content, fossil 0.2, wet mass 1 kg, dry mass 1 kg
- organophosphorus-compound, unspecified: 6.66589e-6 kg; source Dabrowski, J.M. 2014; lognormal variance with pedigree 0.0463498, pedigree (2,3,5,1,1)
  Calculated value: Terbufos and trichlofon. Calculated based on 2009 pesticide application values from Dabrowski, Shadung, & Wepener (2014) and König (2015) with data on production area from FAO (2012).
  Further references: Koenig, A. (2015). Environmental hotspots and the potential of clean technologies in the South African fruit supply chain. Master thesis at Zurich University of applied Sciences (ZHAW), Institute of Natural Resource Sciences, unpublished; FAO. (2012). Citrus Fruit - Fresh and proceeded - Annual Statistics.
  properties: dry mass 1 kg, wet mass 1 kg, carbon content, fossil 0.260898
- triazine-compound, unspecified: 9.48399e-9 kg; source Dabrowski, J.M. 2014; lognormal variance with pedigree 0.00914984, pedigree (1,4,3,1,1)
  Calculated value: Simazine. Calculated based on 2009 pesticide application values from Dabrowski, Shadung, & Wepener (2014) and König (2015) with data on production area from FAO (2012).
  Further references: Koenig, A. (2015). Environmental hotspots and the potential of clean technologies in the South African fruit supply chain. Master thesis at Zurich University of applied Sciences (ZHAW), Institute of Natural Resource Sciences, unpublished; FAO. (2012). Citrus Fruit - Fresh and proceeded - Annual Statistics.
  properties: carbon content, fossil 0.475616, dry mass 1 kg, wet mass 1 kg
- naphtha: 0.002153 kg; source Nemecek T. 2015; lognormal variance with pedigree 0.00784984, pedigree (2,2,3,1,1)
  Proxy: Total amount of horticultural oil is calculated based on the ecoinvent dataset Orange, fresh grade ES. For calculations see supporting documentation 'WFLDB-Documentation.pdf' (https://ecoquery.ecoinvent.org/File/Reports).
  properties: wet mass 1 kg, dry mass 1 kg, carbon content, fossil 0.919743, heating value, net 45 MJ
- potassium chloride: 0.000491568 kg; source Confronting Climate Change 2017; lognormal variance with pedigree 0.118177, pedigree (2,1,3,1,1)
  The exchange has been updated from 'potassium chloride, as K2O' into 'potassium chloride' and therefore its amount has been scaled (multiplied) from 0.0003 kg by 1.5829 kg of 'potassium chloride' per kg of 'potassium chloride, as K2O'. Original comment of the exchange is: Literature value
  properties: wet mass 1 kg, dry mass 1 kg
- establishing orchard: 0.000378269 unit; source Confronting Climate Change 2017; lognormal variance with pedigree 0.118177, pedigree (2,1,3,1,1)
  measured value: industry experts and CCC data. Tree density: average 475 trees/ha.
  Further reference: Steve Turner, Core Fruit

## Inputs from nature
- Occupation, permanent crop, irrigated [natural resource, land]: 0.262398 m2*year; name occupation; = (1*10000)/ (yield_agriculture*1000); source Confronting Climate Change 2017; lognormal variance with pedigree 0.006, pedigree (1,4,3,1,1)
  Measured value: CCC primary data.
- Energy, gross calorific value, in biomass [natural resource, biotic]: 2.5507 MJ; source Nemecek T. 2015; lognormal variance with pedigree 0.00784984, pedigree (2,2,3,1,1)
  Calculated value: dry matter content = 16%
- Transformation, to permanent crop, irrigated [natural resource, land]: 0.00795741 m2; = occupation/ lifespan; source Confronting Climate Change 2017; lognormal variance with pedigree 0.012, pedigree (1,4,3,1,1)
  Measured value: CCC primary data.
- Transformation, from permanent crop, irrigated [natural resource, land]: 0.00795741 m2; = occupation/ lifespan; source Confronting Climate Change 2017; lognormal variance with pedigree 0.012, pedigree (1,4,3,1,1)
  Measured value: CCC primary data.
- Carbon dioxide, in air [natural resource, in air]: 0.222508 kg; source Nemecek T. 2015; lognormal variance with pedigree 0.00784984, pedigree (2,2,3,1,1)
  Literature value

## Emissions to nature
- Nitrogen oxides [air, non-urban air or from high stacks]: 1.80915e-5 kg; source Nemecek, T. 2011; lognormal variance with pedigree 0.042, pedigree (3,5,3,1,1)
  Calculated value: calculated from N2O emissions according to Nemecek und Schnetzer (2011).
- Imidacloprid [soil, agricultural]: 7.7617e-5 kg; source Dabrowski, J.M. 2014; lognormal variance with pedigree 0.0742, pedigree (2,3,5,1,1)
  Calculated value: 100% of input quantity. Calculated based on 2009 pesticide application values from Dabrowski, Shadung, & Wepener (2014) and König (2015) with data on production area from FAO (2012).
  Further references: Koenig, A. (2015). Environmental hotspots and the potential of clean technologies in the South African fruit supply chain. Master thesis at Zurich University of applied Sciences (ZHAW), Institute of Natural Resource Sciences, unpublished; FAO. (2012). Citrus Fruit - Fresh and proceeded - Annual Statistics.
- Cadmium, ion [water, ground-]: 9.4109e-10 kg; source Nemecek, T. 2011; lognormal variance with pedigree 0.102, pedigree (3,5,3,1,1)
  Calculated value: calculated according to Nemecek und Schnetzer (2011). Leaching rates according to Wolfensberger & Dinkel (1997), heavy metal content of inorganic fertilisers according to Desaules & Struder (1993), heavy-metal contents of organic fertilisers according to Freiermuth (2006) from Menzi & Kessler (1998) and Desaules & Studer (1993), dry matter content from Walther et al. (2001), deposition and content of seeds according to Freiermuth (2006), heavy metal content of pesticides according to Perkow & Ploss (1994) in Freiermuth (2006).
  Further references:
  Wolfensberger U. & Dinkel F. (1997) Beurteilung nachwachsender Rohstoffe in der Schweiz in den Jahren 1993-1996, FAT und Carbotech, im Auftrag des Bundesamtes für Landwirtschaft, Bern;
  Desaules A. & Studer K. (1993) NABO: Nationales Beobachtungsnetz, Messresultate 1985-1991, Schriftenreihe Umwelt Nr. 200, BUWAL (Bundesamt für Umwelt, Wald und Landschaft), Bern;
  Menzi H. & Kessler J. (1998) Heavy metal content of manures in Switzerland. In: Martinez J. and Maudet M.N. (eds): Proc. 8th International Conference on the FAO ESCORENA;
  Freiermuth R. (2006) Modell zur Berechnung der Schwermetallflüsse in der Landwirtschaftlichen Ökobilanz - SALCA-Schwermetall, Forschungsanstalt Agroscope Reckenholz-Tänikon (ART), 28p
  Walther U., Ryser J.-P. & Flisch R, 2001. Grundlagen für die Düngung im Acker- und Futterbau 2001. Agrarforschung, 8 (6): 1-80.
  Perkow W. und Ploss H., 1994. Wirksubstanzen der Pflanzenschutz- und Schädlingsbekämpfungsmittel. Berlin: Blackwell Wissenschafts-Verlag.
- Mercury [soil, agricultural]: -5.19737e-12 kg; source Nemecek, T. 2011
  Calculated value: calculated according to Nemecek und Schnetzer (2012). Heavy metal content of inorganic fertilisers according to Desaules & Struder (1993), heavy-metal contents of organic fertilisers according to Freiermuth (2006) from Menzi & Kessler (1998) and Desaules & Studer (1993), dry matter content from Walther et al. (2001), heavy metal content of plant material according to Mattos at al. (2003), heavy metal content of pesticides according to Perkow & Ploss (1994) in Freiermuth (2006), deposition according to Freiermuth (2006), heavy metal content in exported biomass according to Freiermuth (2006).
  Further references:
  Desaules A. & Studer K. (1993) NABO: Nationales Beobachtungsnetz, Messresultate 1985-1991, Schriftenreihe Umwelt Nr. 200, BUWAL (Bundesamt für Umwelt, Wald und Landschaft), Bern;
  Menzi H. & Kessler J. (1998) Heavy metal content of manures in Switzerland. In: Martinez J. and Maudet M.N. (eds): Proc. 8th International Conference on the FAO ESCORENA;
  Freiermuth R. (2006) Modell zur Berechnung der Schwermetallflüsse in der Landwirtschaftlichen Ökobilanz - SALCA-Schwermetall, Forschungsanstalt Agroscope Reckenholz-Tänikon (ART), 28p;
  Perkow W. und Ploss H., 1994. Wirksubstanzen der Pflanzenschutz- und Schädlingsbekämpfungsmittel. Berlin: Blackwell Wissenschafts-Verlag.
  Walther U., Ryser J.-P. & Flisch R, 2001. Grundlagen für die Düngung im Acker- und Futterbau 2001. Agrarforschung, 8 (6): 1-80.
  Mattos Jr, D., Quaggio, J. A., Cantarella, H., & Alva, A. K. (2003). Nutrient content of biomass components of Hamlin sweet orange trees. Scientia Agricola, 60(1), 155-160.
- Paraquat [soil, agricultural]: 2.43061e-5 kg; source Dabrowski, J.M. 2014; lognormal variance with pedigree 0.0742, pedigree (2,3,5,1,1)
  (same comment as for Imidacloprid)
- Mancozeb [soil, agricultural]: 0.000400152 kg; lognormal variance with pedigree 0.0357, pedigree (2,2,3,1,1)
  Calculated value: 100% of input value. Calculated based on 2009 pesticide application values from Dabrowski, Shadung, & Wepener (2014) and König (2015) with data on production area from FAO (2012).
  Further references: Koenig, A. (2015). Environmental hotspots and the potential of clean technologies in the South African fruit supply chain. Master thesis at Zurich University of applied Sciences (ZHAW), Institute of Natural Resource Sciences, unpublished; FAO. (2012). Citrus Fruit - Fresh and proceeded - Annual Statistics.
- Trichlorfon [soil, agricultural]: 2.25809e-7 kg; source Dabrowski, J.M. 2014; lognormal variance with pedigree 0.0742, pedigree (2,3,5,1,1)
  (same comment as for Imidacloprid)
- Benomyl [soil, agricultural]: 1.05679e-7 kg; source Dabrowski, J.M. 2014; lognormal variance with pedigree 0.0742, pedigree (2,3,5,1,1)
  (same comment as for Imidacloprid)
- Chromium [soil, agricultural]: -7.29772e-8 kg; source Nemecek, T. 2011
  Calculated value: calculated according to Nemecek und Schnetzer (2011). Heavy metal content of inorganic fertilisers according to Desaules & Struder (1993), heavy-metal contents of organic fertilisers according to Freiermuth (2006) from Menzi & Kessler (1998) and Desaules & Studer (1993), dry matter content from Walther et al. (2001), heavy metal content of plant material according to Mattos at al. (2003), heavy metal content of pesticides according to Perkow & Ploss (1994) in Freiermuth (2006), deposition according to Freiermuth (2006), heavy metal content in exported biomass according to Freiermuth (2006).
  Further references:
  Desaules A. & Studer K. (1993) NABO: Nationales Beobachtungsnetz, Messresultate 1985-1991, Schriftenreihe Umwelt Nr. 200, BUWAL (Bundesamt für Umwelt, Wald und Landschaft), Bern;
  Menzi H. & Kessler J. (1998) Heavy metal content of manures in Switzerland. In: Martinez J. and Maudet M.N. (eds): Proc. 8th International Conference on the FAO ESCORENA;
  Freiermuth R. (2006) Modell zur Berechnung der Schwermetallflüsse in der Landwirtschaftlichen Ökobilanz - SALCA-Schwermetall, Forschungsanstalt Agroscope Reckenholz-Tänikon (ART), 28p;
  Perkow W. und Ploss H., 1994. Wirksubstanzen der Pflanzenschutz- und Schädlingsbekämpfungsmittel. Berlin: Blackwell Wissenschafts-Verlag.
  Walther U., Ryser J.-P. & Flisch R, 2001. Grundlagen für die Düngung im Acker- und Futterbau 2001. Agrarforschung, 8 (6): 1-80.
  Mattos Jr, D., Quaggio, J. A., Cantarella, H., & Alva, A. K. (2003). Nutrient content of biomass components of Hamlin sweet orange trees. Scientia Agricola, 60(1), 155-160.
- Mineral oil [soil, agricultural]: 0.0021526 kg; source Nemecek T. 2015; lognormal variance with pedigree 0.0387216, pedigree (2,2,3,1,1)
  Calculated value - 100% emission in soil. See 'WFLDB-Guidelines.pdf', available at https://ecoquery.ecoinvent.org/File/Reports.
- Water [water, ground-]: 0.0524937 m3; = irrigation_water_input*(1- fraction_iw_to_air)* fraction_iw_to_ground_water; lognormal variance with pedigree 0.127577, pedigree (3,5,3,1,1)
  Calculated value. Fraction of irrigation to ground water: 0.8
- Chlorpyrifos methyl [soil, agricultural]: 6.2831e-5 kg; source Nemecek T. 2015; lognormal variance with pedigree 0.0742, pedigree (2,3,5,1,1)
  Literature value
- Nickel, ion [water, surface water]: 4.54198e-8 kg; source Nemecek, T. 2011; lognormal variance with pedigree 0.102, pedigree (3,5,3,1,1)
  Calculated value: calculated according to Nemecek und Schnetzer (2011). Soil heavy metal contents according to Keller & Desaules (2001), erosion average value according to Kooman & Critchley (2013), Le Roux et al. (2008) and UWC Erosion (2015), accumulation factor according to Prasuhn (2006), erosion factor: 0.05, since surface waters between agricultural fields are rare and the distance to the next river or lake is greater than 100 m according to Freiermuth (2006), heavy metal content of inorganic fertilisers according to Desaules & Struder (1993), heavy-metal contents of organic fertilisers according to Freiermuth (2006) from Menzi & Kessler (1998) and Desaules & Studer (1993), dry matter content from Walther et al. (2001), deposition and content of seeds according to Freiermuth (2006), heavy metal content of pesticides according to Perkow & Ploss (1994) in Freiermuth (2006).
  Further references:
  Keller T. & Desaules A. (2001) Böden der Schweiz: Schadstoffgehalte und Orientierungswerte (1990 – 1996). Umwelt-Materialien Nr. 139. Bern: Bundesamt für Umwelt, Wald und Landschaft BUWAL.
  Kooman, G.; Critchley, W. R. S. GIS-Assisted Modelling of Soil Erosion in a South African Catchment: Evaluating the USLE and SLEMSA Approach. In Water Resources Planning, Development and Management; Breetzke, G. D., Ed.; InTech, 2013;
  Le Roux, J. J.; Morgenthal, T. L.; Malherbe, J.; Pretorius, D. J.; Sumner, P. D. Water erosion prediction at a national scale for South Africa. Water SA 2008, 34, 305–314.;
  UWC Erosion http://www.botany.uwc.ac.za/envfacts/facts/erosion.htm (accessed Apr 28, 2015).
  Prasuhn V. (2006) Erfassung der PO4-Austräge für die Ökobilanzierung SALCA Phosphor. Agroscope Reckenholz - Tänikon ART, 20p. Online at http://www.art.admin.ch/themen/00617/00744/index.html?lang=en.
- Carbaryl [soil, agricultural]: 6.77428e-10 kg; source Dabrowski, J.M. 2014; lognormal variance with pedigree 0.0742, pedigree (2,3,5,1,1)
  (same comment as for Imidacloprid)
- Zinc, ion [water, ground-]: 2.39047e-7 kg; source Nemecek, T. 2011; lognormal variance with pedigree 0.102, pedigree (3,5,3,1,1)
  (same comment as for Cadmium, ion)
- Ammonia [air, non-urban air or from high stacks]: 0.00015698 kg; source Nemecek, T. 2011; lognormal variance with pedigree 0.02, pedigree (3,5,3,1,1)
  Calculated value: emissions arising from fertiliser use, calculated using the AGRAMMON model from Nemecek und Schnetzer (2012).
- Nickel [soil, agricultural]: 6.20372e-9 kg; source Nemecek, T. 2011; lognormal variance with pedigree 0.052, pedigree (3,5,3,1,1)
  (same comment as for Chromium)
- Chromium, ion [water, surface water]: 1.24459e-7 kg; source Nemecek, T. 2011; lognormal variance with pedigree 0.102, pedigree (3,5,3,1,1)
  (same comment as for Nickel, ion)
- Dinitrogen monoxide [air, non-urban air or from high stacks]: 8.61499e-5 kg; source Nemecek, T. 2011; lognormal variance with pedigree 0.042, pedigree (3,5,3,1,1)
  Calculated value: emissions arising from fertiliser use, calculated according to Nemecek und Schnetzer (2011), N content of cow manure according to Walther, Ryser & Flisch (2001).
  Further references: Walther U., Ryser J.-P. & Flisch R, 2001. Grundlagen für die Düngung im Acker- und Futterbau 2001. Agrarforschung, 8 (6): 1-80.
- Lead [soil, agricultural]: 1.95774e-8 kg; source Nemecek, T. 2011; lognormal variance with pedigree 0.052, pedigree (3,5,3,1,1)
  (same comment as for Chromium)
- Copper, ion [water, surface water]: 1.39255e-7 kg; source Nemecek, T. 2011; lognormal variance with pedigree 0.102, pedigree (3,5,3,1,1)
  (same comment as for Nickel, ion)
- Cadmium [soil, unspecified]: 3.41652e-8 kg; source Nemecek, T. 2011; lognormal variance with pedigree 0.052, pedigree (3,5,3,1,1)
  Calculated value: calculated according to Nemecek und Schnetzer (2011). Heavy metal content of inorganic fertilisers according to Desaules & Struder (1993), heavy-metal contents of organic fertilisers according to Freiermuth (2006) from Menzi & Kessler (1998) and Desaules & Studer (1993), dry matter content from Walther et al. (2001), heavy metal content of plant material according to Mattos at al. (2003), heavy metal content of pesticides according to Perkow & Ploss (1994) in Freiermuth (2006), deposition according to Freiermuth (2006), heavy metal content in exported biomass according to Freiermuth (2006).
  Further references: Desaules A. & Studer K. (1993) NABO: Nationales Beobachtungsnetz, Messresultate 1985-1991, Schriftenreihe Umwelt Nr. 200, BUWAL (Bundesamt für Umwelt, Wald und Landschaft), Bern; Menzi H. & Kessler J. (1998) Heavy metal content of manures in Switzerland. In: Martinez J. and Maudet M.N. (eds): Proc. 8th International Conference on the FAO ESCORENA; Freiermuth R. (2006) Modell zur Berechnung der Schwermetallflüsse in der Landwirtschaftlichen Ökobilanz - SALCA-Schwermetall, Forschungsanstalt Agroscope Reckenholz-Tänikon (ART), 28p; Perkow W. und Ploss H., 1994. Wirksubstanzen der Pflanzenschutz- und Schädlingsbekämpfungsmittel. Berlin: Blackwell Wissenschafts-Verlag.
- Glyphosate [soil, agricultural]: 3.36095e-5 kg; source Dabrowski, J.M. 2014; lognormal variance with pedigree 0.0742, pedigree (2,3,5,1,1)
  (same comment as for Imidacloprid)
- Mercury [water, surface water]: 4.6094e-13 kg; source Nemecek, T. 2011; lognormal variance with pedigree 0.102, pedigree (3,5,3,1,1)
  (same comment as for Nickel, ion)
- Bromacil [soil, agricultural]: 3.77102e-8 kg; source Dabrowski, J.M. 2014; lognormal variance with pedigree 0.0742, pedigree (2,3,5,1,1)
  (same comment as for Imidacloprid)
- Terbufos [soil, agricultural]: 6.44008e-6 kg; source Dabrowski, J.M. 2014; lognormal variance with pedigree 0.0742, pedigree (2,3,5,1,1)
  (same comment as for Imidacloprid)
- Chromium, ion [water, ground-]: 4.7763e-7 kg; source Nemecek, T. 2011; lognormal variance with pedigree 0.102, pedigree (3,5,3,1,1)
  (same comment as for Cadmium, ion)
- Carbendazim [soil, agricultural]: 1.08388e-8 kg; source Dabrowski, J.M. 2014; lognormal variance with pedigree 0.0742, pedigree (2,3,5,1,1)
  (same comment as for Imidacloprid)
- MCPA [soil, agricultural]: 2.9452e-5 kg; source Nemecek T. 2015; lognormal variance with pedigree 0.0387216, pedigree (2,2,3,1,1)
  (same comment as for Mineral oil)
- Phosphorus [water, surface water]: 5.10017e-6 kg; source Nemecek, T. 2011; lognormal variance with pedigree 0.052, pedigree (3,5,3,1,1)
  Calculated value: emissions arising from fertiliser use, calculated according to Nemecek und Schnetzer (2011). Soil erosion according to Kooman & Critchley; Le Roux at al. (2008); UWC (2015), P content in topsoil according to Nemecek, Kägi T. & Blaser S. (2007), enrichment factor for P according to Wilke & Schaub (1996), 0.05, since surface waters between agricultural fields are rare and the distance to the next river or lake is greater than 100 m. Source: Freiermuth (2006).
  Further references: Kooman, G.; Critchley, W. R. S. GIS-Assisted Modelling of Soil Erosion in a South African Catchment: Evaluating the USLE and SLEMSA Approach. In Water Resources Planning, Development and Management; Breetzke, G. D., Ed.; InTech, 2013 ISBN 978-953-51-1092-7; Le Roux, J. J.; Morgenthal, T. L.; Malherbe, J.; Pretorius, D. J.; Sumner, P. D. Water erosion prediction at a national scale for South Africa. Water SA 2008, 34, 305–314; UWC Erosion Available online: http://www.botany.uwc.ac.za/envfacts/facts/erosion.htm (accessed on Apr 28, 2015); Nemecek, T., Kagi, T., & Blaser, S. (2007). Life Cycle Inventories of Swiss and European Agricultural Production Systems. Final report; Nemecek, T., Kagi, T., & Blaser, S. (2007). Life Cycle Inventories of Swiss and European Agricultural Production Systems. Final report; Freiermuth, R. Modell zur Berechnung der Schwermetallflüsse in der landwirtschaftlichen Ökobilanz; 2006; pp. 1–42
- Phosphate [water, surface water]: 1.31383e-5 kg; source Nemecek, T. 2011; lognormal variance with pedigree 0.052, pedigree (3,5,3,1,1)
  Calculated value: emissions arising from fertiliser use, calculated according to Nemecek und Schnetzer (2011). P2O5 content of manure according to Walther, Ryser & Flisch (2001).
  Further references: Walther U., Ryser J.-P. & Flisch R, 2001. Grundlagen für die Düngung im Acker- und Futterbau 2001. Agrarforschung, 8 (6): 1-80.
- Mercury [water, ground-]: 3.80357e-14 kg; source Nemecek, T. 2011; lognormal variance with pedigree 0.102, pedigree (3,5,3,1,1)
  (same comment as for Cadmium, ion)
- Water [water, surface water]: 0.0131234 m3; = irrigation_water_input*(1- fraction_iw_to_air)* fraction_iw_to_surface_water; lognormal variance with pedigree 0.127577, pedigree (3,5,3,1,1)
  Calculated value. Fraction of irrigation to surface water: 0.2
- Phosphate [water, ground-]: 4.82724e-6 kg; source Nemecek, T. 2011; lognormal variance with pedigree 0.052, pedigree (3,5,3,1,1)
  Calculated value: emissions arising from fertiliser use, calculated according to Nemecek und Schnetzer (2011).
- Copper [soil, agricultural]: 2.97726e-5 kg; = copper_emissions+ copper_emissions_copper_oxychloride; source Nemecek, T. 2011; lognormal variance with pedigree 0.052, pedigree (3,5,3,1,1)
  Calculated value: calculated according to Nemecek und Schnetzer (2011). Heavy metal content of inorganic fertilisers according to Desaules & Struder (1993), heavy-metal contents of organic fertilisers according to Freiermuth (2006) from Menzi & Kessler (1998) and Desaules & Studer (1993), dry matter content from Walther et al. (2001), heavy metal content of plant material according to Mattos at al. (2003), heavy metal content of pesticides according to Perkow & Ploss (1994) in Freiermuth (2006), deposition according to Freiermuth (2006), heavy metal content in exported biomass according to Freiermuth (2006).
  Further references:
  Desaules A. & Studer K. (1993) NABO: Nationales Beobachtungsnetz, Messresultate 1985-1991, Schriftenreihe Umwelt Nr. 200, BUWAL (Bundesamt für Umwelt, Wald und Landschaft), Bern;
  Menzi H. & Kessler J. (1998) Heavy metal content of manures in Switzerland. In: Martinez J. and Maudet M.N. (eds): Proc. 8th International Conference on the FAO ESCORENA;
  Freiermuth R. (2006) Modell zur Berechnung der Schwermetallflüsse in der Landwirtschaftlichen Ökobilanz - SALCA-Schwermetall, Forschungsanstalt Agroscope Reckenholz-Tänikon (ART), 28p;
  Perkow W. und Ploss H., 1994. Wirksubstanzen der Pflanzenschutz- und Schädlingsbekämpfungsmittel. Berlin: Blackwell Wissenschafts-Verlag.
  Walther U., Ryser J.-P. & Flisch R, 2001. Grundlagen für die Düngung im Acker- und Futterbau 2001. Agrarforschung, 8 (6): 1-80.
  Mattos Jr, D., Quaggio, J. A., Cantarella, H., & Alva, A. K. (2003). Nutrient content of biomass components of Hamlin sweet orange trees. Scientia Agricola, 60(1), 155-160.
  AND Proxy for copper oxychloride: Stoechiometric calculation: Copper oxychloride: Cu(OH)3Cl: molecular mass: 213.57 g/mol, Cu: 63.55 g/mol, Cu: 59.51%. Calculated value: 100% of input quantity. Calculated based on 2009 pesticide application values from Dabrowski, Shadung, & Wepener (2014) and König (2015) with data on production area from FAO (2012).
  Further references: Dabrowski, J. M., Shadung, J. M., & Wepener, V. (2014). Prioritizing agricultural pesticides used in South Africa based on their environmental mobility and potential human health effects. Environment international, 62, 31-40; Koenig, A. (2015). Environmental hotspots and the potential of clean technologies in the South African fruit supply chain. Master thesis at Zurich University of applied Sciences (ZHAW), Institute of Natural Resource Sciences, unpublished; FAO. (2012). Citrus Fruit - Fresh and proceeded - Annual Statistics.
- Water [air, non-urban air or from high stacks]: 0.16873 m3; = irrigation_water_input* fraction_iw_to_air; source Siebert S. 2010; lognormal variance with pedigree 0.127577, pedigree (3,5,3,1,1)
  Calculated value. Fraction of irrigation water to air: 0.72.
  Further reference: Quantis Water Database - Technical Report (2012)
- Zinc, ion [water, surface water]: 1.03895e-7 kg; source Nemecek, T. 2011; lognormal variance with pedigree 0.102, pedigree (3,5,3,1,1)
  (same comment as for Nickel, ion)
- Cadmium, ion [water, surface water]: 1.18224e-9 kg; source Nemecek, T. 2011; lognormal variance with pedigree 0.102, pedigree (3,5,3,1,1)
  Calculated value: calculated according to Nemecek und Schnetzer (2011). Soil heavy metal contents according to Keller & Desaules (2001), erosion average value according to Kooman & Critchley (2013), Le Roux et al. (2008) and UWC Erosion (2015), accumulation factor according to Prasuhn (2006), erosion factor: 0.05, since surface waters between agricultural fields are rare and the distance to the next river or lake is greater than 100 m according to Freiermuth (2006), heavy metal content of inorganic fertilisers according to Desaules & Struder (1993), heavy-metal contents of organic fertilisers according to Freiermuth (2006) from Menzi & Kessler (1998) and Desaules & Studer (1993), dry matter content from Walther et al. (2001), deposition and content of seeds according to Freiermuth (2006), heavy metal content of pesticides according to Perkow & Ploss (1994) in Freiermuth (2006).
  Further references:
  Keller T. & Desaules A. (2001) Böden der Schweiz: Schadstoffgehalte und Orientierungswerte (1990 - 1996). Umwelt-Materialien Nr. 139. Bern: Bundesamt für Umwelt, Wald und Landschaft BUWAL.
  Kooman, G.; Critchley, W. R. S. GIS-Assisted Modelling of Soil Erosion in a South African Catchment: Evaluating the USLE and SLEMSA Approach. In Water Resources Planning, Development and Management; Breetzke, G. D., Ed.; InTech, 2013;
  Le Roux, J. J.; Morgenthal, T. L.; Malherbe, J.; Pretorius, D. J.; Sumner, P. D. Water erosion prediction at a national scale for South Africa. Water SA 2008, 34, 305-314.;
  UWC Erosion http://www.botany.uwc.ac.za/envfacts/facts/erosion.htm (accessed Apr 28, 2015).
  Prasuhn V. (2006) Erfassung der PO4-Austräge für die Ökobilanzierung SALCA Phosphor. Agroscope Reckenholz - Tänikon ART, 20p. Online at http://www.art.admin.ch/themen/00617/00744/index.html?lang=en.
- Copper, ion [water, ground-]: 6.25062e-8 kg; source Nemecek, T. 2011; lognormal variance with pedigree 0.102, pedigree (3,5,3,1,1)
  (same comment as for Cadmium, ion)
- Lead [water, surface water]: 6.33929e-9 kg; source Nemecek, T. 2011; lognormal variance with pedigree 0.102, pedigree (3,5,3,1,1)
  Calculated value: calculated according to Nemecek und Schnetzer (2012). Soil heavy metal contents according to Keller & Desaules (2001), erosion average value according to Kooman & Critchley (2013), Le Roux et al. (2008) and UWC Erosion (2015), accumulation factor according to Prasuhn (2006), erosion factor: 0.05, since surface waters between agricultural fields are rare and the distance to the next river or lake is greater than 100 m according to Freiermuth (2006), heavy metal content of inorganic fertilisers according to Desaules & Struder (1993), heavy-metal contents of organic fertilisers according to Freiermuth (2006) from Menzi & Kessler (1998) and Desaules & Studer (1993), dry matter content from Walther et al. (2001), deposition and content of seeds according to Freiermuth (2006), heavy metal content of pesticides according to Perkow & Ploss (1994) in Freiermuth (2006).
  Further references:
  Keller T. & Desaules A. (2001) Böden der Schweiz: Schadstoffgehalte und Orientierungswerte (1990 – 1996). Umwelt-Materialien Nr. 139. Bern: Bundesamt für Umwelt, Wald und Landschaft BUWAL.
  Kooman, G.; Critchley, W. R. S. GIS-Assisted Modelling of Soil Erosion in a South African Catchment: Evaluating the USLE and SLEMSA Approach. In Water Resources Planning, Development and Management; Breetzke, G. D., Ed.; InTech, 2013;
  Le Roux, J. J.; Morgenthal, T. L.; Malherbe, J.; Pretorius, D. J.; Sumner, P. D. Water erosion prediction at a national scale for South Africa. Water SA 2008, 34, 305–314.;
  UWC Erosion http://www.botany.uwc.ac.za/envfacts/facts/erosion.htm (accessed Apr 28, 2015).
  Prasuhn V. (2006) Erfassung der PO4-Austräge für die Ökobilanzierung SALCA Phosphor. Agroscope Reckenholz - Tänikon ART, 20p. Online at http://www.art.admin.ch/themen/00617/00744/index.html?lang=en.
- Pesticides, unspecified [soil, agricultural]: 1.48772e-5 kg; = potassium_phosphite+ fosthiazate; source Dabrowski, J.M. 2014; lognormal variance with pedigree 0.0742, pedigree (2,3,5,1,1)
  Calculated value: Potassium-phosphite & fosthiazate, 100% of input quantity. Calculated based on 2009 pesticide application values from Dabrowski, Shadung, & Wepener (2014) and König (2015) with data on production area from FAO (2012).
  Further references: Koenig, A. (2015). Environmental hotspots and the potential of clean technologies in the South African fruit supply chain. Master thesis at Zurich University of applied Sciences (ZHAW), Institute of Natural Resource Sciences, unpublished; FAO. (2012). Citrus Fruit - Fresh and proceeded - Annual Statistics.
- Nitrate [water, ground-]: 0.00139 kg; source Faist Emmenegger M. 2009; lognormal variance with pedigree 0.052, pedigree (3,5,3,1,1)
  Calculated value: emissions arising from fertiliser use, calculated using the SQCB-NO3 model from Faist Emmenegger et al. (2009). Clay content according to the WFLDB, root depth according to the FAO, N uptake according to Roccuzzo et al. (2012)
  Further references: http://www.fao.org/docrep/x0490e/x0490e0e.htm; Roccuzzo, Giancarlo, Damiano Zanotelli, Maria Allegra, Antonio Giuffrida, Biagio Francesco Torrisi, Antonino Leonardi, Ana Quiñones, Francesco Intrigliolo, and Massimo Tagliavini. "Assessing nutrient uptake by field-grown orange trees." European journal of Agronomy 41 (2012): 73-80.
- Zinc [soil, agricultural]: -6.75034e-7 kg; source Nemecek, T. 2011
  (same comment as for Chromium)
- Carbon dioxide, fossil [air, non-urban air or from high stacks]: 3.85549e-5 kg; source Nemecek, T. 2011; lognormal variance with pedigree 0.0126, pedigree (3,5,3,1,1)
  Calculated value: CO2 emissions from urea application according to Nemecek und Schnetzer (2011).
- Lead [water, ground-]: 7.46599e-10 kg; source Nemecek, T. 2011; lognormal variance with pedigree 0.102, pedigree (3,5,3,1,1)
  Calculated value: calculated according to Nemecek und Schnetzer (2012). Leaching rates according to Wolfensberger & Dinkel (1997), heavy metal content of inorganic fertilisers according to Desaules & Struder (1993), heavy-metal contents of organic fertilisers according to Freiermuth (2006) from Menzi & Kessler (1998) and Desaules & Studer (1993), dry matter content from Walther et al. (2001), deposition and content of seeds according to Freiermuth (2006), heavy metal content of pesticides according to Perkow & Ploss (1994) in Freiermuth (2006).
  Further references:
  Wolfensberger U. & Dinkel F. (1997) Beurteilung nachwachsender Rohstoffe in der Schweiz in den Jahren 1993-1996, FAT und Carbotech, im Auftrag des Bundesamtes für Landwirtschaft, Bern;
  Desaules A. & Studer K. (1993) NABO: Nationales Beobachtungsnetz, Messresultate 1985-1991, Schriftenreihe Umwelt Nr. 200, BUWAL (Bundesamt für Umwelt, Wald und Landschaft), Bern;
  Menzi H. & Kessler J. (1998) Heavy metal content of manures in Switzerland. In: Martinez J. and Maudet M.N. (eds): Proc. 8th International Conference on the FAO ESCORENA;
  Freiermuth R. (2006) Modell zur Berechnung der Schwermetallflüsse in der Landwirtschaftlichen Ökobilanz - SALCA-Schwermetall, Forschungsanstalt Agroscope Reckenholz-Tänikon (ART), 28p
  Walther U., Ryser J.-P. & Flisch R, 2001. Grundlagen für die Düngung im Acker- und Futterbau 2001. Agrarforschung, 8 (6): 1-80.
  Perkow W. und Ploss H., 1994. Wirksubstanzen der Pflanzenschutz- und Schädlingsbekämpfungsmittel. Berlin: Blackwell Wissenschafts-Verlag.
- Simazine [soil, agricultural]: 9.48399e-9 kg; source Dabrowski, J.M. 2014; lognormal variance with pedigree 0.0742, pedigree (2,3,5,1,1)
  (same comment as for Imidacloprid)

## Sampling procedure
Real industry data from Confronting Climate Change (CCC) http://www.climatefruitandwine.co.za/. Inventory modelling following the ecoinvent Guidelines.

## Extrapolations
This dataset has been extrapolated from year 2015 to the year of the calculation (2021). The uncertainty has been adjusted accordingly.

## Review by Assumpció ANTON 2017-07-03
Please, dataset providers and practitioners may take into consideration update data and emission calculations as long as better aproaches are provided.
