# packaging glass production, brown

Dataset: EcoSpold 2, unit process
Geography: DE
Time period: 1996-01-01 to 2021-12-31
Technology level: current
Classification: EcoSpold01Categories: glass/packaging
Classification: ISIC rev.4 ecoinvent: 2310:Manufacture of glass and glass products
Tags: ConvertedDataset
Scenario: Business-as-Usual
System model: Allocation, cut-off by classification
Share of production covered: 67 %
Generated by: Roland Hischier
Published in: Hischier R. 2007
Database: ecoinvent
isCopyrightProtected: true
accessRestrictedTo: 1

## General comment
This dataset represents the production of 1 kg of brown packaging glass from a mix of primary and secondary raw materials.
Material and energy inputs as well as water consumption, emissions, and waste production are based on literature sources. Infrastructure is an estimation based on average European packaging glass factories.
[This dataset was already contained in the ecoinvent database version 2. It was not individually updated during the transfer to ecoinvent version 3. Life Cycle Impact Assessment results may still have changed, as they are affected by changes in the supply chain, i.e. in other datasets. This dataset was generated following the ecoinvent quality guidelines for version 2. It may have been subject to central changes described in the ecoinvent version 3 change report (http://www.ecoinvent.org/database/ecoinvent-version-3/reports-of-changes/), and the results of the central updates were reviewed extensively. The changes added e.g. consistent water flows and other information throughout the database. The documentation of this dataset can be found in the ecoinvent reports of version 2, which are still available via the ecoinvent website. The change report linked above covers all central changes that were made during the conversion process.]
CO2 emissions have been recalculated from the carbon content in raw materials and fuels.

## Included activities start
From the reception of precursors silica sand, soda, unsorted glass cullets, limestone, dolomite, feldspar, and chemicals inorganics at the factory gate.

## Included activities end
This activity ends with the production of 1 kg of brown packaging glass. The dataset includes material and energy inputs, water consumption, emissions to air and water, waste production and infrastructure.

## Geography
average German situation, based on an industry survey

## Technology
Packaging glass is produced in a two stage moulding process with pressing and blowing techniques. The whole process is fully automatic and consists of five different stages:
1. Production of a molten glass piece (gob) with correct weight and temperature.
2. Forming of the primary shape in a first mould (blank mould) with compressed air pressure
3. Transfer to the final mould (finish mould)
4. Bringing the shaping process to an end by blowing the container with compressed air until the shape of the final mould
5. Post forming processes
The melting process is the central one. As the first glass forming material, sand, has a very high melting point. Soda as a fluxing agent is used to reduce the melting temperature. When heating soda, this is decomposed into sodium oxide Na2O, the actual fluxing agent, and into carbon dioxide that is released. Metal oxides in form of limestone (CaCO3 that decomposes to CaO), dolomite (-> Ca- and Mg-Oxides), feldspar are used as stabilizators and therefore to improve the hardness and chemical resistance of glass. For white brown decolouring agents are added.

## Parameters
- fraction, process water, to air: 0.111111 dimensionless; name fraction_PW_to_air; lognormal variance with pedigree 0.092025, pedigree (4,4,3,2,4)
  Literature value (Statistics Canada, 2007 & Shaffer, K.H., 2008, Consumptive water use in the Great Lakes Basin, USGS) (Vionnet, S., Quantis Water Database - Technical Report, 2012).

## Reference product
- packaging glass, brown: 1 kg; name packaging_glass_RP; CPC 37191: Bottles, jars, phials and other containers, of glass, of a kind used for the conveyance or packing of goods, e[…]; By-product classification allocatable product
  Glass has a long tradition as a packaging material. In addition to its use as a container for beverages, its applications include preserving glass through to container glass for food, cosmetics and pharmaceutical agents. In the field of beverage packaging, glass bottles are used in Switzerland and Europe primarily for beer, wine and spirits. The soft drinks sector is increasingly being covered by PET bottles. Nowadays packaging glass is produced by fully automated processes, based on soda-lime and modified soda-lime formulations.
  production volume 1.05e9 kg; name PV_glass
    German production in 2000: 7 Mio t
    Proportion 15% of brown glass, estimated from data in http://www.caregroup.org.uk/glassrep.pdf. Total amount from year 2000 data in the dataset.
  property price 0.385942 EUR2005; name packaging_glass_RP_price_EUR2005
    Calculated based on inputs: The price of the product has been calculated as a sum of the values of the material and energy inputs for this product. This value is therefore a rough estimation. It may underestimate the real price since there are additional expenses when producing any product. These expences can include for example labour costs, treatment of waste materials and profit for the producer. Please consider carefully whether this level of data quality is acceptable for your application.
  property carbon content 0
    carbon content on a dry matter basis (reserved; not for manual entry)
  properties: water content 0, water in wet mass 0 kg, wet mass 1 kg, carbon content, non-fossil 0, dry mass 1 kg, carbon content, fossil 0, carbon allocation 0 kg

## Inputs from technosphere
- silica sand: 0.195 kg; source Plinke E. 2000; lognormal variance with pedigree 0.0401, pedigree (1,2,5,1,1)
  EcoSpold01Location=DE
  Literature value.
  Uncertainty: data from a German study (UBA)
  properties: wet mass 1 kg, water content 0.010101, dry mass 0.99 kg
- solid bleached and unbleached board carton: 0.0176 kg; source European Commission 2000; lognormal variance with pedigree 0.052625, pedigree (2,4,5,2,1)
  Estimation based on european production from literature source.
  EcoSpold01Location=RER
  Uncertainty: estimation from IPPC study
  properties: carbon content, non-fossil 0.327779, water content 0.0582011, wet mass 1 kg, carbon content, fossil 0.0190874, heating value, net 9.8 MJ, dry mass 0.945 kg
- glass cullet, sorted: 0.689 kg
  properties: wet mass 1 kg, dry mass 1 kg
- lubricating oil: 2.38e-5 kg; source Plinke E. 2000; lognormal variance with pedigree 0.0401, pedigree (1,2,5,1,1)
  EcoSpold01Location=RER
  data from a German study (UBA)
  Uncertainty: data from a German study (UBA)
  properties: dry mass 1 kg, wet mass 1 kg, carbon content, fossil 0.75, heating value, net 40.2 MJ
  note on carbon content, fossil: Lubricating oil is produced from diesel. C-content/dry mass of fats and oils considered 75%, from: ecoinvent v2.2 report, n 15a, pg 40
  note on heating value, net: Literature value, Source: IPCC 2006, 2006 IPCC Guidelines for National Greenhouse Gas Inventories, Prepared by the National Greenhouse Gas Inventories Programme, Eggleston H.S., Buendia L., Miwa K., Ngara T. and Tanabe K. (eds). Published: IGES, Japan
- chemical, inorganic: 0.00202 kg; source Plinke E. 2000; lognormal variance with pedigree 0.0401, pedigree (1,2,5,1,1)
  EcoSpold01Location=GLO
  Estimation: it is a first approximation of all auxiliaries. The total amount is from literature source.
  Uncertainty: data from a German study (UBA)
  properties: wet mass 1 kg, carbon content, fossil 0.003, dry mass 1 kg
  note on carbon content, fossil: This dataset is an unweighted average of 20 inorganic substances (listed in Tab 88.1, ecoinvent v2.2 report 8, part II), being part of the top100 chemicals included in this database. The C-content has also been calculated as an unweighted average of the C content of the substances composing this dataset.
- diesel: 0.00144 kg; source Plinke E. 2000; lognormal variance with pedigree 0.0401, pedigree (1,2,5,1,1)
  Literature value.
  EcoSpold01Location=RER
  Uncertainty: data from a German study (UBA)
  properties: carbon content, fossil 0.865, heating value, net 42.8 MJ, wet mass 1 kg, dry mass 1 kg
  note on carbon content, fossil: C-content of diesel is 86.5% (ecoinvent v2.2 report 6_IV, Tab 3.14)
- packaging glass factory: 1.25e-10 unit; lognormal variance with pedigree 0.4921, pedigree (5,4,5,3,4)
  EcoSpold01Location=RER
  Estimation: infrastructure represents an average packaging glass factory in Europe.
  Uncertainty: own estimation
- natural gas, high pressure: 0.0733333 m3; name gas; source Plinke E. 2000; lognormal variance with pedigree 0.0401, pedigree (1,2,5,1,1)
  Literature value. 75% natural gas and 25% heavy fuel oil according to literature source.
  EcoSpold01Location=RER
  Uncertainty: data from a German study (UBA)
  property carbon content, fossil 0.602381; name C_in_gas
  properties: heating value, net 39 MJ, heating value, gross 39 MJ, wet mass 0.84 kg, dry mass 0.84 kg
  note on carbon content, fossil: An average C content of 0.506 kg C/ m3 has been assumed (this average has been calculated using data in Tab 3.5, ecoinvent v2.2 report 6_V
  note on heating value, net: Literature value, Source: United Nations Statistics Division (2018) International Recommendations for Energy Statistics (IRES). Available at: http://unstats.un.org/unsd/statcom/doc11/BG-IRES.pdf.
- soda ash, light, crystalline, heptahydrate: 0.0607 kg; name soda; source Plinke E. 2000; lognormal variance with pedigree 0.0401, pedigree (1,2,5,1,1)
  Literature value.
  EcoSpold01Location=RER
  Uncertainty: data from a German study (UBA)
  properties: wet mass 1 kg, dry mass 1 kg, carbon content, fossil 0.0517241, heating value, net 3.43 MJ
- electricity, medium voltage: 0.159 kWh; source Plinke E. 2000; lognormal variance with pedigree 0.0401, pedigree (1,2,5,1,1)
  Literature value.
  EcoSpold01Location=DE
  Uncertainty: data from a German study (UBA)
- dolomite: 0.0362 kg; source Plinke E. 2000; lognormal variance with pedigree 0.0401, pedigree (1,2,5,1,1)
  Literature value.
  EcoSpold01Location=RER
  Uncertainty: data from a German study (UBA)
  properties: heating value, net 3.95 MJ, dry mass 1 kg, wet mass 1 kg, carbon content, fossil 0.130435
- graphite: 1.25e-6 kg; source Plinke E. 2000; lognormal variance with pedigree 0.0401, pedigree (1,2,5,1,1)
  Literature value.
  EcoSpold01Location=RER
  Uncertainty: data from a German study (UBA)
  properties: heating value, net 30.3 MJ, wet mass 1 kg, dry mass 1 kg, carbon content, fossil 1
- municipal solid waste: -0.005 kg; name MSW_ByP; source European Commission 2000; lognormal variance with pedigree 0.052625, pedigree (2,4,5,2,1)
  EcoSpold01Location=CH
  Estimation based on european production from literature source.
  Uncertainty: estimation from IPPC study
  production volume 5.25e6 kg; = MSW_ByP/ packaging_glass_RP* PV_glass
    Calculated from production volume of reference product using the relative outputs.
  properties: heating value, net 11.74 MJ, carbon content, non-fossil 0.261655, water content 0.297017, dry mass 0.771 kg, wet mass 1 kg, carbon content, fossil 0.171549
  note on heating value, net: Value taken from the general comment of the treatment dataset.
  note on carbon content, non-fossil: MSW composition in tab 4.1, ecoinvent v2.2 report 13_I. C content referred to 1 kg DM
- polyethylene, high density, granulate: 0.0117 kg; source European Commission 2000; lognormal variance with pedigree 0.052625, pedigree (2,4,5,2,1)
  EcoSpold01Location=RER
  Estimation based on european production from literature source.
  Uncertainty: estimation from IPPC study
  properties: wet mass 1 kg, heating value, net 42.47 MJ, carbon content, fossil 0.857143, dry mass 1 kg
  note on carbon content, fossil: Polyethylene is formed out of a huge amount of ethylene monomers (C2H4) (ecoinvent v2.2 report 11_II). MW=28 g/mol
- heavy fuel oil: 0.0233 kg; name heavy_fuel; source Plinke E. 2000; lognormal variance with pedigree 0.0401, pedigree (1,2,5,1,1)
  (same comment as for natural gas, high pressure)
  property carbon content, fossil 0.849; name C_in_heavy_fuel
  properties: wet mass 1 kg, dry mass 1 kg, heating value, net 41.2 MJ
- lime: 0.0402 kg; source Plinke E. 2000; lognormal variance with pedigree 0.0401, pedigree (1,2,5,1,1)
  EcoSpold01Location=CH
  Literature value.
  Uncertainty: data from a German study (UBA)
  properties: wet mass 1 kg, dry mass 1 kg, carbon content, fossil 0.120005
- EUR-flat pallet: 0.000716 unit; source European Commission 2000; lognormal variance with pedigree 0.052625, pedigree (2,4,5,2,1)
  EcoSpold01Location=RER
  Estimation: estimation based on average european production from literature value
  Uncertainty: estimation from IPPC study
  properties: heating value, net 335.11 MJ, water content 0.2, dry mass 18.3333 kg, wet mass 22 kg, carbon content, fossil 0.0311351, carbon content, non-fossil 0.58833
  note on carbon content, fossil: C content in components of the pallet (ecoinvent v2.2 report 7_part XVIII)
- feldspar: 0.0374 kg; source Plinke E. 2000; lognormal variance with pedigree 0.0401, pedigree (1,2,5,1,1)
  Literature value.
  EcoSpold01Location=RER
  Uncertainty: data from a German study (UBA)
  properties: wet mass 1 kg, dry mass 1 kg

## Inputs from nature
- Water, unspecified natural origin [natural resource, in water]: 0.000212 m3; name water_UNO_input; source Plinke E. 2000; lognormal variance with pedigree 0.0401, pedigree (1,2,5,1,1)
  Literature value.
  Uncertainty: data from a German study (UBA)

## Emissions to nature
- Dioxins, measured as 2,3,7,8-tetrachlorodibenzo-p-dioxin [air, urban air close to ground]: 0 kg; source Plinke E. 2000; pedigree (1,1,1,1,1)
  data from a German study (UBA)
  Uncertainty: data from a German study (UBA)
- Particulates, > 10 um [air, urban air close to ground]: 8.09e-6 kg; source Berdowski J. 2002; lognormal variance with pedigree 0.0801, pedigree (1,2,5,1,1)
  Calculated value: total amount based on literature value (Plinke et al. 2000). Distribution of particulate mater was calculated according to the ratio for the paricle distribution of combustion processes present in the literature source assuming a mix of 32% secondary and 68% primary abatment technology.
  Uncertainty: data from a German study (UBA)
- Hydrogen fluoride [air, urban air close to ground]: 5.13e-6 kg; source Plinke E. 2000; lognormal variance with pedigree 0.0801, pedigree (1,2,5,1,1)
  Literature value.
  Uncertainty: data from a German study (UBA)
- Antimony [air, urban air close to ground]: 1.55e-8 kg; lognormal variance with pedigree 0.7021, pedigree (1,4,5,3,1)
  Estimation based on one European factory.
  Uncertainty: estimation from data of 1 European producer
- Sulfur dioxide [air, urban air close to ground]: 0.00073 kg; source Plinke E. 2000; lognormal variance with pedigree 0.0401, pedigree (1,2,5,1,1)
  Literature value.
  Uncertainty: data from a German study (UBA)
- Hydrogen chloride [air, urban air close to ground]: 1.66e-5 kg; source Plinke E. 2000; lognormal variance with pedigree 0.0801, pedigree (1,2,5,1,1)
  Literature value.
  Uncertainty: data from a German study (UBA)
- Arsenic [air, urban air close to ground]: 1.55e-8 kg; lognormal variance with pedigree 0.7021, pedigree (1,4,5,3,1)
  (same comment as for Antimony)
- NMVOC, non-methane volatile organic compounds, unspecified origin [air, urban air close to ground]: 3.59e-6 kg; source Plinke E. 2000; lognormal variance with pedigree 0.0801, pedigree (1,2,5,1,1)
  data from a German study (UBA)
  Uncertainty: data from a German study (UBA)
- Copper [air, urban air close to ground]: 1.55e-8 kg; lognormal variance with pedigree 0.7021, pedigree (1,4,5,3,1)
  (same comment as for Antimony)
- Water [water, unspecified]: 0.000188444 m3; name water_to_water_unspecified; = water_UNO_input*(1-fraction_PW_to_air); lognormal variance with pedigree 0.0807, pedigree (2,2,5,1,1)
  Calculated value based on literature values and expert opinion. See comments in the parametres' comment field.
  property fraction, origin: salt water 0; name fraction_origin_salt_water_Ww
  property fraction, origin: unspecified 1; name fraction_origin_unspecified_Ww
  property fraction, origin: fresh water 0; name fraction_origin_fresh_water_Ww
- Nickel [air, urban air close to ground]: 1.55e-8 kg; lognormal variance with pedigree 0.7021, pedigree (1,4,5,3,1)
  (same comment as for Antimony)
- Nitrogen oxides [air, urban air close to ground]: 0.000861 kg; source Plinke E. 2000; lognormal variance with pedigree 0.0801, pedigree (1,2,5,1,1)
  Literature value.
  Uncertainty: data from a German study (UBA)
- Hydrocarbons, aliphatic, alkanes, unspecified [air, urban air close to ground]: 1.19e-5 kg; source Plinke E. 2000; lognormal variance with pedigree 0.0801, pedigree (1,2,5,1,1)
  data from a German study (UBA)
  Uncertainty: data from a German study (UBA)
- Methane, fossil [air, urban air close to ground]: 9.85e-8 kg; source Plinke E. 2000; lognormal variance with pedigree 0.0801, pedigree (1,2,5,1,1)
  data from a German study (UBA)
  Uncertainty: data from a German study (UBA)
- Benzo(a)pyrene [air, urban air close to ground]: 1.11e-11 kg; source Plinke E. 2000; lognormal variance with pedigree 0.1601, pedigree (1,2,5,1,1)
  data from a German study (UBA)
  Uncertainty: data from a German study (UBA)
- Ammonia [air, urban air close to ground]: 2.88e-8 kg; source Plinke E. 2000; lognormal variance with pedigree 0.0801, pedigree (1,2,5,1,1)
  data from a German study (UBA)
  Uncertainty: data from a German study (UBA)
- Carbon monoxide, fossil [air, urban air close to ground]: 7.72e-6 kg; source Plinke E. 2000; lognormal variance with pedigree 0.6901, pedigree (1,2,5,1,1)
  data from a German study (UBA)
  Uncertainty: data from a German study (UBA)
- Carbon dioxide, fossil [air, urban air close to ground]: 0.292207 kg; = (gas* C_in_gas+heavy_fuel* C_in_heavy_fuel)*44/12+soda*44/106+lime*44/100+dolomite*88/215; lognormal variance with pedigree 0.0401, pedigree (1,2,5,1,1)
  Calculated from carbon in fuels and raw materials
- Cobalt [air, urban air close to ground]: 1.55e-8 kg; lognormal variance with pedigree 0.7021, pedigree (1,4,5,3,1)
  (same comment as for Antimony)
- Selenium [air, urban air close to ground]: 1.69e-6 kg; lognormal variance with pedigree 0.7021, pedigree (1,4,5,3,1)
  (same comment as for Antimony)
- Dinitrogen monoxide [air, urban air close to ground]: 4.78e-7 kg; source Plinke E. 2000; lognormal variance with pedigree 0.0801, pedigree (1,2,5,1,1)
  data from a German study (UBA)
  Uncertainty: data from a German study (UBA)
- Benzene [air, urban air close to ground]: 7.79e-8 kg; source Plinke E. 2000; lognormal variance with pedigree 0.1601, pedigree (1,2,5,1,1)
  data from a German study (UBA)
  Uncertainty: data from a German study (UBA)
- Chromium [air, urban air close to ground]: 1.55e-8 kg; lognormal variance with pedigree 0.7021, pedigree (1,4,5,3,1)
  (same comment as for Antimony)
- Particulates, < 2.5 um [air, urban air close to ground]: 1.41e-6 kg; source Berdowski J. 2002; lognormal variance with pedigree 0.3401, pedigree (1,2,5,1,1)
  Calculated value: total amount based on literature value (Plinke et al. 2000). Distribution of particulate mater was calculated according to the ratio for the paricle distribution of combustion processes present in the literature source assuming a mix of 32% secondary and 68% primary abatment technology.
  Uncertainty: data from a German study (UBA), split according US-EPA
- Lead [air, urban air close to ground]: 1.78e-7 kg; lognormal variance with pedigree 0.7021, pedigree (1,4,5,3,1)
  (same comment as for Antimony)
- Formaldehyde [air, urban air close to ground]: 3.32e-7 kg; source Plinke E. 2000; lognormal variance with pedigree 0.1601, pedigree (1,2,5,1,1)
  data from a German study (UBA)
  Uncertainty: data from a German study (UBA)
- Manganese [air, urban air close to ground]: 1.55e-8 kg; lognormal variance with pedigree 0.7021, pedigree (1,4,5,3,1)
  (same comment as for Antimony)
- Cadmium [air, urban air close to ground]: 1.55e-8 kg; lognormal variance with pedigree 0.7021, pedigree (1,4,5,3,1)
  (same comment as for Antimony)
- Water [air, unspecified]: 2.35556e-5 m3; name water_to_air_unspecified; = (water_UNO_input*fraction_PW_to_air); lognormal variance with pedigree 0.0807, pedigree (2,2,5,1,1)
  (same comment as for Water)
  property fraction, origin: unspecified 1; name fraction_origin_unspecified
  property fraction, origin: fresh water 0; name fraction_origin_fresh_water
  property fraction, origin: salt water 0; name fraction_origin_salt_water
- Particulates, > 2.5 um, and < 10um [air, urban air close to ground]: 5.8e-7 kg; source Berdowski J. 2002; lognormal variance with pedigree 0.1601, pedigree (1,2,5,1,1)
  (same comment as for Particulates, < 2.5 um)

## Sampling procedure
German LCA study

## Extrapolations
This dataset has been extrapolated from year 1996 to the year of the calculation (2021). The uncertainty has been adjusted accordingly.

## Review by Emilia Moreno Ruiz 2013-07-22
restructuring of the "glass cullet, sorted" supply chain

## Review by Roland Hischier 2011-11-29
Transfer of documentation done.

## Review by Hans-Jörg Althaus 2003-08-20
passed
