# treatment of waste sealing sheet, polyethylene, municipal incineration

Dataset: EcoSpold 2, unit process
Geography: RoW
Time period: 2006-01-01 to 2021-12-31
Technology level: current
Classification: ISIC rev.4 ecoinvent: 3821:Treatment and disposal of non-hazardous waste
Synonyms: municipal waste incineration; Siedlungsabfallverbrennung; Kehrichtverbrennung
Scenario: Business-as-Usual
System model: Allocation, cut-off by classification
Share of production covered: 1.8 %
Generated by: Gabor Doka
Published in: Doka G. 2013
Database: ecoinvent
isCopyrightProtected: true
accessRestrictedTo: 1

## General comment
This dataset represents the activity of waste disposal of waste sealing sheet, polyethylene in a municipal solid waste incinerator (MSWI) // Recommended use of this dataset: For disposal of bulk or small parts of PE sealing sheet (waste building product) // Inventoried waste contains 1.2% Glass; 85.3% PE sealing sheet; 13.5% Filler (lime); . // Waste composition (wet, in ppm): upper heating value 36.33 MJ/kg; lower heating value 36.03 MJ/kg; H2O 3633.1; O 103200; H 103910; C 713520; S 362.12; N 1100.4; P n.a.; B n.a.; Cl 1242.1; Br 8.1346; F 12.202; I n.a.; Ag n.a.; As 1.7547; Ba 203.36; Cd 28.803; Co 1.4236; Cr 14.81; Cu 35.185; Hg 0.044723; Mn 25.488; Mo n.a.; Ni 1.2663; Pb 19.94; Sb 8.5413; Se 1.7083; Sn 3.2353; V 1871; Zn 5020.8; Be 0.40673; Sc n.a.; Sr 71.991; Ti 813.46; Tl 0.32538; W n.a.; Si 4309.1; Fe 1301.5; Ca 57070; Al 162.69; K n.a.; Mg 81.346; Na 1965.8; // Share of carbon in waste that is biogenic 0%. // Share of metals in waste not oxidised and bulk-recyclable (exclude very small or thin parts) Iron: 0%; Alu: 0%; Copper: 0%. // One kg of this waste produces 0.1856 kg of slag and 0.01264 kg of residues, which are landfilled. Additional solidification with 0.005057 kg of cement. // Net energy production: 4.7MJ/kg electric energy and 9.08MJ/kg thermal energy. // Recovery of metal scrap to recycling: 0g iron scrap, 0g aluminium scrap, 0g copper scrap.

## Included activities start
waste incineration from waste reception gate and delivery into waste bunker at incinerator plant site (without transports to the incinerator)

## Included activities end
Waste-specific short-term emissions to water from leachate. Long-term emissions from landfill to ground water.

## Geography
Specific to the technology mix encountered in Switzerland in 2010. Well applicable to modern incineration practices in Europe, North America or Japan.

## Technology
average Swiss MSWI plants in 2010 (grate incinerators) with electrostatic precipitator for fly ash (ESP), wet flue gas scrubber and 25% SNCR , 42.77% SCR-high dust , 32.68% SCR-low dust -DeNOx facilities and 0% without Denox (weighted according to mass of burnt waste, representing Swiss average). Efficiency of iron scrap separation from slag : 58%. Efficiency of non-ferrous scrap separation from slag : 31%. Gross electric efficiency technology mix 15.84% and Gross thermal efficiency technology mix 28.51%

## Time period
Waste composition as given in literature reference, theoretical data or other source. Transfer coefficients for modern MSWI.

## Reference product
- waste sealing sheet, polyethylene: -1 kg; By-product classification Waste; CPC 39270: Waste, parings and scrap of plastics; CAS 9002-88-4
  Main reference product of this activity (supply of disposal service).
  production volume 1.8038e8 kg
    based on estimate on MSW in WTE globally and share of building products in Swiss MSW based on an unqualified estimate of building demand of Swiss population.
  property price 0 EUR2005
    Waste products are assigned a price of zero as they are assumed to require further treatment.
  property carbon content 0.851042
    carbon content on a dry matter basis (reserved; not for manual entry)
  properties: dry mass 0.96 kg, wet mass 1 kg, carbon content, fossil 0.851042, carbon content, non-fossil 0, water in wet mass 0.04 kg, water content 0.0416667, heating value, net 42.47 MJ, carbon allocation 0.817 kg

## By-products
- heat, for reuse in municipal waste incineration only: 0 MJ; name E_th_prod_MSWI; By-product classification allocatable product; CPC 17300: Steam and hot water; pedigree (1,1,1,1,1)
  Net electricity generated from this waste and used in internal MSWI plant energy redistribution.
  Uncertainty: uncertainty is calculated from uncertainties in waste composition and uncertainties in energy efficiency and the uncertainty in internal energy demand
  production volume 1.6371e9 MJ
    calculated in proportion to reference product waste input to incinerator
  property price 0.0106 EUR2005; name E_th_prod_MSWI_price_EUR2005
    Average European district heat price from Ecoheatcool and Euroheat 2005-2006, Ecoheat Work package 1: The European heat market. Final report. 10.6 EUR/GJ i s the price of district heat. http://www.solarthermalworld.org/files/Ecoheatcool%20WP1%20Web.pdf?download
  property exergy 0.1842 MJ; name E_th_prod_MSWI_exergy
    This exergy property is based on the exergy content of the product.
  property true value relation 0.1842; name E_th_prod_MSWI_true_value_relation
    property to calculate "true value" from
- electricity, for reuse in municipal waste incineration only: 0 kWh; name E_el_prod_MSWI; CPC 17100: Electrical energy; By-product classification allocatable product; pedigree (1,1,1,1,1)
  (same comment as for heat, for reuse in municipal waste incineration only)
  production volume 2.353e8 kWh
    calculated in proportion to reference product waste input to incinerator
  property price 0.1 EUR2005; name E_el_prod_MSWI_price_EUR2005
    Estimated to be the same price as in case of electricity, medium voltage.
  property exergy 3.6 MJ; name E_el_prod_MSWI_exergy
    This exergy property is based on the exergy content of the product.
  property true value relation 3.6; name E_el_prod_MSWI_true_value_relation
    property to calculate "true value" from

## Inputs from technosphere
- quicklime, milled, packed: 0.00066453 kg; lognormal variance with pedigree 0.63009, pedigree (1,1,4,1,1)
  Auxilliary inputs for the flue gas treatment stage of the incinerator plant.
  Uncertainty: uncertainty calculated from uncertainty in average CaO input, of transfer coefficients in the incinerator, and the uncertainty of the waste composition of this waste
  properties: water content 0.010101, dry mass 0.99 kg, wet mass 1 kg
- waste cement, hydrated: 0 kg; pedigree (1,1,1,1,1)
  Hydrated cement output for solidification of landfilled residual material.
  Uncertainty: Uncertainty calculated from uncertainty of the waste composition of this waste and transfer coefficients in the incinerator and of the solidification recipe.
  production volume 0 kg
    calculated in proportion to reference product waste input to incinerator
  properties: wet mass 1 kg, dry mass 1 kg
- chromium oxide, flakes: 1.2553e-6 kg; lognormal variance with pedigree 0.51637, pedigree (1,1,4,1,1)
  Input to DeNOx stage.
  Uncertainty: uncertainty calculated from uncertainty in average DeNOx input, uncertainty in the share of thermal NOx, uncertainty of nitrogen content in average municipal waste and the uncertainty in nitrogen content in *this* waste.
  properties: wet mass 1 kg, dry mass 1 kg
- process-specific burdens, residual material landfill: 0 kg; pedigree (1,1,1,1,1)
  Mass-specific expenditures required for landfilling of incineration residues.
  Uncertainty: uncertainty is calculated from uncertainties in waste composition and transfer coefficients in incinerator
- hydrochloric acid, without water, in 30% solution state: 2.0883e-5 kg; lognormal variance with pedigree 0.21584, pedigree (1,1,4,1,1)
  Auxilliary inputs for the wastewater treatment stage of the incinerator plant.
  Uncertainty: uncertainty calculated from uncertainty in average HCl input, of transfer coefficients in the incinerator, and the uncertainty of the waste composition of this waste
  properties: heating value, net 3.32 MJ, dry mass 1 kg, wet mass 1 kg
- chemical, organic: 8.2525e-6 kg; lognormal variance with pedigree 1.00417, pedigree (1,1,4,1,1)
  Auxilliary inputs for the wastewater treatment stage of the incinerator plant. Proxy for (pure) Trisodium-trimercapto-s-triazine (CAS 17766-26-6), used as 15% diluted solution, aka TMT15.
  Uncertainty: uncertainty calculated from uncertainty in average TMT15 input, of transfer coefficients in the incinerator, and the uncertainty of the waste composition of this waste
  properties: wet mass 1 kg, heating value, net 19.03 MJ, dry mass 1 kg, carbon content, fossil 0.628
- process-specific burdens, slag landfill: 0 kg; pedigree (1,1,1,1,1)
  Mass-specific expenditures required for landfilling of bottom ash.
  Uncertainty: uncertainty is calculated from uncertainties in waste composition and transfer coefficients in incinerator
- municipal waste incineration facility: 2.5e-10 unit
  Demands per kilogram waste.
- cement, unspecified: 0 kg; pedigree (1,1,1,1,1)
  Cement required for solidification of landfilled residual material.
  Uncertainty: Uncertainty calculated from uncertainty of the waste composition of this waste, of transfer coefficients in the incinerator and of the solidification recipe.
  properties: dry mass 1 kg, wet mass 1 kg
- slag landfill: 3.1301e-10 unit; lognormal variance with pedigree 0.049646, pedigree (1,1,4,1,1)
  Landfill infrastructure required for landfilling of bottom ash.
  Uncertainty: uncertainty is calculated from uncertainties in waste composition and transfer coefficients in incinerator
- sodium hydroxide, without water, in 50% solution state: 0.00025218 kg; lognormal variance with pedigree 0.3282, pedigree (1,1,4,1,1)
  Auxilliary inputs for the flue gas treatment stage of the incinerator plant.
  Uncertainty: uncertainty calculated from uncertainty in average NaOH input, of transfer coefficients in the incinerator, and the uncertainty of the waste composition of this waste
  properties: dry mass 1 kg, wet mass 1 kg, heating value, net 3.03 MJ
- heat, district or industrial, natural gas: 0 MJ; pedigree (1,1,1,1,1)
  Input to DeNOx stage, to heat up flue gas in low-dust SCR.
  Uncertainty: uncertainty calculated from uncertainty in average DeNOx input, uncertainty in the share of thermal NOx, uncertainty of nitrogen content in average municipal waste and the uncertainty in nitrogen content in *this* waste.
  properties: heating value, net 1 MJ
- transport, freight, lorry, unspecified: 0 metric ton*km; pedigree (1,1,1,1,1)
  Transport services to transport incineration residues to landfills.
  Uncertainty: uncertainty calculated from uncertainty of the waste composition of this waste, uncertainty of transfer coefficients and the uncertainty in generic transportation distances
- iron (III) chloride, without water, in 40% solution state: 0.00034239 kg; lognormal variance with pedigree 0.33822, pedigree (1,1,4,1,1)
  Auxilliary inputs for the wastewater treatment stage of the incinerator plant.
  Uncertainty: uncertainty calculated from uncertainty in average FeCl3 input, of transfer coefficients in the incinerator, and the uncertainty of the waste composition of this waste
  properties: dry mass 1 kg, wet mass 1 kg
- chemical, inorganic: 7.9451e-5 kg; lognormal variance with pedigree 0.21584, pedigree (1,1,4,1,1)
  Auxilliary inputs for the wastewater treatment stage of the incinerator plant. Proxy for Polyelectrolyte.
  Uncertainty: uncertainty calculated from uncertainty in average Polyelectrolyte input, of transfer coefficients in the incinerator, and the uncertainty of the waste composition of this waste
  properties: dry mass 1 kg, carbon content, fossil 0.003, wet mass 1 kg
- residual material landfill: 2.634e-11 unit; lognormal variance with pedigree 0.075403, pedigree (1,1,4,1,1)
  Landfill infrastructure required for landfilling of incineration residues.
  Uncertainty: uncertainty is calculated from uncertainties in waste composition and transfer coefficients in incinerator
- titanium dioxide: 6.151e-5 kg; lognormal variance with pedigree 0.51637, pedigree (1,1,4,1,1)
  Input to DeNOx stage (TiO2 catalyst carrier)
  Uncertainty: uncertainty calculated from uncertainty in average DeNOx input, uncertainty in the share of thermal NOx, uncertainty of nitrogen content in average municipal waste and the uncertainty in nitrogen content in *this* waste.
  properties: wet mass 1 kg, dry mass 1 kg
- ammonia, anhydrous, liquid: 0 kg; pedigree (1,1,1,1,1)
  Input to DeNOx stage (100% NH3).
  Uncertainty: uncertainty calculated from uncertainty in average DeNOx input, uncertainty in the share of thermal NOx, uncertainty of nitrogen content in average municipal waste and the uncertainty in nitrogen content in *this* waste.
  properties: wet mass 1 kg, dry mass 1 kg
- water, decarbonised: 0 kg; pedigree (1,1,1,1,1)
  Incinerator process water used in flue gas scrubber stage.
  Uncertainty: uncertainty calculated from uncertainty in average water input, and the uncertainty of the waste composition of this waste
  properties: wet mass 1 kg
- waste cement, hydrated: -0.00357638, -0.00906662 kg (2 entries); lognormal variance with pedigree 0.084487, pedigree (1,1,4,1,1)
  (same comment as for waste cement, hydrated)
  production volume 2.2806e6 kg
- process-specific burdens, residual material landfill: 0.00357638, 0.00906662 kg (2 entries); lognormal variance with pedigree 0.075403, pedigree (1,1,4,1,1)
  (same comment as for process-specific burdens, residual material landfill)
- process-specific burdens, slag landfill: 0.0498057, 0.126264 kg (2 entries); lognormal variance with pedigree 0.049646, pedigree (1,1,4,1,1)
  (same comment as for process-specific burdens, slag landfill)
- cement, unspecified: 0.000730253, 0.000151944, 1.11288e-5, 3.17209e-5, 0.000717378, 2.11145e-5, 0.0002319, 2.80573e-5, 0.0031338 kg (9 entries); lognormal variance with pedigree 0.084487, pedigree (1,1,4,1,1)
  (same comment as for cement, unspecified)
- heat, district or industrial, natural gas: 0.00204339, 0.0489635, 0.132583 MJ (3 entries); lognormal variance with pedigree 0.22001, pedigree (1,1,4,1,1)
  (same comment as for heat, district or industrial, natural gas)
- transport, freight, lorry, unspecified: 0.000863857, 0.000135248, 0.0065494 metric ton*km (3 entries); lognormal variance with pedigree 0.044597, pedigree (1,1,4,1,1)
  (same comment as for transport, freight, lorry, unspecified)
- ammonia, anhydrous, liquid: 0.00020579, 1.76901e-5, 2.75212e-5, 5.45293e-5, 5.34243e-5, 5.59944e-6, 2.50316e-5, 0.000592174 kg (8 entries); lognormal variance with pedigree 0.22001, pedigree (1,1,4,1,1)
  (same comment as for ammonia, anhydrous, liquid)
- water, decarbonised: 0.00849302, 0.0220988, 0.0891297, 0.021765, 0.00438772, 0.0144277, 0.000796492, 0.0113498, 0.0264385, 0.165841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 kg (12 entries); lognormal variance with pedigree 0.33822, pedigree (1,1,4,1,1)
  (same comment as for water, decarbonised)

## Inputs from nature
- Oxygen [natural resource, in air]: 2.7554 kg; lognormal variance with pedigree 0.021791, pedigree (1,1,4,1,1)
  Oxygen from ambient air needed to combust and oxidise this waste. Net demand, i.e. without O2 leaving the plant in flue gas uncombusted.
  Uncertainty: uncertainty is calculated from uncertainties in waste composition and transfer coefficients to flue gas and soild residues in incinerator

## Emissions to nature
- Cobalt [water, ground-, long-term]: 1.1596e-6 kg; lognormal variance with pedigree 1.446, pedigree (1,1,4,1,1)
  Long-term emissions from landfilling of incineration residues.
  Uncertainty: uncertainty is calculated from uncertainties in waste composition and transfer coefficients in incinerator and landfills.
- Thallium [water, surface water]: 1.9933e-10 kg; lognormal variance with pedigree 1.8945, pedigree (1,1,4,1,1)
  Emissions to water from waste composition and transfer coefficients in incinerator and landfills.
  Uncertainty: uncertainty is calculated from uncertainties in waste composition and transfer coefficients in incinerator and landfills
- NMVOC, non-methane volatile organic compounds, unspecified origin [air, urban air close to ground]: 5.9846e-7 kg; lognormal variance with pedigree 0.081607, pedigree (1,1,4,1,1)
  Incomplete combustion product emitted to air.
  Uncertainty: uncertainty calculated from uncertainty in average operation emissions, and the uncertainty of the flue gas volume from this waste.
- Arsenic, ion [water, ground-, long-term]: 6.7166e-7 kg; lognormal variance with pedigree 1.5048, pedigree (1,1,4,1,1)
  (same comment as for Cobalt)
- DOC, Dissolved Organic Carbon [water, ground-, long-term]: 0.010143 kg; lognormal variance with pedigree 0.016461, pedigree (1,1,4,1,1)
  (same comment as for Cobalt)
- Water [air, urban air close to ground]: 0.0017275 m3; lognormal variance with pedigree 0.9051, pedigree (1,1,4,1,1)
  Water vapour from waste humidity, hydrogen oxidation and part of the process water.
  Uncertainty: Uncertainty calculated from uncertainty in waste composition, process water input and the uncertainty of fraction to air.
- Nitrate [water, surface water]: 1.4027e-5 kg; lognormal variance with pedigree 0.45807, pedigree (1,1,4,1,1)
  (same comment as for Thallium)
- Beryllium [water, surface water]: 2.5474e-10 kg; lognormal variance with pedigree 2.207, pedigree (1,1,4,1,1)
  (same comment as for Thallium)
- Vanadium, ion [water, ground-, long-term]: 0.00087215 kg; lognormal variance with pedigree 0.44694, pedigree (1,1,4,1,1)
  (same comment as for Cobalt)
- Manganese [air, urban air close to ground]: 4.8677e-9 kg; lognormal variance with pedigree 1.1783, pedigree (1,1,4,1,1)
  Emission to air from waste composition and transfer coefficients.
  Uncertainty: uncertainty is calculated from uncertainties in waste composition and transfer coefficients in incinerator
- Antimony [water, surface water]: 2.9439e-6 kg; lognormal variance with pedigree 1.2949, pedigree (1,1,4,1,1)
  (same comment as for Thallium)
- Benzene [air, urban air close to ground]: 1.315e-8 kg; lognormal variance with pedigree 0.081607, pedigree (1,1,4,1,1)
  (same comment as for NMVOC, non-methane volatile organic compounds, unspecified origin)
- Tin, ion [water, ground-, long-term]: 1.2382e-6 kg; lognormal variance with pedigree 2.2658, pedigree (1,1,4,1,1)
  (same comment as for Cobalt)
- Cobalt [water, surface water]: 2.5791e-10 kg; lognormal variance with pedigree 1.8107, pedigree (1,1,4,1,1)
  (same comment as for Thallium)
- DOC, Dissolved Organic Carbon [water, surface water]: 0.00038536 kg; lognormal variance with pedigree 0.037281, pedigree (1,1,4,1,1)
  (same comment as for Thallium)
- Sodium, ion [water, ground-, long-term]: 0.0015377 kg; lognormal variance with pedigree 0.38441, pedigree (1,1,4,1,1)
  (same comment as for Cobalt)
- Nickel, ion [water, ground-, long-term]: 1.2333e-6 kg; lognormal variance with pedigree 1.5263, pedigree (1,1,4,1,1)
  (same comment as for Cobalt)
- Nickel, ion [water, surface water]: 8.317e-10 kg; lognormal variance with pedigree 2.1494, pedigree (1,1,4,1,1)
  (same comment as for Thallium)
- Arsenic, ion [water, surface water]: 1.0709e-6 kg; lognormal variance with pedigree 1.3898, pedigree (1,1,4,1,1)
  (same comment as for Thallium)
- Zinc, ion [water, ground-, long-term]: 0.001529 kg; lognormal variance with pedigree 2.5949, pedigree (1,1,4,1,1)
  (same comment as for Cobalt)
- Manganese [water, ground-, long-term]: 1.5724e-5 kg; lognormal variance with pedigree 2.1234, pedigree (1,1,4,1,1)
  (same comment as for Cobalt)
- COD, Chemical Oxygen Demand [water, ground-, long-term]: 0.025633 kg; lognormal variance with pedigree 0.016461, pedigree (1,1,4,1,1)
  (same comment as for Cobalt)
- Titanium, ion [water, surface water]: 3.0329e-7 kg; lognormal variance with pedigree 0.53535, pedigree (1,1,4,1,1)
  (same comment as for Thallium)
- Copper, ion [water, ground-, long-term]: 3.1438e-5 kg; lognormal variance with pedigree 1.0898, pedigree (1,1,4,1,1)
  (same comment as for Cobalt)
- Beryllium [water, ground-, long-term]: 3.7172e-7 kg; lognormal variance with pedigree 1.6126, pedigree (1,1,4,1,1)
  (same comment as for Cobalt)
- Titanium [air, urban air close to ground]: 6.7489e-7 kg; lognormal variance with pedigree 0.71624, pedigree (1,1,4,1,1)
  (same comment as for Manganese)
- Vanadium, ion [water, surface water]: 2.9872e-6 kg; lognormal variance with pedigree 0.78376, pedigree (1,1,4,1,1)
  (same comment as for Thallium)
- Sulfate [water, ground-, long-term]: 0.00089689 kg; lognormal variance with pedigree 0.47406, pedigree (1,1,4,1,1)
  (same comment as for Cobalt)
- Iron, ion [water, surface water]: 3.4216e-8 kg; lognormal variance with pedigree 0.89862, pedigree (1,1,4,1,1)
  (same comment as for Thallium)
- Silicon [water, surface water]: 1.59e-7 kg; lognormal variance with pedigree 1.5661, pedigree (1,1,4,1,1)
  (same comment as for Thallium)
- Lead [air, urban air close to ground]: 1.5791e-9 kg; lognormal variance with pedigree 1.2223, pedigree (1,1,4,1,1)
  (same comment as for Manganese)
- Sodium, ion [water, surface water]: 0.00041832 kg; lognormal variance with pedigree 0.28746, pedigree (1,1,4,1,1)
  (same comment as for Thallium)
- Antimony [water, ground-, long-term]: 5.4317e-6 kg; lognormal variance with pedigree 1.259, pedigree (1,1,4,1,1)
  (same comment as for Cobalt)
- Cadmium, ion [water, surface water]: 2.764e-9 kg; lognormal variance with pedigree 0.95676, pedigree (1,1,4,1,1)
  (same comment as for Thallium)
- Magnesium [water, surface water]: 3.7956e-7 kg; lognormal variance with pedigree 1.1135, pedigree (1,1,4,1,1)
  (same comment as for Thallium)
- Bromine [air, urban air close to ground]: 4.0632e-9 kg; lognormal variance with pedigree 1.3245, pedigree (1,1,4,1,1)
  (same comment as for Manganese)
- BOD5, Biological Oxygen Demand [water, ground-, long-term]: 0.0083845 kg; lognormal variance with pedigree 0.016461, pedigree (1,1,4,1,1)
  (same comment as for Cobalt)
- Cadmium [air, urban air close to ground]: 1.4677e-8 kg; lognormal variance with pedigree 1.1563, pedigree (1,1,4,1,1)
  (same comment as for Manganese)
- Bromine [water, ground-, long-term]: 7.8405e-7 kg; lognormal variance with pedigree 1.3031, pedigree (1,1,4,1,1)
  (same comment as for Cobalt)
- Vanadium [air, urban air close to ground]: 3.9681e-5 kg; lognormal variance with pedigree 0.59394, pedigree (1,1,4,1,1)
  (same comment as for Manganese)
- Chromium VI [water, ground-, long-term]: 9.9778e-7 kg; lognormal variance with pedigree 2.2153, pedigree (1,1,4,1,1)
  (same comment as for Cobalt)
- Methane, fossil [air, urban air close to ground]: 1.9725e-7 kg; lognormal variance with pedigree 0.081607, pedigree (1,1,4,1,1)
  (same comment as for NMVOC, non-methane volatile organic compounds, unspecified origin)
- Barium [air, urban air close to ground]: 7.9822e-7 kg; lognormal variance with pedigree 0.89161, pedigree (1,1,4,1,1)
  (same comment as for Manganese)
- Silicon [water, ground-, long-term]: 3.6869e-5 kg; lognormal variance with pedigree 6.1455, pedigree (1,1,4,1,1)
  (same comment as for Cobalt)
- Hydrogen fluoride [air, urban air close to ground]: 8.2322e-8 kg; lognormal variance with pedigree 1.2607, pedigree (1,1,4,1,1)
  (same comment as for Manganese)
- Strontium [water, surface water]: 4.5328e-8 kg; lognormal variance with pedigree 1.7254, pedigree (1,1,4,1,1)
  (same comment as for Thallium)
- Tin [air, urban air close to ground]: 2.1133e-12 kg; lognormal variance with pedigree 1.4984, pedigree (1,1,4,1,1)
  (same comment as for Manganese)
- Heat, waste [water, surface water]: 6.0874 MJ; lognormal variance with pedigree 0.030379, pedigree (1,1,4,1,1)
  Waste heat generated from heating value of this waste plus any electricity required to process it.
  Uncertainty: uncertainty is calculated from uncertainties in waste composition and uncertainties in energy efficiency and the uncertainty in internal energy demand
- Calcium, ion [water, ground-, long-term]: 0.05627 kg; lognormal variance with pedigree 0.18174, pedigree (1,1,4,1,1)
  (same comment as for Cobalt)
- Calcium, ion [water, surface water]: 0.00026375 kg; lognormal variance with pedigree 0.59738, pedigree (1,1,4,1,1)
  (same comment as for Thallium)
- Benzene, pentachloro- [air, urban air close to ground]: 6.9477e-11 kg; lognormal variance with pedigree 0.081607, pedigree (1,1,4,1,1)
  (same comment as for NMVOC, non-methane volatile organic compounds, unspecified origin)
- Cyanide [air, urban air close to ground]: 3.5259e-6 kg; lognormal variance with pedigree 1.4272, pedigree (1,1,4,1,1)
  Nitrogen species emitted to air after DeNOx stage.
  Uncertainty: uncertainty calculated from uncertainty in average N-emissions and uncertainty in the share of thermal NOx and the uncertainty in nitrogen content in *this* waste.
- TOC, Total Organic Carbon [water, surface water]: 0.00038536 kg; lognormal variance with pedigree 0.037281, pedigree (1,1,4,1,1)
  (same comment as for Thallium)
- Carbon dioxide, fossil [air, urban air close to ground]: 2.5414 kg; lognormal variance with pedigree 0.0115153, pedigree (1,1,4,1,1)
  (same comment as for Manganese)
- Ammonia [air, urban air close to ground]: 1.1543e-6 kg; lognormal variance with pedigree 0.26043, pedigree (1,1,4,1,1)
  (same comment as for Cyanide)
- Iron, ion [water, ground-, long-term]: 0.00065661 kg; lognormal variance with pedigree 0.80741, pedigree (1,1,4,1,1)
  (same comment as for Cobalt)
- Manganese [water, surface water]: 3.9675e-9 kg; lognormal variance with pedigree 0.98744, pedigree (1,1,4,1,1)
  (same comment as for Thallium)
- Phenol, pentachloro- [air, urban air close to ground]: 5.7267e-12 kg; lognormal variance with pedigree 0.081607, pedigree (1,1,4,1,1)
  (same comment as for NMVOC, non-methane volatile organic compounds, unspecified origin)
- Strontium [air, urban air close to ground]: 7.1991e-9 kg; lognormal variance with pedigree 1.046, pedigree (1,1,4,1,1)
  (same comment as for Manganese)
- BOD5, Biological Oxygen Demand [water, surface water]: 0.00082932 kg; lognormal variance with pedigree 0.034334, pedigree (1,1,4,1,1)
  (same comment as for Thallium)
- Chloride [water, surface water]: 0.00095383 kg; lognormal variance with pedigree 0.51963, pedigree (1,1,4,1,1)
  (same comment as for Thallium)
- Aluminium [air, urban air close to ground]: 1.3265e-10 kg; lognormal variance with pedigree 0.97983, pedigree (1,1,4,1,1)
  (same comment as for Manganese)
- Chloride [water, ground-, long-term]: 0.00028761 kg; lognormal variance with pedigree 0.63316, pedigree (1,1,4,1,1)
  (same comment as for Cobalt)
- Chromium, ion [water, surface water]: 8.2112e-10 kg; lognormal variance with pedigree 1.2621, pedigree (1,1,4,1,1)
  (same comment as for Thallium)
- Copper, ion [water, surface water]: 4.5502e-9 kg; lognormal variance with pedigree 0.99478, pedigree (1,1,4,1,1)
  (same comment as for Thallium)
- Bromine [water, surface water]: 7.3465e-6 kg; lognormal variance with pedigree 0.67123, pedigree (1,1,4,1,1)
  (same comment as for Thallium)
- Sodium [air, urban air close to ground]: 9.7875e-6 kg; lognormal variance with pedigree 0.58683, pedigree (1,1,4,1,1)
  (same comment as for Manganese)
- Lead [water, ground-, long-term]: 1.0039e-5 kg; lognormal variance with pedigree 4.1915, pedigree (1,1,4,1,1)
  (same comment as for Cobalt)
- Benzene, hexachloro- [air, urban air close to ground]: 2.7496e-11 kg; lognormal variance with pedigree 0.081607, pedigree (1,1,4,1,1)
  (same comment as for NMVOC, non-methane volatile organic compounds, unspecified origin)
- Mercury [water, ground-, long-term]: 6.5344e-9 kg; lognormal variance with pedigree 2.5107, pedigree (1,1,4,1,1)
  (same comment as for Cobalt)
- Antimony [air, urban air close to ground]: 6.8421e-12 kg; lognormal variance with pedigree 1.3682, pedigree (1,1,4,1,1)
  (same comment as for Manganese)
- Magnesium [water, ground-, long-term]: 7.2039e-5 kg; lognormal variance with pedigree 0.96789, pedigree (1,1,4,1,1)
  (same comment as for Cobalt)
- Fluoride [water, ground-, long-term]: 1.094e-5 kg; lognormal variance with pedigree 0.75333, pedigree (1,1,4,1,1)
  (same comment as for Cobalt)
- Dinitrogen monoxide [air, urban air close to ground]: 1.6412e-5 kg; lognormal variance with pedigree 1.4272, pedigree (1,1,4,1,1)
  (same comment as for Cyanide)
- Strontium [water, ground-, long-term]: 7.1897e-5 kg; lognormal variance with pedigree 1.0133, pedigree (1,1,4,1,1)
  (same comment as for Cobalt)
- Chromium [air, urban air close to ground]: 9.2342e-9 kg; lognormal variance with pedigree 1.2442, pedigree (1,1,4,1,1)
  (same comment as for Manganese)
- COD, Chemical Oxygen Demand [water, surface water]: 0.00088934 kg; lognormal variance with pedigree 0.038241, pedigree (1,1,4,1,1)
  (same comment as for Thallium)
- Particulates, < 2.5 um [air, urban air close to ground]: 1.57e-6 kg; lognormal variance with pedigree 0.38977, pedigree (1,1,4,1,1)
  (same comment as for NMVOC, non-methane volatile organic compounds, unspecified origin)
- Barium [water, surface water]: 2.7371e-8 kg; lognormal variance with pedigree 1.1779, pedigree (1,1,4,1,1)
  (same comment as for Thallium)
- Aluminium [water, surface water]: 1.7607e-8 kg; lognormal variance with pedigree 1.1348, pedigree (1,1,4,1,1)
  (same comment as for Thallium)
- Zinc, ion [water, surface water]: 4.528e-7 kg; lognormal variance with pedigree 0.44085, pedigree (1,1,4,1,1)
  (same comment as for Thallium)
- Carbon monoxide, fossil [air, urban air close to ground]: 2.2354e-5 kg; lognormal variance with pedigree 0.77064, pedigree (1,1,4,1,1)
  (same comment as for NMVOC, non-methane volatile organic compounds, unspecified origin)
- Sulfur dioxide [air, urban air close to ground]: 3.851e-6 kg; lognormal variance with pedigree 0.81102, pedigree (1,1,4,1,1)
  (same comment as for Manganese)
- Thallium [water, ground-, long-term]: 1.8987e-7 kg; lognormal variance with pedigree 1.2947, pedigree (1,1,4,1,1)
  (same comment as for Cobalt)
- Fluoride [water, surface water]: 9.3299e-7 kg; lognormal variance with pedigree 0.81066, pedigree (1,1,4,1,1)
  (same comment as for Thallium)
- Cadmium, ion [water, ground-, long-term]: 2.1092e-6 kg; lognormal variance with pedigree 6.5883, pedigree (1,1,4,1,1)
  (same comment as for Cobalt)
- Aluminium [water, ground-, long-term]: 0.00011765 kg; lognormal variance with pedigree 0.8269, pedigree (1,1,4,1,1)
  (same comment as for Cobalt)
- Calcium [air, urban air close to ground]: 1.7285e-5 kg; lognormal variance with pedigree 0.21147, pedigree (1,1,4,1,1)
  (same comment as for Manganese)
- Lead [water, surface water]: 1.8476e-9 kg; lognormal variance with pedigree 0.99479, pedigree (1,1,4,1,1)
  (same comment as for Thallium)
- Heat, waste [air, urban air close to ground]: 26.555 MJ; lognormal variance with pedigree 0.030379, pedigree (1,1,4,1,1)
  (same comment as for Heat, waste)
- Sulfate [water, surface water]: 0.00018371 kg; lognormal variance with pedigree 0.38899, pedigree (1,1,4,1,1)
  (same comment as for Thallium)
- Chromium VI [water, surface water]: 2.9567e-7 kg; lognormal variance with pedigree 1.2965, pedigree (1,1,4,1,1)
  (same comment as for Thallium)
- Nitrate [water, ground-, long-term]: 3.9577e-5 kg; lognormal variance with pedigree 0.65867, pedigree (1,1,4,1,1)
  (same comment as for Cobalt)
- Selenium [air, urban air close to ground]: 2.0379e-8 kg; lognormal variance with pedigree 1.52, pedigree (1,1,4,1,1)
  (same comment as for Manganese)
- Selenium [water, ground-, long-term]: 1.1095e-6 kg; lognormal variance with pedigree 1.1079, pedigree (1,1,4,1,1)
  (same comment as for Cobalt)
- Tin, ion [water, surface water]: 8.5593e-11 kg; lognormal variance with pedigree 2.0444, pedigree (1,1,4,1,1)
  (same comment as for Thallium)
- Toluene [air, urban air close to ground]: 2.63e-8 kg; lognormal variance with pedigree 0.081607, pedigree (1,1,4,1,1)
  (same comment as for NMVOC, non-methane volatile organic compounds, unspecified origin)
- Particulates, > 2.5 um, and < 10um [air, urban air close to ground]: 7.8896e-9 kg; lognormal variance with pedigree 0.18035, pedigree (1,1,4,1,1)
  (same comment as for NMVOC, non-methane volatile organic compounds, unspecified origin)
- Magnesium [air, urban air close to ground]: 8.5802e-8 kg; lognormal variance with pedigree 1.0166, pedigree (1,1,4,1,1)
  (same comment as for Manganese)
- TOC, Total Organic Carbon [water, ground-, long-term]: 0.010143 kg; lognormal variance with pedigree 0.016461, pedigree (1,1,4,1,1)
  (same comment as for Cobalt)
- Copper [air, urban air close to ground]: 3.214e-9 kg; lognormal variance with pedigree 1.1416, pedigree (1,1,4,1,1)
  (same comment as for Manganese)
- Zinc [air, urban air close to ground]: 3.3632e-6 kg; lognormal variance with pedigree 0.48153, pedigree (1,1,4,1,1)
  (same comment as for Manganese)
- Hydrogen chloride [air, urban air close to ground]: 7.0749e-7 kg; lognormal variance with pedigree 0.6607, pedigree (1,1,4,1,1)
  (same comment as for Manganese)
- Thallium [air, urban air close to ground]: 3.2538e-10 kg; lognormal variance with pedigree 1.7409, pedigree (1,1,4,1,1)
  (same comment as for Manganese)
- Iron [air, urban air close to ground]: 2.3326e-9 kg; lognormal variance with pedigree 0.6945, pedigree (1,1,4,1,1)
  (same comment as for Manganese)
- Cobalt [air, urban air close to ground]: 2.589e-9 kg; lognormal variance with pedigree 1.5487, pedigree (1,1,4,1,1)
  (same comment as for Manganese)
- Barium [water, ground-, long-term]: 0.00010242 kg; lognormal variance with pedigree 2.2432, pedigree (1,1,4,1,1)
  (same comment as for Cobalt)
- Dioxins, measured as 2,3,7,8-tetrachlorodibenzo-p-dioxin [air, urban air close to ground]: 2.6299e-14 kg; lognormal variance with pedigree 0.38977, pedigree (1,1,4,1,1)
  (same comment as for NMVOC, non-methane volatile organic compounds, unspecified origin)
- Water [water, surface water]: 0.00046586 m3; lognormal variance with pedigree 1.4263, pedigree (1,1,4,1,1)
  Process water released to surface water.
  Uncertainty: uncertainty calculated from uncertainty in process water input and the uncertainty of fraction to surface water.
- Titanium, ion [water, ground-, long-term]: 0.00024318 kg; lognormal variance with pedigree 0.81871, pedigree (1,1,4,1,1)
  (same comment as for Cobalt)
- Arsenic [air, urban air close to ground]: 1.2107e-8 kg; lognormal variance with pedigree 1.5128, pedigree (1,1,4,1,1)
  (same comment as for Manganese)
- Benzo(a)pyrene [air, urban air close to ground]: 2.9263e-13 kg; lognormal variance with pedigree 0.38977, pedigree (1,1,4,1,1)
  (same comment as for NMVOC, non-methane volatile organic compounds, unspecified origin)
- Mercury [water, surface water]: 1.5027e-10 kg; lognormal variance with pedigree 1.9253, pedigree (1,1,4,1,1)
  (same comment as for Thallium)
- Nickel [air, urban air close to ground]: 1.0219e-9 kg; lognormal variance with pedigree 1.5703, pedigree (1,1,4,1,1)
  (same comment as for Manganese)
- Nitrogen oxides [air, urban air close to ground]: 0.00036553 kg; lognormal variance with pedigree 0.26043, pedigree (1,1,4,1,1)
  Sum of fuel-Nox and thermal-NOx emitted to air after DeNOx stage.
  Uncertainty: uncertainty calculated from uncertainty in average N-emissions and uncertainty in the share of thermal NOx and the uncertainty in nitrogen content in *this* waste.
- Mercury [air, urban air close to ground]: 1.1532e-9 kg; lognormal variance with pedigree 1.9367, pedigree (1,1,4,1,1)
  (same comment as for Manganese)
- Selenium [water, surface water]: 5.7708e-7 kg; lognormal variance with pedigree 1.202, pedigree (1,1,4,1,1)
  (same comment as for Thallium)
