# treatment of wastewater, from residence, capacity 1.1E10l/year

Dataset: EcoSpold 2, unit process
Geography: CH
Time period: 1994-01-01 to 2021-12-31
Technology level: current
Classification: EcoSpold01Categories: waste management/wastewater treatment
Classification: ISIC rev.4 ecoinvent: 3700:Sewerage
Tags: ConvertedDataset; Treatment
Scenario: Business-as-Usual
System model: Allocation, cut-off by classification
Generated by: Gabor Doka (obsolete)
Published in: Doka G. 2008
Database: ecoinvent
isCopyrightProtected: true
accessRestrictedTo: 1

## General comment
Wastewater purified in a moderatly large municipal wastewater treatment plant (capacity class 2), with an average capacity size of 71100 per-captia-equivalents PCE.
Wastewater contains (in kg/m3): COD: 0.1556 (GSD=122.5%); BOD: 0.1036 (GSD=122.5%); DOC: 0.04575 (GSD=122.5%); TOC: 0.0673 (GSD=122.5%); SO4-S: 0.044 (GSD=122.5%); S part.: 0.002 (GSD=122.5%); NH4-N: 0.01495 (GSD=122.5%); NO3-N: 0.00105 (GSD=122.5%); NO2-N: 0.0004 (GSD=122.5%); N part.: 0.003279 (GSD=122.5%); N org. solv.: 0.008392 (GSD=122.5%); PO4-P: 0.002459 (GSD=122.5%); P part.: 0.0006147 (GSD=122.5%); Cl: 0.03003 (GSD=224.1%); F: 0.00003277 (GSD=224.1%); As: 0.0000009 (GSD=224.1%); Cd: 0.0000002806 (GSD=223.8%); Co: 0.000001618 (GSD=223.8%); Cr: 0.00001223 (GSD=223.8%); Cu: 0.00003744 (GSD=223.8%); Hg: 0.0000002 (GSD=223.8%); Mn: 0.000053 (GSD=224.1%); Mo: 0.0000009574 (GSD=223.8%); Ni: 0.000006589 (GSD=223.8%); Pb: 0.000008631 (GSD=223.8%); Sn: 0.0000034 (GSD=224.1%); Zn: 0.0001094 (GSD=223.8%); Si: 0.003126 (GSD=224.1%); Fe: 0.007093 (GSD=224.1%); Ca: 0.05083 (GSD=224.1%); Al: 0.001038 (GSD=224.1%); K: 0.0003989 (GSD=224.1%); Mg: 0.005707 (GSD=224.1%); Na: 0.002186 (GSD=224.1%);
[This dataset was already contained in the ecoinvent database version 2. It was not individually updated during the transfer to ecoinvent version 3. Life Cycle Impact Assessment results may still have changed, as they are affected by changes in the supply chain, i.e. in other datasets. This dataset was generated following the ecoinvent quality guidelines for version 2. It may have been subject to central changes described in the ecoinvent version 3 change report (http://www.ecoinvent.org/database/ecoinvent-version-3/reports-of-changes/), and the results of the central updates were reviewed extensively. The changes added e.g. consistent water flows and other information throughout the database. The documentation of this dataset can be found in the ecoinvent reports of version 2, which are still available via the ecoinvent website. The change report linked above covers all central changes that were made during the conversion process.]

## Included activities end
Infrastructure materials for municipal wastewater treatment plant, transports, dismantling. Land use burdens.

## Geography
Specific to the technology mix encountered in Switzerland in 2000. Well applicable to modern treatment practices in Europe, North America or Japan.

## Technology
Three stage wastewater treatment (mechanical, biological, chemical) including sludge digestion (fermentation) according to the average technology in Switzerland

## Parameters
- fraction, process water, to air: 0.1 dimensionless; name fraction_PW_to_air; lognormal variance with pedigree 0.092025, pedigree (4,4,3,2,4)
  Literature value (Statistics Canada, 2007 & Shaffer, K.H., 2008, Consumptive water use in the Great Lakes Basin, USGS) (Vionnet, S., Quantis Water Database - Technical Report, 2012).

## Reference product
- wastewater, from residence: -1 m3; name RP; By-product classification Waste; CPC 39920: Sewage sludge
  production volume 0.008 m3
    Estimated. The Swiss production volume is extrapolated from the global production volume using the nominal GDP of 2+005 (source: United Nations, http://data.un.org/Glossary.aspx?q=GDP+%28current+US%24%29, accessed 20130726 and 20130312).
    Gross domestic product (GDP) at current prices is GDP at prices of the current reporting period. Also known as nominal GDP.
  property price 0 EUR2005; name RP_price_EUR2005
    Waste products are assigned a price of zero as they are assumed to require further treatment.
  property carbon content, non-fossil 0.199421
    0.0673 kg TOC/m3 (Tab A.17, ecoinvent v2.2 report 13_I). TOC was considered as Total Carbon.
  property carbon content 0.199421
    carbon content on a dry matter basis (reserved; not for manual entry)
  properties: wet mass 1000 kg, carbon content, fossil 0, water in wet mass 999.663 kg, water content 2962.17, dry mass 0.337476 kg, carbon allocation 0.0673 kg

## Inputs from technosphere
- titanium dioxide: 2.0626e-6 kg; lognormal variance with pedigree 0.54, pedigree (1,1,5,1,1)
  burden from sludge incineration. Uncertainty calculated from wastewater composition and treatment model
  properties: wet mass 1 kg, dry mass 1 kg
- slag landfill: 4.1979e-11 unit; lognormal variance with pedigree 0.07, pedigree (1,1,5,1,1)
  (same comment as for titanium dioxide)
- process-specific burdens, slag landfill: 0.023613 kg; lognormal variance with pedigree 0.07, pedigree (1,1,5,1,1)
  burden from sludge incineration. Uncertainty calculated from wastewater composition and treatment model;activityLink introduced to establish a direct link to the corresponding regional supply of this product
- hydrochloric acid, without water, in 30% solution state: 3.9503e-7 kg; lognormal variance with pedigree 0.08, pedigree (1,1,5,1,1)
  (same comment as for titanium dioxide)
  properties: dry mass 1 kg, wet mass 1 kg, heating value, net 3.32 MJ
- chemical, organic: 5.2547e-7 kg; lognormal variance with pedigree 0.43, pedigree (1,1,5,1,1)
  (same comment as for titanium dioxide)
  properties: carbon content, fossil 0.628, wet mass 1 kg, dry mass 1 kg, heating value, net 19.03 MJ
  note on carbon content, fossil: This dataset is an unweighted average of 20 organic substances (listed in Tab 88.1, ecoinvent v2.2 report 8, part II), being part of the top100 chemicals included in this database. The C-content has also been calculated as an unweighted average of the C content of the substances composing this dataset.
- iron sulfate: 0.01166 kg; lognormal variance with pedigree 0.1, pedigree (1,1,5,1,1)
  direct wastewater treatment plant burden. Uncertainty calculated from wastewater composition and treatment model
  properties: dry mass 1 kg, wet mass 1 kg
- heat, district or industrial, other than natural gas: 0.10875 MJ; lognormal variance with pedigree 0.05, pedigree (1,1,5,1,1)
  (same comment as for titanium dioxide)
  properties: heating value, net 1 MJ
- chromium oxide, flakes: 4.2095e-8 kg; lognormal variance with pedigree 0.54, pedigree (1,1,5,1,1)
  (same comment as for titanium dioxide)
  properties: wet mass 1 kg, dry mass 1 kg
- cement, unspecified: 0.0014809 kg; lognormal variance with pedigree 0.08, pedigree (1,1,5,1,1)
  (same comment as for titanium dioxide)
  properties: wet mass 1 kg, dry mass 1 kg
- chemical, inorganic: 6.5839e-7 kg; lognormal variance with pedigree 0.08, pedigree (1,1,5,1,1)
  (same comment as for titanium dioxide)
  properties: carbon content, fossil 0.003, dry mass 1 kg, wet mass 1 kg
  note on carbon content, fossil: This dataset is an unweighted average of 20 inorganic substances (listed in Tab 88.1, ecoinvent v2.2 report 8, part II), being part of the top100 chemicals included in this database. The C-content has also been calculated as an unweighted average of the C content of the substances composing this dataset.
- quicklime, milled, packed: 1.2537e-6 kg; lognormal variance with pedigree 0.08, pedigree (1,1,5,1,1)
  (same comment as for titanium dioxide)
  properties: water content 0.010101, wet mass 1 kg, dry mass 0.99 kg
- electricity, low voltage: 0.20571 kWh; lognormal variance with pedigree 0.06, pedigree (1,1,5,1,1)
  (same comment as for iron sulfate)
- sodium hydroxide, without water, in 50% solution state: 0.00035213 kg; lognormal variance with pedigree 0.09, pedigree (1,1,5,1,1)
  (same comment as for titanium dioxide)
  properties: dry mass 1 kg, wet mass 1 kg, heating value, net 3.03 MJ
- municipal waste incineration facility: 3.2417e-11 unit; lognormal variance with pedigree 0.04, pedigree (1,1,5,1,1)
  (same comment as for titanium dioxide)
- waste cement, hydrated: -0.0037022 kg; name BP3; lognormal variance with pedigree 0.08, pedigree (1,1,5,1,1)
  (same comment as for titanium dioxide)
  production volume 0.0037022 kg; = RP*-1*BP3
    Calculated from the production volume of sewage, from residence in proportion to the respective output amounts.
  property price 0 EUR2005; name BP3_price_EUR2005
  properties: wet mass 1 kg, dry mass 1 kg
- process-specific burdens, municipal waste incineration: 0.12967 kg; lognormal variance with pedigree 0.04, pedigree (1,1,5,1,1)
  (same comment as for process-specific burdens, slag landfill)
- waste graphical paper: -0.0155 kg; name BP2; lognormal variance with pedigree 0.04, pedigree (1,1,5,1,1)
  (same comment as for iron sulfate)
  production volume 0.0155 kg; = RP*-1*BP2
    (same comment as for waste cement, hydrated)
  property price 0 EUR2005; name BP2_price_EUR2005
  properties: heating value, net 14.12 MJ, carbon content, non-fossil 0.454955, water content 0.126126, dry mass 0.888 kg, wet mass 1 kg
  note on heating value, net: Value taken from the general comment of the treatment dataset.
- electricity, high voltage: 0.018642 kWh; lognormal variance with pedigree 0.49, pedigree (1,1,5,1,1)
  (same comment as for titanium dioxide)
- waste plastic, mixture: -0.0155 kg; name BP1; lognormal variance with pedigree 0.04, pedigree (1,1,5,1,1)
  (same comment as for iron sulfate)
  production volume 0.0155 kg; = RP*-1*BP1
    (same comment as for waste cement, hydrated)
  property price 0 EUR2005; name BP1_price_EUR2005
  properties: water content 0.180638, heating value, net 30.79 MJ, wet mass 1 kg, carbon content, fossil 0.747344, dry mass 0.847 kg
  note on carbon content, fossil: C content in 1 kg DM was calculated using data in Tab A.2, ecoinvent v2.2 report 13_I
- ammonia, anhydrous, liquid: 7.2058e-5 kg; lognormal variance with pedigree 0.22, pedigree (1,1,5,1,1)
  (same comment as for titanium dioxide)
  properties: dry mass 1 kg, wet mass 1 kg
- sewer grid, 1.1E10l/year, 242 km: 1.6832e-7 km; lognormal variance with pedigree 0.04, pedigree (1,1,5,1,1)
  uncertainty heeded in exchanges of the module
  This exchange has an activity link directly to the producing activity because the product is primarily consumed in the same geographical area where it is produced.
- process-specific burdens, residual material landfill: 0.0037022 kg; lognormal variance with pedigree 0.07, pedigree (1,1,5,1,1)
  (same comment as for process-specific burdens, slag landfill)
- residual material landfill: 7.7129e-12 unit; lognormal variance with pedigree 0.07, pedigree (1,1,5,1,1)
  (same comment as for titanium dioxide)
- heat, district or industrial, natural gas: 0.00632448 MJ; lognormal variance with pedigree 0.22, pedigree (1,1,5,1,1)
  (same comment as for titanium dioxide)
  properties: heating value, net 1 MJ
- liquid manure spreading, by vacuum tanker: 0.00032716 m3; lognormal variance with pedigree 0.04, pedigree (1,1,5,1,1)
  burden from sludge spreading. Uncertainty calculated from wastewater composition and treatment model
  This exchange has an activity link directly to the producing activity because the product is primarily consumed in the same geographical area where it is produced.
- wastewater treatment facility, capacity 1.1E10l/year: 1.9883e-9 unit; lognormal variance with pedigree 0.04, pedigree (1,1,5,1,1)
  (same comment as for sewer grid, 1.1E10l/year, 242 km)
- iron (III) chloride, without water, in 40% solution state: 0.015947 kg; lognormal variance with pedigree 0.1, pedigree (1,1,5,1,1)
  direct wastewater treatment plant burden plus burden from sludge incineration. Uncertainty calculated from wastewater composition and treatment model
  properties: wet mass 1 kg, dry mass 1 kg
- residential sewer grid, 0.087 km: 2.8713e-7 km; lognormal variance with pedigree 0.04, pedigree (1,1,5,1,1)
  uncertainty heeded in exchanges of the module
- aluminium sulfate, powder: 0.0031512 kg; lognormal variance with pedigree 0.1, pedigree (1,1,5,1,1)
  (same comment as for iron sulfate)
  properties: wet mass 1 kg, dry mass 1 kg

## Emissions to nature
- Lead [air, urban air close to ground]: 1.7517e-10 kg; lognormal variance with pedigree 0.75, pedigree (1,1,5,1,1)
  direct digester gas emission plus emission from sludge incineration. Uncertainty calculated from wastewater composition and treatment model
- Nitrogen [water, surface water]: 0.00049 kg; lognormal variance with pedigree 0.08, pedigree (1,1,5,1,1)
  direct wastewater treatment plant emission. Uncertainty calculated from wastewater composition and treatment model
- Methane, non-fossil [air, urban air close to ground]: 0.0005024 kg; lognormal variance with pedigree 0.14, pedigree (1,1,5,1,1)
  (same comment as for Lead)
- Nickel, ion [water, ground-, long-term]: 1.4891e-6 kg; lognormal variance with pedigree 0.71, pedigree (1,1,5,1,1)
  emission from sludge incineration. Uncertainty calculated from wastewater composition and treatment model
- Molybdenum [water, surface water]: 5.3529e-7 kg; lognormal variance with pedigree 0.58, pedigree (1,1,5,1,1)
  sewer overload discharge plus direct wastewater treatment plant emission plus emission from sludge incineration. Uncertainty calculated from wastewater composition and treatment model
- Manganese [water, surface water]: 2.6898e-5 kg; lognormal variance with pedigree 0.66, pedigree (1,1,5,1,1)
  (same comment as for Molybdenum)
- Phosphate [water, surface water]: 0.0027041 kg; lognormal variance with pedigree 0.08, pedigree (1,1,5,1,1)
  sewer overload discharge plus direct wastewater treatment plant emission plus emission from sludge incineration plus emission from sludge spreading. Uncertainty calculated from wastewater composition and treatment model
- Aluminium [water, surface water]: 6.232e-5 kg; lognormal variance with pedigree 0.55, pedigree (1,1,5,1,1)
  (same comment as for Molybdenum)
- Sodium, ion [water, surface water]: 0.002186 kg; lognormal variance with pedigree 0.67, pedigree (1,1,5,1,1)
  (same comment as for Molybdenum)
- BOD5, Biological Oxygen Demand [water, surface water]: 0.0098229 kg; lognormal variance with pedigree 0.07, pedigree (1,1,5,1,1)
  (same comment as for Molybdenum)
- Mercury [water, surface water]: 6.274e-8 kg; lognormal variance with pedigree 0.64, pedigree (1,1,5,1,1)
  (same comment as for Molybdenum)
- Cobalt [water, surface water]: 8.2109e-7 kg; lognormal variance with pedigree 0.66, pedigree (1,1,5,1,1)
  (same comment as for Molybdenum)
- Potassium, ion [water, surface water]: 0.0003989 kg; lognormal variance with pedigree 0.67, pedigree (1,1,5,1,1)
  (same comment as for Molybdenum)
- Cadmium [air, urban air close to ground]: 4.7295e-12 kg; lognormal variance with pedigree 0.74, pedigree (1,1,5,1,1)
  (same comment as for Lead)
- Magnesium [water, ground-, long-term]: 0.00031695 kg; lognormal variance with pedigree 0.71, pedigree (1,1,5,1,1)
  (same comment as for Nickel, ion)
- Silicon [water, surface water]: 0.00018788 kg; lognormal variance with pedigree 0.57, pedigree (1,1,5,1,1)
  (same comment as for Molybdenum)
- Carbon dioxide, non-fossil [air, urban air close to ground]: 0.19253 kg; lognormal variance with pedigree 0.06, pedigree (1,1,5,1,1)
  direct wastewater treatment plant emission plus direct digester gas emission plus emission from sludge incineration. Uncertainty calculated from wastewater composition and treatment model
- Copper, ion [water, ground-, long-term]: 1.3747e-5 kg; lognormal variance with pedigree 0.73, pedigree (1,1,5,1,1)
  (same comment as for Nickel, ion)
- Iron [soil, agricultural]: 0.0051323 kg; lognormal variance with pedigree 0.16, pedigree (1,1,5,1,1)
  emission from sludge spreading. Uncertainty calculated from wastewater composition and treatment model
- Water [water, unspecified]: 0.9 m3; name water_to_water_unspecified; lognormal variance with pedigree 0.0807, pedigree (2,2,5,1,1)
  Calculated value based on water balance.
  property dry mass 0 kg; name DM
  property fraction, origin: unspecified 0; name fraction_origin_unspecified_Ww
  property water in wet mass 1000 kg; name WWM
  property fraction, origin: fresh water 1; name fraction_origin_fresh_water_Ww
  property wet mass 1000 kg; name WM
  property carbon content, fossil 0; name C_content_fossil
  property fraction, origin: salt water 0; name fraction_origin_salt_water_Ww
  property carbon content, non-fossil 0; name C_content_non_fossil
- Phosphorus [air, urban air close to ground]: 1.3301e-6 kg; lognormal variance with pedigree 0.1, pedigree (1,1,5,1,1)
  (same comment as for Lead)
- Carbon [soil, agricultural]: 0.0066874 kg; lognormal variance with pedigree 0.1, pedigree (1,1,5,1,1)
  (same comment as for Iron)
- Aluminium [air, urban air close to ground]: 1.4113e-6 kg; lognormal variance with pedigree 0.47, pedigree (1,1,5,1,1)
  (same comment as for Lead)
- Water [air, unspecified]: 0.1 m3; name water_to_air_unspecified; lognormal variance with pedigree 0.0807, pedigree (2,2,5,1,1)
  Calculated value based on water balance.
  property fraction, origin: fresh water 0; name fraction_origin_fresh_water
  property fraction, origin: unspecified 1; name fraction_origin_unspecified
  property fraction, origin: salt water 0; name fraction_origin_salt_water
- Silicon [air, urban air close to ground]: 4.1957e-6 kg; lognormal variance with pedigree 0.73, pedigree (1,1,5,1,1)
  (same comment as for Lead)
- Calcium [air, urban air close to ground]: 5.0981e-6 kg; lognormal variance with pedigree 0.73, pedigree (1,1,5,1,1)
  (same comment as for Lead)
- Cobalt [water, ground-, long-term]: 4.2779e-7 kg; lognormal variance with pedigree 0.71, pedigree (1,1,5,1,1)
  (same comment as for Nickel, ion)
- Lead [soil, agricultural]: 2.9713e-6 kg; lognormal variance with pedigree 0.71, pedigree (1,1,5,1,1)
  (same comment as for Iron)
- BOD5, Biological Oxygen Demand [water, ground-, long-term]: 8.5596e-5 kg; lognormal variance with pedigree 0.11, pedigree (1,1,5,1,1)
  (same comment as for Nickel, ion)
- Chromium [soil, agricultural]: 2.3299e-6 kg; lognormal variance with pedigree 0.71, pedigree (1,1,5,1,1)
  (same comment as for Iron)
- Nickel [soil, agricultural]: 1.003e-6 kg; lognormal variance with pedigree 0.71, pedigree (1,1,5,1,1)
  (same comment as for Iron)
- Zinc, ion [water, ground-, long-term]: 7.1834e-7 kg; lognormal variance with pedigree 5.51, pedigree (1,1,5,1,1)
  (same comment as for Nickel, ion)
- Arsenic, ion [water, surface water]: 7.5922e-7 kg; lognormal variance with pedigree 0.61, pedigree (1,1,5,1,1)
  (same comment as for Molybdenum)
- Arsenic [soil, agricultural]: 7.5114e-8 kg; lognormal variance with pedigree 0.71, pedigree (1,1,5,1,1)
  (same comment as for Iron)
- Cadmium, ion [water, ground-, long-term]: 8.5046e-10 kg; lognormal variance with pedigree 6.9, pedigree (1,1,5,1,1)
  (same comment as for Nickel, ion)
- TOC, Total Organic Carbon [water, ground-, long-term]: 0.00010355 kg; lognormal variance with pedigree 0.11, pedigree (1,1,5,1,1)
  (same comment as for Nickel, ion)
- Nickel, ion [water, surface water]: 3.9966e-6 kg; lognormal variance with pedigree 0.66, pedigree (1,1,5,1,1)
  (same comment as for Molybdenum)
- Tin, ion [water, surface water]: 1.4223e-6 kg; lognormal variance with pedigree 0.66, pedigree (1,1,5,1,1)
  (same comment as for Molybdenum)
- Carbon monoxide, non-fossil [air, urban air close to ground]: 0.00017096 kg; lognormal variance with pedigree 0.15, pedigree (1,1,5,1,1)
  (same comment as for Lead)
- COD, Chemical Oxygen Demand [water, surface water]: 0.030152 kg; lognormal variance with pedigree 0.08, pedigree (1,1,5,1,1)
  (same comment as for Molybdenum)
- NMVOC, non-methane volatile organic compounds, unspecified origin [air, urban air close to ground]: 2.2813e-6 kg; lognormal variance with pedigree 0.26, pedigree (1,1,5,1,1)
  direct digester gas emission. Uncertainty calculated from wastewater composition and treatment model
- Cobalt [air, urban air close to ground]: 1.5513e-14 kg; lognormal variance with pedigree 0.81, pedigree (1,1,5,1,1)
  (same comment as for Lead)
- Chromium, ion [water, surface water]: 1.1775e-8 kg; lognormal variance with pedigree 0.72, pedigree (1,1,5,1,1)
  (same comment as for Nickel, ion)
- Arsenic, ion [water, ground-, long-term]: 6.5411e-8 kg; lognormal variance with pedigree 0.71, pedigree (1,1,5,1,1)
  (same comment as for Nickel, ion)
- DOC, Dissolved Organic Carbon [water, surface water]: 0.0075378 kg; lognormal variance with pedigree 0.08, pedigree (1,1,5,1,1)
  (same comment as for Molybdenum)
- Cadmium, ion [water, surface water]: 1.4246e-7 kg; lognormal variance with pedigree 0.66, pedigree (1,1,5,1,1)
  (same comment as for Molybdenum)
- Fluoride [water, surface water]: 3.2769e-5 kg; lognormal variance with pedigree 0.67, pedigree (1,1,5,1,1)
  (same comment as for Molybdenum)
- Manganese [air, urban air close to ground]: 8.7161e-14 kg; lognormal variance with pedigree 0.83, pedigree (1,1,5,1,1)
  (same comment as for Lead)
- Copper, ion [water, surface water]: 9.7125e-6 kg; lognormal variance with pedigree 0.65, pedigree (1,1,5,1,1)
  (same comment as for Molybdenum)
- Chromium VI [water, surface water]: 6.3282e-6 kg; lognormal variance with pedigree 0.64, pedigree (1,1,5,1,1)
  (same comment as for Molybdenum)
- Nitrite [water, surface water]: 0.000644 kg; lognormal variance with pedigree 0.08, pedigree (1,1,5,1,1)
  (same comment as for Nitrogen)
- Calcium, ion [water, ground-, long-term]: 0.0026613 kg; lognormal variance with pedigree 0.71, pedigree (1,1,5,1,1)
  (same comment as for Nickel, ion)
- Iron, ion [water, ground-, long-term]: 0.003812 kg; lognormal variance with pedigree 0.99, pedigree (1,1,5,1,1)
  (same comment as for Nickel, ion)
- Manganese [water, ground-, long-term]: 1.3784e-5 kg; lognormal variance with pedigree 0.87, pedigree (1,1,5,1,1)
  (same comment as for Nickel, ion)
- Sulfur dioxide [air, urban air close to ground]: 0.00088615 kg; lognormal variance with pedigree 0.1, pedigree (1,1,5,1,1)
  (same comment as for Lead)
- Magnesium [air, urban air close to ground]: 4.7278e-7 kg; lognormal variance with pedigree 0.73, pedigree (1,1,5,1,1)
  (same comment as for Lead)
- Sulfate [water, surface water]: 0.1449 kg; lognormal variance with pedigree 0.08, pedigree (1,1,5,1,1)
  (same comment as for Molybdenum)
- COD, Chemical Oxygen Demand [water, ground-, long-term]: 0.00026168 kg; lognormal variance with pedigree 0.11, pedigree (1,1,5,1,1)
  (same comment as for Nickel, ion)
- Aluminium [soil, agricultural]: 0.00056973 kg; lognormal variance with pedigree 0.46, pedigree (1,1,5,1,1)
  (same comment as for Iron)
- Tin [air, urban air close to ground]: 1.6092e-9 kg; lognormal variance with pedigree 0.73, pedigree (1,1,5,1,1)
  (same comment as for Lead)
- Mercury [air, urban air close to ground]: 3.3683e-13 kg; lognormal variance with pedigree 0.74, pedigree (1,1,5,1,1)
  (same comment as for Lead)
- TOC, Total Organic Carbon [water, surface water]: 0.0072994 kg; lognormal variance with pedigree 0.08, pedigree (1,1,5,1,1)
  (same comment as for Molybdenum)
- Ammonium, ion [water, surface water]: 0.011027 kg; lognormal variance with pedigree 0.06, pedigree (1,1,5,1,1)
  (same comment as for Nitrogen)
- Molybdenum [air, urban air close to ground]: 5.7835e-10 kg; lognormal variance with pedigree 0.73, pedigree (1,1,5,1,1)
  (same comment as for Lead)
- Aluminium [water, ground-, long-term]: 0.00066857 kg; lognormal variance with pedigree 0.46, pedigree (1,1,5,1,1)
  (same comment as for Nickel, ion)
- DOC, Dissolved Organic Carbon [water, ground-, long-term]: 0.00010355 kg; lognormal variance with pedigree 0.11, pedigree (1,1,5,1,1)
  (same comment as for Nickel, ion)
- Iron [air, urban air close to ground]: 2.7169e-7 kg; lognormal variance with pedigree 0.2, pedigree (1,1,5,1,1)
  (same comment as for Lead)
- Lead [water, ground-, long-term]: 3.3568e-7 kg; lognormal variance with pedigree 6.92, pedigree (1,1,5,1,1)
  (same comment as for Nickel, ion)
- Magnesium [water, surface water]: 0.0051484 kg; lognormal variance with pedigree 0.67, pedigree (1,1,5,1,1)
  (same comment as for Molybdenum)
- Dinitrogen monoxide [air, urban air close to ground]: 0.00010363 kg; lognormal variance with pedigree 0.07, pedigree (1,1,5,1,1)
  direct wastewater treatment plant emission plus direct digester gas emission plus emission from sludge incineration plus emission from sludge spreading. Uncertainty calculated from wastewater composition and treatment model
- Arsenic [air, urban air close to ground]: 2.5337e-10 kg; lognormal variance with pedigree 0.73, pedigree (1,1,5,1,1)
  (same comment as for Lead)
- Zinc, ion [water, surface water]: 3.381e-5 kg; lognormal variance with pedigree 0.65, pedigree (1,1,5,1,1)
  (same comment as for Molybdenum)
- Copper [soil, agricultural]: 1.0725e-5 kg; lognormal variance with pedigree 0.71, pedigree (1,1,5,1,1)
  (same comment as for Iron)
- Magnesium [soil, agricultural]: 0.00021652 kg; lognormal variance with pedigree 0.71, pedigree (1,1,5,1,1)
  (same comment as for Iron)
- Cyanide [air, urban air close to ground]: 1.2855e-6 kg; lognormal variance with pedigree 0.24, pedigree (1,1,5,1,1)
  (same comment as for Nickel, ion)
- Nitrate [water, surface water]: 0.048305 kg; lognormal variance with pedigree 0.06, pedigree (1,1,5,1,1)
  (same comment as for Molybdenum)
- Phosphate [water, ground-]: 1.4652e-5 kg; lognormal variance with pedigree 0.13, pedigree (1,1,5,1,1)
  (same comment as for Iron)
- Cadmium [soil, agricultural]: 5.3452e-8 kg; lognormal variance with pedigree 0.71, pedigree (1,1,5,1,1)
  (same comment as for Iron)
- Calcium, ion [water, surface water]: 0.045858 kg; lognormal variance with pedigree 0.67, pedigree (1,1,5,1,1)
  (same comment as for Molybdenum)
- Nickel [air, urban air close to ground]: 6.8642e-14 kg; lognormal variance with pedigree 0.81, pedigree (1,1,5,1,1)
  (same comment as for Lead)
- Molybdenum [water, ground-, long-term]: 2.392e-7 kg; lognormal variance with pedigree 0.71, pedigree (1,1,5,1,1)
  (same comment as for Nickel, ion)
- Zinc [soil, agricultural]: 2.9219e-5 kg; lognormal variance with pedigree 0.71, pedigree (1,1,5,1,1)
  (same comment as for Iron)
- Manganese [soil, agricultural]: 1.0095e-5 kg; lognormal variance with pedigree 0.71, pedigree (1,1,5,1,1)
  (same comment as for Iron)
- Phosphate [water, ground-, long-term]: 0.00015578 kg; lognormal variance with pedigree 4.25, pedigree (1,1,5,1,1)
  (same comment as for Nickel, ion)
- Mercury [water, ground-, long-term]: 4.4099e-9 kg; lognormal variance with pedigree 2.97, pedigree (1,1,5,1,1)
  (same comment as for Nickel, ion)
- Chloride [water, surface water]: 0.040484 kg; lognormal variance with pedigree 0.48, pedigree (1,1,5,1,1)
  (same comment as for Molybdenum)
- Nitrate [water, ground-, long-term]: 5.1309e-5 kg; lognormal variance with pedigree 0.08, pedigree (1,1,5,1,1)
  (same comment as for Nickel, ion)
- Nitrogen oxides [air, urban air close to ground]: 0.00069993 kg; lognormal variance with pedigree 0.08, pedigree (1,1,5,1,1)
  (same comment as for Lead)
- Mercury [soil, agricultural]: 5.3452e-8 kg; lognormal variance with pedigree 0.71, pedigree (1,1,5,1,1)
  (same comment as for Iron)
- Silicon [water, ground-, long-term]: 0.0001565 kg; lognormal variance with pedigree 5.46, pedigree (1,1,5,1,1)
  (same comment as for Nickel, ion)
- Iron, ion [water, surface water]: 0.0036024 kg; lognormal variance with pedigree 0.66, pedigree (1,1,5,1,1)
  (same comment as for Molybdenum)
- Cobalt [soil, agricultural]: 3.0813e-7 kg; lognormal variance with pedigree 0.71, pedigree (1,1,5,1,1)
  (same comment as for Iron)
- Tin [soil, agricultural]: 7.6487e-7 kg; lognormal variance with pedigree 0.71, pedigree (1,1,5,1,1)
  (same comment as for Iron)
- Chromium VI [water, ground-, long-term]: 3.911e-7 kg; lognormal variance with pedigree 1.09, pedigree (1,1,5,1,1)
  (same comment as for Nickel, ion)
- Sulfur [soil, agricultural]: 0.00059517 kg; lognormal variance with pedigree 0.11, pedigree (1,1,5,1,1)
  (same comment as for Iron)
- Molybdenum [soil, agricultural]: 1.8236e-7 kg; lognormal variance with pedigree 0.71, pedigree (1,1,5,1,1)
  (same comment as for Iron)
- Ammonia [air, urban air close to ground]: 0.00035613 kg; lognormal variance with pedigree 0.28, pedigree (1,1,5,1,1)
  direct digester gas emission plus emission from sludge incineration plus emission from sludge spreading. Uncertainty calculated from wastewater composition and treatment model
- Copper [air, urban air close to ground]: 1.2554e-10 kg; lognormal variance with pedigree 0.76, pedigree (1,1,5,1,1)
  (same comment as for Lead)
- Calcium [soil, agricultural]: 0.0019286 kg; lognormal variance with pedigree 0.71, pedigree (1,1,5,1,1)
  (same comment as for Iron)
- Silicon [soil, agricultural]: 0.0011366 kg; lognormal variance with pedigree 0.71, pedigree (1,1,5,1,1)
  (same comment as for Iron)
- Chromium [air, urban air close to ground]: 2.7317e-13 kg; lognormal variance with pedigree 0.8, pedigree (1,1,5,1,1)
  (same comment as for Lead)
- Sulfate [water, ground-, long-term]: 0.002367 kg; lognormal variance with pedigree 0.1, pedigree (1,1,5,1,1)
  (same comment as for Nickel, ion)
- Lead [water, surface water]: 9.4873e-7 kg; lognormal variance with pedigree 0.6, pedigree (1,1,5,1,1)
  (same comment as for Molybdenum)
- Zinc [air, urban air close to ground]: 7.5692e-10 kg; lognormal variance with pedigree 0.76, pedigree (1,1,5,1,1)
  (same comment as for Lead)
- Tin, ion [water, ground-, long-term]: 6.0968e-7 kg; lognormal variance with pedigree 1.26, pedigree (1,1,5,1,1)
  (same comment as for Nickel, ion)

## Extrapolations
This dataset has been extrapolated from year 2000 to the year of the calculation (2021). The uncertainty has been adjusted accordingly.

## Review by Niels Jungbluth 2009-01-22
passed.
