# treatment of aluminium scrap, post-consumer, prepared for recycling, at refiner

Dataset: EcoSpold 2, unit process
Geography: RoW
Time period: 2005-01-01 to 2021-12-31
Technology level: current
Classification: ISIC rev.4 ecoinvent: 2420:Manufacture of basic precious and other non-ferrous metals
Classification: EcoSpold01Categories: metals/extraction
Scenario: Business-as-Usual
System model: Allocation, cut-off by classification
Share of production covered: 3.5 %
Generated by: Pascal Lesage
Published in: European Aluminium Association 2008
Database: ecoinvent
isCopyrightProtected: true
accessRestrictedTo: 1

## General comment
This dataset is based on two sources: the European Aluminium Association 2005 LCI data (EAA, 2008); and (2) the ecoinvent v2.2 dataset for the same activity (Althaus, 2009), itself largely based on EAA data from 2000. Priority was given to data contained in EAA (2008); Althaus (2009) was used only in cases where it was found to be more complete that EAA (2008). Note that both sources are European in scope - this GLO dataset is therefore an extrapolation.
While this dataset represents the refining of prepared post-consumer scrap aluminium, the inputs and outputs reported by EAA (2008) actually refer to refining of all scrap, including post-consumer scrap, scrap from foundries, turnings, skimmings (dross) and aluminium metallics. In the ecoinvent database, the refining of post-consumer scrap and new scrap is represented by two distinct but mostly identical datasets to enable the appropriate modeling of aluminium mass flow through the economy.
The dataset contains the inputs and outputs for rotary (64%) and reverbatory (36%) furnaces, which together make up about 90% of utilized furnaces in Europe. The dataset excludes, for lack of access to data, salt slag and dross recycling. According to EAA, this data gap represents approximately 10-20% of potential impacts, as calculated using the CML 2001 method.

## Included activities start
The activity starts with the reception of prepared post-consumer aluminium scrap and includes the refining of said scrap in rotary (64%) and reverbatory (36%) furnaces. It includes alloying (based on weak data on actual alloying metals) and casting to secondary billets.

## Included activities end
The activity ends with cast aluminium billets. Note that the dataset excludes salt slag processing and dross recycling (data gap).

## Geography
Some Swiss datasets are used for European processes.

## Technology
Average technology for the aluminium recycled (refined) in Europe

## Reference product
- aluminium scrap, post-consumer, prepared for melting: 0 kg; source European Aluminium Association 2008; By-product classification Recyclable; CPC 39363: Waste and scrap of aluminium
  EcoSpold01Location=RER
  production volume 0 kg; name scrapInputVolume; = 9.0125e9/ castAlloyAmount
    Based on International Aluminium Institute data on the relative share of primary, secondary (new scrap) and aluminium (old scrap) aluminium in cast alloy, the total amount of cast alloy produced globally, and the total amount of primary aluminium ingots produced globally. 2012 data.
  property price 0.806 EUR2005; name scrapInputAmount_price_EUR2005
    Temporary price data. Calculated as 90% of purchasers price based on: 2005 import and export prices (total trades (USD) divided by total weight (kg) in biggest economies of the world: EU27, USA, Brasil, China, India, Japan and Russia) from UN Commodity Trade Statistics Database (http://data.un.org/Explorer.aspxDatabase [Accessed 2011.06.17]). Commodity: Waste or scrap, aluminium
  property carbon content 0
    carbon content on a dry matter basis (reserved; not for manual entry)
  properties: carbon content, fossil 0, dry mass 1 kg, water content 0, water in wet mass 0 kg, wet mass 1 kg, carbon content, non-fossil 0, carbon allocation 0 kg
- aluminium oxide, non-metallurgical: 1 kg; name Al2O3Amount; source European Aluminium Association 2008; By-product classification allocatable product; CPC 41432: Alumina (aluminium oxide), except artificial corundum; CAS 1344-28-1; pedigree (1,1,1,1,1)
  production volume 8.53591e8 kg; = Al2O3Amount/abs(scrapInputAmount)*scrapInputVolume
  property water content 0; name water_content
  property water in wet mass 0 kg; name WWM
  property price 0.28 EUR2005; name Al2O3Amount_price_EUR2005
  property dry mass 1 kg; name DM
  property wet mass 1 kg; name WM
  property carbon content, fossil 0; name C_content_fossil
  property carbon content, non-fossil 0; name C_content_non_fossil
  property true value 0.02842; name Al2O3Amount_true_value
  properties: carbon content 0, carbon allocation 0 kg

## By-products
- iron scrap, unsorted: 0 kg; source European Aluminium Association 2008; CPC 39310: Slag, dross, scalings and other waste from the manufacture of iron or steel; By-product classification Recyclable; pedigree (1,1,1,1,1)
  production volume 0 kg; = ironScrapAmount/abs(scrapInputAmount)*scrapInputVolume
    Calculated from the production volume of aluminium scrap, post-consumer in proportion to the respective output amounts.
  property price 0.149 EUR2005; name ironScrapAmount_price_EUR2005
    Temporary price data. Calculated as 90% of purchasers price based on: estimated at 85% of sorted scrap
  property carbon content 0
    carbon content on a dry matter basis (reserved; not for manual entry)
  properties: water in wet mass 0 kg, carbon content, fossil 0, dry mass 1 kg, wet mass 1 kg, water content 0, carbon content, non-fossil 0, carbon allocation 0 kg
- aluminium, cast alloy: 0 kg; name castAlloyAmount; source European Aluminium Association 2008; CPC 41431: Unwrought aluminium; By-product classification allocatable product; pedigree (1,1,1,1,1)
  EcoSpold01Location=RER
  production volume 0 kg; = 9.0125e9
    (same comment as for aluminium scrap, post-consumer, prepared for melting)
  property price 1.3 EUR2005; name castAlloyAmount_price_EUR2005
    Temporary price data. Calculated as 90% of purchasers price based on: Source: London Metal Exchange, Aluminium alloy price for 2005
  property carbon content 0
    carbon content on a dry matter basis (reserved; not for manual entry)
  property true value 1.23344; name castAlloyAmount_true_value
    allocation property applied in "true value" allocation // value calculated from revenue
  properties: dry mass 1 kg, carbon content, fossil 0, water content 0, water in wet mass 0 kg, wet mass 1 kg, carbon content, non-fossil 0, carbon allocation 0 kg
- aluminium oxide, non-metallurgical: 0 kg; source European Aluminium Association 2008; By-product classification allocatable product; CPC 41432: Alumina (aluminium oxide), except artificial corundum; CAS 1344-28-1; pedigree (1,1,1,1,1)
  production volume 0 kg; = Al2O3Amount/abs(scrapInputAmount)*scrapInputVolume
    (same comment as for iron scrap, unsorted)
  property carbon content 0
    carbon content on a dry matter basis (reserved; not for manual entry)
  properties: carbon allocation 0 kg

## Inputs from technosphere
- hazardous waste, for underground deposit: -0.000178958 kg; name hazWasteAmount; source European Aluminium Association 2008; lognormal variance with pedigree 0.0432, pedigree (1,3,5,5,1)
  EcoSpold01Location=DE
  production volume 6.78248e6 kg; = hazWasteAmount/abs(scrapInputAmount)*scrapInputVolume
    (same comment as for iron scrap, unsorted)
  property price 0 EUR2005; name hazWasteAmount_price_EUR2005
  properties: wet mass 1 kg, carbon content, fossil 0.554667, dry mass 1 kg
  note on carbon content, fossil: Tab A.6, ecoinvent v2.2 report 13_I, average hazardous waste composition was used, and referred to 0% water mass. No waste-specific emission are currently inventoried for underground deposits. Accordingly, no waste composition must be specified. For generic, average waste to underground deposit deposition in a 200 liter steel drum without cement solidification is assumed (ecoinvent v2.2 report 13_I).
- aluminium melting furnace: 4.21067e-10 unit; = castAlloyAmount/(50*10000000); source Hans-Jörg Althaus  2009; lognormal variance with pedigree 0.2106, pedigree (5,5,5,5,5)
  Estimated, based on an assumed 10 000 tonne scrap aluminium output per year and a lifetime of 50 years.
  EcoSpold01Location=RER
  Uncertainty: rough guess
- zinc: 0.0112234 kg; = 0.06072*83.3%; source European Aluminium Association 2008; lognormal variance with pedigree 0.0438, pedigree (2,3,5,5,1)
  EcoSpold01Location=RER
  Reported as "alloying metal", 83.3% assumed to be zinc in Althaus (2009)
  properties: wet mass 1 kg, dry mass 1 kg
- filter dust from Al electrolysis: -0.00366126 kg; name filterDustAmount; source European Aluminium Association 2008; lognormal variance with pedigree 0.0432, pedigree (1,3,5,5,1)
  EcoSpold01Location=CH
  Reported as Filter dust, assumption that this can be approximated by filter dust from Al electrolysis made in Althaus 2009.
  production volume 1.38761e8 kg; = filterDustAmount/abs(scrapInputAmount)*scrapInputVolume
    (same comment as for iron scrap, unsorted)
  property price 0 EUR2005; name filterDustAmount_price_EUR2005
  properties: dry mass 1 kg, wet mass 1 kg, carbon content, fossil 0.11586
- heat, district or industrial, natural gas: 0 MJ; source European Aluminium Association 2008; pedigree (1,1,1,1,1)
  Reported as kg natural gas. Conversion to heat supplied by the combustion of natural gas based on lower heating value of natural gas and boiler efficiency (expressed as 1/fuel_use), both taken from ecoinvent reports on energy production.
  Uncertainty: Uncertainty based on that of underlying variables.
  property kgFuel_Input 0.07941 kg; name fuel_input_in_kg_ng
  property heating value, net 1 MJ; name Net_Heat_Value_NG_per_kg
  property Corresponding fuel use 1.04 MJ; name fuel_use_ng
  note on Corresponding fuel use: Lower heating value of the fuel input related to the heat/electricity output, based on an efficiency of 96%
- sodium chloride, powder: 0.00237871 kg; source European Aluminium Association 2008; lognormal variance with pedigree 0.0432, pedigree (1,3,5,5,1)
  EcoSpold01Location=RER
  properties: dry mass 1 kg, wet mass 1 kg
- sulfuric acid: 0.00167575 kg; source Hans-Jörg Althaus  2009; lognormal variance with pedigree 0.0432, pedigree (1,3,5,5,1)
  EcoSpold01Location=RER
  Not reported in EAA (2008). Inherited form Althaus (2009).
  properties: wet mass 1 kg, dry mass 1 kg
- cryolite: 0.000151576 kg; source European Aluminium Association 2008; lognormal variance with pedigree 0.0432, pedigree (1,3,5,5,1)
  Reported as Sodium aluminium fluoride
  properties: dry mass 1 kg, wet mass 1 kg
- heat, district or industrial, other than natural gas: 0 MJ; source European Aluminium Association 2008; pedigree (1,1,1,1,1)
  Reported as kg input of heavy fuel oil (for combustion). Conversion to heat supplied by the combustion of fuel oil based on lower heating value of heavy fuel oil and boiler efficiency (expressed as 1/fuel_use), both taken from ecoinvent reports.
  Uncertainty: Uncertainty based on that of underlying variables.
  property Corresponding fuel use 1.053 MJ; name fuel_use_HFO
  property heating value, net 1 MJ; name Net_Heat_Value_HFO
  property fuel input in physical units, kg 0.003795 kg; name kgFuel_Input_HFO
  note on Corresponding fuel use: Lower heating value of the fuel input related to the heat/electricity output
- lubricating oil: 2.31658e-5 kg; source European Aluminium Association 2008; lognormal variance with pedigree 0.0432, pedigree (1,3,5,5,1)
  reported as Lubricants (maintenance material)
  properties: carbon content, fossil 0.75, dry mass 1 kg, wet mass 1 kg, heating value, net 40.2 MJ
  note on carbon content, fossil: Lubricating oil is produced from diesel. C-content/dry mass of fats and oils considered 75%, from: ecoinvent v2.2 report, n 15a, pg 40
  note on heating value, net: Literature value, Source: IPCC 2006, 2006 IPCC Guidelines for National Greenhouse Gas Inventories, Prepared by the National Greenhouse Gas Inventories Programme, Eggleston H.S., Buendia L., Miwa K., Ngara T. and Tanabe K. (eds). Published: IGES, Japan
- sodium hydroxide, without water, in 50% solution state: 0.000334839 kg; source Hans-Jörg Althaus  2009; lognormal variance with pedigree 0.0432, pedigree (1,3,5,5,1)
  EcoSpold01Location=RER
  Not reported in EAA (2008). Inherited form Althaus (2009).
  properties: dry mass 1 kg, heating value, net 3.03 MJ, wet mass 1 kg
- aluminium casting facility: 3.23898e-11 unit; = castAlloyAmount/(50*130000000); source Hans-Jörg Althaus  2009; lognormal variance with pedigree 0.2106, pedigree (5,5,5,5,5)
  EcoSpold01Location=RER
  Estimated, based on an assumed 130 000 tonne scrap aluminium output per year and a lifetime of 50 years. Based on casting plant.
  Uncertainty: rough guess
- argon, liquid: 0.00020421 kg; source European Aluminium Association 2008; lognormal variance with pedigree 0.0432, pedigree (1,3,5,5,1)
  Reported as Argon
  properties: dry mass 1 kg, wet mass 1 kg
- hydrochloric acid, without water, in 30% solution state: 4.41348e-5 kg; source Hans-Jörg Althaus  2009; lognormal variance with pedigree 0.0432, pedigree (1,3,5,5,1)
  EcoSpold01Location=RER
  Not reported in EAA (2008). Inherited form Althaus (2009).
  properties: wet mass 1 kg, heating value, net 3.32 MJ, dry mass 1 kg
- electricity, medium voltage: 0 kWh; source European Aluminium Association 2008; pedigree (1,1,1,1,1)
  EcoSpold01Location=UCTE
- waste polyethylene: -0.0052589 kg; name combustedPE; source European Aluminium Association 2008; lognormal variance with pedigree 0.0432, pedigree (1,3,5,5,1)
  Represents polyethylene combusted onsite for heat.
  production volume 1.99311e8 kg; = combustedPE/abs(scrapInputAmount)*scrapInputVolume
    (same comment as for iron scrap, unsorted)
  property price 0 EUR2005; name combustedPE_price_EUR2005
  properties: dry mass 0.996 kg, wet mass 1 kg, heating value, net 42.47 MJ, carbon content, fossil 0.825301, water content 0.00401606
  note on heating value, net: Value taken from the general comment of the treatment dataset.
  note on carbon content, fossil: C content in 1 kg DM was calculated using data in Tab A.1, ecoinvent v2.2 report 13_I
- silicon, metallurgical grade: 0.00211533 kg; = 0.06072*15.7%; source Hans-Jörg Althaus  2009; lognormal variance with pedigree 0.0438, pedigree (2,3,5,5,1)
  Reported as "alloying metal", 15.7% assumed to be Silicon in Althaus (2009)
  EcoSpold01Location=NO
  properties: wet mass 1 kg, dry mass 1 kg
- light fuel oil: 0 kg; source Hans-Jörg Althaus  2009; pedigree (1,1,1,1,1)
  Not reported in EAA (2008). Inherited form Althaus (2009).
  EcoSpold01Location=RER
  properties: dry mass 1 kg, heating value, net 42.6 MJ, carbon content, fossil 0.862, wet mass 1 kg
- nitrogen, liquid: 0.000673672 kg; source European Aluminium Association 2008; lognormal variance with pedigree 0.0432, pedigree (1,3,5,5,1)
  EcoSpold01Location=RER
  Reported as nitrogen
  properties: dry mass 1 kg, wet mass 1 kg
- refractory, basic, packed: 0.000505254 kg; source European Aluminium Association 2008; lognormal variance with pedigree 0.0432, pedigree (1,3,5,5,1)
  Reported as Refractory
  properties: dry mass 1 kg, wet mass 1 kg
- lime, hydrated, packed: 0.000829442 kg; source European Aluminium Association 2008; lognormal variance with pedigree 0.0432, pedigree (1,3,5,5,1)
  EcoSpold01Location=CH
  Reported as lime, for emission treatment
  properties: dry mass 0.997 kg, water content 0.00300903, wet mass 1 kg
- chlorine, liquid: 5.26334e-5 kg; source European Aluminium Association 2008; lognormal variance with pedigree 0.0426, pedigree (1,3,5,5,1)
  EcoSpold01Location=RER
  properties: wet mass 1 kg, dry mass 1 kg
- copper, cathode: 0.000129345 kg; = 0.06072*0.96%; source European Aluminium Association 2008; lognormal variance with pedigree 0.0438, pedigree (2,3,5,5,1)
  Reported as "alloying metal", 0.96% assumed to be Copper in Althaus (2009)
  properties: dry mass 1 kg, wet mass 1 kg
- aluminium scrap, post-consumer, prepared for melting: 0.221895 kg; source European Aluminium Association 2008
  EcoSpold01Location=RER
  production volume 8.40977e9 kg
  properties: dry mass 1 kg, wet mass 1 kg
- iron scrap, unsorted: -0.000357916 kg; source European Aluminium Association 2008; lognormal variance with pedigree 0.0432, pedigree (1,3,5,5,1)
  production volume 1.3565e7 kg
  properties: dry mass 1 kg, wet mass 1 kg
- heat, district or industrial, natural gas: 0.0116752, 0.757534 MJ (2 entries); source European Aluminium Association 2008; lognormal variance with pedigree 0.04, pedigree (1,1,5,1,1)
  (same comment as for heat, district or industrial, natural gas)
  properties: kgFuel_Input 0.07941 kg, heating value, net 1 MJ, Corresponding fuel use 1.04 MJ
- heat, district or industrial, other than natural gas: 1.29663e-5, 0.0319753 MJ (2 entries); source European Aluminium Association 2008; lognormal variance with pedigree 0.04, pedigree (1,1,5,1,1)
  (same comment as for heat, district or industrial, other than natural gas)
  properties: Corresponding fuel use 1.053 MJ, heating value, net 1 MJ, fuel input in physical units, kg 0.003795 kg
- electricity, medium voltage: 0.00016136, 3.0942e-5, 0.000519451, 0.00755495, 0.00106487, 0.00346952 kWh (6 entries); source European Aluminium Association 2008; lognormal variance with pedigree 0.0432, pedigree (1,3,5,5,1)
  EcoSpold01Location=UCTE
- light fuel oil: 2.1208e-8, 3.05854e-9, 4.28029e-8, 2.84035e-9, 4.11556e-9, 4.31229e-7 kg (6 entries); source Hans-Jörg Althaus  2009; lognormal variance with pedigree 0.0432, pedigree (1,3,5,5,1)
  Not reported in EAA (2008). Inherited form Althaus (2009).
  EcoSpold01Location=RER

## Inputs from nature
- Water, unspecified natural origin [natural resource, in water]: 0.0037478 m3; source European Aluminium Association 2008; lognormal variance with pedigree 0.0426, pedigree (1,3,5,5,1)
  Reported as water (cooling)

## Emissions to nature
- Water [water, unspecified]: 1.8526e-6 m3; source European Aluminium Association 2008; lognormal variance with pedigree 0.0432, pedigree (1,3,5,5,1)
  Reported as "water"
- Phosphorus [air, unspecified]: 1.09483e-7 kg; source Hans-Jörg Althaus  2009; lognormal variance with pedigree 0.0426, pedigree (1,3,5,5,1)
  Not reported in EAA (2008). Inherited form Althaus (2009).
- Hydrogen chloride [air, unspecified]: 7.9993e-6 kg; source European Aluminium Association 2008; lognormal variance with pedigree 0.0826, pedigree (1,3,5,5,1)
- Particulates, < 2.5 um [air, unspecified]: 1.41445e-6 kg; = 1.992e-5*32%; source European Aluminium Association 2008; lognormal variance with pedigree 0.3832, pedigree (2,3,5,5,4)
  Reported as dust emissions to air. Split between three classes of particulates based on CEPMIEP database: 32% <2.5 um, 48% >2.5<10 um, 20% > 10 um. Assumed process emissions and not combustion emissions.
  Uncertainty: Uncertainty accounts for use of CEPMEIP database to split total particulates among the three particulate classes.
- Hydrogen sulfide [air, unspecified]: 5.89574e-7 kg; source Hans-Jörg Althaus  2009; lognormal variance with pedigree 0.0826, pedigree (1,3,5,5,1)
  Not reported in EAA (2008). Inherited form Althaus (2009).
- Hydrogen fluoride [air, unspecified]: 4.21156e-7 kg; source European Aluminium Association 2008; lognormal variance with pedigree 0.0826, pedigree (1,3,5,5,1)
- Hydrocarbons, chlorinated [air, unspecified]: 1.05267e-5 kg; source Hans-Jörg Althaus  2009; lognormal variance with pedigree 0.0826, pedigree (1,3,5,5,1)
  Not reported in EAA (2008). Inherited form Althaus (2009).
- Ammonia [air, unspecified]: 4.21156e-6 kg; source Hans-Jörg Althaus  2009; lognormal variance with pedigree 0.0826, pedigree (1,3,5,5,1)
  Not reported in EAA (2008). Inherited form Althaus (2009).
- Chlorine [air, unspecified]: 4.21156e-7 kg; source European Aluminium Association 2008; lognormal variance with pedigree 0.0826, pedigree (1,3,5,5,1)
- Particulates, > 10 um [air, unspecified]: 8.84028e-7 kg; = 1.992e-5*20%; source European Aluminium Association 2008; lognormal variance with pedigree 0.1232, pedigree (2,3,5,5,4)
  (same comment as for Particulates, < 2.5 um)
- Particulates, > 2.5 um, and < 10um [air, unspecified]: 2.12167e-6 kg; = 1.992e-5*48%; source European Aluminium Association 2008; lognormal variance with pedigree 0.2032, pedigree (2,3,5,5,4)
  (same comment as for Particulates, < 2.5 um)

## Sampling procedure
Literature / Survey

## Extrapolations
see Geography This dataset has been copied from an original dataset covering the geography RER. The uncertainty has been adjusted accordingly. The percent representativeness is based on the total volume of refiners who supplied data for EAA (2008) and includes refining of both post-consumer and new scrap, divided by the global volume of refining in 2007 according to Wellmet (see production volume comment for more information) and hence represents an estimate only.

## Review by Hans-Jörg Althaus 2012-06-01
ok
