# treatment of heat carrier liquid, 40% C3H8O2, capacity 1.1E10l/year

Dataset: EcoSpold 2, unit process
Geography: RoW
Time period: 1994-01-01 to 2021-12-31
Technology level: current
Classification: ISIC rev.4 ecoinvent: 3700:Sewerage
Classification: EcoSpold01Categories: waste management/wastewater treatment
Tags: Treatment; ConvertedDataset
Scenario: Business-as-Usual
System model: Allocation, cut-off by classification
Generated by: Gabor Doka (obsolete)
Published in: Doka G. 2008
Database: ecoinvent
isCopyrightProtected: true
accessRestrictedTo: 1

## General comment
Wastewater purified in a moderatly large municipal wastewater treatment plant (capacity class 2), with an average capacity size of 71100 per-captia-equivalents PCE.
Wastewater contains (in kg/m3): COD: 650 (GSD=124.9%);
[This dataset was already contained in the ecoinvent database version 2. It was not individually updated during the transfer to ecoinvent version 3. Life Cycle Impact Assessment results may still have changed, as they are affected by changes in the supply chain, i.e. in other datasets. This dataset was generated following the ecoinvent quality guidelines for version 2. It may have been subject to central changes described in the ecoinvent version 3 change report (http://www.ecoinvent.org/database/ecoinvent-version-3/reports-of-changes/), and the results of the central updates were reviewed extensively. The changes added e.g. consistent water flows and other information throughout the database. The documentation of this dataset can be found in the ecoinvent reports of version 2, which are still available via the ecoinvent website. The change report linked above covers all central changes that were made during the conversion process.]

## Included activities end
Infrastructure materials for municipal wastewater treatment plant, transports, dismantling. Land use burdens.

## Geography
Specific to the technology mix encountered in Switzerland in 2000. Well applicable to modern treatment practices in Europe, North America or Japan.

## Technology
Three stage wastewater treatment (mechanical, biological, chemical) including sludge digestion (fermentation) according to the average technology in Switzerland

## Parameters
- fraction, process water, to air: 0.1 dimensionless; name fraction_PW_to_air; lognormal variance with pedigree 0.092025, pedigree (4,4,3,2,4)

## Reference product
- heat carrier liquid, 40% C3H8O2: -1 m3; By-product classification Waste; CPC 94110: Sewerage and sewage treatment services
  EcoSpold01Location=CH
  production volume 3.96633 m3
    This is a placeholder value that does not reflect real-world production volumes. This dataset does not currently require a real-world production volume to work in the database framework, and no actual data were collected yet. This has no negative effect on the results of the ecoinvent database.
  property carbon content, fossil 3
    The composition of the product was used to estimate its carbon content: 40% (w/v) C3H8O2.
  property heating value, net 0 MJ
    Non combustible products are assumed to have an LHV equal to zero (0).
  property price 1.08656 EUR2005
    Estimation. Average 2005 prices for EU27, USA, China, Japan and India from Import/Export data (US$ and tonnes) in UN Commodity Trade Statistics Database; Commodity: propylene glycol (propane-1,2-diol)
  property carbon content 3
    carbon content on a dry matter basis (reserved; not for manual entry)
  properties: wet mass 1000 kg, dry mass 6.31366 kg, water content 157.387, water in wet mass 993.686 kg, carbon content, non-fossil 0, carbon allocation 18.941 kg

## Inputs from technosphere
- waste cement, hydrated: 0 kg; pedigree (1,1,1,1,1)
  burden from sludge incineration. Uncertainty calculated from wastewater composition and treatment model
  EcoSpold01Location=CH
  production volume 0 kg
    Calculated from the production volume of heat carrier liquid, 40% C3H8O2 in proportion to the respective output amounts.
  properties: dry mass 1 kg, wet mass 1 kg
- residual material landfill: 3.2532e-10 unit; lognormal variance with pedigree 0.072, pedigree (1,1,5,5,1)
  (same comment as for waste cement, hydrated)
- municipal waste incineration facility: 5.1228e-8 unit; lognormal variance with pedigree 0.052, pedigree (1,1,5,5,1)
  EcoSpold01Location=CH
  burden from sludge incineration. Uncertainty calculated from wastewater composition and treatment model
- chemical, inorganic: 2.9089e-6 kg; lognormal variance with pedigree 0.122, pedigree (1,1,5,5,1)
  EcoSpold01Location=GLO
  burden from sludge incineration. Uncertainty calculated from wastewater composition and treatment model
  properties: dry mass 1 kg, carbon content, fossil 0.003, wet mass 1 kg
  note on carbon content, fossil: This dataset is an unweighted average of 20 inorganic substances (listed in Tab 88.1, ecoinvent v2.2 report 8, part II), being part of the top100 chemicals included in this database. The C-content has also been calculated as an unweighted average of the C content of the substances composing this dataset.
- process-specific burdens, residual material landfill: 0 kg; pedigree (1,1,1,1,1)
  (same comment as for waste cement, hydrated)
- electricity, low voltage: 0 kWh; pedigree (1,1,1,1,1)
  direct wastewater treatment plant burden. Uncertainty calculated from wastewater composition and treatment model
  EcoSpold01Location=CH
- hydrochloric acid, without water, in 30% solution state: 1.7453e-6 kg; lognormal variance with pedigree 0.122, pedigree (1,1,5,5,1)
  EcoSpold01Location=RER
  burden from sludge incineration. Uncertainty calculated from wastewater composition and treatment model
  properties: dry mass 1 kg, wet mass 1 kg, heating value, net 3.32 MJ
- cement, unspecified: 0 kg; pedigree (1,1,1,1,1)
  (same comment as for waste cement, hydrated)
  properties: dry mass 1 kg, wet mass 1 kg
- process-specific burdens, slag landfill: 0 kg; pedigree (1,1,1,1,1)
  (same comment as for municipal waste incineration facility)
- liquid manure spreading, by vacuum tanker: 0.69284 m3; lognormal variance with pedigree 0.042, pedigree (1,1,5,5,1)
  EcoSpold01Location=CH
  burden from sludge spreading. Uncertainty calculated from wastewater composition and treatment model
- waste graphical paper: 0 kg; pedigree (1,1,1,1,1)
  EcoSpold01Location=CH
  direct wastewater treatment plant burden. Uncertainty calculated from wastewater composition and treatment model
  production volume 0 kg
    (same comment as for waste cement, hydrated)
  properties: carbon content, non-fossil 0.454955, water content 0.126126, heating value, net 14.12 MJ, dry mass 0.888 kg, wet mass 1 kg
  note on heating value, net: Value taken from the general comment of the treatment dataset.
- electricity, high voltage: 0 kWh; pedigree (1,1,1,1,1)
  (same comment as for municipal waste incineration facility)
- wastewater treatment facility, capacity 1.1E10l/year: 1.9883e-9 unit; lognormal variance with pedigree 0.042, pedigree (1,1,5,5,1)
  uncertainty heeded in exchanges of the module
  EcoSpold01Location=CH
- process-specific burdens, municipal waste incineration: 0 kg; pedigree (1,1,1,1,1)
  (same comment as for waste cement, hydrated)
- sewer grid, 1.1E10l/year, 242 km: 1.6832e-7 km; lognormal variance with pedigree 0.042, pedigree (1,1,5,5,1)
  EcoSpold01Location=CH
  uncertainty heeded in exchanges of the module
- heat, district or industrial, other than natural gas: 0 MJ; pedigree (1,1,1,1,1)
  (same comment as for waste cement, hydrated)
  properties: heating value, net 1 MJ
- slag landfill: 6.0153e-10 unit; lognormal variance with pedigree 0.072, pedigree (1,1,5,5,1)
  (same comment as for waste cement, hydrated)
- waste plastic, mixture: 0 kg; pedigree (1,1,1,1,1)
  (same comment as for waste graphical paper)
  production volume 0 kg
    (same comment as for waste cement, hydrated)
  properties: wet mass 1 kg, dry mass 0.847 kg, heating value, net 30.79 MJ, water content 0.180638, carbon content, fossil 0.747344
  note on carbon content, fossil: C content in 1 kg DM was calculated using data in Tab A.2, ecoinvent v2.2 report 13_I
- waste cement, hydrated: -0.0441708, -0.111979 kg (2 entries); lognormal variance with pedigree 0.082, pedigree (1,1,5,5,1)
  (same comment as for waste cement, hydrated)
  production volume 0.46845 kg
- process-specific burdens, residual material landfill: 0.0441708, 0.111979 kg (2 entries); lognormal variance with pedigree 0.072, pedigree (1,1,5,5,1)
  (same comment as for waste cement, hydrated)
- electricity, low voltage: 1.77412, 0.323034, 7.2921, 25.4769, 5.20125, 79.8558, 12.9193, 37.0975 kWh (8 entries); lognormal variance with pedigree 0.202, pedigree (1,1,5,5,1)
  (same comment as for electricity, low voltage)
- cement, unspecified: 0.0090191, 0.00187661, 0.000137449, 0.000391774, 0.00886009, 0.000260778, 0.00286412, 0.000346526, 0.0387046 kg (9 entries); lognormal variance with pedigree 0.082, pedigree (1,1,5,5,1)
  (same comment as for waste cement, hydrated)
- process-specific burdens, slag landfill: 0.0957134, 0.242647 kg (2 entries); lognormal variance with pedigree 0.072, pedigree (1,1,5,5,1)
  (same comment as for municipal waste incineration facility)
- waste graphical paper: -0.000678029, -0.000103538, -9.05347e-6, -0.000374127, -3.64805e-5, -6.75291e-5, -0.00163575, -0.0125955 kg (8 entries); lognormal variance with pedigree 0.042, pedigree (1,1,5,5,1)
  (same comment as for waste graphical paper)
  production volume 0.0465 kg
- electricity, high voltage: 0.297711, 0.0570741, 1.31462, 4.30825, 0.967691, 13.9344, 2.20987, 6.37042 kWh (8 entries); lognormal variance with pedigree 0.492, pedigree (1,1,5,5,1)
  (same comment as for municipal waste incineration facility)
- process-specific burdens, municipal waste incineration: 57.9638, 146.946 kg (2 entries); lognormal variance with pedigree 0.052, pedigree (1,1,5,5,1)
  (same comment as for waste cement, hydrated)
- heat, district or industrial, other than natural gas: 0.0679982, 4.10606, 167.686 MJ (3 entries); lognormal variance with pedigree 0.052, pedigree (1,1,5,5,1)
  (same comment as for waste cement, hydrated)
- waste plastic, mixture: -0.00172425, -0.000115208, -8.71297e-6, -4.75849e-5, -1.92238e-5, -4.51863e-5, -0.00146914, -0.0120707 kg (8 entries); lognormal variance with pedigree 0.042, pedigree (1,1,5,5,1)
  (same comment as for waste graphical paper)
  production volume 0.0465 kg

## Emissions to nature
- Carbon dioxide, fossil [air, urban air close to ground]: 802.82 kg; lognormal variance with pedigree 0.072, pedigree (1,1,5,5,1)
  emission from sludge incineration. Uncertainty calculated from wastewater composition and treatment model
- DOC, Dissolved Organic Carbon [water, ground-, long-term]: 0.442 kg; lognormal variance with pedigree 0.122, pedigree (1,1,5,5,1)
  (same comment as for Carbon dioxide, fossil)
- Water [air, unspecified]: 0.1 m3; name water_to_air_unspecified; lognormal variance with pedigree 0.0827, pedigree (2,2,5,5,1)
  Calculated value based on water balance.
  property fraction, origin: fresh water 0; name fraction_origin_fresh_water
  property fraction, origin: unspecified 1; name fraction_origin_unspecified
  property fraction, origin: salt water 0; name fraction_origin_salt_water
- Carbon [soil, agricultural]: 28.545 kg; lognormal variance with pedigree 0.112, pedigree (1,1,5,5,1)
  emission from sludge spreading. Uncertainty calculated from wastewater composition and treatment model
- Water [water, unspecified]: 0.9 m3; name water_to_water_unspecified; lognormal variance with pedigree 0.0827, pedigree (2,2,5,5,1)
  Calculated value based on water balance.
  property fraction, origin: salt water 0; name fraction_origin_salt_water_Ww
  property fraction, origin: unspecified 0; name fraction_origin_unspecified_Ww
  property fraction, origin: fresh water 1; name fraction_origin_fresh_water_Ww
  property water in wet mass 1000 kg; name WWM
  property wet mass 1000 kg; name WM
  property dry mass 0 kg; name DM
  property carbon content, non-fossil 0; name C_content_non_fossil
  property carbon content, fossil 0; name C_content_fossil
- Carbon monoxide, fossil [air, urban air close to ground]: 0.68106 kg; lognormal variance with pedigree 0.172, pedigree (1,1,5,5,1)
  (same comment as for Carbon dioxide, fossil)
- COD, Chemical Oxygen Demand [water, surface water]: 125.96 kg; lognormal variance with pedigree 0.092, pedigree (1,1,5,5,1)
  sewer overload discharge plus direct wastewater treatment plant emission plus emission from sludge incineration. Uncertainty calculated from wastewater composition and treatment model
- BOD5, Biological Oxygen Demand [water, surface water]: 41.366 kg; lognormal variance with pedigree 0.052, pedigree (1,1,5,5,1)
  (same comment as for COD, Chemical Oxygen Demand)
- NMVOC, non-methane volatile organic compounds, unspecified origin [air, urban air close to ground]: 0.0097378 kg; lognormal variance with pedigree 0.262, pedigree (1,1,5,5,1)
  direct digester gas emission. Uncertainty calculated from wastewater composition and treatment model
- BOD5, Biological Oxygen Demand [water, ground-, long-term]: 0.36537 kg; lognormal variance with pedigree 0.122, pedigree (1,1,5,5,1)
  (same comment as for Carbon dioxide, fossil)
- Methane, fossil [air, urban air close to ground]: 2.1431 kg; lognormal variance with pedigree 0.152, pedigree (1,1,5,5,1)
  (same comment as for Carbon dioxide, fossil)
- COD, Chemical Oxygen Demand [water, ground-, long-term]: 1.117 kg; lognormal variance with pedigree 0.122, pedigree (1,1,5,5,1)
  (same comment as for Carbon dioxide, fossil)
- TOC, Total Organic Carbon [water, surface water]: 33.748 kg; lognormal variance with pedigree 0.042, pedigree (1,1,5,5,1)
  (same comment as for COD, Chemical Oxygen Demand)
- DOC, Dissolved Organic Carbon [water, surface water]: 31.523 kg; lognormal variance with pedigree 0.082, pedigree (1,1,5,5,1)
  (same comment as for COD, Chemical Oxygen Demand)
- TOC, Total Organic Carbon [water, ground-, long-term]: 0.442 kg; lognormal variance with pedigree 0.122, pedigree (1,1,5,5,1)
  (same comment as for Carbon dioxide, fossil)

## Extrapolations
wastewater compositions from literature and/or estimates This dataset has been copied from an original dataset covering the geography CH. The uncertainty has been adjusted accordingly.

## Review by Niels Jungbluth 2009-01-22
passed.
