# beef cattle production on pasture and feedlot

Dataset: EcoSpold 2, unit process
Geography: RoW
Time period: 2006-01-01 to 2021-12-31
Technology level: current
Classification: ISIC rev.4 ecoinvent: 0141:Raising of cattle and buffaloes
Scenario: Business-as-Usual
System model: Allocation, cut-off by classification
Share of production covered: 3 %
Generated by: Fernando Dias
Published in: Folegatti-Matsuura M. 2018
Database: ecoinvent
isCopyrightProtected: true
accessRestrictedTo: 1

## General comment
This dataset represents the intensive production of 1 kg of live weight of beef cattle, in Brazil, on planted pasture and feedlot, at farm, for slaughtering. Discarded cattle (bulls and culled cows) are considered part of the product. Culled cows are replaced by some of the weaned heifers, all other weaned heifers are sold for fattening by other systems, and are considered by product. The dataset include operations for pasture maintenance and replanting. Fences are the only infrastructure included. Grass seeds are not included (less then 3% of product mass). The production of young bulls for reproduction is not included for the same reason, but their emissions in the farm and their live weight as product are considered. Direct field emissions are included, with important regionalizations added. Farm manure as an organic fertiliser is only accounted for in terms of direct field emissions.

## Included activities start
This activity starts at the replanting of pasture.

## Included activities end
This activity ends with the provision of fat steers, culled cows and bulls at farm gate, ready to be sent to slaughterhouses as live weight.

## Technology
Cattle is kept on regularly fertilized pastures. Mineral salt is served to all cattle in troughs on the field. Besides pasture and mineral salt, proteic supplement (maize, soybean meal, urea and salt) is served to weaned calves during the first dry season. Fat steers are kept for the last 110 days on feedlot and sold for slaughter under 24 months. The dataset does not include pharmaceuticals, although typical production systems use them. Use of hormones for cattle raising is forbidden in Brazil.

## Time period
Time period of the most of the data collected for this dataset.

## Parameters
- nitrogen uptake by plant: 176.62 kg N/ha; name Nuptake_plant; lognormal variance with pedigree 0.0573, pedigree (4,3,4,3,4)
  N taken by plant during its growth. Used in the SQCB-NO3 model for the calculation of leaching of NO3. From Bernardi (2012).
- urea, as N, as fertilizer: 0.019153 kg; name N_urea_fert; lognormal variance with pedigree 0.0573, pedigree (4,3,4,3,4)
  Urea as fertilizer for pasture planting and maintenance.
- nitrogen fertilizer, as N: 0 kg; name N_fert
  Nitrogen fertilizer (not urea) for fertilization.
- rooting depth: 0.2205 m; name root_depth; lognormal variance with pedigree 0.0573, pedigree (4,3,4,3,4)
  Plant rooting depth for pasture. Used in the SQCB-NO3 model for the calculation of leaching of NO3. From Cunha et al. (2010).
- precipitation, annual: 1201.3 mm/year; name precipitation; lognormal variance with pedigree 0.0573, pedigree (4,3,4,3,4)
  Average annual precipitation in the BR-CO geographic region. Used in the SQCB-NO3 model for the calculation of leaching of NO3.
- total nitrogen: 98.8306 kg/ha; name Ntot; = (N_ex + N_urea_fert + N_fert) / (T_t * 10^-4); lognormal variance with pedigree 0.0573, pedigree (4,3,4,3,4)
  Total nitrogen in mineral and organic fertilisers (kg N/ha)
- emission factor N2O: 0.02 dimensionless; name EF_N2O; lognormal variance with pedigree 0.0573, pedigree (4,3,4,3,4)
  Emission factor of N2O from manure deposited in pasture. From IPCC (2006).
- dinitrogen monoxide from manure in feedlot: 0.0010074 kg; name N2O_feedlot; lognormal variance with pedigree 0.0573, pedigree (4,3,4,3,4)
  N2O from manure management in feedlot, direct and indirect emissions (IPCC 2006).
- clay content into soil: 53.06 % (obsolete); name Clay_content; lognormal variance with pedigree 0.0573, pedigree (4,3,4,3,4)
  Fraction of clay content into soil. Used in the SQCB-NO3 model for the calculation of leaching of NO3. From Folegatti et al. (2015).
- urea, as N, as feed: 0.028969 kg; name N_urea_feed; lognormal variance with pedigree 0.0573, pedigree (4,3,4,3,4)
  Urea for cattle feed.
- soil eroded: 200 kg/ha.yr; name soil_eroded; lognormal variance with pedigree 0.0573, pedigree (4,3,4,3,4)
  Soil eroded. Used for the calculation of P emissions through water erosion to surface water. From Macedo et al. (2005).
- organic nitrogen into soil: 5520.7 kg N/ha; name Norg_soil; lognormal variance with pedigree 0.0573, pedigree (4,3,4,3,4)
  Mass of organic N contained in the upper 50 cm of soil per ha. Used in the SQCB-NO3 model for the calculation of leaching of NO3. From Folegatti et al. (2015).
- nitrogen in crop residues: 0 kg N/ha; name Ncrop_residues
  N contained in the crop residues. Used for the calculation of emissions of N2O to the air. Not considered for pastures because root is semiperennial.
- nitrogen in manure on pasture: 0.49865 kg; name N_ex; lognormal variance with pedigree 0.0573, pedigree (4,3,4,3,4)
  Manure deposited on pasture, as N, per year and kg of product.

## Reference product
- cattle for slaughtering, live weight: 1 kg; name REF_PRODUCT; CPC 02111: Cattle; By-product classification allocatable product
  production volume 4.46915e9 kg; name REF_PRODUCT_VOLUME; = 6.79E10 * 4.17% * (1 - 10%) / 0.5
    (GLO beef production in 2015) * (% of system in GLO in 2015) * (1 - % beef production from milk cattle in GLO) / (carcass as live weight, GLO average).
  property water content 0.666667; name REF_PRODUCT_water_content; = REF_PRODUCT_WWM / REF_PRODUCT_DM
  property water in wet mass 0.4 kg; name REF_PRODUCT_WWM
  property price 2.025 EUR2005; name REF_PRODUCT_price_EUR2005
    Calculated as an average of the regional prices (ZA and BR) which were provided by the data providers for the specific countries.
  property dry mass 0.6 kg; name REF_PRODUCT_DM; = REF_PRODUCT_WM - REF_PRODUCT_WWM
  property energy content 14.9367 MJ; name REF_PRODUCT_energy_content
    Energy content calculated from animal fat and protein composition and energy content for animal fat and protein of 39.3 and 23.6 MJ/kg, respectively.
    Johnson, I.R. et al. (2012). J. Anim. Sci. 90(13):4741-475.
    Williams, C.B. (2005). J. Anim. Sci. 83(6):1262-1266.
  property carbon content, non-fossil 0.4928; name REF_PRODUCT_C_content_non_fossil
    Calculated from live weight empty body composition in fat and protein (
    Johnson, I.R. et al. (2012). J. Anim. Sci. 90(13):4741-475 ; Williams, C.B. (2005). J. Anim. Sci. 83(6):1262-1266) and from C content of nutrients (protein, fat) according to A.D. Kay and T. Vrede ('Evolutionary and Biochemical Aspects', in Global Ecology, 2010, Elsevier B.V., S.E. Jørgensen Ed.).
  property carbon content, fossil 0; name REF_PRODUCT_C_content_fossil
  property wet mass 1 kg; name REF_PRODUCT_WM
  property carbon content 0.4928
    carbon content on a dry matter basis (reserved; not for manual entry)
  property true value 2.025; name REF_PRODUCT_true_value
    allocation property applied in "true value" allocation // value calculated from revenue
  properties: carbon allocation 0.29568 kg

## By-products
- iron scrap, unsorted: 0 kg; CPC 39310: Slag, dross, scalings and other waste from the manufacture of iron or steel; By-product classification Recyclable
  Fencing the farm: steel wire.
  production volume 0 kg; name BY_PRODUCT_3_VOLUME; = REF_PRODUCT_VOLUME * ( BY_PRODUCT_3 / REF_PRODUCT)
    Calculated from production volume of reference product using the relative outputs.
  property price 0.149 EUR2005; name BY_PRODUCT_3_price_EUR2005
    Temporary price data. Calculated as 90% of purchasers price based on: estimated at 85% of sorted scrap
  property carbon content 0
    carbon content on a dry matter basis (reserved; not for manual entry)
  properties: water in wet mass 0 kg, carbon content, fossil 0, water content 0, carbon content, non-fossil 0, dry mass 1 kg, wet mass 1 kg, carbon allocation 0 kg
- weaned heifers, live weight: 0 kg; name BY_PRODUCT; EcoSpold01Categories agricultural production/animal production; By-product classification allocatable product; CPC 02111: Cattle; pedigree (1,1,1,1,1)
  Weaned heifers sold.
  production volume 4.91472e8 kg; = REF_PRODUCT_VOLUME * BY_PRODUCT
    Calculated from production volume of reference product using the relative outputs.
  property carbon content, non-fossil 0.4928; name BY_PRODUCT_C_content_non_fossil
    biogene carbon content on a dry matter basis
  property water in wet mass 0.4 kg; name BY_PRODUCT_WWM
  property price 1.64 EUR2005; name BY_PRODUCT_price_EUR2005
    (same comment as for cattle for slaughtering, live weight)
  property carbon content, fossil 0; name BY_PRODUCT_C_content_fossil
    fossil carbon content on a dry matter basis
  property energy content 14.937 MJ; name BY_PRODUCT_energy_content
    as gross calorific value (when relevant)
  property dry mass 0.6 kg; name BY_PRODUCT_DM; = BY_PRODUCT_WM - BY_PRODUCT_WWM
  property water content 0.666667; name BY_PRODUCT_water_content; = BY_PRODUCT_WWM / BY_PRODUCT_DM
  property wet mass 1 kg; name BY_PRODUCT_WM
  property carbon content 0.4928
    carbon content on a dry matter basis (reserved; not for manual entry)
  property true value 0.180351; name BY_PRODUCT_true_value
    allocation property applied in "true value" allocation // value calculated from revenue
  properties: carbon allocation 0.29568 kg

## Inputs from technosphere
- maize grain: 0 kg; name MAIZE; pedigree (1,1,1,1,1)
  For cattle feed.
  property energy content 15.927 MJ; name MAIZE_energy_content
  property water in wet mass 0.14 kg; name MAIZE_WWM
  properties: wet mass 1 kg, carbon content, non-fossil 0.46957, water content 0.162791, dry mass 0.86 kg
- limestone and gypsum application, by spreader: 0.000192432 ha; lognormal variance with pedigree 0.0439, pedigree (3,3,5,3,2)
- wire drawing, steel: 0.000429645 kg; name wire; lognormal variance with pedigree 0.0439, pedigree (3,3,5,3,2)
  Fencing the farm: steel wire.
- inorganic phosphorus fertiliser, as P2O5: 0 kg; pedigree (1,1,1,1,1)
  Phosphate fertilizer for pasture replanting or maintenance.
  properties: wet mass 1 kg, dry mass 1 kg
- waste wood pole, chrome preserved: -3.0354e-5 kg; name BY_PRODUCT_1; = (poles*1237.5)*-1
  Fencing the farm: waste wood poles from fences (after periodic replacement).
  production volume 147738 kg; name BY_PRODUCT_1_VOLUME; = REF_PRODUCT_VOLUME * (BY_PRODUCT_1 / REF_PRODUCT)
    Calculated from production volume of reference product using the relative outputs.
  property price 0 EUR2005; name BY_PRODUCT_1_price_EUR2005
  properties: heating value, net 13.99 MJ, wet mass 1 kg, dry mass 0.8 kg, carbon content, non-fossil 0.483676, water content 0.25
  note on heating value, net: Value taken from the general comment of the treatment dataset.
- mowing, by rotary mower: 0.000962204 ha; lognormal variance with pedigree 0.0439, pedigree (3,3,5,3,2)
  To be replaced by as activity link to new BR dataset for weed control, by brush cutter, pasture
- tillage, harrowing, by offset disc harrow: 0.000192432 ha; lognormal variance with pedigree 0.0439, pedigree (3,3,5,3,2)
- sowing: 0.000192432 ha; lognormal variance with pedigree 0.0439, pedigree (3,3,5,3,2)
- soybean meal: 0.141865 kg; name MEAL; lognormal variance with pedigree 0.0439, pedigree (3,3,5,3,2)
  For concentrate formulation.
  property energy content 19.7 MJ; name MEAL_energy_content
  property water in wet mass 0.11 kg; name MEAL_WWM
  properties: water content 0.123596, carbon content, non-fossil 0.475627, wet mass 1 kg, dry mass 0.89 kg
- fertilising, by broadcaster: 0.00172084 ha; lognormal variance with pedigree 0.0439, pedigree (3,3,5,3,2)
- wood preservation, vacuum pressure method, inorganic salt, containing Cr, outdoor use, ground contact: 2.1266e-5 kg; name WOOD; lognormal variance with pedigree 0.0439, pedigree (3,3,5,3,2)
  Fencing the farm: poles preservation by treatment with inorganic CCB (chromium, copper, boron) salt with the vacuum pressure method. Emissions in farm or after used were not included.
- tillage, harrowing, by offset leveling disc harrow: 0.000384863 ha; lognormal variance with pedigree 0.0439, pedigree (3,3,5,3,2)
- urea: 0 kg; pedigree (1,1,1,1,1)
  The exchange has been updated from 'urea, as N' into 'urea' and therefore its amount has been scaled (multiplied) from 0.0481 kg by 2.1438 kg of 'urea' per kg of 'urea, as N'. Original comment of the exchange is: Urea for cattle feed and pasture fertilization.
  properties: wet mass 1 kg, carbon content, fossil 0.2, dry mass 1 kg
- maize silage: 2.63658 kg; name SILAGE; lognormal variance with pedigree 0.0439, pedigree (3,3,5,3,2)
  For cattle feed. To be direct linked to BR production, because it happens inside the farm.
  property water in wet mass 0.65 kg; name SILAGE_WWM
  property energy content 6.6325 MJ; name SILAGE_energy_content
  properties: dry mass 0.35 kg, carbon content, non-fossil 0.4773, water content 1.85714, wet mass 1 kg
- sawlog and veneer log, eucalyptus ssp., measured as solid wood under bark: 2.45284e-8 m3; name poles; lognormal variance with pedigree 0.0439, pedigree (3,3,5,3,2)
  Fencing the farm: roundwood from eucalyptus for poles.
  property water in wet mass 412.5 kg; name WOOD_WWM
  properties: wet mass 1237.5 kg, carbon content, non-fossil 0.494, dry mass 825 kg, water content 0.5, heating value, net 11336.5 MJ
- weed control, by brush cutter, pasture: 0.000962204 ha; lognormal variance with pedigree 0.0439, pedigree (3,3,5,3,2)
- lime: 1.2721 kg; lognormal variance with pedigree 0.0439, pedigree (3,3,5,3,2)
  Lime applied for pasture replanting or maintenance.
  properties: wet mass 1 kg, carbon content, fossil 0.120005, dry mass 1 kg
- zinc coat, pieces: 0.000102033 m2; lognormal variance with pedigree 0.0439, pedigree (3,3,5,3,2)
  Fencing the farm: steel wire zinc coating.
- inorganic potassium fertiliser, as K2O: 0 kg; pedigree (1,1,1,1,1)
  Potassium fertilizer for pasture replanting and maintenance.
  properties: dry mass 1 kg, wet mass 1 kg
- iron scrap, unsorted: -0.000429645 kg
  Fencing the farm: steel wire.
  production volume 2.09116e6 kg
  properties: dry mass 1 kg, wet mass 1 kg
- maize grain: 0.00140479, 0.668906 kg (2 entries); lognormal variance with pedigree 0.0439, pedigree (3,3,5,3,2)
  For cattle feed.
  properties: wet mass 1 kg, energy content 15.927 MJ, carbon content, non-fossil 0.46957, water content 0.162791, dry mass 0.86 kg
- inorganic phosphorus fertiliser, as P2O5: 0.000507722, 0.000658725, 0.000527463, 0.000870242, 3.58572e-5, 9.45179e-5, 0.00975009, 0.00017574, 1.91776e-5, 4.19005e-6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 kg (29 entries); lognormal variance with pedigree 0.0439, pedigree (3,3,5,3,2)
  Phosphate fertilizer for pasture replanting or maintenance.
- urea: 0.0711322, 0.01306, 0.0105351 kg (3 entries); lognormal variance with pedigree 0.0439, pedigree (3,3,5,3,2)
  (same comment as for urea)
- inorganic potassium fertiliser, as K2O: 4.49173e-5, 0.000222584, 0.000451462, 0.000399583, 5.77917e-5, 9.62241e-5, 0.00934928, 0.000325197, 8.01073e-5, 3.6239e-6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 kg (29 entries); lognormal variance with pedigree 0.0439, pedigree (3,3,5,3,2)
  Potassium fertilizer for pasture replanting and maintenance.

## Inputs from nature
- Transformation, to pasture, man made [natural resource, land]: 2.40542 m2; = T_t*1/20; lognormal variance with pedigree 0.0513, pedigree (3,3,5,3,2)
  From Folegatti et al. (2015).
- Transformation, from pasture, man made [natural resource, land]: 2.40542 m2; = T_t*1/20; lognormal variance with pedigree 0.0513, pedigree (3,3,5,3,2)
  From Folegatti et al. (2015).
- Occupation, pasture, man made [natural resource, land]: 48.1084 m2*year; name T_t; lognormal variance with pedigree 0.0453, pedigree (3,3,5,3,2)
  From Folegatti et al. (2015).

## Emissions to nature
- Zinc [soil, agricultural]: 0.0457908 kg; normal variance with pedigree 0.0946, pedigree (3,3,5,3,2)
  Emissions of heavy metals to soil and surface water estimated from mineral fertilisers and liming as recommended by Canals (2003) and regionalized following Folegatti et al. (2015).
- Nickel, ion [water, surface water]: 1.94075e-7 kg; normal variance with pedigree 0.1446, pedigree (3,3,5,3,2)
  (same comment as for Zinc)
- Heat, waste [air, non-urban air or from high stacks]: 15.7344 MJ; = - (REF_PRODUCT_energy_content + BY_PRODUCT_energy_content * BY_PRODUCT -MAIZE_energy_content * MAIZE - MEAL_energy_content * MEAL - SILAGE_energy_content * SILAGE); lognormal variance with pedigree 0.25, pedigree (5,5,5,5,5)
  Balance of energy content, considering product, by-product and the main exchanges from technosphere, only.
- Zinc, ion [water, surface water]: 4.57954e-6 kg; normal variance with pedigree 0.1446, pedigree (3,3,5,3,2)
  (same comment as for Zinc)
- Dinitrogen monoxide [air, non-urban air or from high stacks]: 0.0171242 kg; name N2O; = N2O_feedlot + 44/28*((0.01*(N_fert + Ncrop_residues)+ 0.01*14/17*NH3 + 0.0075*14/62*NO3) + N_ex* EF_N2O); lognormal variance with pedigree 0.0733, pedigree (3,3,5,3,2)
  Emissions of N2O to the air from pasture. See IPCC (2006).
- Carbon dioxide, fossil [air, non-urban air or from high stacks]: 0.606369 kg; = 44/12 * 0.13 * lime + 1.57 * N_fert; lognormal variance with pedigree 0.0439, pedigree (3,3,5,3,2)
  Emissions of CO2 to air from limestone and urea application based on IPCC (2006).
- Nickel [soil, agricultural]: 0.00194057 kg; normal variance with pedigree 0.0946, pedigree (3,3,5,3,2)
  (same comment as for Zinc)
- Phosphorus [water, surface water]: 0.00034003 kg; = T_t*10^-4 * soil_eroded * 0.00095 * 1.86 * 0.2; lognormal variance with pedigree 0.0833, pedigree (3,3,5,3,2)
  As phosphorus leaching must be disregarded due to its low mobility in Brazilian soils (Novais & Smyth, 1999), only P emission by water erosion through surface water was considered, as in '2.3.3 Phorsphorous Emissions Through Water Erosion to Surface Water' Nemecek and Schnetzer (2011).
- Lead [water, surface water]: 1.36787e-7 kg; normal variance with pedigree 0.1446, pedigree (3,3,5,3,2)
  (same comment as for Zinc)
- Methane, non-fossil [air, non-urban air or from high stacks]: 0.415596 kg; lognormal variance with pedigree 0.0513, pedigree (3,3,5,3,2)
  Enteric fermentation and manure management (IPCC, 2006).
- Chromium [soil, agricultural]: 0.00124584 kg; normal variance with pedigree 0.0946, pedigree (3,3,5,3,2)
  (same comment as for Zinc)
- Lead [soil, agricultural]: 0.00136778 kg; normal variance with pedigree 0.0946, pedigree (3,3,5,3,2)
  (same comment as for Zinc)
- Cadmium, ion [water, surface water]: 1.50249e-8 kg; normal variance with pedigree 0.1446, pedigree (3,3,5,3,2)
  (same comment as for Zinc)
- Nitrate [water, ground-]: 0.582394 kg; name NO3; = T_t*10^-4 * 62/14 * (( 21.37 + precipitation / ( Clay_content * root_depth) * (0.0037 * Ntot + 0.0000601 * Norg_soil - 0.00362 * Nuptake_plant))); lognormal variance with pedigree 0.0439, pedigree (3,3,5,3,2)
  See '2.2.2 The SQCB-NO3 model' in Nemececk & Schnetzer (2011), as 'SALCA-NO3 model' has 'Geographic scope of application: Europe'.
- Cadmium [soil, agricultural]: 0.000150239 kg; normal variance with pedigree 0.0946, pedigree (3,3,5,3,2)
  (same comment as for Zinc)
- Nitrogen oxides [air, non-urban air or from high stacks]: 0.00359608 kg; = N2O*0.21; lognormal variance with pedigree 0.0733, pedigree (3,3,5,3,2)
  Emissions of NOx to the air. See '2.5 EMISSIONS OF NOX TO THE AIR' in Nemecek and Schnetzer (2011).
- Phosphorus [water, ground-]: 0 kg
  Exchange kept with zero amount only for information that phosphorus leaching must be disregarded due to its low mobility in Brazilian soils (Novais & Smyth, 1999).
- Chromium, ion [water, surface water]: 1.24593e-7 kg; normal variance with pedigree 0.1446, pedigree (3,3,5,3,2)
  (same comment as for Zinc)
- Copper [soil, agricultural]: 0.00992781 kg; normal variance with pedigree 0.0946, pedigree (3,3,5,3,2)
  (same comment as for Zinc)
- Ammonia [air, non-urban air or from high stacks]: 0.0200155 kg; name NH3; = 17/14 * (N_fert*0.20 + N_ex*0.6*0.06); lognormal variance with pedigree 0.0513, pedigree (3,3,5,3,2)
  NH3 emissions from applied mineral fertilisers are calculated by constant emission factors for each group of fertiliser. For Urea 20%. See Nemecek et al. (2015).
- Copper, ion [water, surface water]: 9.92873e-7 kg; normal variance with pedigree 0.1446, pedigree (3,3,5,3,2)
  (same comment as for Zinc)

## Sampling procedure
Inventory data for cattle systems obtained from Embrapa’s PECUS Project, literature and expert knowledge. Emissions from the agricultural process estimated according to Nemecek and Schnetzer (2011) and Canals (2003) and other references mentioned.

## Extrapolations
Carbon content, water and gross calorific value are based on ecoinvent database.
