# suction, sawdust

Dataset: EcoSpold 2, unit process
Geography: Europe without Switzerland
Time period: 2012-01-01 to 2021-12-31
Technology level: current
Classification: ISIC rev.4 ecoinvent: 1610:Sawmilling and planing of wood
Tags: Swiss brush-up completed
Scenario: Business-as-Usual
System model: Allocation, cut-off by classification
Generated by: Frank Werner
Database: ecoinvent
isCopyrightProtected: true
accessRestrictedTo: 1

## General comment
This data represents the service of collecting sawdust, expressed per kg dry mass and transporting it to its silo via aspiration.
The process chain in a sawmill is a net of interlinked processes; the process structure depends on the individual design and technologies in place for each sawmill. The structuring of the sawmilling processes is based on the identification of the core processes in a sawmill that are attributable to several co-products (such as upstream processes like forestry and transport of logs to the sawmill) sorting, storing and the sawing of the (debarked) log. Other processes are attributable directly to one of the co-products such as the chipping of residual wood (either after sawing or as part of the profile chipping), the chipping of the bark (the 'debarking') or the suction of saw dust as collection and internal transport.
The following figure illustrates the general structure of the sawmilling processes before eventual drying and planing:

## Included activities start
The activity starts with the sawdust at the sawing machine.

## Included activities end
This activity ends with the sawdust collected at a silo at the sawmill site. The dataset does not include direct wood dust emissions nor specific infrastructure, which is taken into account as a rough estimate in the sawmilling process.

## Geography
Represents average Swiss conditions assumed to be represenative for Europe

## Reference product
- sawdust, loose, wet, measured as dry mass: 0 kg; source BFS 2013; By-product classification allocatable product; CPC 3928: Sawdust and wood waste and scrap
  estimated from the production volumes of sawdust resulting from the sawing of softwood and hardwood
  production volume 0 kg; name p_sawdust; = 7.7E9
    Production volume of sawdust produced in Europe (excluding Switzerland) in sawing activities.
  property heating value, net 7.79 MJ
    LHV is calculated based on the Carbon content of the product. More details can be found on the respective documentation.
  property carbon content 0.494
    carbon content on a dry matter basis (reserved; not for manual entry)
  properties: price 0.034 EUR2005, water content 0.7, wet mass 1.7 kg, dry mass 1 kg, carbon content, fossil 0, water in wet mass 0.7 kg, carbon content, non-fossil 0.494, carbon allocation 0.494 kg
- sawdust, wet, measured as dry mass: 1 kg; source BFS 2013; CPC 3928: Sawdust and wood waste and scrap; By-product classification allocatable product; pedigree (1,1,1,1,1)
  sawdust collected for further used
  production volume 7.7e9 kg; = p_sawdust
  properties: price 0.101 EUR2005, carbon content, non-fossil 0.494, water in wet mass 0.7 kg, dry mass 1 kg, water content 0.7, wet mass 1.7 kg, carbon content, fossil 0, heating value, net 7.79 MJ, carbon content 0.494, carbon allocation 0.494 kg

## By-products
- sawdust, wet, measured as dry mass: 0 kg; source BFS 2013; CPC 3928: Sawdust and wood waste and scrap; By-product classification allocatable product; pedigree (1,1,1,1,1)
  sawdust collected for further used
  production volume 0 kg; = p_sawdust
    Calculated from production volumes of reference product, using relative amounts
  property price 0.101 EUR2005
    Expert judgement (Urs Luginbühl, Swiss Sawmilling industry, personal communication in June 2014). Cross-reference; FAOSTAT (accessed 20140429). The price is calculated by using data on total world import quantity (m3) and import value (1000 USD), year 2005. 13564451 m3 of Wood Residues was imported in the world in 2005. The import value was 690978000 USD. The calculated price is thus (690978000/13564451=50.9*0.8=) 41.1 Euro/m3. The density of saw dust, wet, measured as dry mass is 550 kg/m3. The recalculated price is (1/550*41.1=) 0.075 Euro/kg.
  property heating value, net 7.79 MJ
    (same comment as for sawdust, loose, wet, measured as dry mass)
  property carbon content 0.494
    carbon content on a dry matter basis (reserved; not for manual entry)
  properties: carbon content, non-fossil 0.494, water in wet mass 0.7 kg, dry mass 1 kg, water content 0.7, wet mass 1.7 kg, carbon content, fossil 0, carbon allocation 0.494 kg

## Inputs from technosphere
- electricity, medium voltage: 0.03 kWh; source BFS 2013; lognormal variance with pedigree 0.0331, pedigree (1,1,4,3,1)
  electricity used for the aspiration and transport of sawdust from the sawing processes
  properties: UVEK_relative_amount_1 1, UVEK_link_1 1779
  note on UVEK_relative_amount_1: to be used only in special submissions in coordination with ecoinvent and the Swiss FOEN
- sawdust, loose, wet, measured as dry mass: 1 kg; source BFS 2013
  (same comment as for sawdust, loose, wet, measured as dry mass)
  production volume 7.7e9 kg
  properties: heating value, net 7.79 MJ, price 0.034 EUR2005, water content 0.7, wet mass 1.7 kg, dry mass 1 kg, carbon content, non-fossil 0.494

## Sampling procedure
complementary literature and sampling from sawmills; CH data used to approximate European processes

## Extrapolations
This dataset has been extrapolated from year 2012 to the year of the calculation (2021). The uncertainty has been adjusted accordingly.
