# clinker production

Dataset: EcoSpold 2, unit process
Geography: IN
Time period: 2014-04-01 to 2021-12-31
Technology level: current
Classification: EcoSpold01Categories: construction materials/binder
Classification: ISIC rev.4 ecoinvent: 2394:Manufacture of cement, lime and plaster
Synonyms: cement; clinker; Klinker; rotary kiln
Tags: combined production
Scenario: Business-as-Usual
System model: Allocation, cut-off by classification
Share of production covered: 60 %
Generated by: P V Kiran Ananth
Published in: Kiran Ananth P. V. 2017
Database: ecoinvent
isCopyrightProtected: true
accessRestrictedTo: 1

## General comment
Clinker - Activity starts with reception of raw material at factory gate and its internal transportation for prehomogenisation and raw meal grinding where different raw materials are mixed to obtain the chemical composition required for cement. The homogenized raw meal then fed to preheater tower to preheat the feed before entering to precalciner & kiln. A pre-heater is a series of vertical cyclones through which the raw meal is passed, coming into contact with swirling hot gases moving in the opposite direction. Precalcination takes place in precalciner where decomposition of limestone to lime take place. The required reactions, which also need heat energy inputs, are stimulated at two points in the manufacturing process: within the “precalciner”, a combustion chamber at the bottom of the pre-heater above the kiln, and within the kiln itself. The precalcined meal then enters the kiln, where intense heat – up to 1450°C – causes chemical and physical reactions that partially melt the meal into “clinker”, an intermediate product in cement manufacturing that becomes the main substance in cement and is commonly traded. From the kiln, the hot clinker falls onto a grate cooler where it is cooled by incoming combustion air, thereby minimising energy loss from the system. Depending on the requirement clinker can be stored in the silo to use for making different type of cement or transported to different location. Total clinker production in india during the year of 2014-15 is approximately 190 million tonnes. Clinker is basic raw material for production of cement.

## Included activities start
From the reception of traditional and alternative fuels and raw materials at the factory gate.

## Included activities end
This activity ends with the cooling of the produced clinker. It includes the whole manufacturing process to produce clinker , internal processes (transport, etc.) and for the infrastructure only the rotary kiln (material consumption) is taken into account. No administration is included. Waste (as secondary fuel and raw material) enter the system without environmental burdens from upstream processes.

## Geography
Data represents for all geographical locations where cement has been manufactured in India.

## Technology
For this activity latest available technologies were considered like Vertical roller mill, energy efficient fans, use of efficienct burner and cooler etc.

## Time period
For this activity time period of 2014 to 2017 has been considered . As during this period Indian cement industry has done significant works in improving energy efficiency by installing energy efficient equipment, process optimization, equipment retrofit etc.

## Reference product
- municipal solid waste: 0 kg; name MSW; CPC 39910: Municipal waste; By-product classification Waste
  Weighted average of more than 25 cement producer in india during the year 2014-15. In Indian cement plants various types of alternative fuels were used as replacement of primary fuel such as coal. Differant types of alterntive fuels are used in India are Rice husk, Tyre, Biomass, Muncipal Solid Waste, Rubber, Paint, Wood Dust, Saw Dust, ETP Sludge, Pharmaceutical Waste etc, The uses of alternate fuel in India is very low in comparison with what can be observed in other countries. The global average secondary fuel use in cement industry is near about 4%. In some countries the average use is as high as more than 30%, whereas in India the average is below 1%.
  production volume 0 kg
    Calculated from the annunal cement production volume between 2005 and 2009 and an estimated global clinker/cement ratio of 0.78
  property price 0 EUR2005; name MSW_price_EUR2005
    Waste products are assigned a price of zero as they are assumed to require further treatment.
  property carbon content, fossil 0.171549
    MSW composition in tab 4.1, ecoinvent v2.2 report 13_I. C content referred to 1 kg DM
  property heating value, net 11.74 MJ
    Value taken from the general comment of the treatment dataset.
  property carbon content, non-fossil 0.261655
    MSW composition in tab 4.1, ecoinvent v2.2 report 13_I. C content referred to 1 kg DM
  property carbon content 0.433204
    carbon content on a dry matter basis (reserved; not for manual entry)
  properties: dry mass 0.771 kg, water content 0.297017, water in wet mass 0.229 kg, wet mass 1 kg, carbon allocation 0.334 kg
- clinker: 1 kg; CPC 37430: Cement clinkers; By-product classification allocatable product
  EcoSpold01Location=CH
  production volume 1.9e11 kg; name clinker_PV
    Calculated from the annunal cement production volume in 2014 year and an estimated indian clinker/cement ratio of 0.76
  property price 0.047 EUR2005
    Calculated value based on data from United Nations Commodity Trade Statistics Database (comtrade.un.org). UN comtrade category: 252310 Cement Clinkers. Using exchange rate of 1EURO = 1.209 USD. Average of price of import into 5 main markets (EU, US, JP, IN and CN).
  property carbon content 0
    carbon content on a dry matter basis (reserved; not for manual entry)
  properties: wet mass 1 kg, water in wet mass 0 kg, water content 0, carbon content, fossil 0, dry mass 1 kg, carbon content, non-fossil 0, carbon allocation 0 kg

## Inputs from technosphere
- clay: 0.0154 kg; = 0.0154*clinker; lognormal variance with pedigree 0.0121, pedigree (1,2,3,1,1)
  Weighted average of more than 25 cement producer in india during the year 2014-15.
  EcoSpold01Location=CH
  properties: wet mass 1 kg, dry mass 0.965 kg, water content 0.0362694
- heavy fuel oil: 1.28e-5 kg; = 1.28E-5*clinker; lognormal variance with pedigree 0.0121, pedigree (1,2,3,1,1)
  EcoSpold01Location=CH
  Weighted average of more than 25 cement producer in india during the year 2014-15.
  properties: dry mass 1 kg, wet mass 1 kg, carbon content, fossil 0.849, heating value, net 41.2 MJ
- limestone, crushed, for mill: 1.4524 kg; = 1.4524*clinker; lognormal variance with pedigree 0.0121, pedigree (1,2,3,1,1)
  Weighted average of more than 25 cement producer in india during the year 2014-15.
  properties: wet mass 1 kg, dry mass 0.998 kg, carbon content, fossil 0.117492, water content 0.00200401
- bauxite: 0.0078 kg; = 0.0078*clinker; lognormal variance with pedigree 0.0121, pedigree (1,2,3,1,1)
  Weighted average of more than 25 cement producer in india during the year 2014-15.
  EcoSpold01Location=GLO
  properties: dry mass 1 kg, wet mass 1 kg
- industrial machine, heavy, unspecified: 3.76e-5 kg; = 0.0000376*clinker; lognormal variance with pedigree 0.334, pedigree (4,4,3,5,1)
  EcoSpold01Location=RER
  Data referred from ecoinvent dataset of Clinker production, GLO (accessed on 20170113)
- iron ore, crude ore, 46% Fe: 0.0062 kg; = 0.0062*clinker; lognormal variance with pedigree 0.012125, pedigree (1,2,3,2,1)
  Weighted average of more than 25 cement producer in india during the year 2014-15.
  properties: wet mass 1 kg, dry mass 1 kg
- refractory, fireclay, packed: 0.000112 kg; = 0.000112*clinker; lognormal variance with pedigree 0.0121, pedigree (1,2,3,1,1)
  EcoSpold01Location=DE
  Weighted average of more than 25 cement producer in india during the year 2014-15.
  properties: dry mass 1 kg, wet mass 1 kg
- diesel, low-sulfur: 0.000135 kg; = 0.000135*clinker; lognormal variance with pedigree 0.0027, pedigree (1,2,3,1,1)
  Weighted average of more than 25 cement producer in india during the year 2014-15.
  properties: wet mass 1 kg, dry mass 1 kg, carbon content, fossil 0.865, heating value, net 42.8 MJ
- laterite, mineral: 0.0276 kg; = 0.0276*clinker; lognormal variance with pedigree 0.0121, pedigree (1,2,3,1,1)
  Weighted average of more than 25 cement producer in india during the year 2014-15.
  properties: dry mass 1 kg, wet mass 1 kg
- cement factory: 6.20295e-12 unit; = 6.20295274232494E-12*clinker; lognormal variance with pedigree 0.3146, pedigree (2,1,3,5,1)
  EcoSpold01Location=CH
  Data referred from ecoinvent dataset of Clinker production, GLO (accessed on 20170113)
- refractory, high aluminium oxide, packed: 0.000112 kg; = 0.000112*clinker; lognormal variance with pedigree 0.0121, pedigree (1,2,3,1,1)
  Weighted average of more than 25 cement producer in india during the year 2014-15.
  EcoSpold01Location=DE
  properties: dry mass 1 kg, wet mass 1 kg
- lubricating oil: 3.266e-5 kg; = 0.00003266*clinker; lognormal variance with pedigree 0.0121, pedigree (1,2,3,1,1)
  Weighted average of more than 25 cement producer in india during the year 2014-15.
  EcoSpold01Location=RER
  properties: heating value, net 40.2 MJ, wet mass 1 kg, carbon content, fossil 0.75, dry mass 1 kg
  note on heating value, net: Literature value, Source: IPCC 2006, 2006 IPCC Guidelines for National Greenhouse Gas Inventories, Prepared by the National Greenhouse Gas Inventories Programme, Eggleston H.S., Buendia L., Miwa K., Ngara T. and Tanabe K. (eds). Published: IGES, Japan
  note on carbon content, fossil: Lubricating oil is produced from diesel. C-content/dry mass of fats and oils considered 75%, from: ecoinvent v2.2 report, n 15a, pg 40
- pulverised lignite: 0.049272 MJ; = 0.049272*clinker; lognormal variance with pedigree 0.002725, pedigree (1,2,3,2,1)
  Weighted average of more than 25 cement producer in india during the year 2014-15.
  Uncertainty: Variance of log-transformed data was taken from ecoinvent report no 1, table 10.3. Value represents demand of products, electricity etc. for input/output group c.
  properties: dry mass 0.0410138 kg, carbon content, fossil 0.660674, water content 0.123596, wet mass 0.0460829 kg, heating value, net 8.8 MJ
- steel, chromium steel 18/8, hot rolled: 5.69e-5 kg; = 0.00005690*clinker; lognormal variance with pedigree 0.0121, pedigree (1,2,3,1,1)
  EcoSpold01Location=RER
  Weighted average of more than 25 cement producer in india during the year 2014-15.
  properties: wet mass 1 kg, carbon content, fossil 0.0008, dry mass 1 kg
  note on carbon content, fossil: Stainless steel model is the grade 304 steel (18/8 stainless, 18% chromium 8% nickel; max. 0.08% C)
- petroleum coke: 0.036925 kg; = 0.036925*clinker; lognormal variance with pedigree 0.0121, pedigree (1,2,3,1,1)
  (same comment as for steel, chromium steel 18/8, hot rolled)
  properties: wet mass 1 kg, carbon content, fossil 0.885, dry mass 1 kg, heating value, net 35 MJ
- refractory, basic, packed: 0.000112 kg; = 0.000112*clinker; lognormal variance with pedigree 0.0121, pedigree (1,2,3,1,1)
  (same comment as for refractory, fireclay, packed)
  properties: wet mass 1 kg, dry mass 1 kg
- hard coal: 0.078948 kg; = 0.078948*clinker+MSW*0; lognormal variance with pedigree 0.0027, pedigree (1,2,3,1,1)
  Weighted average of more than 25 cement producer in india during the year 2014-15. % share of imported coal 38%. % share of indian coal 62%
  properties: heating value, net 27.91 MJ, wet mass 1 kg, water content 0.0638298, carbon content, fossil 0.845, dry mass 0.94 kg
  note on heating value, net: Based on the Characterization factor of Hard coal in the CED method
  note on carbon content, fossil: C content 75-94% (specified in Tab 1.1, report 6, part VI). A mean content of 0.845 kg C/ kg dry hard coal was considered
- electricity, medium voltage: 0.0526276 kWh; = 0.052627564*clinker; lognormal variance with pedigree 0.0121, pedigree (1,2,3,1,1)
  (same comment as for heavy fuel oil)

## Inputs from nature
- Water, cooling, unspecified natural origin [natural resource, in water]: 8.4e-5 m3; name water_cooling_UNO_input; = 0.000084*clinker; lognormal variance with pedigree 0.0021, pedigree (1,2,3,1,1)
  Weighted average of more than 25 cement producer in india during the year 2014-15.

## Emissions to nature
- Lead [air, unspecified]: 8.3904e-8 kg; = 8.39039875819248E-08*clinker; lognormal variance with pedigree 0.6646, pedigree (2,1,3,5,1)
  Data referred from ecoinvent dataset of Clinker production, GLO (accessed on 20170113) . Considered emission is because of clinkerisation process or by utilisation of muncipal solid wast and/or uses of other alternative material. This exchange has very high uncertainity.
- Water [air, unspecified]: 4.2e-5 m3; name water_to_air_unspecified; = 0.000042*clinker; lognormal variance with pedigree 0.0421, pedigree (1,2,3,1,1)
  Weighted average of more than 25 cement producer in india during the year 2014-15.
  property fraction, origin: fresh water 0.173469; name fraction_origin_fresh_water
  property fraction, origin: salt water 0; name fraction_origin_salt_water
  property fraction, origin: unspecified 0.826531; name fraction_origin_unspecified
- Arsenic, ion [water, unspecified]: 1.29322e-10 kg; = 1.29321835115557E-10*clinker; lognormal variance with pedigree 0.0452, pedigree (2,3,3,5,1)
  (same comment as for Lead)
- Benzo(k)fluoranthene [air, unspecified]: 4.42901e-12 kg; = 4.42901000344947E-12*clinker; lognormal variance with pedigree 0.3046, pedigree (2,1,3,5,1)
  (same comment as for Lead)
- Tin [air, unspecified]: 9.04705e-9 kg; = 9.04705070714039E-09*clinker; lognormal variance with pedigree 0.6646, pedigree (2,1,3,5,1)
  (same comment as for Lead)
- Chrysene [air, unspecified]: 5.65126e-13 kg; = 5.6512590548465E-13*clinker; lognormal variance with pedigree 0.3046, pedigree (2,1,3,5,1)
  (same comment as for Lead)
- Benzo(ghi)perylene [air, unspecified]: 3.77189e-13 kg; = 3.77188685753708E-13*clinker; lognormal variance with pedigree 0.3046, pedigree (2,1,3,5,1)
  (same comment as for Lead)
- Antimony [air, unspecified]: 2.23632e-9 kg; = 2.23632286995516E-09*clinker; lognormal variance with pedigree 0.6646, pedigree (2,1,3,5,1)
  (same comment as for Lead)
- Particulates, > 2.5 um, and < 10um [air, non-urban air or from high stacks]: 7.8634e-6 kg; = 7.86340393239048E-06*clinker; lognormal variance with pedigree 0.1346, pedigree (2,1,3,5,1)
  Data referred from ecoinvent dataset of Clinker production, GLO accessed on 20170113)
- Cadmium, ion [water, unspecified]: 2.58907e-11 kg; = 2.58906519489479E-11*clinker; lognormal variance with pedigree 0.6552, pedigree (2,3,3,5,1)
  (same comment as for Lead)
- Benzo(b)fluoranthene [air, unspecified]: 6.12439e-12 kg; = 6.12438771990342E-12*clinker; lognormal variance with pedigree 0.3046, pedigree (2,1,3,5,1)
  (same comment as for Lead)
- Chromium VI [air, unspecified]: 5.44119e-10 kg; = 5.44118661607451E-10*clinker; lognormal variance with pedigree 0.0546, pedigree (2,1,3,5,1)
  (same comment as for Lead)
- Copper, ion [water, unspecified]: 2.58907e-11 kg; = 2.58906519489479E-11*clinker; lognormal variance with pedigree 0.6552, pedigree (2,3,3,5,1)
  (same comment as for Lead)
- Dibenz(a,h)anthracene [air, unspecified]: 2.8782e-12 kg; = 2.87819937909624E-12*clinker; lognormal variance with pedigree 0.3046, pedigree (2,1,3,5,1)
  (same comment as for Lead)
- Arsenic [air, unspecified]: 1.21892e-8 kg; = 1.21892408416695E-08*clinker; lognormal variance with pedigree 0.0546, pedigree (2,1,3,5,1)
  (same comment as for Lead)
- Chromium, ion [water, unspecified]: 5.17813e-11 kg; = 5.17813038978958E-11*clinker; lognormal variance with pedigree 0.6552, pedigree (2,3,3,5,1)
  (same comment as for Lead)
- Acenaphthylene [air, unspecified]: 2.68106e-10 kg; = 2.68106243532253E-10*clinker; lognormal variance with pedigree 0.3046, pedigree (2,1,3,5,1)
  (same comment as for Lead)
- Mercury [air, unspecified]: 3.25249e-8 kg; = 3.25249085891687E-08*clinker; lognormal variance with pedigree 0.0546, pedigree (2,1,3,5,1)
  (same comment as for Lead)
- Mercury [water, unspecified]: 2.72049e-13 kg; = 2.72048982407727E-13*clinker; lognormal variance with pedigree 0.6552, pedigree (2,3,3,5,1)
  (same comment as for Lead)
- Benz(a)anthracene [air, unspecified]: 5.17813e-12 kg; = 5.17813038978958E-12*clinker; lognormal variance with pedigree 0.3046, pedigree (2,1,3,5,1)
  (same comment as for Lead)
- Nickel [air, unspecified]: 6.71358e-9 kg; = 6.71357709555019E-09*clinker; lognormal variance with pedigree 0.0546, pedigree (2,1,3,5,1)
  (same comment as for Lead)
- Nickel, ion [water, unspecified]: 2.58907e-11 kg; = 2.58906519489479E-11*clinker; lognormal variance with pedigree 0.6552, pedigree (2,3,3,5,1)
  (same comment as for Lead)
- Benzo(a)pyrene [air, unspecified]: 2.07651e-12 kg; = 2.07650914108313E-12*clinker; lognormal variance with pedigree 0.3046, pedigree (2,1,3,5,1)
  (same comment as for Lead)
- Thallium [air, unspecified]: 1.30171e-8 kg; = 1.30171093480511E-08*clinker; lognormal variance with pedigree 0.0546, pedigree (2,1,3,5,1)
  (same comment as for Lead)
- Zinc, ion [water, unspecified]: 5.17813e-11 kg; = 5.17813038978958E-11*clinker; lognormal variance with pedigree 0.6552, pedigree (2,3,3,5,1)
  (same comment as for Lead)
- Methane, fossil [air, unspecified]: 8.78504e-6 kg; = 8.78504311831666E-06*clinker; lognormal variance with pedigree 0.1346, pedigree (2,1,3,5,1)
  (same comment as for Lead)
- Copper [air, unspecified]: 1.41934e-8 kg; = 1.41934494653329E-08*clinker; lognormal variance with pedigree 0.0546, pedigree (2,1,3,5,1)
  (same comment as for Lead)
- Lead [water, unspecified]: 2.72049e-11 kg; = 2.72048982407727E-11*clinker; lognormal variance with pedigree 0.6552, pedigree (2,3,3,5,1)
  (same comment as for Lead)
- Selenium [air, unspecified]: 1.97861e-9 kg; = 1.97861331493619E-09*clinker; lognormal variance with pedigree 0.6646, pedigree (2,1,3,5,1)
  (same comment as for Lead)
- Dioxins, measured as 2,3,7,8-tetrachlorodibenzo-p-dioxin [air, unspecified]: 9.42895e-13 kg; = 9.42895308727147E-13*clinker; lognormal variance with pedigree 0.0546, pedigree (2,1,3,5,1)
  (same comment as for Lead)
- Methane, dichloro-, HCC-30 [air, unspecified]: 5.17813e-8 kg; = 5.17813038978958E-08*clinker; lognormal variance with pedigree 0.3046, pedigree (2,1,3,5,1)
  (same comment as for Lead)
- Vanadium [air, unspecified]: 4.96621e-9 kg; = 4.96620903759917E-09*clinker; lognormal variance with pedigree 0.0546, pedigree (2,1,3,5,1)
  (same comment as for Lead)
- Particulates, > 10 um [air, non-urban air or from high stacks]: 6.49968e-6 kg; = 6.49968023456364E-06*clinker; lognormal variance with pedigree 0.0546, pedigree (2,1,3,5,1)
  Data referred from ecoinvent dataset of Clinker production, GLO accessed on 20170113)
- Phenanthrene [air, unspecified]: 6.59752e-10 kg; = 6.59751638496033E-10*clinker; lognormal variance with pedigree 0.6546, pedigree (2,1,3,5,1)
  (same comment as for Lead)
- Ammonia [air, unspecified]: 2.25164e-5 kg; = 2.25163915143153E-05*clinker; lognormal variance with pedigree 0.0546, pedigree (2,1,3,5,1)
  (same comment as for Lead)
- Chromium [air, unspecified]: 2.10027e-9 kg; = 2.10027423249396E-09*clinker; lognormal variance with pedigree 0.0546, pedigree (2,1,3,5,1)
  (same comment as for Lead)
- Phosphorus [water, unspecified]: 7.7672e-11 kg; = 7.76719558468437E-11*clinker; lognormal variance with pedigree 0.0452, pedigree (2,3,3,5,1)
  (same comment as for Lead)
- Hydrogen chloride [air, unspecified]: 6.63394e-6 kg; = 6.63393549499828E-06*clinker; lognormal variance with pedigree 0.0546, pedigree (2,1,3,5,1)
  (same comment as for Lead)
- Carbon dioxide, fossil [air, unspecified]: 0.75 kg; = 0.22*clinker+0.530*clinker; lognormal variance with pedigree 0.0121, pedigree (1,2,3,1,1)
  Weighted average of more than 25 cement producer in india during the year 2014-15. Emission due to burning of fossile fuel is 0.22 kg and Emission due to process is 0.530 kg per clinker.
- Pyrene [air, unspecified]: 3.44333e-11 kg; = 3.44332528458089E-11*clinker; lognormal variance with pedigree 0.3046, pedigree (2,1,3,5,1)
  (same comment as for Lead)
- Zinc [air, unspecified]: 6.34157e-8 kg; = 6.34156605726112E-08*clinker; lognormal variance with pedigree 0.0546, pedigree (2,1,3,5,1)
  (same comment as for Lead)
- Carbon monoxide, fossil [air, unspecified]: 0.000488707 kg; = 0.000488706760952052*clinker; lognormal variance with pedigree 0.1346, pedigree (2,1,3,5,1)
  Data referred from ecoinvent dataset of Clinker production, GLO
- Benzene, hexachloro- [air, unspecified]: 2.58907e-12 kg; = 2.58906519489479E-12*clinker; lognormal variance with pedigree 0.3046, pedigree (2,1,3,5,1)
  (same comment as for Lead)
- NMVOC, non-methane volatile organic compounds, unspecified origin [air, unspecified]: 5.58866e-5 kg; = 5.58866022766471E-05*clinker; lognormal variance with pedigree 0.1346, pedigree (2,1,3,5,1)
  (same comment as for Lead)
- Nitrogen oxides [air, unspecified]: 0.0017 kg; = 0.00170*clinker; lognormal variance with pedigree 0.0521, pedigree (1,2,3,1,1)
  Weighted average of more than 25 cement producer in india during the year 2014-15.
- Manganese [air, unspecified]: 5.74326e-10 kg; = 5.74325629527423E-10*clinker; lognormal variance with pedigree 0.3046, pedigree (2,1,3,5,1)
  (same comment as for Lead)
- Cadmium [air, unspecified]: 6.8738e-9 kg; = 6.87379993101069E-09*clinker; lognormal variance with pedigree 0.0546, pedigree (2,1,3,5,1)
  (same comment as for Lead)
- Particulates, < 2.5 um [air, non-urban air or from high stacks]: 2.36975e-5 kg; = 2.36974874094515E-05*clinker; lognormal variance with pedigree 0.3146, pedigree (2,1,3,5,1)
  Data referred from ecoinvent dataset of Clinker production, GLO accessed on 20170113)
- Indeno(1,2,3-cd)pyrene [air, unspecified]: 1.13157e-12 kg; = 1.13156605726112E-12*clinker; lognormal variance with pedigree 0.3046, pedigree (2,1,3,5,1)
  (same comment as for Lead)
- Beryllium [air, unspecified]: 2.96792e-9 kg; = 2.96791997240428E-09*clinker; lognormal variance with pedigree 0.0546, pedigree (2,1,3,5,1)
  (same comment as for Lead)
- Water [water, unspecified]: 4.2e-5 m3; name water_to_water_unspecified; = 0.000042*clinker; lognormal variance with pedigree 0.0421, pedigree (1,2,3,1,1)
  Weighted average of more than 25 cement producer in india during the year 2014-15.
  property fraction, origin: salt water 0; name fraction_origin_salt_water_Ww
  property fraction, origin: unspecified 0.826531; name fraction_origin_unspecified_Ww
  property fraction, origin: fresh water 0.173469; name fraction_origin_fresh_water_Ww
- Phosphorus [air, unspecified]: 3.48275e-13 kg; = 3.48275267333563E-13*clinker; lognormal variance with pedigree 0.0446, pedigree (2,1,3,5,1)
  (same comment as for Lead)
- Fluorene [air, unspecified]: 4.28444e-11 kg; = 4.28444291134874E-11*clinker; lognormal variance with pedigree 0.3046, pedigree (2,1,3,5,1)
  (same comment as for Lead)
- Cobalt [air, unspecified]: 3.98129e-9 kg; = 3.98128665056916E-09*clinker; lognormal variance with pedigree 0.0546, pedigree (2,1,3,5,1)
  (same comment as for Lead)
- Sulfur dioxide [air, unspecified]: 0.000391927 kg; = 0.00039192704380821*clinker; lognormal variance with pedigree 0.0546, pedigree (2,1,3,5,1)
  Data referred from ecoinvent dataset of Clinker production, GLO accessed on 20170113)
- PAH, polycyclic aromatic hydrocarbons [air, unspecified]: 1.27219e-12 kg; = 1.27219041048637E-12*clinker; lognormal variance with pedigree 0.3046, pedigree (2,1,3,5,1)
  (same comment as for Lead)
- Fluoranthene [air, unspecified]: 4.71814e-11 kg; = 4.71814418765091E-11*clinker; lognormal variance with pedigree 0.3046, pedigree (2,1,3,5,1)
  (same comment as for Lead)

## Sampling procedure
For this activity sample questionnaire has been prepared and circulated to all cement manufacturing units in India. Here we have selected clusterwise approch for collecting the data. Due to clusterwise approch variation in quality of raw material , different technologies etc. has taken care. After receiving the data from plants same has been analysed for any discripancies. Extreme minimum and maximum values reported by plants were removed. Final numbers were checked with cement industry expert. We have received data from more than 25 cement plants in India.

## Extrapolations
Data represents for 60% of the total installed cement capacity in India in the year of 2014-15.
