# palm date production, conditioned and dried, organic

Dataset: EcoSpold 2, unit process
Geography: GLO
Time period: 2012-01-01 to 2021-12-31
Technology level: current
Classification: ISIC rev.4 ecoinvent: 1030:Processing and preserving of fruit and vegetables
Scenario: Business-as-Usual
System model: Allocation, cut-off by classification
Generated by: Kenza Benabderrazik
Database: ecoinvent
isCopyrightProtected: true
accessRestrictedTo: 1

## General comment
This dataset represents 1 kg of organic palm date fruit conditioned and dried in Tunisia. All the exchanges are calculated per kg of palm date and are based on field data from the main industrial palm date exporter in Tunisia. The inventory includes the following activities: sorting, washing, freezing, cooling, heating, drying. The packaging has not been taking into account.Regarding waste management, palm date kernel are recovered as animal feed. The conditioning of the organic palm date is different from the conditioning of conventional palm date. The fumigation is replaced by the freezing (4 hours under -20 °C) of the dates and there is no glucosing. The annual productivity of the plant is 13000 tons of palm dates Deglet Noor ( 3% of the palm dates are organic.). The cultivar of the dates studies is Deglet Noor. Tunisia is the world's largest exporter of Deglet Noor.

## Included activities start
The activity starts when palm date fruit arrives to the plant in order to be conditioned.

## Included activities end
The activity ends when the fruit has undergone all processing steps. The palm date is then ready to be packed and send to the importing country. The facility, the infrastructures and the machineries has not been taking into account.

## Geography
The inventory is an extrapolation modeled for Tunisia and is based on field data from one of the main exporter of the Country. Tunisia is the world's largest exporter of Deglet Noor. The conditioning takes place in a plant located in Beni Khalled (in northern tunisia).

## Parameters
- unit conversion kcal to mj: 0.004184 MJ/kcal; name kcal_mj

## Reference product
- palm date, conditioned and dried, organic: 0 kg; name rp; CPC 21419: Other dried fruit, n.e.c.; By-product classification allocatable product; pedigree (1,1,1,1,1)
  production volume 464409 kg; name rppv
    It represents the total production of conventional palm date produced.
    Accordingto the FAOSTAT, the global production of palm dates is 7'548'918. Tunisia has 2.5% of the global production of Dates, and produced 190'000 t in 2012.
    We supposed that 1/13th of the production is organic palm dates. This ratio is an extrapolation from the tunisian dataset. Also we supposed that the annual production volume of conditionned palm date is 19 % less important than raw dates, this is also an extrapolation of the tunisian values.
  property price 0.714295 EUR2005; name rp_price_EUR2005
    Calculated based on inputs: The price of the product has been calculated as a sum of the values of the material and energy inputs for this product. This value is therefore a rough estimation. It may underestimate the real price since there are additional expenses when producing any product. These expences can include for example labour costs, treatment of waste materials and profit for the producer. Please consider carefully whether this level of data quality is acceptable for your application.
  property carbon content 0.367
    carbon content on a dry matter basis (reserved; not for manual entry)
  property true value 0.714295; name rp_true_value
    allocation property applied in "true value" allocation // value calculated from revenue
  properties: water in wet mass 0.15 kg, calcium content 0.0001, protein content 0.024, carbohydrates content 0.806 kg, water content 0.176471, dry mass 0.85 kg, carbon content, fossil 0, fat (total lipid) content 0.0038 kg, carbon content, non-fossil 0.367, wet mass 1 kg, carbon allocation 0.31195 kg
- energy feed, gross: 1 MJ; name ef; CPC 23319: Preparations used in animal feeding n.e.c.; By-product classification allocatable product; pedigree (1,1,1,1,1)
  Palm date pits and organic waste are recovered for animal feed. The energetic value of the pits are 450 kcal / 100g. 1 kcal is equivalent to 0.004184 MJ. The amount of palm date organic waste is 0.12 kg per kg of dates
  production volume 1.0491e6 MJ; = ef/ rp* rppv
    Calculated from production volume of reference product using the relative outputs.
  property price 0.0108 EUR2005; name ef_price_EUR2005
    Based on energy feed, gross content in soybean meal and prices per kg of soybean meal. Assumed soybean meal is the most used feed. Soybean meal 2004 prices for World import/export data (tonnes and US$) from FaoStat statistics (http://faostat.fao.org/site/535/default.aspx#ancor, TRADE)- [Accessed 24 May 2010]. See calculations for protein /energy content
  property carbon content 0
    carbon content on a dry matter basis (reserved; not for manual entry)
  property true value 0.0243972; name ef_true_value
    allocation property applied in "true value" allocation // value calculated from revenue
  properties: carbon content, fossil 0, water content 0, carbon content, non-fossil 0, water in wet mass 0 kg, wet mass 0 kg, dry mass 0 kg, carbon allocation 0 kg

## By-products
- protein feed, 100% crude: 0 kg; name pf; CPC 23319: Preparations used in animal feeding n.e.c.; By-product classification allocatable product; pedigree (1,1,1,1,1)
  The palm date pits and other organic wastes are recovered into animal feed. The protein content of date pits is up to 7%. ( www.fao.org/docrep/t0681e/t0681e00.htm ). The total amount of organic waste recovered is 0.12 kg per kg of dates
  production volume 55729.1 kg; = pf/rp*rppv
    Calculated from production volume of reference product using the relative outputs.
  property price 0.424 EUR2005; name pf_price_EUR2005
    Based on protein content and energy feed, gross content in soybean meal and prices per kg of soybean meal. Assumed soybean meal is the most used feed. Soybean meal 2004 prices for World import/export data (tonnes and US$) from FaoStat statistics (http://faostat.fao.org/site/535/default.aspx#ancor, TRADE)- [Accessed 24 May 2010]. See calculations for protein /energy content
  property carbon content 0.53
    carbon content on a dry matter basis (reserved; not for manual entry)
  property true value 0.05088; name pf_true_value
    allocation property applied in "true value" allocation // value calculated from revenue
  properties: water content 0, dry mass 1 kg, wet mass 1 kg, carbon content, non-fossil 0.53, water in wet mass 0 kg, carbon content, fossil 0, carbon allocation 0.53 kg

## Inputs from technosphere
- tap water: 0.0164139 kg; lognormal variance with pedigree 0.0206, pedigree (4,4,4,1,2)
  Water used to clean and wash the palm dates at the arrival
  properties: water content 2962.17, dry mass 0.000337476 kg, carbon content, fossil 0.00178991, wet mass 1 kg
  note on carbon content, fossil: Bicarbonate content is 2.93 mol/m3. CO2 content is 0.1 mol/m3 (ecoinvent v2.2 report 8, Tab 93.1).
- heat, district or industrial, natural gas: 3.13233e-6 MJ; lognormal variance with pedigree 0.0192, pedigree (4,4,4,1,2)
  During the drying , natural gas is used to heat the fruits
  properties: heating value, net 1 MJ
- palm date, organic: 0.016879 kg; lognormal variance with pedigree 0.0192, pedigree (4,4,4,1,2)
  1.234 kg of palm date from the farm is conditioned to produce 1 kg of palm date conditioned and dried. 0.120 kg becomes organic waste (who is recovered for animal feed) and 0.114 kg is the amount of water that is lost during the drying process
  properties: fat (total lipid) content 0.0014 kg, protein content 0.015, water content 0.263999, carbon content, non-fossil 0.251, carbohydrates content 0.549 kg, dry mass 0.79114 kg, wet mass 1 kg
- chlorodifluoromethane: 0 kg; pedigree (1,1,1,1,1)
  This represent the amount af refrigerant R22 used to freeze and stock the fruits. 4.8 kg are used each year for the organic palm dates. It represents 3% of 10 bottles ( 16 kg/bottles).
  properties: carbon content, fossil 0.139535, wet mass 1 kg, dry mass 1 kg, heating value, net 5.61 MJ
- electricity, low voltage: 0.00227839 kWh; lognormal variance with pedigree 0.0112, pedigree (1,4,4,1,2)
  Represent the amount of electricity needed for the conditioning of the palm dates. It includs the fumigating, the cooling, the drying, the heating and the washing of the fruits. More electricity is needed for organic palm because they are freezed, unlike the conventional palm dates that are fumigated.
- wastewater, average: 0 m3; name wwt; pedigree (1,1,1,1,1)
  The water used for the washing is treated with tunisian average treatment for wastewater.
  production volume 0 m3
    Calculated from production volume of reference product using the relative outputs.
  property price 0 EUR2005; name wwt_price_EUR2005
  properties: carbon content, non-fossil 0.194039, dry mass 0.34684 kg, wet mass 1000 kg, water content 2882.2
  note on carbon content, non-fossil: 0.0673 kg TOC/m3 (Tab A.17, ecoinvent v2.2 report 13_I). TOC was considered as Total Carbon.
- chlorodifluoromethane: 1.92009e-8, 1.34406e-7 kg (2 entries); lognormal variance with pedigree 0.0192, pedigree (4,4,4,1,2)
  (same comment as for chlorodifluoromethane)
- wastewater, average: -5.61595e-6, -6.07541e-7, -1.17498e-5 m3 (3 entries); lognormal variance with pedigree 0.0206, pedigree (4,4,4,1,2)
  The water used for the washing is treated with tunisian average treatment for wastewater.
  production volume 610.233 m3

## Emissions to nature
- Water [air, urban air close to ground]: 1.62635e-6 m3; name w; lognormal variance with pedigree 0.0192, pedigree (4,4,4,1,2)
  Water emitted to the air from drying. Ecoinvent report 15 , formula 13.2

## Sampling procedure
The main palm date conditioning is located in the north of Tunisia. The value were collected from one of the main exporter of Deglet Noor in Tunisia (13'000 tons each year, 3% are organic palm date). It has been validated and complemented by literature data.
