# methyl tert-butyl ether production

Dataset: EcoSpold 2, unit process
Geography: RER
Time period: 1991-01-01 to 2021-12-31
Technology level: current
Classification: ISIC rev.4 ecoinvent: 2011:Manufacture of basic chemicals
Classification: EcoSpold01Categories: chemicals/organics
Synonyms: MTBE
Tags: ConvertedDataset
Scenario: Business-as-Usual
System model: Allocation, cut-off by classification
Generated by: Niels Jungbluth
Published in: Jungbluth, N. 2007
Database: ecoinvent
isCopyrightProtected: true
accessRestrictedTo: 1

## General comment
Rough estimation for this product
[This dataset was already contained in the ecoinvent database version 2. It was not individually updated during the transfer to ecoinvent version 3. Life Cycle Impact Assessment results may still have changed, as they are affected by changes in the supply chain, i.e. in other datasets. This dataset was generated following the ecoinvent quality guidelines for version 2. It may have been subject to central changes described in the ecoinvent version 3 change report (http://www.ecoinvent.org/database/ecoinvent-version-3/reports-of-changes/), and the results of the central updates were reviewed extensively. The changes added e.g. consistent water flows and other information throughout the database. The documentation of this dataset can be found in the ecoinvent reports of version 2, which are still available via the ecoinvent website. The change report linked above covers all central changes that were made during the conversion process.]

## Included activities end
Infrastructure, use of raw materials for production of MTBE. No data for emissions and catalysts.

## Geography
Publication in the US.

## Technology
Reaction of isobutene with methanol. Reaction temperature 100°C. Catalysts are used.

## Time period
Time of publication.

## Reference product
- methyl tert-butyl ether: 1 kg; By-product classification allocatable product; CPC 34170: Ethers, alcohol peroxides, ether peroxides, epoxides, acetals and hemiacetals, and their halogenated, sulphona[…]; CAS 1634-04-4
  EcoSpold01Location=RER
  production volume 1.32237 kg
    This is a placeholder value that does not reflect real-world production volumes. This dataset does not currently require a real-world production volume to work in the database framework, and no actual data were collected yet. This has no negative effect on the results of the ecoinvent database. The placeholder value of this activity was scaled according to the nominal GDP of 2005 (source: United Nations, http://data.un.org/Glossary.aspx?q=GDP+%28current+US%24%29, accessed 20130726) to reflect an appropriate share of the global production volume, which is also a placeholder value.
  property price 1.14152 EUR2005
    Calculated based on inputs: The price of the product has been calculated as a sum of the values of the material and energy inputs for this product. This value is therefore a rough estimation. It may underestimate the real price since there are additional expenses when producing any product. These expences can include for example labour costs, treatment of waste materials and profit for the producer. Please consider carefully whether this level of data quality is acceptable for your application.
  property heating value, net 37.14 MJ
    LHV is calculated based on the elemental composition of the substance. Based on the CAS number of the substance (001634-04-4), the chemical formula of the substance is found to be: C5H12O, (PubChem 2020).
    Reference: Kim, S., Chen, J., Cheng, T., Gindulyte, A., He, J., He, S., Li, Q., Shoemaker, B. A., Thiessen, P. A., Yu, B., Zaslavsky, L., Zhang, J., & Bolton, E. E. (2019). PubChem 2019 update: improved access to chemical data. Nucleic acids research, 47(D1), D1102–D1109. https://doi.org/10.1093/nar/gky1033
  property carbon content 0.681818
    carbon content on a dry matter basis (reserved; not for manual entry)
  properties: water content 0, carbon content, fossil 0.681818, carbon content, non-fossil 0, wet mass 1 kg, water in wet mass 0 kg, dry mass 1 kg, carbon allocation 0.681818 kg

## Inputs from technosphere
- butadiene: 0.653 kg; lognormal variance with pedigree 0.078, pedigree (4,4,5,1,3)
  EcoSpold01Location=RER
  Literature, estimation for isobutylen
  Uncertainty: Literature, estimation for isobutylen
  properties: carbon content, fossil 0.857143, wet mass 1 kg, dry mass 1 kg, heating value, net 40.35 MJ
- chemical factory, organics: 4e-10 unit; lognormal variance with pedigree 0.36, pedigree (4,4,5,1,1)
  EcoSpold01Location=RER
  Rough estimation
  Uncertainty: Rough estimation
- methanol: 0.37 kg; lognormal variance with pedigree 0.06, pedigree (4,4,5,1,1)
  Literature
  EcoSpold01Location=CH
  Uncertainty: Literature
  properties: dry mass 1 kg, carbon content, fossil 0.375, wet mass 1 kg, heating value, net 26.49 MJ

## Sampling procedure
Literature.

## Extrapolations
This dataset has been extrapolated from year 1991 to the year of the calculation (2021). The uncertainty has been adjusted accordingly.

## Review by Michael Spielmann (obsolete) 2003-07-16
Passed.
